# cement production, alternative constituents 21-35%

Dataset: EcoSpold 2, unit process
Geography: RoW
Time period: 2005-01-01 to 2021-12-31
Technology level: current
Classification: ISIC rev.4 ecoinvent: 2394:Manufacture of cement, lime and plaster
Synonyms: Portland composite cement; CEM II/B
Tags: combined production
Scenario: Business-as-Usual
System model: Allocation, cut-off by classification
Share of production covered: 10 %
Generated by: Michael Elias Boesch
Published in: Boesch, M.E. 2010
Database: ecoinvent
isCopyrightProtected: true
accessRestrictedTo: 1

## General comment
The dataset describes the production of cement (CEM II/B)

## Included activities start
From cradle, i.e. including all upstream activities. As source of gypsum, waste gypsum from flue gas treatment is assumed.

## Included activities end
This activity ends with the cement produced in the cement mill. The dataset does not include packaging and administration.

## Reference product
- hard coal ash: 0 kg; name flyash; By-product classification Waste; CPC 39: Wastes or scraps
  Literature Value
  production volume 0 kg
    Amount relative to produced amount of reference product
  property price 0 EUR2005; name flyash_price_EUR2005
    Waste products are assigned a price of zero as they are assumed to require further treatment.
  property carbon content 0
    carbon content on a dry matter basis (reserved; not for manual entry)
  properties: carbon content, fossil 0, carbon content, non-fossil 0, wet mass 1 kg, water in wet mass 0 kg, water content 0, dry mass 1 kg, carbon allocation 0 kg
- silica fume, densified: 0 kg; name silica_fume; source Boesch, M.E. 2010; By-product classification Recyclable; CPC 374: Plaster, lime and cement
  Literature Value
  production volume 0 kg
    Amount relative to produced amount of reference product
  property carbon content, non-fossil 0
    asumed same composition as sylicon dioxide (http://www.silicafume.org/pdf/silicafume-users-manual.pdf)
  property carbon content, fossil 0
    (same comment as for silica fume, densified)
  property price 0.165426 EUR2005; name silica_fume_price_EUR2005
    Estimated value. Based on price reported on the website Alibaba (https://www.alibaba.com/showroom/silica-fume-price.html, accessed 7 July 2019). Using exchange rate of 1EURO = 1.209 USD.
  property carbon content 0
    carbon content on a dry matter basis (reserved; not for manual entry)
  properties: water content 0, wet mass 1 kg, dry mass 1 kg, water in wet mass 0 kg, carbon allocation 0 kg
- cement, alternative constituents 21-35%: 1 kg; name cement; source Boesch, M.E. 2010; CPC 374: Plaster, lime and cement; By-product classification allocatable product
  production volume 4.11723e10 kg; name APV_cement
    The global production volume was calculated as follows:
    1) The total production volume of each country was calculated
    2) The production volume was scaled based construction output (*)
    3) The average of the results was assumed to be the GLO PV
    4) The share of each different technology per country was calculated
    5) The weighted average of the shares for each country was used to split the GLO PV into different technologies
    (*)
    Construction output assumed per country
    Country Share
    CO 1%
    PE 0%
    BR 2%
    ZA 1%
    IN 10%
    US 8%
    CA-QC 0%
    CH 0%
    Europe without Switzerland 20%
    Source:
    OECD. 2018. Input-Output Tables. http://www.oecd.org/trade/input-outputtables.htm.
    United Nations Statistics Division. 2019. UN data. A world of information. http://data.un.org/.
    Timmer, M.P., E. Dietzenbacher, B. Los, R. Stehrer, and G.J. de Vries. 2015. An Illustrated User Guide to the World Input-Output Database: the Case of Global Automotive Production. Review of International Economics 23(3): 575-605. http://doi.wiley.com/10.1111/roie.12178.
    The data was adjusted based on PPP, data from:
    The World Bank. 2019. World Bank Open Data. https://data.worldbank.org/
  property price 0.0615 EUR2005; name cement_price_EUR2005
    2005 import and export prices (total trades (USD) divided by total weight (kg) in China, India, USA, Japan, Russia and Europe, major producers and consumers (http://www.cementchina.net/freport/showfre.asp?id=749) from UN Commodity Trade Statistics Database (http://data.un.org/Explorer.aspxDatabase [Accessed 2 July 2010]). Commodity: Cement (portland, aluminious, slag or hydraulic)
  property carbon content 0
    carbon content on a dry matter basis (reserved; not for manual entry)
  properties: water in wet mass 0 kg, wet mass 1 kg, carbon content, fossil 0, water content 0, dry mass 1 kg, carbon content, non-fossil 0, carbon allocation 0 kg

## By-products
- inert filler: 0 kg; name inert_filler; = (ABS(flyash)+ABS(bshale)+ABS(silica_fume))*0; source Boesch, M.E. 2010; CPC 37410: Plasters; By-product classification allocatable product
  In accordance with the ecoinvent centre, the link between waste treatment and cement production shall not be established here. Therefore the inert filler value is set to zero (cut-off approach)
  production volume 0 kg; = APV_cement/ cement*ABS( inert_filler)
    Amount relative to produced amount of reference product
  property price 0.004 EUR2005; name inert_filler_price_EUR2005
    Temporary price data. Calculated as 90% of purchasers price based on: 2004 market prices are estimated to be equal to USA prices, which are given according to http://minerals.usgs.gov/minerals/pubs/commodity/sand_&_gravel_construction/myb1-2007-sandc.xls, table 1, downloaded 21 April 2009. Same price for gravel and sand.
  property carbon content 0
    carbon content on a dry matter basis (reserved; not for manual entry)
  properties: wet mass 1 kg, carbon content, non-fossil 0, carbon content, fossil 0, dry mass 1 kg, water content 0, water in wet mass 0 kg, carbon allocation 0 kg

## Inputs from technosphere
- ethylene glycol: 0.00031 kg; = 3.1e-4* cement; source Kellenberger D. 2007; lognormal variance with pedigree 0.0433, pedigree (3,3,5,3,1)
  Ancillary product for grinding
  Uncertainty: Variance of log-transformed data was taken from ecoinvent report no 1, table 10.3. Value represents demand of products, electricity etc. for input/output group c.
  properties: wet mass 1 kg, dry mass 1 kg, carbon content, fossil 0.387097, heating value, net 23.44 MJ
- heat, district or industrial, other than natural gas: 0 MJ; source Boesch, M.E. 2010; pedigree (1,1,1,1,1)
  Heat for drying of blast furnace slag. Literature Value
  properties: heating value, net 1 MJ
- clinker: 0 kg; source Boesch, M.E. 2010; pedigree (1,1,1,1,1)
  Literature Value
  Uncertainty: Variance of log-transformed data was taken from ecoinvent report no 1, table 10.3. Value represents demand of products, electricity etc. for input/output group c.
  properties: dry mass 1 kg, wet mass 1 kg
- burnt shale: 0.0042 kg; name bshale; = 0.0042*cement; lognormal variance with pedigree 0.2106, pedigree (5,5,5,5,5)
  Literature Value
  properties: dry mass 1 kg, wet mass 1 kg
- gypsum, mineral: 0 kg; source Boesch, M.E. 2010; pedigree (1,1,1,1,1)
  (same comment as for clinker)
  properties: dry mass 1 kg, wet mass 1 kg
- ground granulated blast furnace slag: 0 kg; name GGBFS; source Boesch, M.E. 2010; pedigree (1,1,1,1,1)
  (same comment as for clinker)
  properties: wet mass 1 kg, dry mass 0.99 kg
- cement factory: 5.36e-11 unit; = 5.36e-11* cement; source Kellenberger D. 2007; lognormal variance with pedigree 0.3412, pedigree (2,1,5,4,1)
  Literature Value
  Uncertainty: Variance of log-transformed data was taken from ecoinvent report no 1, table 10.3. Value represents demand of infrastructure for input/output group c.
- electricity, medium voltage: 0 kWh; source Boesch, M.E. 2010; pedigree (1,1,1,1,1)
  (same comment as for clinker)
- inert filler: 0 kg; = 0.035* cement*0; source Boesch, M.E. 2010
  (same comment as for inert filler)
  properties: dry mass 1 kg, wet mass 1 kg
- steel, low-alloyed: 0.00011 kg; name steel; = 0.00011* cement; source Kellenberger D. 2007; lognormal variance with pedigree 0.0433, pedigree (3,3,5,3,1)
  Literature value
  Uncertainty: Variance of log-transformed data was taken from ecoinvent report no 1, table 10.3. Value represents demand of products, electricity etc. for input/output group c.
  properties: dry mass 1 kg, wet mass 1 kg, carbon content, fossil 0.005
- limestone, crushed, for mill: 0.224 kg; name limestone; = 0.2240*cement; source Boesch, M.E. 2010; lognormal variance with pedigree 0.0433, pedigree (3,3,5,3,1)
  (same comment as for clinker)
  properties: water content 0.00200401, carbon content, fossil 0.117492, dry mass 0.998 kg, wet mass 1 kg
- clinker: 0.684 kg; source Boesch, M.E. 2010; lognormal variance with pedigree 0.0433, pedigree (3,3,5,3,1)
  (same comment as for clinker)
- heat, district or industrial, other than natural gas: 2.72392e-6, 0.00671728 MJ (2 entries); source Boesch, M.E. 2010; lognormal variance with pedigree 0.0086, pedigree (1,1,4,1,1)
  Heat for drying of blast furnace slag. Literature Value
- gypsum, mineral: 0.0293974, 0.00660257 kg (2 entries); source Boesch, M.E. 2010; lognormal variance with pedigree 0.0433, pedigree (3,3,5,3,1)
  (same comment as for clinker)
- ground granulated blast furnace slag: 0.0162434, 0.00392819, 0.000828413 kg (3 entries); source Boesch, M.E. 2010; lognormal variance with pedigree 0.0433, pedigree (3,3,5,3,1)
  (same comment as for clinker)
- electricity, medium voltage: 3.85183e-5, 0.000273443, 0.000461898, 1.85147e-5, 0.00014665, 2.27122e-5, 3.76463e-5, 1.44817e-6, 3.12689e-5, 4.7389e-5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 kWh (28 entries); source Boesch, M.E. 2010; lognormal variance with pedigree 0.0433, pedigree (3,3,5,3,1)
  (same comment as for clinker)

## Emissions to nature
- Heat, waste [air, unspecified]: 0.131 MJ; = 0.131* cement; source Boesch, M.E. 2010; lognormal variance with pedigree 0.0827, pedigree (3,3,5,3,1)
  Literature Value
  Uncertainty: Variance of log-transformed data was taken from ecoinvent report no 1, table 10.3. Value represents others emitted to air for input/output group p.

## Sampling procedure
Data approximates average European production

## Review by Emilia Moreno Ruiz 2013-03-11
PV adjusted

## Review by Tereza Levova 2015-03-30
Changes done for ecoinvent v3.2.; burnt shale switched from being material for treatment (and negative reference product in this activity) to be ordinary product with a price (and input from technosphere in this activity).

## Review by Gabor Doka 2012-06-16
Passed (just). See review comments in "cement production, Portland blast furnace slag, 25-70% blast furnace slag, GLO, 2005 - 2009" and "cement production, Portland, CH, 2005 - 2009" which apply to (almost) all cement datasets.
