# concrete production, 25MPa, ready-mix, exposure class XC2

Dataset: EcoSpold 2, unit process
Geography: AT
Time period: 2015-10-25 to 2021-10-25
Technology level: current
Classification: ISIC rev.4 ecoinvent: 2395:Manufacture of articles of concrete, cement and plaster
Classification: EcoSpold01Categories: construction materials/concrete
Synonyms: ready-mix concrete; ready mixed concrete
Tags: combined production
Scenario: Business-as-Usual
System model: Allocation, cut-off by classification
Share of production covered: 13.9 %
Generated by: Alexander Passer
Database: ecoinvent
isCopyrightProtected: true
accessRestrictedTo: 1

## General comment
This dataset represents the production of ready-mix concrete in Austria, with 25MPa compressive strength at 28 days, exposure class XC2. Ingredients for 1m3 of fresh concrete are: Cement 248 kg, Water 173 kg, Sand 854 kg, Gravel 1077 kg, chemical admixtures 1.41 kg, supplementary cementitious materials (SCM) 48 kg. The SCM content refers to AHWZ = aufbereitete hydraulisch wirksame Zusatzstoffe: which are processed hydraulic additions for concrete production, consisting of specially processed fly-ash with slag and limestone powder, according to Austrian standard ÖNORM B 3309. 25 MPa concrete is intended for building structures in general, exposed to freeze-thaw, including residential, commercial and industrial uses. According to the european standard EN 206-1, XC exposure classes refer to the risk of "corrosion induced by carbonation" (see Table 1 excerpt below). The XC2 class represents, more specifically, a concrete in a wet or rarely dry environment, such as concrete surfaces subject to long-term water contact, or foundations. The concrete mix documented here is an average of seven concrete manufacturers which, together, represent approximately 90% of ready-mix concrete production in Austria. Exchange properties are declared for the fresh concrete. Concrete dry mass considers the amount of water that reacts with cement to form hydrates. As a consequence, this dataset is not water balanced according to ecoinvent guidelines. The waste generated in production has been accounted for, and the amount of additional inputs was proportionately split up between concrete ingredients, except for inputs of auxiliary materials, such as lubricating oil and rubber. The annual production volume and proportion per strength class data was provided by the Austrian Association for ready mix concrete manufacturers for the year 2018. Distribution by ready-mix exposure classes in Austria is: XC1-19.7%; XC2-23.6%; B1-10.3%; B2-21.5%. Other exposure classes represent, together, 24.9% and we're not modelled here due to their inexpressive individual consumption.

## Included activities start
From reception of raw materials at the ready-mix plant gate.

## Included activities end
This activity ends before the delivery of concrete at the construction site.
The dataset includes the whole manufacturing processes to produce ready-mixed concrete, internal processes (material handling and mixing) and infrastructure.

## Geography
Austrian data. For some exchanges GLO values have been used as proxy. Data quality indicators adjusted accordingly.

## Technology
Typical technology for average ready mix concrete production in Austria

## Time period
Mix designs provided referred to 2015, while annual production volumes refer to 2018.

## Parameters
- losses: 0.015 dimensionless; lognormal variance with pedigree 0, pedigree (1,1,1,1,1)
  Measured value. Loss percentage documented by manufacturer with highest production volume

## Reference product
- hard coal ash: 0 kg; name flyash; By-product classification Waste; CPC 39: Wastes or scraps
  Approximation, calculated value. Weighted average of values informed by manufacturers. Hard coal ash used as a proxy for supplementary cementitious material "fly ash", which composes the material "Aufbereiteter Hydraulisch Wirksamer Zusatzstoff" (AHWZ), a combination of fly ash, ground granulated blast furnace slag and limestone filler used in concrete manufacturing. Variance of lognormal distribution is 0.0942
  production volume 0 kg
    Calculated from production volume of reference product using relative outputs
  property price 0 EUR2005; name flyash_price_EUR2005
    Waste products are assigned a price of zero as they are assumed to require further treatment.
  property carbon content 0
    carbon content on a dry matter basis (reserved; not for manual entry)
  properties: carbon content, fossil 0, water content 0, dry mass 1 kg, carbon content, non-fossil 0, wet mass 1 kg, water in wet mass 0 kg, carbon allocation 0 kg
- concrete, 25MPa: 1 m3; name concrete; CPC 37510: Non-refractory mortars and concretes; By-product classification allocatable product
  25 MPa concrete is intended for building structures in general, including residential, commercial and industrial uses.
  production volume 1.9824e6 m3; name PV
    Production volume and proportion per strength class data for year 2018, provided by the Austrian Association for ready mix concrete manufacturers
  property cement content 247.94 kg; name cement
  property dry mass 2285.13 kg; name DM
  property price 185 EUR2005; name concrete_price_EUR2005
    Estimated to be the same price as in case of concrete, normal (Data are not easily available. Therefore, an average price of products supplied by the activities in the same ISIC 3 code has been applied.This price is obtained as '_49 Concrete, asphalt and other mineral products, EU27 virgin, EU27' in the 'EU & DK Input Output Database' (available in SimaPro). The price is assumed to be valid for both RER2003, RER 2004, world 2003 and world 2004. Multiplied by density.).
  property water content 0.0507367; = (concrete_density-DM)/DM
  property gravel content 1077.26 kg; name gravel
  property sand content 853.51 kg; name sand
  property wet mass 2401.07 kg; name concrete_density
  property carbon content 0
    carbon content on a dry matter basis (reserved; not for manual entry)
  properties: carbon content, fossil 0, carbon content, non-fossil 0, water in wet mass 115.97 kg, carbon allocation 0 kg

## Inputs from technosphere
- lubricating oil: 0.03143 kg; name lub_oil; = 0.03143*concrete; lognormal variance with pedigree 0.0033, pedigree (2,2,3,1,1)
  Calculated value. Average value from company with largest production volume
  EcoSpold01Location=RER
  Uncertainty: Value for variance extrapolated from table 10.3 of ecoinvent data quality guidelines
  properties: dry mass 1 kg, wet mass 1 kg, heating value, net 40.2 MJ
  note on heating value, net: Literature value, Source: IPCC 2006, 2006 IPCC Guidelines for National Greenhouse Gas Inventories, Prepared by the National Greenhouse Gas Inventories Programme, Eggleston H.S., Buendia L., Miwa K., Ngara T. and Tanabe K. (eds). Published: IGES, Japan
- waste concrete: -36.016 kg; name was_concrete; = (36.01605*concrete)*-1; lognormal variance with pedigree 0.0033, pedigree (2,2,3,1,1)
  Calculated value. Average value from company with largest production volume. Value calculated based on concrete density (see properties) and losses (see parameters).
  Uncertainty: Value for variance extrapolated from table 10.3 of ecoinvent data quality guidelines
  production volume 7.13982e7 kg; = was_concrete*PV/concrete
    Calculated from production volume of reference product using the relative outputs.
  property price 0 EUR2005; name was_concrete_price_EUR2005
  properties: water content 0.0569707, dry mass 0.9461 kg, wet mass 1 kg
- scrap steel: -0.0585 kg; = (0.0585*concrete)*-1; lognormal variance with pedigree 0.0033, pedigree (2,2,3,1,1)
  Estimation. Based on corresponding input.
  Uncertainty: Value for variance extrapolated from table 10.3 of ecoinvent data quality guidelines
  production volume 115970 kg; = steel*PV/concrete
    Calculated from production volume of reference product using the relative outputs.
  properties: wet mass 1 kg, dry mass 1 kg
- wastewater from concrete production: -0.0016 m3; = (0.0016*concrete)*-1; lognormal variance with pedigree 0.0033, pedigree (2,2,3,1,1)
  (same comment as for scrap steel)
  production volume 3171.84 m3; = process_water*PV/concrete
    Calculated from production volume of reference product using the relative outputs.
  properties: wet mass 1000 kg, dry mass 0.449139 kg, water content 2225.48, carbon content, fossil 0.027074
- waste rubber, unspecified: -0.07381 kg; = (0.07381*concrete)*-1; lognormal variance with pedigree 0.0033, pedigree (2,2,3,1,1)
  (same comment as for scrap steel)
  production volume 146321 kg; = rub*PV/concrete
    Calculated from production volume of reference product using the relative outputs.
  properties: carbon content, fossil 0.853, wet mass 1 kg, dry mass 1 kg, heating value, net 27.19 MJ
  note on heating value, net: Value taken from the general comment of the treatment dataset.
- concrete mixing factory: 4.57e-7 unit; = 0.000000457*concrete; source Kellenberger D. 2007; lognormal variance with pedigree 0.3326, pedigree (2,5,3,5,1)
  Literature value. From ecoinvent dataset "concrete production, 25 MPa, RNA only, GLO, 2006-2006" Access date 10.10.2017
  EcoSpold01Location=CH
  Uncertainty: Basic uncertainty from original dataset, completeness and geographical score adjusted.
- ground granulated blast furnace slag: 21.9116 kg; name GGBFS; = 21.9115665748*concrete; lognormal variance with pedigree 0.0962104, pedigree (1,1,3,1,1)
  Calculated value. Weighted average of values informed by manufacturers. Ground granulated blast furnace slag is a component of the material "Aufbereiteter Hydraulisch Wirksamer Zusatzstoff" (AHWZ), a combination of fly ash, ground granulated blast furnace slag and limestone filler used in concrete manufacturing. Losses considered.
  Uncertainty: Variance of logtransformed data calculated based on the sample's coefficient of variation.
  property water content 0; name GGBFS_water_content
  property wet mass 1 kg; name GGBFS_WM
  property carbon content, fossil 0; name GGBFS_C_content_fossil
  property water in wet mass 0 kg; name GGBFS_WWM
  property carbon content, non-fossil 0; name GGBFS_C_content_non_fossil
  property dry mass 1 kg; name GGBFS_DM
  note on carbon content, fossil: Industry value; Arcelor Mittal, chemical composition of blast furnace slag (http://www.cst.com.br/english/products/co_products/catalog_products/blast_slag/blast_slag.asp, accessed: 20121003).
- tap water: 175.564 kg; = 175.564002509*concrete; lognormal variance with pedigree 0.00255506, pedigree (1,2,3,1,1)
  EcoSpold01Location=CH
  Calculated value. Weighted average of values informed by manufacturers. Losses considered
  Uncertainty: Variance of logtransformed data calculated based on the sample's coefficient of variation.
  properties: wet mass 1 kg
- chemical, organic: 1.43409 kg; = 1.4340935*concrete; lognormal variance with pedigree 0.0595123, pedigree (1,1,3,1,1)
  Calculated value. Weighted average of values informed by manufacturers. Losses considered.
  Uncertainty: Variance of logtransformed data calculated based on the sample's coefficient of variation.
  properties: bulk density 1140 kg/m3, wet mass 1 kg, dry mass 1 kg, heating value, net 19.03 MJ
- electricity, medium voltage: 2.8 kWh; = 2.8*concrete; lognormal variance with pedigree 0.002, pedigree (2,3,2,1,1)
  EcoSpold01Location=CH
  Calculated value. Average value from company with largest production volume
  Uncertainty: Value for variance extrapolated from table 10.3 of ecoinvent data quality guidelines
- cement, unspecified: 251.659 kg; = 251.6591*concrete+ flyash*0; lognormal variance with pedigree 0.00890197, pedigree (1,1,3,1,1)
  (same comment as for chemical, organic)
  properties: dry mass 1 kg, wet mass 1 kg
- sand: 866.313 kg; = 866.31265*concrete; lognormal variance with pedigree 0.0134726, pedigree (1,2,3,1,1)
  Calculated value. Weighted average of values informed by manufacturers. Calculated based on sand content (see properties) and losses (see parameters).
  Uncertainty: Variance of logtransformed data calculated based on the sample's coefficient of variation.
  properties: wet mass 1 kg, dry mass 1 kg
- steel, low-alloyed, hot rolled: 0.0585 kg; name steel; = 0.0585*concrete; lognormal variance with pedigree 0.0033, pedigree (2,2,3,1,1)
  (same comment as for lubricating oil)
  properties: dry mass 1 kg, wet mass 1 kg
- diesel, burned in building machine: 22.7 MJ; = 22.7*concrete; lognormal variance with pedigree 0.0033, pedigree (2,2,3,1,1)
  Calculated value. Average value from company with largest production volume
  Uncertainty: Value for variance extrapolated from table 10.3 of ecoinvent data quality guidelines
  property density 0.84 kg/l; name density_diesel
  properties: heating value, net 1 MJ
- gravel, crushed: 1093.42 kg; = 1093.4189*concrete; lognormal variance with pedigree 0.00662244, pedigree (1,2,3,1,1)
  Calculated value. Weighted average of values informed by manufacturers. Calculated based on gravel content (see properties) and losses (see parameters).
  Uncertainty: Variance of logtransformed data calculated based on the sample's coefficient of variation.
  properties: wet mass 1 kg, dry mass 1 kg
- limestone, crushed, for mill: 4.86924 kg; = 4.869237016735*concrete; lognormal variance with pedigree 0.0962104, pedigree (1,1,3,1,1)
  Calculated value. Weighted average of values informed by manufacturers. Limestone is a component of the material "Aufbereiteter Hydraulisch Wirksamer Zusatzstoff" (AHWZ), a combination of fly ash, ground granulated blast furnace slag and limestone filler used in concrete manufacturing. Losses considered.
  Uncertainty: Variance of logtransformed data calculated based on the sample's coefficient of variation.
  properties: wet mass 1 kg, carbon content, fossil 0.117492, water content 0.00200401, dry mass 0.998 kg
- waste mineral oil: -0.03143 kg; = (0.03143*concrete)*-1; lognormal variance with pedigree 0.0033, pedigree (2,2,3,1,1)
  (same comment as for scrap steel)
  production volume 62306.8 kg; = lub_oil*PV/concrete
    Calculated from production volume of reference product using the relative outputs.
  properties: wet mass 1 kg, water content 0.111111, dry mass 0.9 kg, carbon content, fossil 0.864444, heating value, net 34.7 MJ
  note on carbon content, fossil: Tab A.6, ecoinvent v2.2 report 13_I. C content has been calculated after data in the tables, and then referred to 1 kg DM
- synthetic rubber: 0.07381 kg; name rub; = 0.07381*concrete; lognormal variance with pedigree 0.0033, pedigree (2,2,3,1,1)
  (same comment as for lubricating oil)
  properties: heating value, net 26.42 MJ, dry mass 1 kg, wet mass 1 kg

## Inputs from nature
- Water, cooling, unspecified natural origin [natural resource, in water]: 0.0016 m3; name process_water; = 0.0016*concrete; lognormal variance with pedigree 0.0033, pedigree (2,2,3,1,1)
  Calculated value. Average value from company with largest production volume. Water used for cooling or cleaning purposes.
  Uncertainty: Value for variance extrapolated from table 10.3 of ecoinvent data quality guidelines

## Sampling procedure
Data on concrete mixes are a weighted average of seven concrete manufacturers in Austria. For other auxiliary flows, data was taken from the largest concrete manufacturer in Austria. Basic uncertainty was calculated from the coefficient of variation of the sample. No conversion to the geometric mean of the lognormal distribution was done, for consistency reasons with other ecoinvent datasets.
Representativeness is of 13.90% based on the annual production volumes of XC2 concrete provided by the seven concrete manufacturers against the annual production volume of XC2 concrete for the country provided by the Austrian association of ready-mix concrete manufacturers

## Extrapolations
Auxiliary process flows (steel, lubricating oil, rubber, etc) for the largest manufacturer were used to represent total concrete production in the country. The infrastructure-related flow "concrete mixing factory" has been kept as in the dataset "concrete production, 25 MPa, RNA only, GLO, 2006-2006". In both cases uncertainties were adjusted accordingly.
