# collection of polystyrene scrap, post-consumer

Dataset: EcoSpold 2, unit process
Geography: CH
Time period: 2009-01-01 to 2021-12-31
Technology level: current
Classification: ISIC rev.4 ecoinvent: 2220:Manufacture of plastics products
Classification: EcoSpold01Categories: plastics/polymers
Synonyms: EPS
Tags: ConvertedDataset
Scenario: Business-as-Usual
System model: Allocation, cut-off by classification
Share of production covered: 0 %
Generated by: Annelore Kleijer
Published in: Hischier, R. 2010
Database: ecoinvent
isCopyrightProtected: true
accessRestrictedTo: 1

## General comment
Based on the Ecoinvent data from “disposal, building, polystyrene isolation, flame-retardant, to final disposal”
[This dataset was already contained in the ecoinvent database version 2. It was not individually updated during the transfer to ecoinvent version 3. Life Cycle Impact Assessment results may still have changed, as they are affected by changes in the supply chain, i.e. in other datasets. This dataset was generated following the ecoinvent quality guidelines for version 2. It may have been subject to central changes described in the ecoinvent version 3 change report (http://www.ecoinvent.org/database/ecoinvent-version-3/reports-of-changes/), and the results of the central updates were reviewed extensively. The changes added e.g. consistent water flows and other information throughout the database. The documentation of this dataset can be found in the ecoinvent reports of version 2, which are still available via the ecoinvent website. The change report linked above covers all central changes that were made during the conversion process.]

## Included activities end
Includes the collection and transport of post consumer scrap from dismantling to scrap dealer

## Reference product
- polystyrene scrap, post-consumer: 1 kg; CPC 39270: Waste, parings and scrap of plastics; By-product classification Recyclable
  EcoSpold01Location=CH
  production volume 0.033668 kg; = 4*0.008417
    Estimated. The swiss production volume is a dummy variable calculated using the nominal GDP of 2005 (source: United Nations, http://data.un.org/Glossary.aspx?q=GDP+%28current+US%24%29, accessed 20130726 and 20130312). Where global dummy variable is set to 4 and swiss GDP is 0.008417
    Gross domestic product (GDP) at current prices is GDP at prices of the current reporting period. Also known as nominal GDP.
  property price 0.91 EUR2005
    Calculated value based on data from United Nations Commodity Trade Statistics Database (comtrade.un.org). UN comtrade category: 390319 Polystyrene, except expansible in primary forms. Year 2005. Using exchange rate of 1EURO = 1.209 USD. Average of price of import into 5 main markets (EU, US, JP, IN and CN).
  property carbon content, fossil 0.922579
    Tab & Fig 6.12, ecoinvent v2.2 report 7, part XXI. Chemical formula of polystyrene is (C8H8)n
  property carbon content 0.922579
    carbon content on a dry matter basis (reserved; not for manual entry)
  properties: wet mass 1 kg, dry mass 1 kg, water in wet mass 0 kg, carbon content, non-fossil 0, water content 0, heating value, net 38.67 MJ, carbon allocation 0.922579 kg

## Extrapolations
This dataset has been extrapolated from year 2009 to the year of the calculation (2021). The uncertainty has been adjusted accordingly.

## Review by Hans-Jörg Althaus 2010-02-07
passed
none

## Review by Emilia Moreno Ruiz 2015-10-16
PV adjusted/GLO created
