# strontium mine operation and beneficiation

Dataset: EcoSpold 2, unit process
Geography: ES
Time period: 2014-01-01 to 2021-12-31
Technology level: current
Classification: EcoSpold01Categories: construction materials/additives
Classification: ISIC rev.4 ecoinvent: 0729:Mining of other non-ferrous metal ores
Synonyms: celestite; SrSO4; celestine
Scenario: Business-as-Usual
System model: Allocation, cut-off by classification
Share of production covered: 100 %
Generated by: Eleonora Crenna
Published in: Philip Nuss 2014
Database: ecoinvent
isCopyrightProtected: true
accessRestrictedTo: 1

## General comment
This dataset represents the production of 1 kg strontium sulfate (SrSO4, 90% concentrate) from celestite ores. Celestite is the mineral available at the mining site and includes strontium sulfate (i.e. the marketable product) and impurities, which are eliminated through the beneficiation process. Concentrated strontium sulfate is an intermediate product: it is indeed used as a precursor for the production of strontium carbonate. The system includes consumption of raw materials, energy, infrastructure, as well as the generation of emissions to air and water. Production during stable operation conditions is represented. The source of the data (Nuss & Eckelman, 2014) has been applied to Spain, which represents 41% of global celestite production in 2019 (USGS 2020).
References:

Nuss, P., & Eckelman, M. J. (2014). Life cycle assessment of metals: a scientific synthesis. PLoS One, 9(7), e101298.
USGS 2020. Mineral Commodity Summaries - Strontium. Available at: https://pubs.usgs.gov/periodicals/mcs2020/mcs2020.pdf
[This dataset is meant to replace the following datasets:]

## Included activities start
The activity starts with the construction of the mine site and the extraction of celestite ore (SrSO4)

## Included activities end
The activity ends with the production of strontium sulfate 90% concentrate. The majority of strontium (metal, carbonate, etc.) producers require at least 90% strontium sulfate content for economic profitability.

Reference:
USGS, 2015 - Minerals Yearbook, Strontium. Available at: https://s3-us-west-2.amazonaws.com/prd-wret/assets/palladium/production/mineral-pubs/strontium/myb1-2015-stron.pdf

## Geography
This dataset is considered representative of Spanish extraction of strontium sulfate from celestite ores.

## Technology
Celestite ores (SrSO4) are mined from both open cast and underground mines. Due to a lack of knowledge on the exact global share of both operations, the open-cast mining is assumed in this dataset. About 47 to 87 kg of celestite (3.8-3.9 g/cm3) are contained in one cubic meter of ore containing limestone, quartz, gypsum, and dolomite (all <3 g/cm3). During the mine operations, celestite is broken by drilling and blasting and the raw ore is mined. Assuming an average yield of 67 kg celestite/m3 ore, an average density of 3.85 t/m3 ore, and a recovery efficiency of 75%, 76.62 kg of ore are mined per kg of celestite. Impurities are removed via desliming and celestite separated from other ores by means of density separation. Between 80% and 95% of strontium sulfate contained in the ore can be extracted.
References:

Nuss, P., & Eckelman, M. J. (2014). Life cycle assessment of metals: a scientific synthesis. PLoS One, 9(7), e101298.

## Time period
Data are considered valid from 2014 (year of the publication) to 2020.

## Parameters
- fraction, process water, to air: 0.15 dimensionless; name fraction_PW_to_air
  Literature value. In case when no industry/process specific data are available, default evaporation fraction value is used. This value is 15% and is based on literature (Statistics Canada, 2007 & Shaffer, K.H., 2008, Consumptive water use in the Great Lakes Basin, USGS & Shiklomanov, 2003, World Water Resources at the Beginning of the 21st Century) and has been approved by an expert.
- ore, mined: 76.6169 kg; name ore_mined; = 3850/67/0.75
  Calculated from Nuss & Eckelman (2014). Celestite mined ore, calculated based on average yield of 67 kg celestite/m3 ore, a density of 3.85 t/m3 ore, and a recovery efficiency of 75%,
- recovery rate strontium: 0.75 dimensionless; name recovery_rate

## Reference product
- strontium sulfate, 90% SrSO4: 1 kg; name RefProd; source Philip Nuss 2014; CPC 14290: Other non-ferrous metal ores and concentrates (other than uranium or thorium ores and concentrates); By-product classification allocatable product; CAS 7759-02-6
  production volume 9e7 kg; name strontium_sulfate_PV
    PV represents the Spanish national production of strontium sulfate in 2019, source: USGS 2020 - Mineral Commodity Summaries (https://pubs.usgs.gov/periodicals/mcs2020/mcs2020.pdf)
  property strontium content 0.4293; name Sr_content
    Based on strontium sulfate stoichiometry (SrSO4), the value differs a little from the value (0.4388) found for celestite in http://minerals.usgs.gov/minerals/pubs/commodity/strontium/mcs-2013-stron.pdf.
  property price 0.1 EUR2005; name RefProd_price_EUR2005
    Expert judgement. Cross-reference: 0.000427 EUR/kg is calculated price based on inputs: The price of the product has been calculated as a sum of the values of the material and energy inputs for this product. This value is therefore a rough estimation. It may underestimate the real price since there are additional expenses when producing any product. These expences can include for example labour costs, treatment of waste materials and profit for the producer. Please consider carefully whether this level of data quality is acceptable for your application.
  property carbon content 0
    carbon content on a dry matter basis (reserved; not for manual entry)
  properties: carbon content, non-fossil 0, dry mass 1 kg, water in wet mass 0 kg, water content 0, wet mass 1 kg, carbon content, fossil 0, carbon allocation 0 kg

## Inputs from technosphere
- electricity, medium voltage: 1.48989 kWh; = 0.07*(3850/67/0.75)*0.2778; source Philip Nuss 2014; lognormal variance with pedigree 0.126835, pedigree (4,5,5,5,1)
  Literature. Estimated, based on 0.07 MJ electricity per kg ore from barite mining, 76.62 kg celestite ore mined and conversion factor of 0.2778 kWh/MJ.
- non-sulfidic overburden, off-site: -75.6169 kg; name overburden_amount; = (Sr_input_amount + S_input_amount + gangue_input- RefProd)*-1; lognormal variance with pedigree 0.1268, pedigree (4,5,5,5,1)
  Calculated to obtain mass balance.
  production volume 6.80552e9 kg; = strontium_sulfate_PV * overburden_amount
    Calculated from production volume of reference product using the relative outputs.
  property price 0 EUR2005; name overburden_amount_price_EUR2005
  properties: wet mass 1 kg, dry mass 1 kg
- diesel, burned in building machine: 0.0921 MJ; lognormal variance with pedigree 0.184, pedigree (4,5,5,5,5)
  Estimation based on barite production,
  properties: heating value, net 1 MJ
- conveyor belt: 5.82289e-6 m; = 0.000076*(3850/67/0.75)/1000; source Philip Nuss 2014; lognormal variance with pedigree 0.126835, pedigree (4,5,5,5,1)
  Literature. The original amount applied to the datasets "copper mine operation and beneficiation, sulfide ore" is reported in Classen et al. (2009): conveyor belts are assumed wit a capacity of 2000 t/h which yields 7.6E-5 m conveyor belt required per tonne mined raw ore.
  Reference:
  Classen M., Althaus H.-J., Blaser S., Doka G., Jungbluth N. and Tuchschmid M. (2009) Life Cycle Inventories of Metals. Final report ecoinvent data v2.1 No.10. Swiss Centre for Life Cycle Inventories, Dübendorf, CH.
- blasting: 0.0199204 kg; = 0.26*(3850/67/0.75)/1000; source Philip Nuss 2014; lognormal variance with pedigree 0.126835, pedigree (4,5,5,5,1)
  EcoSpold01Location=RER
  Based on data for manganese mining. An average of 0.26 kg of explosives per tonne of mined ore is needed (Classen et al. 2009).
  Reference:
  Classen M., Althaus H.-J., Blaser S., Tuchschmid M., Jungbluth N., Doka G., Faist Emmenegger M. and Scharnhorst W. (2009) Life Cycle Inventories of Metals. Final report ecoinvent data v2.1, No 10. EMPA Dübendorf, Swiss Centre for Life Cycle Inventories, Dübendorf, CH, Online-Version under: www.ecoinvent.ch
- wastewater, average: -0.213134 m3; name WW_amount; = (water_in *(1-fraction_PW_to_air))*-1; lognormal variance with pedigree 0.1268, pedigree (4,5,5,5,1)
  Calculated to obtain mass balance. See comments to parameters.
  production volume 1.91821e7 m3; = strontium_sulfate_PV * WW_amount
    Calculated from production volume of reference product using the relative outputs.
  property price 0 EUR2005; name WW_amount_price_EUR2005
  properties: dry mass 0.346837 kg, wet mass 1000 kg, carbon content, non-fossil 0.194039, water content 2882.2
  note on carbon content, non-fossil: 0.0673 kg TOC/m3 (Tab A.17, ecoinvent v2.2 report 13_I). TOC was considered as Total Carbon.
- mine infrastructure, open cast, non-ferrous metal: 5e-11 unit; = 1/(50*400000*1000); source Philip Nuss 2014; lognormal variance with pedigree 0.380905, pedigree (4,2,3,1,1)
  Calculated value. Data used in the calculation are taken from the ecoinvent dataset producing "mine infrastructure, open cast, non-ferrous metal" considering Lifetime 50a; output: 400'000 t ore per year.
  The Spanish national production volume of SrSO4 is 90000 t/year in 2018 (USGS 2020) and two mining sites in Spain cover most of the SrSO4 production at national level. Specifically, they are the mine site in Escuzar/Granada with 31 years lifetime (ref.: https://s3-us-west-2.amazonaws.com/prd-wret/assets/palladium/production/mineral-pubs/strontium/stronmyb03.pdf) the mine in Montevive/Granada with 60 years lifetime (ref.: https://s3-us-west-2.amazonaws.com/prd-wret/assets/palladium/production/mineral-pubs/strontium/stronmyb03.pdf).

## Inputs from nature
- Gangue, in ground [natural resource, in ground]: 75.835 kg; name gangue_input; = ore_mined - Sr_input_amount - S_input_amount; lognormal variance with pedigree 0.126835, pedigree (4,5,5,5,1)
  Calculated, as the difference between the ores of celestite mined (average 76.62 kg, calculated based on Nuss & Eckelman 2014) and the content of strontium and sulfur in ground.
- Strontium, in ground [natural resource, in ground]: 0.57243 kg; name Sr_input_amount; = (0.9*87.62/183.68) /recovery_rate* RefProd; lognormal variance with pedigree 0.126835, pedigree (4,5,5,5,1)
  Calculated, based on strontium content of celestite, recovery efficiency of 75% and 90% concentration of final product (Nuss & Eckelmna, 2014). Sr MW = 87.62; celestite (SrSO4) MW = 183.68
  --> % SrSO4 concentrate in final product * (MW Sr/MW SrSO4)/ recovery_rate
- Sulfur, in ground [natural resource, in ground]: 0.209484 kg; name S_input_amount; = 0.9*32.065/183.68 /recovery_rate* RefProd; lognormal variance with pedigree 0.126835, pedigree (4,5,5,5,1)
  Calculated, based on sulfur content of celestite, recovery efficiency of 75% and 90% concentration of final product (Nuss & Eckelmna, 2014). S MW = 32.065 g/mol; celestite (SrSO4) MW = 183.68 g/mol
  --> %SrSO4 concentrate in final product * (MW S/MW SrSO4)/ recovery_rate
- Water, unspecified natural origin [natural resource, in water]: 0.250746 m3; name water_in; = 12600/1000*(1/67/0.75); source Philip Nuss 2014; lognormal variance with pedigree 0.126835, pedigree (4,5,5,5,1)
  Literature. Water used for desliming process. The same value per kg ore as in barite mining was taken (12600 l water/m3 ore --> 12.6 m3 water/m3 ore * 1/(67 kg/m3 ore) / 0.75 = 0.25 m3/kg)
  property water content 9081.65; name water_content
  property water in wet mass 999.89 kg; name WWM
  property carbon content, non-fossil 0; name C_content_non_fossil
  property carbon content, fossil 0.0104329; name C_content_fossil
  property dry mass 0.1101 kg; name DM
  property wet mass 1000 kg; name WM
- Occupation, mineral extraction site [natural resource, land]: 0.536852 m2*year; = 0.302/43.1*(3850/67/0.75); source Philip Nuss 2014; lognormal variance with pedigree 0.167789, pedigree (4,5,5,5,1)
  Recalculated from Nuss et al. 2014 for the updated amount of ore mined (3850/67/0.75= 72.62 kg). The original value is based on non-ferrous metals processing estimate. Land used for the mining operations.
- Transformation, from unspecified [natural resource, land]: 0.00456857 m2; = 0.00257/43.1*(3850/67/0.75); source Philip Nuss 2014; lognormal variance with pedigree 0.246, pedigree (4,5,5,5,1)
  (same comment as for Occupation, mineral extraction site)
- Transformation, to mineral extraction site [natural resource, land]: 0.00456857 m2; = 0.00257/43.1*(3850/67/0.75); source Philip Nuss 2014; lognormal variance with pedigree 0.246, pedigree (4,5,5,5,1)
  (same comment as for Occupation, mineral extraction site)

## Emissions to nature
- Water [air, unspecified]: 0.0376119 m3; = water_in* fraction_PW_to_air; lognormal variance with pedigree 0.126835, pedigree (4,5,5,5,1)
  Calculated value to obtain mass balance. See comments to parameters.

## Sampling procedure
From Literature and estimation.

## Extrapolations
This dataset has been extrapolated from year 2020 to the year of the calculation (2021). The uncertainty has been adjusted accordingly.
