# castor bean production

Dataset: EcoSpold 2, unit process
Geography: IN
Time period: 2015-01-01 to 2021-12-31
Technology level: current
Classification: ISIC rev.4 ecoinvent: 0111:Growing of cereals (except rice), leguminous crops and oil seeds
Scenario: Business-as-Usual
System model: Allocation, cut-off by classification
Generated by: Sanjeevan Bajaj
Database: ecoinvent
isCopyrightProtected: true
accessRestrictedTo: 1

## General comment
This dataset represents the production of 1 kg of fresh Castor Beans during May-October, 2016 at a farm located in village Lilapar, District is Rajkot of Gujarat. The farm has a yield of 647 kg fresh matter per ha for this crop cycle. Sowing date for the crop is 15-June, 2016 and harvesting date is 10-October, 2016. Mineral NP fertilizer input is 119-57.50 kg/ha. Organic fertilizer applied amounts to 9,000 kg of manure from cattle dung. Pesticides used has active ingredient of Imidacloprid 53.4 g/ha and Aldrin 120g/ha. Machinery is used for soil cultivation with fuel consumption of 64 kg/ha using plough 43 kg/ha for harvesting and 11.65 kg/ha is used for other work process like transport, tractor and trailer.

## Included activities start
This activity starts about three weeks after the harvest of the previous crop. The soil is prepared for cultivation in mid-May and sowing of seeds started about five weeks after soil preparation. Thereafter the crop is mature for harvesting in about 4 months.

## Included activities end
The activity ends with the harvesting of the mature Castor Beans from the Castor bean plant

## Technology
Cultivation of Castor Beans follows conventional production standards

## Time period
Soil cultivating date for the main crop: 17-May, 2016; Harvesting date main crop: 10-October, 2016. The soil cultivation, sowing and harvesting dates are taken as the middle date of the week or fortnight told to the data collector by the farmer. Total time from date of sowing to date of harvesting comes to 120 days. The data is collected for one crop cycle. The cycle of one year is considered for entry in ecoeditor.

## Parameters
- LUC_crop_specific: 1 dimensionless
  This parameter allows to switch between a "crop specific" and a "country specific" approach when calculating the LUC of a crop. By default, the chosen approach is "crop specific", so the value of the parameter is 1. If you want to apply a "country specific" approach, turn the parameter to 0.

## Reference product
- castor bean: 1 kg; CPC 01449: Other oilseeds, n.e.c.; By-product classification allocatable product
  production volume 1.65e9 kg; = 1.65*1000000*1000
    The value was given in million tonnes. 1000 has been multiplied to convert it into Kgs. The data was given for year 2015-2016.Source: http://agricoop.nic.in/sites/default/files/Annual_rpt_201617_E.pdf (page no-44) Since the annual production volume was given in million tonnes, it was multiplied with 1000000*1000 to convert into kgs
  property price 0.56236 EUR2005
    Estimate price. The price is set to 0.68USD per ton. The price estimate is taken from the following sources: 1) CastorOil Blog Castor Oil Industry Reference & Resources CastorOil.in, 2017. Castor seed futures recover 0.63% on spot demand, retrieved from: http://castoroil.in/b/2018/01/castor-seed-futures-recover-0-63-on-spot-demand/, accessed 19Feb2018 & 2) alibaba.com, retrieved from: https://www.alibaba.com/showroom/castor-beans.html, accessed 19Feb2018.
  property carbon content, non-fossil 0.475
    Carbon content derived from faostat.
    Reference: http://www.fao.org/forestry/17111/en
  property carbon content 0.475
    carbon content on a dry matter basis (reserved; not for manual entry)
  properties: carbon content, fossil 0, water in wet mass 0.1175 kg, dry mass 0.8825 kg, wet mass 1 kg, water content 0.133144, carbon allocation 0.419187 kg

## Inputs from technosphere
- tillage, ploughing: 0.00378996 ha; lognormal variance with pedigree 0.0034, pedigree (2,4,2,1,1)
  The data was collected for a hectare area through interview
- inorganic nitrogen fertiliser, as N: 0.0332875 kg; lognormal variance with pedigree 0.0034, pedigree (2,4,2,1,1)
  The data was collected for a hectare area through interview
  properties: wet mass 1 kg, dry mass 1 kg
- cyclic N-compound: 8.25348e-5 kg; lognormal variance with pedigree 0.0034, pedigree (2,4,2,1,1)
  The data was collected for a hectare area through interview
  properties: dry mass 1 kg, carbon content, fossil 0.641962, wet mass 1 kg
- packaging, for pesticides: 0.000536012 kg; lognormal variance with pedigree 0.0514, pedigree (4,3,2,5,4)
  Total amount of active substance/s of pesticides needed for the production of castor bean is calculated to be circa 2.68E-04 kg. Pesticide/s used in this dataset is/are: 'cyclic N-compound', 'pesticide, unspecified'. The total amount of active substance/s is doubled in order to account for the packaging of the dilluted product of pesticide/s that is/are applied. Therefore, 5.36E-04 kg of packaging for pesticides is justified with this exchange.
  properties: carbon content, fossil 0.85714, wet mass 1 kg, heating value, net 25.97 MJ, dry mass 1 kg, price 0.0642 EUR2005
- ammonium sulfate: 0.00924652 kg; lognormal variance with pedigree 0.0034, pedigree (2,4,2,1,1)
  The data was collected for a hectare area through interview
  properties: dry mass 1 kg, wet mass 1 kg
- packaging, for fertilisers: 0.547604 kg; lognormal variance with pedigree 0.0514, pedigree (4,3,2,5,4)
  Total amount of active substance/s of fertilisers needed for the production of 'castor bean' is calculated to be circa 2.74E-01 kg. Fertiliser/s used in this dataset is/are: 'ammonium sulfate, as N', 'nitrogen fertiliser, as N', 'phosphate fertiliser, as P2O5', 'urea, as N'. The total amount of active substance/s is doubled in order to account for the packaging of the dilluted product of fertiliser/s that is/are applied. Therefore, 5.48E-01 kg of packaging for fertilisers is justified with this exchange.
  properties: wet mass 1 kg, heating value, net 25.01 MJ, carbon content, fossil 0.825301, dry mass 1 kg, price 0.0642 EUR2005
  note on carbon content, fossil: Considering a chemical formula (C2H4)n for polyethylene, carbon content-fossil is calculated to be 0.856286 kg of Carbon per kg of dry mass.
- compost: 13.9104 kg; lognormal variance with pedigree 0.0034, pedigree (2,4,2,1,1)
  The data was collected for a hectare area through interview
  property zinc content 0.000184; name Zn_content
  property lead content 4.9e-5; name Pb_content
  property nitrogen content 0.014; name N_content
  property nickel content 1.63e-5; name Ni_content
  property copper content 5.77e-5; name Cu_content
  property chromium content 2.23e-5; name Cr_content
  property cadmium content 3.6e-7; name Cd_content
  property potassium content 0.01; name K_content
  property phosphorus content 0.0035; name P_content
  property mercury content 1.2e-7; name Hg_content
  property dry mass 0.5 kg; name DM
  properties: wet mass 1 kg, carbon content, non-fossil 0.183645, water content 1
- linseed seed, at farm: 0.0185471 kg; lognormal variance with pedigree 0.0034, pedigree (2,4,2,1,1)
  The data was collected for a hectare area through interview
  properties: wet mass 1 kg, carbon content, non-fossil 1, dry mass 1 kg
- inorganic phosphorus fertiliser, as P2O5: 0.0888717 kg; lognormal variance with pedigree 0.0034, pedigree (2,4,2,1,1)
  The data was collected for a hectare area through interview
  properties: dry mass 1 kg, wet mass 1 kg
- pesticide, unspecified: 0.000185471 kg; lognormal variance with pedigree 0.0034, pedigree (2,4,2,1,1)
  Alternate for Aldrin
  properties: dry mass 1 kg, carbon content, fossil 0.486978, wet mass 1 kg
- urea: 0.305269 kg; lognormal variance with pedigree 0.0034, pedigree (2,4,2,1,1)
  The exchange has been updated from 'urea, as N' into 'urea' and therefore its amount has been scaled (multiplied) from 0.1424 kg by 2.1438 kg of 'urea' per kg of 'urea, as N'. Original comment of the exchange is: The data was collected for a hectare area through interview
  properties: carbon content, fossil 0.2, wet mass 1 kg, dry mass 1 kg
- transport, tractor and trailer, agricultural: 0.412986 metric ton*km; lognormal variance with pedigree 0.1228, pedigree (2,4,2,1,1)
  The data was collected for a hectare area through interview
- land use change, annual crop: 0.000370843 ha; = (0.23993538853397395 * LUC_crop_specific + 0.0802035569244853 * (1-LUC_crop_specific))/647
  The data was collected for a hectare area through interview

## Inputs from nature
- Carbon dioxide, in air [natural resource, in air]: 1.72627 kg; lognormal variance with pedigree 0.0034, pedigree (2,4,2,1,1)
  Calculated Value. This value has been calculated by using the ecoinvent LCI calculation tool for crop production.
- Occupation, annual crop, non-irrigated [natural resource, land]: 16.0999 m2*year; lognormal variance with pedigree 0.0048, pedigree (2,4,2,1,1)
  (same comment as for Carbon dioxide, in air)
- Energy, gross calorific value, in biomass [natural resource, biotic]: 19.8142 MJ; lognormal variance with pedigree 0.0034, pedigree (2,4,2,1,1)
  (same comment as for Carbon dioxide, in air)
- Transformation, from annual crop, non-irrigated [natural resource, land]: 15.456 m2; lognormal variance with pedigree 0.0108, pedigree (2,4,2,1,1)
  (same comment as for Carbon dioxide, in air)
- Transformation, to annual crop, non-irrigated [natural resource, land]: 15.456 m2; lognormal variance with pedigree 0.0108, pedigree (2,4,2,1,1)
  (same comment as for Carbon dioxide, in air)

## Emissions to nature
- Zinc, ion [water, surface water]: 5.02096e-9 kg; lognormal variance with pedigree 0.0928, pedigree (2,4,2,1,1)
  (same comment as for Carbon dioxide, in air)
- Phosphate [water, surface water]: 0.00141154 kg; lognormal variance with pedigree 0.0428, pedigree (2,4,2,1,1)
  (same comment as for Carbon dioxide, in air)
- Mercury [water, ground-]: 1.92961e-9 kg; lognormal variance with pedigree 0.0928, pedigree (2,4,2,1,1)
  (same comment as for Carbon dioxide, in air)
- Nickel, ion [water, surface water]: 1.83516e-9 kg; lognormal variance with pedigree 0.0928, pedigree (2,4,2,1,1)
  (same comment as for Carbon dioxide, in air)
- Ammonia [air, non-urban air or from high stacks]: 0.0412621 kg; lognormal variance with pedigree 0.0108, pedigree (2,4,2,1,1)
  (same comment as for Carbon dioxide, in air)
- Nitrate [water, ground-]: 0.20661 kg; lognormal variance with pedigree 0.0428, pedigree (2,4,2,1,1)
  (same comment as for Carbon dioxide, in air)
- Zinc, ion [water, ground-]: 4.80024e-5 kg; lognormal variance with pedigree 0.0928, pedigree (2,4,2,1,1)
  (same comment as for Carbon dioxide, in air)
- Dinitrogen monoxide [air, non-urban air or from high stacks]: 0.00560131 kg; lognormal variance with pedigree 0.0328, pedigree (2,4,2,1,1)
  (same comment as for Carbon dioxide, in air)
- Nitrogen oxides [air, non-urban air or from high stacks]: 0.0173131 kg; lognormal variance with pedigree 0.0428, pedigree (2,4,2,1,1)
  (same comment as for Carbon dioxide, in air)
- Phosphorus [water, surface water]: 1.62886e-7 kg; lognormal variance with pedigree 0.0428, pedigree (2,4,2,1,1)
  (same comment as for Carbon dioxide, in air)
- Carbon dioxide, fossil [air, non-urban air or from high stacks]: 0.223706 kg; lognormal variance with pedigree 0.0034, pedigree (2,4,2,1,1)
  (same comment as for Carbon dioxide, in air)
- Phosphate [water, ground-]: 0.000296193 kg; lognormal variance with pedigree 0.0428, pedigree (2,4,2,1,1)
  (same comment as for Carbon dioxide, in air)
- Cadmium [soil, agricultural]: 5.95738e-6 kg; lognormal variance with pedigree 0.0428, pedigree (2,4,2,1,1)
  (same comment as for Carbon dioxide, in air)
- Cadmium, ion [water, surface water]: 2.10004e-11 kg; lognormal variance with pedigree 0.0928, pedigree (2,4,2,1,1)
  (same comment as for Carbon dioxide, in air)
- Chromium [soil, agricultural]: 0.000169056 kg; lognormal variance with pedigree 0.0428, pedigree (2,4,2,1,1)
  (same comment as for Carbon dioxide, in air)
- Cadmium, ion [water, ground-]: 6.94606e-8 kg; lognormal variance with pedigree 0.0928, pedigree (2,4,2,1,1)
  (same comment as for Carbon dioxide, in air)
- Copper [soil, agricultural]: 0.000399126 kg; lognormal variance with pedigree 0.0428, pedigree (2,4,2,1,1)
  (same comment as for Carbon dioxide, in air)
- Chromium, ion [water, ground-]: 3.31961e-5 kg; lognormal variance with pedigree 0.0928, pedigree (2,4,2,1,1)
  (same comment as for Carbon dioxide, in air)
- Mercury [soil, agricultural]: 8.37821e-7 kg; lognormal variance with pedigree 0.0428, pedigree (2,4,2,1,1)
  (same comment as for Carbon dioxide, in air)
- Chromium, ion [water, surface water]: 2.08178e-9 kg; lognormal variance with pedigree 0.0928, pedigree (2,4,2,1,1)
  (same comment as for Carbon dioxide, in air)
- Lead [soil, agricultural]: 0.000316696 kg; lognormal variance with pedigree 0.0428, pedigree (2,4,2,1,1)
  (same comment as for Carbon dioxide, in air)
- Copper, ion [water, surface water]: 3.07895e-9 kg; lognormal variance with pedigree 0.0928, pedigree (2,4,2,1,1)
  (same comment as for Carbon dioxide, in air)
- Endosulfan [soil, agricultural]: 0.000185471 kg; lognormal variance with pedigree 0.0428, pedigree (2,4,2,1,1)
  Alternate for Aldrin
- Lead [water, ground-]: 8.88623e-7 kg; lognormal variance with pedigree 0.0928, pedigree (2,4,2,1,1)
  (same comment as for Carbon dioxide, in air)
- Zinc [soil, agricultural]: 0.00115405 kg; lognormal variance with pedigree 0.0428, pedigree (2,4,2,1,1)
  (same comment as for Carbon dioxide, in air)
- Copper, ion [water, ground-]: 5.74248e-6 kg; lognormal variance with pedigree 0.0928, pedigree (2,4,2,1,1)
  (same comment as for Carbon dioxide, in air)
- Nickel [soil, agricultural]: 0.000114409 kg; lognormal variance with pedigree 0.0428, pedigree (2,4,2,1,1)
  (same comment as for Carbon dioxide, in air)
- Lead [water, surface water]: 1.81587e-9 kg; lognormal variance with pedigree 0.0928, pedigree (2,4,2,1,1)
  (same comment as for Carbon dioxide, in air)
- Imidacloprid [soil, agricultural]: 8.25348e-5 kg; lognormal variance with pedigree 0.0428, pedigree (2,4,2,1,1)
  (same comment as for Carbon dioxide, in air)
- Mercury [water, surface water]: 5.62777e-12 kg; lognormal variance with pedigree 0.0928, pedigree (2,4,2,1,1)
  (same comment as for Carbon dioxide, in air)

## Sampling procedure
The farmer was identified and contacted by agriculture science faculty familiar with the local farmers in the region. Data was collected directly from the farmer through semi-structured interview using a questionnaire based on the input requirements of the ecoinvent LCI calculation tool for crop production. The farmer does not maintain any written records and has provided the data from recent memory. In this region, typically farmers are unable to provide exact name of active ingredient in the pesticide they use and the same was noted from details given on the pesticide packet. Individual farmer is not able to calculate fuel consumption for his own farm alone and this information has been collected from farming community of the area.

## Extrapolations
This dataset has been extrapolated from year 2018 to the year of the calculation (2021). The uncertainty has been adjusted accordingly.
