# jatropha seed production

Dataset: EcoSpold 2, unit process
Geography: GLO
Time period: 2005-01-01 to 2021-12-31
Technology level: current
Classification: ISIC rev.4 ecoinvent: 0111:Growing of cereals (except rice), leguminous crops and oil seeds
Scenario: Business-as-Usual
System model: Allocation, cut-off by classification
Generated by: Simon Gmünder
Published in: Gmünder S. 2012
Database: ecoinvent
isCopyrightProtected: true
accessRestrictedTo: 1

## General comment
This dataset represents the production of Jatropha curcas L. seeds. All the exchanges are calculated per kg of jatropha seeds (wet mass) and are mainly based on field data from India and literature values. The economic life span of a jatropha plantation is assumed to be 20 years, with an average annual productivity of 2.5 tons of seeds per hectare. The inventory includes the use of mineral and organic fertilizers, pesticides, irrigation, machinery, field emissions from the fertilizer and pesticide application and land use changes.

## Included activities start
From preparing the land and planting of Jatropha curcas.

## Included activities end
This dataset ends with the harvesting of jatropha curcas seeds and includes the land preparation and the crop management (fertilizers, pesticides, and machinery). The application of pesticides and fertilizers, as well as the harvesting of jatropha seeds is done manually.

## Parameters
- annual yield, agriculture: 2.5 metric ton/(ha*year); name yield_agriculture; lognormal variance with pedigree 0.0018, pedigree (2,3,1,1,1)
  Calculated value (based on field values from India): The agronomic trials were established in 2008 and thus have not yet reached maturity. A yield increase of 30% in year four and 10% in year five is assumed. The resulting average yield of 2.5 ton/ha is in line with literature values. However, since jatropha is not yet domesticated, the yield might increase in future (update is required).
  Uncertainty: S
- carbon dioxide from/to mineral soil: 0 dimensionless; name CO2_soil_mineral; = C_soil_mineral*(44/12)
  Calculated value: Transformation of the gain/loss in SOC to CO2 using the mol ratio 44/12.
- cadmium content: 9.5e-8 dimensionless; name jatropha_seed_Cd_content; = (0.1)*(10^-6)*DM; lognormal variance with pedigree 0.3, pedigree (5,5,5,5,5)
  Literature Value: Heavy-metal content of jatropha seeds are approximated by using the generic mean values from the report "01_crop production_direct field emissions and natural resources_v1.0.pdf", Tab. A.1 - pdf-document on the dedicated talk page of ecoinvent (www.ecoinvent.org/documentation)
- reference soil organic carbon: grassland: 57400 kg/ha; name SOCref_g
  Literature value: Taken from (Brandão & i Canals 2012), table 3, native ecosystem, tropical moist.
  Brandão, M. and L. i Canals (2012). "Global characterisation factors to assess land use impacts on biotic production." The International Journal of Life Cycle Assessment: 1-10.
- gain/loss of soil organic carbon associated with crop cultivation: grassland: 0 dimensionless; name Delta_SOC_g; = (SOCref_f-(SOCref_g*Fmg*Fi*Ft))/UnitConversion(1, 'ha', 'm2')*T_f_g*0
  Assumption: No soil carbon stock change has been assumed from land transformed from natural ecosystems to oil palm plantations.
- land transformation from grassland: 1.96 m2/kg; name T_f_g; = T_t*Sh_g
  Calculated value. The amount of land transformed from grassland [m2 / kg crop].
- land transformation from arable land: 1.828 m2/kg; name T_f_a; = T_t*Sh_a; lognormal variance with pedigree 0, pedigree (1,1,1,1,1)
  Calculated value. The amount of land transformed from arable land [m2 / kg crop].
  Uncertainty: T
- carbon dioxide accumulated in growth of AGB and BGB: 4.39998 dimensionless; name CO2_acc; = Cacc*C_2_CO2; lognormal variance with pedigree 0.000179794, pedigree (1,1,1,1,1)
  Calculated Value.
- Share on secondary forest: 0.05 dimensionless; name Sh_sf
  Literature value: Since most Jatropha curcas L. plantations were established within the past few years, there is not yet an FAO statistic about jatropha available. However, the GEXSI study surveyed 242 jatropha projects in 55 countries. According to GEXSI, the Asian jatropha plantations were established on wasteland (49%), agricultural land (45.7%), secondary forest land (5%) and primary forest land (0.3%). The “wasteland” category is very heterogeneous, containing land ranging from woodland to highly eroded land. Within this study, the carbon stock of “wasteland” was approximated with the carbon stock of “grassland”.
- lifespan of plantation: 20 year; name lifespan; lognormal variance with pedigree 0.0092, pedigree (4,3,1,1,1)
  Lifespan [years] of the crop plantation
- reference soil organic carbon: native shrubland: 57400 kg/ha; name SOCref_sh
  (same comment as for reference soil organic carbon: grassland)
- precipitation, annual: 1000 mm/year; name precipitation; lognormal variance with pedigree 0.3006, pedigree (2,1,1,1,1)
  Assumption: Total annual precipitation (mm) is assumed to be 1000 mm/year.
  Uncertainty: S
- Share on agriculture: 0.457 dimensionless; name Sh_a
  (same comment as for Share on secondary forest)
- gain/loss of soil organic carbon associated with crop cultivation: arable land: 0 dimensionless; name Delta_SOC_a; = (SOCref_f-(SOCref_a*Fmg*Fi*Ft))/UnitConversion(1, 'ha', 'm2')*T_f_a*0
  (same comment as for gain/loss of soil organic carbon associated with crop cultivation: gra)
- chromium content: 5.225e-7 dimensionless; name jatropha_seed_Cr_content; = (0.55)*(10^-6)*DM; lognormal variance with pedigree 0.3, pedigree (5,5,5,5,5)
  (same comment as for cadmium content)
- total nitrogen: 222.222 kg/ha; name Ntot; = urea*0.46646163273393926*yield_agriculture*1000
  Total nitrogen in mineral and organic fertilisers (kg N/ha). The total Nitrogen applied has been calculated based on the molecular composition of the applied fertilizers.
- Factor for tillage practice: 1.22 dimensionless; name Ft
  Literature Value: Taken from (IPCC 2006), page 5.17, table 5.5, No-tillage.
  IPCC (2006). IPCC Guidelines for National Greenhouse Gas Inventories. Hayama, Japan, Institute for Global Environmental Strategies.
- dry mass: 0.95 kg; name DM; uniform min 0.93, max 0.97, pedigree (1,4,2,3,3)
  Literature Value: ???
- land transformation from secondary forest: 0.2 m2/kg; name T_f_sf; = T_t*Sh_sf
  Calculated value. The amount of land transformed from secondary forest [m2 / kg crop].
- below ground biomass growth: 34477 kg/ha; name G_BGB
  Estimation: Taken from EU-Commission (2010), Table 12, page 20, oil palm.
  EU-Commission (2010).Commission Decision of [date] on guidelines for the calculation of land carbon stocks for the purpose of Annex V of Directive 2009/28/EC. Brussel, EC.
- land transformation from primary forest: 0.012 m2/kg; name T_f_pf; = T_t*Sh_pf
  Calculated value. The amount of land transformed from primary forest [m2 / kg crop].
- reference soil organic carbon: native forest: 57400 kg/ha; name SOCref_f
  (same comment as for reference soil organic carbon: grassland)
- fraction, irrigation water, to ground water: 0.8 dimensionless; name fraction_IW_to_ground_water; lognormal variance with pedigree 0.0886, pedigree (4,3,1,1,4)
  Literature value (Döll, 2011) cross referenced with expert opinion.
- zinc_content: 3.04e-5 dimensionless; name jatropha_seed_Zn_content; = (32)*(10^-6)*DM; lognormal variance with pedigree 0.3, pedigree (5,5,5,5,5)
  (same comment as for cadmium content)
- rooting depth: 1 m; name L; lognormal variance with pedigree 0.0487, pedigree (1,5,1,3,2)
  Plant rooting depth. Derived fromTable 2.15 "Crops and their rooting depth as assumed for calculations" from the ecoinvent report "01_crop production_direct field emissions and natural resources_v1.0.pdf" - pdf-document on the dedicated talk page of ecoinvent (www.ecoinvent.org/documentation).
  Uncertainty: S
- Factor for land use (management) practice: 1 dimensionless; name Fmg
  Literature Value: Taken from (IPCC 2006), page 5.17, table 5.5, perennial/tree crop,, tropical moist/wet.
  IPCC (2006). IPCC Guidelines for National Greenhouse Gas Inventories. Hayama, Japan, Institute for Global Environmental Strategies.
- carbon from/to mineral soil: 0 dimensionless; name C_soil_mineral; = (Delta_SOC_f+ Delta_SOC_a+ Delta_SOC_g)/t
  Calculated value: Annualization of carbon stock change of mineral soils [kg C per kg crop].
- stoechiometric relation_carbon to carbon dioxide: 3.66667 dimensionless; name C_2_CO2
  Calculated value: Based on the mol ration of C to CO2, i.e. 12/44.
- Share on grassland: 0.49 dimensionless; name Sh_g
  (same comment as for Share on secondary forest)
- carbon accumulated in growth of AGB and BGB: 1.19999 dimensionless; name Cacc; = (G_AGB+G_BGB)*0.47/UnitConversion(1, 'ha', 'm2')/t*(T_t); lognormal variance with pedigree 0.00434297, pedigree (1,1,1,1,1)
  Calculated value: Average biomass carbon stock [kg C/kg crop] of jatropha plantations calculated from the biomass stock (AGB/BGB), the carbon fraction (0.47) and the yield of jatropha plantations.
- Share on primary forest: 0.003 dimensionless; name Sh_pf
  (same comment as for Share on secondary forest)
- Factor for input practice: 1 dimensionless; name Fi
  Literature Value: Taken from (IPCC 2006), page 5.17, table 5.5, Medium input practice.
  IPCC (2006). IPCC Guidelines for National Greenhouse Gas Inventories. Hayama, Japan, Institute for Global Environmental Strategies.
- gain/loss of soil organic carbon associated with crop cultivation: forest: 0 dimensionless; name Delta_SOC_f; = (SOCref_f-(SOCref_f*Fmg*Fi*Ft))/UnitConversion(1, 'ha', 'm2')*(T_f_sf+T_f_pf)*0
  (same comment as for gain/loss of soil organic carbon associated with crop cultivation: gra)
- fraction, irrigation water to surface water: 0.2 dimensionless; name fraction_IW_to_surface_water; lognormal variance with pedigree 0.0886, pedigree (4,3,1,1,4)
  Literature value (Döll, 2011) cross referenced with expert opinion.
- Annualization time: 20 year; name t
  Estimated value: The applied time period is 20 years. This is in line with PAS 2050 (BSI 2008) and recommended as a reasonable time period for the consideration of emissions from land use changes (Brandâo & i Canals 2012).
  Brandão, M. and L. i Canals (2012). "Global characterisation factors to assess land use impacts on biotic production." The International Journal of Life Cycle Assessment: 1-10.
- above ground biomass growth: 93182 kg/ha; name G_AGB
  Estimation: Taken from EU-Commission (2010), Table 12, page 20, oil palm (perennial crop).
  EU-Commission (2010).Commission Decision of [date] on guidelines for the calculation of land carbon stocks for the purpose of Annex V of Directive 2009/28/EC. Brussel, EC.
- land transformation to: 4 m2/kg; name T_t; = UnitConversion(1, 'ha', 'm2')/(yield_agriculture*1000); lognormal variance with pedigree 0, pedigree (1,1,1,1,1)
  Calculated value: m2 per hectare divided by yield.
- nickel content: 9.88e-7 dimensionless; name jatropha_seed_Ni_content; = (1.04)*(10^-6)*DM; lognormal variance with pedigree 0.3, pedigree (5,5,5,5,5)
  (same comment as for cadmium content)
- fraction, irrigation water, to air: 0.586986 dimensionless; name fraction_IW_to_air; lognormal variance with pedigree 0.0409, pedigree (2,2,2,1,1)
  Literature value (Siebert, 2010) (Vionnet, S., Quantis Water Database - Technical Report, 2012).
- copper content: 6.27e-6 dimensionless; name jatropha_seed_Cu_content; = (6.6)*(10^-6)*DM; lognormal variance with pedigree 0.3, pedigree (5,5,5,5,5)
  (same comment as for cadmium content)
- reference soil organic carbon: arable land: 58400 kg/ha; name SOCref_a
  (same comment as for reference soil organic carbon: grassland)
- potential net primary production measured in kg carbon per m2: 0.694 kg/(m2*year); name NPP0_C
  Literature value: Taken from Schmidt et al. (2011). Reflect the annual productivity per m2 by means of the potential net primary production measured in kg C per m2.
- lead content: 5.13e-7 dimensionless; name jatropha_seed_Pb_content; = (0.54)*(10^-6)*DM; lognormal variance with pedigree 0.3, pedigree (5,5,5,5,5)
  (same comment as for cadmium content)

## Reference product
- jatropha seed: 1 kg; name jatropha_seed; By-product classification allocatable product; CPC 01963: Flower seeds
  production volume 2.25e9 kg; = 900000*yield_agriculture*1000
    Estimation: The estimation is based on information about the size of global jatropha plantations (900"000 ha, GEXSI 2008) and the average annaual yield (2.5ton/ha).
  property water content 0.0526316; = (1- DM)/DM
  property cadmium content 9.5e-8; = jatropha_seed_Cd_content
    (same comment as for cadmium content)
  property copper content 6.94737e-6
    (same comment as for cadmium content)
  property chromium content 5.225e-7; = jatropha_seed_Cr_content
    (same comment as for cadmium content)
  property heating value, net 0 MJ
    Estimated value: based on the carbon content of jatropha oil (76% C) and press cake (48.5%) and the mass ratio of press cake to oil of 3:1.
  property lead content 5.13e-7; = jatropha_seed_Pb_content
    (same comment as for cadmium content)
  property nickel content 9.88e-7; = jatropha_seed_Ni_content
    (same comment as for cadmium content)
  property dry mass 0.95 kg; = DM
  property zinc content 3.04e-5; = jatropha_seed_Zn_content
    (same comment as for cadmium content)
  property nitrogen content 0.021
    Estimated value: From personal communication with Raymond Jongschaap (Plant research Institute, Wageningen University, 2011).
  property price 0.177925 EUR2005; name jatropha_seed_price_EUR2005
    Calculated based on inputs: The price of the product has been calculated as a sum of the values of the material and energy inputs for this product. This value is therefore a rough estimation. It may underestimate the real price since there are additional expenses when producing any product. These expences can include for example labour costs, treatment of waste materials and profit for the producer. Please consider carefully whether this level of data quality is acceptable for your application.
  property carbon content, non-fossil 0.553
    (same comment as for jatropha seed)
  property carbon content 0.553
    carbon content on a dry matter basis (reserved; not for manual entry)
  properties: oil content 0.35, wet mass 1 kg, heating value, gross 23.15 MJ, carbon allocation 0.52535 kg

## Inputs from technosphere
- organophosphorus-compound, unspecified: 0.000355556 kg; name organophosphorus_compound; = 0.2*20/1000*(10000/(3*3))/(5*Yield_agriculture)/1000; source Gmünder S. 2012; lognormal variance with pedigree 0.0026, pedigree (1,1,3,1,1)
  Measured value (field data from India): Per plant 20g of Chlorpyrifos 20EC (organophosphorous-compound, a.i. 20%) was applied every five years. The plant spacing is 3m x 3m.
  properties: dry mass 1 kg, wet mass 1 kg, carbon content, fossil 0.260898
  note on carbon content, fossil: C content was calculated as an unweighted average of glyphosate, parathion, and fosetyl-Al. Those substances are classified as organo-phosphorous compounds in Tab 2.25, Sutter 2010
- potassium chloride: 0 kg; name potassium_chloride; source Gmünder S. 2012; pedigree (1,1,1,1,1)
  The exchange has been updated from "potassium chloride, as K2O" into "potassium chloride" and therefore its amount has been scaled (multiplied) from 0.0321 kg by 1.5829 kg of "potassium chloride" per kg of "potassium chloride, as K2O". Original comment of the exchange is: Measured value (field data from India): Per plant 60g K-fertilizer is applied per year. The plant spacing is 3m x 3m.
  property chromium content 3.33e-6; name potassium_chloride_Cr_content
  property copper content 8.33e-6; name potassium_chloride_Cu_content
  property lead content 9.17e-6; name potassium_chloride_Pb_content
  property nickel content 3.5e-6; name potassium_chloride_Ni_content
  property cadmium content 1e-7; name potassium_chloride_Cd_content
  property zinc content 7.67e-5; name potassium_chloride_Zn_content
  properties: dry mass 1 kg, wet mass 1 kg
  note on chromium content: Literature value: Heavy-metal content of mineral fertilizer from the report "01_crop production_direct field emissions and natural resources_v1.0.pdf", Tab. A.2 - pdf-document on the dedicated talk page of ecoinvent
- irrigation: 0.0853333 m3; = 8/1000*24*(10000/(3*3))/(Yield_agriculture)/1000; source Gmünder S. 2012; lognormal variance with pedigree 0.004, pedigree (1,1,3,1,1)
  Measured value (field data from India): The plants were drip irrigated with 8 L water per week during 24 weeks. The plant spacing is 3m x 3m.
  properties: dry mass 0.11 kg, water content 9089.91, wet mass 1000 kg
- urea: 0 kg; source Gmünder S. 2012; pedigree (1,1,1,1,1)
  The exchange has been updated from "urea, as N" into "urea" and therefore its amount has been scaled (multiplied) from 0.0889 kg by 2.1438 kg of "urea" per kg of "urea, as N". Original comment of the exchange is: Measured value (field data from India): Per plant 200g Nitrogen fertilizer (Urea) is applied per year. The plant spacing is 3m x 3m.
  property cadmium content 1.1e-7; name urea_Cd_content
  property chromium content 4.35e-6; name urea_Cr_content
  property lead content 2.39e-6; name urea_Pb_content
  property nickel content 4.35e-6; name urea_Ni_content
  property copper content 1.3e-5; name urea_Cu_content
  property zinc content 9.57e-5; name urea_Zn_content
  properties: carbon content, fossil 0.2, wet mass 1 kg, dry mass 1 kg
- inorganic phosphorus fertiliser, as P2O5: 0 kg; name phosphate_fertilizer; source Gmünder S. 2012; pedigree (1,1,1,1,1)
  Measured value (field data from India): Per plant 120g P-fertilizer is applied per year. The plant spacing is 3m x 3m.
  property chromium content 0.000589; name phosphate_fertilizer_Cr_content
  property zinc content 0.000751; name phosphate_fertilizer_Zn_content
  property nickel content 0.0001; name phosphate_fertilizer_Ni_content
  property cadmium content 5.13e-5; name phosphate_fertilizer_Cd_content
  property lead content 4.94e-5; name phosphate_fertilizer_Pb_content
  property copper content 0.000118; name phosphate_fertilizer_Cu_content
  properties: dry mass 1 kg, wet mass 1 kg
- packaging, for pesticides: 0.000711111 kg; lognormal variance with pedigree 0.0532, pedigree (4,3,3,5,4)
  Total amount of active substance/s of pesticides needed for the production of jatropha seed is calculated to be circa 3.56E-04 kg. Pesticide/s used in this dataset is/are: "organophosphorus-compound, unspecified". The total amount of active substance/s is doubled in order to account for the packaging of the dilluted product of pesticide/s that is/are applied. Therefore, 7.11E-04 kg of packaging for pesticides is justified with this exchange.
  properties: heating value, net 25.97 MJ, wet mass 1 kg, dry mass 1 kg, price 0.0642 EUR2005, carbon content, fossil 0.85714
- packaging, for fertilisers: 0.486324 kg; lognormal variance with pedigree 0.0532, pedigree (4,3,3,5,4)
  Total amount of active substance/s of fertilisers needed for the production of "jatropha seed" is calculated to be circa 2.43E-01 kg. Fertiliser/s used in this dataset is/are: "phosphate fertiliser, as P2O5", "potassium chloride, as K2O", "urea, as N". The total amount of active substance/s is doubled in order to account for the packaging of the dilluted product of fertiliser/s that is/are applied. Therefore, 4.86E-01 kg of packaging for fertilisers is justified with this exchange.
  properties: heating value, net 25.01 MJ, dry mass 1 kg, wet mass 1 kg, carbon content, fossil 0.825301, price 0.0642 EUR2005
  note on carbon content, fossil: Considering a chemical formula (C2H4)n for polyethylene, carbon content-fossil is calculated to be 0.856286 kg of Carbon per kg of dry mass.
- planting: 0.00024 ha; = (12*0.84/16.8)/Yield_agriculture/1000; source Gmünder S. 2012; lognormal variance with pedigree 0.0026, pedigree (1,1,3,1,1)
  Estimation (based on field observations from India): Land preparation activities include land clearing, marking and preparing pits. For land preparation 12 l diesel is consumed per hectare by a small tractors (estimate). The values used for the processes are extrapolated from the diesel use of the datasets (planting: 16.8 kg diesel per ha). Harvesting, fertilizing, pruning and weeding are conducted manually.
- potassium chloride: 0.00389393, 0.0469531 kg (2 entries); source Gmünder S. 2012; lognormal variance with pedigree 0.0026, pedigree (1,1,3,1,1)
  (same comment as for potassium chloride)
  properties: dry mass 1 kg, chromium content 3.33e-6, copper content 8.33e-6, wet mass 1 kg, lead content 9.17e-6, nickel content 3.5e-6, cadmium content 1e-7, zinc content 7.67e-5
- urea: 0.0139794, 0.0112767, 0.0761397, 0.089164 kg (4 entries); source Gmünder S. 2012; lognormal variance with pedigree 0.0026, pedigree (1,1,3,1,1)
  (same comment as for urea)
  properties: cadmium content 1.1e-7, carbon content, fossil 0.2, chromium content 4.35e-6, lead content 2.39e-6, nickel content 4.35e-6, copper content 1.3e-5, wet mass 1 kg, zinc content 9.57e-5, dry mass 1 kg
- inorganic phosphorus fertiliser, as P2O5: 0.00455971, 0.000463314, 0.0165472, 0.00023111, 3.25469e-5, 0.000895175, 3.30939e-5, 0.000534015, 0.000298255, 0.00109524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 kg (30 entries); source Gmünder S. 2012; lognormal variance with pedigree 0.0026, pedigree (1,1,3,1,1)
  (same comment as for inorganic phosphorus fertiliser, as P2O5)
  properties: chromium content 0.000589, zinc content 0.000751, nickel content 0.0001, cadmium content 5.13e-5, dry mass 1 kg, wet mass 1 kg, lead content 4.94e-5, copper content 0.000118

## Inputs from nature
- Carbon dioxide, in air [natural resource, in air]: 2.02767 kg; = 0.553*44/12; lognormal variance with pedigree 0.0226, pedigree (4,3,3,5,1)
  Calculated value: The uptake of CO2 is calculated from the carbon content of jatropha seeds
  Uncertainty: c
- Transformation, to permanent crop [natural resource, land]: 0.2 m2; = T_t/t; lognormal variance with pedigree 0.122, pedigree (1,1,3,1,1)
  Calculated value: Jatropha plantations are considered as permanent crop. The amount of transformed land is calculated by deviding of the area (1 ha) by the lifetime capacity (lifetime [years] times the average productivity [kg/ha/year]).
- Energy, gross calorific value, in biomass [natural resource, biotic]: 18.2678 MJ; lognormal variance with pedigree 0.0039, pedigree (2,3,3,3,1)
  Calculated value based on literature. The gross energy is calculated using following formula; gross energy (MJ) = crude protein (kg)*23.04 (MJ/kg)+crude fat (kg)*38.96 (MJ/kg)+crude fibre (kg)*17.95 (MJ/kg)+carbohydrates (kg)*17.17 (MJ/kg) (formula based on expert opinion, cross referenced; Diepenbrock, 2012, Energy Balance in Crop Production). The product composition of fruits and vegetables is extracted from literature (Martinez-Herrera, j., 2006, Chemical composition, toxic/antimerabolic constituents, and effects of different treatments on their levels, in four provenances of Jatropha curcas L. from Mexico, Food Chemistry).Crude protein (g)= 636.5, crude fat (g)= 7.6, crude fibre (g)= 57, ash (g)= 104.5, water (g)= 50, carbohydrates (g)= 133. The gross energy per kg of DM is 19.23MJ. The calculated gross energy per kg of reference product is thus 18.27MJ.
- Transformation, from arable land, unspecified use [natural resource, land]: 0.2 m2; = (T_f_a+T_f_g+T_f_pf+T_f_sf)/t; source GEXSI 2008; lognormal variance with pedigree 0.122, pedigree (1,1,3,1,1)
  Literature value: The land use change patterns for jatropha is based on the GEXSI report where global inventory data are provided. The global inventory is based on 170 expert interviews of 55 countries and 160 online questionnaires. According to the GEXSI report, 46.2 % of the jatropha plantations were established on former arable land, 48.5% on bare land, 0.3% on primary forest land and 5% on secondary forest land.
- Occupation, permanent crop [natural resource, land]: 4 m2*year; = 1/(yield_agriculture/10); lognormal variance with pedigree 0.042, pedigree (1,1,3,1,1)
  Calculated value: Jatropha plantations are considered as permanent crop. The amount of occupied land is calculated by deviding of the area (1 ha) by the annual productivity (kg jatropha seeds/ha).
  property Erodibility factor 0.046; name erodibility_factor
  property Practice factor 1; name practice_factor
  property Slope 0.01; name S
  property P to surface water 0.175 kg/ha; name Prol
  property Slope length 100 m; name slope_length
  property Organic Nitrogen content of soil 6181.82 kg/ha; name Norg; = (Corg/100*5000*1300)/11*0.85
  property Tillage factor 0.25; name tillage_factor
  property Slope Factor 0.296642; name LS
  property P to groundwater 0.07 kg/ha; name Pgwl
  property Organic Carbon content of soil 1.23077; name Corg; = 48*(1/3000)*(1/1.3)*100
  property clay content 0.49; name clay_content
  property Erosivity factor 3650.81 metric ton/ha; name R; = 587.8-1.219*precipitation+0.004105*(precipitation+irrigation*yield_agriculture*1000/10)^2
  property Crop factor 0.2; name Crop_factor

## Emissions to nature
- Nickel [soil, agricultural]: 1.17262e-5 kg; = urea*0.466461632733939* UREA_Ni_content+ potassium_chloride*0.631752900351838* potassium_chloride_Ni_content+ phosphate_fertilizer* phosphate_fertilizer_Ni_content- jatropha_seed* jatropha_seed_Ni_content; source Nemecek T. 2012; lognormal variance with pedigree 0.268, pedigree (4,5,5,5,5)
  Calculated value: calculations according to chapter "Emissions of heavy metals to agricultural soil, surface water and ground water" in "01_crop production_direct field emissions and natural resources_v1.0.pdf" - pdf-document on the dedicated talk page of ecoinvent (www.ecoinvent.org/documentation)
  Uncertainty: S
- Water [water, ground-]: 0.0281951 m3; name water_to_water_ground; = irrigation*(1-fraction_IW_to_air)*fraction_IW_to_ground_water; lognormal variance with pedigree 0.0906, pedigree (4,3,3,1,4)
  Calculated value. See the parameters and their comments to understand the calculation.
  property fraction, origin: fresh water 1; name fraction_origin_fresh_water_Wgw
  property fraction, origin: salt water 0; name fraction_origin_salt_water_Wgw
  property fraction, origin: unspecified 0; name fraction_origin_unspecified_Wgw
- Phosphorus [water, surface water]: 0.000398539 kg; = (R*erodibility_factor*LS* Crop_factor* tillage_factor* practice_factor)*0.2*2*1*12/12/yield_agriculture/1000; source Faist Emmenegger M. 2009; lognormal variance with pedigree 0.0026, pedigree (1,1,3,1,1)
  Calculated value: calculated according to the "Phosphorous emissions trough water erosion to surface water" approach in the SQCB background report. Fraction of phosphorus loss which effectively reaches the surface water system is 0.2. The enrichment factor is 2 and phosphorous concentration in the soil is 1 kg P / t soil.
- Nitrogen oxides [air, non-urban air or from high stacks]: 0.000339023 kg; name NOx; = 0.21* N2O; source Nemecek T. 2012
  Calculated value: Field emissions from fertilizer application see chapter "Emissions of NOx to the air" in "01_crop production_direct field emissions and natural resources_v1.0.pdf" - pdf-document on the dedicated talk page of ecoinvent (www.ecoinvent.org/documentation). Field emissions from pre-harvest burning based on the emission factor from IPCC (2.5g NO /kg burned DM).
- Phosphate [water, ground-]: 8.58065e-5 kg; = Pgwl*(1)*95/31/yield_agriculture/1000; source Faist Emmenegger M. 2009; lognormal variance with pedigree 0.0026, pedigree (1,1,3,1,1)
  Calculated value: calculated according to the "Phosphate leaching to ground water" approach described in "01_crop production_direct field emissions and natural resources_v1.0.pdf" -Chapter 2.3.1- pdf-document on the dedicated talk page of ecoinvent (www.ecoinvent.org/documentation). Molecular weight for PO4: 95 and for P 31.
- Zinc [soil, unspecified]: 7.23055e-5 kg; = urea*0.466461632733939* urea_Zn_content+ potassium_chloride*0.631752900351838* potassium_chloride_Zn_content+ phosphate_fertilizer* phosphate_fertilizer_Zn_content- jatropha_seed* jatropha_seed_Zn_content; source Nemecek T. 2012; lognormal variance with pedigree 0.268, pedigree (4,5,5,5,5)
  (same comment as for Nickel)
- Cadmium [soil, agricultural]: 6.18431e-6 kg; = urea*0.466461632733939* urea_Cd_content+ potassium_chloride*0.631752900351838* potassium_chloride_Cd_content+ phosphate_fertilizer* phosphate_fertilizer_Cd_content- jatropha_seed* jatropha_seed_Cd_content; source Nemecek T. 2012; lognormal variance with pedigree 0.268, pedigree (4,5,5,5,5)
  (same comment as for Nickel)
- Dinitrogen monoxide [air, non-urban air or from high stacks]: 0.00161439 kg; name N2O; = 44/28*(0.01*( Ntot)+0.01*14/17*NH3*1000* yield_agriculture+0.0075*14/62*nitrate_emissions*1000* yield_agriculture)/(1000* yield_agriculture); source Nemecek T. 2012
  Calculated value: calculations according to chapter "Emissions of heavy metals to agricultural soil, surface water and ground water" in "01_crop production_direct field emissions and natural resources_v1.0.pdf" - pdf-document on the dedicated talk page of ecoinvent (www.ecoinvent.org/documentation)
- Nitrate [water, ground-]: 0.0169163 kg; name nitrate_emissions; = (21.37+(precipitation+irrigation*yield_agriculture*1000/10)/( clay_content*100*L)*(0.0037* Ntot+0.0000601* Norg-0.00362*0.021*1000* yield_agriculture))/(1000* yield_agriculture); source Nemecek T. 2012
  Calculated value: Modelled with the "SQCB-NO3 model" described in "01_crop production_direct field emissions and natural resources_v1.0.pdf" - pdf-document on the dedicated talk page of ecoinvent (www.ecoinvent.org/documentation).
- Chromium [soil, agricultural]: 7.19178e-5 kg; = urea*0.466461632733939* urea_Cr_content+ potassium_chloride*0.631752900351838* potassium_chloride_Cr_content+ phosphate_fertilizer* phosphate_fertilizer_Cr_content- jatropha_seed* jatropha_seed_Cr_content; source Nemecek T. 2012; lognormal variance with pedigree 0.268, pedigree (4,5,5,5,5)
  (same comment as for Nickel)
- Ammonia [air, non-urban air or from high stacks]: 0.0133333 kg; name NH3; = urea*0.466461632733939*0.15; source Nemecek T. 2012
  Calculated value: according to the "AGRAMMON model" described in "01_crop production_direct field emissions and natural resources_v1.0.pdf" - pdf-document on the dedicated talk page of ecoinvent (www.ecoinvent.org/documentation)
- Copper [soil, agricultural]: 9.5669e-6 kg; = urea*0.466461632733939* urea_Cu_content+ potassium_chloride*0.631752900351838* potassium_chloride_Cu_content+ phosphate_fertilizer* phosphate_fertilizer_Cu_content- jatropha_seed* jatropha_seed_Cu_content; source Nemecek T. 2012; lognormal variance with pedigree 0.268, pedigree (4,5,5,5,5)
  (same comment as for Nickel)
- Lead [soil, agricultural]: 6.02825e-6 kg; = urea*0.466461632733939* urea_Pb_content+ potassium_chloride*0.631752900351838* potassium_chloride_Pb_content+ phosphate_fertilizer* phosphate_fertilizer_Pb_content- jatropha_seed* jatropha_seed_Pb_content; source Nemecek T. 2012; lognormal variance with pedigree 0.268, pedigree (4,5,5,5,5)
  (same comment as for Nickel)
- Water [water, surface water]: 0.00704877 m3; name water_to_water_surface; = irrigation*(1-fraction_IW_to_air)*fraction_IW_to_surface_water; lognormal variance with pedigree 0.0906, pedigree (4,3,3,1,4)
  Calculated value. See the parameters and their comments to understand the calculation.
  property fraction, origin: salt water 0; name fraction_origin_salt_water_Wsw
  property fraction, origin: fresh water 1; name fraction_origin_fresh_water_Wsw
- Malathion [soil, agricultural]: 0.000355556 kg; = organophosphorus_compound; source Nemecek T. 2012
  Calculated value: calculations according to chapter "Emissions of Pesticides to Agricultural Soil" in "01_crop production_direct field emissions and natural resources_v1.0.pdf" - pdf-document on the dedicated talk page of ecoinvent (www.ecoinvent.org/documentation)
- Water [air, unspecified]: 0.0500895 m3; name water_to_air_unspecified; = irrigation*fraction_IW_to_air; lognormal variance with pedigree 0.0427, pedigree (2,2,3,1,1)
  Calculated value based on literature values and expert opinion. See comments in the parametres" comment field.
  property fraction, origin: fresh water 1; name fraction_origin_fresh_water
  property fraction, origin: unspecified 0; name fraction_origin_unspecified
  property fraction, origin: salt water 0; name fraction_origin_salt_water

## Sampling procedure
Field data. The global dataset is approximated by field data from agronomic trials in India. Randomized block design (spacing of 3m x 3m) was used for experimental set-up. The inventory data was mainly built based on the field data, which are validated and if necessary complemented by literature data (e.g. land transformation).

## Extrapolations
This dataset has been extrapolated from year 2014 to the year of the calculation (2021). The uncertainty has been adjusted accordingly.
