# purification of wet-process phosphoric acid to industrial grade, product in 85% solution state

Dataset: EcoSpold 2, unit process
Geography: RoW
Time period: 1990-01-01 to 2021-12-31
Technology level: current
Classification: ISIC rev.4 ecoinvent: 2011:Manufacture of basic chemicals
Synonyms: 7664-38-2; ORTHOPHOSPHORIC ACID; Sonac; Phosphorsaeure; Acidum phosphoricum
Scenario: Business-as-Usual
System model: Allocation, cut-off by classification
Generated by: Alex Primas
Published in: Althaus H.-J. 2007
Database: ecoinvent
isCopyrightProtected: true
accessRestrictedTo: 1

## General comment
This dataset represents the production of 1 kg of industrial grade phosphoric acid. Phosphoric acid (H3PO4) is mostly used for the production of fertilizers. Other areas of application include the production of industrial phosphates and feedstuffs (Schrödter et al. 2008).
This dataset models the purification of phosphoric acid by solvent extraction to obtain a solution with a 85% H3PO4 content. The inventory is based on data from one production plant, as well as estimations.
References:
Althaus H.-J., Chudacoff M., Hischier R., Jungbluth N., Osses M. and Primas A. (2007) Life Cycle Inventories of Chemicals. ecoinvent report No. 8, v2.0. EMPA Dübendorf, Swiss Centre for Life Cycle Inventories, Dübendorf, CH.
Schrödter, K., Bettermann, G., Staffel, T., Wahl, F., Klein, T. and Hofmann, T. 2008. Phosphoric Acid and Phosphates. Ullmann's Encyclopedia of Industrial Chemistry.

## Included activities start
The activity starts when the fertiliser grade phosphoric acid enters the process.

## Included activities end
This activity ends with the production of industrial grade phosphoric acid. The dataset includes the consumption of raw materials, energy uses, infrastructure, and emissions.

## Geography
Data from one site in United Kingdom used. No data of other sites within Europe considered. The data are assumed to be representative of the global production.

## Technology
For the purification of fertiliser grade phosphoric acid, solvent extraction is the most common process to remove the impurities. The extraction process considered produces an extraction raffinate (in addition to the purified acid), which contains all the impurities. This raffinate is reacted with quicklime to obtain a solid waste containing mainly calcium sulphate and hydroxy apatite. In this solid waste, the metals are locked up in the crystal lattice. The obtained waste is land filled (Landbank 1994). Due to the sulfuric acid added during the extraction, a high yield is achieved: it is about 98% (in % of P2O5 input).
Other possible production processes, such as so-called splitting processes, are not considered in this dataset. In these processes, the yield is much lower (around 50-70%) and the impurities in the aqueous phase are reused in fertiliser production.
References:
Althaus H.-J., Chudacoff M., Hischier R., Jungbluth N., Osses M. and Primas A. (2007) Life Cycle Inventories of Chemicals. ecoinvent report No. 8, v2.0. EMPA Dübendorf, Swiss Centre for Life Cycle Inventories, Dübendorf, CH.
Ullmann (2001b) Phosphoric acid and Phosphates. In: Ullmann's Encyclopedia of Industrial Chemistry, Sixth Edition, June-2001 Electronic Release (ed. Schrödter K., Bettermann G., Staffel T., Klein T. and Hofmann T.). 6 th Electronic Release Edition. Wiley InterScience, New York, Online-Version under: http://www.mrw.interscience.wiley.com/ueic/ull_search_fs.html.

## Parameters
- fraction, water, deionised, to air: 0.34 dimensionless; name fraction_WDI_to_air; = fraction_PW_to_air; lognormal variance with pedigree 0.092025, pedigree (4,4,3,2,4)
  Calculated value. See comment in the other parametres present in this dataset. Deionised water is considered to be always used as process water, thus process water fractions to air are applied to all deionised water input flows to calculate the amount of water consumed in the processes.
- fraction, cooling water, once-through system, to air: 0.004 dimensionless; name fraction_CW_OT_to_air; lognormal variance with pedigree 0.0413, pedigree (2,3,1,3,1)
  Calculated based on literature value (Scown, C.D., 2011, Water Footprint of U.S. Transportation Fuels and supplying information of the article) (Vionnet, S., Quantis Water Database - Technical Report, 2012).
- fraction, cooling water, to air: 0.3875 dimensionless; name fraction_CW_to_air; = (0.5*fraction_CW_OT_to_air)+(0.5*fraction_CW_R_to_air); lognormal variance with pedigree 0.092025, pedigree (4,4,3,2,4)
  Calculated value based on literature value (see comments of the other parametres present in this dataset) and expert opinion. In the case when no industry/literature data are available about the type of cooling or directly fraction, cooling water, to air specific for the process a default assumption is applied. It is assumed that the once-through cooling system is used in 50% of all cases and recirculating system is used in another 50% of all cases.
- fraction, process water, to air: 0.34 dimensionless; name fraction_PW_to_air; lognormal variance with pedigree 0.092025, pedigree (4,4,3,2,4)
  Literature value (Statistics Canada, 2007 & Shaffer, K.H., 2008, Consumptive water use in the Great Lakes Basin, USGS) (Vionnet, S., Quantis Water Database - Technical Report, 2012).
- fraction, cooling water, cooling pond system, to air: 0.032 dimensionless; name fraction_CW_CP_to_air; lognormal variance with pedigree 0.0413, pedigree (2,3,1,3,1)
  (same comment as for fraction, cooling water, once-through system, to air)
- fraction, cooling water, recirculating system, to air: 0.771 dimensionless; name fraction_CW_R_to_air; lognormal variance with pedigree 0.0413, pedigree (2,3,1,3,1)
  (same comment as for fraction, cooling water, once-through system, to air)

## Reference product
- phosphoric acid, industrial grade, without water, in 85% solution state: 1 kg; name RP; CPC 34232: Phosphoric acid; By-product classification allocatable product; CAS 7664-38-2
  Phosphoric acid (H3PO4) is a mineral (inorganic) acid. It is mostly used for the production of fertilizers. Other areas of application include the production of industrial phosphates and feedstuffs (Schrödter et al. 2008).
  Reference(s): Schrödter, K., Bettermann, G., Staffel, T., Wahl, F., Klein, T. and Hofmann, T. 2008. Phosphoric Acid and Phosphates. Ullmann's Encyclopedia of Industrial Chemistry.
  production volume 2.87201e10 kg; name RP_PV
    Estimated value. The global production volume is extrapolated from the European production volume based on reports from Cefic (European Chemical Industry Council), and the American Chemistry Council.
    According to Cefic (2016a) the global sales of chemicals in the year 2015 was 3 534 billion euros. The reported share of sales per region are: EU28 14.7%; Other Europe (Switzerland, Norway, Turkey, Russia and Ukraine) 2.7%; NAFTA (US, Canada and Mexico) 16.5%; Latin America 3.8%; China 39.9%; Japan 3.9%; Republic of Korea 3.2%; India 2.2%; Rest of Asia 11.9%; Rest of the World 1.3%. Cefic also reports the US total sales, which amount to 518.7 billion euros out of the global 3 534 billion euros (14.7%). The same share is reported by the American Chemistry Council (2016), according to which the USA sales account for 15% of global sales for the year 2016.
    European production volume:
    Estimated value. According to the European Chemical Agency, the consumption of Orthophosphoric acid for the year of 2016 is estimated to be 5500000000 kg. The aforementioned value is the average of the range given in the literature. According to the European Chemical Industry Council (Cefic, 2016a), the total sales of chemicals of the European Union in 2016 amounted to 519 billion euros. Chemical imports were valued at 91 billion euros for the first 11 months of 2016. Based on this, the value for the total imports for the year 2016 was extrapolated, yielding a value of 99.3 billion euros. Furthermore, Cefic (2016b) reports a trade surplus (exports-imports) of 46.4 billion euros (once again extrapolated for the whole year using the value of 42 billion euros for the first 11 months of 2016). Considering all the aforementioned information, the total chemical consumption in the EU is calculated to be 472.6 billion euros (total sales-exports+imports). It is therefore calculated that production is 110% of consumption. This value is used to scale the information on chemical consumption to production. The European production volume is therefore 6050000000 kg.
    Since no data were found for the global production this value was scaled accordingly.
    References:
    American Chemistry Council 2016. Outlook: U.S. Chemical Industry Continues to Outpace Industrial Output; Accounts for More Than One-Half of Construction Spending by Manufacturing Sector. Accessible at: https://www.americanchemistry.com/Media/PressReleasesTranscripts/ACC-news-releases/US-Chemical-Industry-Continues-to-Outpace-Industrial-Output.html
    European Chemical Agency, Brief profile of Orthophosphoric acid, Accessible at: https://echa.europa.eu/brief-profile/-/briefprofile/100.028.758
    Cefic 2016a. Facts and figures 2016 of the European chemical industry. Accessible at: http://www.cefic.org/Facts-and-Figures/Chemicals-Industry-Profile/
    Cefic 2016b. 2016: EU chemicals output posts positive growth for third year running. Accessible at: http://www.cefic.org/Documents/RESOURCES/Chemical%20Trends%20Report/March-2017-Cefic-Chemicals-Trends-Report.pdf
  property price 0.9 EUR2005
    Estimated based on expert judgement and knowledge of the market for chemicals.
  property carbon content 0
    carbon content on a dry matter basis (reserved; not for manual entry)
  properties: carbon content, fossil 0, dry mass 1 kg, carbon content, non-fossil 0, water in wet mass 0 kg, wet mass 1 kg, water content 0, carbon allocation 0 kg

## Inputs from technosphere
- spent solvent mixture: -0.007 kg; name BP_spent_solvent_mixture; lognormal variance with pedigree 0.35, pedigree (5,5,5,5,5)
  Estimated value
  Uncertainty: E
  production volume 2.01041e8 kg; = RP_PV*BP_spent_solvent_mixture/ABS(RP)
    Calculated from the production volume of phosphoric acid, industrial grade, without water, in 85% solution state in proportion to the respective output amounts.
  property price 0 EUR2005; name BP_spent_solvent_mixture_price_EUR2005
  properties: heating value, net 21.7 MJ, water content 0.197605, wet mass 1 kg, dry mass 0.835 kg, carbon content, fossil 0.571257
  note on heating value, net: Value taken from the general comment of the treatment dataset.
  note on carbon content, fossil: Tab A.7, ecoinvent v2.2 report 13_I. C content has been calculated after data in the tables, and then referred to 1 kg DM
- heat, district or industrial, other than natural gas: 0 MJ; pedigree (1,1,1,1,1)
  Distribution between fuels estimated
  Uncertainty: D
  properties: heating value, net 1 MJ
- quicklime, milled, loose: 0.108 kg; lognormal variance with pedigree 0.0546, pedigree (2,4,5,5,1)
  Data from one relevant plant used.
  Uncertainty: D
  properties: water content 0.010101, wet mass 1 kg, dry mass 0.99 kg
- H3PO4 purification residue: -0.352 kg; name BP_H3PO4_purification_residue; lognormal variance with pedigree 0.0546, pedigree (2,4,5,5,1)
  Data from one relevant plant used.
  Uncertainty: D
  production volume 1.01095e10 kg; = RP_PV*BP_H3PO4_purification_residue/ABS(RP)
    (same comment as for spent solvent mixture)
  property price 0 EUR2005; name BP_H3PO4_purification_resi_price_EUR2005
  properties: dry mass 1 kg, wet mass 1 kg
- water, deionised: 1.09 kg; name water_deionised_input; lognormal variance with pedigree 0.0546, pedigree (2,4,5,5,1)
  Data from one relevant plant used.
  Uncertainty: D
  properties: wet mass 1 kg
- heat, district or industrial, natural gas: 0 MJ; pedigree (1,1,1,1,1)
  Distribution between fuels estimated
  Uncertainty: D
  properties: heating value, net 1 MJ
- phosphoric acid, fertiliser grade, without water, in 70% solution state: 1.02 kg; lognormal variance with pedigree 0.0546, pedigree (2,4,5,5,1)
  Data from one relevant plant used.
  Uncertainty: D
  properties: dry mass 1 kg, wet mass 1 kg
- sulfuric acid: 0.129 kg; lognormal variance with pedigree 0.0546, pedigree (2,4,5,5,1)
  Data from one relevant plant used.
  Uncertainty: D
  properties: wet mass 1 kg, dry mass 1 kg
- chemical factory, organics: 4.7e-10 unit; lognormal variance with pedigree 0.3498, pedigree (2,3,5,4,3)
  Calculated based on literature data published by the industry. For this activity, no information was readily available concerning infrastructure and land-use. Therefore, the infrastructure is estimated based on data from two chemical factories, the BASF site of Ludwigshafen and the chemical factory in Gendorf (which are both located in Germany), which produce a wide range of chemical substances. Based on this data, the following assumptions are made: the built area amounts to about 4.2 ha, the plant has an average output of 50'000 t/a and a lifespan of fifty years. The estimated infrastructure amount is therefore 4.00 E-10 units per kg of produced chemical. Additional assumptions were made in the case of this dataset.
  References:
  Althaus H.-J., Chudacoff M., Hischier R., Jungbluth N., Osses M. and Primas A. (2007) Life Cycle Inventories of Chemicals. ecoinvent report No. 8, v2.0. EMPA Dübendorf, Swiss Centre for Life Cycle Inventories, Dübendorf, CH.
  Gendorf (2000) Umwelterklärung 2000, Werk Gendorf. Werk Gendorf, Burgkirchen.
- isopropanol: 0.007 kg; lognormal variance with pedigree 0.35, pedigree (5,5,5,5,5)
  Estimated value
  Uncertainty: E
  properties: carbon content, fossil 0.6, heating value, net 34.3 MJ, wet mass 1 kg, dry mass 1 kg
- sodium hydroxide, without water, in 50% solution state: 0.026 kg; lognormal variance with pedigree 0.0546, pedigree (2,4,5,5,1)
  Data from one relevant plant used.
  Uncertainty: D
  properties: dry mass 1 kg, heating value, net 3.03 MJ, wet mass 1 kg
- heat, district or industrial, other than natural gas: 0.000150788, 0.371849 MJ (2 entries); lognormal variance with pedigree 0.08, pedigree (4,4,5,5,3)
  Distribution between fuels estimated
  Uncertainty: D
- heat, district or industrial, natural gas: 0.00564628, 0.366354 MJ (2 entries); lognormal variance with pedigree 0.08, pedigree (4,4,5,5,3)
  Distribution between fuels estimated
  Uncertainty: D

## Inputs from nature
- Water, cooling, unspecified natural origin [natural resource, in water]: 0.12275 m3; name water_cooling_UNO_input; source EFMA - European Fertilizers Manufacturin 2000; lognormal variance with pedigree 0.0527, pedigree (2,2,5,5,1)
  Calculated based on literature, (Vionnet, S., Quantis Water Database - Technical Report, 2012). Data represents average of 4 roads of production: dihydrate process, hemihydrate process, recrystallisation process and repulping process. Since the data are average of different process roads the processes included might be slightly different in every read. In general it includes the processes: grinding, processing, filtration, concentration, etc. The process ends when finished phosphoric acid leaves the plant. It is assumed that the amount of water used for steam production is same as in the U.S.
  property water content 9081.65; name water_content
  property carbon content, non-fossil 0; name C_content_non_fossil
  property dry mass 0.1101 kg; name DM
  property carbon content, fossil 0.0104329; name C_content_fossil
  property wet mass 1000 kg; name WM
  property water in wet mass 999.89 kg; name WWM
- Water, well, in ground [natural resource, in water]: 0.004311 m3; name water_well_in_ground_input; source EFMA - European Fertilizers Manufacturin 2000; lognormal variance with pedigree 0.0546, pedigree (3,3,5,5,1)
  Data from one relevant plant used.
  Calculated based on literature, (Vionnet, S., Quantis Water Database - Technical Report, 2012). Data represents average of 4 roads of production: dihydrate process, hemihydrate process, recrystallisation process and repulping process. Since the data are average of different process roads the processes included might be slightly different in every read. In general it includes the processes: grinding, processing, filtration, concentration, etc. It is assumed that the amount of water used for steam production is same as in the U.S.
  Uncertainty: D

## Emissions to nature
- Sodium, ion [water, unspecified]: 0.0017 kg; lognormal variance with pedigree 0.0946, pedigree (2,4,5,5,1)
  Data from one relevant plant used.
  Uncertainty: D
- Fluoride [water, unspecified]: 0.0014 kg; lognormal variance with pedigree 0.0946, pedigree (2,4,5,5,1)
  Data from one relevant plant used.
  Uncertainty: D
- Water [water, unspecified]: 0.078749 m3; = (water_deionised_input/1000)*(1-fraction_WDI_to_air)+water_cooling_UNO_input*(1-fraction_CW_to_air)+water_well_in_ground_input*(1-fraction_PW_to_air); lognormal variance with pedigree 0.0827, pedigree (2,2,5,5,1)
  Calculated as a fraction of the input of water. For more details, refer to the mathematical relation and the parameters.
  property fraction, origin: unspecified 0.954734; name fraction_origin_unspecified_Ww
  property fraction, origin: fresh water 0.0452661; name fraction_origin_fresh_water_Ww
  property fraction, origin: salt water 0; name fraction_origin_salt_water_Ww
- Water [air, unspecified]: 0.049402 m3; = (water_deionised_input/1000*fraction_WDI_to_air)+(water_cooling_UNO_input*fraction_CW_to_air)+(water_well_in_ground_input*fraction_PW_to_air); lognormal variance with pedigree 0.0827, pedigree (2,2,5,5,1)
  (same comment as for Water)
  property fraction, origin: salt water 0; name fraction_origin_salt_water
  property fraction, origin: unspecified 0.962829; name fraction_origin_unspecified
  property fraction, origin: fresh water 0.0371714; name fraction_origin_fresh_water

## Sampling procedure
Data from one production plant.

## Extrapolations
Production of one plant and one process extrapolated to the whole production. This dataset has been copied from an original dataset covering the geography RER. The uncertainty has been adjusted accordingly.

## Review by Emilia Moreno Ruiz 2017-08-08
This dataset was additionally reviewed in a separate review process by Eric Johnson of Atlantic Consulting as well as Emilia Moreno Ruiz and Gregor Wernet of ecoinvent.
