# fluorspar production, 97% purity

Dataset: EcoSpold 2, unit process
Geography: GLO
Time period: 1976-01-01 to 2021-12-31
Technology level: current
Classification: ISIC rev.4 ecoinvent: 0891:Mining of chemical and fertilizer minerals
Classification: EcoSpold01Categories: chemicals/inorganics
Synonyms: calcium fluoride
Tags: ConvertedDataset
Scenario: Business-as-Usual
System model: Allocation, cut-off by classification
Share of production covered: 10 %
Generated by: Niels Jungbluth
Published in: Jungbluth, N. 2007
Database: ecoinvent
isCopyrightProtected: true
accessRestrictedTo: 1

## General comment
Basic inventory based on old literature information.
[This dataset was already contained in the ecoinvent database version 2. It was not individually updated during the transfer to ecoinvent version 3. Life Cycle Impact Assessment results may still have changed, as they are affected by changes in the supply chain, i.e. in other datasets. This dataset was generated following the ecoinvent quality guidelines for version 2. It may have been subject to central changes described in the ecoinvent version 3 change report (http://www.ecoinvent.org/database/ecoinvent-version-3/reports-of-changes/), and the results of the central updates were reviewed extensively. The changes added e.g. consistent water flows and other information throughout the database. The documentation of this dataset can be found in the ecoinvent reports of version 2, which are still available via the ecoinvent website. The change report linked above covers all central changes that were made during the conversion process.]

## Included activities end
Mineral extraction of calcium fluoride (fluorspar).

## Geography
Main producers are China, South Africa and Mexico. Some data for calcium fluoride produced in Germany.

## Technology
Open cast mining of resource. Separation by crushing, grinding and flotation.

## Time period
Time of publications.

## Reference product
- fluorspar, 97% purity: 1 kg; By-product classification allocatable product; CPC 16190: Other chemical minerals; CAS 14542-23-5
  EcoSpold01Location=GLO
  production volume 7.69072e9 kg; = 7460*1000000/0.97
    According to USGS (2021), the global annual production of fluorspar in 2019 was 7460 thousand metric tons. That amount is scaled to reflect 97% purity.
    Reference:
    USGS (2021). Fluospar. U.S. Geological Survey, Mineral Commodity Summaries, January 2021. https://pubs.usgs.gov/periodicals/mcs2021/mcs2021-fluorspar.pdf
  property price 0.210378 EUR2005
    Price calculated based on average value of imports of acid grade fluorspar reported in the USGS Mineral Commodity Summaries for Fluorspar from 2015 to 2019 (https://www.usgs.gov/centers/nmic/fluorspar-statistics-and-information). The prices given in USD were converted to EUR based on the annual exchange rates published by the European Central Bank (https://sdw.ecb.europa.eu/quickview.do?SERIES_KEY=120.EXR.A.USD.EUR.SP00.A), and then adjusted for inflation relative to 2005 by using the Harmonised Index of Consumer Prices (HICP) of the euro area, published by eurostat (https://ec.europa.eu/eurostat/databrowser/view/PRC_HICP_AIND/default/table).
  property carbon content 0
    carbon content on a dry matter basis (reserved; not for manual entry)
  properties: water content 0, carbon content, non-fossil 0, carbon content, fossil 0, water in wet mass 0 kg, wet mass 1 kg, dry mass 1 kg, carbon allocation 0 kg

## Inputs from technosphere
- electricity, medium voltage: 0.062242 kWh; lognormal variance with pedigree 0.0846, pedigree (3,3,5,5,1)
  Boustead 1979
  EcoSpold01Location=UCTE
  Uncertainty: Boustead 1979
- heat, district or industrial, natural gas: 0.0591166 MJ; lognormal variance with pedigree 0.0846, pedigree (3,3,5,5,1)
  EcoSpold01Location=RER
  Boustead 1979
  Uncertainty: Boustead 1979
  properties: heating value, net 1 MJ
- heat, district or industrial, other than natural gas: 0.552245 MJ; lognormal variance with pedigree 0.0846, pedigree (3,3,5,5,1)
  Boustead 1979
  EcoSpold01Location=RER
  Uncertainty: Boustead 1979
  properties: heating value, net 1 MJ
- chemical factory, organics: 4e-10 unit; lognormal variance with pedigree 0.628, pedigree (5,5,5,1,5)
  EcoSpold01Location=RER
  Rough estimation
  Uncertainty: Rough estimation

## Inputs from nature
- Fluorspar, in ground [natural resource, in ground]: 1.05 kg; lognormal variance with pedigree 0.0627, pedigree (3,3,5,3,1)
  92% CaF2 in ore; Estimation, 5% loss
  Uncertainty: Estimation, 5% loss

## Emissions to nature
- Particulates, < 2.5 um [air, unspecified]: 3.75e-5 kg; lognormal variance with pedigree 0.5946, pedigree (3,3,5,5,5)
  Literature
  Uncertainty: Literature
- Particulates, > 10 um [air, unspecified]: 0.000195 kg; lognormal variance with pedigree 0.3346, pedigree (3,3,5,5,5)
  Literature
  Uncertainty: Literature
- Particulates, > 2.5 um, and < 10um [air, unspecified]: 0.0001425 kg; lognormal variance with pedigree 0.4146, pedigree (3,3,5,5,5)
  Literature
  Uncertainty: Literature
- Hydrogen fluoride [air, unspecified]: 6.9444e-5 kg; lognormal variance with pedigree 0.3127, pedigree (3,3,5,3,5)
  Estimation
  Uncertainty: Estimation

## Sampling procedure
Literature and own estimations.

## Extrapolations
This dataset has been extrapolated from year 1991 to the year of the calculation (2021). The uncertainty has been adjusted accordingly.

## Review by Roberto Dones 2007-09-13
Passed.
none
