# sweet sorghum production

Dataset: EcoSpold 2, unit process
Geography: RoW
Time period: 2000-01-01 to 2021-12-31
Technology level: current
Classification: ISIC rev.4 ecoinvent: 0111:Growing of cereals (except rice), leguminous crops and oil seeds
Scenario: Business-as-Usual
System model: Allocation, cut-off by classification
Share of production covered: 100 %
Generated by: Jürgen Sutter
Published in: Jungbluth N. 2007
Database: ecoinvent
isCopyrightProtected: true
accessRestrictedTo: 1

## General comment
This dataset represents the cultivation of sweet sorghum on an area of 1 ha producing the co-products sweet sorghum grain and sweet sorghum stem. The yield of sweet sorghum grain is 3860 kg/ha at a moisture content at storage of 9.1%, the yield of sweet sorghum stem is 48263 kg/ha at a moisture content of 73%.
[This dataset was already contained in the ecoinvent database version 2. It was not individually updated during the transfer to ecoinvent version 3. Life Cycle Impact Assessment results may still have changed, as they are affected by changes in the supply chain, i.e. in other datasets. This dataset was generated following the ecoinvent quality guidelines for version 2. It may have been subject to central changes described in the ecoinvent version 3 change report (http://www.ecoinvent.org/database/ecoinvent-version-3/reports-of-changes/), and the results of the central updates were reviewed extensively. The changes added e.g. consistent water flows and other information throughout the database. The documentation of this dataset can be found in the ecoinvent reports of version 2, which are still available via the ecoinvent website. The change report linked above covers all central changes that were made during the conversion process.]

## Included activities start
This activity starts after the harvest of the previous crop. The inputs of seeds, mineral fertilisers and pesticides are considered. It is assumed that no organic fertilisers are applied. Seed input is approximated by reducing the yield by 5 kg (required amount of seed per hectare for sowing)

## Included activities end
The dataset includes all machine operations and corresponding machine infrastructure and sheds. Machine operations are: soil cultivation, sowing, fertilisation, weed control, pest and pathogen control, combine-harvest and transport from field to farm (15 km). Further, direct field emissions are included. This activity ends after harvest at the farm gate.

## Geography
The inventory is modelled for China.

## Technology
High yield production.

## Time period
Time of publications.

## Parameters
- fraction, irrigation water, to air: 0.586986 dimensionless; name fraction_IW_to_air; lognormal variance with pedigree 0.0409, pedigree (2,2,2,1,1)
- fraction, irrigation water, to ground water: 0.8 dimensionless; name fraction_IW_to_ground_water; lognormal variance with pedigree 0.0886, pedigree (4,3,1,1,4)
- fraction, irrigation water to surface water: 0.2 dimensionless; name fraction_IW_to_surface_water; lognormal variance with pedigree 0.0886, pedigree (4,3,1,1,4)

## Reference product
- sweet sorghum stem: 1 kg; name REF_PRODUCT; source FAO 2002; By-product classification allocatable product; CPC 01809: Other sugar crops n.e.c.
  Yield per hectare (FAO 2002)
  production volume 7.11562e11 kg
    Sweet sorghum stem production volumes were calculated using information in Tab 11.3 (ecoinvent v2 report 17-part 11). Production volumes were calculated from 'sweet sorghum grain' production volumes (2005), using a yield ratio obtained from the table mentioned above.
  property water content 2.7037; name REF_PRODUCT_water_content; = (1-REF_PRODUCT_DM)/ REF_PRODUCT_DM
  property carbon content, fossil 0; name REF_PRODUCT_C_content_fossil
    fossil carbon content on a dry matter basis
  property carbon content, non-fossil 0.425926; name REF_PRODUCT_C_content_non_fossil
    biogene carbon content on a dry matter basis
  property price 0.013 EUR2005; name REF_PRODUCT_price_EUR2005
    Temporary price data. Calculated as 90% of purchasers price based on: Source: Dauriat 2006
  property dry mass 0.27 kg; name REF_PRODUCT_DM
  property energy content 4.45 MJ; name REF_PRODUCT_energy_content
    as gross calorific value (when relevant)
  property water in wet mass 0.73 kg; name REF_PRODUCT_WWM; = 1- REF_PRODUCT_DM
  property wet mass 1 kg; name REF_PRODUCT_WM
  property carbon content 0.425926
    carbon content on a dry matter basis (reserved; not for manual entry)
  property true value 0.013; name REF_PRODUCT_true_value
    allocation property applied in "true value" allocation // value calculated from revenue
  properties: carbon allocation 0.115 kg

## By-products
- sweet sorghum grain: 0 kg; name BY_PRODUCT; source Smith C.W. 2000; CPC 23319: Preparations used in animal feeding n.e.c.; By-product classification allocatable product
  Average yield per hectare (2001-2005; FAOSTAT Database Query: Sorghum Production. Retrieved 16. May 2006, from http://faostat.fao.org/faostat/). The original value is 3865 kg/ha; 5 kg of grain are needed as seed input (Smith & Frederikson 2000). As there is no separate dataset for sorghum seed, the 5 kg seed are directly subtracted from the yield.
  production volume 5.69833e10 kg
    Production volumes from FAOSTAT (2005). It was considered that sweet sorghum (Sorghum bicolor vr. sweet) was produced at the same rates as sorghum (Sorghum bicolor), from info in ecoinvent v2 report 17-part 11.
  property carbon content, non-fossil 0.46818; name BY_PRODUCT_C_content_non_fossil
    biogene carbon content on a dry matter basis
    Composition data obtained from Sorgho, grain (http://www.feed-alp.admin.ch/start.php?action=adv_search&cmd=list_feed ). First, composition data were refered to 1 kg dry mass. Then, C-contents were calculated considering a C-content/dry mass of 46% in carbohydrates (including fibres), 53% in proteins and 75% in fats. All data from 'Evolutionary and Biochemical Aspects', A.D. Kay and T. Vrede (in Global Ecology, 2010, Elsevier B.V., S.E. Jørgensen Ed.).
  property wet mass 1 kg; name BY_PRODUCT_WM
  property dry mass 0.909 kg; name BY_PRODUCT_DM
  property energy content 14.27 MJ; name BY_PRODUCT_energy_content
    as gross calorific value (when relevant)
  property water in wet mass 0.091 kg; name BY_PRODUCT_WWM; = 1-BY_PRODUCT_DM
  property price 0.121 EUR2005; name BY_PRODUCT_price_EUR2005
    Temporary price data. Calculated as 90% of purchasers price based on: Source: Dauriat 2006
  property carbon content 0.46818
    carbon content on a dry matter basis (reserved; not for manual entry)
  property true value 0.00968993; name BY_PRODUCT_true_value
    allocation property applied in "true value" allocation // value calculated from revenue
  properties: carbon content, fossil 0, water content 0.10011, carbon allocation 0.425576 kg

## Inputs from technosphere
- application of plant protection product, by field sprayer: 3.95704e-6 ha; source FAO 2002; lognormal variance with pedigree 0.052, pedigree (1,1,5,5,1)
- ammonium nitrate: 0 kg; source IFA 2006; pedigree (1,1,1,1,1)
  The exchange has been updated from 'ammonium nitrate, as N' into 'ammonium nitrate' and therefore its amount has been scaled (multiplied) from 0.0008 kg by 2.8573 kg of 'ammonium nitrate' per kg of 'ammonium nitrate, as N'.
  properties: wet mass 1 kg, dry mass 1 kg
- organophosphorus-compound, unspecified: 3.45952e-7 kg; source NASS 2004; lognormal variance with pedigree 0.042, pedigree (1,1,5,5,1)
  The application of pesticides is approximated by data on sweet sorghum production in the USA. The amounts of active ingredients stem from NASS (2004). Substnaces that are not availabe in the ecoinvent database are approximated by inventories of superordinate chemical classes. The inventories were assigned according to Sutter (2010, Tab. 2.25). If no inventory for the active ingredient or the corresponding chemical class was available, the pesticide was approximated with the product 'pesticide, unspecified'. --- Sources: Sutter J. (2010) Life Cycle Inventories of Pesticides. Swiss Centre for Life Cycle Inventories, St. Gallen, Switzerland.
  properties: wet mass 1 kg, dry mass 1 kg, carbon content, fossil 0.260898
  note on carbon content, fossil: C content was calculated as an unweighted average of glyphosate, parathion, and fosetyl-Al. Those substances are classified as organo-phosphorous compounds in Tab 2.25, Sutter 2010
- atrazine: 9.68669e-6 kg; source NASS 2004; lognormal variance with pedigree 0.042, pedigree (1,1,5,5,1)
  (same comment as for organophosphorus-compound, unspecified)
  properties: dry mass 1 kg, wet mass 1 kg, carbon content, fossil 0.446512
- urea: 0 kg; source IFA 2006; pedigree (1,1,1,1,1)
  The exchange has been updated from 'urea, as N' into 'urea' and therefore its amount has been scaled (multiplied) from 0.0008 kg by 2.1438 kg of 'urea' per kg of 'urea, as N'.
  properties: carbon content, fossil 0.2, dry mass 1 kg, wet mass 1 kg
- tillage, harrowing, by spring tine harrow: 1.18712e-5 ha; source FAO 2002; lognormal variance with pedigree 0.052, pedigree (1,1,5,5,1)
- potassium chloride: 0.000939547 kg; source IFA 2006; lognormal variance with pedigree 0.044, pedigree (3,1,5,5,1)
  The exchange has been updated from 'potassium chloride, as K2O' into 'potassium chloride' and therefore its amount has been scaled (multiplied) from 0.001 kg by 1.5829 kg of 'potassium chloride' per kg of 'potassium chloride, as K2O'.
  properties: wet mass 1 kg, dry mass 1 kg
- packaging, for pesticides: 4.49859e-5 kg; lognormal variance with pedigree 0.0912, pedigree (4,3,5,5,4)
  Total amount of active substance/s of pesticides needed for the production of sweet sorghum stem is calculated to be circa 3.93E-05 kg. Pesticide/s used in this dataset is/are: '[sulfonyl]urea-compound', 'acetamide-anillide-compound, unspecified', 'atrazine', 'benzoic-compound', 'glyphosate', 'metolachlor', 'organophosphorus-compound, unspecified', 'phenoxy-compound'. The total amount of active substance/s is doubled in order to account for the packaging of the dilluted product of pesticide/s that is/are applied. Therefore, 7.85E-05 kg of packaging for pesticides is justified with this exchange.
  properties: wet mass 1 kg, carbon content, fossil 0.85714, dry mass 1 kg, heating value, net 25.97 MJ, price 0.0642 EUR2005
- acetamide-anillide-compound, unspecified: 4.18207e-6 kg; source NASS 2004; lognormal variance with pedigree 0.042, pedigree (1,1,5,5,1)
  (same comment as for organophosphorus-compound, unspecified)
  properties: dry mass 1 kg, carbon content, fossil 0.659175, wet mass 1 kg
  note on carbon content, fossil: Approximated as an unweighted average of the C-content of the acetamide-anillide-compound (Tab 2.25 Sutter, 2010) alachor, metolachlor, propachlor and teflubenzuron
- sowing: 1.18712e-5 ha; source FAO 2002; lognormal variance with pedigree 0.052, pedigree (1,1,5,5,1)
- tillage, currying, by weeder: 1.18712e-5 ha; source FAO 2002; lognormal variance with pedigree 0.052, pedigree (1,1,5,5,1)
- fertilising, by broadcaster: 3.95704e-6 ha; source FAO 2002; lognormal variance with pedigree 0.052, pedigree (1,1,5,5,1)
- irrigation: 0 m3; name water_irrigation_input; source Siebert, S. 2010; pedigree (1,1,1,1,1)
  Calculated based on literature values (Doll, 2010) and partially modelled at ETH (Pfister, S.).
  property wet mass 1000 kg; name WM
  property water in wet mass 999.89 kg; name WWM
  property dry mass 0.11 kg; name DM
  property carbon content, fossil 0; name C_content_fossil
  property carbon content, non-fossil 0; name C_content_non_fossil
  property water content 9089.91; name water_content
- tillage, ploughing: 1.18712e-5 ha; source FAO 2002; lognormal variance with pedigree 0.052, pedigree (1,1,5,5,1)
- transport, tractor and trailer, agricultural: 0.000510368 metric ton*km; lognormal variance with pedigree 0.268, pedigree (4,5,5,5,5)
  Field-to-farm transport of harvested maize grains and farm-to-field transport of fertilisers, pesticides and seeds; distance 15 km; masses of pesticides and fertilisers are considered for the whole product, instead of active ingredients and nutrients only (according to Nemecek et al. 2004).
- phenoxy-compound: 8.84846e-7 kg; source NASS 2004; lognormal variance with pedigree 0.042, pedigree (1,1,5,5,1)
  (same comment as for organophosphorus-compound, unspecified)
  properties: carbon content, fossil 0.532559, dry mass 1 kg, wet mass 1 kg
  note on carbon content, fossil: An unweighted average of the C content in mCPA, mCPB, mecoprop, fluazifop-P-butyl, and 2,4-D. Those substances are classified as phenoxy-compounds in Tab 2.25, Sutter 2010
- benzoic-compound: 1.49031e-7 kg; source NASS 2004; lognormal variance with pedigree 0.042, pedigree (1,1,5,5,1)
  (same comment as for organophosphorus-compound, unspecified)
  properties: carbon content, fossil 0.405853, wet mass 1 kg, dry mass 1 kg
  note on carbon content, fossil: C content estimated after the pesticides Dicamba (C8H6Cl2O3) and Clopyralid (C6H3Cl2NO2) (Tab 1.5, Sutter 2010), classified in ecoinvent v2.2 report 15a, Tab 10.3 as benzoic compounds
- inorganic phosphorus fertiliser, as P2O5: 0 kg; source IFA 2006; pedigree (1,1,1,1,1)
  properties: wet mass 1 kg, dry mass 1 kg
- glyphosate: 2.91e-6 kg; source NASS 2004; lognormal variance with pedigree 0.042, pedigree (1,1,5,5,1)
  (same comment as for organophosphorus-compound, unspecified)
  properties: dry mass 1 kg, wet mass 1 kg, carbon content, fossil 0.214286
- packaging, for fertilisers: 0.0113964 kg; lognormal variance with pedigree 0.0912, pedigree (4,3,5,5,4)
  Total amount of active substance/s of fertilisers needed for the production of 'sweet sorghum stem' is calculated to be circa 9.95E-03 kg. Fertiliser/s used in this dataset is/are: 'ammonium nitrate, as N', 'lime', 'phosphate fertiliser, as P2O5', 'potassium chloride, as K2O', 'urea, as N'. The total amount of active substance/s is doubled in order to account for the packaging of the dilluted product of fertiliser/s that is/are applied. Therefore, 1.99E-02 kg of packaging for fertilisers is justified with this exchange.
  properties: heating value, net 25.01 MJ, wet mass 1 kg, carbon content, fossil 0.825301, dry mass 1 kg, price 0.0642 EUR2005
  note on carbon content, fossil: Considering a chemical formula (C2H4)n for polyethylene, carbon content-fossil is calculated to be 0.856286 kg of Carbon per kg of dry mass.
- lime: 0.00356137 kg; source Dauriat A. 2000; lognormal variance with pedigree 0.044, pedigree (3,1,5,5,1)
  properties: carbon content, fossil 0.120005, wet mass 1 kg, dry mass 1 kg
- tillage, cultivating, chiselling: 1.18712e-5 ha; source FAO 2002; lognormal variance with pedigree 0.052, pedigree (1,1,5,5,1)
- [sulfonyl]urea-compound: 1.79624e-8 kg; source NASS 2004; lognormal variance with pedigree 0.042, pedigree (1,1,5,5,1)
  (same comment as for organophosphorus-compound, unspecified)
  properties: carbon content, fossil 0.540853, wet mass 1 kg, dry mass 1 kg
  note on carbon content, fossil: Approximated as an unweighted average of the C-content of the [sulfonyl]urea-compounds (Tab 2.25 Sutter, 2010) chlorotoluron, Diuron, Linuron and Isoproturon.
- metolachlor: 4.31638e-6 kg; source NASS 2004; lognormal variance with pedigree 0.042, pedigree (1,1,5,5,1)
  (same comment as for organophosphorus-compound, unspecified)
  properties: wet mass 1 kg, dry mass 1 kg, carbon content, fossil 0.633803
- combine harvesting: 1.18712e-5 ha; source FAO 2002; lognormal variance with pedigree 0.052, pedigree (1,1,5,5,1)
- ammonium nitrate: 0.000387311, 0.000268615, 0.00070087 kg (3 entries); source IFA 2006; lognormal variance with pedigree 0.044, pedigree (3,1,5,5,1)
  (same comment as for ammonium nitrate)
- urea: 0.000124373, 0.000100328, 0.000793281 kg (3 entries); source IFA 2006; lognormal variance with pedigree 0.044, pedigree (3,1,5,5,1)
  (same comment as for urea)
- irrigation: 0.000469024, 1.99086e-5, 7.96346e-7, 6.87083e-5, 3.43569e-6, 0.000195088, 3.17541e-5, 0.00805715, 0.000154878, 5.29336e-5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 m3 (16 entries); source Siebert, S. 2010; lognormal variance with pedigree 0.0447, pedigree (2,2,5,5,1)
  (same comment as for irrigation)
  properties: wet mass 1000 kg, dry mass 0.11 kg, water content 9089.91
- inorganic phosphorus fertiliser, as P2O5: 4.84317e-6, 6.28359e-6, 5.03149e-6, 3.93964e-5, 8.30126e-6, 3.42043e-7, 9.01609e-7, 1.67639e-6, 1.82935e-7, 3.9969e-8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 kg (29 entries); source IFA 2006; lognormal variance with pedigree 0.044, pedigree (3,1,5,5,1)

## Inputs from nature
- Carbon dioxide, in air [natural resource, in air]: 0.303669 kg; lognormal variance with pedigree 0.0606, pedigree (4,3,5,5,1)
  Modelled,see chapter 'CO2 binding' in '01_crop production_direct field emissions and natural resources_v1.0.pdf' - pdf-document on the dedicated talk page of ecoinvent (www.ecoinvent.org/documentation)
- Energy, gross calorific value, in biomass [natural resource, biotic]: 3.25284 MJ; lognormal variance with pedigree 0.0517684, pedigree (4,3,5,1,1)
  Calculated from energy balance.
- Transformation, to annual crop, irrigated, intensive [natural resource, land]: 0.118712 m2; = 10000/48263; lognormal variance with pedigree 0.1726, pedigree (1,3,5,5,1)
  Modelled, see chapter 'Land use' in '01_crop production_direct field emissions and natural resources_v1.0.pdf' - pdf-document on the dedicated talk page of ecoinvent (www.ecoinvent.org/documentation)
- Occupation, annual crop, irrigated, intensive [natural resource, land]: 0.0692449 m2*year; = 5833/48263; lognormal variance with pedigree 0.0926, pedigree (1,3,5,5,1)
  (same comment as for Transformation, to annual crop, irrigated, intensive)
- Transformation, from annual crop [natural resource, land]: 0.118712 m2; = 10000/48263; lognormal variance with pedigree 0.1726, pedigree (1,3,5,5,1)
  (same comment as for Transformation, to annual crop, irrigated, intensive)

## Emissions to nature
- Water [air, unspecified]: 0.0133066 m3; name water_to_air_unspecified; lognormal variance with pedigree 0.0827, pedigree (2,2,5,5,1)
  Calculated value based on literature values and expert opinion. See comments in the parametres' comment field.
  property fraction, origin: unspecified 0; name fraction_origin_unspecified
  property fraction, origin: salt water 0; name fraction_origin_salt_water
  property fraction, origin: fresh water 1; name fraction_origin_fresh_water
- Water [water, ground-]: 0.0110399 m3; name water_to_water_ground; lognormal variance with pedigree 0.1306, pedigree (4,3,5,5,4)
  Calculated value. See the parameters and their comments to understand the calculation.
  property fraction, origin: unspecified 0; name fraction_origin_unspecified_Wgw
  property fraction, origin: salt water 0; name fraction_origin_salt_water_Wgw
  property fraction, origin: fresh water 1; name fraction_origin_fresh_water_Wgw
- Phosphorus [water, ground-]: 8.30986e-7 kg; lognormal variance with pedigree 0.1006, pedigree (4,3,5,5,1)
  Modelled, see chapter 'Emissions of phosphorous to the water' in '01_crop production_direct field emissions and natural resources_v1.0.pdf' - pdf-document on the dedicated talk page of ecoinvent (www.ecoinvent.org/documentation)
- Dicamba [soil, agricultural]: 1.49031e-7 kg; lognormal variance with pedigree 0.0706, pedigree (4,3,5,5,1)
  Modelled, see chapter 'Emissions of pesticides to agricultural soil' in '01_crop production_direct field emissions and natural resources_v1.0.pdf' - pdf-document on the dedicated talk page of ecoinvent (www.ecoinvent.org/documentation)
- Metolachlor [soil, agricultural]: 4.31638e-6 kg; lognormal variance with pedigree 0.0706, pedigree (4,3,5,5,1)
  (same comment as for Dicamba)
- Dinitrogen monoxide [air, non-urban air or from high stacks]: 2.46922e-5 kg; name N2O; = 2.08/48263; lognormal variance with pedigree 0.1006, pedigree (4,3,5,5,1)
  Modelled, see chapter 'Emissions of N2O to the air' in '01_crop production_direct field emissions and natural resources_v1.0.pdf' - pdf-document on the dedicated talk page of ecoinvent (www.ecoinvent.org/documentation)
- Atrazine [soil, agricultural]: 9.68669e-6 kg; lognormal variance with pedigree 0.0706, pedigree (4,3,5,5,1)
  (same comment as for Dicamba)
- Copper [soil, agricultural]: -9.84019e-7 kg; source Smith C.W. 2000
  Calculated as the difference between heavy metal input through fertilisers and output through the harvested product. Heavy metal contents of sorghum grains (Cu and Zn) according to Smith & Frederikson (2000). Heavy metal contents of sorghum stems according to Smith & Fredeiksen (2000) (Zn) and BIOBIB (1996) (Cd, Cu, Pb). Heavy metal contents of mineral fertilisers according to Nemecek et al. (2004). Negative values represent a net export of heavy metals. --- Sources: Nemecek T., Heil A., Huguenin O., Meier S., Erzinger S., Blaser S., Dux D. & Zimmerman A. (2004) Life Cycle Inventories of Agricultural Production Systems. Ecoinvent report no. 15. Swiss Centre for Life Cycle Inventories, Duebendorf, Switzerland. --- BIOBIB (1996): Reisinger K., Haslinger C., Herger M., Hofbauer H. (1996) BIOBIB - a Database for Biofuels. THERMIE- Conference: Renewable Energy Databases, Harwell (United Kingdom).
- 2,4-D [soil, agricultural]: 8.84846e-7 kg; lognormal variance with pedigree 0.0706, pedigree (4,3,5,5,1)
  (same comment as for Dicamba)
- Prosulfuron [soil, agricultural]: 1.59668e-8 kg; lognormal variance with pedigree 0.0706, pedigree (4,3,5,5,1)
  (same comment as for Dicamba)
- Phosphorus [water, surface water]: 1.07631e-5 kg; lognormal variance with pedigree 0.1006, pedigree (4,3,5,5,1)
  (same comment as for Phosphorus)
- Dimethenamid [soil, agricultural]: 9.03472e-7 kg; lognormal variance with pedigree 0.0706, pedigree (4,3,5,5,1)
  (same comment as for Dicamba)
- Nitrate [water, ground-]: 0.00146657 kg; = 123.54/48263; lognormal variance with pedigree 0.1006, pedigree (4,3,5,5,1)
  Modelled with the 'SQCB-NO3 model' described in '01_crop production_direct field emissions and natural resources_v1.0.pdf' - pdf-document on the dedicated talk page of ecoinvent (www.ecoinvent.org/documentation)
- Cadmium [soil, agricultural]: -2.17184e-8 kg; source Smith C.W. 2000
  (same comment as for Copper)
- Water [water, surface water]: 0.00275998 m3; name water_to_water_surface; lognormal variance with pedigree 0.1306, pedigree (4,3,5,5,4)
  Calculated value. See the parameters and their comments to understand the calculation.
  property fraction, origin: salt water 0; name fraction_origin_salt_water_Wsw
  property fraction, origin: fresh water 1; name fraction_origin_fresh_water_Wsw
- Metsulfuron-methyl [soil, agricultural]: 1.99591e-9 kg; lognormal variance with pedigree 0.0706, pedigree (4,3,5,5,1)
  (same comment as for Dicamba)
- Nitrogen oxides [air, non-urban air or from high stacks]: 5.18536e-6 kg; = 0.21 * N2O; lognormal variance with pedigree 0.1006, pedigree (4,3,5,5,1)
  Modelled, see chapter 'Emissions of NOx to the air' in '01_crop production_direct field emissions and natural resources_v1.0.pdf' - pdf-document on the dedicated talk page of ecoinvent (www.ecoinvent.org/documentation)
- Alachlor [soil, agricultural]: 3.2786e-6 kg; lognormal variance with pedigree 0.0706, pedigree (4,3,5,5,1)
  (same comment as for Dicamba)
- Ammonia [air, non-urban air or from high stacks]: 8.07244e-5 kg; lognormal variance with pedigree 0.0706, pedigree (4,3,5,5,1)
  Modelled with the 'AGRAMMON model' described in '01_crop production_direct field emissions and natural resources_v1.0.pdf' - pdf-document on the dedicated talk page of ecoinvent (www.ecoinvent.org/documentation)
- Glyphosate [soil, agricultural]: 2.91e-6 kg; lognormal variance with pedigree 0.0706, pedigree (4,3,5,5,1)
  (same comment as for Dicamba)
- Chlorpyrifos [soil, agricultural]: 9.58021e-8 kg; lognormal variance with pedigree 0.0706, pedigree (4,3,5,5,1)
  (same comment as for Dicamba)
- Zinc [soil, agricultural]: -1.13939e-6 kg; source Smith C.W. 2000
  (same comment as for Copper)
- Lead [soil, agricultural]: -4.7447e-7 kg; source Smith C.W. 2000
  (same comment as for Copper)
- Terbufos [soil, agricultural]: 2.50151e-7 kg; lognormal variance with pedigree 0.0706, pedigree (4,3,5,5,1)
  (same comment as for Dicamba)

## Sampling procedure
Literature data

## Extrapolations
Transports are modelled with standard distances. Data for the usage of pesticides are taken from US production. Machine usage is modelled with Chinese processings and Swiss diesel consumptions. Emissions are calculated with standard methods. This dataset has been copied from an original dataset covering the geography CN. The uncertainty has been adjusted accordingly.

## Review by Niels Jungbluth 2006-10-17
Passed.
none
