# treatment of sulfidic tailings, from gold mine operation, tailings impoundment

Dataset: EcoSpold 2, unit process
Geography: US
Time period: 2015-01-01 to 2021-12-31
Technology level: current
Classification: ISIC rev.4 ecoinvent: 3822:Treatment and disposal of hazardous waste
Synonyms: pond; sulphidic; tailing; tails
Scenario: Business-as-Usual
System model: Allocation, cut-off by classification
Share of production covered: 80 %
Generated by: David Turner
Database: ecoinvent
isCopyrightProtected: true
accessRestrictedTo: 1

## General comment
This dataset represents the activity of waste disposal of sulfidic tailings, from gold mine operation in a tailings impoundment in the United States.
Background: Tailings, a waste material produced during mineral concentration (beneficiation), often contain significant quantities of mobile toxic metals and are typically produced in large quantities. To manage these wastes, tailings are commonly stored behind dammed impoundments, known as tailings ponds. These ponds pose a significant long-term pollution risk as metals may leach out into the surrounding environment, potentially over very long timeframes.
Modelling approach: This dataset was produced using a model developed specifically for assessing the long-term emissions of tailings disposal (see Doka, 2017). The tailings disposal model is based on the modelling framework applied in existing landfill process models used in ecoinvent and is based on a top-down approach. Literature data on measurements of deposited tailings compositions (solids) and measured current concentrations in leachate (liquid) form the basis of the model and are used to characterise pollutant mobility and calculate the currently occurring rate of emissions of the landfill. Heeding chief parameters, such as hydrology, pH development and elemental chemistry, these emissions are then projected into the future. Tailings composition is based on the typical composition of tailings at gold mine sites worldwide; i.e. composition is not region-specific. Land use was calculated following the approach described by Doka (2008). Based on an assumed generic final height of a tailings impoundment of 60 m and an assumed tailings density of 2200 kg/m3, a land area of 7.58E-06 m2 is required per kilogram of sulfidic tailings. The land is assumed to be converted from unknown origin to a disposal site. After an operational phase of 30 years, spontaneous restoration of a consolidated state is assumed to be reached after one hundred years. The total occupation time is therefore 130 years and the land occupation per kilogram tailings is 9.85E-04 m2.
Waste composition (wet, in ppm): H2O 300000; O 621300; H na; C 6145; S 305.88; N 5.0454; P 192.55; B 54.583; Cl 102.61; Br 0.22894; F 772.88; I na; Ag 9.7097; As 61.447; Ba 356.57; Cd 3.9592; Co 10.634; Cr 46.594; Cu 489.41; Hg 0.40262; Mn 142.11; Mo 10.949; Ni 17.077; Pb 155.09; Sb 34.059; Se 4.2887; Sn 26.979; V 142.69; Zn 190.19; Be 1.9806; Sc 13.343; Sr 100.02; Ti 122.75; Tl 2.6154; W 9.3995; Si 39700; Fe 10240; Ca 2631.2; Al 11955; K 2187; Mg 1408.9; Na 1044.1. // Share of carbon in waste that is biogenic 0%.
Activity extent: The dataset includes all potential emissions to the environment and land use changes. Input exchanges of infrastructure, materials, energy, and water are not included here but are accounted for in the activity, gold mine operation.
References
Doka, G. (2008). Life Cycle Inventory data of mining waste: Emissions from sulfidic tailings disposal. Zürich, Switzerland: Doka Life Cycle Assessments.
Doka, G. (2017). A model for waste-specific and climate-specific life cycle inventories of tailings impoundments. Zürich, Switzerland: Doka Life Cycle Assessments.

## Included activities start
The activity starts at the point of waste deposition in the impoundment. All upstream activities, including the pumping of tailings to the site, any dewatering or treatment, or other transport-related activities are excluded.

## Included activities end
Waste-specific short- and long-term emissions to the environment via impoundment leachate; land transformation and occupation. Note that the structural integrity of the site is assumed to be unwavering during the entie modelled time horizon; i.e. accidental releases of leachate (due to impoundment failure) are not considered.

## Geography
Given name of site is 'Gold deposits; United States'. Impoundment site with mean annual temperature (MAT) of 4.17728402458571 degC, mean annual precipitation (MAP) of 1947.70179662068 mm/year, mean annual actual evaporation (EAT) of 200.028972965841 mm/year, and net infiltration of 1571.59544596779 mm/year (using half of natural surface evapotranspiration). This infiltration was soft capped from a value of 1847.68731013776 mm/year. The implied surface runoff of water is therefore 276.091864169966 mm/year.
Temperature at site can result in permafrost conditions, which slows down water flow by a factor of 0.997.

## Technology
This is an inventory for an impoundment of copper ore beneficiation tailings waste. The following assumptions were made concerning technology: final impoundment height is 60 meters; operation phase duration is 30 years; and impoundment leachates are released into the environment untreated.

## Time period
'Data on average composition of tailings and tailings-derived leachates from literature sources published between 1994 and 2017 (mean publication date: 2009±6). Mean annual temperature and precipitation data for 1970-2000 (source: Fick and Hijmans, 2017); mean annual evapotranspiration for 1950-2000 (source: Fekete et al., 2002). Production volume based on world mine production data from the USGS Minerals Yearbook 2015. Transfer coefficients from prospective, tailings-specific model.
References:
Fekete, B. M., Vorosmarty, C. J. & Grabs, W. (2002). High-resolution fields of global runoff combining observed river discharge and simulated water balances. Global Biogeochemical Cycles, 16, 15-1 - 15-10.
Fick, S. E. & Hijmans, R. J. (2017). Worldclim 2: New 1-km spatial resolution climate surfaces for global land areas. International Journal of Climatology, 37, 4302-4315.'

## Reference product
- sulfidic tailings, from gold mine operation: -1 kg; By-product classification Waste
  main reference product of this activity (supply of disposal service).
  production volume 3.32e6 kg
    Estimate of the national tailings production volume from the mining and concentration of sulfidic gold ores, based on national mine production of gold from sulfide mineral deposits (kg) multiplied by estimated tailings generation rate per kg of mined gold (6328 kg per kg mined gold).
  property price 0 EUR2005
    Waste products are assigned a price of zero as they are assumed to require further treatment.
  property carbon content 0.0087785
    carbon content on a dry matter basis (reserved; not for manual entry)
  properties: water content 0.42857, wet mass 1 kg, potassium content 0.0031243, chromium content 6.6562e-5, cobalt content 1.5191e-5, silver content 1.3871e-5, dry mass 0.7 kg, phosphorus content 0.00027508, tungsten content 1.3428e-5, molybdenum content 1.5641e-5, beryllium content 2.8295e-6, zinc content 0.0002717, silicon content 0.056714, lead content 0.00022156, manganese content 0.00020301, vanadium content 0.00020384, carbon content, fossil 0.0087785, scandium content 1.9061e-5, arsenic content 8.7781e-5, oxygen content 0.88758, carbon content, non-fossil 0, water in wet mass 0.3 kg, aluminium content 0.017079, strontium content 0.00014288, nickel content 2.4396e-5, cadmium content 5.656e-6, calcium content 0.0037589, tin content 3.8541e-5, barium content 0.00050938, fluorine content 0.0011041, sodium content 0.0014916, antimony content 4.8655e-5, nitrogen content 7.2076e-6, chlorine content 0.00014659, iron content 0.014628, mercury content 5.7517e-7, selenium content 6.1267e-6, titanium content 0.00017536, sulfur content 0.00043697, boron content 7.7976e-5, bromine content 3.2706e-7, magnesium content 0.0020127, thallium content 3.7362e-6, copper content 0.00069916, carbon allocation 0.00614495 kg

## Inputs from nature
- Transformation, from unspecified [natural resource, land]: 7.5758e-6 m2; lognormal variance with pedigree 0.030796, pedigree (1,1,2,1,1)
  conversion of impoundment area.
  Uncertainty: U
- Transformation, to dump site [natural resource, land]: 7.5758e-6 m2; lognormal variance with pedigree 0.030796, pedigree (1,1,2,1,1)
  conversion to impoundment area.
  Uncertainty: U
- Occupation, dump site [natural resource, land]: 0.00098485 m2*year; lognormal variance with pedigree 0.14986, pedigree (1,1,2,1,1)
  for impoundment operation phase and 100 year renaturation phase.
  Uncertainty: U

## Emissions to nature
- Ammonium, ion [water, ground-, long-term]: 2.4553e-7 kg; lognormal variance with pedigree 0.34402, pedigree (1,1,2,1,1)
  Emissions from long-term leachate (>100a) directly from tailings impoundment.
  Uncertainty: U
- Lead [water, ground-, long-term]: 0.00015503 kg; lognormal variance with pedigree 0.22611, pedigree (1,1,2,1,1)
  (same comment as for Ammonium, ion)
- TOC, Total Organic Carbon [water, ground-, long-term]: 0.0021597 kg; lognormal variance with pedigree 0.17515, pedigree (1,1,2,1,1)
  (same comment as for Ammonium, ion)
- Arsenic, ion [water, ground-]: 5.5624e-8 kg; lognormal variance with pedigree 0.42336, pedigree (1,1,2,1,1)
  burden from short-term leachate to groundwater in uncontrolled impoundment in moist cimate.
  Uncertainty: U
- Lead [water, ground-]: 6.0217e-8 kg; lognormal variance with pedigree 0.42022, pedigree (1,1,2,1,1)
  (same comment as for Arsenic, ion)
- Tungsten [water, ground-]: 6.8727e-8 kg; lognormal variance with pedigree 0.41974, pedigree (1,1,2,1,1)
  (same comment as for Arsenic, ion)
- Ammonium, ion [water, ground-]: 9.1646e-7 kg; lognormal variance with pedigree 0.34016, pedigree (1,1,2,1,1)
  (same comment as for Arsenic, ion)
- Fluoride [water, ground-, long-term]: 0.00069401 kg; lognormal variance with pedigree 0.17373, pedigree (1,1,2,1,1)
  (same comment as for Ammonium, ion)
- Iron, ion [water, ground-]: 1.7195e-5 kg; lognormal variance with pedigree 0.23784, pedigree (1,1,2,1,1)
  (same comment as for Arsenic, ion)
- TOC, Total Organic Carbon [water, ground-]: 3.6056e-6 kg; lognormal variance with pedigree 0.2874, pedigree (1,1,2,1,1)
  (same comment as for Arsenic, ion)
- Hydrogen sulfide [water, ground-]: 7.5736e-5 kg; lognormal variance with pedigree 0.20357, pedigree (1,1,2,1,1)
  (same comment as for Arsenic, ion)
- Titanium, ion [water, ground-, long-term]: 0.00012274 kg; lognormal variance with pedigree 0.23389, pedigree (1,1,2,1,1)
  (same comment as for Ammonium, ion)
- Fluoride [water, ground-]: 2.9839e-6 kg; lognormal variance with pedigree 0.29318, pedigree (1,1,2,1,1)
  (same comment as for Arsenic, ion)
- Tin, ion [water, ground-]: 9.8564e-8 kg; lognormal variance with pedigree 0.40617, pedigree (1,1,2,1,1)
  (same comment as for Arsenic, ion)
- DOC, Dissolved Organic Carbon [water, ground-, long-term]: 0.0021597 kg; lognormal variance with pedigree 0.17515, pedigree (1,1,2,1,1)
  (same comment as for Ammonium, ion)
- Titanium, ion [water, ground-]: 1.6324e-8 kg; lognormal variance with pedigree 0.46334, pedigree (1,1,2,1,1)
  (same comment as for Arsenic, ion)
- Copper, ion [water, ground-, long-term]: 0.00048858 kg; lognormal variance with pedigree 0.18804, pedigree (1,1,2,1,1)
  (same comment as for Ammonium, ion)
- Tin, ion [water, ground-, long-term]: 2.688e-5 kg; lognormal variance with pedigree 0.28429, pedigree (1,1,2,1,1)
  (same comment as for Ammonium, ion)
- DOC, Dissolved Organic Carbon [water, ground-]: 3.6056e-6 kg; lognormal variance with pedigree 0.2874, pedigree (1,1,2,1,1)
  (same comment as for Arsenic, ion)
- Thallium [water, ground-, long-term]: 2.6136e-6 kg; lognormal variance with pedigree 0.36127, pedigree (1,1,2,1,1)
  (same comment as for Ammonium, ion)
- COD, Chemical Oxygen Demand [water, ground-, long-term]: 0.00019672 kg; lognormal variance with pedigree 0.17515, pedigree (1,1,2,1,1)
  (same comment as for Ammonium, ion)
- Thallium [water, ground-]: 1.706e-9 kg; lognormal variance with pedigree 0.53838, pedigree (1,1,2,1,1)
  (same comment as for Arsenic, ion)
- Copper, ion [water, ground-]: 8.2838e-7 kg; lognormal variance with pedigree 0.33429, pedigree (1,1,2,1,1)
  (same comment as for Arsenic, ion)
- Sulfate [water, ground-]: 0.0007038 kg; lognormal variance with pedigree 0.20357, pedigree (1,1,2,1,1)
  (same comment as for Arsenic, ion)
- COD, Chemical Oxygen Demand [water, ground-]: 3.2842e-7 kg; lognormal variance with pedigree 0.2874, pedigree (1,1,2,1,1)
  (same comment as for Arsenic, ion)
- Strontium [water, ground-]: 4.9181e-7 kg; lognormal variance with pedigree 0.35335, pedigree (1,1,2,1,1)
  (same comment as for Arsenic, ion)
- Cobalt [water, ground-, long-term]: 1.0283e-5 kg; lognormal variance with pedigree 0.31517, pedigree (1,1,2,1,1)
  (same comment as for Ammonium, ion)
- Strontium [water, ground-, long-term]: 9.9526e-5 kg; lognormal variance with pedigree 0.2407, pedigree (1,1,2,1,1)
  (same comment as for Ammonium, ion)
- Cobalt [water, ground-]: 3.5086e-7 kg; lognormal variance with pedigree 0.37244, pedigree (1,1,2,1,1)
  (same comment as for Arsenic, ion)
- Sodium, ion [water, ground-, long-term]: 0.0010093 kg; lognormal variance with pedigree 0.16322, pedigree (1,1,2,1,1)
  (same comment as for Ammonium, ion)
- Chromium VI [water, ground-]: 2.4177e-8 kg; lognormal variance with pedigree 0.45072, pedigree (1,1,2,1,1)
  (same comment as for Arsenic, ion)
- Silver, ion [water, ground-, long-term]: 9.7057e-6 kg; lognormal variance with pedigree 0.31815, pedigree (1,1,2,1,1)
  (same comment as for Ammonium, ion)
- Chromium VI [water, ground-, long-term]: 4.4053e-7 kg; lognormal variance with pedigree 1.624, pedigree (1,1,2,1,1)
  (same comment as for Ammonium, ion)
- Sodium, ion [water, ground-]: 3.4839e-5 kg; lognormal variance with pedigree 0.2202, pedigree (1,1,2,1,1)
  (same comment as for Arsenic, ion)
- Calcium, ion [water, ground-, long-term]: 0.0024712 kg; lognormal variance with pedigree 0.13348, pedigree (1,1,2,1,1)
  (same comment as for Ammonium, ion)
- Silver, ion [water, ground-]: 4.0088e-9 kg; lognormal variance with pedigree 0.51024, pedigree (1,1,2,1,1)
  (same comment as for Arsenic, ion)
- Chloride [water, ground-]: 5.0576e-5 kg; lognormal variance with pedigree 0.24344, pedigree (1,1,2,1,1)
  (same comment as for Arsenic, ion)
- Silicon [water, ground-]: 1.3695e-5 kg; lognormal variance with pedigree 0.25106, pedigree (1,1,2,1,1)
  (same comment as for Arsenic, ion)
- Chloride [water, ground-, long-term]: 5.2035e-5 kg; lognormal variance with pedigree 0.24206, pedigree (1,1,2,1,1)
  (same comment as for Ammonium, ion)
- Silicon [water, ground-, long-term]: 0.0002508 kg; lognormal variance with pedigree 1.6561, pedigree (1,1,2,1,1)
  (same comment as for Ammonium, ion)
- Cadmium, ion [water, ground-]: 4.8412e-8 kg; lognormal variance with pedigree 0.43288, pedigree (1,1,2,1,1)
  (same comment as for Arsenic, ion)
- Selenium [water, ground-]: 1.1993e-8 kg; lognormal variance with pedigree 0.47534, pedigree (1,1,2,1,1)
  (same comment as for Arsenic, ion)
- Calcium, ion [water, ground-]: 0.00015999 kg; lognormal variance with pedigree 0.17504, pedigree (1,1,2,1,1)
  (same comment as for Arsenic, ion)
- Scandium [water, ground-, long-term]: 1.32e-5 kg; lognormal variance with pedigree 0.30764, pedigree (1,1,2,1,1)
  (same comment as for Ammonium, ion)
- Cadmium, ion [water, ground-, long-term]: 3.9108e-6 kg; lognormal variance with pedigree 0.34769, pedigree (1,1,2,1,1)
  (same comment as for Ammonium, ion)
- Selenium [water, ground-, long-term]: 2.1379e-7 kg; lognormal variance with pedigree 0.90684, pedigree (1,1,2,1,1)
  (same comment as for Ammonium, ion)
- Bromine [water, ground-, long-term]: 2.0558e-7 kg; lognormal variance with pedigree 0.44063, pedigree (1,1,2,1,1)
  (same comment as for Ammonium, ion)
- Scandium [water, ground-]: 1.4306e-7 kg; lognormal variance with pedigree 0.39669, pedigree (1,1,2,1,1)
  (same comment as for Arsenic, ion)
- Bromine [water, ground-]: 8.839e-10 kg; lognormal variance with pedigree 0.56007, pedigree (1,1,2,1,1)
  (same comment as for Arsenic, ion)
- Potassium, ion [water, ground-, long-term]: 0.001117 kg; lognormal variance with pedigree 0.16749, pedigree (1,1,2,1,1)
  (same comment as for Ammonium, ion)
- Boron [water, ground-, long-term]: 1.2258e-6 kg; lognormal variance with pedigree 1.1614, pedigree (1,1,2,1,1)
  (same comment as for Ammonium, ion)
- Potassium, ion [water, ground-]: 2.6132e-6 kg; lognormal variance with pedigree 0.29675, pedigree (1,1,2,1,1)
  (same comment as for Arsenic, ion)
- BOD5, Biological Oxygen Demand [water, ground-, long-term]: 3.9345e-6 kg; lognormal variance with pedigree 0.17515, pedigree (1,1,2,1,1)
  (same comment as for Ammonium, ion)
- Phosphate [water, ground-, long-term]: 0.00047274 kg; lognormal variance with pedigree 0.21948, pedigree (1,1,2,1,1)
  (same comment as for Ammonium, ion)
- Boron [water, ground-]: 6.7742e-8 kg; lognormal variance with pedigree 0.41708, pedigree (1,1,2,1,1)
  (same comment as for Arsenic, ion)
- Phosphate [water, ground-]: 0.00011734 kg; lognormal variance with pedigree 0.2352, pedigree (1,1,2,1,1)
  (same comment as for Arsenic, ion)
- Beryllium [water, ground-, long-term]: 1.9626e-6 kg; lognormal variance with pedigree 0.37035, pedigree (1,1,2,1,1)
  (same comment as for Ammonium, ion)
- BOD5, Biological Oxygen Demand [water, ground-]: 6.5684e-9 kg; lognormal variance with pedigree 0.2874, pedigree (1,1,2,1,1)
  (same comment as for Arsenic, ion)
- Nickel, ion [water, ground-, long-term]: 1.6892e-5 kg; lognormal variance with pedigree 0.29947, pedigree (1,1,2,1,1)
  (same comment as for Ammonium, ion)
- Barium [water, ground-, long-term]: 0.00035656 kg; lognormal variance with pedigree 0.1985, pedigree (1,1,2,1,1)
  (same comment as for Ammonium, ion)
- Nickel, ion [water, ground-]: 1.8564e-7 kg; lognormal variance with pedigree 0.38811, pedigree (1,1,2,1,1)
  (same comment as for Arsenic, ion)
- Beryllium [water, ground-]: 1.8071e-8 kg; lognormal variance with pedigree 0.4642, pedigree (1,1,2,1,1)
  (same comment as for Arsenic, ion)
- Molybdenum [water, ground-]: 4.112e-7 kg; lognormal variance with pedigree 0.36805, pedigree (1,1,2,1,1)
  (same comment as for Arsenic, ion)
- Barium [water, ground-]: 7.4433e-9 kg; lognormal variance with pedigree 0.48921, pedigree (1,1,2,1,1)
  (same comment as for Arsenic, ion)
- Molybdenum [water, ground-, long-term]: 5.31e-6 kg; lognormal variance with pedigree 0.34557, pedigree (1,1,2,1,1)
  (same comment as for Ammonium, ion)
- Antimony [water, ground-, long-term]: 8.8698e-7 kg; lognormal variance with pedigree 1.1082, pedigree (1,1,2,1,1)
  (same comment as for Ammonium, ion)
- Mercury [water, ground-, long-term]: 4.013e-7 kg; lognormal variance with pedigree 0.42187, pedigree (1,1,2,1,1)
  (same comment as for Ammonium, ion)
- Nitrate [water, ground-, long-term]: 3.8755e-6 kg; lognormal variance with pedigree 0.34402, pedigree (1,1,2,1,1)
  (same comment as for Ammonium, ion)
- Manganese [water, ground-]: 3.3777e-6 kg; lognormal variance with pedigree 0.29524, pedigree (1,1,2,1,1)
  (same comment as for Arsenic, ion)
- Zinc, ion [water, ground-, long-term]: 0.00018727 kg; lognormal variance with pedigree 0.21934, pedigree (1,1,2,1,1)
  (same comment as for Ammonium, ion)
- Aluminium [water, ground-]: 2.7899e-5 kg; lognormal variance with pedigree 0.22274, pedigree (1,1,2,1,1)
  (same comment as for Arsenic, ion)
- Mercury [water, ground-]: 1.3212e-9 kg; lognormal variance with pedigree 0.54711, pedigree (1,1,2,1,1)
  (same comment as for Arsenic, ion)
- Zinc, ion [water, ground-]: 2.9215e-6 kg; lognormal variance with pedigree 0.29789, pedigree (1,1,2,1,1)
  (same comment as for Arsenic, ion)
- Antimony [water, ground-]: 4.9114e-8 kg; lognormal variance with pedigree 0.42794, pedigree (1,1,2,1,1)
  (same comment as for Arsenic, ion)
- Manganese [water, ground-, long-term]: 0.00013873 kg; lognormal variance with pedigree 0.22903, pedigree (1,1,2,1,1)
  (same comment as for Ammonium, ion)
- Tungsten [water, ground-, long-term]: 1.1733e-6 kg; lognormal variance with pedigree 0.58929, pedigree (1,1,2,1,1)
  (same comment as for Ammonium, ion)
- Aluminium [water, ground-, long-term]: 0.011927 kg; lognormal variance with pedigree 0.08674, pedigree (1,1,2,1,1)
  (same comment as for Ammonium, ion)
- Magnesium [water, ground-]: 8.7179e-5 kg; lognormal variance with pedigree 0.19468, pedigree (1,1,2,1,1)
  (same comment as for Arsenic, ion)
- Vanadium, ion [water, ground-, long-term]: 2.1666e-7 kg; lognormal variance with pedigree 2.8615, pedigree (1,1,2,1,1)
  (same comment as for Ammonium, ion)
- Arsenic, ion [water, ground-, long-term]: 1.0098e-6 kg; lognormal variance with pedigree 1.3118, pedigree (1,1,2,1,1)
  (same comment as for Ammonium, ion)
- Magnesium [water, ground-, long-term]: 0.0013217 kg; lognormal variance with pedigree 0.15354, pedigree (1,1,2,1,1)
  (same comment as for Ammonium, ion)
- Vanadium, ion [water, ground-]: 1.1841e-8 kg; lognormal variance with pedigree 0.47394, pedigree (1,1,2,1,1)
  (same comment as for Arsenic, ion)
- Nitrate [water, ground-]: 1.4466e-5 kg; lognormal variance with pedigree 0.34016, pedigree (1,1,2,1,1)
  (same comment as for Arsenic, ion)
- Iron, ion [water, ground-, long-term]: 0.010223 kg; lognormal variance with pedigree 0.091342, pedigree (1,1,2,1,1)
  (same comment as for Ammonium, ion)

## Sampling procedure
Tailings model based on observed leachate concentrations in literature. Extrapolated to 60'000 years heeding chemical characteristics. Initial waste composition from various literature sources. Climate information for national copper deposits (identified from the USGS Major Mineral Deposits database) from literature as follows: global mean annual temperature and precipitation data from Fick and Hijmans (2017); global mean annual evapotranspiration data from Fekete et al. (2002).

References:
Fekete, B. M., Vorosmarty, C. J. & Grabs, W. (2002). High-resolution fields of global runoff combining observed river discharge and simulated water balances. Global Biogeochemical Cycles, 16, 15-1 - 15-10.
Fick, S. E. & Hijmans, R. J. (2017). Worldclim 2: New 1-km spatial resolution climate surfaces for global land areas. International Journal of Climatology, 37, 4302-4315.

## Extrapolations
This dataset has been extrapolated from year 2019 to the year of the calculation (2021). The uncertainty has been adjusted accordingly.
