# protein pea production, organic

Dataset: EcoSpold 2, unit process
Geography: RoW
Time period: 1996-01-01 to 2021-12-31
Technology level: current
Classification: ISIC rev.4 ecoinvent: 0111:Growing of cereals (except rice), leguminous crops and oil seeds
Synonyms: Pisum sativum L.
Scenario: Business-as-Usual
System model: Allocation, cut-off by classification
Share of production covered: 88 %
Generated by: Thomas Nemecek
Published in: Nemecek, T. 2007
Database: ecoinvent
isCopyrightProtected: true
accessRestrictedTo: 1

## General comment
This dataset represents the production of 1 kg of protein peas (fresh matter). The yield is 3044 kg/ha at a moisture content at storage of 13%.
[This dataset was already contained in the ecoinvent database version 2. It was not individually updated during the transfer to ecoinvent version 3. Life Cycle Impact Assessment results may still have changed, as they are affected by changes in the supply chain, i.e. in other datasets. This dataset was generated following the ecoinvent quality guidelines for version 2. It may have been subject to central changes described in the ecoinvent version 3 change report (http://www.ecoinvent.org/database/ecoinvent-version-3/reports-of-changes/), and the results of the central updates were reviewed extensively. The changes added e.g. consistent water flows and other information throughout the database. The documentation of this dataset can be found in the ecoinvent reports of version 2, which are still available via the ecoinvent website. The change report linked above covers all central changes that were made during the conversion process.]

## Included activities start
This activity starts after the harvest of the previous crop. The input of seeds is considered. Farm manure as an organic fertiliser is only accounted for in terms of direct field emissions; all pre-processes are included in the animal production systems.

## Included activities end
The dataset includes all machine operations and corresponding machine infrastructure and sheds. Machine operations are: soil cultivation, sowing, fertilisation, weed control, combine-harvest, transport from field to regional processing centre (10 km) and drying of grains. Further, direct field emissions are included. The cultivation of green manure during winter before sowing peas is also included. This activity ends after drying of grains at the regional processing centre.

## Geography
Refers to an average production in the Swiss lowlands.

## Technology
Organic production

## Time period
The yield data have been collected for the years 1996-2003.

## Parameters
- fraction, irrigation water, to air: 0.586986 dimensionless; name fraction_IW_to_air; lognormal variance with pedigree 0.0409, pedigree (2,2,2,1,1)
- fraction, irrigation water to surface water: 0.2 dimensionless; name fraction_IW_to_surface_water; lognormal variance with pedigree 0.0886, pedigree (4,3,1,1,4)
- fraction, irrigation water, to ground water: 0.8 dimensionless; name fraction_IW_to_ground_water; lognormal variance with pedigree 0.0886, pedigree (4,3,1,1,4)

## Reference product
- protein pea, organic: 1 kg; name REF_PRODUCT; CPC 0124: Green leguminous vegetables; By-product classification allocatable product
  production volume 1.30564e7 kg
    70'000 ha estimated from Willer H, Yussefi M (Eds.) (2010). The World of Organic Agriculture. Statistics and Emerging Trends 2007. FiBL, IFOAM. 3044 kg/ha
  property energy content 16.0776 MJ; name REF_PRODUCT_energy_content
    See chapter 'Product Properties' in '01_crop production - yields & inputs CH & Europe_v1.0.pdf', section 'AGRICULTURAL PRODUCTION IN SWITZERLAND' - pdf-document on the dedicated talk page of ecoinvent (www.ecoinvent.org/documentation)
  property price 2.11 EUR2005; name REF_PRODUCT_price_EUR2005
    Calculated value based on data from United Nations Commodity Trade Statistics Database (comtrade.un.org). UN comtrade category: 210610 Protein concentrates and textures protein substances. Year 2005. Using exchange rate of 1EURO = 1.209 USD. Average of price of import into 5 main markets (EU, US, JP, IN and CN).
  property carbon content, non-fossil 0.469421; name REF_PRODUCT_C_content_non_fossil
    biogene carbon content on a dry matter basis
    Composition data obtained from Peas, split, mature seeds, raw, in (http://www.nal.usda.gov/fnic/foodcomp/search/). First, composition data were refered to 1 kg dry mass. Then, C-contents were calculated considering a C-content/dry mass of 46% in carbohydrates (including fibres), 53% in proteins and 75% in fats. All data from 'Evolutionary and Biochemical Aspects', A.D. Kay and T. Vrede (in Global Ecology, 2010, Elsevier B.V., S.E. Jørgensen Ed.).
  property dry mass 0.87 kg; name REF_PRODUCT_DM
  property carbon content 0.469421
    carbon content on a dry matter basis (reserved; not for manual entry)
  properties: water content 0.149425, water in wet mass 0.13 kg, wet mass 1 kg, carbon content, fossil 0, carbon allocation 0.408396 kg

## Inputs from technosphere
- liquid manure spreading, by vacuum tanker: 0.0087093 m3; lognormal variance with pedigree 0.0426, pedigree (2,1,5,5,1)
  See chapter 'Yields and Inputs of Arable Crop Production' in '01_crop production - yields & inputs CH & Europe_v1.0.pdf', section 'AGRICULTURAL PRODUCTION IN SWITZERLAND' - pdf-document on the dedicated talk page of ecoinvent (www.ecoinvent.org/documentation)
- irrigation: 0 m3; name water_irrigation_input; source Siebert, S. 2010; pedigree (1,1,1,1,1)
  Calculated based on literature values (Doll, 2010) and partially modelled at ETH (Pfister, S.).
  property water in wet mass 999.89 kg; name WWM
  property wet mass 1000 kg; name WM
  property carbon content, fossil 0; name C_content_fossil
  property water content 9089.91; name water_content
  property dry mass 0.11 kg; name DM
  property carbon content, non-fossil 0; name C_content_non_fossil
- green manure, organic, until January: 0.00032848 ha; lognormal variance with pedigree 0.0426, pedigree (2,1,5,5,1)
  (same comment as for liquid manure spreading, by vacuum tanker)
- tillage, harrowing, by spring tine harrow: 0.00065696 ha; lognormal variance with pedigree 0.0426, pedigree (2,1,5,5,1)
  (same comment as for liquid manure spreading, by vacuum tanker)
- solid manure loading and spreading, by hydraulic loader and spreader: 2.1775 kg; lognormal variance with pedigree 0.0426, pedigree (2,1,5,5,1)
  (same comment as for liquid manure spreading, by vacuum tanker)
- drying of bread grain, seed and legumes: 0.035714 l; lognormal variance with pedigree 0.0426, pedigree (2,1,5,5,1)
  (same comment as for liquid manure spreading, by vacuum tanker)
- sowing: 0.00032848 ha; lognormal variance with pedigree 0.0426, pedigree (2,1,5,5,1)
  (same comment as for liquid manure spreading, by vacuum tanker)
- tillage, ploughing: 0.00032848 ha; lognormal variance with pedigree 0.0426, pedigree (2,1,5,5,1)
  (same comment as for liquid manure spreading, by vacuum tanker)
- tillage, currying, by weeder: 0.00065696 ha; lognormal variance with pedigree 0.0426, pedigree (2,1,5,5,1)
  (same comment as for liquid manure spreading, by vacuum tanker)
- transport, tractor and trailer, agricultural: 0.010357 metric ton*km; lognormal variance with pedigree 0.0426, pedigree (2,1,5,5,1)
  (same comment as for liquid manure spreading, by vacuum tanker)
- combine harvesting: 0.00032848 ha; lognormal variance with pedigree 0.0426, pedigree (2,1,5,5,1)
  (same comment as for liquid manure spreading, by vacuum tanker)
- pea seed, organic, for sowing: 0.090332 kg; name SEED; lognormal variance with pedigree 0.0426, pedigree (2,1,5,5,1)
  (same comment as for liquid manure spreading, by vacuum tanker)
  property dry mass 0.87 kg; name SEED_DM
  property carbon content, non-fossil 0.469421; name SEED_C_content_non_fossil
  property energy content 16.0776 MJ; name SEED_energy_content
  properties: wet mass 1 kg, water content 0.149425
  note on carbon content, non-fossil: biogene carbon content on a dry matter basis Composition data obtained from Peas, split, mature seeds, raw, in (http://www.nal.usda.gov/fnic/foodcomp/search/). First, composition data were refered to 1 kg dry mass. Then, C-contents were calculated considering a C-content/dry mass of 46% in carbohydrates (including fibres), 53% in proteins and 75% in fats. All data from 'Evolutionary and Biochemical Aspects', A.D. Kay and T. Vrede (in Global Ecology, 2010, Elsevier B.V., S.E. Jørgensen Ed.).
  note on energy content: See chapter 'Product Properties' in '01_crop production - yields & inputs CH & Europe_v1.0.pdf', section 'AGRICULTURAL PRODUCTION IN SWITZERLAND' - pdf-document on the dedicated talk page of ecoinvent (www.ecoinvent.org/documentation)
- irrigation: 0.00110917, 4.70811e-5, 0.00991527, 0.000162485, 8.12492e-6, 0.000461354, 7.50938e-5, 0.019054, 0.000366263, 0.00012518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 m3 (16 entries); source Siebert, S. 2010; lognormal variance with pedigree 0.0447, pedigree (2,2,5,5,1)
  (same comment as for irrigation)
  properties: wet mass 1000 kg, water content 9089.91, dry mass 0.11 kg

## Inputs from nature
- Transformation, from annual crop, non-irrigated, extensive [natural resource, land]: 3.2848 m2; lognormal variance with pedigree 0.0526, pedigree (2,1,5,5,1)
  Modelled, see chapter 'Land use' in '01_crop production_direct field emissions and natural resources_v1.0.pdf' - pdf-document on the dedicated talk page of ecoinvent (www.ecoinvent.org/documentation)
- Occupation, annual crop, non-irrigated, extensive [natural resource, land]: 1.5876 m2*year; lognormal variance with pedigree 0.0426, pedigree (2,1,5,5,1)
  (same comment as for Transformation, from annual crop, non-irrigated, extensive)
- Transformation, to annual crop, non-irrigated, extensive [natural resource, land]: 3.2848 m2; lognormal variance with pedigree 0.0526, pedigree (2,1,5,5,1)
  (same comment as for Transformation, from annual crop, non-irrigated, extensive)
- Carbon dioxide, in air [natural resource, in air]: 1.36218 kg; = 44/12 * (REF_PRODUCT_C_content_non_fossil * REF_PRODUCT * REF_PRODUCT_DM - SEED_C_content_non_fossil * SEED * SEED_DM); lognormal variance with pedigree 0.0426, pedigree (2,1,5,5,1)
  Modelled,see chapter 'CO2 binding' in '01_crop production_direct field emissions and natural resources_v1.0.pdf' - pdf-document on the dedicated talk page of ecoinvent (www.ecoinvent.org/documentation)
- Energy, gross calorific value, in biomass [natural resource, biotic]: 14.625 MJ; lognormal variance with pedigree 0.0411891, pedigree (2,1,5,1,1)

## Emissions to nature
- Mercury [soil, agricultural]: 2.7752e-7 kg; lognormal variance with pedigree 0.0827, pedigree (2,2,5,5,1)
  Modelled, see chapter 'Emissions of heavy metals to agricultural soil, surface water and ground water' in '01_crop production_direct field emissions and natural resources_v1.0.pdf' - pdf-document on the dedicated talk page of ecoinvent (www.ecoinvent.org/documentation)
- Water [air, unspecified]: 0.0248176 m3; name water_to_air_unspecified; lognormal variance with pedigree 0.0827, pedigree (2,2,5,5,1)
  Calculated value based on literature values and expert opinion. See comments in the parametres' comment field.
  property fraction, origin: unspecified 0; name fraction_origin_unspecified
  property fraction, origin: fresh water 1; name fraction_origin_fresh_water
  property fraction, origin: salt water 0; name fraction_origin_salt_water
- Dinitrogen monoxide [air, non-urban air or from high stacks]: 0.000859 kg; name N2O; lognormal variance with pedigree 0.0727, pedigree (2,2,5,5,1)
  Modelled, see chapter 'Emissions of N2O to the air' in '01_crop production_direct field emissions and natural resources_v1.0.pdf' - pdf-document on the dedicated talk page of ecoinvent (www.ecoinvent.org/documentation)
- Water [water, surface water]: 0.00983971 m3; name water_to_water_surface; lognormal variance with pedigree 0.1306, pedigree (4,3,5,5,4)
  Calculated value. See the parameters and their comments to understand the calculation.
  property fraction, origin: salt water 0; name fraction_origin_salt_water_Wsw
  property fraction, origin: fresh water 1; name fraction_origin_fresh_water_Wsw
- Lead [soil, agricultural]: 2.4318e-6 kg; lognormal variance with pedigree 0.0827, pedigree (2,2,5,5,1)
  (same comment as for Mercury)
- Water [water, ground-]: 0.0393588 m3; name water_to_water_ground; lognormal variance with pedigree 0.1306, pedigree (4,3,5,5,4)
  Calculated value. See the parameters and their comments to understand the calculation.
  property fraction, origin: salt water 0; name fraction_origin_salt_water_Wgw
  property fraction, origin: unspecified 0; name fraction_origin_unspecified_Wgw
  property fraction, origin: fresh water 1; name fraction_origin_fresh_water_Wgw
- Ammonia [air, non-urban air or from high stacks]: 0.00547477 kg; lognormal variance with pedigree 0.0527, pedigree (2,2,5,5,1)
  Modelled with the 'AGRAMMON model' described in '01_crop production_direct field emissions and natural resources_v1.0.pdf' - pdf-document on the dedicated talk page of ecoinvent (www.ecoinvent.org/documentation)
- Chromium, ion [water, surface water]: 6.1537e-7 kg; lognormal variance with pedigree 0.1327, pedigree (2,2,5,5,1)
  (same comment as for Mercury)
- Copper [soil, agricultural]: 1.2145e-5 kg; lognormal variance with pedigree 0.0827, pedigree (2,2,5,5,1)
  (same comment as for Mercury)
- Nitrate [water, ground-]: 0.026555 kg; lognormal variance with pedigree 0.0827, pedigree (2,2,5,5,1)
  Modelled with the 'SALCA-NO3 model' described in '01_crop production_direct field emissions and natural resources_v1.0.pdf' - pdf-document on the dedicated talk page of ecoinvent (www.ecoinvent.org/documentation)
- Cadmium, ion [water, ground-]: 6.0461e-9 kg; lognormal variance with pedigree 0.1327, pedigree (2,2,5,5,1)
  (same comment as for Mercury)
- Mercury [water, ground-]: 3.5139e-9 kg; lognormal variance with pedigree 0.1327, pedigree (2,2,5,5,1)
  (same comment as for Mercury)
- Copper, ion [water, surface water]: 7.0343e-7 kg; lognormal variance with pedigree 0.1327, pedigree (2,2,5,5,1)
  (same comment as for Mercury)
- Zinc, ion [water, ground-]: 8.454e-6 kg; lognormal variance with pedigree 0.1327, pedigree (2,2,5,5,1)
  (same comment as for Mercury)
- Lead [water, surface water]: 2.1873e-7 kg; lognormal variance with pedigree 0.1327, pedigree (2,2,5,5,1)
  (same comment as for Mercury)
- Phosphate [water, ground-]: 3.6247e-5 kg; lognormal variance with pedigree 0.0827, pedigree (2,2,5,5,1)
  Modelled, see chapter 'Emissions of phosphorous to the water' in '01_crop production_direct field emissions and natural resources_v1.0.pdf' - pdf-document on the dedicated talk page of ecoinvent (www.ecoinvent.org/documentation)
- Phosphorus [water, surface water]: 3.4422e-5 kg; lognormal variance with pedigree 0.0827, pedigree (2,2,5,5,1)
  (same comment as for Phosphate)
- Chromium [soil, agricultural]: -2.8555e-6 kg
  (same comment as for Mercury)
- Zinc, ion [water, surface water]: 1.4017e-6 kg; lognormal variance with pedigree 0.1327, pedigree (2,2,5,5,1)
  (same comment as for Mercury)
- Phosphate [water, surface water]: 0.00011951 kg; lognormal variance with pedigree 0.0827, pedigree (2,2,5,5,1)
  (same comment as for Phosphate)
- Cadmium [soil, agricultural]: 9.622e-8 kg; lognormal variance with pedigree 0.0827, pedigree (2,2,5,5,1)
  (same comment as for Mercury)
- Cadmium, ion [water, surface water]: 3.2013e-9 kg; lognormal variance with pedigree 0.1327, pedigree (2,2,5,5,1)
  (same comment as for Mercury)
- Chromium, ion [water, ground-]: 4.9074e-6 kg; lognormal variance with pedigree 0.1327, pedigree (2,2,5,5,1)
  (same comment as for Mercury)
- Copper, ion [water, ground-]: 1.1421e-6 kg; lognormal variance with pedigree 0.1327, pedigree (2,2,5,5,1)
  (same comment as for Mercury)
- Lead [water, ground-]: 6.1013e-8 kg; lognormal variance with pedigree 0.1327, pedigree (2,2,5,5,1)
  (same comment as for Mercury)
- Zinc [soil, agricultural]: 4.6403e-5 kg; lognormal variance with pedigree 0.0827, pedigree (2,2,5,5,1)
  (same comment as for Mercury)
- Mercury [water, surface water]: 2.5041e-9 kg; lognormal variance with pedigree 0.1327, pedigree (2,2,5,5,1)
  (same comment as for Mercury)
- Nickel [soil, agricultural]: 2.2021e-6 kg; lognormal variance with pedigree 0.0827, pedigree (2,2,5,5,1)
  (same comment as for Mercury)
- Nickel, ion [water, surface water]: 5.3303e-7 kg; lognormal variance with pedigree 0.1327, pedigree (2,2,5,5,1)
  (same comment as for Mercury)
- Nitrogen oxides [air, non-urban air or from high stacks]: 0.00018039 kg; = 0.21 * N2O; lognormal variance with pedigree 0.0727, pedigree (2,2,5,5,1)
  Modelled, see chapter 'Emissions of NOx to the air' in '01_crop production_direct field emissions and natural resources_v1.0.pdf' - pdf-document on the dedicated talk page of ecoinvent (www.ecoinvent.org/documentation)

## Sampling procedure
Data were compiled from statistics, pilot network, fertilising recommendations, documents from extension services, information provided by retailers and expert knowledge. The production data were verified and adjusted by a group of experts.

## Extrapolations
This dataset has been copied from an original dataset covering the geography CH.

## Review by Bo Weidema 2012-01-19
In general, it is difficult or impossible to check the validity of the exchanges due to the limited documentation of each value, relying on an external model. However, since the dataset is an improvement compared to the previously existing dataset in the ecoinvent database, it is accepted. It is recommended to improve the transparency in the future, by integrating the model into the dataset and report the emissions from fertilisers separate from those of the plant production.

## Review by Hans-Jörg Althaus 2009-01-22
passed
none
