# building construction, multi-storey

Dataset: EcoSpold 2, unit process
Geography: RER
Time period: 1995-01-01 to 2021-12-31
Technology level: current
Classification: ISIC rev.4 ecoinvent: 4100:Construction of buildings
Classification: EcoSpold01Categories: construction processes/buildings
Synonyms: multi-story; Haus; house
Tags: ConvertedDataset
Scenario: Business-as-Usual
System model: Allocation, cut-off by classification
Generated by: Daniel Kellenberger (obsolete)
Published in: Kellenberger D. 2007
Database: ecoinvent
isCopyrightProtected: true
accessRestrictedTo: 1

## General comment
The combination of two concrete buildings, one built in 1927 and the other in 1972, makes this module a sort of average of existing multi-storey buildings. The life of the building is assumed to be 80 years. This module should not be used if its relative importance would be high in a certain environmental inventory.
[This dataset was already contained in the ecoinvent database version 2. It was not individually updated during the transfer to ecoinvent version 3. Life Cycle Impact Assessment results may still have changed, as they are affected by changes in the supply chain, i.e. in other datasets. This dataset was generated following the ecoinvent quality guidelines for version 2. It may have been subject to central changes described in the ecoinvent version 3 change report (http://www.ecoinvent.org/database/ecoinvent-version-3/reports-of-changes/), and the results of the central updates were reviewed extensively. The changes added e.g. consistent water flows and other information throughout the database. The documentation of this dataset can be found in the ecoinvent reports of version 2, which are still available via the ecoinvent website. The change report linked above covers all central changes that were made during the conversion process.]

## Included activities end
Includes the most important materials used and their disposal, the transportation of the parts to the building site and to the final disposal at the end of life. Also included is the requirement of electricity for construction, maintenance and demolition. Operation is not included.

## Geography
Certain elementary flows or intermediate product flows are RER, UCPTE or GLO modules

## Technology
The two concrete multi-storey buildings used to make this module were built in 1927 and 1972, but they can be assumed to reflect a sort of average of existing buildings as they are weighted.

## Reference product
- building, multi-storey: 1 m3; CPC 531: Buildings; By-product classification allocatable product
  EcoSpold01Location=RER
  production volume 1.32237 m3
    This is a placeholder value that does not reflect real-world production volumes. This dataset does not currently require a real-world production volume to work in the database framework, and no actual data were collected yet. This has no negative effect on the results of the ecoinvent database. The placeholder value of this activity was scaled according to the nominal GDP of 2005 (source: United Nations, http://data.un.org/Glossary.aspx?q=GDP+%28current+US%24%29, accessed 20130726) to reflect an appropriate share of the global production volume, which is also a placeholder value.
  property price 108.613 EUR2005
    Calculated based on inputs: The price of the product has been calculated as a sum of the values of the material and energy inputs for this product. This value is therefore a rough estimation. It may underestimate the real price since there are additional expenses when producing any product. These expences can include for example labour costs, treatment of waste materials and profit for the producer. Please consider carefully whether this level of data quality is acceptable for your application.

## Inputs from technosphere
- waste mineral wool: 0 kg; pedigree (1,1,1,1,1)
  EcoSpold01Location=CH
  Uncertainty: ;
  production volume 0 kg
    Calculated from the production volume of building, multi-storey in proportion to the respective output amounts.
  properties: dry mass 1 kg, wet mass 1 kg
- clay brick: 178 kg; lognormal variance with pedigree 0.1387, pedigree (2,5,5,3,4)
  EcoSpold01Location=RER
  Uncertainty: ;
  properties: dry mass 1 kg, wet mass 1 kg
- packaging film, low density polyethylene: 0.925 kg; lognormal variance with pedigree 0.1387, pedigree (2,5,5,3,4)
  EcoSpold01Location=RER
  Uncertainty: ;
  properties: dry mass 1 kg, carbon content, fossil 0.857143, wet mass 1 kg, heating value, net 42.47 MJ
  note on carbon content, fossil: Polyethylene is formed out of a huge amount of ethylene monomers (C2H4) (ecoinvent v2.2 report 11_II). MW=28 g/mol
- polyvinylchloride, suspension polymerised: 0.806914 kg; lognormal variance with pedigree 0.1387, pedigree (2,5,5,3,4)
  EcoSpold01Location=RER
  Uncertainty: ;
  properties: heating value, net 21.5 MJ, dry mass 1 kg, carbon content, fossil 0.387097, wet mass 1 kg
  note on carbon content, fossil: Monomer is vynyl chloride, C2H3Cl (ecoinvent v2.2 report 11_II). MW=62 g/mol
- copper, cathode: 8.48 kg; lognormal variance with pedigree 0.1387, pedigree (2,5,5,3,4)
  EcoSpold01Location=RER
  Uncertainty: ;
  properties: dry mass 1 kg, wet mass 1 kg
- cement mortar: 61.7 kg; lognormal variance with pedigree 0.1387, pedigree (2,5,5,3,4)
  EcoSpold01Location=CH
  Uncertainty: ;
  properties: dry mass 1 kg, wet mass 1 kg
- waste bulk iron, excluding reinforcement: 0 kg; pedigree (1,1,1,1,1)
  EcoSpold01Location=CH
  Uncertainty: ;
  production volume 0 kg
    (same comment as for waste mineral wool)
  properties: wet mass 1 kg, dry mass 1 kg
- waste wood, untreated: -30.8 kg; lognormal variance with pedigree 0.1387, pedigree (2,5,5,3,4)
  EcoSpold01Location=CH
  Uncertainty: ;
  production volume 30.8 kg
    (same comment as for waste mineral wool)
  properties: water content 0.25, wet mass 1 kg, dry mass 0.8 kg, carbon content, non-fossil 0.48632, heating value, net 13.99 MJ
  note on carbon content, non-fossil: Tab A.4, ecoinvent v2.2 report 13_I. C content has been referred to 1 kg DM,
  note on heating value, net: Value taken from the general comment of the treatment dataset.
- extrusion, plastic film: 0.925 kg; lognormal variance with pedigree 0.1387, pedigree (2,5,5,3,4)
  activityLink introduced to establish a direct link to the corresponding regional supply of this product
  EcoSpold01Location=RER
  Uncertainty: ;
- aluminium, wrought alloy: 8.48 kg; lognormal variance with pedigree 0.1387, pedigree (2,5,5,3,4)
  EcoSpold01Location=RER
  Uncertainty: ;
  properties: dry mass 1 kg, wet mass 1 kg
- diesel, burned in building machine: 15 MJ; lognormal variance with pedigree 0.1387, pedigree (2,5,5,3,4)
  EcoSpold01Location=GLO
  Uncertainty: ;
  properties: heating value, net 1 MJ
- concrete, normal: 0.0927 m3; lognormal variance with pedigree 0.1387, pedigree (2,5,5,3,4)
  EcoSpold01Location=CH
  Uncertainty: ;
  properties: water content 0.086758, dry mass 2190 kg, wet mass 2380 kg
- waste sealing sheet, polyethylene: -0.925 kg; lognormal variance with pedigree 0.1387, pedigree (2,5,5,3,4)
  EcoSpold01Location=CH
  Uncertainty: ;
  production volume 0.925 kg
    (same comment as for waste mineral wool)
  properties: water content 0.0416667, dry mass 0.96 kg, heating value, net 42.47 MJ, wet mass 1 kg, carbon content, fossil 0.851042
  note on carbon content, fossil: C content in 1 kg DM was calculated using data in Tab A.5, ecoinvent v2.2 report 13_I
- reinforcing steel: 7.17 kg; lognormal variance with pedigree 0.1387, pedigree (2,5,5,3,4)
  EcoSpold01Location=RER
  Uncertainty: ;
  properties: dry mass 1 kg, wet mass 1 kg, carbon content, fossil 0.004
- waste reinforced concrete: 0 kg; pedigree (1,1,1,1,1)
  EcoSpold01Location=CH
  Uncertainty: ;
  production volume 0 kg
    (same comment as for waste mineral wool)
  properties: water content 0.00585407, wet mass 1 kg, dry mass 0.99418 kg
- waste glass sheet: 0 kg; pedigree (1,1,1,1,1)
  EcoSpold01Location=CH
  Uncertainty: ;
  production volume 0 kg
    (same comment as for waste mineral wool)
  properties: wet mass 1 kg, dry mass 1 kg
- polyvinylchloride, emulsion polymerised: 0.118085 kg; lognormal variance with pedigree 0.1387, pedigree (2,5,5,3,4)
  EcoSpold01Location=RER
  Uncertainty: ;
  properties: carbon content, fossil 0.387097, heating value, net 21.5 MJ, dry mass 1 kg, wet mass 1 kg
- waste brick: 0 kg; pedigree (1,1,1,1,1)
  EcoSpold01Location=CH
  Uncertainty: ;
  production volume 0 kg
    (same comment as for waste mineral wool)
  properties: dry mass 1 kg, wet mass 1 kg
- stone wool, packed: 1.3 kg; lognormal variance with pedigree 0.1387, pedigree (2,5,5,3,4)
  EcoSpold01Location=CH
  Uncertainty: ;
  properties: wet mass 1 kg, dry mass 1 kg, carbon content, fossil 0.015401
  note on carbon content, fossil: The chemical composition of the glass fibres used in the rock wool production is similar to the composition of naturally cooled volcano basalt and has a composition listed in Tab. 3.1 and 3.2 in ecoinvent v2.2 report 16, part XIV. Rock wool contains: a minimum of 96% mineral fibres,between 0.5 and 3.0 weight percent of phenolic resin depending on the specific product characteristics, and about 0.2 percent mineral oil (ecoinvent v2.2 report 16, part XIV). An average composition of 1.8% phenolic resin, 0.2% mineral oil, and 98% mineral fibres has been assumed and used to calculate C content of the rock wool
- flat glass, coated: 3.08 kg; lognormal variance with pedigree 0.1387, pedigree (2,5,5,3,4)
  EcoSpold01Location=RER
  Uncertainty: ;
  properties: wet mass 1 kg, dry mass 1 kg
- sawnwood, softwood, dried (u=10%), planed: 0.0617 m3; lognormal variance with pedigree 0.1387, pedigree (2,5,5,3,4)
  EcoSpold01Location=RER
  Uncertainty: ;
  properties: carbon content, non-fossil 0.494, water content 0.1, dry mass 450 kg, wet mass 495 kg, heating value, net 6625.26 MJ
  note on carbon content, non-fossil: C content of dry mass is 0.494 kgC/kg dry wood (ecoinvent v2.2 report 9)
- waste polyvinylchloride product: 0 kg; pedigree (1,1,1,1,1)
  EcoSpold01Location=CH
  Uncertainty: ;
  production volume 0 kg
    (same comment as for waste mineral wool)
  properties: carbon content, fossil 0.440882, water content 0.00200401, wet mass 1 kg, dry mass 0.998 kg, heating value, net 21.51 MJ
- electricity, medium voltage: 0.3 kWh; lognormal variance with pedigree 0.1387, pedigree (2,5,5,3,4)
  EcoSpold01Location=UCTE
  Uncertainty: ;
- waste cement in concrete and mortar: 0 kg; pedigree (1,1,1,1,1)
  EcoSpold01Location=CH
  Uncertainty: ;
  production volume 0 kg
    (same comment as for waste mineral wool)
  properties: water content 0.00502513, wet mass 1 kg, dry mass 0.995 kg
- waste mineral wool: -1.28533, -0.0146666 kg (2 entries); lognormal variance with pedigree 0.1387, pedigree (2,5,5,3,4)
  EcoSpold01Location=CH
  Uncertainty: ;
  production volume 1.3 kg
- waste bulk iron, excluding reinforcement: -16.5669, -0.43305 kg (2 entries); lognormal variance with pedigree 0.1387, pedigree (2,5,5,3,4)
  EcoSpold01Location=CH
  Uncertainty: ;
  production volume 17 kg
- waste reinforced concrete: -236.494, -2.50583 kg (2 entries); lognormal variance with pedigree 0.1387, pedigree (2,5,5,3,4)
  EcoSpold01Location=CH
  Uncertainty: ;
  production volume 239 kg
- waste glass sheet: -3.00353, -0.0764699 kg (2 entries); lognormal variance with pedigree 0.1387, pedigree (2,5,5,3,4)
  EcoSpold01Location=CH
  Uncertainty: ;
  production volume 3.08 kg
- waste brick: -154.703, -23.2967 kg (2 entries); lognormal variance with pedigree 0.1387, pedigree (2,5,5,3,4)
  EcoSpold01Location=CH
  Uncertainty: ;
  production volume 178 kg
- waste polyvinylchloride product: -0.89777, -0.0272304 kg (2 entries); lognormal variance with pedigree 0.1387, pedigree (2,5,5,3,4)
  EcoSpold01Location=CH
  Uncertainty: ;
  production volume 0.925 kg
- waste cement in concrete and mortar: -59.9025, -1.79752 kg (2 entries); lognormal variance with pedigree 0.1387, pedigree (2,5,5,3,4)
  EcoSpold01Location=CH
  Uncertainty: ;
  production volume 61.7 kg

## Sampling procedure
most data obtained by personal communication

## Extrapolations
This dataset has been extrapolated from year 2001 to the year of the calculation (2021). The uncertainty has been adjusted accordingly.

## Review by Roberto Dones 2009-01-22
passed
