# sheet rolling, chromium steel

Dataset: EcoSpold 2, unit process
Geography: RoW
Time period: 1997-01-01 to 2021-12-31
Technology level: current
Classification: ISIC rev.4 ecoinvent: 2410:Manufacture of basic iron and steel
Classification: EcoSpold01Categories: metals/processing
Tags: ConvertedDataset
Scenario: Business-as-Usual
System model: Allocation, cut-off by classification
Share of production covered: 0 %
Generated by: Silvio Blaser
Published in: Werner F. 2007
Database: ecoinvent
isCopyrightProtected: true
accessRestrictedTo: 1

## General comment
This process is to be used only for high alloyed (chromium) steel. For many applications, the products of hot rolling are unsatisfactory, e.g., with respect to cross section, surface quality, dimensional accuracy, and general finish, so that cold rolling is necessary. Cold rolled products are mainly strips and sheets with high quality surface finish and precise metallurgical properties for use in high specification products.
[This dataset was already contained in the ecoinvent database version 2. It was not individually updated during the transfer to ecoinvent version 3. Life Cycle Impact Assessment results may still have changed, as they are affected by changes in the supply chain, i.e. in other datasets. This dataset was generated following the ecoinvent quality guidelines for version 2. It may have been subject to central changes described in the ecoinvent version 3 change report (http://www.ecoinvent.org/database/ecoinvent-version-3/reports-of-changes/), and the results of the central updates were reviewed extensively. The changes added e.g. consistent water flows and other information throughout the database. The documentation of this dataset can be found in the ecoinvent reports of version 2, which are still available via the ecoinvent website. The change report linked above covers all central changes that were made during the conversion process.]

## Included activities end
Includes the process steps annealing (I) and pickling (I), cold rolling, annealing (II) and pickling (II), tempering, inspecting and finishing, packing coils or sheets, roll maintenance. Does not include the material beeing rolled.

## Geography
Data-set is representative for European Union

## Technology
Average technique for EU, for high-alloyed or chromium steel.

## Parameters
- fraction, cooling water, once-through system, to air: 0.004 dimensionless; name fraction_CW_OT_to_air; lognormal variance with pedigree 0.0413, pedigree (2,3,1,3,1)
  Calculated based on literature value (Scown, C.D., 2011, Water Footprint of U.S. Transportation Fuels and supplying information of the article) (Vionnet, S., Quantis Water Database - Technical Report, 2012).
- fraction, cooling water, recirculating system, to air: 0.771 dimensionless; name fraction_CW_R_to_air; lognormal variance with pedigree 0.0413, pedigree (2,3,1,3,1)
  (same comment as for fraction, cooling water, once-through system, to air)
- fraction, water, deionised, to air: 0.2 dimensionless; name fraction_WDI_to_air; = fraction_PW_to_air; lognormal variance with pedigree 0.092025, pedigree (4,4,3,2,4)
  Calculated value. See comment in the other parametres present in this dataset. Deionised water is considered to be always used as process water, thus process water fractions to air are applied to all deionised water input flows to calculate the amount of water consumed in the processes.
- fraction, process water, to air: 0.2 dimensionless; name fraction_PW_to_air; lognormal variance with pedigree 0.092025, pedigree (4,4,3,2,4)
  Literature value (Statistics Canada, 2007 & Shaffer, K.H., 2008, Consumptive water use in the Great Lakes Basin, USGS) (Vionnet, S., Quantis Water Database - Technical Report, 2012).
- fraction, cooling water, to air: 0.3875 dimensionless; name fraction_CW_to_air; = (0.5*fraction_CW_OT_to_air)+(0.5*fraction_CW_R_to_air); lognormal variance with pedigree 0.092025, pedigree (4,4,3,2,4)
  Calculated value based on literature value (see comments of the other parametres present in this dataset) and expert opinion. In the case when no industry/literature data are available about the type of cooling or directly fraction, cooling water, to air specific for the process a default assumption is applied. It is assumed that the once-through cooling system is used in 50% of all cases and recirculating system is used in another 50% of all cases.
- fraction, cooling water, cooling pond system, to air: 0.032 dimensionless; name fraction_CW_CP_to_air; lognormal variance with pedigree 0.0413, pedigree (2,3,1,3,1)
  (same comment as for fraction, cooling water, once-through system, to air)

## Reference product
- sheet rolling, chromium steel: 1 kg; CPC 88601: Basic iron and steel manufacturing services; By-product classification allocatable product
  EcoSpold01Location=RER
  production volume 2.67763 kg
    This is a placeholder value that does not reflect real-world production volumes. This dataset does not currently require a real-world production volume to work in the database framework, and no actual data were collected yet. This has no negative effect on the results of the ecoinvent database.
  property price 0.108346 EUR2005
    Calculated based on inputs: The price of the product has been calculated as a sum of the values of the material and energy inputs for this product. This value is therefore a rough estimation. It may underestimate the real price since there are additional expenses when producing any product. These expences can include for example labour costs, treatment of waste materials and profit for the producer. Please consider carefully whether this level of data quality is acceptable for your application.

## Inputs from technosphere
- heat, district or industrial, natural gas: 0 MJ; pedigree (1,1,1,1,1)
  calculated from max value assuming lognormal distribution
  EcoSpold01Location=RER
  properties: heating value, net 1 MJ
- lubricating oil: 0.0074 kg; lognormal variance with pedigree 0.162, pedigree (1,1,5,5,1)
  EcoSpold01Location=RER
  calculated from max value assuming lognormal distribution
  properties: heating value, net 40.2 MJ, wet mass 1 kg, dry mass 1 kg, carbon content, fossil 0.75
  note on heating value, net: Literature value, Source: IPCC 2006, 2006 IPCC Guidelines for National Greenhouse Gas Inventories, Prepared by the National Greenhouse Gas Inventories Programme, Eggleston H.S., Buendia L., Miwa K., Ngara T. and Tanabe K. (eds). Published: IGES, Japan
  note on carbon content, fossil: Lubricating oil is produced from diesel. C-content/dry mass of fats and oils considered 75%, from: ecoinvent v2.2 report, n 15a, pg 40
- electricity, medium voltage: 0 kWh; pedigree (1,1,1,1,1)
  EcoSpold01Location=UCTE
  calculated from max value assuming lognormal distribution
- water, deionised: 0.171 kg; name water_deionised_input; lognormal variance with pedigree 0.862, pedigree (1,1,5,5,1)
  EcoSpold01Location=CH
  calculated from max value assuming lognormal distribution
  properties: wet mass 1 kg
- steel in car shredder residue: -0.0079 kg; lognormal variance with pedigree 0.162, pedigree (1,1,5,5,1)
  EcoSpold01Location=CH
  calculated from max value assuming lognormal distribution
  production volume 0.0237 kg
    Calculated from the production volume of sheet rolling, chromium steel in proportion to the respective output amounts.
  properties: dry mass 1 kg, wet mass 1 kg
- steel, chromium steel 18/8, hot rolled: 0.0516 kg; lognormal variance with pedigree 0.068, pedigree (4,5,5,5,1)
  EcoSpold01Location=RER
  properties: carbon content, fossil 0.0008, wet mass 1 kg, dry mass 1 kg
  note on carbon content, fossil: Stainless steel model is the grade 304 steel (18/8 stainless, 18% chromium 8% nickel; max. 0.08% C)
- municipal solid waste: 0 kg; pedigree (1,1,1,1,1)
  EcoSpold01Location=CH
  production volume 0 kg
    (same comment as for steel in car shredder residue)
  properties: heating value, net 11.74 MJ, carbon content, fossil 0.171549, water content 0.297017, dry mass 0.771 kg, carbon content, non-fossil 0.261655, wet mass 1 kg
  note on heating value, net: Value taken from the general comment of the treatment dataset.
  note on carbon content, fossil: MSW composition in tab 4.1, ecoinvent v2.2 report 13_I. C content referred to 1 kg DM
- heat, district or industrial, other than natural gas: 0 MJ; pedigree (1,1,1,1,1)
  properties: heating value, net 1 MJ
- silicon carbide: 0.00217 kg; lognormal variance with pedigree 0.072, pedigree (1,1,5,5,1)
  EcoSpold01Location=RER
  calculated from max value assuming lognormal distribution
  properties: dry mass 1 kg, wet mass 1 kg, carbon content, fossil 0.3, heating value, net 9.08 MJ
- wood preservative, inorganic salt, containing Cr: 0.00015 kg; lognormal variance with pedigree 0.042, pedigree (1,1,5,5,1)
  calculated from max value assuming lognormal distribution
  EcoSpold01Location=RER
  properties: wet mass 1 kg, dry mass 1 kg
- packaging film, low density polyethylene: 8.49e-5 kg; lognormal variance with pedigree 0.042, pedigree (1,1,5,5,1)
  EcoSpold01Location=RER
  calculated from max value assuming lognormal distribution
  properties: heating value, net 42.47 MJ, carbon content, fossil 0.857143, dry mass 1 kg, wet mass 1 kg
  note on carbon content, fossil: Polyethylene is formed out of a huge amount of ethylene monomers (C2H4) (ecoinvent v2.2 report 11_II). MW=28 g/mol
- chemical, inorganic: 1.38e-8 kg; lognormal variance with pedigree 0.162, pedigree (1,1,5,5,1)
  EcoSpold01Location=GLO
  calculated from max value assuming lognormal distribution
  properties: wet mass 1 kg, dry mass 1 kg, carbon content, fossil 0.003
  note on carbon content, fossil: This dataset is an unweighted average of 20 inorganic substances (listed in Tab 88.1, ecoinvent v2.2 report 8, part II), being part of the top100 chemicals included in this database. The C-content has also been calculated as an unweighted average of the C content of the substances composing this dataset.
- hydrogen fluoride: 0.00433 kg; lognormal variance with pedigree 0.112, pedigree (1,1,5,5,1)
  calculated from max value assuming lognormal distribution
  EcoSpold01Location=GLO
  properties: heating value, net 6.06 MJ, dry mass 1 kg, wet mass 1 kg
- steel, low-alloyed: 0.000236 kg; lognormal variance with pedigree 0.042, pedigree (1,1,5,5,1)
  calculated from max value assuming lognormal distribution
  EcoSpold01Location=RER
  properties: carbon content, fossil 0.005, wet mass 1 kg, dry mass 1 kg
  note on carbon content, fossil: Low alloyed steel composition given in Tab. 3.2 ecoinvent v2.2 report 10_partII. Steel assumed to have a C content of 0.5%
- waste mineral oil: -0.000991 kg; lognormal variance with pedigree 0.062, pedigree (1,1,5,5,1)
  calculated from max value assuming lognormal distribution
  EcoSpold01Location=CH
  production volume 0.002973 kg
    (same comment as for steel in car shredder residue)
  properties: heating value, net 34.7 MJ, carbon content, fossil 0.864444, water content 0.111111, wet mass 1 kg, dry mass 0.9 kg
  note on carbon content, fossil: Tab A.6, ecoinvent v2.2 report 13_I. C content has been calculated after data in the tables, and then referred to 1 kg DM
- sawnwood, softwood, raw, dried (u=20%): 1.85e-6 m3; lognormal variance with pedigree 0.042, pedigree (1,1,5,5,1)
  EcoSpold01Location=RER
  calculated from max value assuming lognormal distribution
  properties: wet mass 540 kg, dry mass 450 kg, heating value, net 6514.84 MJ, carbon content, non-fossil 0.494, water content 0.2
  note on carbon content, non-fossil: C content of dry mass is 0.494 kgC/kg dry wood (ecoinvent v2.2 report 9)
- lime, hydrated, loose weight: 4.74e-5 kg; lognormal variance with pedigree 0.052, pedigree (1,1,5,5,1)
  EcoSpold01Location=CH
  calculated from max value assuming lognormal distribution
  properties: water content 0.00300903, dry mass 0.997 kg, wet mass 1 kg
- electric arc furnace dust: 0 kg; pedigree (1,1,1,1,1)
  EcoSpold01Location=CH
  calculated from max value assuming lognormal distribution
  production volume 0 kg
    (same comment as for steel in car shredder residue)
  properties: dry mass 0.846 kg, wet mass 1 kg, water content 0.182033, carbon content, fossil 0.01339
- kraft paper: 2.84e-5 kg; lognormal variance with pedigree 0.342, pedigree (1,1,5,5,1)
  EcoSpold01Location=RER
  properties: wet mass 1 kg, heating value, net 14.11 MJ, carbon content, fossil 0.0020219, water content 0.0582011, dry mass 0.945 kg, carbon content, non-fossil 0.41662
  note on carbon content, fossil: Fossil C content was calculated after fossil C contents of chemicals used in the production of the paper (in Tab 9.4 ecoinvent v2.2 report 11_III, part 9).
  note on carbon content, non-fossil: Biogenic C content was calculated after biogenic C contents of chemicals used in the production of the paper (in Tab 9.4 ecoinvent v2.2 report 11_III, part 9). The cellulose content in 1 kg of paper (on a wet mas basis) was estimated as (1-chemical content), C content of cellulose was considered 0.44 kgC/kg dry mass (ecoinvent v2.2 report, n 15a, pg 40)
- sheet rolling, steel: 0.000236 kg; lognormal variance with pedigree 0.042, pedigree (1,1,5,5,1)
  calculated from max value assuming lognormal distribution
  EcoSpold01Location=RER
- hydrogen peroxide, without water, in 50% solution state: 0.00383 kg; lognormal variance with pedigree 0.132, pedigree (1,1,5,5,1)
  EcoSpold01Location=RER
  calculated from max value assuming lognormal distribution
  properties: wet mass 1 kg, dry mass 1 kg, heating value, net 7.13 MJ
- sludge from steel rolling: -0.0176 kg; lognormal variance with pedigree 0.1006, pedigree (2,5,5,5,1)
  EcoSpold01Location=CH
  production volume 0.0528 kg
    (same comment as for steel in car shredder residue)
  properties: dry mass 0.8 kg, wet mass 1 kg, carbon content, fossil 0.0123943, water content 0.25
- rolling mill: 1.62e-9 unit; lognormal variance with pedigree 0.346, pedigree (3,4,5,5,1)
  EcoSpold01Location=RER
- nitric acid, without water, in 50% solution state: 0 kg; pedigree (1,1,1,1,1)
  calculated from max value assuming lognormal distribution
  EcoSpold01Location=RER
  properties: dry mass 1 kg, wet mass 1 kg
- heat, district or industrial, natural gas: 0.000552114, 0.0358234 MJ (2 entries); lognormal variance with pedigree 0.072, pedigree (1,1,5,5,1)
  calculated from max value assuming lognormal distribution
  EcoSpold01Location=RER
- electricity, medium voltage: 0.00573993, 0.00110067, 0.018478, 0.268746, 0.0378799, 0.123418 kWh (6 entries); lognormal variance with pedigree 0.082, pedigree (1,1,5,5,1)
  EcoSpold01Location=UCTE
  calculated from max value assuming lognormal distribution
- municipal solid waste: -5.05042e-7, -1.27258e-7, -1.81859e-7, -0.000357186 kg (4 entries); lognormal variance with pedigree 0.0606, pedigree (2,5,5,5,1)
  EcoSpold01Location=CH
  production volume 0.001074 kg
- heat, district or industrial, other than natural gas: 7.72044e-6, 0.0190389 MJ (2 entries); lognormal variance with pedigree 0.042, pedigree (1,1,5,5,1)
- electric arc furnace dust: -0.000138917, -8.28863e-8 kg (2 entries); lognormal variance with pedigree 0.062, pedigree (1,1,5,5,1)
  EcoSpold01Location=CH
  calculated from max value assuming lognormal distribution
  production volume 0.000417 kg
- nitric acid, without water, in 50% solution state: 0.00147763, 0.000360559, 0.000896643, 0.0027376, 0.000429624, 0.000242663, 0.000359224, 0.00116606 kg (8 entries); lognormal variance with pedigree 0.132, pedigree (1,1,5,5,1)
  calculated from max value assuming lognormal distribution
  EcoSpold01Location=RER

## Inputs from nature
- Water, cooling, unspecified natural origin [natural resource, in water]: 0.0135834 m3; name water_cooling_UNO_input; source Byers, W. 2003; lognormal variance with pedigree 0.0612, pedigree (2,3,5,5,3)
  Calculated based on literature, (Vionnet, S., Quantis Water Database - Technical Report, 2012). Assumed to have same or very similar water use as "sheet rolling, steel". Water is used for chromium conditioning, which basically means it is directly sprayed on the hot metal to cool it down. In this case the water comes into contact with the product, i.e. It is treated as process water, not cooling water. It includes the processes: hot rolling, acid pockling, cold rolling and finishing. The process ends when finished, rolled metal sheets leaves the plant.

## Emissions to nature
- Aluminium [water, unspecified]: 1.24e-6 kg; lognormal variance with pedigree 0.1506, pedigree (2,5,5,5,1)
- Nickel, ion [water, unspecified]: 7.42e-7 kg; lognormal variance with pedigree 0.1506, pedigree (2,5,5,5,1)
- BOD5, Biological Oxygen Demand [water, unspecified]: 1.65e-6 kg; lognormal variance with pedigree 0.25, pedigree (5,5,5,5,5)
- Manganese [water, unspecified]: 5.35e-7 kg; lognormal variance with pedigree 0.1506, pedigree (2,5,5,5,1)
- Water [air, unspecified]: 0.00529778 m3; name water_to_air_unspecified; = (water_deionised_input/1000)*fraction_WDI_to_air+water_cooling_UNO_input*fraction_CW_to_air; lognormal variance with pedigree 0.130025, pedigree (4,4,5,2,4)
  Calculated value based on literature values and expert opinion. See comments in the parametres' comment field.
  property fraction, origin: salt water 0; name fraction_origin_salt_water
  property fraction, origin: fresh water 0.00645553; name fraction_origin_fresh_water
  property fraction, origin: unspecified 0.993544; name fraction_origin_unspecified
- Chromium VI [water, unspecified]: 2.63e-8 kg; lognormal variance with pedigree 0.1506, pedigree (2,5,5,5,1)
- Water [water, unspecified]: 0.00845665 m3; name water_to_water_unspecified; = (water_deionised_input/1000)*(1-fraction_WDI_to_air)+water_cooling_UNO_input*(1-fraction_CW_to_air); lognormal variance with pedigree 0.130025, pedigree (4,4,5,2,4)
  (same comment as for Water)
  property dry mass 0 kg; name DM
  property carbon content, fossil 0; name C_content_fossil
  property water in wet mass 1000 kg; name WWM
  property carbon content, non-fossil 0; name C_content_non_fossil
  property fraction, origin: salt water 0; name fraction_origin_salt_water_Ww
  property fraction, origin: fresh water 0.0161766; name fraction_origin_fresh_water_Ww
  property fraction, origin: unspecified 0.983823; name fraction_origin_unspecified_Ww
  property wet mass 1000 kg; name WM
- Hydrocarbons, unspecified [water, unspecified]: 1.65e-6 kg; lognormal variance with pedigree 0.3706, pedigree (2,5,5,5,1)
- Suspended solids, unspecified [water, unspecified]: 0.000139 kg; lognormal variance with pedigree 0.1006, pedigree (2,5,5,5,1)
- Lead [water, unspecified]: 2.63e-7 kg; lognormal variance with pedigree 0.1506, pedigree (2,5,5,5,1)
- Particulates, > 2.5 um, and < 10um [air, unspecified]: 2.95e-5 kg; lognormal variance with pedigree 0.072, pedigree (1,1,5,5,1)
  calculated from max value assuming lognormal distribution
- Cadmium, ion [water, unspecified]: 1.31e-7 kg; lognormal variance with pedigree 0.1506, pedigree (2,5,5,5,1)
- Chromium [air, unspecified]: 4.18e-9 kg; lognormal variance with pedigree 0.71, pedigree (1,5,5,5,1)
- Sulfur dioxide [air, unspecified]: 1.6e-5 kg; lognormal variance with pedigree 0.1006, pedigree (2,5,5,5,1)
- Oils, unspecified [soil, industrial]: 3.85e-5 kg; lognormal variance with pedigree 0.042, pedigree (1,1,5,5,1)
  calculated from max value assuming lognormal distribution
- Nitrogen oxides [air, unspecified]: 0.000122 kg; lognormal variance with pedigree 3.282, pedigree (1,1,5,5,1)
  calculated from max value assuming lognormal distribution
- NMVOC, non-methane volatile organic compounds, unspecified origin [air, unspecified]: 7.61e-5 kg; lognormal variance with pedigree 0.052, pedigree (1,1,5,5,1)
  calculated from max value assuming lognormal distribution
- Hydrogen fluoride [air, unspecified]: 8.25e-7 kg; lognormal variance with pedigree 0.542, pedigree (1,1,5,5,1)
  calculated from max value assuming lognormal distribution
- Mercury [water, unspecified]: 2.63e-8 kg; lognormal variance with pedigree 0.1506, pedigree (2,5,5,5,1)
- Chromium, ion [water, unspecified]: 4.72e-7 kg; lognormal variance with pedigree 0.1506, pedigree (2,5,5,5,1)
- Iron [soil, unspecified]: 0.00548 kg; lognormal variance with pedigree 0.292, pedigree (1,1,5,5,1)
  calculated from max value assuming lognormal distribution
- TOC, Total Organic Carbon [water, unspecified]: 1.96e-7 kg; lognormal variance with pedigree 0.42, pedigree (5,5,5,5,5)
- Chloride [water, unspecified]: 1.17e-6 kg; lognormal variance with pedigree 0.1006, pedigree (2,5,5,5,1)
- Iron, ion [water, unspecified]: 4.07e-6 kg; lognormal variance with pedigree 0.1506, pedigree (2,5,5,5,1)
- Particulates, > 10 um [air, unspecified]: 2.95e-5 kg; lognormal variance with pedigree 0.072, pedigree (1,1,5,5,1)
  calculated from max value assuming lognormal distribution
- Zinc, ion [water, unspecified]: 1.96e-7 kg; lognormal variance with pedigree 0.1506, pedigree (2,5,5,5,1)
- COD, Chemical Oxygen Demand [water, unspecified]: 3.61e-5 kg; lognormal variance with pedigree 0.1006, pedigree (2,5,5,5,1)
- DOC, Dissolved Organic Carbon [water, unspecified]: 2.54e-7 kg; lognormal variance with pedigree 0.28, pedigree (5,5,5,5,5)
- Copper, ion [water, unspecified]: 2.54e-7 kg; lognormal variance with pedigree 0.1506, pedigree (2,5,5,5,1)

## Sampling procedure
Literature

## Extrapolations
none This dataset has been copied from an original dataset covering the geography RER. The uncertainty has been adjusted accordingly.

## Review by Roland Hischier 2003-06-17
Passed.
