# phenylenediamine production

Dataset: EcoSpold 2, unit process
Geography: GLO
Time period: 2002-01-01 to 2021-12-31
Technology level: current
Classification: EcoSpold01Categories: chemicals/organics
Classification: ISIC rev.4 ecoinvent: 2011:Manufacture of basic chemicals
Synonyms: diaminobenzene; m-phenylenediamine; 1,4-diaminobenzene; 1,2-diaminobenzene; PPD; OPD; o-phenylenediamine; 1,3-diaminobenzene; p-phenylenediamine; MPD
Scenario: Business-as-Usual
System model: Allocation, cut-off by classification
Generated by: Marylène Dussault
Published in: Thebeeapelo, John Khaile 2002
Database: ecoinvent
isCopyrightProtected: true
accessRestrictedTo: 1

## General comment
This dataset represents the production of separated phenylenediamine isomers (o-, p-, m- phenylenediamine) from nitration of benzene and hydrogenation of separed nitrobenzen isomere. This route of production involved high selectivity of isomers and no undesirable by-products (no organic waste is generated). This dataset is based a report for production of resorcinol from hydrolysis of m-phenylenediamine. The latter is the precursor of resorcinol which using the same production route. Last hydrolysis related flows were removed from the inventory.
[This dataset was already contained in the ecoinvent database version 2. It was not individually updated during the transfer to ecoinvent version 3. Life Cycle Impact Assessment results may still have changed, as they are affected by changes in the supply chain, i.e. in other datasets. This dataset was generated following the ecoinvent quality guidelines for version 2. It may have been subject to central changes described in the ecoinvent version 3 change report (http://www.ecoinvent.org/database/ecoinvent-version-3/reports-of-changes/), and the results of the central updates were reviewed extensively. The changes added e.g. consistent water flows and other information throughout the database. The documentation of this dataset can be found in the ecoinvent reports of version 2, which are still available via the ecoinvent website. The change report linked above covers all central changes that were made during the conversion process.]

## Included activities start
With benzene nitration.

## Included activities end
With production of separated o-, p-, m- phenylenediamine. It includes raw materials, and energy. Emissions to air and water as well as infrastructure are estimated from nitrobenzene production via mono-nitration of benzene. No waste is taken into account.

## Geography
Average European Values

## Reference product
- meta-phenylene diamine: 1 kg; name MPD; By-product classification allocatable product; CPC 34150: Amine-function compounds; oxygen-function amino-compounds, except lysine and its esters and salts thereof and […]; CAS 108-45-2
  Literature value. As reported by Thebeeapelo (2002).
  production volume 4.61e7 kg; name PV_MPD
    Estimated value. Rough estimation that should be updated as soon better data are available. Based on reported world production volume of resorcinol (Thebeeapelo, 2002) for 2000. Since, m-phenydiamine is precursor of resorcinol and is used in many other products such as dye, this value is likely to be underestimated.
  property dry mass 1 kg; name MPD_DM
  property wet mass 1 kg; name MPD_WM
  property carbon content, fossil 0.67; name MPD_C_content_fossil
    fossil carbon content on a dry matter basis
  property water in wet mass 0 kg; name MPD_WWM
  property carbon content, non-fossil 0; name MPD_C_content_non_fossil
    biogene carbon content on a dry matter basis
  property price 3 EUR2005; name MPD_price_EUR2005
    Estimated based on current purchaser prices.
  property heating value, net 29.16 MJ
    LHV is calculated based on the elemental composition of the substance. Based on the CAS number of the substance (000108-45-2), the chemical formula of the substance is found to be: C6H8N2, (PubChem 2020).
    Reference: Kim, S., Chen, J., Cheng, T., Gindulyte, A., He, J., He, S., Li, Q., Shoemaker, B. A., Thiessen, P. A., Yu, B., Zaslavsky, L., Zhang, J., & Bolton, E. E. (2019). PubChem 2019 update: improved access to chemical data. Nucleic acids research, 47(D1), D1102–D1109. https://doi.org/10.1093/nar/gky1033
  property carbon content 0.67
    carbon content on a dry matter basis (reserved; not for manual entry)
  property true value 3; name MPD_true_value
    allocation property applied in "true value" allocation // value calculated from revenue
  properties: carbon allocation 0.67 kg

## By-products
- ortho-phenylene diamine: 0 kg; name OPD; CPC 34150: Amine-function compounds; oxygen-function amino-compounds, except lysine and its esters and salts thereof and […]; By-product classification allocatable product; CAS 95-54-5; pedigree (1,1,1,1,1)
  Literature value. As reported by Thebeeapelo (2002).
  production volume 6.8689e6 kg; name PV_OPD; = OPD/ MPD* PV_MPD
    Calculated value. Based on production ratio between o-phenylendiamine and m-phenylendiamine and the production volume of m-phenylendiamine.
  property carbon content, non-fossil 0; name OPD_C_content_non_fossil
    biogene carbon content on a dry matter basis
  property water in wet mass 0 kg; name OPD_WWM
  property dry mass 1 kg; name OPD_DM
  property carbon content, fossil 0.67; name OPD_C_content_fossil
    fossil carbon content on a dry matter basis
  property wet mass 1 kg; name OPD_WM
  property price 3 EUR2005; name OPD_price_EUR2005
    Estimated based on current purchaser prices.
  property heating value, net 29.16 MJ
    LHV is calculated based on the elemental composition of the substance. Based on the CAS number of the substance (000095-54-5), the chemical formula of the substance is found to be: C6H8N2, (PubChem 2020).
    Reference: Kim, S., Chen, J., Cheng, T., Gindulyte, A., He, J., He, S., Li, Q., Shoemaker, B. A., Thiessen, P. A., Yu, B., Zaslavsky, L., Zhang, J., & Bolton, E. E. (2019). PubChem 2019 update: improved access to chemical data. Nucleic acids research, 47(D1), D1102–D1109. https://doi.org/10.1093/nar/gky1033
  property carbon content 0.67
    carbon content on a dry matter basis (reserved; not for manual entry)
  property true value 0.447; name OPD_true_value
    allocation property applied in "true value" allocation // value calculated from revenue
  properties: carbon allocation 0.67 kg
- para-phenylene diamine: 0 kg; name PPD; CPC 34150: Amine-function compounds; oxygen-function amino-compounds, except lysine and its esters and salts thereof and […]; By-product classification allocatable product; CAS 106-50-3; pedigree (1,1,1,1,1)
  Literature value. As reported by Thebeeapelo (2002).
  production volume 1.0142e6 kg; name PV_PPD; = PPD/ MPD* PV_MPD
    (same comment as for ortho-phenylene diamine)
  property water in wet mass 0 kg; name PPD_WWM
  property carbon content, fossil 0.67; name PPD_C_content_fossil
    fossil carbon content on a dry matter basis
  property wet mass 1 kg; name PPD_WM
  property dry mass 1 kg; name PPD_DM
  property price 3 EUR2005; name PPD_price_EUR2005
    Estimated based on current purchaser prices.
  property carbon content, non-fossil 0; name PPD_C_content_non_fossil
    biogene carbon content on a dry matter basis
  property heating value, net 29.16 MJ
    LHV is calculated based on the elemental composition of the substance. Based on the name of the substance, the chemical formula of the substance is manually found to be: C6H8N2.
  property carbon content 0.67
    carbon content on a dry matter basis (reserved; not for manual entry)
  property true value 0.066; name PPD_true_value
    allocation property applied in "true value" allocation // value calculated from revenue
  properties: carbon allocation 0.67 kg

## Inputs from technosphere
- electricity, medium voltage: 1.80359 kWh; lognormal variance with pedigree 0.1666, pedigree (3,4,5,5,5)
  EcoSpold01Location=UCTE
  Literature value. As reported by Thebeeapelo (2002). Value includes hydrolysis step of m-phenyldiamine to resorcinol, due to lack of data for desagregation. Thus, value is overestimated.
  Uncertainty: estimation
- sulfuric acid: 0 kg; pedigree (1,1,1,1,1)
  EcoSpold01Location=RER
  Literature value. As reported by Thebeeapelo (2002).
  Uncertainty: literature
  properties: wet mass 1 kg, dry mass 1 kg
- nitrogen, liquid: 0 kg; pedigree (1,1,1,1,1)
  Literature value. As reported by Thebeeapelo (2002). Report as nitrogen volume, density used 1.229 kg/Nm3.
  properties: wet mass 1 kg, dry mass 1 kg
- wastewater, average: 0 m3; name BP_amount_1; pedigree (1,1,1,1,1)
  Approximated process. Represents treatment of wastewater from phenylenediamine production.
  production volume 0 m3
    Calculated from production volume of reference product using the relative outputs.
  property price 0 EUR2005; name BP_amount_1_price_EUR2005
  properties: carbon content, non-fossil 0.194039, wet mass 1000 kg, water content 2882.2, dry mass 0.346837 kg
  note on carbon content, non-fossil: 0.0673 kg TOC/m3 (Tab A.17, ecoinvent v2.2 report 13_I). TOC was considered as Total Carbon.
- methanol: 0.0128096 kg; lognormal variance with pedigree 0.1666, pedigree (3,4,5,5,5)
  Literature value. As reported by Thebeeapelo (2002).
  properties: heating value, net 26.49 MJ, dry mass 1 kg, wet mass 1 kg, carbon content, fossil 0.375
- chemical factory, organics: 3.41588e-10 unit; lognormal variance with pedigree 0.3427, pedigree (2,2,5,5,1)
  Approximated value. Infrastructure of a typical plant.
  EcoSpold01Location=RER
  Uncertainty: infrastructure of a typical plant
- ammonia, anhydrous, liquid: 0 kg; pedigree (1,1,1,1,1)
  Literature value. As reported by Thebeeapelo (2002).
  properties: dry mass 1 kg, wet mass 1 kg
- ethyl tert-butyl ether: 0.029889 kg; lognormal variance with pedigree 0.1652, pedigree (2,4,5,5,5)
  Approximated process. Represents diisopropyl ether as reported by Thebeeapelo (2002). No specified fuel, assumed to be natural gas.
  properties: carbon content, fossil 0.454, wet mass 1 kg, dry mass 1 kg, carbon content, non-fossil 0.245, heating value, net 37.97 MJ
- soda ash, light, crystalline, heptahydrate: 0.0982067 kg; lognormal variance with pedigree 0.1652, pedigree (2,4,5,5,5)
  Literature value. As reported by Thebeeapelo (2002).
  properties: carbon content, fossil 0.0517241, wet mass 1 kg, dry mass 1 kg, heating value, net 3.43 MJ
- nickel, class 1: 0.000209906 kg; lognormal variance with pedigree 0.1726, pedigree (4,4,5,5,5)
  Approximated process. Represents use of catalyst. No specific catalysts reported, assumed to be Ni/SiO2 catalyst containing 20% Ni. Total catalyst amount (1.229kg/t) as reported by Thebeeapelo (2002).
  properties: wet mass 1 kg, dry mass 1 kg
- silica sand: 0.000839624 kg; lognormal variance with pedigree 0.1726, pedigree (4,4,5,5,5)
  (same comment as for nickel, class 1)
  properties: water content 0.010101, wet mass 1 kg, dry mass 0.99 kg
- nitric acid, without water, in 50% solution state: 0 kg; pedigree (1,1,1,1,1)
  Literature value. As reported by Thebeeapelo (2002).
  EcoSpold01Location=RER
  Uncertainty: literature
  properties: dry mass 1 kg, wet mass 1 kg
- water, deionised: 0 kg; name water; pedigree (1,1,1,1,1)
  Literature value. As reported by Thebeeapelo (2002). No specified fuel, assumed to be natural gas.
  properties: wet mass 1 kg
- benzene: 0.867635 kg; lognormal variance with pedigree 0.1652, pedigree (2,4,5,5,5)
  (same comment as for nitric acid, without water, in 50% solution state)
  properties: dry mass 1 kg, carbon content, fossil 0.923077, wet mass 1 kg, heating value, net 42.5 MJ
- heat, from steam, in chemical industry: 0 MJ; pedigree (1,1,1,1,1)
  (same comment as for water, deionised)
  properties: heating value, net 1 MJ
- steam, in chemical industry: 0 kg; pedigree (1,1,1,1,1)
  (same comment as for water, deionised)
  properties: wet mass 1 kg, dry mass 1 kg
- sulfuric acid: 0.00819983, 0.0626798 kg (2 entries); lognormal variance with pedigree 0.1652, pedigree (2,4,5,5,5)
  (same comment as for sulfuric acid)
- nitrogen, liquid: 0.0280038, 0.10202 kg (2 entries); lognormal variance with pedigree 0.1666, pedigree (3,4,5,5,5)
  (same comment as for nitrogen, liquid)
- wastewater, average: -0.0143876, -0.00155647, -0.030102 m3 (3 entries); lognormal variance with pedigree 0.0986, pedigree (4,5,5,5,4)
  Approximated process. Represents treatment of wastewater from phenylenediamine production.
  production volume 2.48571e6 m3
- ammonia, anhydrous, liquid: 0.0180047, 0.120337, 0.0280106, 0.0543744, 0.055499, 0.0254767, 0.209449, 0.00569902, 0.602705 kg (9 entries); lognormal variance with pedigree 0.1652, pedigree (2,4,5,5,5)
  Literature value. As reported by Thebeeapelo (2002).
- nitric acid, without water, in 50% solution state: 0.0449929, 0.111889, 0.0536114, 0.341616, 0.0448264, 0.184389, 0.0486109, 0.0302811, 0.145508, 0.393934 kg (10 entries); lognormal variance with pedigree 0.1652, pedigree (2,4,5,5,5)
  (same comment as for nitric acid, without water, in 50% solution state)
- water, deionised: 10.8346, 0.0390019, 35.1725 kg (3 entries); lognormal variance with pedigree 0.1652, pedigree (2,4,5,5,5)
  (same comment as for water, deionised)
- heat, from steam, in chemical industry: 6.39952, 36.2965 MJ (2 entries); lognormal variance with pedigree 0.1652, pedigree (2,4,5,5,5)
  (same comment as for water, deionised)
- steam, in chemical industry: 2.82658, 16.0317 kg (2 entries); lognormal variance with pedigree 0.1652, pedigree (2,4,5,5,5)
  (same comment as for water, deionised)

## Emissions to nature
- Nitrate [water, unspecified]: 0.18813 kg; lognormal variance with pedigree 0.218, pedigree (4,5,5,5,5)
  Stochiometric value. Represents nitrate ions from neutralized excess nitric acid.
- Benzene [air, urban air close to ground]: 0.000264731 kg; lognormal variance with pedigree 0.17, pedigree (5,5,5,5,4)
  Approximated value. Directly taken from nitrobenzene production.
  Uncertainty: emissions, assumed
- TOC, Total Organic Carbon [water, surface water]: 1.58143e-6 kg; lognormal variance with pedigree 0.0832, pedigree (2,3,5,5,1)
  Approximated value. Directly taken from nitrobenzene production - calculated by default as TOC (gC) = COD/2.7 (COD measured in g O2). Should more correctly be calculated from the carbon content of the specified emissions to water.
  Uncertainty: literature
- BOD5, Biological Oxygen Demand [water, surface water]: 4.26985e-6 kg; lognormal variance with pedigree 0.0832, pedigree (2,3,5,5,1)
  Approximated value. Directly taken from nitrobenzene production.
  Uncertainty: literature
- AOX, Adsorbable Organic Halogen as Cl [water, surface water]: 2.34842e-5 kg; lognormal variance with pedigree 0.0832, pedigree (2,3,5,5,1)
  Approximated value. Directly taken from nitrobenzene production.
  Uncertainty: literature
- Ammonium, ion [water, unspecified]: 1.11956 kg; lognormal variance with pedigree 0.218, pedigree (4,5,5,5,5)
  Estimated value. Used for neutralising nitric acid excess.
- COD, Chemical Oxygen Demand [water, surface water]: 4.26985e-6 kg; lognormal variance with pedigree 0.3432, pedigree (2,3,5,5,1)
  Approximated value. Directly taken from nitrobenzene production.
  Uncertainty: literature
- DOC, Dissolved Organic Carbon [water, surface water]: 1.58143e-6 kg; lognormal variance with pedigree 0.0832, pedigree (2,3,5,5,1)
  Approximated value. Directly taken from nitrobenzene production. Calculated as equal to TOC.
  Uncertainty: literature

## Sampling procedure
see technology

## Extrapolations
see technology and generalComments This dataset has been copied from an original dataset covering the geography RER. The uncertainty has been adjusted accordingly.
