# anaerobic digestion plant construction, agricultural

Dataset: EcoSpold 2, unit process
Geography: RoW
Time period: 2000-01-01 to 2021-12-31
Technology level: current
Classification: EcoSpold01Categories: biomass/fuels
Classification: ISIC rev.4 ecoinvent: 4290:Construction of other civil engineering projects
Tags: ConvertedDataset
Scenario: Business-as-Usual
System model: Allocation, cut-off by classification
Share of production covered: 100 %
Generated by: Michael Spielmann (obsolete)
Published in: Jungbluth N. 2007
Database: ecoinvent
isCopyrightProtected: true
accessRestrictedTo: 1

## General comment
Infrastructure is accounted for with a lifetime of 20 years. For stationary machines a lifetime of 10 years is assumed. The dump is 90 m3 and the fermenter (digestion facility) has a capacity of about 300 m3. The digested manure is stored in two storage tanks with a capacity of 410 or 450 m3.
[This dataset was already contained in the ecoinvent database version 2. It was not individually updated during the transfer to ecoinvent version 3. Life Cycle Impact Assessment results may still have changed, as they are affected by changes in the supply chain, i.e. in other datasets. This dataset was generated following the ecoinvent quality guidelines for version 2. It may have been subject to central changes described in the ecoinvent version 3 change report (http://www.ecoinvent.org/database/ecoinvent-version-3/reports-of-changes/), and the results of the central updates were reviewed extensively. The changes added e.g. consistent water flows and other information throughout the database. The documentation of this dataset can be found in the ecoinvent reports of version 2, which are still available via the ecoinvent website. The change report linked above covers all central changes that were made during the conversion process.]

## Included activities end
Infrastructure for the pre-treatment process, digestion of liquid manure and the successive storage of the digested manure. Disposal of plastic and wood are accounted for. In contrast, for disposal of metals cut off allocation is applied.

## Geography
Data represents a Swiss plant.

## Technology
Typical Swiss plant with a concrete fermentation system

## Time period
Data is obtained from a recent LCA study.

## Reference product
- anaerobic digestion plant, agricultural: 1 unit; CPC 53290: Other civil engineering works; By-product classification allocatable product
  EcoSpold01Location=CH
  production volume 3.96633 unit
    This is a placeholder value that does not reflect real-world production volumes. This dataset does not currently require a real-world production volume to work in the database framework, and no actual data were collected yet. This has no negative effect on the results of the ecoinvent database.
  property price 643800 EUR2005
    Convert from EU 27 price to the world by currency exchange rate.

## Inputs from technosphere
- waste rubber, unspecified: 0 kg; pedigree (1,1,1,1,1)
  EcoSpold01Location=CH
  Literature studies
  Uncertainty: literature studies
  production volume 0 kg
    Calculated from the production volume of anaerobic digestion plant, agricultural in proportion to the respective output amounts.
  properties: carbon content, fossil 0.853, wet mass 1 kg, dry mass 1 kg, heating value, net 27.19 MJ
  note on heating value, net: Value taken from the general comment of the treatment dataset.
- waste wood, untreated: 0 kg; pedigree (1,1,1,1,1)
  EcoSpold01Location=CH
  Literature studies
  Uncertainty: literature studies
  production volume 0 kg
    (same comment as for waste rubber, unspecified)
  properties: heating value, net 13.99 MJ, dry mass 0.8 kg, water content 0.25, carbon content, non-fossil 0.48632, wet mass 1 kg
  note on carbon content, non-fossil: Tab A.4, ecoinvent v2.2 report 13_I. C content has been referred to 1 kg DM,
- glued laminated timber, average glue mix: 0 m3; pedigree (1,1,1,1,1)
  Literature studies
  EcoSpold01Location=RER
  Uncertainty: literature studies
  properties: carbon content, non-fossil 0.441932, dry mass 404.4 kg, heating value, net 5537.41 MJ, water content 0.0979228, carbon content, fossil 0.01791, wet mass 444 kg, price 298 EUR2005
- steel, chromium steel 18/8, hot rolled: 780 kg; lognormal variance with pedigree 0.056, pedigree (3,4,5,5,1)
  Literature studies
  EcoSpold01Location=RER
  Uncertainty: literature studies
  properties: carbon content, fossil 0.0008, dry mass 1 kg, wet mass 1 kg
  note on carbon content, fossil: Stainless steel model is the grade 304 steel (18/8 stainless, 18% chromium 8% nickel; max. 0.08% C)
- synthetic rubber: 180 kg; lognormal variance with pedigree 0.056, pedigree (3,4,5,5,1)
  Literature studies
  EcoSpold01Location=RER
  Uncertainty: literature studies
  properties: carbon content, fossil 0.871949, dry mass 1 kg, wet mass 1 kg, heating value, net 26.42 MJ
  note on carbon content, fossil: EPDM (Ethylene-propene-diene terpolymer) rubber is a terpolymer of ethylene, propene, and a diene with the residual unsaturated portion of the diene in the side chain (ecoinvent v2.2 report 7-part XX & Ullmann). Chemical formula (deduced from Evidences of Solvent-Induced Miscibility in Polychloroprene-co-Ethylene-Propene Diene Terpolymer Blends, Dubey et al., Journal of Applied Polymer Science, 2009, 111:1884–1891): C20H35
- waste polyvinylchloride: 0 kg; pedigree (1,1,1,1,1)
  EcoSpold01Location=CH
  Literature studies
  Uncertainty: literature studies
  production volume 0 kg
    (same comment as for waste rubber, unspecified)
  properties: water content 0.00200401, dry mass 0.998 kg, wet mass 1 kg, heating value, net 21.51 MJ, carbon content, fossil 0.440882
  note on carbon content, fossil: C content in 1 kg DM was calculated using data in Tab A.1, ecoinvent v2.2 report 13_I
- concrete, normal: 0 m3; pedigree (1,1,1,1,1)
  Literature studies
  EcoSpold01Location=CH
  Uncertainty: literature studies
  properties: dry mass 2190 kg, wet mass 2380 kg, water content 0.086758
- reinforcing steel: 6480 kg; lognormal variance with pedigree 0.056, pedigree (3,4,5,5,1)
  Literature studies
  EcoSpold01Location=RER
  Uncertainty: literature studies
  properties: dry mass 1 kg, wet mass 1 kg, carbon content, fossil 0.004
- polyethylene, high density, granulate: 25.5 kg; lognormal variance with pedigree 0.056, pedigree (3,4,5,5,1)
  Literature studies
  EcoSpold01Location=RER
  Uncertainty: literature studies
  properties: dry mass 1 kg, carbon content, fossil 0.857143, wet mass 1 kg, heating value, net 42.47 MJ
  note on carbon content, fossil: Polyethylene is formed out of a huge amount of ethylene monomers (C2H4) (ecoinvent v2.2 report 11_II). MW=28 g/mol
- waste reinforced concrete: 0 kg; pedigree (1,1,1,1,1)
  EcoSpold01Location=CH
  Literature studies
  Uncertainty: literature studies
  production volume 0 kg
    (same comment as for waste rubber, unspecified)
  properties: water content 0.00585407, wet mass 1 kg, dry mass 0.99418 kg
- polyvinylchloride, suspension polymerised: 43.1808 kg; lognormal variance with pedigree 0.056, pedigree (3,4,5,5,1)
  EcoSpold01Location=RER
  Literature studies
  Uncertainty: literature studies
  properties: heating value, net 21.5 MJ, wet mass 1 kg, carbon content, fossil 0.387097, dry mass 1 kg
  note on carbon content, fossil: Monomer is vynyl chloride, C2H3Cl (ecoinvent v2.2 report 11_II). MW=62 g/mol
- waste polystyrene: 0 kg; pedigree (1,1,1,1,1)
  Literature studies
  EcoSpold01Location=CH
  Uncertainty: literature studies
  production volume 0 kg
    (same comment as for waste rubber, unspecified)
  properties: dry mass 0.998 kg, water content 0.00200401, carbon content, fossil 0.922579, wet mass 1 kg, heating value, net 38.67 MJ
- waste polyethylene/polypropylene product: 0 kg; pedigree (1,1,1,1,1)
  Literature studies
  EcoSpold01Location=CH
  Uncertainty: literature studies
  production volume 0 kg
    (same comment as for waste rubber, unspecified)
  properties: water content 0.180638, dry mass 0.847 kg, carbon content, fossil 0.748045, wet mass 1 kg, heating value, net 42.47 MJ
  note on carbon content, fossil: Mixed various plastics was used to estimate the C content of this waste (Tab A.2, ecoinvent v2.2 report 13_I)
- polystyrene, high impact: 342 kg; lognormal variance with pedigree 0.056, pedigree (3,4,5,5,1)
  Literature studies
  EcoSpold01Location=RER
  Uncertainty: literature studies
  properties: heating value, net 38.67 MJ, carbon content, fossil 0.923077, dry mass 1 kg, wet mass 1 kg
  note on carbon content, fossil: Chemical formula of polystyrene is (C8H8)n (ecoinvent v2.2 report 11_II)
- polyvinylchloride, emulsion polymerised: 6.31917 kg; lognormal variance with pedigree 0.056, pedigree (3,4,5,5,1)
  Literature studies
  EcoSpold01Location=RER
  Uncertainty: literature studies
  properties: dry mass 1 kg, heating value, net 21.5 MJ, wet mass 1 kg, carbon content, fossil 0.387097
- copper, cathode: 75 kg; lognormal variance with pedigree 0.056, pedigree (3,4,5,5,1)
  Literature studies
  EcoSpold01Location=RER
  Uncertainty: literature studies
  properties: wet mass 1 kg, dry mass 1 kg
- waste rubber, unspecified: -90, -90 kg (2 entries); lognormal variance with pedigree 0.056, pedigree (3,4,5,5,1)
  EcoSpold01Location=CH
  Literature studies
  Uncertainty: literature studies
  production volume 540 kg
- waste wood, untreated: -166.744, -20.7038, -1.51368, -58.1508, -8.78519, -13.8887, -259.623, -2212.19 kg (8 entries); lognormal variance with pedigree 0.056, pedigree (3,4,5,5,1)
  EcoSpold01Location=CH
  Literature studies
  Uncertainty: literature studies
  production volume 8224.8 kg
- glued laminated timber, average glue mix: 1.74651, 3.79199 m3 (2 entries); lognormal variance with pedigree 0.056, pedigree (3,4,5,5,1)
  Literature studies
  EcoSpold01Location=RER
  Uncertainty: literature studies
- waste polyvinylchloride: -5.50647, -0.367921, -0.0278253, -0.151965, -0.061392, -0.144305, -4.69177, -38.5484 kg (8 entries); lognormal variance with pedigree 0.056, pedigree (3,4,5,5,1)
  EcoSpold01Location=CH
  Literature studies
  Uncertainty: literature studies
  production volume 148.5 kg
- concrete, normal: 1.77646, 0.185105, 1.49855, 0.842936, 3.5696, 0.1204, 70.5519 m3 (7 entries); lognormal variance with pedigree 0.056, pedigree (3,4,5,5,1)
  Literature studies
  EcoSpold01Location=CH
  Uncertainty: literature studies
- waste reinforced concrete: -11739.3, -167541 kg (2 entries); lognormal variance with pedigree 0.056, pedigree (3,4,5,5,1)
  EcoSpold01Location=CH
  Literature studies
  Uncertainty: literature studies
  production volume 537840 kg
- waste polystyrene: -38.0447, -2.542, -0.192247, -1.04994, -0.424163, -0.997014, -32.4159, -266.334 kg (8 entries); lognormal variance with pedigree 0.056, pedigree (3,4,5,5,1)
  Literature studies
  EcoSpold01Location=CH
  Uncertainty: literature studies
  production volume 1026 kg
- waste polyethylene/polypropylene product: -7.2133, -18.2867 kg (2 entries); lognormal variance with pedigree 0.056, pedigree (3,4,5,5,1)
  Literature studies
  EcoSpold01Location=CH
  Uncertainty: literature studies
  production volume 76.5 kg

## Inputs from nature
- Occupation, industrial area [natural resource, land]: 2220 m2*year; lognormal variance with pedigree 0.0946, pedigree (2,4,5,5,1)
  Literature studies
  Uncertainty: literature studies
- Transformation, from heterogeneous, agricultural [natural resource, land]: 111 m2; lognormal variance with pedigree 0.1746, pedigree (2,4,5,5,1)
  Literature studies
  Uncertainty: literature studies
- Transformation, to industrial area [natural resource, land]: 111 m2; lognormal variance with pedigree 0.1746, pedigree (2,4,5,5,1)
  Literature studies
  Uncertainty: literature studies

## Sampling procedure
Literature data

## Extrapolations
none This dataset has been copied from an original dataset covering the geography CH. The uncertainty has been adjusted accordingly.

## Review by Niels Jungbluth 2009-01-22
Passed.
