# gold production

Dataset: EcoSpold 2, unit process
Geography: TZ
Time period: 2003-01-01 to 2021-12-31
Technology level: current
Classification: ISIC rev.4 ecoinvent: 0729:Mining of other non-ferrous metal ores
Tags: ConvertedDataset
Scenario: Business-as-Usual
System model: Allocation, cut-off by classification
Generated by: Matthias Tuchschmid (obsolete)
Published in: Classen M. 2009
Database: ecoinvent
isCopyrightProtected: true
accessRestrictedTo: 1

## General comment
This data set describes the beneficiation, concentration and refinement of gold.
[This dataset was already contained in the ecoinvent database version 2. It was not individually updated during the transfer to ecoinvent version 3. Life Cycle Impact Assessment results may still have changed, as they are affected by changes in the supply chain, i.e. in other datasets. This dataset was generated following the ecoinvent quality guidelines for version 2. It may have been subject to central changes described in the ecoinvent version 3 change report (http://www.ecoinvent.org/database/ecoinvent-version-3/reports-of-changes/), and the results of the central updates were reviewed extensively. The changes added e.g. consistent water flows and other information throughout the database. The documentation of this dataset can be found in the ecoinvent reports of version 2, which are still available via the ecoinvent website. The change report linked above covers all central changes that were made during the conversion process.]

## Included activities end
This data set describes the mining of gold concentrate in Tanzania. It includes energy and water consumption, land use, transports, waste disposal as well as emissions to air and water.

## Geography
Material requirements for gold concentration are estimated with Australian data. Emissions to water have been estimated with South-African, emissions to air with Australian data.

## Technology
The mining of ore from open pit and underground mines is considered.

## Time period
Period of public environmental report

## Parameters
- fraction, process water, to air: 0.15 dimensionless; name fraction_PW_to_air; lognormal variance with pedigree 0.092025, pedigree (4,4,3,2,4)
  Literature value. In case when no industry/process specific data are available, default evaporation fraction value is used. This value is 15% and is based on literature (Statistics Canada, 2007 & Shaffer, K.H., 2008, Consumptive water use in the Great Lakes Basin, USGS & Shiklomanov, 2003, World Water Resources at the Beginning of the 21st Century) and has been approved by an expert.

## Reference product
- gold: 1 kg; name RP_amount; By-product classification allocatable product; CPC 41320: Gold (including gold plated with platinum), unwrought or in semi-manufactured forms, or in powder form; CAS 7440-57-5
  production volume 45115 kg; name RP_PV
    Source: USGS Minerals Yearbook 2016. Available from: https://www.usgs.gov/centers/nmic/gold-statistics-and-information (downloaded 02 July 2019), Table 8.
  property price 25128.4 EUR2005
    Price calculated as 5-year market average (2015-2019; USD/kg; USGS [2020]) and converted to EUR2005 (USD2019/EUR2005 exchange rate: 0.62; Official Data Foundation [2020] and Macrotrends [2020]).
    References:
    Official Data Foundation (2020). Inflation Calculator [Online]. Available from: https://www.officialdata.org/us/inflation/2005?endYear=2019&amount=1 [Accessed 28/07/2020]
    USGS (2020). Mineral Commodity Summaries 2020 [Online]. Available from: https://pubs.usgs.gov/periodicals/mcs2020/mcs2020.pdf [Accessed 28/07/2020]
    Macrotrends (2020). Euro Dollar Exchange Rate (EUR USD) - Historical Chart [Online]. Available from: https://www.macrotrends.net/2548/euro-dollar-exchange-rate-historical-chart [Accessed 28/07/2020]
  property carbon content 0
    carbon content on a dry matter basis (reserved; not for manual entry)
  properties: carbon content, fossil 0, wet mass 1 kg, carbon content, non-fossil 0, water in wet mass 0 kg, dry mass 1 kg, water content 0, carbon allocation 0 kg

## Inputs from technosphere
- charcoal: 16.968 kg; lognormal variance with pedigree 0.042625, pedigree (3,3,5,2,1)
  Calculation, based on thesis on Australian precious metal production, data for 1999
  Uncertainty: C
  properties: wet mass 1 kg, dry mass 1 kg, carbon content, non-fossil 0.8, heating value, net 28.4 MJ
  note on heating value, net: Indicative value. Reference: Fuels - Higher and Lower Calorific Values, available at: https://www.engineeringtoolbox.com/fuels-higher-calorific-values-d_169.html
- lime, packed: 63.215 kg; lognormal variance with pedigree 0.0546, pedigree (3,3,5,5,1)
  (same comment as for charcoal)
  properties: carbon content, fossil 0.117492, water content 0.00200401, wet mass 1 kg, dry mass 0.998 kg
  note on carbon content, fossil: Table 3.1, ecoinvent v2.2 report 7, part VII, pg 3. MW CaCO3=100, MW MgCO3=84
- zinc: 2.8946 kg; lognormal variance with pedigree 0.0427, pedigree (3,3,5,3,1)
  (same comment as for charcoal)
  properties: dry mass 1 kg, wet mass 1 kg
- hydrochloric acid, without water, in 30% solution state: 13.641 kg; lognormal variance with pedigree 0.0427, pedigree (3,3,5,3,1)
  (same comment as for charcoal)
  properties: dry mass 1 kg, wet mass 1 kg, heating value, net 3.32 MJ
- blasting: 133.7 kg; lognormal variance with pedigree 0.044025, pedigree (3,4,5,2,1)
  Environmental report
  Uncertainty: E
- sodium hydroxide, without water, in 50% solution state: 11.645 kg; lognormal variance with pedigree 0.0427, pedigree (3,3,5,3,1)
  (same comment as for charcoal)
  properties: heating value, net 3.03 MJ, wet mass 1 kg, dry mass 1 kg
- precious metal refinery: 1.6461e-7 unit; lognormal variance with pedigree 0.354025, pedigree (3,4,5,2,1)
  Environmental report
  Uncertainty: E
- sulfidic tailings, from gold mine operation: -176320 kg; name sulfidic_tailings_amount; lognormal variance with pedigree 0.044025, pedigree (3,4,5,2,1)
  Estimation
  Uncertainty: E
  production volume 7.95468e9 kg; = ABS(sulfidic_tailings_amount/RP_amount)*RP_PV
    Calculated from the production volume of gold in proportion to the respective output amounts.
  properties: silicon content 0.056714, wet mass 1 kg, potassium content 0.0031243, iron content 0.014628, calcium content 0.0037589, carbon content, fossil 0.0087785, water content 0.428571, oxygen content 0.88758, dry mass 0.7 kg, aluminium content 0.017079, magnesium content 0.0020127, sodium content 0.0014916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
- sodium cyanide: 99.737 kg; lognormal variance with pedigree 0.044025, pedigree (3,4,5,2,1)
  Environmental report
  Uncertainty: E
  properties: heating value, net 7.43 MJ, wet mass 1 kg, carbon content, fossil 0.244898, dry mass 1 kg
- sulfuric acid: 0.66543 kg; lognormal variance with pedigree 0.0427, pedigree (3,3,5,3,1)
  (same comment as for charcoal)
  properties: dry mass 1 kg, wet mass 1 kg
- electricity, medium voltage: 1.63 kWh; lognormal variance with pedigree 0.044025, pedigree (3,4,5,2,1)
  Environmental report
  Uncertainty: E
- diesel, burned in diesel-electric generating set, 10MW: 86441 MJ; lognormal variance with pedigree 0.044025, pedigree (3,4,5,2,1)
  Environmental report
  Uncertainty: E
  properties: heating value, net 1 MJ
- mine infrastructure, gold: 1.7285e-6 unit; lognormal variance with pedigree 0.354025, pedigree (3,4,5,2,1)
  Environmental report;activityLink introduced to establish a direct link to the corresponding regional supply of this product
  Uncertainty: E
- diesel, burned in building machine: 45905 MJ; lognormal variance with pedigree 0.044025, pedigree (3,4,5,2,1)
  Environmental report
  Uncertainty: E
  properties: heating value, net 1 MJ

## Inputs from nature
- Water, river [natural resource, in water]: 79.949 m3; name water_river_input; lognormal variance with pedigree 0.0426, pedigree (3,3,5,1,1)
  Environmental report
  Uncertainty: E
- Gold, in ground [natural resource, in ground]: 1.087 kg; lognormal variance with pedigree 0.0426, pedigree (3,3,5,1,1)
  4.3 ppm Au in ore; Environmental report
  Uncertainty: E

## Emissions to nature
- Manganese [air, non-urban air or from high stacks]: 0.017435 kg; lognormal variance with pedigree 0.6946, pedigree (3,3,5,5,1)
  Estimated with data from AU
  Uncertainty: E
- Chromium [air, non-urban air or from high stacks]: 0.0010838 kg; lognormal variance with pedigree 0.6946, pedigree (3,3,5,5,1)
  Estimated with data from AU
  Uncertainty: E
- Copper, ion [water, surface water]: 0.021254 kg; lognormal variance with pedigree 0.3626, pedigree (3,3,5,5,3)
  Estimated with data from ZA
  Uncertainty: E
- Water [water, unspecified]: 67.9566 m3; name water_to_water_unspecified; = water_river_input*(1-fraction_PW_to_air); lognormal variance with pedigree 0.0807, pedigree (2,2,5,1,1)
  Calculated value based on literature values and expert opinion. See comments in the parametres' comment field.
  property fraction, origin: fresh water 1; name fraction_origin_fresh_water_Ww
  property carbon content, fossil 0; name C_content_fossil
  property water in wet mass 1000 kg; name WWM
  property wet mass 1000 kg; name WM
  property dry mass 0 kg; name DM
  property carbon content, non-fossil 0; name C_content_non_fossil
  property fraction, origin: unspecified 0; name fraction_origin_unspecified_Ww
  property fraction, origin: salt water 0; name fraction_origin_salt_water_Ww
- Lead [air, non-urban air or from high stacks]: 0.033881 kg; lognormal variance with pedigree 0.6946, pedigree (3,3,5,5,1)
  Estimated with data from AU
  Uncertainty: E
- Cyanide [water, surface water]: 0.21254 kg; lognormal variance with pedigree 0.3626, pedigree (3,3,5,5,3)
  Estimated with data from ZA
  Uncertainty: E
- Lead [water, surface water]: 0.0025551 kg; lognormal variance with pedigree 0.7126, pedigree (3,3,5,5,3)
  Estimated with data from ZA
  Uncertainty: E
- Water [air, unspecified]: 11.9924 m3; name water_to_air_unspecified; = (water_river_input*fraction_PW_to_air); lognormal variance with pedigree 0.0807, pedigree (2,2,5,1,1)
  (same comment as for Water)
  property fraction, origin: fresh water 1; name fraction_origin_fresh_water
  property fraction, origin: salt water 0; name fraction_origin_salt_water
  property fraction, origin: unspecified 0; name fraction_origin_unspecified
- Arsenic [air, non-urban air or from high stacks]: 0.012321 kg; lognormal variance with pedigree 0.6946, pedigree (3,3,5,5,1)
  Estimated with data from AU
  Uncertainty: E
- Carbon dioxide, fossil [air, non-urban air or from high stacks]: 21.392 kg; lognormal variance with pedigree 0.0546, pedigree (3,3,5,5,1)
  Estimated with data from AU
  Uncertainty: E
- Cadmium, ion [water, surface water]: 0.00042972 kg; lognormal variance with pedigree 0.3626, pedigree (3,3,5,5,3)
  Estimated with data from ZA
  Uncertainty: E
- Nickel, ion [water, surface water]: 0.048546 kg; lognormal variance with pedigree 0.7126, pedigree (3,3,5,5,3)
  Estimated with data from ZA
  Uncertainty: E
- Cadmium [air, non-urban air or from high stacks]: 3.8274e-5 kg; lognormal variance with pedigree 0.6946, pedigree (3,3,5,5,1)
  Estimated with data from AU
  Uncertainty: E
- Antimony [air, non-urban air or from high stacks]: 0.00026841 kg; lognormal variance with pedigree 0.6946, pedigree (3,3,5,5,1)
  Estimated with data from AU
  Uncertainty: E
- Zinc, ion [water, surface water]: 0.031938 kg; lognormal variance with pedigree 0.7126, pedigree (3,3,5,5,3)
  Estimated with data from ZA
  Uncertainty: E
- Arsenic, ion [water, surface water]: 0.0038326 kg; lognormal variance with pedigree 0.7126, pedigree (3,3,5,5,3)
  Estimated with data from ZA
  Uncertainty: E
- Beryllium [air, non-urban air or from high stacks]: 0.00072244 kg; lognormal variance with pedigree 0.6946, pedigree (3,3,5,5,1)
  Estimated with data from AU
  Uncertainty: E
- Mercury [air, non-urban air or from high stacks]: 0.019907 kg; lognormal variance with pedigree 0.6946, pedigree (3,3,5,5,1)
  Estimated with data from AU
  Uncertainty: E
- Mercury [water, surface water]: 0.00042972 kg; lognormal variance with pedigree 0.7126, pedigree (3,3,5,5,3)
  Estimated with data from ZA
  Uncertainty: E
- Cobalt [air, non-urban air or from high stacks]: 0.00030421 kg; lognormal variance with pedigree 0.6946, pedigree (3,3,5,5,1)
  Estimated with data from AU
  Uncertainty: E

## Sampling procedure
environmental report

## Extrapolations
This dataset has been extrapolated from year 2006 to the year of the calculation (2021). The uncertainty has been adjusted accordingly.
