# quicklime production, milled, packed

Dataset: EcoSpold 2, unit process
Geography: CH
Time period: 2000-01-01 to 2021-12-31
Technology level: current
Classification: ISIC rev.4 ecoinvent: 2394:Manufacture of cement, lime and plaster
Classification: EcoSpold01Categories: construction materials/additives
Synonyms: burnt; Calcium hydroxide; caustic; quick; lime
Tags: ConvertedDataset
Scenario: Business-as-Usual
System model: Allocation, cut-off by classification
Share of production covered: 50 %
Generated by: Daniel Kellenberger (obsolete)
Published in: Kellenberger D. 2007
Database: ecoinvent
isCopyrightProtected: true
accessRestrictedTo: 1

## General comment
This dataset represents the packing of 1 kg of milled quicklime. The dataset is based on the module 'packing, lime products'.
[This dataset was already contained in the ecoinvent database version 2. It was not individually updated during the transfer to ecoinvent version 3. Life Cycle Impact Assessment results may still have changed, as they are affected by changes in the supply chain, i.e. in other datasets. This dataset was generated following the ecoinvent quality guidelines for version 2. It may have been subject to central changes described in the ecoinvent version 3 change report (http://www.ecoinvent.org/database/ecoinvent-version-3/reports-of-changes/), and the results of the central updates were reviewed extensively. The changes added e.g. consistent water flows and other information throughout the database. The documentation of this dataset can be found in the ecoinvent reports of version 2, which are still available via the ecoinvent website. The change report linked above covers all central changes that were made during the conversion process.]

## Included activities start
Packing process starting from milled quicklime, unpacked.

## Included activities end
The activity ends with the product packed at the factory. The dataset includes the packing and the heating energy requirements for packing production and administration.

## Geography
Data is based on a Swiss company.

## Technology
Data corresponds to the current Swiss technology.

## Reference product
- quicklime, milled, packed: 1 kg; By-product classification allocatable product; CPC 37420: Quicklime, slaked lime and hydraulic lime; CAS 1305-78-8
  Estimation, based on personal communication. Data corresponds to the Swiss company KFN for the year 2001.
  production volume 0.0336675 kg
    This is a placeholder value that does not reflect real-world production volumes. This dataset does not currently require a real-world production volume to work in the database framework, and no actual data were collected yet. This has no negative effect on the results of the ecoinvent database. The placeholder value of this activity was scaled according to the nominal GDP of 2005 (source: United Nations, http://data.un.org/Glossary.aspx?q=GDP+%28current+US%24%29, accessed 20130726) to reflect an appropriate share of the global production volume, which is also a placeholder value.
  property carbon content, non-fossil 0
    Tab 3.3, ecoinvent v2.2 report 7, part VII, pg 5. Ground quicklime
  property carbon content, fossil 0
    Tab 3.3, ecoinvent v2.2 report 7, part VII, pg 5. Ground quicklime
  property price 0.077 EUR2005
    Calculated value based on data from United Nations Commodity Trade Statistics Database (comtrade.un.org). UN comtrade category: 252210 Quicklime. Year 2005. Using exchange rate of 1EURO = 1.209 USD. Average of price of import into 5 main markets (EU, US, JP, IN and CN).
  property carbon content 0
    carbon content on a dry matter basis (reserved; not for manual entry)
  properties: water in wet mass 0.01 kg, dry mass 0.99 kg, water content 0.010101, wet mass 1 kg, carbon allocation 0 kg

## Inputs from technosphere
- quicklime, milled, loose: 1 kg; lognormal variance with pedigree 0.0401, pedigree (1,2,5,1,1)
  Estimation, based on personal communication. Data corresponds to the Swiss company KFN for the year 2001.
  Activity link justification: precursor production and consumption occur on the same site.
  Estimation, based on personal communication. Data corresponds to the Swiss company KFN for the year 2001.
  Activity link justification: precursor production and consumption occur on the same site.
  properties: dry mass 0.99 kg, wet mass 1 kg, water content 0.010101
- heat, central or small-scale, other than natural gas: 0.00141 MJ; lognormal variance with pedigree 0.0401, pedigree (1,2,5,1,1)
  (same comment as for quicklime, milled, packed)
  properties: heating value, net 1 MJ
- packing, lime product: 1 kg; lognormal variance with pedigree 0.3686, pedigree (4,3,5,1,1)
  Estimation, based on personal communication. Data corresponds to the Swiss company KFN for the year 2001.
  This exchange has an activity link directly to the producing activity because the product is primarily consumed in the same geographical area where it is produced.

## Sampling procedure
Data is from only one company in Switzerland (KFN), with a production volume of 150'000t.

## Extrapolations
This dataset has been extrapolated from year 2002 to the year of the calculation (2021). The uncertainty has been adjusted accordingly.

## Review by Roland Hischier 2011-09-22
Transfer of documentation done.

## Review by Roberto Dones 2003-07-04
Passed

## Review by Emilia Moreno Ruiz 2014-05-19
AL added for quicklime inputs
