# door production, outer, wood-aluminium

Dataset: EcoSpold 2, unit process
Geography: RER
Time period: 1997-01-01 to 2021-12-31
Technology level: current
Classification: ISIC rev.4 ecoinvent: 2511:Manufacture of structural metal products
Classification: EcoSpold01Categories: building components/doors
Tags: ConvertedDataset
Scenario: Business-as-Usual
System model: Allocation, cut-off by classification
Generated by: Martin Lehmann
Published in: Kellenberger D. 2007
Database: ecoinvent
isCopyrightProtected: true
accessRestrictedTo: 1

## General comment
The dataset can be applied to describe an average entrance door of a one-family house. The door frame is made of steel (paint coated), the door leaf is made of wood, planked with powder coated aluminium on both sides. The lock, door handles and frame joints are fabricated from steel. Data are based on a door of 0.8x2.0 m and scaled to 1m2. 1 m2 of the aluminium planked massive wood outer door weighs 38.8 kg. The functional life time for the door frame is 60 years, for the door leaf it is 30 years.
[This dataset was already contained in the ecoinvent database version 2. It was not individually updated during the transfer to ecoinvent version 3. Life Cycle Impact Assessment results may still have changed, as they are affected by changes in the supply chain, i.e. in other datasets. This dataset was generated following the ecoinvent quality guidelines for version 2. It may have been subject to central changes described in the ecoinvent version 3 change report (http://www.ecoinvent.org/database/ecoinvent-version-3/reports-of-changes/), and the results of the central updates were reviewed extensively. The changes added e.g. consistent water flows and other information throughout the database. The documentation of this dataset can be found in the ecoinvent reports of version 2, which are still available via the ecoinvent website. The change report linked above covers all central changes that were made during the conversion process.]

## Included activities end
This dataset describes the production of 1m2 (visible area) outer door, (entrance door), including the processes for the installation. Not included are transports from plant to construction site.

## Geography
Data from producers in Switzerland.

## Technology
The technology represents average European production.

## Parameters
- fraction, process water, to air: 0.24 dimensionless; name fraction_PW_to_air; lognormal variance with pedigree 0.092025, pedigree (4,4,3,2,4)
  Literature value (Statistics Canada, 2007 & Shaffer, K.H., 2008, Consumptive water use in the Great Lakes Basin, USGS) (Vionnet, S., Quantis Water Database - Technical Report, 2012).
- fraction, tap water, to air: 0.24 dimensionless; name fraction_TW_to_air; = fraction_PW_to_air; lognormal variance with pedigree 0.092025, pedigree (4,4,3,2,4)
  Calculated value. See comment in the other parametres present in this dataset. Tap water is considered to be always used as process water, thus process water fractions to air are applied to all tap water input flows to calculate the amount of water consumed in the processes.

## Reference product
- door, outer, wood-aluminium: 1 m2; CPC 42120: Doors, windows and their frames and thresholds for doors, of iron, steel or aluminium; By-product classification allocatable product
  EcoSpold01Location=RER
  production volume 1.32237 m2
    This is a placeholder value that does not reflect real-world production volumes. This dataset does not currently require a real-world production volume to work in the database framework, and no actual data were collected yet. This has no negative effect on the results of the ecoinvent database. The placeholder value of this activity was scaled according to the nominal GDP of 2005 (source: United Nations, http://data.un.org/Glossary.aspx?q=GDP+%28current+US%24%29, accessed 20130726) to reflect an appropriate share of the global production volume, which is also a placeholder value.
  property carbon content, fossil 0.025815
    Calculated as an addition of C content in the product, then referred to 1 kg DM.
  property price 116 EUR2005
    Calculated based on literature values. The price of 1 kg of wooden doors is calculated to be 1.86 euro/kg. The price of 1 kg of aluminium doors is calculated to be 4.11 euro/kg. This price is calculated as a weighted average of prices calculated based on import (net trade) of this material from the world into 5 big economies; EU, Japan, China, India, USA. The net weight and the trade value is obtained from the UN Comtrade database (commodity no. 441820 Doors, frames amd thresholds, of wood and 761010 Aluminium Doors, windows, frames and thresholds), year 2005. The weight of the door, outer, wood-aluminium is 38.8 kg/m2 based on the description of the dataset.
  property carbon content 0.328488
    carbon content on a dry matter basis (reserved; not for manual entry)
  properties: water content 0.0526316, dry mass 36.86 kg, carbon content, non-fossil 0.302673, water in wet mass 1.94 kg, wet mass 38.8 kg, carbon allocation 12.1081 kg

## Inputs from technosphere
- alkyd resin, long oil, without solvent, in 70% white spirit solution state: 0.00025 kg; lognormal variance with pedigree 0.0507, pedigree (1,3,5,3,1)
  EcoSpold01Location=RER
  properties: heating value, net 20.65 MJ, dry mass 1 kg, carbon content, fossil 0.268755, wet mass 1 kg, carbon content, non-fossil 0.412906
  note on carbon content, fossil: C content was calculated as an addition of C content in the raw materials.
- electricity, medium voltage: 5.52 kWh; lognormal variance with pedigree 0.05, pedigree (1,1,5,1,1)
  composite
  EcoSpold01Location=UCTE
- kraft paper: 0.172 kg; lognormal variance with pedigree 0.05, pedigree (1,1,5,1,1)
  composite
  EcoSpold01Location=RER
  properties: water content 0.0582011, dry mass 0.945 kg, carbon content, fossil 0.0020219, wet mass 1 kg, carbon content, non-fossil 0.41662, heating value, net 14.11 MJ
  note on carbon content, fossil: Fossil C content was calculated after fossil C contents of chemicals used in the production of the paper (in Tab 9.4 ecoinvent v2.2 report 11_III, part 9).
  note on carbon content, non-fossil: Biogenic C content was calculated after biogenic C contents of chemicals used in the production of the paper (in Tab 9.4 ecoinvent v2.2 report 11_III, part 9). The cellulose content in 1 kg of paper (on a wet mas basis) was estimated as (1-chemical content), C content of cellulose was considered 0.44 kgC/kg dry mass (ecoinvent v2.2 report, n 15a, pg 40)
- anodising, aluminium sheet: 0.0137 m2; lognormal variance with pedigree 0.0507, pedigree (1,3,5,3,1)
  EcoSpold01Location=RER
  activityLink introduced to establish a direct link to the corresponding regional supply of this product
- nylon 6-6: 0.002 kg; lognormal variance with pedigree 0.0507, pedigree (1,3,5,3,1)
  EcoSpold01Location=RER
  properties: dry mass 1 kg, wet mass 1 kg, carbon content, fossil 0.637168, heating value, net 30.9 MJ
  note on carbon content, fossil: Nylon 66 is derived from hexamethylene diamine and adipic acid and has the following structure: -(HN-(CH2)6-NH-CO-(CH2)4-CO)n- (ecoinvent v2.2 report 11_II), C12H22N2O2. MW=226 g/mol.
  note on heating value, net: Assumed equal to Nylon-66. Reference: Walters, R. N., Hackett, S. M. and Lyon, R. E. (2000) ‘Heats of combustion of high temperature polymers’, Fire and Materials, 24(5), pp. 245–252. doi: 10.1002/1099-1018(200009/10)24:5<245::AID-FAM744>3.0.CO;2-7.
- sheet rolling, aluminium: 2.7 kg; lognormal variance with pedigree 0.0507, pedigree (1,3,5,3,1)
  activityLink introduced to establish a direct link to the corresponding regional supply of this product
  EcoSpold01Location=RER
- lubricating oil: 0.0134 kg; lognormal variance with pedigree 0.0507, pedigree (1,3,5,3,1)
  EcoSpold01Location=RER
  properties: dry mass 1 kg, carbon content, fossil 0.75, wet mass 1 kg, heating value, net 40.2 MJ
  note on carbon content, fossil: Lubricating oil is produced from diesel. C-content/dry mass of fats and oils considered 75%, from: ecoinvent v2.2 report, n 15a, pg 40
  note on heating value, net: Literature value, Source: IPCC 2006, 2006 IPCC Guidelines for National Greenhouse Gas Inventories, Prepared by the National Greenhouse Gas Inventories Programme, Eggleston H.S., Buendia L., Miwa K., Ngara T. and Tanabe K. (eds). Published: IGES, Japan
- heptane: 7.5e-6 kg; lognormal variance with pedigree 0.0507, pedigree (1,3,5,3,1)
  EcoSpold01Location=RER
  properties: heating value, net 44.77 MJ, wet mass 1 kg, dry mass 1 kg, carbon content, fossil 0.84
- powder coat, aluminium sheet: 2 m2; lognormal variance with pedigree 0.0521, pedigree (1,4,5,3,1)
  (same comment as for sheet rolling, aluminium)
- zinc coat, pieces: 0.0394 m2; lognormal variance with pedigree 0.0507, pedigree (1,3,5,3,1)
  (same comment as for sheet rolling, aluminium)
- diesel, burned in building machine: 2.47 MJ; lognormal variance with pedigree 0.1707, pedigree (1,3,5,3,1)
  EcoSpold01Location=GLO
  properties: heating value, net 1 MJ
- sawnwood, softwood, dried (u=10%), planed: 0.0498 m3; lognormal variance with pedigree 0.05, pedigree (1,1,5,1,1)
  EcoSpold01Location=RER
  composite
  properties: heating value, net 6625.26 MJ, carbon content, non-fossil 0.494, dry mass 450 kg, wet mass 495 kg, water content 0.1
  note on carbon content, non-fossil: C content of dry mass is 0.494 kgC/kg dry wood (ecoinvent v2.2 report 9)
- steel, low-alloyed, hot rolled: 0.0106 kg; lognormal variance with pedigree 0.0507, pedigree (1,3,5,3,1)
  EcoSpold01Location=RER
  properties: carbon content, fossil 0.005, wet mass 1 kg, dry mass 1 kg
  note on carbon content, fossil: Low alloyed steel composition given in Tab. 3.2 ecoinvent v2.2 report 10_partII. Steel assumed to have a C content of 0.5%
- zinc coat, coils: 0.938 m2; lognormal variance with pedigree 0.0507, pedigree (1,3,5,3,1)
  (same comment as for sheet rolling, aluminium)
- zinc coat, pieces, adjustment per micro-m: 50.6 m2; lognormal variance with pedigree 0.0507, pedigree (1,3,5,3,1)
  (same comment as for anodising, aluminium sheet)
- metal working factory: 1.26e-8 unit; lognormal variance with pedigree 0.3527, pedigree (2,4,5,3,1)
  (same comment as for sheet rolling, aluminium)
- xylene: 0.000112 kg; lognormal variance with pedigree 0.0507, pedigree (1,3,5,3,1)
  EcoSpold01Location=RER
  properties: dry mass 1 kg, carbon content, fossil 0.905061, wet mass 1 kg, heating value, net 38.84 MJ
- waste graphical paper: -0.00281 kg; lognormal variance with pedigree 0.0507, pedigree (1,3,5,3,1)
  EcoSpold01Location=CH
  production volume 0.00281 kg
    Calculated from the production volume of door, outer, wood-aluminium in proportion to the respective output amounts.
  properties: wet mass 1 kg, water content 0.126126, carbon content, non-fossil 0.454955, dry mass 0.888 kg, heating value, net 14.12 MJ
  note on heating value, net: Value taken from the general comment of the treatment dataset.
- heat, district or industrial, natural gas: 2.54762 MJ; lognormal variance with pedigree 0.0507, pedigree (1,3,5,3,1)
  EcoSpold01Location=RER
  properties: heating value, net 1 MJ
- chemical, organic: 0.00144 kg; lognormal variance with pedigree 0.05, pedigree (1,1,5,1,1)
  composite
  EcoSpold01Location=GLO
  properties: carbon content, fossil 0.628, dry mass 1 kg, wet mass 1 kg, heating value, net 19.03 MJ
  note on carbon content, fossil: This dataset is an unweighted average of 20 organic substances (listed in Tab 88.1, ecoinvent v2.2 report 8, part II), being part of the top100 chemicals included in this database. The C-content has also been calculated as an unweighted average of the C content of the substances composing this dataset.
- inert waste: 0 kg; pedigree (1,1,1,1,1)
  EcoSpold01Location=CH
  production volume 0 kg
    (same comment as for waste graphical paper)
  properties: wet mass 1 kg, dry mass 1 kg
- polyethylene, low density, granulate: 0.628 kg; lognormal variance with pedigree 0.05, pedigree (1,1,5,1,1)
  composite
  EcoSpold01Location=RER
  properties: carbon content, fossil 0.857143, heating value, net 42.47 MJ, wet mass 1 kg, dry mass 1 kg
  note on carbon content, fossil: Polyethylene is formed out of a huge amount of ethylene monomers (C2H4) (ecoinvent v2.2 report 11_II). MW=28 g/mol
- sheet rolling, steel: 10.5 kg; lognormal variance with pedigree 0.0507, pedigree (1,3,5,3,1)
  (same comment as for sheet rolling, aluminium)
- reinforcing steel: 10.9 kg; lognormal variance with pedigree 0.05, pedigree (1,1,5,1,1)
  EcoSpold01Location=RER
  composite
  properties: dry mass 1 kg, wet mass 1 kg, carbon content, fossil 0.004
- tap water: 5 kg; name tap_water_input; lognormal variance with pedigree 0.0507, pedigree (1,3,5,3,1)
  EcoSpold01Location=RER
  properties: dry mass 0.000337476 kg, water content 2962.17, carbon content, fossil 0.00178991, wet mass 1 kg
  note on carbon content, fossil: Bicarbonate content is 2.93 mol/m3. CO2 content is 0.1 mol/m3 (ecoinvent v2.2 report 8, Tab 93.1).
- alkyd paint, white, without water, in 60% solution state: 0.262 kg; lognormal variance with pedigree 0.0507, pedigree (1,3,5,3,1)
  EcoSpold01Location=RER
  properties: dry mass 1 kg, wet mass 1 kg, carbon content, non-fossil 0.161654, carbon content, fossil 0.414587, heating value, net 17.46 MJ
- melamine formaldehyde resin: 0.112 kg; lognormal variance with pedigree 0.0507, pedigree (1,3,5,3,1)
  EcoSpold01Location=RER
  properties: heating value, net 9.44 MJ, wet mass 1 kg, carbon content, fossil 0.311708, dry mass 1 kg
  note on carbon content, fossil: Chemical formula of the melamine formaldehide monomer was assumed to be C4H6N6O
- synthetic rubber: 0.312 kg; lognormal variance with pedigree 0.0507, pedigree (1,3,5,3,1)
  EcoSpold01Location=RER
  properties: wet mass 1 kg, carbon content, fossil 0.871949, dry mass 1 kg, heating value, net 26.42 MJ
  note on carbon content, fossil: EPDM (Ethylene-propene-diene terpolymer) rubber is a terpolymer of ethylene, propene, and a diene with the residual unsaturated portion of the diene in the side chain (ecoinvent v2.2 report 7-part XX & Ullmann). Chemical formula (deduced from Evidences of Solvent-Induced Miscibility in Polychloroprene-co-Ethylene-Propene Diene Terpolymer Blends, Dubey et al., Journal of Applied Polymer Science, 2009, 111:1884–1891): C20H35
- corrugated board box: 0.125 kg; lognormal variance with pedigree 0.0507, pedigree (1,3,5,3,1)
  EcoSpold01Location=RER
  properties: water content 0.0582011, heating value, net 12.86 MJ, carbon content, non-fossil 0.450248, wet mass 1 kg, dry mass 0.945 kg, carbon content, fossil 0.00365437
- waste wood, untreated: -0.112 kg; lognormal variance with pedigree 0.0521, pedigree (1,4,5,3,1)
  EcoSpold01Location=CH
  production volume 0.112 kg
    (same comment as for waste graphical paper)
  properties: carbon content, non-fossil 0.48632, water content 0.25, dry mass 0.8 kg, wet mass 1 kg, heating value, net 13.99 MJ
  note on carbon content, non-fossil: Tab A.4, ecoinvent v2.2 report 13_I. C content has been referred to 1 kg DM,
- aluminium, wrought alloy: 2.85 kg; lognormal variance with pedigree 0.05, pedigree (1,1,5,1,1)
  composite
  EcoSpold01Location=RER
  properties: wet mass 1 kg, dry mass 1 kg
- extrusion, plastic film: 0.00312 kg; lognormal variance with pedigree 0.0507, pedigree (1,3,5,3,1)
  (same comment as for sheet rolling, aluminium)
- cement mortar: 50 kg; lognormal variance with pedigree 0.0507, pedigree (1,3,5,3,1)
  EcoSpold01Location=CH
  properties: wet mass 1 kg, dry mass 1 kg
- municipal solid waste: -0.162 kg; lognormal variance with pedigree 0.05, pedigree (1,1,5,1,1)
  composite
  EcoSpold01Location=CH
  production volume 0.162 kg
    (same comment as for waste graphical paper)
  properties: dry mass 0.771 kg, water content 0.297017, wet mass 1 kg, carbon content, non-fossil 0.261655, carbon content, fossil 0.171549, heating value, net 11.74 MJ
  note on carbon content, non-fossil: MSW composition in tab 4.1, ecoinvent v2.2 report 13_I. C content referred to 1 kg DM
- waste polyethylene: -0.628 kg; lognormal variance with pedigree 0.05, pedigree (1,1,5,1,1)
  composite
  EcoSpold01Location=CH
  production volume 0.628 kg
    (same comment as for waste graphical paper)
  properties: carbon content, fossil 0.825301, water content 0.00401606, wet mass 1 kg, dry mass 0.996 kg, heating value, net 42.47 MJ
  note on carbon content, fossil: C content in 1 kg DM was calculated using data in Tab A.1, ecoinvent v2.2 report 13_I
- inert waste: -0.00600825, -5.17472e-5 kg (2 entries); lognormal variance with pedigree 0.0507, pedigree (1,3,5,3,1)
  EcoSpold01Location=CH
  production volume 0.00606 kg

## Emissions to nature
- Water [air, unspecified]: 0.0012 m3; name water_to_air_unspecified; = (tap_water_input/1000*fraction_TW_to_air); lognormal variance with pedigree 0.0807, pedigree (2,2,5,1,1)
  Calculated value based on literature values and expert opinion. See comments in the parametres' comment field.
  property fraction, origin: salt water 0; name fraction_origin_salt_water
  property fraction, origin: fresh water 1; name fraction_origin_fresh_water
  property fraction, origin: unspecified 0; name fraction_origin_unspecified
- Water [water, unspecified]: 0.0038 m3; name water_to_water_unspecified; = (tap_water_input/1000)*(1-fraction_TW_to_air); lognormal variance with pedigree 0.0807, pedigree (2,2,5,1,1)
  (same comment as for Water)
  property water in wet mass 1000 kg; name WWM
  property carbon content, fossil 0; name C_content_fossil
  property carbon content, non-fossil 0; name C_content_non_fossil
  property fraction, origin: salt water 0; name fraction_origin_salt_water_Ww
  property fraction, origin: fresh water 1; name fraction_origin_fresh_water_Ww
  property fraction, origin: unspecified 0; name fraction_origin_unspecified_Ww
  property dry mass 0 kg; name DM
  property wet mass 1000 kg; name WM

## Sampling procedure
Published study, Internet search

## Extrapolations
This dataset has been extrapolated from year 2005 to the year of the calculation (2021). The uncertainty has been adjusted accordingly.

## Review by Rolf Frischknecht 2007-11-07
passed
