# building construction, hostel

Dataset: EcoSpold 2, unit process
Geography: PE
Time period: 2017-01-01 to 2021-12-31
Technology level: current
Classification: ISIC rev.4 ecoinvent: 4100:Construction of buildings
Synonyms: backpacker hotel building construction; hostel building construction; backpacker hostel building construction
Tags: single enterprise data
Scenario: Business-as-Usual
System model: Allocation, cut-off by classification
Generated by: Viachaslau Filimonau
Published in: Filimonau, V. 2018
Database: ecoinvent
isCopyrightProtected: true
accessRestrictedTo: 1

## General comment
This dataset represents a tourist accommodation facility located in Barranco, Lima, Peru. The case study hotel is classed as hostel. It was first opened in 2002 although the building where the hostel resides was constructed in early 1900s. Prior to becoming a hostel, the building was used as residence. The hostel has capacity of 56 beds and offers rooms of the following types (total number of rooms is given in brackets): double (2), triple (1), family (1) and shared use (8). The hostel has 1 floor which hosts a lobby, a restaurant and a bar. Laundry is outsourced and there is no parking available on site. The load bearing structure of hotel building is made of concrete and the facade is made of concrete and brickwork. The hostel occupies a total area of 700 m2 where the building itself occupies the plot of 550 m2. The average annual occupancy of the hostel is 54% which is equal to 11037 guest nights per year. The hostel"s occupancy is somewhat lower than the country"s average of 66%
(Source: Hotel News Now 2015. The state of Peru"s tourism, hotels. Available from: http://www.hotelnewsnow.biz/Articles/27650/The-state-of-Perus-tourism-hotels Accessed 16 March 2018) which can in part be explained by the over-saturated market of hostels in Lima. Lima is a popular destination with backpackers and budget travellers who visit Lima as a place for a short stay prior to exploring the interior of Peru. This has triggered development of the hostel sector in Lima with subsequent enhanced competition.

## Included activities start
This dataset is modelled to include the inputs for the construction of a hotel building. This includes:energy and water used in construction, land transformation, building structure and outer building shell, inner walls, roofs, ceiling and windows, doors, floors, finishing and painting, bathroom equipment. Activities include hotel building construction with lifeframe of the hotel building of 75 years. Maintenance is included only through the consideration of the lifetime of the different exchanges. For example, windows are assumed to have a lifetime of 35 years, therefore the exchange amount is multiplied by 75years / 35 years=2.14. Hotel building foundation is included in the form of estimates based on the hotel area and construction practices in Peru.

## Included activities end
Activities end with 1 unit of hotel building, including maintenance. Due to data availability, the following building construction processes have been excluded: cables, gutter, drains, ventilation.

## Geography
The hotel is based in Lima, Peru.

## Technology
The level of technology is considered current.

## Time period
The survey was done in the year 2017 with the data provided covering the operational year 2016-2017.

## Parameters
- volume: 1650 m3; = GFA*3
  Building volume. Calculated by multiplying gross floor area (GFA) by the height of the floor. Height of the floor is assumed to be equal to 3 meters.
- gross floor area: 550 m2; name GFA
  This represents gross floor area for buildings.
- occupancy rate/year: 0.54 dimensionless; name occupancy_y
  The case study hotel reports average occupancy of 54%.

## Reference product
- building, hostel: 1 unit; name hostel; source Hostels 2017 2017; By-product classification allocatable product
  production volume 33 unit; name RP_PV
    Annual production volume is estimated based on the number of hostel properties worldwide and the share of Peru in the global tourism market. It is estimated that the global hostel market is made up by 22000 properties. Source: Hostels 2017. Lisbon and Porto Hostel Market Research & Forecast Report. Available from: http://www.colliers.com/-/media/files/emea/portugal/research/2017/2017_hostels_report_eng.pdf?la=en-gb Accessed 22 March 2018. The share of Peru in the total number of international tourist arrivals is 1.9%. Source: UNWTO Tourism Highlights 2017 Edition. Available from: https://www.e-unwto.org/doi/pdf/10.18111/9789284419029 Accessed 22 March 2018. This suggests that the hostel market in Peru can be estimated at 22000*0.019=418 properties. Then, between 2009 and 2014, the Peru’s hotel supply had an average growth of 8% per year. Source: Hotel News Now 2015. The state of Peru’s tourism, hotels. Available from: http://www.hotelnewsnow.biz/Articles/27650/The-state-of-Perus-tourism-hotels Accessed 22 March 2018. Assuming this growth distributes equally across various categories of tourist accommodation facilities in Peru, it can be estimated that the number of hostel properties annually constructed in Peru is equal to: 418 hostels * 0.08 = 33 hostels.
  property price 303070 EUR2005; name hostel_price_EUR2005
    Calculated based on inputs: The price of the product has been calculated as a sum of the values of the material and energy inputs for this product. This value is therefore a rough estimation. It may underestimate the real price since there are additional expenses when producing any product. These expences can include for example labour costs, treatment of waste materials and profit for the producer. Please consider carefully whether this level of data quality is acceptable for your application.
  property lifetime capacity 1.533e6 guest night; name lifetime_guests; = 56*365*lifetime
    The total capacity of the hostel is 56 guests. The lifetime capacity is calculated accordingly.
  property lifetime 75 year; name lifetime
    The lifetime of a hotel building is assumed to be equal to 75 years which is an average of the 50-100 years" estimates available in the literature. Source: Filimonau et al. 2011. Reviewing the carbon footprint analysis of hotels: Life Cycle Energy Analysis (LCEA) as a holistic method for carbon impact appraisal of tourist accommodation. Journal of Cleaner Production, 19, 1917-1930.

## By-products
- iron scrap, unsorted: 0 kg; CPC 39310: Slag, dross, scalings and other waste from the manufacture of iron or steel; By-product classification Recyclable; pedigree (1,1,1,1,1)
  Calculated value. Amount of output material is set equal to the amount of respective input material, steel.
  production volume 0 kg; = RP_PV * (BP_amount_1 / hostel)
    Calculated from production volume of reference product using the relative outputs.
  property price 0.149 EUR2005; name BP_amount_1_price_EUR2005
    Temporary price data. Calculated as 90% of purchasers price based on: estimated at 85% of sorted scrap
  property carbon content 0
    carbon content on a dry matter basis (reserved; not for manual entry)
  properties: water content 0, water in wet mass 0 kg, wet mass 1 kg, dry mass 1 kg, carbon content, non-fossil 0, carbon content, fossil 0, carbon allocation 0 kg

## Inputs from technosphere
- door, inner, wood: 116.25 m2; name door_inner_w; = 62*(lifetime/40); lognormal variance with pedigree 0.122825, pedigree (1,4,2,2,5)
  Calculated value. The amount of exchange is calculated as: amount of input product * (lifetime of the hotel / lifetime of the product). Assumed service life of 40 years. Source: Cobut et al. 2015. The environmental footprint of interior wood doors in non-residential buildings - part 1: life cycle assessment. Journal of Cleaner Production, 109, 232-246. In terms of outputs, assumed to have gone to used door, inner, wood.
  properties: dry mass 26.22 kg, wet mass 27.6 kg, water content 0.0526316, carbon content, non-fossil 0.715131, carbon content, fossil 0.074995
- sanitary ceramics: 1500 kg; name sanitary; = ((6*15)*(lifetime/15)+(6*35)*(lifetime/15)); lognormal variance with pedigree 0.422225, pedigree (1,4,2,2,5)
  Calculated value. The amount of exchange is calculated as: amount of input product * (lifetime of the hotel / lifetime of the product). This flow represents ceramic washing basin and ceramic toilet seat. The hostel has 6 washing basins and 6 toilet seats. Washing basins are assumed to weigh 15kg (information taken from IKEA (2018) for the product "TÖRNVIKEN Countertop wash-basin", source retrieved from: http://www.ikea.com/gb/en/products/washstands-taps/wash-basins/t%C3%B6rnviken-countertop-wash-basin-white-art-90291518/, accessed 12 Feb 2018). The assumed lifetime is 15 years. Toilet seats are assumed to weigh 35kg (information taken from B&Q (2018) for the product "COOKE & LEWIS FABIENNE CLOSE-COUPLED TOILET WITH SOFT CLOSE SEAT", source retrieved from: https://www.diy.com/departments/cooke-lewis-fabienne-close-coupled-toilet-with-soft-close-seat/1142804_BQ.prd?B/R_Toilets_C_CT, accessed 12 Feb 2018). The assumed lifetime is 15 years. In terms of outputs, assumed to have gone to inert waste.
  properties: dry mass 1 kg, wet mass 1 kg
- glass wool mat: 440 kg; name wool_mat; = (110*100/1000*40)*(lifetime/75); lognormal variance with pedigree 0.122825, pedigree (1,4,2,2,5)
  Calculated value. The amount of exchange is calculated as: amount of input product * (lifetime of the hotel / lifetime of the product). Combined of all instances of use across the building structure, walls and ceiling. Assumed service life of 75 years which is equal to the service life of the hotel building with minor refurbishments throughout. Assumed thickiness of glass wool 100 mm. Source: Knauf Insulation 2018. Knauf Insulation. Available from: http://www.knaufinsulation.co.uk/products/glass-mineral-wool-rolls/loft-insulation-rolls/earthwool-loft-roll-44 Accessed 16 March 2018. The density of glass wool is assumed to be 40kg/m3 based on the specifications in ecoinvent dataset "glass wool mat production, CH 2000" accessed 22 Janaury 2018. In terms of outputs, assumed to have gone to waste glass.
  properties: carbon content, fossil 0.0107327, dry mass 1 kg, wet mass 1 kg
  note on carbon content, fossil: A share of 16 w-% for the binders is taken into account. The binder used in this study is a mixture of phenol, formaldehyde and urea resins (ecoinvent v2.2 report 16_part XIV), and the C content was calculated as a weigthed average of phenol, formaldehyde and urea C content.
- waste polyvinylchloride: -2371.88 kg; name waste_polyv; = (PVC)*-1; lognormal variance with pedigree 0.122825, pedigree (1,4,2,2,5)
  Calculated value. Amount of output material is set equal to the amount of respective input material, PVC.
  production volume 78271.9 kg; = RP_PV * (waste_polyv / hostel)
    Calculated from production volume of reference product using the relative outputs.
  property price 0 EUR2005; name waste_polyv_price_EUR2005
  properties: carbon content, fossil 0.440882, dry mass 0.998 kg, heating value, net 21.51 MJ, wet mass 1 kg, water content 0.00200401
  note on heating value, net: Value taken from the general comment of the treatment dataset.
- steel, low-alloyed, hot rolled: 604.45 kg; name steel; = (110*0.7/1000*7850); lognormal variance with pedigree 0.122825, pedigree (1,4,2,2,5)
  Calculated value. Combined of all instances of use across the building structure and walls. The amount of exchange is calculated as: amount of input product * (lifetime of the hotel / lifetime of the product). Assumed thickness of steel 0.7 mm. Source: MCRMA 2004. PROFILED METAL ROOFING DESIGN GUIDE. MCRMA Technical Paper No. 6. Available from: http://www.mcrma.co.uk/pdf/mcrma_t06.pdf Accessed 16 March 2018. Assumed density of steel 7850 kg/m3. Source: The Calculator site 2018. Metal converter. Available from: https://www.thecalculatorsite.com/conversions/substances/metal.php Accessed 23 March 2018. Assumed service life of 75 years which is equal to the service life of the hotel building with minor refurbishments throughout. In terms of outputs, assumed to have gone to iron scrap.
  properties: dry mass 1 kg, wet mass 1 kg, carbon content, fossil 0.005
  note on carbon content, fossil: Low alloyed steel composition given in Tab. 3.2 ecoinvent v2.2 report 10_partII. Steel assumed to have a C content of 0.5%
- used door, outer, wood-glass: -18.75 m2; name BP_amount_2; = (door_outer)*-1; lognormal variance with pedigree 0.122825, pedigree (1,4,2,2,5)
  Calculated value. Amount of output material is set equal to the amount of respective input material, door, outer, wood-glass.
  production volume 618.75 m2; = RP_PV * (BP_amount_2 / hostel)
    Calculated from production volume of reference product using the relative outputs.
  property price 0 EUR2005; name BP_amount_2_price_EUR2005
  properties: dry mass 34.675 kg, carbon content, non-fossil 0.184519, carbon content, fossil 0.032074, wet mass 36.5 kg, water content 0.0526316
- tap water: 275000 kg; name tap_water; = (0.5*1000*GFA); lognormal variance with pedigree 0.422225, pedigree (1,4,2,2,5)
  Calculated value. Assuming that 0.5 kl per 1 m2 of floor area (GFA) is required in building construction. Source: Crawford et al. 2005. In terms of outputs assumed to have gone to wastewater. Value double checked in McCormack, et al. 2007.
  Reference:
  Crawford, Robert and Treloar, Graham 2005, An assessment of the energy and water embodied in commercial building construction, in Australian Life Cycle Assessment Conference (4th : 2005 : Novotel, Sydney, N.S.W.), Australian Life Cycle Assessment Society, Sydney, N.S.W., pp. 1-10.
  McCormack, et al. 2007. Modelling direct and indirect water requirements of construction. Building research & information. 35(2), 156-162.
  properties: wet mass 1 kg, water content 2962.17, carbon content, fossil 0.00178991, dry mass 0.000337476 kg
  note on carbon content, fossil: Bicarbonate content is 2.93 mol/m3. CO2 content is 0.1 mol/m3 (ecoinvent v2.2 report 8, Tab 93.1).
- sawnwood, beam, softwood, raw, dried (u=10%): 36 m3; name beam; lognormal variance with pedigree 0.122825, pedigree (1,4,2,2,5)
  Calculated value. Combined of all instances of use across the building structure and walls. The amount of exchange is calculated as: amount of input product * (lifetime of the hotel / lifetime of the product). Assumed service life of 75 years which is equal to the service life of the hotel building with minor refurbishments throughout. In terms of outputs, assumed to have gone to waste wood, untreated.
  property wet mass 425.92 kg; name beam_WM
  properties: dry mass 387.2 kg, water content 0.1, heating value, net 6218.91 MJ, carbon content, non-fossil 0.494
- concrete, normal: 563 m3; name concrete; = 513+(200*0.5*0.5); lognormal variance with pedigree 0.122825, pedigree (1,4,2,2,5)
  Calculated value.
  Used here in place of adobe reported by the hotel as concrete represents a more conventional construction material. Combined of all instances of use across the building structure and walls (513m3). The amount of exchange is calculated as: amount of input product * (lifetime of the hotel / lifetime of the product). Assumed service life of 75 years which is equal to the service life of the hotel building with minor refurbishments throughout.
  Additionally the concrete for foundations is accounted for (50m3). Estimated value based on the hotel area and construction practices in Peru. The foundation is assumed to be 200 m long, 0.5 m wide and 0.5 m deep. In terms of outputs assumed to have gone to waste concrete.
  property wet mass 2380 kg; name concrete_WM
  properties: water content 0.086758, dry mass 2190 kg
- flat glass, coated: 2343.75 kg; name glass; = (125*5)*(lifetime/20); lognormal variance with pedigree 0.122825, pedigree (1,4,2,2,5)
  Calculated value. The amount of exchange is calculated as: amount of input product * (lifetime of the hotel / lifetime of the product). Assuming 5 kg of window glass is required to cover 1m2 of area. Source: Glass Weight Calculator 2018. Glass weight calculator. Available from: https://www.glass-ts.com/glass-weight-calculator Accessed 16 March 2018. Assumed average service life of 20 years. Source: Howard et al. 2007. Comparative service life assessment of window systems. Available from: http://www.fwpa.com.au/images/marketaccess/PR07.1047%20Final%20Report%20WEB.pdf Accessed 16 March 2018. In terms of outputs assumed to have gone to waste glass.
  properties: dry mass 1 kg, wet mass 1 kg
- window frame, wood, U=1.5 W/m2K: 267.857 m2; name window_w; = 125*(lifetime/35); lognormal variance with pedigree 0.122825, pedigree (1,4,2,2,5)
  Calculated value. The amount of exchange is calculated as: amount of input product * (lifetime of the hotel / lifetime of the product). Assumed service life of 35 years. Source: Asif et al. 2002. LIFE CYCLE OF WINDOW MATERIALS - A COMPARATIVE ASSESSMENT. Available from: http://ohp.parks.ca.gov/pages/1054/files/uk%20window%20frame%20lca.pdf Accessed 16 March 2018.
  properties: dry mass 76.19 kg, water content 0.0526316, heating value, net 1073.43 MJ, carbon content, fossil 0.0315533, wet mass 80.2 kg, carbon content, non-fossil 0.615911
  note on heating value, net: Assumed equal to a regular wood product i.e. "sawnwood, softwood, dried (u=10%), planed".
- wastewater, average: -275 m3; name wastewater; = (tap_water/1000)*-1; lognormal variance with pedigree 0.122825, pedigree (1,4,2,2,5)
  Calculated value. The amount is set equal to the amount of input material, tap water with conversion from kg to m3. 1 m3 of water is assumed to be equal to 1000 kg of water.
  production volume 9075 m3; = RP_PV * (wastewater / hostel)
    Calculated from production volume of reference product using the relative outputs.
  property price 0 EUR2005; name wastewater_price_EUR2005
  properties: dry mass 0.346837 kg, wet mass 1000 kg, carbon content, non-fossil 0.194039, water content 2882.2
  note on carbon content, non-fossil: 0.0673 kg TOC/m3 (Tab A.17, ecoinvent v2.2 report 13_I). TOC was considered as Total Carbon.
- waste glass: -2783.75 kg; name waste_glass; = (glass+ wool_mat)*-1; lognormal variance with pedigree 0.122825, pedigree (1,4,2,2,5)
  Calculated value. Amount of output material is set equal to the amount of respective input material, flat glass, coated, and glass wool mat.
  production volume 91863.8 kg; = RP_PV * (waste_glass / hostel)
    Calculated from production volume of reference product using the relative outputs.
  property price 0 EUR2005; name waste_glass_price_EUR2005
  properties: wet mass 1 kg, dry mass 1 kg, heating value, net 0.05 MJ
  note on heating value, net: Value extracted from "treatment of waste glass, open dump, very wet infiltration class (1000mm)"
- polyvinylchloride, bulk polymerised: 2371.88 kg; name PVC; = (550*2.3)*(lifetime/40); lognormal variance with pedigree 0.122825, pedigree (1,4,2,2,5)
  Calculated value. The amount of exchange is calculated as: amount of input product * (lifetime of the hotel / lifetime of the product). Used here in place of the floor material. No data on the type of flooring was provided by the case study hotel so PVC was used as proxy. This is because PVC flooring is most cost-effective for hotels. Source: Mikulski 2015. TOP HOSPITALITY FLOORING OPTIONS FOR HOTELS. Available from: http://www.businessflooring.net/blog/top-hospitality-flooring-options-for-hotels Accessed 16 March 2018. Combined of all instances of use across the building. Assumed density of PVC 2.3 kg/m2. Source: The colour flooring company 2018. VINYL FLOORING TECHNICAL SPECIFICATIONS. Available from: https://www.colourflooring.co.uk/pages/vinyl-flooring-technical-specifications Accessed 16 March 2018. Assumed service life of PVC floors is 40 years. Source: Bowyer et al. 2009. LIFE CYCLE ASSESSMENT OF FLOORING MATERIALS A GUIDE TO INTELLIGENT SELECTION. Doviteil Partners. Available from: http://www.dovetailinc.org/report_pdfs/2009/dovetailfloors0809.pdf Accessed 16 March 2018. In terms of outputs, assumed to have gone to waste PVC.
  properties: carbon content, fossil 0.387097, dry mass 1 kg, heating value, net 21.5 MJ, wet mass 1 kg
  note on carbon content, fossil: Monomer is vynyl chloride, C2H3Cl (ecoinvent v2.2 report 11_II). MW=62 g/mol
- acrylic varnish, without water, in 87.5% solution state: 1215 kg; name varnish; = (540/10*1.5)*(lifetime/5); lognormal variance with pedigree 0.122825, pedigree (1,4,2,2,5)
  Calculated value. The amount of exchange is calculated as: amount of input product * (lifetime of the hotel / lifetime of the product). Used here in place of all varnishes. Combined of all instances of use across the building structure and walls. Assuming 1 liter of paint is required to paint 10m2 and weighs 1.5 kg. Source: BQ 2018. Wall painting calculator. Available from: https://www.diy.com/help-advice/wall-painting-calculator/Dev_npcart_100008.art Accessed 16 March 2018. Assumed service life of 5 years which is equivalent to the period of major refurbishments in hotels. Source: Filimonau et al. 2011. Reviewing the carbon footprint analysis of hotels: Life Cycle Energy Analysis (LCEA) as a holistic method for carbon impact appraisal of tourist accommodation. Journal of Cleaner Production, 19(17-18), 1917-1930. In terms of outputs assumed to have gone to waste paint on wall.
  properties: dry mass 1 kg, carbon content, fossil 0.674725, wet mass 1 kg, heating value, net 20.44 MJ
  note on carbon content, fossil: Isobornyl acrylate (C13H20O2) has been used as a representative example of acrylic varnish (Turpentines, Ullmann).The formulation of this specific varnish includes 50% acrylic binder
- door, outer, wood-glass: 18.75 m2; name door_outer; = 10*(lifetime/40); lognormal variance with pedigree 0.122825, pedigree (1,4,2,2,5)
  Calculated value. The amount of exchange is calculated as: amount of input product * (lifetime of the hotel / lifetime of the product). Assumed service life of 40 years. Source: Cobut et al. 2015. The environmental footprint of interior wood doors in non-residential buildings - part 1: life cycle assessment. Journal of Cleaner Production, 109, 232-246. In terms of outputs, assumed to have gone to used door, outer, wood-glass.
  properties: carbon content, fossil 0.032074, water content 0.0526316, carbon content, non-fossil 0.184519, wet mass 36.5 kg, dry mass 34.675 kg
- electricity, low voltage: 495 kWh; name el; = 0.3* volume; lognormal variance with pedigree 0.422225, pedigree (1,4,2,2,5)
  Calculated value. Assuming that 0.30 kWh/m3 of electricity is necessary to construct a building. Source: Zabalza et al. 2013. Use of LCA as a Tool for Building Ecodesign. A Case Study of a Low Energy Building in Spain. Energies, 6(8), 3901-3921.
- used door, inner, wood: -116.25 m2; name used_door; = (door_inner_w)*-1; lognormal variance with pedigree 0.122825, pedigree (1,4,2,2,5)
  Calculated value. Amount of output material is set equal to the amount of respectiveinput material, door, inner, wood.
  production volume 3836.25 m2; = RP_PV * (used_door / hostel)
    Calculated from production volume of reference product using the relative outputs.
  property price 0 EUR2005; name used_door_price_EUR2005
  properties: carbon content, fossil 0.074995, water content 0.0526316, dry mass 26.22 kg, wet mass 27.6 kg, carbon content, non-fossil 0.715131
- waste wood, untreated: -184560 kg; name waste_wood; = (beam* beam_WM+ plywood_i* ply_i_WM)*-1; lognormal variance with pedigree 0.122825, pedigree (1,4,2,2,5)
  Calculated value. Includes all categories of wood waste. Conversion from m3 to kg is based on the respective densities, see property section.
  production volume 6.09048e6 kg; = RP_PV * (waste_wood / hostel)
    Calculated from production volume of reference product using the relative outputs.
  property price 0 EUR2005; name waste_wood_price_EUR2005
  properties: dry mass 0.8 kg, carbon content, non-fossil 0.48632, wet mass 1 kg, water content 0.25, heating value, net 13.99 MJ
- waste paint on wall: -4815 kg; name waste_paint; = (varnish+ paint)*-1; lognormal variance with pedigree 0.122825, pedigree (1,4,2,2,5)
  Calculated value. Amount of output material is set equal to the amount of respective input material, alkyd paint and acrylic varnish.
  production volume 158895 kg; = RP_PV * (waste_paint / hostel)
    Calculated from production volume of reference product using the relative outputs.
  property price 0 EUR2005; name waste_paint_price_EUR2005
  properties: carbon content, fossil 0.65, heating value, net 19.7 MJ, dry mass 1 kg, wet mass 1 kg
- used window frame, wood: -267.857 m2; name used_win; = (window_w)*-1; lognormal variance with pedigree 0.122825, pedigree (1,4,2,2,5)
  Calculated value. Amount of output material is set equal to the amount of respective input material, window frame, wood.
  production volume 8839.29 m2; = RP_PV * (used_win / hostel)
    Calculated from production volume of reference product using the relative outputs.
  property price 0 EUR2005; name used_win_price_EUR2005
  properties: dry mass 76.19 kg, carbon content, fossil 0.0315533, water content 0.0526316, wet mass 80.2 kg, carbon content, non-fossil 0.615911
- ceramic tile: 18450 kg; name tile; = (100*12.3)*(lifetime/5); lognormal variance with pedigree 0.122825, pedigree (1,4,2,2,5)
  Calculated value. The amount of exchange is calculated as: amount of input product * (lifetime of the hotel / lifetime of the product). Combined of all instances of use across the building structure and walls. Assuming 12.3 kg of tiles is required to cover 1 m2. Source: Victoria Plumbing 2018. British ceramic tile. Available from: https://victoriaplum.com/product/british-ceramic-tile-metro-bevel-white-gloss-tile-100mm-x-200mm Accessed 16 March 2018. Assumed service life of 5 years which is equivalent to the period of major refurbishments in hotels. Source: Filimonau et al. 2011. Reviewing the carbon footprint analysis of hotels: Life Cycle Energy Analysis (LCEA) as a holistic method for carbon impact appraisal of tourist accommodation. Journal of Cleaner Production, 19(17-18), 1917-1930. In terms of outputs assumed to have gone to insert waste.
  properties: dry mass 1 kg, wet mass 1 kg
- plywood: 205.622 m3; name plywood_i; = ((148*19/1000)+(990*19/1000))+184; lognormal variance with pedigree 0.122825, pedigree (1,4,2,2,5)
  Calculated value. Combined of all instances of use across the building structure, walls and ceiling. The amount of exchange is calculated as: amount of input product * (lifetime of the hotel / lifetime of the product). Assumed service life of 75 years which is equal to the service life of the hotel building with minor refurbishments throughout. Assumed thickness of plywood is 19 mm. Source: Plymaster 2010. Interior plywood. Available from: http://plymaster.com.au/plywood-products-interior.htm#/3 Accessed 16 March 2018. In terms of outputs, assumed to have gone to waste wood, untreated.
  property wet mass 823 kg; name ply_i_WM
  properties: dry mass 768.6 kg, price 400 EUR2005, carbon content, fossil 0.09783, carbon content, non-fossil 0.409818, heating value, net 11688.9 MJ, water content 0.070778
- alkyd paint, white, without water, in 60% solution state: 3600 kg; name paint; = (1600/10*1.5)*(lifetime/5); lognormal variance with pedigree 0.122825, pedigree (1,4,2,2,5)
  Calculated value. The amount of exchange is calculated as: amount of input product * (lifetime of the hotel / lifetime of the product). Used here in place of water soluble acrylic paint and alkyd enamel. Combined of all instances of use across the building structure and walls. Assuming 1 liter of paint is required to paint 10m2 and weighs 1.5 kg. Source: BQ 2018. Wall painting calculator. Available from: https://www.diy.com/help-advice/wall-painting-calculator/Dev_npcart_100008.art Accessed 16 March 2018. Assumed service life of 5 years which is equivalent to the period of major refurbishments in hotels. Source: Filimonau et al. 2011. Reviewing the carbon footprint analysis of hotels: Life Cycle Energy Analysis (LCEA) as a holistic method for carbon impact appraisal of tourist accommodation. Journal of Cleaner Production, 19(17-18), 1917-1930. In terms of outputs assumed to have gone to waste paint on wall.
  properties: heating value, net 17.46 MJ, wet mass 1 kg, dry mass 1 kg, carbon content, non-fossil 0.161654, carbon content, fossil 0.414587
- waste concrete: -1.33994e6 kg; name waste_concrete; = ((concrete*concrete_WM))*-1; lognormal variance with pedigree 0.122825, pedigree (1,4,2,2,5)
  Calculated value. Amount of output material is set equal to the amount of respective input material, concrete, normal. Also contains waste concrete from hotel foundation. Conversion is made from m3 of concrete to kg of concrete based on the wet mass property of concrete (see properties section).
  production volume 4.4218e7 kg; = waste_concrete*RP_PV
    Calculated from production volume of reference product using the relative outputs.
  property price 0 EUR2005; name waste_concrete_price_EUR2005
  properties: wet mass 1 kg, water content 1, dry mass 0.5 kg
- diesel, burned in building machine: 8256.6 MJ; name diesel; = 1.39*3.6*volume; lognormal variance with pedigree 0.422225, pedigree (1,4,2,2,5)
  Calculated value. Assuming that 1.39 kWh/m3 of diesel is necessary to construct a building. Source: Zabalza et al. 2013. Use of LCA as a Tool for Building Ecodesign. A Case Study of a Low Energy Building in Spain. Energies, 6(8), 3901-3921. Assuming 1 kWh = 3.6 MJ.
  properties: heating value, net 1 MJ
- inert waste: -19950 kg; name inert_w; = (sanitary+ tile)*-1; lognormal variance with pedigree 0.122825, pedigree (1,4,2,2,5)
  Calculated value. Amount of output material is set equal to the amount of respective input material, sanitary ceramics. It also contains waste ceramic tile.
  production volume 658350 kg; = RP_PV * (inert_w / hostel)
    Calculated from production volume of reference product using the relative outputs.
  property price 0 EUR2005; name inert_w_price_EUR2005
  properties: wet mass 1 kg, dry mass 1 kg
- iron scrap, unsorted: -604.45 kg; lognormal variance with pedigree 0.122825, pedigree (1,4,2,2,5)
  (same comment as for iron scrap, unsorted)
  production volume 19946.8 kg
  properties: wet mass 1 kg, dry mass 1 kg

## Inputs from nature
- Occupation, urban, continuously built [natural resource, land]: 41250 m2*year; = 550* lifetime; lognormal variance with pedigree 0.162225, pedigree (1,4,2,2,5)
  Calculated value. Based on survey data, the gross floor area is 550 m2, multiplied by the lifetime of the building.
- Transformation, from urban, continuously built [natural resource, land]: 550 m2; lognormal variance with pedigree 0.242225, pedigree (1,4,2,2,5)
  Calculated value. Based on survey data, the gross floor area is 550 m2.
- Transformation, to urban, continuously built [natural resource, land]: 550 m2; lognormal variance with pedigree 0.242225, pedigree (1,4,2,2,5)
  Calculated value. Based on survey data, the gross floor area is 550 m2.

## Sampling procedure
Primary data from the hotel supplemented with literature-based calculations and estimates, where appropriate.

## Extrapolations
This dataset has been extrapolated from year 2018 to the year of the calculation (2021). The uncertainty has been adjusted accordingly.
