# maintenance, motor scooter

Dataset: EcoSpold 2, unit process
Geography: RoW
Time period: 2007-01-01 to 2021-12-31
Technology level: current
Classification: EcoSpold01Categories: transport systems/road
Classification: ISIC rev.4 ecoinvent: 4540:Sale, maintenance and repair of motorcycles and related parts and accessori
Tags: ConvertedDataset
Scenario: Business-as-Usual
System model: Allocation, cut-off by classification
Generated by: Marianne Leuenberger
Published in: M. Leuenberger 2010
Database: ecoinvent
isCopyrightProtected: true
accessRestrictedTo: 1

## General comment
The data reflects the replacement of parts for the maintenance of a scooter of c 90kg (50cc). Mainly plastic and steel parts are replaced. Battery replacement: once. Life expectancy battery: 25'000 km.
[This dataset was already contained in the ecoinvent database version 2. It was not individually updated during the transfer to ecoinvent version 3. Life Cycle Impact Assessment results may still have changed, as they are affected by changes in the supply chain, i.e. in other datasets. This dataset was generated following the ecoinvent quality guidelines for version 2. It may have been subject to central changes described in the ecoinvent version 3 change report (http://www.ecoinvent.org/database/ecoinvent-version-3/reports-of-changes/), and the results of the central updates were reviewed extensively. The changes added e.g. consistent water flows and other information throughout the database. The documentation of this dataset can be found in the ecoinvent reports of version 2, which are still available via the ecoinvent website. The change report linked above covers all central changes that were made during the conversion process.]

## Included activities end
This data sets includes the maintenance of a scooter throughout its life cycle.

## Geography
Data cover maintenance in Switzerland

## Technology
Maintenance of a scooter (50cc)

## Parameters
- fraction, tap water, to air: 0.15 dimensionless; name fraction_TW_to_air; lognormal variance with pedigree 0.092025, pedigree (4,4,3,2,4)
- fraction, process water, to air: 0.15 dimensionless; name fraction_PW_to_air; lognormal variance with pedigree 0.092025, pedigree (4,4,3,2,4)

## Reference product
- maintenance, motor scooter: 1 unit; CPC 87142: Maintenance and repair services of motorcycles; By-product classification allocatable product
  EcoSpold01Location=CH
  production volume 3.96633 unit
    This is a placeholder value that does not reflect real-world production volumes. This dataset does not currently require a real-world production volume to work in the database framework, and no actual data were collected yet. This has no negative effect on the results of the ecoinvent database.
  property price 79.9192 EUR2005
    Calculated based on inputs: The price of the product has been calculated as a sum of the values of the material and energy inputs for this product. This value is therefore a rough estimation. It may underestimate the real price since there are additional expenses when producing any product. These expences can include for example labour costs, treatment of waste materials and profit for the producer. Please consider carefully whether this level of data quality is acceptable for your application.

## Inputs from technosphere
- steel, low-alloyed, hot rolled: 1.0589 kg; lognormal variance with pedigree 0.0287, pedigree (2,2,4,5,3)
  Estimation: 5% of steel parts replaced, Scooter: 10%
  EcoSpold01Location=RER
  Uncertainty: Estimation: 5% of steel parts replaced, Scooter: 10%
  properties: carbon content, fossil 0.005, dry mass 1 kg, wet mass 1 kg
  note on carbon content, fossil: Low alloyed steel composition given in Tab. 3.2 ecoinvent v2.2 report 10_partII. Steel assumed to have a C content of 0.5%
- tap water: 0 kg; name tap_water_input; pedigree (1,1,1,1,1)
  EcoSpold01Location=RER
  Assumption based on: Cherry, C.R. 2007, 1488 liters waste water for all production phases (incl. Battery manufacturing --> 50%)
  Uncertainty: Assumption based on: Cherry, C.R. 2007, 1488 liters waste water for all production phases (incl. Battery manufacturing --> 50%)
  properties: water content 2962.17, dry mass 0.000337476 kg, wet mass 1 kg, carbon content, fossil 0.00178991
  note on carbon content, fossil: Bicarbonate content is 2.93 mol/m3. CO2 content is 0.1 mol/m3 (ecoinvent v2.2 report 8, Tab 93.1).
- lead: 1.3 kg; lognormal variance with pedigree 0.0361, pedigree (4,2,4,5,3)
  Estimation: 2 batteries per 50000km
  EcoSpold01Location=RER
  Uncertainty: Estimation: 2 batteries per 50000km
  properties: wet mass 1 kg, dry mass 1 kg
- used Ni-metal hydride battery: -0.75889 kg; lognormal variance with pedigree 0.0287, pedigree (2,2,4,5,3)
  EcoSpold01Location=GLO
  Amount of S-Pb batteries replaced
  Uncertainty: Amount of S-Pb batteries replaced
  production volume 1.02468 kg
    Calculated from the production volume of maintenance, motor scooter in proportion to the respective output amounts.
  properties: dry mass 1 kg, wet mass 1 kg, carbon content, fossil 0.328011
- injection moulding: 1.872 kg; lognormal variance with pedigree 0.0981, pedigree (4,2,4,5,4)
  EcoSpold01Location=RER
  Assumption
  Uncertainty: Assumption
- waste plastic, mixture: 0 kg; pedigree (1,1,1,1,1)
  EcoSpold01Location=CH
  Plastics to municipal incineration
  Uncertainty: plastics to municipal incineration
  production volume 0 kg
    (same comment as for used Ni-metal hydride battery)
  properties: wet mass 1 kg, heating value, net 30.79 MJ, dry mass 0.847 kg, carbon content, fossil 0.747344, water content 0.180638
  note on heating value, net: Value taken from the general comment of the treatment dataset.
  note on carbon content, fossil: C content in 1 kg DM was calculated using data in Tab A.2, ecoinvent v2.2 report 13_I
- polyethylene, high density, granulate: 1.872 kg; lognormal variance with pedigree 0.0287, pedigree (2,2,4,5,3)
  Estimation: Bicycle: 50% of plastic parts once replaced, Scooter 15% replaced
  EcoSpold01Location=RER
  Uncertainty: Estimation: Bicycle: 50% of plastic parts once replaced, Scooter 15% replaced
  properties: heating value, net 42.47 MJ, wet mass 1 kg, dry mass 1 kg, carbon content, fossil 0.857143
  note on carbon content, fossil: Polyethylene is formed out of a huge amount of ethylene monomers (C2H4) (ecoinvent v2.2 report 11_II). MW=28 g/mol
- aluminium alloy, AlMg3: 1.5 kg; lognormal variance with pedigree 0.0287, pedigree (2,2,4,5,3)
  EcoSpold01Location=RER
  Estimation:5% of aluminium parts replaced
  Uncertainty: Estimation:5% of aluminium parts replaced
  properties: wet mass 1 kg, dry mass 1 kg
- waste rubber, unspecified: 0 kg; pedigree (1,1,1,1,1)
  EcoSpold01Location=CH
  50% of tyres to municipal incineration
  Uncertainty: 50% of tyres to municipal incineration
  production volume 0 kg
    (same comment as for used Ni-metal hydride battery)
  properties: wet mass 1 kg, carbon content, fossil 0.853, heating value, net 27.19 MJ, dry mass 1 kg
- used Li-ion battery: -0.62111 kg; lognormal variance with pedigree 0.0287, pedigree (2,2,4,5,3)
  Amount of S-Pb batteries replaced
  EcoSpold01Location=GLO
  Uncertainty: Amount of S-Pb batteries replaced
  production volume 1.02468 kg
    (same comment as for used Ni-metal hydride battery)
  properties: dry mass 1 kg, carbon content, fossil 0.328011, wet mass 1 kg
- chromium steel removed by turning, average, conventional: 1.0589 kg; lognormal variance with pedigree 0.0981, pedigree (4,2,4,5,4)
  Assumption
  EcoSpold01Location=RER
  Uncertainty: Assumption
  properties: carbon content, fossil 0.0008, wet mass 1 kg, dry mass 1 kg
- section bar extrusion, aluminium: 1.5 kg; lognormal variance with pedigree 0.0981, pedigree (4,2,4,5,4)
  EcoSpold01Location=RER
  Assumption for pipe drawing
  Uncertainty: Assumption for pipe drawing
- sulfuric acid: 0.08 kg; lognormal variance with pedigree 0.0361, pedigree (4,2,4,5,3)
  (same comment as for lead)
  properties: wet mass 1 kg, dry mass 1 kg
- synthetic rubber: 47.168 kg; lognormal variance with pedigree 0.0287, pedigree (2,2,4,5,3)
  Estimation: 3.75 (bike)/3 (scooter) tyre-sets use in life-time
  EcoSpold01Location=RER
  Uncertainty: Estimation: 3.75 (bike)/3 (scooter) tyre-sets use in life-time
  properties: heating value, net 26.42 MJ, carbon content, fossil 0.871949, wet mass 1 kg, dry mass 1 kg
  note on carbon content, fossil: EPDM (Ethylene-propene-diene terpolymer) rubber is a terpolymer of ethylene, propene, and a diene with the residual unsaturated portion of the diene in the side chain (ecoinvent v2.2 report 7-part XX & Ullmann). Chemical formula (deduced from Evidences of Solvent-Induced Miscibility in Polychloroprene-co-Ethylene-Propene Diene Terpolymer Blends, Dubey et al., Journal of Applied Polymer Science, 2009, 111:1884–1891): C20H35
- tap water: 0.321813, 0.0387376, 0.0640202, 13.766, 1.61434, 0.0419966, 0.119459, 18.4737 kg (8 entries); lognormal variance with pedigree 0.0112, pedigree (2,3,4,5,1)
  (same comment as for tap water)
- waste plastic, mixture: -0.208245, -0.0139141, -0.0010523, -0.00574703, -0.00232173, -0.00545734, -0.177434, -1.45783 kg (8 entries); lognormal variance with pedigree 0.0361, pedigree (4,2,4,5,3)
  (same comment as for waste plastic, mixture)
  production volume 5.616 kg
- waste rubber, unspecified: -11.792, -11.792 kg (2 entries); lognormal variance with pedigree 0.0361, pedigree (4,2,4,5,3)
  (same comment as for waste rubber, unspecified)
  production volume 70.752 kg

## Emissions to nature
- Water [air, unspecified]: 0.005166 m3; name water_to_air_unspecified; lognormal variance with pedigree 0.0507, pedigree (2,2,4,5,1)
  Calculated value based on literature values and expert opinion. See comments in the parametres' comment field.
  property fraction, origin: salt water 0; name fraction_origin_salt_water
  property fraction, origin: unspecified 0; name fraction_origin_unspecified
  property fraction, origin: fresh water 1; name fraction_origin_fresh_water
- Water [water, unspecified]: 0.029274 m3; name water_to_water_unspecified; lognormal variance with pedigree 0.0507, pedigree (2,2,4,5,1)
  (same comment as for Water)
  property carbon content, fossil 0; name C_content_fossil
  property wet mass 1000 kg; name WM
  property fraction, origin: fresh water 1; name fraction_origin_fresh_water_Ww
  property fraction, origin: unspecified 0; name fraction_origin_unspecified_Ww
  property carbon content, non-fossil 0; name C_content_non_fossil
  property water in wet mass 1000 kg; name WWM
  property dry mass 0 kg; name DM
  property fraction, origin: salt water 0; name fraction_origin_salt_water_Ww

## Sampling procedure
Literature

## Extrapolations
none This dataset has been copied from an original dataset covering the geography CH. The uncertainty has been adjusted accordingly.

## Review by Christian Bauer 2010-03-25
passed
C:\Dokumente und Einstellungen\Marianne\Eigene Dateien\Projekte\277_Mobitool\Ecoinvent\Review\Upload 1\corrections\[Ecospold_Maintenance_ebikes-v1.2.xls]X-Process
