# diode production, auxilliaries and energy use

Dataset: EcoSpold 2, unit process
Geography: GLO
Time period: 1998-01-01 to 2021-12-31
Technology level: current
Classification: EcoSpold01Categories: electronics/component
Classification: ISIC rev.4 ecoinvent: 2610:Manufacture of electronic components and boards
Tags: ConvertedDataset
Scenario: Business-as-Usual
System model: Allocation, cut-off by classification
Generated by: Roland Hischier
Published in: Hischier R. 2007
Database: ecoinvent
isCopyrightProtected: true
accessRestrictedTo: 1

## General comment
This dataset represents the average production efforts of 1 kg of diodes over all types of diodes. There is no distinction between the different types ofdiodes produced. Data for auxillaries, energy, emissions and waste are taken from a dataset out of an international LCI database. Infrastructure efforts are based on own assumptions. As the raw material input is taken into account in the respective diode datasets this dataset here has no input of raw materials.
[This dataset was already contained in the ecoinvent database version 2. It was not individually updated during the transfer to ecoinvent version 3. Life Cycle Impact Assessment results may still have changed, as they are affected by changes in the supply chain, i.e. in other datasets. This dataset was generated following the ecoinvent quality guidelines for version 2. It may have been subject to central changes described in the ecoinvent version 3 change report (http://www.ecoinvent.org/database/ecoinvent-version-3/reports-of-changes/), and the results of the central updates were reviewed extensively. The changes added e.g. consistent water flows and other information throughout the database. The documentation of this dataset can be found in the ecoinvent reports of version 2, which are still available via the ecoinvent website. The change report linked above covers all central changes that were made during the conversion process.]

## Included activities start
From reception of electronic components, raw materials and auxiliares at the factory gate.

## Included activities end
This module includes auxillary and energy consumption, emissions (air, water) and waste amounts, as well as an estimation of the efforts for transportation and of the infrastructure for the production of diodes.

## Geography
Data from literature – here representing the global situation.

## Technology
average production technology comprising the diode wafer production (cleaing, masking, etching, doping, oxidising, metal deposition) and the final assembly of the diode (wafer sawing, die bonding, moulding, trimming and forming)

## Parameters
- fraction, water, ultrapure, to air: 0.061 dimensionless; name fraction_WUP_to_air; = fraction_PW_to_air; lognormal variance with pedigree 0.092025, pedigree (4,4,3,2,4)
  Calculated value. See comment in the other parametres present in this dataset. Ultrapure water is considered to be always used as process water, thus process water fractions to air are applied to all ultrapure water input flows to calculate the amount of water consumed in the processes.
- fraction, tap water, to air: 0.061 dimensionless; name fraction_TW_to_air; = fraction_PW_to_air; lognormal variance with pedigree 0.092025, pedigree (4,4,3,2,4)
  Calculated value. See comment in the other parametres present in this dataset. Tap water is considered to be always used as process water, thus process water fractions to air are applied to all tap water input flows to calculate the amount of water consumed in the processes.
- fraction, process water, to air: 0.061 dimensionless; name fraction_PW_to_air; lognormal variance with pedigree 0.092025, pedigree (4,4,3,2,4)
  Literature value (Statistics Canada, 2007 & Shaffer, K.H., 2008, Consumptive water use in the Great Lakes Basin, USGS) (Vionnet, S., Quantis Water Database - Technical Report, 2012).

## Reference product
- diode, auxilliaries and energy use: 1 kg; CPC 47150: Diodes, transistors and similar semi-conductor devices; photosensitive semi-conductor devices; light emitting […]; By-product classification allocatable product
  A diode is “a component that restricts the direction of movement of charge carriers. Essentially, it allows an electric current to flow in one direction, but blocks it in the opposite direction.” Hence, a diode can be seen as an electronic version of a check valve. A circuit that requires current flow in only one direction will consequently include at least one diode in its circuit design. Currently most of the diodes are made from traditional semiconductor materials like silicium or germanium. (Wikipedia, 2006)
  EcoSpold01Location=GLO
  production volume 1 kg
    Dummy value to be replaced by measured, estimated or calculated value
  property price 178.833 EUR2005
    Calculated based on inputs: The price of the product has been calculated as a sum of the values of the material and energy inputs for this product. This value is therefore a rough estimation. It may underestimate the real price since there are additional expenses when producing any product. These expences can include for example labour costs, treatment of waste materials and profit for the producer. Please consider carefully whether this level of data quality is acceptable for your application.

## Inputs from technosphere
- electronic component factory: 1e-12 unit; lognormal variance with pedigree 0.5761, pedigree (4,5,5,3,5)
  EcoSpold01Location=GLO
  Expert assumption. Original value of 2E-08 was based a a wafer fabrication facility. It is assumed a factory produces more components than this in its lifetime.
  Uncertainty: rough assumption
- wastewater, average: 0 m3; pedigree (1,1,1,1,1)
  EcoSpold01Location=CH
  Estimation, due to a lack of respective emission information.
  Uncertainty: assumption, based on literature
  production volume 0 m3
    Calculated from the production volume of diode, auxilliaries and energy use in proportion to the respective output amounts.
  properties: water content 2882.2, carbon content, non-fossil 0.194039, dry mass 0.346837 kg, wet mass 1000 kg
  note on carbon content, non-fossil: 0.0673 kg TOC/m3 (Tab A.17, ecoinvent v2.2 report 13_I). TOC was considered as Total Carbon.
- tap water: 253 kg; name tap_water_input; lognormal variance with pedigree 0.1461, pedigree (4,5,5,3,4)
  Estimation, based on data for microchip production. it is assumed, that the amount used is about 50% compared to the amount used in the production of wafers for the microchip production.
  EcoSpold01Location=RER
  Uncertainty: estimation - based on data for microchip production
  properties: carbon content, fossil 0.00178991, wet mass 1 kg, water content 2962.17, dry mass 0.000337476 kg
  note on carbon content, fossil: Bicarbonate content is 2.93 mol/m3. CO2 content is 0.1 mol/m3 (ecoinvent v2.2 report 8, Tab 93.1).
- hydrogen peroxide, without water, in 50% solution state: 0 kg; source CPM 2006; pedigree (1,1,1,1,1)
  Estimation. An average input of about 100 kg of auxiliaries per kg of produced diodes is calculated. Based on the information in CPM (2006), the substances with the highest amount have been chosen here.
  EcoSpold01Location=RER
  Uncertainty: value from 1 literature source
  properties: dry mass 1 kg, heating value, net 7.13 MJ, wet mass 1 kg
- water, ultrapure: 0 kg; name water_ultrapure_input; pedigree (1,1,1,1,1)
  EcoSpold01Location=GLO
  Estimation, based on data for microchip production. it is assumed, that the amount used is about 50% compared to the amount used in the production of wafers for the microchip production.
  Uncertainty: estimation - based on data for microchip production
  properties: wet mass 1 kg
- heat, district or industrial, other than natural gas: 244 MJ; source CPM 2006; lognormal variance with pedigree 0.0527, pedigree (2,4,5,3,1)
  Calculated, average value.
  Further references:
  exact (1998) Simplified LCA für Elektronikbauteile. International Exchange of Electronic Component Technology and Test Data, IG exact Schweiz, Arbeitsgruppe Umweltfragen
  EcoSpold01Location=RER
  Uncertainty: value from 1 literature source
  properties: heating value, net 1 MJ
- chemical, organic: 0.871 kg; source CPM 2006; lognormal variance with pedigree 0.0527, pedigree (2,4,5,3,1)
  Estimation. An average input of about 100 kg of auxiliaries per kg of produced diodes is calculated. Based on the information in CPM (2006), the substances with the highest amount have been chosen here.
  EcoSpold01Location=GLO
  Uncertainty: value from 1 literature source
  properties: heating value, net 19.03 MJ, dry mass 1 kg, carbon content, fossil 0.628, wet mass 1 kg
  note on carbon content, fossil: This dataset is an unweighted average of 20 organic substances (listed in Tab 88.1, ecoinvent v2.2 report 8, part II), being part of the top100 chemicals included in this database. The C-content has also been calculated as an unweighted average of the C content of the substances composing this dataset.
- methanol: 0.55 kg; source CPM 2006; lognormal variance with pedigree 0.0527, pedigree (2,4,5,3,1)
  EcoSpold01Location=GLO
  Estimation. An average input of about 100 kg of auxiliaries per kg of produced diodes is calculated. Based on the information in CPM (2006), the substances with the highest amount have been chosen here.
  Uncertainty: value from 1 literature source
  properties: wet mass 1 kg, carbon content, fossil 0.375, dry mass 1 kg, heating value, net 26.49 MJ
- hydrogen, liquid: 0 kg; source CPM 2006; pedigree (1,1,1,1,1)
  (same comment as for hydrogen peroxide, without water, in 50% solution state)
  properties: dry mass 1 kg, wet mass 1 kg, heating value, net 120.21 MJ
- nitrogen, liquid: 0 kg; source CPM 2006; pedigree (1,1,1,1,1)
  EcoSpold01Location=RER
  Estimation. An average input of about 100 kg of auxiliaries per kg of produced diodes is calculated. Based on the information in CPM (2006), the substances with the highest amount have been chosen here.
  Uncertainty: value from 1 literature source
  properties: dry mass 1 kg, wet mass 1 kg
- electricity, medium voltage: 241 kWh; source CPM 2006; lognormal variance with pedigree 0.0527, pedigree (2,4,5,3,1)
  EcoSpold01Location=UCTE
  Calculated, average value.
  Further references:
  exact (1998) Simplified LCA für Elektronikbauteile. International Exchange of Electronic Component Technology and Test Data, IG exact Schweiz, Arbeitsgruppe Umweltfragen
  Uncertainty: value from 1 literature source
- xylene: 0 kg; source CPM 2006; pedigree (1,1,1,1,1)
  (same comment as for hydrogen peroxide, without water, in 50% solution state)
  properties: carbon content, fossil 0.905061, wet mass 1 kg, heating value, net 38.84 MJ, dry mass 1 kg
- hydrogen fluoride: 0 kg; source CPM 2006; pedigree (1,1,1,1,1)
  (same comment as for chemical, organic)
  properties: heating value, net 6.06 MJ, wet mass 1 kg, dry mass 1 kg
- heat, district or industrial, natural gas: 280 MJ; source CPM 2006; lognormal variance with pedigree 0.0527, pedigree (2,4,5,3,1)
  EcoSpold01Location=RER
  Calculated, average value.
  Further references:
  exact (1998) Simplified LCA für Elektronikbauteile. International Exchange of Electronic Component Technology and Test Data, IG exact Schweiz, Arbeitsgruppe Umweltfragen
  Uncertainty: value from 1 literature source
  properties: heating value, net 1 MJ
- nitric acid, without water, in 50% solution state: 0 kg; source CPM 2006; pedigree (1,1,1,1,1)
  (same comment as for nitrogen, liquid)
  properties: wet mass 1 kg, dry mass 1 kg
- hydrochloric acid, without water, in 30% solution state: 0 kg; source CPM 2006; pedigree (1,1,1,1,1)
  (same comment as for nitrogen, liquid)
  properties: heating value, net 3.32 MJ, dry mass 1 kg, wet mass 1 kg
- waste, from silicon wafer production, inorganic: -0.037 kg; source CPM 2006; lognormal variance with pedigree 0.0527, pedigree (2,4,5,3,1)
  EcoSpold01Location=CH
  Estimation, an average of 0.37 kg of waste per kg of produced diodes is taken from literature. The split has been done based on literature and own assumption.
  Uncertainty: assumption, based on total waste information in 1 literature source
  production volume 0.037 kg
    (same comment as for wastewater, average)
  properties: carbon content, fossil 0.0347572, wet mass 1 kg, water content 0.103753, dry mass 0.906 kg
- spent solvent mixture: 0 kg; source CPM 2006; pedigree (1,1,1,1,1)
  Estimation, an average of 0.37 kg of waste per kg of produced diodes is taken from literature. The split has been done based on literature and own assumption.
  EcoSpold01Location=CH
  Uncertainty: assumption, based on total waste information in 1 literature source
  production volume 0 kg
    (same comment as for wastewater, average)
  properties: carbon content, fossil 0.571257, water content 0.197605, heating value, net 21.7 MJ, wet mass 1 kg, dry mass 0.835 kg
  note on carbon content, fossil: Tab A.7, ecoinvent v2.2 report 13_I. C content has been calculated after data in the tables, and then referred to 1 kg DM
  note on heating value, net: Value taken from the general comment of the treatment dataset.
- sulfuric acid: 0 kg; source CPM 2006; pedigree (1,1,1,1,1)
  (same comment as for nitrogen, liquid)
  properties: dry mass 1 kg, wet mass 1 kg
- oxygen, liquid: 0 kg; source CPM 2006; pedigree (1,1,1,1,1)
  (same comment as for hydrogen peroxide, without water, in 50% solution state)
  properties: dry mass 1 kg, wet mass 1 kg
- wastewater, average: -0.0893639, -0.0096675, -0.186969 m3 (3 entries); lognormal variance with pedigree 0.0527, pedigree (2,4,5,3,1)
  (same comment as for wastewater, average)
  production volume 0.286 m3
- hydrogen peroxide, without water, in 50% solution state: 0.03828, 0.18172 kg (2 entries); source CPM 2006; lognormal variance with pedigree 0.0527, pedigree (2,4,5,3,1)
  (same comment as for hydrogen peroxide, without water, in 50% solution state)
- water, ultrapure: 67.2949, 124.836, 93.8693 kg (3 entries); lognormal variance with pedigree 0.1461, pedigree (4,5,5,3,4)
  (same comment as for water, ultrapure)
- hydrogen, liquid: 0.0161425, 0.0738575 kg (2 entries); source CPM 2006; lognormal variance with pedigree 0.0527, pedigree (2,4,5,3,1)
  (same comment as for hydrogen peroxide, without water, in 50% solution state)
- nitrogen, liquid: 19.9437, 72.6563 kg (2 entries); source CPM 2006; lognormal variance with pedigree 0.0527, pedigree (2,4,5,3,1)
  (same comment as for nitrogen, liquid)
- xylene: 0.0452669, 0.250733 kg (2 entries); source CPM 2006; lognormal variance with pedigree 0.0527, pedigree (2,4,5,3,1)
  (same comment as for hydrogen peroxide, without water, in 50% solution state)
- hydrogen fluoride: 0.15761, 0.46239 kg (2 entries); source CPM 2006; lognormal variance with pedigree 0.0527, pedigree (2,4,5,3,1)
  (same comment as for chemical, organic)
- nitric acid, without water, in 50% solution state: 0.00900078, 0.0223833, 0.0107249, 0.0683398, 0.00896747, 0.0368867, 0.00972455, 0.00605769, 0.0291088, 0.078806 kg (10 entries); source CPM 2006; lognormal variance with pedigree 0.0527, pedigree (2,4,5,3,1)
  (same comment as for nitrogen, liquid)
- hydrochloric acid, without water, in 30% solution state: 0.0180895, 0.0809105 kg (2 entries); source CPM 2006; lognormal variance with pedigree 0.0527, pedigree (2,4,5,3,1)
  (same comment as for nitrogen, liquid)
- spent solvent mixture: -0.0929464, -0.00217759, -0.237876 kg (3 entries); source CPM 2006; lognormal variance with pedigree 0.0527, pedigree (2,4,5,3,1)
  (same comment as for spent solvent mixture)
  production volume 0.333 kg
- sulfuric acid: 0.069412, 0.530588 kg (2 entries); source CPM 2006; lognormal variance with pedigree 0.0527, pedigree (2,4,5,3,1)
  (same comment as for nitrogen, liquid)
- oxygen, liquid: 0.161483, 0.588517 kg (2 entries); source CPM 2006; lognormal variance with pedigree 0.0527, pedigree (2,4,5,3,1)
  (same comment as for hydrogen peroxide, without water, in 50% solution state)

## Emissions to nature
- Nitrite [water, surface water]: 0.064 kg; source CPM 2006; lognormal variance with pedigree 0.0927, pedigree (2,4,5,3,1)
  Literature Value.
  Uncertainty: value from 1 literature source
- Water [air, unspecified]: 0.032879 m3; name water_to_air_unspecified; = (tap_water_input/1000*fraction_TW_to_air)+(water_ultrapure_input/1000*fraction_WUP_to_air); lognormal variance with pedigree 0.0807, pedigree (2,2,5,1,1)
  Calculated value based on literature values and expert opinion. See comments in the parametres' comment field.
  property fraction, origin: salt water 0; name fraction_origin_salt_water
  property fraction, origin: fresh water 1; name fraction_origin_fresh_water
  property fraction, origin: unspecified 0; name fraction_origin_unspecified
- Ammonia [air, urban air close to ground]: 0.011 kg; source CPM 2006; lognormal variance with pedigree 0.0627, pedigree (2,4,5,3,1)
  Literature Value.
  Uncertainty: value from 1 literature source
- Chloride [water, surface water]: 0.0039 kg; source CPM 2006; lognormal variance with pedigree 0.3527, pedigree (2,4,5,3,1)
  Literature Value.
  Uncertainty: value from 1 literature source
- BOD5, Biological Oxygen Demand [water, surface water]: 0.04 kg; source CPM 2006; lognormal variance with pedigree 0.0927, pedigree (2,4,5,3,1)
  Literature Value.
  Uncertainty: value from 1 literature source
- Tin, ion [water, surface water]: 5e-5 kg; source CPM 2006; lognormal variance with pedigree 0.7027, pedigree (2,4,5,3,1)
  Literature Value.
  Uncertainty: value from 1 literature source
- Fluoride [water, surface water]: 0.012 kg; source CPM 2006; lognormal variance with pedigree 0.0927, pedigree (2,4,5,3,1)
  Literature Value.
  Uncertainty: value from 1 literature source
- COD, Chemical Oxygen Demand [water, surface water]: 0.0036 kg; source CPM 2006; lognormal variance with pedigree 0.0927, pedigree (2,4,5,3,1)
  Literature Value.
  Uncertainty: value from 1 literature source
- Sulfate [water, surface water]: 0.013 kg; source CPM 2006; lognormal variance with pedigree 0.0927, pedigree (2,4,5,3,1)
  Literature Value.
  Uncertainty: value from 1 literature source
- DOC, Dissolved Organic Carbon [water, surface water]: 0.00133333 kg; lognormal variance with pedigree 0.0927, pedigree (2,4,5,3,1)
  Calculated Value, as equal to TOC.
  Uncertainty: value from 1 literature source
- Water [water, unspecified]: 0.220121 m3; name water_to_water_unspecified; = (tap_water_input/1000)*(1-fraction_TW_to_air)+(water_ultrapure_input/1000)*(1-fraction_WUP_to_air)-0.286; lognormal variance with pedigree 0.0807, pedigree (2,2,5,1,1)
  (same comment as for Water)
  property dry mass 0 kg; name DM
  property water in wet mass 1000 kg; name WWM
  property fraction, origin: salt water 0; name fraction_origin_salt_water_Ww
  property wet mass 1000 kg; name WM
  property carbon content, non-fossil 0; name C_content_non_fossil
  property carbon content, fossil 0; name C_content_fossil
  property fraction, origin: fresh water 1; name fraction_origin_fresh_water_Ww
  property fraction, origin: unspecified 0; name fraction_origin_unspecified_Ww
- Phosphate [water, surface water]: 0.003 kg; source CPM 2006; lognormal variance with pedigree 0.0927, pedigree (2,4,5,3,1)
  Literature Value.
  Uncertainty: value from 1 literature source
- Suspended solids, unspecified [water, surface water]: 0.11 kg; source CPM 2006; lognormal variance with pedigree 0.0927, pedigree (2,4,5,3,1)
  Literature Value.
  Uncertainty: value from 1 literature source
- Nitrogen oxides [air, urban air close to ground]: 0.073 kg; source CPM 2006; lognormal variance with pedigree 0.0927, pedigree (2,4,5,3,1)
  Literature Value.
  Uncertainty: value from 1 literature source
- TOC, Total Organic Carbon [water, surface water]: 0.00133333 kg; lognormal variance with pedigree 0.0927, pedigree (2,4,5,3,1)
  Calculated Value, by default as TOC (gC) = COD/2.7 (COD measured in g O2). Should more correctly be calculated from the carbon content of the specified emissions to water.
  Uncertainty: value from 1 literature source
- Acetone [air, urban air close to ground]: 0.073 kg; source CPM 2006; lognormal variance with pedigree 0.1727, pedigree (2,4,5,3,1)
  Literature Value.
  Uncertainty: value from 1 literature source
- Carbon monoxide, fossil [air, urban air close to ground]: 0.042 kg; source CPM 2006; lognormal variance with pedigree 0.7027, pedigree (2,4,5,3,1)
  Literature Value.
  Uncertainty: value from 1 literature source
- Hydrogen fluoride [air, urban air close to ground]: 0.015 kg; source CPM 2006; lognormal variance with pedigree 0.0927, pedigree (2,4,5,3,1)
  Literature Value.
  Uncertainty: value from 1 literature source
- Sulfur dioxide [air, urban air close to ground]: 0.025 kg; source CPM 2006; lognormal variance with pedigree 0.0527, pedigree (2,4,5,3,1)
  Literature Value.
  Uncertainty: value from 1 literature source
- Xylene [air, urban air close to ground]: 0.101 kg; source CPM 2006; lognormal variance with pedigree 0.1727, pedigree (2,4,5,3,1)
  Literature Value.
  Uncertainty: value from 1 literature source

## Sampling procedure
own estimation

## Extrapolations
This dataset has been extrapolated from year 2007 to the year of the calculation (2021). The uncertainty has been adjusted accordingly.

## Review by Roland Hischier 2011-09-20
Transfer of documentation done.

## Review by Rolf Frischknecht 2007-11-15
passed.
