# process-specific burdens, municipal waste incineration

Dataset: EcoSpold 2, unit process
Geography: RoW
Time period: 1995-01-01 to 2021-12-31
Technology level: current
Classification: ISIC rev.4 ecoinvent: 3821:Treatment and disposal of non-hazardous waste
Classification: EcoSpold01Categories: waste management/municipal incineration
Synonyms: KVA; MSWI
Tags: ConvertedDataset
Scenario: Business-as-Usual
System model: Allocation, cut-off by classification
Generated by: Gabor Doka (obsolete)
Published in: Doka G. 2007
Database: ecoinvent
isCopyrightProtected: true
accessRestrictedTo: 1

## General comment
Swiss municipal waste incineration plant with 100'000 ton per year capacity. Operational time 40 years
[This dataset was already contained in the ecoinvent database version 2. It was not individually updated during the transfer to ecoinvent version 3. Life Cycle Impact Assessment results may still have changed, as they are affected by changes in the supply chain, i.e. in other datasets. This dataset was generated following the ecoinvent quality guidelines for version 2. It may have been subject to central changes described in the ecoinvent version 3 change report (http://www.ecoinvent.org/database/ecoinvent-version-3/reports-of-changes/), and the results of the central updates were reviewed extensively. The changes added e.g. consistent water flows and other information throughout the database. The documentation of this dataset can be found in the ecoinvent reports of version 2, which are still available via the ecoinvent website. The change report linked above covers all central changes that were made during the conversion process.]

## Included activities end
burdens in the municipal waste incineration process which are not attributable to a specific waste component, but are depending on operating conditions (temperature, oxygen concentrations etc.). Air emissions, burdens from emissions and abatement of thermal NOx, water consumption.

## Geography
Technology encountered in Switzerland. Well applicable to modern grate incinerators.

## Technology
average Swiss municipal soild waste incineration plants in 2000 with grate incinerator, with electrostatic precipitator for fly ash (ESP), wet flue gas scrubber and 29.4% SNCR , 32.2% SCR-high dust , 24.6% SCR-low dust -DeNOx facilities and 13.8% without Denox (by burnt waste, according to Swiss average).

## Parameters
- fraction, cooling water, to air: 0.3875 dimensionless; name fraction_CW_to_air; = (0.5*fraction_CW_OT_to_air)+(0.5*fraction_CW_R_to_air); lognormal variance with pedigree 0.092025, pedigree (4,4,3,2,4)
  Calculated value based on literature value (see comments of the other parametres present in this dataset) and expert opinion. In the case when no industry/literature data are available about the type of cooling or directly fraction, cooling water, to air specific for the process a default assumption is applied. It is assumed that the once-through cooling system is used in 50% of all cases and recirculating system is used in another 50% of all cases.
- fraction, cooling water, cooling pond system, to air: 0.032 dimensionless; name fraction_CW_CP_to_air; lognormal variance with pedigree 0.0413, pedigree (2,3,1,3,1)
  Calculated based on literature value (Scown, C.D., 2011, Water Footprint of U.S. Transportation Fuels and supplying information of the article) (Vionnet, S., Quantis Water Database - Technical Report, 2012).
- fraction, cooling water, once-through system, to air: 0.004 dimensionless; name fraction_CW_OT_to_air; lognormal variance with pedigree 0.0413, pedigree (2,3,1,3,1)
  (same comment as for fraction, cooling water, cooling pond system, to air)
- fraction, water, decarbonised, to air: 0.3875 dimensionless; name fraction_WDC_to_air; lognormal variance with pedigree 0.092025, pedigree (4,4,3,2,4)
- fraction, cooling water, recirculating system, to air: 0.771 dimensionless; name fraction_CW_R_to_air; lognormal variance with pedigree 0.0413, pedigree (2,3,1,3,1)
  (same comment as for fraction, cooling water, cooling pond system, to air)

## Reference product
- process-specific burdens, municipal waste incineration: 1 kg; By-product classification allocatable product; CPC 39: Wastes or scraps
  EcoSpold01Location=CH
  production volume 2.84436 kg
    This is a placeholder value that does not reflect real-world production volumes. This dataset does not currently require a real-world production volume to work in the database framework, and no actual data were collected yet. This has no negative effect on the results of the ecoinvent database.
  property price 0.00261115 EUR2005
    Calculated based on inputs: The price of the product has been calculated as a sum of the values of the material and energy inputs for this product. This value is therefore a rough estimation. It may underestimate the real price since there are additional expenses when producing any product. These expences can include for example labour costs, treatment of waste materials and profit for the producer. Please consider carefully whether this level of data quality is acceptable for your application.

## Inputs from technosphere
- titanium dioxide: 1.44e-5 kg; lognormal variance with pedigree 0.492, pedigree (1,1,5,5,1)
  EcoSpold01Location=RER
  uncertainty calculated from uncertainty in average DeNOx input and uncertainty in the share of thermal NOx
  properties: dry mass 1 kg, wet mass 1 kg
- ammonia, anhydrous, liquid: 0 kg; pedigree (1,1,1,1,1)
  EcoSpold01Location=CH
  uncertainty calculated from uncertainty in average DeNOx input and uncertainty in the share of thermal NOx
  properties: wet mass 1 kg, dry mass 1 kg
- water, decarbonised: 0 kg; name water_decarbonised_input; pedigree (1,1,1,1,1)
  One unreferenced value in Zimmermann et al. 1996
  EcoSpold01Location=RER
  Uncertainty: & basic uncertainty of 1.05; one unreferenced value in Zimmermann et al. 1996
  properties: wet mass 1 kg
- heat, district or industrial, natural gas: 0 MJ; pedigree (1,1,1,1,1)
  uncertainty calculated from uncertainty in average DeNOx input and uncertainty in the share of thermal NOx
  EcoSpold01Location=RER
  properties: heating value, net 1 MJ
- chromium: 2.95e-7 kg; lognormal variance with pedigree 0.492, pedigree (1,1,5,5,1)
  (same comment as for heat, district or industrial, natural gas)
  properties: wet mass 1 kg, dry mass 1 kg
- ammonia, anhydrous, liquid: 0.000105645, 9.08145e-6, 1.41284e-5, 2.79934e-5, 2.74261e-5, 2.87455e-6, 1.28503e-5, 0.000304001 kg (8 entries); lognormal variance with pedigree 0.162, pedigree (1,1,5,5,1)
  (same comment as for ammonia, anhydrous, liquid)
- water, decarbonised: 0.0193562, 0.0503649, 0.203133, 0.0258671, 0.377965, 0.00247259, 0.320841 kg (7 entries); lognormal variance with pedigree 0.0632, pedigree (2,3,5,5,1)
  (same comment as for water, decarbonised)
- heat, district or industrial, natural gas: 0.00067209, 0.0436079 MJ (2 entries); lognormal variance with pedigree 0.162, pedigree (1,1,5,5,1)
  (same comment as for heat, district or industrial, natural gas)

## Emissions to nature
- Water [water, unspecified]: 0.0006125 m3; name water_to_water_unspecified; lognormal variance with pedigree 0.0827, pedigree (2,2,5,5,1)
  Calculated value based on literature values and expert opinion. See comments in the parametres' comment field.
  property fraction, origin: salt water 0; name fraction_origin_salt_water_Ww
  property carbon content, fossil 0; name C_content_fossil
  property water in wet mass 1000 kg; name WWM
  property dry mass 0 kg; name DM
  property carbon content, non-fossil 0; name C_content_non_fossil
  property wet mass 1000 kg; name WM
  property fraction, origin: unspecified 0; name fraction_origin_unspecified_Ww
  property fraction, origin: fresh water 1; name fraction_origin_fresh_water_Ww
- Ammonia [air, urban air close to ground]: 7.76e-6 kg; lognormal variance with pedigree 0.212, pedigree (1,1,5,5,1)
  uncertainty calculated from uncertainty in average N-emissions and uncertainty in the share of thermal NOx
- Water [air, unspecified]: 0.0003875 m3; name water_to_air_unspecified; lognormal variance with pedigree 0.0827, pedigree (2,2,5,5,1)
  (same comment as for Water)
  property fraction, origin: fresh water 1; name fraction_origin_fresh_water
  property fraction, origin: unspecified 0; name fraction_origin_unspecified
  property fraction, origin: salt water 0; name fraction_origin_salt_water
- Toluene [air, urban air close to ground]: 8.51e-7 kg; lognormal variance with pedigree 0.0932, pedigree (2,3,5,5,1)
  Confidential data from 5 plants in Switzerland and Germany
  Uncertainty: & basic uncertainty of 1.5; confidential data from 5 plants in Switzerland and Germany
- Benzene, hexachloro- [air, urban air close to ground]: 9.68e-10 kg; lognormal variance with pedigree 0.0932, pedigree (2,3,5,5,1)
  (same comment as for Toluene)
- Benzo(a)pyrene [air, urban air close to ground]: 9.81e-12 kg; lognormal variance with pedigree 0.3632, pedigree (2,3,5,5,1)
  Confidential data from 5 plants in Switzerland and Germany
  Uncertainty: & basic uncertainty of 3; confidential data from 5 plants in Switzerland and Germany
- Benzene, pentachloro- [air, urban air close to ground]: 2.43e-9 kg; lognormal variance with pedigree 0.0932, pedigree (2,3,5,5,1)
  (same comment as for Toluene)
- Particulates, > 2.5 um, and < 10um [air, urban air close to ground]: 3e-8 kg; lognormal variance with pedigree 0.1626, pedigree (1,3,5,5,1)
  From total PM value from Swiss and German plants + PM fractions from measurements
  Uncertainty: & basic uncertainty of 2; from total PM value from Swiss and German plants + PM fractions from measurements
- Nitrogen oxides [air, urban air close to ground]: 0.000318 kg; lognormal variance with pedigree 0.212, pedigree (1,1,5,5,1)
  (same comment as for Ammonia)
- Particulates, < 2.5 um [air, urban air close to ground]: 5.97e-6 kg; lognormal variance with pedigree 0.3426, pedigree (1,3,5,5,1)
  From total PM value from Swiss and German plants + PM fractions from measurements
  Uncertainty: & basic uncertainty of 3; from total PM value from Swiss and German plants + PM fractions from measurements
- NMVOC, non-methane volatile organic compounds, unspecified origin [air, urban air close to ground]: 6.26e-5 kg; lognormal variance with pedigree 0.0826, pedigree (1,3,5,5,1)
  Studies from Switzerland and Germany
  Uncertainty: & basic uncertainty of 1.5; studies from Switzerland and Germany
- Phenol, pentachloro- [air, urban air close to ground]: 2.66e-10 kg; lognormal variance with pedigree 0.0932, pedigree (2,3,5,5,1)
  (same comment as for Toluene)
- Dioxins, measured as 2,3,7,8-tetrachlorodibenzo-p-dioxin [air, urban air close to ground]: 7.55e-12 kg; lognormal variance with pedigree 0.3632, pedigree (2,3,5,5,1)
  (same comment as for Benzo(a)pyrene)
- Benzene [air, urban air close to ground]: 4.25e-7 kg; lognormal variance with pedigree 0.0932, pedigree (2,3,5,5,1)
  (same comment as for Toluene)

## Sampling procedure
Data from literature

## Extrapolations
This dataset has been copied from an original dataset covering the geography CH. The uncertainty has been adjusted accordingly.

## Review by Niels Jungbluth 2003-05-26
Passed. Calculation for standard deviation 95 of infrastructure, land occupation, transport services and other services can differ from standard Pedigree approach used in this project and figures obtained by this procedure.
