# window frame production, aluminium, U=1.6 W/m2K

Dataset: EcoSpold 2, unit process
Geography: RER
Time period: 1996-01-01 to 2021-12-31
Technology level: current
Classification: ISIC rev.4 ecoinvent: 2511:Manufacture of structural metal products
Classification: EcoSpold01Categories: building components/windows
Tags: ConvertedDataset
Scenario: Business-as-Usual
System model: Allocation, cut-off by classification
Generated by: Martin Lehmann
Published in: Kellenberger D. 2007
Database: ecoinvent
isCopyrightProtected: true
accessRestrictedTo: 1

## General comment
This dataset describes all the processes and material inputs needed to produce a aluminium window frame with 1 m2 visible area. 1 m2 of visible aluminium window frame weighs 50.7 kg.
[This dataset was already contained in the ecoinvent database version 2. It was not individually updated during the transfer to ecoinvent version 3. Life Cycle Impact Assessment results may still have changed, as they are affected by changes in the supply chain, i.e. in other datasets. This dataset was generated following the ecoinvent quality guidelines for version 2. It may have been subject to central changes described in the ecoinvent version 3 change report (http://www.ecoinvent.org/database/ecoinvent-version-3/reports-of-changes/), and the results of the central updates were reviewed extensively. The changes added e.g. consistent water flows and other information throughout the database. The documentation of this dataset can be found in the ecoinvent reports of version 2, which are still available via the ecoinvent website. The change report linked above covers all central changes that were made during the conversion process.]

## Included activities end
Included processes are section bar rolling for steel parts and fittings, section bar extrusion for aluminium parts, extrusion of HDPE plastic, surface treatment (powder coating), all the road transport at different production phases, the heat waste and the disposal of the plastic cuttings.

## Geography
Window frames produced and sold in Switzerland and Germany.

## Technology
The dataset describes highly automated technology processes in window frame manufacturing.

## Reference product
- window frame, aluminium, U=1.6 W/m2K: 1 m2; By-product classification allocatable product; CPC 42120: Doors, windows and their frames and thresholds for doors, of iron, steel or aluminium
  EcoSpold01Location=RER
  production volume 1.32237 m2
    This is a placeholder value that does not reflect real-world production volumes. This dataset does not currently require a real-world production volume to work in the database framework, and no actual data were collected yet. This has no negative effect on the results of the ecoinvent database. The placeholder value of this activity was scaled according to the nominal GDP of 2005 (source: United Nations, http://data.un.org/Glossary.aspx?q=GDP+%28current+US%24%29, accessed 20130726) to reflect an appropriate share of the global production volume, which is also a placeholder value.
  property heating value, net 219.49 MJ
    LHV is calculated based on the Carbon content of the product. More details can be found on the respective documentation.
  property price 209 EUR2005
    Calculated based on literature values. The price of 1 kg of aluminium window frame is calculated to be 4.11 euro/kg. This price is calculated as a weighted average of prices calculated based on import (net trade) of this material from the world into 5 big economies; EU, Japan, China, India, USA. The net weight and the trade value is obtained from the UN Comtrade database (commodity no. 761010 Aluminium Doors, windows, frames and thresholds), year 2005. The weight of the window is 50.7kg/m2 based on the description of the dataset.
  property carbon content, fossil 0.142876
    Calculated as an addition of C content in the product (in Tab 4.2, ecoinvent v2.2 report 7-part XXVI), then referred to 1 kg DM
  property carbon content 0.142876
    carbon content on a dry matter basis (reserved; not for manual entry)
  properties: carbon content, non-fossil 0, water content 0, water in wet mass 0 kg, dry mass 50.7 kg, wet mass 50.7 kg, carbon allocation 7.24382 kg

## Inputs from technosphere
- synthetic rubber: 4.87 kg; lognormal variance with pedigree 0.0507, pedigree (1,3,5,3,1)
  EcoSpold01Location=RER
  properties: carbon content, fossil 0.871949, wet mass 1 kg, dry mass 1 kg, heating value, net 26.42 MJ
  note on carbon content, fossil: EPDM (Ethylene-propene-diene terpolymer) rubber is a terpolymer of ethylene, propene, and a diene with the residual unsaturated portion of the diene in the side chain (ecoinvent v2.2 report 7-part XX & Ullmann). Chemical formula (deduced from Evidences of Solvent-Induced Miscibility in Polychloroprene-co-Ethylene-Propene Diene Terpolymer Blends, Dubey et al., Journal of Applied Polymer Science, 2009, 111:1884–1891): C20H35
- extrusion, plastic film: 0.246 kg; lognormal variance with pedigree 0.0507, pedigree (1,3,5,3,1)
  EcoSpold01Location=RER
  activityLink introduced to establish a direct link to the corresponding regional supply of this product
- powder coat, aluminium sheet: 9.8 m2; lognormal variance with pedigree 0.0507, pedigree (1,3,5,3,1)
  (same comment as for extrusion, plastic film)
- acrylonitrile-butadiene-styrene copolymer: 0.4 kg; lognormal variance with pedigree 0.0507, pedigree (1,3,5,3,1)
  EcoSpold01Location=RER
  properties: wet mass 1 kg, heating value, net 35.58 MJ, carbon content, fossil 0.853081, dry mass 1 kg
  note on carbon content, fossil: ABS is the abbreviation originating from its monomers acrylonitrile, butadiene and styrene. It was assumed that every monomer was present in the same proportion, so the basic ABS monomer was considered (C8H8·C4H6·C3H3N), and the MW=104+54+53=211 g/mol
- section bar extrusion, aluminium: 38 kg; lognormal variance with pedigree 0.05, pedigree (1,1,5,1,1)
  composite
  EcoSpold01Location=RER
- nylon 6: 0.0146 kg; lognormal variance with pedigree 0.0507, pedigree (1,3,5,3,1)
  EcoSpold01Location=RER
  properties: carbon content, fossil 0.637168, dry mass 1 kg, wet mass 1 kg, heating value, net 30.9 MJ
  note on carbon content, fossil: It is a chain of caprolactam molecules, originating from aminocarboxylic acids - here caproic acid or caprolactam. The structure of nylon 6 is -(NH-(CH2)5-CO)n-, C6H11NO (ecoinvent v2.2 report 11_II). MW=113 g/mol
  note on heating value, net: Assumed equal to Nylon-66. Reference: Walters, R. N., Hackett, S. M. and Lyon, R. E. (2000) ‘Heats of combustion of high temperature polymers’, Fire and Materials, 24(5), pp. 245–252. doi: 10.1002/1099-1018(200009/10)24:5<245::AID-FAM744>3.0.CO;2-7.
- steel, chromium steel 18/8, hot rolled: 0.457 kg; lognormal variance with pedigree 0.05, pedigree (1,1,5,1,1)
  composite
  EcoSpold01Location=RER
  properties: carbon content, fossil 0.0008, dry mass 1 kg, wet mass 1 kg
  note on carbon content, fossil: Stainless steel model is the grade 304 steel (18/8 stainless, 18% chromium 8% nickel; max. 0.08% C)
- waste plastic, mixture: -0.102 kg; lognormal variance with pedigree 0.0507, pedigree (1,3,5,3,1)
  EcoSpold01Location=CH
  production volume 0.102 kg
    Calculated from the production volume of window frame, aluminium, U=1.6 W/m2K in proportion to the respective output amounts.
  properties: wet mass 1 kg, heating value, net 30.79 MJ, water content 0.180638, carbon content, fossil 0.747344, dry mass 0.847 kg
  note on heating value, net: Value taken from the general comment of the treatment dataset.
  note on carbon content, fossil: C content in 1 kg DM was calculated using data in Tab A.2, ecoinvent v2.2 report 13_I
- polyethylene, high density, granulate: 0.246 kg; lognormal variance with pedigree 0.0507, pedigree (1,3,5,3,1)
  EcoSpold01Location=RER
  properties: heating value, net 42.47 MJ, carbon content, fossil 0.857143, wet mass 1 kg, dry mass 1 kg
  note on carbon content, fossil: Polyethylene is formed out of a huge amount of ethylene monomers (C2H4) (ecoinvent v2.2 report 11_II). MW=28 g/mol
- reinforcing steel: 0.516 kg; lognormal variance with pedigree 0.0507, pedigree (1,3,5,3,1)
  EcoSpold01Location=RER
  properties: wet mass 1 kg, dry mass 1 kg, carbon content, fossil 0.004
- adhesive, for metal: 0.29 kg; lognormal variance with pedigree 0.0507, pedigree (1,3,5,3,1)
  EcoSpold01Location=DE
  properties: carbon content, fossil 0.286533, dry mass 1 kg, wet mass 1 kg, heating value, net 8.68 MJ
  note on carbon content, fossil: C content was calculated as an addition of C content in the raw materials. Basic materials going into the production are organic chemicals, liquid epoxy resin, hydrated lime and silica sand (ecoinvent v2.2 report 7_part XXVI)
- section bar rolling, steel: 0.975 kg; lognormal variance with pedigree 0.05, pedigree (1,1,5,1,1)
  composite
  EcoSpold01Location=RER
- glass fibre reinforced plastic, polyamide, injection moulded: 5.27 kg; lognormal variance with pedigree 0.05, pedigree (1,1,5,1,1)
  composite
  EcoSpold01Location=RER
  properties: carbon content, fossil 0.446018, wet mass 1 kg, dry mass 1 kg
  note on carbon content, fossil: Polyamide resin assimilate to Nylon 66 (ecoinvent v2.2 report 7_XIII). Nylon 66 is derived from hexamethylene diamine and adipic acid and has the following structure: -(HN-(CH2)6-NH-CO-(CH2)4-CO)n- (ecoinvent v2.2 report 11_II), C12H22N2O2. MW=226 g/mol. Here Nylon 66 is – mainly for improved stiffness and stability – modified with glass fibres. The glass fibre content in the product is assumed of 30%. (ecoinvent v2.2 report 11_II)
- electricity, medium voltage: 1.27 kWh; lognormal variance with pedigree 0.0507, pedigree (1,3,5,3,1)
  EcoSpold01Location=UCTE
- metal working factory: 2.32e-8 unit; lognormal variance with pedigree 0.3527, pedigree (2,4,5,3,1)
  activityLink introduced to establish a direct link to the corresponding regional supply of this product
  EcoSpold01Location=RER
- isopropanol: 0.0208 kg; lognormal variance with pedigree 0.0507, pedigree (1,3,5,3,1)
  EcoSpold01Location=RER
  properties: dry mass 1 kg, carbon content, fossil 0.6, wet mass 1 kg, heating value, net 34.3 MJ
- waste polyethylene/polypropylene product: 0 kg; pedigree (1,1,1,1,1)
  EcoSpold01Location=CH
  production volume 0 kg
    (same comment as for waste plastic, mixture)
  properties: heating value, net 42.47 MJ, carbon content, fossil 0.748045, water content 0.180638, dry mass 0.847 kg, wet mass 1 kg
  note on carbon content, fossil: Mixed various plastics was used to estimate the C content of this waste (Tab A.2, ecoinvent v2.2 report 13_I)
- aluminium, wrought alloy: 39.7 kg; lognormal variance with pedigree 0.05, pedigree (1,1,5,1,1)
  composite
  EcoSpold01Location=RER
  properties: wet mass 1 kg, dry mass 1 kg
- waste polyethylene/polypropylene product: -0.238833, -0.00716677 kg (2 entries); lognormal variance with pedigree 0.0507, pedigree (1,3,5,3,1)
  EcoSpold01Location=CH
  production volume 0.246 kg

## Sampling procedure
Company documentation, measurements

## Extrapolations
This dataset has been extrapolated from year 2004 to the year of the calculation (2021). The uncertainty has been adjusted accordingly.

## Review by Rolf Frischknecht 2007-11-07
passed
