# treatment of wastewater from anaerobic digestion of whey, capacity 1E9l/year

Dataset: EcoSpold 2, unit process
Geography: RoW
Time period: 1994-01-01 to 2021-12-31
Technology level: current
Classification: EcoSpold01Categories: waste management/wastewater treatment
Classification: ISIC rev.4 ecoinvent: 3700:Sewerage
Tags: ConvertedDataset; Treatment
Scenario: Business-as-Usual
System model: Allocation, cut-off by classification
Share of production covered: 1 %
Generated by: Michael Spielmann (obsolete)
Published in: Jungbluth N. 2007
Database: ecoinvent
isCopyrightProtected: true
accessRestrictedTo: 1

## General comment
Wastewater purified in a smaller municipal wastewater treatment plant (capacity class 4), with an average capacity size of 5320 per-captia-equivalents PCE.
Wastewater contains (in kg/m3): COD: 11.69 (GSD=122.5%); BOD: 7.792 (GSD=122.5%); DOC: 5.113 (GSD=122.5%); TOC: 5.113 (GSD=122.5%); Ntot.: 0.9 (GSD=122.5%); Ptot.: 0.25 (GSD=122.5%); Ca: 0.9 (GSD=226.6%); K: 1.8 (GSD=226.6%);
[This dataset was already contained in the ecoinvent database version 2. It was not individually updated during the transfer to ecoinvent version 3. Life Cycle Impact Assessment results may still have changed, as they are affected by changes in the supply chain, i.e. in other datasets. This dataset was generated following the ecoinvent quality guidelines for version 2. It may have been subject to central changes described in the ecoinvent version 3 change report (http://www.ecoinvent.org/database/ecoinvent-version-3/reports-of-changes/), and the results of the central updates were reviewed extensively. The changes added e.g. consistent water flows and other information throughout the database. The documentation of this dataset can be found in the ecoinvent reports of version 2, which are still available via the ecoinvent website. The change report linked above covers all central changes that were made during the conversion process.]

## Included activities end
Infrastructure materials for municipal wastewater treatment plant, transports, dismantling. Land use burdens.

## Geography
Specific to the technology mix encountered in Switzerland in 2000. Well applicable to modern treatment practices in Europe, North America or Japan.

## Technology
Three stage wastewater treatment (mechanical, biological, chemical) including sludge digestion (fermentation) according to the average technology in Switzerland

## Parameters
- fraction, process water, to air: 0.1 dimensionless; name fraction_PW_to_air; lognormal variance with pedigree 0.092025, pedigree (4,4,3,2,4)

## Reference product
- wastewater from anaerobic digestion of whey: -1 m3; By-product classification Waste; CPC 39920: Sewage sludge
  EcoSpold01Location=CH
  production volume 3.96633 m3
    This is a placeholder value that does not reflect real-world production volumes. This dataset does not currently require a real-world production volume to work in the database framework, and no actual data were collected yet. This has no negative effect on the results of the ecoinvent database.
  property carbon content, non-fossil 0.566667
    TOC is 5.1 kg/m3 (Tab 12.51, ecoinvent v2.2 report 17). TOC was considered as Total Carbon.
  property price 0 EUR2005
    Waste products are assigned a price of zero as they are assumed to require further treatment.
  property carbon content 0.566667
    carbon content on a dry matter basis (reserved; not for manual entry)
  properties: water in wet mass 991 kg, carbon content, fossil 0, dry mass 9 kg, water content 110.111, wet mass 1000 kg, carbon allocation 5.1 kg

## Inputs from technosphere
- titanium dioxide: 3.0843e-5 kg; lognormal variance with pedigree 0.542, pedigree (1,1,5,5,1)
  burden from sludge incineration. Uncertainty calculated from wastewater composition and treatment model
  EcoSpold01Location=RER
  properties: wet mass 1 kg, dry mass 1 kg
- municipal waste incineration facility: 8.5404e-10 unit; lognormal variance with pedigree 0.042, pedigree (1,1,5,5,1)
  burden from sludge incineration. Uncertainty calculated from wastewater composition and treatment model
  EcoSpold01Location=CH
- chromium oxide, flakes: 6.2946e-7 kg; lognormal variance with pedigree 0.542, pedigree (1,1,5,5,1)
  EcoSpold01Location=RER
  burden from sludge incineration. Uncertainty calculated from wastewater composition and treatment model
  properties: wet mass 1 kg, dry mass 1 kg
- residual material landfill: 1.2821e-10 unit; lognormal variance with pedigree 0.072, pedigree (1,1,5,5,1)
  EcoSpold01Location=CH
  burden from sludge incineration. Uncertainty calculated from wastewater composition and treatment model
- sodium hydroxide, without water, in 50% solution state: 0.00017006 kg; lognormal variance with pedigree 0.092, pedigree (1,1,5,5,1)
  (same comment as for chromium oxide, flakes)
  properties: wet mass 1 kg, dry mass 1 kg, heating value, net 3.03 MJ
- aluminium sulfate, powder: 0.30645 kg; lognormal variance with pedigree 0.102, pedigree (1,1,5,5,1)
  EcoSpold01Location=RER
  direct wastewater treatment plant burden. Uncertainty calculated from wastewater composition and treatment model
  properties: dry mass 1 kg, wet mass 1 kg
- process-specific burdens, slag landfill: 0 kg; pedigree (1,1,1,1,1)
  (same comment as for residual material landfill)
- electricity, high voltage: 0 kWh; pedigree (1,1,1,1,1)
  (same comment as for municipal waste incineration facility)
- waste graphical paper: -0.0155 kg; lognormal variance with pedigree 0.042, pedigree (1,1,5,5,1)
  direct wastewater treatment plant burden. Uncertainty calculated from wastewater composition and treatment model
  EcoSpold01Location=CH
  production volume 0.062 kg
    Calculated from the production volume of sewage from anaerobic digestion of whey in proportion to the respective output amounts.
  properties: carbon content, non-fossil 0.454955, water content 0.126126, dry mass 0.888 kg, wet mass 1 kg, heating value, net 14.12 MJ
  note on heating value, net: Value taken from the general comment of the treatment dataset.
- waste cement, hydrated: 0 kg; pedigree (1,1,1,1,1)
  (same comment as for municipal waste incineration facility)
  production volume 0 kg
    (same comment as for waste graphical paper)
  properties: wet mass 1 kg, dry mass 1 kg
- ammonia, anhydrous, liquid: 0 kg; pedigree (1,1,1,1,1)
  (same comment as for municipal waste incineration facility)
  properties: dry mass 1 kg, wet mass 1 kg
- sewer grid, 1E9l/year, 30 km: 2.8218e-7 km; lognormal variance with pedigree 0.042, pedigree (1,1,5,5,1)
  EcoSpold01Location=CH
  uncertainty heeded in exchanges of the module
- iron (III) chloride, without water, in 40% solution state: 1.5503 kg; lognormal variance with pedigree 0.102, pedigree (1,1,5,5,1)
  direct wastewater treatment plant burden plus burden from sludge incineration. Uncertainty calculated from wastewater composition and treatment model
  EcoSpold01Location=CH
  properties: dry mass 1 kg, wet mass 1 kg
- heat, district or industrial, other than natural gas: 0 MJ; pedigree (1,1,1,1,1)
  (same comment as for residual material landfill)
  properties: heating value, net 1 MJ
- slag landfill: 8.802e-10 unit; lognormal variance with pedigree 0.072, pedigree (1,1,5,5,1)
  (same comment as for municipal waste incineration facility)
- waste plastic, mixture: 0 kg; pedigree (1,1,1,1,1)
  (same comment as for waste graphical paper)
  production volume 0 kg
    (same comment as for waste graphical paper)
  properties: wet mass 1 kg, heating value, net 30.79 MJ, water content 0.180638, dry mass 0.847 kg, carbon content, fossil 0.747344
  note on carbon content, fossil: C content in 1 kg DM was calculated using data in Tab A.2, ecoinvent v2.2 report 13_I
- electricity, low voltage: 0 kWh; pedigree (1,1,1,1,1)
  EcoSpold01Location=CH
  direct wastewater treatment plant burden. Uncertainty calculated from wastewater composition and treatment model
- heat, district or industrial, natural gas: 0 MJ; pedigree (1,1,1,1,1)
  (same comment as for titanium dioxide)
  properties: heating value, net 1 MJ
- iron sulfate: 1.1339 kg; lognormal variance with pedigree 0.102, pedigree (1,1,5,5,1)
  direct wastewater treatment plant burden. Uncertainty calculated from wastewater composition and treatment model
  EcoSpold01Location=RER
  properties: dry mass 1 kg, wet mass 1 kg
- process-specific burdens, municipal waste incineration: 0 kg; pedigree (1,1,1,1,1)
  (same comment as for residual material landfill)
- wastewater treatment facility, capacity 1E9l/year: 2.6582e-8 unit; lognormal variance with pedigree 0.042, pedigree (1,1,5,5,1)
  EcoSpold01Location=CH
  uncertainty heeded in exchanges of the module
- liquid manure spreading, by vacuum tanker: 0.036471 m3; lognormal variance with pedigree 0.042, pedigree (1,1,5,5,1)
  EcoSpold01Location=CH
  burden from sludge spreading. Uncertainty calculated from wastewater composition and treatment model
- quicklime, milled, packed: 3.0832e-5 kg; lognormal variance with pedigree 0.102, pedigree (1,1,5,5,1)
  (same comment as for residual material landfill)
  properties: water content 0.010101, wet mass 1 kg, dry mass 0.99 kg
- hydrochloric acid, without water, in 30% solution state: 3.7772e-6 kg; lognormal variance with pedigree 0.122, pedigree (1,1,5,5,1)
  (same comment as for chromium oxide, flakes)
  properties: heating value, net 3.32 MJ, dry mass 1 kg, wet mass 1 kg
- process-specific burdens, residual material landfill: 0 kg; pedigree (1,1,1,1,1)
  (same comment as for municipal waste incineration facility)
- chemical, inorganic: 6.2953e-6 kg; lognormal variance with pedigree 0.122, pedigree (1,1,5,5,1)
  EcoSpold01Location=GLO
  burden from sludge incineration. Uncertainty calculated from wastewater composition and treatment model
  properties: carbon content, fossil 0.003, dry mass 1 kg, wet mass 1 kg
  note on carbon content, fossil: This dataset is an unweighted average of 20 inorganic substances (listed in Tab 88.1, ecoinvent v2.2 report 8, part II), being part of the top100 chemicals included in this database. The C-content has also been calculated as an unweighted average of the C content of the substances composing this dataset.
- cement, unspecified: 0 kg; pedigree (1,1,1,1,1)
  (same comment as for residual material landfill)
  properties: wet mass 1 kg, dry mass 1 kg
- process-specific burdens, slag landfill: 0.140054, 0.355056 kg (2 entries); lognormal variance with pedigree 0.072, pedigree (1,1,5,5,1)
  (same comment as for residual material landfill)
- electricity, high voltage: 0.00496327, 0.000951506, 0.0219166, 0.0718246, 0.0161328, 0.232306, 0.0368416, 0.106204 kWh (8 entries); lognormal variance with pedigree 0.492, pedigree (1,1,5,5,1)
  (same comment as for municipal waste incineration facility)
- waste cement, hydrated: -0.0174084, -0.0441326 kg (2 entries); lognormal variance with pedigree 0.082, pedigree (1,1,5,5,1)
  (same comment as for municipal waste incineration facility)
  production volume 0.244092 kg
- ammonia, anhydrous, liquid: 0.000225858, 1.94152e-5, 3.02051e-5, 5.98469e-5, 5.86342e-5, 6.14549e-6, 2.74726e-5, 0.000649922 kg (8 entries); lognormal variance with pedigree 0.222, pedigree (1,1,5,5,1)
  (same comment as for municipal waste incineration facility)
- heat, district or industrial, other than natural gas: 0.00113361, 0.0684526, 2.79551 MJ (3 entries); lognormal variance with pedigree 0.042, pedigree (1,1,5,5,1)
  (same comment as for residual material landfill)
- waste plastic, mixture: -0.00172425, -0.000115208, -8.71297e-6, -4.75849e-5, -1.92238e-5, -4.51863e-5, -0.00146914, -0.0120707 kg (8 entries); lognormal variance with pedigree 0.042, pedigree (1,1,5,5,1)
  (same comment as for waste graphical paper)
  production volume 0.0614782 kg
- electricity, low voltage: 0.0863468, 0.0157221, 0.354908, 1.23997, 0.253146, 3.88659, 0.628782, 1.80554 kWh (8 entries); lognormal variance with pedigree 0.062, pedigree (1,1,5,5,1)
  (same comment as for electricity, low voltage)
- heat, district or industrial, natural gas: 0.0010526, 0.0252224, 0.068297 MJ (3 entries); lognormal variance with pedigree 0.222, pedigree (1,1,5,5,1)
  (same comment as for titanium dioxide)
- process-specific burdens, municipal waste incineration: 0.966356, 2.44984 kg (2 entries); lognormal variance with pedigree 0.042, pedigree (1,1,5,5,1)
  (same comment as for residual material landfill)
- process-specific burdens, residual material landfill: 0.0174084, 0.0441326 kg (2 entries); lognormal variance with pedigree 0.072, pedigree (1,1,5,5,1)
  (same comment as for municipal waste incineration facility)
- cement, unspecified: 0.00355459, 0.000739605, 5.4171e-5, 0.000154405, 0.00349192, 0.000102777, 0.0011288, 0.000136572, 0.0152542 kg (9 entries); lognormal variance with pedigree 0.082, pedigree (1,1,5,5,1)
  (same comment as for residual material landfill)

## Emissions to nature
- Sulfate [water, surface water]: 0.9749 kg; lognormal variance with pedigree 0.102, pedigree (1,1,5,5,1)
  sewer overload discharge plus direct wastewater treatment plant emission plus emission from sludge incineration. Uncertainty calculated from wastewater composition and treatment model
- DOC, Dissolved Organic Carbon [water, surface water]: 0.57266 kg; lognormal variance with pedigree 0.082, pedigree (1,1,5,5,1)
  (same comment as for Sulfate)
- Aluminium [soil, agricultural]: 0.034547 kg; lognormal variance with pedigree 0.102, pedigree (1,1,5,5,1)
  emission from sludge spreading. Uncertainty calculated from wastewater composition and treatment model
- Nitrite [water, surface water]: 0.020648 kg; lognormal variance with pedigree 0.082, pedigree (1,1,5,5,1)
  direct wastewater treatment plant emission. Uncertainty calculated from wastewater composition and treatment model
- Carbon [soil, agricultural]: 0.93796 kg; lognormal variance with pedigree 0.102, pedigree (1,1,5,5,1)
  (same comment as for Aluminium)
- Ammonium, ion [water, surface water]: 0.35354 kg; lognormal variance with pedigree 0.062, pedigree (1,1,5,5,1)
  (same comment as for Nitrite)
- Nitrate [water, surface water]: 1.5484 kg; lognormal variance with pedigree 0.062, pedigree (1,1,5,5,1)
  (same comment as for Sulfate)
- Iron [soil, agricultural]: 0.67889 kg; lognormal variance with pedigree 0.102, pedigree (1,1,5,5,1)
  (same comment as for Aluminium)
- Calcium [soil, agricultural]: 0.063038 kg; lognormal variance with pedigree 0.732, pedigree (1,1,5,5,1)
  (same comment as for Aluminium)
- Carbon dioxide, fossil [air, urban air close to ground]: 13.069 kg; lognormal variance with pedigree 0.062, pedigree (1,1,5,5,1)
  emission from sludge incineration. Uncertainty calculated from wastewater composition and treatment model
- Phosphate [water, ground-]: 0.0020267 kg; lognormal variance with pedigree 0.142, pedigree (1,1,5,5,1)
  (same comment as for Aluminium)
- Nitrate [water, ground-, long-term]: 0.00076724 kg; lognormal variance with pedigree 0.092, pedigree (1,1,5,5,1)
  (same comment as for Carbon dioxide, fossil)
- Nitrogen oxides [air, urban air close to ground]: 0.021664 kg; lognormal variance with pedigree 0.092, pedigree (1,1,5,5,1)
  direct digester gas emission plus emission from sludge incineration. Uncertainty calculated from wastewater composition and treatment model
- Phosphate [water, surface water]: 0.26507 kg; lognormal variance with pedigree 0.082, pedigree (1,1,5,5,1)
  sewer overload discharge plus direct wastewater treatment plant emission plus emission from sludge incineration plus emission from sludge spreading. Uncertainty calculated from wastewater composition and treatment model
- Methane, fossil [air, urban air close to ground]: 0.038144 kg; lognormal variance with pedigree 0.142, pedigree (1,1,5,5,1)
  (same comment as for Carbon dioxide, fossil)
- DOC, Dissolved Organic Carbon [water, ground-, long-term]: 0.003669 kg; lognormal variance with pedigree 0.122, pedigree (1,1,5,5,1)
  (same comment as for Carbon dioxide, fossil)
- Ammonia [air, urban air close to ground]: 0.019057 kg; lognormal variance with pedigree 0.312, pedigree (1,1,5,5,1)
  direct digester gas emission plus emission from sludge incineration plus emission from sludge spreading. Uncertainty calculated from wastewater composition and treatment model
- Water [air, unspecified]: 0.1 m3; name water_to_air_unspecified; lognormal variance with pedigree 0.0827, pedigree (2,2,5,5,1)
  Calculated value based on water balance.
  property fraction, origin: salt water 0; name fraction_origin_salt_water
  property fraction, origin: fresh water 0; name fraction_origin_fresh_water
  property fraction, origin: unspecified 1; name fraction_origin_unspecified
- BOD5, Biological Oxygen Demand [water, ground-, long-term]: 0.0030329 kg; lognormal variance with pedigree 0.122, pedigree (1,1,5,5,1)
  (same comment as for Carbon dioxide, fossil)
- Iron, ion [water, ground-, long-term]: 0.12738 kg; lognormal variance with pedigree 0.932, pedigree (1,1,5,5,1)
  (same comment as for Carbon dioxide, fossil)
- Water [water, unspecified]: 0.9 m3; name water_to_water_unspecified; lognormal variance with pedigree 0.0827, pedigree (2,2,5,5,1)
  Calculated value based on water balance.
  property fraction, origin: salt water 0; name fraction_origin_salt_water_Ww
  property fraction, origin: fresh water 1; name fraction_origin_fresh_water_Ww
  property fraction, origin: unspecified 0; name fraction_origin_unspecified_Ww
  property dry mass 0 kg; name DM
  property water in wet mass 1000 kg; name WWM
  property carbon content, non-fossil 0; name C_content_non_fossil
  property wet mass 1000 kg; name WM
  property carbon content, fossil 0; name C_content_fossil
- Nitrogen [water, surface water]: 0.01571 kg; lognormal variance with pedigree 0.082, pedigree (1,1,5,5,1)
  (same comment as for Nitrite)
- Iron, ion [water, surface water]: 9.3065e-5 kg; lognormal variance with pedigree 0.132, pedigree (1,1,5,5,1)
  (same comment as for Sulfate)
- Calcium, ion [water, ground-, long-term]: 0.021975 kg; lognormal variance with pedigree 0.732, pedigree (1,1,5,5,1)
  (same comment as for Carbon dioxide, fossil)
- Carbon monoxide, fossil [air, urban air close to ground]: 0.01209 kg; lognormal variance with pedigree 0.162, pedigree (1,1,5,5,1)
  (same comment as for Carbon dioxide, fossil)
- TOC, Total Organic Carbon [water, ground-, long-term]: 0.003669 kg; lognormal variance with pedigree 0.122, pedigree (1,1,5,5,1)
  (same comment as for Carbon dioxide, fossil)
- Dinitrogen monoxide [air, urban air close to ground]: 0.0036745 kg; lognormal variance with pedigree 0.092, pedigree (1,1,5,5,1)
  direct wastewater treatment plant emission plus direct digester gas emission plus emission from sludge incineration plus emission from sludge spreading. Uncertainty calculated from wastewater composition and treatment model
- COD, Chemical Oxygen Demand [water, surface water]: 2.2653 kg; lognormal variance with pedigree 0.082, pedigree (1,1,5,5,1)
  (same comment as for Sulfate)
- Calcium [air, urban air close to ground]: 4.2096e-5 kg; lognormal variance with pedigree 0.752, pedigree (1,1,5,5,1)
  (same comment as for Nitrogen oxides)
- Potassium, ion [water, surface water]: 1.8 kg; lognormal variance with pedigree 0.692, pedigree (1,1,5,5,1)
  (same comment as for Sulfate)
- Chloride [water, surface water]: 1.0165 kg; lognormal variance with pedigree 0.102, pedigree (1,1,5,5,1)
  (same comment as for Sulfate)
- NMVOC, non-methane volatile organic compounds, unspecified origin [air, urban air close to ground]: 0.00017332 kg; lognormal variance with pedigree 0.262, pedigree (1,1,5,5,1)
  direct digester gas emission. Uncertainty calculated from wastewater composition and treatment model
- Aluminium [air, urban air close to ground]: 2.1619e-5 kg; lognormal variance with pedigree 0.122, pedigree (1,1,5,5,1)
  (same comment as for Nitrogen oxides)
- Phosphorus [air, urban air close to ground]: 4.6478e-5 kg; lognormal variance with pedigree 0.112, pedigree (1,1,5,5,1)
  (same comment as for Nitrogen oxides)
- Iron [air, urban air close to ground]: 9.0791e-6 kg; lognormal variance with pedigree 0.142, pedigree (1,1,5,5,1)
  (same comment as for Nitrogen oxides)
- Calcium, ion [water, surface water]: 0.81181 kg; lognormal variance with pedigree 0.692, pedigree (1,1,5,5,1)
  (same comment as for Sulfate)
- TOC, Total Organic Carbon [water, surface water]: 0.81575 kg; lognormal variance with pedigree 0.082, pedigree (1,1,5,5,1)
  (same comment as for Sulfate)
- Aluminium [water, surface water]: 1.1515e-6 kg; lognormal variance with pedigree 0.712, pedigree (1,1,5,5,1)
  (same comment as for Sulfate)
- Phosphate [water, ground-, long-term]: 0.0054432 kg; lognormal variance with pedigree 4.272, pedigree (1,1,5,5,1)
  (same comment as for Carbon dioxide, fossil)
- Aluminium [water, ground-, long-term]: 0.010242 kg; lognormal variance with pedigree 0.112, pedigree (1,1,5,5,1)
  (same comment as for Carbon dioxide, fossil)
- COD, Chemical Oxygen Demand [water, ground-, long-term]: 0.0092721 kg; lognormal variance with pedigree 0.122, pedigree (1,1,5,5,1)
  (same comment as for Carbon dioxide, fossil)
- Cyanide [air, urban air close to ground]: 1.9222e-5 kg; lognormal variance with pedigree 0.242, pedigree (1,1,5,5,1)
  (same comment as for Carbon dioxide, fossil)
- BOD5, Biological Oxygen Demand [water, surface water]: 0.73879 kg; lognormal variance with pedigree 0.072, pedigree (1,1,5,5,1)
  (same comment as for Sulfate)

## Sampling procedure
literature

## Extrapolations
wastewater compositions from literature and/or estimates This dataset has been copied from an original dataset covering the geography CH. The uncertainty has been adjusted accordingly.

## Review by Niels Jungbluth 2009-02-07
passed.
none
