# transformer production, high voltage use

Dataset: EcoSpold 2, unit process
Geography: GLO
Time period: 1994-01-01 to 2021-12-31
Technology level: current
Classification: ISIC rev.4 ecoinvent: 2710:Manufacture of electric motors, generators, transformers and electricity di
Classification: EcoSpold01Categories: electronics/component
Scenario: Business-as-Usual
System model: Allocation, cut-off by classification
Generated by: Roland Hischier
Published in: Hischier R. 2007
Database: ecoinvent
isCopyrightProtected: true
accessRestrictedTo: 1

## General comment
This dataset represents the production of 1 kg of power transformers for the high voltage area. It is based on the assumption that a typical high voltage use transformer in electronic modules has an average weight of 280 g. The data represent a typical high voltage transformer, used in the information and communication technology. Material data are taken from the literature. Production efforts are approximated by using material specific treatment processes. Infrastructure is included in these production efforts approximation.
[This dataset was already contained in the ecoinvent database version 2. It was not individually updated during the transfer to ecoinvent version 3. Life Cycle Impact Assessment results may still have changed, as they are affected by changes in the supply chain, i.e. in other datasets. This dataset was generated following the ecoinvent quality guidelines for version 2. It may have been subject to central changes described in the ecoinvent version 3 change report (http://www.ecoinvent.org/database/ecoinvent-version-3/reports-of-changes/), and the results of the central updates were reviewed extensively. The changes added e.g. consistent water flows and other information throughout the database. The documentation of this dataset can be found in the ecoinvent reports of version 2, which are still available via the ecoinvent website. The change report linked above covers all central changes that were made during the conversion process.]

## Included activities start
From reception of metals and plastics at the factory gate.

## Included activities end
This dataset includes raw material input and production efforts for the production of high voltage type transformers, i.e. for an area of 200 up to 380 V.

## Geography
Data represent a global valuable composition of high voltage transformers.

## Technology
average transformer production technology, based on literature and assumptions.

## Reference product
- transformer, high voltage use: 1 kg; By-product classification allocatable product; CPC 46121: Electrical transformers
  EcoSpold01Location=GLO
  A transformer is an electrical device that transfers energy from one circuit to another by magnetic coupling, without requiring relative motion between its parts. A transformer comprises two or more coupled windings, and, in most cases, a magnetic core to concentrate magnetic flux. A changing voltage applied to one winding creates a time-varying magnetic flux in the core, which induces a voltage in the other windings. Transformers come in a range of sizes from a thumbnail-sized coupling transformer hidden inside a stage microphone to huge gigawatt units used to interconnect large portions of national power grids. All operate with the same basic principles and with many similarities in their parts. The main usage of transformers is the power supply from an alternating current power grid to equipment which uses a different voltage (e.g. in power supply units). However, other types of transformers can also be used for the transmission of power over long distances, transferring signals (e.g. in the VHS video head system) - or large forms are in use in steelmaking (electric arc furnace). Hence, there is a huge variety of different types of transformers on the market - a variety that can not be covered 100% by the here described ecoinvent datasets. Most transformers with iron cores can be considered as ideal when in use. An ideal transformer has no losses, an aim that is closely attained in practice, so the energy transfer from the primary circuit to the secondary circuit is perfect. In transformer design it is before all important to design a transformer that is economical, efficient and makes the best use of available materials. However, as in all design processes, there are numerous trade-offs between competing requirements, and some sort of optimum is sought. On the other hand, the properties of available materials rigidly limit the possibilities. Aspects that have to be defined are size, shape and material of the core - as well as the number of turns of the primary and secondary windings.
  production volume 1 kg
    Dummy value to be replaced by measured, estimated or calculated value
  property carbon content, fossil 0.262798
    Calculated as the addition of C contents in the product composition
  property carbon content 0.262798
    carbon content on a dry matter basis (reserved; not for manual entry)
  properties: wet mass 1 kg, carbon content, non-fossil 0, water content 0, price 11.5 EUR2005, water in wet mass 0 kg, dry mass 1 kg, carbon allocation 0.262798 kg

## Inputs from technosphere
- injection moulding: 0.51057 kg; lognormal variance with pedigree 0.0941, pedigree (4,5,5,3,3)
  Estimation, based on specific processing datasets for the further treatment of raw materials.
  EcoSpold01Location=RER
  Uncertainty: own estimation
- epoxy resin, liquid: 0 kg; source Behrendt S 1998; pedigree (1,1,1,1,1)
  EcoSpold01Location=RER
  Calculated value. From literature with a process efficiency of 90%.
  Uncertainty: average from literature
  properties: heating value, net 12.82 MJ, wet mass 1 kg, carbon content, fossil 0.42325, dry mass 1 kg
- wire drawing, copper: 0.11011 kg; lognormal variance with pedigree 0.0941, pedigree (4,5,5,3,3)
  (same comment as for injection moulding)
- copper, cathode: 0.10511 kg; source Behrendt S 1998; lognormal variance with pedigree 0.052, pedigree (1,4,5,1,1)
  (same comment as for epoxy resin, liquid)
  properties: dry mass 1 kg, wet mass 1 kg
- steel, low-alloyed, hot rolled: 0.005 kg; source Behrendt S 1998; lognormal variance with pedigree 0.052, pedigree (1,4,5,1,1)
  Calculated value. From literature with a process efficiency of 90%.
  EcoSpold01Location=RER
  Uncertainty: average from literature
  properties: dry mass 1 kg, carbon content, fossil 0.005, wet mass 1 kg
  note on carbon content, fossil: Low alloyed steel composition given in Tab. 3.2 ecoinvent v2.2 report 10_partII. Steel assumed to have a C content of 0.5%
- ferrite: 0.50056 kg; source Behrendt S 1998; lognormal variance with pedigree 0.052, pedigree (1,4,5,1,1)
  EcoSpold01Location=GLO
  Calculated value. From literature with a process efficiency of 90%.
  Uncertainty: average from literature
  properties: dry mass 1 kg, wet mass 1 kg
- polycarbonate: 0.14031 kg; source Behrendt S 1998; lognormal variance with pedigree 0.052, pedigree (1,4,5,1,1)
  (same comment as for epoxy resin, liquid)
  properties: wet mass 1 kg, carbon content, fossil 0.755906, dry mass 1 kg, heating value, net 29.57 MJ
  note on carbon content, fossil: Polycarbonate means here 2,2-bis(4-hydroxyphenyl)propane polycarbonate – also called bisphenol A polycarbonate ( -(O-C6H4-C(CH3)2-C6H4-O-CO)n- (ecoinvent v2.2 report 11_II), C16H14O3, MW=254 g/mol.
- waste plastic, mixture: 0 kg; pedigree (1,1,1,1,1)
  EcoSpold01Location=CH
  Proxy. Waste amount not taken into acount for recycling and emissions.
  Uncertainty: own estimation
  production volume 0 kg
    Calculated from the production volume of transformer, high voltage use in proportion to the respective output amounts.
  properties: heating value, net 30.79 MJ, wet mass 1 kg, carbon content, fossil 0.747344, dry mass 0.847 kg, water content 0.180638
  note on heating value, net: Value taken from the general comment of the treatment dataset.
  note on carbon content, fossil: C content in 1 kg DM was calculated using data in Tab A.2, ecoinvent v2.2 report 13_I
- epoxy resin, liquid: 0.0644252, 0.305835 kg (2 entries); source Behrendt S 1998; lognormal variance with pedigree 0.052, pedigree (1,4,5,1,1)
  (same comment as for epoxy resin, liquid)
- waste plastic, mixture: -0.00481812, -0.000371449, -0.000153422, -0.000145688, -0.00555927, -6.19806e-5, -2.80921e-5, -0.038918 kg (8 entries); lognormal variance with pedigree 0.0941, pedigree (4,5,5,3,3)
  (same comment as for waste plastic, mixture)
  production volume 0.050056 kg

## Sampling procedure
literature

## Extrapolations
This dataset has been extrapolated from year 2007 to the year of the calculation (2021). The uncertainty has been adjusted accordingly.

## Review by Roland Hischier 2011-09-21
Transfer of documentation done.

## Review by Emilia Moreno Ruiz 2014-05-19
correction of error introduced during documentation by trainee

## Review by Rolf Frischknecht 2007-11-15
passed.
