# fatty acid production, from coconut oil

Dataset: EcoSpold 2, unit process
Geography: RER
Time period: 2005-01-01 to 2021-12-31
Technology level: current
Classification: ISIC rev.4 ecoinvent: 2011:Manufacture of basic chemicals
Synonyms: carboxylic acid
Scenario: Business-as-Usual
System model: Allocation, cut-off by classification
Generated by: Lucia Valsasina
Database: ecoinvent
isCopyrightProtected: true
accessRestrictedTo: 1

## General comment
The functional unit is 1 kg of fatty acids - based on the oil from coco nuts. Coconut fatty acids and their fractions can either be used directly or converted to other derivates, covering a broad range of applications in the oleochemical industry. The largest part of coconut fatty acids goes into the manufacture of toilet soap, where its lauric content provides the required lathering properties (Gervajio, 2005).
Reference: Gervajio, Gregorio C.. 2005. Fatty Acids and Derivates from Conconut Oil, Bailey's Industrial Oil and Fat Products, Sixth Edition, Six Volume Set. Edited by Freidoon Shahidi. John wiley & Sons, Inc.
For more information on the model please refer to the dedicate ecoinvent report, access it in the Report section of ecoQuery (http://www.ecoinvent.org/login-databases.html)
[This dataset is meant to replace the following datasets:
- fatty acid production, from vegetable oil, RER, 1995 - 1995]

## Included activities start
The activity starts when the raw materials enter the process.

## Included activities end
Materials entering the process are included as well as energy uses, infrastructure and emissions.

## Geography
The inputs to the process are calculated based on stoichiometry and literature data, they are therefore considered to be valid for the chosen geography.

## Technology
Coconut oil is split into its corresponding fatty acids and glycerine. In the chemical reaction triglyceride reacts with water to fatty acid and glycerine, for example:
RCOOCH2 + 3 H2O → RCOOH + CH2OH
Gervajio (2005) describes four possible technologies applied for the fat-splitting process. Here we model the continuous process (also known as Colgate-Emery Process), which is the most efficient of the current technologies (up to 99%). A high degree of splitting is achieved through a countercurrent flow of oil and water under 250-260 degree C. A catalyst is not needed, however, can be employed.
In a second stage after splitting, the fatty acids are distilled to remove the high and low boiling impurities. This happens in a distillation tower under vacuum and about 200 degrees C. The distilled fatty acid is free of major impurities and is of close to water white color. IPS Engineers (2013) mention a process efficiency of 85%-95%, therefore we apply the average of 90%.
In a third step, fractionation, specific components, such as C12 for lauric acid/dodecanol production, are separated. For a lack of better information, we approximate electricity and steam use of fractionation with data reported for vegetable oil processing in India (TERI, 2013).
Reference: Gervajio, Gregorio C.. 2005. Fatty Acids and Derivates from Conconut Oil, Bailey's Industrial Oil and Fat Products, Sixth Edition, Six Volume Set. Edited by Freidoon Shahidi. John wiley & Sons, Inc.
IPS Engineering. 2013. Oleochemicals - Processing Plant. Retrieved online from http://www.ips-engineering.it/Doc/Oleochemicals.pdf, last accessed 26/06/2017
The Energy and Resource Institute (TERI). 2013. Widening the coverage of PAT Scheme, Sectoral Manual – Vegetable oil industry, p. 15. Retrieved online from http://shaktifoundation.in/wp-content/uploads/2014/02/widening-of-pat-sectors-vegetable-refineries.pdf, last accessed 26/06/2017
For more information on the model please refer to the dedicate ecoinvent report, access it in the Report section of ecoQuery (http://www.ecoinvent.org/login-databases.html)

## Time period
The activity is based on literature data from 2005, 2013 and 2015.

## Reference product
- fatty acid: 1 kg; name RP; CPC 34120: Industrial monocarboxylic fatty acids; acid oils from refining; By-product classification allocatable product
  Coconut fatty acids and their fractions can either be used directly or converted to other derivates, covering a broad range of applications in the oleochemical industry. The largest part of coconut fatty acids goes into the manufacture of toilet soap, where its lauric content provides the required lathering properties (Gervajio, 2005).
  Reference: Gervajio, Gregorio C.. 2005. Fatty Acids and Derivates from Conconut Oil, Bailey's Industrial Oil and Fat Products, Sixth Edition, Six Volume Set. Edited by Freidoon Shahidi. John wiley & Sons, Inc.
  production volume 1.62158e7 kg; name RP_PV; = 17.4%*3%*3106474000
    Based on expert judgement it is assumed that 3% of the global production of coconut oil is utilised in the production of fatty acid. The European production volume is estimated based on information from Cefic (European Chemical Industry Council) and the American Chemistry Council.
    According to Cefic (2016) the global sales of chemicals in the year 2015 was 3 534 billion euros. The reported share of sales per region are: EU28 14.7%; Other Europe (Switzerland, Norway, Turkey, Russia and Ukraine) 2.7%; NAFTA (US, Canada and Mexico) 16.5%; Latin America 3.8%; China 39.9%; Japan 3.9%; Republic of Korea 3.2%; India 2.2%; Rest of Asia 11.9%; Rest of the World 1.3%, Switzerland 1%. Cefic also reports the US total sales, which amount to 518.7 billion euros out of the global 3 534 billion euros (14.7%). The same share is reported by the American Chemistry Council (2016), according to which the USA sales account for 15% of global sales for the year 2016.
    Reference:
    FAOSTAT, 2017, Food and Agriculture Organization of the United Nations. Statistical data on crops processed. Available at: http://www.fao.org/faostat/en/#data/QD
    Cefic 2016. Facts and figures 2016 of the European chemical industry. Accessible at: http://www.cefic.org/Facts-and-Figures/Chemicals-Industry-Profile/
    American Chemistry Council 2016. Outlook: U.S. Chemical Industry Continues to Outpace Industrial Output; Accounts for More Than One-Half of Construction Spending by Manufacturing Sector. Accessible at: https://www.americanchemistry.com/Media/PressReleasesTranscripts/ACC-news-releases/US-Chemical-Industry-Continues-to-Outpace-Industrial-Output.html
  property heating value, net 22.73 MJ
    LHV is calculated based on the Carbon content of the product. More details can be found on the respective documentation.
  property price 1.45 EUR2005; name RP_price_EUR2005
    From ICIS (http://www.icispricing.com/il_shared/Samples/SubPage10100075.asp). Commodity: 'Fatty acids'. Year 2011.
  property carbon content 0.75
    carbon content on a dry matter basis (reserved; not for manual entry)
  properties: dry mass 1 kg, water in wet mass 0 kg, carbon content, non-fossil 0.75, wet mass 1 kg, water content 0, carbon content, fossil 0, carbon allocation 0.75 kg

## Inputs from technosphere
- chemical factory, organics: 4e-10 unit; lognormal variance with pedigree 0.31, pedigree (2,3,2,4,3)
  Calculated based on literature data published by the industry. For this activity, no information was readily available concerning infrastructure and land-use. Therefore, the infrastructure is estimated based on data from two chemical factories, the BASF site of Ludwigshafen and the chemical factory in Gendorf (which are both located in Germany), which produce a wide range of chemical substances. Based on this data, the following assumptions are made: the built area amounts to about 4.2 ha, the plant has an average output of 50'000 t/a and a lifespan of fifty years. The estimated infrastructure amount is therefore 4.00 E-10 units per kg of produced chemical.
  References:
  Althaus H.-J., Chudacoff M., Hischier R., Jungbluth N., Osses M. and Primas A. (2007) Life Cycle Inventories of Chemicals. ecoinvent report No. 8, v2.0. EMPA Dübendorf, Swiss Centre for Life Cycle Inventories, Dübendorf, CH.
  Gendorf (2000) Umwelterklärung 2000, Werk Gendorf. Werk Gendorf, Burgkirchen.
- heat, from steam, in chemical industry: 2.40331 MJ; = ((190*2.784)/(0.99*0.9*0.95)+(370*2.794+150*2.759)/(0.9*0.95)+(30*2.7)/0.95)/1000; lognormal variance with pedigree 0.010025, pedigree (2,3,2,2,3)
  This is reported as 190kg of steam (6000kPa) used in the fat splitting process of 1 tonne of crude coconut oil, and 370kg (5000kPa) and 150kg (300-1000kPa) of steam for the distillation of 1 tonne crude fatty acid (Gervajio, 2005). Gervajio (2005) further reports 120kg of export steam from the destillation process. For a lack of better information we assume this export steam to be used in the seubsequent process of fractionation with a requirement of 150kg steam per tonne of input (approximated with values from vegetable oil fractionation in india from TERI (2013)). Therefore we add only the remaining difference of 30kg steam for fractionation. These were converted to MJ using the specific steam enthalpy for the respective steam parameters added up and scaled to 1 kg of reference product, assuming an efficiency of 0.99 (Gervajio, 2005) for the splitting and, 0.90 for the distillation (IPS Engineering, 2013) and 0.95 (assumption) for the fractionation.
  Sources:
  Gervajio, Gregorio C.. 2005. Fatty Acids and Derivates from Conconut Oil, Bailey's Industrial Oil and Fat Products, Sixth Edition, Six Volume Set. Edited by Freidoon Shahidi. John wiley & Sons, Inc.
  IPS Engineering. 2013. Oleochemicals - Processing Plant. Retrieved online from http://www.ips-engineering.it/Doc/Oleochemicals.pdf, last accessed 26/06/2017
  properties: heating value, net 1 MJ
- electricity, medium voltage: 0.0302497 kWh; = (10/(0.99*0.90*0.95)+(5/0.90*0.95)+ (12.5/0.95))/1000; lognormal variance with pedigree 0.010025, pedigree (2,3,2,2,3)
  This is reported as 10kWh in the fat splitting of 1 tonne of crude coconut oil, and 5 kWh in the subsequent distillation of 1 tonne of fatty acid from coconut oil (Gervajio, 2005). The electricty consumption for fractionation is approximated using the average (12.5 kWh/tonne) of the range 10-15 kWh/tonne of oil, reported for fractionation of vegetable oil in indian plants with a daily capacity of 100 tonnes (TERI, 2013). The summed value is scaled to the amount of reference product using an efficiency of 0.99 (Gervajio, 2005) for the splitting, 0.90 (OPS Engineering, 2014) for the distillation and an assumed efficiency of 0.95 for the fractionation (no information available).
  Sources:
  Gervajio, Gregorio C.. 2005. Fatty Acids and Derivates from Conconut Oil, Bailey's Industrial Oil and Fat Products, Sixth Edition, Six Volume Set. Edited by Freidoon Shahidi. John wiley & Sons, Inc.
  IPS Engineering. 2013. Oleochemicals - Processing Plant. Retrieved online from http://www.ips-engineering.it/Doc/Oleochemicals.pdf, last accessed 26/06/2017
  The Energy and Resource Institute (TERI). 2013. Widening the coverage of PAT Scheme, Sectoral Manual – Vegetable oil industry, p. 15. Retrieved online from http://shaktifoundation.in/wp-content/uploads/2014/02/widening-of-pat-sectors-vegetable-refineries.pdf, last accessed 26/06/2017
- coconut oil, crude: 1.1814 kg; = 1/(0.99*0.90*0.95); lognormal variance with pedigree 0.010025, pedigree (2,3,2,2,3)
  An efficiency for the splitting of 99% (Gervajio, 2005), 90% (IPS Engineering, 2014) for the distillation and 95% for fractonation is assumed.
  Sources:
  Gervajio, Gregorio C.. 2005. Fatty Acids and Derivates from Conconut Oil, Bailey's Industrial Oil and Fat Products, Sixth Edition, Six Volume Set. Edited by Freidoon Shahidi. John wiley & Sons, Inc.
  IPS Engineering. 2014. Oleochemicals - Processing Plant. Retrieved online from http://www.ips-engineering.it/Doc/Oleochemicals.pdf, last accessed 26/06/2017
  properties: heating value, net 38.4 MJ, dry mass 1 kg, carbon content, non-fossil 0.75, wet mass 1 kg
  note on heating value, net: Values is approximated from HHV from "vegetable oil, crude". Source: Radovanovic,M.; Zivanovic,T.; Stojiljkovic,D.; Jovanovic,V.; Jerinic,N.; Knezevic,S. et.al. Utilization of sunflower husk as a fuel for industrial boilers - 20 years experience. Proc. 5th Eur. Conf. on Industrial Furnaces&Boilers 2000,vol.2,p.221-233. Available at: https://phyllis.nl/Biomass/View/2152
- tap water: 0.673401 kg; = 0.6/(0.99*0.90); lognormal variance with pedigree 0.010025, pedigree (2,3,2,2,3)
  This is reported as 0.6m3 of process water used in the fat splitting process. The assumed efficiency for splitting is 0.99 (Gervajio, 2005) and for the consecutive disitllation 0.90 (IPS Engineering, 2013).
  Sources:
  Gervajio, Gregorio C.. 2005. Fatty Acids and Derivates from Conconut Oil, Bailey's Industrial Oil and Fat Products, Sixth Edition, Six Volume Set. Edited by Freidoon Shahidi. John wiley & Sons, Inc.
  IPS Engineering. 2013. Oleochemicals - Processing Plant. Retrieved online from http://www.ips-engineering.it/Doc/Oleochemicals.pdf, last accessed 26/06/2017
  properties: dry mass 0.000337476 kg, carbon content, fossil 0.00178991, water content 2962.17, wet mass 1 kg
  note on carbon content, fossil: Bicarbonate content is 2.93 mol/m3. CO2 content is 0.1 mol/m3 (ecoinvent v2.2 report 8, Tab 93.1).

## Inputs from nature
- Water, cooling, unspecified natural origin [natural resource, in water]: 0.0195455 m3; name amount_cooling_water; = ((3/0.99*0.95)+15/0.90)/1000; lognormal variance with pedigree 0.0106, pedigree (2,3,2,4,3)
  This is reported as 3m3 for the splitting and 15m3 for the distillation. The value is scaled to the amount of reference product assuming an efficiency of 0.99 (Gervajio, 2005) for splitting and 0.90 for distillation (IPS Engineering, 2013).
  Sources:
  Gervajio, Gregorio C.. 2005. Fatty Acids and Derivates from Conconut Oil, Bailey's Industrial Oil and Fat Products, Sixth Edition, Six Volume Set. Edited by Freidoon Shahidi. John wiley & Sons, Inc.
  IPS Engineering. 2013. Oleochemicals - Processing Plant. Retrieved online from http://www.ips-engineering.it/Doc/Oleochemicals.pdf, last accessed 26/06/2017

## Emissions to nature
- Water [air, unspecified]: 0.011982 m3; lognormal variance with pedigree 0.0106, pedigree (2,3,2,4,3)
  Calculated value. The values are calculated based on the water input. The share of water to air and water to water are taken from industry data. The values are a 5-year average of data (2011 - 2015) published by the Gendorf factory (Gendorf, 2016, Umwelterklärung, www.gendorf.de), (Gendorf, 2015, Umwelterklärung, www.gendorf.de), (Gendorf, 2014, Umwelterklärung, www.gendorf.de). The Gendorf factory is based in Germany, it produces a wide range of chemical substances. The factory produced 1657400 tonnes of chemical substances in the year 2015 (Gendorf, 2016, Umwelterklärung, www.gendorf.de) and 740000 tonnes of intermediate products.
- Water [water, unspecified]: 0.0075634 m3; lognormal variance with pedigree 0.0106, pedigree (2,3,2,4,3)
  (same comment as for Water)

## Sampling procedure
Literature data and stochiometric calculation.

## Extrapolations
This dataset has been extrapolated from year 2020 to the year of the calculation (2021). The uncertainty has been adjusted accordingly.

## Review by Emilia Moreno Ruiz 2017-08-10
This dataset was additionally reviewed in a separate review process by Eric Johnson of Atlantic Consulting as well as Emilia Moreno Ruiz and Gregor Wernet of ecoinvent.
