# treatment of wastewater from tube collector production, capacity 1.1E10l/year

Dataset: EcoSpold 2, unit process
Geography: RoW
Time period: 1994-01-01 to 2021-12-31
Technology level: current
Classification: EcoSpold01Categories: waste management/wastewater treatment
Classification: ISIC rev.4 ecoinvent: 3700:Sewerage
Tags: Treatment; ConvertedDataset
Scenario: Business-as-Usual
System model: Allocation, cut-off by classification
Generated by: Gabor Doka (obsolete)
Published in: Doka G. 2008
Database: ecoinvent
isCopyrightProtected: true
accessRestrictedTo: 1

## General comment
Wastewater purified in a moderatly large municipal wastewater treatment plant (capacity class 2), with an average capacity size of 71100 per-captia-equivalents PCE.
Wastewater contains (in kg/m3): F: 0.000444 (GSD=224.9%); Ag: 0.0001 (GSD=224.9%); Sn: 0.000667 (GSD=224.9%);
[This dataset was already contained in the ecoinvent database version 2. It was not individually updated during the transfer to ecoinvent version 3. Life Cycle Impact Assessment results may still have changed, as they are affected by changes in the supply chain, i.e. in other datasets. This dataset was generated following the ecoinvent quality guidelines for version 2. It may have been subject to central changes described in the ecoinvent version 3 change report (http://www.ecoinvent.org/database/ecoinvent-version-3/reports-of-changes/), and the results of the central updates were reviewed extensively. The changes added e.g. consistent water flows and other information throughout the database. The documentation of this dataset can be found in the ecoinvent reports of version 2, which are still available via the ecoinvent website. The change report linked above covers all central changes that were made during the conversion process.]

## Included activities end
Infrastructure materials for municipal wastewater treatment plant, transports, dismantling. Land use burdens.

## Geography
Specific to the technology mix encountered in Switzerland in 2000. Well applicable to modern treatment practices in Europe, North America or Japan.

## Technology
Three stage wastewater treatment (mechanical, biological, chemical) including sludge digestion (fermentation) according to the average technology in Switzerland

## Parameters
- fraction, process water, to air: 0.1 dimensionless; name fraction_PW_to_air; lognormal variance with pedigree 0.092025, pedigree (4,4,3,2,4)

## Reference product
- wastewater from tube collector production: -1 m3; By-product classification Waste; CPC 39920: Sewage sludge
  EcoSpold01Location=CH
  production volume 3.96633 m3
    This is a placeholder value that does not reflect real-world production volumes. This dataset does not currently require a real-world production volume to work in the database framework, and no actual data were collected yet. This has no negative effect on the results of the ecoinvent database.
  property price 0 EUR2005
    Waste products are assigned a price of zero as they are assumed to require further treatment.
  property carbon content 0
    carbon content on a dry matter basis (reserved; not for manual entry)
  properties: water content 2962.17, carbon content, non-fossil 0, carbon content, fossil 0, wet mass 1000 kg, dry mass 0.337476 kg, water in wet mass 999.663 kg, carbon allocation 0 kg

## Inputs from technosphere
- electricity, low voltage: 0 kWh; pedigree (1,1,1,1,1)
  EcoSpold01Location=CH
  direct wastewater treatment plant burden. Uncertainty calculated from wastewater composition and treatment model
- heat, central or small-scale, other than natural gas: 0 MJ; pedigree (1,1,1,1,1)
  direct wastewater treatment plant burden. Uncertainty calculated from wastewater composition and treatment model
  EcoSpold01Location=CH
  properties: heating value, net 1 MJ
- residual material landfill: 3.5547e-13 unit; lognormal variance with pedigree 0.072, pedigree (1,1,5,5,1)
  burden from sludge incineration. Uncertainty calculated from wastewater composition and treatment model
  EcoSpold01Location=CH
- waste graphical paper: -0.0155 kg; lognormal variance with pedigree 0.042, pedigree (1,1,5,5,1)
  (same comment as for electricity, low voltage)
  production volume 0.062 kg
    Calculated from the production volume of wastewater from tube collector production in proportion to the respective output amounts.
  properties: water content 0.126126, wet mass 1 kg, dry mass 0.888 kg, heating value, net 14.12 MJ, carbon content, non-fossil 0.454955
  note on heating value, net: Value taken from the general comment of the treatment dataset.
- hydrochloric acid, without water, in 30% solution state: 2.358e-8 kg; lognormal variance with pedigree 0.472, pedigree (1,1,5,5,1)
  burden from sludge incineration. Uncertainty calculated from wastewater composition and treatment model
  EcoSpold01Location=RER
  properties: heating value, net 3.32 MJ, wet mass 1 kg, dry mass 1 kg
- heat, district or industrial, other than natural gas: 0 MJ; pedigree (1,1,1,1,1)
  (same comment as for residual material landfill)
  properties: heating value, net 1 MJ
- heat, district or industrial, natural gas: 0 MJ; pedigree (1,1,1,1,1)
  direct wastewater treatment plant burden. Uncertainty calculated from wastewater composition and treatment model
  EcoSpold01Location=RER
  properties: heating value, net 1 MJ
- waste plastic, mixture: 0 kg; pedigree (1,1,1,1,1)
  (same comment as for heat, central or small-scale, other than natural gas)
  production volume 0 kg
    (same comment as for waste graphical paper)
  properties: dry mass 0.847 kg, wet mass 1 kg, carbon content, fossil 0.747344, heating value, net 30.79 MJ, water content 0.180638
  note on carbon content, fossil: C content in 1 kg DM was calculated using data in Tab A.2, ecoinvent v2.2 report 13_I
- slag landfill: 3.1659e-13 unit; lognormal variance with pedigree 0.072, pedigree (1,1,5,5,1)
  EcoSpold01Location=CH
  burden from sludge incineration. Uncertainty calculated from wastewater composition and treatment model
- cement, unspecified: 0 kg; pedigree (1,1,1,1,1)
  (same comment as for residual material landfill)
  properties: wet mass 1 kg, dry mass 1 kg
- process-specific burdens, residual material landfill: 0 kg; pedigree (1,1,1,1,1)
  (same comment as for residual material landfill)
- wastewater treatment facility, capacity 1.1E10l/year: 1.9883e-9 unit; lognormal variance with pedigree 0.042, pedigree (1,1,5,5,1)
  EcoSpold01Location=CH
  uncertainty heeded in exchanges of the module
- chemical, inorganic: 3.93e-8 kg; lognormal variance with pedigree 0.472, pedigree (1,1,5,5,1)
  burden from sludge incineration. Uncertainty calculated from wastewater composition and treatment model
  EcoSpold01Location=GLO
  properties: carbon content, fossil 0.003, dry mass 1 kg, wet mass 1 kg
  note on carbon content, fossil: This dataset is an unweighted average of 20 inorganic substances (listed in Tab 88.1, ecoinvent v2.2 report 8, part II), being part of the top100 chemicals included in this database. The C-content has also been calculated as an unweighted average of the C content of the substances composing this dataset.
- municipal waste incineration facility: 3.2069e-13 unit; lognormal variance with pedigree 0.172, pedigree (1,1,5,5,1)
  (same comment as for slag landfill)
- iron (III) chloride, without water, in 40% solution state: 7.1729e-6 kg; lognormal variance with pedigree 0.472, pedigree (1,1,5,5,1)
  EcoSpold01Location=CH
  direct wastewater treatment plant burden plus burden from sludge incineration. Uncertainty calculated from wastewater composition and treatment model
  properties: wet mass 1 kg, dry mass 1 kg
- electricity, high voltage: 0 kWh; pedigree (1,1,1,1,1)
  (same comment as for slag landfill)
- process-specific burdens, slag landfill: 0 kg; pedigree (1,1,1,1,1)
  (same comment as for residual material landfill)
- sewer grid, 1.1E10l/year, 242 km: 1.6832e-7 km; lognormal variance with pedigree 0.042, pedigree (1,1,5,5,1)
  EcoSpold01Location=CH
  uncertainty heeded in exchanges of the module
- process-specific burdens, municipal waste incineration: 0 kg; pedigree (1,1,1,1,1)
  (same comment as for residual material landfill)
- liquid manure spreading, by vacuum tanker: 2.5894e-6 m3; lognormal variance with pedigree 0.052, pedigree (1,1,5,5,1)
  EcoSpold01Location=CH
  burden from sludge spreading. Uncertainty calculated from wastewater composition and treatment model
- waste cement, hydrated: 0 kg; pedigree (1,1,1,1,1)
  (same comment as for residual material landfill)
  production volume 0 kg
    (same comment as for waste graphical paper)
  properties: dry mass 1 kg, wet mass 1 kg
- electricity, low voltage: 0.000294473, 5.36179e-5, 0.00121036, 0.00422872, 0.000863315, 0.0132546, 0.00214437, 0.00615752 kWh (8 entries); lognormal variance with pedigree 0.042, pedigree (1,1,5,5,1)
  (same comment as for electricity, low voltage)
- heat, central or small-scale, other than natural gas: 0.000182359, 0.0132775 MJ (2 entries); lognormal variance with pedigree 0.042, pedigree (1,1,5,5,1)
  (same comment as for heat, central or small-scale, other than natural gas)
- heat, district or industrial, other than natural gas: 4.25652e-7, 2.57029e-5, 0.00104967 MJ (3 entries); lognormal variance with pedigree 0.182, pedigree (1,1,5,5,1)
  (same comment as for residual material landfill)
- heat, district or industrial, natural gas: 0.000206455, 0.00494705, 0.0133956 MJ (3 entries); lognormal variance with pedigree 0.042, pedigree (1,1,5,5,1)
  (same comment as for heat, district or industrial, natural gas)
- waste plastic, mixture: -0.00172425, -0.000115208, -8.71297e-6, -4.75849e-5, -1.92238e-5, -4.51863e-5, -0.00146914, -0.0120707 kg (8 entries); lognormal variance with pedigree 0.042, pedigree (1,1,5,5,1)
  (same comment as for heat, central or small-scale, other than natural gas)
  production volume 0.0614782 kg
- cement, unspecified: 9.85515e-6, 2.05056e-6, 1.5019e-7, 4.2809e-7, 9.6814e-6, 2.84952e-7, 3.12961e-6, 3.78648e-7, 4.22924e-5 kg (9 entries); lognormal variance with pedigree 0.082, pedigree (1,1,5,5,1)
  (same comment as for residual material landfill)
- process-specific burdens, residual material landfill: 4.82669e-5, 0.000122363 kg (2 entries); lognormal variance with pedigree 0.072, pedigree (1,1,5,5,1)
  (same comment as for residual material landfill)
- electricity, high voltage: 1.86368e-6, 3.57285e-7, 8.22955e-6, 2.69697e-5, 6.05776e-6, 8.72293e-5, 1.38338e-5, 3.98789e-5 kWh (8 entries); lognormal variance with pedigree 0.622, pedigree (1,1,5,5,1)
  (same comment as for slag landfill)
- process-specific burdens, slag landfill: 5.03743e-5, 0.000127706 kg (2 entries); lognormal variance with pedigree 0.072, pedigree (1,1,5,5,1)
  (same comment as for residual material landfill)
- process-specific burdens, municipal waste incineration: 0.000362843, 0.000919857 kg (2 entries); lognormal variance with pedigree 0.172, pedigree (1,1,5,5,1)
  (same comment as for residual material landfill)
- waste cement, hydrated: -4.82669e-5, -0.000122363 kg (2 entries); lognormal variance with pedigree 0.082, pedigree (1,1,5,5,1)
  (same comment as for residual material landfill)
  production volume 0.000676775 kg

## Emissions to nature
- Carbon monoxide, fossil [air, urban air close to ground]: 1.792e-7 kg; lognormal variance with pedigree 0.822, pedigree (1,1,5,5,1)
  emission from sludge incineration. Uncertainty calculated from wastewater composition and treatment model
- Fluoride [water, surface water]: 0.000444 kg; lognormal variance with pedigree 0.682, pedigree (1,1,5,5,1)
  sewer overload discharge plus direct wastewater treatment plant emission plus emission from sludge incineration. Uncertainty calculated from wastewater composition and treatment model
- Tin, ion [water, ground-, long-term]: 0.0001196 kg; lognormal variance with pedigree 1.272, pedigree (1,1,5,5,1)
  (same comment as for Carbon monoxide, fossil)
- Silver [air, urban air close to ground]: 5.9004e-10 kg; lognormal variance with pedigree 0.772, pedigree (1,1,5,5,1)
  direct digester gas emission plus emission from sludge incineration. Uncertainty calculated from wastewater composition and treatment model
- Tin, ion [water, surface water]: 0.00027903 kg; lognormal variance with pedigree 0.662, pedigree (1,1,5,5,1)
  (same comment as for Fluoride)
- Water [water, unspecified]: 0.9 m3; name water_to_water_unspecified; lognormal variance with pedigree 0.0827, pedigree (2,2,5,5,1)
  Calculated value based on water balance.
  property carbon content, fossil 0; name C_content_fossil
  property fraction, origin: unspecified 0; name fraction_origin_unspecified_Ww
  property fraction, origin: fresh water 1; name fraction_origin_fresh_water_Ww
  property fraction, origin: salt water 0; name fraction_origin_salt_water_Ww
  property carbon content, non-fossil 0; name C_content_non_fossil
  property dry mass 0 kg; name DM
  property wet mass 1000 kg; name WM
  property water in wet mass 1000 kg; name WWM
- Methane, fossil [air, urban air close to ground]: 5.1309e-9 kg; lognormal variance with pedigree 0.232, pedigree (1,1,5,5,1)
  (same comment as for Carbon monoxide, fossil)
- Water [air, unspecified]: 0.1 m3; name water_to_air_unspecified; lognormal variance with pedigree 0.0827, pedigree (2,2,5,5,1)
  Calculated value based on water balance.
  property fraction, origin: unspecified 1; name fraction_origin_unspecified
  property fraction, origin: fresh water 0; name fraction_origin_fresh_water
  property fraction, origin: salt water 0; name fraction_origin_salt_water
- Silver, ion [water, ground-, long-term]: 2.8626e-5 kg; lognormal variance with pedigree 0.802, pedigree (1,1,5,5,1)
  (same comment as for Carbon monoxide, fossil)
- Silver [soil, agricultural]: 2.8643e-5 kg; lognormal variance with pedigree 0.722, pedigree (1,1,5,5,1)
  emission from sludge spreading. Uncertainty calculated from wastewater composition and treatment model
- Tin [soil, agricultural]: 0.00015005 kg; lognormal variance with pedigree 0.722, pedigree (1,1,5,5,1)
  (same comment as for Silver)
- Silver, ion [water, surface water]: 2.5943e-5 kg; lognormal variance with pedigree 0.662, pedigree (1,1,5,5,1)
  (same comment as for Fluoride)
- Tin [air, urban air close to ground]: 3.1569e-7 kg; lognormal variance with pedigree 0.742, pedigree (1,1,5,5,1)
  (same comment as for Silver)

## Extrapolations
wastewater compositions from literature and/or estimates This dataset has been copied from an original dataset covering the geography CH. The uncertainty has been adjusted accordingly.

## Review by Niels Jungbluth 2009-01-22
passed.
