# strawberry production, open field, macro tunnel

Dataset: EcoSpold 2, unit process
Geography: ES
Time period: 2006-01-01 to 2021-12-31
Technology level: current
Classification: ISIC rev.4 ecoinvent: 0125:Growing of other tree and bush fruits and nuts
Tags: WFLDB
Scenario: Business-as-Usual
System model: Allocation, cut-off by classification
Generated by: Violaine Magaud
Published in: Nemecek T. 2015
Database: ecoinvent
isCopyrightProtected: true
accessRestrictedTo: 1

## General comment
This dataset represents the production of 1 kg of strawberry. The reference flow is the average yield per ha and year, from 2006 - 2008, from a typical farm in Spain (Huelva): yield (45 t/ha.y) obtained under irrigated conditions (total amount of water 5000 m3/ha.y). The data are representative for strawberry production in Spain (Huelva) used for the export market. Mineral NPK fertiliser input is 150-100-200 kg/ha. No organic fertilisers are applied. Total active ingredients (a.i.) applied as various pesticides amount to 26.3 kg a.i./ha and 190.4 kg chloropicrin/ha.
The dataset was modelled within the project 'World Food LCA database (WFLDB)'. The aim of this project was to provide inventories of a broad variety of agricultural products and processes and to cover for each product at least 50% of the global export market. The export share of strawberries produced in Spain amounts to 44 % of the global export (tonnage exported in 2010). The production system regarded in this dataset aimed at representing strawberries produced in open fields in Spain for the export market.
PEF-Quality: data quality rating (DQR) = 1.8 (i.e. very good quality). This dataset refers to an average situation; for specific situations exchanges might differ substantially due to site specific parameters

## Included activities start
This activity starts with soil cultivation after the harvest of the previous crop.

## Included activities end
This activity ends with harvest and transport to the farm gate. Storage is not included.
The dataset includes all activities during a cycle, i.e. all machine operations, corresponding infrastructure, fuel use and sheds. Machine operations include: soil cultivation, fertilisation, pesticide application, harvesting, and on-farm transport. Further, direct field emissions and land use change are included. Irrigation is included, as well as plastic tunnel infrastructures. The inputs of seedlings, fertilisers and pesticides as well as packaging of fertilisers and pesticides are considered. Heavy metal uptake by the crop is considered.

## Technology
Conventional production

## Time period
Time period referring to the data source: 2006-2008. Based on expert opinion data is considered to be valid at least up to 2012.

## Parameters
- heavyMetalUptakeSwitch: 1 dimensionless
- LUC_crop_specific: 1 dimensionless
  This parameter allows to switch between a 'crop specific' and a 'country specific' approach when calculating the LUC of a crop. By default, the chosen approach is 'crop specific', so the value of the parameter is 1. If you want to apply a 'country specific' approach, turn the parameter to 0.

## Reference product
- strawberry: 1 kg; name RP_amount_1; CPC 01354: Strawberries; By-product classification allocatable product
  Yield = 45000.0 kg/ha
  production volume 2.73914e8 kg; name RP_PV_1
    Source: FAOSTAT. Average, 2009-2012. Assumption: all ES and US strawberries are produced open-field, macro tunnels, and 20% of all CH strawberries in greenhouses
  property price 1.81 EUR2005
    Calculated from the trade statistics for the year 2005 published by the UN (COMTRADE database, accessed 20151105) as an average of 5 biggest importers of strawberry in the world; FR, DE, CA, UK and USA. Comtrade cathegory: 81010: Strawberries, fresh.
  property carbon content 0.04617
    carbon content on a dry matter basis (reserved; not for manual entry)
  properties: carbon content, fossil 0, wet mass 1 kg, water in wet mass 0.899 kg, dry mass 0.101 kg, carbon content, non-fossil 0.04617, water content 8.90099, carbon allocation 0.00466317 kg

## Inputs from technosphere
- strawberry seedling, for planting: 1.55556 unit; source REWE 2009; lognormal variance with pedigree 0.124177, pedigree (2,1,4,1,1)
  Literature value or expert estimation (REWE 2009).
  properties: wet mass 1 kg, carbon content, non-fossil 0.439481, dry mass 0.578035 kg, water content 0.73
  note on carbon content, non-fossil: calculation: C-content of components according to ecoinvent report No. 15a. Source of composition: https://ndb.nal.usda.gov/ndb/search/. Unspecific seedling used as proxy.
- inorganic nitrogen fertiliser, as N: 0, 0, 7.29911e-5, 0.000122589 kg (4 entries)
  Calculated based on literature values or expert estimation: The total amount of nutrient (REWE 2009) multiplied by the country-share of the fertiliser type (IFA 2014). See supporting documentation 'WFLDB-Documentation.pdf' chapter 'Fertiliser application' for L3 and L4 data (https://ecoquery.ecoinvent.org/File/Reports).
  properties: dry mass 1 kg, wet mass 1 kg
- packaging film, low density polyethylene: 0.0014 kg; source REWE 2009
  Literature value or expert estimation (REWE 2009). Plastic film as soil cover (PE film) 10'500 m2/ha, 6g/m2. Lifespan: 1 year
  properties: wet mass 1 kg, carbon content, fossil 0.857143, dry mass 1 kg, heating value, net 42.47 MJ
- irrigation: 0.111111 m3; source REWE 2009; lognormal variance with pedigree 0.124177, pedigree (2,1,4,1,1)
  Literature value: Total amount of water used for irrigation (REWE 2009) See supporting documentation 'WFLDB-Documentation.pdf' chapter 'Water use for irrigation' (https://ecoquery.ecoinvent.org/File/Reports).
  properties: water content 9089.91, wet mass 1000 kg, dry mass 0.11 kg
- transport, freight train: 0.001789 metric ton*km
  This represent the transport of fertilizers that are directly linked to their supplying activities, to better represent the fertilizer mix of the activity. Transport distance based on US BTS Commodity Flow Surveys 1993, 1997, 2002, 2007, US Dep. Of Transportation, Bureau of Transportation Statistics.
- transport, freight, lorry, unspecified: 0.000963955 metric ton*km
  This represent the transport of fertilizers that are directly linked to their supplying activities, to better represent the fertilizer mix of the activity. Transport distance based on US BTS Commodity Flow Surveys 1993, 1997, 2002, 2007, US Dep. Of Transportation, Bureau of Transportation Statistics. Of the total road transport, 6% is assumed to be by delivery van for goods with a large share of retail sale, and 3% for goods that are mainly sold via wholesale.
- pyrethroid-compound: 1.4416e-6 kg; source REWE 2009
  Literature value or expert estimation (REWE 2009).
  properties: dry mass 1 kg, wet mass 1 kg, carbon content, fossil 0.623
- transport, freight, inland waterways, barge: 0.000302494 metric ton*km
  (same comment as for transport, freight train)
- waste polyethylene: -0.000826 kg; name BP_amount_1
  Mulch film send to treatment. Based on Soessel et al. (2012), 53% of the plastic is landfilled.
  production volume 226253 kg; = RP_PV_1* BP_amount_1/ RP_amount_1
    Calculated from reference product production volume, reference product amount and byproduct amount.
  property price 0 EUR2005; name BP_amount_1_price_EUR2005
  properties: heating value, net 42.47 MJ, carbon content, fossil 0.825301, wet mass 1 kg, dry mass 0.996 kg, water content 0.00401606
  note on heating value, net: Value taken from the general comment of the treatment dataset.
- inorganic potassium fertiliser, as K2O: 0 kg; source REWE 2009; pedigree (1,1,1,1,1)
  Calculated based on literature values or expert estimation: The total amount of nutrient (REWE 2009) multiplied by the country-share of the fertiliser type (IFA 2014). See supporting documentation 'WFLDB-Documentation.pdf' chapter 'Fertiliser application' for L3 and L4 data (https://ecoquery.ecoinvent.org/File/Reports).
  Corresponds to 131.0 kg/ha
  properties: dry mass 1 kg, wet mass 1 kg
- packaging, for pesticides: 0.00963095 kg; lognormal variance with pedigree 0.0592, pedigree (4,3,4,5,4)
  Total amount of active substance/s of pesticides needed for the production of strawberry is calculated to be circa 4.82E-03 kg. Pesticide/s used in this dataset is/are: '[thio]carbamate-compound', 'acetamide-anillide-compound, unspecified', 'boric acid, anhydrous, powder', 'glyphosate', 'pyrethroid-compound', 'trichloromethane'. The total amount of active substance/s is doubled in order to account for the packaging of the dilluted product of pesticide/s that is/are applied. Therefore, 9.63E-03 kg of packaging for pesticides is justified with this exchange.
  properties: dry mass 1 kg, carbon content, fossil 0.85714, heating value, net 25.97 MJ, price 0.0642 EUR2005, wet mass 1 kg
- inorganic nitrogen fertiliser, as N: 0 kg; source REWE 2009; pedigree (1,1,1,1,1)
  (same comment as for inorganic nitrogen fertiliser, as N)
  properties: wet mass 1 kg, dry mass 1 kg
- inorganic nitrogen fertiliser, as N: 0, 0.000122589 kg (2 entries)
  (same comment as for inorganic nitrogen fertiliser, as N)
- triple superphosphate: 0.000134599 kg
  The exchange has been updated from 'triple superphosphate' into 'triple superphosphate' and therefore its amount has been scaled (multiplied) from 0.0001 kg by 2.1739 kg of 'triple superphosphate' per kg of 'triple superphosphate'. Original comment of the exchange is: Calculated based on literature values or expert estimation: The total amount of nutrient (REWE 2009) multiplied by the country-share of the fertiliser type (IFA 2014). See supporting documentation 'WFLDB-Documentation.pdf' chapter 'Fertiliser application' for L3 and L4 data (https://ecoquery.ecoinvent.org/File/Reports).
  Corresponds to 17.8 kg/ha
  properties: wet mass 1 kg, dry mass 1 kg, phosphorus content 0.200754
  note on phosphorus content: Phosphorus content (on a dry matter basis) of triple superphosphate is calculated from the molecular formula of the nutrient present in the substance.
- urea ammonium nitrate mix: 0.00132393 kg
  The exchange has been updated from 'inorganic nitrogen fertiliser, as N' into 'urea ammonium nitrate' and therefore its amount has been scaled (multiplied) from 0.0004 kg by 3.3333 kg of 'urea ammonium nitrate' per kg of 'inorganic nitrogen fertiliser, as N'. Original comment of the exchange is: Calculated based on literature values or expert estimation: The total amount of nutrient (REWE 2009) multiplied by the country-share of the fertiliser type (IFA 2014). See supporting documentation 'WFLDB-Documentation.pdf' chapter 'Fertiliser application' for L3 and L4 data (https://ecoquery.ecoinvent.org/File/Reports).
  properties: carbon content, fossil 0.0879977, wet mass 1 kg, hydrogen content 0.095042, water content 0.333333, oxygen content 0.749063, dry mass 0.75 kg, nitrogen content 0.401231
  note on carbon content, fossil: Carbon content, fossil is calculated based on the chemical formula of the substance.
  note on hydrogen content: Hydrogen content (on a dry matter basis) of urea ammonium nitrate mix is calculated from the molecular formula of the substance (CH6N4O4).
  note on oxygen content: Oxygen content (on a dry matter basis) of urea ammonium nitrate mix is calculated from the molecular formula of the substance (CH6N4O4).
  note on nitrogen content: Nitrogen content (on a dry matter basis) of urea ammonium nitrate mix is calculated from the molecular formula of the substance (CH6N4O4).
- ammonium nitrate: 0.00328592 kg; source REWE 2009; lognormal variance with pedigree 0.124177, pedigree (2,1,4,1,1)
  The exchange has been updated from 'ammonium nitrate, as N' into 'ammonium nitrate' and therefore its amount has been scaled (multiplied) from 0.0012 kg by 2.8573 kg of 'ammonium nitrate' per kg of 'ammonium nitrate, as N'. Original comment of the exchange is: Calculated based on literature values or expert estimation: The total amount of nutrient (REWE 2009) multiplied by the share of fertiliser type (REWE 2009). See supporting documentation 'WFLDB-Documentation.pdf' chapter 'Fertiliser application' for L3 and L4 data (https://ecoquery.ecoinvent.org/File/Reports).
  Corresponds to 51.8 kg/ha
  properties: wet mass 1 kg, dry mass 1 kg
- single superphosphate: 0.000581862 kg
  The exchange has been updated from 'single superphosphate' into 'single superphosphate' and therefore its amount has been scaled (multiplied) from 0.0001 kg by 4.7619 kg of 'single superphosphate' per kg of 'single superphosphate'. Original comment of the exchange is: Calculated based on literature values or expert estimation: The total amount of nutrient (REWE 2009) multiplied by the country-share of the fertiliser type (IFA 2014). See supporting documentation 'WFLDB-Documentation.pdf' chapter 'Fertiliser application' for L3 and L4 data (https://ecoquery.ecoinvent.org/File/Reports).
  Corresponds to 17.8 kg/ha
  properties: wet mass 1 kg, dry mass 1 kg, phosphorus content 0.0916484
- ammonia, anhydrous, liquid: 0.000282267 kg; source REWE 2009; lognormal variance with pedigree 0.124177, pedigree (2,1,4,1,1)
  Calculated based on literature values or expert estimation: The total amount of nutrient (REWE 2009) multiplied by the country-share of the fertiliser type (IFA 2014). See supporting documentation 'WFLDB-Documentation.pdf' chapter 'Fertiliser application' for L3 and L4 data (https://ecoquery.ecoinvent.org/File/Reports).
  Corresponds to 12.7 kg/ha
  properties: wet mass 1 kg, dry mass 1 kg
- packaging, for fertilisers: 0.0200998 kg; lognormal variance with pedigree 0.0592, pedigree (4,3,4,5,4)
  Total amount of active substance/s of fertilisers needed for the production of 'strawberry' is calculated to be circa 1.00E-02 kg. Fertiliser/s used in this dataset is/are: 'ammonia, liquid', 'ammonium nitrate, as N', 'ammonium sulfate, as N', 'nitrogen fertiliser, as N', 'nitrogen fertiliser, as N', 'nitrogen fertiliser, as N', 'nitrogen fertiliser, as N', 'nitrogen fertiliser, as N', 'nitrogen fertiliser, as N', 'phosphate fertiliser, as P2O5', 'phosphate fertiliser, as P2O5', 'phosphate fertiliser, as P2O5', 'phosphate fertiliser, as P2O5', 'phosphate fertiliser, as P2O5', 'phosphate fertiliser, as P2O5', 'phosphate rock, as P2O5, beneficiated, dry', 'potassium chloride, as K2O', 'potassium fertiliser, as K2O', 'potassium sulfate, as K2O', 'urea, as N'. The total amount of active substance/s is doubled in order to account for the packaging of the dilluted product of fertiliser/s that is/are applied. Therefore, 2.01E-02 kg of packaging for fertilisers is justified with this exchange.
  properties: heating value, net 25.01 MJ, price 0.0642 EUR2005, wet mass 1 kg, carbon content, fossil 0.825301, dry mass 1 kg
  note on carbon content, fossil: Considering a chemical formula (C2H4)n for polyethylene, carbon content-fossil is calculated to be 0.856286 kg of Carbon per kg of dry mass.
- ammonium sulfate: 0.000143224 kg; source REWE 2009; lognormal variance with pedigree 0.124177, pedigree (2,1,4,1,1)
  Calculated based on literature values or expert estimation: The total amount of nutrient (REWE 2009) multiplied by the country-share of the fertiliser type (IFA 2014). See supporting documentation 'WFLDB-Documentation.pdf' chapter 'Fertiliser application' for L3 and L4 data (https://ecoquery.ecoinvent.org/File/Reports).
  Corresponds to 6.45 kg/ha
  properties: dry mass 1 kg, wet mass 1 kg
- inorganic phosphorus fertiliser, as P2O5: 0, 0.000771133 kg (2 entries)
  Calculated based on literature values or expert estimation: The total amount of nutrient (REWE 2009) multiplied by the country-share of the fertiliser type (IFA 2014). See supporting documentation 'WFLDB-Documentation.pdf' chapter 'Fertiliser application' for L3 and L4 data (https://ecoquery.ecoinvent.org/File/Reports).
  Corresponds to 17.8 kg/ha
  properties: dry mass 1 kg, wet mass 1 kg
- inorganic phosphorus fertiliser, as P2O5: 4.98911e-5, 0, 0, 0.000396067, 0.000771133 kg (5 entries)
  (same comment as for inorganic phosphorus fertiliser, as P2O5)
  properties: wet mass 1 kg, dry mass 1 kg
- calcium ammonium nitrate: 0.00169078 kg
  The exchange has been updated from 'calcium ammonium nitrate' into 'calcium ammonium nitrate' and therefore its amount has been scaled (multiplied) from 0.0005 kg by 3.7037 kg of 'calcium ammonium nitrate' per kg of 'calcium ammonium nitrate'. Original comment of the exchange is: Calculated based on literature values or expert estimation: The total amount of nutrient (REWE 2009) multiplied by the country-share of the fertiliser type (IFA 2014). See supporting documentation 'WFLDB-Documentation.pdf' chapter 'Fertiliser application' for L3 and L4 data (https://ecoquery.ecoinvent.org/File/Reports).
  properties: oxygen content 0.399581, nitrogen content 0.233209, wet mass 1 kg, dry mass 1 kg, calcium content 0.333646, hydrogen content 0.0335628
  note on oxygen content: Oxygen content (on a dry matter basis) of calcium ammonium nitrate is calculated from the molecular formula of the substance (CH4CaN2O6).
  note on nitrogen content: Nitrogen content (on a dry matter basis) of calcium ammonium nitrate is calculated from the molecular formula of the substance (CH4CaN2O6).
  note on calcium content: Calcium content (on a dry matter basis) of calcium ammonium nitrate is calculated from the molecular formula of the substance (CH4CaN2O6).
  note on hydrogen content: Hydrogen content (on a dry matter basis) of calcium ammonium nitrate is calculated from the molecular formula of the substance (CH4CaN2O6).
- phosphate rock, beneficiated: 0.00015591 kg; source REWE 2009; lognormal variance with pedigree 0.124177, pedigree (2,1,4,1,1)
  The exchange has been updated from 'phosphate rock, as P2O5, beneficiated, dry' into 'phosphate rock, beneficiated' and therefore its amount has been scaled (multiplied) from 0 kg by 3.125 kg of 'phosphate rock, beneficiated' per kg of 'phosphate rock, as P2O5, beneficiated, dry'. Original comment of the exchange is: Calculated based on literature values or expert estimation: The total amount of nutrient (REWE 2009) multiplied by the country-share of the fertiliser type (IFA 2014). See supporting documentation 'WFLDB-Documentation.pdf' chapter 'Fertiliser application' for L3 and L4 data (https://ecoquery.ecoinvent.org/File/Reports).
  Corresponds to 2.25 kg/ha
  properties: dry mass 1 kg, wet mass 1 kg
- potassium chloride: 0.00204247 kg; source REWE 2009; lognormal variance with pedigree 0.124177, pedigree (2,1,4,1,1)
  The exchange has been updated from 'potassium chloride, as K2O' into 'potassium chloride' and therefore its amount has been scaled (multiplied) from 0.0013 kg by 1.5829 kg of 'potassium chloride' per kg of 'potassium chloride, as K2O'. Original comment of the exchange is: Calculated based on literature values or expert estimation: The total amount of nutrient (REWE 2009) multiplied by the country-share of the fertiliser type (IFA 2014). See supporting documentation 'WFLDB-Documentation.pdf' chapter 'Fertiliser application' for L3 and L4 data (https://ecoquery.ecoinvent.org/File/Reports).
  Corresponds to 58.1 kg/ha
  properties: wet mass 1 kg, dry mass 1 kg
- potassium sulfate: 0.000454598 kg; source REWE 2009; lognormal variance with pedigree 0.124177, pedigree (2,1,4,1,1)
  The exchange has been updated from 'potassium sulfate, as K2O' into 'potassium sulfate' and therefore its amount has been scaled (multiplied) from 0.0002 kg by 1.85 kg of 'potassium sulfate' per kg of 'potassium sulfate, as K2O'. Original comment of the exchange is: Calculated based on literature values or expert estimation: The total amount of nutrient (REWE 2009) multiplied by the country-share of the fertiliser type (IFA 2014). See supporting documentation 'WFLDB-Documentation.pdf' chapter 'Fertiliser application' for L3 and L4 data (https://ecoquery.ecoinvent.org/File/Reports).
  Corresponds to 11.1 kg/ha
  properties: wet mass 1 kg, dry mass 1 kg
- diesel, burned in agricultural machinery: 0.05712 MJ; source REWE 2009; lognormal variance with pedigree 0.124177, pedigree (2,1,4,1,1)
  Literature value or expert estimation (REWE 2009). Includes all work processes. Corresponds to 57 kg/ha
- plastic tunnel: 0.222222 m2; source REWE 2009; lognormal variance with pedigree 0.124177, pedigree (2,1,4,1,1)
  Calculated value: 1 ha divided by the yield in kg/ha. Note: plastic tunnel dataset stands for 1 m2 used over 1 year
- urea: 0.000851469 kg; source REWE 2009; lognormal variance with pedigree 0.124177, pedigree (2,1,4,1,1)
  The exchange has been updated from 'urea, as N' into 'urea' and therefore its amount has been scaled (multiplied) from 0.0004 kg by 2.1438 kg of 'urea' per kg of 'urea, as N'. Original comment of the exchange is: Calculated based on literature values or expert estimation: The total amount of nutrient (REWE 2009) multiplied by the country-share of the fertiliser type (IFA 2014). See supporting documentation 'WFLDB-Documentation.pdf' chapter 'Fertiliser application' for L3 and L4 data (https://ecoquery.ecoinvent.org/File/Reports).
  Corresponds to 17.9 kg/ha
  properties: wet mass 1 kg, carbon content, fossil 0.2, dry mass 1 kg
- [thio]carbamate-compound: 3.00194e-6 kg; source REWE 2009; lognormal variance with pedigree 0.0138498, pedigree (2,2,4,1,1)
  Literature value or expert estimation (REWE 2009).
  properties: dry mass 1 kg, wet mass 1 kg, carbon content, fossil 0.626349
- acetamide-anillide-compound, unspecified: 1.19629e-5 kg; source REWE 2009; lognormal variance with pedigree 0.0138498, pedigree (2,2,4,1,1)
  Literature value or expert estimation (REWE 2009).
  properties: dry mass 1 kg, carbon content, fossil 0.659175, wet mass 1 kg
- boric acid, anhydrous, powder: 0.000112909 kg; source REWE 2009
  Literature value or expert estimation (REWE 2009).
  properties: dry mass 1 kg, wet mass 1 kg
- trichloromethane: 0.0044805 kg; source REWE 2009
  Literature value or expert estimation (REWE 2009). Proxy for chloropicrin
  properties: dry mass 1 kg, carbon content, fossil 0.101695, wet mass 1 kg, heating value, net 4.06 MJ
- glyphosate: 0.000205655 kg; source REWE 2009; lognormal variance with pedigree 0.0138498, pedigree (2,2,4,1,1)
  Literature value or expert estimation (REWE 2009).
  properties: wet mass 1 kg, carbon content, fossil 0.214286, dry mass 1 kg
- inorganic potassium fertiliser, as K2O: 0.00290844 kg; source REWE 2009; lognormal variance with pedigree 0.124177, pedigree (2,1,4,1,1)
  (same comment as for inorganic potassium fertiliser, as K2O)
- inorganic nitrogen fertiliser, as N: 0.000238644 kg; source REWE 2009; lognormal variance with pedigree 0.124177, pedigree (2,1,4,1,1)
  (same comment as for inorganic nitrogen fertiliser, as N)

## Inputs from nature
- Carbon dioxide, in air [natural resource, in air]: 0.182876 kg; lognormal variance with pedigree 0.0138498, pedigree (2,2,4,1,1)
  CO2 uptake by biomass
- Transformation, from arable land, unspecified use [natural resource, land]: 0.222222 m2
  Land transformation: 1 ha divided by yield
- Energy, gross calorific value, in biomass [natural resource, biotic]: 1.93724 MJ; lognormal variance with pedigree 0.0138498, pedigree (2,2,4,1,1)
- Transformation, to arable land, unspecified use [natural resource, land]: 0.222222 m2
  Land transformation: 1 ha divided by yield
- Occupation, annual crop [natural resource, land]: 0.222822 m2*year
  Related to the duration from harvest date of previous crop to harvest date of main crop.

## Emissions to nature
- Ammonia [air, non-urban air or from high stacks]: 0.000274778 kg; source EEA 2013; lognormal variance with pedigree 0.0447216, pedigree (2,2,4,1,1)
  Calculated value - EMEP/EEA (2013). See 'WFLDB-Guidelines.pdf', available at https://ecoquery.ecoinvent.org/File/Reports.
- Nitrogen oxides [air, non-urban air or from high stacks]: 0.000131429 kg; source EEA 2013; lognormal variance with pedigree 0.124664, pedigree (2,2,4,1,1)
  Calculated value - EEA/EMEP (2013). See 'WFLDB-Guidelines.pdf', available at https://ecoquery.ecoinvent.org/File/Reports.
- Dinitrogen monoxide [air, non-urban air or from high stacks]: 7.27111e-5 kg; source IPCC 2006; lognormal variance with pedigree 0.124664, pedigree (2,2,4,1,1)
  Calculated value - IPCC (2006). See 'WFLDB-Guidelines.pdf', available at https://ecoquery.ecoinvent.org/File/Reports.
- Phosphate [water, surface water]: 1.49378e-5 kg; source Prasuhn V.  2006; lognormal variance with pedigree 0.175866, pedigree (2,2,4,1,1)
  Calculated value - Prasuhn (2006). See 'WFLDB-Guidelines.pdf', available at https://ecoquery.ecoinvent.org/File/Reports.
- Cadmium [soil, agricultural]: 1.17307e-7 kg; = 1.27968888889e-07 + ( - 1.06617e-08)*heavyMetalUptakeSwitch; source Freiermuth R.  2006
  Comment on mathematicalRelation:
  1.27968888889e-07 from Calculated value - Freiermuth (2006). See 'WFLDB-Guidelines.pdf', available at https://ecoquery.ecoinvent.org/File/Reports.
  -1.06617e-08 from Crop, default, heavy metals uptake model
  Heavy metal uptake can be excluded by setting the parameter heavyMetalUptakeSwitch to zero.
- Lead [water, ground-]: 4.94111e-9 kg; source Freiermuth R.  2006; lognormal variance with pedigree 0.356938, pedigree (2,2,4,1,1)
  Calculated value - Freiermuth (2006). See 'WFLDB-Guidelines.pdf', available at https://ecoquery.ecoinvent.org/File/Reports.
- Water [air, non-urban air or from high stacks]: 0.0792267 m3; lognormal variance with pedigree 0.124177, pedigree (2,1,4,1,1)
  Calculated value - Emission calculated from water balance. See 'WFLDB-Guidelines.pdf', available at https://ecoquery.ecoinvent.org/File/Reports.
- Phosphorus [water, surface water]: 9.45644e-6 kg; source Prasuhn V.  2006; lognormal variance with pedigree 0.175866, pedigree (2,2,4,1,1)
  Calculated value - Prasuhn (2006) and SQCB-Erosion. See 'WFLDB-Guidelines.pdf', available at https://ecoquery.ecoinvent.org/File/Reports.
- Nitrate [water, ground-]: 0.00468263 kg; source Richner W. 2014; lognormal variance with pedigree 0.175866, pedigree (2,2,4,1,1)
- Water [water, ground-]: 0.00293044 m3; lognormal variance with pedigree 0.124177, pedigree (2,1,4,1,1)
  (same comment as for Water)
- Phosphate [water, ground-]: 4.78e-6 kg; source Prasuhn V.  2006; lognormal variance with pedigree 0.175866, pedigree (2,2,4,1,1)
  (same comment as for Phosphate)
- Cadmium, ion [water, surface water]: 3.78867e-9 kg; source Freiermuth R.  2006; lognormal variance with pedigree 0.356938, pedigree (2,2,4,1,1)
  (same comment as for Lead)
- Chromium [soil, agricultural]: 1.22002e-6 kg; = 1.27724444444e-06 + ( - 5.7225e-08)*heavyMetalUptakeSwitch; source Freiermuth R.  2006
  Comment on mathematicalRelation:
  1.27724444444e-06 from Calculated value - Freiermuth (2006). See 'WFLDB-Guidelines.pdf', available at https://ecoquery.ecoinvent.org/File/Reports.
  -5.7225e-08 from Crop, default, heavy metals uptake model
  Heavy metal uptake can be excluded by setting the parameter heavyMetalUptakeSwitch to zero.
- Copper [soil, agricultural]: -8.44709e-7 kg; = -1.48884444444e-07 + ( - 6.958245e-07)*heavyMetalUptakeSwitch; source Freiermuth R.  2006
  Comment on mathematicalRelation:
  -1.48884444444e-07 from Calculated value - Freiermuth (2006). See 'WFLDB-Guidelines.pdf', available at https://ecoquery.ecoinvent.org/File/Reports.
  -6.958245e-07 from Crop, default, heavy metals uptake model
  Heavy metal uptake can be excluded by setting the parameter heavyMetalUptakeSwitch to zero.
- Chromium, ion [water, surface water]: 3.58356e-7 kg; source Freiermuth R.  2006; lognormal variance with pedigree 0.356938, pedigree (2,2,4,1,1)
  (same comment as for Lead)
- Lead [soil, agricultural]: 5.50103e-8 kg; = 1.11791111111e-07 + ( - 5.678085e-08)*heavyMetalUptakeSwitch; source Freiermuth R.  2006
  Comment on mathematicalRelation:
  1.11791111111e-07 from Calculated value - Freiermuth (2006). See 'WFLDB-Guidelines.pdf', available at https://ecoquery.ecoinvent.org/File/Reports.
  -5.678085e-08 from Crop, default, heavy metals uptake model
  Heavy metal uptake can be excluded by setting the parameter heavyMetalUptakeSwitch to zero.
- Mercury [soil, agricultural]: -2.27689e-9 kg; = 1.98148888889e-09 + ( - 4.25838e-09)*heavyMetalUptakeSwitch; source Freiermuth R.  2006
  Comment on mathematicalRelation:
  1.98148888889e-09 from Calculated value - Freiermuth (2006). See 'WFLDB-Guidelines.pdf', available at https://ecoquery.ecoinvent.org/File/Reports.
  -4.25838e-09 from Crop, default, heavy metals uptake model
  Heavy metal uptake can be excluded by setting the parameter heavyMetalUptakeSwitch to zero.
- Mercury [water, ground-]: 2.06513e-11 kg; source Freiermuth R.  2006; lognormal variance with pedigree 0.356938, pedigree (2,2,4,1,1)
  (same comment as for Lead)
- Copper, ion [water, surface water]: 4.76667e-7 kg; source Freiermuth R.  2006; lognormal variance with pedigree 0.356938, pedigree (2,2,4,1,1)
  (same comment as for Lead)
- Zinc [soil, agricultural]: -1.67819e-6 kg; = 1.68422222222e-06 + ( - 3.362415e-06)*heavyMetalUptakeSwitch; source Freiermuth R.  2006
  Comment on mathematicalRelation:
  1.68422222222e-06 from Calculated value - Freiermuth (2006). See 'WFLDB-Guidelines.pdf', available at https://ecoquery.ecoinvent.org/File/Reports.
  Heavy metal uptake can be excluded by setting the parameter heavyMetalUptakeSwitch to zero.
- Water [water, surface water]: 0.0117213 m3; lognormal variance with pedigree 0.124177, pedigree (2,1,4,1,1)
  (same comment as for Water)
- Boscalid [soil, agricultural]: 1.19566e-5 kg; lognormal variance with pedigree 0.0447216, pedigree (2,2,4,1,1)
  Calculated value - 100% emission in soil. See 'WFLDB-Guidelines.pdf', available at https://ecoquery.ecoinvent.org/File/Reports.
- Lead [water, surface water]: 1.26876e-7 kg; source Freiermuth R.  2006; lognormal variance with pedigree 0.356938, pedigree (2,2,4,1,1)
  (same comment as for Lead)
- Kresoxim-methyl [soil, agricultural]: 2.23907e-6 kg; lognormal variance with pedigree 0.0447216, pedigree (2,2,4,1,1)
  (same comment as for Boscalid)
- Mercury [water, surface water]: 7.56822e-10 kg; source Freiermuth R.  2006; lognormal variance with pedigree 0.356938, pedigree (2,2,4,1,1)
  (same comment as for Lead)
- Chromium, ion [water, ground-]: 4.54756e-7 kg; source Freiermuth R.  2006; lognormal variance with pedigree 0.356938, pedigree (2,2,4,1,1)
  (same comment as for Lead)
- Pyraclostrobin (prop) [soil, agricultural]: 3.00035e-6 kg; lognormal variance with pedigree 0.0447216, pedigree (2,2,4,1,1)
  (same comment as for Boscalid)
- Nickel, ion [water, surface water]: 2.52489e-7 kg; source Freiermuth R.  2006; lognormal variance with pedigree 0.356938, pedigree (2,2,4,1,1)
  (same comment as for Lead)
- Glyphosate [soil, agricultural]: 0.000205547 kg; lognormal variance with pedigree 0.0447216, pedigree (2,2,4,1,1)
  (same comment as for Boscalid)
- Zinc, ion [water, surface water]: 5.49978e-7 kg; source Freiermuth R.  2006; lognormal variance with pedigree 0.356938, pedigree (2,2,4,1,1)
  (same comment as for Lead)
- Zinc, ion [water, ground-]: 4.18444e-7 kg; source Freiermuth R.  2006; lognormal variance with pedigree 0.356938, pedigree (2,2,4,1,1)
  (same comment as for Lead)
- Chloropicrin [soil, agricultural]: 0.00447814 kg
  Direct emi); Calculated value - s from chloropicrin. 100% emitted to soil. See 'WFLDB-Guidelines.pdf', available at https://ecoquery.ecoinvent.org/File/Reports.
- Cadmium, ion [water, ground-]: 9.97289e-10 kg; source Freiermuth R.  2006; lognormal variance with pedigree 0.356938, pedigree (2,2,4,1,1)
  (same comment as for Lead)
- Boron [soil, agricultural]: 2.00216e-5 kg
  Direct emi); Calculated value - s from Boric Acid. 100% emitted to soilBoric acid: H3BO3 - Molar mass= 3*1+3*16+11= 62g/molBore: Molar mass = 11g/mol. See 'WFLDB-Guidelines.pdf', available at https://ecoquery.ecoinvent.org/File/Reports.
- Lambda-cyhalothrin [soil, agricultural]: 1.02102e-6 kg
  (same comment as for Boscalid)
- Spinosad [soil, agricultural]: 3.22426e-6 kg
  (same comment as for Boscalid)
- Acrinathrin [soil, agricultural]: 4.19825e-7 kg
  (same comment as for Boscalid)
- Carbon dioxide, fossil [air, non-urban air or from high stacks]: 0.000935333 kg; lognormal variance with pedigree 0.0138498, pedigree (2,2,4,1,1)
  Calculated value - CO2 emissions from urea and lime. See 'WFLDB-Guidelines.pdf', available at https://ecoquery.ecoinvent.org/File/Reports.
- Copper, ion [water, ground-]: 7.07511e-8 kg; source Freiermuth R.  2006; lognormal variance with pedigree 0.356938, pedigree (2,2,4,1,1)
  (same comment as for Lead)
- Nickel [soil, agricultural]: -1.86697e-8 kg; = 9.10133333333e-08 + ( - 1.09683e-07)*heavyMetalUptakeSwitch; source Freiermuth R.  2006
  Comment on mathematicalRelation:
  9.10133333333e-08 from Calculated value - Freiermuth (2006). See 'WFLDB-Guidelines.pdf', available at https://ecoquery.ecoinvent.org/File/Reports.
  -1.09683e-07 from Crop, default, heavy metals uptake model
  Heavy metal uptake can be excluded by setting the parameter heavyMetalUptakeSwitch to zero.

## Sampling procedure
WFLDB Methodological Guidelines for the Life Cycle Inventory of Agricultural Products in the latest version, available at: https://ecoquery.ecoinvent.org/File/Reports. Data sources: Data were categorised from level 0 (L0) to level (L4) as follows: L0 = estimate, proxy; L1 = statistical data (e.g. FAOSTAT); L2 = L1 adapted to crop and country; L3 = literature data or L1 resp. L2 data approved by experts; medium detailing (i.e. kg of total N-fertiliser); L4 = L3 data of high detailing (i.e. portion N-fertiliser types).In this dataset data were obtained for yield: L3; Fertilisers: L4; Pesticides: L1; Machinery: L0; Irrigation: L2. For information regarding the calculation of individual exchanges see supporting documentation WFLDB-Documentation.pdf

## Extrapolations
This dataset has been extrapolated from year 2012 to the year of the calculation (2021). The uncertainty has been adjusted accordingly.

## Review by Assumpció ANTON 2016-05-30
Be aware that the use of statistics in input calculations could provide some specific inputs not common for specific crops, this should be corrected if better information is available and better reflexed in DQR . Currently, I would dissent for some of good marks provided, being a revision of criteria applied advisable.

Pesticides will need to be amended periodically checking for update of pesticides' ban.
