# tap water production, seawater reverse osmosis, conventional pretreatment, enhance module, two stages

Dataset: EcoSpold 2, unit process
Geography: GLO
Time period: 2004-01-01 to 2021-12-31
Technology level: modern
Classification: EcoSpold01Categories: water supply/production
Classification: ISIC rev.4 ecoinvent: 3600:Water collection, treatment and supply
Scenario: Business-as-Usual
System model: Allocation, cut-off by classification
Generated by: Marylène Dussault
Published in: Al-Sarkal, T. 2013
Database: ecoinvent
isCopyrightProtected: true
accessRestrictedTo: 1

## General comment
This dataset represents the production of 1 kg of drinking water (potable water) from seawater reverse osmosis with conventional pretreatment using enhanced membrane modules and a two stages configuration. An enhanced membrane is a polyamide membrane of 40.9 m2 of active membrane surface and maximum operating pressure of 1200 psig (83 bars). Two stages allow higher recovery rate, but requires higher operation pressure. Thus, only enhance membrane can be used with this configuration. This dataset is based on published literature and on modeling. Reverse osmosis system was modeled using typical seawater characterisation, two stages enhance module membrane system with recovery rate of 55% and energy recovery by pressure exchanger of 40%. It includes water intake of seawater, conventional pretreatment, reverse osmosis filtration, recarbonisation and emissions of brine to sea. The modeling of the reverse osmosis treatment was done using the ROSA (Reverse Osmosis System Analysis) system design software from Dow Chemical. Recarbonation and post-treatment of permeate water are modeled with the Rothberg, Tamburini and Winsor (RTW) Model for Corrosion Control and Process Chemistry 4.0 by Tetra Tech. Typical seawater characterisation for salinity of 3.5% (w/w) was used for modeling. Composition is based on literature (Open University 1989).
Open University (1989). Seawater: its composition, properties and behaviour. Gerry Bearman Editor, Pergamon Press, 165p.

## Included activities start
From intake of seawater. This dataset includes energy and material inputs for the different water treatment stages: chlorination, coagulation, flocculation, clarification, sedimentation of sludge, dual media filtration, cartridge filtration, membrane filtration and post-treatment. It includes material for the membrane module and pressure vessel assuming lifetimes of 5 and 15 years, respectively.

## Included activities end
This dataset ends with the production of tap water, at facility gate. Electricity for lighting and heating the building is excluded due to lack of data. Note that the energy for the pumps pressurizing water at the beginning of the network was estimated due to lack of data. It excludes energy for pumping stations and water losses within the network which is included in the tap water market. Emissions to the environment are limited to release of brine to the environment and carbon dioxide emissions from water under atmospheric conditions.

## Parameters
- concentrate, carbon dioxide under pressure: 1.84e-5 kg; name concentrate_CO2; lognormal variance with pedigree 0.0052, pedigree (3,4,1,1,2)
  Calculated value. Carbon dioxide concentration in concentrate from reverse osmosis operation is based on modeling for seawater reverse osmosis with conventional pretreatment considering single stage baseline 8-inch spiral wound modules using ROSA system design software (Dow Chemical).
- average permeate flux: 13.5 l/(h.m2); name av_p_flux; lognormal variance with pedigree 0.0038, pedigree (2,4,1,1,2)
  Calculated value. Average permeate flux for reverse osmosis operation based on modeling for seawater reverse osmosis with conventional pretreatment considering single stage baseline 8-inch spiral wound modules using ROSA system design software (Dow Chemical). Value is a function of pre-treatment.
- sulfuric acid commercial concentration: 0.93 kg/kg; name conc_H2SO4; lognormal variance with pedigree 0.0112, pedigree (4,4,1,1,2)
  Literature value. Based on typical commercial concentration for sulfuric acid. Used to account for water content in commercial product.
- module lifetime: 5 year; name module_lft; lognormal variance with pedigree 0.0087, pedigree (4,2,1,1,1)
  Literature value. Expected lifetime of membrane from 5 years to years (Bureau of Reclamation (2003) Desalting Handbook for Planners. 3rd Edition, July 2003, Desalination and Water Purification Research and Development Program. Report No. 72). For conservative reason a lifetime of 5 years was selected, but is parametrised for easy adaptation by user.
- pretreatment and post-treatment sulfuric acid: 5.825e-5 kg; name pp_H2SO4; lognormal variance with pedigree 0.004, pedigree (3,4,1,1,1)
  Literature value. Average and uncertainty based on published amounts by Al-sarkal, T. et al. 2013, Tarnacki et al. 2012, Darwish, M.et al. 2013, Sanz, M. A. 2007, G. Raluy et al. 2006 and Sadhwani, J. J.et al. 2005.
- pretreatment and post-treament electricity: 0.000337 kWh; name pre_post_kWh; lognormal variance with pedigree 0.0052, pedigree (3,4,1,1,2)
  Literature value. Based on Fujairah-1 seawater reverse osmosis plant (Al-sarkal, T. et al. 2013).
- amount of pressure vessels: 127 unit; name pressV; lognormal variance with pedigree 0.0038, pedigree (2,4,1,1,2)
  Calculated value. Amount of pressure vessel based on simulation using ROSA for on seawater reverse osmosis medium size train (10080 m3/d).
- pressurization electricity: 0.000375 kWh; name pressur_kWh; lognormal variance with pedigree 0.0246, pedigree (4,5,1,1,3)
  Estimated value. Energy requirements for pressurizing treated water into network at facility gate. Calculated from report share of energy requirements from convention potable water treatment and average energy consumption for entire treatment as reported by the Energy Sector Management Assistance Program and the American Water Works Association (American Water Works Association, AWWA - American Society of Civil Engineers, ASCE (2012). Water Treatment Plant Design, 5th edition. Editors: Randtke S.J., Horsley M.B.. McGraw-Hill; Energy Sector Management Assistance Program, ESMAP (2012). A primer on energy efficiency for municipal water and wastewater utilities).
- reverse osmosis sulfuric acid: 3.71e-5 kg; name ro_H2SO4; lognormal variance with pedigree 0.0046, pedigree (3,4,1,1,1)
  Calculated value. Sulfuric acid associated with reverse osmosis operation based on modeling for seawater reverse osmosis with conventional pretreatment considering single stage baseline 8-inch spiral wound modules using ROSA system design software (Dow Chemical).
- polycarboxylate commercial concentration: 0.4 kg/kg; name conc_polycarbox; lognormal variance with pedigree 0.0006, pedigree (1,1,1,1,1)
  Literature value. Based on ecoinvent process definition for polycarboxylate. Used to account for water content in commercial product.
- reinforcing steel in concrete: 0.02 dimensionless; name reinf_steel; lognormal variance with pedigree 0.014, pedigree (4,1,1,1,1)
  Estimation. Reinforcing steel content in reinforced concrete for potable water treatment equipements provided by industrial expert.
- pressure vessel, glass fibre mass per module: 26.78 kg/unit; name PressV_fglass; lognormal variance with pedigree 0.0046, pedigree (3,4,1,1,1)
  Calculated value. Average mass of material per module unit based on technical drawing for 8-inch pressure vessel - 1000 PSI from Advanced composite PVT. LTD, India.
- sodium hypochlorite commercial concentration: 0.15 kg/kg; name conc_NaClO; lognormal variance with pedigree 0.0006, pedigree (1,1,1,1,1)
  Literature value. Based on ecoinvent process definition for sodium hypochlorite. Used to account for water content in commercial product.
- amount of modules unit per pressure vessel: 6 unit; name module_pressV; lognormal variance with pedigree 0.0038, pedigree (2,4,1,1,2)
  Calculated value. Amount of module units per pressure vessel based on simulation using ROSA for on seawater reverse osmosis medium size train (10080 m3/d).
- iron trichloride commercial concentration: 0.35 kg/kg; name conc_FeCl3; lognormal variance with pedigree 0.0006, pedigree (1,1,1,1,1)
  Literature value. Based on ecoinvent process definition for iron trichloride. Used to account for water content in commercial product.
- pressure vessel, epoxy mass per module: 2.09048 kg/unit; name PressV_epoxy; lognormal variance with pedigree 0.0046, pedigree (3,4,1,1,1)
  (same comment as for pressure vessel, glass fibre mass per module)
- reverse osmosis electricity: 0.00234 kWh; name RO_kWh; lognormal variance with pedigree 0.0046, pedigree (3,4,1,1,1)
  Calculated value. Electricity associated with operational pression based on modeling for seawater reverse osmosis with conventional pretreatment considering single stage baseline 8-inch spiral wound modules using ROSA system design software (Dow Chemical). Energy recovery from pressure exchanger of 40% is considered which is a typical value.
- pressure vessel_lifetime: 15 year; name PressV_lft; lognormal variance with pedigree 0.0426, pedigree (5,4,1,1,1)
  Estimated value. Lifetime of pressure vessel assumed to be of 15 years.

## Reference product
- tap water: 1 kg; name tapwater; CPC 18000: Natural water; By-product classification allocatable product; CAS 7732-18-5
  production volume 3.19e11 kg; name PV_water
    Estimated value. Total production of tap water from seawater reverse osmosis is based on reported value from Lattermann 2010 (2006 reported data). Share of pretreatment (i.e. 91% conventional vs 9% ultrafiltration) is based on proportion ratio of installed capacity of ultrafiltration pretreatment to water desalination technologies in 2010 and total installed desalination capacity in 2010 (Lattermann, 2012). Share for seawater membrane module (baseline vs enhanced) and configuration (1 stage vs 2 stages) where fixed arbitrary and should be revised as soon as better data is available. Total production of tap water from seawater reverse osmosis (based on installed capacity in 2006) is 3.51E12 kg. Thus, 3.19E12 kg of tap water from seawater reverse osmosis produced with conventional pretreatment and 3.16E11 kg produced using ultrafiltration pretreatment. It was assumed that baseline module with 1 stage configuration would be the most frequent combination used within facilities and that more recent technologies involving enhanced modules and 2 stages configuration be less frequent. Share where fixed as follow: 75% baseline-1stage, 15% enhanced-1stage, 10% enhanced-2stages.
  property mass concentration, magnesium 0.0023 kg/m3; name tapwater_c_Mg
  property mass concentration, fluorine 1e-5 kg/m3; name tapwater_c_F
  property mass concentration, chloride 0.13831 kg/m3; name tapwater_C_Cl_ion
  property mass concentration, dissolved sulfate SO4 as S 0.00193 kg/m3; name tapwater_c_SO4_S
  property mass concentration, bicarbonate 0.0726282 kg/m3; name tapwater_c_HCO3
  property mass concentration, boron 0.00128 kg/m3; name tapwater_c_B
  property mass concentration, carbonic acid 0.00437569 kg/m3; name tapwater_c_H2CO3
  property mass concentration, calcium 0.0242 kg/m3; name tapwater_c_Ca
  property pH 7.51; name tapwater_pH
  property mass concentration, potassium 0.00346 kg/m3; name tapwater_c_K
  property mass concentration, strontium 2e-5 kg/m3; name tapwater_c_Sr
  property mass concentration, sodium 0.08389 kg/m3; name tapwater_c_Na
  property mass concentration, carbonate 0.000149052 kg/m3; name tapwater_c_CO3
  property carbon content, fossil 1.51865e-5; = (tapwater_c_CO3*0.2+ tapwater_c_HCO3*0.197+ tapwater_c_H2CO3*0.194)/1000
  property price 0.000397 EUR2005; name tapwater_price_EUR2005
  properties: carbon content, non-fossil 0, dry mass 0.000337476 kg, water in wet mass 0.999663 kg, wet mass 1 kg, water content 2962.17, carbon content 1.51865e-5, carbon allocation 5.12506e-9 kg

## Inputs from technosphere
- polyvinylidenchloride, granulate: 0 kg; name PVDC; pedigree (1,1,1,1,1)
  Literature value. Material for catridge, filtration step upstream of reverse osmosis filtration.
  properties: wet mass 1 kg, carbon content, fossil 0.387097, dry mass 1 kg, heating value, net 10.01 MJ
- tap water: 0.000130549 kg; = (NaClO/conc_NaClO-NaClO)+ (FeCl3/conc_FeCl3-FeCl3)+( polycarbox/ conc_polycarbox- polycarbox)+( H2SO4/conc_H2SO4 - H2SO4); lognormal variance with pedigree 0.008, pedigree (1,1,4,1,1)
  Calculated variable. This flow represents the amount of water in chemical solution. Chemical processes represent active substance only. Water is added seperatly.
  Uncertainty: Calculated variable. Uncertainty will be determined from propagation of uncertainty factors of underlying variables. Uncertainty of actual relation between variables not accounted for at this time, although this could be included in a future update.
  properties: water content 2962.17, dry mass 0.000337476 kg, wet mass 1 kg, carbon content, fossil 0.00178991
  note on carbon content, fossil: Bicarbonate content is 2.93 mol/m3. CO2 content is 0.1 mol/m3 (ecoinvent v2.2 report 8, Tab 93.1).
- polyacrylamide: 1.05e-6 kg; lognormal variance with pedigree 0.008, pedigree (1,1,4,1,1)
  Literature value. Average and uncertainty based on published amounts by Al-sarkal, T. et al. 2013, Tarnacki et al. 2012, Darwish, M.et al. 2013, Sanz, M. A. 2007, G. Raluy et al. 2006 and Sadhwani, J. J.et al. 2005.
  Al-Sarkal, T., & Arafat, H. a. (2013). Ultrafiltration versus sedimentation-based pretreatment in Fujairah-1 RO plant: Environmental impact study. Desalination, 317, 55-66.
  Tarnacki, K., Meneses, M., Melin, T., van Medevoort, J., & Jansen, a. (2012). Environmental assessment of desalination processes: Reverse osmosis and Memstill®. Desalination, 296, 69-80.
  Darwish, M., Hassabou, A. H., & Shomar, B. (2013). Using Seawater Reverse Osmosis (SWRO) desalting system for less environmental impacts in Qatar. Desalination, 309, 113-124.
  Sanza, M. A., Bonnélyea, V., & Cremerb, G. (2007). Fujairah reverse osmosis plant: 2 years of operation. Desalination, 203(1-3), 91-99.
  Raluy, G., Serra, L., & Uche, J. (2006). Life cycle assessment of MSF, MED and RO desalination technologies. Energy, 31(13), 2361-2372.
  Sadhwani, J. J., Veza, J. M., & Santana, C. (2005). Case studies on environmental impact of seawater desalination. Desalination, 185(1-3), 1-8.
  properties: heating value, net 23.88 MJ
- seawater reverse osmosis module: 1.69119e-6 m2; = AMS* module_pressV* pressV/(av_p_flux* module_lft*UnitConversion(1, 'year', 'hour')*AMS* module_pressV* pressV); lognormal variance with pedigree 0.008, pedigree (1,1,4,1,1)
  This unit process refers to the unit of active membrane surface for reverse osmosis of seawater.
  Uncertainty: Calculated variable. Uncertainty will be determined from propagation of uncertainty factors of underlying variables. Uncertainty of actual relation between variables not accounted for at this time, although this could be included in a future update.
  property active membrane surface per module unit 40.9 m2; name AMS
- polycarboxylates, 40% active substance: 0 kg; name polycarbox; pedigree (1,1,1,1,1)
  (same comment as for polyacrylamide)
  properties: heating value, net 4.54 MJ, water content 1.5, carbon content, fossil 0.496429, wet mass 1 kg, dry mass 0.4 kg
- chlorine, liquid: 0 kg; pedigree (1,1,1,1,1)
  Literature value. Chlorine for final desinfection. Taken directly from ecoinvent V.3 tap water.
  properties: wet mass 1 kg, dry mass 1 kg
- epoxy resin, liquid: 0 kg; name epoxy; pedigree (1,1,1,1,1)
  Calculated value.
  Uncertainty: Calculated variable. Uncertainty will be determined from propagation of uncertainty factors of underlying variables. Uncertainty of actual relation between variables not accounted for at this time, although this could be included in a future update.
  properties: dry mass 1 kg, heating value, net 12.82 MJ, wet mass 1 kg, carbon content, fossil 0.42325
- lime, hydrated, packed: 0 kg; pedigree (1,1,1,1,1)
  Calculated value. Represents dosage for recarbonisation of permeate water as calculated by RWT software. Caracterisation of permeate used was calculated from modeling seawater reverse osmosis with conventional pretreatment considering single stage baseline 8-inch spiral wound modules using ROSA system design software (Dow Chemical).
  properties: water content 0.00300903, dry mass 0.997 kg, wet mass 1 kg
- glass fibre: 3.69112e-7 kg; name fglass; = PressV_fglass* module_pressV* pressV/( av_p_flux* PressV_lft*UnitConversion(1, 'year', 'hour')*AMS* module_pressV* pressV); lognormal variance with pedigree 0.008, pedigree (1,1,4,1,1)
  (same comment as for epoxy resin, liquid)
  properties: dry mass 1 kg, wet mass 1 kg
- water works, capacity 6.23E10l/year: 5.3526e-13 unit; name RO_plant_1; = 1/RO_plant_lifetime_capacity_l; lognormal variance with pedigree 0.0086, pedigree (1,1,4,1,1)
  Calculated value. Based on water works capacity and lifetime. Share of infrastructure attributed to the prodction of 1 kg of drinking water is estimated by dividing the 1 unit of drinking water plant by the total estimated amount of water this plant will produce.
  Uncertainty: Calculated variable. Uncertainty will be determined from propagation of uncertainty factors of underlying variables. Uncertainty of actual relation between variables not accounted for at this time, although this could be included in a future update.
  property lifetime capacity [l] 1.86825e12 l; name RO_plant_lifetime_capacity_l
  note on lifetime capacity [l]: Lifetime capacity in litres. Based on water works daily capacity, and expected lifetime (30 yr). Assumed 1kg/l water density
- carbon dioxide, liquid: 0 kg; pedigree (1,1,1,1,1)
  (same comment as for lime, hydrated, packed)
  properties: wet mass 1 kg, dry mass 1 kg, heating value, net 8.27 MJ, carbon content, fossil 0.272727
- waste glass pane in burnable frame: 0 kg; name w_fglass; pedigree (1,1,1,1,1)
  Calculated value. Process used as proxy for disposal of fiber glass/epoxy pressure vessel.
  Uncertainty: Calculated variable. Uncertainty will be determined from propagation of uncertainty factors of underlying variables. Uncertainty of actual relation between variables not accounted for at this time, although this could be included in a future update.
  production volume 0 kg
    Calculated from production volume of reference product using the relative outputs.
  property price 0 EUR2005; name w_fglass_price_EUR2005
  properties: wet mass 1 kg, dry mass 1 kg
- sulfuric acid: 0 kg; name H2SO4; pedigree (1,1,1,1,1)
  (same comment as for epoxy resin, liquid)
  properties: wet mass 1 kg, dry mass 1 kg
- electricity, low voltage: 0.003052 kWh; = RO_kWh+ pre_post_kWh+pressur_kWh; lognormal variance with pedigree 0.008, pedigree (1,1,4,1,1)
  (same comment as for epoxy resin, liquid)
- iron(III) chloride, without water, in a 12% iron solution state: 2.06296e-5 kg; name FeCl3; lognormal variance with pedigree 0.008, pedigree (1,1,4,1,1)
  Literature value. Average and uncertainty based on published amounts by Al-sarkal, T. et al. 2013, Tarnacki et al. 2012, Darwish, M.et al. 2013, Sanz, M. A. 2007, G. Raluy et al. 2006 and Sadhwani, J. J.et al. 2005.
  Al-Sarkal, T., & Arafat, H. a. (2013). Ultrafiltration versus sedimentation-based pretreatment in Fujairah-1 RO plant: Environmental impact study. Desalination, 317, 55–66.
  Tarnacki, K., Meneses, M., Melin, T., van Medevoort, J., & Jansen, a. (2012). Environmental assessment of desalination processes: Reverse osmosis and Memstill®. Desalination, 296, 69–80.
  Darwish, M., Hassabou, A. H., & Shomar, B. (2013). Using Seawater Reverse Osmosis (SWRO) desalting system for less environmental impacts in Qatar. Desalination, 309, 113–124.
  Sanza, M. A., Bonnélyea, V., & Cremerb, G. (2007). Fujairah reverse osmosis plant: 2 years of operation. Desalination, 203(1-3), 91–99.
  Raluy, G., Serra, L., & Uche, J. (2006). Life cycle assessment of MSF, MED and RO desalination technologies. Energy, 31(13), 2361–2372.
  Sadhwani, J. J., Veza, J. M., & Santana, C. (2005). Case studies on environmental impact of seawater desalination. Desalination, 185(1-3), 1–8.
- sodium hydrogen sulfite: 2.37e-5 kg; lognormal variance with pedigree 0.21, pedigree (5,5,5,5,5)
  (same comment as for polyacrylamide)
  properties: wet mass 1 kg, dry mass 1 kg
- waste plastic, mixture: 0 kg; name w_plastic; pedigree (1,1,1,1,1)
  Estimation. Based on material input.
  Uncertainty: Calculated variable. Uncertainty will be determined from propagation of uncertainty factors of underlying variables. Uncertainty of actual relation between variables not accounted for at this time, although this could be included in a future update.
  production volume 0 kg
    Calculated from production volume of reference product using the relative outputs.
  property price 0 EUR2005; name w_plastic_price_EUR2005
  properties: carbon content, fossil 0.747344, wet mass 1 kg, dry mass 0.847 kg, water content 0.180638, heating value, net 30.79 MJ
  note on heating value, net: Value taken from the general comment of the treatment dataset.
- sodium hypochlorite, without water, in 15% solution state: 0 kg; name NaClO; pedigree (1,1,1,1,1)
  (same comment as for polyacrylamide)
  properties: wet mass 1 kg, dry mass 1 kg
- polyvinylidenchloride, granulate: 0.000155378, 0.000314622 kg (2 entries); lognormal variance with pedigree 0.0118, pedigree (2,4,4,1,2)
  (same comment as for polyvinylidenchloride, granulate)
- polycarboxylates, 40% active substance: 1.48436e-6, 3.00564e-6 kg (2 entries); lognormal variance with pedigree 0.21, pedigree (5,5,5,5,5)
  (same comment as for polyacrylamide)
- chlorine, liquid: 1.66693e-8, 8.33307e-8 kg (2 entries); lognormal variance with pedigree 0.0666, pedigree (5,5,4,5,3)
  (same comment as for chlorine, liquid)
- epoxy resin, liquid: 5.01353e-9, 2.37999e-8 kg (2 entries); lognormal variance with pedigree 0.008, pedigree (1,1,4,1,1)
  (same comment as for epoxy resin, liquid)
- lime, hydrated, packed: 3.66135e-7, 4.31339e-5 kg (2 entries); lognormal variance with pedigree 0.0126, pedigree (3,4,4,1,1)
  (same comment as for lime, hydrated, packed)
- carbon dioxide, liquid: 5.82555e-6, 2.76744e-5 kg (2 entries); lognormal variance with pedigree 0.0126, pedigree (3,4,4,1,1)
  (same comment as for lime, hydrated, packed)
- waste glass pane in burnable frame: -3.34929e-9, -3.94576e-7 kg (2 entries); lognormal variance with pedigree 0.008, pedigree (1,1,4,1,1)
  (same comment as for waste glass pane in burnable frame)
  production volume 126938 kg
- sulfuric acid: 1.10307e-5, 8.43193e-5 kg (2 entries); lognormal variance with pedigree 0.008, pedigree (1,1,4,1,1)
  (same comment as for epoxy resin, liquid)
- waste plastic, mixture: -4.52397e-5, -3.48771e-6, -1.44055e-6, -1.36794e-6, -5.21987e-5, -5.81966e-7, -2.6377e-7, -0.00036542 kg (8 entries); lognormal variance with pedigree 0.008, pedigree (1,1,4,1,1)
  (same comment as for waste plastic, mixture)
  production volume 1.4993e8 kg
- sodium hypochlorite, without water, in 15% solution state: 2.40503e-6, 1.1417e-5 kg (2 entries); lognormal variance with pedigree 0.210001, pedigree (5,5,5,5,5)
  (same comment as for polyacrylamide)

## Inputs from nature
- Water, salt, ocean [natural resource, in water]: 0.0025 m3; name raw_water; source Al-Sarkal, T. 2013; lognormal variance with pedigree 0.008, pedigree (1,1,4,1,1)
  Calculated value. Based on ratio of raw water intake and permeate of Fujairah-1 seawater reverse osmosis plant (Al-sarkal, T. et al. 2013).
  Uncertainty: Calculated variable. Uncertainty will be determined from propagation of uncertainty factors of underlying variables. Uncertainty of actual relation between variables not accounted for at this time, although this could be included in a future update.
  property mass concentration, calcium 0.406 kg/m3; name raw_water_c_Ca
  property mass concentration, potassium 0.386 kg/m3; name raw_water_c_K
  property mass concentration, dissolved sulfate SO4 as S 2.689 kg/m3; name raw_water_c_SO4_S
  property mass concentration, boron 0.0045 kg/m3; name raw_water_c_B
  property mass concentration, carbonate 0.0182 kg/m3; name raw_water_c_CO3
  property mass concentration, magnesium 1.291 kg/m3; name raw_water_c_Mg
  property mass concentration, chloride 19.2741 kg/m3; name raw_water_C_Cl_ion
  property mass concentration, sodium 10.7151 kg/m3; name raw_water_c_Na
  property mass concentration, carbone dioxide 0.0007 kg/m3; name raw_water_c_CO2_s
  property mass concentration, fluoride 0.001 kg/m3; name raw_water_c_F_s
  property mass concentration, bicarbonate 0.142 kg/m3; name raw_water_c_HCO3
  property mass concentration, strontium 0.013 kg/m3; name raw_water_c_Sr

## Emissions to nature
- Carbonate [water, ocean]: 2.7e-6 kg; lognormal variance with pedigree 0.052, pedigree (3,4,4,1,1)
  Calculated value. Mass of ion returned to the ocean with the concentrate as calculated by modeling for seawater reverse osmosis with conventional pretreatment considering single stage baseline 8-inch spiral wound modules using ROSA system design software (Dow Chemical) and RWT for recarbonisation. Note that the impact from emission of concentrate reside mostly in the high ion loaded water and small area of release which individual substance emissions will not be well acounted by impact models.
- Calcium, ion [water, ocean]: 0.00101434 kg; lognormal variance with pedigree 0.052, pedigree (3,4,4,1,1)
  (same comment as for Carbonate)
- Sulfate [water, ocean]: 0.00672072 kg; lognormal variance with pedigree 0.052, pedigree (3,4,4,1,1)
  Calculated value. Mass of ion returned to the ocean with the concentrate as calculated by modeling for seawater reverse osmosis with conventional pretreatment considering single stage baseline 8-inch spiral wound modules using ROSA system design software (Dow Chemical). Note that the impact from emission of concentrate reside mostly in the high ion loaded water and small area of release which individual substance emissions will not be well acounted by impact models.
- Magnesium [water, ocean]: 0.00322539 kg; lognormal variance with pedigree 0.052, pedigree (3,4,4,1,1)
  (same comment as for Sulfate)
- Hydrogen carbonate [water, ocean]: 0.0003254 kg; name HCO3; lognormal variance with pedigree 0.052, pedigree (3,4,4,1,1)
  (same comment as for Carbonate)
- Boron [water, ocean]: 1.027e-5 kg; lognormal variance with pedigree 0.052, pedigree (3,4,4,1,1)
  (same comment as for Sulfate)
- Carbon dioxide, non-fossil [air, non-urban air or from high stacks]: 1.84e-5 kg; lognormal variance with pedigree 0.0506, pedigree (5,4,4,1,1)
  Calculated value. Mass of carbon dioxide emitted to air assuming carbon dioxide in concentrate under pressure will all be emited to air after release of concentrate at atmospheric conditions. Concentraiton in concentrate was calculated by modeling seawater reverse osmosis using ROSA system design software (Dow Chemical).
  property molecular weight 44.01 g/mol; name CO2_mol_weight
- Potassium, ion [water, ocean]: 0.00096182 kg; lognormal variance with pedigree 0.052, pedigree (3,4,4,1,1)
  (same comment as for Sulfate)
- Strontium [water, ocean]: 3.248e-5 kg; lognormal variance with pedigree 0.052, pedigree (3,4,4,1,1)
  (same comment as for Sulfate)
- Chloride [water, ocean]: 0.0480582 kg; lognormal variance with pedigree 0.052, pedigree (3,4,4,1,1)
  (same comment as for Sulfate)
- Water [water, ocean]: 0.000818182 m3; name concentrate; lognormal variance with pedigree 0.0126, pedigree (3,4,4,1,1)
  Calculated value. Volume of concentrate (water returned to the environment) based production of 1 kg of tap water and on recovery rate.
- Fluoride [water, ocean]: 2.49e-6 kg; lognormal variance with pedigree 0.052, pedigree (3,4,4,1,1)
  (same comment as for Sulfate)
- Sodium, ion [water, ocean]: 0.0267107 kg; lognormal variance with pedigree 0.052, pedigree (3,4,4,1,1)
  (same comment as for Sulfate)

## Extrapolations
This dataset has been extrapolated from year 2012 to the year of the calculation (2021). The uncertainty has been adjusted accordingly.

## Review by Emilia Moreno Ruiz 2014-05-22
renaming water work infrastructure
