# mineral supplement production, for beef cattle

Dataset: EcoSpold 2, unit process
Geography: GLO
Time period: 2019-01-01 to 2021-12-31
Technology level: current
Classification: ISIC rev.4 ecoinvent: 1080:Manufacture of prepared animal feeds
Scenario: Business-as-Usual
System model: Allocation, cut-off by classification
Generated by: Avraam Symeonidis
Database: ecoinvent
isCopyrightProtected: true
accessRestrictedTo: 1

## General comment
This dataset represents the production of mineral supplement, for beef cattle. The supplement is used to assist beef cattle production on pasture and complete the diet of the animals with micronutrients that are not usually present in the pasture. The nutrients and micronutrients are simply mixed. The dataset is constructed using literature and expert judgement.
Literature: Composition of the proteic supplement is found online. Accessed on 25.06.2019 at: http://old.cnpgc.embrapa.br/publicacoes/naoseriadas/suplementacaomineral/

## Included activities start
Activity starts with the reception of the necessary materials for the production of the mineral supplemnt.

## Included activities end
Activity ends with the mineral supplement produced and being ready for transportation in the saline plant.

## Parameters
- fraction of electricity pumps: 1 dimensionless; name fraction_el
- pump efficiency: 0.7 dimensionless; name pump_efficiency
- elevation head surface water: 2 dimensionless; name head_SW
- elevation head ground water: 0 dimensionless; name head_GW
- dynamic pressure head: 0 dimensionless; name head_DP
- engine efficiency, electricity: 0.8 dimensionless; name Engine_efficiency_electricity
- fraction ground water: 0 dimensionless; name fraction_GW
- fraction surface water: 1 dimensionless; name fraction_sw

## Reference product
- mineral supplement, for beef cattle: 1 kg; By-product classification allocatable product; CPC 88170: Prepared animal feeds manufacturing services
  production volume 8.54857e7 kg
    Calculated based on the amount of proteic supplement used in the database.
  property price 0.119679 EUR2005
    Calculated based on inputs: The price of the product has been calculated as a sum of the values of the material and energy inputs for this product. This value is therefore a rough estimation. It may underestimate the real price since there are additional expenses when producing any product. These expences can include for example labour costs, treatment of waste materials and profit for the producer. Please consider carefully whether this level of data quality is acceptable for your application.
  property carbon content 0
    carbon content on a dry matter basis (reserved; not for manual entry)
  properties: carbon content, fossil 0, water content 0, carbon content, non-fossil 0, dry mass 1 kg, wet mass 1 kg, water in wet mass 0 kg, carbon allocation 0 kg

## Inputs from technosphere
- sulfur: 0.06182 kg; lognormal variance with pedigree 0.1708, pedigree (5,5,2,5,5)
  Sulfur is used here to approximate Elementary sulfur, which participates in the mix with a contribution of 6.182%. Circa 1 kg of Sulfur is used as proxy for 1 kg of Elementary sulfur.
  properties: dry mass 1 kg, wet mass 1 kg
- electricity, medium voltage: 0.0035 kWh; lognormal variance with pedigree 0.1708, pedigree (5,5,2,5,5)
  Assumed electricity need in the factory to produce the mineral supplement.
- vinasse, from fermentation of sugarcane: 0.0302528 kg; lognormal variance with pedigree 0.1708, pedigree (5,5,2,5,5)
  Vinasse, from fermentation of sugarcane is used here to approximate Molasses, which participates in the mix with a contribution of 2%. Circa 1 kg of Vinasse, from fermentation of sugarcane is used as proxy for 1 kg of Molasses. The additional amount of vinasse used is meant to fulfill the mass balance of the mineral supplement.
  properties: dry mass 0.0554348 kg, water content 17.0392, wet mass 1 kg, carbon content, non-fossil 0.1288
- copper sulfate: 0.00596 kg; lognormal variance with pedigree 0.1708, pedigree (5,5,2,5,5)
  Copper sulfate participates in the mix with a contribution of 0.596%.
  properties: dry mass 1 kg, wet mass 1 kg
- selenium: 3.19631e-5 kg; lognormal variance with pedigree 0.1708, pedigree (5,5,2,5,5)
  Selenium is used here to approximate Sodium selenite, which participates in the mix with a contribution of 0.007%. Circa 0.457 kg of Selenium is used as proxy for 1 kg of Sodium selenite. Assuming Selenium is in form of Sodium selenite.
  properties: dry mass 1 kg, wet mass 1 kg
- salt: 0.4362 kg; lognormal variance with pedigree 0.1708, pedigree (5,5,2,5,5)
  Salt is used here to approximate Sodium chloride, which participates in the mix with a contribution of 43.62%. Circa 1 kg of Salt is used as proxy for 1 kg of Sodium chloride.
  properties: dry mass 1 kg, wet mass 1 kg
- phosphate rock, beneficiated: 0 kg; pedigree (1,1,1,1,1)
  The exchange has been updated from 'phosphate rock, as P2O5, beneficiated, dry' into 'phosphate rock, beneficiated' and therefore its amount has been scaled (multiplied) from 0.45 kg by 3.125 kg of 'phosphate rock, beneficiated' per kg of 'phosphate rock, as P2O5, beneficiated, dry'. Original comment of the exchange is: Phosphate rock, as P2O5, beneficiated, dry is used here to approximate Dicalcium phosphate, which participates in the mix with a contribution of 45%. Circa 1 kg of Phosphate rock, as P2O5, beneficiated, dry is used as proxy for 1 kg of Dicalcium phosphate.
  properties: wet mass 1 kg, dry mass 1 kg
- cobalt: 2.51581e-5 kg; lognormal variance with pedigree 0.1708, pedigree (5,5,2,5,5)
  Cobalt is used here to approximate Cobalt Sulphate, which participates in the mix with a contribution of 0.012%. Circa 0.21 kg of Cobalt is used as proxy for 1 kg of Cobalt Sulphate. Assuming cobalt is in form of cobalt sulfate (heptahydrate).
  properties: dry mass 1 kg, wet mass 1 kg
- zinc sulfide: 0.015633 kg; lognormal variance with pedigree 0.1708, pedigree (5,5,2,5,5)
  Zinc sulfate is used here to approximate Zinc sulfate, which participates in the mix with a contribution of 2.59%. Circa 0.604 kg of Zinc sulfate is used as proxy for 1 kg of Zinc sulfate.
  properties: dry mass 1 kg, wet mass 1 kg
- iodine: 7.70912e-5 kg; lognormal variance with pedigree 0.1708, pedigree (5,5,2,5,5)
  Iodine is used here to approximate Potassium iodate, which participates in the mix with a contribution of 0.013%. Circa 0.593 kg of Iodine is used as proxy for 1 kg of Potassium iodate. Assuming iodine is in form of Potassium Iodate.
  properties: dry mass 1 kg, wet mass 1 kg
- chemical factory, organics: 4e-10 unit; lognormal variance with pedigree 0.4702, pedigree (5,5,2,5,5)
  Calculated based on literature data published by the industry. For this activity, no information was readily available concerning infrastructure and land-use. Therefore, the infrastructure is estimated based on data from two chemical factories, the BASF site of Ludwigshafen and the chemical factory in Gendorf (which are both located in Germany), which produce a wide range of chemical substances. Based on this data, the following assumptions are made: the built area amounts to about 4.2 ha, the plant has an average output of 50'000 t/a and a lifespan of fifty years. The estimated infrastructure amount is therefore 4.00 E-10 units per kg of produced chemical.
  References:
  Althaus H.-J., Chudacoff M., Hischier R., Jungbluth N., Osses M. and Primas A. (2007) Life Cycle Inventories of Chemicals. ecoinvent report No. 8, v2.0. EMPA Dübendorf, Swiss Centre for Life Cycle Inventories, Dübendorf, CH.
  Gendorf (2000) Umwelterklärung 2000, Werk Gendorf. Werk Gendorf, Burgkirchen.
- phosphate rock, beneficiated: 0.00617609, 0.0181064, 0.0181064, 1.36386 kg (4 entries); lognormal variance with pedigree 0.1708, pedigree (5,5,2,5,5)
  (same comment as for phosphate rock, beneficiated)

## Extrapolations
This dataset has been extrapolated from year 2019 to the year of the calculation (2021). The uncertainty has been adjusted accordingly.
