# methylene diphenyl diisocyanate production

Dataset: EcoSpold 2, unit process
Geography: RER
Time period: 2015-01-01 to 2021-12-31
Technology level: current
Classification: ISIC rev.4 ecoinvent: 2013:Manufacture of plastics and synthetic rubber in primary forms
Synonyms: 4,4'-Diphenylmethane diisocyanate; Bis(4-isocyanatophenyl)methane; 4,4'-Methylenebis(phenyl isocyanate); Diphenylmethane diisocyanate; Methylbisphenyl isocyanate
Scenario: Business-as-Usual
System model: Allocation, cut-off by classification
Generated by: Lucia Valsasina
Database: ecoinvent
isCopyrightProtected: true
accessRestrictedTo: 1

## General comment
MDI is an aromatic diisocyanate. MDI is used in the production of polyurethane in combination with polyols (Boustead 2005). In 2012 the largest producer of MDI globally was Bayer, producing 1.24 million tonnes per year, followed by Wanhua Group, producing 1.1 million tonnes per year (Gal, 2012).
Reference(s):
Gendorf. 2016. Umwelterklärung 2015, Werk Gendorf Industriepark, www.gendorf.de
Boustead. 2005. Eco-profiles of the European Plastics Industry Diphenylmethane diisocyanate (MDI). Retrieved from: http://www.polyurethanes.org/uploads/documents/eco_midi.pdf, accessed 26 January 2017
Gal, J. 2012. Wanhua to the rescue of BorsodChem. ICIS Chemical Business. Retrieved from: http://www.icis.com/resources/news/2012/02/20/9533156/wanhua-to-the-rescue-of-borsodchem/, accessed 26 Janury 2017
For more information on the model please refer to the dedicate ecoinvent report, access it in the Report section of ecoQuery (http://www.ecoinvent.org/login-databases.html)

## Included activities start
The activity starts when the raw materials enter the process.

## Included activities end
Materials entering the process are included as well as energy uses, infrastructure and emissions.

## Geography
The inputs to the process are calculated based on stoichiometry and literature data, they are therefore considered to be valid for the chosen geography. The inputs of heat, electricity, water, factory and nitrogen are mostly taken as average of industry data. Industry data values are a 5-year average of data (2011 - 2015) published by the Gendorf factory (Gendorf, 2016, Umwelterklärung, www.gendorf.de), (Gendorf, 2015, Umwelterklärung, www.gendorf.de), (Gendorf, 2014, Umwelterklärung, www.gendorf.de). The Gendorf factory is based in Germany, it produces a wide range of chemical substances. The factory produced 1657400 tonnes of chemical substances in the year 2015 (Gendorf, 2016, Umwelterklärung, www.gendorf.de) and 740000 tonnes of intermediate products. Given the range of chemicals produced by the german site, the values are used for the GLO geography, with uncertainty adjusted accordingly.

## Technology
MDI production starts from aromatic hydrocarbons, which are used to produce diamines which then undergo phosgenation to produce the final product.
The flows for electricity and heat are taken from Boustead (2005). For more information on the process and the assumptions made, please see Boustead (2005) report. The report is part of a series of Eco-profiles commissioned by Plastics Europe.
Chemical Reaction: 2 C6H7N + CH2O + 2 CCl2O + 4 HNaO → C15H10N2O2
A process efficiency of 95% is assumed.
This inventory representing production of a particular chemical compound is at least partially based on a generic model on the production of chemicals. The data generated by this model have been improved by compound-specific data when available.
The model on production of chemicals is using specific industry or literature data wherever possible and more generic data on chemical production processes to fill compound-specific data gaps when necessary. The basic principles of the model have been published in literature (Hischier 2005, Establishing Life Cycle Inventories of Chemicals Based on Differing Data Availability). The model has been updated and extended with newly available data from the chemical industry.
In the model, unreacted fractions are treated in a waste treatment process, and emissions reported are after a waste treatment process that is included in the scope of this dataset. For volatile reactants, a small level of evaporation is assumed. Solvents and catalysts are mostly recycled in closed-loop systems within the scope of the dataset and reported flows are for losses from this system.
The main source of information for the values for heat, electricity, water (process and cooling), nitrogen, chemical factory is industry data from Gendorf. The values are a 5-year average of data (2011 - 2015) published by the Gendorf factory (Gendorf, 2016, Umwelterklärung, www.gendorf.de), (Gendorf, 2015, Umwelterklärung, www.gendorf.de), (Gendorf, 2014, Umwelterklärung, www.gendorf.de). The Gendorf factory is based in Germany, it produces a wide range of chemical substances. The factory produced 1657400 tonnes of chemical substances in the year 2015 (Gendorf, 2016, Umwelterklärung, www.gendorf.de) and 740000 tonnes of intermediate products.
Reference(s):
Hischier, R. (2005) Establishing Life Cycle Inventories of Chemicals Based on Differing Data Availability (9 pp). The International Journal of Life Cycle Assessment, Volume 10, Issue 1, pp 59–67. 10.1065/lca2004.10.181.7
Gendorf. 2016. Umwelterklärung 2015, Werk Gendorf Industriepark, www.gendorf.de
Boustead. 2005. Eco-profiles of the European Plastics Industry Diphenylmethane diisocyanate (MDI). Retrieved from: http://www.polyurethanes.org/uploads/documents/eco_midi.pdf, accessed 26 January 2017
Gal, J. 2012. Wanhua to the rescue of BorsodChem. ICIS Chemical Business. Retrieved from: http://www.icis.com/resources/news/2012/02/20/9533156/wanhua-to-the-rescue-of-borsodchem/, accessed 26 Janury 2017
For more information on the model please refer to the dedicate ecoinvent report, access it in the Report section of ecoQuery (http://www.ecoinvent.org/login-databases.html)

## Time period
The activity is based on stoichiometry and literature data, it is therefore considered not to change significantly over time in terms of inputs. The inputs of heat, electricity, water, factory and nitrogen are mostly taken as average of industry data. Industry data values are a 5-year average of data (2011 - 2015) published by the Gendorf factory (Gendorf, 2016, Umwelterklärung, www.gendorf.de), (Gendorf, 2015, Umwelterklärung, www.gendorf.de), (Gendorf, 2014, Umwelterklärung, www.gendorf.de). The Gendorf factory is based in Germany, it produces a wide range of chemical substances. The factory produced 1657400 tonnes of chemical substances in the year 2015 (Gendorf, 2016, Umwelterklärung, www.gendorf.de) and 740000 tonnes of intermediate products. The time period is therefore set based on the years from Gendorf reference.

## Reference product
- methylene diphenyl diisocyanate: 1 kg; name RP; CPC 347: Plastics in primary forms; By-product classification allocatable product; CAS 101-68-8
  MDI is an aromatic diisocyanate. MDI is used in the production of polyurethane in combination with polyols (Boustead 2005). In 2012 the largest producer of MDI globally was Bayer, producing 1.24 million tonnes per year, followed by Wanhua Group, producing 1.1 million tonnes per year (Gal, 2012).
  Reference(s):
  Gendorf. 2016. Umwelterklärung 2015, Werk Gendorf Industriepark, www.gendorf.de
  Boustead. 2005. Eco-profiles of the European Plastics Industry Diphenylmethane diisocyanate (MDI). Retrieved from: http://www.polyurethanes.org/uploads/documents/eco_midi.pdf, accessed 26 January 2017
  Gal, J. 2012. Wanhua to the rescue of BorsodChem. ICIS Chemical Business. Retrieved from: http://www.icis.com/resources/news/2012/02/20/9533156/wanhua-to-the-rescue-of-borsodchem/, accessed 26 Janury 2017
  production volume 4.35e8 kg; name RP_PV; = 2500000000*17.4%
    Literature value. Worldwide capacity production of methylene diphenyldiisocyanate (MDI) in year 1999/2000 is estiamted to be 2500000 tons. Reference(s): Six, C. and Richter, F. 2003. Isocyanates, Organic. Ullmann's Encyclopedia of Industrial Chemistry. The value was double checked with Gal, J. 2012 article, title: Wanhua to the rescue of BorsodChem, 20 February 2012, Retrieved from: https://www.icis.com/resources/news/2012/02/20/9533156/wanhua-to-the-rescue-of-borsodchem/, accessed 26 January 2017. According to Gal (2012) In 2012 the largest producer of MDI globally was Bayer, producing 1.24 million tonnes per year, followed by Wanhua Group, producing 1.1 million tonnes per year.
    According to Gal's (2012) article, the Wanhua group aquired shares in BorsodChem, a European company. Doing so, Wanhua established produciton of MDI and TDI in Europe for the European market. Based on this information it is assumed that considerabel amount of the Eruopean market if covered by production in Europe. The European production volume is extrapolated from the global production volume based on information from Cefic (European Chemical Industry Council) and the American Chemistry Council.
    According to Cefic (2016), the global sales of chemicals in the year 2015 was 3 534 billion euros. The reported share of sales per region are: EU28 14.7%; Other Europe (Switzerland, Norway, Turkey, Russia and Ukraine) 2.7%; NAFTA (US, Canada and Mexico) 16.5%; Latin America 3.8%; China 39.9%; Japan 3.9%; Republic of Korea 3.2%; India 2.2%; Rest of Asia 11.9%; Rest of the World 1.3%, Switzerland 1%. Cefic also reports the US total sales, which amount to 518.7 billion euros out of the global 3 534 billion euros (14.7%). The same share is reported by the American Chemistry Council (2016), according to which the USA sales account for 15% of global sales for the year 2016.
    The production volume of RER is therefore estimated to be 17.4% of the global production volume.
    Reference(s):
    Six, C. and Richter, F. 2003. Isocyanates, Organic. Ullmann's Encyclopedia of Industrial Chemistry
    Gal, J. 2012. Wanhua to the rescue of BorsodChem. ICIS Chemical Business. Retrieved from: http://www.icis.com/resources/news/2012/02/20/9533156/wanhua-to-the-rescue-of-borsodchem/, accessed 26 Janury 2017
    Cefic 2016. Facts and figures 2016 of the European chemical industry. Accessible at: http://www.cefic.org/Facts-and-Figures/Chemicals-Industry-Profile/
    American Chemistry Council 2016. Outlook: U.S. Chemical Industry Continues to Outpace Industrial Output; Accounts for More Than One-Half of Construction Spending by Manufacturing Sector. Accessible at: https://www.americanchemistry.com/Media/PressReleasesTranscripts/ACC-news-releases/US-Chemical-Industry-Continues-to-Outpace-Industrial-Output.html""
  property heating value, net 26.66 MJ
    LHV is calculated based on the elemental composition of the substance. Based on the name of the substance, the chemical formula of the substance is assumed to be: C15H10N2O2
  property price 1.75406 EUR2005; name RP_price_EUR2005
    Calculated based on inputs: The price of the product has been calculated as a sum of the values of the material and energy inputs for this product. This value is therefore a rough estimation. It may underestimate the real price since there are additional expenses when producing any product. These expences can include for example labour costs, treatment of waste materials and profit for the producer. Please consider carefully whether this level of data quality is acceptable for your application.
  property carbon content 0.719921
    carbon content on a dry matter basis (reserved; not for manual entry)
  properties: water content 0, wet mass 1 kg, carbon content, non-fossil 0, dry mass 1 kg, carbon content, fossil 0.719921, water in wet mass 0 kg, carbon allocation 0.719921 kg

## Inputs from technosphere
- heat, from steam, in chemical industry: 3.42 MJ; lognormal variance with pedigree 0.010025, pedigree (2,3,2,2,3)
  Literature value. The flows for electricity and heat are taken from Boustead (2005). For more information on the process and the assumptions made, please see Boustead (2005) report. The report is part of a series of Eco-profiles commissioned by Plastics Europe.
  Reference(s):
  Boustead. 2005. Eco-profiles of the European Plastics Industry Diphenylmethane diisocyanate (MDI). Retrieved from: http://www.polyurethanes.org/uploads/documents/eco_midi.pdf, accessed 26 January 2017
  properties: heating value, net 1 MJ
- chemical factory, organics: 4e-10 unit; lognormal variance with pedigree 0.31, pedigree (2,3,2,4,3)
  Calculated based on literature data published by the industry. For this activity, no information was readily available concerning infrastructure and land-use. Therefore, the infrastructure is estimated based on data from two chemical factories, the BASF site of Ludwigshafen and the chemical factory in Gendorf (which are both located in Germany), which produce a wide range of chemical substances. Based on this data, the following assumptions are made: the built area amounts to about 4.2 ha, the plant has an average output of 50'000 t/a and a lifespan of fifty years. The estimated infrastructure amount is therefore 4.00 E-10 units per kg of produced chemical.
  References:
  Althaus H.-J., Chudacoff M., Hischier R., Jungbluth N., Osses M. and Primas A. (2007) Life Cycle Inventories of Chemicals. ecoinvent report No. 8, v2.0. EMPA Dübendorf, Swiss Centre for Life Cycle Inventories, Dübendorf, CH.
  Gendorf (2000) Umwelterklärung 2000, Werk Gendorf. Werk Gendorf, Burgkirchen.;activityLink introduced to establish a direct link to the corresponding regional supply of this product
- phosgene, liquid: 0.832121 kg; lognormal variance with pedigree 0.010025, pedigree (2,3,2,2,3)
  Calculated value based on stoichiometric calculations and literature data.
  98.9158g/mol is the molar mass of phosgene, liquid (CCl2O).
  250.25668g/mol is the molar mass of methylene diphenyldiisocyanate (C15H10N2O2).
  MDI production starts from aromatic hydrocarbons, which are used to produce diamines which then undergo phosgenation to produce the final product.
  The flows for electricity and heat are taken from Boustead (2005). For more information on the process and the assumptions made, please see Boustead (2005) report. The report is part of a series of Eco-profiles commissioned by Plastics Europe.
  Chemical Reaction: 2 C6H7N + CH2O + 2 CCl2O + 4 HNaO → C15H10N2O2
  A process efficiency of 95% is assumed.
  properties: carbon content, fossil 0.122449, dry mass 1 kg, wet mass 1 kg, heating value, net 3.68 MJ
- tap water: 0.026 kg; lognormal variance with pedigree 0.0106, pedigree (2,3,2,4,3)
  Calculated based on literature data published by the industry. This value is a 5-year average of data (2011 - 2015) published by the Gendorf factory (Gendorf, 2016, Umwelterklärung, www.gendorf.de), (Gendorf, 2015, Umwelterklärung, www.gendorf.de), (Gendorf, 2014, Umwelterklärung, www.gendorf.de). The amount of tap water per kg of chemical substance produced is calculated using literature data published by the Gendorf factory based in Germany, which produces a wide range of chemical substances. The factory produced 1657400 tonnes of chemical substances in the year 2015 (Gendorf, 2016, Umwelterklärung, www.gendorf.de) and 740000 tonnes of intermediate products. The amount of tap water consumed in the year 2015 was 55100 tonnes (Gendorf, 2016, Umwelterklärung, www.gendorf.de). The resulting amount of tap water is 0.023 kg/kg of chemical product produced. The 5-year average (2011 - 2015, weighted by production volume) is 0.026 kg/kg.
  properties: dry mass 0.000337476 kg, wet mass 1 kg, carbon content, fossil 0.00178991, water content 2962.17
  note on carbon content, fossil: Bicarbonate content is 2.93 mol/m3. CO2 content is 0.1 mol/m3 (ecoinvent v2.2 report 8, Tab 93.1).
- nitrogen, liquid: 0.019 kg; lognormal variance with pedigree 0.0106, pedigree (2,3,2,4,3)
  Calculated based on literature data published by the industry. This value is a 5-year average of data (2011 - 2015) published by the Gendorf factory (Gendorf, 2016, Umwelterklärung, www.gendorf.de), (Gendorf, 2015, Umwelterklärung, www.gendorf.de), (Gendorf, 2014, Umwelterklärung, www.gendorf.de). The amount of nitrogen used per kg of chemical substance produced is calculated using literature data published by the Gendorf factory based in Germany, which produces a wide range of chemical substances. The factory produced 1657400 tonnes of chemical substances in the year 2015 (Gendorf, 2016, Umwelterklärung, www.gendorf.de) and 740000 tonnes of intermediate products. The reported amount of nitrogen used in 2015 was 33512400 Nm3 (Gendorf, 2016, Umwelterklärung, www.gendorf.de). One Nm3 of nitrogen is equal to 1.2506 kg. The resulting amount of nitrogen - the 5-year average (2011 - 2015, weighted by production volume) is 0.019 kg/kg. Nitrogen is mainly used during the production of chemicals for 'blanketing', which is the process of applying gas to the vapour space of a container or vessel in order to control its composition.
  properties: wet mass 1 kg, dry mass 1 kg
- formaldehyde: 0.126297 kg; lognormal variance with pedigree 0.010025, pedigree (2,3,2,2,3)
  Calculated value based on stoichiometric calculations and literature data.
  30.02628g/mol is the molar mass of formaldehyde (CH2O).
  250.25668g/mol is the molar mass of methylene diphenyldiisocyanate (C15H10N2O2).
  MDI production starts from aromatic hydrocarbons, which are used to produce diamines which then undergo phosgenation to produce the final product.
  The flows for electricity and heat are taken from Boustead (2005). For more information on the process and the assumptions made, please see Boustead (2005) report. The report is part of a series of Eco-profiles commissioned by Plastics Europe.
  Chemical Reaction: 2 C6H7N + CH2O + 2 CCl2O + 4 HNaO → C15H10N2O2
  A process efficiency of 95% is assumed.
  properties: carbon content, fossil 0.4, dry mass 1 kg, wet mass 1 kg, heating value, net 20.19 MJ
- electricity, medium voltage: 0.2 kWh; lognormal variance with pedigree 0.010025, pedigree (2,3,2,2,3)
  (same comment as for heat, from steam, in chemical industry)
- aniline: 0.783434 kg; lognormal variance with pedigree 0.010025, pedigree (2,3,2,2,3)
  Calculated value based on stoichiometric calculations and literature data.
  93.12832g/mol is the molar mass of aniline (C6H7N).
  250.25668g/mol is the molar mass of methylene diphenyldiisocyanate (C15H10N2O2).
  MDI production starts from aromatic hydrocarbons, which are used to produce diamines which then undergo phosgenation to produce the final product.
  The flows for electricity and heat are taken from Boustead (2005). For more information on the process and the assumptions made, please see Boustead (2005) report. The report is part of a series of Eco-profiles commissioned by Plastics Europe.
  Chemical Reaction: 2 C6H7N + CH2O + 2 CCl2O + 4 HNaO → C15H10N2O2
  A process efficiency of 95% is assumed.
  properties: wet mass 1 kg, heating value, net 32.56 MJ, dry mass 1 kg, carbon content, fossil 0.774194
- wastewater, average: 0 m3; name BP_wastewater_average; pedigree (1,1,1,1,1)
  Calculated based on literature data published by the industry. This value is a 5-year average of data (2011 - 2015) published by the Gendorf factory (Gendorf, 2016, Umwelterklärung, www.gendorf.de), (Gendorf, 2015, Umwelterklärung, www.gendorf.de), (Gendorf, 2014, Umwelterklärung, www.gendorf.de). The amount of wastewater (which is later on treated in the municipal WWTP) per kg of chemical substance produced is calculated using literature data published by the Gendorf factory based in Germany, which produces a wide range of chemical substances. The factory produced 1657400 tonnes of chemical substances in the year 2015 (Gendorf, 2016, Umwelterklärung, www.gendorf.de) and 740000 tonnes of intermediate products. The amount of wastewater which is later on treated in the municipal WWTP in the year 2015 was 1200 tonnes (Gendorf, 2016, Umwelterklärung, www.gendorf.de). The resulting amount of wastewater is 2.7E-06 m3/kg of chemical product produced.
  production volume 0 m3
    Calculated from the production volume of the reference product in proportion to the respective output amounts.
  property price 0 EUR2005; name BP_wastewater_average_price_EUR2005
  properties: wet mass 1000 kg, water content 2882.2, carbon content, non-fossil 0.194039, dry mass 0.346837 kg
  note on carbon content, non-fossil: 0.0673 kg TOC/m3 (Tab A.17, ecoinvent v2.2 report 13_I). TOC was considered as Total Carbon.
- sodium hydroxide, without water, in 50% solution state: 0.672945 kg; lognormal variance with pedigree 0.010025, pedigree (2,3,2,2,3)
  Calculated value based on stoichiometric calculations and literature data.
  39.997108g/mol is the molar mass of sodium hydroxide, without water, in 50% solution state (HNaO).
  250.25668g/mol is the molar mass of methylene diphenyldiisocyanate (C15H10N2O2).
  MDI production starts from aromatic hydrocarbons, which are used to produce diamines which then undergo phosgenation to produce the final product.
  The flows for electricity and heat are taken from Boustead (2005). For more information on the process and the assumptions made, please see Boustead (2005) report. The report is part of a series of Eco-profiles commissioned by Plastics Europe.
  Chemical Reaction: 2 C6H7N + CH2O + 2 CCl2O + 4 HNaO → C15H10N2O2
  A process efficiency of 95% is assumed.
  properties: heating value, net 3.03 MJ, wet mass 1 kg, dry mass 1 kg
- wastewater, average: -2.43642e-6, -2.63575e-7 m3 (2 entries); lognormal variance with pedigree 0.0106, pedigree (2,3,2,4,3)
  (same comment as for wastewater, average)
  production volume 1174.5 m3

## Inputs from nature
- Water, cooling, unspecified natural origin [natural resource, in water]: 0.0164 m3; lognormal variance with pedigree 0.0106, pedigree (2,3,2,4,3)
  Calculated based on literature data published by the industry. This value is a 5-year average of data (2011 - 2015) published by the Gendorf factory (Gendorf, 2016, Umwelterklärung, www.gendorf.de), (Gendorf, 2015, Umwelterklärung, www.gendorf.de), (Gendorf, 2014, Umwelterklärung, www.gendorf.de). The amount of water for cooling extracted per kg of chemical substance produced is calculated using literature data published by the Gendorf factory based in Germany, which produces a wide range of chemical substances. The factory produced 1657400 tonnes of chemical substances in the year 2015 (Gendorf, 2016, Umwelterklärung, www.gendorf.de) and 740000 tonnes of intermediate products. The reported amounts of water extracted as groundwater and surface water (river) are assumed to be used entirely for cooling purposes.
- Water, well, in ground [natural resource, in water]: 0.00083 m3; lognormal variance with pedigree 0.0106, pedigree (2,3,2,4,3)
  Calculated based on literature data published by the industry. This value is a 5-year average of data (2011 - 2015) published by the Gendorf factory (Gendorf, 2016, Umwelterklärung, www.gendorf.de), (Gendorf, 2015, Umwelterklärung, www.gendorf.de), (Gendorf, 2014, Umwelterklärung, www.gendorf.de). The amount of groundwater and surface water (river) extracted per kg of chemical substance produced is calculated using literature data published by the Gendorf factory based in Germany, which produces a wide range of chemical substances. The factory produced 1657400 tonnes of chemical substances in the year 2015 (Gendorf, 2016, Umwelterklärung, www.gendorf.de) and 740000 tonnes of intermediate products. The amount of groundwater and surface water (river) extracted in the year 2015 was 19950000 tonnes and 21488100 tonnes respectively (Gendorf, 2016, Umwelterklärung, www.gendorf.de).
- Water, river [natural resource, in water]: 0.00086 m3; lognormal variance with pedigree 0.0106, pedigree (2,3,2,4,3)
  (same comment as for Water, well, in ground)

## Emissions to nature
- Water [water, unspecified]: 0.0167 m3; lognormal variance with pedigree 0.0106, pedigree (2,3,2,4,3)
  Calculated based on literature data published by the industry (Gendorf, 2016, Umwelterklärung, www.gendorf.de). The amount of water released back to the environment consists of the amount of process water treated in the internal WWTP and then released back to the environment and the amount of cooling water released back to the environment.
- Aniline [water, unspecified]: 0.00195859 kg; lognormal variance with pedigree 0.0106, pedigree (2,3,2,4,3)
  Calculated value. The values is based on a generic model. The basic principles of the model have been published in literature (Hischier 2005, Establishing Life Cycle Inventories of Chemicals Based on Differing Data Availability). The model has been updated and extended with newly available data from the chemical industry. Find more information in the dedicated report on the ecoinvent website.
  Reference(s):
  Hischier, R. (2005) Establishing Life Cycle Inventories of Chemicals Based on Differing Data Availability (9 pp). The International Journal of Life Cycle Assessment, Volume 10, Issue 1, pp 59–67. 10.1065/lca2004.10.181.7
- Nitrate [water, unspecified]: 0.0247765 kg; lognormal variance with pedigree 0.0106, pedigree (2,3,2,4,3)
  (same comment as for Aniline)
- Water [air, unspecified]: 0.0014 m3; lognormal variance with pedigree 0.0106, pedigree (2,3,2,4,3)
  Calculated to ensure the water balance. In general, in the case of recirculating cooling systems, 77% of the water input evaporates to air. In case of once-through cooling systems, 4% of the water input evaporates to air. The process water has in the chemical industry an average evaporation rate of 20.5%. In the specific case of the Gendorf factory, the calculated evaporation rate based on the data published is 6.3%. This matches the qualitative information, that the majority of the cooling systems in Gendorf are once-through and that the amount of cooling water used is significantly higher than the amount of process water used (Gendorf, 2016, Umwelterklärung, www.gendorf.de).
- COD, Chemical Oxygen Demand [water, unspecified]: 0.00500707 kg; lognormal variance with pedigree 0.218, pedigree (4,5,5,5,5)
  Calculated value. The BOD, COD, TOC and BOD5 are calculated based on the amount and type of emissions released to water in the same activity.
- Sodium, ion [water, unspecified]: 0.386799 kg; lognormal variance with pedigree 0.0106, pedigree (2,3,2,4,3)
  (same comment as for Aniline)
- Formaldehyde [air, unspecified]: 0.00631484 kg; lognormal variance with pedigree 0.0106, pedigree (2,3,2,4,3)
  (same comment as for Aniline)
- Nitrogen [air, unspecified]: 0.019 kg; lognormal variance with pedigree 0.0106, pedigree (2,3,2,4,3)
  Calculated value. The amount of nitrogen released to air is equal to the amount of nitrogen entering the activity.
- Carbon dioxide, fossil [air, unspecified]: 0.105515 kg; lognormal variance with pedigree 0.0106, pedigree (2,3,2,4,3)
  (same comment as for Aniline)
- Phosgene [air, unspecified]: 0.00041606 kg; lognormal variance with pedigree 0.0106, pedigree (2,3,2,4,3)
  (same comment as for Aniline)
- Chloride [water, unspecified]: 0.538328 kg; lognormal variance with pedigree 0.0106, pedigree (2,3,2,4,3)
  (same comment as for Aniline)
- Chloride, ion [water, unspecified]: 0.0283331 kg; lognormal variance with pedigree 0.0106, pedigree (2,3,2,4,3)
  (same comment as for Aniline)
- TOC, Total Organic Carbon [water, unspecified]: 0.00151423 kg; lognormal variance with pedigree 0.218, pedigree (4,5,5,5,5)
  (same comment as for COD, Chemical Oxygen Demand)
- DOC, Dissolved Organic Carbon [water, unspecified]: 0.00151423 kg; lognormal variance with pedigree 0.218, pedigree (4,5,5,5,5)
  (same comment as for COD, Chemical Oxygen Demand)
- BOD5, Biological Oxygen Demand [water, unspecified]: 0.00500707 kg; lognormal variance with pedigree 0.218, pedigree (4,5,5,5,5)
  (same comment as for COD, Chemical Oxygen Demand)

## Sampling procedure
Literature data and stochiometric calculation.

## Extrapolations
This dataset has been extrapolated from year 2020 to the year of the calculation (2021). The uncertainty has been adjusted accordingly.
