# cross-laminated timber production

Dataset: EcoSpold 2, unit process
Geography: RER
Time period: 2012-01-01 to 2021-12-31
Technology level: current
Classification: ISIC rev.4 ecoinvent: 1621:Manufacture of veneer sheets and wood-based panels
Synonyms: Brettsperrholz
Tags: Swiss brush-up completed
Scenario: Business-as-Usual
System model: Allocation, cut-off by classification
Generated by: Frank Werner
Database: ecoinvent
isCopyrightProtected: true
accessRestrictedTo: 1

## General comment
This datasets represents the European production of Cross-laminated timber (CLT). Data are based on a sample of German Cross-laminated timber (CLT) produciton.
Cross-laminated timber (CLT) is a wood panel product made from gluing layers of solid-sawn timber together. Each layer of boards is oriented perpendicular to adjacent layers and glued on the wide faces of each board, usually in a symmetric way so that the outer layers have the same orientation. An odd number of layers is most common, but there are configurations with even numbers as well (which are then arranged to give a symmetric configuration).
Regular timber is an anisotropic material, meaning that the physical properties change depending on the direction at which the force is applied. By gluing layers of wood at perpendicular angles, the panel is able to achieve better structural rigidity in both directions. It is similar to plywood but with distinctively thicker laminations.
CLT is distinct to glued laminated timber, a product with all laminations orientated in the same way.
Reference(s):
Rüter, S. and S. Diederichs (2012): Ökobilanz-Basisdaten für Bauprodukte aus Holz. Arbeitsbericht aus dem Institut für Holztechnologie und Holzbiologie Nr. 2012/1, Johann Heinrich von Thünen-Institut (vTI), Hamburg.
[This dataset is meant to replace the following datasets:]

## Included activities start
From the reception at the factory gate of all materials and fuels used.

## Included activities end
This activity ends with the standard forms of glued laminated timber produced at the factory gate. The dataset includes the inputs to and outputs of the production processes and the available process emissions. Infrastructure is a rough estimate.

## Geography
Data for Germany used for central Europe

## Technology
Technology reflects a sample of German cross-laminated timber production.

## Parameters
- wood_fuel: 844.9; lognormal variance with pedigree 0.0256, pedigree (1,3,1,1,1)
  input of wood fuel used in production; value calculated from Rüter et al. 2012

## Reference product
- wood chips, dry, measured as dry mass: 1 kg; name m_wood_chips; By-product classification allocatable product; CPC 31230: Wood in chips or particles; pedigree (1,1,1,1,1)
  Literature value; sample from Germany
  production volume 4.2894e8 kg; = m_wood_chips*CLT_pv
    Calculated from production volume of reference product using the relative outputs.
  property heating value, net 9.99 MJ
    LHV is calculated based on the Carbon content of the product. More details can be found on the respective documentation.
  property price 0.107 EUR2005; name m_wood_chips_price_EUR2005
    Expert judgement (Urs Luginbühl, Swiss Sawmilling industry, personal communication in June 2014). Wood chips from softwood should have a price of 0.101 EUR/kg. Woodchips from hardwood should have a price of 0.112 EUR/kg. Average of these two values is used. Cross-reference; FAOSTAT database; http://faostat.fao.org/site/626/DesktopDefault.aspx?PageID=626#ancor; Average import/export prices of EU for 'chips and particles'. Price: 48.76 Euro/m3. The density of the wood chips is 650 kg/m3. The price is recalculated accordingly.
  property carbon content 0.494
    carbon content on a dry matter basis (reserved; not for manual entry)
  property true value 25.4981; name m_wood_chips_true_value
    allocation property applied in "true value" allocation // value calculated from revenue
  properties: water in wet mass 0.4 kg, wet mass 1.4 kg, carbon content, non-fossil 0.494, carbon content, fossil 0, dry mass 1 kg, water content 0.4, carbon allocation 0.494 kg
- cross-laminated timber: 0 m3; By-product classification allocatable product
  Reference product. Plywood produced in Germany by processes representative for European average. The reference product is ready for delivery at the wooden board factory.
  A large number of materials can be produced with differing properties and areas of use. Typical uses are as construction plywood for wall, floor, and ceiling panels and also as panels for concrete shuttering, and decorative covering veneers in interior furnishings (e.g. wall panels or doors).
  production volume 1.8e6 m3; name CLT_pv
    CLT production is geographically very much focused on Alpine Europe, where the technology was originally developed. For example, Austria, Germany, and Switzerland together had almost 80% of global production capacity in 2015, whereby Austria alone holds 60% of global capacity (Muszynski et al., 2017). Other producing regions include France, the UK, Finland, Latvia, Japan, and the US.
    The global annual production of CLT was estimated between 600,000 m3 in 2013 and one million m3 in 2015 (Muszynski et al., 2017). A future projection estimates that global production would reach three million m3 by 2025. The global production volume for 2020 is thus estimated to be roughly two million m3 in 2020.
    Assuming that 90% of global production is located in Europe, an annual European production volume in 2020 is estimated at roughly 1.8 million m3.
    Reference(s):
    Muszynski, Lech & Hansen, Eric & Fernando, Shanuka & Schwarzman, G. & Rainer, Jasmin. (2017). Insights into the Global Cross-Laminated Timber Industry.. BioProducts Business. 22. 77-92. https://www.researchgate.net/publication/321849166_Insights_into_the_Global_Cross-Laminated_Timber_Industry
  property heating value, net 5502.97 MJ
    LHV is calculated based on the Carbon content of the product. More details can be found on the respective documentation.The property is based on a value of 12.42MJ/kg
  property carbon content 0.458565
    carbon content on a dry matter basis (reserved; not for manual entry)
  property true value 298
    allocation property applied in "true value" allocation // value calculated from revenue
  properties: price 298 EUR2005, water in wet mass 39.9 kg, wet mass 443 kg, dry mass 403.1 kg, carbon content, fossil 0.015336, water content 0.0989829, carbon content, non-fossil 0.443229, carbon allocation 184.848 kg

## Inputs from technosphere
- municipal solid waste: -0.00014388 kg; name w_MSW; lognormal variance with pedigree 0.1298, pedigree (2,3,4,1,5)
  Literature value; sample from Germany
  Uncertainty: a
  production volume 783000 kg; = w_MSW*CLT_pv
    Calculated from production volume of reference product using the relative outputs.
  properties: dry mass 0.771 kg, heating value, net 11.74 MJ, carbon content, non-fossil 0.261655, UVEK_relative_amount_1 -1, UVEK_link_1 1004, wet mass 1 kg, water content 0.297017, carbon content, fossil 0.171549
  note on heating value, net: Value taken from the general comment of the treatment dataset.
  note on carbon content, non-fossil: MSW composition in tab 4.1, ecoinvent v2.2 report 13_I. C content referred to 1 kg DM
  note on UVEK_relative_amount_1: to be used only in special submissions in coordination with ecoinvent and the Swiss FOEN
- waste mineral oil: 0 kg; name w_mineral_oil; pedigree (1,1,1,1,1)
  hydraulic oil and engine oil/grease; adjusted for water content of waste oil
  production volume 0 kg
    Calculated from production volume of reference product using the relative outputs.
  property price 0 EUR2005; name w_mineral_oil_price_EUR2005
  properties: UVEK_relative_amount_1 -1, carbon content, fossil 0.864444, water content 0.111111, dry mass 0.9 kg, wet mass 1 kg, heating value, net 34.7 MJ, UVEK_link_1 1113
  note on carbon content, fossil: Tab A.6, ecoinvent v2.2 report 13_I. C content has been calculated after data in the tables, and then referred to 1 kg DM
- furnace, wood chips, with silo, 300kW: 4.84163e-9 unit; = 2.31E-08*wood_fuel/1.33333; lognormal variance with pedigree 0.0086, pedigree (1,1,4,1,1)
  Infrastructure factor from DS "Heat, district or industrial, other than natural gas {CH}| heat production, wood chips from industry, at furnace 5000kW | Cut-off, U", multiplied by the input of wood fuel (direct wood fuel plus production residues); correction for assumed efficiency as original value refers to heat output
- melamine urea formaldehyde adhesive: 0.00131741 kg; lognormal variance with pedigree 0.0427, pedigree (1,4,5,3,1)
  Literature value; sample from Germany
  properties: UVEK_relative_amount_1 1, wet mass 1 kg, dry mass 1 kg, UVEK_link_1 2931, carbon content, fossil 0.311708, heating value, net 14.65 MJ
- wood ash mixture, pure: 0 kg; name w_wood_ash; pedigree (1,1,1,1,1)
  Amount derived from DS "Heat, district or industrial, other than natural gas {CH}| heat production, wood chips from industry, at furnace 300kW | Cut-off, U" on heat generation from industrial residual wood per MJ, multiplied by the input of wood fuel (direct wood fuel plus production residues ) scaled to reflect wood input per generated heat
  production volume 0 kg
    Calculated from production volume of reference product using the relative outputs.
  property price 0 EUR2005; name w_wood_ash_price_EUR2005
  properties: wet mass 1 kg, UVEK_relative_amount_3 -1, UVEK_link_1 1128, UVEK_link_2 1127, carbon content, non-fossil 0.012, dry mass 1 kg, UVEK_link_3 1129
- sawnwood, board, softwood, raw, dried (u=10%): 0 m3; pedigree (1,1,1,1,1)
  Literature value; sample from Germany
  property water in wet mass 0.494 kg; name WWM
  property water content 0.00118132; name water_content
  property wet mass 418.67 kg; name WM
  property dry mass 418.176 kg; name basic_wood_d
  properties: carbon content, non-fossil 0.494, heating value, net 5700.67 MJ
  note on heating value, net: Assumed equal to "sawnwood, softwood, dried (u=10%), planed".The property is based on a value of 13.38MJ/kg
- diesel, burned in building machine: 0.0256091 MJ; lognormal variance with pedigree 0.0427, pedigree (1,4,5,3,1)
  Literature value; sample from Germany
  properties: UVEK_link_9 4433, UVEK_link_8 4417, UVEK_link_1 732, UVEK_relative_amount_8 0.0095856, UVEK_relative_amount_9 0.0575136, UVEK_relative_amount_1 1, heating value, net 1 MJ
  note on UVEK_link_9: This link has been introduced to model transport specifically for the SAM model; to be used only in special submissions in coordination with ecoinvent and the Swiss FOEN.
  note on UVEK_relative_amount_8: Scaling factor = amount of transport related to adhesives/amount of this input from technosphere. Source for transport distance: Overview and Methodology/2007/Frischknecht et al., i.e. 600 km train, 100 km lorry. To be used only in special submissions in coordination with ecoinvent and the Swiss FOEN
- lubricating oil: 0.000118412 kg; name m_lubricating_oil; lognormal variance with pedigree 0.0186, pedigree (4,4,4,1,1)
  Literature value; sample from Germany
  property dry mass 1 kg; name DM_oil
  properties: UVEK_link_1 2866, heating value, net 40.2 MJ, wet mass 1 kg, carbon content, fossil 0.75, UVEK_relative_amount_1 1
  note on heating value, net: Literature value, Source: IPCC 2006, 2006 IPCC Guidelines for National Greenhouse Gas Inventories, Prepared by the National Greenhouse Gas Inventories Programme, Eggleston H.S., Buendia L., Miwa K., Ngara T. and Tanabe K. (eds). Published: IGES, Japan
  note on carbon content, fossil: Lubricating oil is produced from diesel. C-content/dry mass of fats and oils considered 75%, from: ecoinvent v2.2 report, n 15a, pg 40
- wooden board factory, organic bonded boards: 1.10143e-11 unit; lognormal variance with pedigree 0.3961, pedigree (4,5,5,3,4)
  Default value from ecoinvent 2.2
  properties: UVEK_relative_amount_1 1, UVEK_link_1 4946
- wastewater from particleboard production: -3.78643e-5 m3; name wastewater; lognormal variance with pedigree 0.0427, pedigree (1,4,5,3,1)
  Literature value; sample from Germany
  production volume 206059 m3; = wastewater*CLT_pv
    Calculated from production volume of reference product using the relative outputs.
  property price 0 EUR2005; name wastewater_price_EUR2005
  properties: water content 2962.17, wet mass 1000 kg, carbon content, non-fossil 0.377131, dry mass 0.337476 kg
- electricity, medium voltage: 0.0336634 kWh; lognormal variance with pedigree 0.0427, pedigree (1,4,5,3,1)
  Literature value; sample from Germany
  properties: UVEK_relative_amount_1 1, UVEK_link_1 1779
- tap water: 0.0294343 kg; name m_tapwater; lognormal variance with pedigree 0.0099, pedigree (2,3,4,3,1)
  Literature value; sample from Germany
  properties: wet mass 1 kg, water content 2962.17, UVEK_relative_amount_1 1, dry mass 0.000337476 kg, carbon content, fossil 0.00178991, UVEK_link_1 4285
  note on carbon content, fossil: Bicarbonate content is 2.93 mol/m3. CO2 content is 0.1 mol/m3 (ecoinvent v2.2 report 8, Tab 93.1).
- polyurethane adhesive: 0.00118114 kg; lognormal variance with pedigree 0.0092, pedigree (1,3,4,1,1)
  part of glueing system (inventoried as averaged production average in Europe)
  properties: dry mass 1 kg, UVEK_link_1 2983, UVEK_relative_amount_1 1, wet mass 1 kg, carbon content, fossil 0.72, heating value, net 30.67 MJ
- ammonium sulfate: 5.58903e-6 kg; lognormal variance with pedigree 0.0092, pedigree (1,3,4,1,1)
  hardener for MUF adhesive
  properties: dry mass 1 kg, wet mass 1 kg
- synthetic rubber: 2.01763e-5 kg; name m_rubber; lognormal variance with pedigree 0.2106, pedigree (5,5,5,5,5)
  Literature value; sample from Germany
  property carbon content, fossil 0.871949; name C_content_fossil_rubber
  properties: wet mass 1 kg, UVEK_relative_amount_1 1, heating value, net 26.42 MJ, dry mass 1 kg
  note on UVEK_relative_amount_1: to be used only in special submissions in coordination with ecoinvent and the Swiss FOEN.
  note on carbon content, fossil: EPDM (Ethylene-propene-diene terpolymer) rubber is a terpolymer of ethylene, propene, and a diene with the residual unsaturated portion of the diene in the side chain (ecoinvent v2.2 report 7-part XX & Ullmann). Chemical formula (deduced from Evidences of Solvent-Induced Miscibility in Polychloroprene-co-Ethylene-Propene Diene Terpolymer Blends, Dubey et al., Journal of Applied Polymer Science, 2009, 111:1884-1891): C20H35
- waste rubber, unspecified: 0 kg; name w_rubber; pedigree (1,1,1,1,1)
  calculated from rubber input
  production volume 0 kg
    Calculated from production volume of reference product using the relative outputs.
  property price 0 EUR2005; name w_rubber_price_EUR2005
  property dry mass 1 kg; name w_rubber_DM
  properties: UVEK_link_1 1079, UVEK_relative_amount_1 -1, heating value, net 27.19 MJ, carbon content, fossil 0.853, wet mass 1 kg
- sawlog and veneer log, softwood, measured as solid wood under bark: 0 m3; pedigree (1,1,1,1,1)
  Literature value; sample from Germany
  properties: dry wood density 440 kg/m3, apparent wood density 619.52 kg/m3, water content 0.7, wet mass 767.799 kg, heating value, net 4483.78 MJ, dry mass 451.646 kg, basic wood density 397.449, carbon content, non-fossil 0.494
  note on heating value, net: Value based on the dataset "softwood forestry, mixed species, sustainable forest management"The property is based on a value of 11.58MJ/kg
- waste mineral oil: -0.000115551, -2.86059e-6 kg (2 entries); lognormal variance with pedigree 0.0098, pedigree (2,3,4,1,1)
  hydraulic oil and engine oil/grease; adjusted for water content of waste oil
  production volume 644400 kg
- wood ash mixture, pure: -0.000136915, -2.81449e-6 kg (2 entries); lognormal variance with pedigree 0.0092, pedigree (1,3,4,1,1)
  (same comment as for wood ash mixture, pure)
  production volume 760412 kg
- sawnwood, board, softwood, raw, dried (u=10%): 0.000303221, 1.26542e-5 m3 (2 entries); lognormal variance with pedigree 0.0093, pedigree (2,1,4,3,1)
  Literature value; sample from Germany
  properties: carbon content, non-fossil 0.494, water content 0.00118132, wet mass 418.67 kg, heating value, net 5700.67 MJ, dry mass 418.176 kg
- waste rubber, unspecified: -1.93634e-5, -8.12874e-7 kg (2 entries); lognormal variance with pedigree 0.1786, pedigree (4,5,5,5,5)
  calculated from rubber input
  production volume 109800 kg
  properties: UVEK_link_1 1079, UVEK_relative_amount_1 -1, heating value, net 27.19 MJ, carbon content, fossil 0.853, wet mass 1 kg, dry mass 1 kg
- sawlog and veneer log, softwood, measured as solid wood under bark: 0.000199594, 9.77684e-6 m3 (2 entries); lognormal variance with pedigree 0.0093, pedigree (2,1,4,3,1)
  Literature value; sample from Germany

## Inputs from nature
- Carbon dioxide, non-fossil, resource correction [natural resource, in air]: 1.52941 kg; pedigree (1,1,1,1,1)
  This exchange has been added after economic allocation in order to re-balance the non-fossil carbon dioxide resource extraction.
- Water, cooling, unspecified natural origin [natural resource, in water]: 8.43006e-6 m3; name water_cooling_UNO_input; lognormal variance with pedigree 0.0427, pedigree (1,4,5,3,1)
  Literature value; sample from Germany

## Emissions to nature
- Formaldehyde [air, unspecified]: 2.01262e-6 kg; = 1.73333333333334E-07*wood_fuel/1.33333+0.005975; lognormal variance with pedigree 0.1612, pedigree (2,3,5,1,1)
  Emission factor from DS "Heat, district or industrial, other than natural gas {CH}| heat production, wood chips from industry, at furnace 300kW | Cut-off, U" on heat generation from industrial residual wood per MJ, multiplied by the input of wood fuel (direct wood fuel plus production residues ) scaled to reflect wood input per generated heat plus estimated emissions from wood and glue drying processes (according to Rüter & Diederichs 2012).
- Water [air, unspecified]: 5.044e-5 m3; = 0.00006*wood_fuel/1.33333+m_tapwater/1000+water_cooling_UNO_input; lognormal variance with pedigree 0.130025, pedigree (4,4,5,2,4)
  Water emissions from the combustion of the wood (emission per MJ, scaled to wood input and extrapolated from wood input to heat generated) plus tap water input plus input of cooling water
- Benzene, ethyl- [air, unspecified]: 8.38378e-9 kg; = 0.00000004*wood_fuel/1.33333; lognormal variance with pedigree 0.0812, pedigree (2,3,5,1,1)
  Emission factor from DS "Heat, district or industrial, other than natural gas {CH}| heat production, wood chips from industry, at furnace 300kW | Cut-off, U" on heat generation from industrial residual wood per MJ, multiplied by the input of wood fuel (direct wood fuel plus production residues ) scaled to reflect wood input per generated heat.
- Bromine [air, unspecified]: 1.67676e-8 kg; = 0.00000008*wood_fuel/1.33333; lognormal variance with pedigree 0.6912, pedigree (2,3,5,1,1)
  (same comment as for Benzene, ethyl-)
- Toluene [air, unspecified]: 8.38378e-8 kg; = 0.0000004*wood_fuel/1.33333; lognormal variance with pedigree 0.0812, pedigree (2,3,5,1,1)
  (same comment as for Benzene, ethyl-)
- PAH, polycyclic aromatic hydrocarbons [air, unspecified]: 3.102e-9 kg; name pah; = 0.0000000148*wood_fuel/1.33333; lognormal variance with pedigree 0.3412, pedigree (2,3,5,1,1)
  (same comment as for Benzene, ethyl-)
- Fluorine [air, unspecified]: 1.3973e-8 kg; = 6.66666666666667E-08*wood_fuel/1.33333; lognormal variance with pedigree 0.0812, pedigree (2,3,5,1,1)
  (same comment as for Benzene, ethyl-)
- Arsenic [air, unspecified]: 2.79459e-10 kg; = 1.33333333333333E-09*wood_fuel/1.33333; lognormal variance with pedigree 0.6912, pedigree (2,3,5,1,1)
  (same comment as for Benzene, ethyl-)
- Chlorine [air, unspecified]: 5.03027e-8 kg; = 0.00000024*wood_fuel/1.33333; lognormal variance with pedigree 0.6912, pedigree (2,3,5,1,1)
  (same comment as for Benzene, ethyl-)
- Chromium [air, unspecified]: 1.10666e-9 kg; = 5.28000000000001E-09*wood_fuel/1.33333; lognormal variance with pedigree 0.6912, pedigree (2,3,5,1,1)
  (same comment as for Benzene, ethyl-)
- Carbon monoxide, non-fossil [air, unspecified]: 0.00013973 kg; = 0.000666666666666667*wood_fuel/1.33333; lognormal variance with pedigree 0.6912, pedigree (2,3,5,1,1)
  (same comment as for Benzene, ethyl-)
- Particulates, > 2.5 um, and < 10um [air, unspecified]: 2.51513e-5 kg; = 0.00012*wood_fuel/1.33333; lognormal variance with pedigree 0.1612, pedigree (2,3,5,1,1)
  (same comment as for Benzene, ethyl-)
- Chromium VI [air, unspecified]: 1.11784e-11 kg; = 5.33333333333334E-11*wood_fuel/1.33333; lognormal variance with pedigree 0.6912, pedigree (2,3,5,1,1)
  (same comment as for Benzene, ethyl-)
- Benzene, hexachloro- [air, unspecified]: 2.01211e-15 kg; = 9.60000000000001E-15*wood_fuel/1.33333; lognormal variance with pedigree 0.0812, pedigree (2,3,5,1,1)
  (same comment as for Benzene, ethyl-)
- Acetone [air, unspecified]: 5.59314e-5 kg; lognormal variance with pedigree 0.2086, pedigree (2,5,5,1,4)
  Estimation: emissions from PUR adhesives
  Uncertainty: e
- Ammonia [air, unspecified]: 4.83464e-7 kg; = 2.30666666666667E-06*wood_fuel/1.33333; lognormal variance with pedigree 0.0812, pedigree (2,3,5,1,1)
  (same comment as for Benzene, ethyl-)
- Dinitrogen monoxide [air, unspecified]: 6.98648e-7 kg; = 3.33333333333334E-06*wood_fuel/1.33333; lognormal variance with pedigree 0.0812, pedigree (2,3,5,1,1)
  (same comment as for Benzene, ethyl-)
- Sodium [air, unspecified]: 3.63297e-7 kg; = 1.73333333333334E-06*wood_fuel/1.33333; lognormal variance with pedigree 0.6912, pedigree (2,3,5,1,1)
  (same comment as for Benzene, ethyl-)
- Phosphorus [air, unspecified]: 8.38378e-8 kg; = 0.0000004*wood_fuel/1.33333; lognormal variance with pedigree 0.0812, pedigree (2,3,5,1,1)
  (same comment as for Benzene, ethyl-)
- m-Xylene [air, unspecified]: 3.35351e-8 kg; name mxylene; = 0.00000016*wood_fuel/1.33333; lognormal variance with pedigree 0.0812, pedigree (2,3,5,1,1)
  (same comment as for Benzene, ethyl-)
- Calcium [air, unspecified]: 1.63484e-6 kg; = 0.0000078*wood_fuel/1.33333; lognormal variance with pedigree 0.6912, pedigree (2,3,5,1,1)
  (same comment as for Benzene, ethyl-)
- Nickel [air, unspecified]: 1.67676e-9 kg; name nickel; = 0.000000008*wood_fuel/1.33333; lognormal variance with pedigree 0.6912, pedigree (2,3,5,1,1)
  (same comment as for Benzene, ethyl-)
- Zinc [air, unspecified]: 8.38378e-8 kg; = 0.0000004*wood_fuel/1.33333; lognormal variance with pedigree 0.6912, pedigree (2,3,5,1,1)
  (same comment as for Benzene, ethyl-)
- Methane, non-fossil [air, unspecified]: 1.25757e-6 kg; = 0.000006*wood_fuel/1.33333; lognormal variance with pedigree 0.0812, pedigree (2,3,5,1,1)
  (same comment as for Benzene, ethyl-)
- Hydrocarbons, aliphatic, unsaturated [air, unspecified]: 8.66324e-7 kg; = 4.13333333333333E-06*wood_fuel/1.33333; lognormal variance with pedigree 0.0812, pedigree (2,3,5,1,1)
  (same comment as for Benzene, ethyl-)
- Acetaldehyde [air, unspecified]: 1.7047e-8 kg; = 8.13333333333333E-08*wood_fuel/1.33333; lognormal variance with pedigree 0.0812, pedigree (2,3,5,1,1)
  (same comment as for Benzene, ethyl-)
- Lead [air, unspecified]: 6.98648e-9 kg; = 3.33333333333333E-08*wood_fuel/1.33333; lognormal variance with pedigree 0.6912, pedigree (2,3,5,1,1)
  (same comment as for Benzene, ethyl-)
- Carbon dioxide, non-fossil [air, unspecified]: 0.0299021 kg; = 0.142666666666666*wood_fuel/1.33333; lognormal variance with pedigree 0.0418, pedigree (2,3,5,1,1)
  (same comment as for Benzene, ethyl-)
- Cadmium [air, unspecified]: 1.95621e-10 kg; = 9.33333333333334E-10*wood_fuel/1.33333; lognormal variance with pedigree 0.6912, pedigree (2,3,5,1,1)
  (same comment as for Benzene, ethyl-)
- Phenol, pentachloro- [air, unspecified]: 2.26362e-12 kg; = 0.0000000000108*wood_fuel/1.33333; lognormal variance with pedigree 0.0812, pedigree (2,3,5,1,1)
  (same comment as for Benzene, ethyl-)
- Sulfur dioxide [air, unspecified]: 6.98648e-7 kg; = 3.33333333333334E-06*wood_fuel/1.33333; lognormal variance with pedigree 0.0418, pedigree (2,3,5,1,1)
  (same comment as for Benzene, ethyl-)
- Dioxins, measured as 2,3,7,8-tetrachlorodibenzo-p-dioxin [air, unspecified]: 8.66324e-15 kg; = 4.13333333333333E-14*wood_fuel/1.33333; lognormal variance with pedigree 0.3412, pedigree (2,3,5,1,1)
  (same comment as for Benzene, ethyl-)
- Benzo(a)pyrene [air, unspecified]: 1.3973e-10 kg; = 6.66666666666667E-10*wood_fuel/1.33333; lognormal variance with pedigree 0.3412, pedigree (2,3,5,1,1)
  (same comment as for Benzene, ethyl-)
- Copper [air, unspecified]: 6.1481e-9 kg; = 2.93333333333334E-08*wood_fuel/1.33333; lognormal variance with pedigree 0.6912, pedigree (2,3,5,1,1)
  (same comment as for Benzene, ethyl-)
- Particulates, < 2.5 um [air, unspecified]: 2.51513e-5 kg; = 0.00012*wood_fuel/1.33333; lognormal variance with pedigree 0.3412, pedigree (2,3,5,1,1)
  (same comment as for Benzene, ethyl-)
- Benzene [air, unspecified]: 2.54308e-7 kg; = 1.21333333333333E-06*wood_fuel/1.33333; lognormal variance with pedigree 0.0812, pedigree (2,3,5,1,1)
  (same comment as for Benzene, ethyl-)
- Manganese [air, unspecified]: 4.75081e-8 kg; name manganese; = 2.26666666666667E-07*wood_fuel/1.33333; lognormal variance with pedigree 0.6912, pedigree (2,3,5,1,1)
  (same comment as for Benzene, ethyl-)
- Mercury [air, unspecified]: 8.38378e-11 kg; name mercury; = 0.0000000004*wood_fuel/1.33333; lognormal variance with pedigree 0.6912, pedigree (2,3,5,1,1)
  (same comment as for Benzene, ethyl-)
- Magnesium [air, unspecified]: 1.00605e-7 kg; name magnesium; = 0.00000048*wood_fuel/1.33333; lognormal variance with pedigree 0.6912, pedigree (2,3,5,1,1)
  (same comment as for Benzene, ethyl-)
- Nitrogen oxides [air, unspecified]: 5.03027e-5 kg; = 0.00024*wood_fuel/1.33333; lognormal variance with pedigree 0.0812, pedigree (2,3,5,1,1)
  (same comment as for Benzene, ethyl-)
- Potassium [air, unspecified]: 6.53935e-6 kg; = 0.0000312*wood_fuel/1.33333; lognormal variance with pedigree 0.0812, pedigree (2,3,5,1,1)
  (same comment as for Benzene, ethyl-)
- NMVOC, non-methane volatile organic compounds, unspecified origin [air, unspecified]: 1.95621e-6 kg; name nmvoc; = 9.33333333333334E-06*wood_fuel/1.33333; lognormal variance with pedigree 0.0812, pedigree (2,3,5,1,1)
  (same comment as for Benzene, ethyl-)
- Hydrocarbons, aliphatic, alkanes, unspecified [air, unspecified]: 2.54308e-7 kg; = 1.21333333333333E-06*wood_fuel/1.33333; lognormal variance with pedigree 0.0812, pedigree (2,3,5,1,1)
  (same comment as for Benzene, ethyl-)

## Sampling procedure
Literature; emissions profile per MJ wood input from PSI (2014)

## Extrapolations
See Geography and Technology
