# electricity production, oil, aluminium industry

Dataset: EcoSpold 2, unit process
Geography: UN-OCEANIA
Time period: 2015-01-01 to 2021-12-31
Technology level: current
Classification: ISIC rev.4 ecoinvent: 3510:Electric power generation, transmission and distribution
Classification: EcoSpold01Categories: hard coal/power plants
Tags: re-labelling activity; electricity, primary aluminium industry
Scenario: Business-as-Usual
System model: Allocation, cut-off by classification
Generated by: Pascal Lesage
Database: ecoinvent
isCopyrightProtected: true
accessRestrictedTo: 1

## General comment
This is a dataset used to create an aluminium industry specific electricity market for 'aluminium production Area 7' (Oceania). The production volume represents the total amount of electricity from oil used in the region for aluminium production (electrolysis and ingot casting). The dataset also identifies the countries providing the electricity from oil fired power plants.
Electricity markets specific to the aluminium-industry are needed in an LCI database because primary aluminium production is very energy intensive, and hence the location of production plants is often determined by access to large amounts of cheap electricity, which often results in an electricity mix that is different from the general grid mix of the countries where the production plants are located.
It is assumed that the production of electricity in general and in aluminium industry specific power plants is identical. Details on actual electricity generation with each technology can be found in the corresponding datasets.
Calculations are based on statistics by the IAI (http://www.world-aluminium.org/statistics/)
Distribution of the total electricity production with oil in a specific area to the individual countries was calculated based on IEA statistics (IEA. 2010. Electricity information. IEA Statistics. International Energy Agency, Paris. ISBN 978-92-64-08418-6)

## Included activities start
Re-labelling dataset, not representing a real transformation activity. Conceptually, the activity can be said to start with the production of electricity.

## Included activities end
Re-labelling dataset, not representing a real transformation activity. Conceptually, the activity can be said to end with a given amount of high voltage electricity labelled as specifically used for the production of electricity.

## Geography
Aluminium producing Oceania countries (AU, NZ)

## Time period
Production volume updated with 2015 data from IAI

## Reference product
- electricity, high voltage, aluminium industry: 1 kWh; = AU; By-product classification allocatable product; CPC 17100: Electrical energy
  production volume 0 kWh
    The production volume, which is ultimately used to determine the share of oil-based electricity in the downstream market for aluminium industry specific high voltage electricity, is calculated by multiplying the following data:
    (1) public estimates of the electricity mix used to produce aluminium in the 'aluminium production area 7' (Oceania), provided by the International Aluminium Institute (IAI), see http://www.world-aluminium.org/statistics/. These estimates are based on the subset of aluminium producers that provide information to the IAI.
    (2) primary aluminium production volumes of each aluminium producing country in Area 7, also provided by IAI.
    (3) global average electricity requirements, per tonne primary aluminium, for both Söderberg and prebake electrolysis technologies, as well as the Area 7-specific proportion of aluminium produced by each technology.
    (4) electricity compensating line and transformation losses from production to consumption as medium voltage electricity. Losses estimated using country-level ecoinvent v3 data for AU and estimated based on rest of world data for NZ.
    (5) Electricity used for ingot casting.
  property price 0.0977 EUR2005
    Calculated in temporary price data. 94% of the average price (to account for a 6% loss in transformation and transmission) for electricity for industrial consumersin 2005 (excluded taxes). From IEA.

## Inputs from technosphere
- electricity, high voltage: 1 kWh; name AU; lognormal variance with pedigree 0.0026, pedigree (1,1,3,1,1)
  Calculated amount (see general comments).

## Sampling procedure
IAI data used for total electricity used in the production of aluminium that is from oil power plants. Data based on 100% of regional aluminium production.

## Extrapolations
This dataset has been extrapolated from year 2015 to the year of the calculation (2021). The uncertainty has been adjusted accordingly.
