# anode production, silicon coated graphite, NCA, for Li-ion battery

Dataset: EcoSpold 2, unit process
Geography: RoW
Time period: 2016-01-01 to 2021-12-31
Technology level: current
Classification: ISIC rev.4 ecoinvent: 2720:Manufacture of batteries and accumulators
Scenario: Business-as-Usual
System model: Allocation, cut-off by classification
Generated by: Eleonora Crenna
Published in: Dai, Q. 2019
Database: ecoinvent
isCopyrightProtected: true
accessRestrictedTo: 1

## General comment
This dataset represents the production of 1 kg silicon coated graphite-based anode for Li-ion batteries, used in combination with advance cathodes (e.g.nickel-cobalt-aluminium, NCA). Data are based on literature and expert judgement. For infrastructure, the ecoinvent dataset "chemical factory, organics" is accounted. This dataset is a copy of the corresponding regional dataset. Production volume was adjusted.

## Included activities start
The activity starts when synthetic graphite, silicon and other materials enter the process at the factory.

## Included activities end
The activity ends with the production of silicon coated graphite-based anode at factory gate.

## Geography
The dataset is valid for the production of anode in China, where the data collection occured.

## Technology
This dataset incudes the production of an anode for a Li-ion battery with advance cathode material (i.e. nickel-cobalt-aluminium, NCA). Synthetic graphite as active material, silicon as coating material, carbon black as conductive additive, styrene butadiene (SBR) and carboxymethyl cellulose (CMC) as binder are mixed in ration 92:2:1:2:3. Deionized water is used as solvent to prepare the anode slurry. The input materials are mixed to form a slurry, then the mixture is dried with the solvent evaporating away, cut and calendered to form the cathode of a Li-ion battery. The energy required to coat the copper conductor foil with the anode slurry is included in this dataset, because it was not possible to separate it from the energy required for the drying step.

## Time period
The time period is from 2016 (year of the collection of data) and 2020 (year of the dataset)

## Reference product
- anode, silicon coated graphite, for Li-ion battery: 1 kg; name RP; CPC 46950: Carbon electrodes, carbon brushes, lamp carbons, battery carbons and other articles of graphite or other carbo[…]; By-product classification allocatable product
  production volume 2.69939e7 kg; name PV
    The PV is expressed in kg. According to UN Comtrade (https://comtrade.un.org/data/, HS code: 850760) 1317479226 kg Li-ion batteries were traded worldwide in 2019, of which 15% were NCA (Benchmark Mineral Intelligence 2019. The Current Position of Li-ion Raw Material Supply and the Role of Recycling). Silicon coated graphite based anode represents approximately 16% weight of a Li-ion battery with NCA cathode.
  property price 1.15199 EUR2005; name RP_price_EUR2005
    Calculated based on inputs: The price of the product has been calculated as a sum of the values of the material and energy inputs for this product. This value is therefore a rough estimation. It may underestimate the real price since there are additional expenses when producing any product. These expences can include for example labour costs, treatment of waste materials and profit for the producer. Please consider carefully whether this level of data quality is acceptable for your application.
  property carbon content 0.957715
    carbon content on a dry matter basis (reserved; not for manual entry)
  properties: water content 0, carbon content, non-fossil 0.0088164, water in wet mass 0 kg, carbon content, fossil 0.948898, wet mass 1 kg, dry mass 1 kg, carbon allocation 0.957715 kg

## Inputs from technosphere
- heat, district or industrial, natural gas: 0 MJ; pedigree (1,1,1,1,1)
  Calculated value. The energy demand for anode drying & deionised water evaporation is between 10% (Susarla et al., 2018) and 50% (Pettinger & Dong, 2016) less than the energy required for cathode drying & NMP evaporation. An average 30% less energy demand than the energy required for NCA cathode was considered herein. The energy demand for anode drying and NMP evaporation is calculated considering the average value between 56 MJ/kWh cell and 71 MJ/kWh cell taken from Dai et al. 2017 (referred to 43Ah, 3.7V cells), the storage capacity per NCA cell (0.162 kWh/cell according to Dai et al., 2019) and the share of NCA cathode in the cell (37%)
  Reference:
  Pettinger, K. H., & Dong, W. (2016). When does the operation of a battery become environmentally positive?. Journal of The Electrochemical Society, 164(1), A6274.
  Susarla, N., Ahmed, S., & Dees, D. W. (2018). Modeling and analysis of solvent removal during Li-ion battery electrode drying. Journal of Power Sources, 378, 660-670.
  Dai et al. (2017). Update of Life Cycle Analysis of Lithium-Ion Batteries in the GREET Model. ArgonneNational Laboratory.
  Dai et al. (2019). Life cycle analysis of lithium-ion batteries for automotive applications. Batteries, 5(2), 48.
  properties: heating value, net 1 MJ
- carboxymethyl cellulose, powder: 0.03 kg; lognormal variance with pedigree 0.0055, pedigree (3,2,2,5,2)
  Based on expert judgement and literature. Synthetic graphite, carbon black, styrene butadiene, carboxymethyl cellulose and silicon are mixed in ration 92:1:2:3:2.
  properties: carbon content, fossil 0.0979592, dry mass 1 kg, wet mass 1 kg, carbon content, non-fossil 0.293878, heating value, net 20.19 MJ
- chemical factory, organics: 4e-10 unit; lognormal variance with pedigree 0.36, pedigree (5,5,3,5,3)
  Calculated based on literature data published by the industry. For this activity, no information was readily available concerning infrastructure and land-use. Therefore, the infrastructure is estimated based on data from two chemical factories, the BASF site of Ludwigshafen and the chemical factory in Gendorf (which are both located in Germany), which produce a wide range of chemical substances. Based on this data, the following assumptions are made: the built area amounts to about 4.2 ha, the plant has an average output of 50'000 t/a and a lifespan of fifty years. The estimated infrastructure amount is therefore 4.00 E-10 units per kg of produced chemical.
  References:
  Althaus H.-J., Chudacoff M., Hischier R., Jungbluth N., Osses M. and Primas A. (2007) Life Cycle Inventories of Chemicals. ecoinvent report No. 8, v2.0. EMPA Dübendorf, Swiss Centre for Life Cycle Inventories, Dübendorf, CH.
  Gendorf (2000) Umwelterklärung 2000, Werk Gendorf. Werk Gendorf, Burgkirchen.om ecoinvent)
- carbon black: 0.01 kg; lognormal variance with pedigree 0.0055, pedigree (3,2,2,5,2)
  (same comment as for carboxymethyl cellulose, powder)
  properties: heating value, net 25.76 MJ, dry mass 1 kg, carbon content, fossil 0.85, wet mass 1 kg
- electricity, medium voltage: 0 kWh; pedigree (1,1,1,1,1)
  Calculated value based on Pettinger & Dong (2016). Specifically, this value results from summing the energy demand for anode slurry preparation with water-based solvent, slitting and calendaring, in terms of kWh electricity per cell (0.331 kWh/cell). Original value refers to a 40 Ah, 3.7 V generic Li-ion battery, meaning 0.148 kWh energy density per cell. This data set considers the specific energy capacity of NCA cells (0.224 kWh/kg cell, calculated from Dai et al. 2018).
  Reference:
  Pettinger, K. H., & Dong, W. (2016). When does the operation of a battery become environmentally positive?. Journal of The Electrochemical Society, 164(1), A6274.
  Dai, Q., Kelly, J. C., Dunn, J., & Benavides, P. (2018). Update of Bill-of-Materials and Cathode Materials Production for Lithium-Ion Batteries in the GREET Model. 2018. Argonne National Laboratory.
- water, deionised: 0 kg; name water_input; source Philippot, M. 2019; pedigree (1,1,1,1,1)
  Literature. Deionised water is used a solvent for the preparation of the anode slurry.
  properties: wet mass 1 kg
- wastewater, average: 0 m3; name BP_wastewater; pedigree (1,1,1,1,1)
  Calculated value to obtain mass balance.
  production volume 0 m3
    Calculated from production volume of reference product using the relative outputs.
  property price 0 EUR2005; name BP_wastewater_price_EUR2005
  properties: wet mass 1000 kg, carbon content, non-fossil 0.194039, dry mass 0.346837 kg, water content 2882.2
  note on carbon content, non-fossil: 0.0673 kg TOC/m3 (Tab A.17, ecoinvent v2.2 report 13_I). TOC was considered as Total Carbon.
- synthetic graphite, battery grade: 0.92 kg; lognormal variance with pedigree 0.0055, pedigree (3,2,2,5,2)
  (same comment as for carboxymethyl cellulose, powder)
  properties: dry mass 1 kg, carbon content, fossil 1, wet mass 1 kg
- latex: 0.02 kg; lognormal variance with pedigree 0.0055, pedigree (3,2,2,5,2)
  (same comment as for carboxymethyl cellulose, powder)
  properties: wet mass 1 kg, carbon content, fossil 0.872983, dry mass 1 kg, heating value, net 26.45 MJ
  note on carbon content, fossil: The Styrene-butadiene dispersion is based on styrene and 1,3-butadiene plus co-monomers like i.e. ac-rylonitrile or (meth-)acrylic acid (ecoinvent v2.2 report 11_III). Following specifications in US Patent 3,875,101 (1971), the dispersion was considered as: 52.5% 1.3-butadiene (0.8571 kg C/kg dry mass); 43% styrene (0.9231 kg C/kg dry mass); 2% acrylic acid (0.5 kg C/kg dry mass); 2.5% acrolein (C3H4O, MW=56; 0.6429 kg C/kg dry mass)
- silicon, metallurgical grade: 0.02 kg; source Philippot, M. 2019; lognormal variance with pedigree 0.012, pedigree (2,3,2,5,3)
  (same comment as for carboxymethyl cellulose, powder)
  properties: wet mass 1 kg, dry mass 1 kg
- heat, district or industrial, natural gas: 0.330302, 7.9213 MJ (2 entries); lognormal variance with pedigree 0.006, pedigree (3,3,2,5,2)
  (same comment as for heat, district or industrial, natural gas)
- electricity, medium voltage: 0.00967944, 0.0018561, 0.042619, 0.03116, 0.143656, 0.0638781, 0.208124 kWh (7 entries); lognormal variance with pedigree 0.006, pedigree (3,3,2,5,2)
  (same comment as for electricity, medium voltage)
- water, deionised: 0.00344337, 0.956557 kg (2 entries); source Philippot, M. 2019; lognormal variance with pedigree 0.012, pedigree (2,3,2,5,3)
  Literature. Deionised water is used a solvent for the preparation of the anode slurry.
- wastewater, average: -9.37157e-5, -0.000866284 m3 (2 entries); lognormal variance with pedigree 0.25, pedigree (5,5,5,5,5)
  Calculated value to obtain mass balance.
  production volume 25914.1 m3

## Sampling procedure
From Literature and expert judgement. The bill of material was taken from Dai et al. (2019), and adjusted to include carboxymethyl cellulose and styrene butadiene as binders, and silicon as coating. The energy consumption is dependent on the storage capacity of the LI-ion battery cell under study (see comments to exchanges)

## Extrapolations
The dataset is extrapolated from CN data; the uncertainty has been adjusted accordingly.
