# cathode production, LiMn2O4, for lithium-ion battery

Dataset: EcoSpold 2, unit process
Geography: RoW
Time period: 2009-01-01 to 2021-12-31
Technology level: current
Classification: ISIC rev.4 ecoinvent: 2720:Manufacture of batteries and accumulators
Classification: EcoSpold01Categories: electronics/component
Tags: ConvertedDataset
Scenario: Business-as-Usual
System model: Allocation, cut-off by classification
Generated by: Dominic Notter
Published in: Hischier, R. 2009
Database: ecoinvent
isCopyrightProtected: true
accessRestrictedTo: 1

## General comment
The dataset can be used as a cathode for a lithium-ion battery. Data are based on patents. For infrastructure, the ecoinvent dataset "chemical plant, organics" is accounted. Transportation efforts are based on ecoinvent standard estimates.
[This dataset was already contained in the ecoinvent database version 2. It was not individually updated during the transfer to ecoinvent version 3. Life Cycle Impact Assessment results may still have changed, as they are affected by changes in the supply chain, i.e. in other datasets. This dataset was generated following the ecoinvent quality guidelines for version 2. It may have been subject to central changes described in the ecoinvent version 3 change report (http://www.ecoinvent.org/database/ecoinvent-version-3/reports-of-changes/), and the results of the central updates were reviewed extensively. The changes added e.g. consistent water flows and other information throughout the database. The documentation of this dataset can be found in the ecoinvent reports of version 2, which are still available via the ecoinvent website. The change report linked above covers all central changes that were made during the conversion process.]

## Included activities end
This dataset incudes the production of a cathode for a lithium-ion battery. Active material is lithium manganese oxide, binder is LHB-108P (styrene butadiene) with the solvent water. Collector foil is aluminium, pretreated with NaOH. The collector foil is coated on 1 side with the slurry (active material, binder, solvent and conductive carbon). Then, the coated foil is dried in a "dry channel" and then coiled up. The same procedure is done for the second side of the collector foil.

## Geography
Some Swiss or European datasets are used for global processes.

## Technology
This dataset includes a method of producing a cathode for a lithium ion battery. Spinell type lithium manganese oxide acts as a Li+-ion accumulator. Free Li+-ions move out of the spinell type LiMn2O4 (charge) to the electrolyte or from the electrolyte back to the LiMn2O4 spinell (discharge).

## Parameters
- fraction, water, deionised, to air: 0.061 dimensionless; name fraction_WDI_to_air; = fraction_PW_to_air; lognormal variance with pedigree 0.092025, pedigree (4,4,3,2,4)
  Calculated value. See comment in the other parametres present in this dataset. Deionised water is considered to be always used as process water, thus process water fractions to air are applied to all deionised water input flows to calculate the amount of water consumed in the processes.
- fraction, process water, to air: 0.061 dimensionless; name fraction_PW_to_air; lognormal variance with pedigree 0.092025, pedigree (4,4,3,2,4)
  Literature value (Statistics Canada, 2007 & Shaffer, K.H., 2008, Consumptive water use in the Great Lakes Basin, USGS) (Vionnet, S., Quantis Water Database - Technical Report, 2012).

## Reference product
- cathode, LiMn2O4, for lithium-ion battery: 1 kg; CPC 46430: Parts of primary cells, primary batteries and electric accumulators (including separators); By-product classification allocatable product; CAS 12057-17-9
  EcoSpold01Location=CN
  production volume 3.80251 kg
    This is a placeholder value that does not reflect real-world production volumes. This dataset does not currently require a real-world production volume to work in the database framework, and no actual data were collected yet. This has no negative effect on the results of the ecoinvent database.
  property carbon content, fossil 0.0310613
    C content calculated as the addition of the C contents in the final product components
  property price 7.7 EUR2005
    Calculated value based on data from United Nations Commodity Trade Statistics Database (comtrade.un.org). UN comtrade category: 850690 Parts of primary cells and primary batteries of 1EURO = 1.209 USD.
  property carbon content 0.0310613
    carbon content on a dry matter basis (reserved; not for manual entry)
  properties: water in wet mass 0 kg, water content 0, carbon content, non-fossil 0, dry mass 1 kg, wet mass 1 kg, carbon allocation 0.0310613 kg

## Inputs from technosphere
- heat, district or industrial, natural gas: 0 MJ; pedigree (1,1,1,1,1)
  EcoSpold01Location=RER
  properties: heating value, net 1 MJ
- aluminium, wrought alloy: 0.39309 kg; lognormal variance with pedigree 0.012, pedigree (1,4,4,5,1)
  EcoSpold01Location=RER
  properties: wet mass 1 kg, dry mass 1 kg
- electricity, medium voltage: 0 kWh; pedigree (1,1,1,1,1)
  EcoSpold01Location=CN
- residue from shredder fraction from manual dismantling: -0.052632 kg; lognormal variance with pedigree 0.092, pedigree (5,4,4,5,1)
  EcoSpold01Location=CH
  production volume 0.157896 kg
    Calculated from the production volume of cathode, LiMn2O4, for lithium-ion battery in proportion to the respective output amounts.
  properties: dry mass 1 kg, wet mass 1 kg, carbon content, fossil 0.664925
  note on carbon content, fossil: Tab 4.47, ecoinvent v2.2 report 18_V, for details in fraction composition. Carbon content in plastic was calculated using data in Tab A.2, ecoinvent v2.2 report 13_I. Others was also considered plastic, and calculated the same way (from pg 70, ecoinvent v2.2 report 18_V). Ferro was assumed to have a C content of 0.012 kg C/ kg (C content of steel, calculated out of emission factors published in Commission Decision of 18 July 2007 establishing guidelines for the monitoring and reporting of greenhouse gas emissions pursuant to Directive 2003/87/EC of the European Parliament and of the Council (notified under document number C(2007) 3416)). The other component of the fraction were considered to content no C.
- carbon black: 0.026382 kg; lognormal variance with pedigree 0.0406, pedigree (2,4,4,5,3)
  EcoSpold01Location=GLO
  properties: heating value, net 25.76 MJ, wet mass 1 kg, dry mass 1 kg, carbon content, fossil 0.85
- wastewater, average: 0 m3; pedigree (1,1,1,1,1)
  EcoSpold01Location=CH
  production volume 0 m3
    (same comment as for residue from shredder fraction from manual dismantling)
  properties: wet mass 1000 kg, water content 2882.2, carbon content, non-fossil 0.194039, dry mass 0.346837 kg
  note on carbon content, non-fossil: 0.0673 kg TOC/m3 (Tab A.17, ecoinvent v2.2 report 13_I). TOC was considered as Total Carbon.
- chemical factory, organics: 4e-10 unit; lognormal variance with pedigree 0.448, pedigree (5,5,5,5,3)
  EcoSpold01Location=RER
- water, deionised: 0 kg; name water_deionised_input; pedigree (1,1,1,1,1)
  EcoSpold01Location=CH
  properties: wet mass 1 kg
- sodium hydroxide, without water, in 50% solution state: 0.13017 kg; lognormal variance with pedigree 0.04, pedigree (4,4,4,5,1)
  EcoSpold01Location=RER
  properties: wet mass 1 kg, heating value, net 3.03 MJ, dry mass 1 kg
- lithium manganese oxide: 0.62327 kg; lognormal variance with pedigree 0.0406, pedigree (2,4,4,5,3)
  EcoSpold01Location=GLO
  properties: dry mass 1 kg, wet mass 1 kg
- sheet rolling, aluminium: 0.39309 kg; lognormal variance with pedigree 0.012, pedigree (1,4,4,5,1)
  EcoSpold01Location=RER
- latex: 0.0098932 kg; lognormal variance with pedigree 0.0406, pedigree (2,4,4,5,3)
  EcoSpold01Location=RER
  properties: heating value, net 26.45 MJ, dry mass 1 kg, carbon content, fossil 0.872983, wet mass 1 kg
  note on carbon content, fossil: The Styrene-butadiene dispersion is based on styrene and 1,3-butadiene plus co-monomers like i.e. ac-rylonitrile or (meth-)acrylic acid (ecoinvent v2.2 report 11_III). Following specifications in US Patent 3,875,101 (1971), the dispersion was considered as: 52.5% 1.3-butadiene (0.8571 kg C/kg dry mass); 43% styrene (0.9231 kg C/kg dry mass); 2% acrylic acid (0.5 kg C/kg dry mass); 2.5% acrolein (C3H4O, MW=56; 0.6429 kg C/kg dry mass)
- heat, district or industrial, natural gas: 0.025851, 0.619959 MJ (2 entries); lognormal variance with pedigree 0.04, pedigree (4,4,4,5,1)
  EcoSpold01Location=RER
- electricity, medium voltage: 3.86425e-5, 7.40998e-6, 0.000170145, 0.000124398, 0.000573508, 0.000255016, 0.00083088 kWh (7 entries); lognormal variance with pedigree 0.096, pedigree (4,5,5,5,3)
  EcoSpold01Location=CN
- wastewater, average: -1.0296e-5, -9.5174e-5 m3 (2 entries); lognormal variance with pedigree 0.132, pedigree (5,4,4,5,1)
  EcoSpold01Location=CH
  production volume 0.00031641 m3
- water, deionised: 0.000718947, 0.199721 kg (2 entries); lognormal variance with pedigree 0.0406, pedigree (2,4,4,5,3)
  EcoSpold01Location=CH

## Emissions to nature
- Water [air, unspecified]: 1.22268e-5 m3; name water_to_air_unspecified; lognormal variance with pedigree 0.0507, pedigree (2,2,4,5,1)
  Value based on literature values and expert opinion. See comments in the parametres' comment field.
  property fraction, origin: unspecified 0; name fraction_origin_unspecified
  property fraction, origin: fresh water 1; name fraction_origin_fresh_water
  property fraction, origin: salt water 0; name fraction_origin_salt_water
- Water [water, unspecified]: 8.27432e-5 m3; name water_to_water_unspecified; = (water_deionised_input/1000)*(1-fraction_WDI_to_air)-0.00010547; lognormal variance with pedigree 0.0507, pedigree (2,2,4,5,1)
  Calculated value based on literature values and expert opinion. See comments in the parametres' comment field.
  property fraction, origin: fresh water 1; name fraction_origin_fresh_water_Ww
  property fraction, origin: unspecified 0; name fraction_origin_unspecified_Ww
  property fraction, origin: salt water 0; name fraction_origin_salt_water_Ww
  property dry mass 0 kg; name DM
  property carbon content, non-fossil 0; name C_content_non_fossil
  property water in wet mass 1000 kg; name WWM
  property wet mass 1000 kg; name WM
  property carbon content, fossil 0; name C_content_fossil

## Sampling procedure
patent, website, ecoinvent

## Extrapolations
see Geography This dataset has been copied from an original dataset covering the geography CN. The uncertainty has been adjusted accordingly.

## Review by Christian Bauer 2010-02-08
passed
