# polyester fibre production, finished

Dataset: EcoSpold 2, unit process
Geography: RoW
Time period: 2007-12-31 to 2022-12-31
Technology level: current
Classification: ISIC rev.4 ecoinvent: 2030:Manufacture of man-made fibres
Scenario: Business-as-Usual
System model: Allocation, cut-off by classification
Share of production covered: 100 %
Generated by: Jerome Payet
Database: ecoinvent
isCopyrightProtected: true
accessRestrictedTo: 1

## General comment
The dataset covers polyester production, using polyethylene terephthalate (PET) granulate as input by the melt spinning process.
For the melt spinning process, Fully Oriented Yarn (FOY) spinning is considered. Specific data are used for the production of staple fibres.
Polyester production and melt spinning processes are based on global data. These processes are modelled according to general data which are adapted to the electricity mix. The global electricity mix is developed based on main polyester staple fibres producing countries global statistics. The inventory takes into account the required amount of inputs to produce 1kg of polyester fibres. The dataset includes electricity, heat, water and materials needed for the production. Air and water emissions are included as elementary flows.

Textile waste generated during spinning is recycled back into production.

The recycled amount corresponds to 3.5% of the input PET granulate. Electrcity and heat were adjusted accordingly (+3.5%).
The estimated water incorporation into the product is 1.5%.
Missing sum parameters to water (DOC, TOC).

## Included activities start
The activity starts with the provision of PET material.

## Included activities end
The activity ends after the melt-spinning FOY (Fully Oriented Yarn) (production of PES fibres).

## Geography
The geographical representativeness of the dataset covers the global production of polyester staple fibres (granulate production and melt spinning process).

## Time period
Data for the production of polyester granulates date from 2003. Data for the melt spinning process date from 2001 and 2013. Data for wastewater treatment are from 2004 and 2007. Statistical data used for raw material production location date back to 2009.

## Parameters
- fraction, cooling water, to air: 0.03 dimensionless; name CW_to_air
  Assumed that cooling water escapes to air at a rate of 3% from the water input.

## Reference product
- fibre, polyester: 1 kg; name rp; CPC 35510: Synthetic filament tow and staple fibres, not carded or combed; By-product classification allocatable product
  production volume 2.254e10 kg; name pf_pv
    According to literature the annual production volume of polyester fibres for 2008 was 28 million Mg. Values refer to 2008. 65% of polyester fibres is produced in Asia.
    Reference:
    E. M. Aizenshtein,2007, World production and consumption of polyester fibres and yarn. Status and prospects for the Russian market. Fibre Chemistry, 39: 355. https://doi.org/10.1007/s10692-007-0078-8
  property heating value, net 18.94 MJ
    LHV is calculated based on the Carbon content of the product. More details can be found on the respective documentation.
  property price 2.188 EUR2005
    Calculated value based on data from United Nations Commodity Trade Statistics Database (comtrade.un.org). UN comtrade category: 550951. Year 2016. Using exchange rate of 1EURO = 1.209 USD. Average of price of import into 4 main markets (US, JP, IN and CN).
  property carbon content 0.625
    carbon content on a dry matter basis (reserved; not for manual entry)
  properties: wet mass 1 kg, water content 0, carbon content, fossil 0.625, carbon content, non-fossil 0, water in wet mass 0 kg, dry mass 1 kg, carbon allocation 0.625 kg

## Inputs from technosphere
- polyethylene terephthalate, granulate, amorphous: 1.01523 kg; name rm; = rp/(98.5/100)
  Raw material input for 1 kg of polyester fibre production. It is assumed that 3.5% of waste is produced. Most of them (2.5%) are successfully recycled while the rest end up as a waste output.
  properties: dry mass 1 kg, carbon content, fossil 0.625, wet mass 1 kg, heating value, net 22.95 MJ
- waste plastic, mixture: -0.0152284 kg; name bp1; = (1.5%*rm)*-1
  Value comes from polyester production
  production volume 3.43249e8 kg; = pf_pv*bp1
    Calculated from production volume of reference product using the relative outputs.
  property price 0 EUR2005; name bp1_price_EUR2005
  properties: water content 0.180638, carbon content, fossil 0.747344, dry mass 0.847 kg, heating value, net 30.79 MJ, wet mass 1 kg
  note on heating value, net: Value taken from the general comment of the treatment dataset.
- waste mineral oil: 0 kg; name BP_amount_2
  Waste mineral oil is produced due to the input of lubricating oil used in the process.
  production volume 0 kg
    Calculated from production volume of reference product using the relative outputs.
  property price 0 EUR2005; name BP_amount_2_price_EUR2005
  properties: wet mass 1 kg, carbon content, fossil 0.864444, heating value, net 34.7 MJ, dry mass 0.9 kg, water content 0.111111
  note on carbon content, fossil: Tab A.6, ecoinvent v2.2 report 13_I. C content has been calculated after data in the tables, and then referred to 1 kg DM
- hazardous waste, for underground deposit: -0.005 kg; name bp2
  Value comes from polyester production and melt-spinning process
  production volume 1.127e8 kg; = pf_pv*bp2
    Calculated from production volume of reference product using the relative outputs.
  property price 0 EUR2005; name bp2_price_EUR2005
  properties: wet mass 1 kg, dry mass 1 kg, carbon content, fossil 0.554667
  note on carbon content, fossil: Tab A.6, ecoinvent v2.2 report 13_I, average hazardous waste composition was used, and referred to 0% water mass. No waste-specific emission are currently inventoried for underground deposits. Accordingly, no waste composition must be specified. For generic, average waste to underground deposit deposition in a 200 liter steel drum without cement solidification is assumed (ecoinvent v2.2 report 13_I).
- heat, district or industrial, natural gas: 0.591824 MJ; lognormal variance with pedigree 0.003925, pedigree (2,2,3,2,2)
  Heat consumption from wastewater treatment process (for melt-spinning process)
  properties: heating value, net 1 MJ
- electricity, medium voltage: 1.10311 kWh; = 1.065802255*1.035; lognormal variance with pedigree 0.003925, pedigree (2,2,3,2,2)
  Value comes from polyester production - Electricity is modelled based on the main countries of polyester fibres production. Electricity consumption was scaled by additionally 3.5% to include a recirculation of waste polyester. During the production 3.5% of the input is generated as waste (0.035 kg). From the latter value 0.020 kg are succesfully recirculated whilst 0.015 kg end up as waste plastic.
- tap water: 22.78 kg; name win2; = 15.946+6.834
  Tap water consumption from melt-spinning process
  properties: carbon content, fossil 0.00178991, water content 2962.17, wet mass 1 kg, dry mass 0.000337476 kg
  note on carbon content, fossil: Bicarbonate content is 2.93 mol/m3. CO2 content is 0.1 mol/m3 (ecoinvent v2.2 report 8, Tab 93.1).
- heat, district or industrial, natural gas: 1.42926 MJ; = 1.3809236*1.035; lognormal variance with pedigree 0.003925, pedigree (2,2,3,2,2)
  Heat consumption from polyester production. This heat consumption was scaled by additionally 3.5% to include a recirculation of waste polyester. During the production 3.5% of the input is generated as waste (0.035 kg). From the latter value 0.020 kg are succesfully recirculated whilst 0.015 kg end up as waste plastic.
- wastewater, average: 0 m3; name BP_amount_1
  Amount of wastewater generated during the process.
  production volume 0 m3
    Calculated from production volume of reference product using the relative outputs.
  property price 0 EUR2005; name BP_amount_1_price_EUR2005
  properties: wet mass 1000 kg, water content 2882.2, carbon content, non-fossil 0.194039, dry mass 0.346837 kg
  note on carbon content, non-fossil: 0.0673 kg TOC/m3 (Tab A.17, ecoinvent v2.2 report 13_I). TOC was considered as Total Carbon.
- waste paperboard: -0.018 kg; name bp3
  Value comes from melt-spinning process
  production volume 4.0572e8 kg; = pf_pv*bp3
    Calculated from production volume of reference product using the relative outputs.
  property price 0 EUR2005; name bp3_price_EUR2005
  properties: water content 0.243781, dry mass 0.804 kg, heating value, net 15.92 MJ, carbon content, non-fossil 0.483259, wet mass 1 kg
  note on carbon content, non-fossil: C content was calculated for 1 kg DM, using data in Tab A.3, ecoinvent v2.2 report 13_I.
- lubricating oil: 0.01585 kg
  Value comes from melt-spinning process
  properties: dry mass 1 kg, heating value, net 40.2 MJ, wet mass 1 kg, carbon content, fossil 0.75
  note on heating value, net: Literature value, Source: IPCC 2006, 2006 IPCC Guidelines for National Greenhouse Gas Inventories, Prepared by the National Greenhouse Gas Inventories Programme, Eggleston H.S., Buendia L., Miwa K., Ngara T. and Tanabe K. (eds). Published: IGES, Japan
  note on carbon content, fossil: Lubricating oil is produced from diesel. C-content/dry mass of fats and oils considered 75%, from: ecoinvent v2.2 report, n 15a, pg 40
- waste mineral oil: -0.000382904, -0.0154671 kg (2 entries)
  Waste mineral oil is produced due to the input of lubricating oil used in the process.
  production volume 3.57259e8 kg
- wastewater, average: -0.00223971, -0.0207033 m3 (2 entries)
  Amount of wastewater generated during the process.
  production volume 5.17135e8 m3

## Inputs from nature
- Water, unspecified natural origin [natural resource, in water]: 0.000162993 m3; name win1
  Value comes from polyester production
- Water, cooling, unspecified natural origin [natural resource, in water]: 0.00639972 m3; name WC
  Value comes from polyester production

## Emissions to nature
- BOD5, Biological Oxygen Demand [water, unspecified]: 0.0006834 kg; lognormal variance with pedigree 0.043325, pedigree (2,2,3,2,2)
  Calculated from the wastewater treatment process
- Nitrogen [water, unspecified]: 0.0002278 kg; lognormal variance with pedigree 0.043325, pedigree (2,2,3,2,2)
  Calculated from the wastewater treatment process
- TOC, Total Organic Carbon [water, surface water]: 0.00134993 kg; = DOC
  DOC and TOC are assumed to be equal in the case of a filtered sample. It is further estimated as a general rule of thumb that COD=2.7*TOC. All above info are documented in the Data Quality Guidelines of ecoinvent version 3.
  Reference:
  Weidema B P, Bauer C, Hischier R, Mutel C, Nemecek T, Reinhard J, Vadenbo C O, Wernet G. (2013). Overview and methodology. Data quality guideline for the ecoinvent database version 3. Ecoinvent Report 1(v3). St. Gallen: The ecoinvent Centre
- DOC, Dissolved Organic Carbon [water, surface water]: 0.00134993 kg; name DOC; = COD/2.7
  (same comment as for TOC, Total Organic Carbon)
- Water [air, unspecified]: 0.00620773 m3; = WC*(1-CW_to_air)
  Amount of water cooling that is not evaporated.
- NMVOC, non-methane volatile organic compounds, unspecified origin [air, unspecified]: 0.006004 kg; lognormal variance with pedigree 0.043325, pedigree (2,2,3,2,2)
  Value comes from melt-spinning process
- Water [water, unspecified]: 0.000191992 m3; = CW_to_air*WC; lognormal variance with pedigree 0.043325, pedigree (2,2,3,2,2)
  Amount of cooling water that is evaporated to air.
- COD, Chemical Oxygen Demand [water, unspecified]: 0.0036448 kg; name COD; lognormal variance with pedigree 0.043325, pedigree (2,2,3,2,2)
  Calculated from the wastewater treatment process
- Phosphorus [water, unspecified]: 4.556e-5 kg; lognormal variance with pedigree 0.043325, pedigree (2,2,3,2,2)
  Calculated from the wastewater treatment process

## Sampling procedure
Data come from several sources: publications, literature and surveys conducted by companies.

## Extrapolations
The dataset covers 100% of the production based on an extrapolation of 90% of the most representative supply chains. Polyester granulate production and the melt spinning process are modelled according to general data.

## Review by Eric Johnson 2018-03-22
Fine.
