# tap water production, conventional with biological treatment

Dataset: EcoSpold 2, unit process
Geography: CO
Time period: 2012-01-01 to 2021-12-31
Technology level: current
Classification: EcoSpold01Categories: water supply/production
Classification: ISIC rev.4 ecoinvent: 3600:Water collection, treatment and supply
Synonyms: potable water
Scenario: Business-as-Usual
System model: Allocation, cut-off by classification
Generated by: Laura Rubio
Published in: Gmünder S. 2017
Database: ecoinvent
isCopyrightProtected: true
accessRestrictedTo: 1

## General comment
This dataset represents production of 1 kg of tap water under pressure at facility gate, ready for distribution in network. It represents average operation of conventional with biological filtration treatment for production of tap water. Conventional with biological filtration treatment includes coagulation and decantation, biological filtration and disinfection. Other treatment such as oxidation (ultraviolet radiation, ozone) and other adjustment (pH, alkalinity, etc.) can be present in some plant. Inventory was constructed from reported chemicals, energy inputs and wastes from 2 distinct conventional with biological filtration plants located in Québec.

## Included activities start
From the intake pumping of raw surface water into the water treatment plant.

## Included activities end
This dataset ends with the production of tap water, at facility gate, under pressure. It includes energy for intake pumping, treatment system, lighting and heating of the building as well as the energy of the pump pressurizing water to the beginning of the network. It includes all chemicals and material added to the water during treatment and, when needed, ultraviolent lamps for replacement. It excludes energy for pumping stations and water losses within the network which is included in the tap water market. Emissions to the environment occurring during the treatment and during the distribution were not considered as they are assumed negligible. Main substance in water that would be released in the environment are assumed to be considered in wastewater processes.

## Geography
Extrapolated from data from two plants in Quebec (Canada). The uncertainty was adjusted accordingly.

## Technology
Second most frequent technology in tap water production facility in Colombia

## Time period
The time period is set to the year 2017 as it is the time of publication. The production volume of the year 2012 is considered.

## Parameters
- unit conversion, days in a year: 365.25 d/year; name days_per_year; lognormal variance with pedigree 0.0006, pedigree (1,1,1,1,1)
  Conversion factor.

## Reference product
- tap water: 1 kg; name tapwater; CPC 18000: Natural water; By-product classification allocatable product; CAS 7732-18-5
  production volume 2.13475e11 kg; name PV_tapwater; = 2223703014000*0.096
    Calculated value based on national database.The total tap water production technology shares in Colombia, was based on data from a public entity: Superintendecia de Servicios Públicos (SUI, 2008)- <http://www.sui.gov.co/web/acueducto>. The register, records tap water treatment using different technologies from 2398 local plants in 478 municipalities, which represents 78% of the total country"s population. The remaining 22%, as there is not existing data, was distributed among the current technologies. According to present in the ecoinvent database are calculated to be as follows; tap water production, conventional treatment 86%, tap water production, conventional with biological treatment 9.6%, tap water production, direct filtration treatment 1%, tap water production, underground water with disinfection 1.7%, tap water production, underground water without chemical treatment 1.7%.
  property price 0.000397 EUR2005
    Converted from EU price by using Purchasing Power Parities (0.8458 in 2003 and 0.8426 in 2004)
  property carbon content 0.0017899
    carbon content on a dry matter basis (reserved; not for manual entry)
  properties: carbon content, fossil 0.0017899, wet mass 1 kg, carbon content, non-fossil 0, water in wet mass 0.99966 kg, dry mass 0.00034 kg, water content 2940.18, carbon allocation 6.08566e-7 kg

## By-products
- spent activated carbon, granular: 0 kg; CPC 39: Wastes or scraps; By-product classification Recyclable; CAS 7440-44-0; pedigree (1,1,1,1,1)
  Calculated value, assuming the dry mass of "activated carbon, granular" (0.97) ends up as byproduct.
  Uncertainty: C
  production volume 0 kg; = PV_tapwater * spent_carbon / tapwater
    Calculated from production volume of reference product using the relative outputs.
  property carbon content, fossil 0.81
    Literature value. From Biomass and Bioenergy: Processing and Properties (2014) edited by Khalid Rehman Hakeem, Mohammad Jawaid, Umer Rashid (pg. 252). Carbon content is in the range of 72-90%, an average value of 81% is taken.
  property price 0.846 EUR2005
    Calculated value based on data from United Nations Commodity Trade Statistics Database (comtrade.un.org). UN comtrade category: 380210 Activated Carbon. Year 2005. Using exchange rate of 1EURO = 1.209 USD. Average of price of import into 5 main markets (EU, US, JP, IN and CN). The price of "spent activated carbon" is estimated to be 90% lower than the price of virgin activated carbon.
  property heating value, net 5.65 MJ
    LHV is calculated based on the Carbon content of the product. More details can be found on the respective documentation.
  property carbon content 0.81
    carbon content on a dry matter basis (reserved; not for manual entry)
  properties: water content 2.33333, water in wet mass 2.33333 kg, carbon content, non-fossil 0, dry mass 1 kg, wet mass 3.33333 kg, carbon allocation 0.81 kg

## Inputs from technosphere
- activated silica: 1.31167e-6 kg; lognormal variance with pedigree 0.0072, pedigree (2,4,3,5,1)
  Measured value taken from the "tap water production, conventional with biological treatment, GLO" dataset (accessed 20170920) as it was considered adequate also for this dataset. Average use of substance reported in surveyed conventional with biological treatment plants. Note than 1 plant reported using this substance. Plants not reporting this consumable were attributed an input value of 0 during the calculation of the weighted average.
- silica sand: 1.15704e-6 kg; lognormal variance with pedigree 0.0072, pedigree (3,3,3,5,1)
  Calculated value taken from the "tap water production, conventional with biological treatment, GLO" dataset (accessed 20170920) as it was considered adequate also for this dataset. Amount of sand to compensate losses through sand filter washing. Extrapolated to all plant from one reported value.Note that only 1 of the 2 plants reported this consumable.
  properties: water content 0.010101, dry mass 0.99 kg, wet mass 1 kg
- electricity, medium voltage: 0.000582 kWh; lognormal variance with pedigree 0.0058, pedigree (2,3,3,5,1)
  Measured value taken from the "tap water production, conventional with biological treatment, GLO" dataset (accessed 20170920) as it was considered adequate also for this dataset. Average electricity consumption for entire process including pumping for water intake and pumping for distribution at the plant gate. All plants (2) reported electricity use.
- activated carbon, granular: 2.27332e-7 kg; name GCA; lognormal variance with pedigree 0.0152, pedigree (2,3,3,5,1)
  Measured value taken from the "tap water production, Replaces charcoal proxy. conventional with biological treatment, GLO" dataset (accessed 20170920) as it was considered adequate also for this dataset. Average use of activated charcoal in surveyed conventional treatment plants. Note than both plants reported using this input.
  Uncertainty: L
  property dry mass 0.97 kg; name GAC_DM
  property water content 0.030928; name GAC_water_content
  property water in wet mass 0.03 kg; name GAC_WWM
  property carbon content, fossil 0.81; name GAC_C_content_fossil
  property wet mass 1 kg; name GAC_WM
  property carbon content, non-fossil 0; name GAC_C_content_non_fossil
  properties: heating value, net 30.23 MJ
  note on carbon content, fossil: Literature value. From Biomass and Bioenergy: Processing and Properties (2014) edited by Khalid Rehman Hakeem, Mohammad Jawaid, Umer Rashid (p. 252). Carbon content is in the range of 72-90%, an average value of 81% is taken.
- sodium hypochlorite, without water, in 15% solution state: 3.3e-6 kg; lognormal variance with pedigree 0.0058, pedigree (2,3,3,5,1)
  Measured value taken from the "tap water production, conventional with biological treatment, GLO" dataset (accessed 20170920) as it was considered adequate also for this dataset. Average use of hypochlorite (dry basis) for disinfection in surveyed conventional with biological treatment plants. Reported concentration of solution is 12% (w/w), input of exchange "water" was added accordingly. Note the 2 plants reported using this substance.
  properties: dry mass 1 kg, wet mass 1 kg
- heat, district or industrial, natural gas: 0.000337252 MJ; lognormal variance with pedigree 0.004, pedigree (1,1,3,5,1)
  Calculated value taken from the "tap water production, conventional with biological treatment, GLO" dataset (accessed 20170920) as it was considered adequate also for this dataset.
  Uncertainty: C
  property Corresponding fuel use 1.11 MJ; name fuel_use
  property fuel input in physical units, m3 8.37e-6 m3; name fuel_input
  property heating value, net 1 MJ; name heating_value
  note on Corresponding fuel use: Lower heating value of the fuel input related to the heat/electricity output
  note on fuel input in physical units, m3: Measured value. Average natural gas consumption in surveyed plants for this technology type. Note than only 1 of the 2 plants reported using natural gas. Plants not reporting natural gas were attributed an input value of 0 during the calculation of the weighted average.
- wastewater, unpolluted: -4.86e-5 m3; name ww; lognormal variance with pedigree 0.0046, pedigree (1,1,3,5,1)
  Measured value taken from the "tap water production, conventional with biological treatment, GLO" dataset (accessed 20170920) as it was considered adequate also for this dataset. Average amount of wastewater produced during treatment.
  Uncertainty: C
  production volume 1.03749e7 m3; = PV_tapwater*(ww/tapwater)
    Calculated from the production volume of tap water, at user in proportion to the respective output amounts.
  property price 0 EUR2005; name ww_price_EUR2005
  properties: dry mass 0.337476 kg, carbon content, non-fossil 0.00178991, wet mass 1000 kg, carbon content, fossil 0.00178991, water content 2962.17
  note on carbon content, fossil: Assumed to be like in tap water. Bicarbonate content is 2.93 mol/m3. CO2 content is 0.1 mol/m3 (ecoinvent v2.2 report 8, Tab 93.1).
- water pump operation, diesel: 6.56813e-5 MJ; = diesel_use*density_diesel*NHV; lognormal variance with pedigree 0.004, pedigree (1,1,3,5,1)
  (same comment as for heat, district or industrial, natural gas)
  property fuel input in physical units, L 1.81e-6 l; name diesel_use
  property heating value, net 43.2 MJ; name NHV
  property density 0.84 kg/l; name density_diesel
  properties: price 0.07 EUR2005
  note on fuel input in physical units, L: Measured value. Average of diesel volume consumed in a year. All plants reported diesel use.
  note on heating value, net: Literature. net (lower) heating (calorific) value for diesel in MJ/kg
- lime, hydrated, loose weight: 5.43127e-6 kg; lognormal variance with pedigree 0.0072, pedigree (2,4,3,5,1)
  Measured value was taken from the "tap water production, conventional with biological treatment, GLO" dataset (accessed 20170920) as it was considered adequate also for this dataset. Average use of lime for pH adjustment in surveyed conventional with biological treatment plants. Note than 1 of the 2 plants reported using this substance. Plants not reporting this consumable were attributed an input value of 0 during the calculation of the weighted average.
  properties: wet mass 1 kg, dry mass 0.997 kg, water content 0.00300903
- polyacrylamide: 1.6467e-7 kg; lognormal variance with pedigree 0.0058, pedigree (2,3,3,5,1)
  Measured value taken from the "tap water production, conventional with biological treatment, GLO" dataset (accessed 20170920) as it was considered adequate also for this dataset. Average use of polymer for floculation in surveyed conventional with biological treatment plants. Polymers assumed to be 100% polyacrylamide. Note the 2 plants reported using this substance.
  properties: heating value, net 23.88 MJ
- sodium hydroxide, without water, in 50% solution state: 5.75e-6 kg; lognormal variance with pedigree 0.0072, pedigree (2,4,3,5,1)
  Measured value taken from the "tap water production, conventional with biological treatment, GLO" dataset (accessed 20170920) as it was considered adequate also for this dataset. Average use of sodium hydroxide (dry basis) for adjustement in surveyed conventional treatment plants. Input of exchange "water", based on NaOH concentration, was added accordingly. Note the 2 plants reported using this substance.
  properties: wet mass 1 kg, dry mass 1 kg, heating value, net 3.03 MJ
- sodium phosphate: 1.14333e-6 kg; lognormal variance with pedigree 0.0072, pedigree (2,4,3,5,1)
  (same comment as for activated silica)
  properties: dry mass 1 kg, wet mass 1 kg
- aluminium sulfate, powder: 6.36e-5 kg; lognormal variance with pedigree 0.0152, pedigree (2,3,3,5,1)
  Measured value taken from the "tap water production, conventional with biological treatment, GLO" dataset (accessed 20170920) as it was considered adequate also for this dataset. Value reprensent average for use of pre-hydrolysed coagulant (PASS) and average for use au aluminium sulphate solution. Note that both plants reported using PASS and aluminium sulphate solution.
  properties: dry mass 1 kg, wet mass 1 kg
- potassium permanganate: 5.44323e-7 kg; lognormal variance with pedigree 0.0072, pedigree (2,4,3,5,1)
  (same comment as for activated silica)
  properties: wet mass 1 kg, dry mass 1 kg
- sodium pyrophosphate: 2.67034e-7 kg; name tetrasodiumpyrophosphate; lognormal variance with pedigree 0.0072, pedigree (2,4,3,5,1)
  Measured value taken from the "tap water production, conventional with biological treatment, GLO" dataset (accessed 20170920) as it was considered adequate also for this dataset. Average use of tetrasodium pyrophosphate reported in surveyed conventional with biological treatment plants. Note than 1 plant reported using this substance. Plants not reporting this consumable were attributed an input value of 0 during the calculation of the weighted average.
- water works, capacity 1.1E10l/year: 1.52103e-12 unit; = 1/(Q_av* days_per_year*lifetime*UnitConversion(1, 'm3', 'l')); lognormal variance with pedigree 0.004, pedigree (1,1,3,5,1)
  Calculated value taken from the "tap water production, conventional with biological treatment, GLO" dataset (accessed 20170920) as it was considered adequate also for this dataset. Amount of water works construction attributed to the production of 1kg of tap water. Value is based on assumed lifetime production of water treatment plant and an assumed typical medium-sized plant of 30,000 m3/day.
  Uncertainty: C
  property lifetime 60 year; name lifetime
  property plant average daily flow rate 30000 m3/d; name Q_av
  note on lifetime: Estimated Value. Expected lifetime of water works as defined in the construction process.
  note on plant average daily flow rate: Fixed values, Flow rate of a conventional water purification plant for a medium-size facility as defined in the water works process.
- tap water: 6.93e-5 kg; lognormal variance with pedigree 0.0072, pedigree (3,3,3,5,1)
  Calculated value taken from the "tap water production, conventional with biological treatment, GLO" dataset (accessed 20170920) as it was considered adequate also for this dataset. Water content of hypochlorite solution, sodium hydroxide, prehydrolysed coagulant and aluminium sulfate.
  properties: wet mass 1 kg, water content 2962.17, carbon content, fossil 0.00178991, dry mass 0.000337476 kg
  note on carbon content, fossil: Bicarbonate content is 2.93 mol/m3. CO2 content is 0.1 mol/m3 (ecoinvent v2.2 report 8, Tab 93.1).
- oxygen, liquid: 1.745e-6 kg; lognormal variance with pedigree 0.0058, pedigree (2,3,3,5,1)
  Measured value taken from the "tap water production, conventional with biological treatment, GLO" dataset (accessed 20170920) as it was considered adequate also for this dataset. Average use of liquid oxygen for onsite ozone production in surveyed conventional with biological treatment plants. Note than only 1 plant reported using this substance although ozonation was applied in the other plant using air. Plants not reporting this consumable were attributed an input value of 0 during the calculation of the weighted average.
  properties: dry mass 1 kg, wet mass 1 kg
- spent activated carbon, granular: -2.20512e-7 kg; lognormal variance with pedigree 0.0026, pedigree (1,1,3,1,1)
  (same comment as for spent activated carbon, granular)
  production volume 47073.9 kg
  properties: carbon content, fossil 0.81, water content 2.33333, price 0.846 EUR2005, heating value, net 5.65 MJ, dry mass 1 kg, wet mass 3.33333 kg
  note on carbon content, fossil: Literature value. From Biomass and Bioenergy: Processing and Properties (2014) edited by Khalid Rehman Hakeem, Mohammad Jawaid, Umer Rashid (pg. 252). Carbon content is in the range of 72-90%, an average value of 81% is taken.

## Inputs from nature
- Water, river [natural resource, in water]: 0.00095882 m3; name waterIn_R; lognormal variance with pedigree 0.0052, pedigree (2,1,3,5,1)
  Calculated value. Surface water withdrawal represents average withdrawal from surveyed plants. Share of subcompartiment type (river 91%, lake 9%) is estimated based on share number of people in Quebec desserved by water source types.
- Water, lake [natural resource, in water]: 8.97511e-5 m3; name waterIn_L; lognormal variance with pedigree 0.0052, pedigree (2,1,3,5,1)
  (same comment as for Water, river)

## Sampling procedure
Based on data collected from two conventional treatment plants in Quebec (Canada). See corresponding Quebec dataset for more information. Note that percent representativeness is not supplied because technology-specific global production volumes is too uncertain. Should this information become available, the representativeness can be calculated by dividing the sum of the water treated by the Quebec plants that served as a basis for the Global dataset by the technology-specific global production volume. (2.31E10 kg/a)

## Extrapolations
This dataset has been extrapolated from year 2017 to the year of the calculation (2021). The uncertainty has been adjusted accordingly.

## Review by Philippe Loubet 2017-11-23
The overall quality of this dataset is acceptable.
In the future it would be desirable to update this dataset with Columbian data.
