# blasting

Dataset: EcoSpold 2, unit process
Geography: RER
Time period: 1990-01-01 to 2021-12-31
Technology level: current
Classification: ISIC rev.4 ecoinvent: 4312:Site preparation
Classification: EcoSpold01Categories: construction processes/civil engineering
Synonyms: Tovex; agent; blasting
Tags: ConvertedDataset
Scenario: Business-as-Usual
System model: Allocation, cut-off by classification
Generated by: Daniel Kellenberger (obsolete)
Published in: Kellenberger D. 2007
Database: ecoinvent
isCopyrightProtected: true
accessRestrictedTo: 1

## General comment
All emissions are calculated based on the composition of the raw materials and completed by the report "Emissionsfaktoren für stationäre Quellen". No emissions of the blasted rock is included. This module should not be used if its relative importance would be high in a certain environmental inventory.
[This dataset was already contained in the ecoinvent database version 2. It was not individually updated during the transfer to ecoinvent version 3. Life Cycle Impact Assessment results may still have changed, as they are affected by changes in the supply chain, i.e. in other datasets. This dataset was generated following the ecoinvent quality guidelines for version 2. It may have been subject to central changes described in the ecoinvent version 3 change report (http://www.ecoinvent.org/database/ecoinvent-version-3/reports-of-changes/), and the results of the central updates were reviewed extensively. The changes added e.g. consistent water flows and other information throughout the database. The documentation of this dataset can be found in the ecoinvent reports of version 2, which are still available via the ecoinvent website. The change report linked above covers all central changes that were made during the conversion process.]

## Included activities end
Includes the raw material (explosive Tovex) and the emissions (calculated stoichiometric)

## Geography
The explosive Tovex is a CH-module and is used as proxy for RER

## Technology
Blasting of 100% Tovex

## Reference product
- blasting: 1 kg; CPC 54320: Site formation and clearance services; By-product classification allocatable product
  EcoSpold01Location=RER
  production volume 1.32237 kg
    This is a placeholder value that does not reflect real-world production volumes. This dataset does not currently require a real-world production volume to work in the database framework, and no actual data were collected yet. This has no negative effect on the results of the ecoinvent database. The placeholder value of this activity was scaled according to the nominal GDP of 2005 (source: United Nations, http://data.un.org/Glossary.aspx?q=GDP+%28current+US%24%29, accessed 20130726) to reflect an appropriate share of the global production volume, which is also a placeholder value.
  property price 0.964 EUR2005
    Calculated based on inputs: The price of the product has been calculated as a sum of the values of the material and energy inputs for this product. This value is therefore a rough estimation. It may underestimate the real price since there are additional expenses when producing any product. These expences can include for example labour costs, treatment of waste materials and profit for the producer. Please consider carefully whether this level of data quality is acceptable for your application.

## Inputs from technosphere
- explosive, tovex: 1 kg; lognormal variance with pedigree 0.2381, pedigree (5,5,5,3,4)
  EcoSpold01Location=CH
  properties: water content 0.0869565, carbon content, fossil 0.0483756, wet mass 1 kg, dry mass 0.92 kg
  note on carbon content, fossil: Composition in Tab 4.1, ecoinvent v2.2 report n 7-part XVIII. 23% of wet mass consists of CH6N2O3

## Emissions to nature
- Particulates, < 2.5 um [air, unspecified]: 0.0054 kg; lognormal variance with pedigree 0.5786, pedigree (2,5,5,1,5)
- Particulates, > 10 um [air, unspecified]: 0.0003 kg; lognormal variance with pedigree 0.3186, pedigree (2,5,5,1,5)
- Particulates, > 2.5 um, and < 10um [air, unspecified]: 0.0003 kg; lognormal variance with pedigree 0.3986, pedigree (2,5,5,1,5)
- NMVOC, non-methane volatile organic compounds, unspecified origin [air, unspecified]: 0.06 kg; lognormal variance with pedigree 0.3186, pedigree (2,5,5,1,5)
- Aluminium [air, unspecified]: 0.151 kg; lognormal variance with pedigree 0.146, pedigree (4,5,5,1,1)
- Nitrogen oxides [air, unspecified]: 0.331 kg; lognormal variance with pedigree 0.106, pedigree (4,5,5,1,1)
- Carbon monoxide, fossil [air, unspecified]: 0.077 kg; lognormal variance with pedigree 0.106, pedigree (4,5,5,1,1)
- Ammonia [air, unspecified]: 0.059 kg; lognormal variance with pedigree 0.146, pedigree (4,5,5,1,1)

## Sampling procedure
Emissions are based on stochiometric calculations and all other In- and Output modules are estimations

## Extrapolations
This dataset has been extrapolated from year 2001 to the year of the calculation (2021). The uncertainty has been adjusted accordingly.

## Review by Roberto Dones 2003-07-23
passed
