# planing mill production

Dataset: EcoSpold 2, unit process
Geography: RoW
Time period: 2002-01-01 to 2021-12-31
Technology level: current
Classification: EcoSpold01Categories: wooden materials/extraction
Classification: ISIC rev.4 ecoinvent: 2822:Manufacture of metal-forming machinery and machine tools
Tags: ConvertedDataset
Scenario: Business-as-Usual
System model: Allocation, cut-off by classification
Generated by: Hans-Jörg Althaus
Published in: Werner F. 2007
Database: ecoinvent
isCopyrightProtected: true
accessRestrictedTo: 1

## General comment
The service life is assumed to be 50 years. Thus the life time output is 1'250'000 m3 planed timber. This data must only be used to consider the infrastructure needed for planing wood if this is not relevant.
[This dataset was already contained in the ecoinvent database version 2. It was not individually updated during the transfer to ecoinvent version 3. Life Cycle Impact Assessment results may still have changed, as they are affected by changes in the supply chain, i.e. in other datasets. This dataset was generated following the ecoinvent quality guidelines for version 2. It may have been subject to central changes described in the ecoinvent version 3 change report (http://www.ecoinvent.org/database/ecoinvent-version-3/reports-of-changes/), and the results of the central updates were reviewed extensively. The changes added e.g. consistent water flows and other information throughout the database. The documentation of this dataset can be found in the ecoinvent reports of version 2, which are still available via the ecoinvent website. The change report linked above covers all central changes that were made during the conversion process.]

## Included activities end
The land area and the material and their transports needed for building and disposal of a planing mill with a yearly output of 25'000 m3 timber is included. The space for storing dried wood before and after planing and for packageing etc. is included.

## Geography
Estimate is so rough that the Geograhpy is not relevant.

## Technology
Medium sized planing mill, located with sawmill

## Reference product
- planing mill: 1 unit; CPC 53269: Other constructions for manufacturing; By-product classification allocatable product
  production volume 2.67763 unit
    This is a placeholder value that does not reflect real-world production volumes. This dataset does not currently require a real-world production volume to work in the database framework, and no actual data were collected yet. This has no negative effect on the results of the ecoinvent database.
  property price 7.88239e7 EUR2005
    Convert from EU 27 price to the world by currency exchange rate.

## Inputs from technosphere
- concrete, normal: 0 m3; pedigree (1,1,1,1,1)
  properties: wet mass 2380 kg, dry mass 2190 kg, water content 0.086758
- building, hall: 11700 m2; lognormal variance with pedigree 0.39, pedigree (3,5,5,5,3)
- waste reinforced concrete: -2.51e6 kg; lognormal variance with pedigree 0.39, pedigree (3,5,5,5,3)
  production volume 7.53e6 kg
    Calculated from the production volume of planing mill in proportion to the respective output amounts.
  properties: dry mass 0.99418 kg, water content 0.00585407, wet mass 1 kg
- steel, low-alloyed, hot rolled: 778000 kg; lognormal variance with pedigree 0.39, pedigree (3,5,5,5,3)
  properties: carbon content, fossil 0.005, dry mass 1 kg, wet mass 1 kg
  note on carbon content, fossil: Low alloyed steel composition given in Tab. 3.2 ecoinvent v2.2 report 10_partII. Steel assumed to have a C content of 0.5%
- concrete, normal: 25.7835, 2.6866, 21.75, 12.2343, 51.809, 1.74749, 1023.99 m3 (7 entries); lognormal variance with pedigree 0.39, pedigree (3,5,5,5,3)

## Inputs from nature
- Transformation, to industrial area [natural resource, land]: 11700 m2; lognormal variance with pedigree 0.21, pedigree (3,5,5,5,3)
- Transformation, from unspecified [natural resource, land]: 11700 m2; lognormal variance with pedigree 0.21, pedigree (3,5,5,5,3)
- Occupation, industrial area [natural resource, land]: 584000 m2*year; lognormal variance with pedigree 0.12, pedigree (3,5,5,5,3)

## Sampling procedure
estimation

## Extrapolations
none This dataset has been copied from an original dataset covering the geography RER. The uncertainty has been adjusted accordingly.

## Review by Roberto Dones 2003-07-04
Passed
