# ethylene oxide production

Dataset: EcoSpold 2, unit process
Geography: RER
Time period: 1997-01-01 to 2021-12-31
Technology level: current
Classification: EcoSpold01Categories: chemicals/organics
Classification: ISIC rev.4 ecoinvent: 2011:Manufacture of basic chemicals
Synonyms: dimethylene oxide; oxirane; 1,2-epoxyethane; dihydro-oxirene
Tags: ConvertedDataset
Scenario: Business-as-Usual
System model: Allocation, cut-off by classification
Generated by: Mike Chudacoff
Published in: Althaus H.-J. 2007
Database: ecoinvent
isCopyrightProtected: true
accessRestrictedTo: 1

## General comment
This data represents the production of 1 kg of ethylene oxide. Raw materials, auxilliaries, energy consumptions and emissions are estimated with available literature values. Infrastructure is included with a default value.
[This dataset was already contained in the ecoinvent database version 2. It was not individually updated during the transfer to ecoinvent version 3. Life Cycle Impact Assessment results may still have changed, as they are affected by changes in the supply chain, i.e. in other datasets. This dataset was generated following the ecoinvent quality guidelines for version 2. It may have been subject to central changes described in the ecoinvent version 3 change report (http://www.ecoinvent.org/database/ecoinvent-version-3/reports-of-changes/), and the results of the central updates were reviewed extensively. The changes added e.g. consistent water flows and other information throughout the database. The documentation of this dataset can be found in the ecoinvent reports of version 2, which are still available via the ecoinvent website. The change report linked above covers all central changes that were made during the conversion process.]

## Included activities start
From the reception of ethylene at the factory gate.

## Included activities end
This activity ends with 1 kg of ethylene oxide, 100% at the factory gate. The dataset includes the input materials, energy uses, infrastructure and emissions.

## Geography
RER

## Technology
Ethylene is directly oxidized with air or oxygen in the presence of a catalyst to ethylene oxide (EO). About 40% of all European EO production is converted into glycols, globally the figure is about 70%. Usually, EO and MEG are produced together at integrated plants.
Industrial production started in 1937 with a union Carbide process based on ethylene and air. In 1958 oxygen rather than air was instroduced by Shell Development Company, and today most processes are based on oxygen.
Total European production was 3.4 million tons per year in 1997, while the US produced 5.2 million tons per year. Further production capacity of at least 1.2 million tons is reported from Saudi Arabia, Kuwait, Japan and South Korea giving a total of at least 9.8 million tons of ethylene oxide production worldwide.

Ethylene oxide is a hydrocarbon compound made from ethylene and oxygen. Major manufacturers include Hoechst Celanese, Shell Chemical, and Union Carbide, among many others.
EO is produced by passing a mixture of ethylene and oxygen over a solid silver-containing catalyst. Selectivity is improved by the addition of chlorine compounds such as chloroethane. Reaction conditions are temperatures of about 200 - 300 °C and a pressure of 10 – 30 bar. The main by-products are carbon dioxide and water, formed when ethylene is fully oxidised or some of the EO is further oxidised. Ethylene glycols are formed when the reactor gases are absorbed into chilled water.
C2H4 + 1/2 O2  C2H4O (1)
C2H4 O + H2O  HO-C2H4-OH (2)
C2H4 + 3 O2  2 CO2 + 2 H2O (3)
(1) production of ethylene oxide
(2) production of MEG from EO and water
(3) production of carbon dioxide and water from oxidation of ethylene

The carbon dioxide is removed from the scrubber by absorption with hot aqueous potassium carbonate, the resulting solution is steam stripped to remove the carbon dioxide, which is vented to air. The potassium carbonate is regenerated. The carbon dioxide can be reused for inerting, or is sold, or is vented to atmosphere.
References:
IPPC Chemicals, 2002. European Commission, Directorate General, Joint Research Center, “Reference Document on Best Available Techniques in the Large Volume Organic Chemical Industry”, February 2002.
Wells, 1999. G. Margaret Wells, “Handbook of Petrochemicals and Processes”, 2nd edition, Ashgate, 1999

## Parameters
- fraction, process water, to air: 0.205 dimensionless; name fraction_PW_to_air; lognormal variance with pedigree 0.092025, pedigree (4,4,3,2,4)
  Literature value (Statistics Canada, 2007 & Shaffer, K.H., 2008, Consumptive water use in the Great Lakes Basin, USGS) (Vionnet, S., Quantis Water Database - Technical Report, 2012).

## Reference product
- ethylene oxide: 1 kg; source Wells, M. 1991; By-product classification allocatable product; CPC 34170: Ethers, alcohol peroxides, ether peroxides, epoxides, acetals and hemiacetals, and their halogenated, sulphona[…]; CAS 75-21-8
  EO is a colourless liquid or gas with a freezing point of - 112.6 °C and a boiling point of 10.4 °C. It is toxic, flammable and very reactive. This chemical is a classified suspected human carcinogen. Its vapor will cause permanent damage to the eyes and respiratory tract. Ethylene oxide gas or liquid mixed with air or an inert gas can decompose explosively. EO is highly flammable and its vapor will decompose violently at high temperatures. It is soluble in water, ethyl alcohol and many organic solvents.
  There is a broad range of applications for ethylene oxide. Over half of the EO produced worldwide is converted to ethylene glycols. The next most important outlet is the production of ethoxylates, used as surfactants in detergents.
  EO is also used to produce ethanolamines, used as a chemical intermediary and in surfactants. Other products are glycol ethers, a solvent for paints, and di- and triethylene glycols. EO is also an excellent disinfectant and sterilizing agent.
  EcoSpold01Location=RER
  production volume 1.32237 kg
    This is a placeholder value that does not reflect real-world production volumes. This dataset does not currently require a real-world production volume to work in the database framework, and no actual data were collected yet. This has no negative effect on the results of the ecoinvent database. The placeholder value of this activity was scaled according to the nominal GDP of 2005 (source: United Nations, http://data.un.org/Glossary.aspx?q=GDP+%28current+US%24%29, accessed 20130726) to reflect an appropriate share of the global production volume, which is also a placeholder value.
  property price 0.93 EUR2005
    Calculated value based on data from United Nations Commodity Trade Statistics Database (comtrade.un.org). UN comtrade category: 291010 Oxirane (ethylene oxide). Year 2005. Using exchange rate of 1EURO = 1.209 USD. Average of price of import into 5 main markets (EU, US, JP, IN and CN).
  property heating value, net 27.53 MJ
    LHV is calculated based on the elemental composition of the substance. Based on the CAS number of the substance (000075-21-8), the chemical formula of the substance is found to be: C2H4O, (PubChem 2020).
    Reference: Kim, S., Chen, J., Cheng, T., Gindulyte, A., He, J., He, S., Li, Q., Shoemaker, B. A., Thiessen, P. A., Yu, B., Zaslavsky, L., Zhang, J., & Bolton, E. E. (2019). PubChem 2019 update: improved access to chemical data. Nucleic acids research, 47(D1), D1102–D1109. https://doi.org/10.1093/nar/gky1033
  property carbon content 0.545455
    carbon content on a dry matter basis (reserved; not for manual entry)
  properties: water content 0, carbon content, non-fossil 0, carbon content, fossil 0.545455, dry mass 1 kg, wet mass 1 kg, water in wet mass 0 kg, carbon allocation 0.545455 kg

## Inputs from technosphere
- spent catalyst base from ethyleneoxide production: -0.0005 kg; source IPPC 2002; lognormal variance with pedigree 0.058125, pedigree (4,2,5,2,1)
  Literature value. The catalyst is sent to reclaimers for the silver catalyst content and is then landfilled. It is assumed that 0.5 kg catalyst base is landfilled per ton of ethylene oxide.
  EcoSpold01Location=CH
  Uncertainty: disposal of catalyst base
  production volume 0.0005 kg
    Calculated from the production volume of ethylene oxide in proportion to the respective output amounts.
  properties: dry mass 1 kg, wet mass 1 kg
- ethylene: 0.825 kg; source IPPC 2002; lognormal variance with pedigree 0.050725, pedigree (2,2,5,2,1)
  EcoSpold01Location=RER
  Estimation. Estimation from available literature sources.
  Uncertainty: precursor
  properties: carbon content, fossil 0.857143, dry mass 1 kg, wet mass 1 kg, heating value, net 43.22 MJ
- oxygen, liquid: 0.463 kg; source IPPC 2002; lognormal variance with pedigree 0.050725, pedigree (2,2,5,2,1)
  (same comment as for ethylene)
  properties: wet mass 1 kg, dry mass 1 kg
- electricity, medium voltage: 0.33 kWh; source Gendorf 2000; lognormal variance with pedigree 0.058125, pedigree (4,2,5,2,1)
  EcoSpold01Location=UCTE
  Estimation. Estimated from a large chemical plant site in Germany producing 2.05 Mt per year (intermediates included) of different chemicals.
  Uncertainty: electricity
- chemical factory, organics: 4e-10 unit; lognormal variance with pedigree 0.050725, pedigree (2,2,5,2,1)
  Estimation. Data was estimated based on the dataset "chemical plant, organics". This module assumes a built area of about 4.2 ha, an average output of 50'000 t/a, and plant life of fifty years.
  EcoSpold01Location=RER
  Uncertainty: infrastructure of a typical plant

## Inputs from nature
- Water, unspecified natural origin [natural resource, in water]: 0.000918239 m3; name water_UNO_input; source IPPC - Integrated Pollution Prevention a 2003; lognormal variance with pedigree 0.052625, pedigree (3,3,5,2,1)
  Calculated based on literature, (Vionnet, S., Quantis Water Database - Technical Report, 2012).
  property water content 9081.65; name water_content
  property carbon content, non-fossil 0; name C_content_non_fossil
  property dry mass 0.1101 kg; name DM
  property carbon content, fossil 0.0104329; name C_content_fossil
  property water in wet mass 999.89 kg; name WWM
  property wet mass 1000 kg; name WM

## Emissions to nature
- Carbon dioxide, fossil [air, urban air close to ground]: 0.21 kg; source IPPC 2002; lognormal variance with pedigree 0.050725, pedigree (2,2,5,2,1)
  Literature value.
  Uncertainty: emissions
- Water [water, unspecified]: 0.00073 m3; name water_to_water_unspecified; = water_UNO_input*(1-fraction_PW_to_air); lognormal variance with pedigree 0.0807, pedigree (2,2,5,1,1)
  Calculated value based on literature values and expert opinion. See comments in the parametres' comment field.
  property fraction, origin: fresh water 0; name fraction_origin_fresh_water_Ww
  property fraction, origin: unspecified 1; name fraction_origin_unspecified_Ww
  property fraction, origin: salt water 0; name fraction_origin_salt_water_Ww
- Ethene [air, urban air close to ground]: 0.00023 kg; source IPPC 2002; lognormal variance with pedigree 0.050725, pedigree (2,2,5,2,1)
  Literature value. Most VOC emissions are normally fugitive (valves, flanges) and from maintenance or inspections. They may also stem from small leaks in cooling systems as well as storage tank breathing losses and displacement.
  Uncertainty: emissions
- Water [air, unspecified]: 0.000188239 m3; name water_to_air_unspecified; = (water_UNO_input*fraction_PW_to_air); lognormal variance with pedigree 0.0807, pedigree (2,2,5,1,1)
  (same comment as for Water)
  property fraction, origin: salt water 0; name fraction_origin_salt_water
  property fraction, origin: fresh water 0; name fraction_origin_fresh_water
  property fraction, origin: unspecified 1; name fraction_origin_unspecified
- NMVOC, non-methane volatile organic compounds, unspecified origin [air, urban air close to ground]: 0.00024 kg; source IPPC 2002; lognormal variance with pedigree 0.050725, pedigree (2,2,5,2,1)
  (same comment as for Ethene)
- Methane, fossil [air, urban air close to ground]: 7.5e-5 kg; source IPPC 2002; lognormal variance with pedigree 0.050725, pedigree (2,2,5,2,1)
  (same comment as for Ethene)
- Ethylene oxide [air, urban air close to ground]: 2e-5 kg; source IPPC 2002; lognormal variance with pedigree 0.050725, pedigree (2,2,5,2,1)
  (same comment as for Ethene)
- TOC, Total Organic Carbon [water, surface water]: 0.0002 kg; source IPPC 2002; lognormal variance with pedigree 0.050725, pedigree (2,2,5,2,1)
  Estimation. It is assumed that the removal efficiency of EO during waste water treatment is 90%.
  Uncertainty: emissions
- Carbon monoxide, fossil [air, urban air close to ground]: 0.00011 kg; source IPPC 2002; lognormal variance with pedigree 0.050725, pedigree (2,2,5,2,1)
  Literature value.
  Uncertainty: emissions
- DOC, Dissolved Organic Carbon [water, surface water]: 0.0002 kg; source IPPC 2002; lognormal variance with pedigree 0.050725, pedigree (2,2,5,2,1)
  (same comment as for TOC, Total Organic Carbon)
- BOD5, Biological Oxygen Demand [water, surface water]: 0.00019 kg; source IPPC 2002; lognormal variance with pedigree 0.050725, pedigree (2,2,5,2,1)
  (same comment as for TOC, Total Organic Carbon)
- COD, Chemical Oxygen Demand [water, surface water]: 0.00019 kg; source IPPC 2002; lognormal variance with pedigree 0.050725, pedigree (2,2,5,2,1)
  Estimation. It is assumed that the removal efficiency for EO during waste water treatment is 90%.
  Uncertainty: emissions

## Extrapolations
This dataset has been extrapolated from year 2000 to the year of the calculation (2021). The uncertainty has been adjusted accordingly.

## Review by Heiko Kunst 2003-08-06
Passed.

## Review by Emilia Moreno Ruiz 2012-05-13
trainee DS, ok, Helen Hamilton
