# nickel mine operation and benefication to nickel concentrate, 16% Ni

Dataset: EcoSpold 2, unit process
Geography: CA-QC
Time period: 2010-01-01 to 2021-12-31
Technology level: current
Classification: ISIC rev.4 ecoinvent: 2420:Manufacture of basic precious and other non-ferrous metals
Scenario: Business-as-Usual
System model: Allocation, cut-off by classification
Share of production covered: 100 %
Generated by: Catherine Reid
Database: ecoinvent
isCopyrightProtected: true
accessRestrictedTo: 1

## General comment
This dataset represents the production of 1 kg of nickel ore, beneficiated to 16% Ni in Quebec (Canada) for the year 2010.
This dataset is a disagreggation of the existing dataset ''nickel mine operation, sulfidic ore'', which contains smelting and refining on top of the mine operation. The disagreggation was done because primary data was available for nickel mine operation but not for subsequent stages of smelting and refining. Thus, the production volume of this dataset is already included in the global dataset ''nickel mine operation, sulfidic ore, GLO''. Until data on smelting and refining become available, this dataset cannot be used as part of a life cycle assessment.
The concentrate produced is composed of 16% Ni; 4% Cu; 0.24% Co; 0.61 g/t Au; 10.84 g/t Ag; 2.8 g/t Pt; 9.68 g/t Pd; 0.95 g/t Rh.
The sulfidic nickel ore is extracted in an underground mine, where 7.21 kg of ore are extracted per kg of concentrate produced. The recovery rate (metal in ore/metal in the concentrate) is 90% for Ni and 82% for Cu.
The concentrate produced is sent to a smelter located in Ontario (Canada) and to a refinery located in Norway (both excluded).
No specific data were available except for some emissions to water and air publicly available. Most of the data were taken from the Environmental Impact Assessment of the only Nickel mine in Quebec dated from 1993 and converted with a conversion factor (ore mined in 2010/expected amount of ore according to ElA). Some extrapolations were made based on ecoinvent datasets.

## Included activities start
Mining process starting from nickel ore, in ground.

## Included activities end
This activity ends at the gate of the beneficiation plant.
The dataset includes the extraction of nickel ore in an underground mine and it's benefication, management of tailings and waste rocks and wastewater treatment.
The dataset does not include the end of life of the wasterwater sludge (no information available).

## Geography
This module represents the production of nickel concentrate in the Québec region.

## Technology
Mining is done underground, followed by beneficiation. Overburden (2.67 kg/kg concentrate) and tailings (6.99 kg/kg concentrate) are disposed on the mining site.

## Time period
The dataset represent the activity in 2010. Uncertainty has been adjusted accordingly.

## Parameters
- fraction, process water, to air: 0.15 dimensionless; name fraction_PW_to_air; lognormal variance with pedigree 0.092025, pedigree (4,4,3,2,4)
  Literature value. In case when no industry/process specific data are available, default evaporation fraction value is used. This value is 15% and is based on literature (Statistics Canada, 2007 & Shaffer, K.H., 2008, Consumptive water use in the Great Lakes Basin, USGS & Shiklomanov, 2003, World Water Resources at the Beginning of the 21st Century) and has been approved by an expert.

## Reference product
- nickel concentrate, 16% Ni: 1 kg; name ref_kg; CPC 14220: Nickel ores and concentrates; By-product classification allocatable product
  Calculated Value : nickel produced (measurement) divided by the share of nickel in concentrate (estimation taken from the Environmental Impact Assessment).
  production volume 1.77416e8 kg; name PV_Quebec
    Calculated Value based on the amount of metals produce in the concentrate for the year 2010 and an estimation of the concentration characterization taken from the Environmental Impact Assessment.
    The production volume of this dataset is already included in the global dataset ''nickel mine operation, sulfidic ore, GLO''.
  property dry mass 1 kg; name ref_kg_DM
  property water content 0; name ref_kg_water_content
  property carbon content, fossil 0; name ref_kg_C_content_fossil
    fossil carbon content on a dry matter basis
  property wet mass 1 kg; name ref_kg_WM
  property recovery rate 0.8198; name recovery_rate_Cu
    Estimation. Recuperation rate for copper used to calculate amount of gold, silver, platinum, palladium and rhodium in ore.
  property cobalt content 0.0024; name ref_kg_Co_content
    cobalt content on a dry matter basis.
    Estimation of the concentrate caracterisation taken from the Environmental Impact Assessment.
  property water in wet mass 0 kg; name ref_kg_WWM
  property gold content 6.1e-7; name ref_kg_Au_content
    gold content on a dry matter basis.
    Estimation of the concentrate caracterisation taken from the Environmental Impact Assessment.
  property palladium content 9.68e-6; name ref_kg_Pd_content
    palladium content on a dry matter basis.
    Estimation of the concentrate caracterisation taken from the Environmental Impact Assessment.
  property price 1.71515 EUR2005; name ref_kg_price_EUR2005
    Price calculated as:
    Price = (Ni content * Ni price) Treatment costs [TC] Refining costs [RC] Delivery costs Penalties.
    Equation source: Devlin (2015)
    Price data were taken from USGS (2020) and represent 5-year market averages (2015-2019). TC and RC data were taken from Díaz-Borrego et al. (2019) and represent 3-year market averages (2015-2017) for copper, which was used as a proxy here. Penalties and Delivery costs were assumed to be zero. Prices converted to EUR2005 (USD2019/EUR2005 exchange rate: 0.62; Official Data Foundation [2020] and Macrotrends [2020]).
    References:
    Devlin, D. (2015). Mineral product pricing study [Online]. Available from: https://www.imf.org/external/spanish/np/seminars/2015/andean/pdf/sesion5-devlin-en.pdf [Accessed 28/07/2020]
    Díaz-Borrego et al. (2019; https://doi.org/10.1155/2019/8523748)
    Official Data Foundation (2020). Inflation Calculator [Online]. Available from: https://www.officialdata.org/us/inflation/2005?endYear=2019&amount=1 [Accessed 28/07/2020]
    USGS (2020). Mineral Commodity Summaries 2020 [Online]. Available from: https://pubs.usgs.gov/periodicals/mcs2020/mcs2020.pdf [Accessed 28/07/2020]
    Macrotrends (2020). Euro Dollar Exchange Rate (EUR USD) - Historical Chart [Online]. Available from: https://www.macrotrends.net/2548/euro-dollar-exchange-rate-historical-chart [Accessed 28/07/2020]
  property platinum content 2.8e-6; name ref_kg_Pt_content
    platinum content on a dry matter basis.
    Estimation of the concentrate caracterisation taken from the Environmental Impact Assessment.
  property copper content 0.04; name ref_kg_Cu_content
    copper content on a dry matter basis.
    Estimation of the concentrate caracterisation taken from the Environmental Impact Assessment.
  property carbon content, non-fossil 0; name ref_kg_C_content_non_fossil
    biogene carbon content on a dry matter basis
  property nickel content 0.16; name ref_kg_Ni_content
    nickel content on a dry matter basis.
    Estimation of the concentrate caracterisation taken from the Environmental Impact Assessment.
  property rhodium content 9.5e-7; name ref_kg_Rh_content
    rhodium content on a dry matter basis.
    Estimation of the concentrate caracterisation taken from the Environmental Impact Assessment.
  property silver content 1.08e-5; name ref_kg_Ag_content
    silver content on a dry matter basis.
    Estimation of the concentrate caracterisation taken from the Environmental Impact Assessment.
  property carbon content 0
    carbon content on a dry matter basis (reserved; not for manual entry)
  properties: carbon allocation 0 kg

## Inputs from technosphere
- foaming agent: 0.0003607 kg; lognormal variance with pedigree 0.0426, pedigree (3,1,5,1,1)
  Calculated Values based on the Environmental Impact Assessment and a conversion factor (ore mined in 2010/expected amount of ore according to ElA).
  Proxy for foaming agent MIBC.
  property water in wet mass 0.13 kg; name foaming_agent_WWM
  property dry mass 0.87 kg; name foaming_agent_DM
  property wet mass 1 kg; name foaming_agent_WM
  properties: heating value, net 17.93 MJ, carbon content, non-fossil 0.69224, water content 0.149425
  note on carbon content, non-fossil: 'Soap (CnH2n+1 COO Na) is produced by a combined saponification and neutralisation process performed on a blend of oleochemical feedstocks comprised of short chain (C12-14, derived from coconut or palm kernel oil) and long chain (C16-18, from tallow or palm oil) esters.The ratio of short to long fatty acid chains is 20:80 (ecoinvent v2.2 report 12). Short fatty acid has been estimated as C12.5H(2*12.5+1); MW R=176 g/mol. Long fatty acid has been estimated as C16H(2*16+1); MW R=225 g/mol. MW of COONa=67 g/mol.' as cited for soap reference product in ecoinvent v3.01 dataset 'soap production, GLO 1995'.
- diesel, burned in building machine: 1.945 MJ; = fuel_input_diesel_buildingmachine*density_diesel_buildingmachine*UnitConversion(1, 'm3', 'l')*Net_heat_value_diesel_buildingmachine*42.8; lognormal variance with pedigree 0.008, pedigree (1,1,4,1,1)
  Calculated Value: Stands for the diesel consumption of the mobile equipment used for exploitation like drilling machines, scoop trams and underground trucks. Also, the infrastructure of the machines is included. See exchanges properties for details.
  Uncertainty: C
  property heating value, net 1 MJ; name Net_heat_value_diesel_buildingmachine
  property density 0.84 kg/l; name density_diesel_buildingmachine
  property fuel input in physical units, m3 5.41e-5 m3; name fuel_input_diesel_buildingmachine
  note on heating value, net: Net (lower) heating (calorific) value. Value Taken from Table 5.1 of report 'Overview and methodology, Data quality guideline for the ecoinvent database version 3' (ecoinvent report No. 1 (v3), 2011)
  note on density: Density value. Value Taken from Table 5.1 of report 'Overview and methodology, Data quality guideline for the ecoinvent database version 3' (ecoinvent report No. 1 (v3), 2011)
  note on fuel input in physical units, m3: Calculated Value based on the Environmental Impact Assessment and a conversion factor (ore mined in 2010/expected amount of ore according to ElA).
- diesel, burned in diesel-electric generating set, 10MW: 0.165732 MJ; = fuel_input_diesel_generatorset*density_diesel_generatorset*UnitConversion(1, 'm3', 'l')*Net_heat_value_diesel_generatorset; lognormal variance with pedigree 0.008, pedigree (1,1,4,1,1)
  Calculated Value. See exchanges properties for details.
  Uncertainty: C
  property density 0.84 kg/l; name density_diesel_generatorSet
  property heating value, net 1 MJ; name Net_heat_value_diesel_generatorSet
  property fuel input in physical units, m3 0.0001973 m3; name fuel_input_diesel_generatorSet
- sand: 3.00079 kg; = 532387648/PV_Quebec; lognormal variance with pedigree 0.0526, pedigree (3,1,5,5,3)
  Calculated value based on nickel, 99.5% dataset (ecoinvent v2).
  ecoinvent v2 dataset:
  extracted mineral: 110t
  sand required: 45,6t
  sand required per extracted mineral: 416kg/t
  extracted mineral in Quebec mine:1279778 t
  total required sand: 416*1279778=532387648kg
  properties: wet mass 1 kg, dry mass 1 kg
- lime, hydrated, packed: 0.0004508 kg; lognormal variance with pedigree 0.0426, pedigree (3,1,5,1,1)
  Calculated Value based on the Environmental Impact Assessment and a conversion factor (ore mined in 2010/expected amount of ore according to ElA).
  properties: wet mass 1 kg, dry mass 0.997 kg, water content 0.00300903
- carboxymethyl cellulose, powder: 0.002128 kg; lognormal variance with pedigree 0.0426, pedigree (3,1,5,1,1)
  Calculated Values based on the Environmental Impact Assessment and a conversion factor (ore mined in 2010/expected amount of ore according to ElA).
  Used as a dispersant.
  properties: heating value, net 20.19 MJ, dry mass 1 kg, carbon content, non-fossil 0.293878, wet mass 1 kg, carbon content, fossil 0.0979592
- soda ash, dense: 0.02795 kg; lognormal variance with pedigree 0.0426, pedigree (3,1,5,1,1)
  Calculated Value based on the Environmental Impact Assessment and a conversion factor (ore mined in 2010/expected amount of ore according to ElA).
  Used as a ph regulator .
  properties: carbon content, fossil 0.113208, dry mass 1 kg, wet mass 1 kg, heating value, net 3.43 MJ
- ammonium nitrate: 0.00558434 kg; = (input_ammoniumNitrate*N_content_ammoniumNitrate)*2.85731828339295; lognormal variance with pedigree 0.008, pedigree (1,1,4,1,1)
  The exchange has been updated from 'ammonium nitrate, as N' into 'ammonium nitrate' and therefore its amount has been scaled (multiplied) from 0.002 kg by 2.8573 kg of 'ammonium nitrate' per kg of 'ammonium nitrate, as N'. Original comment of the exchange is: Estimation based on ''iron mine operation and iron ore benefication to 65% Fe, Québec 2011'' dataset (based on the extracted ore).
  Assumption : use of explosive Anfo.
  Uncertainty: C
  property input_kg 0.005584 kg; name input_ammoniumNitrate
  property N content 0.35; name N_content_ammoniumNitrate
  properties: wet mass 1 kg, dry mass 1 kg
  note on input_kg: Estimation based on ''iron mine operation and iron ore benefication to 65% Fe, Québec 2011'' dataset (based on the extracted ore).
- mine infrastructure, underground, non-ferrous metal: 1.127e-10 unit; lognormal variance with pedigree 0.358, pedigree (4,1,5,5,3)
  Extrapolation based on mine life time of the underground mine dataset which is 50 years.
- sulfidic tailings, from nickel mine operation: -6.988 kg; name sulfidicTailing_kg; lognormal variance with pedigree 0.0426, pedigree (3,1,5,1,1)
  Calculated Value based on the Environmental Impact Assessment and a conversion factor (ore mined in 2010/expected amount of ore according to ElA).
  The sulfidic tailings, off-site dataset is used as a proxy, composition of leachage to water may not fully correspond. For the modelled mine, sulfidic tailings remain on site. The landuse in the tailing dataset is much smaller than the one of the modelled mine. Landuse is hence directly added in this mine operation dataset.
  production volume 1.23978e9 kg; = PV_Quebec * (sulfidicTailing_kg / ref_kg)
    Calculated from production volume of reference product using the relative outputs.
  property price 0 EUR2005; name sulfidicTailing_kg_price_EUR2005
  properties: sodium content 0.0014472, aluminium content 0.014738, silicon content 0.053273, oxygen content 0.89057, potassium content 0.0025181, calcium content 0.0045972, water content 0.428571, magnesium content 0.0022359, dry mass 0.7 kg, wet mass 1 kg, iron content 0.015374, carbon content, fossil 0.0087785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
- diesel, low-sulfur: 0.0003564 kg; lognormal variance with pedigree 0.0572, pedigree (4,1,4,4,4)
  Calculated Value based on this estimation : the explosive Anfo is made of about 94 percent of ammonium nitrate and 6 percent of diesel.
  Assumption : diesel low sulfur.
  properties: carbon content, fossil 0.865, heating value, net 42.8 MJ, wet mass 1 kg, dry mass 1 kg
- lubricating oil: 0.000175086 kg; = (input_lubricating_oil*density_lubricating_oil)+input_grease; lognormal variance with pedigree 0.008, pedigree (1,1,4,1,1)
  Calculated Value. See exchange properties for details.
  Uncertainty: C
  property input 0.0001894 l; name input_lubricating_oil
  property density 0.9 kg/l; name density_lubricating_oil
  property input_kg 4.626e-6 kg; name input_grease
  properties: heating value, net 40.2 MJ, carbon content, fossil 0.75, dry mass 1 kg, wet mass 1 kg
  note on heating value, net: Literature value, Source: IPCC 2006, 2006 IPCC Guidelines for National Greenhouse Gas Inventories, Prepared by the National Greenhouse Gas Inventories Programme, Eggleston H.S., Buendia L., Miwa K., Ngara T. and Tanabe K. (eds). Published: IGES, Japan
  note on carbon content, fossil: Lubricating oil is produced from diesel. C-content/dry mass of fats and oils considered 75%, from: ecoinvent v2.2 report, n 15a, pg 40
  note on density: Taken directly from http://www.engineeringtoolbox.com/liquids-densities-d_743.html.
- ethylene glycol: 1.596e-6 kg; lognormal variance with pedigree 0.0486, pedigree (4,1,5,1,1)
  Calculated Values based on the Environmental Impact Assessment and a conversion factor (ore mined in 2010/expected amount of ore according to ElA).
  Reported as anti-freeze.
  Raw data gives the amount of anti-freeze. It was assume a 60% ethylene glycol solution (% by volume), as its freezing point is -55 C (dilution water is neglected as it is marginal compared to the global amount of water consumed on site) (source : http://www.engineeringtoolbox.com/ethylene-glycol-d_146.html).
  properties: dry mass 1 kg, carbon content, fossil 0.387097, wet mass 1 kg, heating value, net 23.44 MJ
- chemical, inorganic: 0.00211 kg; lognormal variance with pedigree 0.0426, pedigree (3,1,5,1,1)
  Calculated Values based on the Environmental Impact Assessment and a conversion factor (ore mined in 2010/expected amount of ore according to ElA).
  Proxy for collector AX350 (79%) and coagulant Percol 368 (cationic polydiallyldimethyl ammonium chloride) (21%).
  properties: dry mass 1 kg, wet mass 1 kg, carbon content, fossil 0.003
  note on carbon content, fossil: This dataset is an unweighted average of 20 inorganic substances (listed in Tab 88.1, ecoinvent v2.2 report 8, part II), being part of the top100 chemicals included in this database. The C-content has also been calculated as an unweighted average of the C content of the substances composing this dataset.
- polyacrylamide: 0.0003607 kg; lognormal variance with pedigree 0.0426, pedigree (3,1,5,1,1)
  Calculated Values based on the Environmental Impact Assessment and a conversion factor (ore mined in 2010/expected amount of ore according to ElA).
  Reported as Floculant Percol 155.
  property molecular weight 0 g/mol; name C3H5NO_mol_weight
  properties: heating value, net 23.88 MJ, dry mass 1 kg, carbon content, fossil 0.51, wet mass 1 kg
  note on molecular weight: Taken from http://chem.sis.nlm.nih.gov/chemidplus/rn/79-06-1.
- cement, alternative constituents 21-35%: 0.238 kg; lognormal variance with pedigree 0.0526, pedigree (3,1,5,5,3)
  Extrapolation of the dataset 'nickel mine operation, sulfidic ore' based on the amount of extracted ore.
  property carbon content, fossil 0; name ceme_C_content_fossil
  property carbon content, non-fossil 0; name ceme_C_content_non_fossil
  property dry mass 1 kg; name ceme_DM
  property water content 0; name ceme_water_content
  property water in wet mass 0 kg; name ceme_WWM
  property wet mass 1 kg; name ceme_WM

## Inputs from nature
- Copper, in ground [natural resource, in ground]: 0.04905 kg; source Ressources naturelles Québec 2011; lognormal variance with pedigree 0.658, pedigree (1,1,4,1,1)
  680 ppm Cu in ore; Measured Value. Real concentration in ore is 0.68%.
- Cobalt, in ground [natural resource, in ground]: 0.003607 kg; source Ressources naturelles Québec 2010; lognormal variance with pedigree 0.658, pedigree (1,1,4,1,1)
  500 ppm Co in ore; Measured Value (year 2009). Real concentration in ore is 0.05%.
- Platinum, in ground [natural resource, in ground]: 3.41547e-6 kg; = ref_kg_Pt_content/recovery_rate_Cu; lognormal variance with pedigree 0.008, pedigree (1,1,4,1,1)
  4.7 ppb Pt in ore; Calculated Value. Amount not known, hence calculated based on the concentrate composition and the recuperation rate for copper (0.8198).
  Uncertainty: C
- Palladium, in ground [natural resource, in ground]: 1.18078e-5 kg; = ref_kg_Pd_content/recovery_rate_Cu; lognormal variance with pedigree 0.008, pedigree (1,1,4,1,1)
  16 ppb Pd in ore; Calculated Value. Amount not known, hence calculated based on the concentrate composition and the recuperation rate for copper (0.8198).
  Uncertainty: C
- Rhodium, in ground [natural resource, in ground]: 1.15882e-6 kg; = ref_kg_Rh_content/recovery_rate_Cu; lognormal variance with pedigree 0.008, pedigree (1,1,4,1,1)
  1.6 ppb Rh in ore; Calculated Value. Amount not known, hence calculated based on the concentrate composition and the recuperation rate for copper (0.8198).
  Uncertainty: C
- Silver, in ground [natural resource, in ground]: 1.31739e-5 kg; = ref_kg_Ag_content/recovery_rate_Cu; lognormal variance with pedigree 0.008, pedigree (1,1,4,1,1)
  18 ppb Ag in ore; Calculated Value. Amount not known, hence calculated based on the concentrate composition and the recuperation rate for copper (0.8198).
  Uncertainty: C
- Gold, in ground [natural resource, in ground]: 7.44084e-7 kg; = ref_kg_Au_content/recovery_rate_Cu; lognormal variance with pedigree 0.008, pedigree (1,1,4,1,1)
  0.1 ppb Au in ore; Calculated Value. Amount not known, hence calculated based on the concentrate composition and the recuperation rate for copper (0.8198).
  Uncertainty: C
- Water, river [natural resource, in water]: 0.007035 m3; name water_river_input; lognormal variance with pedigree 0.0426, pedigree (3,1,5,1,1)
  (same comment as for lime, hydrated, packed)
- Transformation, to industrial area [natural resource, land]: 0.0009285 m2; = surface_kg; lognormal variance with pedigree 0.008, pedigree (1,1,4,1,1)
  Calculated Value. See comments in the exchange properties.
  Uncertainty: C
- Nickel, in ground [natural resource, in ground]: 0.1767 kg; source Ressources naturelles Québec 2011; lognormal variance with pedigree 0.658, pedigree (1,1,4,1,1)
  2.5% Ni in ore; Measured Value. Real concentration in ore is 2.45%.
- Occupation, industrial area [natural resource, land]: 0.03714 m2*year; = surface_kg*lifetime; lognormal variance with pedigree 0.008, pedigree (1,1,4,1,1)
  Calculated Value. See comments in the exchange properties.
  Uncertainty: C
  property lifetime 40 year; name lifetime
- Transformation, from unspecified [natural resource, land]: 0.0009285 m2; = surface_kg; lognormal variance with pedigree 0.008, pedigree (1,1,4,1,1)
  Calculated Value. See comments in the exchange properties.
  Uncertainty: C
  property Surface 0.0009285 m2; name surface_kg

## Emissions to nature
- Arsenic [air, non-urban air or from high stacks]: 9.582e-9 kg; lognormal variance with pedigree 0.658, pedigree (1,1,4,1,1)
  Measured Value. National Pollutant Release Inventory (NPRI), 2010. This is Canada's legislated, publicly accessible inventory of pollutant releases (to air, water and land), disposals and transfers for recycling.
  http://www.ec.gc.ca/inrp-npri/
- Nickel, ion [water, surface water]: 2.745e-6 kg; lognormal variance with pedigree 0.658, pedigree (1,1,4,1,1)
  Measured Value. National Pollutant Release Inventory (NPRI), 2010. This is Canada's legislated, publicly accessible inventory of pollutant releases (to air, water and land), disposals and transfers for recycling.
  http://www.ec.gc.ca/inrp-npri/
  In dataset ''sulfidic tailing, off-site'' only emissions via bottom leaching are considered. Hence, emissions to water contained in the final effluent are added.
- Dinitrogen monoxide [air, non-urban air or from high stacks]: 4.555e-5 kg; lognormal variance with pedigree 0.0486, pedigree (2,1,4,1,1)
  Calculated Value. National Pollutant Release Inventory (NPRI), 2010. This is Canada's legislated, publicly accessible inventory of pollutant releases (to air, water and land), disposals and transfers for recycling.
  http://www.ec.gc.ca/inrp-npri/
  Dinitrogen monoxide emissions from diesel burning processes were substracted from the value measured on site.
- Lead [water, surface water]: 1.296e-8 kg; lognormal variance with pedigree 0.658, pedigree (1,1,4,1,1)
  (same comment as for Nickel, ion)
- Lead [air, non-urban air or from high stacks]: 2.948e-9 kg; lognormal variance with pedigree 0.658, pedigree (1,1,4,1,1)
  (same comment as for Arsenic)
- Manganese [water, surface water]: 4.622e-7 kg; lognormal variance with pedigree 0.658, pedigree (1,1,4,1,1)
  (same comment as for Nickel, ion)
- Mercury [water, surface water]: 3.382e-10 kg; lognormal variance with pedigree 0.658, pedigree (1,1,4,1,1)
  (same comment as for Nickel, ion)
- Phosphorus [water, surface water]: 9.357e-7 kg; lognormal variance with pedigree 0.048, pedigree (1,1,4,1,1)
  (same comment as for Nickel, ion)
- Zinc, ion [water, surface water]: 4.509e-8 kg; lognormal variance with pedigree 0.658, pedigree (1,1,4,1,1)
  (same comment as for Nickel, ion)
- Arsenic, ion [water, surface water]: 3.326e-8 kg; lognormal variance with pedigree 0.658, pedigree (1,1,4,1,1)
  (same comment as for Nickel, ion)
- Copper, ion [water, surface water]: 4.509e-8 kg; lognormal variance with pedigree 0.658, pedigree (1,1,4,1,1)
  (same comment as for Nickel, ion)
- Cadmium, ion [water, surface water]: 3.85e-9 kg; lognormal variance with pedigree 0.658, pedigree (1,1,4,1,1)
  (same comment as for Nickel, ion)
- Chromium, ion [water, surface water]: 2.818e-8 kg; lognormal variance with pedigree 0.658, pedigree (1,1,4,1,1)
  (same comment as for Nickel, ion)
- Cobalt [water, surface water]: 2.255e-8 kg; lognormal variance with pedigree 0.658, pedigree (1,1,4,1,1)
  (same comment as for Nickel, ion)
- Manganese [air, non-urban air or from high stacks]: 2.818e-8 kg; lognormal variance with pedigree 0.658, pedigree (1,1,4,1,1)
  (same comment as for Arsenic)
- Nitrate [water, surface water]: 6.2e-5 kg; lognormal variance with pedigree 0.048, pedigree (1,1,4,1,1)
  (same comment as for Nickel, ion)
- Methane, fossil [air, non-urban air or from high stacks]: 0.0001284 kg; lognormal variance with pedigree 0.0486, pedigree (2,1,4,1,1)
  Calculated Value. National Pollutant Release Inventory (NPRI), 2010. This is Canada's legislated, publicly accessible inventory of pollutant releases (to air, water and land), disposals and transfers for recycling.
  http://www.ec.gc.ca/inrp-npri/
  Methane emissions from diesel burning processes were substracted from the value measured on site.
- Water [water, unspecified]: 0.007035 m3; name water_to_water_unspecified; = water_river_input; lognormal variance with pedigree 0.0486, pedigree (4,1,5,1,1)
  Estimation Value based on the amount of water entering the process. Water going throught the water treatment is higher because of the additionnal rain water.
  property water in wet mass 1000 kg; name water_WWM
  property carbon content, non-fossil 0; name C_content_non_fossil
  property carbon content, fossil 0; name C_content_fossil
  property dry mass 0 kg; name water_DM
  property wet mass 1000 kg; name water_WM
- Mercury [air, non-urban air or from high stacks]: 9.582e-11 kg; lognormal variance with pedigree 0.658, pedigree (1,1,4,1,1)
  (same comment as for Arsenic)

## Sampling procedure
Estimations (Environmental Impact Assessment), specific data (National Pollutant Release Inventory (NPRI)) and extrapolation based on ecoinvent datasets.

## Extrapolations
This dataset has been extrapolated from year 2010 to the year of the calculation (2021). The uncertainty has been adjusted accordingly.
