# maize silage production, Swiss integrated production, intensive

Dataset: EcoSpold 2, unit process
Geography: CH
Time period: 1996-01-01 to 2021-12-31
Technology level: current
Classification: ISIC rev.4 ecoinvent: 0119:Growing of other non-perennial crops
Synonyms: corn silage; Zea mays L.
Scenario: Business-as-Usual
System model: Allocation, cut-off by classification
Generated by: Thomas Nemecek
Published in: Nemecek, T. 2007
Database: ecoinvent
isCopyrightProtected: true
accessRestrictedTo: 1

## General comment
This dataset represents the production of 1 kg of maize silage (fresh matter). The yield is 61457 kg/ha at a moisture content at storage of 72%.
[This dataset was already contained in the ecoinvent database version 2. It was not individually updated during the transfer to ecoinvent version 3. Life Cycle Impact Assessment results may still have changed, as they are affected by changes in the supply chain, i.e. in other datasets. This dataset was generated following the ecoinvent quality guidelines for version 2. It may have been subject to central changes described in the ecoinvent version 3 change report (http://www.ecoinvent.org/database/ecoinvent-version-3/reports-of-changes/), and the results of the central updates were reviewed extensively. The changes added e.g. consistent water flows and other information throughout the database. The documentation of this dataset can be found in the ecoinvent reports of version 2, which are still available via the ecoinvent website. The change report linked above covers all central changes that were made during the conversion process.]

## Included activities start
This activity starts after the harvest of the previous crop. The inputs of seeds, mineral fertilisers and pesticides are considered. Farm manure as an organic fertiliser is only accounted for in terms of direct field emissions; all pre-processes are included in the animal production systems.

## Included activities end
The dataset includes all machine operations and corresponding machine infrastructure and sheds. Machine operations are: soil cultivation, sowing, fertilisation, weed control, pest and pathogen control, harvest ('chopping') and transport from field to farm (1 km; 'fodder loading'). Further, direct field emissions are included. The cultivation of green manure during winter before sowing maize is also included. This activity ends after harvest at the farm gate.

## Geography
Refers to an average production in the Swiss lowlands.

## Technology
Integrated production

## Time period
The yield data have been collected for the years 1996-2003.

## Parameters
- fraction, irrigation water, to ground water: 0.8 dimensionless; name fraction_IW_to_ground_water; lognormal variance with pedigree 0.0886, pedigree (4,3,1,1,4)
  Literature value (Döll, 2011) cross referenced with expert opinion.
- fraction, irrigation water to surface water: 0.2 dimensionless; name fraction_IW_to_surface_water; lognormal variance with pedigree 0.0886, pedigree (4,3,1,1,4)
  Literature value (Döll, 2011) cross referenced with expert opinion.
- fraction, irrigation water, to air: 0.3353 dimensionless; name fraction_IW_to_air; lognormal variance with pedigree 0.0409, pedigree (2,2,2,1,1)
  Literature value (Siebert, 2010) (Vionnet, S., Quantis Water Database - Technical Report, 2012).

## Reference product
- maize silage, Swiss integrated production: 1 kg; name REF_PRODUCT; By-product classification allocatable product; CPC 01911: Maize for forage and silage
  production volume 2.6078e9 kg
    CH prod of silage maize: 42433 ha in 2004.
    42433 ha at 61457 kg / ha at 72% water on a wet mass basis
  property price 0.017 EUR2005; name REF_PRODUCT_price_EUR2005
    Based on Roland P. Freund, retired Farm Management Agent, text [http://extension.psu.edu/business/farm/management/financial-management/calculators/corn-silage/guide]
  property energy content 5.32 MJ; name REF_PRODUCT_energy_content
    See chapter 'Product Properties' in '01_crop production - yields & inputs CH & Europe_v1.0.pdf', section 'AGRICULTURAL PRODUCTION IN SWITZERLAND' - pdf-document on the dedicated talk page of ecoinvent (www.ecoinvent.org/documentation)
  property carbon content, non-fossil 0.44612; name REF_PRODUCT_C_content_non_fossil
    biogene carbon content on a dry matter basis
    Composition data obtained from Corn Silage Milk Stage, in (http://beefmagazine.com/images/2009%20feed%20table.pdf). First, composition data were refered to 1 kg dry mass. Then, C-contents were calculated considering a C-content/dry mass of 46% in carbohydrates (including fibres), 53% in proteins and 75% in fats. All data from 'Evolutionary and Biochemical Aspects', A.D. Kay and T. Vrede (in Global Ecology, 2010, Elsevier B.V., S.E. Jørgensen Ed.).
  property dry mass 0.28 kg; name REF_PRODUCT_DM
  property carbon content 0.44612
    carbon content on a dry matter basis (reserved; not for manual entry)
  properties: carbon content, fossil 0, wet mass 1 kg, water in wet mass 0.72 kg, water content 2.57143, carbon allocation 0.124914 kg

## Inputs from technosphere
- fertilising, by broadcaster: 4.8814e-5 ha; lognormal variance with pedigree 0.0406, pedigree (2,1,5,1,1)
  See chapter 'Yields and Inputs of Arable Crop Production' in '01_crop production - yields & inputs CH & Europe_v1.0.pdf', section 'AGRICULTURAL PRODUCTION IN SWITZERLAND' - pdf-document on the dedicated talk page of ecoinvent (www.ecoinvent.org/documentation)
  This exchange has an activity link directly to the producing activity because the product is primarily consumed in the same geographical area where it is produced.
- liquid manure spreading, by vacuum tanker: 0.00038617 m3; lognormal variance with pedigree 0.0406, pedigree (2,1,5,1,1)
  (same comment as for fertilising, by broadcaster)
- phosphate rock, beneficiated: 0.000837906 kg; lognormal variance with pedigree 0.0406, pedigree (2,1,5,1,1)
  The exchange has been updated from 'phosphate rock, as P2O5, beneficiated, dry' into 'phosphate rock, beneficiated' and therefore its amount has been scaled (multiplied) from 0.0003 kg by 3.125 kg of 'phosphate rock, beneficiated' per kg of 'phosphate rock, as P2O5, beneficiated, dry'. Original comment of the exchange is: See chapter 'Yields and Inputs of Arable Crop Production' in '01_crop production - yields & inputs CH & Europe_v1.0.pdf', section 'AGRICULTURAL PRODUCTION IN SWITZERLAND' - pdf-document on the dedicated talk page of ecoinvent (www.ecoinvent.org/documentation)
  See chapter 'Yields and Inputs of Arable Crop Production' in '01_crop production - yields & inputs CH & Europe_v1.0.pdf', section 'AGRICULTURAL PRODUCTION IN SWITZERLAND' - pdf-document on the dedicated talk page of ecoinvent (www.ecoinvent.org/documentation)
  properties: wet mass 1 kg, dry mass 1 kg
- hoeing: 1.6271e-5 ha; lognormal variance with pedigree 0.0406, pedigree (2,1,5,1,1)
  (same comment as for fertilising, by broadcaster)
- maize seed, Swiss integrated production, for sowing: 0.00043933 kg; name SEED; lognormal variance with pedigree 0.0406, pedigree (2,1,5,1,1)
  See chapter 'Yields and Inputs of Arable Crop Production' in '01_crop production - yields & inputs CH & Europe_v1.0.pdf', section 'AGRICULTURAL PRODUCTION IN SWITZERLAND' - pdf-document on the dedicated talk page of ecoinvent (www.ecoinvent.org/documentation)
  See chapter 'Yields and Inputs of Arable Crop Production' in '01_crop production - yields & inputs CH & Europe_v1.0.pdf', section 'AGRICULTURAL PRODUCTION IN SWITZERLAND' - pdf-document on the dedicated talk page of ecoinvent (www.ecoinvent.org/documentation)
  property dry mass 0.88 kg; name SEED_DM
  property carbon content, non-fossil 0.46957; name SEED_C_content_non_fossil
  property energy content 15.9272 MJ; name SEED_energy_content
  properties: water content 0.136364, wet mass 1 kg
  note on carbon content, non-fossil: biogene carbon content on a dry matter basis Composition data obtained from Corn Grain Whole, in (http://beefmagazine.com/images/2009%20feed%20table.pdf). First, composition data were refered to 1 kg dry mass. Then, C-contents were calculated considering a C-content/dry mass of 46% in carbohydrates (including fibres), 53% in proteins and 75% in fats. All data from 'Evolutionary and Biochemical Aspects', A.D. Kay and T. Vrede (in Global Ecology, 2010, Elsevier B.V., S.E. Jørgensen Ed.).
  note on energy content: See chapter 'Product Properties' in '01_crop production - yields & inputs CH & Europe_v1.0.pdf', section 'AGRICULTURAL PRODUCTION IN SWITZERLAND' - pdf-document on the dedicated talk page of ecoinvent (www.ecoinvent.org/documentation)
- chopping, maize: 1.6271e-5 ha; lognormal variance with pedigree 0.0406, pedigree (2,1,5,1,1)
  (same comment as for maize seed, Swiss integrated production, for sowing)
- potassium chloride: 0.00276437 kg; lognormal variance with pedigree 0.0406, pedigree (2,1,5,1,1)
  The exchange has been updated from 'potassium chloride, as K2O' into 'potassium chloride' and therefore its amount has been scaled (multiplied) from 0.0017 kg by 1.5829 kg of 'potassium chloride' per kg of 'potassium chloride, as K2O'. Original comment of the exchange is: See chapter 'Yields and Inputs of Arable Crop Production' in '01_crop production - yields & inputs CH & Europe_v1.0.pdf', section 'AGRICULTURAL PRODUCTION IN SWITZERLAND' - pdf-document on the dedicated talk page of ecoinvent (www.ecoinvent.org/documentation)
  See chapter 'Yields and Inputs of Arable Crop Production' in '01_crop production - yields & inputs CH & Europe_v1.0.pdf', section 'AGRICULTURAL PRODUCTION IN SWITZERLAND' - pdf-document on the dedicated talk page of ecoinvent (www.ecoinvent.org/documentation)
  properties: wet mass 1 kg, dry mass 1 kg
- irrigation: 0.00719695 m3; name water_irrigation_input; source Siebert, S. 2010; lognormal variance with pedigree 0.0427, pedigree (2,2,5,1,1)
  Calculated based on literature values (Döll, 2010) and partially modelled at ETH (Pfister, S.).
  property carbon content, fossil 0; name C_content_fossil
  property wet mass 1000 kg; name WM
  property dry mass 0.11 kg; name DM
  property carbon content, non-fossil 0; name C_content_non_fossil
  property water content 9089.91; name water_content
  property water in wet mass 999.89 kg; name WWM
- ammonium sulfate: 3.0817e-5 kg; lognormal variance with pedigree 0.0406, pedigree (2,1,5,1,1)
  (same comment as for maize seed, Swiss integrated production, for sowing)
  properties: dry mass 1 kg, wet mass 1 kg
- solid manure loading and spreading, by hydraulic loader and spreader: 0.19368 kg; lognormal variance with pedigree 0.0406, pedigree (2,1,5,1,1)
  (same comment as for fertilising, by broadcaster)
- pesticide, unspecified: 1.0636e-6 kg; lognormal variance with pedigree 0.0407, pedigree (2,2,5,1,1)
  (same comment as for maize seed, Swiss integrated production, for sowing)
  properties: dry mass 1 kg, wet mass 1 kg, carbon content, fossil 0.486978
  note on carbon content, fossil: Mean of C content in all pesticides whose formula has been documented in Sutter 2010
- application of plant protection product, by field sprayer: 1.6271e-5 ha; lognormal variance with pedigree 0.0406, pedigree (2,1,5,1,1)
  (same comment as for fertilising, by broadcaster)
- ammonium nitrate: 0.00116364 kg; lognormal variance with pedigree 0.0406, pedigree (2,1,5,1,1)
  The exchange has been updated from 'ammonium nitrate, as N' into 'ammonium nitrate' and therefore its amount has been scaled (multiplied) from 0.0004 kg by 2.8573 kg of 'ammonium nitrate' per kg of 'ammonium nitrate, as N'. Original comment of the exchange is: See chapter 'Yields and Inputs of Arable Crop Production' in '01_crop production - yields & inputs CH & Europe_v1.0.pdf', section 'AGRICULTURAL PRODUCTION IN SWITZERLAND' - pdf-document on the dedicated talk page of ecoinvent (www.ecoinvent.org/documentation)
  See chapter 'Yields and Inputs of Arable Crop Production' in '01_crop production - yields & inputs CH & Europe_v1.0.pdf', section 'AGRICULTURAL PRODUCTION IN SWITZERLAND' - pdf-document on the dedicated talk page of ecoinvent (www.ecoinvent.org/documentation)
  properties: wet mass 1 kg, dry mass 1 kg
- tillage, ploughing: 1.6271e-5 ha; lognormal variance with pedigree 0.0406, pedigree (2,1,5,1,1)
  (same comment as for fertilising, by broadcaster)
- sowing: 1.6271e-5 ha; lognormal variance with pedigree 0.0406, pedigree (2,1,5,1,1)
  (same comment as for fertilising, by broadcaster)
- fodder loading, by self-loading trailer: 0.004 m3; lognormal variance with pedigree 0.0406, pedigree (2,1,5,1,1)
  (same comment as for fertilising, by broadcaster)
- atrazine: 9.112e-6 kg; lognormal variance with pedigree 0.0407, pedigree (2,2,5,1,1)
  (same comment as for maize seed, Swiss integrated production, for sowing)
  properties: wet mass 1 kg, carbon content, fossil 0.446512, dry mass 1 kg
- packaging, for pesticides: 3.467e-5 kg; lognormal variance with pedigree 0.0912, pedigree (4,3,5,5,4)
  Total amount of active substance/s of pesticides needed for the production of maize silage, Swiss integrated production is calculated to be circa 1.73E-05 kg. Pesticide/s used in this dataset is/are: 'atrazine', 'glyphosate', 'metolachlor', 'pesticide, unspecified'. The total amount of active substance/s is doubled in order to account for the packaging of the dilluted product of pesticide/s that is/are applied. Therefore, 3.47E-05 kg of packaging for pesticides is justified with this exchange.
  properties: price 0.0642 EUR2005, dry mass 1 kg, carbon content, fossil 0.85714, heating value, net 25.97 MJ, wet mass 1 kg
- urea: 0.000306606 kg; lognormal variance with pedigree 0.0406, pedigree (2,1,5,1,1)
  The exchange has been updated from 'urea, as N' into 'urea' and therefore its amount has been scaled (multiplied) from 0.0001 kg by 2.1438 kg of 'urea' per kg of 'urea, as N'. Original comment of the exchange is: See chapter 'Yields and Inputs of Arable Crop Production' in '01_crop production - yields & inputs CH & Europe_v1.0.pdf', section 'AGRICULTURAL PRODUCTION IN SWITZERLAND' - pdf-document on the dedicated talk page of ecoinvent (www.ecoinvent.org/documentation)
  See chapter 'Yields and Inputs of Arable Crop Production' in '01_crop production - yields & inputs CH & Europe_v1.0.pdf', section 'AGRICULTURAL PRODUCTION IN SWITZERLAND' - pdf-document on the dedicated talk page of ecoinvent (www.ecoinvent.org/documentation)
  properties: dry mass 1 kg, wet mass 1 kg, carbon content, fossil 0.2
- packaging, for fertilisers: 0.00776614 kg; lognormal variance with pedigree 0.0912, pedigree (4,3,5,5,4)
  Total amount of active substance/s of fertilisers needed for the production of 'maize silage, Swiss integrated production' is calculated to be circa 3.88E-03 kg. Fertiliser/s used in this dataset is/are: 'ammonium nitrate, as N', 'ammonium sulfate, as N', 'nitrogen fertiliser, as N', 'phosphate fertiliser, as P2O5', 'phosphate rock, as P2O5, beneficiated, dry', 'potassium chloride, as K2O', 'potassium sulfate, as K2O', 'urea, as N'. The total amount of active substance/s is doubled in order to account for the packaging of the dilluted product of fertiliser/s that is/are applied. Therefore, 7.77E-03 kg of packaging for fertilisers is justified with this exchange.
  properties: dry mass 1 kg, wet mass 1 kg, heating value, net 25.01 MJ, carbon content, fossil 0.825301, price 0.0642 EUR2005
  note on carbon content, fossil: Considering a chemical formula (C2H4)n for polyethylene, carbon content-fossil is calculated to be 0.856286 kg of Carbon per kg of dry mass.
- metolachlor: 3.9051e-6 kg; lognormal variance with pedigree 0.0407, pedigree (2,2,5,1,1)
  (same comment as for maize seed, Swiss integrated production, for sowing)
  properties: wet mass 1 kg, carbon content, fossil 0.633803, dry mass 1 kg
- green manure, Swiss integrated production, until April: 1.6271e-5 ha; lognormal variance with pedigree 0.0406, pedigree (2,1,5,1,1)
  (same comment as for maize seed, Swiss integrated production, for sowing)
- tillage, harrowing, by spring tine harrow: 3.2543e-5 ha; lognormal variance with pedigree 0.0406, pedigree (2,1,5,1,1)
  (same comment as for fertilising, by broadcaster)
- inorganic nitrogen fertiliser, as N: 0.00032634 kg; lognormal variance with pedigree 0.0406, pedigree (2,1,5,1,1)
  (same comment as for maize seed, Swiss integrated production, for sowing)
  properties: wet mass 1 kg, dry mass 1 kg
- glyphosate: 3.2543e-6 kg; lognormal variance with pedigree 0.0407, pedigree (2,2,5,1,1)
  (same comment as for maize seed, Swiss integrated production, for sowing)
  properties: carbon content, fossil 0.214286, wet mass 1 kg, dry mass 1 kg
- potassium sulfate: 0.000211913 kg; lognormal variance with pedigree 0.0406, pedigree (2,1,5,1,1)
  The exchange has been updated from 'potassium sulfate, as K2O' into 'potassium sulfate' and therefore its amount has been scaled (multiplied) from 0.0001 kg by 1.85 kg of 'potassium sulfate' per kg of 'potassium sulfate, as K2O'. Original comment of the exchange is: See chapter 'Yields and Inputs of Arable Crop Production' in '01_crop production - yields & inputs CH & Europe_v1.0.pdf', section 'AGRICULTURAL PRODUCTION IN SWITZERLAND' - pdf-document on the dedicated talk page of ecoinvent (www.ecoinvent.org/documentation)
  See chapter 'Yields and Inputs of Arable Crop Production' in '01_crop production - yields & inputs CH & Europe_v1.0.pdf', section 'AGRICULTURAL PRODUCTION IN SWITZERLAND' - pdf-document on the dedicated talk page of ecoinvent (www.ecoinvent.org/documentation)
  properties: dry mass 1 kg, wet mass 1 kg
- inorganic phosphorus fertiliser, as P2O5: 0.000846564 kg; lognormal variance with pedigree 0.0406, pedigree (2,1,5,1,1)
  (same comment as for maize seed, Swiss integrated production, for sowing)
  properties: wet mass 1 kg, dry mass 1 kg

## Inputs from nature
- Occupation, annual crop, non-irrigated, intensive [natural resource, land]: 0.058758 m2*year; lognormal variance with pedigree 0.0406, pedigree (2,1,5,1,1)
  Modelled, see chapter 'Land use' in '01_crop production_direct field emissions and natural resources_v1.0.pdf' - pdf-document on the dedicated talk page of ecoinvent (www.ecoinvent.org/documentation)
- Carbon dioxide, in air [natural resource, in air]: 0.457351 kg; = 44/12 * (REF_PRODUCT_C_content_non_fossil * REF_PRODUCT * REF_PRODUCT_DM - SEED_C_content_non_fossil * SEED * SEED_DM); lognormal variance with pedigree 0.0406, pedigree (2,1,5,1,1)
  Modelled,see chapter 'CO2 binding' in '01_crop production_direct field emissions and natural resources_v1.0.pdf' - pdf-document on the dedicated talk page of ecoinvent (www.ecoinvent.org/documentation)
- Transformation, from annual crop, non-irrigated, intensive [natural resource, land]: 0.16271 m2; lognormal variance with pedigree 0.0506, pedigree (2,1,5,1,1)
  (same comment as for Occupation, annual crop, non-irrigated, intensive)
- Energy, gross calorific value, in biomass [natural resource, biotic]: 5.3128 MJ; lognormal variance with pedigree 0.0411891, pedigree (2,1,5,1,1)
- Transformation, to annual crop, non-irrigated, intensive [natural resource, land]: 0.16271 m2; lognormal variance with pedigree 0.0506, pedigree (2,1,5,1,1)
  (same comment as for Occupation, annual crop, non-irrigated, intensive)

## Emissions to nature
- Glyphosate [soil, agricultural]: 3.2543e-6 kg; lognormal variance with pedigree 0.0507, pedigree (2,2,5,1,1)
  Modelled, see chapter 'Emissions of pesticides to agricultural soil' in '01_crop production_direct field emissions and natural resources_v1.0.pdf' - pdf-document on the dedicated talk page of ecoinvent (www.ecoinvent.org/documentation)
- Mercury [water, ground-]: 1.7678e-10 kg; lognormal variance with pedigree 0.1307, pedigree (2,2,5,1,1)
  Modelled, see chapter 'Emissions of heavy metals to agricultural soil, surface water and ground water' in '01_crop production_direct field emissions and natural resources_v1.0.pdf' - pdf-document on the dedicated talk page of ecoinvent (www.ecoinvent.org/documentation)
- Mercury [soil, agricultural]: 1.0317e-8 kg; lognormal variance with pedigree 0.0807, pedigree (2,2,5,1,1)
  (same comment as for Mercury)
- Nickel [soil, agricultural]: -6.5557e-8 kg
  (same comment as for Mercury)
- Copper, ion [water, surface water]: 4.8229e-8 kg; lognormal variance with pedigree 0.1307, pedigree (2,2,5,1,1)
  (same comment as for Mercury)
- Cadmium, ion [water, ground-]: 7.2862e-10 kg; lognormal variance with pedigree 0.1307, pedigree (2,2,5,1,1)
  (same comment as for Mercury)
- Cadmium, ion [water, surface water]: 5.2836e-10 kg; lognormal variance with pedigree 0.1307, pedigree (2,2,5,1,1)
  (same comment as for Mercury)
- Chromium, ion [water, ground-]: 3.3284e-7 kg; lognormal variance with pedigree 0.1307, pedigree (2,2,5,1,1)
  (same comment as for Mercury)
- Copper, ion [water, ground-]: 5.7177e-8 kg; lognormal variance with pedigree 0.1307, pedigree (2,2,5,1,1)
  (same comment as for Mercury)
- Mercury [water, surface water]: 1.7253e-10 kg; lognormal variance with pedigree 0.1307, pedigree (2,2,5,1,1)
  (same comment as for Mercury)
- Cadmium [soil, agricultural]: 6.8717e-9 kg; lognormal variance with pedigree 0.0807, pedigree (2,2,5,1,1)
  (same comment as for Mercury)
- Copper [soil, agricultural]: -3.391e-6 kg
  (same comment as for Mercury)
- Phosphorus [water, surface water]: 2.3353e-6 kg; lognormal variance with pedigree 0.0807, pedigree (2,2,5,1,1)
  Modelled, see chapter 'Emissions of phosphorous to the water' in '01_crop production_direct field emissions and natural resources_v1.0.pdf' - pdf-document on the dedicated talk page of ecoinvent (www.ecoinvent.org/documentation)
- Phosphate [water, surface water]: 5.5559e-6 kg; lognormal variance with pedigree 0.0807, pedigree (2,2,5,1,1)
  (same comment as for Phosphorus)
- Water [air, unspecified]: 0.00241314 m3; name water_to_air_unspecified; = (water_irrigation_input*fraction_IW_to_air); lognormal variance with pedigree 0.0807, pedigree (2,2,5,1,1)
  Calculated value based on literature values and expert opinion. See comments in the parametres' comment field.
  property fraction, origin: fresh water 1; name fraction_origin_fresh_water
  property fraction, origin: unspecified 0; name fraction_origin_unspecified
  property fraction, origin: salt water 0; name fraction_origin_salt_water
- Lead [water, surface water]: 2.2054e-8 kg; lognormal variance with pedigree 0.1307, pedigree (2,2,5,1,1)
  (same comment as for Mercury)
- Water [water, surface water]: 0.000956763 m3; name water_to_water_surface; = water_irrigation_input*(1-fraction_IW_to_air)*fraction_IW_to_surface_water; lognormal variance with pedigree 0.1286, pedigree (4,3,5,1,4)
  Calculated value. See the parameters and their comments to understand the calculation.
  property fraction, origin: fresh water 1; name fraction_origin_fresh_water_Wsw
  property fraction, origin: salt water 0; name fraction_origin_salt_water_Wsw
- Lead [soil, agricultural]: -5.08e-7 kg
  (same comment as for Mercury)
- Zinc, ion [water, surface water]: 1.0252e-7 kg; lognormal variance with pedigree 0.1307, pedigree (2,2,5,1,1)
  (same comment as for Mercury)
- Zinc [soil, agricultural]: -2.1793e-5 kg
  (same comment as for Mercury)
- Atrazine [soil, agricultural]: 9.112e-6 kg; lognormal variance with pedigree 0.0507, pedigree (2,2,5,1,1)
  (same comment as for Glyphosate)
- Phosphate [water, ground-]: 1.4963e-6 kg; lognormal variance with pedigree 0.0807, pedigree (2,2,5,1,1)
  (same comment as for Phosphorus)
- Dinitrogen monoxide [air, non-urban air or from high stacks]: 5.34e-5 kg; name N2O; lognormal variance with pedigree 0.0707, pedigree (2,2,5,1,1)
  Modelled, see chapter 'Emissions of N2O to the air' in '01_crop production_direct field emissions and natural resources_v1.0.pdf' - pdf-document on the dedicated talk page of ecoinvent (www.ecoinvent.org/documentation)
- Chromium [soil, agricultural]: 5.6579e-7 kg; lognormal variance with pedigree 0.0807, pedigree (2,2,5,1,1)
  (same comment as for Mercury)
- Ammonia [air, non-urban air or from high stacks]: 0.000393711 kg; lognormal variance with pedigree 0.0507, pedigree (2,2,5,1,1)
  Modelled with the 'AGRAMMON model' described in '01_crop production_direct field emissions and natural resources_v1.0.pdf' - pdf-document on the dedicated talk page of ecoinvent (www.ecoinvent.org/documentation)
- Nitrogen oxides [air, non-urban air or from high stacks]: 1.1214e-5 kg; = 0.21 * N2O; lognormal variance with pedigree 0.0707, pedigree (2,2,5,1,1)
  Modelled, see chapter 'Emissions of NOx to the air' in '01_crop production_direct field emissions and natural resources_v1.0.pdf' - pdf-document on the dedicated talk page of ecoinvent (www.ecoinvent.org/documentation)
- Nickel, ion [water, surface water]: 4.5469e-8 kg; lognormal variance with pedigree 0.1307, pedigree (2,2,5,1,1)
  (same comment as for Mercury)
- Water [water, ground-]: 0.00382705 m3; name water_to_water_ground; = water_irrigation_input*(1-fraction_IW_to_air)*fraction_IW_to_ground_water; lognormal variance with pedigree 0.1286, pedigree (4,3,5,1,4)
  Calculated value. See the parameters and their comments to understand the calculation.
  property fraction, origin: unspecified 0; name fraction_origin_unspecified_Wgw
  property fraction, origin: fresh water 1; name fraction_origin_fresh_water_Wgw
  property fraction, origin: salt water 0; name fraction_origin_salt_water_Wgw
- Carbon dioxide, fossil [air, non-urban air or from high stacks]: 0.00022454 kg; lognormal variance with pedigree 0.0407, pedigree (2,2,5,1,1)
  Modelled, see chapter 'Release of fossil CO2 after urea applications' in '01_crop production_assessment methods of direct field emissions_v1.0.pdf' - pdf-document on the dedicated talk page of ecoinvent (www.ecoinvent.org/documentation)
- Lead [water, ground-]: 4.4917e-9 kg; lognormal variance with pedigree 0.1307, pedigree (2,2,5,1,1)
  (same comment as for Mercury)
- Chromium, ion [water, surface water]: 5.7162e-8 kg; lognormal variance with pedigree 0.1307, pedigree (2,2,5,1,1)
  (same comment as for Mercury)
- Metolachlor [soil, agricultural]: 3.9051e-6 kg; lognormal variance with pedigree 0.0507, pedigree (2,2,5,1,1)
  (same comment as for Glyphosate)
- Nitrate [water, ground-]: 0.00327032 kg; lognormal variance with pedigree 0.0807, pedigree (2,2,5,1,1)
  Modelled with the 'SALCA-NO3 model' described in '01_crop production_direct field emissions and natural resources_v1.0.pdf' - pdf-document on the dedicated talk page of ecoinvent (www.ecoinvent.org/documentation)
- Zinc, ion [water, ground-]: 4.5148e-7 kg; lognormal variance with pedigree 0.1307, pedigree (2,2,5,1,1)
  (same comment as for Mercury)

## Sampling procedure
Data were compiled from statistics, pilot network, fertilising recommendations, documents from extension services, information provided by retailers and expert knowledge. The production data were verified and adjusted by a group of experts.

## Extrapolations
This dataset has been extrapolated from year 2003 to the year of the calculation (2021). The uncertainty has been adjusted accordingly.

## Review by Hans-Jörg Althaus 2009-01-22
passed
none
