# treatment of wastewater from concrete production, capacity 5E9l/year

Dataset: EcoSpold 2, unit process
Geography: RoW
Time period: 1994-01-01 to 2021-12-31
Technology level: current
Classification: EcoSpold01Categories: waste management/wastewater treatment
Classification: ISIC rev.4 ecoinvent: 3700:Sewerage
Tags: Treatment; ConvertedDataset
Scenario: Business-as-Usual
System model: Allocation, cut-off by classification
Generated by: Gabor Doka (obsolete)
Published in: Doka G. 2008
Database: ecoinvent
isCopyrightProtected: true
accessRestrictedTo: 1

## General comment
Wastewater purified in a medium size municipal wastewater treatment plant (capacity class 3), with an average capacity size of 24900 per-captia-equivalents PCE.
Wastewater contains (in kg/m3): DOC: 0.01216 (GSD=125%); TOC: 0.01216 (GSD=125%); SO4-S: 0.001002 (GSD=125%); NO3-N: 0.003211 (GSD=125%); PO4-P: 0.0000672 (GSD=125%); Cl: 0.02969 (GSD=125%); As: 0.000001 (GSD=125%); Cr: 0.00002134 (GSD=225%); Pb: 0.000001 (GSD=225%); Zn: 0.00003462 (GSD=225%); K: 0.3182 (GSD=125%); Na: 0.08275 (GSD=125%);
[This dataset was already contained in the ecoinvent database version 2. It was not individually updated during the transfer to ecoinvent version 3. Life Cycle Impact Assessment results may still have changed, as they are affected by changes in the supply chain, i.e. in other datasets. This dataset was generated following the ecoinvent quality guidelines for version 2. It may have been subject to central changes described in the ecoinvent version 3 change report (http://www.ecoinvent.org/database/ecoinvent-version-3/reports-of-changes/), and the results of the central updates were reviewed extensively. The changes added e.g. consistent water flows and other information throughout the database. The documentation of this dataset can be found in the ecoinvent reports of version 2, which are still available via the ecoinvent website. The change report linked above covers all central changes that were made during the conversion process.]

## Included activities end
Infrastructure materials for municipal wastewater treatment plant, transports, dismantling. Land use burdens.

## Geography
Specific to the technology mix encountered in Switzerland in 2000. Well applicable to modern treatment practices in Europe, North America or Japan.

## Technology
Three stage wastewater treatment (mechanical, biological, chemical) including sludge digestion (fermentation) according to the average technology in Switzerland

## Parameters
- fraction, process water, to air: 0.1 dimensionless; name fraction_PW_to_air; lognormal variance with pedigree 0.092025, pedigree (4,4,3,2,4)

## Reference product
- wastewater from concrete production: -1 m3; CPC 39920: Sewage sludge; By-product classification Waste
  EcoSpold01Location=CH
  production volume 3.96633 m3
    This is a placeholder value that does not reflect real-world production volumes. This dataset does not currently require a real-world production volume to work in the database framework, and no actual data were collected yet. This has no negative effect on the results of the ecoinvent database.
  property price 0 EUR2005
    Waste products are assigned a price of zero as they are assumed to require further treatment.
  property carbon content, fossil 0.027074
    TOC =0.01216 kg/m3 (Tab A.20, ecoinvent v2.2 report 13_I). TOC was considered as Total Carbon.
  property carbon content 0.027074
    carbon content on a dry matter basis (reserved; not for manual entry)
  properties: dry mass 0.449139 kg, water content 2225.48, wet mass 1000 kg, water in wet mass 999.551 kg, carbon content, non-fossil 0, carbon allocation 0.01216 kg

## Inputs from technosphere
- cement, unspecified: 0 kg; pedigree (1,1,1,1,1)
  burden from sludge incineration. Uncertainty calculated from wastewater composition and treatment model
  EcoSpold01Location=CH
  properties: dry mass 1 kg, wet mass 1 kg
- process-specific burdens, slag landfill: 0 kg; pedigree (1,1,1,1,1)
  (same comment as for cement, unspecified)
- hydrochloric acid, without water, in 30% solution state: 7.1831e-9 kg; lognormal variance with pedigree 0.412, pedigree (1,1,5,5,1)
  EcoSpold01Location=RER
  burden from sludge incineration. Uncertainty calculated from wastewater composition and treatment model
  properties: heating value, net 3.32 MJ, wet mass 1 kg, dry mass 1 kg
- waste plastic, mixture: 0 kg; pedigree (1,1,1,1,1)
  direct wastewater treatment plant burden. Uncertainty calculated from wastewater composition and treatment model
  EcoSpold01Location=CH
  production volume 0 kg
    Calculated from the production volume of wastewater from concrete production in proportion to the respective output amounts.
  properties: water content 0.180638, carbon content, fossil 0.747344, dry mass 0.847 kg, wet mass 1 kg, heating value, net 30.79 MJ
  note on carbon content, fossil: C content in 1 kg DM was calculated using data in Tab A.2, ecoinvent v2.2 report 13_I
  note on heating value, net: Value taken from the general comment of the treatment dataset.
- sewer grid, 5E9l/year, 110 km: 2.1782e-7 km; lognormal variance with pedigree 0.042, pedigree (1,1,5,5,1)
  uncertainty heeded in exchanges of the module
  EcoSpold01Location=CH
- process-specific burdens, residual material landfill: 0 kg; pedigree (1,1,1,1,1)
  EcoSpold01Location=CH
  burden from sludge incineration. Uncertainty calculated from wastewater composition and treatment model
- sodium hydroxide, without water, in 50% solution state: 8.7737e-8 kg; lognormal variance with pedigree 0.102, pedigree (1,1,5,5,1)
  (same comment as for hydrochloric acid, without water, in 30% solution state)
  properties: wet mass 1 kg, heating value, net 3.03 MJ, dry mass 1 kg
- quicklime, milled, packed: 1.5907e-8 kg; lognormal variance with pedigree 0.102, pedigree (1,1,5,5,1)
  (same comment as for cement, unspecified)
  properties: water content 0.010101, wet mass 1 kg, dry mass 0.99 kg
- titanium dioxide: 1.7815e-8 kg; lognormal variance with pedigree 0.582, pedigree (1,1,5,5,1)
  burden from sludge incineration. Uncertainty calculated from wastewater composition and treatment model
  EcoSpold01Location=RER
  properties: dry mass 1 kg, wet mass 1 kg
- iron sulfate: 0.00031864 kg; lognormal variance with pedigree 0.112, pedigree (1,1,5,5,1)
  direct wastewater treatment plant burden. Uncertainty calculated from wastewater composition and treatment model
  EcoSpold01Location=RER
  properties: wet mass 1 kg, dry mass 1 kg
- ammonia, anhydrous, liquid: 0 kg; pedigree (1,1,1,1,1)
  (same comment as for cement, unspecified)
  properties: dry mass 1 kg, wet mass 1 kg
- waste graphical paper: -0.0155 kg; lognormal variance with pedigree 0.042, pedigree (1,1,5,5,1)
  EcoSpold01Location=CH
  direct wastewater treatment plant burden. Uncertainty calculated from wastewater composition and treatment model
  production volume 0.062 kg
    (same comment as for waste plastic, mixture)
  properties: heating value, net 14.12 MJ, carbon content, non-fossil 0.454955, water content 0.126126, wet mass 1 kg, dry mass 0.888 kg
- heat, district or industrial, other than natural gas: 0 MJ; pedigree (1,1,1,1,1)
  (same comment as for cement, unspecified)
  properties: heating value, net 1 MJ
- waste cement, hydrated: 0 kg; pedigree (1,1,1,1,1)
  (same comment as for process-specific burdens, residual material landfill)
  production volume 0 kg
    (same comment as for waste plastic, mixture)
  properties: dry mass 1 kg, wet mass 1 kg
- process-specific burdens, municipal waste incineration: 0 kg; pedigree (1,1,1,1,1)
  (same comment as for cement, unspecified)
- aluminium sulfate, powder: 8.6117e-5 kg; lognormal variance with pedigree 0.112, pedigree (1,1,5,5,1)
  (same comment as for iron sulfate)
  properties: wet mass 1 kg, dry mass 1 kg
- chemical, inorganic: 1.1972e-8 kg; lognormal variance with pedigree 0.412, pedigree (1,1,5,5,1)
  EcoSpold01Location=GLO
  burden from sludge incineration. Uncertainty calculated from wastewater composition and treatment model
  properties: carbon content, fossil 0.003, wet mass 1 kg, dry mass 1 kg
  note on carbon content, fossil: This dataset is an unweighted average of 20 inorganic substances (listed in Tab 88.1, ecoinvent v2.2 report 8, part II), being part of the top100 chemicals included in this database. The C-content has also been calculated as an unweighted average of the C content of the substances composing this dataset.
- wastewater treatment facility, capacity 5E9l/year: 5.6882e-9 unit; lognormal variance with pedigree 0.042, pedigree (1,1,5,5,1)
  EcoSpold01Location=CH
  uncertainty heeded in exchanges of the module
- municipal waste incineration facility: 2.109e-12 unit; lognormal variance with pedigree 0.042, pedigree (1,1,5,5,1)
  (same comment as for cement, unspecified)
- heat, district or industrial, natural gas: 0 MJ; pedigree (1,1,1,1,1)
  (same comment as for titanium dioxide)
  properties: heating value, net 1 MJ
- slag landfill: 4.523e-13 unit; lognormal variance with pedigree 0.072, pedigree (1,1,5,5,1)
  (same comment as for process-specific burdens, residual material landfill)
- electricity, low voltage: 0 kWh; pedigree (1,1,1,1,1)
  (same comment as for waste plastic, mixture)
- iron (III) chloride, without water, in 40% solution state: 0.00043723 kg; lognormal variance with pedigree 0.112, pedigree (1,1,5,5,1)
  EcoSpold01Location=CH
  direct wastewater treatment plant burden plus burden from sludge incineration. Uncertainty calculated from wastewater composition and treatment model
  properties: dry mass 1 kg, wet mass 1 kg
- electricity, high voltage: 0 kWh; pedigree (1,1,1,1,1)
  (same comment as for cement, unspecified)
- residual material landfill: 1.145e-13 unit; lognormal variance with pedigree 0.072, pedigree (1,1,5,5,1)
  (same comment as for cement, unspecified)
- liquid manure spreading, by vacuum tanker: 3.8126e-5 m3; lognormal variance with pedigree 0.042, pedigree (1,1,5,5,1)
  EcoSpold01Location=CH
  burden from sludge spreading. Uncertainty calculated from wastewater composition and treatment model
- chromium oxide, flakes: 3.6358e-10 kg; lognormal variance with pedigree 0.582, pedigree (1,1,5,5,1)
  (same comment as for hydrochloric acid, without water, in 30% solution state)
  properties: wet mass 1 kg, dry mass 1 kg
- cement, unspecified: 3.1744e-6, 6.60498e-7, 4.83769e-8, 1.3789e-7, 3.11843e-6, 9.17844e-8, 1.00807e-6, 1.21965e-7, 1.36226e-5 kg (9 entries); lognormal variance with pedigree 0.082, pedigree (1,1,5,5,1)
  (same comment as for cement, unspecified)
- process-specific burdens, slag landfill: 7.19689e-5, 0.000182451 kg (2 entries); lognormal variance with pedigree 0.072, pedigree (1,1,5,5,1)
  (same comment as for cement, unspecified)
- waste plastic, mixture: -0.00172425, -0.000115208, -8.71297e-6, -4.75849e-5, -1.92238e-5, -4.51863e-5, -0.00146914, -0.0120707 kg (8 entries); lognormal variance with pedigree 0.042, pedigree (1,1,5,5,1)
  (same comment as for waste plastic, mixture)
  production volume 0.0614782 kg
- process-specific burdens, residual material landfill: 1.55471e-5, 3.94139e-5 kg (2 entries); lognormal variance with pedigree 0.072, pedigree (1,1,5,5,1)
  (same comment as for process-specific burdens, residual material landfill)
- ammonia, anhydrous, liquid: 1.30457e-7, 1.12143e-8, 1.74466e-8, 3.45679e-8, 3.38674e-8, 3.54967e-9, 1.58683e-8, 3.75399e-7 kg (8 entries); lognormal variance with pedigree 0.262, pedigree (1,1,5,5,1)
  (same comment as for cement, unspecified)
- heat, district or industrial, other than natural gas: 2.79942e-6, 0.000169042, 0.00690346 MJ (3 entries); lognormal variance with pedigree 0.042, pedigree (1,1,5,5,1)
  (same comment as for cement, unspecified)
- waste cement, hydrated: -1.55471e-5, -3.94139e-5 kg (2 entries); lognormal variance with pedigree 0.082, pedigree (1,1,5,5,1)
  (same comment as for process-specific burdens, residual material landfill)
  production volume 0.000217994 kg
- process-specific burdens, municipal waste incineration: 0.00238639, 0.00604981 kg (2 entries); lognormal variance with pedigree 0.042, pedigree (1,1,5,5,1)
  (same comment as for cement, unspecified)
- heat, district or industrial, natural gas: 6.0799e-7, 1.45686e-5, 3.94489e-5 MJ (3 entries); lognormal variance with pedigree 0.262, pedigree (1,1,5,5,1)
  (same comment as for titanium dioxide)
- electricity, low voltage: 0.000406334, 7.39857e-5, 0.00167014, 0.00583508, 0.00119126, 0.0182897, 0.00295895, 0.00849657 kWh (8 entries); lognormal variance with pedigree 0.042, pedigree (1,1,5,5,1)
  (same comment as for waste plastic, mixture)
- electricity, high voltage: 1.22571e-5, 2.3498e-6, 5.41244e-5, 0.000177375, 3.98409e-5, 0.000573693, 9.09826e-5, 0.000262277 kWh (8 entries); lognormal variance with pedigree 0.482, pedigree (1,1,5,5,1)
  (same comment as for cement, unspecified)

## Emissions to nature
- Iron, ion [water, surface water]: 4.8595e-8 kg; lognormal variance with pedigree 0.142, pedigree (1,1,5,5,1)
  sewer overload discharge plus direct wastewater treatment plant emission plus emission from sludge incineration. Uncertainty calculated from wastewater composition and treatment model
- Chromium, ion [water, surface water]: 1.7802e-8 kg; lognormal variance with pedigree 0.732, pedigree (1,1,5,5,1)
  emission from sludge incineration. Uncertainty calculated from wastewater composition and treatment model
- Carbon dioxide, fossil [air, urban air close to ground]: 0.03386 kg; lognormal variance with pedigree 0.052, pedigree (1,1,5,5,1)
  (same comment as for Chromium, ion)
- Dinitrogen monoxide [air, urban air close to ground]: 8.7572e-6 kg; lognormal variance with pedigree 0.092, pedigree (1,1,5,5,1)
  direct wastewater treatment plant emission plus direct digester gas emission plus emission from sludge incineration plus emission from sludge spreading. Uncertainty calculated from wastewater composition and treatment model
- Arsenic [air, urban air close to ground]: 2.8152e-10 kg; lognormal variance with pedigree 0.132, pedigree (1,1,5,5,1)
  direct digester gas emission plus emission from sludge incineration. Uncertainty calculated from wastewater composition and treatment model
- Lead [soil, agricultural]: 4.1706e-7 kg; lognormal variance with pedigree 0.722, pedigree (1,1,5,5,1)
  emission from sludge spreading. Uncertainty calculated from wastewater composition and treatment model
- Zinc, ion [water, surface water]: 1.0703e-5 kg; lognormal variance with pedigree 0.662, pedigree (1,1,5,5,1)
  (same comment as for Iron, ion)
- Iron [air, urban air close to ground]: 4.7408e-9 kg; lognormal variance with pedigree 0.152, pedigree (1,1,5,5,1)
  (same comment as for Arsenic)
- Carbon [soil, agricultural]: 0.0014639 kg; lognormal variance with pedigree 0.062, pedigree (1,1,5,5,1)
  (same comment as for Lead)
- Aluminium [water, ground-, long-term]: 5.3478e-6 kg; lognormal variance with pedigree 0.122, pedigree (1,1,5,5,1)
  (same comment as for Chromium, ion)
- Arsenic, ion [water, surface water]: 8.3562e-7 kg; lognormal variance with pedigree 0.082, pedigree (1,1,5,5,1)
  (same comment as for Iron, ion)
- Phosphorus [air, urban air close to ground]: 2.2662e-8 kg; lognormal variance with pedigree 0.132, pedigree (1,1,5,5,1)
  (same comment as for Arsenic)
- DOC, Dissolved Organic Carbon [water, surface water]: 0.001362 kg; lognormal variance with pedigree 0.042, pedigree (1,1,5,5,1)
  (same comment as for Iron, ion)
- COD, Chemical Oxygen Demand [water, surface water]: 0.0077572 kg; lognormal variance with pedigree 0.042, pedigree (1,1,5,5,1)
  (same comment as for Iron, ion)
- TOC, Total Organic Carbon [water, surface water]: 0.0019401 kg; lognormal variance with pedigree 0.042, pedigree (1,1,5,5,1)
  (same comment as for Iron, ion)
- Zinc, ion [water, ground-, long-term]: 1.9708e-7 kg; lognormal variance with pedigree 5.522, pedigree (1,1,5,5,1)
  (same comment as for Chromium, ion)
- Chromium VI [water, surface water]: 1.1012e-5 kg; lognormal variance with pedigree 0.652, pedigree (1,1,5,5,1)
  (same comment as for Iron, ion)
- NMVOC, non-methane volatile organic compounds, unspecified origin [air, urban air close to ground]: 4.1219e-7 kg; lognormal variance with pedigree 0.212, pedigree (1,1,5,5,1)
  direct digester gas emission. Uncertainty calculated from wastewater composition and treatment model
- Sodium, ion [water, surface water]: 0.08275 kg; lognormal variance with pedigree 0.092, pedigree (1,1,5,5,1)
  (same comment as for Iron, ion)
- Chromium [air, urban air close to ground]: 4.13e-13 kg; lognormal variance with pedigree 0.812, pedigree (1,1,5,5,1)
  (same comment as for Arsenic)
- Arsenic [soil, agricultural]: 1.0112e-7 kg; lognormal variance with pedigree 0.112, pedigree (1,1,5,5,1)
  (same comment as for Lead)
- Chromium VI [water, ground-, long-term]: 5.9128e-7 kg; lognormal variance with pedigree 1.102, pedigree (1,1,5,5,1)
  (same comment as for Chromium, ion)
- Ammonia [air, urban air close to ground]: 4.1431e-6 kg; lognormal variance with pedigree 0.322, pedigree (1,1,5,5,1)
  direct digester gas emission plus emission from sludge incineration plus emission from sludge spreading. Uncertainty calculated from wastewater composition and treatment model
- Iron [soil, agricultural]: 0.0001252 kg; lognormal variance with pedigree 0.112, pedigree (1,1,5,5,1)
  (same comment as for Lead)
- Aluminium [air, urban air close to ground]: 1.1289e-8 kg; lognormal variance with pedigree 0.122, pedigree (1,1,5,5,1)
  (same comment as for Arsenic)
- Aluminium [water, surface water]: 6.013e-10 kg; lognormal variance with pedigree 0.722, pedigree (1,1,5,5,1)
  (same comment as for Iron, ion)
- Water [air, unspecified]: 0.1 m3; name water_to_air_unspecified; lognormal variance with pedigree 0.0827, pedigree (2,2,5,5,1)
  Calculated value based on water balance.
  property fraction, origin: unspecified 1; name fraction_origin_unspecified
  property fraction, origin: fresh water 0; name fraction_origin_fresh_water
  property fraction, origin: salt water 0; name fraction_origin_salt_water
- Phosphate [water, surface water]: 7.3716e-5 kg; lognormal variance with pedigree 0.092, pedigree (1,1,5,5,1)
  sewer overload discharge plus direct wastewater treatment plant emission plus emission from sludge incineration plus emission from sludge spreading. Uncertainty calculated from wastewater composition and treatment model
- TOC, Total Organic Carbon [water, ground-, long-term]: 1.6214e-5 kg; lognormal variance with pedigree 0.072, pedigree (1,1,5,5,1)
  (same comment as for Chromium, ion)
- Methane, fossil [air, urban air close to ground]: 9.0716e-5 kg; lognormal variance with pedigree 0.102, pedigree (1,1,5,5,1)
  (same comment as for Chromium, ion)
- Water [water, unspecified]: 0.9 m3; name water_to_water_unspecified; lognormal variance with pedigree 0.0827, pedigree (2,2,5,5,1)
  Calculated value based on water balance.
  property wet mass 1000 kg; name WM
  property carbon content, fossil 0; name C_content_fossil
  property carbon content, non-fossil 0; name C_content_non_fossil
  property water in wet mass 1000 kg; name WWM
  property dry mass 0 kg; name DM
  property fraction, origin: unspecified 0; name fraction_origin_unspecified_Ww
  property fraction, origin: salt water 0; name fraction_origin_salt_water_Ww
  property fraction, origin: fresh water 1; name fraction_origin_fresh_water_Ww
- Nitrate [water, ground-, long-term]: 4.4316e-7 kg; lognormal variance with pedigree 0.122, pedigree (1,1,5,5,1)
  (same comment as for Chromium, ion)
- Nitrogen oxides [air, urban air close to ground]: 6.9156e-6 kg; lognormal variance with pedigree 0.122, pedigree (1,1,5,5,1)
  (same comment as for Arsenic)
- Lead [water, surface water]: 1.0991e-7 kg; lognormal variance with pedigree 0.612, pedigree (1,1,5,5,1)
  (same comment as for Iron, ion)
- Arsenic, ion [water, ground-, long-term]: 6.2983e-8 kg; lognormal variance with pedigree 0.112, pedigree (1,1,5,5,1)
  (same comment as for Chromium, ion)
- BOD5, Biological Oxygen Demand [water, ground-, long-term]: 1.3403e-5 kg; lognormal variance with pedigree 0.072, pedigree (1,1,5,5,1)
  (same comment as for Chromium, ion)
- Phosphate [water, ground-, long-term]: 2.654e-6 kg; lognormal variance with pedigree 4.282, pedigree (1,1,5,5,1)
  (same comment as for Chromium, ion)
- Aluminium [soil, agricultural]: 6.3712e-6 kg; lognormal variance with pedigree 0.112, pedigree (1,1,5,5,1)
  (same comment as for Lead)
- Zinc [air, urban air close to ground]: 2.0766e-10 kg; lognormal variance with pedigree 0.762, pedigree (1,1,5,5,1)
  (same comment as for Arsenic)
- Sulfate [water, surface water]: 0.0033359 kg; lognormal variance with pedigree 0.082, pedigree (1,1,5,5,1)
  (same comment as for Iron, ion)
- Lead [water, ground-, long-term]: 3.3703e-8 kg; lognormal variance with pedigree 6.922, pedigree (1,1,5,5,1)
  (same comment as for Chromium, ion)
- Iron, ion [water, ground-, long-term]: 6.6516e-5 kg; lognormal variance with pedigree 0.942, pedigree (1,1,5,5,1)
  (same comment as for Chromium, ion)
- Cyanide [air, urban air close to ground]: 1.1103e-8 kg; lognormal variance with pedigree 0.282, pedigree (1,1,5,5,1)
  (same comment as for Chromium, ion)
- Chloride [water, surface water]: 0.029976 kg; lognormal variance with pedigree 0.092, pedigree (1,1,5,5,1)
  (same comment as for Iron, ion)
- Phosphate [water, ground-]: 3.49e-7 kg; lognormal variance with pedigree 0.162, pedigree (1,1,5,5,1)
  (same comment as for Lead)
- Carbon monoxide, fossil [air, urban air close to ground]: 2.8795e-5 kg; lognormal variance with pedigree 0.122, pedigree (1,1,5,5,1)
  (same comment as for Chromium, ion)
- DOC, Dissolved Organic Carbon [water, ground-, long-term]: 1.6214e-5 kg; lognormal variance with pedigree 0.072, pedigree (1,1,5,5,1)
  (same comment as for Chromium, ion)
- Potassium, ion [water, surface water]: 0.3182 kg; lognormal variance with pedigree 0.092, pedigree (1,1,5,5,1)
  (same comment as for Iron, ion)
- Lead [air, urban air close to ground]: 1.7591e-11 kg; lognormal variance with pedigree 0.762, pedigree (1,1,5,5,1)
  (same comment as for Arsenic)
- Chromium [soil, agricultural]: 4.9245e-6 kg; lognormal variance with pedigree 0.722, pedigree (1,1,5,5,1)
  (same comment as for Lead)
- COD, Chemical Oxygen Demand [water, ground-, long-term]: 4.0974e-5 kg; lognormal variance with pedigree 0.072, pedigree (1,1,5,5,1)
  (same comment as for Chromium, ion)
- Zinc [soil, agricultural]: 1.1207e-5 kg; lognormal variance with pedigree 0.722, pedigree (1,1,5,5,1)
  (same comment as for Lead)
- BOD5, Biological Oxygen Demand [water, surface water]: 0.0024732 kg; lognormal variance with pedigree 0.052, pedigree (1,1,5,5,1)
  (same comment as for Iron, ion)
- Nitrogen [water, surface water]: 1.0932e-5 kg; lognormal variance with pedigree 0.122, pedigree (1,1,5,5,1)
  direct wastewater treatment plant emission. Uncertainty calculated from wastewater composition and treatment model
- Nitrate [water, surface water]: 0.012029 kg; lognormal variance with pedigree 0.092, pedigree (1,1,5,5,1)
  (same comment as for Iron, ion)

## Extrapolations
wastewater compositions from literature and/or estimates This dataset has been copied from an original dataset covering the geography CH. The uncertainty has been adjusted accordingly.

## Review by Niels Jungbluth 2009-01-22
passed.
