# natural gas production

Dataset: EcoSpold 2, unit process
Geography: DZ
Time period: 1989-01-01 to 2021-12-31
Technology level: current
Classification: EcoSpold01Categories: natural gas/production
Classification: ISIC rev.4 ecoinvent: 0620:Extraction of natural gas
Tags: ConvertedDataset
Scenario: Business-as-Usual
System model: Allocation, cut-off by classification
Generated by: Mireille Faist Emmenegger (obsolete)
Published in: Faist Emmenegger, M. 2007
Database: ecoinvent
isCopyrightProtected: true
accessRestrictedTo: 1

## General comment
Data for DZ is mostly based on standard data, as only few information on the Algerian production is available.
[This dataset was already contained in the ecoinvent database version 2. It was not individually updated during the transfer to ecoinvent version 3. Life Cycle Impact Assessment results may still have changed, as they are affected by changes in the supply chain, i.e. in other datasets. This dataset was generated following the ecoinvent quality guidelines for version 2. It may have been subject to central changes described in the ecoinvent version 3 change report (http://www.ecoinvent.org/database/ecoinvent-version-3/reports-of-changes/), and the results of the central updates were reviewed extensively. The changes added e.g. consistent water flows and other information throughout the database. The documentation of this dataset can be found in the ecoinvent reports of version 2, which are still available via the ecoinvent website. The change report linked above covers all central changes that were made during the conversion process.]

## Included activities end
Exploration and production of gas onshore. Data doesn"t include combusted fuels for turbines, motors etc. It includes well testing (fuel requirements and emissions).

## Geography
Data is based on average data and therefore not specific for the country, except for leakage data.

## Technology
The data describes an average onshore technology for natural gas to 100% out of combined oil gas production. Algerian natural gas is sweet. Leakage in exploitation and production is estimated at 0.6% for exploitation and 0.13% in processing. It is further assumed that about 10% of the produced water is discharged in surface water. Water emissions are differentiated between combined oil and gas production and gas production.

## Time period
Energy demand is based on 2000 Norwegian data, quantity of flared gas on 1991 German data, leakages on 1990 resp. 1989 German data for exploitation resp. processing, quantity of discharged water and water emissions on 1991 German data.

## Reference product
- natural gas, high pressure: 1 m3; name RP; CPC 12020: Natural gas, liquefied or in the gaseous state; By-product classification allocatable product; CAS 14493-06-2
  production volume 7.89923e10 m3; name RP_PV; = 81.5*10^9*37.8/39
    m3 of natural gas produced in DZ in 2012 (BP, 2014). Value converted from BP LHV (1 cubic meter natural gas in (BP, 2014) corresponds to 0.9 kg oil equivalent. 1 kg oil equivalent corresponds to 42 MJ) to ecoinvent standard LHV of 39MJ/m3. (The source does not specify if the cubic meters are standard or norm cubic meters. See 2015, Faist Emmenegger, Mireille, Del Duce, Andrea; Zah, Rainer, Update and extension of the inventory data for energy gases, 3 - SeparatePublication.) Refrence(s): BP (2014). Statistical Review of World Energy, June 2014. Retrieved online from http://www.bp.com/content/dam/bp/excel/energy-economics/statistical-review-2015/bp-statistical-review-of-world-energy-2015-workbook.xlsx, 30 August, 2017
  property heating value, net 39 MJ
    Literature value, Source: United Nations Statistics Division (2018) International Recommendations for Energy Statistics (IRES). Available at: http://unstats.un.org/unsd/statcom/doc11/BG-IRES.pdf.
  property price 0.166 EUR2005
    Temporary price data. Calculated as 90% of purchasers price based on: 2005 price for Europe-27 Import (US$ and kg) in UN Commodity Trade Statistics Database - Natural gas in gaseous state (http://data.un.org/Data.aspx?q=natural+gas&d=ComTrade&f=_l1Code%3a28%3bcmdCode%3a271121; accessed 4 January 2011), using density of natural gas of 0.8 kg/m3 for unit conversion.
  property carbon content 0.588095
    carbon content on a dry matter basis (reserved; not for manual entry)
  properties: carbon content, fossil 0.588095, water in wet mass 0 kg, wet mass 0.84 kg, dry mass 0.84 kg, water content 0, carbon content, non-fossil 0, carbon allocation 0.494 kg

## Inputs from technosphere
- waste mineral oil: -3.17e-5 kg; name BP_waste_mineral_oil; lognormal variance with pedigree 0.0606, pedigree (2,1,5,5,3)
  Norwegian environmental report
  Uncertainty: N
  production volume 2.50406e6 kg; = BP_waste_mineral_oil*RP_PV/ABS(RP)
    Calculated from the production volume of natural gas, high pressure in proportion to the respective output amounts.
  properties: dry mass 0.9 kg, heating value, net 34.7 MJ, wet mass 1 kg, carbon content, fossil 0.864444, water content 0.111111
  note on heating value, net: Value taken from the general comment of the treatment dataset.
  note on carbon content, fossil: Tab A.6, ecoinvent v2.2 report 13_I. C content has been calculated after data in the tables, and then referred to 1 kg DM
- hazardous waste, for underground deposit: -3.82e-5 kg; name BP_hazardous_waste; lognormal variance with pedigree 0.0606, pedigree (2,1,5,5,3)
  Norwegian environmental report
  Uncertainty: N
  production volume 3.01751e6 kg; = BP_hazardous_waste*RP_PV/ABS(RP)
    (same comment as for waste mineral oil)
  properties: wet mass 1 kg, dry mass 1 kg, carbon content, fossil 0.554667
  note on carbon content, fossil: Tab A.6, ecoinvent v2.2 report 13_I, average hazardous waste composition was used, and referred to 0% water mass. No waste-specific emission are currently inventoried for underground deposits. Accordingly, no waste composition must be specified. For generic, average waste to underground deposit deposition in a 200 liter steel drum without cement solidification is assumed (ecoinvent v2.2 report 13_I).
- diesel, burned in diesel-electric generating set, 10MW: 0.04 MJ; lognormal variance with pedigree 0.0707, pedigree (2,2,5,5,3)
  Data from other countries
  Uncertainty: d
  properties: heating value, net 1 MJ
- spent antifreezer liquid: -8.64e-8 kg; name BP_spent_antifreezer_liquid; lognormal variance with pedigree 0.0606, pedigree (2,1,5,5,3)
  Norwegian environmental report
  Uncertainty: N
  production volume 6824.94 kg; = BP_spent_antifreezer_liquid*RP_PV/ABS(RP)
    (same comment as for waste mineral oil)
  properties: carbon content, fossil 0.431328, heating value, net 0.56 MJ, dry mass 0.482 kg, water content 1.07469, wet mass 1 kg
  note on carbon content, fossil: Tab A.7, ecoinvent v2.2 report 13_I. C content has been calculated after data in the tables, and then referred to 1 kg DM
- drying, natural gas: 1 m3; lognormal variance with pedigree 0.078, pedigree (4,1,5,5,3)
  Assumption
  Uncertainty: a
- waste wood, untreated: -6.14e-6 kg; name BP_waste_wood; lognormal variance with pedigree 0.0606, pedigree (2,1,5,5,3)
  Norwegian environmental report
  Uncertainty: N
  production volume 485013 kg; = BP_waste_wood*RP_PV/ABS(RP)
    (same comment as for waste mineral oil)
  properties: carbon content, non-fossil 0.48632, water content 0.25, heating value, net 13.99 MJ, wet mass 1 kg, dry mass 0.8 kg
  note on carbon content, non-fossil: Tab A.4, ecoinvent v2.2 report 13_I. C content has been referred to 1 kg DM,
- onshore well, oil/gas: 3.2e-6 m; lognormal variance with pedigree 0.07, pedigree (1,1,5,5,3)
  Data for Russia
  Uncertainty: d
- water discharge from petroleum/natural gas extraction, onshore: -0.003 kg; name BP_water_discharge; lognormal variance with pedigree 0.0426, pedigree (2,1,5,5,1)
  Data from other countries
  Uncertainty: d
  production volume 2.36977e8 kg; = BP_water_discharge*RP_PV/ABS(RP)
    (same comment as for waste mineral oil)
  properties: carbon content, non-fossil 0.00101223, wet mass 1 kg, dry mass 0.0848608 kg, water content 10.784, carbon content, fossil 0.00168491
- waste emulsion paint: -3.81e-7 kg; name BP_waste_emulsion_paint; lognormal variance with pedigree 0.0606, pedigree (2,1,5,5,3)
  Norwegian environmental report
  Uncertainty: N
  production volume 30096.1 kg; = BP_waste_emulsion_paint*RP_PV/ABS(RP)
    (same comment as for waste mineral oil)
  properties: dry mass 1 kg, carbon content, fossil 0.27, wet mass 1 kg, heating value, net 8.18 MJ
  note on carbon content, fossil: Tab A.4, ecoinvent v2.2 report 13_I. C content has been calculated after data in the tables, and then referred to 1 kg DM
- sweet gas, burned in gas turbine: 0.36 MJ; lognormal variance with pedigree 0.0527, pedigree (2,2,5,5,1)
  European data
  Uncertainty: E
  properties: heating value, net 1 MJ, carbon content, fossil 0.589286, wet mass 0.0247059 kg, heating value, gross 1 MJ, dry mass 0.0247059 kg
- municipal solid waste: -2.82e-5 kg; name BP_municipal_solid_waste; lognormal variance with pedigree 0.0606, pedigree (2,1,5,5,3)
  Norwegian environmental report
  Uncertainty: N
  production volume 2.22758e6 kg; = BP_municipal_solid_waste*RP_PV/ABS(RP)
    (same comment as for waste mineral oil)
  properties: dry mass 0.771 kg, carbon content, fossil 0.171549, water content 0.297017, heating value, net 11.74 MJ, wet mass 1 kg, carbon content, non-fossil 0.261655
  note on carbon content, fossil: MSW composition in tab 4.1, ecoinvent v2.2 report 13_I. C content referred to 1 kg DM
- onshore natural gas field infrastructure: 6.67e-10 unit; lognormal variance with pedigree 0.3527, pedigree (2,2,5,5,1)
  European data
  Uncertainty: E
- waste natural gas, sweet: -0.09 MJ; name BP_waste_nat_gas; lognormal variance with pedigree 0.0527, pedigree (2,2,5,5,1)
  European data
  Uncertainty: E
  production volume 7.10931e9 MJ; = BP_waste_nat_gas*RP_PV/ABS(RP)
    (same comment as for waste mineral oil)
  properties: carbon content, fossil 0.589286, dry mass 0.0247059 kg, wet mass 0.0247059 kg, heating value, net 1 MJ, heating value, gross 1 MJ
  note on heating value, net: Heating value 34 MJ/m3. Density is 0.84 kg/m3 (ecoinvent v2.2 report 6_V, Tab 3.4)

## Inputs from nature
- Gas, natural, in ground [natural resource, in ground]: 1 m3; lognormal variance with pedigree 0.0527, pedigree (2,2,5,5,1)
  European data
  Uncertainty: E

## Emissions to nature
- Hydrogen sulfide [air, non-urban air or from high stacks]: 2.6e-9 kg; lognormal variance with pedigree 0.1027, pedigree (2,2,5,5,1)
  European data
  Uncertainty: E
- Carbon dioxide, fossil [air, non-urban air or from high stacks]: 1.2e-5 kg; lognormal variance with pedigree 0.0627, pedigree (2,2,5,5,1)
  European data
  Uncertainty: E
- Methane, fossil [air, non-urban air or from high stacks]: 0.00122 kg; lognormal variance with pedigree 0.1027, pedigree (2,2,5,5,1)
  European data
  Uncertainty: E
- Mercury [air, non-urban air or from high stacks]: 1.33e-10 kg; lognormal variance with pedigree 0.1027, pedigree (2,2,5,5,1)
  European data
  Uncertainty: E
- Ethane [air, non-urban air or from high stacks]: 0.000154 kg; lognormal variance with pedigree 0.1027, pedigree (2,2,5,5,1)
  European data
  Uncertainty: E
- NMVOC, non-methane volatile organic compounds, unspecified origin [air, non-urban air or from high stacks]: 2.4e-5 kg; lognormal variance with pedigree 0.1827, pedigree (2,2,5,5,1)
  European data
  Uncertainty: E
- Propane [air, non-urban air or from high stacks]: 2.09e-5 kg; lognormal variance with pedigree 0.1027, pedigree (2,2,5,5,1)
  European data
  Uncertainty: E
- Radon-222 [air, non-urban air or from high stacks]: 0.00024 kBq; lognormal variance with pedigree 0.3627, pedigree (2,2,5,5,1)
  European data
  Uncertainty: E
- Butane [air, non-urban air or from high stacks]: 3.52e-6 kg; lognormal variance with pedigree 0.1027, pedigree (2,2,5,5,1)
  European data
  Uncertainty: E

## Sampling procedure
Figures are based on average data without information on sampling procedure

## Extrapolations
This dataset has been extrapolated from year 2000 to the year of the calculation (2021). The uncertainty has been adjusted accordingly.

## Review by Emilia Moreno Ruiz 2017-09-06
PV adjusted

## Review by Michael Spielmann (obsolete) 2003-07-09
Passed.
