# banana production

Dataset: EcoSpold 2, unit process
Geography: IN
Time period: 2009-01-01 to 2021-12-31
Technology level: current
Classification: ISIC rev.4 ecoinvent: 0122:Growing of tropical and subtropical fruits
Tags: WFLDB
Scenario: Business-as-Usual
System model: Allocation, cut-off by classification
Generated by: Marcial Vargas
Published in: Nemecek T. 2015
Database: ecoinvent
isCopyrightProtected: true
accessRestrictedTo: 1

## General comment
This dataset represents the production of 1 kg of banana, at standard water content (78.1%). The reference flow is the average yield per ha and year, from 2009 - 2012: yield (35.1 t/ha) obtained under irrigated conditions (total amount of water 13705 m3/ha). The data are representative for banana production in India used for the export market. Mineral NPK fertiliser input is 57-0-146 kg/ha. Organic fertilisers applied amount to 1.84 m3/ha of liquid manure and 2.48 t/ha of solid manure. Total active ingredients (a.i.) applied as pesticides amount to 4.2 kg a.i./ha.
The dataset was modelled within the project 'World Food LCA database (WFLDB)'. The aim of this project was to provide inventories of a broad variety of agricultural products and processes and to cover for each product at least 50% of the global export market. The export share of bananas produced in India amounts to 0.4% of the global export (tonnage exported in 2010). The production system regarded in this dataset aimed at representing banana produced in India for the export market.
PEF-Quality: data quality rating (DQR) = 2.5 (i.e. good quality). This dataset refers to an average situation; for specific situations exchanges might differ substantially due to site specific parameters

## Included activities start
This activity starts with the nursery producing fruit tree seedlings, i.e.grafted young trees to be planted.

## Included activities end
This activity ends with the waste treatment after the clearing of the orchard (rooting up the trees). The dataset includes all activities during a year in the productive phase of the orchard including the establishment phase per year of lifetime (20 years), the clearing of the orchard including waste treatment.
The establishment phase of the orchard includes tree nursery, soil cultivation, planting trees, sowing grass, installation of trellis system (posts and wires) and irrigation. Fertiliser and pesticide use in a year of the establishment phase is assumed to be half of the amount of a year in the productive phase.
The productive phase of the orchard includes machine operations, corresponding infrastructure, fuel use and sheds. Machine operations in the productive phase are: soil cultivation (mulching, mowing), fertiliser and pesticide application, harvesting and irrigation. Further, direct field emissions and land use change are included. At the end of the productive phase the orchard is cleared by rooting up the trees.
The inputs of seedlings, fertilisers and pesticides as well as packaging of fertilisers and pesticides are considered. The dataset doesn't include emissions from manure storage because these are within the system boundary of animal production. Heavy metal uptake by the crop is considered.

## Technology
Conventional production

## Parameters
- LUC_crop_specific: 1 dimensionless
  This parameter allows to switch between a 'crop specific' and a 'country specific' approach when calculating the LUC of a crop. By default, the chosen approach is 'crop specific', so the value of the parameter is 1. If you want to apply a 'country specific' approach, turn the parameter to 0.
- heavyMetalUptakeSwitch: 1 dimensionless

## Reference product
- banana: 1 kg; By-product classification allocatable product; CPC 01312: Bananas
  Banana, Indian production
  Yield = 35106.0 kg/ha
  production volume 2.78034e10 kg
    Source: FAOSTAT. Average, 2009-2012
  property price 0.467 EUR2005
    Calculated from the trade statistics for the year 2005 published by the UN (COMTRADE database, accessed 20151105) as an average of 5 biggest importers of banana in the world; USA, BG, DE, UK and JP. Comtrade cathegory: 803: Bananas, including plantains, fresh or dried.
  property carbon content 0.12029
    carbon content on a dry matter basis (reserved; not for manual entry)
  properties: water content 2.77358, dry mass 0.265 kg, water in wet mass 0.735 kg, wet mass 1 kg, carbon content, non-fossil 0.12029, carbon content, fossil 0, carbon allocation 0.0318768 kg

## Inputs from technosphere
- fertilising, by broadcaster: 8.54555e-5 ha; lognormal variance with pedigree 0.124177, pedigree (2,1,4,1,1)
  Estimation based on a modified MEXALCA-approach (Roches et al. 2010; Nemecek et al. 2012): See supporting documentation 'WFLDB-Documentation.pdf' chapter 'Machinery processes' for L2 data (https://ecoquery.ecoinvent.org/File/Reports).
- tillage, ploughing: 4.78066e-6 ha; lognormal variance with pedigree 0.124177, pedigree (2,1,4,1,1)
  Proxy: Extrapolated using a modified MEXALCA-approach (Roches et al. 2010; Nemecek et al. 2012). See supporting documentation 'WFLDB-Documentation.pdf' chapter 'Machinery processes' for L1 data (https://ecoquery.ecoinvent.org/File/Reports).
- liquid manure spreading, by vacuum tanker: 5.25124e-5 m3; lognormal variance with pedigree 0.124177, pedigree (2,1,4,1,1)
  This amount corresponds to the input of liquid manure.
- mulching: 2.18233e-6 ha; lognormal variance with pedigree 0.124177, pedigree (2,1,4,1,1)
  (same comment as for tillage, ploughing)
- solid manure loading and spreading, by hydraulic loader and spreader: 0.0707799 kg; lognormal variance with pedigree 0.124177, pedigree (2,1,4,1,1)
  This amount corresponds the input of solid manure.
- packaging, for fertilisers: 0.0115507 kg; lognormal variance with pedigree 0.0592, pedigree (4,3,4,5,4)
  Total amount of active substance/s of fertilisers needed for the production of 'banana' is calculated to be circa 5.78E-03 kg. Fertiliser/s used in this dataset is/are: 'ammonia, liquid', 'ammonium nitrate, as N', 'ammonium sulfate, as N', 'nitrogen fertiliser, as N', 'potassium chloride, as K2O', 'potassium fertiliser, as K2O', 'potassium sulfate, as K2O', 'urea, as N'. The total amount of active substance/s is doubled in order to account for the packaging of the dilluted product of fertiliser/s that is/are applied. Therefore, 1.16E-02 kg of packaging for fertilisers is justified with this exchange.
  properties: wet mass 1 kg, heating value, net 25.01 MJ, price 0.0642 EUR2005, dry mass 1 kg, carbon content, fossil 0.825301
  note on carbon content, fossil: Considering a chemical formula (C2H4)n for polyethylene, carbon content-fossil is calculated to be 0.856286 kg of Carbon per kg of dry mass.
- application of plant protection product, by field sprayer: 0.000157477 ha; lognormal variance with pedigree 0.124664, pedigree (2,2,4,1,1)
  Proxy: Extrapolated using a modified MEXALCA-approach (Roches et al. 2010; Nemecek et al. 2012). See supporting documentation 'WFLDB-Documentation.pdf' chapter 'Machinery processes' for L1 data (https://ecoquery.ecoinvent.org/File/Reports). Field sprayer used as a proxy for pesticide application in orchards.
- land use change, perennial crop: 1.58007e-5 ha; = 1.58007E-05*LUC_crop_specific+0.0*(1-LUC_crop_specific)
  Calculated value. Land use change (LUC) combines land transformation areas calculated with the adapted 'Direct Land Use Change Assessment Tool' version 2014 developed by Blonk Consultants and the carbon losses from soil organic carbon (SOC) and vegetation (VEG) as calculated in ecoinvent v3. See 'WFLDB-Guidelines.pdf', available at https://ecoquery.ecoinvent.org/File/Reports.
- ammonia, anhydrous, liquid: 1.38301e-7 kg; lognormal variance with pedigree 0.124177, pedigree (2,1,4,1,1)
  Calculated based on literature values: The nutrient content of the crop multiplied by the country-share of the fertiliser type (IFA 2014). See supporting documentation 'WFLDB-Documentation.pdf' chapter 'Fertiliser application' for L1 data and appendix for the source of nutrient content (https://ecoquery.ecoinvent.org/File/Reports).
  Corresponds to 0.00486 kg/ha
  properties: wet mass 1 kg, dry mass 1 kg
- transport, tractor and trailer, agricultural: 0.000963169 metric ton*km; lognormal variance with pedigree 0.162439, pedigree (4,1,4,1,1)
  On-farm transport: Yield (in tonnes) multiplied by the average distance from field to farm. The distance was obtained by extrapolation (modified MEXALCA approach). See supporting documentation 'WFLDB-Documentation.pdf' chapter 'Machinery processes' (https://ecoquery.ecoinvent.org/File/Reports).
- ammonium nitrate: 3.25434e-7 kg; lognormal variance with pedigree 0.124177, pedigree (2,1,4,1,1)
  The exchange has been updated from 'ammonium nitrate, as N' into 'ammonium nitrate' and therefore its amount has been scaled (multiplied) from 0 kg by 2.8573 kg of 'ammonium nitrate' per kg of 'ammonium nitrate, as N'. Original comment of the exchange is: Calculated based on literature values: The nutrient content of the crop multiplied by the country-share of the fertiliser type (IFA 2014). See supporting documentation 'WFLDB-Documentation.pdf' chapter 'Fertiliser application' for L1 data and appendix for the source of nutrient content (https://ecoquery.ecoinvent.org/File/Reports).
  Corresponds to 0.004 kg/ha
  properties: wet mass 1 kg, dry mass 1 kg
- naphtha: 0.000120099 kg; lognormal variance with pedigree 0.0138498, pedigree (2,2,4,1,1)
  Proxy: Source for total amount of pesticides: extrapolated from MEXALCA. Active ingredient is calculated based on the ecoinvent dataset Banana EC. For calculations see supporting documentation 'WFLDB-Documentation.pdf' (https://ecoquery.ecoinvent.org/File/Reports).
  properties: dry mass 1 kg, heating value, net 45 MJ, wet mass 1 kg, carbon content, fossil 0.919743
- ammonium sulfate: 1.06637e-5 kg; lognormal variance with pedigree 0.124177, pedigree (2,1,4,1,1)
  Calculated based on literature values: The nutrient content of the crop multiplied by the country-share of the fertiliser type (IFA 2014). See supporting documentation 'WFLDB-Documentation.pdf' chapter 'Fertiliser application' for L1 data and appendix for the source of nutrient content (https://ecoquery.ecoinvent.org/File/Reports).
  Corresponds to 0.374 kg/ha
  properties: dry mass 1 kg, wet mass 1 kg
- fruit tree seedling, for planting: 0.000187236 unit; lognormal variance with pedigree 0.124177, pedigree (2,1,4,1,1)
  Proxy: Similar crop and country used. This is the number of trees per ha divided by the lifetime years of the orchard.
  properties: carbon content, non-fossil 0.439481, wet mass 1 kg, water content 0.73, dry mass 0.578035 kg
  note on carbon content, non-fossil: calculation: C-content of components according to ecoinvent report No. 15a. Source of composition: https://ndb.nal.usda.gov/ndb/search/. Unspecific seedling used as proxy.
- urea: 0.00137393 kg; lognormal variance with pedigree 0.124177, pedigree (2,1,4,1,1)
  The exchange has been updated from 'urea, as N' into 'urea' and therefore its amount has been scaled (multiplied) from 0.0006 kg by 2.1438 kg of 'urea' per kg of 'urea, as N'. Original comment of the exchange is: Calculated based on literature values: The nutrient content of the crop multiplied by the country-share of the fertiliser type (IFA 2014). See supporting documentation 'WFLDB-Documentation.pdf' chapter 'Fertiliser application' for L1 data and appendix for the source of nutrient content (https://ecoquery.ecoinvent.org/File/Reports).
  Corresponds to 22.5 kg/ha
  properties: wet mass 1 kg, carbon content, fossil 0.2, dry mass 1 kg
- irrigation: 0.390366 m3; lognormal variance with pedigree 0.124177, pedigree (2,1,4,1,1)
  Calculated value: The total amount of water used for irrigation (calculated from evapotranspiration, Pfister et al. 2011) multiplied by the country-share of irrigation technique (WFLDB-Guidelines.pdf, Appendix 6.1). See supporting documentation 'WFLDB-Documentation.pdf' chapter 'Water use for irrigation' for L2 data (https://ecoquery.ecoinvent.org/File/Reports).
  properties: water content 9089.91, wet mass 1000 kg, dry mass 0.11 kg
- potassium chloride: 0.00462975 kg; lognormal variance with pedigree 0.124177, pedigree (2,1,4,1,1)
  The exchange has been updated from 'potassium chloride, as K2O' into 'potassium chloride' and therefore its amount has been scaled (multiplied) from 0.0029 kg by 1.5829 kg of 'potassium chloride' per kg of 'potassium chloride, as K2O'. Original comment of the exchange is: Calculated based on literature values: The nutrient content of the crop multiplied by the country-share of the fertiliser type (IFA 2014). See supporting documentation 'WFLDB-Documentation.pdf' chapter 'Fertiliser application' for L1 data and appendix for the source of nutrient content (https://ecoquery.ecoinvent.org/File/Reports).
  properties: dry mass 1 kg, wet mass 1 kg
- planting tree: 0.000187236 unit; lognormal variance with pedigree 0.124177, pedigree (2,1,4,1,1)
  (same comment as for fruit tree seedling, for planting)
- inorganic potassium fertiliser, as K2O: 0.00121592 kg; lognormal variance with pedigree 0.124177, pedigree (2,1,4,1,1)
  Calculated based on literature values: The nutrient content of the crop multiplied by the country-share of the fertiliser type (IFA 2014). See supporting documentation 'WFLDB-Documentation.pdf' chapter 'Fertiliser application' for L1 data and appendix for the source of nutrient content (https://ecoquery.ecoinvent.org/File/Reports).
  Corresponds to 42.7 kg/ha
  properties: dry mass 1 kg, wet mass 1 kg
- establishing orchard: 0.000187236 unit; lognormal variance with pedigree 0.124177, pedigree (2,1,4,1,1)
  (same comment as for fruit tree seedling, for planting)
- potassium sulfate: 3.74314e-5 kg; lognormal variance with pedigree 0.124177, pedigree (2,1,4,1,1)
  The exchange has been updated from 'potassium sulfate, as K2O' into 'potassium sulfate' and therefore its amount has been scaled (multiplied) from 0 kg by 1.85 kg of 'potassium sulfate' per kg of 'potassium sulfate, as K2O'. Original comment of the exchange is: Calculated based on literature values: The nutrient content of the crop multiplied by the country-share of the fertiliser type (IFA 2014). See supporting documentation 'WFLDB-Documentation.pdf' chapter 'Fertiliser application' for L1 data and appendix for the source of nutrient content (https://ecoquery.ecoinvent.org/File/Reports).
  Corresponds to 0.71 kg/ha
  properties: dry mass 1 kg, wet mass 1 kg
- inorganic nitrogen fertiliser, as N: 0.00096254 kg; lognormal variance with pedigree 0.124177, pedigree (2,1,4,1,1)
  Calculated based on literature values: The nutrient content of the crop multiplied by the country-share of the fertiliser type (IFA 2014). See supporting documentation 'WFLDB-Documentation.pdf' chapter 'Fertiliser application' for L1 data and appendix for the source of nutrient content (https://ecoquery.ecoinvent.org/File/Reports).
  properties: dry mass 1 kg, wet mass 1 kg
- manure, liquid, cattle: 0.0502072 kg; lognormal variance with pedigree 0.124177, pedigree (2,1,4,1,1)
  Calculated based on literature values: The total amount of manure multiplied by the country-share of manure per animal category (FAOSTAT 2015). See supporting documentation 'WFLDB-Documentation.pdf' chapter 'Fertiliser application' (https://ecoquery.ecoinvent.org/File/Reports).
  Corresponds to 1.76 m3/ha
  properties: carbon content, non-fossil 0.68, water content 12.333, dry mass 0.075 kg, wet mass 1 kg
- waste wood, untreated: -0.0379707 kg; lognormal variance with pedigree 0.124177, pedigree (2,1,4,1,1)
  Wood from trees after 1-2 years of sorrage at the field (20% water) per lifetime year (20 years) of the orchard
  production volume 1.05572e9 kg
    Calculated from the reference product amount and production volume
  properties: water content 0.25, heating value, net 13.99 MJ, wet mass 1 kg, dry mass 0.8 kg, carbon content, non-fossil 0.48632
  note on heating value, net: Value taken from the general comment of the treatment dataset.
- manure, liquid, swine: 0.00122453 kg; lognormal variance with pedigree 0.124177, pedigree (2,1,4,1,1)
  Calculated based on literature values: The total amount of manure multiplied by the country-share of manure per animal category (FAOSTAT 2015). See supporting documentation 'WFLDB-Documentation.pdf' chapter 'Fertiliser application' (https://ecoquery.ecoinvent.org/File/Reports).
  Corresponds to 0.043 m3/ha
  properties: water content 19, dry mass 0.05 kg, carbon content, non-fossil 0.64, wet mass 1 kg
- poultry manure, fresh: 0.000540349 kg; lognormal variance with pedigree 0.124177, pedigree (2,1,4,1,1)
  Calculated based on literature values: The total amount of manure multiplied by the country-share of manure per animal category (FAOSTAT 2015). See supporting documentation 'WFLDB-Documentation.pdf' chapter 'Fertiliser application' (https://ecoquery.ecoinvent.org/File/Reports).
  Corresponds to 0.0379 m3/ha
  properties: dry mass 0.38 kg, wet mass 1 kg, carbon content, non-fossil 0.33389, water content 1.63158
- manure, solid, cattle: 0.069249 kg; lognormal variance with pedigree 0.124177, pedigree (2,1,4,1,1)
  Calculated based on literature values: The total amount of manure multiplied by the country-share of manure per animal category (FAOSTAT 2015). See supporting documentation 'WFLDB-Documentation.pdf' chapter 'Fertiliser application' (https://ecoquery.ecoinvent.org/File/Reports).
  Corresponds to 2430.0 kg/ha
  properties: water content 3.5454, wet mass 1 kg, carbon content, non-fossil 0.441, dry mass 0.22 kg
- poultry manure, dried: 0.00153093 kg; lognormal variance with pedigree 0.124177, pedigree (2,1,4,1,1)
  Calculated based on literature values: The total amount of manure multiplied by the country-share of manure per animal category (FAOSTAT 2015). See supporting documentation 'WFLDB-Documentation.pdf' chapter 'Fertiliser application' (https://ecoquery.ecoinvent.org/File/Reports).
  properties: wet mass 1 kg, potassium content 0.024, dry mass 0.865 kg, nitrogen content 0.532, nickel content 4e-5, phosphorus content 0.0167, mercury content 2e-7, lead content 2.92e-6, copper content 4.38e-5, zinc content 0.000349, cadmium content 2.92e-7, carbon content, non-fossil 0.33389, water content 0.156069

## Inputs from nature
- Occupation, permanent crop, irrigated [natural resource, land]: 0.285621 m2*year; lognormal variance with pedigree 0.0200616, pedigree (2,1,4,1,1)
  Related to the duration from harvest date of previous crop to harvest date of main crop.
- Transformation, from permanent crop, irrigated [natural resource, land]: 0.0142426 m2; lognormal variance with pedigree 0.0442144, pedigree (2,1,4,1,1)
  10000 m2 divided by the life time of the perennial crop (20 years).
- Carbon dioxide, in air [natural resource, in air]: 0.34487 kg; lognormal variance with pedigree 0.0138498, pedigree (2,2,4,1,1)
  CO2 uptake by biomass
- Transformation, to permanent crop, irrigated [natural resource, land]: 0.0142426 m2; lognormal variance with pedigree 0.0442144, pedigree (2,1,4,1,1)
  10000 m2 divided by the life time of the perennial crop (20 years).
- Energy, gross calorific value, in biomass [natural resource, biotic]: 3.7364 MJ; lognormal variance with pedigree 0.0138498, pedigree (2,2,4,1,1)

## Emissions to nature
- Mercury [water, ground-]: 7.85706e-11 kg; source Freiermuth R.  2006; lognormal variance with pedigree 0.356938, pedigree (2,2,4,1,1)
  Calculated value - Freiermuth (2006). See 'WFLDB-Guidelines.pdf', available at https://ecoquery.ecoinvent.org/File/Reports. Since part of the soils in India are basic, leaching could be overestimated.
- Dinitrogen monoxide [air, non-urban air or from high stacks]: 5.59721e-5 kg; source IPCC 2006; lognormal variance with pedigree 0.124664, pedigree (2,2,4,1,1)
  Calculated value - IPCC (2006). See 'WFLDB-Guidelines.pdf', available at https://ecoquery.ecoinvent.org/File/Reports.
- Nickel, ion [water, ground-]: 1.71845e-11 kg; source Freiermuth R.  2006; lognormal variance with pedigree 0.356938, pedigree (2,2,4,1,1)
  (same comment as for Mercury)
- Water [air, non-urban air or from high stacks]: 0.186999 m3; lognormal variance with pedigree 0.124177, pedigree (2,1,4,1,1)
  Calculated value - Emission calculated from water balance. See 'WFLDB-Guidelines.pdf', available at https://ecoquery.ecoinvent.org/File/Reports.
- Zinc, ion [water, ground-]: 6.71908e-7 kg; source Freiermuth R.  2006; lognormal variance with pedigree 0.356938, pedigree (2,2,4,1,1)
  (same comment as for Mercury)
- Phosphate [water, surface water]: 2.31601e-5 kg; source Prasuhn V.  2006; lognormal variance with pedigree 0.175866, pedigree (2,2,4,1,1)
  Calculated value - Prasuhn (2006). See 'WFLDB-Guidelines.pdf', available at https://ecoquery.ecoinvent.org/File/Reports.
- Water [water, surface water]: 0.162704 m3; lognormal variance with pedigree 0.124177, pedigree (2,1,4,1,1)
  (same comment as for Water)
- Phosphorus [water, surface water]: 1.34444e-5 kg; source Prasuhn V.  2006; lognormal variance with pedigree 0.175866, pedigree (2,2,4,1,1)
  Calculated value - Prasuhn (2006) and SQCB-Erosion. See 'WFLDB-Guidelines.pdf', available at https://ecoquery.ecoinvent.org/File/Reports.
- Water [water, ground-]: 0.0406768 m3; lognormal variance with pedigree 0.124177, pedigree (2,1,4,1,1)
  (same comment as for Water)
- Phosphate [water, ground-]: 5.26862e-6 kg; source Prasuhn V.  2006; lognormal variance with pedigree 0.175866, pedigree (2,2,4,1,1)
  Calculated value - Prasuhn (2006). See 'WFLDB-Guidelines.pdf', available at https://ecoquery.ecoinvent.org/File/Reports. Since part of the soils in India are basic, leaching could be overestimated.
- Nitrate [water, ground-]: 0.0050659 kg; source Faist Emmenegger M. 2009; lognormal variance with pedigree 0.175866, pedigree (2,2,4,1,1)
- Cadmium [soil, agricultural]: -6.02603e-9 kg; = 1.6210904119e-08 + ( - 2.22369302683e-08)*heavyMetalUptakeSwitch; source Freiermuth R.  2006
  Comment on mathematicalRelation:
  1.6210904119e-08 from Calculated value - Freiermuth (2006). See 'WFLDB-Guidelines.pdf', available at https://ecoquery.ecoinvent.org/File/Reports.
  -2.22369302683e-08 from Crop, default, heavy metals uptake model
  Heavy metal uptake can be excluded by setting the parameter heavyMetalUptakeSwitch to zero.
- Chromium [soil, agricultural]: -6.69231e-7 kg; = -5.49877513815e-07 + ( - 1.19353230217e-07)*heavyMetalUptakeSwitch; source Freiermuth R.  2006
  Comment on mathematicalRelation:
  -5.49877513815e-07 from Calculated value - Freiermuth (2006). See 'WFLDB-Guidelines.pdf', available at https://ecoquery.ecoinvent.org/File/Reports.
  -1.19353230217e-07 from Crop, default, heavy metals uptake model
  Heavy metal uptake can be excluded by setting the parameter heavyMetalUptakeSwitch to zero.
- Lead [soil, agricultural]: -9.47523e-8 kg; = 2.36745855409e-08 + ( - 1.18426873953e-07)*heavyMetalUptakeSwitch; source Freiermuth R.  2006
  Comment on mathematicalRelation:
  2.36745855409e-08 from Calculated value - Freiermuth (2006). See 'WFLDB-Guidelines.pdf', available at https://ecoquery.ecoinvent.org/File/Reports.
  -1.18426873953e-07 from Crop, default, heavy metals uptake model
  Heavy metal uptake can be excluded by setting the parameter heavyMetalUptakeSwitch to zero.
- Copper [soil, agricultural]: -1.34171e-6 kg; = 1.09556770922e-07 + ( - 1.45126958041e-06)*heavyMetalUptakeSwitch; source Freiermuth R.  2006
  Comment on mathematicalRelation:
  1.09556770922e-07 from Calculated value - Freiermuth (2006). See 'WFLDB-Guidelines.pdf', available at https://ecoquery.ecoinvent.org/File/Reports.
  -1.45126958041e-06 from Crop, default, heavy metals uptake model
  Heavy metal uptake can be excluded by setting the parameter heavyMetalUptakeSwitch to zero.
- Mercury [soil, agricultural]: -7.63362e-10 kg; = 8.11827038113e-09 + ( - 8.88163230217e-09)*heavyMetalUptakeSwitch; source Freiermuth R.  2006
  Comment on mathematicalRelation:
  8.11827038113e-09 from Calculated value - Freiermuth (2006). See 'WFLDB-Guidelines.pdf', available at https://ecoquery.ecoinvent.org/File/Reports.
  -8.88163230217e-09 from Crop, default, heavy metals uptake model
  Heavy metal uptake can be excluded by setting the parameter heavyMetalUptakeSwitch to zero.
- Cadmium, ion [water, surface water]: 3.09634e-9 kg; source Freiermuth R.  2006; lognormal variance with pedigree 0.356938, pedigree (2,2,4,1,1)
  Calculated value - Freiermuth (2006). See 'WFLDB-Guidelines.pdf', available at https://ecoquery.ecoinvent.org/File/Reports.
- Nickel [soil, agricultural]: -2.5208e-7 kg; = -2.33162422378e-08 + ( - 2.28764007862e-07)*heavyMetalUptakeSwitch; source Freiermuth R.  2006
  Comment on mathematicalRelation:
  -2.33162422378e-08 from Calculated value - Freiermuth (2006). See 'WFLDB-Guidelines.pdf', available at https://ecoquery.ecoinvent.org/File/Reports.
  -2.28764007862e-07 from Crop, default, heavy metals uptake model
  Heavy metal uptake can be excluded by setting the parameter heavyMetalUptakeSwitch to zero.
- Zinc [soil, agricultural]: -2.30092e-6 kg; = 4.71201504016e-06 + ( - 7.01293301145e-06)*heavyMetalUptakeSwitch; source Freiermuth R.  2006
  Comment on mathematicalRelation:
  4.71201504016e-06 from Calculated value - Freiermuth (2006). See 'WFLDB-Guidelines.pdf', available at https://ecoquery.ecoinvent.org/File/Reports.
  -7.01293301145e-06 from Crop, default, heavy metals uptake model
  Heavy metal uptake can be excluded by setting the parameter heavyMetalUptakeSwitch to zero.
- Chromium, ion [water, surface water]: 4.07708e-7 kg; source Freiermuth R.  2006; lognormal variance with pedigree 0.356938, pedigree (2,2,4,1,1)
  (same comment as for Cadmium, ion)
- Copper, ion [water, surface water]: 7.35544e-7 kg; source Freiermuth R.  2006; lognormal variance with pedigree 0.356938, pedigree (2,2,4,1,1)
  (same comment as for Cadmium, ion)
- Lead [water, surface water]: 9.03264e-8 kg; source Freiermuth R.  2006; lognormal variance with pedigree 0.356938, pedigree (2,2,4,1,1)
  (same comment as for Cadmium, ion)
- Mercury [water, surface water]: 1.34778e-9 kg; source Freiermuth R.  2006; lognormal variance with pedigree 0.356938, pedigree (2,2,4,1,1)
  (same comment as for Cadmium, ion)
- Nickel, ion [water, surface water]: 3.31482e-7 kg; source Freiermuth R.  2006; lognormal variance with pedigree 0.356938, pedigree (2,2,4,1,1)
  (same comment as for Cadmium, ion)
- Zinc, ion [water, surface water]: 1.00581e-6 kg; source Freiermuth R.  2006; lognormal variance with pedigree 0.356938, pedigree (2,2,4,1,1)
  (same comment as for Cadmium, ion)
- Cadmium, ion [water, ground-]: 7.1606e-10 kg; source Freiermuth R.  2006; lognormal variance with pedigree 0.356938, pedigree (2,2,4,1,1)
  (same comment as for Mercury)
- Chromium, ion [water, ground-]: 4.54196e-7 kg; source Freiermuth R.  2006; lognormal variance with pedigree 0.356938, pedigree (2,2,4,1,1)
  (same comment as for Mercury)
- Carbon dioxide, fossil [air, non-urban air or from high stacks]: 0.00150929 kg; lognormal variance with pedigree 0.0138498, pedigree (2,2,4,1,1)
  Calculated value - CO2 emissions from urea and lime. See 'WFLDB-Guidelines.pdf', available at https://ecoquery.ecoinvent.org/File/Reports.
- Copper, ion [water, ground-]: 9.60491e-8 kg; source Freiermuth R.  2006; lognormal variance with pedigree 0.356938, pedigree (2,2,4,1,1)
  (same comment as for Mercury)
- Ammonia [air, non-urban air or from high stacks]: 0.000461887 kg; source EEA 2013; lognormal variance with pedigree 0.0447216, pedigree (2,2,4,1,1)
  Calculated value - EMEP/EEA (2013). See 'WFLDB-Guidelines.pdf', available at https://ecoquery.ecoinvent.org/File/Reports.
- Lead [water, ground-]: 3.08836e-9 kg; source Freiermuth R.  2006; lognormal variance with pedigree 0.356938, pedigree (2,2,4,1,1)
  (same comment as for Mercury)
- Mineral oil [soil, agricultural]: 0.000120099 kg; lognormal variance with pedigree 0.0447216, pedigree (2,2,4,1,1)
  Calculated value - 100% emission in soil. See 'WFLDB-Guidelines.pdf', available at https://ecoquery.ecoinvent.org/File/Reports.
- Nitrogen oxides [air, non-urban air or from high stacks]: 8.40512e-5 kg; source EEA 2013; lognormal variance with pedigree 0.124664, pedigree (2,2,4,1,1)
  Calculated value - EEA/EMEP (2013). See 'WFLDB-Guidelines.pdf', available at https://ecoquery.ecoinvent.org/File/Reports.

## Sampling procedure
WFLDB Methodological Guidelines for the Life Cycle Inventory of Agricultural Products in the latest version, available at: https://ecoquery.ecoinvent.org/File/Reports. Data sources: Data were categorised from level 0 (L0) to level (L4) as follows: L0 = estimate, proxy; L1 = statistical data (e.g. FAOSTAT); L2 = L1 adapted to crop and country; L3 = literature data or L1 resp. L2 data approved by experts; medium detailing (i.e. kg of total N-fertiliser); L4 = L3 data of high detailing (i.e. portion N-fertiliser types).In this dataset data were obtained for yield: L3; Fertilisers: L4; Pesticides: L1; Machinery: L0; Irrigation: L2. For information regarding the calculation of individual exchanges see supporting documentation WFLDB-Documentation.pdf

## Extrapolations
This dataset has been extrapolated from year 2012 to the year of the calculation (2021). The uncertainty has been adjusted accordingly.

## Review by Assumpció ANTON 2016-05-30
Be aware that the use of statistics in input calculations could provide some specific inputs not common for specific crops, this should be corrected if better information is available and better reflexed in DQR . Currently, I would dissent for some of good marks provided, being a revision of criteria applied advisable.

Pesticides will need to be amended periodically checking for update of pesticides' ban.
