# treatment of used outside air intake, stainless steel, DN 370

Dataset: EcoSpold 2, unit process
Geography: CH
Time period: 2000-01-01 to 2021-12-31
Technology level: current
Classification: ISIC rev.4 ecoinvent: 3830:Materials recovery
Classification: EcoSpold01Categories: waste management/building demolition
Tags: Treatment; ConvertedDataset
Scenario: Business-as-Usual
System model: Allocation, cut-off by classification
Generated by: Alex Primas
Published in: Hässig, W. 2007
Database: ecoinvent
isCopyrightProtected: true
accessRestrictedTo: 1

## General comment
Disposal of an outside mounted stainless steel tube with air inlet of 400 mm diameter. Weight per element 32 kg
[This dataset was already contained in the ecoinvent database version 2. It was not individually updated during the transfer to ecoinvent version 3. Life Cycle Impact Assessment results may still have changed, as they are affected by changes in the supply chain, i.e. in other datasets. This dataset was generated following the ecoinvent quality guidelines for version 2. It may have been subject to central changes described in the ecoinvent version 3 change report (http://www.ecoinvent.org/database/ecoinvent-version-3/reports-of-changes/), and the results of the central updates were reviewed extensively. The changes added e.g. consistent water flows and other information throughout the database. The documentation of this dataset can be found in the ecoinvent reports of version 2, which are still available via the ecoinvent website. The change report linked above covers all central changes that were made during the conversion process.]

## Included activities end
Transport to dismantling facilities, machines for handling in sorting plant, electricity demand for sorting plant, final disposal of waste material. Cut-off to recycling for metals.

## Geography
Specific to the technology mix encountered in sorting plants in Switzerland

## Technology
Disposal to a sorting plant assumed. Metal pieces and copper in cables and electronic devices are recycled, plastic parts are incinerated, inert wastes (e.g. rock wool) are landfilled.

## Time period
Amount of material investigated in 2003. Disposal technology mix as used in late 1990ies

## Reference product
- used outside air intake stainless steel, DN 370: -1 unit; CPC 39310: Slag, dross, scalings and other waste from the manufacture of iron or steel; By-product classification Waste
  EcoSpold01Location=CH
  production volume 0.0336675 unit
    This is a placeholder value that does not reflect real-world production volumes. This dataset does not currently require a real-world production volume to work in the database framework, and no actual data were collected yet. This has no negative effect on the results of the ecoinvent database. The placeholder value of this activity was scaled according to the nominal GDP of 2005 (source: United Nations, http://data.un.org/Glossary.aspx?q=GDP+%28current+US%24%29, accessed 20130726) to reflect an appropriate share of the global production volume, which is also a placeholder value.
  property price 0 EUR2005
    Waste products are assigned a price of zero as they are assumed to require further treatment.
  property carbon content 0.0520342
    carbon content on a dry matter basis (reserved; not for manual entry)
  properties: water content 0, carbon content, fossil 0.0520342, carbon content, non-fossil 0, dry mass 32 kg, water in wet mass 0 kg, wet mass 32 kg, carbon allocation 1.66509 kg

## Inputs from technosphere
- waste polyethylene/polypropylene product: -2 kg; lognormal variance with pedigree 0.072, pedigree (3,4,5,1,3)
  Estimation based on data of Questionnaire
  EcoSpold01Location=CH
  Uncertainty: Estimation based on data of Questionnaire
  production volume 2 kg
    Calculated from the production volume of used outside air intake stainless steel, DN 370 in proportion to the respective output amounts.
  properties: water content 0.180638, carbon content, fossil 0.748045, dry mass 0.847 kg, wet mass 1 kg, heating value, net 42.47 MJ
  note on carbon content, fossil: Mixed various plastics was used to estimate the C content of this waste (Tab A.2, ecoinvent v2.2 report 13_I)
- waste bulk iron, excluding reinforcement: -30 kg; lognormal variance with pedigree 0.072, pedigree (3,4,5,1,3)
  EcoSpold01Location=CH
  Estimation based on data of Questionnaire
  Uncertainty: Estimation based on data of Questionnaire
  production volume 30 kg
    (same comment as for waste polyethylene/polypropylene product)
  properties: wet mass 1 kg, dry mass 1 kg

## Sampling procedure
Questionnaire and assumptions.

## Extrapolations
This dataset has been extrapolated from year 2000 to the year of the calculation (2021). The uncertainty has been adjusted accordingly.

## Review by Rolf Frischknecht 2007-08-16
passed
none
