# wood wool production

Dataset: EcoSpold 2, unit process
Geography: CA-QC
Time period: 2002-01-01 to 2021-12-31
Technology level: current
Classification: EcoSpold01Categories: wooden materials/extraction
Classification: ISIC rev.4 ecoinvent: 1610:Sawmilling and planing of wood
Synonyms: Fichte, Verpackungsmaterial; Spruce, packaging material
Tags: Recontextualization
Scenario: Business-as-Usual
System model: Allocation, cut-off by classification
Generated by: Pascal Lesage
Published in: Werner F. 2007
Database: ecoinvent
isCopyrightProtected: true
accessRestrictedTo: 1

## General comment
This dataset represents the production of one kg wood wool. The dataset covers high quality wood wool without shives. The input of wood is assumed to be from forest industry.

The production data reflects a Swiss wood wool producer from 2000, which is assumed representative for Europe. The dataset is mainly based on plant data from the producer. There might be considerable variations between different wood wool and wood wool board plants. The processes however, are basically the same.
[This dataset was already contained in the ecoinvent database version 2. It was not individually updated during the transfer to ecoinvent version 3. Life Cycle Impact Assessment results may still have changed, as they are affected by changes in the supply chain, i.e. in other datasets. This dataset was generated following the ecoinvent quality guidelines for version 2. It may have been subject to central changes described in the ecoinvent version 3 change report (http://www.ecoinvent.org/database/ecoinvent-version-3/reports-of-changes/), and the results of the central updates were reviewed extensively. The changes added e.g. consistent water flows and other information throughout the database. The documentation of this dataset can be found in the ecoinvent reports of version 2, which are still available via the ecoinvent website. The change report linked above covers all central changes that were made during the conversion process.]
Child dataset exchanges identical to GLO dataset. Created to enable linking to regional markets (e.g. for electricity). Data quality indicators adjusted accordingly.

## Included activities start
From reception of industrial wood at the factory gatel.

## Included activities end
This activity ends with wood wool, at plant. The dataset includes all processes of wood wool production from industrial softwood (debarked), including air drying (from u=70 - 20%), external and internal transports, sucktion, air compression and sawmill production. The dataset does not include infrastructure.

## Geography
Data from the only Swiss wood wool production plant used for central Europe
Child dataset exchanges identical to GLO dataset. Created to enable linking to regional markets (e.g. for electricity). Data quality indicators adjusted accordingly.

## Technology
Medium enterprise technology (2000)

## Reference product
- wood wool: 1 kg; name ref_woodWool; By-product classification allocatable product; CPC 31220: Wood wool; wood flour
  production volume 762791 kg; name wood_wool
    The annulal production volume has been calculated by united nations statistics division. http://data.un.org/Data.aspx?q=wood+wool&d=ComTrade&f=_l1Code%3a45%3bcmdCode%3a440500
  property price 0.374 EUR2005
    Temporary price data. Calculated as 90% of purchasers price based on: Price for wood pulp applied (World Import/Export (USD/kg) from FaoStat (http://faostat.fao.org/site/626/default.aspx#ancor, [accessed 14th June 2010])
  property carbon content, non-fossil 0.494
    C content of dry mass is 0.494 kgC/kg dry wood (ecoinvent v2.2 report 9)
  property heating value, net 12.06 MJ
    LHV is calculated based on the Carbon content of the product. More details can be found on the respective documentation.
  property carbon content 0.494
    carbon content on a dry matter basis (reserved; not for manual entry)
  property true value 0.374; name ref_woodWool_true_value
    allocation property applied in "true value" allocation // value calculated from revenue
  properties: dry mass 0.833333 kg, wet mass 1 kg, water content 0.2, water in wet mass 0.166667 kg, carbon content, fossil 0, carbon allocation 0.411667 kg

## By-products
- residual wood, dry: 0 m3; name residual_wood; CPC 39283: Non-agglomerated wood waste and scrap; By-product classification allocatable product
  production volume 70.6344 m3; = (residual_wood* wood_wool)/ref_woodWool
    Calculated based on the reference exchange production volume and the relative amounts of exchanges
  property carbon content, non-fossil 0.494
    C content of dry mass is 0.494 kgC/kg dry wood (ecoinvent v2.2 report 9)
  property price 26.9 EUR2005
    Temporary price data. Calculated as 90% of purchasers price based on: 2004 prices for World Import/Export (USD/cubicmeter) from FaoStat (http://faostat.fao.org/site/626/default.aspx#ancor, [accessed 10th June 2010]) Commodity: 'Chips and Particles' assuming this is for air-dry chips (10% water on a dry matter basis at 650 kg/m3) and no price difference for water content (i.e. assuming air-drying).
  property heating value, net 8030.06 MJ
    LHV is calculated based on the Carbon content of the product. More details can be found on the respective documentation.The property is based on a value of 12.7MJ/kg
  property carbon content 0.494
    carbon content on a dry matter basis (reserved; not for manual entry)
  property true value 0.00249094; name residual_wood_true_value
    allocation property applied in "true value" allocation // value calculated from revenue
  properties: water content 0.15, carbon content, fossil 0, wet mass 632.5 kg, dry mass 550 kg, water in wet mass 82.5 kg, carbon allocation 271.7 kg

## Inputs from technosphere
- residual softwood, wet: 0.00210597 m3; lognormal variance with pedigree 0.044, pedigree (1,4,5,5,1)
  properties: wet mass 765 kg, heating value, net 5962.7 MJ, carbon content, non-fossil 0.494, dry mass 450 kg, water content 0.7
  note on carbon content, non-fossil: C content of dry mass is 0.494 kgC/kg dry wood (ecoinvent v2.2 report 9)
- electricity, medium voltage: 0.0588083 kWh; lognormal variance with pedigree 0.044, pedigree (1,4,5,5,1)
- sawmill: 8.42389e-10 unit; lognormal variance with pedigree 0.448, pedigree (4,5,5,5,4)

## Inputs from nature
- Carbon dioxide, non-fossil, resource correction [natural resource, in air]: -0.0880936 kg; pedigree (1,1,1,1,1)
  This exchange has been added after economic allocation in order to re-balance the non-fossil carbon dioxide resource extraction.

## Sampling procedure
personal communication

## Extrapolations
see Geography and Technology This dataset has been copied from an original dataset covering the geography RER. The uncertainty has been adjusted accordingly.Child dataset exchanges identical to GLO dataset. Created to enable linking to regional markets (e.g. for electricity). Data quality indicators adjusted accordingly.
