# metallization paste production, back side, aluminium

Dataset: EcoSpold 2, unit process
Geography: RER
Time period: 2006-01-01 to 2021-12-31
Technology level: current
Classification: EcoSpold01Categories: photovoltaic/production of components
Classification: ISIC rev.4 ecoinvent: 2029:Manufacture of other chemical products n.e.c.
Tags: ConvertedDataset
Scenario: Business-as-Usual
System model: Allocation, cut-off by classification
Generated by: Mariska J. de Wild-Scholten
Published in: Jungbluth, N. 2007
Database: ecoinvent
isCopyrightProtected: true
accessRestrictedTo: 1

## General comment
Chemical composition of typical pastes taken from Material Safety Data Sheets. Energy use and infrastructure estimated with data for solder production.
[This dataset was already contained in the ecoinvent database version 2. It was not individually updated during the transfer to ecoinvent version 3. Life Cycle Impact Assessment results may still have changed, as they are affected by changes in the supply chain, i.e. in other datasets. This dataset was generated following the ecoinvent quality guidelines for version 2. It may have been subject to central changes described in the ecoinvent version 3 change report (http://www.ecoinvent.org/database/ecoinvent-version-3/reports-of-changes/), and the results of the central updates were reviewed extensively. The changes added e.g. consistent water flows and other information throughout the database. The documentation of this dataset can be found in the ecoinvent reports of version 2, which are still available via the ecoinvent website. The change report linked above covers all central changes that were made during the conversion process.]

## Included activities end
Production of paste used in production of photovoltaic cells.

## Geography
Data for production in Europe.

## Technology
Assumption that production technology is similar as for solders.

## Time period
Data investigated in 2006.

## Reference product
- metallization paste, back side, aluminium: 1 kg; CPC 35499: Other chemical products n.e.c.; By-product classification allocatable product
  EcoSpold01Location=RER
  production volume 1.32237 kg
    This is a placeholder value that does not reflect real-world production volumes. This dataset does not currently require a real-world production volume to work in the database framework, and no actual data were collected yet. This has no negative effect on the results of the ecoinvent database. The placeholder value of this activity was scaled according to the nominal GDP of 2005 (source: United Nations, http://data.un.org/Glossary.aspx?q=GDP+%28current+US%24%29, accessed 20130726) to reflect an appropriate share of the global production volume, which is also a placeholder value.
  property heating value, net 3.27 MJ
    LHV is calculated based on the Carbon content of the product. More details can be found on the respective documentation.
  property price 1.46695 EUR2005
    Calculated based on inputs: The price of the product has been calculated as a sum of the values of the material and energy inputs for this product. This value is therefore a rough estimation. It may underestimate the real price since there are additional expenses when producing any product. These expences can include for example labour costs, treatment of waste materials and profit for the producer. Please consider carefully whether this level of data quality is acceptable for your application.
  property carbon content 0.107828
    carbon content on a dry matter basis (reserved; not for manual entry)
  properties: wet mass 1 kg, dry mass 1 kg, carbon content, non-fossil 0, water in wet mass 0 kg, carbon content, fossil 0.107828, water content 0, carbon allocation 0.107828 kg

## Inputs from technosphere
- aluminium, wrought alloy: 0.808 kg; lognormal variance with pedigree 0.0421, pedigree (3,2,5,1,1)
  EcoSpold01Location=RER
  De Wild 2007, paste composition, 1% loss
  Uncertainty: de Wild 2007, paste composition, 1% loss
  properties: dry mass 1 kg, wet mass 1 kg
- electricity, medium voltage: 0.25 kWh; lognormal variance with pedigree 0.12, pedigree (3,5,5,1,4)
  Estimation with data for solder production
  EcoSpold01Location=UCTE
  Uncertainty: Estimation with data for solder production
- solder factory: 2e-10 unit; lognormal variance with pedigree 0.448, pedigree (4,5,5,5,5)
  EcoSpold01Location=RER
  Esimation
  Uncertainty: Esimation
- heat, district or industrial, natural gas: 0.7452 MJ; lognormal variance with pedigree 0.12, pedigree (3,5,5,1,4)
  Estimation with data for solder production
  EcoSpold01Location=RER
  Uncertainty: Estimation with data for solder production
  properties: heating value, net 1 MJ
- silica sand: 0.0303 kg; lognormal variance with pedigree 0.0421, pedigree (3,2,5,1,1)
  De Wild 2007, paste composition, 1% loss
  EcoSpold01Location=DE
  Uncertainty: de Wild 2007, paste composition, 1% loss
  properties: wet mass 1 kg, water content 0.010101, dry mass 0.99 kg
- chemical, organic: 0.1717 kg; lognormal variance with pedigree 0.0421, pedigree (3,2,5,1,1)
  EcoSpold01Location=GLO
  De Wild 2007, paste composition, 1% loss
  Uncertainty: de Wild 2007, paste composition, 1% loss
  properties: wet mass 1 kg, dry mass 1 kg, heating value, net 19.03 MJ, carbon content, fossil 0.628
  note on carbon content, fossil: This dataset is an unweighted average of 20 organic substances (listed in Tab 88.1, ecoinvent v2.2 report 8, part II), being part of the top100 chemicals included in this database. The C-content has also been calculated as an unweighted average of the C content of the substances composing this dataset.

## Extrapolations
This dataset has been extrapolated from year 2006 to the year of the calculation (2021). The uncertainty has been adjusted accordingly.

## Review by Roberto Dones 2007-08-23
Passed.
none
