# shed construction

Dataset: EcoSpold 2, unit process
Geography: CH
Time period: 1994-01-01 to 2021-12-31
Technology level: current
Classification: ISIC rev.4 ecoinvent: 4100:Construction of buildings
Classification: EcoSpold01Categories: agricultural means of production/buildings
Synonyms: Maschinenhalle
Tags: ConvertedDataset
Scenario: Business-as-Usual
System model: Allocation, cut-off by classification
Generated by: Dunja Dux
Published in: Nemecek, T. 2007
Database: ecoinvent
isCopyrightProtected: true
accessRestrictedTo: 1

## General comment
This dataset represents an example of a typical shed construction.The module includes a timber construction, closed on three sides. One part of the shed is a fireproofed garage closed with doors. Size: 264 m2 whole shed, 102 m2 fireproofed garage. Lifetime of the building is 50 years. The Functional Unit is one m2 of shed during entire service life.
[This dataset was already contained in the ecoinvent database version 2. It was not individually updated during the transfer to ecoinvent version 3. Life Cycle Impact Assessment results may still have changed, as they are affected by changes in the supply chain, i.e. in other datasets. This dataset was generated following the ecoinvent quality guidelines for version 2. It may have been subject to central changes described in the ecoinvent version 3 change report (http://www.ecoinvent.org/database/ecoinvent-version-3/reports-of-changes/), and the results of the central updates were reviewed extensively. The changes added e.g. consistent water flows and other information throughout the database. The documentation of this dataset can be found in the ecoinvent reports of version 2, which are still available via the ecoinvent website. The change report linked above covers all central changes that were made during the conversion process.]
Obs: The following limitation on the use of individual modules should be noted: to obtain realistic values when applying the modules, building sizes should not differ too widely from the sizes on which the module calculations were based. An acceptable approximation can be achieved for building sizes within a range of about half to twice the value of the calculated size of the modules. A wider difference would not be reasonable, since the type of construction would be too different from the calculated module.

## Included activities start
From unoccupied land foreseen for a shed construction.

## Included activities end
This acitivity ends with the final treatment and disposal of the building. The dataset includes the use of construction materials and building machines (hydraulic diggers, skid-steer loaders) for construction and also materials for repair and replacement. Waste disposal is inlcuded for repair, replacement and dismantling materials from the building infrastructure. The dataset doesn't include direct emissions from construction, waste disposal of production and the resources used during utilization phase of the building. Disposal of construction waste such as packing materials and remnants of construction materials were not considered because it represents only a small proportion of the overall disposal quantity.

## Geography
The inventory applies for Swiss agricultural buildings only, because of the solid method of construction.

## Technology
Based on selected examples of this type of housing and buildings commonly found in Switzerland in the year 2000; but not conform to an “average Swiss building style”.

## Reference product
- shed: 1 m2; CPC 531: Buildings; By-product classification allocatable product
  EcoSpold01Location=CH
  production volume 0.0336675 m2
    This is a placeholder value that does not reflect real-world production volumes. This dataset does not currently require a real-world production volume to work in the database framework, and no actual data were collected yet. This has no negative effect on the results of the ecoinvent database. The placeholder value of this activity was scaled according to the nominal GDP of 2005 (source: United Nations, http://data.un.org/Glossary.aspx?q=GDP+%28current+US%24%29, accessed 20130726) to reflect an appropriate share of the global production volume, which is also a placeholder value.
  property price 117.111 EUR2005
    Calculated based on inputs: The price of the product has been calculated as a sum of the values of the material and energy inputs for this product. This value is therefore a rough estimation. It may underestimate the real price since there are additional expenses when producing any product. These expences can include for example labour costs, treatment of waste materials and profit for the producer. Please consider carefully whether this level of data quality is acceptable for your application.

## Inputs from technosphere
All rows: lognormal variance with pedigree 0.0401, pedigree (1,2,5,1,1)
- lean concrete: 0.00833 m3
  EcoSpold01Location=CH
  Modelled, based on "Agricultural Buildings" - pdf-document on the dedicated talk page of ecoinvent (www.ecoinvent.org/talk-pages)
  properties: wet mass 2190 kg, dry mass 2080 kg, water content 0.0528846
- copper, cathode: 0.621 kg
  Modelled, based on "Agricultural Buildings" - pdf-document on the dedicated talk page of ecoinvent (www.ecoinvent.org/talk-pages)
  EcoSpold01Location=RER
  properties: dry mass 1 kg, wet mass 1 kg
- sawnwood, softwood, dried (u=20%), planed: 0.209 m3
  (same comment as for copper, cathode)
  properties: water content 0.2, wet mass 540 kg, heating value, net 6514.84 MJ, dry mass 450 kg, carbon content, non-fossil 0.494
  note on carbon content, non-fossil: C content of dry mass is 0.494 kgC/kg dry wood (ecoinvent v2.2 report 9)
- concrete, normal: 0.283 m3
  Modelled, based on "Agricultural Buildings" - pdf-document on the dedicated talk page of ecoinvent (www.ecoinvent.org/talk-pages)
  EcoSpold01Location=CH
  properties: water content 0.086758, dry mass 2190 kg, wet mass 2380 kg
- gravel, round: 309 kg
  (same comment as for concrete, normal)
  properties: wet mass 1 kg, dry mass 1 kg
- waste reinforced concrete: -631 kg
  (same comment as for lean concrete)
  production volume 631 kg
    Calculated from the production volume of shed in proportion to the respective output amounts.
  properties: water content 0.00585407, wet mass 1 kg, dry mass 0.99418 kg
- fibre cement corrugated slab: 6.73 kg
  (same comment as for lean concrete)
  properties: carbon content, fossil 0.00981818, carbon content, non-fossil 0.01656, dry mass 1 kg, wet mass 1 kg
  note on carbon content, fossil: Tab 5.1, ecoinvent v2.2 report 7, part IX. Fibres (pulp) 3.6%. Fibres (polyvinyl alcohol) 1.8%. C-content/dry mass of natural fibres was considered 46% (from "Evolutionary and Biochemical Aspects", A.D. Kay and T. Vrede (in Global Ecology, 2010, Elsevier B.V., S.E. Jørgensen Ed.)). C-content/dry mass of polyvinyl alcohol ((C2H4O)x) was considered =24/44.
- electricity, low voltage: 2.41 kWh
  (same comment as for lean concrete)
- waste bulk iron, excluding reinforcement: -1.18 kg
  (same comment as for lean concrete)
  production volume 1.18 kg
    (same comment as for waste reinforced concrete)
  properties: dry mass 1 kg, wet mass 1 kg
- excavation, skid-steer loader: 0.0128 m3
  EcoSpold01Location=RER
  Modelled, based on "Agricultural Buildings" - pdf-document on the dedicated talk page of ecoinvent (www.ecoinvent.org/talk-pages);activityLink introduced to establish a direct link to the corresponding regional supply of this product
- cement, Portland: 21.9 kg
  (same comment as for concrete, normal)
  properties: dry mass 1 kg, wet mass 1 kg
- reinforcing steel: 8.28 kg
  EcoSpold01Location=RER
  Modelled, based on "Agricultural Buildings" - pdf-document on the dedicated talk page of ecoinvent (www.ecoinvent.org/talk-pages)
  properties: dry mass 1 kg, wet mass 1 kg, carbon content, fossil 0.004
- cast iron: 0.533 kg
  (same comment as for reinforcing steel)
  properties: dry mass 1 kg, wet mass 1 kg, carbon content, fossil 0.04
  note on carbon content, fossil: Cast iron is made by remelting pig iron in small furnaces (e.g. cupola furnaces or electric arc furnaces) and poured into moulds to make castings. It usually contains 2% to 6% carbon (ecoinvent v2.2 report 10_partII). An average content of 4% was considered
- waste polyethylene/polypropylene product: -0.0268 kg
  (same comment as for lean concrete)
  production volume 0.0268 kg
    (same comment as for waste reinforced concrete)
  properties: carbon content, fossil 0.748045, water content 0.180638, dry mass 0.847 kg, wet mass 1 kg, heating value, net 42.47 MJ
  note on carbon content, fossil: Mixed various plastics was used to estimate the C content of this waste (Tab A.2, ecoinvent v2.2 report 13_I)
- zinc coat, pieces: 0.0305 m2
  (same comment as for copper, cathode)
- waste building wood, chrome preserved: -11 kg
  (same comment as for lean concrete)
  production volume 11 kg
    (same comment as for waste reinforced concrete)
  properties: water content 0.25, carbon content, non-fossil 0.484262, dry mass 0.8 kg, wet mass 1 kg, heating value, net 11.63 MJ
  note on carbon content, non-fossil: C content per kg DM was calculated using information in Tab A.4, ecoinvent v2.2 report 13_I
- waste brick: -45.1 kg
  (same comment as for concrete, normal)
  production volume 45.1 kg
    (same comment as for waste reinforced concrete)
  properties: wet mass 1 kg, dry mass 1 kg
- polyethylene, high density, granulate: 0.0268 kg
  (same comment as for copper, cathode)
  properties: carbon content, fossil 0.857143, dry mass 1 kg, wet mass 1 kg, heating value, net 42.47 MJ
  note on carbon content, fossil: Polyethylene is formed out of a huge amount of ethylene monomers (C2H4) (ecoinvent v2.2 report 11_II). MW=28 g/mol
- waste concrete, not reinforced: -18.3 kg
  (same comment as for concrete, normal)
  production volume 18.3 kg
    (same comment as for waste reinforced concrete)
  properties: dry mass 1 kg, wet mass 1 kg
- excavation, hydraulic digger: 0.352 m3
  (same comment as for copper, cathode)
- extrusion, plastic film: 0.0268 kg
  (same comment as for copper, cathode)
- fibre cement facing tile: 38.3 kg
  (same comment as for concrete, normal)
  properties: dry mass 1 kg, carbon content, fossil 0.0201818, wet mass 1 kg, carbon content, non-fossil 0.0115
  note on carbon content, fossil: Tab 5.1, ecoinvent v2.2 report 7, part IX. Fibres (pulp) 2.5%. Fibres (polyvinyl alcohol) 3.7%. C-content/dry mass of natural fibres was considered 46% (from "Evolutionary and Biochemical Aspects", A.D. Kay and T. Vrede (in Global Ecology, 2010, Elsevier B.V., S.E. Jørgensen Ed.)). C-content/dry mass of polyvinyl alcohol ((C2H4O)x) was considered =24/44.
- waste wood, untreated: -77.2 kg
  (same comment as for concrete, normal)
  production volume 77.2 kg
    (same comment as for waste reinforced concrete)
  properties: wet mass 1 kg, dry mass 0.8 kg, heating value, net 13.99 MJ, water content 0.25, carbon content, non-fossil 0.48632
  note on heating value, net: Value taken from the general comment of the treatment dataset.
  note on carbon content, non-fossil: Tab A.4, ecoinvent v2.2 report 13_I. C content has been referred to 1 kg DM,
- waste cement in concrete and mortar: -38.5 kg
  (same comment as for concrete, normal)
  production volume 38.5 kg
    (same comment as for waste reinforced concrete)
  properties: wet mass 1 kg, dry mass 0.995 kg, water content 0.00502513

## Inputs from nature
- Transformation, from pasture, man made [natural resource, land]: 2.47 m2; lognormal variance with pedigree 0.1601, pedigree (1,2,5,1,1)
  Modelled, based on "Agricultural Buildings" - pdf-document on the dedicated talk page of ecoinvent (www.ecoinvent.org/talk-pages)
- Occupation, construction site [natural resource, land]: 2.47 m2*year; lognormal variance with pedigree 0.0801, pedigree (1,2,5,1,1)
  (same comment as for Transformation, from pasture, man made)
- Transformation, to urban, discontinuously built [natural resource, land]: 2.47 m2; lognormal variance with pedigree 0.1601, pedigree (1,2,5,1,1)
  (same comment as for Transformation, from pasture, man made)
- Occupation, urban, discontinuously built [natural resource, land]: 124 m2*year; lognormal variance with pedigree 0.0801, pedigree (1,2,5,1,1)
  (same comment as for Transformation, from pasture, man made)

## Sampling procedure
The inventory is calculated based on a solid database of agricultural buildings.

## Extrapolations
This dataset has been extrapolated from year 2002 to the year of the calculation (2021). The uncertainty has been adjusted accordingly.

## Review by Roland Hischier 2003-08-06
Passed.

## Review by Roland Hischier 2011-09-28
Transfer of documentation done.
