# fodder loading, by self-loading trailer

Dataset: EcoSpold 2, unit process
Geography: CH
Time period: 1991-01-01 to 2021-12-31
Technology level: current
Classification: ISIC rev.4 ecoinvent: 0161:Support activities for crop production
Classification: EcoSpold01Categories: agricultural means of production/work processes
Tags: ConvertedDataset
Scenario: Business-as-Usual
System model: Allocation, cut-off by classification
Generated by: Silvio Blaser
Published in: Nemecek, T. 2007
Database: ecoinvent
isCopyrightProtected: true
accessRestrictedTo: 1

## General comment
This dataset represents an example of a Self-loading trailer with cutter, 22 m3 loading volume. Includes loading, transport and fast discharge. Time need variable depending on loaded good. Assumption: loading trailer is filled up completely. Fodder production, cutting, swath, etc. are not included. The functional unit (FU) is one cubic meter fodder loaded. The operation time is 0.02 h/FU.
[This dataset was already contained in the ecoinvent database version 2. It was not individually updated during the transfer to ecoinvent version 3. Life Cycle Impact Assessment results may still have changed, as they are affected by changes in the supply chain, i.e. in other datasets. This dataset was generated following the ecoinvent quality guidelines for version 2. It may have been subject to central changes described in the ecoinvent version 3 change report (http://www.ecoinvent.org/database/ecoinvent-version-3/reports-of-changes/), and the results of the central updates were reviewed extensively. The changes added e.g. consistent water flows and other information throughout the database. The documentation of this dataset can be found in the ecoinvent reports of version 2, which are still available via the ecoinvent website. The change report linked above covers all central changes that were made during the conversion process.]

## Included activities start
From the reception of fodder to be loaded.

## Included activities end
This activity ends with fodder loading. The dataset includes the diesel fuel consumption and the amount of agricultural machinery and of the shed, which has to be attributed to the fodder loading. Also taken into consideration is the amount of emissions to the air from combustion and the emission to the soil from tyre abrasion during the work process. The following activities where considered part of the work process: preliminary work at the farm, like attaching the adequate machine to the tractor; transfer to field (with an assumed distance of 1 km); field work; transfer to farm and concluding work, like uncoupling the machine. The overlapping during the field work is considered. The amount of loaded fodder is not taken into account. The dataset doesn't include dust other than from combustion and noise.

## Geography
The inventory applies for Swiss Agricultural Field Work processes.

## Technology
The inventories are based on measurements made by the Swiss Federal Research Station for Agricultural Economics and Engineering of Taenikon (FAT). Fuel consumption and emissions were taken from recent literature of ART, expert's estimations or unpublished data.

## Time period
Measurements were made in the last few years (1999-2001).

## Reference product
- fodder loading, by self-loading trailer: 1 m3; CPC 86119: Other support services to crop production; By-product classification allocatable product
  production volume 1.7082e8 m3
    FAOSTAT data year 2011: Permanent meadows and pastures area, 3 cuts per year assumed, 2.5t dry matter per cut, 0.0208 m3/kg dry matter (ecoinvent report 15, V2.0, 2007)
  property price 0.579149 EUR2005
    Calculated based on inputs: The price of the product has been calculated as a sum of the values of the material and energy inputs for this product. This value is therefore a rough estimation. It may underestimate the real price since there are additional expenses when producing any product. These expences can include for example labour costs, treatment of waste materials and profit for the producer. Please consider carefully whether this level of data quality is acceptable for your application.

## Inputs from technosphere
- diesel: 0.106 kg; lognormal variance with pedigree 0.042, pedigree (1,4,5,1,1)
  Proxy, based on 'Agricultural Field Work Processes' - pdf-document on the dedicated talk page of ecoinvent (www.ecoinvent.org/talk-pages)
  properties: dry mass 1 kg, heating value, net 42.8 MJ, carbon content, fossil 0.865, wet mass 1 kg
  note on carbon content, fossil: C-content of diesel is 86.5% (ecoinvent v2.2 report 6_IV, Tab 3.14)
- agricultural machinery, unspecified: 0.0383 kg; lognormal variance with pedigree 0.042, pedigree (1,4,5,1,1)
  (same comment as for diesel)
- tractor, 4-wheel, agricultural: 0.0103 kg; lognormal variance with pedigree 0.042, pedigree (1,4,5,1,1)
  (same comment as for diesel)
- shed: 9.33e-5 m2; lognormal variance with pedigree 0.342, pedigree (1,4,5,1,1)
  Proxy, based on 'Agricultural Field Work Processes' - pdf-document on the dedicated talk page of ecoinvent (www.ecoinvent.org/talk-pages)
  This exchange has an activity link directly to the producing activity because the product is primarily consumed in the same geographical area where it is produced.

## Emissions to nature
- Benzo(a)pyrene [air, non-urban air or from high stacks]: 3.18e-9 kg; lognormal variance with pedigree 0.6981, pedigree (1,2,5,1,3)
  (same comment as for diesel)
- Lead [soil, agricultural]: 2.92e-8 kg; lognormal variance with pedigree 0.082, pedigree (1,4,5,1,1)
  (same comment as for diesel)
- Methane, fossil [air, non-urban air or from high stacks]: 1.37e-5 kg; lognormal variance with pedigree 0.0981, pedigree (1,2,5,1,3)
  (same comment as for diesel)
- Zinc [soil, agricultural]: 1.68e-5 kg; lognormal variance with pedigree 0.082, pedigree (1,4,5,1,1)
  (same comment as for diesel)
- NMVOC, non-methane volatile organic compounds, unspecified origin [air, non-urban air or from high stacks]: 0.000245 kg; lognormal variance with pedigree 0.082, pedigree (1,4,5,1,1)
  (same comment as for diesel)
- Benzene [air, non-urban air or from high stacks]: 7.73e-7 kg; lognormal variance with pedigree 0.0981, pedigree (1,2,5,1,3)
  (same comment as for diesel)
- Nickel [air, non-urban air or from high stacks]: 7.41e-9 kg; lognormal variance with pedigree 0.6981, pedigree (1,2,5,1,3)
  (same comment as for diesel)
- Cadmium [air, non-urban air or from high stacks]: 1.06e-9 kg; lognormal variance with pedigree 0.6981, pedigree (1,2,5,1,3)
  (same comment as for diesel)
- Dinitrogen monoxide [air, non-urban air or from high stacks]: 1.27e-5 kg; lognormal variance with pedigree 0.0981, pedigree (1,2,5,1,3)
  (same comment as for diesel)
- Zinc [air, non-urban air or from high stacks]: 1.06e-7 kg; lognormal variance with pedigree 0.6981, pedigree (1,2,5,1,3)
  (same comment as for diesel)
- Selenium [air, non-urban air or from high stacks]: 1.06e-9 kg; lognormal variance with pedigree 0.0981, pedigree (1,2,5,1,3)
  (same comment as for diesel)
- PAH, polycyclic aromatic hydrocarbons [air, non-urban air or from high stacks]: 3.48e-7 kg; lognormal variance with pedigree 0.3581, pedigree (1,2,5,1,3)
  (same comment as for diesel)
- Cadmium [soil, agricultural]: 6.47e-9 kg; lognormal variance with pedigree 0.082, pedigree (1,4,5,1,1)
  (same comment as for diesel)
- Chromium [air, non-urban air or from high stacks]: 5.29e-9 kg; lognormal variance with pedigree 0.6981, pedigree (1,2,5,1,3)
  (same comment as for diesel)
- Sulfur dioxide [air, non-urban air or from high stacks]: 0.000107 kg; lognormal variance with pedigree 0.0581, pedigree (1,2,5,1,3)
  (same comment as for diesel)
- Ammonia [air, non-urban air or from high stacks]: 2.12e-6 kg; lognormal variance with pedigree 0.0981, pedigree (1,2,5,1,3)
  (same comment as for diesel)
- Carbon dioxide, fossil [air, non-urban air or from high stacks]: 0.329 kg; lognormal variance with pedigree 0.0581, pedigree (1,2,5,1,3)
  (same comment as for diesel)
- Nitrogen oxides [air, non-urban air or from high stacks]: 0.00428 kg; lognormal variance with pedigree 0.082, pedigree (1,4,5,1,1)
  (same comment as for diesel)
- Carbon monoxide, fossil [air, non-urban air or from high stacks]: 0.00046 kg; lognormal variance with pedigree 0.692, pedigree (1,4,5,1,1)
  (same comment as for diesel)
- Particulates, < 2.5 um [air, non-urban air or from high stacks]: 0.000495 kg; lognormal variance with pedigree 0.3581, pedigree (1,2,5,1,3)
  (same comment as for diesel)
- Copper [air, non-urban air or from high stacks]: 1.8e-7 kg; lognormal variance with pedigree 0.6981, pedigree (1,2,5,1,3)
  (same comment as for diesel)

## Sampling procedure
The inventoried HC, NOx, CO and fuel consumption values are measurements made following two test cycles (ISO 8178 C1 test and a specific 6-level-test created by the FAT) and on measurements made during the field work. The other emissions were calculated basing on literature data and the measured fuel consumption.

## Extrapolations
This dataset has been extrapolated from year 2002 to the year of the calculation (2021). The uncertainty has been adjusted accordingly.

## Review by Roland Hischier 2003-08-06
Passed.

## Review by Roland Hischier 2011-09-28
Transfer of documentation done.
