# cement production, fly ash 21-35%

Dataset: EcoSpold 2, unit process
Geography: RoW
Time period: 2017-01-01 to 2021-12-31
Technology level: current
Classification: ISIC rev.4 ecoinvent: 2394:Manufacture of cement, lime and plaster
Synonyms: Portland fly ash cement; CEM II B-V
Tags: combined production
Scenario: Business-as-Usual
System model: Allocation, cut-off by classification
Generated by: [System]
Published in: Muigai, R. 2017
Database: ecoinvent
isCopyrightProtected: true
accessRestrictedTo: 1

## General comment
The dataset describes the production of cement (CEM II/B-V
CEM II/B-V is a blended cement that is made by partially replacing 21-35% of Portland cement with fly ash which is a waste from power stations.
Portland cement production involves the chemical transformation of raw materials: calcium oxides; silica; alumina and iron oxide into various types of cementitious products, by-products and wastes. The Portland cement manufacturing process consists of four main steps: (1) Quarrying of limestone and transportation of raw materials to the processing plant. (2) Preparation of “raw meal” for pyroprocessing (3) Pyroprocessing of raw materials to produce Portland cement clinker using the dry process. (4) Final grinding of the clinker together with inter-grinding with a small proportion of gypsum to produce Portland cement. Steps (1) to (4) are not considered in dataset.
This dataset has been copied from the ZA corresponding dataset.

## Included activities start
From cradle, i.e. including all upstream activities. As source of gypsum, waste gypsum from flue gas treatment is assumed.

## Included activities end
This activity ends with the cement produced in the cement mill. The dataset does not include packaging and administration.

## Geography
The dataset represents the Portland cement production for South Africa.

## Technology
In South Africa, all cement production is through dry kiln process. The clinker is ground in mills with gypsum (5%) and depending on the type of cement and technical standard (SAN 50197-1) with other materials such as blast furnace slag, fly ash, pozzolan and lime fillers to produce the Portland cement.

## Parameters
- annual production: 1.23847e10 kg; name annualProduction; lognormal variance with pedigree 0.21, pedigree (5,5,5,5,5)

## Reference product
- hard coal ash: 0 kg; name ash; By-product classification Waste; CPC 39: Wastes or scraps
  Literature Value. From local SA data.
  production volume 0 kg
    calculated based on the reference product production volume
  property price 0 EUR2005; name ash_price_EUR2005
    Waste products are assigned a price of zero as they are assumed to require further treatment.
  property carbon content 0
    carbon content on a dry matter basis (reserved; not for manual entry)
  properties: water in wet mass 0 kg, wet mass 1 kg, carbon content, non-fossil 0, water content 0, carbon content, fossil 0, dry mass 1 kg, carbon allocation 0 kg
- cement, portland fly ash cement 21-35%: 1 kg; name cement; source Gary Theodosiou 2010; By-product classification allocatable product; CPC 37440: Portland cement, aluminous cement, slag cement and similar hydraulic cements, except in the form of clinkers; pedigree (1,1,1,1,1)
  Values were calculated based on primary data collection in South Africa. The data were collected from 5 cement companies which represent 90% of the cement market share.
  production volume 1.32895e9 kg
    The global production volume was calculated as follows:
    1) The total production volume of each country was calculated
    2) The production volume was scaled based construction output (*)
    3) The average of the results was assumed to be the GLO PV
    4) The share of each different technology per country was calculated
    5) The weighted average of the shares for each country was used to split the GLO PV into different technologies
    (*)
    Construction output assumed per country
    Country Share
    CO 1%
    PE 0%
    BR 2%
    ZA 1%
    IN 10%
    US 8%
    CA-QC 0%
    CH 0%
    Europe without Switzerland 20%
    Source:
    OECD. 2018. Input-Output Tables. http://www.oecd.org/trade/input-outputtables.htm.
    United Nations Statistics Division. 2019. UN data. A world of information. http://data.un.org/.
    Timmer, M.P., E. Dietzenbacher, B. Los, R. Stehrer, and G.J. de Vries. 2015. An Illustrated User Guide to the World Input-Output Database: the Case of Global Automotive Production. Review of International Economics 23(3): 575-605. http://doi.wiley.com/10.1111/roie.12178.
    The data was adjusted based on PPP, data from:
    The World Bank. 2019. World Bank Open Data. https://data.worldbank.org/
  property price 0.0615 EUR2005
    2005 import and export prices (total trades (USD) divided by total weight (kg) in China, India, USA, Japan, Russia and Europe, major producers and consumers (http://www.cementchina.net/freport/showfre.asp?id=749) from UN Commodity Trade Statistics Database (http://data.un.org/Explorer.aspxDatabase [Accessed 2 July 2010]). Commodity: Cement (portland, aluminious, slag or hydraulic)
  property carbon content 0
    carbon content on a dry matter basis (reserved; not for manual entry)
  properties: carbon content, fossil 0, dry mass 1 kg, water in wet mass 0 kg, water content 0, carbon content, non-fossil 0, wet mass 1 kg, carbon allocation 0 kg

## Inputs from technosphere
- cement factory: 5.36e-11 unit; = 0.0000000000536*cement+ash*0; source Kellenberger D. 2007; lognormal variance with pedigree 0.3106, pedigree (2,1,4,5,1)
  Literature Value. Adopted from the "cement production, Portland, GLO 2009" dataset. Accessed 20171106
  Uncertainty: Variance of log-transformed data was taken from ecoinvent report no 1, table 10.3. Value represents demand of infrastructure for input/output group c.
- steel, low-alloyed: 5.25e-5 kg; = 0.0000525*cement; source Kellenberger D. 2007; lognormal variance with pedigree 0.21, pedigree (5,5,5,5,5)
  Literature value:Adopted from the "cement production, Portland, CH 2010" dataset. Accessed 20171106
  properties: wet mass 1 kg, carbon content, fossil 0.005, dry mass 1 kg
- ethylene glycol: 0.00019 kg; = 0.00019*cement; source Kellenberger D. 2007; lognormal variance with pedigree 0.0132, pedigree (3,3,4,5,1)
  Ancillary product for grinding. Adopted from the "cement production, Portland, GLO 2009" dataset. Accessed 20171106
  Uncertainty: Variance of log-transformed data was taken from ecoinvent report no 1, table 10.3. Value represents demand of products, electricity etc. for input/output group c.
  properties: carbon content, fossil 0.387097, wet mass 1 kg, dry mass 1 kg, heating value, net 23.44 MJ
- electricity, medium voltage: 0 kWh; source Boesch, M.E. 2010; pedigree (1,1,1,1,1)
  Literature value. Adopted from the "cement production, Portland, GLO 2009" dataset. Accessed 20171106
  Uncertainty: Variance of log-transformed data was taken from ecoinvent report no 1, table 10.3. Value represents demand of products, electricity etc. for input/output group c.
- gypsum, mineral: 0 kg; source Gary Theodosiou 2010; pedigree (1,1,1,1,1)
  Values were calculated based on primary data collection in South Africa. The data were collected from 5 cement companies which represent 90% of the cement market share.
  Uncertainty: Variance of log-transformed data was taken from ecoinvent report no 1, table 10.3. Value represents demand of products, electricity etc. for input/output group c.
  properties: wet mass 1 kg, dry mass 1 kg
- clinker: 0 kg; source Gary Theodosiou 2010; pedigree (1,1,1,1,1)
  (same comment as for cement, portland fly ash cement 21-35%)
  properties: wet mass 1 kg, dry mass 1 kg
- electricity, medium voltage: 2.53553e-5, 0.000509187, 3.18627e-6, 8.60123e-6, 2.28519e-5, 2.39819e-6, 1.83371e-5, 1.1588e-5, 0.000148961, 0.000400901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 kWh (36 entries); source Boesch, M.E. 2010; lognormal variance with pedigree 0.0132, pedigree (3,3,4,5,1)
  (same comment as for electricity, medium voltage)
- gypsum, mineral: 0.000663287, 6.68636e-5, 0.0317698 kg (3 entries); source Gary Theodosiou 2010; lognormal variance with pedigree 0.0132, pedigree (3,3,4,5,1)
  (same comment as for gypsum, mineral)
- clinker: 0.117724, 0.0247969, 0.0017951, 0.00575174, 0.110022, 0.00441303, 0.352997 kg (7 entries); source Gary Theodosiou 2010; lognormal variance with pedigree 0.21, pedigree (5,5,5,5,5)
  (same comment as for cement, portland fly ash cement 21-35%)

## Emissions to nature
- Heat, waste [air, unspecified]: 0.179 MJ; = 0.179*cement; source Boesch, M.E. 2010; lognormal variance with pedigree 0.0526, pedigree (3,3,4,5,1)
  Literature value. Adopted from the "cement production, Portland, GLO 2009" dataset. Accessed 20171106
  Uncertainty: Variance of log-transformed data was taken from ecoinvent report no 1, table 10.3. Value represents others emitted to air for input/output group p.

## Sampling procedure
Data approximates average South African production

## Extrapolations
Some of the data were taken from the "cement production, Portland cement, GLO" dataset accessed 20170510. Some of the values were calculated based on primary data collection in South Africa" This dataset is a copy of the corresponding ZA dataset.
