# treatment, sludge from pulp and paper production, landfarming

Dataset: EcoSpold 2, unit process
Geography: Europe without Switzerland
Time period: 2011-01-01 to 2021-12-31
Technology level: current
Classification: ISIC rev.4 ecoinvent: 0161:Support activities for crop production
Classification: EcoSpold01Categories: agricultural means of production/work processes
Scenario: Business-as-Usual
System model: Allocation, cut-off by classification
Generated by: [System]
Database: ecoinvent
isCopyrightProtected: true
accessRestrictedTo: 1

## General comment
This dataset represents the service of the spreading of sludge from pulp and paper production on agricultural fields. The sludge is a mix of sludge from primary and secondary wastewater treatment and from a deinking process. The reference flow is one kg of pulp and paper sludge (wet mass) loaded from storage unit at the farm, transported to farmlands and spread as organic fertilisers with solid manure spreader. It is assumed the sludge is applied to maize cropland (25%), soybeans (35%) and cultivated grassland (40%). The dataset is heavily parameterized and could be used as a template for sludges with other compositions insofar as sludge composition is changed in the reference flow exchange properties and the plausibility of values for context-specific parameters (e.g. ammonia emissions) are checked.

## Included activities start
From sludge loading into solid manure spreader with hydraulic loader at farm.

## Included activities end
This activity ends with pulp and paper sludge application on farmlands. The dataset includes loading from storage unit at farm, on-farm transportation and application of 1 kg of sludge on farmland. The land surface on which 1 kg of sludge is applied was calculated to be 5.5E-5 ha, given the amount of nutrients contained in the sludge, the fertilising needs of the crops and the crop distribution that receives this sludge in Quebec (Canada). The inventory takes into account the emissions related to sludge application with machinery. For the sludge emission inventory, the emissions of various substances and compounds (N, P, K, metals, dioxins/furanes) are taken into account. Metals are considered to be entirely emitted in the agricultural soil. Emitted metal speciations remain unknown. The inventory also takes into account the liming effect (CaCO3-eq) of the sludge. The dataset does not include: sludge storage at farm or in field and any related emissions, and emissions of P into groundwater.

## Parameters
- correction factor regarding the season of manure application: 0.99 dimensionless; name c_season; lognormal variance with pedigree 0.0846, pedigree (3,3,1,5,1)
  This parameter represents the proportion of manure applied in summer (June-August) and the rest of the year as described in the Agrammon model in the reference Nemecek, T., Schnetzer, J., 2011. Methods of assessment of direct field emissions for LCIs of agricultural production systems, Data v3.0, Agroscope Reckenholz-Tanikon Research Station ART.
- efficiency coefficient of potassium in sludge: 0.9 dimensionless; name EC_K; lognormal variance with pedigree 0.1306, pedigree (4,3,1,5,4)
  This parameter represents the efficiency of potassium in sludge to replace potassium synthetic fertilisers. Reference: Centre de reference en agriculture et agroalimentaire du Quebec, 2010. Guide de reference en fertilisation, 2e edition (Reference guide on fertilization). Centre de reference en agriculture et agroalimentaire du Quebec, Sainte-Foy, Quebec, Canada.
- emission factor dinitrogen monoxide as N: 0.0164 kg N2O-N/kg N; name EF_N2O_N; lognormal variance with pedigree 0.0181, pedigree (3,2,1,5,3)
  Emission factor of N2O (direct) from N content in sludge. Source: Rochette, P., Worth, D. E., Lemke, R., McConkey, B. G., Pennock, D.J., Wagner-Riddle, C., Desjardins, R.L. (2008). Estimation of N2O emissions from agricultural soils in Canada. I. Development of a Canadian-specific methodology. Can. J. Soil Sci. 88: 641-654.
- equivalence factor CaCO3 eq: 0.1156 dimensionless; name CaCO3_eq; lognormal variance with pedigree 0.0246, pedigree (3,3,1,5,1)
  Personal communication with Marianne Lemieux, a specialized agronomist in pulp and paper sludge stating that 4,5 tons of sludge (50% dry matter content) equals 1 ton of lime (CaCO3). Therefore, a sludge with a 26% dry matter content needs 8,65 tons to substitute 1 ton of lime (CaCO3). Hence 1 ton of sludge substitues 0,1156 ton of lime (CaCO3).
- correction factor incorporation time of manure: 0.88 dimensionless; name c_incorp_time; lognormal variance with pedigree 0.0156, pedigree (3,3,1,5,3)
  This parameter represents the time span between manure application and incorporation as described in the Agrammon model in the reference: Nemecek, T., Schnetzer, J., 2011. Methods of assessment of direct field emissions for LCIs of agricultural production systems, Data v3.0, Agroscope Reckenholz-Tanikon Research Station ART.
- organic nitrogen into soil: 10788 kg N/ha; name Norg_soil; lognormal variance with pedigree 0.0186, pedigree (3,3,1,5,3)
  N-org is the mass of organic nitrogen contained in the upper 50 cm of soil per ha. Naturally only a fraction of this mass is mineralised and, hence, available for uptake by plants and leaching to the ground water. This fraction is determined by the mineralisation rate, which is 1.6% here and implicitly included in the regression coefficient of the term N-org. N-org is calculated following the model included in Nemecek, T., Schnetzer, J., 2011. Methods of assessment of direct field emissions for LCIs of agricultural production systems, Data v3.0, Agroscope Reckenholz-Tanikon Research Station ART. C-org is 80 t/3000 m3 according to Gasser, M.-O. M. Bolinder, S. Martel, D. Poulin, I. Beaudin, A.R. Michaud et A. Drouin. 2010. Impacts agroenvironnementaux associes à la culture et au prelèvement de biomasses vegetales agricoles pour la production de bioproduits industriels. Rapport final. Institut de recherche et de developpement en agroenvironnement. Quebec. 197 p.; C/N ratio is 11 and N-org/N tot ratio is 0,89 (Gasser, 2013, personal communication).
- Quebec gross domestic product 2011: 3.11e11 USD(2011); name quebecGDP2011; lognormal variance with pedigree 0.0006, pedigree (1,1,1,1,1)
  Quebec Gross domestic product for 2011, expressed in 2011 USD. Source: Institut de la statistique du Quebec. Converted from CAD to USD using a yearly average exchange rate of 0.989 CAD/USD (Source: bank of Canada).
- transformation factor NO3 to NO3_N: 0.225806 dimensionless; name NO3_to_NO3_N; = 14/62; lognormal variance with pedigree 0, pedigree (1,1,1,1,1)
  Mass ratio (NO3-N/NO3)
- transformation factor from P to P2O5: 2.29032 dimensionless; name P_to_P2O5; = 142/62; lognormal variance with pedigree 0, pedigree (1,1,1,1,1)
  Mass ratio (P2O5/P2O5-P)
- emission factor dinitrogen monoxide from ammonia: 0.01 kg N2O-N/kg NH3-N; name EF_N2O_from_NH3; lognormal variance with pedigree 0.0186, pedigree (3,3,1,5,3)
  (kg N2O-N/kg NH3-N) Indirect N2O emission factor from atmospheric redeposition of N lost by volatilisation in the form of ammonia. Source: IPCC, 2006. IPCC Guidelines for National Greenhouse Gas Inventories, Vol. 4: Agriculture, Forestry and Other Land Use, Chap.11: N2O direct and indirect emissions from managed soils, and CO2 emissions from lime and urea application. Available at: http://www.ipcc.ch/meetings/session25/doc4a4b/vol4.pdf (Accessed 30 October 2013)
- rooting depth: 1 m; name root_depth; lognormal variance with pedigree 0.0132, pedigree (3,3,1,5,3)
  Plant rooting depth roughly estimated from soybeans and corn for grain based on Roundtable on sustainable biofuels, 2011, RSB GHG Calculation methodology, RSB International Standard, Available at: http://rsb.org/pdfs/12-12-20-RSB-STD-01-003-01-RSB-GHG-Calculation-Methodology-v2-1.pdf (Accessed 3 October 2013)
- phosphorus loss to river per hectare: 1.46215 kg P/ha.year; name P_loss_ha; lognormal variance with pedigree 0.0926, pedigree (3,3,1,5,3)
  Quantity of P loss per hectare calculated with the ODEP model. Source: Michaud, A.R., M. Giroux, I. Beaudin, J. Desjardins, G. Gagne, M. Duchemin, J. Deslandes, C. Landry, P. Beaudet et J. Lagace. 2009. ODEP; un outil de diagnostic des exportations de phosphore. Projet« Gestion du risque associe aux facteurs source et transport du phosphore des sols cultives au Quebec », realise dans le cadre de l’Initiative d’appui aux conseillers agricoles (PIACA-204). Institut de recherche et de developpement en agroenvironnement inc. (IRDA) et Centre de reference en agriculture et agroalimentaire du Quebec (CRAAQ), Quebec, Canada. Version Octobre 2009 pour ODEP 1.1, 106 p.
- correction factor for application of liquid manure: 0 dimensionless; name c_app
  Correction factor that influences the emission rate; it refers to the amount of manure per application and its degree of dilution; applies only for liquid manure (dimensionless). Source: Nemecek, T., Schnetzer, J., 2011. Methods of assessment of direct field emissions for LCIs of agricultural production systems. Agroscope Reckenholz-Tanikon Research Station ART. 34 pages
- efficiency loss factor of potassium in sludge: 1.12 dimensionless; name ELF_K; lognormal variance with pedigree 0.1306, pedigree (4,3,1,5,4)
  This parameter represents the efficiency loss of potassium in sludge to replace potassium synthetic fertilisers with regards to spreading period (if spreading occurs outside the growing crop period the loss factor is above 1, but less than 1,4). Reference: Centre de reference en agriculture et agroalimentaire du Quebec, 2010. Guide de reference en fertilisation, 2e edition (Reference guide on fertilization). Centre de reference en agriculture et agroalimentaire du Quebec, Sainte-Foy, Quebec, Canada.
- phosphorus fertilising rate: 42 kg P2O5/ha; name P2O5_fertilising_rate; lognormal variance with pedigree 0.0101, pedigree (3,2,1,5,1)
  This phosphorus fertilising rate (42 kg P2O5/ha) is calculated with the crop distribution receiving pulp and paper sludge in the province of Quebec (corn for grain: 35%, soybean: 25%, tame hay: 40%) based on Marianne Lemieux expert judgement and fertilisation needs for each crop (P2O5 kg/ha) : corn for grain: 50, soybean: 50, tame hay: 30, according to Beauregard, G., 2013. Production budget of agricultural productions in Quebec. Technical report for CIRAIG.
- potassium availability for plants: 0.000805714 kg; name K2O_available; = sludge_K_content*sludge_Dry_mass*EC_K/ELF_K*K_to_K2O; lognormal variance with pedigree 0, pedigree (1,1,1,1,1)
  Calculated value of K2O available for plants. Efficiency of organic potassium has been accounted for.
- world gross domestic product 2011: 7e13 USD(2011); name worldGDP2011; lognormal variance with pedigree 0.0006, pedigree (1,1,1,1,1)
  World Gross domestic product for 2011, expressed in 2011 USD. Source: World Bank.
- precipitation, annual: 554 mm/year; name precipitation; lognormal variance with pedigree 0.0526, pedigree (3,3,1,5,3)
  Quantity of precipitation over the period of sludge application. Source: Little, S. J., Beauchemin, K., Janzen, H., Kroebel, R., Maclean, K., 2013. Holos: A tool to estimate and reduce greenhouse gases from farms - Methodology & algorithms for version 2.0. Agriculture and Agri-Food Canada, 113 pp.
- efficiency coefficient of phosphorus in sludge: 0.825 dimensionless; name EC_P; lognormal variance with pedigree 0.1306, pedigree (4,3,1,5,4)
  This parameter represents the efficiency of phosphorus in sludge to replace phosphorus synthetic fertilisers. Reference: Centre de reference en agriculture et agroalimentaire du Quebec, 2010. Guide de reference en fertilisation, 2e edition (Reference guide on fertilization). Centre de reference en agriculture et agroalimentaire du Quebec, Sainte-Foy, Quebec, Canada.
- transformation factor from NH3 to NH3-N: 0.823529 dimensionless; name NH3_to_NH3_N; = 14/17; lognormal variance with pedigree 0, pedigree (1,1,1,1,1)
  Mass ratio (NH3-N/NH3)
- transformation factor from K to K2O: 1.20513 dimensionless; name K_to_K2O; = 94/78; lognormal variance with pedigree 0, pedigree (1,1,1,1,1)
  Mass ratio (K2O/K20-K)
- emission factor dinitrogen monoxide from nitrate leaching: 0.0075 kg N2O-N/kg NO3-N; name EF_N2O_from_NO3; lognormal variance with pedigree 0.0186, pedigree (3,3,1,5,3)
  (kg N2O-N/kg NO3-N) Indirect N2O emission factor from nitrate leached and run-off. Source: IPCC, 2006. IPCC Guidelines for National Greenhouse Gas Inventories, Vol. 4: Agriculture, Forestry and Other Land Use, Chap.11: N2O direct and indirect emissions from managed soils, and CO2 emissions from lime and urea application. Available at: http://www.ipcc.ch/meetings/session25/doc4a4b/vol4.pdf (Accessed 30 October 2013)
- emission rate of total ammonium nitrogen: 0.8 kg TAN/kg TAN; name ER_TAN; lognormal variance with pedigree 0.0646, pedigree (3,3,1,5,4)
  Emission rate estimated from solid cattle manure. Reference: Nemecek, T., Schnetzer, J., 2011. Methods of assessment of direct field emissions for LCIs of agricultural production systems. Agroscope Reckenholz-Tanikon Research Station ART.
- transformation factor from NH3-N to NH3: 1.21429 dimensionless; name NH3_N_to_NH3; = 17/14; lognormal variance with pedigree 0, pedigree (1,1,1,1,1)
  Mass ratio (NH3/NH3-N)
- clay content into soil: 20 % (obsolete); name Clay_content; lognormal variance with pedigree 0.0526, pedigree (3,3,1,5,3)
  Mass fraction of clay content into soil. Source: Michaud, A.R., M. Giroux, I. Beaudin, J. Desjardins, G. Gagne, M. Duchemin, J. Deslandes, C. Landry, P. Beaudet et J. Lagace. 2009. ODEP; un Outil de diagnostic des exportations de phosphore. Projet« Gestion du risque associe aux facteurs source et transport du phosphore des sols cultives au Quebec », realise dans le cadre de l’Initiative d’appui aux conseillers agricoles (PIACA-204). Institut de recherche et de developpement en agroenvironnement inc. (IRDA) et Centre de reference en agriculture et agroalimentaire du Quebec (CRAAQ), Quebec, Canada. Version Octobre 2009 pour ODEP 1.1, 106 p.
- phosphorus availability for plants: 0.00251778 kg; name P2O5_available; = sludge_P_content*sludge_Dry_mass*EC_P/ELF_P*P_to_P2O5; lognormal variance with pedigree 0, pedigree (1,1,1,1,1)
  Calculated value of P2O5 available for plants. Efficiency of organic phosphorus has been accounted for.
- nitrogen uptake by plant: 120.3 kg N/ha; name Nuptake_plant; lognormal variance with pedigree 0.0346, pedigree (3,3,1,5,1)
  This value (120,3 kg/ha) represents the N taken by plant during its growth. It has been calculated with the following data. Corn for grain yield: 9,1 t/ha, Soybeans yield: 3 t/ha and tame hay yield : 5,3 t/ha. These yields were calculated based on farmland surface and production according to Statistics Canada (2013) Table 001-0010 - Estimated areas, yield, production and average farm price of principal field crops, in metric units, annual. N uptake by crop according to International Plant Nutrition Institute, 2012. Crop Nutrient Balance - Quebec - Nitrogen. North America-North Eastern section of the IPNI, Available: http://nane.ipni.net/article/NANE-3045
- farmland surface: 5.99471e-5 ha; name farmland_surface; = P2O5_available/P2O5_fertilising_rate; lognormal variance with pedigree 0, pedigree (1,1,1,1,1)
  This is the farmland surface needed to apply sludge on the basis of the limiting nutrient (usually P) for crops. It is calculated with the amount of P in sludge divided by crop fertilisation needs (N, P, K) according to crop distribution that receives pulp and paper sludge in Quebec. Crop fertilization needs are from Beauregard, G. (2013). Production budget of agricultural productions in Quebec. Technical report for CIRAIG. Crop distribution is from personnal communication with Marianne Lemieux(2013) which is a specialized agronomist in pulp and paper sludge transport and spreading in Quebec.
- transformation factor from NO3 as N to NO3: 4.42857 dimensionless; name NO3_N_to_N03; = 62/14; lognormal variance with pedigree 0.21, pedigree (5,5,5,5,5)
  Mass ratio (NO3/NO3-N)
- ammonia volatilised after sludge application: 0.000209134 kg NH3-N; name NH3_volatilised; = sludge_AmmoniumFracOfN*sludge_N_content*sludge_Dry_mass*(ER_TAN+ c_app)*c_x; lognormal variance with pedigree 0, pedigree (1,1,1,1,1)
  NH3-N = TAN * (er + c_app) * cx Reference: Nemecek, T., Schnetzer, J., 2011. Methods of assessment of direct field emissions for LCIs of agricultural production systems, Data v3.0, Agroscope Reckenholz-Tanikon Research Station ART.
- emission factor NOx from N2O: 0.21 kg NOx/kg N2O; name EF_NOx_from_N2O; lognormal variance with pedigree 0.0186, pedigree (3,3,1,5,3)
  (kg NOx/kg N2O). Include the direct and indirect NOx emissions from fertilisers and the soil. Nemecek, T., Schnetzer, J., 2011. Methods of assessment of direct field emissions for LCIs of agricultural production systems. Agroscope Reckenholz-Tanikon Research Station ART. 34 pages
- fraction, process water, to air: 0.15 dimensionless; name fraction_PW_to_air; lognormal variance with pedigree 0.094, pedigree (4,4,3,5,4)
  Literature value. In case when no industry/process specific data are available, default evaporation fraction value is used. This value is 15% and is based on literature (Statistics Canada, 2007 & Shaffer, K.H., 2008, Consumptive water use in the Great Lakes Basin, USGS & Shiklomanov, 2003, World Water Resources at the Beginning of the 21st Century) and has been approved by an expert.
- nitrogen availability for plants: 0.00299626 kg; name N_available; = sludge_N_content*sludge_Dry_mass*(EC_N+((1-EC_N)*EC_N_2nd_year)); lognormal variance with pedigree 0, pedigree (1,1,1,1,1)
  Calculated value of nitrogen available for plants. Efficiency of organic nitrogen has been accounted for.
- efficiency loss factor of phosphorus in sludge: 1.36 dimensionless; name ELF_P; lognormal variance with pedigree 0.1306, pedigree (4,3,1,5,4)
  This parameter represents the efficiency loss of phosphorus in sludge to replace phosphorus synthetic fertilisers with regards to spreading period (if spreading occurs outside the growing crop period the loss factor is above 1, but less than 1,6). Reference: Centre de reference en agriculture et agroalimentaire du Quebec, 2010. Guide de reference en fertilisation, 2e edition (Reference guide on fertilization). Centre de reference en agriculture et agroalimentaire du Quebec, Sainte-Foy, Quebec, Canada.
- efficiency coefficient of nitrogen in sludge for the second year: 0.31 dimensionless; name EC_N_2nd_year; lognormal variance with pedigree 0.1306, pedigree (4,3,1,5,4)
  After-effect efficiency coefficient for nitrogen. Value is an average of the 0.12-0.5 range, applicable to all types of crop (Reference: Centre de reference en agriculture et agroalimentaire du Quebec, 2010. Guide de reference en fertilisation, 2e edition (Reference guide on fertilization). Centre de reference en agriculture et agroalimentaire du Quebec, Sainte-Foy, Quebec, Canada.)
- transformation factor P to PO4: 3.06452 dimensionless; name P_to_PO4; = 95/31; lognormal variance with pedigree 0, pedigree (1,1,1,1,1)
  Mass ratio (PO4/P)
- phosphate lost to river per hectare: 1.20083 kg PO4/ha; name PO4_loss_ha; lognormal variance with pedigree 0.0546, pedigree (3,3,1,5,1)
  Quantity of PO4 loss per hectare calculated with the ODEP model. Source: Michaud, A.R., M. Giroux, I. Beaudin, J. Desjardins, G. Gagne, M. Duchemin, J. Deslandes, C. Landry, P. Beaudet et J. Lagace. 2009. ODEP; un outil de diagnostic des exportations de phosphore. Projet« Gestion du risque associe aux facteurs source et transport du phosphore des sols cultives au Quebec », realise dans le cadre de l’Initiative d’appui aux conseillers agricoles (PIACA-204). Institut de recherche et de developpement en agroenvironnement inc. (IRDA) et Centre de reference en agriculture et agroalimentaire du Quebec (CRAAQ), Quebec, Canada. Version Octobre 2009 pour ODEP 1.1, 106 p.
- nitrate leached: 26.9864 kg NO3-N/ha.year; name NitrateLeached; = (21.37+((precipitation+water_irrigation)/(Clay_content+root_depth))*((0.0037*sludge_Dry_mass*sludge_N_content)+(0.0000601*Norg_soil)-(0.00362*Nuptake_plant))); lognormal variance with pedigree 0, pedigree (1,1,1,1,1)
  This is the total fraction of nitrate (NO3) that leaches to groundwater when organic fertilisers are applied as calculated by the SQCB-NO3 method for the specific farmland surface calculed. Reference: Nemecek, T., Schnetzer, J., 2011. Methods of assessment of direct field emissions for LCIs of agricultural production systems, Data v3.0, Agroscope Reckenholz-Tanikon Research Station ART.
- Transformation factor from N2O as N to N2O: 1.57143 dimensionless; name N2O_N_to_N2O; = 44/28; lognormal variance with pedigree 0, pedigree (1,1,1,1,1)
  Mass ratio (N2O/N2O-N)
- water irrigation: 0 mm/year; name water_irrigation
  Water meant for irrigation of crop
- total correction factor for manure application: 0.8712 dimensionless; name c_x; = c_incorp_time* c_season; lognormal variance with pedigree 0, pedigree (1,1,1,1,1)
  This parameter represents the sum of all correction factors regarding application of manure as described in the Agrammon model in Nemecek, T., Schnetzer, J., 2011. Methods of assessment of direct field emissions for LCIs of agricultural production systems. Agroscope Reckenholz-Tanikon Research Station ART. 34 pages
- efficiency coefficient of nitrogen in sludge for the first year: 0.251 dimensionless; name EC_N; lognormal variance with pedigree 0.0906, pedigree (4,3,1,5,4)
  This parameter represents the efficiency of nitrogen in sludge to replace nitrogen synthetic fertilisers for the first year. The efficiency of the second year has also to be account for. Reference: Centre de reference en agriculture et agroalimentaire du Quebec, 2010. Guide de reference en fertilisation, 2e edition (Reference guide on fertilization). Centre de reference en agriculture et agroalimentaire du Quebec, Sainte-Foy, Quebec, Canada.

## Reference product
- sludge from pulp and paper production: 0 kg; name sludge; By-product classification Waste; CPC 39920: Sewage sludge
  production volume 2.11212e10 kg; name sludgeProdVol; = 7.53E+10*0.280493523
    Estimated. The EU without CH production volume is extrapolated from the global production volume using the nominal GDP of 2010 (source: United Nations, http://data.un.org/Glossary.aspx?q=GDP+%28current+US%24%29, accessed 20130726 and 20130312).
    Gross domestic product (GDP) at current prices is GDP at prices of the current reporting period. Also known as nominal GDP.
  property potassium content 0.0032; name sludge_K_content
    potassium content on a dry matter basis
  property nickel content 1e-5; name sludge_Ni_content
    nickel content on a dry matter basis
  property nitrogen content 0.02385; name sludge_N_content
    nitrogen content on a dry matter basis. Taken from CRAAQ Guide 2nd edition, see references
  property Quebec production volume 3.36063e8 kg; name sludge_QCProdVol
  property iron content 0.00815; name sludge_Fe_content
    iron content on a dry matter basis
  property price 0 EUR2005; name sludge_price_EUR2005
    Waste products are assigned a price of zero as they are assumed to require further treatment.
  property carbon content, fossil 0.0533538; name sludge_Cfoss_content
    Calculated value. Carbon contained in CaCO3 equivalent content.
  property density 0.85 kg/l; name sludge_density
    Value obtained from dry matter content
  property lead content 8e-6; name sludge_Pb_content
    lead content on a dry matter basis. Taken from CRAAQ Guide 2nd edition, see references
  property cobalt content 3.1e-6; name sludge_Co_content
    cobalt content on a dry matter basis. Taken from CRAAQ Guide 2nd edition, see references
  property cadmium content 1.3e-6; name sludge_Cadmium_content
    cadmium content on a dry matter basis. Taken from CRAAQ Guide 2nd edition, see references
  property carbon content, non-fossil 0.789; name sludge_Corg_content
    organic carbon content on a dry matter basis
  property zinc content 9.3e-5; name sludge_Zn_content
    zinc content on a dry matter basis, Taken from CRAAQ Guide 2nd edition, see references
  property dry mass 0.26 kg; name sludge_Dry_mass; = 1- sludge_Water_wet_mass
  property molybdenum content 2.5e-5; name sludge_Mo_content
    molybdenum content on a dry matter basis. Taken from CRAAQ Guide 2nd edition, see references
  property arsenic content 8e-7; name sludge_As_content
    arsenic content on a dry matter basis. Taken from CRAAQ Guide 2nd edition, see references
  property aluminium content 0.0383; name sludge_Al_content
    aluminium content on a dry matter basis
  property heating value, net 2.65 MJ
    Value taken from the general comment of the treatment dataset.
  property water in wet mass 0.74 kg; name sludge_Water_wet_mass
  property mercury content 1e-7; name sludge_Hg_content
    mercury content on a dry, matter basis. Taken from CRAAQ Guide 2nd edition, see references
  property copper content 3.4e-5; name sludge_Cu_content
    copper content on a dry matter basis. Taken from CRAAQ Guide 2nd edition, see references
  property tcdd equivalents 6.15e-12; name sludge_tcdd_eq
    TCDD-equivalents represents the amount of dioxins and furanes
  property water content 2.84615; = sludge_Water_wet_mass/ sludge_Dry_mass
  property boron content 2.797e-5; name sludge_B_content
    boron content on a dry matter basis
  property ammonium fraction of total nitrogen 0.04839; name sludge_AmmoniumFracOfN
    This parameter expresses the ammonium content (NH4-N) of total nitrogen (N tot)
  property phosphorus content 0.00697; name sludge_P_content
    phosphorus content on a dry matter basis
  property chromium content 1.6e-5; name sludge_Cr_content
    chromium content on a dry matter basis. Taken from CRAAQ Guide 2nd edition, see references
  property manganese content 0.00113; name sludge_Mn_content
    manganese content on a dry matter basis
  property carbon content 0.842354
    carbon content on a dry matter basis (reserved; not for manual entry)
  properties: wet mass 1 kg, carbon allocation 0.219012 kg
- organo-mineral potassium fertiliser, as K2O: 1 kg; name K2O_fertiliser; = sludge_K_content*sludge_Dry_mass*K_to_K2O; By-product classification allocatable product; CPC 34659: Fertilizers n.e.c.
  This is the potassium (as K2O) output (organic and mineral forms of potassium contained) from organic origin. In practice, only a part of this total amount is available to the plants and the available amount has to be calculated considering efficiency of organic potassium (to replace mineral potassium ), which also depends on many factors, such as climate, soil, crop, timing and technique of application, etc. For information purposes, the amount considering efficiency of organic potassium is estimated in the parameter section of this dataset under 'potassium availability for plants'. Since this dataset includes field emissions from the application of sludge, potassium availability has been accounted for in the calculation of direct field emissions.
  production volume 2.11775e7 kg; = K2O_fertiliser* sludgeProdVol/ABS( sludge)
  property price 0.188 EUR2005; name K2O_fertiliser_price_EUR2005
  properties: water in wet mass 0 kg, carbon content, fossil 0, oxygen content 0.169852, dry mass 1 kg, water content 0, carbon content, non-fossil 0, wet mass 1 kg, potassium content 0.830148, carbon content 0, carbon allocation 0 kg

## By-products
- organo-mineral potassium fertiliser, as K2O: 0 kg; By-product classification allocatable product; CPC 34659: Fertilizers n.e.c.
  (same comment as for organo-mineral potassium fertiliser, as K2O)
  production volume 0 kg; = K2O_fertiliser* sludgeProdVol/ABS( sludge)
    Calculated from production volume of reference product using the relative outputs.
  property carbon content, fossil 0
    Carbon content, fossil is calculated based on the chemical formula of the substance.
  property oxygen content 0.169852
    Oxygen content (on a dry matter basis) of organo-mineral potassium fertiliser, as K2O is calculated from the molecular formula of the substance (Potassium).
  property potassium content 0.830148
    Potassium content (on a dry matter basis) of organo-mineral potassium fertiliser, as K2O is calculated from the molecular formula of the substance (Potassium).
  property carbon content 0
    carbon content on a dry matter basis (reserved; not for manual entry)
  properties: water in wet mass 0 kg, dry mass 1 kg, water content 0, carbon content, non-fossil 0, wet mass 1 kg, carbon allocation 0 kg
- organo-mineral phosphorus fertiliser, as P2O5: 0 kg; name P2O5_fertiliser; = sludge_P_content*sludge_Dry_mass*P_to_P2O5; CPC 34659: Fertilizers n.e.c.; By-product classification allocatable product
  This is the total phosphate (as P2O5) output (organic and mineral forms of phosphate contained) from organic origin. In practice, only a part of this total amount is available to the plants and the available amount has to be calculated considering efficiency of organic phosphate (to replace mineral phosphate), which also depends on many factors, such as climate, soil, crop, timing and technique of application, etc. For information purposes, the amount considering efficiency of organic phosphate is estimated in the parameter section of this dataset under "phosphorus availability for plants". Since this dataset includes field emissions from the application of sludge, phosphate availability has been accounted for in the calculation of direct field emissions.
  production volume 8.76639e7 kg; = P2O5_fertiliser*sludgeProdVol
    Calculated from production volume of reference product using the relative outputs.
  property price 0.241 EUR2005; name P2O5_fertiliser_price_EUR2005
    Set equal to the price of the corresponding inorganic fertiliser
  property oxygen content 0.563579
    Oxygen content (on a dry matter basis) of organo-mineral phosphorus fertiliser, as P2O5 is calculated from the molecular formula of the substance (Phosphorus).
  property carbon content, fossil 0
    Carbon content, fossil is calculated based on the chemical formula of the substance.
  property phosphorus content 0.436421
    Phosphorus content (on a dry matter basis) of organo-mineral phosphorus fertiliser, as P2O5 is calculated from the molecular formula of the substance (Phosphorus).
  property carbon content 0
    carbon content on a dry matter basis (reserved; not for manual entry)
  properties: dry mass 1 kg, water in wet mass 0 kg, water content 0, wet mass 1 kg, carbon content, non-fossil 0, carbon allocation 0 kg
- organo-mineral nitrogen fertiliser, as N: 0 kg; name N_fertiliser; = sludge_N_content*sludge_Dry_mass; By-product classification allocatable product; CPC 34659: Fertilizers n.e.c.
  This is the total nitrogen (as N) output (organic and mineral forms of nitrogen contained) from organic origin. In practice, only a part of this total amount is available to the plants and the available amount has to be calculated considering nitrogen efficiency (to replace mineral nitrogen), which also depends on many factors, such as climate, soil, crop, timing and technique of application, etc. For information purposes, the amount considering nitrogen efficiency is estimated in the parameter section of this dataset under "nitrogen availability for plants". Since this dataset includes field emissions from the application of sludge, nitrogen availability has been accounted for in the calculation of direct field emissions.
  production volume 1.30972e8 kg; = N_fertiliser*sludgeProdVol
    Calculated from production volume of reference product using the relative outputs.
  property price 0.473 EUR2005; name N_fertiliser_price_EUR2005
    Set equal to the price of the corresponding inorganic fertiliser
  property nitrogen content 1
    Nitrogen content (on a dry matter basis) of organo-mineral nitrogen fertiliser, as N is calculated from the molecular formula of the substance (Nitrogen).
  property carbon content, fossil 0
    Carbon content, fossil is calculated based on the chemical formula of the substance.
  property carbon content 0
    carbon content on a dry matter basis (reserved; not for manual entry)
  properties: wet mass 1 kg, carbon content, non-fossil 0, dry mass 1 kg, water content 0, water in wet mass 0 kg, carbon allocation 0 kg
- soil pH raising agent, as CaCO3: 0 kg; name soil_pH_raising_agent_as_CaCO3; source Marianne Lemieux 2013; CPC 34659: Fertilizers n.e.c.; By-product classification allocatable product; pedigree (1,1,1,1,1)
  Calculated value of the amount of CaCO3 that can be substituted considered the liming efficiency of the sludge.
  production volume 2.44161e9 kg; = soil_pH_raising_agent_as_CaCO3* sludgeProdVol/ABS( sludge)
    Calculated values from annual production volume of reference flow
  property carbon content, non-fossil 0; name soil_pH_raising_a_C_content_non_fossil_0
    biogene carbon content on a dry matter basis
  property carbon content, fossil 0.12; name soil_pH_raising_agent_Cfoss_content; = 12/(40+12+3*16)
    Stoichiometric calculation. Fossil carbon content on a dry matter basis.
  property price 0.117 EUR2005; name soil_pH_raising_agent_as_CaCO3_price_EUR
    The price is estimated to be the same as for lime.
  property carbon content 0.12
    carbon content on a dry matter basis (reserved; not for manual entry)
  properties: dry mass 1 kg, water content 0, wet mass 1 kg, water in wet mass 0 kg, carbon allocation 0.12 kg

## Inputs from technosphere
- solid manure loading and spreading, by hydraulic loader and spreader: 0 kg; pedigree (1,1,1,1,1)
  Value refering to functional unit.

## Emissions to nature
All rows: pedigree (1,1,1,1,1)
- Phosphorus [water, surface water]: 0 kg
  Calculated value which expresses the amount of phosphorus (P) loss through run-off into surface water based on the ODEP model (Outil de diagnostic des exportations de phosphore) adapted for the fonctional unit.
- Lead [soil, agricultural]: 0 kg
  Calculated value. Metals contained in the sludge are considered to be entirely emitted to soil.
- Manganese [soil, agricultural]: 0 kg
  (same comment as for Lead)
- Copper [soil, agricultural]: 0 kg
  (same comment as for Lead)
- Arsenic [soil, agricultural]: 0 kg
  (same comment as for Lead)
- Nitrogen oxides [air, low population density, long-term]: 0 kg; name NOx_loss; source Nemecek, T. 2011
  Calculated value which expresses the total amount of NOx volatilised into the air from the sludge application on farmlands.
- Iron [soil, agricultural]: 0 kg
  (same comment as for Lead)
- Nitrate [water, ground-]: 0 kg; name NO3_loss; source Nemecek, T. 2011
  Calculated value which expresses the total amount of NO3 leached into the groundwater from the sludge application on farmlands based on the SQCB model (Sustainable Quick Check for Biofuels) adapted for the fonctional unit.
- Water [air, unspecified]: 0 m3
  Calculated value based on literature values and expert opinion. See comments in the parametres' comment field.
- Dioxins, measured as 2,3,7,8-tetrachlorodibenzo-p-dioxin [air, low population density, long-term]: 0 kg; name TCDD
  (same comment as for Lead)
  property carbon content, fossil 0.447652; name TCDD_Cfoss_content
- Carbon dioxide, fossil [air, urban air close to ground]: 0 kg
  Stoichiometric value based on sludge fossil carbon content. Fossil carbon content of dioxin emissions is taken into account.
- Ammonia [air, low population density, long-term]: 0 kg; name NH3_loss; source Nemecek, T. 2011
  Calculated value which expresses the total amount of NH3 volatilised into the air from the sludge application on farmlands.
- Water [water, unspecified]: 0 m3
  (same comment as for Water)
- Carbon dioxide, non-fossil [air, unspecified]: 0 kg
  Stoichiometric value based on sludge non-fossil carbon content.
- Chromium [soil, agricultural]: 0 kg
  (same comment as for Lead)
- Molybdenum [soil, agricultural]: 0 kg
  (same comment as for Lead)
- Nickel [soil, agricultural]: 0 kg
  (same comment as for Lead)
- Dinitrogen monoxide [air, low population density, long-term]: 0 kg; name N2O_loss; source Nemecek, T. 2011
  Calculated value which expresses the total amount of N2O volatilised (direct + indirect) into the air from the sludge application on farmlands. This value is calculated with the N applied from fertiliser and does not consider the amount of N from the crop residue.
- Phosphate [water, surface water]: 0 kg
  Calculated value which expresses the amount of phosphate (PO4-) loss through run-off into surface water based on the ODEP model (Outil de diagnostic des exportations de phosphore) adapted for the fonctional unit. No phosphate to groundwater is considered in this dataset according to the ODEP model.
- Aluminium [soil, agricultural]: 0 kg
  (same comment as for Lead)
- Boron [soil, agricultural]: 0 kg
  (same comment as for Lead)
- Mercury [soil, agricultural]: 0 kg
  (same comment as for Lead)
- Zinc [soil, agricultural]: 0 kg
  (same comment as for Lead)
- Cadmium [soil, agricultural]: 0 kg
  (same comment as for Lead)
- Cobalt [soil, agricultural]: 0 kg
  (same comment as for Lead)

## Sampling procedure
Data mainly originate from acknowledged model, scientific literature, government publications and handbook. Some specific data come from expert judgement and a pulp mill. See sources.

## Extrapolations
The Quebec dataset has been extrapolated to the GLO geography. Data quality indicators have been adjusted accordingly.

Calculations of N2O emissions are based on the IPCC method. The indirect emission factors are taken from IPCC and the direct emission factors are canadian-specific. Calculations of NOx emissions are based on an expert judment and considered to be fit for the Quebec context. Calculations of NH3 and NO3 emissions are based on Swiss models used with parameters from the Quebec context. Calculations of P and PO4 emissions are from a Quebec-specific model. Since models are usually based on solid animal manure, solid pulp and paper sludge are deemed to be an equivalent organic fertiliser.
