# treatment of waste wood pole, chrome preserved, municipal incineration with fly ash extraction

Dataset: EcoSpold 2, unit process
Geography: CH
Time period: 2006-01-01 to 2021-12-31
Technology level: current
Classification: ISIC rev.4 ecoinvent: 3821:Treatment and disposal of non-hazardous waste
Synonyms: municipal waste incineration
Scenario: Business-as-Usual
System model: Allocation, cut-off by classification
Share of production covered: 1.8 %
Generated by: Gabor Doka
Published in: Doka G. 2015
Database: ecoinvent
isCopyrightProtected: true
accessRestrictedTo: 1

## General comment
This dataset represents the activity of waste disposal of waste wood pole, chrome preserved in a municipal solid waste incinerator (MSWI) // Recommended use of this dataset: For disposal of bulk or small parts of chrome preserved wood poles as used for electricity grids. Please note there is another, slightly different chrome preserved wood for genereal building products. // // Waste composition (wet, in ppm): upper heating value 15.36 MJ/kg; lower heating value 13.99 MJ/kg; H2O 173450; O 370840; H 49982; C 400020; S 288.79; N 983.43; P 108.57; B 58.919; Cl 329.76; Br n.a.; F 21.03; I n.a.; Ag n.a.; As 0.42061; Ba n.a.; Cd 0.19979; Co 0.086459; Cr 2281.5; Cu 786.37; Hg 0.31861; Mn 52.927; Mo 0.82721; Ni 0.5538; Pb 27.767; Sb n.a.; Se n.a.; Sn n.a.; V n.a.; Zn 17.743; Be n.a.; Sc n.a.; Sr n.a.; Ti n.a.; Tl n.a.; W n.a.; Si n.a.; Fe 15.423; Ca 130.42; Al 6.3093; K 65.176; Mg 196.85; Na 334.08; // Share of carbon in waste that is biogenic 100%. // Share of metals in waste not oxidised and bulk-recyclable (exclude very small or thin parts) Iron: 0%; Alu: 0%; Copper: 0%. // Recovery of metal scrap from bottom ash to recycling: 0g iron scrap, 0g aluminium scrap, 0g copper scrap. From this waste, the FLUWA process in the technology mix recovers 0.000155kg (DM) of a hydroxide sludge to be recycled in zinc furnaces. // Ultimately one kg of this waste produces 0.01546 kg of bottom ash (can include some washed ash) and 0.002374 kg of residues, which are landfilled (technology mix). Additional solidification of residues with 0.0009498 kg of cement.Net energy production: 1.74MJ/kg electric energy and 3.5MJ/kg thermal energy. //

## Included activities start
waste incineration from waste reception gate and delivery into waste bunker at incinerator plant site (without transports to the incinerator)

## Included activities end
Waste-specific short-term emissions to water from leachate. Long-term emissions from landfill to ground water.

## Geography
Specific to the technology mix encountered in Switzerland in 2012.

## Technology
average Swiss MSWI plants in 2010 (grate incinerators) with electrostatic precipitator for fly ash (ESP), wet flue gas scrubber and 25% SNCR , 42.77% SCR-high dust , 32.68% SCR-low dust -DeNOx facilities and 0% without Denox (weighted according to mass of burnt waste, representing Swiss average). Efficiency of iron scrap separation from slag : 58%. Efficiency of non-ferrous scrap separation from slag : 31%. The technology mix for this dataset includes a filter ash treatment (FLUWA) of a share of 46.22%. Gross electric efficiency technology mix 15.84% and Gross thermal efficiency technology mix 28.51%

## Time period
Waste composition as given in literature reference, theoretical data or other source. Transfer coefficients for modern MSWI.

## Reference product
- waste wood pole, chrome preserved: -1 kg; name RP_amount_1; CPC 3928: Sawdust and wood waste and scrap; By-product classification Waste
  Main reference product of this activity (supply of disposal service).
  production volume 1.0212e7 kg; name RP_PV_1
    based on corresponding global production volume of MSW fraction in conventional MSWI (wo fly ash extraction) and scaled down to annual Swiss incinerated MSW mass of 3.02 mio. tonnes.
  property heating value, net 13.99 MJ
    Value taken from the general comment of the treatment dataset.
  property price 0 EUR2005; name RP_amount_1_price_EUR2005
    Waste products are assigned a price of zero as they are assumed to require further treatment.
  property carbon content 0.48396
    carbon content on a dry matter basis (reserved; not for manual entry)
  properties: phosphorus content 0.00013136, hydrogen content 0.060471, arsenic content 5.0887e-7, cadmium content 2.4172e-7, sulfur content 0.0003494, cobalt content 1.046e-7, oxygen content 0.44866, nitrogen content 0.0011898, aluminium content 7.6334e-6, fluorine content 2.5444e-5, chlorine content 0.00039896, copper content 0.00095139, nickel content 6.7002e-7, boron content 7.1283e-5, chromium content 0.0027602, iron content 1.8659e-5, lead content 3.3594e-5, manganese content 6.4034e-5, zinc content 2.1466e-5, calcium content 0.00015778, mercury content 3.8547e-7, wet mass 1 kg, molybdenum content 1.0008e-6, sodium content 0.00040419, water in wet mass 0.17345 kg, magnesium content 0.00023815, potassium content 7.8854e-5, dry mass 0.82655 kg, carbon content, non-fossil 0.48396, water content 0.20985, carbon allocation 0.400017 kg

## By-products
- electricity, for reuse in municipal waste incineration only: 0 kWh; name E_el_prod_MSWI; CPC 17100: Electrical energy; By-product classification allocatable product; pedigree (1,1,1,1,1)
  Net electricity generated from this waste and used in internal MSWI plant energy redistribution.
  Uncertainty: uncertainty is calculated from uncertainties in waste composition and uncertainties in energy efficiency and the uncertainty in internal energy demand
  production volume 4.9433e6 kWh
    calculated in proportion to reference product waste input to incinerator
  property true value relation 3.6; name E_el_prod_MSWI_true_value_relation
    property to calculate "true value" from
  property exergy 3.6 MJ; name E_el_prod_MSWI_exergy
    This exergy property is based on the exergy content of the product.
  property price 0.1 EUR2005; name E_el_prod_MSWI_price_EUR2005
    Estimated to be the same price as in case of electricity, medium voltage.
- metalliferous hydroxide sludge: 0 kg; By-product classification Recyclable; CPC 1429: Other non-ferrous metal ores and concentrates (other than uranium or thorium ores and concentrates); pedigree (1,1,1,1,1)
  Metalliferous hydroxide sludge from filter ash leaching (FLUWA).
  Uncertainty: uncertainty is calculated from uncertainties in waste composition and transfer coefficients to filter ash in incinerator and the uncertainty of the transfer coefficients of the FLUWA process.
  production volume 0 kg
    calculated in proportion to reference product waste input to incinerator
  property price 0.0042 EUR2005
    World market value of manure, deflated with barley world market price and consumer price index, based on [http://www.gov.pe.ca/photos/original/af_NM_manconv.pdf].
  property heating value, net 0 MJ
    Non combustible products are assumed to have an LHV equal to zero (0).
  property carbon content 0.13459
    carbon content on a dry matter basis (reserved; not for manual entry)
  properties: iron content 1.1008e-5, aluminium content 2.8163e-6, magnesium content 0.0020003, nickel content 3.3346e-6, wet mass 1 kg, dry mass 0.25 kg, carbon content, non-fossil 0.13459, copper content 0.0021135, potassium content 0.0026818, water in wet mass 0.75 kg, sodium content 0.017751, oxygen content 0.54851, arsenic content 2.5207e-5, water content 3, boron content 0.0063648, sulfur content 0.11489, lead content 0.0032427, chlorine content 0.051428, fluorine content 0.0019845, phosphorus content 0.013786, molybdenum content 0.00032794, cadmium content 0.00044034, zinc content 0.020243, calcium content 0.0085099, manganese content 0.00034989, chromium content 0.070736, cobalt content 1.3797e-5, mercury content 3.7554e-6, carbon allocation 0.0336475 kg
- heat, for reuse in municipal waste incineration only: 0 MJ; name E_th_prod_MSWI; By-product classification allocatable product; CPC 17300: Steam and hot water; pedigree (1,1,1,1,1)
  Net useful heat generated from this waste and used in internal MSWI plant energy redistribution.
  Uncertainty: uncertainty is calculated from uncertainties in waste composition and uncertainties in energy efficiency and the uncertainty in internal energy demand
  production volume 3.5733e7 MJ
    calculated in proportion to reference product waste input to incinerator
  property exergy 0.1842 MJ; name E_th_prod_MSWI_exergy
    This exergy property is based on the exergy content of the product.
  property true value relation 0.1842; name E_th_prod_MSWI_true_value_relation
    property to calculate "true value" from
  property price 0.0106 EUR2005; name E_th_prod_MSWI_price_EUR2005
    Average European district heat price from Ecoheatcool and Euroheat 2005-2006, Ecoheat Work package 1: The European heat market. Final report. 10.6 EUR/GJ i s the price of district heat. http://www.solarthermalworld.org/files/Ecoheatcool%20WP1%20Web.pdf?download

## Inputs from technosphere
- process-specific burdens, slag landfill: 0.015464 kg; lognormal variance with pedigree 0.041465, pedigree (1,1,4,1,1)
  Mass-specific expenditures required for landfilling of bottom ash.;activityLink introduced to establish a direct link to the corresponding regional supply of this product
  Uncertainty: uncertainty is calculated from uncertainties in waste composition and transfer coefficients in incinerator
- process-specific burdens, residual material landfill: 0.004734 kg; lognormal variance with pedigree 0.062778, pedigree (1,1,4,1,1)
  Mass-specific expenditures required for landfilling of incineration residues.;activityLink introduced to establish a direct link to the corresponding regional supply of this product
  Uncertainty: uncertainty is calculated from uncertainties in waste composition and transfer coefficients in incinerator
- heat, district or industrial, natural gas: 0.085899 MJ; lognormal variance with pedigree 0.38473, pedigree (1,1,4,1,1)
  Input to DeNOx stage, to heat up flue gas in low-dust SCR.
  Uncertainty: uncertainty calculated from uncertainty in average DeNOx input, uncertainty in the share of thermal NOx, uncertainty of nitrogen content in average municipal waste and the uncertainty in nitrogen content in *this* waste.
  properties: heating value, net 1 MJ
- quicklime, milled, packed: 9.9759e-5 kg; lognormal variance with pedigree 1.2333, pedigree (1,1,4,1,1)
  Auxilliary inputs for the flue gas treatment stage of the incinerator plant.
  Uncertainty: uncertainty calculated from uncertainty in average CaO input, of transfer coefficients in the incinerator, and the uncertainty of the waste composition of this waste
  properties: dry mass 0.99 kg, water content 0.010101, wet mass 1 kg
- residual material landfill: 9.8625e-12 unit; lognormal variance with pedigree 0.062778, pedigree (1,1,4,1,1)
  Landfill infrastructure required for landfilling of incineration residues.
  Uncertainty: uncertainty is calculated from uncertainties in waste composition and transfer coefficients in incinerator
- transport, freight, lorry, unspecified: 0.00075987 metric ton*km; lognormal variance with pedigree 0.031238, pedigree (1,1,4,1,1)
  Transport services to transport incineration residues to landfills and filter ash to external treatments (FLUWA).
  Uncertainty: uncertainty calculated from uncertainty of the waste composition of this waste, uncertainty of transfer coefficients and the uncertainty in generic transportation distances
- slag landfill: 2.7491e-11 unit; lognormal variance with pedigree 0.041465, pedigree (1,1,4,1,1)
  Landfill infrastructure required for landfilling of bottom ash.
  Uncertainty: uncertainty is calculated from uncertainties in waste composition and transfer coefficients in incinerator
- hydrochloric acid, without water, in 30% solution state: 6.1876e-5 kg; lognormal variance with pedigree 0.036786, pedigree (1,1,4,1,1)
  Auxilliary inputs for the wastewater treatment stage of the incinerator plant.
  Uncertainty: uncertainty calculated from uncertainty in average HCl input, of transfer coefficients in the incinerator, and the uncertainty of the waste composition of this waste
  properties: dry mass 1 kg, wet mass 1 kg, heating value, net 3.32 MJ
- ammonia, anhydrous, liquid: 0.00045935 kg; lognormal variance with pedigree 0.38473, pedigree (1,1,4,1,1)
  Input to DeNOx stage (100% NH3).
  Uncertainty: uncertainty calculated from uncertainty in average DeNOx input, uncertainty in the share of thermal NOx, uncertainty of nitrogen content in average municipal waste and the uncertainty in nitrogen content in *this* waste.
  properties: wet mass 1 kg, dry mass 1 kg
- iron (III) chloride, without water, in 40% solution state: 3.7821e-6 kg; lognormal variance with pedigree 0.22282, pedigree (1,1,4,1,1)
  Auxilliary inputs for the wastewater treatment stage of the incinerator plant.
  Uncertainty: uncertainty calculated from uncertainty in average FeCl3 input, of transfer coefficients in the incinerator, and the uncertainty of the waste composition of this waste
  properties: dry mass 1 kg, wet mass 1 kg
- titanium dioxide: 2.878e-5 kg; lognormal variance with pedigree 0.68716, pedigree (1,1,4,1,1)
  Input to DeNOx stage (TiO2 catalyst carrier)
  Uncertainty: uncertainty calculated from uncertainty in average DeNOx input, uncertainty in the share of thermal NOx, uncertainty of nitrogen content in average municipal waste and the uncertainty in nitrogen content in *this* waste.
  properties: wet mass 1 kg, dry mass 1 kg
- chemical, organic: 2.8648e-6 kg; lognormal variance with pedigree 1.7079, pedigree (1,1,4,1,1)
  Auxilliary inputs for the wastewater treatment stage of the incinerator plant. Proxy for (pure) Trisodium-trimercapto-s-triazine (CAS 17766-26-6), used as 15% diluted solution, aka TMT15.
  Uncertainty: uncertainty calculated from uncertainty in average TMT15 input, of transfer coefficients in the incinerator, and the uncertainty of the waste composition of this waste
  properties: carbon content, fossil 0.628, dry mass 1 kg, wet mass 1 kg, heating value, net 19.03 MJ
- chromium oxide, flakes: 5.8734e-7 kg; lognormal variance with pedigree 0.68716, pedigree (1,1,4,1,1)
  Input to DeNOx stage. Active component in SCR catalyst (vanadium pentoxide, V2O5), here approximated with the available chromium trioxide.
  Uncertainty: uncertainty calculated from uncertainty in average DeNOx input, uncertainty in the share of thermal NOx, uncertainty of nitrogen content in average municipal waste and the uncertainty in nitrogen content in *this* waste.
  properties: wet mass 1 kg, dry mass 1 kg
- chemical, inorganic: 1.6128e-5 kg; lognormal variance with pedigree 0.102931, pedigree (1,1,4,1,1)
  Auxilliary inputs for the wastewater treatment stage of the incinerator plant. Proxy for Polyelectrolyte.
  Uncertainty: uncertainty calculated from uncertainty in average Polyelectrolyte input, of transfer coefficients in the incinerator, and the uncertainty of the waste composition of this waste
  properties: wet mass 1 kg, dry mass 1 kg, carbon content, fossil 0.003
- hydrogen peroxide, without water, in 50% solution state: 0.0001467 kg; lognormal variance with pedigree 0.040691, pedigree (1,1,4,1,1)
  Auxilliary oxidising agent for filter ash treatment (FLUWA).
  Uncertainty: uncertainty calculated from uncertainty in of transfer coefficients in the incinerator, and the uncertainty of the waste composition of this waste
  properties: wet mass 1 kg, dry mass 1 kg, heating value, net 7.13 MJ
- municipal waste incineration facility: 2.5e-10 unit
  Demands per kilogram waste.
- cement, unspecified: 0.00094977 kg; lognormal variance with pedigree 0.071862, pedigree (1,1,4,1,1)
  Cement required for solidification of landfilled residual material.
  Uncertainty: Uncertainty calculated from uncertainty of the waste composition of this waste, of transfer coefficients in the incinerator and of the solidification recipe.
  properties: dry mass 1 kg, wet mass 1 kg
- spent activated carbon with mercury: -1.6998e-6 kg; name BP_amount_1; lognormal variance with pedigree 1.7234, pedigree (1,1,4,1,1)
  Spent ion exchanger charged with mercury, from FLUWA filter ash treatment, approximated here with Spent activated carbon with mercury, deposited undergound in a polyethylene Big Bag.
  Uncertainty: uncertainty calculated from uncertainty in of transfer coefficients in the incinerator, and the uncertainty of the waste composition of this waste.
  production volume 17.3584 kg; = ABS(RP_PV_1 * (BP_amount_1 / RP_amount_1))
    Calculated from production volume of reference product using the relative outputs.
  property price 0 EUR2005; name BP_amount_1_price_EUR2005
  properties: heating value, net 18.18 MJ, wet mass 1 kg, dry mass 1 kg, carbon content, fossil 0.6
- cationic resin: 1.6148e-6 kg; lognormal variance with pedigree 1.7234, pedigree (1,1,4,1,1)
  Auxilliary input for mercury removal in filter ash treatment (FLUWA).
  Uncertainty: uncertainty calculated from uncertainty in of transfer coefficients in the incinerator, and the uncertainty of the waste composition of this waste
  properties: wet mass 1 kg, water content 1, carbon content, fossil 0.521606, dry mass 0.5 kg, heating value, net 6.68 MJ
- water, decarbonised: 0.1912 kg; lognormal variance with pedigree 0.22282, pedigree (1,1,4,1,1)
  Incinerator process water used in flue gas scrubber stage.
  Uncertainty: uncertainty calculated from uncertainty in average water input, and the uncertainty of the waste composition of this waste
  properties: wet mass 1 kg
- waste cement, hydrated: -0.0023744 kg; lognormal variance with pedigree 0.071862, pedigree (1,1,4,1,1)
  Hydrated cement output for solidification of landfilled residual material.
  Uncertainty: Uncertainty calculated from uncertainty of the waste composition of this waste and transfer coefficients in the incinerator and of the solidification recipe.
  production volume 24248 kg
    calculated in proportion to reference product waste input to incinerator
  properties: wet mass 1 kg, dry mass 1 kg
- sodium hydroxide, without water, in 50% solution state: 0.00017638 kg; lognormal variance with pedigree 0.25642, pedigree (1,1,4,1,1)
  Auxilliary inputs for the flue gas treatment stage of the incinerator plant, and partially in the filter ash treatment (FLUWA).
  Uncertainty: uncertainty calculated from uncertainty in average NaOH input, of transfer coefficients in the incinerator, and the uncertainty of the waste composition of this waste
  properties: heating value, net 3.03 MJ, wet mass 1 kg, dry mass 1 kg
- metalliferous hydroxide sludge: -0.00061834 kg; lognormal variance with pedigree 0.037159, pedigree (1,1,4,1,1)
  (same comment as for metalliferous hydroxide sludge)
  production volume 6314.5 kg
  properties: wet mass 1 kg, dry mass 0.25 kg, carbon content, non-fossil 0.13459, sodium content 0.017751, oxygen content 0.54851, water content 3, sulfur content 0.11489, chlorine content 0.051428, phosphorus content 0.013786, zinc content 0.020243, calcium content 0.0085099, chromium content 0.070736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

## Inputs from nature
- Oxygen [natural resource, in air]: 1.0837 kg; lognormal variance with pedigree 0.036604, pedigree (1,1,4,1,1)
  Oxygen from ambient air needed to combust and oxidise this waste. Net demand, i.e. without O2 leaving the plant in flue gas uncombusted.
  Uncertainty: uncertainty is calculated from uncertainties in waste composition and transfer coefficients to flue gas and soild residues in incinerator

## Emissions to nature
- Thallium [water, surface water]: 2.9629e-13 kg; lognormal variance with pedigree 0.72642, pedigree (1,1,4,1,1)
  Emissions to water from waste composition and transfer coefficients in incinerator and landfills.
  Uncertainty: uncertainty is calculated from uncertainties in waste composition and transfer coefficients in incinerator and landfills
- Calcium [air, urban air close to ground]: 1.0264e-6 kg; lognormal variance with pedigree 0.94306, pedigree (1,1,4,1,1)
  Emission to air from waste composition and transfer coefficients.
  Uncertainty: uncertainty is calculated from uncertainties in waste composition and transfer coefficients in incinerator
- Sodium, ion [water, ground-, long-term]: 0.00021865 kg; lognormal variance with pedigree 0.54833, pedigree (1,1,4,1,1)
  Long-term emissions from landfilling of incineration residues.
  Uncertainty: uncertainty is calculated from uncertainties in waste composition and transfer coefficients in incinerator and landfills.
- Silicon [water, surface water]: 2.2001e-7 kg; lognormal variance with pedigree 0.55671, pedigree (1,1,4,1,1)
  (same comment as for Thallium)
- Aluminium [air, urban air close to ground]: 5.1441e-12 kg; lognormal variance with pedigree 1.4117, pedigree (1,1,4,1,1)
  (same comment as for Calcium)
- NMVOC, non-methane volatile organic compounds, unspecified origin [air, urban air close to ground]: 1.5428e-6 kg; lognormal variance with pedigree 0.101325, pedigree (1,1,4,1,1)
  Incomplete combustion product emitted to air.
  Uncertainty: uncertainty calculated from uncertainty in average operation emissions, and the uncertainty of the flue gas volume from this waste.
- Iron, ion [water, surface water]: 4.7749e-10 kg; lognormal variance with pedigree 1.4966, pedigree (1,1,4,1,1)
  (same comment as for Thallium)
- Potassium [air, urban air close to ground]: 3.22e-7 kg; lognormal variance with pedigree 1.0387, pedigree (1,1,4,1,1)
  (same comment as for Calcium)
- Particulates, < 2.5 um [air, urban air close to ground]: 4.0474e-6 kg; lognormal variance with pedigree 0.43319, pedigree (1,1,4,1,1)
  (same comment as for NMVOC, non-methane volatile organic compounds, unspecified origin)
- Calcium, ion [water, surface water]: 2.4091e-6 kg; lognormal variance with pedigree 0.40764, pedigree (1,1,4,1,1)
  (same comment as for Thallium)
- Magnesium [air, urban air close to ground]: 2.0763e-7 kg; lognormal variance with pedigree 0.89896, pedigree (1,1,4,1,1)
  (same comment as for Calcium)
- Particulates, > 2.5 um, and < 10um [air, urban air close to ground]: 2.0339e-8 kg; lognormal variance with pedigree 0.2099, pedigree (1,1,4,1,1)
  (same comment as for NMVOC, non-methane volatile organic compounds, unspecified origin)
- Aluminium [water, surface water]: 1.5001e-8 kg; lognormal variance with pedigree 1.7422, pedigree (1,1,4,1,1)
  (same comment as for Thallium)
- BOD5, Biological Oxygen Demand [water, surface water]: 0.00029759 kg; lognormal variance with pedigree 0.041423, pedigree (1,1,4,1,1)
  (same comment as for Thallium)
- Dioxins, measured as 2,3,7,8-tetrachlorodibenzo-p-dioxin [air, urban air close to ground]: 6.7796e-14 kg; lognormal variance with pedigree 0.43319, pedigree (1,1,4,1,1)
  (same comment as for NMVOC, non-methane volatile organic compounds, unspecified origin)
- Potassium, ion [water, surface water]: 1.7674e-5 kg; lognormal variance with pedigree 0.41661, pedigree (1,1,4,1,1)
  (same comment as for Thallium)
- Sodium [air, urban air close to ground]: 2.7429e-6 kg; lognormal variance with pedigree 0.81829, pedigree (1,1,4,1,1)
  (same comment as for Calcium)
- Benzene [air, urban air close to ground]: 3.39e-8 kg; lognormal variance with pedigree 0.101325, pedigree (1,1,4,1,1)
  (same comment as for NMVOC, non-methane volatile organic compounds, unspecified origin)
- Magnesium [water, surface water]: 1.4904e-6 kg; lognormal variance with pedigree 0.7293, pedigree (1,1,4,1,1)
  (same comment as for Thallium)
- COD, Chemical Oxygen Demand [water, surface water]: 0.0003041 kg; lognormal variance with pedigree 0.040467, pedigree (1,1,4,1,1)
  (same comment as for Thallium)
- Toluene [air, urban air close to ground]: 6.78e-8 kg; lognormal variance with pedigree 0.101325, pedigree (1,1,4,1,1)
  (same comment as for NMVOC, non-methane volatile organic compounds, unspecified origin)
- Sodium, ion [water, surface water]: 0.00010994 kg; lognormal variance with pedigree 0.26735, pedigree (1,1,4,1,1)
  (same comment as for Thallium)
- TOC, Total Organic Carbon [water, surface water]: 0.00013264 kg; lognormal variance with pedigree 0.040549, pedigree (1,1,4,1,1)
  (same comment as for Thallium)
- Benzene, pentachloro- [air, urban air close to ground]: 1.7911e-10 kg; lognormal variance with pedigree 0.101325, pedigree (1,1,4,1,1)
  (same comment as for NMVOC, non-methane volatile organic compounds, unspecified origin)
- Chromium, ion [water, surface water]: 2.9619e-7 kg; lognormal variance with pedigree 0.34044, pedigree (1,1,4,1,1)
  (same comment as for Thallium)
- DOC, Dissolved Organic Carbon [water, surface water]: 0.00013264 kg; lognormal variance with pedigree 0.040549, pedigree (1,1,4,1,1)
  (same comment as for Thallium)
- Benzene, hexachloro- [air, urban air close to ground]: 7.0884e-11 kg; lognormal variance with pedigree 0.101325, pedigree (1,1,4,1,1)
  (same comment as for NMVOC, non-methane volatile organic compounds, unspecified origin)
- COD, Chemical Oxygen Demand [water, ground-, long-term]: 0.0029643 kg; lognormal variance with pedigree 0.035135, pedigree (1,1,4,1,1)
  (same comment as for Sodium, ion)
- Sulfate [water, surface water]: 0.00011801 kg; lognormal variance with pedigree 0.42953, pedigree (1,1,4,1,1)
  (same comment as for Thallium)
- Phenol, pentachloro- [air, urban air close to ground]: 1.4763e-11 kg; lognormal variance with pedigree 0.101325, pedigree (1,1,4,1,1)
  (same comment as for NMVOC, non-methane volatile organic compounds, unspecified origin)
- BOD5, Biological Oxygen Demand [water, ground-, long-term]: 0.00096962 kg; lognormal variance with pedigree 0.035135, pedigree (1,1,4,1,1)
  (same comment as for Sodium, ion)
- Nitrate [water, surface water]: 1.2635e-5 kg; lognormal variance with pedigree 0.45276, pedigree (1,1,4,1,1)
  (same comment as for Thallium)
- Heat, waste [water, surface water]: 2.8823 MJ; lognormal variance with pedigree 0.060449, pedigree (1,1,4,1,1)
  Waste heat generated from heating value of this waste plus any electricity required to process it.
  Uncertainty: uncertainty is calculated from uncertainties in waste composition and uncertainties in energy efficiency and the uncertainty in internal energy demand
- Sulfate [water, ground-, long-term]: 0.00069049 kg; lognormal variance with pedigree 0.61833, pedigree (1,1,4,1,1)
  (same comment as for Sodium, ion)
- Phosphate [water, surface water]: 1.6166e-7 kg; lognormal variance with pedigree 0.47756, pedigree (1,1,4,1,1)
  (same comment as for Thallium)
- Benzo(a)pyrene [air, urban air close to ground]: 7.5439e-13 kg; lognormal variance with pedigree 0.43319, pedigree (1,1,4,1,1)
  (same comment as for NMVOC, non-methane volatile organic compounds, unspecified origin)
- DOC, Dissolved Organic Carbon [water, ground-, long-term]: 0.001173 kg; lognormal variance with pedigree 0.035135, pedigree (1,1,4,1,1)
  (same comment as for Sodium, ion)
- Chloride [water, surface water]: 0.00028009 kg; lognormal variance with pedigree 0.34475, pedigree (1,1,4,1,1)
  (same comment as for Thallium)
- Water [air, urban air close to ground]: 0.000697167 m3; lognormal variance with pedigree 0.60712, pedigree (1,1,4,1,1)
  Water vapour from waste humidity, hydrogen oxidation and part of the process water.
  Uncertainty: Uncertainty calculated from uncertainty in waste composition, process water input and the uncertainty of fraction to air.
- TOC, Total Organic Carbon [water, ground-, long-term]: 0.001173 kg; lognormal variance with pedigree 0.035135, pedigree (1,1,4,1,1)
  (same comment as for Sodium, ion)
- Boron [water, surface water]: 6.1027e-7 kg; lognormal variance with pedigree 1.0525, pedigree (1,1,4,1,1)
  (same comment as for Thallium)
- Heat, waste [air, urban air close to ground]: 11.208 MJ; lognormal variance with pedigree 0.060449, pedigree (1,1,4,1,1)
  (same comment as for Heat, waste)
- Nitrate [water, ground-, long-term]: 3.5272e-5 kg; lognormal variance with pedigree 0.67596, pedigree (1,1,4,1,1)
  (same comment as for Sodium, ion)
- Fluoride [water, surface water]: 6.1208e-6 kg; lognormal variance with pedigree 0.78715, pedigree (1,1,4,1,1)
  (same comment as for Thallium)
- Water [water, surface water]: 6.46203e-5 m3; lognormal variance with pedigree 0.96466, pedigree (1,1,4,1,1)
  Process water released to surface water.
  Uncertainty: uncertainty calculated from uncertainty in process water input and the uncertainty of fraction to surface water.
- Phosphate [water, ground-, long-term]: 9.7646e-6 kg; lognormal variance with pedigree 5.3391, pedigree (1,1,4,1,1)
  (same comment as for Sodium, ion)
- Cadmium, ion [water, surface water]: 3.5513e-11 kg; lognormal variance with pedigree 1.6727, pedigree (1,1,4,1,1)
  (same comment as for Thallium)
- Boron [water, ground-, long-term]: 4.8655e-5 kg; lognormal variance with pedigree 0.96201, pedigree (1,1,4,1,1)
  (same comment as for Sodium, ion)
- Arsenic, ion [water, surface water]: 1.659e-7 kg; lognormal variance with pedigree 1.5654, pedigree (1,1,4,1,1)
  (same comment as for Thallium)
- Carbon monoxide, non-fossil [air, urban air close to ground]: 5.7626e-5 kg; lognormal variance with pedigree 0.83152, pedigree (1,1,4,1,1)
  (same comment as for NMVOC, non-methane volatile organic compounds, unspecified origin)
- Chloride [water, ground-, long-term]: 4.1538e-5 kg; lognormal variance with pedigree 0.79531, pedigree (1,1,4,1,1)
  (same comment as for Sodium, ion)
- Cobalt [water, surface water]: 1.5503e-11 kg; lognormal variance with pedigree 2.3214, pedigree (1,1,4,1,1)
  (same comment as for Thallium)
- Carbon dioxide, non-fossil [air, urban air close to ground]: 1.4578 kg; lognormal variance with pedigree 0.031534, pedigree (1,1,4,1,1)
  (same comment as for Calcium)
- Fluoride [water, ground-, long-term]: 1.4031e-5 kg; lognormal variance with pedigree 0.75042, pedigree (1,1,4,1,1)
  (same comment as for Sodium, ion)
- Copper, ion [water, surface water]: 6.8031e-8 kg; lognormal variance with pedigree 0.90352, pedigree (1,1,4,1,1)
  (same comment as for Thallium)
- Methane, non-fossil [air, urban air close to ground]: 5.085e-7 kg; lognormal variance with pedigree 0.101325, pedigree (1,1,4,1,1)
  (same comment as for NMVOC, non-methane volatile organic compounds, unspecified origin)
- Arsenic, ion [water, ground-, long-term]: 2.5643e-7 kg; lognormal variance with pedigree 1.6898, pedigree (1,1,4,1,1)
  (same comment as for Sodium, ion)
- Chromium VI [water, surface water]: 3.4327e-5 kg; lognormal variance with pedigree 0.66956, pedigree (1,1,4,1,1)
  (same comment as for Thallium)
- Sulfur dioxide [air, urban air close to ground]: 3.0712e-6 kg; lognormal variance with pedigree 0.84098, pedigree (1,1,4,1,1)
  (same comment as for Calcium)
- Cadmium, ion [water, ground-, long-term]: 3.2033e-8 kg; lognormal variance with pedigree 5.7842, pedigree (1,1,4,1,1)
  (same comment as for Sodium, ion)
- Mercury [water, surface water]: 1.6953e-9 kg; lognormal variance with pedigree 1.8914, pedigree (1,1,4,1,1)
  (same comment as for Thallium)
- Nitrogen oxides [air, urban air close to ground]: 0.00017103 kg; lognormal variance with pedigree 0.42852, pedigree (1,1,4,1,1)
  Sum of fuel-Nox and thermal-NOx emitted to air after DeNOx stage.
  Uncertainty: uncertainty calculated from uncertainty in average N-emissions and uncertainty in the share of thermal NOx and the uncertainty in nitrogen content in *this* waste.
- Cobalt [water, ground-, long-term]: 7.639e-8 kg; lognormal variance with pedigree 1.8633, pedigree (1,1,4,1,1)
  (same comment as for Sodium, ion)
- Molybdenum [water, surface water]: 1.3764e-7 kg; lognormal variance with pedigree 1.0474, pedigree (1,1,4,1,1)
  (same comment as for Thallium)
- Ammonia [air, urban air close to ground]: 5.4008e-7 kg; lognormal variance with pedigree 0.42852, pedigree (1,1,4,1,1)
  Nitrogen species emitted to air after DeNOx stage.
  Uncertainty: uncertainty calculated from uncertainty in average N-emissions and uncertainty in the share of thermal NOx and the uncertainty in nitrogen content in *this* waste.
- Chromium VI [water, ground-, long-term]: 0.00011939 kg; lognormal variance with pedigree 1.9831, pedigree (1,1,4,1,1)
  (same comment as for Sodium, ion)
- Manganese [water, surface water]: 6.4664e-9 kg; lognormal variance with pedigree 1.0775, pedigree (1,1,4,1,1)
  (same comment as for Thallium)
- Dinitrogen monoxide [air, urban air close to ground]: 1.4667e-5 kg; lognormal variance with pedigree 1.4418, pedigree (1,1,4,1,1)
  (same comment as for Ammonia)
- Copper, ion [water, ground-, long-term]: 0.00074084 kg; lognormal variance with pedigree 0.68911, pedigree (1,1,4,1,1)
  (same comment as for Sodium, ion)
- Cyanide [air, urban air close to ground]: 3.1512e-6 kg; lognormal variance with pedigree 1.4418, pedigree (1,1,4,1,1)
  (same comment as for Ammonia)
- Mercury [water, ground-, long-term]: 6.6909e-8 kg; lognormal variance with pedigree 1.7392, pedigree (1,1,4,1,1)
  (same comment as for Sodium, ion)
- Phosphorus [air, urban air close to ground]: 1.1034e-7 kg; lognormal variance with pedigree 0.97983, pedigree (1,1,4,1,1)
  (same comment as for Calcium)
- Manganese [water, ground-, long-term]: 4.1962e-5 kg; lognormal variance with pedigree 1.3192, pedigree (1,1,4,1,1)
  (same comment as for Sodium, ion)
- Hydrogen chloride [air, urban air close to ground]: 1.8818e-7 kg; lognormal variance with pedigree 0.83483, pedigree (1,1,4,1,1)
  (same comment as for Calcium)
- Molybdenum [water, ground-, long-term]: 6.3777e-7 kg; lognormal variance with pedigree 1.6011, pedigree (1,1,4,1,1)
  (same comment as for Sodium, ion)
- Hydrogen fluoride [air, urban air close to ground]: 1.4189e-7 kg; lognormal variance with pedigree 1.1885, pedigree (1,1,4,1,1)
  (same comment as for Calcium)
- Nickel, ion [water, ground-, long-term]: 5.4958e-7 kg; lognormal variance with pedigree 1.6134, pedigree (1,1,4,1,1)
  (same comment as for Sodium, ion)
- Arsenic [air, urban air close to ground]: 3.2947e-9 kg; lognormal variance with pedigree 1.6985, pedigree (1,1,4,1,1)
  (same comment as for Calcium)
- Lead [water, ground-, long-term]: 1.9551e-5 kg; lognormal variance with pedigree 2.67, pedigree (1,1,4,1,1)
  (same comment as for Sodium, ion)
- Cadmium [air, urban air close to ground]: 1.0183e-10 kg; lognormal variance with pedigree 1.8113, pedigree (1,1,4,1,1)
  (same comment as for Calcium)
- Antimony [water, ground-, long-term]: 1.4519e-10 kg; lognormal variance with pedigree 0.013413, pedigree (1,1,4,1,1)
  (same comment as for Sodium, ion)
- Cobalt [air, urban air close to ground]: 1.5724e-10 kg; lognormal variance with pedigree 1.9437, pedigree (1,1,4,1,1)
  (same comment as for Calcium)
- Tin, ion [water, ground-, long-term]: 6.4125e-11 kg; lognormal variance with pedigree 3.9403, pedigree (1,1,4,1,1)
  (same comment as for Sodium, ion)
- Chromium [air, urban air close to ground]: 1.9922e-6 kg; lognormal variance with pedigree 0.57972, pedigree (1,1,4,1,1)
  (same comment as for Calcium)
- Vanadium, ion [water, ground-, long-term]: 4.5263e-8 kg; lognormal variance with pedigree 0.02524, pedigree (1,1,4,1,1)
  (same comment as for Sodium, ion)
- Copper [air, urban air close to ground]: 7.2024e-8 kg; lognormal variance with pedigree 0.73076, pedigree (1,1,4,1,1)
  (same comment as for Calcium)
- Zinc, ion [water, ground-, long-term]: 7.9674e-6 kg; lognormal variance with pedigree 2.0086, pedigree (1,1,4,1,1)
  (same comment as for Sodium, ion)
- Mercury [air, urban air close to ground]: 9.0338e-9 kg; lognormal variance with pedigree 1.7339, pedigree (1,1,4,1,1)
  (same comment as for Calcium)
- Silicon [water, ground-, long-term]: 9.7606e-5 kg; lognormal variance with pedigree 0.00800076, pedigree (1,1,4,1,1)
  (same comment as for Sodium, ion)
- Nickel, ion [water, surface water]: 3.8014e-10 kg; lognormal variance with pedigree 2.2111, pedigree (1,1,4,1,1)
  (same comment as for Thallium)
- Manganese [air, urban air close to ground]: 1.0108e-8 kg; lognormal variance with pedigree 1.0828, pedigree (1,1,4,1,1)
  (same comment as for Calcium)
- Thallium [water, ground-, long-term]: 1.7748e-10 kg; lognormal variance with pedigree 0.26601, pedigree (1,1,4,1,1)
  (same comment as for Sodium, ion)
- Lead [water, surface water]: 1.8909e-9 kg; lognormal variance with pedigree 0.93651, pedigree (1,1,4,1,1)
  (same comment as for Thallium)
- Molybdenum [air, urban air close to ground]: 1.0884e-9 kg; lognormal variance with pedigree 1.6203, pedigree (1,1,4,1,1)
  (same comment as for Calcium)
- Iron, ion [water, ground-, long-term]: 8.0012e-6 kg; lognormal variance with pedigree 5.7478, pedigree (1,1,4,1,1)
  (same comment as for Sodium, ion)
- Antimony [water, surface water]: 7.9096e-11 kg; lognormal variance with pedigree 0.037563, pedigree (1,1,4,1,1)
  (same comment as for Thallium)
- Nickel [air, urban air close to ground]: 6.957e-10 kg; lognormal variance with pedigree 1.6701, pedigree (1,1,4,1,1)
  (same comment as for Calcium)
- Calcium, ion [water, ground-, long-term]: 0.00014967 kg; lognormal variance with pedigree 1.00144, pedigree (1,1,4,1,1)
  (same comment as for Sodium, ion)
- Tin, ion [water, surface water]: 1.0705e-13 kg; lognormal variance with pedigree 1.1159, pedigree (1,1,4,1,1)
  (same comment as for Thallium)
- Lead [air, urban air close to ground]: 2.2876e-9 kg; lognormal variance with pedigree 1.1783, pedigree (1,1,4,1,1)
  (same comment as for Calcium)
- Aluminium [water, ground-, long-term]: 1.3576e-5 kg; lognormal variance with pedigree 0.96809, pedigree (1,1,4,1,1)
  (same comment as for Sodium, ion)
- Vanadium, ion [water, surface water]: 1.4453e-10 kg; lognormal variance with pedigree 0.54562, pedigree (1,1,4,1,1)
  (same comment as for Thallium)
- Zinc [air, urban air close to ground]: 1.1892e-8 kg; lognormal variance with pedigree 1.2223, pedigree (1,1,4,1,1)
  (same comment as for Calcium)
- Potassium, ion [water, ground-, long-term]: 4.6766e-5 kg; lognormal variance with pedigree 0.70184, pedigree (1,1,4,1,1)
  (same comment as for Sodium, ion)
- Zinc, ion [water, surface water]: 1.0847e-9 kg; lognormal variance with pedigree 0.99715, pedigree (1,1,4,1,1)
  (same comment as for Thallium)
- Iron [air, urban air close to ground]: 2.764e-11 kg; lognormal variance with pedigree 1.2808, pedigree (1,1,4,1,1)
  (same comment as for Calcium)
- Magnesium [water, ground-, long-term]: 0.00018333 kg; lognormal variance with pedigree 0.86545, pedigree (1,1,4,1,1)
  (same comment as for Sodium, ion)

## Extrapolations
This dataset has been extrapolated from year 2012 to the year of the calculation (2021). The uncertainty has been adjusted accordingly.
