# treatment of waste wire plastic, municipal incineration with fly ash extraction

Dataset: EcoSpold 2, unit process
Geography: CH
Time period: 2006-01-01 to 2021-12-31
Technology level: current
Classification: ISIC rev.4 ecoinvent: 3821:Treatment and disposal of non-hazardous waste
Synonyms: municipal waste incineration; Siedlungsabfallverbrennung; Kehrichtverbrennung
Scenario: Business-as-Usual
System model: Allocation, cut-off by classification
Share of production covered: 100 %
Generated by: Gabor Doka
Published in: Doka G. 2015
Database: ecoinvent
isCopyrightProtected: true
accessRestrictedTo: 1

## General comment
This dataset represents the activity of waste disposal of waste wire plastic in a municipal solid waste incinerator (MSWI) // Recommended use of this dataset: For disposal of small amounts of wiring isolation, which goes to incineration as wire in a part of a larger item or in small amounts only. Large amounts of separated wire will not be disposed in incinerators, but rather go to recycling. // // Waste composition (wet, in ppm): upper heating value 26.81 MJ/kg; lower heating value 25.95 MJ/kg; H2O 35500; O 22438; H 72167; C 530500; S 806.42; N 1069; P n.a.; B n.a.; Cl 305150; Br 50.232; F 14.281; I n.a.; Ag n.a.; As 1.8346; Ba 198.45; Cd 12.007; Co 21.87; Cr 31.397; Cu 24205; Hg 0.58871; Mn 63.112; Mo n.a.; Ni 14.22; Pb 17.077; Sb 32.095; Se 2.0277; Sn 252.09; V 860.3; Zn 141.51; Be 0.4828; Sc n.a.; Sr 85.455; Ti 965.59; Tl 0.38624; W n.a.; Si n.a.; Fe 2982.5; Ca 781.16; Al 193.12; K n.a.; Mg 28.932; Na 1415.1; // Share of carbon in waste that is biogenic 0%. // Share of metals in waste not oxidised and bulk-recyclable (exclude very small or thin parts) Iron: 0%; Alu: 0%; Copper: 0%. // Recovery of metal scrap from bottom ash to recycling: 0g iron scrap, 0g aluminium scrap, 0g copper scrap. From this waste, the FLUWA process in the technology mix recovers 0.011kg (DM) of a hydroxide sludge to be recycled in zinc furnaces. // Ultimately one kg of this waste produces 0.06661 kg of bottom ash (can include some washed ash) and 0.08211 kg of residues, which are landfilled (technology mix). Additional solidification of residues with 0.03284 kg of cement.Net energy production: 3.13MJ/kg electric energy and 6.49MJ/kg thermal energy. //

## Included activities start
waste incineration from waste reception gate and delivery into waste bunker at incinerator plant site (without transports to the incinerator)

## Included activities end
Waste-specific short-term emissions to water from leachate. Long-term emissions from landfill to ground water.

## Geography
Specific to the technology mix encountered in Switzerland in 2012.

## Technology
average Swiss MSWI plants in 2010 (grate incinerators) with electrostatic precipitator for fly ash (ESP), wet flue gas scrubber and 25% SNCR , 42.77% SCR-high dust , 32.68% SCR-low dust -DeNOx facilities and 0% without Denox (weighted according to mass of burnt waste, representing Swiss average). Efficiency of iron scrap separation from slag : 58%. Efficiency of non-ferrous scrap separation from slag : 31%. The technology mix for this dataset includes a filter ash treatment (FLUWA) of a share of 46.22%. Gross electric efficiency technology mix 15.84% and Gross thermal efficiency technology mix 28.51%

## Time period
Waste composition as given in literature reference, theoretical data or other source. Transfer coefficients for modern MSWI.

## Reference product
- waste wire plastic: -1 kg; name RP_amount_1; By-product classification Waste; CPC 39270: Waste, parings and scrap of plastics
  Main reference product of this activity (supply of disposal service).
  production volume 655610 kg; name RP_PV_1
    based on corresponding global production volume of MSW fraction in conventional MSWI (wo fly ash extraction) and scaled down to annual Swiss incinerated MSW mass of 3.02 mio. tonnes.
  property price 0 EUR2005; name RP_amount_1_price_EUR2005
    Waste products are assigned a price of zero as they are assumed to require further treatment.
  property heating value, net 25.95 MJ
    Value taken from the general comment of the treatment dataset.
  property carbon content 0.55002
    carbon content on a dry matter basis (reserved; not for manual entry)
  properties: thallium content 4.0045e-7, aluminium content 0.00020023, water in wet mass 0.0355 kg, titanium content 0.0010011, sodium content 0.0014672, magnesium content 2.9997e-5, strontium content 8.86e-5, water content 0.036807, carbon content, fossil 0.55002, dry mass 0.9645 kg, cobalt content 2.2675e-5, calcium content 0.00080991, hydrogen content 0.074823, nitrogen content 0.0011083, oxygen content 0.023264, sulfur content 0.0008361, wet mass 1 kg, fluorine content 1.4807e-5, barium content 0.00020576, chlorine content 0.31638, selenium content 2.1024e-6, cadmium content 1.2449e-5, bromine content 5.2081e-5, copper content 0.025096, arsenic content 1.9021e-6, lead content 1.7705e-5, nickel content 1.4743e-5, chromium content 3.2553e-5, mercury content 6.1037e-7, beryllium content 5.0057e-7, tin content 0.00026137, manganese content 6.5435e-5, antimony content 3.3276e-5, iron content 0.0030923, vanadium content 0.00089197, zinc content 0.00014671, carbon allocation 0.530494 kg

## By-products
- heat, for reuse in municipal waste incineration only: 0 MJ; name E_th_prod_MSWI; By-product classification allocatable product; CPC 17300: Steam and hot water; pedigree (1,1,1,1,1)
  Net useful heat generated from this waste and used in internal MSWI plant energy redistribution.
  Uncertainty: uncertainty is calculated from uncertainties in waste composition and uncertainties in energy efficiency and the uncertainty in internal energy demand
  production volume 4.2519e6 MJ
    calculated in proportion to reference product waste input to incinerator
  property exergy 0.1842 MJ; name E_th_prod_MSWI_exergy
    This exergy property is based on the exergy content of the product.
  property price 0.0106 EUR2005; name E_th_prod_MSWI_price_EUR2005
    Average European district heat price from Ecoheatcool and Euroheat 2005-2006, Ecoheat Work package 1: The European heat market. Final report. 10.6 EUR/GJ i s the price of district heat. http://www.solarthermalworld.org/files/Ecoheatcool%20WP1%20Web.pdf?download
  property true value relation 0.1842; name E_th_prod_MSWI_true_value_relation
    property to calculate "true value" from
- metalliferous hydroxide sludge: 0 kg; By-product classification Recyclable; CPC 1429: Other non-ferrous metal ores and concentrates (other than uranium or thorium ores and concentrates); pedigree (1,1,1,1,1)
  Metalliferous hydroxide sludge from filter ash leaching (FLUWA).
  Uncertainty: uncertainty is calculated from uncertainties in waste composition and transfer coefficients to filter ash in incinerator and the uncertainty of the transfer coefficients of the FLUWA process.
  production volume 0 kg
    calculated in proportion to reference product waste input to incinerator
  property heating value, net 0 MJ
    Non combustible products are assumed to have an LHV equal to zero (0).
  property price 0.0042 EUR2005
    World market value of manure, deflated with barley world market price and consumer price index, based on [http://www.gov.pe.ca/photos/original/af_NM_manconv.pdf].
  property carbon content 0.0025147
    carbon content on a dry matter basis (reserved; not for manual entry)
  properties: chlorine content 0.67051, cobalt content 4.917e-5, sulfur content 0.0045198, arsenic content 1.5491e-6, oxygen content 0.31635, barium content 5.0904e-6, fluorine content 1.8987e-5, lead content 2.8097e-5, copper content 0.00091656, bromine content 9.0414e-5, cadmium content 0.00037286, mercury content 9.7764e-8, manganese content 5.8783e-6, chromium content 1.3715e-5, selenium content 1.9627e-6, antimony content 3.1741e-5, strontium content 8.8823e-8, nickel content 1.2063e-6, zinc content 0.0022746, tin content 2.0273e-5, beryllium content 6.5753e-7, vanadium content 0.0004466, dry mass 0.25 kg, magnesium content 4.1422e-6, titanium content 7.2169e-6, aluminium content 1.2145e-6, sodium content 0.0010593, water in wet mass 0.75 kg, calcium content 0.00071815, iron content 2.9992e-5, thallium content 3.5573e-7, water content 3, carbon content, fossil 0.0025147, wet mass 1 kg, carbon allocation 0.000628675 kg
- electricity, for reuse in municipal waste incineration only: 0 kWh; name E_el_prod_MSWI; CPC 17100: Electrical energy; By-product classification allocatable product; pedigree (1,1,1,1,1)
  Net electricity generated from this waste and used in internal MSWI plant energy redistribution.
  Uncertainty: uncertainty is calculated from uncertainties in waste composition and uncertainties in energy efficiency and the uncertainty in internal energy demand
  production volume 569750 kWh
    calculated in proportion to reference product waste input to incinerator
  property exergy 3.6 MJ; name E_el_prod_MSWI_exergy
    This exergy property is based on the exergy content of the product.
  property true value relation 3.6; name E_el_prod_MSWI_true_value_relation
    property to calculate "true value" from
  property price 0.1 EUR2005; name E_el_prod_MSWI_price_EUR2005
    Estimated to be the same price as in case of electricity, medium voltage.

## Inputs from technosphere
- transport, freight, lorry, unspecified: 0.0078159 metric ton*km; lognormal variance with pedigree 0.024143, pedigree (1,1,4,1,1)
  Transport services to transport incineration residues to landfills and filter ash to external treatments (FLUWA).
  Uncertainty: uncertainty calculated from uncertainty of the waste composition of this waste, uncertainty of transfer coefficients and the uncertainty in generic transportation distances
- municipal waste incineration facility: 2.5e-10 unit
  Demands per kilogram waste.
- chemical, inorganic: 0.0048656 kg; lognormal variance with pedigree 0.046683, pedigree (1,1,4,1,1)
  Auxilliary inputs for the wastewater treatment stage of the incinerator plant. Proxy for Polyelectrolyte.
  Uncertainty: uncertainty calculated from uncertainty in average Polyelectrolyte input, of transfer coefficients in the incinerator, and the uncertainty of the waste composition of this waste
  properties: wet mass 1 kg, carbon content, fossil 0.003, dry mass 1 kg
- quicklime, milled, packed: 0.15906 kg; lognormal variance with pedigree 0.048623, pedigree (1,1,4,1,1)
  Auxilliary inputs for the flue gas treatment stage of the incinerator plant.
  Uncertainty: uncertainty calculated from uncertainty in average CaO input, of transfer coefficients in the incinerator, and the uncertainty of the waste composition of this waste
  properties: water content 0.010101, wet mass 1 kg, dry mass 0.99 kg
- chromium oxide, flakes: 9.905e-7 kg; lognormal variance with pedigree 0.56401, pedigree (1,1,4,1,1)
  Input to DeNOx stage. Active component in SCR catalyst (vanadium pentoxide, V2O5), here approximated with the available chromium trioxide.
  Uncertainty: uncertainty calculated from uncertainty in average DeNOx input, uncertainty in the share of thermal NOx, uncertainty of nitrogen content in average municipal waste and the uncertainty in nitrogen content in *this* waste.
  properties: wet mass 1 kg, dry mass 1 kg
- process-specific burdens, slag landfill: 0.066607 kg; lognormal variance with pedigree 0.071329, pedigree (1,1,4,1,1)
  Mass-specific expenditures required for landfilling of bottom ash.;activityLink introduced to establish a direct link to the corresponding regional supply of this product
  Uncertainty: uncertainty is calculated from uncertainties in waste composition and transfer coefficients in incinerator
- chemical, organic: 6.9411e-6 kg; lognormal variance with pedigree 1.3145, pedigree (1,1,4,1,1)
  Auxilliary inputs for the wastewater treatment stage of the incinerator plant. Proxy for (pure) Trisodium-trimercapto-s-triazine (CAS 17766-26-6), used as 15% diluted solution, aka TMT15.
  Uncertainty: uncertainty calculated from uncertainty in average TMT15 input, of transfer coefficients in the incinerator, and the uncertainty of the waste composition of this waste
  properties: wet mass 1 kg, carbon content, fossil 0.628, dry mass 1 kg, heating value, net 19.03 MJ
- hydrochloric acid, without water, in 30% solution state: 0.0036007 kg; lognormal variance with pedigree 0.027056, pedigree (1,1,4,1,1)
  Auxilliary inputs for the wastewater treatment stage of the incinerator plant.
  Uncertainty: uncertainty calculated from uncertainty in average HCl input, of transfer coefficients in the incinerator, and the uncertainty of the waste composition of this waste
  properties: heating value, net 3.32 MJ, dry mass 1 kg, wet mass 1 kg
- sodium hydroxide, without water, in 50% solution state: 0.032998 kg; lognormal variance with pedigree 0.04261, pedigree (1,1,4,1,1)
  Auxilliary inputs for the flue gas treatment stage of the incinerator plant, and partially in the filter ash treatment (FLUWA).
  Uncertainty: uncertainty calculated from uncertainty in average NaOH input, of transfer coefficients in the incinerator, and the uncertainty of the waste composition of this waste
  properties: dry mass 1 kg, wet mass 1 kg, heating value, net 3.03 MJ
- water, decarbonised: 57.681 kg; lognormal variance with pedigree 0.28452, pedigree (1,1,4,1,1)
  Incinerator process water used in flue gas scrubber stage.
  Uncertainty: uncertainty calculated from uncertainty in average water input, and the uncertainty of the waste composition of this waste
  properties: wet mass 1 kg
- waste cement, hydrated: -0.082109 kg; lognormal variance with pedigree 0.054085, pedigree (1,1,4,1,1)
  Hydrated cement output for solidification of landfilled residual material.
  Uncertainty: Uncertainty calculated from uncertainty of the waste composition of this waste and transfer coefficients in the incinerator and of the solidification recipe.
  production volume 53832 kg
    calculated in proportion to reference product waste input to incinerator
  properties: wet mass 1 kg, dry mass 1 kg
- iron (III) chloride, without water, in 40% solution state: 0.00010985 kg; lognormal variance with pedigree 0.28452, pedigree (1,1,4,1,1)
  Auxilliary inputs for the wastewater treatment stage of the incinerator plant.
  Uncertainty: uncertainty calculated from uncertainty in average FeCl3 input, of transfer coefficients in the incinerator, and the uncertainty of the waste composition of this waste
  properties: wet mass 1 kg, dry mass 1 kg
- cement, unspecified: 0.032844 kg; lognormal variance with pedigree 0.054085, pedigree (1,1,4,1,1)
  Cement required for solidification of landfilled residual material.
  Uncertainty: Uncertainty calculated from uncertainty of the waste composition of this waste, of transfer coefficients in the incinerator and of the solidification recipe.
  properties: dry mass 1 kg, wet mass 1 kg
- process-specific burdens, residual material landfill: 0.16371 kg; lognormal variance with pedigree 0.045001, pedigree (1,1,4,1,1)
  Mass-specific expenditures required for landfilling of incineration residues.;activityLink introduced to establish a direct link to the corresponding regional supply of this product
  Uncertainty: uncertainty is calculated from uncertainties in waste composition and transfer coefficients in incinerator
- hydrogen peroxide, without water, in 50% solution state: 0.0059095 kg; lognormal variance with pedigree 0.04175, pedigree (1,1,4,1,1)
  Auxilliary oxidising agent for filter ash treatment (FLUWA).
  Uncertainty: uncertainty calculated from uncertainty in of transfer coefficients in the incinerator, and the uncertainty of the waste composition of this waste
  properties: wet mass 1 kg, dry mass 1 kg, heating value, net 7.13 MJ
- heat, district or industrial, natural gas: 0.14486 MJ; lognormal variance with pedigree 0.26289, pedigree (1,1,4,1,1)
  Input to DeNOx stage, to heat up flue gas in low-dust SCR.
  Uncertainty: uncertainty calculated from uncertainty in average DeNOx input, uncertainty in the share of thermal NOx, uncertainty of nitrogen content in average municipal waste and the uncertainty in nitrogen content in *this* waste.
  properties: heating value, net 1 MJ
- residual material landfill: 3.4105e-10 unit; lognormal variance with pedigree 0.045001, pedigree (1,1,4,1,1)
  Landfill infrastructure required for landfilling of incineration residues.
  Uncertainty: uncertainty is calculated from uncertainties in waste composition and transfer coefficients in incinerator
- slag landfill: 1.1841e-10 unit; lognormal variance with pedigree 0.071329, pedigree (1,1,4,1,1)
  Landfill infrastructure required for landfilling of bottom ash.
  Uncertainty: uncertainty is calculated from uncertainties in waste composition and transfer coefficients in incinerator
- ammonia, anhydrous, liquid: 0.00077466 kg; lognormal variance with pedigree 0.26289, pedigree (1,1,4,1,1)
  Input to DeNOx stage (100% NH3).
  Uncertainty: uncertainty calculated from uncertainty in average DeNOx input, uncertainty in the share of thermal NOx, uncertainty of nitrogen content in average municipal waste and the uncertainty in nitrogen content in *this* waste.
  properties: wet mass 1 kg, dry mass 1 kg
- spent activated carbon with mercury: -3.1407e-6 kg; name BP_amount_1; lognormal variance with pedigree 1.6446, pedigree (1,1,4,1,1)
  Spent ion exchanger charged with mercury, from FLUWA filter ash treatment, approximated here with Spent activated carbon with mercury, deposited undergound in a polyethylene Big Bag.
  Uncertainty: uncertainty calculated from uncertainty in of transfer coefficients in the incinerator, and the uncertainty of the waste composition of this waste.
  production volume 2.05907 kg; = ABS(RP_PV_1 * (BP_amount_1 / RP_amount_1))
    Calculated from production volume of reference product using the relative outputs.
  property price 0 EUR2005; name BP_amount_1_price_EUR2005
  properties: dry mass 1 kg, carbon content, fossil 0.6, wet mass 1 kg, heating value, net 18.18 MJ
- titanium dioxide: 4.8535e-5 kg; lognormal variance with pedigree 0.56401, pedigree (1,1,4,1,1)
  Input to DeNOx stage (TiO2 catalyst carrier)
  Uncertainty: uncertainty calculated from uncertainty in average DeNOx input, uncertainty in the share of thermal NOx, uncertainty of nitrogen content in average municipal waste and the uncertainty in nitrogen content in *this* waste.
  properties: dry mass 1 kg, wet mass 1 kg
- cationic resin: 2.9837e-6 kg; lognormal variance with pedigree 1.6446, pedigree (1,1,4,1,1)
  Auxilliary input for mercury removal in filter ash treatment (FLUWA).
  Uncertainty: uncertainty calculated from uncertainty in of transfer coefficients in the incinerator, and the uncertainty of the waste composition of this waste
  properties: dry mass 0.5 kg, wet mass 1 kg, heating value, net 6.68 MJ, water content 1, carbon content, fossil 0.521606
- metalliferous hydroxide sludge: -0.043888 kg; lognormal variance with pedigree 0.041429, pedigree (1,1,4,1,1)
  (same comment as for metalliferous hydroxide sludge)
  production volume 28773 kg
  properties: chlorine content 0.67051, sulfur content 0.0045198, oxygen content 0.31635, copper content 0.00091656, zinc content 0.0022746, dry mass 0.25 kg, sodium content 0.0010593, calcium content 0.00071815, water content 3, price 0.0042 EUR2005, carbon content, fossil 0.0025147, wet mass 1 kg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

## Inputs from nature
- Oxygen [natural resource, in air]: 2.0254 kg; lognormal variance with pedigree 0.027842, pedigree (1,1,4,1,1)
  Oxygen from ambient air needed to combust and oxidise this waste. Net demand, i.e. without O2 leaving the plant in flue gas uncombusted.
  Uncertainty: uncertainty is calculated from uncertainties in waste composition and transfer coefficients to flue gas and soild residues in incinerator

## Emissions to nature
- Cadmium [air, urban air close to ground]: 6.1203e-9 kg; lognormal variance with pedigree 1.2735, pedigree (1,1,4,1,1)
  Emission to air from waste composition and transfer coefficients.
  Uncertainty: uncertainty is calculated from uncertainties in waste composition and transfer coefficients in incinerator
- Zinc, ion [water, ground-, long-term]: 6.3558e-5 kg; lognormal variance with pedigree 1.765, pedigree (1,1,4,1,1)
  Long-term emissions from landfilling of incineration residues.
  Uncertainty: uncertainty is calculated from uncertainties in waste composition and transfer coefficients in incinerator and landfills.
- Antimony [water, surface water]: 6.3102e-6 kg; lognormal variance with pedigree 1.0469, pedigree (1,1,4,1,1)
  Emissions to water from waste composition and transfer coefficients in incinerator and landfills.
  Uncertainty: uncertainty is calculated from uncertainties in waste composition and transfer coefficients in incinerator and landfills
- Cobalt [air, urban air close to ground]: 3.9774e-8 kg; lognormal variance with pedigree 1.1856, pedigree (1,1,4,1,1)
  (same comment as for Cadmium)
- Beryllium [water, ground-, long-term]: 4.5309e-7 kg; lognormal variance with pedigree 1.6292, pedigree (1,1,4,1,1)
  (same comment as for Zinc, ion)
- Selenium [water, surface water]: 4.0401e-7 kg; lognormal variance with pedigree 1.0495, pedigree (1,1,4,1,1)
  (same comment as for Antimony)
- Chromium [air, urban air close to ground]: 2.7416e-8 kg; lognormal variance with pedigree 1.1416, pedigree (1,1,4,1,1)
  (same comment as for Cadmium)
- Strontium [water, ground-, long-term]: 8.5363e-5 kg; lognormal variance with pedigree 0.9907, pedigree (1,1,4,1,1)
  (same comment as for Zinc, ion)
- Tin, ion [water, surface water]: 2.2788e-7 kg; lognormal variance with pedigree 0.77066, pedigree (1,1,4,1,1)
  (same comment as for Antimony)
- Copper [air, urban air close to ground]: 2.217e-6 kg; lognormal variance with pedigree 0.30844, pedigree (1,1,4,1,1)
  (same comment as for Cadmium)
- Titanium, ion [water, ground-, long-term]: 0.00028897 kg; lognormal variance with pedigree 0.90385, pedigree (1,1,4,1,1)
  (same comment as for Zinc, ion)
- Vanadium, ion [water, surface water]: 1.0042e-6 kg; lognormal variance with pedigree 0.6973, pedigree (1,1,4,1,1)
  (same comment as for Antimony)
- Mercury [air, urban air close to ground]: 1.6692e-8 kg; lognormal variance with pedigree 1.6488, pedigree (1,1,4,1,1)
  (same comment as for Cadmium)
- Thallium [water, ground-, long-term]: 3.0163e-7 kg; lognormal variance with pedigree 1.4107, pedigree (1,1,4,1,1)
  (same comment as for Zinc, ion)
- Zinc, ion [water, surface water]: 8.6745e-9 kg; lognormal variance with pedigree 0.79437, pedigree (1,1,4,1,1)
  (same comment as for Antimony)
- Manganese [air, urban air close to ground]: 1.2053e-8 kg; lognormal variance with pedigree 1.0608, pedigree (1,1,4,1,1)
  (same comment as for Cadmium)
- Silicon [water, ground-, long-term]: 0.0033753 kg; lognormal variance with pedigree 0.00800076, pedigree (1,1,4,1,1)
  (same comment as for Zinc, ion)
- Beryllium [water, surface water]: 3.0046e-10 kg; lognormal variance with pedigree 2.2704, pedigree (1,1,4,1,1)
  (same comment as for Antimony)
- Nickel [air, urban air close to ground]: 1.7863e-8 kg; lognormal variance with pedigree 1.2515, pedigree (1,1,4,1,1)
  (same comment as for Cadmium)
- Iron, ion [water, ground-, long-term]: 0.0015299 kg; lognormal variance with pedigree 2.4875, pedigree (1,1,4,1,1)
  (same comment as for Zinc, ion)
- Strontium [water, surface water]: 5.5868e-8 kg; lognormal variance with pedigree 1.6599, pedigree (1,1,4,1,1)
  (same comment as for Antimony)
- Lead [air, urban air close to ground]: 1.4069e-9 kg; lognormal variance with pedigree 1.2369, pedigree (1,1,4,1,1)
  (same comment as for Cadmium)
- Calcium, ion [water, ground-, long-term]: 0.0020546 kg; lognormal variance with pedigree 1.5473, pedigree (1,1,4,1,1)
  (same comment as for Zinc, ion)
- Titanium, ion [water, surface water]: 1.9658e-7 kg; lognormal variance with pedigree 0.50667, pedigree (1,1,4,1,1)
  (same comment as for Antimony)
- Antimony [air, urban air close to ground]: 2.571e-11 kg; lognormal variance with pedigree 1.193, pedigree (1,1,4,1,1)
  (same comment as for Cadmium)
- Aluminium [water, ground-, long-term]: 0.00045025 kg; lognormal variance with pedigree 0.67969, pedigree (1,1,4,1,1)
  (same comment as for Zinc, ion)
- Thallium [water, surface water]: 2.836e-10 kg; lognormal variance with pedigree 1.704, pedigree (1,1,4,1,1)
  (same comment as for Antimony)
- Selenium [air, urban air close to ground]: 2.4191e-8 kg; lognormal variance with pedigree 1.4912, pedigree (1,1,4,1,1)
  (same comment as for Cadmium)
- Magnesium [water, ground-, long-term]: 2.6946e-5 kg; lognormal variance with pedigree 1.1185, pedigree (1,1,4,1,1)
  (same comment as for Zinc, ion)
- Silicon [water, surface water]: 7.608e-6 kg; lognormal variance with pedigree 0.55671, pedigree (1,1,4,1,1)
  (same comment as for Antimony)
- Tin [air, urban air close to ground]: 1.6467e-10 kg; lognormal variance with pedigree 0.921, pedigree (1,1,4,1,1)
  (same comment as for Cadmium)
- Sodium, ion [water, ground-, long-term]: 0.00092614 kg; lognormal variance with pedigree 0.40578, pedigree (1,1,4,1,1)
  (same comment as for Zinc, ion)
- Iron, ion [water, surface water]: 6.3312e-8 kg; lognormal variance with pedigree 0.92554, pedigree (1,1,4,1,1)
  (same comment as for Antimony)
- Vanadium [air, urban air close to ground]: 1.8246e-5 kg; lognormal variance with pedigree 0.6945, pedigree (1,1,4,1,1)
  (same comment as for Cadmium)
- NMVOC, non-methane volatile organic compounds, unspecified origin [air, urban air close to ground]: 9.8681e-7 kg; lognormal variance with pedigree 0.09468, pedigree (1,1,4,1,1)
  Incomplete combustion product emitted to air.
  Uncertainty: uncertainty calculated from uncertainty in average operation emissions, and the uncertainty of the flue gas volume from this waste.
- Calcium, ion [water, surface water]: 1.6363e-5 kg; lognormal variance with pedigree 0.30378, pedigree (1,1,4,1,1)
  (same comment as for Antimony)
- Zinc [air, urban air close to ground]: 9.4846e-8 kg; lognormal variance with pedigree 0.94306, pedigree (1,1,4,1,1)
  (same comment as for Cadmium)
- Particulates, < 2.5 um [air, urban air close to ground]: 2.5888e-6 kg; lognormal variance with pedigree 0.41887, pedigree (1,1,4,1,1)
  (same comment as for NMVOC, non-methane volatile organic compounds, unspecified origin)
- Aluminium [water, surface water]: 5.1712e-7 kg; lognormal variance with pedigree 1.3679, pedigree (1,1,4,1,1)
  (same comment as for Antimony)
- Strontium [air, urban air close to ground]: 8.5455e-9 kg; lognormal variance with pedigree 1.024, pedigree (1,1,4,1,1)
  (same comment as for Cadmium)
- Particulates, > 2.5 um, and < 10um [air, urban air close to ground]: 1.3009e-8 kg; lognormal variance with pedigree 0.20007, pedigree (1,1,4,1,1)
  (same comment as for NMVOC, non-methane volatile organic compounds, unspecified origin)
- Magnesium [water, surface water]: 2.1905e-7 kg; lognormal variance with pedigree 0.93317, pedigree (1,1,4,1,1)
  (same comment as for Antimony)
- Titanium [air, urban air close to ground]: 8.011e-7 kg; lognormal variance with pedigree 0.6945, pedigree (1,1,4,1,1)
  (same comment as for Cadmium)
- Dioxins, measured as 2,3,7,8-tetrachlorodibenzo-p-dioxin [air, urban air close to ground]: 4.3364e-14 kg; lognormal variance with pedigree 0.41887, pedigree (1,1,4,1,1)
  (same comment as for NMVOC, non-methane volatile organic compounds, unspecified origin)
- Sodium, ion [water, surface water]: 0.00046569 kg; lognormal variance with pedigree 0.19526, pedigree (1,1,4,1,1)
  (same comment as for Antimony)
- Thallium [air, urban air close to ground]: 3.8624e-10 kg; lognormal variance with pedigree 1.7197, pedigree (1,1,4,1,1)
  (same comment as for Cadmium)
- Benzene [air, urban air close to ground]: 2.1683e-8 kg; lognormal variance with pedigree 0.09468, pedigree (1,1,4,1,1)
  (same comment as for NMVOC, non-methane volatile organic compounds, unspecified origin)
- Chromium, ion [water, surface water]: 4.0761e-9 kg; lognormal variance with pedigree 0.73551, pedigree (1,1,4,1,1)
  (same comment as for Antimony)
- Iron [air, urban air close to ground]: 5.3451e-9 kg; lognormal variance with pedigree 0.58683, pedigree (1,1,4,1,1)
  (same comment as for Cadmium)
- Toluene [air, urban air close to ground]: 4.3367e-8 kg; lognormal variance with pedigree 0.09468, pedigree (1,1,4,1,1)
  (same comment as for NMVOC, non-methane volatile organic compounds, unspecified origin)
- TOC, Total Organic Carbon [water, ground-, long-term]: 0.0015556 kg; lognormal variance with pedigree 0.026968, pedigree (1,1,4,1,1)
  (same comment as for Zinc, ion)
- Calcium [air, urban air close to ground]: 6.1476e-6 kg; lognormal variance with pedigree 0.70898, pedigree (1,1,4,1,1)
  (same comment as for Cadmium)
- Benzene, pentachloro- [air, urban air close to ground]: 1.1456e-10 kg; lognormal variance with pedigree 0.09468, pedigree (1,1,4,1,1)
  (same comment as for NMVOC, non-methane volatile organic compounds, unspecified origin)
- BOD5, Biological Oxygen Demand [water, ground-, long-term]: 0.0012859 kg; lognormal variance with pedigree 0.026968, pedigree (1,1,4,1,1)
  (same comment as for Zinc, ion)
- Aluminium [air, urban air close to ground]: 1.5745e-10 kg; lognormal variance with pedigree 0.95777, pedigree (1,1,4,1,1)
  (same comment as for Cadmium)
- Benzene, hexachloro- [air, urban air close to ground]: 4.5339e-11 kg; lognormal variance with pedigree 0.09468, pedigree (1,1,4,1,1)
  (same comment as for NMVOC, non-methane volatile organic compounds, unspecified origin)
- COD, Chemical Oxygen Demand [water, ground-, long-term]: 0.0039312 kg; lognormal variance with pedigree 0.026968, pedigree (1,1,4,1,1)
  (same comment as for Zinc, ion)
- Magnesium [air, urban air close to ground]: 3.0517e-8 kg; lognormal variance with pedigree 1.1563, pedigree (1,1,4,1,1)
  (same comment as for Cadmium)
- Phenol, pentachloro- [air, urban air close to ground]: 9.4429e-12 kg; lognormal variance with pedigree 0.09468, pedigree (1,1,4,1,1)
  (same comment as for NMVOC, non-methane volatile organic compounds, unspecified origin)
- DOC, Dissolved Organic Carbon [water, ground-, long-term]: 0.0015556 kg; lognormal variance with pedigree 0.026968, pedigree (1,1,4,1,1)
  (same comment as for Zinc, ion)
- Sodium [air, urban air close to ground]: 1.1618e-5 kg; lognormal variance with pedigree 0.62967, pedigree (1,1,4,1,1)
  (same comment as for Cadmium)
- Benzo(a)pyrene [air, urban air close to ground]: 4.8253e-13 kg; lognormal variance with pedigree 0.41887, pedigree (1,1,4,1,1)
  (same comment as for NMVOC, non-methane volatile organic compounds, unspecified origin)
- Sulfate [water, ground-, long-term]: 0.0019281 kg; lognormal variance with pedigree 0.50815, pedigree (1,1,4,1,1)
  (same comment as for Zinc, ion)
- TOC, Total Organic Carbon [water, surface water]: 0.0001759 kg; lognormal variance with pedigree 0.032607, pedigree (1,1,4,1,1)
  (same comment as for Antimony)
- Heat, waste [air, urban air close to ground]: 19.983 MJ; lognormal variance with pedigree 0.036667, pedigree (1,1,4,1,1)
  Waste heat generated from heating value of this waste plus any electricity required to process it.
  Uncertainty: uncertainty is calculated from uncertainties in waste composition and uncertainties in energy efficiency and the uncertainty in internal energy demand
- Nitrate [water, ground-, long-term]: 3.8341e-5 kg; lognormal variance with pedigree 0.66512, pedigree (1,1,4,1,1)
  (same comment as for Zinc, ion)
- COD, Chemical Oxygen Demand [water, surface water]: 0.00040329 kg; lognormal variance with pedigree 0.032582, pedigree (1,1,4,1,1)
  (same comment as for Antimony)
- Water [air, urban air close to ground]: 0.0385129 m3; lognormal variance with pedigree 0.808, pedigree (1,1,4,1,1)
  Water vapour from waste humidity, hydrogen oxidation and part of the process water.
  Uncertainty: Uncertainty calculated from uncertainty in waste composition, process water input and the uncertainty of fraction to air.
- Chloride [water, ground-, long-term]: 0.038438 kg; lognormal variance with pedigree 0.048883, pedigree (1,1,4,1,1)
  (same comment as for Zinc, ion)
- BOD5, Biological Oxygen Demand [water, surface water]: 0.00039466 kg; lognormal variance with pedigree 0.03312, pedigree (1,1,4,1,1)
  (same comment as for Antimony)
- Bromine [water, ground-, long-term]: 2.604e-6 kg; lognormal variance with pedigree 1.0635, pedigree (1,1,4,1,1)
  (same comment as for Zinc, ion)
- DOC, Dissolved Organic Carbon [water, surface water]: 0.0001759 kg; lognormal variance with pedigree 0.032607, pedigree (1,1,4,1,1)
  (same comment as for Antimony)
- Water [water, surface water]: 0.0197739 m3; lognormal variance with pedigree 1.2115, pedigree (1,1,4,1,1)
  Process water released to surface water.
  Uncertainty: uncertainty calculated from uncertainty in process water input and the uncertainty of fraction to surface water.
- Fluoride [water, ground-, long-term]: 9.5278e-6 kg; lognormal variance with pedigree 0.78989, pedigree (1,1,4,1,1)
  (same comment as for Zinc, ion)
- Sulfate [water, surface water]: 0.00032954 kg; lognormal variance with pedigree 0.35268, pedigree (1,1,4,1,1)
  (same comment as for Antimony)
- Heat, waste [water, surface water]: 4.6856 MJ; lognormal variance with pedigree 0.036667, pedigree (1,1,4,1,1)
  (same comment as for Heat, waste)
- Arsenic, ion [water, ground-, long-term]: 1.1185e-6 kg; lognormal variance with pedigree 1.4992, pedigree (1,1,4,1,1)
  (same comment as for Zinc, ion)
- Nitrate [water, surface water]: 1.3734e-5 kg; lognormal variance with pedigree 0.44494, pedigree (1,1,4,1,1)
  (same comment as for Antimony)
- Carbon monoxide, fossil [air, urban air close to ground]: 3.6859e-5 kg; lognormal variance with pedigree 0.81153, pedigree (1,1,4,1,1)
  (same comment as for NMVOC, non-methane volatile organic compounds, unspecified origin)
- Barium [water, ground-, long-term]: 0.00014499 kg; lognormal variance with pedigree 1.2362, pedigree (1,1,4,1,1)
  (same comment as for Zinc, ion)
- Chloride [water, surface water]: 0.25919 kg; lognormal variance with pedigree 0.02059, pedigree (1,1,4,1,1)
  (same comment as for Antimony)
- Carbon dioxide, fossil [air, urban air close to ground]: 1.9334 kg; lognormal variance with pedigree 0.019794, pedigree (1,1,4,1,1)
  (same comment as for Cadmium)
- Cadmium, ion [water, ground-, long-term]: 1.9252e-6 kg; lognormal variance with pedigree 5.2537, pedigree (1,1,4,1,1)
  (same comment as for Zinc, ion)
- Bromine [water, surface water]: 4.6611e-5 kg; lognormal variance with pedigree 0.33902, pedigree (1,1,4,1,1)
  (same comment as for Antimony)
- Methane, fossil [air, urban air close to ground]: 3.2525e-7 kg; lognormal variance with pedigree 0.09468, pedigree (1,1,4,1,1)
  (same comment as for NMVOC, non-methane volatile organic compounds, unspecified origin)
- Cobalt [water, ground-, long-term]: 1.9156e-5 kg; lognormal variance with pedigree 1.1307, pedigree (1,1,4,1,1)
  (same comment as for Zinc, ion)
- Fluoride [water, surface water]: 4.1564e-6 kg; lognormal variance with pedigree 0.8281, pedigree (1,1,4,1,1)
  (same comment as for Antimony)
- Sulfur dioxide [air, urban air close to ground]: 8.5759e-6 kg; lognormal variance with pedigree 0.70562, pedigree (1,1,4,1,1)
  (same comment as for Cadmium)
- Chromium VI [water, ground-, long-term]: 1.8454e-6 kg; lognormal variance with pedigree 2.3996, pedigree (1,1,4,1,1)
  (same comment as for Zinc, ion)
- Arsenic, ion [water, surface water]: 9.9281e-7 kg; lognormal variance with pedigree 1.3826, pedigree (1,1,4,1,1)
  (same comment as for Antimony)
- Nitrogen oxides [air, urban air close to ground]: 0.00028842 kg; lognormal variance with pedigree 0.30467, pedigree (1,1,4,1,1)
  Sum of fuel-Nox and thermal-NOx emitted to air after DeNOx stage.
  Uncertainty: uncertainty calculated from uncertainty in average N-emissions and uncertainty in the share of thermal NOx and the uncertainty in nitrogen content in *this* waste.
- Copper, ion [water, ground-, long-term]: 0.022804 kg; lognormal variance with pedigree 0.26995, pedigree (1,1,4,1,1)
  (same comment as for Zinc, ion)
- Barium [water, surface water]: 8.4204e-8 kg; lognormal variance with pedigree 0.70674, pedigree (1,1,4,1,1)
  (same comment as for Antimony)
- Ammonia [air, urban air close to ground]: 9.1081e-7 kg; lognormal variance with pedigree 0.30467, pedigree (1,1,4,1,1)
  Nitrogen species emitted to air after DeNOx stage.
  Uncertainty: uncertainty calculated from uncertainty in average N-emissions and uncertainty in the share of thermal NOx and the uncertainty in nitrogen content in *this* waste.
- Mercury [water, ground-, long-term]: 1.2367e-7 kg; lognormal variance with pedigree 1.6727, pedigree (1,1,4,1,1)
  (same comment as for Zinc, ion)
- Cadmium, ion [water, surface water]: 2.1343e-9 kg; lognormal variance with pedigree 1.2004, pedigree (1,1,4,1,1)
  (same comment as for Antimony)
- Dinitrogen monoxide [air, urban air close to ground]: 1.5944e-5 kg; lognormal variance with pedigree 1.4309, pedigree (1,1,4,1,1)
  (same comment as for Ammonia)
- Manganese [water, ground-, long-term]: 5.008e-5 kg; lognormal variance with pedigree 1.4976, pedigree (1,1,4,1,1)
  (same comment as for Zinc, ion)
- Cobalt [water, surface water]: 3.6429e-9 kg; lognormal variance with pedigree 1.6773, pedigree (1,1,4,1,1)
  (same comment as for Antimony)
- Cyanide [air, urban air close to ground]: 3.4253e-6 kg; lognormal variance with pedigree 1.4309, pedigree (1,1,4,1,1)
  (same comment as for Ammonia)
- Nickel, ion [water, ground-, long-term]: 1.4189e-5 kg; lognormal variance with pedigree 1.186, pedigree (1,1,4,1,1)
  (same comment as for Zinc, ion)
- Chromium VI [water, surface water]: 5.3647e-7 kg; lognormal variance with pedigree 1.2002, pedigree (1,1,4,1,1)
  (same comment as for Antimony)
- Hydrogen chloride [air, urban air close to ground]: 0.00017414 kg; lognormal variance with pedigree 0.06916, pedigree (1,1,4,1,1)
  (same comment as for Cadmium)
- Lead [water, ground-, long-term]: 1.2026e-5 kg; lognormal variance with pedigree 2.8752, pedigree (1,1,4,1,1)
  (same comment as for Zinc, ion)
- Copper, ion [water, surface water]: 2.0941e-6 kg; lognormal variance with pedigree 0.59146, pedigree (1,1,4,1,1)
  (same comment as for Antimony)
- Bromine [air, urban air close to ground]: 2.5091e-8 kg; lognormal variance with pedigree 1.0828, pedigree (1,1,4,1,1)
  (same comment as for Cadmium)
- Antimony [water, ground-, long-term]: 1.3028e-5 kg; lognormal variance with pedigree 0.9365, pedigree (1,1,4,1,1)
  (same comment as for Zinc, ion)
- Mercury [water, surface water]: 3.1326e-9 kg; lognormal variance with pedigree 1.8137, pedigree (1,1,4,1,1)
  (same comment as for Antimony)
- Hydrogen fluoride [air, urban air close to ground]: 9.6349e-8 kg; lognormal variance with pedigree 1.2399, pedigree (1,1,4,1,1)
  (same comment as for Cadmium)
- Selenium [water, ground-, long-term]: 1.5561e-6 kg; lognormal variance with pedigree 0.95881, pedigree (1,1,4,1,1)
  (same comment as for Zinc, ion)
- Manganese [water, surface water]: 7.7819e-9 kg; lognormal variance with pedigree 1.0439, pedigree (1,1,4,1,1)
  (same comment as for Antimony)
- Arsenic [air, urban air close to ground]: 1.4371e-8 kg; lognormal variance with pedigree 1.5056, pedigree (1,1,4,1,1)
  (same comment as for Cadmium)
- Tin, ion [water, ground-, long-term]: 0.00016731 kg; lognormal variance with pedigree 0.96544, pedigree (1,1,4,1,1)
  (same comment as for Zinc, ion)
- Nickel, ion [water, surface water]: 9.8904e-9 kg; lognormal variance with pedigree 1.7739, pedigree (1,1,4,1,1)
  (same comment as for Antimony)
- Barium [air, urban air close to ground]: 7.7895e-7 kg; lognormal variance with pedigree 0.89161, pedigree (1,1,4,1,1)
  (same comment as for Cadmium)
- Vanadium, ion [water, ground-, long-term]: 0.00025481 kg; lognormal variance with pedigree 0.80229, pedigree (1,1,4,1,1)
  (same comment as for Zinc, ion)
- Lead [water, surface water]: 1.167e-9 kg; lognormal variance with pedigree 0.98237, pedigree (1,1,4,1,1)
  (same comment as for Antimony)

## Extrapolations
This dataset has been extrapolated from year 2012 to the year of the calculation (2021). The uncertainty has been adjusted accordingly.
