# treatment of zinc in car shredder residue, municipal incineration

Dataset: EcoSpold 2, unit process
Geography: RoW
Time period: 2006-01-01 to 2021-12-31
Technology level: current
Classification: ISIC rev.4 ecoinvent: 3821:Treatment and disposal of non-hazardous waste
Synonyms: Siedlungsabfallverbrennung; municipal waste incineration; Kehrichtverbrennung
Scenario: Business-as-Usual
System model: Allocation, cut-off by classification
Share of production covered: 1.8 %
Generated by: Gabor Doka
Published in: Doka G. 2013
Database: ecoinvent
isCopyrightProtected: true
accessRestrictedTo: 1

## General comment
This dataset represents the activity of waste disposal of zinc in car shredder residue in a municipal solid waste incinerator (MSWI) // Recommended use of this dataset: For disposal of rather fine or dusty zinc, which goes to incineration as part of Automotive Shredder Residue (ASR). Due to fine grain size of the particles, 50% burnability is assumed, therefore not suited for less fine zinc parts in waste. Pure, isolated zinc fractions will not be disposed in incinerators, but rather go to recycling. // Inventoried waste contains 50% Zn in ASR burnable; 50% Zn in ASR inert; . // Waste composition (wet, in ppm): H2O n.a.; O n.a.; H n.a.; C n.a.; S n.a.; N n.a.; P n.a.; B n.a.; Cl n.a.; Br n.a.; F n.a.; I n.a.; Ag n.a.; As n.a.; Ba n.a.; Cd n.a.; Co n.a.; Cr n.a.; Cu n.a.; Hg n.a.; Mn n.a.; Mo n.a.; Ni n.a.; Pb n.a.; Sb n.a.; Se n.a.; Sn n.a.; V n.a.; Zn 1000000; Be n.a.; Sc n.a.; Sr n.a.; Ti n.a.; Tl n.a.; W n.a.; Si n.a.; Fe n.a.; Ca n.a.; Al n.a.; K n.a.; Mg n.a.; Na n.a.; // Share of carbon in waste that is biogenic 60.4%. // Share of metals in waste not oxidised and bulk-recyclable (exclude very small or thin parts) Iron: 0%; Alu: 0%; Copper: 0%. // One kg of this waste produces 0.9696 kg of slag and 0.438 kg of residues, which are landfilled. Additional solidification with 0.1752 kg of cement. // Net energy production: 0MJ/kg electric energy and 0MJ/kg thermal energy. // Recovery of metal scrap to recycling: 0g iron scrap, 0g aluminium scrap, 0g copper scrap.

## Included activities start
waste incineration from waste reception gate and delivery into waste bunker at incinerator plant site (without transports to the incinerator)

## Included activities end
Waste-specific short-term emissions to water from leachate. Long-term emissions from landfill to ground water.

## Geography
Specific to the technology mix encountered in Switzerland in 2010. Well applicable to modern incineration practices in Europe, North America or Japan.

## Technology
average Swiss MSWI plants in 2010 (grate incinerators) with electrostatic precipitator for fly ash (ESP), wet flue gas scrubber and 25% SNCR , 42.77% SCR-high dust , 32.68% SCR-low dust -DeNOx facilities and 0% without Denox (weighted according to mass of burnt waste, representing Swiss average). Efficiency of iron scrap separation from slag : 58%. Efficiency of non-ferrous scrap separation from slag : 31%. Gross electric efficiency technology mix 15.84% and Gross thermal efficiency technology mix 28.51%

## Time period
Waste composition as given in literature reference, theoretical data or other source. Transfer coefficients for modern MSWI.

## Reference product
- zinc in car shredder residue: -1 kg; CPC 39365: Waste and scrap of zinc; By-product classification Waste; CAS 7440-66-6
  Main reference product of this activity (supply of disposal service).
  production volume 7.1025e7 kg
    based on estimate on MSW in WTE globally and share of zinc metal from shredder residue composition in Swiss MSW
  property price 0 EUR2005
    Waste products are assigned a price of zero as they are assumed to require further treatment.
  property carbon content 0
    carbon content on a dry matter basis (reserved; not for manual entry)
  properties: wet mass 1 kg, carbon content, non-fossil 0, water content 0, carbon content, fossil 0, dry mass 1 kg, water in wet mass 0 kg, carbon allocation 0 kg

## Inputs from technosphere
- heat, for reuse in municipal waste incineration only: 0 MJ; name E_th_prod_MSWI; pedigree (1,1,1,1,1)
  Net heat required to incinerate this waste (subsidiesed from high-calorific waste fractions).
  Uncertainty: uncertainty is calculated from uncertainties in waste composition and uncertainties in energy efficiency and the uncertainty in internal energy demand
- residual material landfill: 9.1254e-10 unit; lognormal variance with pedigree 0.00833357, pedigree (1,1,4,1,1)
  Landfill infrastructure required for landfilling of incineration residues.
  Uncertainty: uncertainty is calculated from uncertainties in waste composition and transfer coefficients in incinerator
- iron (III) chloride, without water, in 40% solution state: 0.0074717 kg; lognormal variance with pedigree 0.022821, pedigree (1,1,4,1,1)
  Auxilliary inputs for the wastewater treatment stage of the incinerator plant.
  Uncertainty: uncertainty calculated from uncertainty in average FeCl3 input, of transfer coefficients in the incinerator, and the uncertainty of the waste composition of this waste
  properties: dry mass 1 kg, wet mass 1 kg
- slag landfill: 1.7237e-9 unit; lognormal variance with pedigree 0.0117645, pedigree (1,1,4,1,1)
  Landfill infrastructure required for landfilling of bottom ash.
  Uncertainty: uncertainty is calculated from uncertainties in waste composition and transfer coefficients in incinerator
- titanium dioxide: 4.9828e-6 kg; lognormal variance with pedigree 0.48632, pedigree (1,1,4,1,1)
  Input to DeNOx stage (TiO2 catalyst carrier)
  Uncertainty: uncertainty calculated from uncertainty in average DeNOx input, uncertainty in the share of thermal NOx, uncertainty of nitrogen content in average municipal waste and the uncertainty in nitrogen content in *this* waste.
  properties: wet mass 1 kg, dry mass 1 kg
- heat, district or industrial, natural gas: 0 MJ; pedigree (1,1,1,1,1)
  Input to DeNOx stage, to heat up flue gas in low-dust SCR.
  Uncertainty: uncertainty calculated from uncertainty in average DeNOx input, uncertainty in the share of thermal NOx, uncertainty of nitrogen content in average municipal waste and the uncertainty in nitrogen content in *this* waste.
  properties: heating value, net 1 MJ
- chromium oxide, flakes: 1.0169e-7 kg; lognormal variance with pedigree 0.48632, pedigree (1,1,4,1,1)
  Input to DeNOx stage.
  Uncertainty: uncertainty calculated from uncertainty in average DeNOx input, uncertainty in the share of thermal NOx, uncertainty of nitrogen content in average municipal waste and the uncertainty in nitrogen content in *this* waste.
  properties: dry mass 1 kg, wet mass 1 kg
- ammonia, anhydrous, liquid: 0 kg; pedigree (1,1,1,1,1)
  Input to DeNOx stage (100% NH3).
  Uncertainty: uncertainty calculated from uncertainty in average DeNOx input, uncertainty in the share of thermal NOx, uncertainty of nitrogen content in average municipal waste and the uncertainty in nitrogen content in *this* waste.
  properties: wet mass 1 kg, dry mass 1 kg
- process-specific burdens, residual material landfill: 0 kg; pedigree (1,1,1,1,1)
  Mass-specific expenditures required for landfilling of incineration residues.
  Uncertainty: uncertainty is calculated from uncertainties in waste composition and transfer coefficients in incinerator
- electricity, for reuse in municipal waste incineration only: 0 kWh; name E_el_prod_MSWI; pedigree (1,1,1,1,1)
  Net electricity required to incinerate this waste (subsidiesed from high-calorific waste fractions).
  Uncertainty: uncertainty is calculated from uncertainties in waste composition and uncertainties in energy efficiency and the uncertainty in internal energy demand
- waste cement, hydrated: 0 kg; pedigree (1,1,1,1,1)
  Hydrated cement output for solidification of landfilled residual material.
  Uncertainty: Uncertainty calculated from uncertainty of the waste composition of this waste and transfer coefficients in the incinerator and of the solidification recipe.
  production volume 0 kg
    calculated in proportion to reference product waste input to incinerator
  properties: dry mass 1 kg, wet mass 1 kg
- water, decarbonised: 0 kg; pedigree (1,1,1,1,1)
  Incinerator process water used in flue gas scrubber stage.
  Uncertainty: uncertainty calculated from uncertainty in average water input, and the uncertainty of the waste composition of this waste
  properties: wet mass 1 kg
- process-specific burdens, slag landfill: 0 kg; pedigree (1,1,1,1,1)
  Mass-specific expenditures required for landfilling of bottom ash.
  Uncertainty: uncertainty is calculated from uncertainties in waste composition and transfer coefficients in incinerator
- municipal waste incineration facility: 2.5e-10 unit
  Demands per kilogram waste.
- chemical, inorganic: 0.00014995 kg; lognormal variance with pedigree 0.022821, pedigree (1,1,4,1,1)
  Auxilliary inputs for the wastewater treatment stage of the incinerator plant. Proxy for Polyelectrolyte.
  Uncertainty: uncertainty calculated from uncertainty in average Polyelectrolyte input, of transfer coefficients in the incinerator, and the uncertainty of the waste composition of this waste
  properties: carbon content, fossil 0.003, dry mass 1 kg, wet mass 1 kg
- hydrochloric acid, without water, in 30% solution state: 3.9415e-5 kg; lognormal variance with pedigree 0.022821, pedigree (1,1,4,1,1)
  Auxilliary inputs for the wastewater treatment stage of the incinerator plant.
  Uncertainty: uncertainty calculated from uncertainty in average HCl input, of transfer coefficients in the incinerator, and the uncertainty of the waste composition of this waste
  properties: heating value, net 3.32 MJ, dry mass 1 kg, wet mass 1 kg
- cement, unspecified: 0 kg; pedigree (1,1,1,1,1)
  Cement required for solidification of landfilled residual material.
  Uncertainty: Uncertainty calculated from uncertainty of the waste composition of this waste, of transfer coefficients in the incinerator and of the solidification recipe.
  properties: wet mass 1 kg, dry mass 1 kg
- transport, freight, lorry, unspecified: 0 metric ton*km; pedigree (1,1,1,1,1)
  Transport services to transport incineration residues to landfills.
  Uncertainty: uncertainty calculated from uncertainty of the waste composition of this waste, uncertainty of transfer coefficients and the uncertainty in generic transportation distances
- heat, for reuse in municipal waste incineration only: 0.000225255, 0.00044568, 0.0101844, 6.55412e-6, 0.00292003, 0.000606773, 0.000500528, 0.000153159, 0.0011656, 0.000912402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 MJ (25 entries); lognormal variance with pedigree 0.00859512, pedigree (1,1,4,1,1)
  (same comment as for heat, for reuse in municipal waste incineration only)
- heat, district or industrial, natural gas: 0.00022573, 0.0146463 MJ (2 entries); lognormal variance with pedigree 0.14559, pedigree (1,1,4,1,1)
  (same comment as for heat, district or industrial, natural gas)
- ammonia, anhydrous, liquid: 1.66707e-5, 1.43305e-6, 2.22946e-6, 4.41734e-6, 4.32783e-6, 4.53603e-7, 2.02777e-6, 4.79712e-5 kg (8 entries); lognormal variance with pedigree 0.14559, pedigree (1,1,4,1,1)
  (same comment as for ammonia, anhydrous, liquid)
- process-specific burdens, residual material landfill: 0.123905, 0.314115 kg (2 entries); lognormal variance with pedigree 0.00833357, pedigree (1,1,4,1,1)
  (same comment as for process-specific burdens, residual material landfill)
- electricity, for reuse in municipal waste incineration only: 0.000110225, 0.000218086, 2.36316e-6, 3.20715e-6, 0.00142887, 0.000296915, 0.000244925, 7.4946e-5, 0.000570366, 0.000446469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 kWh (25 entries); lognormal variance with pedigree 0.00859512, pedigree (1,1,4,1,1)
  (same comment as for electricity, for reuse in municipal waste incineration only)
- waste cement, hydrated: -0.123905, -0.314115 kg (2 entries); lognormal variance with pedigree 0.0174176, pedigree (1,1,4,1,1)
  (same comment as for waste cement, hydrated)
  production volume 3.111e7 kg
- water, decarbonised: 0.0160296, 0.041709, 0.168222, 0.0410789, 0.00828131, 0.0272305, 0.00150329, 0.0214215, 0.0498996, 0.313006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 kg (12 entries); lognormal variance with pedigree 0.022821, pedigree (1,1,4,1,1)
  (same comment as for water, decarbonised)
- process-specific burdens, slag landfill: 0.274272, 0.695318 kg (2 entries); lognormal variance with pedigree 0.0117645, pedigree (1,1,4,1,1)
  (same comment as for process-specific burdens, slag landfill)
- cement, unspecified: 0.0252996, 0.00526409, 0.000385558, 0.00109897, 0.0248535, 0.000731512, 0.00803416, 0.000972044, 0.108571 kg (9 entries); lognormal variance with pedigree 0.0174176, pedigree (1,1,4,1,1)
  (same comment as for cement, unspecified)
- transport, freight, lorry, unspecified: 0.00644348, 0.00100881, 0.0488517 metric ton*km (3 entries); lognormal variance with pedigree 0.009822, pedigree (1,1,4,1,1)
  (same comment as for transport, freight, lorry, unspecified)

## Inputs from nature
- Oxygen [natural resource, in air]: 0.24475 kg; lognormal variance with pedigree 0.008, pedigree (1,1,4,1,1)
  Oxygen from ambient air needed to combust and oxidise this waste. Net demand, i.e. without O2 leaving the plant in flue gas uncombusted.
  Uncertainty: uncertainty is calculated from uncertainties in waste composition and transfer coefficients to flue gas and soild residues in incinerator

## Emissions to nature
- Carbon monoxide, non-fossil [air, urban air close to ground]: 4.8306e-5 kg; lognormal variance with pedigree 0.84001, pedigree (1,1,4,1,1)
  Incomplete combustion product emitted to air.
  Uncertainty: uncertainty calculated from uncertainty in average operation emissions, and the uncertainty of the flue gas volume from this waste.
- Zinc, ion [water, ground-, long-term]: 0.65204 kg; lognormal variance with pedigree 0.48675, pedigree (1,1,4,1,1)
  Long-term emissions from landfilling of incineration residues.
  Uncertainty: uncertainty is calculated from uncertainties in waste composition and transfer coefficients in incinerator and landfills.
- Particulates, < 2.5 um [air, urban air close to ground]: 5.6163e-6 kg; lognormal variance with pedigree 0.4393, pedigree (1,1,4,1,1)
  (same comment as for Carbon monoxide, non-fossil)
- Toluene [air, urban air close to ground]: 9.4081e-8 kg; lognormal variance with pedigree 0.104199, pedigree (1,1,4,1,1)
  (same comment as for Carbon monoxide, non-fossil)
- Phenol, pentachloro- [air, urban air close to ground]: 2.0486e-11 kg; lognormal variance with pedigree 0.104199, pedigree (1,1,4,1,1)
  (same comment as for Carbon monoxide, non-fossil)
- Zinc, ion [water, surface water]: 5.9995e-5 kg; lognormal variance with pedigree 0.35917, pedigree (1,1,4,1,1)
  Emissions to water from waste composition and transfer coefficients in incinerator and landfills.
  Uncertainty: uncertainty is calculated from uncertainties in waste composition and transfer coefficients in incinerator and landfills
- Ammonia [air, urban air close to ground]: 9.3509e-8 kg; lognormal variance with pedigree 0.19048, pedigree (1,1,4,1,1)
  Nitrogen species emitted to air after DeNOx stage.
  Uncertainty: uncertainty calculated from uncertainty in average N-emissions and uncertainty in the share of thermal NOx and the uncertainty in nitrogen content in *this* waste.
- Particulates, > 2.5 um, and < 10um [air, urban air close to ground]: 2.8222e-8 kg; lognormal variance with pedigree 0.21412, pedigree (1,1,4,1,1)
  (same comment as for Carbon monoxide, non-fossil)
- NMVOC, non-methane volatile organic compounds, unspecified origin [air, urban air close to ground]: 2.1408e-6 kg; lognormal variance with pedigree 0.104199, pedigree (1,1,4,1,1)
  (same comment as for Carbon monoxide, non-fossil)
- Water [air, urban air close to ground]: 0.00080611 m3; lognormal variance with pedigree 0.17584, pedigree (1,1,4,1,1)
  Water vapour from waste humidity, hydrogen oxidation and part of the process water.
  Uncertainty: Uncertainty calculated from uncertainty in waste composition, process water input and the uncertainty of fraction to air.
- Water [water, surface water]: 0.00042058 m3; lognormal variance with pedigree 0.16468, pedigree (1,1,4,1,1)
  Process water released to surface water.
  Uncertainty: uncertainty calculated from uncertainty in process water input and the uncertainty of fraction to surface water.
- Benzene, pentachloro- [air, urban air close to ground]: 2.4853e-10 kg; lognormal variance with pedigree 0.104199, pedigree (1,1,4,1,1)
  (same comment as for Carbon monoxide, non-fossil)
- Benzo(a)pyrene [air, urban air close to ground]: 1.0468e-12 kg; lognormal variance with pedigree 0.4393, pedigree (1,1,4,1,1)
  (same comment as for Carbon monoxide, non-fossil)
- Nitrogen oxides [air, urban air close to ground]: 2.9611e-5 kg; lognormal variance with pedigree 0.19048, pedigree (1,1,4,1,1)
  Sum of fuel-Nox and thermal-NOx emitted to air after DeNOx stage.
  Uncertainty: uncertainty calculated from uncertainty in average N-emissions and uncertainty in the share of thermal NOx and the uncertainty in nitrogen content in *this* waste.
- Dioxins, measured as 2,3,7,8-tetrachlorodibenzo-p-dioxin [air, urban air close to ground]: 9.4075e-14 kg; lognormal variance with pedigree 0.4393, pedigree (1,1,4,1,1)
  (same comment as for Carbon monoxide, non-fossil)
- Methane, fossil [air, urban air close to ground]: 2.7935e-7 kg; lognormal variance with pedigree 0.104199, pedigree (1,1,4,1,1)
  (same comment as for Carbon monoxide, non-fossil)
- Heat, waste [air, urban air close to ground]: 0.11508 MJ; lognormal variance with pedigree 0.00898726, pedigree (1,1,4,1,1)
  Waste heat generated from heating value of this waste plus any electricity required to process it.
  Uncertainty: uncertainty is calculated from uncertainties in waste composition and uncertainties in energy efficiency and the uncertainty in internal energy demand
- Carbon monoxide, fossil [air, urban air close to ground]: 3.1658e-5 kg; lognormal variance with pedigree 0.84001, pedigree (1,1,4,1,1)
  (same comment as for Carbon monoxide, non-fossil)
- Heat, waste [water, surface water]: 0.026312 MJ; lognormal variance with pedigree 0.00898726, pedigree (1,1,4,1,1)
  (same comment as for Heat, waste)
- Zinc [air, urban air close to ground]: 0.00033513 kg; lognormal variance with pedigree 0.035395, pedigree (1,1,4,1,1)
  Emission to air from waste composition and transfer coefficients.
  Uncertainty: uncertainty is calculated from uncertainties in waste composition and transfer coefficients in incinerator
- Methane, non-fossil [air, urban air close to ground]: 4.2626e-7 kg; lognormal variance with pedigree 0.104199, pedigree (1,1,4,1,1)
  (same comment as for Carbon monoxide, non-fossil)
- Benzene [air, urban air close to ground]: 4.7041e-8 kg; lognormal variance with pedigree 0.104199, pedigree (1,1,4,1,1)
  (same comment as for Carbon monoxide, non-fossil)
- Benzene, hexachloro- [air, urban air close to ground]: 9.836e-11 kg; lognormal variance with pedigree 0.104199, pedigree (1,1,4,1,1)
  (same comment as for Carbon monoxide, non-fossil)
