# wood chipping, terrain chipper, diesel

Dataset: EcoSpold 2, unit process
Geography: RoW
Time period: 2012-01-01 to 2021-12-31
Technology level: current
Classification: ISIC rev.4 ecoinvent: 0220:Logging
Classification: EcoSpold01Categories: construction processes/machinery
Scenario: Business-as-Usual
System model: Allocation, cut-off by classification
Generated by: [System]
Database: ecoinvent
isCopyrightProtected: false
accessRestrictedTo: 1

## General comment
The inventory refers to 1 productive machine hour (PMS) - referring to the operational time of the machine including breaks up to 15 minutes - of a terrain chipper mounted on a forwarder with a total weight of 19,610 kg (including the harvester).
A terrain chipper is a chipping unit for the chipping of energy wood in the stand. The chipping unit can be built on a specifically developed vehicle or combined with a forwarder. The dataset is representing the chipping with the chipping unit mounted on a medium-sized forwarder.
Assumed fuel consumption: 29.5 l/PMH; total service life: 17,600 PMH, average daily transport distance of machinery: 25 km.
Productivity depends on the specific circumstances of the harvesting operation and is specified in the respective datasets.
The following sources have been consulted for the elaboration and plausibilisation of the dataset:
Anonymous (2004): DIRECTIVE 2004/26/EC OF THE EUROPEAN PARLIAMENT AND OF THE COUNCIL of 21 April 2004 amending Directive 97/68/EC on the approximation of the laws of the Member States relating to measures against the emission of gaseous and particulate pollutants from internal combustion engines to be installed in non-road mobile machinery. Official Journal of the European Union: 30.4.2004
Athanassiadis, D., G. Lidestav and I. Wästerlund (1999): Fuel, hydraulic oil and lubricant consumption in Swedish mechanized harvesting operations, 1996. Journal of Forest Engineering, 10(1): 59-66.
Cremer, T. and B. Velazques-Marti (2007): Evaluation of two harvesting systems for the supply of wood-chips in Norway spurce forest affected by bark beetle. Croation Journal of Forest Engineering, 28(2): 145-155.
Fobrig, A. (2004): Holzernteverfahren; Vergleichende Erhebung und Beurteilung der Holzernteverfahren in der Bundesrepublik Deutschland; im Anhalt an KWF-Bericht Nr. 25 (Holzernteverfahren) und diverse Tagungsführer der KWF-Tagungen. Kuratorium für Waldarbeit und Forsttechnik e.V. (KWF), Gross-Umstadt.
Klvac, R. and A. Skoupy (2009): Characteristic fuel consumption and exhaust emissions in fully mechanized logging operations. Journal of Forest Research, 14(6): 328-334: referring to Freitas 2004.
Spielmann, M., L. Barreto, V. Erni, F. Frutig and O. Thees (2007): Life cycle assessment of energy wood chip supply chains; a case study of near future supply of forest wood chips in Switzerland (unpublished). Paul Scherrer Institute (PSI), Swiss Federal Institute for Forest, Snow and Landscape Research (WSL), Villigen, Birmensdorf.
Talbot, B. and K. Suadicani (2007): Analysis of Two Simulated In-field Chipping and Extraction Systems in Spruce Thinnings. Biosystems Engineering, 91(3): 283-292.

Wittkopf, S., U. Hömer and S. Feller (2003): Bereitstellungsverfahren für Waldhackschnitzel - Leistungen, Kosten, Rahmenbedingungen. Bayer. Landesanstalt für Wald und Forstwirtschaft, Freising.

## Included activities start
Service beginning with the transport of the machinery to the logging site.

## Included activities end
Includes the input of machinery infrastructure, the input of diesel fuel, lubricants/greases as well as their disposal, and the emissions into air from diesel consumption. Wood is not included in the dataset.

## Geography
Emission profile according to European legislation

## Technology
Average european technology

## Parameters
- diesel consumption: 29.5 l/hour; name diesel_consumption; lognormal variance with pedigree 0.592, pedigree (5,4,1,1,1)
  according to Jirousek et al. 2007 (see general comments field for total of evaulated literature)
- load factor: 0.5 dimensionless; name LF; lognormal variance with pedigree 0.5526, pedigree (3,3,1,1,1)
  according to Lambrecht et al. 2004
- lifetime of machine, productive machine hours: 17600 hour; name total_PMH; lognormal variance with pedigree 0.5526, pedigree (3,3,1,1,1)
  according to Spielmann et al. 2007
- share of EURO IIIb: 0.490338 dimensionless; name EURO_IIIb; lognormal variance with pedigree 0.719098, pedigree (1,1,1,1,1)
  assuming that the relevant share of forest machinery belongs to vehicle types tier EURO IIIa and EURO IIIb as define in the Guideline 97/68/EG by the European Commission.
- engine power: 95 kW; name EP; lognormal variance with pedigree 0.5526, pedigree (3,3,1,1,1)
  according to Jirousek et al. 2007
- share of EURO IIIa: 0.5 dimensionless; name EURO_IIIa; lognormal variance with pedigree 0.592, pedigree (5,4,1,1,1)
  assuming that the relevant share of foresassuming that the relevant share of forest machinery belongs to vehicle types tier EURO IIIa and EURO IIIb as define in the Guideline 97/68/EG by the European Commission.

## Reference product
- wood chipping, forwarder with terrain chipper, in forest: 1 hour; CPC 8614: Support and operation services to forestry and logging; By-product classification allocatable product
  production volume 2.70311e6 hour; name p_harvesting; = 2000*total_PMH/10
    annual production of machinery: 2000 times total productive machine hours
  property price 15.0987 EUR2005
    Calculated based on inputs: The price of the product has been calculated as a sum of the values of the material and energy inputs for this product. This value is therefore a rough estimation. It may underestimate the real price since there are additional expenses when producing any product. These expences can include for example labour costs, treatment of waste materials and profit for the producer. Please consider carefully whether this level of data quality is acceptable for your application.

## Inputs from technosphere
- waste mineral oil: -0.353556 kg; name w_mineral_oil; source Klvac R. 2003; lognormal variance with pedigree 1.88726, pedigree (1,1,4,5,1)
  hydraulic oil and engine oil/grease; adjusted for water content of waste oil
  production volume 955701 kg; = w_mineral_oil*p_harvesting
    calculated
  property price 0 EUR2005; name w_mineral_oil_price_EUR2005
  property water content 0.111111; name WC_oil
  property dry mass 0.9 kg; name DM_oil
  properties: carbon content, fossil 0.864444, heating value, net 34.7 MJ
  note on heating value, net: Value taken from the general comment of the treatment dataset.
- lubricating oil: 0.3182 kg; name m_lubricating_oil; source Klvac R. 2003; lognormal variance with pedigree 0.0682, pedigree (2,3,5,5,1)
  hydraulic oil and engine oil/grease; estimate based on Klvac et al. (2003); value per l converted to kg
  properties: heating value, net 40.2 MJ, carbon content, fossil 0.75, dry mass 1 kg
  note on heating value, net: Literature value, Source: IPCC 2006, 2006 IPCC Guidelines for National Greenhouse Gas Inventories, Prepared by the National Greenhouse Gas Inventories Programme, Eggleston H.S., Buendia L., Miwa K., Ngara T. and Tanabe K. (eds). Published: IGES, Japan
- transport, freight, lorry 16-32 metric ton, EURO5: 0 metric ton*km; source Spielmann, M. 2007; pedigree (1,1,1,1,1)
  transport of forest machinery calculated for the weight of the machinery, transported over 25 km and 8 productive machine hours (PMH) per day
- terrain chipper on forwarder: 5.68182e-5 unit; source Spielmann, M. 2007; lognormal variance with pedigree 0.01, pedigree (1,1,4,5,1)
  assuming a service life of 17600 PMH (according to Spielmann et al. 2007)
- diesel, low-sulfur: 0 kg; name m_diesel; source Jirsousek R. 2007; pedigree (1,1,1,1,1)
  Density of diesel: 0.84 kg/l
  property water in wet mass 0 kg; name WWM
  property carbon content, non-fossil 0; name C_content_non_fossil
  property water content 0; name water_content
  property carbon content, fossil 0.865; name C_content_fossil
  properties: heating value, net 42.8 MJ, dry mass 1 kg
- transport, freight, lorry 16-32 metric ton, EURO5: 9.07151, 52.2097 metric ton*km (2 entries); source Spielmann, M. 2007; lognormal variance with pedigree 0.0696, pedigree (3,3,5,5,1)
  (same comment as for transport, freight, lorry 16-32 metric ton, EURO5)
- diesel, low-sulfur: 0.864975, 0.873211, 1.74584, 0.0579139, 0.391741, 20.8463 kg (6 entries); source Jirsousek R. 2007; lognormal variance with pedigree 0.0129963, pedigree (1,1,4,5,1)
  Density of diesel: 0.84 kg/l
  properties: heating value, net 42.8 MJ, carbon content, fossil 0.865, dry mass 1 kg

## Emissions to nature
- Zinc [air, non-urban air or from high stacks]: 2.48177e-5 kg; source Kellenberger D. 2007; lognormal variance with pedigree 0.01, pedigree (1,1,4,5,1)
  value per MJ taken from ecoinvent 2.2 dataset *diesel in building machine" converted to input of diesel as mass
- Nitrogen oxides [air, non-urban air or from high stacks]: 0.159985 kg; source Lambrecht U. 2004; lognormal variance with pedigree 0.969404, pedigree (1,1,4,5,1)
  emission model calculating hourly specific emissions as "engine power x load factor x base emission factor" as proposed by Lambrecht et al. (2004) and applied in Spielmann et al. (2007); values for base emission factors for NOx for mobile machine class EUROIIIb are taken from the European Directive 2004/ 26/EC; for mobile machine class EURO IIIa values for base emission factors for NOx are calculated based on an assumed reduction of VOC emissions as compared to "Tier 2" limit for VOC of 1.0 g/kWh (following Spielmann et al. 2007).
  property dry mass 1 kg; name DM
- Ammonia [air, non-urban air or from high stacks]: 0.000495293 kg; source Kellenberger D. 2007; lognormal variance with pedigree 0.01, pedigree (1,1,4,5,1)
  (same comment as for Zinc)
- Selenium [air, non-urban air or from high stacks]: 2.48177e-7 kg; source Kellenberger D. 2007; lognormal variance with pedigree 0.01, pedigree (1,1,4,5,1)
  (same comment as for Zinc)
- Particulates, > 2.5 um, and < 10um [air, non-urban air or from high stacks]: 0.000308232 kg; source Lambrecht U. 2004; lognormal variance with pedigree 0.0100007, pedigree (1,1,4,5,1)
  emission model calculating hourly specific emissions as "engine power x load factor x base emission factor" as proposed by Lambrecht et al. (2004) and applied in Spielmann et al. (2007); values for base emission factors for particles for mobile machine classes EURO IIIa and EUROIIIb are taken from European Directive 2004/ 26/EC. The proportional distribution accross particle classes is made based on the ecoinvent v3 dataset "Diesel, burned in building machine/GLO".
- PAH, polycyclic aromatic hydrocarbons [air, non-urban air or from high stacks]: 8.32558e-5 kg; source Kellenberger D. 2007; lognormal variance with pedigree 0.01, pedigree (1,1,4,5,1)
  (same comment as for Zinc)
- Dinitrogen monoxide [air, non-urban air or from high stacks]: 0.00296513 kg; source Kellenberger D. 2007; lognormal variance with pedigree 0.01, pedigree (1,1,4,5,1)
  value per MJ taken from ecoinvent 2.2 dataset *diesel in building machine" converted to input of diesel as mass
  Amount was scaled to the amount of reference product.
- Nickel [air, non-urban air or from high stacks]: 1.73936e-6 kg; source Kellenberger D. 2007; lognormal variance with pedigree 0.01, pedigree (1,1,4,5,1)
  (same comment as for Zinc)
- NMVOC, non-methane volatile organic compounds, unspecified origin [air, non-urban air or from high stacks]: 0.0158988 kg; source Lambrecht U. 2004; lognormal variance with pedigree 0.0130383, pedigree (1,1,4,5,1)
  emission model calculating hourly specific emissions as "engine power x load factor x base emission factor" as proposed by Lambrecht et al. (2004) and applied in Spielmann et al. (2007); values for base emission factors for VOC for vehicle classes EURO IIIa and EURO IIIb are taken from Guideline 97/68/EG, of which 97.6% are assumed to be NMVOC.
- Dioxins, measured as 2,3,7,8-tetrachlorodibenzo-p-dioxin [air, non-urban air or from high stacks]: 1.48482e-12 kg; source Kellenberger D. 2007; lognormal variance with pedigree 0.01, pedigree (1,1,4,5,1)
  (same comment as for Zinc)
- Methane, fossil [air, non-urban air or from high stacks]: 0.000391207 kg; source Lambrecht U. 2004; lognormal variance with pedigree 0.0100011, pedigree (1,1,4,5,1)
  emission model calculating hourly specific emissions as "engine power x load factor x base emission factor" as proposed by Lambrecht et al. (2004) and applied in Spielmann et al. (2007); values for base emission factors for VOC for mobile machinery classes EURO IIIa and EURO IIIb are taken from European Directive 2004/ 26/EC, of which 2.4% are assumed to be methane.
- Copper [air, non-urban air or from high stacks]: 4.21052e-5 kg; source Kellenberger D. 2007; lognormal variance with pedigree 0.01, pedigree (1,1,4,5,1)
  (same comment as for Zinc)
- Particulates, > 10 um [air, non-urban air or from high stacks]: 0.00046198 kg; source Lambrecht U. 2004; lognormal variance with pedigree 0.0100025, pedigree (1,1,4,5,1)
  (same comment as for Particulates, > 2.5 um, and < 10um)
- Carbon dioxide, fossil [air, non-urban air or from high stacks]: 77.3051 kg; source Kellenberger D. 2007; lognormal variance with pedigree 0.0100006, pedigree (1,1,4,5,1)
  calculated from diesel input as 3.113 kg CO2/kg diesel as inventoried in the ecoinvent dataset diesel, burned in building machine
- Cadmium [air, non-urban air or from high stacks]: 2.48177e-7 kg; source Kellenberger D. 2007; lognormal variance with pedigree 0.01, pedigree (1,1,4,5,1)
  (same comment as for Zinc)
- Particulates, < 2.5 um [air, non-urban air or from high stacks]: 0.00693706 kg; source Lambrecht U. 2004; lognormal variance with pedigree 0.0104842, pedigree (1,1,4,5,1)
  (same comment as for Particulates, > 2.5 um, and < 10um)
- Carbon monoxide, fossil [air, non-urban air or from high stacks]: 0.275752 kg; source Kellenberger D. 2007; lognormal variance with pedigree 0.01, pedigree (1,1,4,5,1)
  (same comment as for Zinc)
- Benzo(a)pyrene [air, non-urban air or from high stacks]: 7.43469e-7 kg; source Kellenberger D. 2007; lognormal variance with pedigree 0.01, pedigree (1,1,4,5,1)
  (same comment as for Zinc)

## Sampling procedure
Material and fuel input from literature sources (see general comments field); air-borne emissions taken from existing dataset on diesel consumption in building machines or - where emission levels beyond applicable European legislation - estimated with emissions model based on emission limits established in European Directive 2004/ 26/EC for non-road mobile machinery types EURO IIIa and IIIb (according to Lambrecht et al 2004 and e.g. applied in Spielmann et al. 2007).
