# chlorofluorination of ethylene

Dataset: EcoSpold 2, unit process
Geography: GLO
Time period: 2000-01-01 to 2021-12-31
Technology level: current
Classification: EcoSpold01Categories: chemicals/organics
Classification: ISIC rev.4 ecoinvent: 2011:Manufacture of basic chemicals
Synonyms: freon 115; CFC 115
Tags: ConvertedDataset
Scenario: Business-as-Usual
System model: Allocation, cut-off by classification
Share of production covered: 100 %
Generated by: Jürgen Sutter
Published in: Sutter, J. 2007
Database: ecoinvent
isCopyrightProtected: true
accessRestrictedTo: 1

## General comment
This dataset represents the chlorofluorination of ethylene. Ethylene chlorofluorination is one of the most important processes to produce monochloropentafluoroethane.The functional unit is 1 kg ethylene. The system includes the process with consumption of raw materials, energy, infrastructure, and land use, as well as the generation of emissions to air and water. It also includes transportation of the raw materials. Transient or unstable operations like starting-up or shutting-down, are not included, but the production during stable operation conditions. Storage and transportation of the final product are also not included. It is assumed that the manufacturing plants are located in an urban/industrial area and consequently the emissions are categorised as emanating in a high population density area. The emissions into water are assumed to be emitted into rivers. Within the chlorofluorination of ethylene, monochloropentafluoroethane and hexafluoroethane are derived as co-products.
[This dataset was already contained in the ecoinvent database version 2. It was not individually updated during the transfer to ecoinvent version 3. Life Cycle Impact Assessment results may still have changed, as they are affected by changes in the supply chain, i.e. in other datasets. This dataset was generated following the ecoinvent quality guidelines for version 2. It may have been subject to central changes described in the ecoinvent version 3 change report (http://www.ecoinvent.org/database/ecoinvent-version-3/reports-of-changes/), and the results of the central updates were reviewed extensively. The changes added e.g. consistent water flows and other information throughout the database. The documentation of this dataset can be found in the ecoinvent reports of version 2, which are still available via the ecoinvent website. The change report linked above covers all central changes that were made during the conversion process.]

## Included activities start
From the reception of ethylene, chlorine and hydrogen fluoride to the factory gate.

## Included activities end
This activity ends with the chlorofluorination of ethylene including materials, energy uses, infrastructure and emissions.

## Geography
The inventory is modelled for the world..

## Technology
In this dataset the Montedison chlorofluorination process is taken as the technology to produce monochloropentafluoroethane. It is a reaction of ethylene with chlorine and hydrogen fluoride which takes place in a single step in a fluidized-bed reactor. A suitable catalyst is a combination of aluminum chloride and other metals.
2 C2H4 + 10 Cl2 + 11 HF → C2ClF5 + C2F6 + 19 HCl
The hydrochloric acid is neutralized with sodium hydroxide.
Commercial production of chlorofluoroalkanes is also possible by the electrochemical fluorination process developed by Phillips Petroleum.
Impurities are usually removed from organic fluorine compounds by fractional distillation, fractional crystallization, or chromatographic methods. This does not apply to fluoropolymers and high-boiling perfluorinated oils, which require special measures, i.e., the use of extremely pure starting materials.
Quantitative determination of fluorine is possible in most cases by combustion and subsequent analysis of the hydrogen fluoride generated. Wet chemical methods are used to determine fluoride ions.
Because of the high volatility of organic fluorine compounds, purity can be readily determined by gas chromatography. 19F-Nuclear magnetic resonance spectroscopy is a valuable tool for determining the structure of organic fluorine compounds. Structure determinations, even of mixtures, are often easier using this method than with 1H-NMR spectra due to the larger chemical shifts of 19F-NMR spectra. The 19F signals can be integrated and used for quantitative analysis.
Chlorofluoroalkanes (and also the alternative HCFCs and HFCs) produced on an industrial scale are subject to stringent standards. Impurities must not exceed the following limits:
Siegemund, G., Schwertfeger, W., Feiring, A., Smart, B., Behr, F., Vogel, H., McKusick, B.: Fluorine Compounds, Organic. Published online: 2002. In: Ullmann's Encyclopedia of Industrial Chemistry, Seventh Edition, 2004 Electronic Release (ed. Fiedler E., Grossmann G., Kersebohm D., Weiss G. and Witte C.). 7 th Electronic Release Edition. Wiley InterScience, New York, Online-Version under: http://www.mrw.interscience.wiley.com/emrw/9783527306732/home

## Time period
Time of publications.

## Parameters
- fraction, cooling water, to air: 0.3875 dimensionless; name fraction_CW_to_air; = (0.5*fraction_CW_OT_to_air)+(0.5*fraction_CW_R_to_air); lognormal variance with pedigree 0.092025, pedigree (4,4,3,2,4)
  Calculated value based on literature value (see comments of the other parametres present in this dataset) and expert opinion. In the case when no industry/literature data are available about the type of cooling or directly fraction, cooling water, to air specific for the process a default assumption is applied. It is assumed that the once-through cooling system is used in 50% of all cases and recirculating system is used in another 50% of all cases.
- fraction, cooling water, recirculating system, to air: 0.771 dimensionless; name fraction_CW_R_to_air; lognormal variance with pedigree 0.0413, pedigree (2,3,1,3,1)
  Calculated based on literature value (Scown, C.D., 2011, Water Footprint of U.S. Transportation Fuels and supplying information of the article) (Vionnet, S., Quantis Water Database - Technical Report, 2012).
- fraction, cooling water, cooling pond system, to air: 0.032 dimensionless; name fraction_CW_CP_to_air; lognormal variance with pedigree 0.0413, pedigree (2,3,1,3,1)
  (same comment as for fraction, cooling water, recirculating system, to air)
- fraction, cooling water, once-through system, to air: 0.004 dimensionless; name fraction_CW_OT_to_air; lognormal variance with pedigree 0.0413, pedigree (2,3,1,3,1)
  (same comment as for fraction, cooling water, recirculating system, to air)

## Reference product
- monochloropentafluoroethane: 1 kg; By-product classification allocatable product; CPC 341: Basic organic chemicals; CAS 76-15-3
  EcoSpold01Location=GLO
  Monochloropentafluoroethane is a chlorofluoroalkane. It is a colorless gas with slight ether like odor.
  Up to the ban in the USA in 1978 chlorofluoroalkanes had been used mainly as aerosol propellants and as spraying and foam blowing agents (R 11, R 12, R 114). Further important applications up to 1996 had been in the area of refrigerants, where R 11, R 12, R 13, R 22, R 113, R 114, R 115, and the chlorine-free R 23 and RC 318 were preferred. Of the drop-in alternatives to CFCs HCFC 22 is the most important , used as refrigerant (annual production in 1995 243 × 103 t), followed by HCFC 141 b (113 × 103 t in 1995) and HCFC 142 b (38 × 103 t in 1995) used as blowing agents for closed cell foam.
  Chlorofluoroalkanes, especially R 11 and R 113, were also employed as solvents and degreasing and cleaning agents for textiles; HCFC 22, CFC 113, and HCFC 142 b will be important intermediates for the production of fluoroolefins also in the future.
  Higher molecular mass perchlorofluoroalkanes are used as oils, greases, and waxes, as lubricants, hydraulic fluids, damping oils, heat-transfer media, impregnating agents, and plasticizers. Oligomers of chlorotrifluoroethylene have achieved special importance in this area.
  production volume 1 kg
    Dummy value to be replaced by measured, estimated or calculated value.
  property heating value, net 4.71 MJ
    LHV is calculated based on the elemental composition of the substance. Based on the CAS number of the substance (000076-15-3), the chemical formula of the substance is found to be: C2ClF5, (PubChem 2020).
    Reference: Kim, S., Chen, J., Cheng, T., Gindulyte, A., He, J., He, S., Li, Q., Shoemaker, B. A., Thiessen, P. A., Yu, B., Zaslavsky, L., Zhang, J., & Bolton, E. E. (2019). PubChem 2019 update: improved access to chemical data. Nucleic acids research, 47(D1), D1102–D1109. https://doi.org/10.1093/nar/gky1033
  property carbon content 0.155844
    carbon content on a dry matter basis (reserved; not for manual entry)
  property true value 8.85637
    allocation property applied in "true value" allocation // value calculated from revenue
  properties: EcoSpold01Allocation_undefined_21 52.7405, EcoSpold01Allocation_undefined_22 52.7405, carbon content, fossil 0.155844, water in wet mass 0 kg, water content 0, carbon content, non-fossil 0, dry mass 1 kg, wet mass 1 kg, price 3.39 EUR2005, EcoSpold01Allocation_undefined_18 52.74, EcoSpold01Allocation_undefined_7 52.74, EcoSpold01Allocation_undefined_11 52.74, EcoSpold01Allocation_undefined_12 52.74, EcoSpold01Allocation_undefined_4 52.74, EcoSpold01Allocation_undefined_17 52.74, EcoSpold01Allocation_undefined_13 52.74, EcoSpold01Allocation_undefined_8 52.74, EcoSpold01Allocation_undefined_16 52.74, EcoSpold01Allocation_undefined_6 52.74, EcoSpold01Allocation_undefined_9 52.74, EcoSpold01Allocation_undefined_15 52.74, EcoSpold01Allocation_undefined_10 52.74, EcoSpold01Allocation_undefined_2 52.74, EcoSpold01Allocation_undefined_14 52.74, EcoSpold01Allocation_undefined_5 52.74, EcoSpold01Allocation_undefined_1 100, EcoSpold01Allocation_undefined_3 52.74, EcoSpold01Allocation_undefined_19 52.74, carbon allocation 0.155844 kg

## By-products
- hexafluoroethane: 0 kg; By-product classification allocatable product; CPC 34110: Hydrocarbons and their halogenated, sulphonated, nitrated or nitrosated derivatives; CAS 76-16-4
  EcoSpold01Location=GLO
  production volume 132820 kg
    In the EU the reported sales for C2F6 in 2007 is 87 tonnes (see source). CEFIC gives an average growth rate in the chemical production (including pharmaceuticals) of 4.1% annually. The production volume is calculated for the reference year 2005. The world production volume is then calculated with the GDP ratio (GDPwolrd/GDP EU), in units current US$ (World Bank). The ratio is 3.32. It is estimated, that 50% of the production volume is from this technology.
  property heating value, net 5.27 MJ
    LHV is calculated based on the elemental composition of the substance. Based on the CAS number of the substance (000076-16-4), the chemical formula of the substance is found to be: C2F6, (PubChem 2020).
    Reference: Kim, S., Chen, J., Cheng, T., Gindulyte, A., He, J., He, S., Li, Q., Shoemaker, B. A., Thiessen, P. A., Yu, B., Zaslavsky, L., Zhang, J., & Bolton, E. E. (2019). PubChem 2019 update: improved access to chemical data. Nucleic acids research, 47(D1), D1102–D1109. https://doi.org/10.1093/nar/gky1033
  property price 3.39 EUR2005
    Temporary price data. Calculated as 90% of purchasers price based on: 2005 import and export prices (total trades (USD) divided by total weight (kg) in biggest economies of the world: EU27, USA, Brasil, China, India, Japan and Russia) from UN Commodity Trade Statistics Database (http://data.un.org/Explorer.aspxDatabase [Accessed 2011.06.20]). Commodity: Fluor-/brom-/iodin-ated derivs of acyclic hydrocarbon
  property carbon content 0.173913
    carbon content on a dry matter basis (reserved; not for manual entry)
  property true value 7.93633
    allocation property applied in "true value" allocation // value calculated from revenue
  properties: EcoSpold01Allocation_undefined_20 100, EcoSpold01Allocation_undefined_9 47.26, EcoSpold01Allocation_undefined_21 47.2595, EcoSpold01Allocation_undefined_22 47.2595, carbon content, fossil 0.173913, water content 0, wet mass 1 kg, carbon content, non-fossil 0, water in wet mass 0 kg, dry mass 1 kg, EcoSpold01Allocation_undefined_10 47.26, EcoSpold01Allocation_undefined_18 47.26, EcoSpold01Allocation_undefined_12 47.26, EcoSpold01Allocation_undefined_6 47.26, EcoSpold01Allocation_undefined_2 47.26, EcoSpold01Allocation_undefined_19 47.26, EcoSpold01Allocation_undefined_5 47.26, EcoSpold01Allocation_undefined_16 47.26, EcoSpold01Allocation_undefined_4 47.26, EcoSpold01Allocation_undefined_14 47.26, EcoSpold01Allocation_undefined_15 47.26, EcoSpold01Allocation_undefined_17 47.26, EcoSpold01Allocation_undefined_8 47.26, EcoSpold01Allocation_undefined_3 47.26, EcoSpold01Allocation_undefined_7 47.26, EcoSpold01Allocation_undefined_13 47.26, EcoSpold01Allocation_undefined_11 47.26, carbon allocation 0.173913 kg

## Inputs from technosphere
- heat, district or industrial, natural gas: 1.99998 MJ; source Gendorf 2000; lognormal variance with pedigree 0.1786, pedigree (4,5,5,5,5)
  Estimation. These values were approximated with data from an large chemical plant site in Germany producing 2.05 Mt a-1 (intermediates included) of different chemicals. The values for the energy consumption per kg of product of this plant (3.2 MJ kg-1) were used as approximation for the energy consumption of the chlorofluorination of ethylene. This total energy demand contains a split of 50% natural gas, 38% electricity and 12% steam from external energy sources. For this inventory all energy used for heat or steam was assumed to be natural gas.
  EcoSpold01Location=RER
  Uncertainty: Estimation
  properties: heating value, net 1 MJ
- chlorine, liquid: 0 kg; source Siegemund, G. 2004; pedigree (1,1,1,1,1)
  EcoSpold01Location=RER
  Stoichiometric calculation. The values for the consumption of the raw materials are calculated with an assumed yield of 95 %.
  Uncertainty: Stoechiometric calculation
  properties: dry mass 1 kg, wet mass 1 kg
- inert waste, for final disposal: 0 kg; pedigree (1,1,1,1,1)
  Estimation
  EcoSpold01Location=CH
  Uncertainty: Estimation
  production volume 0 kg
    Dummy value to be replaced by measured, estimated or calculated value.
  properties: water content 0.00502513, wet mass 1 kg, dry mass 0.995 kg
- ethylene: 0 kg; source Siegemund, G. 2004; pedigree (1,1,1,1,1)
  Stoichiometric calculation. Ethylene is the functional unit.
  EcoSpold01Location=RER
  Uncertainty: Stoechiometric calculation
  properties: heating value, net 43.22 MJ, carbon content, fossil 0.857143, dry mass 1 kg, wet mass 1 kg
- chemical factory, organics: 3.99992e-10 unit; lognormal variance with pedigree 0.448, pedigree (4,5,5,5,5)
  EcoSpold01Location=RER
  Estimation. The infrastructure is estimated based on the module "chemical plant, organics". This module assumes a built area of about 4.2 ha, an average output of 50'000 t/a, and plant life of fifty years.
  Uncertainty: Estimation
- electricity, medium voltage: 0.33299 kWh; source Gendorf 2000; lognormal variance with pedigree 0.1786, pedigree (4,5,5,5,5)
  EcoSpold01Location=UCTE
  Estimation. These values were approximated with data from an large chemical plant site in Germany producing 2.05 Mt a-1 (intermediates included) of different chemicals. The values for the energy consumption per kg of product of this plant (3.2 MJ kg-1) were used as approximation for the energy consumption of the chlorofluorination of ethylene. This total energy demand contains a split of 50% natural gas, 38% electricity and 12% steam from external energy sources.
  Uncertainty: Estimation
- sodium hydroxide, without water, in 50% solution state: 2.60275 kg; source Siegemund, G. 2004; lognormal variance with pedigree 0.076, pedigree (4,5,5,1,1)
  EcoSpold01Location=RER
  Stoichiometric calculation. The values for the consumption of the raw materials are calculated with an assumed yield of 95 %. The produced hydrochloric acid is then neutralized with sodium hydroxide.
  Uncertainty: Stoechiometric calculation
  properties: wet mass 1 kg, dry mass 1 kg, heating value, net 3.03 MJ
- hydrogen fluoride: 0 kg; source Siegemund, G. 2004; pedigree (1,1,1,1,1)
  Stoichiometric calculation. The values for the consumption of the raw materials are calculated with an assumed yield of 95 %.
  EcoSpold01Location=GLO
  Uncertainty: Stoechiometric calculation
  properties: wet mass 1 kg, dry mass 1 kg, heating value, net 6.06 MJ
- chlorine, liquid: 0.420635, 2.10278 kg (2 entries); source Siegemund, G. 2004; lognormal variance with pedigree 0.076, pedigree (4,5,5,1,1)
  (same comment as for chlorine, liquid)
- inert waste, for final disposal: -0.0270002, -4.14734 kg (2 entries); lognormal variance with pedigree 0.1786, pedigree (4,5,5,5,5)
  Estimation
  EcoSpold01Location=CH
  Uncertainty: Estimation
- ethylene: 0.069167, 0.00209562, 0.130611 kg (3 entries); source Siegemund, G. 2004; lognormal variance with pedigree 0.076, pedigree (4,5,5,1,1)
  (same comment as for ethylene)
- hydrogen fluoride: 0.33265, 0.975913 kg (2 entries); source Siegemund, G. 2004; lognormal variance with pedigree 0.076, pedigree (4,5,5,1,1)
  (same comment as for hydrogen fluoride)

## Inputs from nature
- Water, cooling, unspecified natural origin [natural resource, in water]: 0.0240007 m3; name water_cooling_UNO_input; source Gendorf 2000; lognormal variance with pedigree 0.198, pedigree (4,5,5,5,5)
  Estimation. This value was approximated with data from an large chemical plant site in Germany producing 2.05 Mt a-1 (intermediates included) of different chemicals. This value was used in this inventory as approximation for the cooling water consumption of the chlorofluorination of ethylene.
  Estimation. This value was approximated with data from an large chemical plant site in Germany producing 2.05 Mt a-1 (intermediates included) of different chemicals. This value was used in this inventory as approximation for the cooling water consumption of the chlorofluorination of ethylene.
  Uncertainty: Estimation

## Emissions to nature
- Chlorine [air, urban air close to ground]: 0.00504683 kg; lognormal variance with pedigree 0.188, pedigree (4,5,5,5,5)
  Estimation. The chlorine emissions are estimated to 0.2% of the input.
  Uncertainty: Estimation
- Water [air, unspecified]: 0.00930028 m3; name water_to_air_unspecified; = (water_cooling_UNO_input*fraction_CW_to_air); lognormal variance with pedigree 0.0807, pedigree (2,2,5,1,1)
  Calculated value based on literature values and expert opinion. See comments in the parametres' comment field.
  property fraction, origin: fresh water 0; name fraction_origin_fresh_water
  property fraction, origin: salt water 0; name fraction_origin_salt_water
  property fraction, origin: unspecified 1; name fraction_origin_unspecified
- Ethene [air, urban air close to ground]: 0.000100937 kg; lognormal variance with pedigree 0.188, pedigree (4,5,5,5,5)
  Estimation. The remaining amount of unreacted ethylene (5 % of the input) is assumed to be emitted to air.
  Uncertainty: Estimation
- Sodium, ion [water, surface water]: 0.149657 kg; lognormal variance with pedigree 0.798, pedigree (4,5,5,5,5)
  Estimation. The remaining amount of unreacted chlorine (4.8 % of the input) and sodium chloride from the HCl neutralization is assumed to leave the production process with the waste water.
  Uncertainty: Estimation
- Carbon dioxide, fossil [air, urban air close to ground]: 0.0314054 kg; lognormal variance with pedigree 0.1786, pedigree (4,5,5,5,5)
  Estimation. The ethylene emissions are incinerated to CO2 with a assumed destruction efficiency of 99 %.
  Uncertainty: Estimation
- Water [water, unspecified]: 0.0147004 m3; name water_to_water_unspecified; = water_cooling_UNO_input*(1-fraction_CW_to_air); lognormal variance with pedigree 0.0807, pedigree (2,2,5,1,1)
  (same comment as for Water)
  property fraction, origin: salt water 0; name fraction_origin_salt_water_Ww
  property fraction, origin: fresh water 0; name fraction_origin_fresh_water_Ww
  property fraction, origin: unspecified 1; name fraction_origin_unspecified_Ww
  property water in wet mass 1000 kg; name WWM
  property dry mass 0 kg; name DM
  property carbon content, non-fossil 0; name C_content_non_fossil
  property wet mass 1000 kg; name WM
  property carbon content, fossil 0; name C_content_fossil
- Chloride [water, surface water]: 0.348857 kg; lognormal variance with pedigree 0.448, pedigree (4,5,5,5,5)
  (same comment as for Sodium, ion)

## Sampling procedure
Literature data

## Extrapolations
Energy consumptions and emissions are estimated. Infrastructure and transports are calculated with standard values.

## Review by Roland Hischier 2009-01-28
passed.
none

## Review by Roland Hischier 2011-09-23
Transfer of documentation done.
