# silica sand production

Dataset: EcoSpold 2, unit process
Geography: RoW
Time period: 1998-01-01 to 2021-12-31
Technology level: current
Classification: ISIC rev.4 ecoinvent: 0810:Quarrying of stone, sand and clay
Synonyms: Silica; Dioxosilane; Diatomaceous earth; SILICON DIOXIDE; Cristobalite; Quartz
Scenario: Business-as-Usual
System model: Allocation, cut-off by classification
Generated by: Tina Künniger
Published in: Kellenberger D. 2007
Database: ecoinvent
isCopyrightProtected: true
accessRestrictedTo: 1

## General comment
This dataset represents the production of 1 kg of silica sand obtained by the drying of sand. Silica sand is a special sand with a SiO2 (Quartz)-content of more than 85% (w/w). If the SiO2-content is higher than 98%, the silica sand is called pure silica sand or industrial sand. Pure silica sand with a SiO2-content over 99% and heavy metal content (especially iron compounds) under 0.05% is called “vitreous“ sand. Important silica sand deposits are found in Germany: Niedersachsen, Westfalen and Niederrhein (Bach et al. (1999)).
The use of silica sand is subdivided in two categories (Bach et al. (1999)):
1. Building sand: used as aggregate for concrete, mortar, plaster, dumping, non-freezing, used for the production of sand-lime bricks and as paring and brake sand.
2. Industrial sand: glass-, grinding-, enamel-, oil-, moulding- and filter sand
Apart from the use in the building sector, silica sand is also used in the beverage industry, as a raw material for the chemical industry, for the production of refractories, as filling material or for the covering of playing fields.
References:
Bach M., Rohlf U. and Frunder B. (1999) Römpp Lexikon Chemie. Georg Thieme Verlag, Stuttgart.
Kellenberger D., Althaus H.-J., Jungbluth N., Künniger T., Lehmann M. and Thalmann P. (2007) Life Cycle Inventories of Building Products. Final report ecoinvent Data v2.0 No. 7. EMPA Dübendorf, Swiss Centre for Life Cycle Inventories, Dübendorf, CH.

## Included activities start
From the reception of sand.

## Included activities end
This activity ends with the processing of sand, resulting in silica sand. Only the energy demand is included, no infrastructure is taken into account. No requirements for administration are included.

## Geography
The amount of energy used for drying sand is taken from Swiss data. The data are assumed to be representative of the global production.

## Technology
Generally there are no differences in the quarrying process of silica sand compared to the “normal” sand process. An important difference is that silica sand is dried. It is assumed that the content of moisture before drying is about 5% and afterwards around 1%. Another difference is based on the high content of SiO2, which makes the raw material rarer. Losses in the conveyor belt transportation are taken into account.

## Time period
Time of publications.

## Reference product
- silica sand: 1 kg; name RP; CPC 15310: Natural sands; By-product classification allocatable product
  Silica sand is special sand with a SiO2 (Quarz) -content of more than 85% (w/w). If the SiO2-content is higher than 98% the silica sand is called pure silica sand or industrial sand. Pure silica sand with a SiO2-content over 99% and heavy crop content (especially iron compounds) under 0.05% is called “vitreous“ sand.
  Important silica sand deposits are found in Germany: Niedersachsen, Westfalen and Niederrhein (Bach et al. (1999)).
  The use of silica sand is subdivided in two categories (Bach et al. (1999)):
  Building sand: Used as aggregate for concrete, mortar, plaster, dumping, non-freezing, used for the production of sand-lime bricks and as paring and brake sand.
  Industrial sand: Glass-, grinding-, enamel-, oil-, moulding- and filter sand
  Beside the use in the building sector silica sand is also used in the beverage industry, as raw material for the chemical industry, for the production of refractories, as filling material or for the covering of playing fields.
  Further references:
  Bach M., Rohlf U. and Frunder B. (1999) Römpp Lexikon Chemie. Georg Thieme Verlag, Stuttgart.
  production volume 1.89558e10 kg; name RP_PV; = 1.16E11*0.35*0.5
    Calculated value based on literature. The world's production of gravel and sand is estimated to be 1.16E11 kg in 2005 (USGS, http://minerals.er.usgs.gov/minerals/pubs/commodity/silica/myb1-2006-silic.pdf, accessed 20130313)
    Following ecoinvent v2 report 7, 35% was considered sand, and 65% was considered gravel, round.
    It is estimated, that 50% of sand is turned into silica sand.
  property carbon content 0
    carbon content on a dry matter basis (reserved; not for manual entry)
  properties: water in wet mass 0.01 kg, wet mass 1 kg, carbon content, non-fossil 0, water content 0.010101, dry mass 0.99 kg, price 0.0312 EUR2005, carbon content, fossil 0, carbon allocation 0 kg

## Inputs from technosphere
- heat, district or industrial, other than natural gas: 0 MJ; pedigree (1,1,1,1,1)
  Literature value. A heat input is needed for drying the sand from 5% to 1% of water content.
  properties: heating value, net 1 MJ
- sand: 0 kg; pedigree (1,1,1,1,1)
  Estimation, based on measured values. The input of sand was calculated from data from a German company, with a yearly production of 450000 tonnes, and assuming a lifespan of 20 years. An extra amount of sand is considered due to losses in the conveyor belt transportation.
  properties: wet mass 1 kg, dry mass 1 kg
- heat, district or industrial, other than natural gas: 8.10605e-5, 2.10519e-5, 0.199898 MJ (3 entries); lognormal variance with pedigree 0.0612, pedigree (2,3,5,5,3)
  (same comment as for heat, district or industrial, other than natural gas)
- sand: 1.02245, 0.012242, 0.00530808 kg (3 entries); lognormal variance with pedigree 0.148, pedigree (5,5,5,5,3)
  (same comment as for sand)

## Sampling procedure
Literature and estimations.

## Extrapolations
This dataset has been copied from an original dataset covering the geography DE. The uncertainty has been adjusted accordingly.

## Review by Gregor Wernet 2017-08-04
This dataset was additionally reviewed in a separate review process by Eric Johnson of Atlantic Consulting as well as Emilia Moreno Ruiz and Gregor Wernet of ecoinvent.
