# orbencarb production

Dataset: EcoSpold 2, unit process
Geography: RER
Time period: 2000-01-01 to 2021-12-31
Technology level: current
Classification: EcoSpold01Categories: agricultural means of production/pesticides
Classification: ISIC rev.4 ecoinvent: 2021:Manufacture of pesticides and other agrochemical products
Synonyms: Golaprex, Lanray, Micula
Tags: ConvertedDataset
Scenario: Business-as-Usual
System model: Allocation, cut-off by classification
Share of production covered: 100 %
Generated by: Jürgen Sutter
Published in: Nemecek, T. 2007
Database: ecoinvent
isCopyrightProtected: true
accessRestrictedTo: 1

## General comment
This dataset represents the production of orbencarb (1 kg of active ingredient). Raw materials are modelled with a stoichiometric calculation. Energy consumption is modelled with data from a similar process. The emissions are estimated. Infrastructure is included with a default value.
This dataset represents the production of orbencarb (1 kg of active ingredient). Raw materials are modelled with a stoichiometric calculation. Energy consumption is modelled with data from a similar process. The emissions are estimated. Infrastructure is included with a default value.

## Included activities start
From reception of precursors (bromine, carbon monoxide, chlorine, ethylenediamine, sodium hydroxide, sulfur, toluene, and "water, salt, sole") at the factory gate.

## Included activities end
This activity ends with orbencarb at the factory gate. The dataset includes the input materials, energy uses, infrastructure and emissions. The dataset doesn't include emulsives, additives etc.

## Geography
The inventory is modelled for Europe.

## Technology
Orbencarb is a pesticide produced in two steps from diethyl amine:
C4H11N + COS → C5H11NOS
C5H11NOS + C7H6ClBr → C12H16ClNOS + HBr
Precursors that are used for the orbencarb production are carbonyl sulfide (COS) and 2-chloro benzyl bromide (C7H6ClBr).
Carbonyl sulfide (COS) is produced from carbon monoxide and sulfur:
CO + S → COS
2-Chloro benzyl bromide (C7H6ClBr) is produced in two steps from toluene:
C7H8 + Cl2 → C7H7Cl + HCl
C7H7Cl + Br2 → C7H6ClBr + HBr

## Time period
Time of publications

## Parameters
- fraction, process water, to air: 0.205 dimensionless; name fraction_PW_to_air; lognormal variance with pedigree 0.092025, pedigree (4,4,3,2,4)
  Literature value (Statistics Canada, 2007 & Shaffer, K.H., 2008, Consumptive water use in the Great Lakes Basin, USGS) (Vionnet, S., Quantis Water Database - Technical Report, 2012).
- fraction, cooling water, to air: 0.3875 dimensionless; name fraction_CW_to_air; = (0.5*fraction_CW_OT_to_air)+(0.5*fraction_CW_R_to_air); lognormal variance with pedigree 0.092025, pedigree (4,4,3,2,4)
  Calculated value based on literature value (see comments of the other parametres present in this dataset) and expert opinion. In the case when no industry/literature data are available about the type of cooling or directly fraction, cooling water, to air specific for the process a default assumption is applied. It is assumed that the once-through cooling system is used in 50% of all cases and recirculating system is used in another 50% of all cases.
- fraction, cooling water, cooling pond system, to air: 0.032 dimensionless; name fraction_CW_CP_to_air; lognormal variance with pedigree 0.0413, pedigree (2,3,1,3,1)
  Calculated based on literature value (Scown, C.D., 2011, Water Footprint of U.S. Transportation Fuels and supplying information of the article) (Vionnet, S., Quantis Water Database - Technical Report, 2012).
- fraction, cooling water, once-through system, to air: 0.004 dimensionless; name fraction_CW_OT_to_air; lognormal variance with pedigree 0.0413, pedigree (2,3,1,3,1)
  (same comment as for fraction, cooling water, cooling pond system, to air)
- fraction, cooling water, recirculating system, to air: 0.771 dimensionless; name fraction_CW_R_to_air; lognormal variance with pedigree 0.0413, pedigree (2,3,1,3,1)
  (same comment as for fraction, cooling water, cooling pond system, to air)

## Reference product
- orbencarb: 1 kg; CPC 34663: Herbicides, anti-sprouting products and plant-growth regulators; By-product classification allocatable product; CAS 34622-58-7
  EcoSpold01Location=RER
  Orbencarb is a colourless liquid which is moderately soluble in water and readily soluble in most organic solvents.
  The name "orthobencarb" is approved by the Japanese Ministry of Agriculture, Forestry and Fisheries.
  Orbencarb is a selective herbicide used pre-emergence to control broad-leaved weeds in barley, wheat, rye, maize, soya beans, cotton, and turf.
  production volume 1.32237 kg
    This is a placeholder value that does not reflect real-world production volumes. This dataset does not currently require a real-world production volume to work in the database framework, and no actual data were collected yet. This has no negative effect on the results of the ecoinvent database. The placeholder value of this activity was scaled according to the nominal GDP of 2005 (source: United Nations, http://data.un.org/Glossary.aspx?q=GDP+%28current+US%24%29, accessed 20130726) to reflect an appropriate share of the global production volume, which is also a placeholder value.
  property price 2.97542 EUR2005
    Calculated based on inputs: The price of the product has been calculated as a sum of the values of the material and energy inputs for this product. This value is therefore a rough estimation. It may underestimate the real price since there are additional expenses when producing any product. These expences can include for example labour costs, treatment of waste materials and profit for the producer. Please consider carefully whether this level of data quality is acceptable for your application.
  property carbon content 0.55814
    carbon content on a dry matter basis (reserved; not for manual entry)
  properties: carbon content, fossil 0.55814, water content 0, dry mass 1 kg, wet mass 1 kg, carbon content, non-fossil 0, water in wet mass 0 kg, carbon allocation 0.55814 kg

## Inputs from technosphere
- carbon monoxide: 0.28168 kg; source Unger T A 1996; lognormal variance with pedigree 0.044, pedigree (4,5,4,1,1)
  EcoSpold01Location=RER
  Stoichiometric calculation, assuming an efficiency of 95% per reaction step.
  Uncertainty: Stoechiometric calculation
  properties: dry mass 1 kg, heating value, net 12.99 MJ, wet mass 1 kg, carbon content, fossil 0.428571
  note on carbon content, fossil: CO. It is assumed that CO is produced from partial combustion of heavy heating oil.
- heat, district or industrial, other than natural gas: 11.0445 MJ; source Gendorf 2000; lognormal variance with pedigree 0.044, pedigree (4,5,4,1,1)
  Estimation, assuming a default value, originated from calculation of avarage consumption of electricity and heat per kg of product (3.2 MJ kg-1), and a resulting amount of heat of 2 MJ for every reaction step per kg reaction product, considering that the demand is made up of a mix that inlcudes 12% steam from external energy sources. Additionally, reaction steps are approximated with energy consumption data, assuming that inventory flows can be estimated using process data for basic operation steps, available for specific organic chemicals.
  Further references:
  Kim S., Overcash M.: Energy in chemical manufacturing processes: gate-to-gate information for life cycle assessment. In: Journal of Chemical Technology & Biotechnology vol. 78, no. 9: 995-1005(11). 2003
  Uncertainty: Estimation
  properties: heating value, net 1 MJ
- heat, district or industrial, natural gas: 19.7874 MJ; source Gendorf 2000; lognormal variance with pedigree 0.044, pedigree (4,5,4,1,1)
  Estimation, assuming a default value, originated from calculation of avarage consumption of electricity and heat per kg of product (3.2 MJ kg-1), and a resulting amount of heat of 2 MJ for every reaction step per kg reaction product, considering that the demand is made up of a mix that includes 50% natural gas. Additionally, reaction steps are approximated with energy consumption data, assuming that inventory flows can be estimated using process data for basic operation steps, available for specific organic chemicals.
  Further references:
  Kim S., Overcash M.: Energy in chemical manufacturing processes: gate-to-gate information for life cycle assessment. In: Journal of Chemical Technology & Biotechnology vol. 78, no. 9: 995-1005(11). 2003
  Uncertainty: Estimation
  properties: heating value, net 1 MJ
- chlorine, liquid: 0.63022 kg; source Unger T A 1996; lognormal variance with pedigree 0.044, pedigree (4,5,4,1,1)
  Stoichiometric calculation, assuming an efficiency of 95% per reaction step.
  EcoSpold01Location=RER
  Uncertainty: Stoechiometric calculation
  properties: wet mass 1 kg, dry mass 1 kg
- toluene, liquid: 0.45673 kg; source Unger T A 1996; lognormal variance with pedigree 0.044, pedigree (4,5,4,1,1)
  (same comment as for chlorine, liquid)
  properties: wet mass 1 kg, dry mass 1 kg, heating value, net 38.17 MJ, carbon content, fossil 0.913043
- sulfur: 0.32192 kg; source Unger T A 1996; lognormal variance with pedigree 0.044, pedigree (4,5,4,1,1)
  (same comment as for chlorine, liquid)
  properties: wet mass 1 kg, dry mass 1 kg
- electricity, medium voltage: 1.40237 kWh; source Gendorf 2000; lognormal variance with pedigree 0.044, pedigree (4,5,4,1,1)
  EcoSpold01Location=UCTE
  Estimation, assuming a default value, originated from calculation of avarage consumption of electricity and heat per kg of product (3.2 MJ kg-1), and a resulting amount of electricity of 0,333 kW for every reaction step per kg reaction product, considering that the demand is made up of a mix that inlcudes 38% electricity. Additionally, reaction steps are approximated with energy consumption data, assuming that inventory flows can be estimated using process data for basic operation steps, available for specific organic chemicals.
  Further references:
  Kim S., Overcash M.: Energy in chemical manufacturing processes: gate-to-gate information for life cycle assessment. In: Journal of Chemical Technology & Biotechnology vol. 78, no. 9: 995-1005(11). 2003
  Uncertainty: Estimation
- sodium hydroxide, without water, in 50% solution state: 0.51607 kg; source Unger T A 1996; lognormal variance with pedigree 0.044, pedigree (4,5,4,1,1)
  Stoichiometric calculation, assuming an efficiency of 100%.
  EcoSpold01Location=RER
  Uncertainty: Stoechiometric calculation
  properties: heating value, net 3.03 MJ, wet mass 1 kg, dry mass 1 kg
- chemical factory, organics: 1.4308e-9 unit; lognormal variance with pedigree 0.448, pedigree (4,5,5,5,5)
  EcoSpold01Location=RER
  Estimation, based on a production capacity of 50,000 t per year and a plant life time of 50 years, therefore an amount of 4X10-10 units per kg of produced chemical is aded to the unit process of the respective chemical. The amount is accounted for each production step. This might be an overestimation in some multistep syntheses
  Uncertainty: Estimation
- ethylenediamine: 0.69766 kg; source Unger T A 1996; lognormal variance with pedigree 0.044, pedigree (4,5,4,1,1)
  (same comment as for carbon monoxide)
  properties: wet mass 1 kg, dry mass 1 kg, carbon content, fossil 0.5, heating value, net 28.24 MJ

## Inputs from nature
- Water, salt, sole [natural resource, in water]: 0.204861 m3; name water_salt_sole_input; = ((bromine_input/0.0023))/1000; lognormal variance with pedigree 0.044, pedigree (4,5,4,1,1)
  There is an intermediate containing bromine in this process and this input is used as an input in the bromine production.
  The concentration of bromine in water, salt, sole is 0.23% = 0.0023kg/kg. Cross-referenced: 0.25% (Ullmann's encyclopedia), 0.4% (USGS). The concentration of iodine in water, salt, sole is 0.03% = 0.0003kg/kg. Cross-referenced: 0.015% - 0.12% (Ullmann's encyclopedia).
  There is an intermediate containing bromine in this process and this input is used as an input in the bromine production.
  The concentration of bromine in water, salt, sole is 0.23% = 0.0023kg/kg. Cross-referenced: 0.25% (Ullmann's encyclopedia), 0.4% (USGS). The concentration of iodine in water, salt, sole is 0.03% = 0.0003kg/kg. Cross-referenced: 0.015% - 0.12% (Ullmann's encyclopedia).
  Uncertainty: Stoechiometric calculation
- Water, cooling, unspecified natural origin [natural resource, in water]: 0.08585 m3; name water_cooling_UNO_input; source Gendorf 2000; lognormal variance with pedigree 0.044, pedigree (4,5,4,1,1)
  Estimation (24 kg cooling water per kg produced chemical per step).
  Uncertainty: Estimation
- Bromine, in water [natural resource, in water]: 0.47118 kg; name bromine_input; lognormal variance with pedigree 0.044, pedigree (4,5,4,1,1)
  0.23% Br in water; Stoichiometric calculation, assuming an efficiency of 95% per reaction step.
  Uncertainty: Stoechiometric calculation

## Emissions to nature
- Diethylamine [water, surface water]: 0.0033488 kg; lognormal variance with pedigree 0.448, pedigree (4,5,5,5,5)
  Estimation, assuming that the remaining amount of unreacted input materials leave the production process with the wastewater, wich is further treated in an internal wastewater plant. For the nitrogen containing compounds within the wastewater a removal efficiency of 50% was assumed. The nitrogen emitted to air (N2) is neglected.
  Uncertainty: Estimation
- Chlorine [air, urban air close to ground]: 0.00069503 kg; lognormal variance with pedigree 0.188, pedigree (4,5,5,5,5)
  Estimation, based on the assumption that 0.2% of volatile input materials is emitted to air occurring from the purge vent, the destillation vent and fugitive emission sources.
  Uncertainty: Estimation
- Carbon monoxide, fossil [air, urban air close to ground]: 0.00056336 kg; lognormal variance with pedigree 0.798, pedigree (4,5,5,5,5)
  (same comment as for Chlorine)
- Sulfide [water, surface water]: 0.016096 kg; lognormal variance with pedigree 0.188, pedigree (4,5,5,5,5)
  Estimation, assuming that the remaining amount of unreacted input materials leave the production process with the wastewater, wich is further treated in an internal wastewater plant.
  Uncertainty: Estimation
- Carbon dioxide, fossil [air, urban air close to ground]: 0.60338 kg; lognormal variance with pedigree 0.1786, pedigree (4,5,5,5,5)
  Estimation, based on the assumption that 0.2% of volatile input materials is emitted to air occurring from the purge vent, the destillation vent and fugitive emission sources. Remaining gases like CH4 or CO are oxidated to CO2. The carbon contained in the removed carbon compounds from wastewater treatment was accounted as CO2 emissions to air (assuming a removal efficiency of 90%).
  Uncertainty: Estimation
- Toluene, 2-chloro [air, urban air close to ground]: 0.0012385 kg; lognormal variance with pedigree 0.188, pedigree (4,5,5,5,5)
  (same comment as for Chlorine)
- Water [air, unspecified]: 0.0752634 m3; name water_to_air_unspecified; = (water_cooling_UNO_input*fraction_CW_to_air)+(water_salt_sole_input*fraction_PW_to_air); lognormal variance with pedigree 0.0487, pedigree (2,2,4,1,1)
  Calculated value based on literature values and expert opinion. See comments in the parametres' comment field.
  property fraction, origin: salt water 0.557994; name fraction_origin_salt_water
  property fraction, origin: unspecified 0.442006; name fraction_origin_unspecified
  property fraction, origin: fresh water 0; name fraction_origin_fresh_water
- Bromide [water, surface water]: 0.68819 kg; lognormal variance with pedigree 0.798, pedigree (4,5,5,5,5)
  (same comment as for Sulfide)
- Diethylamine [air, urban air close to ground]: 0.0013953 kg; lognormal variance with pedigree 0.188, pedigree (4,5,5,5,5)
  (same comment as for Chlorine)
- Sulfate [water, surface water]: 0.045873 kg; lognormal variance with pedigree 0.188, pedigree (4,5,5,5,5)
  (same comment as for Sulfide)
- Chloride [water, surface water]: 0.18125 kg; lognormal variance with pedigree 0.448, pedigree (4,5,5,5,5)
  (same comment as for Sulfide)
- Water [water, unspecified]: 0.215448 m3; name water_to_water_unspecified; = water_cooling_UNO_input*(1-fraction_CW_to_air)+water_salt_sole_input*(1-fraction_PW_to_air); lognormal variance with pedigree 0.0487, pedigree (2,2,4,1,1)
  (same comment as for Water)
  property fraction, origin: fresh water 0; name fraction_origin_fresh_water_Ww
  property fraction, origin: salt water 0.755935; name fraction_origin_salt_water_Ww
  property fraction, origin: unspecified 0.244065; name fraction_origin_unspecified_Ww
  property wet mass 1000 kg; name WM
  property carbon content, fossil 0; name C_content_fossil
  property dry mass 0 kg; name DM
  property water in wet mass 1000 kg; name WWM
  property carbon content, non-fossil 0; name C_content_non_fossil
- Toluene [water, surface water]: 0.00036539 kg; lognormal variance with pedigree 0.448, pedigree (4,5,5,5,5)
  (same comment as for Sulfide)
- Toluene, 2-chloro [water, surface water]: 0.0025923 kg; lognormal variance with pedigree 0.448, pedigree (4,5,5,5,5)
  (same comment as for Sulfide)
- Toluene [air, urban air close to ground]: 0.00091346 kg; lognormal variance with pedigree 0.188, pedigree (4,5,5,5,5)
  (same comment as for Chlorine)
- Sodium, ion [water, surface water]: 0.29674 kg; lognormal variance with pedigree 0.798, pedigree (4,5,5,5,5)
  (same comment as for Sulfide)

## Sampling procedure
Literature data

## Extrapolations
This dataset has been extrapolated from year 2010 to the year of the calculation (2021). The uncertainty has been adjusted accordingly.

## Review by Thomas Nemecek 2010-03-11
Passed.
none

## Review by Roland Hischier 2011-11-18
Transfer of documentation done.
