# treatment of waste rubber, unspecified, municipal incineration

Dataset: EcoSpold 2, unit process
Geography: RoW
Time period: 2006-01-01 to 2021-12-31
Technology level: current
Classification: ISIC rev.4 ecoinvent: 3821:Treatment and disposal of non-hazardous waste
Synonyms: Siedlungsabfallverbrennung; Kehrichtverbrennung; municipal waste incineration
Scenario: Business-as-Usual
System model: Allocation, cut-off by classification
Share of production covered: 1.8 %
Generated by: Gabor Doka
Published in: Doka G. 2013
Database: ecoinvent
isCopyrightProtected: true
accessRestrictedTo: 1

## General comment
This dataset represents the activity of waste disposal of waste rubber, unspecified in a municipal solid waste incinerator (MSWI) // Recommended use of this dataset: For small or large used rubber parts (can be as part of a larger contraption), which go to disposal as part of communal waste mixture. // // Waste composition (wet, in ppm): upper heating value 29.3 MJ/kg; lower heating value 27.19 MJ/kg; H2O n.a.; O n.a.; H 106690; C 853530; S 3700; N n.a.; P n.a.; B n.a.; Cl 20000; Br n.a.; F n.a.; I n.a.; Ag n.a.; As n.a.; Ba n.a.; Cd 8; Co n.a.; Cr n.a.; Cu n.a.; Hg 0.001; Mn n.a.; Mo n.a.; Ni n.a.; Pb 70; Sb n.a.; Se n.a.; Sn n.a.; V n.a.; Zn 16000; Be n.a.; Sc n.a.; Sr n.a.; Ti n.a.; Tl n.a.; W n.a.; Si n.a.; Fe n.a.; Ca n.a.; Al n.a.; K n.a.; Mg n.a.; Na n.a.; // Share of carbon in waste that is biogenic 0%. // Share of metals in waste not oxidised and bulk-recyclable (exclude very small or thin parts) Iron: 0%; Alu: 0%; Copper: 0%. // One kg of this waste produces 0.02595 kg of slag and 0.03067 kg of residues, which are landfilled. Additional solidification with 0.01227 kg of cement. // Net energy production: 3.23MJ/kg electric energy and 6.34MJ/kg thermal energy. // Recovery of metal scrap to recycling: 0g iron scrap, 0g aluminium scrap, 0g copper scrap.

## Included activities start
waste incineration from waste reception gate and delivery into waste bunker at incinerator plant site (without transports to the incinerator)

## Included activities end
Waste-specific short-term emissions to water from leachate. Long-term emissions from landfill to ground water.

## Geography
Specific to the technology mix encountered in Switzerland in 2010. Well applicable to modern incineration practices in Europe, North America or Japan.

## Technology
average Swiss MSWI plants in 2010 (grate incinerators) with electrostatic precipitator for fly ash (ESP), wet flue gas scrubber and 25% SNCR , 42.77% SCR-high dust , 32.68% SCR-low dust -DeNOx facilities and 0% without Denox (weighted according to mass of burnt waste, representing Swiss average). Efficiency of iron scrap separation from slag : 58%. Efficiency of non-ferrous scrap separation from slag : 31%. Gross electric efficiency technology mix 15.84% and Gross thermal efficiency technology mix 28.51%

## Time period
Waste composition as given in literature reference, theoretical data or other source. Transfer coefficients for modern MSWI.

## Reference product
- waste rubber, unspecified: -1 kg; CPC 39: Wastes or scraps; By-product classification Waste
  Main reference product of this activity (supply of disposal service).
  production volume 1.9388e9 kg
    assumed to be identical mass amount as PUR in MSW (unqualified estimate)
  property price 0 EUR2005
    Waste products are assigned a price of zero as they are assumed to require further treatment.
  property heating value, net 27.19 MJ
    Value taken from the general comment of the treatment dataset.
  property carbon content 0.853
    carbon content on a dry matter basis (reserved; not for manual entry)
  properties: water in wet mass 0 kg, dry mass 1 kg, carbon content, fossil 0.853, water content 0, wet mass 1 kg, carbon content, non-fossil 0, carbon allocation 0.853 kg

## By-products
- electricity, for reuse in municipal waste incineration only: 0 kWh; name E_el_prod_MSWI; CPC 17100: Electrical energy; By-product classification allocatable product; pedigree (1,1,1,1,1)
  Net electricity generated from this waste and used in internal MSWI plant energy redistribution.
  Uncertainty: uncertainty is calculated from uncertainties in waste composition and uncertainties in energy efficiency and the uncertainty in internal energy demand
  production volume 1.7408e9 kWh
    calculated in proportion to reference product waste input to incinerator
  property true value relation 3.6; name E_el_prod_MSWI_true_value_relation
    property to calculate "true value" from
  property exergy 3.6 MJ; name E_el_prod_MSWI_exergy
    This exergy property is based on the exergy content of the product.
  property price 0.1 EUR2005; name E_el_prod_MSWI_price_EUR2005
    Estimated to be the same price as in case of electricity, medium voltage.
- heat, for reuse in municipal waste incineration only: 0 MJ; name E_th_prod_MSWI; By-product classification allocatable product; CPC 17300: Steam and hot water; pedigree (1,1,1,1,1)
  (same comment as for electricity, for reuse in municipal waste incineration only)
  production volume 1.2284e10 MJ
    calculated in proportion to reference product waste input to incinerator
  property price 0.0106 EUR2005; name E_th_prod_MSWI_price_EUR2005
    Average European district heat price from Ecoheatcool and Euroheat 2005-2006, Ecoheat Work package 1: The European heat market. Final report. 10.6 EUR/GJ i s the price of district heat. http://www.solarthermalworld.org/files/Ecoheatcool%20WP1%20Web.pdf?download
  property exergy 0.1842 MJ; name E_th_prod_MSWI_exergy
    This exergy property is based on the exergy content of the product.
  property true value relation 0.1842; name E_th_prod_MSWI_true_value_relation
    property to calculate "true value" from

## Inputs from technosphere
- process-specific burdens, residual material landfill: 0.030674 kg; lognormal variance with pedigree 0.076747, pedigree (1,1,4,1,1)
  Mass-specific expenditures required for landfilling of incineration residues.
  Uncertainty: uncertainty is calculated from uncertainties in waste composition and transfer coefficients in incinerator
- sodium hydroxide, without water, in 50% solution state: 0.0033127 kg; lognormal variance with pedigree 0.16871, pedigree (1,1,4,1,1)
  Auxilliary inputs for the flue gas treatment stage of the incinerator plant.
  Uncertainty: uncertainty calculated from uncertainty in average NaOH input, of transfer coefficients in the incinerator, and the uncertainty of the waste composition of this waste
  properties: wet mass 1 kg, dry mass 1 kg, heating value, net 3.03 MJ
- chemical, inorganic: 0.00065605 kg; lognormal variance with pedigree 0.24876, pedigree (1,1,4,1,1)
  Auxilliary inputs for the wastewater treatment stage of the incinerator plant. Proxy for Polyelectrolyte.
  Uncertainty: uncertainty calculated from uncertainty in average Polyelectrolyte input, of transfer coefficients in the incinerator, and the uncertainty of the waste composition of this waste
  properties: carbon content, fossil 0.003, wet mass 1 kg, dry mass 1 kg
- chemical, organic: 2.1223e-6 kg; lognormal variance with pedigree 1.2887, pedigree (1,1,4,1,1)
  Auxilliary inputs for the wastewater treatment stage of the incinerator plant. Proxy for (pure) Trisodium-trimercapto-s-triazine (CAS 17766-26-6), used as 15% diluted solution, aka TMT15.
  Uncertainty: uncertainty calculated from uncertainty in average TMT15 input, of transfer coefficients in the incinerator, and the uncertainty of the waste composition of this waste
  properties: wet mass 1 kg, dry mass 1 kg, carbon content, fossil 0.628, heating value, net 19.03 MJ
- hydrochloric acid, without water, in 30% solution state: 0.00017244 kg; lognormal variance with pedigree 0.24876, pedigree (1,1,4,1,1)
  Auxilliary inputs for the wastewater treatment stage of the incinerator plant.
  Uncertainty: uncertainty calculated from uncertainty in average HCl input, of transfer coefficients in the incinerator, and the uncertainty of the waste composition of this waste
  properties: wet mass 1 kg, dry mass 1 kg, heating value, net 3.32 MJ
- transport, freight, lorry, unspecified: 0 metric ton*km; pedigree (1,1,1,1,1)
  Transport services to transport incineration residues to landfills.
  Uncertainty: uncertainty calculated from uncertainty of the waste composition of this waste, uncertainty of transfer coefficients and the uncertainty in generic transportation distances
- slag landfill: 4.3093e-11 unit; lognormal variance with pedigree 0.034563, pedigree (1,1,4,1,1)
  Landfill infrastructure required for landfilling of bottom ash.
  Uncertainty: uncertainty is calculated from uncertainties in waste composition and transfer coefficients in incinerator
- waste cement, hydrated: -0.030674 kg; lognormal variance with pedigree 0.085831, pedigree (1,1,4,1,1)
  Hydrated cement output for solidification of landfilled residual material.
  Uncertainty: Uncertainty calculated from uncertainty of the waste composition of this waste and transfer coefficients in the incinerator and of the solidification recipe.
  production volume 5.94703e7 kg
    calculated in proportion to reference product waste input to incinerator
  properties: wet mass 1 kg, dry mass 1 kg
- iron (III) chloride, without water, in 40% solution state: 0.00024047 kg; lognormal variance with pedigree 0.32227, pedigree (1,1,4,1,1)
  Auxilliary inputs for the wastewater treatment stage of the incinerator plant.
  Uncertainty: uncertainty calculated from uncertainty in average FeCl3 input, of transfer coefficients in the incinerator, and the uncertainty of the waste composition of this waste
  properties: wet mass 1 kg, dry mass 1 kg
- chromium oxide, flakes: 1.3035e-6 kg; lognormal variance with pedigree 0.52168, pedigree (1,1,4,1,1)
  Input to DeNOx stage.
  Uncertainty: uncertainty calculated from uncertainty in average DeNOx input, uncertainty in the share of thermal NOx, uncertainty of nitrogen content in average municipal waste and the uncertainty in nitrogen content in *this* waste.
  properties: wet mass 1 kg, dry mass 1 kg
- residual material landfill: 6.3904e-11 unit; lognormal variance with pedigree 0.076747, pedigree (1,1,4,1,1)
  Landfill infrastructure required for landfilling of incineration residues.
  Uncertainty: uncertainty is calculated from uncertainties in waste composition and transfer coefficients in incinerator
- cement, unspecified: 0 kg; pedigree (1,1,1,1,1)
  Cement required for solidification of landfilled residual material.
  Uncertainty: Uncertainty calculated from uncertainty of the waste composition of this waste, of transfer coefficients in the incinerator and of the solidification recipe.
  properties: dry mass 1 kg, wet mass 1 kg
- titanium dioxide: 6.3872e-5 kg; lognormal variance with pedigree 0.52168, pedigree (1,1,4,1,1)
  Input to DeNOx stage (TiO2 catalyst carrier)
  Uncertainty: uncertainty calculated from uncertainty in average DeNOx input, uncertainty in the share of thermal NOx, uncertainty of nitrogen content in average municipal waste and the uncertainty in nitrogen content in *this* waste.
  properties: dry mass 1 kg, wet mass 1 kg
- process-specific burdens, slag landfill: 0.02424 kg; lognormal variance with pedigree 0.034563, pedigree (1,1,4,1,1)
  Mass-specific expenditures required for landfilling of bottom ash.
  Uncertainty: uncertainty is calculated from uncertainties in waste composition and transfer coefficients in incinerator
- municipal waste incineration facility: 2.5e-10 unit
  Demands per kilogram waste.
- quicklime, milled, packed: 0.01064 kg; lognormal variance with pedigree 0.29531, pedigree (1,1,4,1,1)
  Auxilliary inputs for the flue gas treatment stage of the incinerator plant.
  Uncertainty: uncertainty calculated from uncertainty in average CaO input, of transfer coefficients in the incinerator, and the uncertainty of the waste composition of this waste
  properties: dry mass 0.99 kg, wet mass 1 kg, water content 0.010101
- ammonia, anhydrous, liquid: 0 kg; pedigree (1,1,1,1,1)
  Input to DeNOx stage (100% NH3).
  Uncertainty: uncertainty calculated from uncertainty in average DeNOx input, uncertainty in the share of thermal NOx, uncertainty of nitrogen content in average municipal waste and the uncertainty in nitrogen content in *this* waste.
  properties: dry mass 1 kg, wet mass 1 kg
- heat, district or industrial, natural gas: 0 MJ; pedigree (1,1,1,1,1)
  Input to DeNOx stage, to heat up flue gas in low-dust SCR.
  Uncertainty: uncertainty calculated from uncertainty in average DeNOx input, uncertainty in the share of thermal NOx, uncertainty of nitrogen content in average municipal waste and the uncertainty in nitrogen content in *this* waste.
  properties: heating value, net 1 MJ
- water, decarbonised: 0 kg; pedigree (1,1,1,1,1)
  Incinerator process water used in flue gas scrubber stage.
  Uncertainty: uncertainty calculated from uncertainty in average water input, and the uncertainty of the waste composition of this waste
  properties: wet mass 1 kg
- transport, freight, lorry, unspecified: 0.000251381, 3.93569e-5, 0.00190586 metric ton*km (3 entries); lognormal variance with pedigree 0.035364, pedigree (1,1,4,1,1)
  (same comment as for transport, freight, lorry, unspecified)
- cement, unspecified: 0.00043086, 3.15575e-5, 8.99493e-5, 0.00203423, 5.98734e-5, 0.000657587, 7.95607e-5, 0.00888638 kg (8 entries); lognormal variance with pedigree 0.085831, pedigree (1,1,4,1,1)
  (same comment as for cement, unspecified)
- ammonia, anhydrous, liquid: 0.0002137, 1.83701e-5, 2.85792e-5, 5.66255e-5, 5.5478e-5, 5.81469e-6, 2.59938e-5, 0.000614938 kg (8 entries); lognormal variance with pedigree 0.16485, pedigree (1,1,4,1,1)
  (same comment as for ammonia, anhydrous, liquid)
- heat, district or industrial, natural gas: 0.00289357, 0.187746 MJ (2 entries); lognormal variance with pedigree 0.16485, pedigree (1,1,4,1,1)
  (same comment as for heat, district or industrial, natural gas)
- water, decarbonised: 0.0809671, 0.210676, 0.849706, 0.108202, 1.58103, 0.0103429, 1.34208 kg (7 entries); lognormal variance with pedigree 0.32227, pedigree (1,1,4,1,1)
  (same comment as for water, decarbonised)

## Inputs from nature
- Oxygen [natural resource, in air]: 3.1374 kg; lognormal variance with pedigree 0.018203, pedigree (1,1,4,1,1)
  Oxygen from ambient air needed to combust and oxidise this waste. Net demand, i.e. without O2 leaving the plant in flue gas uncombusted.
  Uncertainty: uncertainty is calculated from uncertainties in waste composition and transfer coefficients to flue gas and soild residues in incinerator

## Emissions to nature
- Sulfate [water, ground-, long-term]: 0.009164 kg; lognormal variance with pedigree 0.27711, pedigree (1,1,4,1,1)
  Long-term emissions from landfilling of incineration residues.
  Uncertainty: uncertainty is calculated from uncertainties in waste composition and transfer coefficients in incinerator and landfills.
- Water [water, surface water]: 0.00047507 m3; lognormal variance with pedigree 1.3625, pedigree (1,1,4,1,1)
  Process water released to surface water.
  Uncertainty: uncertainty calculated from uncertainty in process water input and the uncertainty of fraction to surface water.
- Particulates, < 2.5 um [air, urban air close to ground]: 7.9612e-7 kg; lognormal variance with pedigree 0.3649, pedigree (1,1,4,1,1)
  Incomplete combustion product emitted to air.
  Uncertainty: uncertainty calculated from uncertainty in average operation emissions, and the uncertainty of the flue gas volume from this waste.
- Benzo(a)pyrene [air, urban air close to ground]: 1.4839e-13 kg; lognormal variance with pedigree 0.3649, pedigree (1,1,4,1,1)
  (same comment as for Particulates, < 2.5 um)
- COD, Chemical Oxygen Demand [water, surface water]: 0.00099845 kg; lognormal variance with pedigree 0.031773, pedigree (1,1,4,1,1)
  Emissions to water from waste composition and transfer coefficients in incinerator and landfills.
  Uncertainty: uncertainty is calculated from uncertainties in waste composition and transfer coefficients in incinerator and landfills
- Benzene, pentachloro- [air, urban air close to ground]: 3.523e-11 kg; lognormal variance with pedigree 0.070919, pedigree (1,1,4,1,1)
  (same comment as for Particulates, < 2.5 um)
- Chloride [water, ground-, long-term]: 0.0046345 kg; lognormal variance with pedigree 0.29491, pedigree (1,1,4,1,1)
  (same comment as for Sulfate)
- Mercury [water, surface water]: 1.086e-12 kg; lognormal variance with pedigree 1.4077, pedigree (1,1,4,1,1)
  (same comment as for COD, Chemical Oxygen Demand)
- BOD5, Biological Oxygen Demand [water, ground-, long-term]: 0.0020966 kg; lognormal variance with pedigree 0.020961, pedigree (1,1,4,1,1)
  (same comment as for Sulfate)
- Nitrogen oxides [air, urban air close to ground]: 0.00037957 kg; lognormal variance with pedigree 0.21256, pedigree (1,1,4,1,1)
  Sum of fuel-Nox and thermal-NOx emitted to air after DeNOx stage.
  Uncertainty: uncertainty calculated from uncertainty in average N-emissions and uncertainty in the share of thermal NOx and the uncertainty in nitrogen content in *this* waste.
- Phenol, pentachloro- [air, urban air close to ground]: 2.9039e-12 kg; lognormal variance with pedigree 0.070919, pedigree (1,1,4,1,1)
  (same comment as for Particulates, < 2.5 um)
- DOC, Dissolved Organic Carbon [water, ground-, long-term]: 0.0025363 kg; lognormal variance with pedigree 0.020961, pedigree (1,1,4,1,1)
  (same comment as for Sulfate)
- Water [air, urban air close to ground]: 0.0017641 m3; lognormal variance with pedigree 0.84422, pedigree (1,1,4,1,1)
  Water vapour from waste humidity, hydrogen oxidation and part of the process water.
  Uncertainty: Uncertainty calculated from uncertainty in waste composition, process water input and the uncertainty of fraction to air.
- Toluene [air, urban air close to ground]: 1.3336e-8 kg; lognormal variance with pedigree 0.070919, pedigree (1,1,4,1,1)
  (same comment as for Particulates, < 2.5 um)
- DOC, Dissolved Organic Carbon [water, surface water]: 0.00043602 kg; lognormal variance with pedigree 0.031834, pedigree (1,1,4,1,1)
  (same comment as for COD, Chemical Oxygen Demand)
- Lead [water, ground-, long-term]: 3.3844e-5 kg; lognormal variance with pedigree 4.1602, pedigree (1,1,4,1,1)
  (same comment as for Sulfate)
- Dioxins, measured as 2,3,7,8-tetrachlorodibenzo-p-dioxin [air, urban air close to ground]: 1.3335e-14 kg; lognormal variance with pedigree 0.3649, pedigree (1,1,4,1,1)
  (same comment as for Particulates, < 2.5 um)
- Mercury [water, ground-, long-term]: 6.3691e-11 kg; lognormal variance with pedigree 3.4337, pedigree (1,1,4,1,1)
  (same comment as for Sulfate)
- Carbon monoxide, fossil [air, urban air close to ground]: 1.1335e-5 kg; lognormal variance with pedigree 0.73531, pedigree (1,1,4,1,1)
  (same comment as for Particulates, < 2.5 um)
- Benzene, hexachloro- [air, urban air close to ground]: 1.3943e-11 kg; lognormal variance with pedigree 0.070919, pedigree (1,1,4,1,1)
  (same comment as for Particulates, < 2.5 um)
- COD, Chemical Oxygen Demand [water, ground-, long-term]: 0.0064097 kg; lognormal variance with pedigree 0.020961, pedigree (1,1,4,1,1)
  (same comment as for Sulfate)
- Cadmium, ion [water, surface water]: 7.6676e-10 kg; lognormal variance with pedigree 1.0872, pedigree (1,1,4,1,1)
  (same comment as for COD, Chemical Oxygen Demand)
- Ammonia [air, urban air close to ground]: 1.1986e-6 kg; lognormal variance with pedigree 0.21256, pedigree (1,1,4,1,1)
  Nitrogen species emitted to air after DeNOx stage.
  Uncertainty: uncertainty calculated from uncertainty in average N-emissions and uncertainty in the share of thermal NOx and the uncertainty in nitrogen content in *this* waste.
- TOC, Total Organic Carbon [water, ground-, long-term]: 0.0025363 kg; lognormal variance with pedigree 0.020961, pedigree (1,1,4,1,1)
  (same comment as for Sulfate)
- Benzene [air, urban air close to ground]: 6.6681e-9 kg; lognormal variance with pedigree 0.070919, pedigree (1,1,4,1,1)
  (same comment as for Particulates, < 2.5 um)
- Sulfur dioxide [air, urban air close to ground]: 3.9348e-5 kg; lognormal variance with pedigree 0.50954, pedigree (1,1,4,1,1)
  Emission to air from waste composition and transfer coefficients.
  Uncertainty: uncertainty is calculated from uncertainties in waste composition and transfer coefficients in incinerator
- Heat, waste [air, urban air close to ground]: 22.091 MJ; lognormal variance with pedigree 0.023402, pedigree (1,1,4,1,1)
  Waste heat generated from heating value of this waste plus any electricity required to process it.
  Uncertainty: uncertainty is calculated from uncertainties in waste composition and uncertainties in energy efficiency and the uncertainty in internal energy demand
- Mercury [air, urban air close to ground]: 2.8354e-11 kg; lognormal variance with pedigree 1.9367, pedigree (1,1,4,1,1)
  (same comment as for Sulfur dioxide)
- Carbon dioxide, fossil [air, urban air close to ground]: 3.1108 kg; lognormal variance with pedigree 0.0087984, pedigree (1,1,4,1,1)
  (same comment as for Sulfur dioxide)
- Cadmium, ion [water, ground-, long-term]: 5.8377e-7 kg; lognormal variance with pedigree 6.7598, pedigree (1,1,4,1,1)
  (same comment as for Sulfate)
- TOC, Total Organic Carbon [water, surface water]: 0.00043602 kg; lognormal variance with pedigree 0.031834, pedigree (1,1,4,1,1)
  (same comment as for COD, Chemical Oxygen Demand)
- BOD5, Biological Oxygen Demand [water, surface water]: 0.00098562 kg; lognormal variance with pedigree 0.032318, pedigree (1,1,4,1,1)
  (same comment as for COD, Chemical Oxygen Demand)
- Hydrogen chloride [air, urban air close to ground]: 1.1413e-5 kg; lognormal variance with pedigree 0.31781, pedigree (1,1,4,1,1)
  (same comment as for Sulfur dioxide)
- Lead [air, urban air close to ground]: 5.767e-9 kg; lognormal variance with pedigree 1.0534, pedigree (1,1,4,1,1)
  (same comment as for Sulfur dioxide)
- Particulates, > 2.5 um, and < 10um [air, urban air close to ground]: 4.0006e-9 kg; lognormal variance with pedigree 0.16377, pedigree (1,1,4,1,1)
  (same comment as for Particulates, < 2.5 um)
- Zinc, ion [water, ground-, long-term]: 0.0048656 kg; lognormal variance with pedigree 2.4654, pedigree (1,1,4,1,1)
  (same comment as for Sulfate)
- Methane, fossil [air, urban air close to ground]: 1.0002e-7 kg; lognormal variance with pedigree 0.070919, pedigree (1,1,4,1,1)
  (same comment as for Particulates, < 2.5 um)
- Heat, waste [water, surface water]: 5.0509 MJ; lognormal variance with pedigree 0.023402, pedigree (1,1,4,1,1)
  (same comment as for Heat, waste)
- Chloride [water, surface water]: 0.015354 kg; lognormal variance with pedigree 0.23461, pedigree (1,1,4,1,1)
  (same comment as for COD, Chemical Oxygen Demand)
- Cadmium [air, urban air close to ground]: 4.0777e-9 kg; lognormal variance with pedigree 1.3318, pedigree (1,1,4,1,1)
  (same comment as for Sulfur dioxide)
- Lead [water, surface water]: 6.6959e-9 kg; lognormal variance with pedigree 0.85451, pedigree (1,1,4,1,1)
  (same comment as for COD, Chemical Oxygen Demand)
- NMVOC, non-methane volatile organic compounds, unspecified origin [air, urban air close to ground]: 3.0346e-7 kg; lognormal variance with pedigree 0.070919, pedigree (1,1,4,1,1)
  (same comment as for Particulates, < 2.5 um)
- Zinc [air, urban air close to ground]: 1.0724e-5 kg; lognormal variance with pedigree 0.34048, pedigree (1,1,4,1,1)
  (same comment as for Sulfur dioxide)
- Sulfate [water, surface water]: 0.001877 kg; lognormal variance with pedigree 0.23216, pedigree (1,1,4,1,1)
  (same comment as for COD, Chemical Oxygen Demand)
- Zinc, ion [water, surface water]: 1.4436e-6 kg; lognormal variance with pedigree 0.35249, pedigree (1,1,4,1,1)
  (same comment as for COD, Chemical Oxygen Demand)
