# packaging glass production, brown, without cullet

Dataset: EcoSpold 2, unit process
Geography: GLO
Time period: 2000-01-01 to 2021-12-31
Technology level: current
Classification: EcoSpold01Categories: glass/packaging
Classification: ISIC rev.4 ecoinvent: 2310:Manufacture of glass and glass products
Scenario: Business-as-Usual
System model: Allocation, cut-off by classification
Generated by: Bo Weidema
Published in: Hischier R. 2007
Database: ecoinvent
isCopyrightProtected: true
accessRestrictedTo: 1

## General comment
Most packaging glass is produced with cullet input. This datasets represents a marginal additional production without cullet.

## Included activities start
From the reception of precursors silica sand, soda, limestone, dolomite, feldspar, and chemicals inorganics at the factory gate.

## Included activities end
This activity ends with the production of 1 kg of brown packaging glass. The dataset includes material and energy inputs, water consumption, emissions to air and water, waste production and infrastructure.

## Technology
Mix of present used technologies in Europe

## Parameters
- original gas input: 0.0915385 m3; name gas_original; lognormal variance with pedigree 0.0201, pedigree (1,2,1,5,3)
  natural gas use per kg glass in original dataset
  Uncertainty: average value from EU-IPPC report
- emission factor CO from oil: 7e-6 dimensionless; name EF_CO_oil; lognormal variance with pedigree 1.0832, pedigree (2,1,1,5,2)
  Emission factor (kg/MJ fuel) corresponding to that used in datasets for combustion in industrial furnaces/boilers.
- energy saving factor: 0.25 dimensionless; name energy_saving_factor; triangular min 0.2, mostLikely 0.25, max 0.3, pedigree (2,1,1,5,1)
  Reduction of energy requirement per % cullet (EU commission 2012: Best Available Techniques (BAT) Reference Document for the Manufacture of Glass)
- emission factor dioxins from gas: 3e-17 dimensionless; name EF_dioxin_gas; lognormal variance with pedigree 1.0832, pedigree (2,1,1,5,2)
  (same comment as for emission factor CO from oil)
- fraction, tap water, to air: 0.15 dimensionless; name fraction_TW_to_air; = fraction_PW_to_air; lognormal variance with pedigree 0.092025, pedigree (4,4,3,2,4)
  Calculated value. See comment in the other parametres present in this dataset. Tap water is considered to be always used as process water, thus process water fractions to air are applied to all tap water input flows to calculate the amount of water consumed in the processes.
- emission factor CO from gas: 2.2e-6 dimensionless; name EF_CO_gas; lognormal variance with pedigree 1.0832, pedigree (2,1,1,5,2)
  (same comment as for emission factor CO from oil)
- Na2O in cullet: 0.13 kg; name Na2O_in_glass; triangular min 0.12, mostLikely 0.13, max 0.14, pedigree (2,1,1,5,2)
  Average Na2O content in container glass (EU commission 2012: Best Available Techniques (BAT) Reference Document for the Manufacture of Glass)
- fraction, process water, to air: 0.15 dimensionless; name fraction_PW_to_air; lognormal variance with pedigree 0.092025, pedigree (4,4,3,2,4)
  Literature value. In case when no industry/process specific data are available, default evaporation fraction value is used. This value is 15% and is based on literature (Statistics Canada, 2007 & Shaffer, K.H., 2008, Consumptive water use in the Great Lakes Basin, USGS & Shiklomanov, 2003, World Water Resources at the Beginning of the 21st Century) and has been approved by an expert.
- emission factor N2O from oil: 7e-7 dimensionless; name EF_N2O_oil; lognormal variance with pedigree 1.0832, pedigree (2,1,1,5,2)
  (same comment as for emission factor CO from oil)
- emission factor benzo(a)pyrene from oil: 3e-11 dimensionless; name EF_benzo_oil; lognormal variance with pedigree 1.0832, pedigree (2,1,1,5,2)
  (same comment as for emission factor CO from oil)
- emission factor formaldehyde from gas: 1e-7 dimensionless; name EF_formaldehyde_gas; lognormal variance with pedigree 1.0832, pedigree (2,1,1,5,2)
  (same comment as for emission factor CO from oil)
- emission factor benzene from oil: 2e-8 dimensionless; name EF_benzene_oil; lognormal variance with pedigree 1.0832, pedigree (2,1,1,5,2)
  (same comment as for emission factor CO from oil)
- emission factor methane from heavy fuel oil: 4.2e-6 dimensionless; name EF_CH4_heavy; lognormal variance with pedigree 1.0832, pedigree (2,1,1,5,2)
  (same comment as for emission factor CO from oil)
- emission factor N2O from gas: 1e-7 dimensionless; name EF_N2O_gas; lognormal variance with pedigree 1.0832, pedigree (2,1,1,5,2)
  (same comment as for emission factor CO from oil)
- cullet input, kg per kg output: 0.57 dimensionless; name cullet_fraction; lognormal variance with pedigree 0.0148, pedigree (2,4,2,5,1)
  Cullet input in original dataset
- emission factor methane from light fuel oil: 1e-6 dimensionless; name EF_CH4_light; lognormal variance with pedigree 1.0832, pedigree (2,1,1,5,2)
  (same comment as for emission factor CO from oil)
- emission factor benzo(a)pyrene from gas: 1e-11 dimensionless; name EF_benzo_gas; lognormal variance with pedigree 1.0832, pedigree (2,1,1,5,2)
  (same comment as for emission factor CO from oil)
- original cullet input, kg per kg raw material input: 0.53 dimensionless; name cullet_original; lognormal variance with pedigree 0.0148, pedigree (2,4,2,5,1)
- CaO in cullet: 0.105 kg; name CaO_in_glass; triangular min 0.09, mostLikely 0.105, max 0.12, pedigree (2,1,1,5,2)
  Average CaO content in container glass (EU commission 2012: Best Available Techniques (BAT) Reference Document for the Manufacture of Glass)
- emission factor benzene: 4e-7 dimensionless; name EF_benzene_gas; lognormal variance with pedigree 1.0832, pedigree (2,1,1,5,2)
  (same comment as for emission factor CO from oil)
- emission factor dioxins from oil: 4.7e-16 dimensionless; name EF_dioxin_oil; lognormal variance with pedigree 1.0832, pedigree (2,1,1,5,2)
  (same comment as for emission factor CO from oil)
- emission factor formaldehyde from oil: 4.7e-7 dimensionless; name EF_formaldehyde_oil; lognormal variance with pedigree 1.0832, pedigree (2,1,1,5,2)
  (same comment as for emission factor CO from oil)
- electricity input: 0.244 kWh; name electricity_original; lognormal variance with pedigree 0.0201, pedigree (1,2,1,5,3)
  electricity use per kg glass in original dataset
  Uncertainty: average value from EU-IPPC report
- emission factor methane from gas: 2e-6 dimensionless; name EF_CH4_gas; lognormal variance with pedigree 1.0832, pedigree (2,1,1,5,2)
  (same comment as for emission factor CO from oil)

## Reference product
- packaging glass, brown: 1 kg; CPC 37191: Bottles, jars, phials and other containers, of glass, of a kind used for the conveyance or packing of goods, e[…]; By-product classification allocatable product
  EcoSpold01Location=RER
  production volume 11850 kg; name PV_glass
    Estimated value; to be 1/1000000 of the production volume of packaging glass production, brown produced from glass cullets.
  property price 0.385942 EUR2005
    Calculated based on inputs: The price of the product has been calculated as a sum of the values of the material and energy inputs for this product. This value is therefore a rough estimation. It may underestimate the real price since there are additional expenses when producing any product. These expences can include for example labour costs, treatment of waste materials and profit for the producer. Please consider carefully whether this level of data quality is acceptable for your application.
  property carbon content 0
    carbon content on a dry matter basis (reserved; not for manual entry)
  properties: carbon content, fossil 0, wet mass 1 kg, water in wet mass 0 kg, carbon content, non-fossil 0, water content 0, dry mass 1 kg, carbon allocation 0 kg

## Inputs from technosphere
- packaging glass factory: 1.25e-10 unit; lognormal variance with pedigree 0.494, pedigree (5,4,5,5,4)
  EcoSpold01Location=RER
  Estimation: infrastructure represents an average packaging glass factory in Europe.
  Uncertainty: own estimation
- portafer: 0.001 kg; lognormal variance with pedigree 0.0526, pedigree (1,3,5,5,1)
  EcoSpold01Location=RER
  Pigment. Order of magnitude estimate.
  properties: dry mass 1 kg, wet mass 1 kg
- polyethylene, high density, granulate: 0.0129 kg; lognormal variance with pedigree 0.054, pedigree (1,4,5,5,1)
  EcoSpold01Location=RER
  Literature value: average european value from literature source.
  properties: carbon content, fossil 0.857143, wet mass 1 kg, heating value, net 42.47 MJ, dry mass 1 kg
  note on carbon content, fossil: Polyethylene is formed out of a huge amount of ethylene monomers (C2H4) (ecoinvent v2.2 report 11_II). MW=28 g/mol
- lubricating oil: 0 kg; pedigree (1,1,1,1,1)
  data from a German study (UBA)
  EcoSpold01Location=RER
  Uncertainty: data from a German study (UBA)
  properties: carbon content, fossil 0.75, wet mass 1 kg, dry mass 1 kg, heating value, net 40.2 MJ
  note on carbon content, fossil: Lubricating oil is produced from diesel. C-content/dry mass of fats and oils considered 75%, from: ecoinvent v2.2 report, n 15a, pg 40
  note on heating value, net: Literature value, Source: IPCC 2006, 2006 IPCC Guidelines for National Greenhouse Gas Inventories, Prepared by the National Greenhouse Gas Inventories Programme, Eggleston H.S., Buendia L., Miwa K., Ngara T. and Tanabe K. (eds). Published: IGES, Japan
- chemical, inorganic: 0.022 kg; name chemicals; lognormal variance with pedigree 0.0601, pedigree (1,2,5,5,3)
  average value from EU-IPPC report
  EcoSpold01Location=GLO
  Uncertainty: average value from EU-IPPC report
  properties: dry mass 1 kg, carbon content, fossil 0.003, wet mass 1 kg
  note on carbon content, fossil: This dataset is an unweighted average of 20 inorganic substances (listed in Tab 88.1, ecoinvent v2.2 report 8, part II), being part of the top100 chemicals included in this database. The C-content has also been calculated as an unweighted average of the C content of the substances composing this dataset.
- lime, hydrated, loose weight: 0 kg; pedigree (1,1,1,1,1)
  Order of magnitude estimate
  EcoSpold01Location=CH
  Uncertainty: data from 1 Vetropack site
  properties: wet mass 1 kg, water content 0.00300903, dry mass 0.997 kg
- EUR-flat pallet: 0 unit; pedigree (1,1,1,1,1)
  Literature value: average european value from literature value
  EcoSpold01Location=RER
  properties: dry mass 18.3333 kg, water content 0.2, carbon content, non-fossil 0.58833, carbon content, fossil 0.0311351, wet mass 22 kg, heating value, net 335.11 MJ
  note on carbon content, non-fossil: C content in components of the pallet (ecoinvent v2.2 report 7_part XVIII)
- diesel: 0.00177 kg; lognormal variance with pedigree 0.0526, pedigree (1,3,5,5,1)
  EcoSpold01Location=RER
  Literature value.
  properties: carbon content, fossil 0.865, wet mass 1 kg, heating value, net 42.8 MJ, dry mass 1 kg
  note on carbon content, fossil: C-content of diesel is 86.5% (ecoinvent v2.2 report 6_IV, Tab 3.14)
- solid bleached and unbleached board carton: 0 kg; pedigree (1,1,1,1,1)
  EcoSpold01Location=RER
  Literature value: average european value from literature source.
  properties: heating value, net 9.8 MJ, wet mass 1 kg, carbon content, non-fossil 0.327779, carbon content, fossil 0.0190874, water content 0.0582011, dry mass 0.945 kg
- graphite: 1.25e-6 kg; lognormal variance with pedigree 0.0421, pedigree (1,2,5,5,1)
  Literature value.
  EcoSpold01Location=RER
  Uncertainty: data from a German study (UBA)
  properties: heating value, net 30.3 MJ, dry mass 1 kg, carbon content, fossil 1, wet mass 1 kg
- refractory, fireclay, packed: 0.0143 kg; name clay; lognormal variance with pedigree 0.0601, pedigree (1,2,5,5,3)
  EcoSpold01Location=DE
  Estimation: it includes all minor raw materials. The total amount for european production is from literature source.
  Uncertainty: average value from EU-IPPC report
  properties: wet mass 1 kg, dry mass 1 kg
- soda ash, light, crystalline, heptahydrate: 0.222258 kg; name soda; = Na2O_in_glass*106/62; lognormal variance with pedigree 0.0601, pedigree (1,2,5,5,3)
  EcoSpold01Location=RER
  Calculated to correspond to give same composition of packaging glass as packaging glass with cullet from packaging glass. Molar mass of soda (Na2CO3) to Na2O:106 to 62.
  properties: heating value, net 3.43 MJ, dry mass 1 kg, carbon content, fossil 0.0517241, wet mass 1 kg
- heavy fuel oil: 0 kg; name heavy_fuel; pedigree (1,1,1,1,1)
  EcoSpold01Location=RER
  Estimation: reported total amount of energy required per glass melted from literature source. Average european mix of 50% fuel oil and 50% natural gas estimated based on literature source. Light fuel oil and heavy fuel oil at equal parts. Oil mainly used for curing and has therefore not been increased relative to the dataset with cullet input.
  Uncertainty: average value from EU-IPPC report
  property carbon content, fossil 0.849; name C_in_heavy_fuel
  properties: heating value, net 41.2 MJ, wet mass 1 kg, dry mass 1 kg
- dolomite: 0 kg; pedigree (1,1,1,1,1)
  EcoSpold01Location=RER
  Same value as for packaging glass with cullet input
  properties: heating value, net 3.95 MJ, carbon content, fossil 0.130435, dry mass 1 kg, wet mass 1 kg
- lime: 0 kg; pedigree (1,1,1,1,1)
  Calculated value to give - together with dolomite input - a CaO content of 10.5% in the glass.
  EcoSpold01Location=CH
  properties: dry mass 1 kg, carbon content, fossil 0.120005, wet mass 1 kg
- wastewater from glass production: -0.00176 m3; lognormal variance with pedigree 0.0601, pedigree (1,2,5,5,3)
  average value from EU-IPPC report
  EcoSpold01Location=CH
  Uncertainty: average value from EU-IPPC report
  production volume 20.856 m3; = PV_glass*0.00176
    Calculated from the production volume of packaging glass, brown in proportion to the respective output amounts.
  properties: dry mass 1.09356 kg, water content 913.443, wet mass 1000 kg, carbon content, fossil 0.0455242
  note on carbon content, fossil: COD= 0.115 kg/m3 (Tab A.18, ecoinvent v2.2 report 13_I). COD was converted to TOC, using conversion factors in Tab 4.10 (ecoinvent v2.2 report 13_IV). TOC was considered as Total Carbon.
- silica sand: 0.673244 kg; = 1-lime*56/100-soda*62/106-dolomite*127/215-feldspar-chemicals-clay+(waste*-1)-portafer; lognormal variance with pedigree 0.0601, pedigree (1,2,5,5,3)
  Calculated as residual raw material requirement.
  EcoSpold01Location=DE
  properties: wet mass 1 kg, dry mass 0.99 kg, water content 0.010101
- light fuel oil: 0 kg; name light_fuel; pedigree (1,1,1,1,1)
  (same comment as for heavy fuel oil)
  property carbon content, fossil 0.862; name C_in_light_fuel
  properties: wet mass 1 kg, dry mass 1 kg, heating value, net 42.6 MJ
- electricity, medium voltage: 0.281268 kWh; = electricity_original/(1-energy_saving_factor*cullet_original); lognormal variance with pedigree 0.0601, pedigree (1,2,5,5,3)
  Calculated from original electricity input and cullet fraction and the reduction in energy requirement per % cullet (EU commission 2012: Best Available Techniques (BAT) Reference Document for the Manufacture of Glass)
  EcoSpold01Location=UCTE
  Uncertainty: average value from EU-IPPC report
- municipal solid waste: 0 kg; name waste; pedigree (1,1,1,1,1)
  (same comment as for wastewater from glass production)
  production volume 0 kg
    (same comment as for wastewater from glass production)
  properties: wet mass 1 kg, carbon content, fossil 0.171549, heating value, net 11.74 MJ, carbon content, non-fossil 0.261655, dry mass 0.771 kg, water content 0.297017
  note on carbon content, fossil: MSW composition in tab 4.1, ecoinvent v2.2 report 13_I. C content referred to 1 kg DM
  note on heating value, net: Value taken from the general comment of the treatment dataset.
- natural gas, high pressure: 0.10552 m3; name gas; = gas_original/(1-energy_saving_factor*cullet_original); lognormal variance with pedigree 0.0601, pedigree (1,2,5,5,3)
  Calculated from original natural gas input and cullet fraction and the reduction in energy requirement per % cullet (EU commission 2012: Best Available Techniques (BAT) Reference Document for the Manufacture of Glass)
  EcoSpold01Location=RER
  property carbon content, fossil 0.602381; name C_in_gas
  properties: heating value, gross 39 MJ, dry mass 0.84 kg, wet mass 0.84 kg, heating value, net 39 MJ
  note on carbon content, fossil: An average C content of 0.506 kg C/ m3 has been assumed (this average has been calculated using data in Tab 3.5, ecoinvent v2.2 report 6_V
  note on heating value, net: Literature value, Source: United Nations Statistics Division (2018) International Recommendations for Energy Statistics (IRES). Available at: http://unstats.un.org/unsd/statcom/doc11/BG-IRES.pdf.
- feldspar: 0.0375 kg; lognormal variance with pedigree 0.0601, pedigree (1,2,5,5,3)
  Literature value.
  EcoSpold01Location=RER
  properties: wet mass 1 kg, dry mass 1 kg
- tap water: 0.1 kg; name tap_water_input; lognormal variance with pedigree 0.0906, pedigree (5,3,5,1,1)
  Order of magnitude estimate
  EcoSpold01Location=RER
  properties: wet mass 1 kg, carbon content, fossil 0.00178991, water content 2962.17, dry mass 0.000337476 kg
  note on carbon content, fossil: Bicarbonate content is 2.93 mol/m3. CO2 content is 0.1 mol/m3 (ecoinvent v2.2 report 8, Tab 93.1).
- lubricating oil: 4.1412e-6, 1.96588e-5 kg (2 entries); lognormal variance with pedigree 0.0421, pedigree (1,2,5,5,1)
  (same comment as for lubricating oil)
- lime, hydrated, loose weight: 8.417e-6, 0.000991583 kg (2 entries); lognormal variance with pedigree 0.0526, pedigree (1,3,5,5,1)
  Order of magnitude estimate
  EcoSpold01Location=CH
  Uncertainty: data from 1 Vetropack site
- EUR-flat pallet: 0.000245938, 0.000541062 unit (2 entries); lognormal variance with pedigree 0.054, pedigree (1,4,5,5,1)
  Literature value: average european value from literature value
  EcoSpold01Location=RER
- solid bleached and unbleached board carton: 0.00126581, 0.0180342 kg (2 entries); lognormal variance with pedigree 0.054, pedigree (1,4,5,5,1)
  EcoSpold01Location=RER
  Literature value: average european value from literature source.
- heavy fuel oil: 0.0066676, 0.00046766, 0.00138444, 0.000349352, 0.00179515, 0.000272324, 0.0323635 kg (7 entries); lognormal variance with pedigree 0.0601, pedigree (1,2,5,5,3)
  (same comment as for heavy fuel oil)
  properties: heating value, net 41.2 MJ, wet mass 1 kg, dry mass 1 kg, carbon content, fossil 0.849
- dolomite: 0.0235472, 0.0444528 kg (2 entries); lognormal variance with pedigree 0.0601, pedigree (1,2,5,5,3)
  EcoSpold01Location=RER
  Same value as for packaging glass with cullet input
- lime: 0.0123921, 0.14348 kg (2 entries); lognormal variance with pedigree 0.0601, pedigree (1,2,5,5,3)
  (same comment as for lime)
- light fuel oil: 0.00648876, 0.000214361, 0.00299988, 0.000288443, 0.00148639, 0.000199069, 0.0302231 kg (7 entries); lognormal variance with pedigree 0.0601, pedigree (1,2,5,5,3)
  (same comment as for heavy fuel oil)
  properties: carbon content, fossil 0.862, wet mass 1 kg, dry mass 1 kg, heating value, net 42.6 MJ
- municipal solid waste: -0.000420945, -2.58009e-6, -1.80545e-6, -7.16519e-6, -0.0050675 kg (5 entries); lognormal variance with pedigree 0.0601, pedigree (1,2,5,5,3)
  (same comment as for wastewater from glass production)
  production volume 65.175 kg

## Inputs from nature
- Water, unspecified natural origin [natural resource, in water]: 0.00198 m3; name water_UNO_input; lognormal variance with pedigree 0.0601, pedigree (1,2,5,5,3)
  average value from EU-IPPC report
  Uncertainty: average value from EU-IPPC report

## Emissions to nature
- Sulfur dioxide [air, urban air close to ground]: 0.00344 kg; lognormal variance with pedigree 0.0601, pedigree (1,2,5,5,3)
  Literature value: average european value from literature source. It includes a mix of 32% secondary and 68% primary abatment technology.
  Uncertainty: average value from EU-IPPC report
- Hydrogen fluoride [air, urban air close to ground]: 1.8e-5 kg; lognormal variance with pedigree 0.1101, pedigree (1,2,5,5,3)
  (same comment as for Sulfur dioxide)
- Lead [air, urban air close to ground]: 7.72e-7 kg; lognormal variance with pedigree 0.704, pedigree (1,4,5,5,1)
  Literature value: average european value from literature source.
- Copper [air, urban air close to ground]: 6.74e-8 kg; lognormal variance with pedigree 0.704, pedigree (1,4,5,5,1)
  Literature value: average european value from literature source.
- Nickel [air, urban air close to ground]: 6.74e-8 kg; lognormal variance with pedigree 0.704, pedigree (1,4,5,5,1)
  Literature value: average european value from literature source.
- Antimony [air, urban air close to ground]: 6.74e-8 kg; lognormal variance with pedigree 0.704, pedigree (1,4,5,5,1)
  Literature value: average european value from literature source.
- COD, Chemical Oxygen Demand [water, surface water]: 1e-5 kg; lognormal variance with pedigree 0.0926, pedigree (1,3,5,5,1)
  Order of magnitude estimate
  Uncertainty: data from 1 Vetropack site
- Selenium [air, urban air close to ground]: 7.33e-6 kg; lognormal variance with pedigree 0.704, pedigree (1,4,5,5,1)
  Literature value: average european value from literature source.
- Hydrogen chloride [air, urban air close to ground]: 4.97e-5 kg; lognormal variance with pedigree 0.1101, pedigree (1,2,5,5,3)
  (same comment as for Sulfur dioxide)
- Methane, fossil [air, urban air close to ground]: 1.75081e-5 kg; = EF_CH4_gas*39*gas+EF_CH4_heavy*41.2*heavy_fuel+EF_CH4_light*42.6*light_fuel; lognormal variance with pedigree 0.0821, pedigree (1,2,5,5,1)
  Calculated from fuel input and emission factors in kg/MJ (lower heating value for gas, heavy fuel oil and light fuel oil, 39 MJ/m3, 41.2 MJ/kg and 42.6 MJ/kg, respectively)
- Benzene [air, urban air close to ground]: 1.71749e-6 kg; = EF_benzene_gas*39*gas+EF_benzene_oil*(41.2*heavy_fuel+42.6*light_fuel); lognormal variance with pedigree 0.1621, pedigree (1,2,5,5,1)
  (same comment as for Methane, fossil)
- Dinitrogen monoxide [air, urban air close to ground]: 2.90976e-6 kg; = EF_N2O_gas*39*gas+EF_N2O_oil*(41.2*heavy_fuel+42.6*light_fuel); lognormal variance with pedigree 0.0821, pedigree (1,2,5,5,1)
  (same comment as for Methane, fossil)
- Water [water, unspecified]: 8e-6 m3; name water_to_water_unspecified; = (tap_water_input/1000)*(1-fraction_TW_to_air)+water_UNO_input*(1-fraction_PW_to_air)-0.00176; lognormal variance with pedigree 0.130025, pedigree (4,4,5,2,4)
  Calculated value based on literature values and expert opinion. See comments in the parametres' comment field.
  property fraction, origin: fresh water 0.0480769; name fraction_origin_fresh_water_Ww
  property fraction, origin: unspecified 0.951923; name fraction_origin_unspecified_Ww
  property fraction, origin: salt water 0; name fraction_origin_salt_water_Ww
- Benzo(a)pyrene [air, urban air close to ground]: 1.4822e-10 kg; = EF_benzo_gas*39*gas+EF_benzo_oil*(41.2*heavy_fuel+42.6*light_fuel); lognormal variance with pedigree 0.1621, pedigree (1,2,5,5,1)
  (same comment as for Methane, fossil)
- Suspended solids, unspecified [water, surface water]: 1e-6 kg; lognormal variance with pedigree 0.1306, pedigree (5,3,5,1,1)
  Order of magnitude estimate
- Water [air, unspecified]: 0.000312 m3; name water_to_air_unspecified; = (tap_water_input/1000)*fraction_TW_to_air+water_UNO_input*fraction_PW_to_air; lognormal variance with pedigree 0.130025, pedigree (4,4,5,2,4)
  (same comment as for Water)
  property fraction, origin: salt water 0; name fraction_origin_salt_water
  property fraction, origin: unspecified 0.951923; name fraction_origin_unspecified
  property fraction, origin: fresh water 0.0480769; name fraction_origin_fresh_water
- Carbon dioxide, fossil [air, urban air close to ground]: 0.688964 kg; = (gas* C_in_gas+heavy_fuel* C_in_heavy_fuel+light_fuel* C_in_light_fuel)*44/12+soda*44/106+lime*44/100+dolomite*88/215; lognormal variance with pedigree 0.0601, pedigree (1,2,5,5,3)
  Calculated from carbon in fuels and raw materials
- Carbon monoxide, fossil [air, urban air close to ground]: 3.40359e-5 kg; = EF_CO_gas*39*gas+EF_CO_oil*(41.2*heavy_fuel+42.6*light_fuel); lognormal variance with pedigree 0.6921, pedigree (1,2,5,5,1)
  (same comment as for Methane, fossil)
- AOX, Adsorbable Organic Halogen as Cl [water, surface water]: 1e-7 kg; lognormal variance with pedigree 0.1306, pedigree (5,3,5,1,1)
  Order of magnitude estimate
- BOD5, Biological Oxygen Demand [water, surface water]: 1e-5 kg; lognormal variance with pedigree 0.0926, pedigree (1,3,5,5,1)
  Order of magnitude estimate
  Uncertainty: data from 1 Vetropack site
- TOC, Total Organic Carbon [water, surface water]: 1e-5 kg; lognormal variance with pedigree 0.0926, pedigree (1,3,5,5,1)
  Order of magnitude estimate
- Oils, unspecified [water, surface water]: 1e-6 kg; lognormal variance with pedigree 0.0926, pedigree (1,3,5,5,1)
  Order of magnitude estimate
- Copper, ion [water, surface water]: 1e-9 kg; lognormal variance with pedigree 0.7026, pedigree (1,3,5,5,1)
  Order of magnitude estimate
  Uncertainty: data from 1 Vetropack site
- Cobalt [air, urban air close to ground]: 6.74e-8 kg; lognormal variance with pedigree 0.704, pedigree (1,4,5,5,1)
  Literature value: average european value from literature source.
- NMVOC, non-methane volatile organic compounds, unspecified origin [air, urban air close to ground]: 4.42e-6 kg; lognormal variance with pedigree 0.0821, pedigree (1,2,5,5,1)
  data from a German study (UBA)
  Uncertainty: data from a German study (UBA)
- Particulates, < 2.5 um [air, urban air close to ground]: 0.000252 kg; lognormal variance with pedigree 0.3701, pedigree (1,2,5,5,3)
  Calculated value: total amount based on literature value (EU Commission, 2000). Distribution of particulate mater was calculated according to the ratio for the paricle distribution of combustion processes present in the literature source assuming a mix of 32% secondary and 68% primary abatment technology.
  Uncertainty: total from EU-IPPC report, split up according to US-EPA
- Chromium [air, urban air close to ground]: 6.74e-8 kg; lognormal variance with pedigree 0.704, pedigree (1,4,5,5,1)
  Literature value: average european value from literature source.
- Nitrogen oxides [air, urban air close to ground]: 0.0021 kg; lognormal variance with pedigree 0.1101, pedigree (1,2,5,5,3)
  (same comment as for Sulfur dioxide)
- Particulates, > 10 um [air, urban air close to ground]: 1.6e-5 kg; lognormal variance with pedigree 0.1101, pedigree (1,2,5,5,3)
  (same comment as for Particulates, < 2.5 um)
- Ammonia [air, urban air close to ground]: 2.88e-8 kg; lognormal variance with pedigree 0.0821, pedigree (1,2,5,5,1)
  data from a German study (UBA)
  Uncertainty: data from a German study (UBA)
- Nitrite [water, surface water]: 1e-7 kg; lognormal variance with pedigree 0.0926, pedigree (1,3,5,5,1)
  Order of magnitude estimate
- Hydrocarbons, aliphatic, alkanes, unspecified [air, urban air close to ground]: 1.19e-5 kg; lognormal variance with pedigree 0.0821, pedigree (1,2,5,5,1)
  data from a German study (UBA)
  Uncertainty: data from a German study (UBA)
- Cadmium [air, urban air close to ground]: 6.74e-8 kg; lognormal variance with pedigree 0.704, pedigree (1,4,5,5,1)
  Literature value: average european value from literature source.
- Arsenic [air, urban air close to ground]: 6.74e-8 kg; lognormal variance with pedigree 0.704, pedigree (1,4,5,5,1)
  Literature value: average european value from literature source.
- Sulfate [water, surface water]: 1e-6 kg; lognormal variance with pedigree 0.0926, pedigree (1,3,5,5,1)
  Order of magnitude estimate
- Manganese [air, urban air close to ground]: 6.74e-8 kg; lognormal variance with pedigree 0.704, pedigree (1,4,5,5,1)
  Literature value: average european value from literature source.
- Zinc, ion [water, surface water]: 1e-8 kg; lognormal variance with pedigree 0.7026, pedigree (1,3,5,5,1)
  Order of magnitude estimate
- DOC, Dissolved Organic Carbon [water, surface water]: 1e-5 kg; lognormal variance with pedigree 0.0926, pedigree (1,3,5,5,1)
  Order of magnitude estimate
- Formaldehyde [air, urban air close to ground]: 2.08891e-6 kg; = EF_formaldehyde_gas*39*gas+EF_formaldehyde_oil*(41.2*heavy_fuel+42.6*light_fuel); lognormal variance with pedigree 0.1621, pedigree (1,2,5,5,1)
  (same comment as for Methane, fossil)
- Dioxins, measured as 2,3,7,8-tetrachlorodibenzo-p-dioxin [air, urban air close to ground]: 1.80084e-15 kg; = EF_dioxin_gas*39*gas+EF_dioxin_oil*(41.2*heavy_fuel+42.6*light_fuel); lognormal variance with pedigree 0.0821, pedigree (1,2,5,5,1)
  (same comment as for Methane, fossil)
- Particulates, > 2.5 um, and < 10um [air, urban air close to ground]: 1.3e-5 kg; lognormal variance with pedigree 0.1901, pedigree (1,2,5,5,3)
  (same comment as for Particulates, < 2.5 um)

## Extrapolations
This dataset has been extrapolated from year 2000 to the year of the calculation (2021). The uncertainty has been adjusted accordingly.
