# plug production, inlet and outlet, for printer cable

Dataset: EcoSpold 2, unit process
Geography: GLO
Time period: 2000-01-01 to 2021-12-31
Technology level: current
Classification: ISIC rev.4 ecoinvent: 2610:Manufacture of electronic components and boards
Classification: EcoSpold01Categories: electronics/component
Synonyms: Connector; Male; Female
Tags: ConvertedDataset
Scenario: Business-as-Usual
System model: Allocation, cut-off by classification
Generated by: Martin Lehmann
Published in: Hischier R. 2007
Database: ecoinvent
isCopyrightProtected: false
accessRestrictedTo: 1

## General comment
This dataset represents the production of 1 unit of a typical set of plugs (inlet and outlet) for a printer cable. It is based on a inlet plug with a weight of 0.0395 kg and a outlet plug of 0.050 kg. Main data are based on weighting and calculations of a Swiss type computer cable at EMPA la-boratories, supported by EPD information.
[This dataset was already contained in the ecoinvent database version 2. It was not individually updated during the transfer to ecoinvent version 3. Life Cycle Impact Assessment results may still have changed, as they are affected by changes in the supply chain, i.e. in other datasets. This dataset was generated following the ecoinvent quality guidelines for version 2. It may have been subject to central changes described in the ecoinvent version 3 change report (http://www.ecoinvent.org/database/ecoinvent-version-3/reports-of-changes/), and the results of the central updates were reviewed extensively. The changes added e.g. consistent water flows and other information throughout the database. The documentation of this dataset can be found in the ecoinvent reports of version 2, which are still available via the ecoinvent website. The change report linked above covers all central changes that were made during the conversion process.]

## Included activities start
From reception of metal and plastic materials at the factory gate.

## Included activities end
This dataset includes materials PVC, LDPE, HDPE, silicone, low-alloyed steel, chromium steel, brass, and copper with their respective manufacturing processes, infrastructure, electricity used in the assembly of the plugs, plus the road and rail transportation for input materials from the regional storage to the production site.

## Geography
The data describes a typical set of plugs for a printer cable in 2006. Plugs and cable are produced by international manufacturers and available all over the world. Therefore a global dataset is justifiable.

## Technology
The manufacturing process is inventoried through wire drawing, injection moulding, sheet rolling & hot rolling (steel), contouring (brass), and zinc coating (galvanising of steel).

## Reference product
- plug, inlet and outlet, for printer cable: 1 unit; By-product classification allocatable product; CPC 471: Electronic valves and tubes; electronic components; parts thereof
  A printer cable refers to the cable that carries data between a computer and a printer. There are many different types of printer cables, for example: Serial, Parallel, Fire wire, USB. Parallel ports are not built in most new computers anymore, but are still part of the majority of computers currently in use. For new laptops and PCs with parallel port printers and scanners, USB adapters are available, commonly through docking stations. The key features of this specific printer cable are:
  parallel printer cable for PC
  bidirectional
  Cen 36 male to DB 25 female
  length 5m
  25 cores
  connection 1:1
  long thumb screws (DB 25)
  shielded cable (foil)
  molded plugs with strain relief
  for standard printers (ink jet, laser, impact printers)
  not to use with IEEE 1284 printers (high speed EPP mode)
  EcoSpold01Location=GLO
  production volume 1 unit
    Unknown
    Dummy value to be replaced by measured, estimated or calculated value
  property price 1.06166 EUR2005
    Calculated based on inputs: The price of the product has been calculated as a sum of the values of the material and energy inputs for this product. This value is therefore a rough estimation. It may underestimate the real price since there are additional expenses when producing any product. These expences can include for example labour costs, treatment of waste materials and profit for the producer. Please consider carefully whether this level of data quality is acceptable for your application.
  property carbon content, fossil 0.615093
    Calculated as the addition of C contents in the product composition
  property carbon content 0.615093
    carbon content on a dry matter basis (reserved; not for manual entry)
  properties: water content 0, carbon content, non-fossil 0, wet mass 0.0895 kg, water in wet mass 0 kg, dry mass 0.0895 kg, carbon allocation 0.0550508 kg

## Inputs from technosphere
- contouring, brass: 0.0014 kg; lognormal variance with pedigree 0.0521, pedigree (1,4,5,3,1)
  EcoSpold01Location=RER
  Measured Value, in the Empa laboratories.
  properties: wet mass 0.039644 kg, dry mass 0.039644 kg
- hot rolling, steel: 0.00261 kg; lognormal variance with pedigree 0.0521, pedigree (1,4,5,3,1)
  EcoSpold01Location=RER
  Measured Value, in the Empa laboratories.
- injection moulding: 0.07174 kg; lognormal variance with pedigree 0.0527, pedigree (2,4,5,3,1)
  EcoSpold01Location=RER
  Measured Value, in the Empa laboratories.
- silicone product: 0 kg; pedigree (1,1,1,1,1)
  Measured Value, in the Empa laboratories.
  EcoSpold01Location=RER
  properties: dry mass 1 kg, carbon content, fossil 0.324324, wet mass 1 kg, heating value, net 9.83 MJ
  note on carbon content, fossil: The term silicones is used for compounds in which silicon atoms are linked via oxygen atoms, each silicon atom bearing one or several organic groups. In industrially important silicones, these groups are usually methyl or phenyl (ecoinvent v2.2 report 8_part71 & Ullmann). The chemical formula was considered to be [Si(CH3)2O]n (Ullmann).
- brass: 0 kg; pedigree (1,1,1,1,1)
  Measured Value, in the Empa laboratories.
  EcoSpold01Location=CH
  properties: dry mass 1 kg, wet mass 1 kg
- polyethylene, high density, granulate: 0.00681 kg; lognormal variance with pedigree 0.0527, pedigree (2,4,5,3,1)
  EcoSpold01Location=RER
  Measured Value, in the Empa laboratories.
  properties: heating value, net 42.47 MJ, dry mass 1 kg, carbon content, fossil 0.857143, wet mass 1 kg
  note on carbon content, fossil: Polyethylene is formed out of a huge amount of ethylene monomers (C2H4) (ecoinvent v2.2 report 11_II). MW=28 g/mol
- sheet rolling, steel: 0.011537 kg; lognormal variance with pedigree 0.0527, pedigree (2,4,5,3,1)
  EcoSpold01Location=RER
  Measured Value, in the Empa laboratories.
- steel, chromium steel 18/8, hot rolled: 0.00261 kg; lognormal variance with pedigree 0.0521, pedigree (1,4,5,3,1)
  Measured Value, in the Empa laboratories.
  EcoSpold01Location=RER
  properties: carbon content, fossil 0.0008, dry mass 1 kg, wet mass 1 kg
  note on carbon content, fossil: Stainless steel model is the grade 304 steel (18/8 stainless, 18% chromium 8% nickel; max. 0.08% C)
- electricity, medium voltage: 0.0014755 kWh; source Draka 2004; lognormal variance with pedigree 0.0527, pedigree (2,4,5,3,1)
  Estimation, based on literature.
  Further references:
  Nichigoh (2006) Environmental Product Declaration for Wire and Cable World Wide Standard Cable ECO-FLEX Series from <http://www.jia-page.or.jp/jia/epd/directory/nichigoh/nichigoh_e.pdf>.
  EcoSpold01Location=UCTE
- polyethylene, low density, granulate: 0.05273 kg; lognormal variance with pedigree 0.0527, pedigree (2,4,5,3,1)
  EcoSpold01Location=RER
  Measured Value, in the Empa laboratories.
  properties: carbon content, fossil 0.857143, dry mass 1 kg, wet mass 1 kg, heating value, net 42.47 MJ
- copper, cathode: 0.0023125 kg; lognormal variance with pedigree 0.0521, pedigree (1,4,5,3,1)
  Measured Value, in the Empa laboratories.
  EcoSpold01Location=RER
  properties: wet mass 1 kg, dry mass 1 kg
- printed wiring board mounting facility: 1.8616e-8 unit; lognormal variance with pedigree 0.3527, pedigree (2,4,5,3,1)
  EcoSpold01Location=GLO
  Proxy, infrastructure for printed wiring board is used.
- wire drawing, copper: 0.0023125 kg; lognormal variance with pedigree 0.0521, pedigree (1,4,5,3,1)
  Measured Value, in the Empa laboratories.
  EcoSpold01Location=RER
- steel, low-alloyed, hot rolled: 0.011537 kg; lognormal variance with pedigree 0.0527, pedigree (2,4,5,3,1)
  EcoSpold01Location=RER
  Measured Value, in the Empa laboratories.
  properties: carbon content, fossil 0.005, dry mass 1 kg, wet mass 1 kg
  note on carbon content, fossil: Low alloyed steel composition given in Tab. 3.2 ecoinvent v2.2 report 10_partII. Steel assumed to have a C content of 0.5%
- zinc coat, pieces: 0.0023 m2; lognormal variance with pedigree 0.0527, pedigree (2,4,5,3,1)
  Measured Value, in the Empa laboratories.
  EcoSpold01Location=RER
- silicone product: 0.00401946, 0.00818054 kg (2 entries); lognormal variance with pedigree 0.0521, pedigree (1,4,5,3,1)
  Measured Value, in the Empa laboratories.
  EcoSpold01Location=RER
- brass: 7e-6, 0.001393 kg (2 entries); lognormal variance with pedigree 0.0521, pedigree (1,4,5,3,1)
  Measured Value, in the Empa laboratories.
  EcoSpold01Location=CH

## Sampling procedure
Weighing and measuring of materials. Literature for electricity consumption (assembly).

## Extrapolations
This dataset has been extrapolated from year 2006 to the year of the calculation (2021). The uncertainty has been adjusted accordingly.

## Review by Rolf Frischknecht 2007-11-07
passed

## Review by Roland Hischier 2011-09-22
Transfer of documentation done.
