# treatment of waste polyurethane, municipal incineration with fly ash extraction

Dataset: EcoSpold 2, unit process
Geography: CH
Time period: 2006-01-01 to 2021-12-31
Technology level: current
Classification: ISIC rev.4 ecoinvent: 3821:Treatment and disposal of non-hazardous waste
Synonyms: municipal waste incineration
Scenario: Business-as-Usual
System model: Allocation, cut-off by classification
Share of production covered: 1.8 %
Generated by: Gabor Doka
Published in: Doka G. 2015
Database: ecoinvent
isCopyrightProtected: true
accessRestrictedTo: 1

## General comment
This dataset represents the activity of waste disposal of waste polyurethane in a municipal solid waste incinerator (MSWI) // Recommended use of this dataset: For PU, which goes to disposal as part of communal waste mixture. // // Waste composition (wet, in ppm): upper heating value 30.9 MJ/kg; lower heating value 30.67 MJ/kg; H2O 2000; O 178700; H 84276; C 640700; S 203.07; N 60922; P n.a.; B n.a.; Cl 24369; Br 70.934; F 14.896; I n.a.; Ag n.a.; As 1.9253; Ba 188.99; Cd 82.301; Co 32.011; Cr 41.41; Cu 321.89; Hg 0.86045; Mn 80.984; Mo n.a.; Ni 20.874; Pb 473.27; Sb 43.54; Se 2.128; Sn 26.555; V 291.99; Zn 566.54; Be 0.50667; Sc n.a.; Sr 89.68; Ti 1013.3; Tl 0.40534; W n.a.; Si n.a.; Fe 3775.4; Ca n.a.; Al 202.67; K n.a.; Mg n.a.; Na 1485; // Share of carbon in waste that is biogenic 0%. // Share of metals in waste not oxidised and bulk-recyclable (exclude very small or thin parts) Iron: 0%; Alu: 0%; Copper: 0%. // Recovery of metal scrap from bottom ash to recycling: 0g iron scrap, 0g aluminium scrap, 0g copper scrap. From this waste, the FLUWA process in the technology mix recovers 0.00117kg (DM) of a hydroxide sludge to be recycled in zinc furnaces. // Ultimately one kg of this waste produces 0.02837 kg of bottom ash (can include some washed ash) and 0.009536 kg of residues, which are landfilled (technology mix). Additional solidification of residues with 0.003814 kg of cement.Net energy production: 3.95MJ/kg electric energy and 7.69MJ/kg thermal energy. //

## Included activities start
waste incineration from waste reception gate and delivery into waste bunker at incinerator plant site (without transports to the incinerator)

## Included activities end
Waste-specific short-term emissions to water from leachate. Long-term emissions from landfill to ground water.

## Geography
Specific to the technology mix encountered in Switzerland in 2012.

## Technology
average Swiss MSWI plants in 2010 (grate incinerators) with electrostatic precipitator for fly ash (ESP), wet flue gas scrubber and 25% SNCR , 42.77% SCR-high dust , 32.68% SCR-low dust -DeNOx facilities and 0% without Denox (weighted according to mass of burnt waste, representing Swiss average). Efficiency of iron scrap separation from slag : 58%. Efficiency of non-ferrous scrap separation from slag : 31%. The technology mix for this dataset includes a filter ash treatment (FLUWA) of a share of 46.22%. Gross electric efficiency technology mix 15.84% and Gross thermal efficiency technology mix 28.51%

## Time period
Waste composition as given in literature reference, theoretical data or other source. Transfer coefficients for modern MSWI.

## Reference product
- waste polyurethane: -1 kg; name RP; By-product classification Waste; CPC 39270: Waste, parings and scrap of plastics; CAS 9009-54-5
  Main reference product of this activity (supply of disposal service).
  production volume 352300 kg; name RP_PV; = ROUND((533860000/0.330592351639303*0.00841688555967824*(0.13+0.14)*0.15*0.64),-2)
    Estimated value. The EU market for sealants in 2012 was of 533.860 thousand tons of sealants, more than 50% of this is constituted by silicon and polyurethane (ASI 2013). The percentage of polyurethane sealant (14%) and polyurethane foam (13%) are taken from Nerlfi et al. (2013).
    The CH production volume is extrapolated from the EU production volume using the nominal GDP of 2005 (source: United Nations, http://data.un.org/Glossary.aspx?q=GDP+%28current+US%24%29, accessed 20130726 and 20130312). Where EU GDP is 33% of the world and the CH GDP is 0.8% of the world.
    As the main application of this material is in the construction sector, the rate of waste production is assumed to be 15% (taken from the estimated value for gypsum (WRAP, n.d).
    The treatment route is taken from Hincapié et al. (2015) for the category of combustible waste (which includes sealants), where 28% is sent to recycling, 64% incineration, and 8% landfill.
    ASI (2013) Market Trends: Sealant Demand Growing in Europe. The construction industry continues to control the demand for sealants. Retrieved from: <http://www.adhesivesmag.com/articles/92423-market-trends-sealant-demand-growing-in-europe>, accessed 9th May 2016
    Steven Nerlfi, Minesh Kusumgar and Michael Growney (2013) The Global Sealants Industry. Paint and Coatings Industry (PCI) (http://www.pcimag.com/articles/97675-the-global-sealants-market, accessed 20160122)
    WRAP (n.d.) International practice in plasterboard recycling: Canada. Retrieved from: http://www.wrap.org.uk/sites/files/wrap/Case%20study%20-%20Plasterboard%20recycling%20in%20Canada.pdf, accessed 3 May 2016
    Ingrid Hincapié, Alejandro Caballero-Guzmán, Bernd Nowack (2015) Nanomaterials in Landfills Module 3: Nanomaterials in Construction Waste. EMPA, Swiss Federal Laboratories for Materials Science and Technology. St. Gallen, Switzerland
  property heating value, net 30.67 MJ
    Value taken from the general comment of the treatment dataset.
  property price 0 EUR2005; name RP_price_EUR2005
    Waste products are assigned a price of zero as they are assumed to require further treatment.
  property carbon content 0.64198
    carbon content on a dry matter basis (reserved; not for manual entry)
  properties: sodium content 0.001488, thallium content 4.0615e-7, water in wet mass 0.002 kg, selenium content 2.1323e-6, strontium content 8.986e-5, water content 0.002004, wet mass 1 kg, dry mass 0.998 kg, beryllium content 5.0768e-7, aluminium content 0.00020307, hydrogen content 0.084444, nitrogen content 0.061044, oxygen content 0.17906, mercury content 8.6217e-7, fluorine content 1.4926e-5, cadmium content 8.2466e-5, sulfur content 0.00020348, chlorine content 0.024418, cobalt content 3.2075e-5, chromium content 4.1493e-5, vanadium content 0.00029258, bromine content 7.1076e-5, nickel content 2.0916e-5, tin content 2.6608e-5, copper content 0.00032253, manganese content 8.1146e-5, barium content 0.00018937, lead content 0.00047422, antimony content 4.3627e-5, arsenic content 1.9292e-6, carbon content, fossil 0.64198, titanium content 0.0010154, zinc content 0.00056767, iron content 0.0037829, carbon allocation 0.640696 kg

## By-products
- heat, for reuse in municipal waste incineration only: 0 MJ; name E_th_prod_MSWI; By-product classification allocatable product; CPC 17300: Steam and hot water; pedigree (1,1,1,1,1)
  Net useful heat generated from this waste and used in internal MSWI plant energy redistribution.
  Uncertainty: uncertainty is calculated from uncertainties in waste composition and uncertainties in energy efficiency and the uncertainty in internal energy demand
  production volume 2.70845e6 MJ; = E_th_prod_MSWI*RP_PV/ABS(RP)
    calculated in proportion to reference product waste input to incinerator
  property exergy 0.1842 MJ; name E_th_prod_MSWI_exergy
    This exergy property is based on the exergy content of the product.
  property true value relation 0.1842; name E_th_prod_MSWI_true_value_relation
    property to calculate "true value" from
  property price 0.0106 EUR2005; name E_th_prod_MSWI_price_EUR2005
    Average European district heat price from Ecoheatcool and Euroheat 2005-2006, Ecoheat Work package 1: The European heat market. Final report. 10.6 EUR/GJ i s the price of district heat. http://www.solarthermalworld.org/files/Ecoheatcool%20WP1%20Web.pdf?download
- metalliferous hydroxide sludge: 0 kg; By-product classification Recyclable; CPC 1429: Other non-ferrous metal ores and concentrates (other than uranium or thorium ores and concentrates); pedigree (1,1,1,1,1)
  Metalliferous hydroxide sludge from filter ash leaching (FLUWA).
  Uncertainty: uncertainty is calculated from uncertainties in waste composition and transfer coefficients to filter ash in incinerator and the uncertainty of the transfer coefficients of the FLUWA process.
  production volume 0 kg; = zinc_concentrate*RP_PV/ABS(RP)
    calculated in proportion to reference product waste input to incinerator
  property price 0.0042 EUR2005
    World market value of manure, deflated with barley world market price and consumer price index, based on [http://www.gov.pe.ca/photos/original/af_NM_manconv.pdf].
  property heating value, net 0 MJ
    Non combustible products are assumed to have an LHV equal to zero (0).
  property carbon content 0.028384
    carbon content on a dry matter basis (reserved; not for manual entry)
  properties: sodium content 0.010389, carbon content, fossil 0.028384, wet mass 1 kg, copper content 0.00011391, chromium content 0.00016905, arsenic content 1.5193e-5, dry mass 0.25 kg, cobalt content 0.00067262, manganese content 7.0493e-5, barium content 4.5304e-5, zinc content 0.085108, tin content 1.9958e-5, bromine content 0.0011932, chlorine content 0.50042, cadmium content 0.023884, water in wet mass 0.75 kg, sulfur content 0.010637, antimony content 0.00040241, beryllium content 6.4489e-6, lead content 0.0072775, selenium content 1.9249e-5, vanadium content 0.0014166, nickel content 1.6549e-5, fluorine content 0.00018509, mercury content 1.3354e-6, iron content 0.00035482, thallium content 3.4889e-6, oxygen content 0.32911, water content 3, titanium content 7.0782e-5, strontium content 8.7115e-7, aluminium content 1.1912e-5, carbon allocation 0.007096 kg
- electricity, for reuse in municipal waste incineration only: 0 kWh; name E_el_prod_MSWI; CPC 17100: Electrical energy; By-product classification allocatable product; pedigree (1,1,1,1,1)
  Net electricity generated from this waste and used in internal MSWI plant energy redistribution.
  Uncertainty: uncertainty is calculated from uncertainties in waste composition and uncertainties in energy efficiency and the uncertainty in internal energy demand
  production volume 386579 kWh; = E_el_prod_MSWI*RP_PV/ABS(RP)
    calculated in proportion to reference product waste input to incinerator
  property price 0.1 EUR2005; name E_el_prod_MSWI_price_EUR2005
    Estimated to be the same price as in case of electricity, medium voltage.
  property exergy 3.6 MJ; name E_el_prod_MSWI_exergy
    This exergy property is based on the exergy content of the product.
  property true value relation 3.6; name E_el_prod_MSWI_true_value_relation
    property to calculate "true value" from

## Inputs from technosphere
- hydrogen peroxide, without water, in 50% solution state: 0.00064908 kg; lognormal variance with pedigree 0.10967, pedigree (1,1,4,1,1)
  Auxilliary oxidising agent for filter ash treatment (FLUWA).
  Uncertainty: uncertainty calculated from uncertainty in of transfer coefficients in the incinerator, and the uncertainty of the waste composition of this waste
  properties: dry mass 1 kg, heating value, net 7.13 MJ, wet mass 1 kg
- cement, unspecified: 0.0038143 kg; lognormal variance with pedigree 0.08524, pedigree (1,1,4,1,1)
  Cement required for solidification of landfilled residual material.
  Uncertainty: Uncertainty calculated from uncertainty of the waste composition of this waste, of transfer coefficients in the incinerator and of the solidification recipe.
  properties: dry mass 1 kg, wet mass 1 kg
- cationic resin: 4.3609e-6 kg; lognormal variance with pedigree 1.5956, pedigree (1,1,4,1,1)
  Auxilliary input for mercury removal in filter ash treatment (FLUWA).
  Uncertainty: uncertainty calculated from uncertainty in of transfer coefficients in the incinerator, and the uncertainty of the waste composition of this waste
  properties: heating value, net 6.68 MJ, water content 1, carbon content, fossil 0.521606, dry mass 0.5 kg, wet mass 1 kg
- waste cement, hydrated: -0.0095358 kg; name waste_cement; lognormal variance with pedigree 0.08524, pedigree (1,1,4,1,1)
  Hydrated cement output for solidification of landfilled residual material.
  Uncertainty: Uncertainty calculated from uncertainty of the waste composition of this waste and transfer coefficients in the incinerator and of the solidification recipe.
  production volume 3359.46 kg; = waste_cement*RP_PV/ABS(RP)
    calculated in proportion to reference product waste input to incinerator
  property price 0 EUR2005; name waste_cement_price_EUR2005
  properties: dry mass 1 kg, wet mass 1 kg
- hydrochloric acid, without water, in 30% solution state: 0.00036196 kg; lognormal variance with pedigree 0.08213, pedigree (1,1,4,1,1)
  Auxilliary inputs for the wastewater treatment stage of the incinerator plant.
  Uncertainty: uncertainty calculated from uncertainty in average HCl input, of transfer coefficients in the incinerator, and the uncertainty of the waste composition of this waste
  properties: wet mass 1 kg, heating value, net 3.32 MJ, dry mass 1 kg
- sodium hydroxide, without water, in 50% solution state: 0.0027587 kg; lognormal variance with pedigree 0.22859, pedigree (1,1,4,1,1)
  Auxilliary inputs for the flue gas treatment stage of the incinerator plant, and partially in the filter ash treatment (FLUWA).
  Uncertainty: uncertainty calculated from uncertainty in average NaOH input, of transfer coefficients in the incinerator, and the uncertainty of the waste composition of this waste
  properties: wet mass 1 kg, heating value, net 3.03 MJ, dry mass 1 kg
- water, decarbonised: 4.8232 kg; lognormal variance with pedigree 0.24801, pedigree (1,1,4,1,1)
  Incinerator process water used in flue gas scrubber stage.
  Uncertainty: uncertainty calculated from uncertainty in average water input, and the uncertainty of the waste composition of this waste
  properties: wet mass 1 kg
- ammonia, anhydrous, liquid: 0.007402 kg; lognormal variance with pedigree 0.79504, pedigree (1,1,4,1,1)
  Input to DeNOx stage (100% NH3).
  Uncertainty: uncertainty calculated from uncertainty in average DeNOx input, uncertainty in the share of thermal NOx, uncertainty of nitrogen content in average municipal waste and the uncertainty in nitrogen content in *this* waste.
  properties: wet mass 1 kg, dry mass 1 kg
- iron (III) chloride, without water, in 40% solution state: 5.2833e-5 kg; lognormal variance with pedigree 0.24801, pedigree (1,1,4,1,1)
  Auxilliary inputs for the wastewater treatment stage of the incinerator plant.
  Uncertainty: uncertainty calculated from uncertainty in average FeCl3 input, of transfer coefficients in the incinerator, and the uncertainty of the waste composition of this waste
  properties: dry mass 1 kg, wet mass 1 kg
- quicklime, milled, packed: 0.012734 kg; lognormal variance with pedigree 0.28063, pedigree (1,1,4,1,1)
  Auxilliary inputs for the flue gas treatment stage of the incinerator plant.
  Uncertainty: uncertainty calculated from uncertainty in average CaO input, of transfer coefficients in the incinerator, and the uncertainty of the waste composition of this waste
  properties: water content 0.010101, wet mass 1 kg, dry mass 0.99 kg
- process-specific burdens, residual material landfill: 0.019012 kg; lognormal variance with pedigree 0.076156, pedigree (1,1,4,1,1)
  Mass-specific expenditures required for landfilling of incineration residues.;activityLink introduced to establish a direct link to the corresponding regional supply of this product
  Uncertainty: uncertainty is calculated from uncertainties in waste composition and transfer coefficients in incinerator
- transport, freight, lorry, unspecified: 0.0017212 metric ton*km; lognormal variance with pedigree 0.02864, pedigree (1,1,4,1,1)
  Transport services to transport incineration residues to landfills and filter ash to external treatments (FLUWA).
  Uncertainty: uncertainty calculated from uncertainty of the waste composition of this waste, uncertainty of transfer coefficients and the uncertainty in generic transportation distances
- chemical, organic: 1.9312e-5 kg; lognormal variance with pedigree 0.85617, pedigree (1,1,4,1,1)
  Auxilliary inputs for the wastewater treatment stage of the incinerator plant. Proxy for (pure) Trisodium-trimercapto-s-triazine (CAS 17766-26-6), used as 15% diluted solution, aka TMT15.
  Uncertainty: uncertainty calculated from uncertainty in average TMT15 input, of transfer coefficients in the incinerator, and the uncertainty of the waste composition of this waste
  properties: heating value, net 19.03 MJ, wet mass 1 kg, dry mass 1 kg, carbon content, fossil 0.628
- slag landfill: 5.0432e-11 unit; lognormal variance with pedigree 0.044091, pedigree (1,1,4,1,1)
  Landfill infrastructure required for landfilling of bottom ash.
  Uncertainty: uncertainty is calculated from uncertainties in waste composition and transfer coefficients in incinerator
- heat, district or industrial, natural gas: 1.3842 MJ; lognormal variance with pedigree 0.79504, pedigree (1,1,4,1,1)
  Input to DeNOx stage, to heat up flue gas in low-dust SCR.
  Uncertainty: uncertainty calculated from uncertainty in average DeNOx input, uncertainty in the share of thermal NOx, uncertainty of nitrogen content in average municipal waste and the uncertainty in nitrogen content in *this* waste.
  properties: heating value, net 1 MJ
- process-specific burdens, slag landfill: 0.028368 kg; lognormal variance with pedigree 0.044091, pedigree (1,1,4,1,1)
  Mass-specific expenditures required for landfilling of bottom ash.;activityLink introduced to establish a direct link to the corresponding regional supply of this product
  Uncertainty: uncertainty is calculated from uncertainties in waste composition and transfer coefficients in incinerator
- titanium dioxide: 0.00046375 kg; lognormal variance with pedigree 1.2009, pedigree (1,1,4,1,1)
  Input to DeNOx stage (TiO2 catalyst carrier)
  Uncertainty: uncertainty calculated from uncertainty in average DeNOx input, uncertainty in the share of thermal NOx, uncertainty of nitrogen content in average municipal waste and the uncertainty in nitrogen content in *this* waste.
  properties: wet mass 1 kg, dry mass 1 kg
- municipal waste incineration facility: 2.5e-10 unit
  Demands per kilogram waste.
- residual material landfill: 3.9608e-11 unit; lognormal variance with pedigree 0.076156, pedigree (1,1,4,1,1)
  Landfill infrastructure required for landfilling of incineration residues.
  Uncertainty: uncertainty is calculated from uncertainties in waste composition and transfer coefficients in incinerator
- spent activated carbon with mercury: -4.5904e-6 kg; name spentAC; lognormal variance with pedigree 1.5956, pedigree (1,1,4,1,1)
  Spent ion exchanger charged with mercury, from FLUWA filter ash treatment, approximated here with Spent activated carbon with mercury, deposited undergound in a polyethylene Big Bag.
  Uncertainty: uncertainty calculated from uncertainty in of transfer coefficients in the incinerator, and the uncertainty of the waste composition of this waste.
  production volume 1.6172 kg; = spentAC*RP_PV/ABS(RP)
    Calculated from production volume of reference product using the relative outputs.
  property price 0 EUR2005; name spentAC_price_EUR2005
  properties: dry mass 1 kg, heating value, net 18.18 MJ, wet mass 1 kg, carbon content, fossil 0.6
- chromium oxide, flakes: 9.4644e-6 kg; lognormal variance with pedigree 1.2009, pedigree (1,1,4,1,1)
  Input to DeNOx stage. Active component in SCR catalyst (vanadium pentoxide, V2O5), here approximated with the available chromium trioxide.
  Uncertainty: uncertainty calculated from uncertainty in average DeNOx input, uncertainty in the share of thermal NOx, uncertainty of nitrogen content in average municipal waste and the uncertainty in nitrogen content in *this* waste.
  properties: wet mass 1 kg, dry mass 1 kg
- chemical, inorganic: 0.00040685 kg; lognormal variance with pedigree 0.2474, pedigree (1,1,4,1,1)
  Auxilliary inputs for the wastewater treatment stage of the incinerator plant. Proxy for Polyelectrolyte.
  Uncertainty: uncertainty calculated from uncertainty in average Polyelectrolyte input, of transfer coefficients in the incinerator, and the uncertainty of the waste composition of this waste
  properties: wet mass 1 kg, carbon content, fossil 0.003, dry mass 1 kg
- metalliferous hydroxide sludge: -0.0046961 kg; lognormal variance with pedigree 0.067665, pedigree (1,1,4,1,1)
  (same comment as for metalliferous hydroxide sludge)
  production volume 1654.44 kg
  properties: sodium content 0.010389, carbon content, fossil 0.028384, wet mass 1 kg, dry mass 0.25 kg, price 0.0042 EUR2005, zinc content 0.085108, chlorine content 0.50042, cadmium content 0.023884, sulfur content 0.010637, lead content 0.0072775, oxygen content 0.32911, water content 3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

## Inputs from nature
- Oxygen [natural resource, in air]: 2.3412 kg; lognormal variance with pedigree 0.022495, pedigree (1,1,4,1,1)
  Oxygen from ambient air needed to combust and oxidise this waste. Net demand, i.e. without O2 leaving the plant in flue gas uncombusted.
  Uncertainty: uncertainty is calculated from uncertainties in waste composition and transfer coefficients to flue gas and soild residues in incinerator

## Emissions to nature
- Sodium [air, urban air close to ground]: 1.2192e-5 kg; lognormal variance with pedigree 0.6225, pedigree (1,1,4,1,1)
  Emission to air from waste composition and transfer coefficients.
  Uncertainty: uncertainty is calculated from uncertainties in waste composition and transfer coefficients in incinerator
- Water [air, urban air close to ground]: 0.00384383 m3; lognormal variance with pedigree 0.65204, pedigree (1,1,4,1,1)
  Water vapour from waste humidity, hydrogen oxidation and part of the process water.
  Uncertainty: Uncertainty calculated from uncertainty in waste composition, process water input and the uncertainty of fraction to air.
- Chloride [water, ground-, long-term]: 0.0030696 kg; lognormal variance with pedigree 0.2681, pedigree (1,1,4,1,1)
  Long-term emissions from landfilling of incineration residues.
  Uncertainty: uncertainty is calculated from uncertainties in waste composition and transfer coefficients in incinerator and landfills.
- COD, Chemical Oxygen Demand [water, surface water]: 0.00048707 kg; lognormal variance with pedigree 0.028709, pedigree (1,1,4,1,1)
  Emissions to water from waste composition and transfer coefficients in incinerator and landfills.
  Uncertainty: uncertainty is calculated from uncertainties in waste composition and transfer coefficients in incinerator and landfills
- Water [water, surface water]: 0.00165268 m3; lognormal variance with pedigree 1.0654, pedigree (1,1,4,1,1)
  Process water released to surface water.
  Uncertainty: uncertainty calculated from uncertainty in process water input and the uncertainty of fraction to surface water.
- Bromine [water, ground-, long-term]: 3.6772e-6 kg; lognormal variance with pedigree 1.018, pedigree (1,1,4,1,1)
  (same comment as for Chloride)
- DOC, Dissolved Organic Carbon [water, surface water]: 0.00021245 kg; lognormal variance with pedigree 0.028707, pedigree (1,1,4,1,1)
  (same comment as for COD, Chemical Oxygen Demand)
- Carbon monoxide, fossil [air, urban air close to ground]: 2.9467e-5 kg; lognormal variance with pedigree 0.79736, pedigree (1,1,4,1,1)
  Incomplete combustion product emitted to air.
  Uncertainty: uncertainty calculated from uncertainty in average operation emissions, and the uncertainty of the flue gas volume from this waste.
- Fluoride [water, ground-, long-term]: 9.9382e-6 kg; lognormal variance with pedigree 0.78557, pedigree (1,1,4,1,1)
  (same comment as for Chloride)
- Sulfate [water, surface water]: 8.2985e-5 kg; lognormal variance with pedigree 0.45718, pedigree (1,1,4,1,1)
  (same comment as for COD, Chemical Oxygen Demand)
- Arsenic, ion [water, ground-, long-term]: 1.1738e-6 kg; lognormal variance with pedigree 1.493, pedigree (1,1,4,1,1)
  (same comment as for Chloride)
- TOC, Total Organic Carbon [water, surface water]: 0.00021245 kg; lognormal variance with pedigree 0.028707, pedigree (1,1,4,1,1)
  (same comment as for COD, Chemical Oxygen Demand)
- Carbon dioxide, fossil [air, urban air close to ground]: 2.335 kg; lognormal variance with pedigree 0.0140033, pedigree (1,1,4,1,1)
  (same comment as for Sodium)
- Barium [water, ground-, long-term]: 0.00013807 kg; lognormal variance with pedigree 1.2416, pedigree (1,1,4,1,1)
  (same comment as for Chloride)
- Nitrate [water, surface water]: 0.00078271 kg; lognormal variance with pedigree 0.13393, pedigree (1,1,4,1,1)
  (same comment as for COD, Chemical Oxygen Demand)
- Methane, fossil [air, urban air close to ground]: 2.6002e-7 kg; lognormal variance with pedigree 0.090068, pedigree (1,1,4,1,1)
  (same comment as for Carbon monoxide, fossil)
- Cadmium, ion [water, ground-, long-term]: 1.3195e-5 kg; lognormal variance with pedigree 4.9988, pedigree (1,1,4,1,1)
  (same comment as for Chloride)
- Chloride [water, surface water]: 0.020698 kg; lognormal variance with pedigree 0.101594, pedigree (1,1,4,1,1)
  (same comment as for COD, Chemical Oxygen Demand)
- Sulfur dioxide [air, urban air close to ground]: 2.1596e-6 kg; lognormal variance with pedigree 0.8877, pedigree (1,1,4,1,1)
  (same comment as for Sodium)
- Cobalt [water, ground-, long-term]: 2.8004e-5 kg; lognormal variance with pedigree 1.0829, pedigree (1,1,4,1,1)
  (same comment as for Chloride)
- Bromine [water, surface water]: 6.582e-5 kg; lognormal variance with pedigree 0.3189, pedigree (1,1,4,1,1)
  (same comment as for COD, Chemical Oxygen Demand)
- Nitrogen oxides [air, urban air close to ground]: 0.0027559 kg; lognormal variance with pedigree 0.85885, pedigree (1,1,4,1,1)
  Sum of fuel-Nox and thermal-NOx emitted to air after DeNOx stage.
  Uncertainty: uncertainty calculated from uncertainty in average N-emissions and uncertainty in the share of thermal NOx and the uncertainty in nitrogen content in *this* waste.
- Chromium VI [water, ground-, long-term]: 2.1904e-6 kg; lognormal variance with pedigree 2.4865, pedigree (1,1,4,1,1)
  (same comment as for Chloride)
- Fluoride [water, surface water]: 4.3354e-6 kg; lognormal variance with pedigree 0.82362, pedigree (1,1,4,1,1)
  (same comment as for COD, Chemical Oxygen Demand)
- Dinitrogen monoxide [air, urban air close to ground]: 0.00090863 kg; lognormal variance with pedigree 0.94987, pedigree (1,1,4,1,1)
  Nitrogen species emitted to air after DeNOx stage.
  Uncertainty: uncertainty calculated from uncertainty in average N-emissions and uncertainty in the share of thermal NOx and the uncertainty in nitrogen content in *this* waste.
- Copper, ion [water, ground-, long-term]: 0.00030325 kg; lognormal variance with pedigree 0.80579, pedigree (1,1,4,1,1)
  (same comment as for Chloride)
- Barium [water, surface water]: 8.0187e-8 kg; lognormal variance with pedigree 0.71141, pedigree (1,1,4,1,1)
  (same comment as for COD, Chemical Oxygen Demand)
- Ammonia [air, urban air close to ground]: 8.7029e-6 kg; lognormal variance with pedigree 0.85885, pedigree (1,1,4,1,1)
  (same comment as for Dinitrogen monoxide)
- Mercury [water, ground-, long-term]: 1.807e-7 kg; lognormal variance with pedigree 1.6304, pedigree (1,1,4,1,1)
  (same comment as for Chloride)
- Arsenic, ion [water, surface water]: 7.5441e-7 kg; lognormal variance with pedigree 1.3751, pedigree (1,1,4,1,1)
  (same comment as for COD, Chemical Oxygen Demand)
- Cyanide [air, urban air close to ground]: 0.00019521 kg; lognormal variance with pedigree 0.94987, pedigree (1,1,4,1,1)
  (same comment as for Dinitrogen monoxide)
- Nickel, ion [water, ground-, long-term]: 2.0421e-5 kg; lognormal variance with pedigree 1.1608, pedigree (1,1,4,1,1)
  (same comment as for Chloride)
- Cadmium, ion [water, surface water]: 1.4628e-8 kg; lognormal variance with pedigree 0.98651, pedigree (1,1,4,1,1)
  (same comment as for COD, Chemical Oxygen Demand)
- Hydrogen chloride [air, urban air close to ground]: 1.3906e-5 kg; lognormal variance with pedigree 0.29561, pedigree (1,1,4,1,1)
  (same comment as for Sodium)
- Manganese [water, ground-, long-term]: 6.421e-5 kg; lognormal variance with pedigree 1.2768, pedigree (1,1,4,1,1)
  (same comment as for Chloride)
- Cobalt [water, surface water]: 5.2728e-9 kg; lognormal variance with pedigree 1.6421, pedigree (1,1,4,1,1)
  (same comment as for COD, Chemical Oxygen Demand)
- Bromine [air, urban air close to ground]: 3.5431e-8 kg; lognormal variance with pedigree 1.0387, pedigree (1,1,4,1,1)
  (same comment as for Sodium)
- Lead [water, ground-, long-term]: 0.00033323 kg; lognormal variance with pedigree 2.3022, pedigree (1,1,4,1,1)
  (same comment as for Chloride)
- Copper, ion [water, surface water]: 2.785e-8 kg; lognormal variance with pedigree 0.99591, pedigree (1,1,4,1,1)
  (same comment as for COD, Chemical Oxygen Demand)
- Hydrogen fluoride [air, urban air close to ground]: 1.005e-7 kg; lognormal variance with pedigree 1.2343, pedigree (1,1,4,1,1)
  (same comment as for Sodium)
- Selenium [water, ground-, long-term]: 1.633e-6 kg; lognormal variance with pedigree 0.95373, pedigree (1,1,4,1,1)
  (same comment as for Chloride)
- Chromium VI [water, surface water]: 6.3046e-7 kg; lognormal variance with pedigree 1.1648, pedigree (1,1,4,1,1)
  (same comment as for COD, Chemical Oxygen Demand)
- Arsenic [air, urban air close to ground]: 1.5082e-8 kg; lognormal variance with pedigree 1.5056, pedigree (1,1,4,1,1)
  (same comment as for Sodium)
- Antimony [water, ground-, long-term]: 1.7668e-5 kg; lognormal variance with pedigree 0.90225, pedigree (1,1,4,1,1)
  (same comment as for Chloride)
- Manganese [water, surface water]: 9.8996e-9 kg; lognormal variance with pedigree 1.0305, pedigree (1,1,4,1,1)
  (same comment as for COD, Chemical Oxygen Demand)
- Barium [air, urban air close to ground]: 7.4179e-7 kg; lognormal variance with pedigree 0.89896, pedigree (1,1,4,1,1)
  (same comment as for Sodium)
- Tin, ion [water, ground-, long-term]: 1.7624e-5 kg; lognormal variance with pedigree 1.25, pedigree (1,1,4,1,1)
  (same comment as for Chloride)
- Mercury [water, surface water]: 4.5785e-9 kg; lognormal variance with pedigree 1.7655, pedigree (1,1,4,1,1)
  (same comment as for COD, Chemical Oxygen Demand)
- Cadmium [air, urban air close to ground]: 4.1949e-8 kg; lognormal variance with pedigree 1.0166, pedigree (1,1,4,1,1)
  (same comment as for Sodium)
- Zinc, ion [water, ground-, long-term]: 0.00025439 kg; lognormal variance with pedigree 1.5614, pedigree (1,1,4,1,1)
  (same comment as for Chloride)
- Nickel, ion [water, surface water]: 1.3837e-8 kg; lognormal variance with pedigree 1.7893, pedigree (1,1,4,1,1)
  (same comment as for COD, Chemical Oxygen Demand)
- Cobalt [air, urban air close to ground]: 5.8218e-8 kg; lognormal variance with pedigree 1.1416, pedigree (1,1,4,1,1)
  (same comment as for Sodium)
- Vanadium, ion [water, ground-, long-term]: 8.6134e-5 kg; lognormal variance with pedigree 0.91663, pedigree (1,1,4,1,1)
  (same comment as for Chloride)
- Lead [water, surface water]: 3.2228e-8 kg; lognormal variance with pedigree 0.65855, pedigree (1,1,4,1,1)
  (same comment as for COD, Chemical Oxygen Demand)
- Copper [air, urban air close to ground]: 2.9482e-8 kg; lognormal variance with pedigree 0.84759, pedigree (1,1,4,1,1)
  (same comment as for Sodium)
- Beryllium [water, ground-, long-term]: 4.755e-7 kg; lognormal variance with pedigree 1.623, pedigree (1,1,4,1,1)
  (same comment as for Chloride)
- Antimony [water, surface water]: 8.557e-6 kg; lognormal variance with pedigree 1.0085, pedigree (1,1,4,1,1)
  (same comment as for COD, Chemical Oxygen Demand)
- Chromium [air, urban air close to ground]: 3.616e-8 kg; lognormal variance with pedigree 1.1049, pedigree (1,1,4,1,1)
  (same comment as for Sodium)
- Strontium [water, ground-, long-term]: 8.9584e-5 kg; lognormal variance with pedigree 0.98427, pedigree (1,1,4,1,1)
  (same comment as for Chloride)
- Selenium [water, surface water]: 4.2398e-7 kg; lognormal variance with pedigree 1.0443, pedigree (1,1,4,1,1)
  (same comment as for COD, Chemical Oxygen Demand)
- Mercury [air, urban air close to ground]: 2.4397e-8 kg; lognormal variance with pedigree 1.606, pedigree (1,1,4,1,1)
  (same comment as for Sodium)
- Titanium, ion [water, ground-, long-term]: 0.00030325 kg; lognormal variance with pedigree 0.89795, pedigree (1,1,4,1,1)
  (same comment as for Chloride)
- Tin, ion [water, surface water]: 2.4004e-8 kg; lognormal variance with pedigree 1.0508, pedigree (1,1,4,1,1)
  (same comment as for COD, Chemical Oxygen Demand)
- Manganese [air, urban air close to ground]: 1.5466e-8 kg; lognormal variance with pedigree 1.0313, pedigree (1,1,4,1,1)
  (same comment as for Sodium)
- Thallium [water, ground-, long-term]: 3.1081e-7 kg; lognormal variance with pedigree 1.4241, pedigree (1,1,4,1,1)
  (same comment as for Chloride)
- Vanadium, ion [water, surface water]: 3.3973e-7 kg; lognormal variance with pedigree 0.78988, pedigree (1,1,4,1,1)
  (same comment as for COD, Chemical Oxygen Demand)
- Nickel [air, urban air close to ground]: 2.6222e-8 kg; lognormal variance with pedigree 1.2003, pedigree (1,1,4,1,1)
  (same comment as for Sodium)
- Silicon [water, ground-, long-term]: 0.00039199 kg; lognormal variance with pedigree 0.00800076, pedigree (1,1,4,1,1)
  (same comment as for Chloride)
- Zinc, ion [water, surface water]: 3.461e-8 kg; lognormal variance with pedigree 0.66737, pedigree (1,1,4,1,1)
  (same comment as for COD, Chemical Oxygen Demand)
- Lead [air, urban air close to ground]: 3.8991e-8 kg; lognormal variance with pedigree 0.79635, pedigree (1,1,4,1,1)
  (same comment as for Sodium)
- Iron, ion [water, ground-, long-term]: 0.0019322 kg; lognormal variance with pedigree 0.71948, pedigree (1,1,4,1,1)
  (same comment as for Chloride)
- Beryllium [water, surface water]: 3.1532e-10 kg; lognormal variance with pedigree 2.2643, pedigree (1,1,4,1,1)
  (same comment as for COD, Chemical Oxygen Demand)
- Antimony [air, urban air close to ground]: 3.4878e-11 kg; lognormal variance with pedigree 1.1563, pedigree (1,1,4,1,1)
  (same comment as for Sodium)
- Calcium, ion [water, ground-, long-term]: 0.00016268 kg; lognormal variance with pedigree 1.4527, pedigree (1,1,4,1,1)
  (same comment as for Chloride)
- Strontium [water, surface water]: 5.863e-8 kg; lognormal variance with pedigree 1.6535, pedigree (1,1,4,1,1)
  (same comment as for COD, Chemical Oxygen Demand)
- Selenium [air, urban air close to ground]: 2.5387e-8 kg; lognormal variance with pedigree 1.4912, pedigree (1,1,4,1,1)
  (same comment as for Sodium)
- Sodium, ion [water, ground-, long-term]: 0.00097193 kg; lognormal variance with pedigree 0.40122, pedigree (1,1,4,1,1)
  (same comment as for Chloride)
- Titanium, ion [water, surface water]: 2.063e-7 kg; lognormal variance with pedigree 0.50265, pedigree (1,1,4,1,1)
  (same comment as for COD, Chemical Oxygen Demand)
- Tin [air, urban air close to ground]: 1.7346e-11 kg; lognormal variance with pedigree 1.2223, pedigree (1,1,4,1,1)
  (same comment as for Sodium)
- Aluminium [water, ground-, long-term]: 0.00019043 kg; lognormal variance with pedigree 0.6662, pedigree (1,1,4,1,1)
  (same comment as for Chloride)
- Thallium [water, surface water]: 2.8806e-10 kg; lognormal variance with pedigree 1.7132, pedigree (1,1,4,1,1)
  (same comment as for COD, Chemical Oxygen Demand)
- Vanadium [air, urban air close to ground]: 6.1929e-6 kg; lognormal variance with pedigree 0.83293, pedigree (1,1,4,1,1)
  (same comment as for Sodium)
- NMVOC, non-methane volatile organic compounds, unspecified origin [air, urban air close to ground]: 7.8891e-7 kg; lognormal variance with pedigree 0.090068, pedigree (1,1,4,1,1)
  (same comment as for Carbon monoxide, fossil)
- Silicon [water, surface water]: 8.8355e-7 kg; lognormal variance with pedigree 0.55671, pedigree (1,1,4,1,1)
  (same comment as for COD, Chemical Oxygen Demand)
- Zinc [air, urban air close to ground]: 3.7973e-7 kg; lognormal variance with pedigree 0.75986, pedigree (1,1,4,1,1)
  (same comment as for Sodium)
- Particulates, < 2.5 um [air, urban air close to ground]: 2.0696e-6 kg; lognormal variance with pedigree 0.40875, pedigree (1,1,4,1,1)
  (same comment as for Carbon monoxide, fossil)
- Iron, ion [water, surface water]: 7.2876e-8 kg; lognormal variance with pedigree 1.0186, pedigree (1,1,4,1,1)
  (same comment as for COD, Chemical Oxygen Demand)
- Strontium [air, urban air close to ground]: 8.968e-9 kg; lognormal variance with pedigree 1.0166, pedigree (1,1,4,1,1)
  (same comment as for Sodium)
- Particulates, > 2.5 um, and < 10um [air, urban air close to ground]: 1.04e-8 kg; lognormal variance with pedigree 0.19317, pedigree (1,1,4,1,1)
  (same comment as for Carbon monoxide, fossil)
- Calcium, ion [water, surface water]: 2.7158e-7 kg; lognormal variance with pedigree 0.90914, pedigree (1,1,4,1,1)
  (same comment as for COD, Chemical Oxygen Demand)
- Titanium [air, urban air close to ground]: 8.4072e-7 kg; lognormal variance with pedigree 0.68727, pedigree (1,1,4,1,1)
  (same comment as for Sodium)
- Dioxins, measured as 2,3,7,8-tetrachlorodibenzo-p-dioxin [air, urban air close to ground]: 3.4668e-14 kg; lognormal variance with pedigree 0.40875, pedigree (1,1,4,1,1)
  (same comment as for Carbon monoxide, fossil)
- Aluminium [water, surface water]: 7.1766e-8 kg; lognormal variance with pedigree 1.2909, pedigree (1,1,4,1,1)
  (same comment as for COD, Chemical Oxygen Demand)
- Toluene [air, urban air close to ground]: 3.467e-8 kg; lognormal variance with pedigree 0.090068, pedigree (1,1,4,1,1)
  (same comment as for Carbon monoxide, fossil)
- Sodium, ion [water, surface water]: 0.00048872 kg; lognormal variance with pedigree 0.19302, pedigree (1,1,4,1,1)
  (same comment as for COD, Chemical Oxygen Demand)
- Benzene [air, urban air close to ground]: 1.7335e-8 kg; lognormal variance with pedigree 0.090068, pedigree (1,1,4,1,1)
  (same comment as for Carbon monoxide, fossil)
- COD, Chemical Oxygen Demand [water, ground-, long-term]: 0.0047478 kg; lognormal variance with pedigree 0.022955, pedigree (1,1,4,1,1)
  (same comment as for Chloride)
- Benzene, pentachloro- [air, urban air close to ground]: 9.1586e-11 kg; lognormal variance with pedigree 0.090068, pedigree (1,1,4,1,1)
  (same comment as for Carbon monoxide, fossil)
- Chromium, ion [water, surface water]: 5.3761e-9 kg; lognormal variance with pedigree 0.70784, pedigree (1,1,4,1,1)
  (same comment as for COD, Chemical Oxygen Demand)
- Benzene, hexachloro- [air, urban air close to ground]: 3.6246e-11 kg; lognormal variance with pedigree 0.090068, pedigree (1,1,4,1,1)
  (same comment as for Carbon monoxide, fossil)
- TOC, Total Organic Carbon [water, ground-, long-term]: 0.0018787 kg; lognormal variance with pedigree 0.022955, pedigree (1,1,4,1,1)
  (same comment as for Chloride)
- Thallium [air, urban air close to ground]: 4.0534e-10 kg; lognormal variance with pedigree 1.7127, pedigree (1,1,4,1,1)
  (same comment as for Sodium)
- Phenol, pentachloro- [air, urban air close to ground]: 7.5491e-12 kg; lognormal variance with pedigree 0.090068, pedigree (1,1,4,1,1)
  (same comment as for Carbon monoxide, fossil)
- BOD5, Biological Oxygen Demand [water, ground-, long-term]: 0.001553 kg; lognormal variance with pedigree 0.022955, pedigree (1,1,4,1,1)
  (same comment as for Chloride)
- Iron [air, urban air close to ground]: 6.766e-9 kg; lognormal variance with pedigree 0.55847, pedigree (1,1,4,1,1)
  (same comment as for Sodium)
- Benzo(a)pyrene [air, urban air close to ground]: 3.8576e-13 kg; lognormal variance with pedigree 0.40875, pedigree (1,1,4,1,1)
  (same comment as for Carbon monoxide, fossil)
- DOC, Dissolved Organic Carbon [water, ground-, long-term]: 0.0018787 kg; lognormal variance with pedigree 0.022955, pedigree (1,1,4,1,1)
  (same comment as for Chloride)
- Aluminium [air, urban air close to ground]: 1.6524e-10 kg; lognormal variance with pedigree 0.95041, pedigree (1,1,4,1,1)
  (same comment as for Sodium)
- Heat, waste [water, surface water]: 5.1894 MJ; lognormal variance with pedigree 0.033021, pedigree (1,1,4,1,1)
  Waste heat generated from heating value of this waste plus any electricity required to process it.
  Uncertainty: uncertainty is calculated from uncertainties in waste composition and uncertainties in energy efficiency and the uncertainty in internal energy demand
- Sulfate [water, ground-, long-term]: 0.00048553 kg; lognormal variance with pedigree 0.65707, pedigree (1,1,4,1,1)
  (same comment as for Chloride)
- BOD5, Biological Oxygen Demand [water, surface water]: 0.00047665 kg; lognormal variance with pedigree 0.029041, pedigree (1,1,4,1,1)
  (same comment as for COD, Chemical Oxygen Demand)
- Heat, waste [air, urban air close to ground]: 22.664 MJ; lognormal variance with pedigree 0.033021, pedigree (1,1,4,1,1)
  (same comment as for Heat, waste)
- Nitrate [water, ground-, long-term]: 0.0021851 kg; lognormal variance with pedigree 0.18616, pedigree (1,1,4,1,1)
  (same comment as for Chloride)

## Extrapolations
This dataset has been extrapolated from year 2012 to the year of the calculation (2021). The uncertainty has been adjusted accordingly.
