# spodumene production

Dataset: EcoSpold 2, unit process
Geography: AU
Time period: 2000-01-01 to 2021-12-31
Technology level: current
Classification: EcoSpold01Categories: chemicals/inorganics
Classification: ISIC rev.4 ecoinvent: 0729:Mining of other non-ferrous metal ores
Scenario: Business-as-Usual
System model: Allocation, cut-off by classification
Generated by: Roland Hischier
Published in: Hischier R. 2007
Database: ecoinvent
isCopyrightProtected: true
accessRestrictedTo: 1

## General comment
This dataset represents the production of 1 kg of milled spodumene in Australia, which is the leading producer of spodumene, with 1,706,618 ton/yr in 2017 (USGS, 2017). Many data come from the dataset "spodumene production [RER]" available in ecoinvent database version 2 and based on the report by Hischier et al. (2007). Modifications to it have been made to reflect the properties of spodumene mined in Australia. Indeed, the amount of the exchange "Spodumene, in ground" have been recalculated based on the lithium content in raw and concentrated ores from Stamp et al. (2012), from the mining site of Talison, Australia. The exchanges "Gangue, in ground" and "non-sulfidic tailing, off-site" have been added for the sake of mass balance.
References:
USGS, 2017. Minerals Yearbook - Lithium.
Hischier et al., 2007. Life Cycle Inventories of Packaging and Graphical Paper. Fianl report ecoinvent data v.2.0.11. Dübendorf, CH, Swiss Centre for LCI, Empa.
Stamp, A., Lang, D. J., & Wäger, P. A. (2012). Environmental impacts of a transition toward e-mobility: the present and future role of lithium carbonate production. Journal of Cleaner Production, 23(1), 104-112.

## Included activities start
The activity starts from spodumene in the ground.

## Included activities end
This activites ends with the production of 1 kg of spodumene. The dataset includes the input of raw materials, machineries, energy consumption, emissions to air, and infrastructure of the site.

## Geography
The amount of spodumene in ground and consequently the tailing amount is based on information about the lithium content in raw and concentrated ores from Stamp et al. (2012), from the mining site of Talison, Australia
Reference:
Stamp, A., Lang, D. J., & Wäger, P. A. (2012). Environmental impacts of a transition toward e-mobility: the present and future role of lithium carbonate production. Journal of Cleaner Production, 23(1), 104-112.

## Technology
Technology for iron mining, crushing and milling for limestone production are assumed as a first approximation.

## Time period
The time period is from 2000 to 2012 (date of the publication including information on Lithium content)

## Parameters
- fraction, process water, to air: 0.205 dimensionless; name fraction_PW_to_air; lognormal variance with pedigree 0.092025, pedigree (4,4,3,2,4)
  Literature value (Statistics Canada, 2007 & Shaffer, K.H., 2008, Consumptive water use in the Great Lakes Basin, USGS) (Vionnet, S., Quantis Water Database - Technical Report, 2012).
- efficiency: 0.95 dimensionless; name recovery_efficiency
  95% recovery efficiency is assumed

## Reference product
- spodumene: 1 kg; name RefProd; By-product classification allocatable product; CPC 4160: Other non-ferrous metals and articles thereof (including waste and scrap of some metals); cermets and articles […]; CAS 1302-37-0
  EcoSpold01Location=RER
  Spodumene is one of the minerals that are exploited for lithium extraction. The lithium oxide content is from less than 1% up to more than 5%. Most lithium compounds and minerals are used in the ceramics, glass and primary aluminium industry. The four most important lithium minerals are amblygonite, spodumene, petalite, and lepidolite. Thereof spodumene and petalite are used directly in the form of ores or concentrates, especially in the glass industry.
  production volume 1.96594e9 kg; name spodumene_PV; = 1965944*1000
    According to USGS (2021), 1'965'944 metric tons of spodumene were mined in Australia in 2018.
    Reference:
    USGS (2021). Lithium Statistics and Information, Minerals Yearbook, Advance Data Release of the 2019 Annual Tables. https://prd-wret.s3.us-west-2.amazonaws.com/assets/palladium/production/atoms/files/myb1-2019-lithi-adv.xlsx
  property price 4.3 EUR2005
    Price of the production of 1 kg of lithium in USA, in 2010, based on [http://minerals.usgs.gov/minerals/pubs/mcs/2015/mcs2015.pdf].
  property lithium content 0.0349; name spodumene_Li_content; = 3.49/100
    lithium content on a dry matter basis. According to Stamp et al. 2012, Li content in concentrated ore is 3.49%
    Reference:
    Stamp, A., Lang, D. J., & Wäger, P. A. (2012). Environmental impacts of a transition toward e-mobility: the present and future role of lithium carbonate production. Journal of Cleaner Production, 23(1), 104-112.
  property carbon content 0
    carbon content on a dry matter basis (reserved; not for manual entry)
  properties: water content 0, dry mass 1 kg, wet mass 1 kg, carbon content, non-fossil 0, carbon content, fossil 0, water in wet mass 0 kg, carbon allocation 0 kg

## Inputs from technosphere
- mine infrastructure, iron: 8.33e-13 unit; source Classen M. 2009; lognormal variance with pedigree 0.5467, pedigree (4,3,4,3,5)
  Proxy; approximation with data from iron mining.
  EcoSpold01Location=GLO
  Uncertainty: approximation with data from iron mining & lime treatment
- electricity, medium voltage: 0.0339 kWh; source Classen M. 2009; lognormal variance with pedigree 0.2367, pedigree (4,3,4,3,5)
  EcoSpold01Location=UCTE
  Proxy; approximation with data from iron extraction and limestone crushing and milling.
  Additional reference:
  Kellenberger D., Althaus H.-J., Jungbluth N. and Künniger T. (2007) Life Cycle Inventories of Building Products. Final report ecoinvent data v2.0 No. 7. Swiss Centre for Life Cycle Inventories, Empa
  Uncertainty: approximation with data from iron mining & lime treatment
- industrial machine, heavy, unspecified: 0.000231 kg; source Kellenberger D. 2007; lognormal variance with pedigree 0.5467, pedigree (4,3,4,3,5)
  EcoSpold01Location=RER
  Proxy; approximation with data from limestone crushing and milling.
  Uncertainty: approximation with data from iron mining & lime treatment
- heat, central or small-scale, other than natural gas: 0.00282 MJ; source Kellenberger D. 2007; lognormal variance with pedigree 0.2367, pedigree (4,3,4,3,5)
  EcoSpold01Location=CH
  Proxy; approximation with data from limestone crushing and milling.
  Uncertainty: approximation with data from iron mining & lime treatment
  properties: heating value, net 1 MJ
- conveyor belt: 2.78e-8 m; source Kellenberger D. 2007; lognormal variance with pedigree 0.5467, pedigree (4,3,4,3,5)
  EcoSpold01Location=RER
  Proxy; approximation with data from limestone crushing.
  Uncertainty: approximation with data from iron mining & lime treatment
- recultivation, iron mine: 2.13e-6 m2; source Classen M. 2009; lognormal variance with pedigree 0.3667, pedigree (4,3,4,3,5)
  EcoSpold01Location=GLO
  Proxy; approximation with data from iron mining.
  Uncertainty: approximation with data from iron mining & lime treatment
- non-sulfidic tailing, off-site: -1.38885 kg; name tailing_amount; = ((spodumene_in_ground_amount + gangue_amount - RefProd- PM_large_amount - PM_medium_amount - PM_small_amount)/0.7)*-1; lognormal variance with pedigree 0.2106, pedigree (5,5,5,5,5)
  Calculated value to obtain mass balance, considering the dry mass of tailings (0.7, see exchange properties)
  production volume 2.7304e9 kg; = spodumene_PV*tailing_amount/RefProd
    Calculated from production volume of reference product using the relative outputs.
  property price 0 EUR2005; name tailing_amount_price_EUR2005
  property dry mass 0.7 kg; name tailing_DM
  properties: water content 0.428571, lithium content 0.00246225, wet mass 1 kg
  note on lithium content: lithium content on a dry matter basis. Calculated value based on the Li content of spodumene in ground, spodumene concentrate (reference product) and the mass of tailings.
- diesel, burned in building machine: 0.0255 MJ; source Classen M. 2009; lognormal variance with pedigree 0.2367, pedigree (4,3,4,3,5)
  (same comment as for mine infrastructure, iron)
  properties: heating value, net 1 MJ
- heat, district or industrial, other than natural gas: 0.0898 MJ; source Kellenberger D. 2007; lognormal variance with pedigree 0.2367, pedigree (4,3,4,3,5)
  (same comment as for conveyor belt)
  properties: heating value, net 1 MJ
- blasting: 0.000271 kg; source Classen M. 2009; lognormal variance with pedigree 0.2367, pedigree (4,3,4,3,5)
  EcoSpold01Location=RER
  Proxy; approximation with data from iron mining.
  Uncertainty: approximation with data from iron mining & lime treatment

## Inputs from nature
- Transformation, from forest, unspecified [natural resource, land]: 2.13e-6 m2; source Classen M. 2009; lognormal variance with pedigree 0.3667, pedigree (4,3,4,3,5)
  Proxy; approximation with data from iron mining.
  Uncertainty: approximation with data from iron mining & lime treatment
- Water, well, in ground [natural resource, in water]: 0.000416655 m3; = (tailing_amount*-1)*0.3/1000; lognormal variance with pedigree 0.31, pedigree (5,5,5,5,5)
  Calculated value, based on the wet mass of tailing.
  Uncertainty: approximation with data from iron mining & lime treatment
- Spodumene, in ground [natural resource, in ground]: 0.985066 kg; name spodumene_in_ground_amount; = (spodumene_Li_content/ recovery_efficiency)/(6.94/(6.94+26.98+2*(28.085+3*16))); lognormal variance with pedigree 0.2367, pedigree (4,3,4,3,5)
  Calculated value based on lithium content in pure spodumene in ground (LiAl(SiO3)2), i.e. 3.49% according to Stamp et al. 2012. Molecular weights: Li = 6.94 g/mol; Al = 26.98 g/mol; Si = 28.085 g/mol; O = 16 g/mol
  Reference:
  Stamp, A., Lang, D. J., & Wäger, P. A. (2012). Environmental impacts of a transition toward e-mobility: the present and future role of lithium carbonate production. Journal of Cleaner Production, 23(1), 104-112.
  Uncertainty: approximation with data from iron mining & lime treatment
  property lithium content 0.0372938; name spodumene_in_ground_Li_content; = (6.94/(6.94+26.98+2*(28.085+3*16)))
- Transformation, to mineral extraction site [natural resource, land]: 2.13e-6 m2; source Classen M. 2009; lognormal variance with pedigree 0.3667, pedigree (4,3,4,3,5)
  (same comment as for Transformation, from forest, unspecified)
- Gangue, in ground [natural resource, in ground]: 0.990033 kg; name gangue_amount; = ((spodumene_Li_content/recovery_efficiency)/(1.86/100))-(spodumene_Li_content/ recovery_efficiency)/(6.94/(6.94 + 26.98 + 2*(28.085 + 3*16))); lognormal variance with pedigree 0.2106, pedigree (5,5,5,5,5)
  Calculated value based on lithium content in pure spodumene in ground (LiAl(SiO3)2) for which a recovery rate of 95% is assumed, and the li content in extracted ores (1.86% according to Stamp et al. 2012). Molecular weights: Li = 6.94 g/mol; Al = 26.98 g/mol; Si = 28.085 g/mol; O = 16 g/mol
  Reference:
  Stamp, A., Lang, D. J., & Wäger, P. A. (2012). Environmental impacts of a transition toward e-mobility: the present and future role of lithium carbonate production. Journal of Cleaner Production, 23(1), 104-112.
- Occupation, mineral extraction site [natural resource, land]: 0.00012 m2*year; source Classen M. 2009; lognormal variance with pedigree 0.2767, pedigree (4,3,4,3,5)
  (same comment as for Transformation, from forest, unspecified)

## Emissions to nature
- Particulates, < 2.5 um [air, non-urban air or from high stacks]: 0.000145 kg; name PM_small_amount; source Classen M. 2009; lognormal variance with pedigree 0.5467, pedigree (4,3,4,3,5)
  Proxy; approximation with data from iron mining and limestone production.
  Additional reference:
  Kellenberger D., Life Cycle Inventories of Building Products (2007)
  Uncertainty: approximation with data from iron mining & lime treatment
- Particulates, > 2.5 um, and < 10um [air, non-urban air or from high stacks]: 0.00131 kg; name PM_medium_amount; source Classen M. 2009; lognormal variance with pedigree 0.3667, pedigree (4,3,4,3,5)
  (same comment as for Particulates, < 2.5 um)
- Particulates, > 10 um [air, non-urban air or from high stacks]: 0.00145 kg; name PM_large_amount; source Classen M. 2009; lognormal variance with pedigree 0.2767, pedigree (4,3,4,3,5)
  (same comment as for Particulates, < 2.5 um)

## Sampling procedure
Approximation with data from literature. Amounts are mostly taken from the report by Hischier et al. 2007 (see published source). The amount of spodumene in ground and consequently the tailing amount is based on information about the lithium content in raw and concentrated ores from Stamp et al. (2012), from the mining site of Talison, Australia.

Reference:
Stamp, A., Lang, D. J., & Wäger, P. A. (2012). Environmental impacts of a transition toward e-mobility: the present and future role of lithium carbonate production. Journal of Cleaner Production, 23(1), 104-112.

## Extrapolations
This dataset has been extrapolated from year 2012 to the year of the calculation (2021). The uncertainty has been adjusted accordingly.

## Review by Carl Vadenbo 2021-02-24
The quality of this data seems ok for accetance into the database.
