# fibre, silk, short, Recycled Content cut-off

Dataset: EcoSpold 2, unit process
Geography: GLO
Time period: 2021-01-01 to 2021-12-31
Technology level: current
Scenario: Business-as-Usual
System model: Allocation, cut-off by classification
Generated by: [System]
isCopyrightProtected: true
accessRestrictedTo: 1

## Reference product
- fibre, silk, short: 1 kg; By-product classification Recyclable; CPC 39211: Silk waste
  property heating value, net 11 MJ
    LHV is calculated based on the Carbon content of the product. More details can be found on the respective documentation.
  property carbon content, non-fossil 0.3769
    "Carbon content on a dry mass basis. All carbon is assumed to be biogenic due to the nature of the product. Carbon content of cotton is 0.44 kg of non-fossil carbon per kg of dry mass of cotton. Value is calculated based on the the composition of silk which is 64% cellulose. The data uses composition of silk fibers accessed on 10/11/2017 on: http://textilefashionstudy.com/chemical-composition-of-silk-fiber-silk-natural-fiber/
    "
  property carbon content 0.3769
    carbon content on a dry matter basis (reserved; not for manual entry)
  properties: wet mass 1 kg, water in wet mass 0.03 kg, water content 0.0309278, carbon content, fossil 0, dry mass 0.97 kg, carbon allocation 0.365593 kg
