# chilli production

Dataset: EcoSpold 2, unit process
Geography: RoW
Time period: 2015-01-01 to 2021-12-31
Technology level: current
Classification: ISIC rev.4 ecoinvent: 0128:Growing of spices, aromatic, drug and pharmaceutical crops
Scenario: Business-as-Usual
System model: Allocation, cut-off by classification
Generated by: [System]
Database: ecoinvent
isCopyrightProtected: true
accessRestrictedTo: 1

## General comment
This dataset represents the production of 1 kg of fresh green chilli during January-May, 2016 at a farm located in village Bhagatpur Ratan, District- Moradabad of UP. In this area, fields are irrigated with ground water using electric pump for surface irrigation. The farm has a yield of 28,500 kg fresh matter per ha for this crop cycle. Sowing date for the crop is 3-March, 2016 and harvesting date is 15-May, 2016. Mineral NPK fertilizer input is 104-48-24 kg/ha. Organic fertilizer applied amounts to 60,000 kg of manure from cattle dung. Only pesticide used has active ingredient as Carbofuran 450g/ha. Machinery is used only for soil cultivation with fuel consumption of 12.48 kg/ha using plough and rotary cultivator for soil tillage.

## Included activities start
This activity starts about six weeks after the harvest of the previous crop. The soil is prepared for cultivation in January and sowing of seeds started about five weeks after soil preparation. Thereafter the crop is mature for harvesting in about 2.5 months.

## Included activities end
The activity ends with the harvesting of the mature Chilli from the Chilli plant

## Technology
Cultivation of Chilli follows conventional production standards

## Time period
Soil cultivating date for the main crop: 27-January, 2016; Harvesting date main crop: 15-May, 2016. The soil cultivation, sowing and harvesting dates are taken as the middle date of the week or fortnight told to the data collector by the farmer. Total time from date of sowing to date of harvesting comes to 72 days. The data is collected for one crop cycle. The cycle of one year is considered for entry in ecoeditor.

## Reference product
- chilli: 1 kg; By-product classification allocatable product; CPC 01231: Chillies and peppers, green (Capsicum spp. and Pimenta spp.)
  production volume 3.30229e10 kg; = 34497462*1000
    Combined data for Chillies and peppers, green for year 2016, Source: http://www.fao.org/faostat/en/#data/QC
  property price 0.687623 EUR2005
    Literature value. Price from FAOSTAT data Producer Prices - Annual (retrieved from: http://www.fao.org/faostat/en/#data/PP, accessed 15Feb2018). Data from 2005.
  property carbon content 0.475
    carbon content on a dry matter basis (reserved; not for manual entry)
  properties: carbon content, fossil 0, dry mass 0.1205 kg, water in wet mass 0.8795 kg, water content 7.29876, carbon content, non-fossil 0.475, wet mass 1 kg, carbon allocation 0.0572375 kg

## Inputs from technosphere
- inorganic potassium fertiliser, as K2O: 0 kg; pedigree (1,1,1,1,1)
  The data was collected for a hectare area through interview
  properties: dry mass 1 kg, wet mass 1 kg
- [thio]carbamate-compound: 1.57895e-5 kg; lognormal variance with pedigree 0.006, pedigree (3,3,2,5,2)
  The data was collected for a hectare area through interview
  properties: carbon content, fossil 0.626349, wet mass 1 kg, dry mass 1 kg
- urea: 0 kg; pedigree (1,1,1,1,1)
  The exchange has been updated from 'urea, as N' into 'urea' and therefore its amount has been scaled (multiplied) from 0.003 kg by 2.1438 kg of 'urea' per kg of 'urea, as N'. Original comment of the exchange is: The data was collected for a hectare area through interview
  properties: wet mass 1 kg, carbon content, fossil 0.2, dry mass 1 kg
- packaging, for fertilisers: 0.0123684 kg; lognormal variance with pedigree 0.0514, pedigree (4,3,2,5,4)
  Total amount of active substance/s of fertilisers needed for the production of 'chilli' is calculated to be circa 6.18E-03 kg. Fertiliser/s used in this dataset is/are: 'nitrogen fertiliser, as N', 'phosphate fertiliser, as P2O5', 'potassium fertiliser, as K2O', 'urea, as N'. The total amount of active substance/s is doubled in order to account for the packaging of the dilluted product of fertiliser/s that is/are applied. Therefore, 1.24E-02 kg of packaging for fertilisers is justified with this exchange.
  properties: price 0.0642 EUR2005, heating value, net 25.01 MJ, dry mass 1 kg, carbon content, fossil 0.825301, wet mass 1 kg
  note on carbon content, fossil: Considering a chemical formula (C2H4)n for polyethylene, carbon content-fossil is calculated to be 0.856286 kg of Carbon per kg of dry mass.
- tillage, ploughing: 1.1241e-5 ha; lognormal variance with pedigree 0.006, pedigree (3,3,2,5,2)
  The data was collected for a hectare area through interview
- compost: 2.10526 kg; lognormal variance with pedigree 0.006, pedigree (3,3,2,5,2)
  Home made compos. The data was collected for a hectare area through interview
  property nitrogen content 0.014; name N_content
  property dry mass 0.5 kg; name DM
  property copper content 5.77e-5; name Cu_content
  property nickel content 1.63e-5; name Ni_content
  property lead content 4.9e-5; name Pb_content
  property potassium content 0.01; name K_content
  property mercury content 1.2e-7; name Hg_content
  property chromium content 2.23e-5; name Cr_content
  property cadmium content 3.6e-7; name Cd_content
  property zinc content 0.000184; name Zn_content
  property phosphorus content 0.0035; name P_content
  properties: wet mass 1 kg, carbon content, non-fossil 0.183645, water content 1
- inorganic nitrogen fertiliser, as N: 0 kg; pedigree (1,1,1,1,1)
  The data was collected for a hectare area through interview
  properties: wet mass 1 kg, dry mass 1 kg
- tillage, rotary cultivator: 1.02486e-5 ha; lognormal variance with pedigree 0.006, pedigree (3,3,2,5,2)
  The data was collected for a hectare area through interview
- inorganic phosphorus fertiliser, as P2O5: 0 kg; pedigree (1,1,1,1,1)
  The data was collected for a hectare area through interview
  properties: dry mass 1 kg, wet mass 1 kg
- irrigation: 0 m3; pedigree (1,1,1,1,1)
  The data was collected for a hectare area through interview
  properties: water content 9089.91, wet mass 1000 kg, dry mass 0.11 kg
- packaging, for pesticides: 3.15789e-5 kg; lognormal variance with pedigree 0.0514, pedigree (4,3,2,5,4)
  Total amount of active substance/s of pesticides needed for the production of chilli is calculated to be circa 1.58E-05 kg. Pesticide/s used in this dataset is/are: '[thio]carbamate-compound'. The total amount of active substance/s is doubled in order to account for the packaging of the dilluted product of pesticide/s that is/are applied. Therefore, 3.16E-05 kg of packaging for pesticides is justified with this exchange.
  properties: dry mass 1 kg, heating value, net 25.97 MJ, price 0.0642 EUR2005, carbon content, fossil 0.85714, wet mass 1 kg
- inorganic potassium fertiliser, as K2O: 5.65167e-7, 2.80064e-6, 5.68047e-6, 7.02319e-5, 5.02771e-6, 7.27158e-7, 1.21073e-6, 0.000117636, 4.09176e-6, 1.00794e-6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 kg (29 entries); lognormal variance with pedigree 0.006, pedigree (3,3,2,5,2)
  The data was collected for a hectare area through interview
- urea: 0.00488747, 0.000897351, 0.000723863 kg (3 entries); lognormal variance with pedigree 0.006, pedigree (3,3,2,5,2)
  (same comment as for urea)
- inorganic nitrogen fertiliser, as N: 3.25564e-6, 4.67954e-6, 4.18242e-6, 1.46922e-5, 8.77435e-6, 1.08756e-7, 6.51195e-7, 8.25101e-5, 1.54206e-6, 2.31611e-7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 kg (29 entries); lognormal variance with pedigree 0.006, pedigree (3,3,2,5,2)
  The data was collected for a hectare area through interview
- inorganic phosphorus fertiliser, as P2O5: 1.28682e-5, 1.66953e-5, 1.33685e-5, 0.000104675, 2.20562e-5, 9.08799e-7, 2.39555e-6, 0.000247116, 4.45414e-6, 4.86054e-7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 kg (29 entries); lognormal variance with pedigree 0.006, pedigree (3,3,2,5,2)
  The data was collected for a hectare area through interview
- irrigation: 0.000611772, 2.59679e-5, 1.03871e-6, 0.00546883, 8.96196e-5, 4.48135e-6, 0.000254463, 4.14184e-5, 0.000202015, 6.90439e-5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 m3 (16 entries); lognormal variance with pedigree 0.006, pedigree (3,3,2,5,2)
  The data was collected for a hectare area through interview

## Inputs from nature
- Carbon dioxide, in air [natural resource, in air]: 0.320983 kg; lognormal variance with pedigree 0.006, pedigree (3,3,2,5,2)
  Calculated Value. This value has been calculated by using the Ecoinvent LCI calculation tool for crop production
- Energy, gross calorific value, in biomass [natural resource, biotic]: 3.7104 MJ; lognormal variance with pedigree 0.0194, pedigree (4,5,2,5,2)
  The data was collected for a hectare area through interview
- Transformation, to annual crop, irrigated [natural resource, land]: 0.350877 m2; lognormal variance with pedigree 0.0134, pedigree (3,3,2,5,2)
  (same comment as for Carbon dioxide, in air)
- Transformation, from annual crop, irrigated [natural resource, land]: 0.350877 m2; lognormal variance with pedigree 0.0134, pedigree (3,3,2,5,2)
  (same comment as for Carbon dioxide, in air)
- Occupation, annual crop, irrigated [natural resource, land]: 0.146199 m2*year; lognormal variance with pedigree 0.0074, pedigree (3,3,2,5,2)
  (same comment as for Carbon dioxide, in air)

## Emissions to nature
- Chromium, ion [water, surface water]: 1.04575e-6 kg; lognormal variance with pedigree 0.1088, pedigree (4,5,2,5,2)
  (same comment as for Carbon dioxide, in air)
- Carbon dioxide, fossil [air, non-urban air or from high stacks]: 0.00476967 kg; lognormal variance with pedigree 0.0194, pedigree (4,5,2,5,2)
  (same comment as for Carbon dioxide, in air)
- Chromium, ion [water, ground-]: 3.0927e-7 kg; lognormal variance with pedigree 0.1088, pedigree (4,5,2,5,2)
  (same comment as for Carbon dioxide, in air)
- Dinitrogen monoxide [air, non-urban air or from high stacks]: 0.0003584 kg; lognormal variance with pedigree 0.0488, pedigree (4,5,2,5,2)
  (same comment as for Carbon dioxide, in air)
- Cadmium, ion [water, surface water]: 1.16602e-8 kg; lognormal variance with pedigree 0.1088, pedigree (4,5,2,5,2)
  (same comment as for Carbon dioxide, in air)
- Cadmium [soil, agricultural]: 4.31364e-7 kg; lognormal variance with pedigree 0.0588, pedigree (4,5,2,5,2)
  (same comment as for Carbon dioxide, in air)
- Phosphate [water, ground-]: 3.13791e-6 kg; lognormal variance with pedigree 0.0588, pedigree (4,5,2,5,2)
  (same comment as for Carbon dioxide, in air)
- Chromium [soil, agricultural]: 2.30854e-5 kg; lognormal variance with pedigree 0.0588, pedigree (4,5,2,5,2)
  (same comment as for Carbon dioxide, in air)
- Lead [water, ground-]: 8.72577e-9 kg; lognormal variance with pedigree 0.1088, pedigree (4,5,2,5,2)
  (same comment as for Carbon dioxide, in air)
- Mercury [soil, agricultural]: 1.20153e-7 kg; lognormal variance with pedigree 0.0588, pedigree (4,5,2,5,2)
  (same comment as for Carbon dioxide, in air)
- Copper, ion [water, surface water]: 1.52069e-6 kg; lognormal variance with pedigree 0.1088, pedigree (4,5,2,5,2)
  (same comment as for Carbon dioxide, in air)
- Nickel [soil, agricultural]: 1.61941e-5 kg; lognormal variance with pedigree 0.0588, pedigree (4,5,2,5,2)
  (same comment as for Carbon dioxide, in air)
- Lead [water, surface water]: 9.61419e-7 kg; lognormal variance with pedigree 0.1088, pedigree (4,5,2,5,2)
  (same comment as for Carbon dioxide, in air)
- Copper [soil, agricultural]: 5.8591e-5 kg; lognormal variance with pedigree 0.0588, pedigree (4,5,2,5,2)
  (same comment as for Carbon dioxide, in air)
- Mercury [water, ground-]: 1.88985e-11 kg; lognormal variance with pedigree 0.1088, pedigree (4,5,2,5,2)
  (same comment as for Carbon dioxide, in air)
- Zinc [soil, agricultural]: 0.000186511 kg; lognormal variance with pedigree 0.0588, pedigree (4,5,2,5,2)
  (same comment as for Carbon dioxide, in air)
- Nickel, ion [water, surface water]: 9.58205e-7 kg; lognormal variance with pedigree 0.1088, pedigree (4,5,2,5,2)
  (same comment as for Carbon dioxide, in air)
- Lead [soil, agricultural]: 5.03724e-5 kg; lognormal variance with pedigree 0.0588, pedigree (4,5,2,5,2)
  (same comment as for Carbon dioxide, in air)
- Mercury [water, surface water]: 2.97192e-9 kg; lognormal variance with pedigree 0.1088, pedigree (4,5,2,5,2)
  (same comment as for Carbon dioxide, in air)
- Carbofuran [soil, agricultural]: 1.57895e-5 kg; lognormal variance with pedigree 0.0518, pedigree (4,5,2,5,2)
  (same comment as for Carbon dioxide, in air)
- Copper, ion [water, ground-]: 5.26013e-8 kg; lognormal variance with pedigree 0.1088, pedigree (4,5,2,5,2)
  (same comment as for Carbon dioxide, in air)
- Water [water, ground-]: 0.0118232 m3; lognormal variance with pedigree 0.0194, pedigree (4,5,2,5,2)
  (same comment as for Carbon dioxide, in air)
- Nitrate [water, ground-]: 0.00708383 kg; lognormal variance with pedigree 0.0588, pedigree (4,5,2,5,2)
  (same comment as for Carbon dioxide, in air)
- Zinc, ion [water, ground-]: 4.79206e-7 kg; lognormal variance with pedigree 0.1088, pedigree (4,5,2,5,2)
  (same comment as for Carbon dioxide, in air)
- Zinc, ion [water, surface water]: 2.70263e-6 kg; lognormal variance with pedigree 0.1088, pedigree (4,5,2,5,2)
  (same comment as for Carbon dioxide, in air)
- Water [water, surface water]: 0.00303158 m3; lognormal variance with pedigree 0.0194, pedigree (4,5,2,5,2)
  (same comment as for Carbon dioxide, in air)
- Phosphate [water, surface water]: 8.78615e-6 kg; lognormal variance with pedigree 0.0588, pedigree (4,5,2,5,2)
  (same comment as for Carbon dioxide, in air)
- Water [air, non-urban air or from high stacks]: 0.0154611 m3; lognormal variance with pedigree 0.0194, pedigree (4,5,2,5,2)
  (same comment as for Carbon dioxide, in air)
- Phosphorus [water, surface water]: 7.97523e-5 kg; lognormal variance with pedigree 0.0588, pedigree (4,5,2,5,2)
  (same comment as for Carbon dioxide, in air)
- Ammonia [air, non-urban air or from high stacks]: 0.00190643 kg; lognormal variance with pedigree 0.0268, pedigree (4,5,2,5,2)
  (same comment as for Carbon dioxide, in air)
- Cadmium, ion [water, ground-]: 7.15284e-10 kg; lognormal variance with pedigree 0.1088, pedigree (4,5,2,5,2)
  (same comment as for Carbon dioxide, in air)
- Nitrogen oxides [air, non-urban air or from high stacks]: 0.00112812 kg; lognormal variance with pedigree 0.0588, pedigree (4,5,2,5,2)
  (same comment as for Carbon dioxide, in air)

## Sampling procedure
The farmer was identified and contacted by agriculture science faculty familiar with the local farmers in the region. Data was collected directly from the farmer through semi-structured interview using a questionnaire based on the input requirements of the ecoinvent LCI calculation tool for crop production. The farmer does not maintain any written records and has provided the data from recent memory. In this region, typically farmers are unable to provide exact name of active ingredient in the pesticide they use and the same was noted from details given on the pesticide packet. Individual farmer is not able to calculate fuel consumption for his own farm alone and this information has been collected from farming community of the area.

## Extrapolations
Ecoinvent LCI calculation tool for crop production was used to calculate field emissions from the cultivation process. Number of wet days have been taken for neighboring region (New Delhi) and rainfall data is Normal rainfall for Western Uttar Pradesh where the farm is located.

## Review by Assumpció ANTON 2018-02-23
The activity general comment for GLO is still the specific for IN, we agreed to change this comment for general for GLO
