# hard coal mine operation, underground

Dataset: EcoSpold 2, unit process
Geography: ZA
Time period: 2014-01-01 to 2021-12-31
Technology level: current
Classification: EcoSpold01Categories: hard coal/production
Classification: ISIC rev.4 ecoinvent: 0510:Mining of hard coal
Scenario: Business-as-Usual
System model: Allocation, cut-off by classification
Generated by: Philippa Notten
Published in: Notten P.J. 2017
Database: ecoinvent
isCopyrightProtected: true
accessRestrictedTo: 1

## General comment
This dataset represents the production of 1 kg run-of-mine (ROM) hard coal in South Africa extracted from underground mines. 125 million tonnes tones of ROM coal were produced from underground mines in 2014, accounting for 37% of South Africa's total ROM coal production. The two main forms of underground mining in South Africa are bord-and-pillar and longwall mining, with bord-and-pillar the predominant method due to the challenging geological conditions of most of South Africa's coal deposits. The dataset provides an average of both methods using a combination of industry data and government research reports for inputs to the mining process as well as methane emissions. Emissions to water should only be taken as indicative and are highly uncertain. Particulate emissions are rough estimates and not specific to South African mining. Land transformation assumes the mines are located in the grassland region of South Africa and that the pre-mining land use was livestock grazing. For land occupation, mine life is assumed to be 30 years (slightly below the average predicted lifetime of the mines in the industry data sample), with revegetation assumed to be completed within 10 years of mine closing (planning for closure is a legal requirement in South Africa, with revegetation usually commencing prior to the mine closing). Infrastructure requirements are generic, and are as applied in other ecoinvent coal mining datasets (in which total production over the life time of the mine is assumed to be 3*10^10 kg, an average value that is not representative for single mines or specific conditions).
[This dataset is meant to replace the following datasets:]

## Included activities start
Underground coal extraction process starting from hard coal, in ground.

## Included activities end
This activity ends with 1 kg hard coal (run-of-mine output) at the mine mouth. It does not include coal beneficiation. This dataset includes land use during operation, emissions into water and air, water extraction and use, energy requirements for operation and explosives. Post-closure rehabilitation of the mine is not included due to a lack of data on the requirements of revegetation.

## Geography
Mining efficiency, energy and land requirements are specific to collieries mining the Witbank and Highveld coalseams in South Africa, whilst methane emissions and water use are estimated for underground mining in South Africa as a whole. Infrastructure requirements are not South African specific. Particulate emissions, radon emissions and certain emissions to water (ammonium, nickel, strontium and zinc), for which South African specific data was not available, are also not specific to South Africa.

## Technology
This dataset is representative of the two main forms of underground mining in South Africa, namely bord-and-pillar and longwall mining.

## Time period
2014 is chosen as a base year because this is the latest year for which coal production and yield data were available (i.e. the most recent government statistics on coal mining). The industry data on which the dataset is based is somewhat earlier than 2014 (mid 2000 to 2010), but expert opinion consulted is that mining operations have not changed much over this time, thus it made sense to use the most recent production data. The water balance data used in the dataset is older (2001), and expert opinion is used to adjust for efficiency improvements, so that water consumption and emissions are more represenative of 2014.

## Parameters
- fraction, water to groundwater: 0.41 dimensionless; name fraction_water_seepage
- fraction, water to air: 0.57 dimensionless; name fraction_water_air
- fraction, water to river: 0.02 dimensionless; name fraction_water_river
- time until revegetation: 10 year; name revegetation_time
  Assumption, based on the fact that revegation is a requirment for mine closure. Unlike in the past, regulations governing mining require planning for closure from the start of operation, and especially in the later years. Furthermore, strip mines rehabilitate over the life of the mine, with mines nearing closure showing around 40% of the disturbed areas already revegetated.

## Reference product
- hard coal, run-of-mine: 1 kg; name RP_amount_1; By-product classification allocatable product; CPC 11010: Hard coal
  This dataset represents run-of-mine coal, which is assumed to equate to coal extracted, "coal, hard, unspecified, in ground".
  production volume 1.25e11 kg; name RP_PV_1
    338 million tonnes of run-of-mine coal was produced in South Africa in 2014, with 37% from underground mines (board & pillar 35%, stooping 1.5% and longwall 0.5%) (DMR, 2015) Reference(s): Department of Minerals and Resources (2015) South Africa's Mineral Industry (SAMI) 2014/2015. Pretoria
  property heating value, net 27.91 MJ
    Based on the Characterization factor of Hard coal in the CED method
  property price 70 EUR2005; name RP_amount_1_price_EUR2005
    The average hard coal price between 2009 and 2019 was approximately 88USD/tonne. The average exchange rate between 2009 and 2019 was 1.25 EUR/USD. Mind that prices differ depending on coal quality, on whether freight cost and insurance is included etc. This price is an approximate averag world market price for traded (i.e. shipped) coal.
    Reference(s):
    Trading Economics, 2019, Coal, accessed at https://tradingeconomics.com/commodity/coal, July 2019
    Fxtop, 2016, Historical Rates, accessed at https://fxtop.com/en/historical-exchange-rates.php?A=1&C1=EUR&C2=USD&YA=1&DD1=27&MM1=06&YYYY1=2009&B=1&P=&I=1&DD2=27&MM2=06&YYYY2=2019&btnOK=Go%21, July 2019
  property water in wet mass 0.002 kg; name coal_water_wet_mass
  property carbon content 0.47
    carbon content on a dry matter basis (reserved; not for manual entry)
  properties: wet mass 1 kg, water content 0.00200401, carbon content, fossil 0.47, carbon content, non-fossil 0, dry mass 0.998 kg, carbon allocation 0.46906 kg

## Inputs from technosphere
- blasting: 1.71e-5 kg; lognormal variance with pedigree 0.9412, pedigree (2,3,5,1,1)
  EcoSpold01Location=RER
  Average of explosive use in three underground mines over two years (industry data). The type of explosive use is given for only one mine, which indicates that ANFO (ammonium nitrate fuel-oil) is the predominant explosive used.
  Uncertainty: Basic uncertainty derived from range in data.
- spoil from hard coal mining: -0.11 kg; name mining_spoil; lognormal variance with pedigree 5.5412, pedigree (2,3,5,1,1)
  EcoSpold01Location=GLO
  This is inter-burden/over-burden ONLY as discard produced in coal preparation is included in the coal preparation dataset.Value is average from three South African underground coal mines (industry data). Derived from data on total tonnes moved and ROM coal production.
  Uncertainty: Basic variance derived from range across three mines (high because zero in one mine)
  production volume 1.375e10 kg; = RP_PV_1 * (mining_spoil / RP_amount_1)
    Calculated from production volume of reference product using the relative outputs.
  property price 0 EUR2005; name mining_spoil_price_EUR2005
  properties: dry mass 1 kg, wet mass 1 kg, carbon content, fossil 0.007879
  note on carbon content, fossil: Composition of coal spoil is adopted by proxy from lignite spoil (pg 19, Doka G. (2009) Life Cycle Inventory of the disposal of lignite spoil, coal spoil and coal tailings. Doka Life Cycle Assessments, Zurich. Commissioned by the Swiss Centre for Life Cycle Inventories ecoinvent Centre)
- conveyor belt: 2.49e-6 m; lognormal variance with pedigree 0.3418, pedigree (2,3,5,1,2)
  Based on annual conveyor belt replacment lengths across nine mines (industry data). The value is not specific to underground mines.
- tap water: 0.02 kg; name tap_water_input; lognormal variance with pedigree 0.3426, pedigree (3,3,5,1,1)
  EcoSpold01Location=RER
  Water purchased from water boards is assumed to be potable water. Total water use by underground mines is assumed to be 215 litres/tonne ROM, with10% of this purchased water. The total water use value is derived from Pulles et al. (2001) and consultation with industry. The sources of water on the mines is obtained from Pullles et al. (2001), with the 10% purchased figure obtained from the average of 16 underground mines. Water figures are adjusted to exclude water for human consumption.References: Pulles, W., Boer, R. & Nel, S. 2001. A Generic Water Balance for the South African Coal Mining Industry. Water
  Research Commission Report No. 801/1/01.; Johan de Korte, Senior Researcher, Council for Scientific and Industrial Research (CSIR), telephonic interview, 7 June 2017.
  properties: water content 2962.17, wet mass 1 kg, carbon content, fossil 0.00178991, dry mass 0.000337476 kg
  note on carbon content, fossil: Bicarbonate content is 2.93 mol/m3. CO2 content is 0.1 mol/m3 (ecoinvent v2.2 report 8, Tab 93.1).
- mine infrastructure, underground, hard coal: 1.67e-11 unit; lognormal variance with pedigree 0.478, pedigree (4,5,5,5,5)
  Estimated value not geography specific (generic value used in other ecoinvent coal mining datasets). In this dataset infrastructure requirements are applied to total production over the life time. For this, the total production has to be estimated. A total production over life time of 3*10^10 kg is assumed (a nominal 30 years mine life at 1 mtpa is deemed a reasonable average for a South African coal mine).
  EcoSpold01Location=GLO
  Uncertainty: Generic basic uncertainty value and high pedigree scores (due to value being taken from previous dataset)
- diesel, burned in building machine: 0.013 MJ; lognormal variance with pedigree 0.2812, pedigree (2,3,5,1,1)
  EcoSpold01Location=GLO
  Average diesel use in three South African underground coal mines over two years of operation (industry data). Diesel is converted from litres to energy (MJ) using a density of 0.84 kg/litre and a calorific value of 42.7 MJ/kg. All diesel is assumed to be used in mining machinery. The relatively small amount of petrol use (0.02 litres/tonne) is not included in the dataset.
  Uncertainty: Basic variance derived from range in data.
  properties: heating value, net 1 MJ
- limestone, crushed, washed: 0.00103 kg; lognormal variance with pedigree 0.0432, pedigree (2,4,5,1,1)
  Representative value from a single underground mine (industry data). Milled limestone, or "stone dust", is used in underground mines to prevent coal dust explosions.
  properties: carbon content, fossil 0.117257, wet mass 1 kg, dry mass 0.998 kg, water content 0.00200401
  note on carbon content, fossil: Table 3.1, ecoinvent v2.2 report 7, part VII, pg 3. MW CaCO3=100, MW MgCO3=84. C content of limestone is 0.117257 kg/kg DM
- electricity, high voltage: 0.0147 kWh; lognormal variance with pedigree 0.0612, pedigree (2,3,5,1,1)
  EcoSpold01Location=UCTE
  Average from three South African underground coal mines over two years of operation (industry data). Electricity provides the major source of energy on the mines, with no coal used for heating and energy on these three mines, and negligible LPG use by one of the mines.
  Uncertainty: Basic variance derived from range in data.

## Inputs from nature
- Water, unspecified natural origin [natural resource, in water]: 1.7e-5 m3; name water_unspecified; lognormal variance with pedigree 0.2426, pedigree (3,3,5,1,1)
  Average share of water use in underground mines for which the origin is not specified is taken from Pulles et al. (2001), in which a sample of 16 underground mines found that the origin of 8% of water inputs were not known/specified.Total water use by underground mines is assumed to be 215 litres/tonne ROM, The total water use value is derived from Pulles et al. (2001) and consultation with industry experts. Water figures are adjusted to exclude water for human consumption.References: Pulles, W., Boer, R. & Nel, S. 2001. A Generic Water Balance for the South African Coal Mining Industry. Water Research Commission Report No. 801/1/01.; Johan de Korte, Senior Researcher, Council for Scientific and Industrial Research (CSIR), telephonic interview, 7 June 2017.
  Uncertainty: Basic variance derived from range in data (maximum and mean value)
- Occupation, mineral extraction site [natural resource, land]: 0.00376 m2*year; = land_transformed*(30+revegetation_time); lognormal variance with pedigree 0.2112, pedigree (2,3,5,1,1)
  Calculated from total land transformed for mineral extraction activities at three underground coal mines in South Africa. Total land altered by the underground mines ranges from 900 - 2,800 hectares. As the mines in the sample are relatively mature, no further land is anticipated to be altered for extraction, thus the total land transformed is calculated as the total hectares altered divided by the estimated total coal production over the life of the mine (assuming constant coal production over a 30 year mine life). Total land occupation over the life of the mine is calculated as land transformed multiplied by the years of operations (assumed to be 30) and time for revegetation (assumed to be 10 years). A relatively short time to rehabilitation is applied as, unlike in the past, legislation requires planning for closure at the start of the mine's operation.The mines report "Land altered for mineral extraction activities", so no differentiation is possible between operational areas and extraction areas. The value is however adjusted for disposal areas, which account for very little (less than 1.5%) in the mine without coal washing, and around 15% for the mines with washing plants. The discard disposal area is included in the coal preparation datasets. However, coal preparation area was not able to be differentiated, and thus is included in this dataset and not in the coal preparation dataset.
  Uncertainty: Variance derived from data range.
- Water, river [natural resource, in water]: 3.4e-5 m3; name water_river; lognormal variance with pedigree 0.2426, pedigree (3,3,5,1,1)
  Average share of water use in underground mines filled by river water taken from Pulles et al. (2001), in which a sample of 16 underground mines found that rivers accounted for 16% of water inputs.Total water use by underground mines is assumed to be 215 litres/tonne ROM, The total water use value is derived from Pulles et al. (2001) and consultation with industry. Water figures are adjusted to exclude water for human consumption.References: Pulles, W., Boer, R. & Nel, S. 2001. A Generic Water Balance for the South African Coal Mining Industry. Water
  Research Commission Report No. 801/1/01.; Johan de Korte, Senior Researcher, Council for Scientific and Industrial Research (CSIR), telephonic interview, 7 June 2017.
  Uncertainty: Basic variance derived from range in data (maximum and mean value)
- Shale, in ground [natural resource, in ground]: 0.11 kg; = (mining_spoil*-1); lognormal variance with pedigree 5.71, pedigree (5,5,5,5,5)
  Represents the interburden that gets mined with the coal resource. Amount equals that of spoil produced (so that mass balances)
  Uncertainty: As for spoil. Basic variance derived from range in total tonnes moved across three mines (high because zero spoil in one mine)
- Transformation, from grassland, natural, for livestock grazing [natural resource, land]: 9.4e-5 m2; = land_transformed; lognormal variance with pedigree 0.2112, pedigree (2,3,5,1,1)
  Calculated from total land transformed for mineral extraction activities at three underground coal mines in South Africa (industry data). Total land altered by the underground mines ranges from 900 - 2,800 Hectares. As the mines in the sample are relatively mature, no further land is anticipated to be altered for extraction, thus the total land transformed is calculated as the total hectares altered divided by the estimated total coal production over the life of the mine (assuming constant coal production over a 30 year mine life). Coal mines fall predominantly in the grasslands regions of South Africa, thus this is chosen as the default. The mines report "Land altered for mineral extraction activities", so no differentiation is possible between operational areas and extraction areas. The total land area is however adjusted for disposal areas, which account for very little (less than 1.5%) in the mine without coal washing, and around 15% for the mines with washing plants. The discard disposal area is included in the coal preparation datasets. However, coal preparation area was not able to be differentiated, and is thus included in this dataset and not the coal preparation datasets.
  Uncertainty: Variance derived from data range (same value applied as occupation).
- Water, well, in ground [natural resource, in water]: 0.000145 m3; name water_well_in_ground_input; lognormal variance with pedigree 0.3426, pedigree (3,3,5,1,1)
  Average share of water use in underground mines filled by groundwater taken from Pulles et al. (2001), in which a sample of 16 underground mines found that groundwater accounted for 67% of water consumption. It should be noted however that groundwater use is very variable across the mines (ranging from 127 to 7 870 cubic metres/day). Thus goundwater use often depends more on whether the mine has a water ingress issue than whether the mine requires the water (i.e. water seeping into mine workings is a disposal issue rather than a water requirement). Total water use by underground mines is assumed to be 215 litres/tonne ROM, The total water use value is derived from Pulles et al. (2001) and consultation with industry. Water figures are adjusted to exclude water for human consumption.References: Pulles, W., Boer, R. & Nel, S. 2001. A Generic Water Balance for the South African Coal Mining Industry. Water
  Research Commission Report No. 801/1/01.; Johan de Korte, Senior Researcher, Council for Scientific and Industrial Research (CSIR), telephonic interview, 7 June 2017.
  Uncertainty: Basic variance derived from range in data (maximum and mean value)
- Transformation, to mineral extraction site [natural resource, land]: 9.4e-5 m2; name land_transformed; lognormal variance with pedigree 0.2112, pedigree (2,3,5,1,1)
  Total land transformed for mineral extraction activities at three underground coal mines in South Africa. Total land altered by the underground mines ranges from 900 - 2,800 hectares. As the mines in the sample are relatively mature, no further land is anticipated to be altered for extraction, thus the total land transformed is calculated as the total hectares altered divided by the estimated total coal production over the life of the mine (assuming constant coal production over a 30 year mine life). The mines report "Land altered for mineral extraction activities", so no differentiation is possible between operational areas and extraction areas. The value is however adjusted for disposal areas, which account for very little (less than 1.5%) in the mine without coal washing, and around 15% for the mines with washing plants. The discard disposal area is included in the coal preparation datasets. However, coal preparation area was not able to be differentiated, and is thus included in this dataset and not the coal preparation dataset.
  Uncertainty: Variance derived from data range
- Coal, hard, unspecified, in ground [natural resource, in ground]: 1 kg; lognormal variance with pedigree 0.0418, pedigree (2,3,5,1,1)
  (same comment as for hard coal, run-of-mine)

## Emissions to nature
- Radon-222 [air, non-urban air or from high stacks]: 0.012 kBq; source United Nations Scientific Committee on t 1993; lognormal variance with pedigree 0.652, pedigree (1,1,3,1,1)
  Generic estimate for coal, not specific to underground mining or to South Africa.
  Comment from previous ecoinvent dataset:Regarding radon emissions extensive measurements were taken to develop a measurement methodology and to review operating conditions. (Müller et al. 1992)
  Radon concentrations in air flow when leaving the shaft installations are most important to estimate specific radon emissions. Immission measurements at different measuring points (also badly aerated sites) show figures between 80 and 500 Bq/m3 (i.e. mean value of 200 Bq/m3). It was not possible to allocate specific air flow amounts per t extracted coal. According to about 20 % of the radon concentration of coal plus twice the concentration are emitted via overburden, which corresponds to 12 Bq/kg coal. (UNSCEAR 1988) No differentiation between opencast and underground mines has been made due to the lack of data. This figure is used in this dataset.
  Further references:
  Müller W.-U., Streffer C., Schabronath J. (1992) Die Radonexposition im Steinkohlenbergbau des Ruhrgebietes. In: Reiners Ch., Streffer C., Messerschmidt O., Strahlenrisiko durch Radon. 32. Jahrestagung der Vereinigung Deutscher Strahlenschutzärzte e.V. in Essen 30. Mai - 1. Juni 1991, Stuttgart.
  Uncertainty: from previous coal dataset
- Magnesium [water, ground-]: 3.1e-6 kg; lognormal variance with pedigree 0.344, pedigree (3,4,5,1,1)
  Approximate value, calculated from concentration in representative sample of mining effluent (dirty storage dam) multiplied by estimate of water loss through seepage (industry data). Most likely an overestimate as unspecified water outtputs are assumed to be seepage losses. Calculation also does not allow for attenuation in soils.
  Uncertainty: Basic variance taken from variability in underlying water flow.
- Iron, ion [water, surface water]: 1.6e-8 kg; lognormal variance with pedigree 0.694, pedigree (3,4,5,1,1)
  Approximate value, calculated from concentration in representative sample of surface run-off (clean drains) multiplied by estimate of water discharged to rivers (industry data). Possibly an underestimate as assumes only relatively clean water is discharged (effluent quality varies considerably between mines).
- Sodium, ion [water, ground-]: 3.9e-5 kg; lognormal variance with pedigree 0.344, pedigree (3,4,5,1,1)
  (same comment as for Magnesium)
- Water [water, ground-]: 8.774e-5 m3; = (tap_water_input/1000+water_well_in_ground_input+water_river+water_unspecified-coal_water_wet_mass/1000)* fraction_water_seepage; lognormal variance with pedigree 0.3426, pedigree (3,3,5,1,1)
  Calculated value, assuming unaccounted for water loss on the mines can be attributed to seepage to groundwater. Share of water loss to seepage is taken from Pulles et al. (2001), where a sample of 8 mines without coal preparation plants found that 41% of water is unaccounted for.Total water use by underground mines is assumed to be 215 litres/tonne ROM, The total water use value is derived from Pulles et al. (2001) and consultation with industry experts. Water figures are adjusted to exclude water for human consumption.References: Pulles, W., Boer, R. & Nel, S. 2001. A Generic Water Balance for the South African Coal Mining Industry. Water Research Commission Report No. 801/1/01.; Johan de Korte, Senior Researcher, Council for Scientific and Industrial Research (CSIR), telephonic interview, 7 June 2017.
  Uncertainty: Basic variance derived from range in data (maximum and mean value)
- Manganese [water, surface water]: 4.4e-8 kg; lognormal variance with pedigree 0.694, pedigree (3,4,5,1,1)
  (same comment as for Iron, ion)
- Dissolved solids [water, surface water]: 3.7e-6 kg; lognormal variance with pedigree 0.254, pedigree (3,4,5,1,1)
  Approximate value, calculated from TDS value in representative sample of surface run-off (clean drains) multiplied by estimate of water discharged to rivers (industry data). Possibly an underestimate as assumes only relatively clean water is discharged (effluent quality varies considerably between mines).
  Uncertainty: Basic variance taken from variability in underlying water flow.
- Potassium, ion [water, surface water]: 1.8e-8 kg; lognormal variance with pedigree 0.254, pedigree (3,4,5,1,1)
  Approximate value, calculated from concentration in representative sample of surface run-off (clean drains) multiplied by estimate of water discharged to rivers (industry data). Possibly an underestimate as assumes only relatively clean water is discharged (effluent quality varies considerably between mines).
  Uncertainty: Basic variance taken from variability in underlying water flow.
- Manganese [water, ground-]: 3.9e-8 kg; lognormal variance with pedigree 0.694, pedigree (3,4,5,1,1)
  Approximate value, calculated from concentration in representative sample of mining effluent (dirty storage dam) multiplied by estimate of water loss through seepage (industry data). Most likely an overestimate as unspecified water outtputs are assumed to be seepage losses. Calculation also does not allow for attenuation in soils.
- Water [water, surface water]: 4.28e-6 m3; = (tap_water_input/1000+water_well_in_ground_input+water_river+water_unspecified-coal_water_wet_mass/1000)* fraction_water_river; lognormal variance with pedigree 0.2526, pedigree (3,3,5,1,1)
  Calculated value, assuming 2% of water output is as a result of discharge to surface water bodies. Share of water loss to surface discharge is taken from Pulles et al. (2001) (average value from a sample of 8 mines without coal preparation plants).Total water use by underground mines is assumed to be 215 litres/tonne ROM, The total water use value is derived from Pulles et al. (2001) and consultation with industry experts. Water figures are adjusted to exclude water for human consumption.References: Pulles, W., Boer, R. & Nel, S. 2001. A Generic Water Balance for the South African Coal Mining Industry. Water Research Commission Report No. 801/1/01.; Johan de Korte, Senior Researcher, Council for Scientific and Industrial Research (CSIR), telephonic interview, 7 June 2017.
  Uncertainty: Basic variance derived from range in data (maximum and mean value)
- Potassium [water, ground-]: 6.1e-7 kg; lognormal variance with pedigree 0.344, pedigree (3,4,5,1,1)
  (same comment as for Magnesium)
- Dissolved solids [water, ground-]: 0.00023 kg; lognormal variance with pedigree 0.344, pedigree (3,4,5,1,1)
  Approximate value, calculated from TDS value in representative sample of mining effluent (dirty storage dam) multiplied by estimate of water loss through seepage (industry data). Most likely an overestimate as unspecified water outtputs are assumed to be seepage losses. Calculation also does not allow for attenuation in soils.
  Uncertainty: Basic variance taken from variability in underlying water flow.
- Aluminium [water, surface water]: 2.6e-8 kg; lognormal variance with pedigree 0.694, pedigree (3,4,5,1,1)
  (same comment as for Iron, ion)
- Carbon dioxide, fossil [air, non-urban air or from high stacks]: 0.000151 kg; source DEA (RSA) 2014; lognormal variance with pedigree 0.168, pedigree (4,1,5,1,1)
  Carbon dioxide emissions from low temperature oxidation of coal. Emission factor taken from South Africa's National GHG Inventory (0.077 m3/tonne). Reference: Department of Environment (2014) GHG NATIONAL INVENTORY REPORT SOUTH AFRICA 2000 -2010, November 2014. http://unfccc.int/resource/docs/natc/zafnir1.pdf
- Chloride [water, surface water]: 5.7e-8 kg; lognormal variance with pedigree 0.254, pedigree (3,4,5,1,1)
  (same comment as for Potassium, ion)
- Fluoride [water, surface water]: 1.1e-9 kg; lognormal variance with pedigree 0.254, pedigree (3,4,5,1,1)
  (same comment as for Potassium, ion)
- Sulfate [water, ground-]: 0.00016 kg; lognormal variance with pedigree 0.3426, pedigree (3,3,5,1,1)
  (same comment as for Magnesium)
- Water [air, unspecified]: 0.00012198 m3; name water_to_air_unspecified; = (tap_water_input/1000+water_well_in_ground_input+water_river+water_unspecified-coal_water_wet_mass/1000)* fraction_water_air; lognormal variance with pedigree 0.8826, pedigree (3,3,5,1,1)
  Calculated value, assuming 57% of water output is as a result of evaporation. Share of water loss to evaporation is taken from Pulles et al. (2001) (average value from a sample of 8 mines without coal preparation plants).Total water use by underground mines is assumed to be 215 litres/tonne ROM, The total water use value is derived from Pulles et al. (2001) and consultation with industry experts. Water figures are adjusted to exclude water for human consumption.References: Pulles, W., Boer, R. & Nel, S. 2001. A Generic Water Balance for the South African Coal Mining Industry. Water Research Commission Report No. 801/1/01.; Johan de Korte, Senior Researcher, Council for Scientific and Industrial Research (CSIR), telephonic interview, 7 June 2017.
  Uncertainty: Basic variance derived from range in data (maximum and mean value)
  property fraction, origin: unspecified 0; name fraction_origin_unspecified
  property fraction, origin: fresh water 1; name fraction_origin_fresh_water
  property fraction, origin: salt water 0; name fraction_origin_salt_water
- Fluoride [water, ground-]: 1.7e-8 kg; lognormal variance with pedigree 0.344, pedigree (3,4,5,1,1)
  (same comment as for Magnesium)
- Calcium, ion [water, surface water]: 3.7e-7 kg; lognormal variance with pedigree 0.254, pedigree (3,4,5,1,1)
  (same comment as for Potassium, ion)
- Sulfate [water, surface water]: 2.7e-6 kg; lognormal variance with pedigree 0.254, pedigree (3,4,5,1,1)
  (same comment as for Potassium, ion)
- Methane, fossil [air, non-urban air or from high stacks]: 0.000516 kg; source DEA (RSA) 2014; lognormal variance with pedigree 0.168, pedigree (4,1,5,1,1)
  Data on methane emissions from coal mining and handling are generally high in uncertainty because these emissions are hard to measure or estimate. However, their importance in terms of environmental impact is potentially considerable in some regions. South African coal is generally very low in methane emissions.
  This emission factor is taken from South Africa's National GHG Inventory (0.77 m3/tonne). It aligns with data from four underground mines, with annual average methane emissions of 0.97 m3/tonne. A 2005 study by Llyod and Cook which estimates CH4 emissions from underground coal mines in South Africa at about 69.4 Gg per year. Applied to the production volume of this dataset, this results in specific emissions of 5.55E-04 kg CH4/kg coal, verifying the value in this dataset. No methane is captured or flared. Reference(s): Department of Environmental Affairs (2014) GHG NATIONAL INVENTORY REPORT SOUTH AFRICA 2000 -2010, November 2014. <http://unfccc.int/resource/docs/natc/zafnir1.pdf>
  Lloyd, P.J.D., Cook, A., 2005, Methane release from South African coalmines, The journal of The South African Institute of Mining and Metallurgy, volume 105, August 2005. <https://www.saimm.co.za/Journal/v105n07p483.pdf>, accessed July 2018
- Calcium, ion [water, ground-]: 1.3e-5 kg; lognormal variance with pedigree 0.344, pedigree (3,4,5,1,1)
  (same comment as for Magnesium)
- Particulates, > 10 um [air, non-urban air or from high stacks]: 0.0001 kg; source Umweltbundesamt Berlin 1989; lognormal variance with pedigree 0.302, pedigree (1,1,3,1,1)
  Generic estimate for underground mine, not specific to South Africa.
  Comment from previous ecoinvent dataset: Regarding particulates, only those are considered which are not emitted during the combustion process and which are not deposited within the mining area. In AP 42 information about situational particle emission calculations and characteristical particle size distribution are given. 90 % of dust particles show sizes between 15 and 30 um, 10 % of dust particles are smaller than 15 um, 6 % of dust particles are smaller than 10 um and between 0.2 % und 1 % are smaller than 2.54 um. Regarding underground mining marginal emissions due to ventilation and slightly more emissions due to coal handling and the actual treatment step are estimated. Regarding opencast mining sharply increased emissions due to huge mining machines, lorries and open pits are estimated. Furthermore, emissions depend on climatic conditions (wind, precipitation, temperature) and the characteristics of coal (water content). In the literature figures regarding particle emissions range from 22 to 75 g/t. In this dataset particle emissions of 36 g/t are considered.
  In various literature sources no information about other emissions emitted during underground mining are given respectively insignificant amounts are assumed, even though backfill processes show high specific emissions.
  In this dataset the following particle emissions factors are estimated:
  Particle emissions underground mining incl. treatment: 0.1 kg/t useable output
  Particle emissions opencast mining incl. treatment: 0.4 kg/t useable output.
  All emissions are assumed to be fly ash coarse particles (i.e. > 10 um).
  Further references:
  U.S. Departement of Energy (DOE) (1983) Energy Technonolgy Characterizations Handbook; Environmental Pollution and Control Factors. Washington, D.C.
  ORNL (1980) A Methodology and a Preliminary Data Base for Examining the Health Risks of Electricity Generation from Uranium and Coal Fuels. Oak Ridge, USA.
  Rentz O. (1991) Coal Use and Air Pollution Issues. In: Proceedings Coal in the Environment. London.
  Uncertainty: from previous coal dataset
- Magnesium [water, surface water]: 2.9e-7 kg; lognormal variance with pedigree 0.254, pedigree (3,4,5,1,1)
  (same comment as for Potassium, ion)
- Chloride [water, ground-]: 2.1e-6 kg; lognormal variance with pedigree 0.344, pedigree (3,4,5,1,1)
  Approximate value, calculated from concentration in representative sample of mining effluent (dirty storage dam) multiplied by estimate of water loss through seepage (industry data). Most likely an overestimate as unspecified water outputs are assumed to be seepage losses. Calculation also does not allow for attenuation in soils.
  Uncertainty: Basic variance taken from variability in underlying water flow.
- Sodium, ion [water, surface water]: 2.6e-5 kg; lognormal variance with pedigree 0.254, pedigree (3,4,5,1,1)
  (same comment as for Potassium, ion)

## Sampling procedure
Production volume and percentage of coal from underground mining is from annual government reporting (DMR, 2015). Energy and other material inputs are representative of three underground collieries in South Africa (industry data). Methane emissions and carbon dioxide emissions from low temperature oxidation are calculated using emission factors derived for South Africa's national GHG reporting (DEA, 2014) . Water quantities and sources are highly variable between mines, so representative water use values and sources are taken from a water balance project for South Africa (Pulles et al. 2001). Although relatively old (2001) this data source provided a more represenative sample of water use on South African mines with a sample of 41 mines (of which 16 are underground mines). Industry experts were consulted so as to adjust the water balance figures to account for the improvement in water efficiency in the intervening years, especially in coal washing, The water balance project highlighted poor water accounting on the mines, thus water emissions should only be taken as indicative and are highly uncertain. Land use for operational areas for infrastructure, extraction areas and dump areas are rough estimates. Infrastructure requirements are generic, and are as applied in other ecoinvent coal mining datasets (in which total production over the life time of the mine is assumed to be 3*10^10 kg, an average value that is not representative for single mines or specific conditions). References: Department of Minerals and Resources (2015) South Africa's Mineral Industry (SAMI) 2014/2015. Pretoria; DEA (2014) GHG NATIONAL INVENTORY REPORT SOUTH AFRICA 2000 -2010, November 2014. http://unfccc.int/resource/docs/natc/zafnir1.pdf (accessed September 2017); Pulles, W., Boer, R. & Nel, S. 2001. A Generic Water Balance for the South African Coal Mining Industry. Water
Research Commission Report No. 801/1/01.

## Extrapolations
This dataset has been extrapolated from year 2014 to the year of the calculation (2021). The uncertainty has been adjusted accordingly.

## Review by Christian Bauer 2017-11-23
passed
