# transport, passenger car, medium size, natural gas, EURO 5

Dataset: EcoSpold 2, unit process
Geography: RoW
Time period: 2012-01-01 to 2021-12-31
Technology level: current
Classification: ISIC rev.4 ecoinvent: 4922:Other passenger land transport
Tags: internal combustion engine
Scenario: Business-as-Usual
System model: Allocation, cut-off by classification
Generated by: Andrew Simons
Database: ecoinvent
isCopyrightProtected: true
accessRestrictedTo: 1

## General comment
This dataset represents the service of transport in a passenger car for a journey length of 1vkm. The data used for the creation of the global datasets are initially based on European data. Fuel consumption and emissions are for average vehicle use and not representative of a specific driving cycle. The dataset is parametrized with respect to vehicle size, fuel consumption and vehicle lifetime.
Datasets for three different passenger car categories are available in ecoinvent in view of size: small, medium and large.
The category “small” includes passenger cars with engine size up to 1.4 liters. The average weight of this category is estimated to be 1200 kg.
The category “medium” includes passenger cars with engine size between 1.4 and 2.0 liters. The average weight of this category is estimated to be 1600 kg.
The category “large” includes passenger cars with engine size larger than 2.0 liters. The average weight of this category is estimated to be 2000 kg.
The passenger car size influences the amount of both exhaust and non-exhaust emissions. The exhaust emissions caused by the burning of fuel are divided into two groups: fuel dependent emissions (dependent on fuel type and quantity) and Euro class dependent emissions which reflect the emission standards which the vehicle complies with. Three classes of Euro engine type are considered: Euro 3, Euro 4 and Euro 5. The higher the class (e.g. Euro 5), the lower the emissions and viceversa. The Euro engine regulation is set by the European Commission “in order to limit as much as possible the negative impact of road vehicles on the environment and health” (European Commission 2012). This dataset considers a small petrol passenger car of Euro 5 class. Also included within the direct exchanges to the environment are the fuel evaporation emissions from the fuel tank, relevant to petrol vehicles only.
Non-exhaust emissions are those resulting from tyre, brake and road wear. These emissions are considered as by-products.

Reference: European Commission - Mobility and transport. (n.d.). Euro 5 and Euro 6 standards: reduction of pollutant emissions from light. Retrieved May 31, 2012, from http://ec.europa.eu/transport/index_en.htm: http://ec.europa.eu/transport/urban/vehicles/doc/legislation_guide_other.pdf

## Included activities start
From combustion of fuel in the engine. The dataset takes as input the infrastructure of the car and road network, the materials and efforts needed for maintenance of these and the fuel consumed in the vehicle for the journey.

## Included activities end
The activity ends with the transport over 1vkm and the emissions of exhaust and non-exhaust emissions into air, water and soil.

The dataset includes the construction, operation, maintenance and disposal of the vehicle and road infrastructure. Operation of the vehicle includes all the direct emissions produced by fuel combustion and evaporation as well as from tyre, brake and road wear.

The dataset doesn't specifically model cold start emissions. These are assumed to be included in the data for average driving which was used.

## Technology
Transport in a passenger car with internal combustion engine fueled by natural gas. The passenger car size is small, with engine size of between 1.4 and 2.0 litres and average weight of 1600 kg.
Technology classifications are based on those used widely within the works of the European Environment Agency, particularly in the Emissions Inventory Guidebook. The Tremove model - which is also used to generate fuel consumption and emission factors for the datasets presented here - follows this classification system.

## Parameters
- passenger load factor: 97.2 kg; name LF_passengers; = passengers*60; lognormal variance with pedigree 0.0021, pedigree (2,2,2,4,1)
  Number of passengers multiplied by 60 kg per passenger
- emissions from road abrasion: 9.79e-9 kg/kg vehicle; name road_wear_emissions; lognormal variance with pedigree 0.0021, pedigree (2,2,2,4,1)
  average (small, medium and large weight class) emissions produced per kg vehicle. example:
  small medium large average
  kg/km kg/km kg/km kg/km
  1.25E-08 9.38E-09 7.500E-09 9.79E-09
  Calculation of non-exhaust emissions (tyre, brake and road wear emissions as well as petrol evaporation emissions) are based on: Ntziachristos, L., Boulter, P. (2009b). EMEP/EEA air pollutant emissions inventory guidebook 2009: Road vehicle tyre and brake wear; Road surface wear. Copenhagen, European Environment Agency
  Uncertainty: B
- european to global total vkm scaling factor: 5.7 dimensionless; name global_scaling_factor; lognormal variance with pedigree 0.0118, pedigree (3,3,4,4,1)
  Total traffic voumes
  GLO = 3.72e13vkm/yr
  RER = 6.558e12vkm/yr
  Source: Schaffer, A. (1998) The global demand for motorised mobility. Transportation Research Part A: Policy & Practice, 32 (6) 455-477
- so2 emissions per m3 natural gas: 2.03148e-5 kg; name so2_m3_natgas; = 2.673e-5*natural_gas_density; lognormal variance with pedigree 0.0021, pedigree (2,2,2,4,1)
  Calculated
- fuel consumption constant: 2.92884e-5 dimensionless; name fc_constant; = 2.9288436E-05; lognormal variance with pedigree 0.0021, pedigree (2,2,2,4,1)
  Determined from analysing the fuel consumption for vehicles in the Tremove model (2009)
- annual total vkm: 9.551e6 km; name annual_vkm; = 9.551E+06; lognormal variance with pedigree 0.0021, pedigree (2,2,2,4,1)
  Based on Tremove (2009)
- lifetime of the vehicle: 150000 km; name vehicle_lifetime_km; lognormal variance with pedigree 0.0021, pedigree (2,2,2,4,1)
  distance capacity in the assumed vehicle lifetime.
  Reference: Althaus & gauch, Vergleichende Oekobilanz individueller Mobilität: Elektromobilität versus konventionelle Mobilität mit Bio- und fossilen Treibstoffen, EMPA, Dübendorf, 2010
- density, natural gas: 0.76 kg/m3; name natural_gas_density; lognormal variance with pedigree 0.0008, pedigree (1,1,2,1,1)
  This parameter is applied to convert the the exhaust emissions of a passenger car fueled by natural gas. The differences with conventional petrol car are in terms of fuel consumption and emission factors. The natural gas fuel consumption is calculated in m³ CNG per vehicle-km as the petrol consumption multiplied by a multiplication factor, 1.077. Conversion for m³ to tonnes then happens via the fuel density (0.734 kg/m³ at 1 atm).
  Uncertainty: B
- emissions from tyre abrasion: 5.725e-8 kg/kg vehicle; name tyre_wear_emissions; lognormal variance with pedigree 0.0021, pedigree (2,2,2,4,1)
  average (small, medium and large weight class) emissions produced per kg vehicle. example:
  small medium large average
  kg/vkm kg/vkm kg/vkm kg/vkm
  6.611E-08 6.343E-08 6.258E-08 6.404E-08
  Calculation of non-exhaust emissions (tyre, brake and road wear emissions as well as petrol evaporation emissions) are based on: Ntziachristos, L., Boulter, P. (2009b). EMEP/EEA air pollutant emissions inventory guidebook 2009: Road vehicle tyre and brake wear; Road surface wear. Copenhagen, European Environment Agency.
  Uncertainty: B
- weight of the basis vehicle: 1240 kg/unit; name basis_vehicle_weight; lognormal variance with pedigree 0.0021, pedigree (2,2,2,4,1)
  The basis vehicle is the one on which the original life cycle inventory was conducted. It is representative of a VW Golf.
- co2 emissions per m3 natural gas: 2.014 kg; name co2_m3_natgas; = 2.65*natural_gas_density; lognormal variance with pedigree 0.0021, pedigree (2,2,2,4,1)
  Calculated
- emissions from brake friction: 4.45e-9 kg/kg vehicle; name brake_wear_emissions; lognormal variance with pedigree 0.0021, pedigree (2,2,2,4,1)
  average (small, medium and large weight class) emissions produced per kg vehicle.
  Calculation of non-exhaust emissions (tyre, brake and road wear emissions as well as petrol evaporation emissions) are based on: Ntziachristos, L., Boulter, P. (2009b). EMEP/EEA air pollutant emissions inventory guidebook 2009: Road vehicle tyre and brake wear; Road surface wear. Copenhagen, European Environment Agency
  Uncertainty: B
- scaling factor: 1.29032 dimensionless; name scaling_factor; = (vehicle_weight/1240); lognormal variance with pedigree 0.0021, pedigree (2,2,2,4,1)
  The weight of a vehicle determines the non-exhaust emissions of tyre, brake and road wear, reported in kg/kg vehicle.
  The non-exhaust emissions (kg) are calculated multiplying vehicle’s non-exhaust emissions (kg/kg vehicle) by the scaled vehicle weight (kg vehicle).
  The input passenger car weighs 1240 kg. The scaling factor is given by vehicle weight/input passenger car weight. Therefore: the scaling factor is 1200/1240 for small passenger cars.
- weight of the vehicle: 1600 kg/unit; name vehicle_weight; lognormal variance with pedigree 0.0021, pedigree (2,2,2,4,1)
  A scaling factor is used to adjust to the vehicle weight chosen in this dataset.
  The weight of a vehicle determines the non-exhaust emissions of tyre, brake and road wear, reported in kg/kg vehicle. The non-exhaust emissions (kg) are calculated multiplying vehicle’s non-exhaust emissions (kg/kg vehicle) by the scaled vehicle weight (kg vehicle).
  Passenger cars are divided into three classes of weight, whereas this dataset has implemented the value valid for a small car: 1200 kg.
- fuel consumption of basis vehicle: 0.05544 dimensionless; name fc_basis_vehicle; lognormal variance with pedigree 0.0021, pedigree (2,2,2,4,1)
  Fuel consumption as derived from the source data for each vehicle type, size and emissions standard
- gross vehicle weight: 1697.2 kg; name gross_vehicle_weight; = vehicle_weight+(1.62*60); lognormal variance with pedigree 0.0015, pedigree (2,2,2,1,1)
  It corresponds to the following formula:
  weight of the vehicle + ((average load * 60 kg / 1000).
  The average load is estimated to be 1.6 passengers and 60 kg is the weight of a passenger.
  Based on: TREMOVE v2.7b, ransport & Mobility Leuven, 2009
- passengers: 1.62 unit; lognormal variance with pedigree 0.0021, pedigree (2,2,2,4,1)
  Average number of passengers in passenger car 1.62

## Reference product
- transport, passenger car, medium size, natural gas, EURO 5: 1 km; CPC 64119: Other land transportation services of passengers, n.e.c.; By-product classification allocatable product
  production volume 4.48897e7 km; name transport_RP_PV; = annual_vkm*global_scaling_factor
    Based on Tremove model (2009) and scaling factor calculated from Schafer, A. (1998) The global demand for motorized mobility. Trtansportation Research Part A: Policy and Practice 32 (6) 445-477
  property price 0.13962 EUR2005
    Calculated based on inputs: The price of the product has been calculated as a sum of the values of the material and energy inputs for this product. This value is therefore a rough estimation. It may underestimate the real price since there are additional expenses when producing any product. These expences can include for example labour costs, treatment of waste materials and profit for the producer. Please consider carefully whether this level of data quality is acceptable for your application.

## Inputs from technosphere
- brake wear emissions, passenger car: -7.55254e-6 kg; name brake_emissions; = (brake_wear_emissions* gross_vehicle_weight)*-1; source Ntziachristos, L. 2009; lognormal variance with pedigree 0.0419, pedigree (2,2,5,4,1)
  Quantity of emissions based on values from Ntziachristos, L., Boulter, P. (2009) EMEP/EEA air pollutant emissions inventory guidebook 2009: Road vehicle tyre and brake wear; Road surface wear. Copenhagen, European Environment Agency. Quantities given in the source assumed to represent medium sized vehicles. Quantities for small and large vehicles taken from the bounds of the ranges given.
  production volume 339.031 kg; = brake_emissions*transport_RP_PV
    Calculated from production volume of reference product using the relative outputs.
  property price 0 EUR2005; name brake_emissions_price_EUR2005
- road wear emissions, passenger car: -1.66156e-5 kg; name road_emissions; = (road_wear_emissions* gross_vehicle_weight)*-1; source Ntziachristos, L. 2009; lognormal variance with pedigree 0.0419, pedigree (2,2,5,4,1)
  (same comment as for brake wear emissions, passenger car)
  production volume 745.869 kg; = road_emissions*transport_RP_PV
    Calculated from production volume of reference product using the relative outputs.
  property price 0 EUR2005; name road_emissions_price_EUR2005
- passenger car, petrol/natural gas: 0.0106667 kg; name passenger_car; = (1/vehicle_lifetime_km)*vehicle_weight; source Spielmann M. 2007; lognormal variance with pedigree 0.0099, pedigree (2,2,4,4,1)
  The dataset is calculated from the LCI of VW Golf. The infrastructure demand is scaled according to the weight of the specific vehicle in question.
- road: 0.000911396 m*year; name road_use; = 5.37E-07*gross_vehicle_weight; source Spielmann M. 2007; lognormal variance with pedigree 0.0419, pedigree (2,2,5,4,1)
  This input indicates the unit of road per vkm used during the transport activity.
  The road input is composed by two demand factors:
  - Road infrastructure and disposal (RI&D), which varies according to the gross vehicle weight.
  - Road operations & maintenance (RO&M), which does not vary according to the gross vehicle weight.
- passenger car maintenance: 8.60215e-6 unit; = (1/vehicle_lifetime_km)*scaling_factor; source Spielmann M. 2007; lognormal variance with pedigree 0.0413, pedigree (2,2,5,1,1)
  The dataset is for a medium size passenger car. In order to make the demand appropriate to the particular vehicle in question a scaling factor is applied which is the product of the vehicle weight devided by the weight of the medium size vehicle.
- tyre wear emissions, passenger car: -9.71647e-5 kg; name tyre_emissions; = (tyre_wear_emissions*gross_vehicle_weight)*-1; source Ntziachristos, L. 2009; lognormal variance with pedigree 0.0419, pedigree (2,2,5,4,1)
  (same comment as for brake wear emissions, passenger car)
  production volume 4361.69 kg; = tyre_emissions*transport_RP_PV
    Calculated from production volume of reference product using the relative outputs.
  property price 0 EUR2005; name tyre_emissions_price_EUR2005
- natural gas, high pressure: 0 m3; name natural_gas_use; source Alvarez, R. 2010; pedigree (1,1,1,1,1)
  Calculations are based on data from Alvarez & Weilenmann (2010) Tracing of Road Traffic Emissions: Natural Gas Vehicles Euro-4 & Euro-5 Program. EMPA, Dübendorf.
  Fuel consumption is influenced by vehicle weight. Fuel input exchanges (petrol low-sulphur, diesel low-sulphur and natural gas) are scaled on the specific vehicle weight inserted by the ecoinvent user. The scaling factor is estimated to be 2.93E-05.
  The scaling factor corresponds to the difference in terms of fuel consumption of the two extremes that compose each class of passenger car emerging from the match between the three sizes and the three Euro categories. The result is then divided by the difference of the two extremes weight of each emerged class, which is 300 kg for all size categories.
  The size 'large' has extremes of 2000 kg and 2300 kg. The scaling factor of a large passenger cars natural gas Euro 3 is therefore calculated as:
  ((specific vehicle weight - weight of minor extreme) * 2.93E-05 + fuel consumption of minor extreme).
  This corresponds to:
  ((specific vehicle weight - 2000 kg) * 2.93E-05 + 7.26E-02
  property heating value, gross 0 MJ; name Gross_Heat_Value
  properties: heating value, net 39 MJ, wet mass 0.84 kg, dry mass 0.84 kg, carbon content, fossil 0.602381
  note on heating value, net: Literature value, Source: United Nations Statistics Division (2018) International Recommendations for Energy Statistics (IRES). Available at: http://unstats.un.org/unsd/statcom/doc11/BG-IRES.pdf.
- road maintenance: 0.000265427 m*year; lognormal variance with pedigree 0.0419, pedigree (2,2,5,4,1)
  This input indicates the unit of road per vkm used during the transport activity. The road input is composed by two demand factors: - Road infrastructure and disposal (RI&D), which varies according to the gross vehicle weight. - Road operations & maintenance (RO&M), which does not vary according to the gross vehicle weight.
- natural gas, high pressure: 0.00101788, 0.00152098, 0.002532, 0.0206734, 0.00348982, 0.0474591 m3 (6 entries); source Alvarez, R. 2010; lognormal variance with pedigree 0.0099, pedigree (2,2,4,4,1)
  (same comment as for natural gas, high pressure)

## Emissions to nature
All rows: lognormal variance with pedigree 0.0419, pedigree (2,2,5,4,1)
- Particulates, < 2.5 um [air, urban air close to ground]: 4.041e-7 kg; source Alvarez, R. 2010
  Emissions dependent on engine Euro class (Euro 3, Euro 4 and Euro 5).
- Benzene [air, urban air close to ground]: 2.073e-6 kg; source Alvarez, R. 2010
  Emissions dependent on engine Euro class (Euro 3, Euro 4 and Euro 5).
- NMVOC, non-methane volatile organic compounds, unspecified origin [air, urban air close to ground]: 1.888e-5 kg; source TREMOVE 2007
  Emissions dependent on engine Euro class (Euro 3, Euro 4 and Euro 5).
- Sulfur dioxide [air, urban air close to ground]: 1.55801e-6 kg; = so2_m3_natgas*natural_gas_use; source Alvarez, R. 2010
  2.67300E-05 is the emission value of sulphur dioxide per kg of natural gas used
- Nitrogen oxides [air, urban air close to ground]: 8.174e-6 kg; source Alvarez, R. 2010
  Emissions dependent on engine Euro class (Euro 3, Euro 4 and Euro 5).
- Methane [air, urban air close to ground]: 4.436e-5 kg; source TREMOVE 2007
  Emissions dependent on engine Euro class (Euro 3, Euro 4 and Euro 5).
- Mercury [air, urban air close to ground]: 7.66165e-10 kg; = 9.99E-09*natural_gas_use; source Faist Emmenegger, M. 2007
  1.31507E-08 is the emission value of mercury per kg of natural gas used
- Ammonia [air, urban air close to ground]: 1.21942e-5 kg; = 1.59E-04*natural_gas_use; source Alvarez, R. 2010
  2.06140E-04 is the emission value of ammonia per kg of natural gas used
- Toluene [air, urban air close to ground]: 6.167e-6 kg; source Alvarez, R. 2010
  Emissions dependent on engine Euro class (Euro 3, Euro 4 and Euro 5).
- Dinitrogen monoxide [air, urban air close to ground]: 2.66892e-6 kg; = 3.48E-05*natural_gas_use; source TREMOVE 2007
  4.58257E-05is the emission value of dinitrogen monoxide per kg of natural gas used
- Carbon dioxide, fossil [air, urban air close to ground]: 0.15446 kg; = co2_m3_natgas*natural_gas_use; source Alvarez, R. 2010
  Calculated based on the amount of natural gas used and the emission of CO2 per m3 of natural gas.
- Carbon monoxide, fossil [air, urban air close to ground]: 0.0007278 kg; source Alvarez, R. 2010
  Emissions dependent on engine Euro class (Euro 3, Euro 4 and Euro 5).

## Sampling procedure
Literature
