# heat production, natural gas, at boiler atmospheric low-NOx non-modulating <100kW

Dataset: EcoSpold 2, unit process
Geography: Europe without Switzerland
Time period: 1990-01-01 to 2021-12-31
Technology level: current
Classification: EcoSpold01Categories: natural gas/heating systems
Classification: ISIC rev.4 ecoinvent: 3530:Steam and air conditioning supply
Tags: ConvertedDataset
Scenario: Business-as-Usual
System model: Allocation, cut-off by classification
Generated by: Thomas Heck
Published in: Faist Emmenegger, M. 2007
Database: ecoinvent
isCopyrightProtected: true
accessRestrictedTo: 1

## General comment
[This dataset was already contained in the ecoinvent database version 2. It was not individually updated during the transfer to ecoinvent version 3. Life Cycle Impact Assessment results may still have changed, as they are affected by changes in the supply chain, i.e. in other datasets. This dataset was generated following the ecoinvent quality guidelines for version 2. It may have been subject to central changes described in the ecoinvent version 3 change report (http://www.ecoinvent.org/database/ecoinvent-version-3/reports-of-changes/), and the results of the central updates were reviewed extensively. The changes added e.g. consistent water flows and other information throughout the database. The documentation of this dataset can be found in the ecoinvent reports of version 2, which are still available via the ecoinvent website. The change report linked above covers all central changes that were made during the conversion process.]

## Included activities end
The module includes fuel input from low pressure (CH) network, infrastructure (boiler), emissions to air, and electricity needed for operation.

## Geography
Emission data extrapolated from Switzerland to Europe.

## Technology
Technology available in mid 1990s.

## Time period
Old emission values (from early 1990s)

## Reference product
- heat, central or small-scale, natural gas: 1 MJ; CPC 17300: Steam and hot water; By-product classification allocatable product
  EcoSpold01Location=RER
  production volume 8.83922e11 MJ
    38.9% = 7.47 EJ of the natural gas consumption in EU27 (eurogas.org), divided evenly over 7 boiler types, multiplied by the conversion efficiency of the boiler type on a gross calorific value basis (82.8%)
  property price 0.01 EUR2005
    Temporary price data. Calculated as 90% of purchasers price based on: Average European district heat price from Ecoheatcool and Euroheat 2005-2006, Ecoheat Work package 1: The European heat market. Final report. http://www.solarthermalworld.org/files/Ecoheatcool%20WP1%20Web.pdf?download
  properties: heating value, net 1 MJ, Corresponding fuel use 1.09 MJ

## Inputs from technosphere
- gas boiler: 7.194e-7 unit; lognormal variance with pedigree 0.08, pedigree (1,1,5,1,1)
  EcoSpold01Location=RER
  uncertainty of life time and extrapolation to range of capacity
- natural gas, low pressure: 0.0300275 m3; lognormal variance with pedigree 0.05, pedigree (1,1,5,1,1)
  EcoSpold01Location=CH
  CH module used for RER
  properties: wet mass 1 kg, carbon content, fossil 0.695187, dry mass 1 kg, heating value, net 36.3 MJ, heating value, gross 39 MJ
  note on carbon content, fossil: C content considered the same as in high pressure (consumption mix)
  note on heating value, net: Literature value, Source: United Nations Statistics Division (2018) International Recommendations for Energy Statistics (IRES). Available at: http://unstats.un.org/unsd/statcom/doc11/BG-IRES.pdf.
- electricity, low voltage: 0.0060604 kWh; lognormal variance with pedigree 0.16, pedigree (1,1,5,1,1)
  range of electricity for pumps etc., old information
  EcoSpold01Location=UCTE

## Emissions to nature
- Dioxins, measured as 2,3,7,8-tetrachlorodibenzo-p-dioxin [air, urban air close to ground]: 0 kg; pedigree (1,1,1,1,1)
  rough estimate, high uncertainty
- Acetaldehyde [air, urban air close to ground]: 1.09e-9 kg; lognormal variance with pedigree 1.12, pedigree (1,1,5,1,1)
  rough estimate, high uncertainty
- Formaldehyde [air, urban air close to ground]: 1.09e-7 kg; lognormal variance with pedigree 1.12, pedigree (1,1,5,1,1)
  rough estimate, high uncertainty
- Benzene [air, urban air close to ground]: 4.36e-7 kg; lognormal variance with pedigree 1.12, pedigree (1,1,5,1,1)
  rough estimate, high uncertainty
- Dinitrogen monoxide [air, urban air close to ground]: 5.45e-7 kg; lognormal variance with pedigree 1.12, pedigree (1,1,5,1,1)
  rough estimate, high uncertainty
- Nitrogen oxides [air, urban air close to ground]: 2.18e-5 kg; lognormal variance with pedigree 0.34, pedigree (1,1,5,1,1)
  old data
- Butane [air, urban air close to ground]: 7.63e-7 kg; lognormal variance with pedigree 1.12, pedigree (1,1,5,1,1)
  rough estimate, high uncertainty
- PAH, polycyclic aromatic hydrocarbons [air, urban air close to ground]: 1.09e-8 kg; lognormal variance with pedigree 1.12, pedigree (1,1,5,1,1)
  rough estimate, high uncertainty
- Particulates, < 2.5 um [air, urban air close to ground]: 1.09e-7 kg; lognormal variance with pedigree 0.16, pedigree (1,1,5,1,1)
  literature
- Propionic acid [air, urban air close to ground]: 2.18e-8 kg; lognormal variance with pedigree 1.12, pedigree (1,1,5,1,1)
  rough estimate, high uncertainty
- Benzo(a)pyrene [air, urban air close to ground]: 1.09e-11 kg; lognormal variance with pedigree 1.12, pedigree (1,1,5,1,1)
  rough estimate, high uncertainty
- Acetic acid [air, urban air close to ground]: 1.635e-7 kg; lognormal variance with pedigree 1.12, pedigree (1,1,5,1,1)
  rough estimate, high uncertainty
- Carbon monoxide, fossil [air, urban air close to ground]: 3.27e-5 kg; lognormal variance with pedigree 0.69, pedigree (1,1,5,1,1)
  old data
- Methane, fossil [air, urban air close to ground]: 2.18e-6 kg; lognormal variance with pedigree 1.12, pedigree (1,1,5,1,1)
  rough estimate, high uncertainty
- Mercury [air, urban air close to ground]: 3.27e-11 kg; lognormal variance with pedigree 0.69, pedigree (1,1,5,1,1)
  trace element in natural gas
- Carbon dioxide, fossil [air, urban air close to ground]: 0.06104 kg; lognormal variance with pedigree 0.04, pedigree (1,1,5,1,1)
  composition of natural gas
- Sulfur dioxide [air, urban air close to ground]: 5.995e-7 kg; lognormal variance with pedigree 0.04, pedigree (1,1,5,1,1)
  composition of natural gas
- Propane [air, urban air close to ground]: 2.18e-7 kg; lognormal variance with pedigree 1.12, pedigree (1,1,5,1,1)
  rough estimate, high uncertainty
- Toluene [air, urban air close to ground]: 2.18e-7 kg; lognormal variance with pedigree 1.12, pedigree (1,1,5,1,1)
  rough estimate, high uncertainty
- Pentane [air, urban air close to ground]: 1.308e-6 kg; lognormal variance with pedigree 1.12, pedigree (1,1,5,1,1)
  rough estimate, high uncertainty

## Sampling procedure
Literature

## Extrapolations
This dataset has been extrapolated from year 2000 to the year of the calculation (2021). The uncertainty has been adjusted accordingly.

## Review by Michael Spielmann (obsolete) 2003-07-06
Preliminary passed, based on a review of a first draft of the final report. Data have to be validated again after review of the written report.
