# electricity, high voltage, production mix

Dataset: EcoSpold 2, unit process, production mix
Geography: US-PR
Time period: 2021-01-01 to 2021-12-31
Scenario: Business-as-Usual
System model: Allocation, cut-off by classification
Generated by: [System]
Database: ecoinvent
isCopyrightProtected: false
accessRestrictedTo: 1

## General comment
The shares of electricity technologies on this market are valid for the year 2019. They have been calculated by the data provider and don't correspond with the production volumes entered in the undefined datasets of the different electricity supplying technologies. The shares have been calculated based on statistics from 2019: IEA World Energy Statistics and Balances. OECD iLibrary, eISSN: 1683-4240, DOI: 10.1787/enestats-data-en and US EPA: Emissions & Generation Resource Integrated Database, https://www.epa.gov/energy/emissions-generation-resource-integrated-database-egrid. Grid losses and imports are based on data from 2018 (also IEA World Energy Statistics and Balances).

## Reference product
- electricity, high voltage: 1 kWh; By-product classification allocatable product; CPC 17100: Electrical energy
  production volume 1.75626e10 kWh
  property price 0.0977 EUR2005
    Temporary price data. Calculated as 90% of purchasers price based on: 94% of the average price (to account for a 6% loss in transformation and transmission) for electricity for industrial consumersin 2005 (excluded taxes). From IEA.

## Inputs from technosphere
- electricity, high voltage: 0 kWh; pedigree (1,1,1,1,1)
  Calculated value/estimation. This value compensates for the losses during transmission/distribution on this electricity market. The calculation is made based on total electricity losses between net electricity available at the busbar and the use of electricity calculated based on the IEA electricity information 2016, table 1.1, Electrity supply vs. transmission losses. These total losses over the whole chain are then allocated to the different voltage levels as well as transformation and transmission losses based on information in Itten et al. 2014. For details please see the documentation available on ecoQuery.
  IEA. 2014. Electricity Information 2014. ISBN 978-92-64-21692-1. International Energy Agency (IEA), Paris Cedex (FR).
  Itten R., Frischknecht R., Stucki M. 2014. Life Cycle Inventories of Electricity Mixes and Grid. Version 1.3. treeze, Uster, Switzerland
- electricity, high voltage: 0.197373 kWh
  production volume 3.40167e9 kWh
- electricity, high voltage: 0.0899426 kWh
  production volume 1.55014e9 kWh
- electricity, high voltage: 0.00863111 kWh
  production volume 1.48755e8 kWh
- electricity, high voltage: 9.17646e-5 kWh
  production volume 1.58154e6 kWh
- electricity, high voltage: 0.196563 kWh
  production volume 3.3877e9 kWh
- electricity, high voltage: 0.178615 kWh
  production volume 3.07839e9 kWh
- electricity, high voltage: 0.328784 kWh
  production volume 5.66649e9 kWh
