# yarn production, cotton, ring spinning

Dataset: EcoSpold 2, unit process
Geography: BD
Time period: 2017-01-01 to 2021-12-31
Technology level: current
Classification: ISIC rev.4 ecoinvent: 1311:Preparation and spinning of textile fibres
Classification: EcoSpold01Categories: textiles/processing
Scenario: Business-as-Usual
System model: Allocation, cut-off by classification
Generated by: Mireille Faist Emmenegger
Published in: Faist Emmenegger, M. 2018
Database: ecoinvent
isCopyrightProtected: true
accessRestrictedTo: 1

## General comment
The inventory refers to the production of 1 kg greige yarn from raw cotton. The activity represents an average of card and comb spinning process. It includes Blendomat, Condenser, Metal Separator, Multimixer, Carding, Breaker Drawing, LAP Former, Comber, Finisher Drawing, Simplex, Ring, Auto Cone, and Packing. The process also produces wastes/byproducts such as dropping, microdust, hard waste, roving, filter waste, sweeping, and pneumafil etc.The average yarn count is 30 s/1 Ne.
The Ring Spinning is the most widely used form of spinning machine due to significant advantages in comparison with the new spinning processes. The ring spinning machine is used in the textile industry to simultaneously twist staple fibres into yarn and then wind it onto bobbins for storage. The yarn loop rotating rapidly about a fixed axis generates a surface referred to as "balloon". Ring frame settings are chosen to reduce yarn hairiness and the risk of glazing or melting the fibre.
Air conditioning is included.
The following processes are used to convert cotton fibre to cotton yarn. The cotton bales are opened and cleaned and mixed in blowroom. The fibres then undergo carding and are converted to sliver. The fibres are then parallelised in drawing process. In combing stage the short fibres are removed. The parallelised fibres are then converted to roving, which is fed into ring frame for spinning into yarn.The yarns are wound on to cones and conditioned before packaging.

## Included activities start
The activity starts when raw cotton enters into Blendomat.

## Included activities end
The activity ends when the packaged greige yarn is ready.

## Reference product
- yarn, cotton: 1 kg; name RP_amount_1; By-product classification allocatable product; CPC 26360: Cotton yarn (other than sewing thread), containing 85% or more by weight of cotton
  production volume 1.115e9 kg; name RP_PV_1
    Literature Value. The annual production volume is taken from the Bangladesh Textile Mills Association (BTMA) and is valid for the year 2014/15.
  property heating value, net 12.95 MJ
    LHV is calculated based on the Carbon content of the product. More details can be found on the respective documentation.
  property price 2.265 EUR2005; name RP_amount_1_price_EUR2005
    Estimated value. Various souces report a value around 3 USD per kg of cotton yarn (YarnsandFibers.com, 2018. Pakistan textile exports hit by rise in prices, retrieved from: http://www.yarnsandfibers.com/news/news-tags/cotton-yarn-prices, accessed 1Feb2018; Alibaba.com, 2018. Retrieved from: https://www.alibaba.com/showroom/100%2525-cotton-yarn-price.html, accessed 1Feb2018). The price was checked also against the values reported from the Indian Ministry of Textile, Price Data for textile, Prices (Month End) for 2018 (retrieved from: http://texmin.nic.in/sites/default/files/monthend_jan2018_1.pdf, accessed 6March 2018).
  property carbon content 0.46
    carbon content on a dry matter basis (reserved; not for manual entry)
  properties: water in wet mass 0.06 kg, dry mass 0.94 kg, water content 0.0638298, carbon content, fossil 0, carbon content, non-fossil 0.46, wet mass 1 kg, carbon allocation 0.4324 kg

## Inputs from technosphere
- electricity, medium voltage: 3.9 kWh; lognormal variance with pedigree 0.02, pedigree (4,1,3,1,1)
  Industry data.
- fibre, cotton: 1.1358 kg; lognormal variance with pedigree 0.02, pedigree (4,1,3,1,1)
  Industry data.
  properties: water content 0.0638298, dry mass 0.94 kg, wet mass 1 kg, heating value, net 12.95 MJ, carbon content, non-fossil 0.46
- waste yarn and waste textile: -0.1358 kg; name BP_amount_1
  Industry data.
  production volume 1.51417e8 kg; = RP_PV_1 * (BP_amount_1 / RP_amount_1)
    Calculated from production volume of reference product using the relative outputs.
  property price 0 EUR2005; name BP_amount_1_price_EUR2005
  properties: water content 0.0212731, heating value, net 13.14 MJ, dry mass 0.97917 kg, wet mass 1 kg, carbon content, non-fossil 0.44455
- building, hall, steel construction: 8.1412e-5 m2; lognormal variance with pedigree 0.0106, pedigree (4,1,3,1,1)
  Industry data.

## Emissions to nature
- Particulates, > 10 um [air, non-urban air or from high stacks]: 0.01398 kg
  Industry data. Particulates in the form of Micro and Filter dust.

## Sampling procedure
Industry data. Representative mills in Bangladesh. The mills were chosen to provide data based on their technical representation of the current state of business and their willingness to participate.

## Extrapolations
This dataset has been extrapolated from year 2017 to the year of the calculation (2021). The uncertainty has been adjusted accordingly.
