# suction, shavings, softwood

Dataset: EcoSpold 2, unit process
Geography: RoW
Time period: 2011-01-01 to 2021-12-31
Technology level: current
Classification: ISIC rev.4 ecoinvent: 1610:Sawmilling and planing of wood
Scenario: Business-as-Usual
System model: Allocation, cut-off by classification
Generated by: Frank Werner
Database: ecoinvent
isCopyrightProtected: true
accessRestrictedTo: 1

## General comment
This data represents the service of collecting shavings from the planing of softwood, expressed per kg dry mass and transporting it to its silo via aspiration.
The data was provided by and approved by the Swiss forest industry (Holzindustrie Schweiz HIS).

## Included activities start
The activity starts with the shavings at the planing machine.

## Included activities end
This activity ends with the shavings collected at a silo at the sawmill site. The dataset does not include direct wood dust emissions. The infrasturcture for the pipes and pumps as well as for the silo are assumed be part of the infrastructure DS for the sawmill.

## Reference product
- shavings, softwood, loose, measured as dry mass: 0 kg; source BFS 2013; CPC 39283: Non-agglomerated wood waste and scrap; By-product classification allocatable product
  extrapolated from Swiss data via FAO statistics on the production of sawnwood
  production volume 0 kg; name p_shavings; = (1550600+334340+1455000+2699100+1956700+3629900)/1079420*296662059
    sum of all production volumes of all planing processes for the geographical reference, quantified within the planing datasets
  property price 0.113 EUR2005
    Calculated based on data from FAOSTAT (accessed 20140429). The price is calculated by using data on total world import quantity (m3) and import value (1000 USD), year 2005. 40461924 m3 of Chips and Particles was imported in the world in 2005. The import value was 3022227000 USD. The calculated price is thus (3022227000/40461924=74.7*0.8=) 62.2 Euro/m3. It is estimated, that the chips and particles are half hardwood (of density 650 kg/m3) and half softwood (of density 450 kg/m3), thus the remaining mixture has a density of 550 kg/m3. The recalculated price is (1/550*62.2=) 0.11 Euro/kg. Using the same approach the calculated price for 2010 was 0.123 Euro/kg.
  property heating value, net 12.61 MJ
    LHV is calculated based on the Carbon content of the product. More details can be found on the respective documentation.
  property carbon content 0.494
    carbon content on a dry matter basis (reserved; not for manual entry)
  properties: water in wet mass 0.1 kg, wet mass 1.1 kg, carbon content, non-fossil 0.494, dry mass 1 kg, carbon content, fossil 0, water content 0.1, carbon allocation 0.494 kg
- shavings, softwood, measured as dry mass: 1 kg; CPC 39283: Non-agglomerated wood waste and scrap; By-product classification allocatable product
  production volume 2.15846e9 kg; = p_shavings
  properties: price 0.113 EUR2005, water content 0.1, wet mass 1.1 kg, carbon content, non-fossil 0.494, dry mass 1 kg, water in wet mass 0.1 kg, carbon content, fossil 0, heating value, net 13.38 MJ, carbon content 0.494, carbon allocation 0.494 kg

## By-products
- shavings, softwood, measured as dry mass: 0 kg; CPC 39283: Non-agglomerated wood waste and scrap; By-product classification allocatable product
  production volume 0 kg; = p_shavings
    Calculated from production volume of reference product using the relative outputs.
  property price 0.113 EUR2005
    (same comment as for shavings, softwood, loose, measured as dry mass)
  property heating value, net 13.38 MJ
    (same comment as for shavings, softwood, loose, measured as dry mass)
  property carbon content 0.494
    carbon content on a dry matter basis (reserved; not for manual entry)
  properties: water content 0.1, wet mass 1.1 kg, carbon content, non-fossil 0.494, dry mass 1 kg, water in wet mass 0.1 kg, carbon content, fossil 0, carbon allocation 0.494 kg

## Inputs from technosphere
- electricity, medium voltage: 0 kWh; source BFS 2013; pedigree (1,1,1,1,1)
  electricity needed for the suction of shavings from the planing process and their transport to a bunker/silo.
- shavings, softwood, loose, measured as dry mass: 1 kg; source BFS 2013
  extrapolated from Swiss data via FAO statistics on the production of sawnwood
  production volume 2.15846e9 kg
  properties: price 0.113 EUR2005, wet mass 1.1 kg, carbon content, non-fossil 0.494, dry mass 1 kg, water content 0.1, heating value, net 12.61 MJ
- electricity, medium voltage: 0.000822113, 0.000157646, 0.00128509, 0.00264655, 0.0384917, 0.00542542, 0.0156715 kWh (7 entries); source BFS 2013; lognormal variance with pedigree 0.216, pedigree (5,5,5,5,5)
  (same comment as for electricity, medium voltage)

## Sampling procedure
complementary literature and sampling from sawmills

## Extrapolations
Swiss data; uncertainties have been adjusted
