# electricity, high voltage, import from GR

Dataset: EcoSpold 2, unit process
Geography: MK
Time period: 2012-01-01 to 2021-12-31
Technology level: current
Classification: ISIC rev.4 ecoinvent: 3510:Electric power generation, transmission and distribution
Scenario: Business-as-Usual
System model: Allocation, cut-off by classification
Generated by: Karin Treyer
Published in: Itten R. 2012
Database: ecoinvent
isCopyrightProtected: true
accessRestrictedTo: 1

## General comment
This dataset represents the amount of imported electricity from GR to MK. The import value is valid for 2012 and includes all electricity imports, independently whether used within the importing country, or re-exported. For a discussion of different ways of modeling electricity trade in LCI, please refer to (Itten & Frischknecht 2014).

## Included activities start
This activity represents the point of 'handing over' the electricity from one country to the other at the border.

## Included activities end
This dataset doesn't include any electricity losses or transmission infrastructure as these are accounted for in the market datasets.

## Time period
Annual production volume valid for 2012.

## Reference product
- electricity, high voltage: 1 kWh; By-product classification allocatable product; CPC 17100: Electrical energy
  production volume 1.47e8 kWh
    Literature value. Where available, data are taken from the OECD iLibrary, database 'Electricity imports by origin'. However, this database only lists imports from OECD countries and neglects imports from non-OECD countries. To determine these imports, the total import volume to this country was taken from the IEA electricity statistics 2014. The origin non-OECD countries were then determined based on Itten et al. 2014 (data for 2008, not for 2012).
    OECD. 2014. IEA Electricity Information Statistics: OECD - Electricity imports by origin. OECD iLibrary. Online database. DOI : 10.1787/elect-data-en
    IEA. 2014. Electricity Information 2014. ISBN 978-92-64-21692-1. International Energy Agency (IEA), Paris Cedex (FR).
    Itten R., Frischknecht R., Stucki M. 2014. Life Cycle Inventories of Electricity Mixes and Grid. Version 1.3. treeze, Uster, Switzerland
  property price 0.0977 EUR2005
    Temporary price data. Calculated as 90% of purchasers price based on: 94% of the average price (to account for a 6% loss in transformation and transmission) for electricity for industrial consumersin 2005 (excluded taxes). From IEA.

## Inputs from technosphere
- electricity, high voltage: 1 kWh; undefined min 1, max 1, standardDeviation95 0, pedigree (1,1,4,1,1)
  activityLink added to better reflect the reality of the supply chain

## Extrapolations
This dataset has been extrapolated from year 2012 to the year of the calculation (2021). The uncertainty has been adjusted accordingly.

## Review by Carl Vadenbo 2015-08-04
The update of the whole electricity sector for the ecoinvent v3.2 database consist of hundreds of datasets. All these datasets have passed through a streamlined review processes where the underlying modelling of production volumes, technology shares and efficiencies was reviewed in detail prior to the datasets being submitted to the database.
