# toluene oxidation

Dataset: EcoSpold 2, unit process
Geography: RoW
Time period: 2010-01-01 to 2021-12-31
Technology level: current
Classification: ISIC rev.4 ecoinvent: 2011:Manufacture of basic chemicals
Synonyms: Dracylic acid; Carboxybenzene; Benzenecarboxylic acid; Benzeneformic acid
Scenario: Business-as-Usual
System model: Allocation, cut-off by classification
Generated by: Jürgen Sutter
Database: ecoinvent
isCopyrightProtected: true
accessRestrictedTo: 1

## General comment
This dataset represents the production of benzoic acid by oxidation of toluene. Benzoic acid is a white crystalline solid. The majority of benzoic acid is used to produce phenol. Benzoic acid is also used to produce sodium and potassium benzoate which are consumed in the food and beverage industry. Other major applications include benzoate plasticizers, alkyd resins and benzyl chloride.
This dataset is based on estimations using stoichiometry and expert judgement, as well as data from a large chemical plant (Gendorf 2016).
References:
Frischknecht R., Jungbluth N., Althaus H.-J., Doka G., Dones R., Heck T., Hellweg S., Hischier R., Nemecek T., Rebitzer G. and Spielmann M. (2007) Overview and Methodology. Final report ecoinvent v2.0 No. 1. Swiss Centre for Life Cycle Inventories, Dübendorf, CH, retrieved from: www.ecoinvent.org.
CAMEO Chemicals. Chemical Datasheet, Benzoic acid, https://cameochemicals.noaa.gov/chemical/2585 (last accessed, 2017-01-06).
Gendorf (2016) Umwelterklärung 2015, Werk Gendorf Industriepark, www.gendorf.de.

## Included activities start
The activity starts when the raw materials enter the process.

## Included activities end
This activity ends with the production of benzoic acid. It includes the oxidation of toluene, input materials, energy uses, infrastructure and emissions.

## Geography
The inventory is modelled for the world. Some values are based on data from a large chemical factory located in Germany. These are assumed to be valid for this geography.

## Technology
Oxidation of toluene is the most important method for the manufacture of benzoic acid:
C7H8 + O2 → C7H6O2 + H2
Benzoic acid (C7H6O2; CAS 65-85-0, benzenecarboxlic acid) forms white monoclinic crystals that begin to sublime at about 100 °C. It is volatile in steam and forms azeotropes with biphenyl, butyl benzoate, catechol, diphenyl ether, diphenylmethane, and naphthalene. At 89.7 °C, a mixture of excess benzoic acid and water forms two stable liquid phases. The water content of the benzoic acid phase is 26.5 wt %. The two phases become homogeneous at 117.2 °C. The mixture then contains 32.34 % benzoic acid and 67.66 % water (Maki T. and Takeda K., 2000).
Reference:
Takao Maki and Kazuo Takeda: Benzoic Acid and Derivatives. Published online: 2000. In: Ullmann's Encyclopedia of Industrial Chemistry, Seventh Edition, 2004 Electronic Release (ed. Fiedler E., Grossmann G., Kersebohm D., Weiss G. and Witte C.). 7 th Electronic Release Edition. Wiley InterScience, New York, Online-Version under: DOI: 10.1002/14356007.a03_555

## Time period
Time of publications. Some values are based on data published by the Gendorf factory that were collected between 2011 and 2015. The time period has been adjusted accordingly. For more details, see the comments of the exchanges.

## Reference product
- benzoic acid: 1 kg; name RP; CPC 34120: Industrial monocarboxylic fatty acids; acid oils from refining; By-product classification allocatable product; CAS 65-85-0
  Benzoic acid is a white crystalline solid. The majority of benzoic acid is used to produce phenol. Benzoic acid is also used to produce sodium and potassium benzoate which are consumed in the food and beverage industry. Other major applications include benzoate plasticizers, alkyd resins and benzyl chloride.
  production volume 2.87201e9 kg; name RP_PV
    Estimated value. The global production volume is extrapolated from the European production volume based on reports from Cefic (European Chemical Industry Council), and the American Chemistry Council.
    According to Cefic (2016a) the global sales of chemicals in the year 2015 was 3 534 billion euros. The reported share of sales per region are: EU28 14.7%; Other Europe (Switzerland, Norway, Turkey, Russia and Ukraine) 2.7%; NAFTA (US, Canada and Mexico) 16.5%; Latin America 3.8%; China 39.9%; Japan 3.9%; Republic of Korea 3.2%; India 2.2%; Rest of Asia 11.9%; Rest of the World 1.3%. Cefic also reports the US total sales, which amount to 518.7 billion euros out of the global 3 534 billion euros (14.7%). The same share is reported by the American Chemistry Council (2016), according to which the USA sales account for 15% of global sales for the year 2016.
    European production volume:
    Estimated value. According to the European Chemical Agency, the consumption of Benzoic acid for the year of 2016 is estimated to be 550000000 kg. The aforementioned value is the average of the range given in the literature. According to the European Chemical Industry Council (Cefic, 2016a), the total sales of chemicals of the European Union in 2016 amounted to 519 billion euros. Chemical imports were valued at 91 billion euros for the first 11 months of 2016. Based on this, the value for the total imports for the year 2016 was extrapolated, yielding a value of 99.3 billion euros. Furthermore, Cefic (2016b) reports a trade surplus (exports-imports) of 46.4 billion euros (once again extrapolated for the whole year using the value of 42 billion euros for the first 11 months of 2016). Considering all the aforementioned information, the total chemical consumption in the EU is calculated to be 472.6 billion euros (total sales-exports+imports). It is therefore calculated that production is 110% of consumption. This value is used to scale the information on chemical consumption to production. The European production volume is therefore 605000000 kg.
    Since no data were found for the global production this value was scaled accordingly.
    References:
    American Chemistry Council 2016. Outlook: U.S. Chemical Industry Continues to Outpace Industrial Output; Accounts for More Than One-Half of Construction Spending by Manufacturing Sector. Accessible at: https://www.americanchemistry.com/Media/PressReleasesTranscripts/ACC-news-releases/US-Chemical-Industry-Continues-to-Outpace-Industrial-Output.html
    European Chemical Agency, Brief profile of Benzoic acid, Accessible at: https://echa.europa.eu/brief-profile/-/briefprofile/100.000.562
    Cefic 2016a. Facts and figures 2016 of the European chemical industry. Accessible at: http://www.cefic.org/Facts-and-Figures/Chemicals-Industry-Profile/
    Cefic 2016b. 2016: EU chemicals output posts positive growth for third year running. Accessible at: http://www.cefic.org/Documents/RESOURCES/Chemical%20Trends%20Report/March-2017-Cefic-Chemicals-Trends-Report.pdf
  property heating value, net 26.81 MJ
    LHV is calculated based on the elemental composition of the substance. Based on the CAS number of the substance (000065-85-0 ), which is found manually, the chemical formula of the substance is found to be: C7H6O2, (PubChem 2020).
    Reference: Kim, S., Chen, J., Cheng, T., Gindulyte, A., He, J., He, S., Li, Q., Shoemaker, B. A., Thiessen, P. A., Yu, B., Zaslavsky, L., Zhang, J., & Bolton, E. E. (2019). PubChem 2019 update: improved access to chemical data. Nucleic acids research, 47(D1), D1102–D1109. https://doi.org/10.1093/nar/gky1033
  property price 1.95 EUR2005
    Average 2005 prices for EU27, USA, China, Japan and India from Import/Export data (US$ and tonnes) in UN Commodity Trade Statistics Database;
  property carbon content, fossil 0.688459
    Calculated based on molecular structure. See tab 'chemicals'.
  property carbon content 0.688459
    carbon content on a dry matter basis (reserved; not for manual entry)
  properties: water content 0, wet mass 1 kg, water in wet mass 0 kg, carbon content, non-fossil 0, dry mass 1 kg, carbon allocation 0.688459 kg

## Inputs from technosphere
- nitrogen, liquid: 0.0193115 kg; lognormal variance with pedigree 0.0106, pedigree (2,3,2,4,3)
  Calculated based on literature data published by the industry. This value is a 5-year average of data (2011 - 2015) published by the Gendorf factory (Gendorf, 2016, Umwelterklärung, www.gendorf.de), (Gendorf, 2015, Umwelterklärung, www.gendorf.de), (Gendorf, 2014, Umwelterklärung, www.gendorf.de). The amount of nitrogen used per kg of chemical substance produced is calculated using literature data published by the Gendorf factory based in Germany, which produces a wide range of chemical substances. The factory produced 1657400 tonnes of chemical substances in the year 2015 (Gendorf, 2016, Umwelterklärung, www.gendorf.de) and 740000 tonnes of intermediate products. The reported amount of nitrogen used in 2015 was 33512400 Nm3 (Gendorf, 2016, Umwelterklärung, www.gendorf.de). One Nm3 of nitrogen is equal to 1.2506 kg. The resulting amount of nitrogen - the 5-year average (2011 - 2015, weighted by production volume) is 0.019 kg/kg. Nitrogen is mainly used during the production of chemicals for 'blanketing', which is the process of applying gas to the vapour space of a container or vessel in order to control its composition.
  properties: wet mass 1 kg, dry mass 1 kg
- tap water: 0 kg; pedigree (1,1,1,1,1)
  Calculated based on literature data published by the industry. This value is a 5-year average of data (2011 - 2015) published by the Gendorf factory (Gendorf, 2016, Umwelterklärung, www.gendorf.de), (Gendorf, 2015, Umwelterklärung, www.gendorf.de), (Gendorf, 2014, Umwelterklärung, www.gendorf.de). The amount of tap water per kg of chemical substance produced is calculated using literature data published by the Gendorf factory based in Germany, which produces a wide range of chemical substances. The factory produced 1657400 tonnes of chemical substances in the year 2015 (Gendorf, 2016, Umwelterklärung, www.gendorf.de) and 740000 tonnes of intermediate products. The amount of tap water consumed in the year 2015 was 55100 tonnes (Gendorf, 2016, Umwelterklärung, www.gendorf.de). The resulting amount of tap water is 0.023 kg/kg of chemical product produced. The 5-year average (2011 - 2015, weighted by production volume) is 0.026 kg/kg.
  properties: dry mass 0.000337476 kg, carbon content, fossil 0.00178991, water content 2962.17, wet mass 1 kg
  note on carbon content, fossil: Bicarbonate content is 2.93 mol/m3. CO2 content is 0.1 mol/m3 (ecoinvent v2.2 report 8, Tab 93.1).
- chemical factory, organics: 4.06557e-10 unit; lognormal variance with pedigree 0.31, pedigree (2,3,2,4,3)
  Calculated based on literature data published by the industry. For this activity, no information was readily available concerning infrastructure and land-use. Therefore, the infrastructure is estimated based on data from two chemical factories, the BASF site of Ludwigshafen and the chemical factory in Gendorf (which are both located in Germany), which produce a wide range of chemical substances. Based on this data, the following assumptions are made: the built area amounts to about 4.2 ha, the plant has an average output of 50'000 t/a and a lifespan of fifty years. The estimated infrastructure amount is therefore 4.00 E-10 units per kg of produced chemical.
  References:
  Althaus H.-J., Chudacoff M., Hischier R., Jungbluth N., Osses M. and Primas A. (2007) Life Cycle Inventories of Chemicals. ecoinvent report No. 8, v2.0. EMPA Dübendorf, Swiss Centre for Life Cycle Inventories, Dübendorf, CH.
  Gendorf (2000) Umwelterklärung 2000, Werk Gendorf. Werk Gendorf, Burgkirchen.
- heat, from steam, in chemical industry: 0.203279 MJ; lognormal variance with pedigree 0.0106, pedigree (2,3,2,4,3)
  Calculated based on literature data published by the industry. This value is a 5-year average of data (2011 - 2015) published by the Gendorf factory (Gendorf, 2016, Umwelterklärung, www.gendorf.de), (Gendorf, 2015, Umwelterklärung, www.gendorf.de), (Gendorf, 2014, Umwelterklärung, www.gendorf.de). The amount of heat used per kg of chemical substance produced is calculated using literature data published by the Gendorf factory based in Germany, which produces a wide range of chemical substances. The factory produced 1657400 tonnes of chemical substances in the year 2015 (Gendorf, 2016, Umwelterklärung, www.gendorf.de) and 740000 tonnes of intermediate products. The amount of heat in the year 2015 was 523500 GJ (Gendorf, 2016, Umwelterklärung, www.gendorf.de) of which 90% was obtained from natural gas and 10% from steam. The resulting amount of heat from steam is 0.22 MJ/kg of chemical product produced. The 5-year average (2011 - 2015, weighted by production volume) is 0.20 MJ/kg. Cross-reference: the amount of chemicals produced (excluding intermediate products) in the EU-28 in the year 2011 was 327 million tonnes (Eurostat, http://ec.europa.eu/eurostat/statistics-explained/index.php/Chemicals_production_statistics, accessed 20170126). The chemical and petrochemical industry sector consumed 2.33 EJ of energy in 2011 (European Commission - Joint Research Centre, 2014, BAT on Common Waste water and Waste Gas Treatment/Management Systems in the Chemical Sector). The resulting energy (both heat and electricity) consumed per kg of chemicals produced in 2011 is thus 7.13 MJ/kg. This is higher than the value calculated using data published by Gendorf – 3.85 MJ/kg, but that is to be expected as the intermediate products are not accounted for.
  properties: heating value, net 1 MJ
- sodium hydroxide, without water, in 50% solution state: 0.04 kg; lognormal variance with pedigree 0.1786, pedigree (4,5,5,5,5)
  Estimated value based on expert judgement. 0.04 kg of sodium hydroxide is needed per kg of benzoic acid.
  properties: dry mass 1 kg, wet mass 1 kg, heating value, net 3.03 MJ
- wastewater, average: -2.74426e-6 m3; name BP_wastewater_average; lognormal variance with pedigree 0.0106, pedigree (2,3,2,4,3)
  Calculated based on literature data published by the industry. This value is a 5-year average of data (2011 - 2015) published by the Gendorf factory (Gendorf, 2016, Umwelterklärung, www.gendorf.de), (Gendorf, 2015, Umwelterklärung, www.gendorf.de), (Gendorf, 2014, Umwelterklärung, www.gendorf.de). The amount of wastewater (which is later on treated in the municipal WWTP) per kg of chemical substance produced is calculated using literature data published by the Gendorf factory based in Germany, which produces a wide range of chemical substances. The factory produced 1657400 tonnes of chemical substances in the year 2015 (Gendorf, 2016, Umwelterklärung, www.gendorf.de) and 740000 tonnes of intermediate products. The amount of wastewater which is later on treated in the municipal WWTP in the year 2015 was 1200 tonnes (Gendorf, 2016, Umwelterklärung, www.gendorf.de). The resulting amount of wastewater is 2.7E-06 m3/kg of chemical product produced.
  production volume 7881.55 m3; = RP_PV*BP_wastewater_average/ABS(RP)
    Calculated from the production volume of benzoic acid in proportion to the respective output amounts.
  property price 0 EUR2005; name BP_wastewater_average_price_EUR2005
  properties: dry mass 0.346837 kg, carbon content, non-fossil 0.194039, water content 2882.2, wet mass 1000 kg
  note on carbon content, non-fossil: 0.0673 kg TOC/m3 (Tab A.17, ecoinvent v2.2 report 13_I). TOC was considered as Total Carbon.
- heat, district or industrial, natural gas: 0 MJ; pedigree (1,1,1,1,1)
  Calculated based on literature data published by the industry. This value is a 5-year average of data (2011 - 2015) published by the Gendorf factory (Gendorf, 2016, Umwelterklärung, www.gendorf.de), (Gendorf, 2015, Umwelterklärung, www.gendorf.de), (Gendorf, 2014, Umwelterklärung, www.gendorf.de). The amount of heat used per kg of chemical substance produced is calculated using literature data published by the Gendorf factory based in Germany, which produces a wide range of chemical substances. The factory produced 1657400 tonnes of chemical substances in the year 2015 (Gendorf, 2016, Umwelterklärung, www.gendorf.de) and 740000 tonnes of intermediate products. The amount of heat in the year 2015 was 523500 GJ (Gendorf, 2016, Umwelterklärung, www.gendorf.de) of which 90% was obtained from natural gas and 10% from steam. The resulting amount of heat from natural gas is 2.02 MJ/kg of chemical product produced. The 5-year average (2011 - 2015, weighted by production volume) is 2.15 MJ/kg. Cross-reference: the amount of chemicals produced (excluding intermediate products) in the EU-28 in the year 2011 was 327 million tonnes (Eurostat, http://ec.europa.eu/eurostat/statistics-explained/index.php/Chemicals_production_statistics, accessed 20170126). The chemical and petrochemical industry sector consumed 2.33 EJ of energy in 2011 (European Commission - Joint Research Centre, 2014, BAT on Common Waste water and Waste Gas Treatment/Management Systems in the Chemical Sector). The resulting energy (both heat and electricity) consumed per kg of chemicals produced in 2011 is thus 7.13 MJ/kg. This is higher than the value calculated using data published by Gendorf – 3.85 MJ/kg, but that is to be expected as the intermediate products are not accounted for.
  properties: heating value, net 1 MJ
- oxygen, liquid: 0.231676 kg; lognormal variance with pedigree 0.0807, pedigree (1,3,5,3,1)
  Stoichiometric calculation.
  properties: wet mass 1 kg, dry mass 1 kg
- toluene, liquid: 0.86 kg; lognormal variance with pedigree 0.1786, pedigree (4,5,5,5,5)
  Estimated value based on expert judgement. 0.86 kg of toluene is needed per kg of benzoic acid.
  properties: wet mass 1 kg, dry mass 1 kg, carbon content, fossil 0.913043, heating value, net 38.17 MJ
- electricity, medium voltage: 0 kWh; pedigree (1,1,1,1,1)
  Calculated based on literature data published by the industry. This value is a 5-year average of data (2011 - 2015) published by the Gendorf factory (Gendorf, 2016, Umwelterklärung, www.gendorf.de), (Gendorf, 2015, Umwelterklärung, www.gendorf.de), (Gendorf, 2014, Umwelterklärung, www.gendorf.de). The amount of electricity per kg of chemical substance produced is calculated using literature data published by the Gendorf factory based in Germany, which produces a wide range of chemical substances. The factory produced 1657400 tonnes of chemical substances in the year 2015 (Gendorf, 2016, Umwelterklärung, www.gendorf.de) and 740000 tonnes of intermediate products. The amount of electricity consumed in the year 2015 was 3498800 GJ (Gendorf, 2016, Umwelterklärung, www.gendorf.de). The resulting amount of electricity is 0.406 kWh/kg (year 2015) of chemical substance produced. The 5-year average (2011 - 2015, weighted by production volume) is 0.416 kWh/kg (1.5 MJ/kg). Cross-reference: the amount of chemicals produced (excluding intermediate products) in the EU-28 in the year 2011 was 327 million tonnes (Eurostat, http://ec.europa.eu/eurostat/statistics-explained/index.php/Chemicals_production_statistics, accessed 20170126). The chemical and petrochemical industry sector consumed 2.33 EJ of energy in 2011 (European Commission - Joint Research Centre, 2014, BAT on Common Waste water and Waste Gas Treatment/Management Systems in the Chemical Sector). The resulting energy (both heat and electricity) consumed per kg of chemicals produced in 2011 is thus 7.13 MJ/kg. This is higher than the value calculated using data published by Gendorf – 3.85 MJ/kg, but that is to be expected as the intermediate products are not accounted for.
- tap water: 0.000411351, 4.95156e-5, 8.18327e-5, 0.0020635, 5.36813e-5, 0.000152696, 0.0236136 kg (7 entries); lognormal variance with pedigree 0.0106, pedigree (2,3,2,4,3)
  (same comment as for tap water)
- heat, district or industrial, natural gas: 0.033168, 2.15208 MJ (2 entries); lognormal variance with pedigree 0.0106, pedigree (2,3,2,4,3)
  (same comment as for heat, district or industrial, natural gas)
- electricity, medium voltage: 0.00532972, 0.00102201, 0.0171574, 0.24954, 0.0351727, 0.114598 kWh (6 entries); lognormal variance with pedigree 0.0106, pedigree (2,3,2,4,3)
  (same comment as for electricity, medium voltage)

## Inputs from nature
- Water, well, in ground [natural resource, in water]: 0.000843606 m3; lognormal variance with pedigree 0.0106, pedigree (2,3,2,4,3)
  Calculated based on literature data published by the industry. This value is a 5-year average of data (2011 - 2015) published by the Gendorf factory (Gendorf, 2016, Umwelterklärung, www.gendorf.de), (Gendorf, 2015, Umwelterklärung, www.gendorf.de), (Gendorf, 2014, Umwelterklärung, www.gendorf.de). The amount of groundwater and surface water (river) extracted per kg of chemical substance produced is calculated using literature data published by the Gendorf factory based in Germany, which produces a wide range of chemical substances. The factory produced 1657400 tonnes of chemical substances in the year 2015 (Gendorf, 2016, Umwelterklärung, www.gendorf.de) and 740000 tonnes of intermediate products. The amount of groundwater and surface water (river) extracted in the year 2015 was 19950000 tonnes and 21488100 tonnes respectively (Gendorf, 2016, Umwelterklärung, www.gendorf.de).
- Water, river [natural resource, in water]: 0.000874098 m3; lognormal variance with pedigree 0.0106, pedigree (2,3,2,4,3)
  (same comment as for Water, well, in ground)
- Water, cooling, unspecified natural origin [natural resource, in water]: 0.0166688 m3; lognormal variance with pedigree 0.0106, pedigree (2,3,2,4,3)
  Calculated based on literature data published by the industry. This value is a 5-year average of data (2011 - 2015) published by the Gendorf factory (Gendorf, 2016, Umwelterklärung, www.gendorf.de), (Gendorf, 2015, Umwelterklärung, www.gendorf.de), (Gendorf, 2014, Umwelterklärung, www.gendorf.de). The amount of water for cooling extracted per kg of chemical substance produced is calculated using literature data published by the Gendorf factory based in Germany, which produces a wide range of chemical substances. The factory produced 1657400 tonnes of chemical substances in the year 2015 (Gendorf, 2016, Umwelterklärung, www.gendorf.de) and 740000 tonnes of intermediate products. The reported amounts of water extracted as groundwater and surface water (river) are assumed to be used entirely for cooling purposes.

## Emissions to nature
- COD, Chemical Oxygen Demand [water, unspecified]: 0.00162576 kg; lognormal variance with pedigree 0.218, pedigree (4,5,5,5,5)
  Calculated value. The BOD, COD, TOC and BOD5 are calculated based on the amount and type of emissions released to water in the same activity.
- Carbon dioxide, fossil [air, urban air close to ground]: 0.012481 kg; lognormal variance with pedigree 0.1786, pedigree (4,5,5,5,5)
  From water treatment
  Uncertainty: E
- DOC, Dissolved Organic Carbon [water, unspecified]: 0.000493939 kg; lognormal variance with pedigree 0.218, pedigree (4,5,5,5,5)
  (same comment as for COD, Chemical Oxygen Demand)
- TOC, Total Organic Carbon [water, unspecified]: 0.000493939 kg; lognormal variance with pedigree 0.218, pedigree (4,5,5,5,5)
  (same comment as for COD, Chemical Oxygen Demand)
- Water [water, unspecified]: 0.0272939 m3; lognormal variance with pedigree 0.0106, pedigree (2,3,2,4,3)
  Calculated based on literature data published by the industry (Gendorf, 2016, Umwelterklärung, www.gendorf.de). The amount of water released back to the environment consists of the amount of process water treated in the internal WWTP and then released back to the environment and the amount of cooling water released back to the environment.
  property fraction, origin: salt water 0; name fraction_origin_salt_water_Ww
  property fraction, origin: unspecified 1; name fraction_origin_unspecified_Ww
  property fraction, origin: fresh water 0; name fraction_origin_fresh_water_Ww
- Water [air, unspecified]: 0.00795201 m3; lognormal variance with pedigree 0.0106, pedigree (2,3,2,4,3)
  Calculated to ensure the water balance. In general, in the case of recirculating cooling systems, 77% of the water input evaporates to air. In case of once-through cooling systems, 4% of the water input evaporates to air. The process water has in the chemical industry an average evaporation rate of 20.5%. In the specific case of the Gendorf factory, the calculated evaporation rate based on the data published is 6.3%. This matches the qualitative information, that the majority of the cooling systems in Gendorf are once-through and that the amount of cooling water used is significantly higher than the amount of process water used (Gendorf, 2016, Umwelterklärung, www.gendorf.de).
  property fraction, origin: fresh water 0; name fraction_origin_fresh_water
  property fraction, origin: salt water 0; name fraction_origin_salt_water
  property fraction, origin: unspecified 1; name fraction_origin_unspecified
- Toluene [water, surface water]: 0.000541807 kg; lognormal variance with pedigree 0.478, pedigree (4,5,5,5,5)
  Estimation
  Uncertainty: E
- Toluene [air, urban air close to ground]: 0.00135449 kg; lognormal variance with pedigree 0.298, pedigree (4,5,5,5,5)
  Estimation
  Uncertainty: E
- BOD5, Biological Oxygen Demand [water, unspecified]: 0.00162576 kg; lognormal variance with pedigree 0.218, pedigree (4,5,5,5,5)
  (same comment as for COD, Chemical Oxygen Demand)
- Nitrogen [air, unspecified]: 0.0193115 kg; lognormal variance with pedigree 0.0106, pedigree (2,3,2,4,3)
  Calculated value. The amount of nitrogen released to air is equal to the amount of nitrogen entering the activity.

## Sampling procedure
The data is based on literature and estimations. Some values are calculated based on data from a large chemical factory located in Germany. For more details, see the comments of the exchanges.

## Review by Emilia Moreno Ruiz 2017-08-08
This dataset was additionally reviewed in a separate review process by Eric Johnson of Atlantic Consulting as well as Emilia Moreno Ruiz and Gregor Wernet of ecoinvent.
