# mango production

Dataset: EcoSpold 2, unit process
Geography: BR
Time period: 2010-01-01 to 2021-12-31
Technology level: current
Classification: ISIC rev.4 ecoinvent: 0122:Growing of tropical and subtropical fruits
Synonyms: mango production; mango orchard; mango cultivation
Scenario: Business-as-Usual
System model: Allocation, cut-off by classification
Share of production covered: 100 %
Generated by: Jade Müller Carneiro
Published in: Folegatti-Matsuura M. 2018
Database: ecoinvent
isCopyrightProtected: true
accessRestrictedTo: 1

## General comment
The mango (Mangifera indica) is the most produced tropical fruit worldwide (FAO, 2017) and Brazil is one of its biggest exporters.This dataset represents the production of 1 kg of raw mango, produced in the agricultural region of San Francisco Valley and consumed in the national market as well as exported to several countries.The varieties (cultivars) considered were Tommy atkins, Palmer, Keitt, Kent and Palmer.
The yield is 34667 kg/ha on average, production starting in the 4th year with 20000kg/ha.year and in the 6th year it is stabilized with 40000kg/ha.year.
Mango trees are disposed in the field at a density of 376 plants per hectare on average, but the density varies widely between farms plots, with a minimum of 160plants/ha and a maximum of 833 plants/ha. The mango trees in this region are irrigated by micro sprinklers and the nutrition is provided by the use of mineral fertilizers, with the following average amounts: 98kg N/ha.year, 70kg P2O5, 205kg K2O/ha.year, plus micronutrient inputs. As for pesticides, an average of 7.66kg/ha.year of various active ingredients were applied. Bibliography is listed in the text box below.
CARVALHO, C. R. L., ROSSETTO, C. J., MANTOVANI, D. M. B., MORGANO, M. A., CASTRO., J. D., BORTOLETTO, N. Avaliação de cultivares de mangueira selecionadas pelo Instituto Agronômico de Campinas comparadas a outras de importância comercial. Rev. Bras. Frutic., 26 (2): 264-271, 2004.
Corrêa, F. L. O., Ramos, J. D. R., Gama-Rodrigues, A. C., Müller, M. W. Produção de serapilheira em sistema agroflorestal multiestratificado no estado de Rondônia, Brasil. Tese de Doutorado, apresentada à Universidade Federal de Lavras/UFLA, 2005.
Cunha, T. J. F., Silva, F. H. B. B., Silva, M. S. L., Giongo, V., Sá, I. B., Oliveira Neto, M. B., Cavalcanti, A. C. Solos do Submédio do Vale do São Francisco: Potencialidades e Limitações para uso agrÌcola. Série Documentos, 2011. ISSN 1808-9992, 2008.
Emmenegger, M., Reinhard, J., Zah, R. Sustainability quick check for biofuels - intermediate background report. Dubendorf, 2009.
Giongo, V., Salviano, A. M., Santana, M., OlszevKy, N., Silva, D.J., Gava, C.A.T., Cunha, T.J.F. PLA.NT COCKTAIL AS GREEN MANURE IN SEMI-ARID REGIONS TO IMPROVE SOIL CARBON AND NITROGEN STOCKS. Submitted in 2017.
IPCC. Guidelines for National Greenhouse Gas Inventories. 2006
Mouco, M.A.C., Silva, D.J. , Giongo, V., Mendes, A.M.S. Green Manures in ‘Kent’ Mango Orchard. Acta Hort. 1075, ISHS, 2015.
NEMECEK, T.; SCHNETZER, J. Methods of assessment of direct field emissions for LCIs of agricultural production systems. Zurich, Data v3.0, 2011.
Oliveira, A. R., et al. Cultivo da Mangueira. Sistemas de Produção, 2 - 2ª edição. ISSN 1807-0027. 2010.
Silva, D.J., Pereira, J.R., Mouco, M.A.C., Albuquerque, J.A.S., Raij, B., Silva , C.A. Nutrição Mineral e Adubação da Mangueira em Condições Irrigadas. Circular Técnica. Embrapa, 2004.
Nemecek T., Bengoa X., Lansche J., Mouron, P., Riedener E., Rossi V. & Humbert S. (2015) Methodological Guidelines for the Life Cycle Inventory of Agricultural Products. Version 3.0, July 2015. World Food LCA Database (WFLDB). Quantis and Agroscope, Lausanne and Zurich, Switzerland.
Novaes, et al. (2017) Estimating 20-year land use change and derived CO2 emissions associated to crops, pasture and forestry in Brazil and each of its 27 states. Global Change Biology. 2017;00:1-13. https://doi.org/10.1111/gcb.13708.

## Included activities start
This activity starts at land clearing and preparation.

## Included activities end
The dataset includes the inputs of seedlings, mineral fertilisers, pesticides and water from irrigation. It is assumed that no organic fertilisers are applied.
The dataset also includes all machine operations and corresponding machine infrastructure and sheds. Machine operations are: Land clearing, planting, distribution of fertilisers at planting, pulverising, pruning and harvest transport by tractor.
Further, direct field emissions are included, with important regionalizations added.
The activity ends after harvest at the farm gate.

## Geography
The inventory is modelled for the San Francisco valley, states of Pernambuco and Bahia, Brazil.

## Technology
Cultivation of mango

## Time period
Time period of the most of the data collected for this dataset.

## Parameters
- yield kgha: 34666.7 kg/ha; name yield_kg_ha
  Average productivity per year, in kg of mango per hectare.
- erosivity factor: 174.497 MJ*mm/(ha*h*yr); name erosivity_factor_R; = (0.0483* precipitation^1.61)*0.1
  Erositivy factor used in the SQCB model for soil erosion calculations (Emmenegger et al.,2009) for precipitation inferior to 850mm/year: R = 0.0483*P^1.61. This value is for regions where there is uniform annual precipitation, which is not the case in the San francisco valley region, (since there is a month with more than 15% of average annual precipitation) so in this case the erosivity factor is multiplied by 10%. R' = 0,1*R.
- slope factor: 0.834186 dimensionless; name slope_factor_LS
  Calculated for slope lenght = 100m and slope of 5%, according to Emmenegger et al.(2009)
- amount of N from urea: 41.985 kg N/ha; name urea_as_N; = 9.33E+01*0.45
  Input of urea (45%N) as nitrogen
- Phosphorus content: 0.00095 kg/kg; name Phosphorus_Pcr
  Phosphorous content in the top soil, according to Nemecek & Schnetzer, p.17.
- nitrogen from NH4NO3: 2.32 kg N/ha; name NH4NO3_as_N
  Nitrogen from Ammonium nitrate and Calcium ammonium nitrate
- erodibility factor: 0.0345 t*h/(MJ*mm); name erodibility_factor_k; = (0.026+0.026+0.04+0.046)/4
  Erodibility factor: mean value for soils in the region: Entisols: k = 0.026; Ulltisol: k=0,026; Vertisol: k=0,046 and Oxisols: k=0.040. (Table 7.2 Emmenegger et al.,2009)
- rooting depth: 1.5 m; name L
  Plant rooting depth, value from mango tree is taken from Oliveira et al.(2010)
- emission factor ammoniumnitrate_ammonia: 0.02 dimensionless; name EF_amm_ammonia
  Emission factor for ammonia emissions (NH3) from the application of Ammonium nitrate and Calcium ammonium nitrate, according to Nemecek & Schnetzer (2011), p.18
- fraction, irrigation water, to ground water: 0.8 dimensionless; name fraction_irrigation_to_ground
  Literature value (Siebert, 2010) (Vionnet, S., Quantis Water Database - Technical Report, 2012).
- LUC_crop_specific: 1 dimensionless
  This parameter allows to switch between a "crop specific" and a "country specific" approach when calculating the LUC of a crop. By default, the chosen approach is "crop specific", so the value of the parameter is 1. If you want to apply a "country specific" approach, turn the parameter to 0.
- fraction, irrigation water to surface water: 0.2 dimensionless; name fraction_irrigation_to_river
  (same comment as for fraction, irrigation water, to ground water)
- soil loss due to erosion: 0.125548 metric ton/(ha*year); name soil_loss; = erodibility_factor_k* erosivity_factor_R* practice_factor_erosion* slope_factor_LS* crop_factor_c1* Ft
- generic nitrogen: 43 kg N/ha; name N_generic
  Amount of nitrogen from different sources of fertilisers, except those which have specific emission factor. e.g. for ammonia emissions to air, fertilisers as 'urea', 'ammonium nitrate', between others have specific emission factors, yet others do not and are classified as 'generic N fertilisers' which have a "generic" mean emission factor (see table on p. 8 - Nemecek & Schnetzer, 2011).
- practice factor for anti-erosion practice: 1 dimensionless; name practice_factor_erosion
  Practice factor for anti-erosion factor, equivalent to 1(one) for 'no practice' or 'up and down slope', according to table 7.5 Emmenegger et al. (2009).
- emission factor urea_ammonia: 0.15 dimensionless; name EF_urea_ammonia
  Emission factor for ammonia emissions (NH3) from urea application, according to Nemecek & Schnetzer (2011), p.18
- nitrogen uptake by plant: 62.5333 kg N/ha; name Nuptake_plant; = (120/30)+((1.27*40*(25/30))+(1.27*20*(2/30)))+(14.3)+((1*(3/30))+(0.8*(4/30)))
  *N in the tree is 120 kg N/ha from 6th year onward (until 30 years) (data from lab analysis). =120/30 that is divided by 30 years. Leaf litter is 1120 kg dry matter/ha.year (Correa et al, 2006).
  *Mango fruit: N (kg N/t of fresh mango.year) =1,27 kg/t.year (Silva et al, 2004). Productivity in the years 4 and 5 is 20t/ha.year and from the 6o year onward, 40t/ha.year (according to producers).
  *N content in mango leaf is 12.77 g N/kg of dry matter (Assis et al, 2004). Acording to Correa et al (2006), the ammount of fallen leaf for mango tree is 1.12 t/ha. In one average year leaf uptake = 1120*12,77/1000 = 14,30 kg N/year.
  *Prunning: According to Mouco et al (2015), There are 4 formation prunnings in the first 3 years (1 kg N/ha.year, =14,9*250*0,2*0,004/3). From the 4th year onward, 1 prroduction pruning (0,8 kgN/ha.year) . kg N/ha.30 years = (((1*(3/30)+(0,8*(4/30)))
  Estimated uptake (tree+fruits+leafs+prunning) for one average year is the sum of each one of the above.
- organic nitrogen into soil: 1350 kg N/ha; name Norg_soil; = (0.28+0.22+0.4+(0.9/2))*1000
  Norg is the mass of organic nitrogen contained in the upper 50 cm of soil per ha. Naturally only a fraction of this mass is mineralised and, hence, available for uptake by plants and leaching to the ground water. Values for the San Francisco valley region were taken from Giongo et al. (2017)
- nitrogen crop residues: 14.3024 kg N/ha; name nitrogen_Ncr
  Nitrogen containing in crop residues, for mango: Leaf litter is 1120 kg dry matter/há.year (Correa et al, 2006). N content in mango leaf is 12.77 g N/kg of dry matter (Assis et al, 2004). Ncr = 1.85 kg N/ha. In one average year = 1120*12,77/1000 = 14,30 kg N.
- precipitation, annual: 1825.73 mm/year; name precipitation_irrigation; = 550+ irrigation*0.1* yield_kg_ha
  Average precipitation in the region is 550 mm/year (Oliveira et al., 2010); According to The SQCB-NO3 model - Emmeneger et al. (2009) -, in order to calculate NO3- emissions, the "precipitation" used is the sum of annual precipitation and irrigation (mm/ha.year).
- clay content into soil: 13.6667 % (obsolete); name Clay_content; = (6+20+15)/3
  Fraction of clay content into soil; Soil types in the São Francisco Valley where mangos are cultivated are: Neossolos Quartzarênicos (6%), Argissolos (20%) , Latossolos (15%) e Vertissolos (74%), acoording to Cunha et al (2008) and Oliveira et al (2010). Bust according to producers and reserachers of Embrapa Semiarid, most of the mango orchards are cultivated in Quartzarênicos (6%), Argissolos (20%) , Latossolos (15%). Thus, the clay avarage content (%) obtained considering these three soil types is applied ((6+20+15)/3=~14).
- enrichment factor P: 1.86 dimensionless; name factor_Fr
  Enrichment factor for phosphorus, used for estimation of phosphorus emissions to surface water through erosion mechanisms, according to Nemecek & Schnetzer (2011).
- crop factor: 0.1 dimensionless; name crop_factor_c1
  According to Ontario Ministry of Agriculture (http://www.omafra.gov.on.ca/english/engineer/facts/12-051.htm):
  - Fruit trees = 0.1
- nitrogen availability for plants: 98.5142 kg; name N_from_fertilizers
  Total nitrogen input from fertilizers in kg N per hectare.
- fraction, irrigation water, to air: 0.65 dimensionless; name fraction_irrigation_to_air
  (same comment as for fraction, irrigation water, to ground water)
- precipitation: 677.573 mm; = 550+0.1* irrigation* yield_kg_ha/10
  Precipitation considered in the SQCB tool (Emmenegger et al, 2009) for soil erosion calculations is the annual precipitation of the region (mm/year) plus 10% of the anual irrigation: P+0,1*irrigation.
- emission factor Nfertilizer_ammonia: 0.04 dimensionless; name EF_N_ammonia
  Emission factor for ammonia emissions (NH3) from the application of generic nitrogen fertilisers, according to Nemecek & Schnetzer (2011), p.18
- fraction loss soil to river: 0.2 dimensionless; name fraction_soil_Ferw
  Represents the fraction of eroded soil that reaches the river, used for calculation of phosphorus emissions through water erosion to surface water, according to Nemecek & Schnetzer (2011).
- Factor for tillage practice: 0.25 dimensionless; name Ft
  According to Table 7-4, Emmenergger et al. (2009), for 'no tillage'.

## Reference product
- mango: 1 kg; name REF_PROD; CPC 0131: Tropical and subtropical fruits; By-product classification allocatable product; pedigree (1,1,1,1,1)
  Refers to raw mango harvested from the orchards.
  production volume 1.17574e9 kg; name PV_mango_BR
    Annual production (in kg) for Brazil in 2012.
  property price 0.61643 EUR2005; name REF_PROD_price_EUR2005
    Estimated value. The price is assumed to be 80% of the price of the product "mango, conditioned" which has a price of 1.13 euros and a comment: "Literature value. Price from FAOSTAT data Producer Prices - Annual (retrieved from: http://www.fao.org/faostat/en/#data/PP, accessed 15Feb2018). Data from 2005."
  property carbon content, non-fossil 0.42; name REF_PROD_C_content_non_fossil
    biogene carbon content on a dry matter basis
  property water content 4; name REF_PROD_water_content; = REF_PROD_WWM/ REF_PROD_DM
  property water in wet mass 0.8 kg; name REF_PROD_WWM
  property dry mass 0.2 kg; name REF_PROD_DM
  property carbon content, fossil 0; name REF_PROD_C_content_fossil
    fossil carbon content on a dry matter basis
  property wet mass 1 kg; name REF_PROD_WM
  property carbon content 0.42
    carbon content on a dry matter basis (reserved; not for manual entry)
  properties: carbon allocation 0.084 kg

## Inputs from technosphere
- dolomite: 0.000402 kg; lognormal variance with pedigree 0.0046, pedigree (1,4,3,1,1)
  Dolomite used for soil pH correction, 25%CaO/17%MgO.
  properties: carbon content, fossil 0.130435, wet mass 1 kg, dry mass 1 kg, heating value, net 3.95 MJ
- gypsum, mineral: 0.0169 kg; name gypsium; lognormal variance with pedigree 0.0046, pedigree (1,4,3,1,1)
  Gypsum used for soil pH correction, 31.22% CaO
  properties: wet mass 1 kg, dry mass 1 kg
- tillage, harrowing, by offset leveling disc harrow: 1.9231e-6 ha; lognormal variance with pedigree 0.344, pedigree (5,4,3,1,1)
  Refers to land levelling, for preparing the field before the seedlings are planted.
- molybdenum trioxide: 4.88e-6 kg; name MoO3; lognormal variance with pedigree 0.0046, pedigree (1,4,3,1,1)
  Molibdenium(Mo) input from fertilisers.
  property molecular weight 143.9 g/mol; name MoO3_mol_weight
  property copper content 0.0006; name MoO3_Cu_content
  property oxygen content 0.29; name MoO3_O_content
  property sulfur content 0.0003; name MoO3_S_content
  property molybdenum content 0.62; name MoO3_Mo_content
  property iron content 0.0044; name MoO3_Fe_content
  property bismuth content 8e-5; name MoO3_Bi_content
  property lead content 0.00015; name MoO3_Pb_content
- chlorine dioxide: 2.65e-8 kg; lognormal variance with pedigree 0.0066, pedigree (3,4,3,1,1)
  Chlorine Dioxide (ClO2) used as biocide, from commercial product Tecsa Clor, label available in: http://alamosbrasil.com.br/wp-content/uploads/2015/11/TecsaClor-P%C3%B3s_Ficha-T%C3%A9cnica1.pdf
  properties: wet mass 1 kg, dry mass 1 kg
- packaging, for fertilisers: 0.0607642 kg; lognormal variance with pedigree 0.0532, pedigree (4,3,3,5,4)
  Total amount of active substance/s of fertilisers needed for the production of 'mango' is calculated to be circa 3.04E-02 kg. Fertiliser/s used in this dataset is/are: 'dolomite', 'gypsum, mineral', 'lime', 'magnesium oxide', 'nitrogen fertiliser, as N', 'phosphate fertiliser, as P2O5', 'potassium fertiliser, as K2O'. The total amount of active substance/s is doubled in order to account for the packaging of the dilluted product of fertiliser/s that is/are applied. Therefore, 6.08E-02 kg of packaging for fertilisers is justified with this exchange.
  properties: dry mass 1 kg, wet mass 1 kg, price 0.0642 EUR2005, carbon content, fossil 0.825301, heating value, net 25.01 MJ
  note on carbon content, fossil: Considering a chemical formula (C2H4)n for polyethylene, carbon content-fossil is calculated to be 0.856286 kg of Carbon per kg of dry mass.
- lime: 2.01e-5 kg; lognormal variance with pedigree 0.0046, pedigree (1,4,3,1,1)
  Lime used for soil pH correction, 43.5% Ca.
  properties: dry mass 1 kg, wet mass 1 kg, carbon content, fossil 0.120005
- mango seedling, for planting: 0.000362 unit; name seedling_mango; lognormal variance with pedigree 0.0046, pedigree (1,4,3,1,1)
  In the system studied, were considered on average 376 seedlings per hectare.
  property water in wet mass 0.421965 kg; name seedling_mango_WWM
  property water content 0.73; name seedling_mango_water_content
  property wet mass 1 kg; name seedling_mango_WM
  property carbon content, non-fossil 0.439481; name seedling_mango_C_content_non_fossil
  property dry mass 0.578035 kg; name seedling_mango_DM
  property carbon content, fossil 0; name seedling_mango_C_content_fossil
- waste wood, untreated: -0.0410346 kg; name waste_wood; = (113.5*376/30/ yield_kg_ha)*-1; lognormal variance with pedigree 0.0446, pedigree (5,4,3,1,1)
  Wood from trees at the end of the orchard life (30 years). Each mango tree was about 113kg at their 6th year of life according to experimental data.
  production volume 4.82458e7 kg; = PV_mango_BR * waste_wood/ REF_PROD
    Calculated from production volume of reference product using the relative outputs.
  property price 0 EUR2005; name waste_wood_price_EUR2005
  properties: heating value, net 13.99 MJ, water content 0.25, dry mass 0.8 kg, wet mass 1 kg, carbon content, non-fossil 0.4788
  note on heating value, net: Value taken from the general comment of the treatment dataset.
- land use change, perennial crop: 1.73077e-6 ha; = 1.73076923060281E-06*LUC_crop_specific+(4.78376375172126E-06*(1-LUC_crop_specific))
  Calculated value. Land use change (LUC) from Novaes et al. (2017).
- transport, tractor and trailer, agricultural: 0.001 metric ton*km; lognormal variance with pedigree 0.306, pedigree (3,4,3,1,1)
  Tractor and trailer used for transportation of the harvested mango within the farm borders - harvesting is not a mechanised operation in this system, it is only considered the work of a tractor with trailer. The area for cultivation of mango was about 400ha at the farm visited; considering that the plantation is shaped as a square (2000mx 2000m), it was assumed that the mangoes where brought to the center of the square, thus crossing a path of 1km.
- sulfur: 0.00148 kg; lognormal variance with pedigree 0.0046, pedigree (1,4,3,1,1)
  Sulfur input from fertilisers.
  properties: dry mass 1 kg, wet mass 1 kg
- planting with starter fertiliser, by no till planter: 9.62e-7 ha; lognormal variance with pedigree 0.344, pedigree (5,4,3,1,1)
  Refers to application of fertilisers and planting at the establishment of orchard.
- cobalt: 8.4e-6 kg; lognormal variance with pedigree 0.0046, pedigree (1,4,3,1,1)
  Cobalt(Co) input from fertilisers.
  properties: wet mass 1 kg, dry mass 1 kg
- tillage, subsoiling, by subsoiler plow: 9.6154e-7 ha; lognormal variance with pedigree 0.344, pedigree (5,4,3,1,1)
  Refers to the operation of subsoiling, for preparing the field before the seedlings are planted.
- manganese concentrate: 0.000107 kg; lognormal variance with pedigree 0.0046, pedigree (1,4,3,1,1)
  Manganese(Mn) input from fertilisers.
  properties: dry mass 1 kg, wet mass 1 kg
- inorganic nitrogen fertiliser, as N: 0.00284 kg; name N; lognormal variance with pedigree 0.0046, pedigree (1,4,3,1,1)
  Amount of nitrogen fertilisers from several sources, in kg of nitrogen.
  properties: wet mass 1 kg, dry mass 1 kg
- application of plant protection product, by field sprayer: 0.000346 ha; name application_pesticides; lognormal variance with pedigree 0.3046, pedigree (2,4,3,1,1)
  Application of plant protection product occurs monthly during all 30 years, thus 12 times per year.
- magnesium oxide: 0.00227 kg; lognormal variance with pedigree 0.0046, pedigree (1,4,3,1,1)
  Magnesium(Mg) input from fertilisers.
  properties: dry mass 1 kg, wet mass 1 kg
- phenol: 1.52e-6 kg; lognormal variance with pedigree 0.0066, pedigree (3,4,3,1,1)
  Additive "Agral" as Nonyl phenoxy poly (ethyleneoxy) ethanol, agricultural chemical, non-pesticidal, from the chemical group alkylphenols.(http://www.adapar.pr.gov.br/arquivos/File/defis/DFI/Bulas/Outros/AGRAL)
  properties: dry mass 1 kg, wet mass 1 kg, carbon content, fossil 0.765957, heating value, net 30.93 MJ
- inorganic potassium fertiliser, as K2O: 0.00592 kg; name K2O; lognormal variance with pedigree 0.0046, pedigree (1,4,3,1,1)
  Amount of potassium fertiliser, from different sources, as kg of K2O.
  properties: wet mass 1 kg, dry mass 1 kg
- mancozeb: 1.33e-5 kg; lognormal variance with pedigree 0.0046, pedigree (1,4,3,1,1)
  Input of Mancozeb comes from commercial fungicides Dithane NT (http://www.adapar.pr.gov.br/arquivos/File/defis/DFI/Bulas/Fungicidas/dithane.pdf) and Manzate WG (http://www.dupont.com.br/content/dam/assets/products-and-services/crop-protection/documents/Manzate%20WG%20Bula2.pdf)
  properties: dry mass 1 kg, wet mass 1 kg, carbon content, fossil 0.17759
- inorganic phosphorus fertiliser, as P2O5: 0.00203 kg; name P2O5; lognormal variance with pedigree 0.0046, pedigree (1,4,3,1,1)
  Amount of phosphate fertiliser, from several sources, in kg of P2O5.
  properties: dry mass 1 kg, wet mass 1 kg
- ethoxylated alcohol (AE>20): 4.86e-6 kg; lognormal variance with pedigree 0.0066, pedigree (3,4,3,1,1)
  Most similar product to Polyoxyethylene alkylphenol ether available in the database, which is a surfactant and non-pesticidal; in this system, it was used the product Ilharaguen-S, label available from: http://www.adapar.pr.gov.br/arquivos/File/defis/DFI/Bulas/Outros/iharaguens.pdf
  properties: heating value, net 29.26 MJ
- weed control, by brush cutter, pasture: 0.000173 ha; lognormal variance with pedigree 0.344, pedigree (5,4,3,1,1)
  Refers to Pruning, operation that is not yet available in the database. Pruning occurs every two months thus 6 times per year.
- harvesting, forestry harvester: 9.61538e-6 hour; = 10/30/ yield_kg_ha; lognormal variance with pedigree 0.306, pedigree (3,4,3,1,1)
  Refers to the deflorestation of native vegetation that occurs in the 1st year.
- packaging, for pesticides: 0.00421973 kg; lognormal variance with pedigree 0.0532, pedigree (4,3,3,5,4)
  Total amount of active substance/s of pesticides needed for the production of mango is calculated to be circa 2.11E-03 kg. Pesticide/s used in this dataset is/are: 'chlorine dioxide', 'cobalt', 'ethoxylated alcohol (AE>20)', 'mancozeb', 'manganese concentrate', 'molybdenum trioxide', 'pesticide, unspecified', 'phenol', 'polydimethylsiloxane', 'sulfur', 'zinc oxide'. The total amount of active substance/s is doubled in order to account for the packaging of the dilluted product of pesticide/s that is/are applied. Therefore, 4.22E-03 kg of packaging for pesticides is justified with this exchange.
  properties: dry mass 1 kg, wet mass 1 kg, price 0.0642 EUR2005, carbon content, fossil 0.85714, heating value, net 25.97 MJ
- tap water: 6.92e-5 kg; name water_dilution; = 0.2* application_pesticides; lognormal variance with pedigree 0.0447, pedigree (5,4,3,3,1)
  Water is used to dilute pesticides in a rate of 200 liters per application per ha.
  properties: wet mass 1 kg, dry mass 0.000337476 kg, carbon content, fossil 0.00178991, water content 2962.17
  note on carbon content, fossil: Bicarbonate content is 2.93 mol/m3. CO2 content is 0.1 mol/m3 (ecoinvent v2.2 report 8, Tab 93.1).
- irrigation: 0.368 m3; lognormal variance with pedigree 0.0046, pedigree (1,4,3,1,1)
  Water used for irrigation in m3.
  properties: dry mass 0.11 kg, wet mass 1000 kg, water content 9089.91
- pesticide, unspecified: 0.000208 kg; lognormal variance with pedigree 0.0046, pedigree (1,4,3,1,1)
  Input of several insecticides, fungicides, acaricides, etc. The amount represents the sum of all quantities of active substances, which are specified at emission level, except for Mancozeb - that is accounted as an especific input.
  properties: wet mass 1 kg, carbon content, fossil 0.486978, dry mass 1 kg
- zinc oxide: 0.000281 kg; lognormal variance with pedigree 0.0046, pedigree (1,4,3,1,1)
  Zinc(Zn) input from fertilisers.
  properties: wet mass 1 kg, dry mass 1 kg
- polydimethylsiloxane: 8.8e-7 kg; lognormal variance with pedigree 0.0066, pedigree (3,4,3,1,1)
  Most similar product to Polyester-polymethyl siloxane copolymer in the database, which is a surfactant and non-pesticidal additive; in this system, it was used Break Thru, label available from: http://www.adapar.pr.gov.br/arquivos/File/defis/DFI/Bulas/Outros/BREAK-THRU.pdf
  properties: heating value, net 19.62 MJ

## Inputs from nature
- Carbon dioxide, in air [natural resource, in air]: 0.307663 kg; = (REF_PROD_DM* REF_PROD_C_content_non_fossil* REF_PROD- seedling_mango_C_content_non_fossil* seedling_mango_DM* seedling_mango)*44/12; lognormal variance with pedigree 0.0066, pedigree (3,4,3,1,1)
  Carbon absorbed from the air by mango tree. Values of carbon content in mango and mango seedling are from laboratory data.
- Energy, gross calorific value, in biomass [natural resource, biotic]: 2.5 MJ; lognormal variance with pedigree 0.0446, pedigree (5,4,3,1,1)
  Energy containing in mango fruit biomass. Source: http://www.lose-weight-with-us.com/calories-in-a-mango.html
- Occupation, permanent crop, irrigated [natural resource, land]: 0.288462 m2*year; = 10000/ yield_kg_ha; lognormal variance with pedigree 0.0066, pedigree (2,4,3,1,1)
  Area of 1 hectare occupied by mango orchard.
- Transformation, from permanent crop, irrigated [natural resource, land]: 0.0144231 m2; = (10000/ yield_kg_ha)/20; lognormal variance with pedigree 0.0146, pedigree (2,4,3,5,1)
  Total area transformed from mango cultivated area (1ha/yield(kg/ha)).
- Transformation, to permanent crop, irrigated [natural resource, land]: 0.0144231 m2; = (10000/ yield_kg_ha)/20; lognormal variance with pedigree 0.0146, pedigree (2,4,3,5,1)
  Total area transformed to mango cultivated area (1ha/yield(kg/ha)). Triangular uncertainty and Pedigree were filled according to values by Novaes et al. (2017).

## Emissions to nature
- Lead [water, surface water]: 6.01e-9 kg; lognormal variance with pedigree 0.096, pedigree (3,4,3,1,1)
  Lead (Pb) emission to river through soil erosion mechanism due to usage of fertilisers and atmospheric deposition, estimated according to Nemecek & Schnetzer (2011).
- Nickel [soil, agricultural]: 1.52e-7 kg; lognormal variance with pedigree 0.046, pedigree (3,4,3,1,1)
  Nickel(Zn) emission to agricultural soil due to the use of fertilisers and atmospheric deposition, estimated according to Nemecek & Schnetzer (2011).
- Nitrate [water, ground-]: 0.0052246 kg; name emission_nitrate; = (62/14)*(21.37+(precipitation_irrigation/(Clay_content* L))*((0.0037* N_from_fertilizers)+(0.0000601*Norg_soil)-(0.00362*Nuptake_plant)))*(1/ yield_kg_ha); lognormal variance with pedigree 0.046, pedigree (3,4,3,1,1)
  Nitrate Leaching to Ground Water according to the SQCB-NO3 model (Emmeneger et al, 2009) in kg NO3-/kg mango.
- Cadmium, ion [water, surface water]: 2.71e-10 kg; lognormal variance with pedigree 0.096, pedigree (3,4,3,1,1)
  Cadmium (Cd) emission to river through soil erosion mechanism due to usage of fertilisers and atmospheric deposition, estimated according to Nemecek & Schnetzer (2011).
- Azoxystrobin [soil, agricultural]: 5.62e-6 kg; lognormal variance with pedigree 0.077, pedigree (5,4,3,1,1)
  It is assumed that all pesticides used are emitted to soil. Input of Azoxystrobin comes from commercial fungicides Amstar Top (http://www.herbiguide.com.au/MSDS/MAZOXDIFE_63898-0310.PD) and Amstar WG (http://www.herbiguide.com.au/Labels/AZOX250_50519_0703.PDF)
- Chromium [soil, agricultural]: 7.19e-7 kg; lognormal variance with pedigree 0.046, pedigree (3,4,3,1,1)
  Chromium(Cr) emission to agricultural soil due to the use of fertilisers and atmospheric deposition, estimated according to Nemecek & Schnetzer (2011).
- Tebuconazole [soil, agricultural]: 8.16e-6 kg; lognormal variance with pedigree 0.077, pedigree (5,4,3,1,1)
  It is assumed that all pesticides used are emitted to soil. Input of Tebuconazole comes from commercial fungicides Folicur 200EC (http://www.adapar.pr.gov.br/arquivos/File/defis/DFI/Bulas/Fungicidas/folicur200ec.pdf) and Nativo (http://www.adapar.pr.gov.br/arquivos/File/defis/DFI/Bulas/Fungicidas/nativo.pdf)
- Zinc, ion [water, surface water]: 3.1e-8 kg; lognormal variance with pedigree 0.096, pedigree (3,4,3,1,1)
  Zinc (Zn) emission to river through soil erosion mechanism due to usage of fertilisers and atmospheric deposition, estimated according to Nemecek & Schnetzer (2011).
- Lead [soil, agricultural]: 3.44e-8 kg; lognormal variance with pedigree 0.046, pedigree (3,4,3,1,1)
  Lead(Pb) emission to agricultural soil due to the use of fertilisers and atmospheric deposition, estimated according to Nemecek & Schnetzer (2011).
- Indoxacarb [soil, agricultural]: 9.12e-7 kg; lognormal variance with pedigree 0.077, pedigree (5,4,3,1,1)
  It is assumed that all pesticides used are emitted to soil. Input of Indoxacarb comes from commercial insecticide Rumo WG (http://www.dupont.co.uk/content/dam/dupont/products-and-services/crop-protection/documents/en_gb/Rumo%202016%20product%20guide.pdf)
- Copper, ion [water, ground-]: 8.59e-8 kg; lognormal variance with pedigree 0.096, pedigree (3,4,3,1,1)
  Copper(Cu) emission to groundwater through soil leaching due to the use of fertilisers and atmospheric deposition, estimated according to Nemecek & Schnetzer (2011).
- Trifloxystrobin [soil, agricultural]: 8.07e-7 kg; lognormal variance with pedigree 0.077, pedigree (5,4,3,1,1)
  It is assumed that all pesticides used are emitted to soil. Input of Trifloxystrobin from commercial fungicide Nativo (http://www.adapar.pr.gov.br/arquivos/File/defis/DFI/Bulas/Fungicidas/nativo.pdf)
- Phosphate [water, surface water]: 0 kg
  Disregard the loss of P per runoff to surface waters, since P does not dissolve in soil water under Brazilian conditions, according to Novais & Smyth, 1999. See comment on phosphate emissions to groundwater.
- Carbon dioxide, fossil [air, unspecified]: 0.00195611 kg; = urea_as_N*1.570*(1/ yield_kg_ha)+ dolomite*0.13+ lime*0.12; lognormal variance with pedigree 0.0066, pedigree (3,4,3,1,1)
  Carbon dioxide releases from urea application, according to IPCC (2006) and lime application, according to Nemecek & Schnetzer (2011).
- Phosphorus [water, surface water]: 1.27986e-6 kg; = ( soil_loss*1000* Phosphorus_Pcr* factor_Fr* fraction_soil_Ferw)*(1/ yield_kg_ha); lognormal variance with pedigree 0.046, pedigree (3,4,3,1,1)
  phosphorus releases to river through soil erosion, according to Nemecek & Schnetzer (2011) and Emmenegger et al. (2009)
- Copper, ion [water, surface water]: 2.24e-8 kg; lognormal variance with pedigree 0.096, pedigree (3,4,3,1,1)
  Copper (Cu) emission to river through soil erosion mechanism due to usage of fertilisers and atmospheric deposition, estimated according to Nemecek & Schnetzer (2011).
- Phosphate [water, ground-]: 0 kg
  Phosphorus leaching will be disregarded in the inventories because of its low mobility in Brazilian soils. 'Phosphorus, scarce in most Brazilian soils, presents mechanisms for fixation, transforming, with restricted irreversibility, into Non-Labile (non-leachable) P. In more tropical temperate soils, this fixation is even greater and the passage to the non-labile form is faster (Novais & Smyth, 1999). According to Novais & Smyth (1999), the total P content of soils varies between 200 and 3,000 mg / kg P and less than 0.1% of this total is in the form of P-Solution. The current low values of P-labile in Brazilian soils limit the desorption of P and its mobility. Thus, problems caused by leaching, such as eutrophication of aquatic environments, are not observed in Brazil '(Novais & Smyth, 1999).
- Pyraclostrobin (prop) [soil, agricultural]: 2.82e-6 kg; lognormal variance with pedigree 0.077, pedigree (5,4,3,1,1)
  It is assumed that all pesticides used are emitted to soil. Input of Pyraclostrobin comes from commercial fungicide Comet (http://www.agro.basf.com.br/agr/ms/pt_BR/function/conversions:/publish/content/APBrazil/solutions/fungicides/Bulas/Comet_v2.pdf)
- Lead [water, ground-]: 3.96e-9 kg; lognormal variance with pedigree 0.096, pedigree (3,4,3,1,1)
  Lead(Pb) emission to groundwater through soil leaching due to the use of fertilisers and atmospheric deposition, estimated according to Nemecek & Schnetzer (2011).
- Water [water, ground-]: 0.103059 m3; = (irrigation+ water_dilution)*(1- fraction_irrigation_to_air)* fraction_irrigation_to_ground; lognormal variance with pedigree 0.046625, pedigree (3,4,3,2,4)
  Water percolation due to irrigation, parameters taken from: Literature value (Siebert, 2010) (Vionnet, S., Quantis Water Database - Technical Report, 2012).
- Difenoconazole [soil, agricultural]: 5.08e-6 kg; lognormal variance with pedigree 0.077, pedigree (5,4,3,1,1)
  It is assumed that all pesticides used are emitted to soil. Input of Difeconazole comes from commercial fungicides Amstar Top (http://www.herbiguide.com.au/MSDS/MAZOXDIFE_63898-0310.PDF), Flare (http://www.adapar.pr.gov.br/arquivos/File/defis/DFI/Bulas/Fungicidas/flare.pdf) and Score (https://www.syngenta.co.ke/product/crop-protection/fungicides/score-250-sc).
- Zinc, ion [water, ground-]: 4.42e-7 kg; lognormal variance with pedigree 0.096, pedigree (3,4,3,1,1)
  Zinc(Zn) emission to groundwater through soil leaching due to the use of fertilisers and atmospheric deposition, estimated according to Nemecek & Schnetzer (2011).
- Ammonia [air, unspecified]: 0.000282467 kg; name emission_ammonia; = (NH4NO3_as_N* EF_amm_ammonia+ urea_as_N * EF_urea_ammonia + N_generic *EF_N_ammonia)*17/14/ yield_kg_ha; lognormal variance with pedigree 0.014, pedigree (3,4,3,1,1)
  Ammonia releases to air, according to the AGRAMMON model: 'Plant production' (Nemecek & Schnetzer, 2011).
- Cadmium [soil, agricultural]: 8.7e-8 kg; lognormal variance with pedigree 0.046, pedigree (3,4,3,1,1)
  Cadmium(Cd) emission to agricultural soil due to the use of fertilisers and atmospheric deposition, estimated according to Nemecek & Schnetzer (2011).
- Pesticides, unspecified [soil, agricultural]: 0.000149 kg; lognormal variance with pedigree 0.074, pedigree (5,4,3,1,1)
  Refers to the sum of the following active ingredients: carbosulfan, sulfur, hexythiazox, paclobutrazol, and thiabendazole; these have not been found in the database as specific emitted substances. According to ecoinvent, it is assumed that all pesticides emissions go to the compartment soil.
- Zinc [soil, agricultural]: 8.32e-7 kg; lognormal variance with pedigree 0.056, pedigree (3,4,3,1,1)
  Zinc (Zn) emission to agricultural soil due to the use of fertilisers and atmospheric deposition, estimated according to Nemecek & Schnetzer (2011).
- Abamectin [soil, agricultural]: 1.21e-7 kg; lognormal variance with pedigree 0.077, pedigree (5,4,3,1,1)
  It is assumed that all pesticides used are emitted to soil. Input of Abamectin comes from commercial acaricide and insecticide Vertimec 18 EC (http://www.adapar.pr.gov.br/arquivos/File/defis/DFI/Bulas/Inseticidas/vertimec18ec.pdf)
- Chloride [soil, agricultural]: 2.65e-8 kg; lognormal variance with pedigree 0.084, pedigree (5,4,3,1,1)
  It is assumed that all pesticides used are emitted to soil. This emission comes from the use of Chlorine Dioxide (ClO2) as biocide, input comes from commercial product Tecsa Clor, label available in: http://alamosbrasil.com.br/wp-content/uploads/2015/11/TecsaClor-P%C3%B3s_Ficha-T%C3%A9cnica1.pdf
- Chromium, ion [water, surface water]: 3.01e-8 kg; lognormal variance with pedigree 0.096, pedigree (3,4,3,1,1)
  Chromium (Cr) emission to river through soil erosion mechanism due to usage of fertilisers and atmospheric deposition, estimated according to Nemecek & Schnetzer (2011).
- Water [air, unspecified]: 0.239245 m3; name evapotranspiration; = (irrigation+ water_dilution)* fraction_irrigation_to_air; lognormal variance with pedigree 0.046625, pedigree (3,4,3,2,4)
  Water release to air caused by evapotranspiration of mango trees in Brazil; parameters taken from: Literature value (Siebert, 2010) (Vionnet, S., Quantis Water Database - Technical Report, 2012).
- Cadmium, ion [water, ground-]: 1.21e-9 kg; lognormal variance with pedigree 0.096, pedigree (3,4,3,1,1)
  Cadmium (Cd) emission to groundwater through soil leaching due to the use of fertilisers and atmospheric deposition, estimated according to Nemecek & Schnetzer (2011).
- Nitrogen oxides [air, unspecified]: 0.000111977 kg; = 0.012* N*46/14; lognormal variance with pedigree 0.036, pedigree (3,4,3,1,1)
  Nitrogen oxides (NOx) releases to air according to Nemecek et al. (2015) in kg NO2.
- Dinitrogen monoxide [air, unspecified]: 6.8699e-5 kg; = 44/28*((0.01*( N_from_fertilizers+ nitrogen_Ncr)*(1/ yield_kg_ha)+(0.01*14/17* emission_ammonia)+0.0075*14/62* emission_nitrate)); lognormal variance with pedigree 0.036, pedigree (3,4,3,1,1)
  According to Nemecek & Schnetzer (2011) and IPCC (2006).
- Thiophanate-methyl [soil, agricultural]: 2.79e-5 kg; lognormal variance with pedigree 0.077, pedigree (5,4,3,1,1)
  It is assumed that all pesticides used are emitted to soil. Input of thiophanat-methyl from commercial fungicides Cercobin 500 SC (https://www.extrapratica.com.br/BR_Docs/Portuguese/Instructions/1014checked.pdf), Mofotil (http://www.adapar.pr.gov.br/arquivos/File/defis/DFI/Bulas/Fungicidas/mofotil_.pdf) and Pomme (http://www.adapar.pr.gov.br/arquivos/File/defis/DFI/Bulas/Fungicidas/pomme.pdf)
- Chromium, ion [water, ground-]: 5.68e-7 kg; lognormal variance with pedigree 0.096, pedigree (3,4,3,1,1)
  Chromium(Cr) emission to groundwater through soil leaching due to the use of fertilisers and atmospheric deposition, estimated according to Nemecek & Schnetzer (2011).
- Nickel, ion [water, surface water]: 1.93e-8 kg; lognormal variance with pedigree 0.096, pedigree (3,4,3,1,1)
  Nickel (Ni) emission to river through soil erosion mechanism due to usage of fertilisers and atmospheric deposition, estimated according to Nemecek & Schnetzer (2011).
- Water [water, surface water]: 0.0257648 m3; = (irrigation+ water_dilution)*(1- fraction_irrigation_to_air)* fraction_irrigation_to_river; lognormal variance with pedigree 0.046625, pedigree (3,4,3,2,4)
  Water release to surface water, parameters taken from: Literature value (Siebert, 2010) (Vionnet, S., Quantis Water Database - Technical Report, 2012).
- Copper [soil, agricultural]: 1.84e-13 kg; lognormal variance with pedigree 0.25, pedigree (5,5,5,5,5)
  Copper (Cu) emission to agricultural soil due to the use of fertilisers and atmospheric deposition, estimated according to Nemecek & Schnetzer (2011).
- Nickel [water, ground-]: 0 kg
  Nickel (Ni) emission to groundwater through soil leaching due to the use of fertilisers and atmospheric deposition, estimated according to Nemecek & Schnetzer (2011).
- Spinosad [soil, agricultural]: 4.21e-9 kg; lognormal variance with pedigree 0.077, pedigree (5,4,3,1,1)
  It is assumed that all pesticides used are emitted to soil. Input of Spinosad from commercial insecticide Success 0.02 CB (http://www.adapar.pr.gov.br/arquivos/File/defis/DFI/Bulas/Inseticidas/success_002cb.pdf)
- Ethephon [soil, agricultural]: 7.41e-6 kg; lognormal variance with pedigree 0.077, pedigree (5,4,3,1,1)
  It is assumed that all pesticides used are emitted to soil. Input of Ethephon, from commercial growth regulator Ethrel (http://www.titanag.com.au/Products/Labels/Ethephon_720_label.pdf)
- Mancozeb [soil, agricultural]: 1.33e-5 kg; lognormal variance with pedigree 0.077, pedigree (5,4,3,1,1)
  It is assumed that all pesticides used are emitted to soil. Input of Mancozeb comes from commercial fungicides Dithane NT (http://www.adapar.pr.gov.br/arquivos/File/defis/DFI/Bulas/Fungicidas/dithane.pdf) and Manzate WG (http://www.dupont.com.br/content/dam/assets/products-and-services/crop-protection/documents/Manzate%20WG%20Bula2.pdf)

## Sampling procedure
Most of data for agricultural inputs and operations was provided by local producers; Relevant experts were also consulted. Some data regarding soil in the region and seedlings was provided by Embrapa Semiarido (CNPTSA). Emissions from the agricultural process are estimated according to Nemecek and Schnetzer (2011) and Emmeneger et al. (2009)

## Extrapolations
This dataset has been extrapolated from year 2016 to the year of the calculation (2021). The uncertainty has been adjusted accordingly.

## Review by Jens Lansche 2017-11-12
All review comments considered.
