# treatment of waste natural gas, sour, burned in production flare

Dataset: EcoSpold 2, unit process
Geography: GLO
Time period: 1999-01-01 to 2021-12-31
Technology level: current
Classification: EcoSpold01Categories: natural gas/production
Classification: ISIC rev.4 ecoinvent: 0620:Extraction of natural gas
Tags: Treatment; ConvertedDataset
Scenario: Business-as-Usual
System model: Allocation, cut-off by classification
Share of production covered: 100 %
Generated by: Mireille Faist Emmenegger (obsolete)
Published in: Faist Emmenegger, M. 2007
Database: ecoinvent
isCopyrightProtected: true
accessRestrictedTo: 1

## General comment
Burning of sour natural gas in production flare.
[This dataset was already contained in the ecoinvent database version 2. It was not individually updated during the transfer to ecoinvent version 3. Life Cycle Impact Assessment results may still have changed, as they are affected by changes in the supply chain, i.e. in other datasets. This dataset was generated following the ecoinvent quality guidelines for version 2. It may have been subject to central changes described in the ecoinvent version 3 change report (http://www.ecoinvent.org/database/ecoinvent-version-3/reports-of-changes/), and the results of the central updates were reviewed extensively. The changes added e.g. consistent water flows and other information throughout the database. The documentation of this dataset can be found in the ecoinvent reports of version 2, which are still available via the ecoinvent website. The change report linked above covers all central changes that were made during the conversion process.]

## Included activities end
Emissions of (sour) gas flaring

## Geography
Data is based on Norwegian environmental report.

## Technology
Data is based on the Norwegian data (offshore combined production). No information on technology.

## Time period
The figures are an average for the data of 1999 and 2000, except for the NMVOC emissions, where no data for 2000 was available. SOx emissions are taken out of Frischknecht et al. 1996 (source Nr. 83 (?)).

## Reference product
- waste natural gas, sour: -1 MJ; CPC 39990: Other wastes n.e.c.; By-product classification Waste
  EcoSpold01Location=GLO
  production volume 7.1796e8 MJ
    190E6 Sm3 o. e. oil and condensate, 49.6E6 Sm3 o.e. natural gas
    Total flared and vented: 3779 billion cu feet in 2005 (EIA International Energy Statistics http://tonto.eia.doe.gov/cfapps/ipdbproject/iedindex3.cfm?tid=3&pid=43&aid=1&cid=ww,&syid=2005&eyid=2005&unit=BCF); 1 m3 = 35.314 cubic feet; subtracted 18.463 billion m3 as vented (see dataset 'natural gas, vented'); Global proportion of sour gas 30% and sweet gas 70% (on flaring and venting in general, see also: Gerner F, Svensson B, Djumena S. (2004). Gas flaring and venting. A regulatory framework and incentives for gas utilization. Public policy for the private sector. Note No. 279. World Bank. http://rru.worldbank.org/documents/publicpolicyjournal/279gerner.pdf); 1 m3 = 37 MJ
  property price 0 EUR2005
    Waste products are assigned a price of zero as they are assumed to require further treatment.
  property carbon content, fossil 0.571226
    Calculated out of data in Tab 3.4, ecoinvent v2.2 report 6_V.
  property carbon content 0.571226
    carbon content on a dry matter basis (reserved; not for manual entry)
  properties: dry mass 0.027027 kg, carbon content, non-fossil 0, wet mass 0.027027 kg, water content 0, water in wet mass 0 kg, carbon allocation 0.0154385 kg

## Inputs from nature
- Gas, natural, in ground [natural resource, in ground]: 0.0278 m3; lognormal variance with pedigree 0.0407, pedigree (1,3,5,3,1)
  Environmental report for Norway.
  Uncertainty: environmental report for Norway.

## Emissions to nature
- Methane, fossil [air, non-urban air or from high stacks]: 6.97e-6 kg; lognormal variance with pedigree 0.0807, pedigree (1,3,5,3,1)
  Environmental report for Norway.
  Uncertainty: environmental report for Norway.
- Sulfur dioxide [air, non-urban air or from high stacks]: 0.00486 kg; lognormal variance with pedigree 0.0587, pedigree (4,3,5,3,1)
  Data derived from stochiometry
  Uncertainty: data derived from stochiometry
- Mercury [air, non-urban air or from high stacks]: 5.56e-9 kg; lognormal variance with pedigree 0.1161, pedigree (4,1,5,3,3)
  Data calculated on the basis of gas composition
  Uncertainty: data calculated on the basis of gas composition
- Particulates, < 2.5 um [air, non-urban air or from high stacks]: 5.46e-6 kg; lognormal variance with pedigree 0.1726, pedigree (2,4,5,1,1)
  Literature data
  Uncertainty: Literature data
- NMVOC, non-methane volatile organic compounds, unspecified origin [air, non-urban air or from high stacks]: 8.28e-7 kg; lognormal variance with pedigree 0.1607, pedigree (1,3,5,3,1)
  Environmental report for Norway.
  Uncertainty: environmental report for Norway.
- Radon-222 [air, non-urban air or from high stacks]: 0.0111 kBq; lognormal variance with pedigree 0.3761, pedigree (4,1,5,3,3)
  (same comment as for Mercury)
- Carbon dioxide, fossil [air, non-urban air or from high stacks]: 0.0681 kg; lognormal variance with pedigree 0.0407, pedigree (1,3,5,3,1)
  Environmental report for Norway.
  Uncertainty: environmental report for Norway.
- Carbon monoxide, fossil [air, non-urban air or from high stacks]: 1.5e-5 kg; lognormal variance with pedigree 0.7041, pedigree (3,4,5,3,1)
  Literature data
  Uncertainty: Literature data
- Nitrogen oxides [air, non-urban air or from high stacks]: 0.000337 kg; lognormal variance with pedigree 0.0807, pedigree (1,3,5,3,1)
  Environmental report for Norway.
  Uncertainty: environmental report for Norway.

## Sampling procedure
Data is based on the annual reports on emissions and discharges submitted by each individual operator. The emissions and discharges are estimated according to guidelines given by the Norwegian authorities and OLF (Norwegian Oil Industry Association).

## Extrapolations
This dataset has been extrapolated from year 2000 to the year of the calculation (2021). The uncertainty has been adjusted accordingly.

## Review by Michael Spielmann (obsolete) 2003-07-23
Passed.
