# treatment of used powertrain for electric passenger car, manual dismantling

Dataset: EcoSpold 2, unit process
Geography: GLO
Time period: 2005-01-01 to 2021-12-31
Technology level: current
Classification: EcoSpold01Categories: waste management/recycling
Classification: ISIC rev.4 ecoinvent: 3830:Materials recovery
Tags: Treatment
Scenario: Business-as-Usual
System model: Allocation, cut-off by classification
Share of production covered: 100 %
Generated by: Andrea Del Duce
Published in: Hischier R. 2007
Database: ecoinvent
isCopyrightProtected: true
accessRestrictedTo: 1

## General comment
This dataset describes the treatment of a used electric drivetrain of an electric passenger car. The original dataset has been developed for a 100kW drivetrain comprising an electric motor (53kg), a converter (4.5kg), an inverter (9.5kg), a power distribution unit (3.9kg), a charger and cables (3m). First, the drivetrain is manually dismantled to recover all large metal scrap, especially from the electric motror and from the cases of the electronic devices. The scrap steel, copper and aluminium directly recovered from the components is sent to the respective scrap recycling facilities, while the remaining electronics scrap is sent to a smelter facility. Information on the materialisation of the dismatled components are in F. Habermacher "Modeling material inventories and environmental impacts of electric passenger cars", Matser Thesis, Department of Environmental Sciences, ETH Zurich, 2011.
[This dataset was already contained in the ecoinvent database version 2. It was not individually updated during the transfer to ecoinvent version 3. Life Cycle Impact Assessment results may still have changed, as they are affected by changes in the supply chain, i.e. in other datasets. This dataset was generated following the ecoinvent quality guidelines for version 2. It may have been subject to central changes described in the ecoinvent version 3 change report (http://www.ecoinvent.org/database/ecoinvent-version-3/reports-of-changes/), and the results of the central updates were reviewed extensively. The changes added e.g. consistent water flows and other information throughout the database. The documentation of this dataset can be found in the ecoinvent reports of version 2, which are still available via the ecoinvent website. The change report linked above covers all central changes that were made during the conversion process.]

## Included activities start
The dataset starts with the electric drivetrain which needs to be dismanlted already in the dismantling facility.

## Included activities end
The dataset returns the outcome scrap fractions for aluminium, steel, copper, plastic and waste electronics.

## Geography
data of situation in Switzerland

## Technology
current manual dismantling activities in Switzerland.

## Reference product
- used powertrain from electric passenger car, manual dismantling: -1 kg; name RP_amount_1; CPC 39990: Other wastes n.e.c.; By-product classification Waste
  production volume 720000 kg; name RP_PV_1
    Based on a rough estimate of a total production of about 9000 electric passenger cars.
  property price 0 EUR2005; name RP_amount_1_price_EUR2005
    Waste products are assigned a price of zero as they are assumed to require further treatment.

## By-products
- aluminium scrap, post-consumer: 0 kg; source F. Habermacher 2011; CPC 39363: Waste and scrap of aluminium; By-product classification Recyclable; pedigree (1,1,1,1,1)
  Alumium scrap from the electric motor and the cases of the different power electronic components. The details concerning the dataset of this device and of the electric drivetrain it is used with are described in Habermacher 2010.
  production volume 0 kg; = ABS(RP_PV_1 * (BP_amount_3 / RP_amount_1))
    Calculated from production volume of reference product using the relative outputs.
  property price 0.685 EUR2005
    Temporary price data. Calculated as 90% of purchasers price based on: estimated at 85% of new scrap
  property carbon content 0
    carbon content on a dry matter basis (reserved; not for manual entry)
  properties: dry mass 1 kg, carbon content, non-fossil 0, water content 0, water in wet mass 0 kg, carbon content, fossil 0, wet mass 1 kg, carbon allocation 0 kg
- copper scrap, sorted, pressed: 0 kg; source F. Habermacher 2011; CPC 39361: Waste and scrap of copper; By-product classification Recyclable; pedigree (1,1,1,1,1)
  Copper scrap from the electric motor. The details concerning the dataset of this device and of the electric drivetrain it is used with are described in Habermacher 2010.
  production volume 0 kg; = ABS(RP_PV_1 * (BP_amount_4 / RP_amount_1))
    Calculated from production volume of reference product using the relative outputs.
  property price 2.84 EUR2005
    Temporary price data. Calculated as 90% of purchasers price based on: Source: USGS Mineral Yearbook 2007, Table 1 in <http://minerals.usgs.gov/minerals/pubs/commodity/recycle/myb1-2007-recyc.pdf>
  property carbon content 0
    carbon content on a dry matter basis (reserved; not for manual entry)
  properties: water content 0, carbon content, fossil 0, dry mass 1 kg, water in wet mass 0 kg, wet mass 1 kg, carbon content, non-fossil 0, carbon allocation 0 kg
- iron scrap, unsorted: 0 kg; source F. Habermacher 2011; CPC 39310: Slag, dross, scalings and other waste from the manufacture of iron or steel; By-product classification Recyclable; pedigree (1,1,1,1,1)
  Steel scrap from the electric motor. The details concerning the dataset of this device and of the electric drivetrain it is used with are described in Habermacher 2010..
  production volume 0 kg; = ABS(RP_PV_1 * (BP_amount_1 / RP_amount_1))
    Calculated from production volume of reference product using the relative outputs.
  property price 0.149 EUR2005
    Temporary price data. Calculated as 90% of purchasers price based on: estimated at 85% of sorted scrap
  property carbon content 0
    carbon content on a dry matter basis (reserved; not for manual entry)
  properties: water in wet mass 0 kg, water content 0, wet mass 1 kg, dry mass 1 kg, carbon content, fossil 0, carbon content, non-fossil 0, carbon allocation 0 kg
- electronics scrap: 0 kg; source F. Habermacher 2011; By-product classification Recyclable; CPC 39: Wastes or scraps; pedigree (1,1,1,1,1)
  Remaining electronic scrap from the electric motor and the different power electronic components. The details concerning the dataset of this devices and of the electric drivetrain it is used with are described in Habermacher 2010.
  production volume 0 kg; = ABS(RP_PV_1 * (BP_amount_2 / RP_amount_1))
    Calculated from production volume of reference product using the relative outputs.
  property carbon content, non-fossil 0.0045566; name C_content_non_fossil
    Carbon content assumed equal with the intermediate exchange of "electronic component, passive, unspecified"
  property carbon content, fossil 0.317311; name C_content_fossil
    (same comment as for electronics scrap)
  property water content 0; name water_content
  property dry mass 1 kg; name DM
  property price 16.1 EUR2005
    Temporary price data. Calculated as 90% of purchasers price based on: 2005 import prices (total trades (USD) divided by total weight (kg) in biggest economies of the world: EU27, USA, Brasil, China, India, Japan and Russia) from UN Commodity Trade Statistics Database (http://data.un.org/Explorer.aspxDatabase [Accessed 2011.06.20]). Commodity: Waste/scrap, precious metals except pure gold/platinum
  property wet mass 1 kg; name WM
  property water in wet mass 0 kg; name WWM
  property carbon content 0.321868
    carbon content on a dry matter basis (reserved; not for manual entry)
  properties: carbon allocation 0.321868 kg

## Inputs from technosphere
- waste plastic, industrial electronics: 0 kg; name BP_amount_5; source F. Habermacher 2011; pedigree (1,1,1,1,1)
  Remaining plastic scrap from the electric motor and the different power electronic components. The details concerning the dataset of this devices and of the electric drivetrain it is used with are described in Habermacher 2010.
  production volume 0 kg
    Calculated from production volume of reference product using the relative outputs.
  property price 0 EUR2005; name BP_amount_5_price_EUR2005
  properties: water content 0.180638, wet mass 1 kg, dry mass 0.847 kg, carbon content, fossil 0.81386, heating value, net 34.78 MJ
- manual treatment facility, waste electric and electronic equipment: 1.6e-8 unit; source Hischier R. 2007; lognormal variance with pedigree 0.578, pedigree (4,5,5,5,5)
  Value taken from electronic waste manual treatment. Rough estimation of infrastructure.
  EcoSpold01Location=GLO
  Uncertainty: rough estimation of infrastructure
- aluminium scrap, post-consumer: -0.27 kg; source F. Habermacher 2011; lognormal variance with pedigree 0.0518, pedigree (2,4,5,4,3)
  (same comment as for aluminium scrap, post-consumer)
  production volume 194400 kg
  properties: dry mass 1 kg, price 0.685 EUR2005, wet mass 1 kg
- copper scrap, sorted, pressed: -0.125 kg; source F. Habermacher 2011; lognormal variance with pedigree 0.0518, pedigree (2,4,5,4,3)
  (same comment as for copper scrap, sorted, pressed)
  production volume 90000 kg
  properties: dry mass 1 kg, price 2.84 EUR2005, wet mass 1 kg
- iron scrap, unsorted: -0.411 kg; source F. Habermacher 2011; lognormal variance with pedigree 0.0518, pedigree (2,4,5,4,3)
  (same comment as for iron scrap, unsorted)
  production volume 295920 kg
  properties: wet mass 1 kg, dry mass 1 kg, price 0.149 EUR2005
- electronics scrap: -0.194 kg; source F. Habermacher 2011; lognormal variance with pedigree 0.0518, pedigree (2,4,5,4,3)
  (same comment as for electronics scrap)
  production volume 139680 kg
  properties: price 16.1 EUR2005
  note on carbon content, non-fossil: Carbon content assumed equal with the intermediate exchange of "electronic component, passive, unspecified"
- waste plastic, industrial electronics: -0.000208357, -0.0137916 kg (2 entries); source F. Habermacher 2011; lognormal variance with pedigree 0.0518, pedigree (2,4,5,4,3)
  (same comment as for waste plastic, industrial electronics)
  production volume 10080 kg

## Sampling procedure
Literature

## Extrapolations
This dataset has been extrapolated from year 2005 to the year of the calculation (2021). The uncertainty has been adjusted accordingly.
