# cement production, sulphate resistant

Dataset: EcoSpold 2, unit process
Geography: BR
Time period: 2016-01-01 to 2021-12-31
Technology level: current
Classification: ISIC rev.4 ecoinvent: 2394:Manufacture of cement, lime and plaster
Synonyms: sulphate resistant cement; CP V RS
Tags: combined production
Scenario: Business-as-Usual
System model: Allocation, cut-off by classification
Share of production covered: 70 %
Generated by: Fernanda Belizario Silva
Published in: Silva, F. B. 2017
Database: ecoinvent
isCopyrightProtected: true
accessRestrictedTo: 1

## General comment
The dataset describes the production of sulphate resistant Portland cement in Brazil (CP-V-RS). This cement type must meet the sulphate resistance requirements set by the Brazilian standard ABNT NBR 5737:1991.
Sulphate resistant cement is a hydraulic binder that meets the condition of resistance to sulphates. It is made by the grinding of Portland clinker together with one or more forms of calcium sulfate. During grinding it is allowed to add granulated blast furnace slag or pozzolanic materials and/or carbonaceous materials. Cements are considered sulphate resistant if the C3A content of clinker is equal to or lower than 8% and the content of carbonaceous additions is equal to or lower than 5% in relation to total binder mass. In the case of high early resistance cements (like in this dataset), it is allowed to add blast furnace slag or pozzolanic materials to the cement composition. Other cement types (not only CP-V) can also be classified as sulphate resistant, but they are not the object of this dataset.
Six types of Portland and blended cement types represent Brazilian production. The table below presents the different cement types and compositions according to Brazilian standards (NBR 11578:1991, NBR 5735:1991, NBR 5736:1991, NBR 5733:1991).
CP V represents 8.5% of the market according to the National Union of the Cement Industry (SNIC, 2013). 50% of it is assumed to be standard high early strength (CP-V-ARI) and the other 50% is assumed to be sulphate resistant (CP-V-RS). It is used in applications that require sulphate resistance, such as infrastructure for sewage systems (domestic or industrial), concrete elements exposed to sea water or installed in sulphate-rich soils.
This dataset contains information from clinker stockpile to cement ready to be shipped in bulk. After the clinker is cooled from the rotary kiln, it is ground in ball or roller mills to particles under 75 μm size. Then it goes to silos where it is mixed with calcium sulphate (gypsum) and SCMs. The mixed cement goes to a finishing mill and then it is stored in cement silos, ready to be shipped in bulk or packed.
This dataset uses “hard coal ash” as a proxy for fly ash and "nickel smelter slag" as a proxy for slags from metallurgical processes of nickel, copper and manganese.

## Included activities start
The activity starts with the reception of raw materials in the cement plant. In plants which are integrated with clinker production, clinker is stored in the silo after cooling in the upstream process (clinker production /BR).

## Included activities end
The activity includes the drying of raw materials, the grinding and mixing of raw materials for cement production in the cement mill (with grinding aids) and ends with cement stored in silos, ready to be shipped. Waste or particulate emission are not considered due to the lack of data. The dataset does not include packaging and administration.

## Geography
This dataset represents production of sulphate resistant, high early strength cement for Brazil.

## Technology
Current technology for cement production in Brazil.

## Time period
Time period corresponds to data collection period (2016).

## Reference product
- nickel smelter slag: 0 kg; name ni_slag; By-product classification Waste; CPC 39362: Waste and scrap of nickel
  Measured value. Weighted average of values informed by manufacturers. Secondary raw material for cement production. "Nickel smelter slag" is used as a proxy for metallurgical slags (nickel, copper, manganese). Variance of log-transformed data = 0,159
  production volume 0 kg
    Calculated from production volume of reference product.
  property heating value, net 0 MJ
    Non combustible products are assumed to have an LHV equal to zero (0).
  property price 0 EUR2005; name ni_slag_price_EUR2005
    Waste products are assigned a price of zero as they are assumed to require further treatment.
  property carbon content 0.00345
    carbon content on a dry matter basis (reserved; not for manual entry)
  properties: wet mass 1 kg, carbon content, fossil 0.00345, dry mass 1 kg, water in wet mass 0 kg, carbon content, non-fossil 0, water content 0, carbon allocation 0.00345 kg
- cement, sulphate resistant: 1 kg; name cement; CPC 37440: Portland cement, aluminous cement, slag cement and similar hydraulic cements, except in the form of clinkers; By-product classification allocatable product
  Cement’s bulk density ranges from 2,8 g/cm³ to 3,2 g/cm³.
  production volume 2.44617e9 kg; name APV_cement
    The share of CP-V (8,5%) in the market was applied to the total cement production in 2013, divided equally between CP-V-ARI (4,25%) and CP-V-RS (4,25%). Data provided by SNIC.
  property price 0.0615 EUR2005; name cement_price_EUR2005
    2005 import and export prices (total trades (USD) divided by total weight (kg) in China, India, USA, Japan, Russia and Europe, major producers and consumers (http://www.cementchina.net/freport/showfre.asp?id=749) from UN Commodity Trade Statistics Database (http://data.un.org/Explorer.aspxDatabase [Accessed 2 July 2010]). Commodity: Cement (portland, aluminious, slag or hydraulic)
  property carbon content 0
    carbon content on a dry matter basis (reserved; not for manual entry)
  properties: wet mass 1 kg, water in wet mass 0 kg, water content 0, carbon content, fossil 0, dry mass 1 kg, carbon content, non-fossil 0, carbon allocation 0 kg
- hard coal ash: 0 kg; name flyash; By-product classification Waste; CPC 39: Wastes or scraps
  Measured value. Weighted average of values informed by manufacturers. Secondary raw material for cement production. "Hard coal ash" is used as a proxy for fly ash. Variance of log-transformed data = 0,464.
  production volume 0 kg
    Calculated from production volume of reference product.
  property price 0 EUR2005; name flyash_price_EUR2005
    (same comment as for nickel smelter slag)
  property carbon content 0
    carbon content on a dry matter basis (reserved; not for manual entry)
  properties: dry mass 1 kg, wet mass 1 kg, water content 0, carbon content, non-fossil 0, water in wet mass 0 kg, carbon content, fossil 0, carbon allocation 0 kg

## Inputs from technosphere
- cement factory: 2.73e-11 unit; = 2,73e-11*cement; source Kellenberger D. 2007; lognormal variance with pedigree 0.32, pedigree (3,5,4,5,1)
  Literature value from the dataset cement production, Portland /CH (accessed 20170810)
  Uncertainty: V
- heat, district or industrial, natural gas: 0.00503 MJ; = 5,03e-3*cement; lognormal variance with pedigree 3.0997, pedigree (2,2,3,1,1)
  Measured value. Weighted average of values informed by manufacturers. Heat for drying of raw materials.
  Uncertainty: B
  properties: heating value, net 1 MJ
- heat, district or industrial, other than natural gas: 0.0155 MJ; = 1,55e-2*cement; lognormal variance with pedigree 2.2247, pedigree (2,2,3,1,1)
  (same comment as for heat, district or industrial, natural gas)
  properties: corresponding fuel use, propane, furnace >100kW 1.05263 MJ, heating value, net 1 MJ
  note on corresponding fuel use, propane, furnace >100kW: Lower heating value of the fuel input related to the heat/electricity output, taken directly from ecoinvent v3.0 dataset "heat production, natural gas, at industrial furnace >100kW, GLO 2000".
- water, harvested from rainwater: 0.00397 kg; name rainwater_input; = 3,97e-3*cement; lognormal variance with pedigree 1.6317, pedigree (2,2,3,1,1)
  Measured value. Weighted average of values informed by manufacturers. Water for equipment cooling and dust control.
  Uncertainty: B
  properties: carbon content, fossil 0.0017899, water content 2940.2, dry mass 0.00034 kg, wet mass 1 kg
- gypsum, mineral: 0.06 kg; = 0,06*cement; lognormal variance with pedigree 0.0877, pedigree (2,2,3,1,1)
  Measured value. Weighted average of values informed by manufacturers. Raw material for cement production.
  Uncertainty: B
  properties: wet mass 1 kg, dry mass 1 kg
- synthetic rubber: 8.8e-6 kg; name rubber; = 8,8e-6*cement; lognormal variance with pedigree 0.6687, pedigree (2,2,3,1,1)
  Measured value. Weighted average of values informed by manufacturers. Replacement of wearing parts of process equipment.
  Uncertainty: B
  properties: heating value, net 26.42 MJ, carbon content, fossil 0.871949, dry mass 1 kg, wet mass 1 kg
  note on carbon content, fossil: EPDM (Ethylene-propene-diene terpolymer) rubber is a terpolymer of ethylene, propene, and a diene with the residual unsaturated portion of the diene in the side chain (ecoinvent v2.2 report 7-part XX & Ullmann). Chemical formula (deduced from Evidences of Solvent-Induced Miscibility in Polychloroprene-co-Ethylene-Propene Diene Terpolymer Blends, Dubey et al., Journal of Applied Polymer Science, 2009, 111:1884-1891): C20H35
- waste mineral oil: -5.5e-6 kg; = (oil)*-1; lognormal variance with pedigree 0.5037, pedigree (2,2,3,1,1)
  Estimation based on corresponding input.
  Uncertainty: B
  production volume 13453.9 kg; = APV_cement * (oil / cement)
    Calculated from production volume of reference product using the relative outputs.
  properties: water content 0.111111, heating value, net 34.7 MJ, wet mass 1 kg, carbon content, fossil 0.864444, dry mass 0.9 kg
  note on heating value, net: Value taken from the general comment of the treatment dataset.
  note on carbon content, fossil: Tab A.6, ecoinvent v2.2 report 13_I. C content has been calculated after data in the tables, and then referred to 1 kg DM
- steel, low-alloyed: 7.1e-5 kg; name steel; = 7,1e-5*cement; lognormal variance with pedigree 0.4077, pedigree (2,2,3,1,1)
  (same comment as for synthetic rubber)
  property carbon content, fossil 0.005; name cc_steel
  properties: dry mass 1 kg, wet mass 1 kg
- clinker: 0.75 kg; = 0,75*cement+ flyash*0+ ni_slag*0; lognormal variance with pedigree 0.0037, pedigree (2,2,3,1,1)
  (same comment as for gypsum, mineral)
  properties: dry mass 1 kg, wet mass 1 kg
- scrap steel: -7.1e-5 kg; = (steel)*-1; lognormal variance with pedigree 0.4077, pedigree (2,2,3,1,1)
  Estimation based on corresponding input.
  Uncertainty: B
  production volume 173678 kg; = APV_cement * (steel / cement)
    Calculated from production volume of reference product using the relative outputs.
  properties: carbon content, fossil 0.005, dry mass 1 kg, wet mass 1 kg
- wastewater, average: -1.45e-6 m3; name wastewater; = (1,45e-6*cement)*-1; lognormal variance with pedigree 0.6807, pedigree (2,2,3,1,1)
  Estimation. Calculated as: (tap_water /1000)* cement. All tap water was considered to leave the process as an effluent.
  Uncertainty: B
  production volume 3546.94 m3; = APV_cement * (wastewater / cement)
    Calculated from production volume of reference product using the relative outputs.
  property price 0 EUR2005; name wastewater_price_EUR2005
  properties: water content 2882.2, dry mass 0.346837 kg, carbon content, non-fossil 0.194039, wet mass 1000 kg
  note on carbon content, non-fossil: 0.0673 kg TOC/m3 (Tab A.17, ecoinvent v2.2 report 13_I). TOC was considered as Total Carbon.
- limestone, crushed, for mill: 0.05 kg; = 0,05*cement; lognormal variance with pedigree 0.0427, pedigree (2,2,3,1,1)
  (same comment as for gypsum, mineral)
  properties: carbon content, fossil 0.117492, dry mass 1 kg, wet mass 1 kg
- electricity, medium voltage: 0.051 kWh; = 0,051*cement; lognormal variance with pedigree 0.0237, pedigree (2,2,3,1,1)
  Measured value. Weighted average of values informed by manufacturers. Electricity for grinding and factory operation.
  Uncertainty: B
- diethylene glycol: 0.000411 kg; = 4,11e-4*cement; lognormal variance with pedigree 0.1397, pedigree (2,2,3,1,1)
  Measured value. Weighted average of values informed by manufacturers. Grinding aid for cement production.
  Uncertainty: B
  properties: heating value, net 25.14 MJ, dry mass 1 kg, wet mass 1 kg, carbon content, fossil 0.45283
- waste rubber, unspecified: -8.8e-6 kg; = (rubber)*-1; lognormal variance with pedigree 0.6687, pedigree (2,2,3,1,1)
  Estimation based on corresponding input.
  Uncertainty: B
  production volume 21526.3 kg; = APV_cement * (rubber / cement)
    Calculated from production volume of reference product using the relative outputs.
  properties: carbon content, fossil 0.853, wet mass 1 kg, dry mass 1 kg, heating value, net 27.19 MJ
- tap water: 0.00145 kg; name tap_water; = 1,45e-3*cement; lognormal variance with pedigree 0.6807, pedigree (2,2,3,1,1)
  Measured value. Weighted average of values informed by manufacturers. Water for sanitary purposes.
  Uncertainty: B
  properties: wet mass 1 kg, dry mass 0.000337476 kg, water content 2962.17, carbon content, fossil 0.00178991
  note on carbon content, fossil: Bicarbonate content is 2.93 mol/m3. CO2 content is 0.1 mol/m3 (ecoinvent v2.2 report 8, Tab 93.1).
- lubricating oil: 5.5e-6 kg; name oil; = 5,5e-6*cement; lognormal variance with pedigree 0.5037, pedigree (2,2,3,1,1)
  Measured value. Weighted average of values informed by manufacturers. Maintenance of process equipment.
  Uncertainty: B
  properties: carbon content, fossil 0.75, dry mass 1 kg, heating value, net 40.2 MJ, wet mass 1 kg
  note on carbon content, fossil: Lubricating oil is produced from diesel. C-content/dry mass of fats and oils considered 75%, from: ecoinvent v2.2 report, n 15a, pg 40
  note on heating value, net: Literature value, Source: IPCC 2006, 2006 IPCC Guidelines for National Greenhouse Gas Inventories, Prepared by the National Greenhouse Gas Inventories Programme, Eggleston H.S., Buendia L., Miwa K., Ngara T. and Tanabe K. (eds). Published: IGES, Japan

## Inputs from nature
- Water, river [natural resource, in water]: 0.000124 m3; name water_river_input; = 1,24e-4*cement; lognormal variance with pedigree 0.2767, pedigree (2,2,3,1,1)
  (same comment as for water, harvested from rainwater)
- Water, unspecified natural origin [natural resource, in water]: 2.03e-6 m3; name water_unsp_input; = 2,03e-6*cement; lognormal variance with pedigree 1.7187, pedigree (2,2,3,1,1)
  (same comment as for water, harvested from rainwater)
- Water, well, in ground [natural resource, in water]: 5.65e-5 m3; name water_well_input; = 5,65e-5*cement; lognormal variance with pedigree 0.4167, pedigree (2,2,3,1,1)
  (same comment as for water, harvested from rainwater)

## Emissions to nature
- Water [air, unspecified]: 0.000187 m3; = 1,87e-4*cement; lognormal variance with pedigree 0.1087, pedigree (2,2,3,1,1)
  Estimation. Calculated as: ( water_unsp_input+ water_well_input+ water_river_input+ (rainwater_input/1000))*cement. All water input except for tap water was considered to leave the system as evaporated water, as water is used for cooling and dust control.
  Uncertainty: B

## Sampling procedure
Data represent circa 70% of the Brazilian cement production in 2016, which is considered a good representativeness level. Data were provided by six cement manufacturers, via confidential questionnaires, regarding the production of cement during the year of 2016.
Raw materials flows are the weighted average of the cement composition informed by each cement manufacturer. The weighing factor used is the total cement production volume, since manufacturers did not report the production volumes of each cement type due to confidentiality. Basic uncertainty was calculated based on the sample"s weighted standard deviation and represents variation of composition between manufacturers/factories.
For other input flows (grinding aids, materials for equipment maintenance, fuels, electricity, water consumption), the weighted average of each manufacturer"s unit flows was calculated. Except for the grinding aids, all other flows are not distinguished by cement type, as their consumption is reported for the whole cement plant, which usually produces more than one cement type.
Water consumption was usually reported for the whole integrated cement plants (clinker + cement production operations). Based on literature and expert opinion, the total water volume was divided equally between the clinker and the cement production processes and then converted into unit flows.
Raw materials and fuel inputs were considered to be dry. As water is mainly used for cooling and dust control, it was considered that all water evaporates, except for the "tap water" input, which was considered to be used as drinking water and whose output is modelled as an effluent.
Fuel consumption was informed by manufacturers in terms of volume or mass. They were converted into energy using their lower heating values and modelled as a heat input, to simplify the dataset and allow the consideration of corresponding air emissions.
Infrastructure input flow (cement factory) was extrapolated from "cement Portland/CH" dataset (accessed 08.10.2017).
The amounts of the exchanges were calculated considering the weighted average of the sample. No conversion to the geometric mean of the lognormal distribution was done, for consistency reasons with other ecoinvent datasets.

## Extrapolations
Data represent 70% of Brazilian cement production. This sample is extrapolated to represent the production in the whole country. The main values are considered representative for a typical production of Portland pozzolan cement in Brazil.
