# paper production, woodfree, uncoated, at integrated mill

Dataset: EcoSpold 2, unit process
Geography: RER
Time period: 2000-01-01 to 2021-12-31
Technology level: current
Classification: EcoSpold01Categories: paper & cardboard/graphic paper
Classification: ISIC rev.4 ecoinvent: 1701:Manufacture of pulp, paper and paperboard
Synonyms: uncoated fine paper
Tags: ConvertedDataset
Scenario: Business-as-Usual
System model: Allocation, cut-off by classification
Generated by: Roland Hischier
Published in: Hischier R. 2007
Database: ecoinvent
isCopyrightProtected: true
accessRestrictedTo: 1

## General comment
Woodfree, uncoated paper (also called uncoated fine paper) is one of the most important categories of graphical paper. It contains most of the office papers (e.g. business forms, copier, computer, stationery and book paper). Woodfree paper is defined as containing at least 90% of the fibres in form of chemical pulp. Uncoated paper is defined as not being coated with a coating material like kaolin or calcium carbonate. This dataset represents the production at integrated mills with their own pulp production next to the paper machine.

The main sources for the dataset are several environmental reports from European paper mills (Neusiedler (2001), Kymi (1999), Kymi (2001), Nordland Papier (2001)) an the Finnish EcoData database from KCL (KCL (2002)).

Further sources are the German inventory study about graphical paper (Tiedemann et al. (2000)) and the European IPPC documentation for the paper and pulp industry (European Commission (2000)).

References
KCL (2002) KCL EcoData - life cycle inventory database. The Finnish Pulp and Paper Research Institute (KCL), Espoo (Finnland)

Kymi (1999) Environmental Report 1999. UPM-Kymmene Kymi Paper Oy, Kuusankoski (Finland) as pdf-File under: http://www.paper.upm-kymmene.com

Kymi (2001) Kymi Paper Oy Environmental Protection in 2000. UPM-Kymmene Kymi Paper Oy, Kuusankoski (Finland) as pdf-File under: http://www.paper.upm-kymmene.com

Neusiedler (2001) Umwelterklärung der Neusiedler AG - Standort Ulmerfeld-Hausmening. Neusiedler AG, Ulmerfeld-Hausmening (Austria) as pdf-File under: http://www.neusiedler.at/2001/de/pdf/umwelterklaerung_the_2001.pdf

Nordland Papier (2001) Umwelterklärung 2001. UPM-Kymmene Nordland Papier AG, Dörpen (Germany) as pdf-File under: http://www.paper.upm-kymmene.com

Further References
European Commission (2000) Integrated Pollution Prevention and Control (IPPC) - Reference Document on Best Available Techniques in the Pulp and Paper Industry. Institute for Prospective Technological Studies, Sevilla

Tiedemann A., Böttcher Tiedemann C., Buschardt A., Georgi B., Giersberg G., Goosmann G., Gregor H.-D., Mehlhorn B., Modi A., Neitzel H., Oels H.-J., Schmitz S. and Suhr M. (2000) Ökobilanzen für graphische Papiere. Texte 22/00. Umweltbundesamt, Berlin

## Included activities start
This activity starts with the reception of the raw materials, such as pulpwood.

## Included activities end
This module includes the European production of uncoated woodfree paper in an integrated paper mill - includingwood handling, chemical pulping and bleaching, paper production, energy production on-site, recovery cycles of chemicals and internal waste water treatment.

## Geography
Data from a finnish database and from several European fine paper producers used as European average data.

## Technology
Average of present used technology

## Time period
Data represent the average technology in the late 1990ies and early 2000s. The production volume is valid for 2018.

## Parameters
- fraction, cooling water, recirculating system, to air: 0.771 dimensionless; name fraction_CW_R_to_air; lognormal variance with pedigree 0.0413, pedigree (2,3,1,3,1)
  Calculated based on literature value (Scown, C.D., 2011, Water Footprint of U.S. Transportation Fuels and supplying information of the article) (Vionnet, S., Quantis Water Database - Technical Report, 2012).
- fraction, cooling water, once-through system, to air: 0.004 dimensionless; name fraction_CW_OT_to_air; lognormal variance with pedigree 0.0413, pedigree (2,3,1,3,1)
  (same comment as for fraction, cooling water, recirculating system, to air)
- fraction, cooling water, cooling pond system, to air: 0.032 dimensionless; name fraction_CW_CP_to_air; lognormal variance with pedigree 0.0413, pedigree (2,3,1,3,1)
  (same comment as for fraction, cooling water, recirculating system, to air)
- fraction, cooling water, to air: 0.3875 dimensionless; name fraction_CW_to_air; = (0.5*fraction_CW_OT_to_air)+(0.5*fraction_CW_R_to_air); lognormal variance with pedigree 0.092025, pedigree (4,4,3,2,4)
  Calculated value based on literature value (see comments of the other parametres present in this dataset) and expert opinion. In the case when no industry/literature data are available about the type of cooling or directly fraction, cooling water, to air specific for the process a default assumption is applied. It is assumed that the once-through cooling system is used in 50% of all cases and recirculating system is used in another 50% of all cases.
- fraction, process water, to air: 0.15 dimensionless; name fraction_PW_to_air; lognormal variance with pedigree 0.092025, pedigree (4,4,3,2,4)
  Literature value. In case when no industry/process specific data are available, default evaporation fraction value is used. This value is 15% and is based on literature (Statistics Canada, 2007 & Shaffer, K.H., 2008, Consumptive water use in the Great Lakes Basin, USGS & Shiklomanov, 2003, World Water Resources at the Beginning of the 21st Century) and has been approved by an expert.

## Reference product
- paper, woodfree, uncoated: 1 kg; name RP_amount_1; CPC 32113: Mechanical wood pulp; semi-chemical wood pulp; pulps of fibrous cellulosic material other than wood; By-product classification allocatable product
  EcoSpold01Location=RER
  production volume 7.26564e9 kg; name paperProdVol; = 9082045000*0.8
    Kg/year, valid for 2018,
    retrieved from FAOSTAT, Forestry Production and Trade Statistics, filtered for Regions “Europe”, Elements “production”, Items “Printing and writing papers, uncoated, wood free”, Years “2018”, at http://www.fao.org/faostat/en/#data/FO <http://www.fao.org/faostat/en/>, last accessed April 2020. According to expert judgement 80 % of graphical paper is produced at integrated mills.
  property carbon content, fossil 0.0163033
    Fossil C content was calculated after fossil C contents of chemicals used in the production of the paper (in Tab 8.54 & 8.55 ecoinvent v2.2 report 11_III, part 8).
  property carbon content, non-fossil 0.437
    Biogenic C content was calculated after biogenic C contents of chemicals used in the production of the paper (in Tab 8.54 & 8.55 ecoinvent v2.2 report 11_III, part 8). The cellulose content in 1 kg of paper (on a wet mas basis) was estimated as (1-chemical content), C content of cellulose was considered 0.44 kgC/kg dry mass (ecoinvent v2.2 report, n 15a, pg 40)
  property price 0.756 EUR2005
    Export prices for the World+ according to: http://faostat.fao.org/site/626/DesktopDefault.aspx?PageID=626#ancor downloaded 6 May 2009; calculated as export value divided by export volume.
  property carbon content 0.453303
    carbon content on a dry matter basis (reserved; not for manual entry)
  properties: water content 0.0582011, dry mass 0.945 kg, water in wet mass 0.055 kg, wet mass 1 kg, heating value, net 14.11 MJ, carbon allocation 0.428372 kg

## Inputs from technosphere
- pulpwood, softwood, measured as solid wood under bark: 0 m3; pedigree (1,1,1,1,1)
  EcoSpold01Location=RER
  Average from several european fine paper producers
  Uncertainty: average from several european fine paper producers
  properties: water content 1.4, wet mass 1080 kg, carbon content, non-fossil 0.494, dry mass 450 kg, heating value, net 4483.78 MJ
  note on carbon content, non-fossil: Biogenic C content was calculated after biogenic C contents of chemicals used in the production of the paper (in Tab 8.54 & 8.55 ecoinvent v2.2 report 11_III, part 8). The cellulose content in 1 kg of paper (on a wet mas basis) was estimated as (1-chemical content), C content of cellulose was considered 0.44 kgC/kg dry mass (ecoinvent v2.2 report, n 15a, pg 40) C content of dry mass is 0.494 kgC/kg dry wood (ecoinvent v2.2 report 9)
  note on heating value, net: Value based on "softwood forestry, mixed species, sustainable forest management"The property is based on a value of 11.58MJ/kg
- lignite briquettes: 0.0789 MJ; lognormal variance with pedigree 0.0407, pedigree (1,3,5,3,1)
  EcoSpold01Location=DE
  Average from finnish database and several companies
  Uncertainty: average from finnish database and several companies
  properties: wet mass 0.0512821 kg, dry mass 0.0415385 kg, carbon content, fossil 0.65679, water content 0.234568, heating value, net 8.8 MJ
  note on carbon content, fossil: Fossil C content was calculated after fossil C contents of chemicals used in the production of the paper (in Tab 8.54 & 8.55 ecoinvent v2.2 report 11_III, part 8). 53.2% C and 19% water in wet mass (ecoinvent v2.1 report 6_VI Table 7.1)
- sodium chloride, powder: 0.00023 kg; lognormal variance with pedigree 0.0527, pedigree (2,4,5,3,1)
  Average data from finnish database
  EcoSpold01Location=RER
  Uncertainty: average data from finnish database
  properties: dry mass 1 kg, wet mass 1 kg
- alkylketene dimer sizing agent, for paper production: 0.002 kg; lognormal variance with pedigree 0.0527, pedigree (2,4,5,3,1)
  (same comment as for sodium chloride, powder)
  properties: wet mass 1 kg, carbon content, non-fossil 0.538229, dry mass 1 kg, heating value, net 16.31 MJ
  note on carbon content, non-fossil: Biogenic C content was calculated after biogenic C contents of chemicals used in the production of the paper (in Tab 8.54 & 8.55 ecoinvent v2.2 report 11_III, part 8). The cellulose content in 1 kg of paper (on a wet mas basis) was estimated as (1-chemical content), C content of cellulose was considered 0.44 kgC/kg dry mass (ecoinvent v2.2 report, n 15a, pg 40) Chemical formula of alkyl ketene dimer was considered as C38H72O20, and the molecular weight 848g/mol. It is produced from Fatty acids, from vegetarian oil
- sulfur dioxide, liquid: 0.00114 kg; lognormal variance with pedigree 0.0527, pedigree (2,4,5,3,1)
  (same comment as for sodium chloride, powder)
  properties: wet mass 1 kg, dry mass 1 kg
- carbon dioxide, liquid: 0.00114 kg; lognormal variance with pedigree 0.0527, pedigree (2,4,5,3,1)
  EcoSpold01Location=RER
  Average data from finnish database
  Uncertainty: average data from finnish database
  properties: dry mass 1 kg, carbon content, fossil 0.272727, wet mass 1 kg, heating value, net 8.27 MJ
  note on carbon content, fossil: Fossil C content was calculated after fossil C contents of chemicals used in the production of the paper (in Tab 8.54 & 8.55 ecoinvent v2.2 report 11_III, part 8). CO2.
- potato starch: 0.038 kg; lognormal variance with pedigree 0.0527, pedigree (2,4,5,3,1)
  EcoSpold01Location=DE
  Average data from finnish database
  Uncertainty: average data from finnish database
  properties: wet mass 1 kg, heating value, net 10.66 MJ, carbon content, non-fossil 0.46, water content 0.25, dry mass 0.8 kg
  note on carbon content, non-fossil: Biogenic C content was calculated after biogenic C contents of chemicals used in the production of the paper (in Tab 8.54 & 8.55 ecoinvent v2.2 report 11_III, part 8). The cellulose content in 1 kg of paper (on a wet mas basis) was estimated as (1-chemical content), C content of cellulose was considered 0.44 kgC/kg dry mass (ecoinvent v2.2 report, n 15a, pg 40) C-content of starch is considered 46% on dry mass basis (from "Evolutionary and Biochemical Aspects", A.D. Kay and T. Vrede (in Global Ecology, 2010, Elsevier B.V., S.E. Jørgensen Ed.)).
- sulfate pulp, bleached: 0.03325 kg; = 0.035*0.95; lognormal variance with pedigree 0.0407, pedigree (1,3,5,3,1)
  Average from several european fine paper producers. pulp input is 5% unbleached pulp and 95% bleached pulp
  Uncertainty: average from several european fine paper producers
  properties: carbon content, non-fossil 0.494, dry mass 0.9 kg, wet mass 1 kg, water content 0.111111, heating value, net 13.23 MJ
  note on carbon content, non-fossil: C content of dry mass of sulfate pulp is 0.494 kgC/kg dry wood (ecoinvent v2.2 report 6_IX & ecoinvent v2.2 report 9). No other C containing products in the formulation of the pulp.
- municipal solid waste: -0.01526 kg; name BP_amount_2; lognormal variance with pedigree 0.0407, pedigree (1,3,5,3,1)
  Average from finnish database and several companies
  EcoSpold01Location=CH
  Uncertainty: average from finnish database and several companies
  production volume 1.10874e8 kg; = paperProdVol * (BP_amount_2 / RP_amount_1)
    Calculated from the production volume of paper, woodfree, uncoated in proportion to the respective output amounts.
  properties: water content 0.297017, dry mass 0.771 kg, carbon content, non-fossil 0.261655, heating value, net 11.74 MJ, carbon content, fossil 0.171549, wet mass 1 kg
  note on carbon content, non-fossil: Biogenic C content was calculated after biogenic C contents of chemicals used in the production of the paper (in Tab 8.54 & 8.55 ecoinvent v2.2 report 11_III, part 8). The cellulose content in 1 kg of paper (on a wet mas basis) was estimated as (1-chemical content), C content of cellulose was considered 0.44 kgC/kg dry mass (ecoinvent v2.2 report, n 15a, pg 40) MSW composition in tab 4.1, ecoinvent v2.2 report 13_I. C content referred to 1 kg DM
  note on heating value, net: Value taken from the general comment of the treatment dataset.
  note on carbon content, fossil: Fossil C content was calculated after fossil C contents of chemicals used in the production of the paper (in Tab 8.54 & 8.55 ecoinvent v2.2 report 11_III, part 8). MSW composition in tab 4.1, ecoinvent v2.2 report 13_I. C content referred to 1 kg DM
- kaolin: 0.119 kg; lognormal variance with pedigree 0.0407, pedigree (1,3,5,3,1)
  Average from several european fine paper producers
  EcoSpold01Location=RER
  Uncertainty: average from several european fine paper producers
  properties: wet mass 1 kg, dry mass 1 kg
- heavy fuel oil: 0.0282 kg; lognormal variance with pedigree 0.0407, pedigree (1,3,5,3,1)
  Average from finnish database and several companies
  EcoSpold01Location=RER
  Uncertainty: average from finnish database and several companies
  properties: carbon content, fossil 0.849, heating value, net 41.2 MJ, dry mass 1 kg, wet mass 1 kg
  note on carbon content, fossil: Fossil C content was calculated after fossil C contents of chemicals used in the production of the paper (in Tab 8.54 & 8.55 ecoinvent v2.2 report 11_III, part 8). C-content is 84.9% (ecoinvent v2.2 report 6_IV, Tab 3.18)
- electricity, medium voltage: 0.4002 kWh; lognormal variance with pedigree 0.0407, pedigree (1,3,5,3,1)
  EcoSpold01Location=NORDEL
  Average from finnish database and several companies
  Uncertainty: average from finnish database and several companies
- hazardous waste, for underground deposit: -0.00018 kg; name BP_amount_4; lognormal variance with pedigree 0.0407, pedigree (1,3,5,3,1)
  (same comment as for lignite briquettes)
  production volume 1.30781e6 kg; = paperProdVol * (BP_amount_4 / RP_amount_1)
    (same comment as for municipal solid waste)
  property price 0 EUR2005; name BP_amount_4_price_EUR2005
  properties: carbon content, fossil 0.554667, dry mass 1 kg, wet mass 1 kg
  note on carbon content, fossil: Fossil C content was calculated after fossil C contents of chemicals used in the production of the paper (in Tab 8.54 & 8.55 ecoinvent v2.2 report 11_III, part 8). Tab A.6, ecoinvent v2.2 report 13_I, average hazardous waste composition was used, and referred to 0% water mass. No waste-specific emission are currently inventoried for underground deposits. Accordingly, no waste composition must be specified. For generic, average waste to underground deposit deposition in a 200 liter steel drum without cement solidification is assumed (ecoinvent v2.2 report 13_I).
- hydrogen peroxide, without water, in 50% solution state: 0.00423 kg; lognormal variance with pedigree 0.0527, pedigree (2,4,5,3,1)
  (same comment as for carbon dioxide, liquid)
  properties: heating value, net 7.13 MJ, dry mass 1 kg, wet mass 1 kg
- oxygen, liquid: 0.0134 kg; lognormal variance with pedigree 0.0527, pedigree (2,4,5,3,1)
  (same comment as for carbon dioxide, liquid)
  properties: wet mass 1 kg, dry mass 1 kg
- residual softwood, wet: 0.000309 m3; lognormal variance with pedigree 0.0407, pedigree (1,3,5,3,1)
  (same comment as for kaolin)
  properties: heating value, net 5962.7 MJ, dry mass 450 kg, water content 0.7, wet mass 765 kg, carbon content, non-fossil 0.494
- paper mill, integrated: 5.44e-11 unit; lognormal variance with pedigree 0.448, pedigree (4,5,5,5,5)
  EcoSpold01Location=RER
  Own assumption
  Uncertainty: own assumption
- methanol: 0.00125 kg; lognormal variance with pedigree 0.0527, pedigree (2,4,5,3,1)
  EcoSpold01Location=GLO
  Average data from finnish database
  Uncertainty: average data from finnish database
  properties: heating value, net 26.49 MJ, carbon content, fossil 0.375, wet mass 1 kg, dry mass 1 kg
  note on carbon content, fossil: Fossil C content was calculated after fossil C contents of chemicals used in the production of the paper (in Tab 8.54 & 8.55 ecoinvent v2.2 report 11_III, part 8). CH3OH
- pulpwood, hardwood, measured as solid wood under bark: 0 m3; pedigree (1,1,1,1,1)
  (same comment as for kaolin)
  properties: dry mass 650 kg, heating value, net 6071.3 MJ, water content 0.8, wet mass 1170 kg, carbon content, non-fossil 0.494
  note on heating value, net: Value based on "hardwood forestry, mixed species, sustainable forest management"The property is based on a value of 11.58MJ/kg
- magnesium sulfate: 0.00245 kg; lognormal variance with pedigree 0.0527, pedigree (2,4,5,3,1)
  (same comment as for sodium chloride, powder)
  properties: wet mass 1 kg, dry mass 1 kg
- sulfuric acid: 0.0174 kg; lognormal variance with pedigree 0.0527, pedigree (2,4,5,3,1)
  (same comment as for carbon dioxide, liquid)
  properties: dry mass 1 kg, wet mass 1 kg
- natural gas, high pressure: 0 m3; pedigree (1,1,1,1,1)
  EcoSpold01Location=RER
  Average from finnish database and several companies
  Uncertainty: average from finnish database and several companies
  properties: heating value, gross 39 MJ, carbon content, fossil 0.602381, heating value, net 39 MJ, dry mass 0.84 kg, wet mass 0.84 kg
  note on carbon content, fossil: An average C content of 0.506 kg C/ m3 has been assumed (this average has been calculated using data in Tab 3.5, ecoinvent v2.2 report 6_V
  note on heating value, net: Literature value, Source: United Nations Statistics Division (2018) International Recommendations for Energy Statistics (IRES). Available at: http://unstats.un.org/unsd/statcom/doc11/BG-IRES.pdf.
- nitrogen, liquid: 0.00013 kg; lognormal variance with pedigree 0.0527, pedigree (2,4,5,3,1)
  (same comment as for sodium chloride, powder)
  properties: dry mass 1 kg, wet mass 1 kg
- hard coal: 0.00702 kg; lognormal variance with pedigree 0.0407, pedigree (1,3,5,3,1)
  EcoSpold01Location=WEU
  Average from finnish database and several companies
  Uncertainty: average from finnish database and several companies
  properties: water content 0.0638298, wet mass 1 kg, carbon content, fossil 0.845, dry mass 0.94 kg, heating value, net 27.91 MJ
  note on carbon content, fossil: Fossil C content was calculated after fossil C contents of chemicals used in the production of the paper (in Tab 8.54 & 8.55 ecoinvent v2.2 report 11_III, part 8). C content 75-94% (specified in Tab 1.1, report 6, part VI). A mean content of 0.845 kg C/ kg dry hard coal was considered
  note on heating value, net: Based on the Characterization factor of Hard coal in the CED method
- wood ash mixture, pure: 0 kg; name BP_amount_5; pedigree (1,1,1,1,1)
  EcoSpold01Location=CH
  Average from finnish database and several companies
  Uncertainty: average from finnish database and several companies
  production volume 0 kg
    (same comment as for municipal solid waste)
  property price 0 EUR2005; name BP_amount_5_price_EUR2005
  properties: dry mass 1 kg, wet mass 1 kg, carbon content, non-fossil 0.012
  note on carbon content, non-fossil: Biogenic C content was calculated after biogenic C contents of chemicals used in the production of the paper (in Tab 8.54 & 8.55 ecoinvent v2.2 report 11_III, part 8). The cellulose content in 1 kg of paper (on a wet mas basis) was estimated as (1-chemical content), C content of cellulose was considered 0.44 kgC/kg dry mass (ecoinvent v2.2 report, n 15a, pg 40) Tab A.9, ecoinvent v2.2 report 13_I.
- sulfate pulp, unbleached: 0.00175 kg; = 0.035*0.05; lognormal variance with pedigree 0.0407, pedigree (1,3,5,3,1)
  (same comment as for sulfate pulp, bleached)
  properties: price 0.355 EUR2005, wet mass 1 kg, water content 0.111111, dry mass 0.9 kg, carbon content, non-fossil 0.494, heating value, net 13.23 MJ
- sodium hydroxide, without water, in 50% solution state: 0.0217 kg; lognormal variance with pedigree 0.0527, pedigree (2,4,5,3,1)
  (same comment as for sodium chloride, powder)
  properties: heating value, net 3.03 MJ, wet mass 1 kg, dry mass 1 kg
- sludge from pulp and paper production: 0 kg; name BP_amount_1; pedigree (1,1,1,1,1)
  (same comment as for municipal solid waste)
  production volume 0 kg
    (same comment as for municipal solid waste)
  property price 0 EUR2005; name BP_amount_1_price_EUR2005
  properties: dry mass 0.75 kg, wet mass 1 kg, carbon content, non-fossil 0.21, water content 0.333333, heating value, net 2.65 MJ
  note on carbon content, non-fossil: Biogenic C content was calculated after biogenic C contents of chemicals used in the production of the paper (in Tab 8.54 & 8.55 ecoinvent v2.2 report 11_III, part 8). The cellulose content in 1 kg of paper (on a wet mas basis) was estimated as (1-chemical content), C content of cellulose was considered 0.44 kgC/kg dry mass (ecoinvent v2.2 report, n 15a, pg 40) Tab 6.21, ecoinvent v2.2 report 11_III & Tab A.9, ecoinvent v2.2 report 13_I. Sludge from pulp and paper contains 15.75% carbon
- lime: 0.119 kg; lognormal variance with pedigree 0.0407, pedigree (1,3,5,3,1)
  Average from several european fine paper producers
  EcoSpold01Location=CH
  Uncertainty: average from several european fine paper producers
  properties: carbon content, fossil 0.120005, wet mass 1 kg, dry mass 1 kg
  note on carbon content, fossil: Fossil C content was calculated after fossil C contents of chemicals used in the production of the paper (in Tab 8.54 & 8.55 ecoinvent v2.2 report 11_III, part 8). CaCO3 (MW=100)
- chemical, organic: 0.0025 kg; lognormal variance with pedigree 0.0527, pedigree (2,4,5,3,1)
  (same comment as for methanol)
  properties: dry mass 1 kg, wet mass 1 kg, carbon content, fossil 0.628, heating value, net 19.03 MJ
  note on carbon content, fossil: Fossil C content was calculated after fossil C contents of chemicals used in the production of the paper (in Tab 8.54 & 8.55 ecoinvent v2.2 report 11_III, part 8). This dataset is an unweighted average of 20 organic substances (listed in Tab 88.1, ecoinvent v2.2 report 8, part II), being part of the top100 chemicals included in this database. The C-content has also been calculated as an unweighted average of the C content of the substances composing this dataset.
- quicklime, milled, loose: 0.00497 kg; lognormal variance with pedigree 0.0527, pedigree (2,4,5,3,1)
  Average data from finnish database
  EcoSpold01Location=CH
  Uncertainty: average data from finnish database
  properties: wet mass 1 kg, dry mass 0.99 kg, water content 0.010101
- sodium chlorate, powder: 0.0143 kg; lognormal variance with pedigree 0.0527, pedigree (2,4,5,3,1)
  (same comment as for carbon dioxide, liquid)
  properties: dry mass 1 kg, wet mass 1 kg
- ash from paper production sludge: 0 kg; name BP_amount_3; pedigree (1,1,1,1,1)
  (same comment as for wood ash mixture, pure)
  production volume 0 kg
    (same comment as for municipal solid waste)
  property price 0 EUR2005; name BP_amount_3_price_EUR2005
  properties: dry mass 1 kg, carbon content, non-fossil 0.0092, wet mass 1 kg
  note on carbon content, non-fossil: Biogenic C content was calculated after biogenic C contents of chemicals used in the production of the paper (in Tab 8.54 & 8.55 ecoinvent v2.2 report 11_III, part 8). The cellulose content in 1 kg of paper (on a wet mas basis) was estimated as (1-chemical content), C content of cellulose was considered 0.44 kgC/kg dry mass (ecoinvent v2.2 report, n 15a, pg 40) Tab 6.21, ecoinvent v2.2 report 11_III
- pulpwood, softwood, measured as solid wood under bark: 0.00112327, 1.37254e-5 m3 (2 entries); lognormal variance with pedigree 0.0407, pedigree (1,3,5,3,1)
  (same comment as for pulpwood, softwood, measured as solid wood under bark)
- pulpwood, hardwood, measured as solid wood under bark: 0.00165015, 4.58451e-5 m3 (2 entries); lognormal variance with pedigree 0.0407, pedigree (1,3,5,3,1)
  (same comment as for kaolin)
- natural gas, high pressure: 0.0425458, 0.0002747 m3 (2 entries); lognormal variance with pedigree 0.0407, pedigree (1,3,5,3,1)
  (same comment as for natural gas, high pressure)
- wood ash mixture, pure: -0.0268481, -0.000551902 kg (2 entries); lognormal variance with pedigree 0.0407, pedigree (1,3,5,3,1)
  (same comment as for wood ash mixture, pure)
  production volume 1.99078e8 kg
- sludge from pulp and paper production: -9.87484e-5, -0.00891125 kg (2 entries); lognormal variance with pedigree 0.0407, pedigree (1,3,5,3,1)
  (same comment as for municipal solid waste)
  production volume 6.54634e7 kg
- ash from paper production sludge: -0.0024753, -6.47028e-5 kg (2 entries); lognormal variance with pedigree 0.0407, pedigree (1,3,5,3,1)
  (same comment as for wood ash mixture, pure)
  production volume 1.84547e7 kg

## Inputs from nature
- Water, cooling, unspecified natural origin [natural resource, in water]: 0.036 m3; name water_cooling_UNO_input; lognormal variance with pedigree 0.1107, pedigree (1,3,5,3,4)
  Estimation, based on data for sulphate pulp production
  Uncertainty: estimation, based on data for sulphate pulp production
- Water, unspecified natural origin [natural resource, in water]: 0.049 m3; name water_UNO_input; lognormal variance with pedigree 0.0407, pedigree (1,3,5,3,1)
  Average from finnish database and several companies
  Uncertainty: average from finnish database and several companies

## Emissions to nature
- Acetic acid [air, urban air close to ground]: 9.49e-7 kg; lognormal variance with pedigree 0.1786, pedigree (2,5,5,1,4)
  Estimation - based on respective heating modules
  Uncertainty: estimation - based on respective heating modules
- Lead [air, urban air close to ground]: 4.73e-7 kg; lognormal variance with pedigree 0.7786, pedigree (2,5,5,1,4)
  (same comment as for Acetic acid)
- NMVOC, non-methane volatile organic compounds, unspecified origin [air, urban air close to ground]: 3.51e-5 kg; lognormal variance with pedigree 0.1786, pedigree (2,5,5,1,4)
  (same comment as for Acetic acid)
- Cadmium [air, urban air close to ground]: 5.99e-8 kg; lognormal variance with pedigree 0.7786, pedigree (2,5,5,1,4)
  (same comment as for Acetic acid)
- Radium-228 [air, urban air close to ground]: 2.64e-5 kBq; lognormal variance with pedigree 0.4386, pedigree (2,5,5,1,4)
  (same comment as for Acetic acid)
- Iodine [air, urban air close to ground]: 7.23e-8 kg; lognormal variance with pedigree 0.1786, pedigree (2,5,5,1,4)
  (same comment as for Acetic acid)
- Thallium [air, urban air close to ground]: 5.14e-10 kg; lognormal variance with pedigree 0.7786, pedigree (2,5,5,1,4)
  (same comment as for Acetic acid)
- Acetaldehyde [air, urban air close to ground]: 9.88e-7 kg; lognormal variance with pedigree 0.1786, pedigree (2,5,5,1,4)
  (same comment as for Acetic acid)
- Sulfur dioxide [air, urban air close to ground]: 0.00052 kg; lognormal variance with pedigree 0.0407, pedigree (1,3,5,3,1)
  (same comment as for Water, unspecified natural origin)
- Zinc [air, urban air close to ground]: 4.05e-6 kg; lognormal variance with pedigree 0.7786, pedigree (2,5,5,1,4)
  (same comment as for Acetic acid)
- Ammonia [air, urban air close to ground]: 2.3e-5 kg; lognormal variance with pedigree 0.1786, pedigree (2,5,5,1,4)
  (same comment as for Acetic acid)
- Boron [air, urban air close to ground]: 1.76e-5 kg; lognormal variance with pedigree 0.7786, pedigree (2,5,5,1,4)
  (same comment as for Acetic acid)
- Particulates, > 10 um [air, urban air close to ground]: 0.000229 kg; lognormal variance with pedigree 0.1786, pedigree (2,5,5,1,4)
  (same comment as for Acetic acid)
- Antimony [air, urban air close to ground]: 3.92e-8 kg; lognormal variance with pedigree 0.1786, pedigree (2,5,5,1,4)
  (same comment as for Acetic acid)
- Mercury [air, urban air close to ground]: 2.23e-8 kg; lognormal variance with pedigree 0.7786, pedigree (2,5,5,1,4)
  (same comment as for Acetic acid)
- Manganese [air, urban air close to ground]: 2.3e-6 kg; lognormal variance with pedigree 0.7786, pedigree (2,5,5,1,4)
  (same comment as for Acetic acid)
- Aluminium [air, urban air close to ground]: 2.05e-5 kg; lognormal variance with pedigree 0.1786, pedigree (2,5,5,1,4)
  (same comment as for Acetic acid)
- Calcium [air, urban air close to ground]: 0.000156 kg; lognormal variance with pedigree 0.4386, pedigree (2,5,5,1,4)
  (same comment as for Acetic acid)
- Magnesium [air, urban air close to ground]: 1.72e-5 kg; lognormal variance with pedigree 0.7786, pedigree (2,5,5,1,4)
  (same comment as for Acetic acid)
- Carbon dioxide, non-fossil [air, urban air close to ground]: 1.5 kg; lognormal variance with pedigree 0.0407, pedigree (1,3,5,3,1)
  (same comment as for Water, unspecified natural origin)
- Potassium-40 [air, urban air close to ground]: 2.84e-5 kBq; lognormal variance with pedigree 0.4386, pedigree (2,5,5,1,4)
  (same comment as for Acetic acid)
- Tin [air, urban air close to ground]: 3.23e-9 kg; lognormal variance with pedigree 0.7786, pedigree (2,5,5,1,4)
  (same comment as for Acetic acid)
- Hydrocarbons, aliphatic, alkanes, unspecified [air, urban air close to ground]: 2.06e-5 kg; lognormal variance with pedigree 0.1786, pedigree (2,5,5,1,4)
  (same comment as for Acetic acid)
- Scandium [air, urban air close to ground]: 1.23e-9 kg; lognormal variance with pedigree 0.7786, pedigree (2,5,5,1,4)
  (same comment as for Acetic acid)
- Water [air, unspecified]: 0.0213 m3; name water_to_air_unspecified; = (water_cooling_UNO_input*fraction_CW_to_air)+(water_UNO_input*fraction_PW_to_air); lognormal variance with pedigree 0.0807, pedigree (2,2,5,1,1)
  Calculated value based on literature values and expert opinion. See comments in the parametres' comment field.
  property fraction, origin: fresh water 0; name fraction_origin_fresh_water
  property fraction, origin: unspecified 1; name fraction_origin_unspecified
  property fraction, origin: salt water 0; name fraction_origin_salt_water
- Hydrocarbons, aromatic [air, urban air close to ground]: 1.75e-7 kg; lognormal variance with pedigree 0.1786, pedigree (2,5,5,1,4)
  (same comment as for Acetic acid)
- Carbon dioxide, fossil [air, urban air close to ground]: 0.304 kg; lognormal variance with pedigree 0.0407, pedigree (1,3,5,3,1)
  (same comment as for Water, unspecified natural origin)
- Acetone [air, urban air close to ground]: 1.75e-7 kg; lognormal variance with pedigree 0.1786, pedigree (2,5,5,1,4)
  (same comment as for Acetic acid)
- Ethanol [air, urban air close to ground]: 3.49e-7 kg; lognormal variance with pedigree 0.1786, pedigree (2,5,5,1,4)
  (same comment as for Acetic acid)
- Beryllium [air, urban air close to ground]: 4.15e-9 kg; lognormal variance with pedigree 0.7786, pedigree (2,5,5,1,4)
  (same comment as for Acetic acid)
- Propionic acid [air, urban air close to ground]: 3.34e-8 kg; lognormal variance with pedigree 0.1786, pedigree (2,5,5,1,4)
  (same comment as for Acetic acid)
- Methane, fossil [air, urban air close to ground]: 0.00047 kg; lognormal variance with pedigree 0.1786, pedigree (2,5,5,1,4)
  (same comment as for Acetic acid)
- AOX, Adsorbable Organic Halogen as Cl [water, surface water]: 9e-5 kg; lognormal variance with pedigree 0.0807, pedigree (1,3,5,3,1)
  (same comment as for Water, unspecified natural origin)
- Thorium [air, urban air close to ground]: 5.04e-9 kg; lognormal variance with pedigree 0.7786, pedigree (2,5,5,1,4)
  (same comment as for Acetic acid)
- PAH, polycyclic aromatic hydrocarbons [air, urban air close to ground]: 1.65e-7 kg; lognormal variance with pedigree 0.1786, pedigree (2,5,5,1,4)
  (same comment as for Acetic acid)
- Chromium [air, urban air close to ground]: 1.83e-7 kg; lognormal variance with pedigree 0.7786, pedigree (2,5,5,1,4)
  (same comment as for Acetic acid)
- Phenol [air, urban air close to ground]: 7.69e-7 kg; lognormal variance with pedigree 0.1786, pedigree (2,5,5,1,4)
  (same comment as for Acetic acid)
- Toluene [air, urban air close to ground]: 5.92e-6 kg; lognormal variance with pedigree 0.1786, pedigree (2,5,5,1,4)
  (same comment as for Acetic acid)
- DOC, Dissolved Organic Carbon [water, surface water]: 0.00625926 kg; lognormal variance with pedigree 0.0807, pedigree (1,3,5,3,1)
  Calculated as equal to TOC.
  Uncertainty: average from finnish database and several companies
- Phosphorus [water, surface water]: 1e-5 kg; lognormal variance with pedigree 0.0807, pedigree (1,3,5,3,1)
  (same comment as for Water, unspecified natural origin)
- Dioxins, measured as 2,3,7,8-tetrachlorodibenzo-p-dioxin [air, urban air close to ground]: 4.78e-12 kg; lognormal variance with pedigree 0.1786, pedigree (2,5,5,1,4)
  (same comment as for Acetic acid)
- Hydrogen fluoride [air, urban air close to ground]: 6.14e-7 kg; lognormal variance with pedigree 0.1786, pedigree (2,5,5,1,4)
  (same comment as for Acetic acid)
- COD, Chemical Oxygen Demand [water, surface water]: 0.0169 kg; lognormal variance with pedigree 0.0807, pedigree (1,3,5,3,1)
  (same comment as for Water, unspecified natural origin)
- TOC, Total Organic Carbon [water, surface water]: 0.00625926 kg; lognormal variance with pedigree 0.0807, pedigree (1,3,5,3,1)
  Calculated by default as TOC (gC) = COD/2.7 (COD measured in g O2). Should more correctly be calculated from the carbon content of the specified emissions to water.
  Uncertainty: average from finnish database and several companies
- Barium [air, urban air close to ground]: 4.15e-7 kg; lognormal variance with pedigree 0.7786, pedigree (2,5,5,1,4)
  (same comment as for Acetic acid)
- Sodium [air, urban air close to ground]: 2.18e-5 kg; lognormal variance with pedigree 0.7786, pedigree (2,5,5,1,4)
  (same comment as for Acetic acid)
- Uranium-238 [air, urban air close to ground]: 2.26e-5 kBq; lognormal variance with pedigree 0.4386, pedigree (2,5,5,1,4)
  (same comment as for Acetic acid)
- Bromine [air, urban air close to ground]: 8.23e-7 kg; lognormal variance with pedigree 0.1786, pedigree (2,5,5,1,4)
  (same comment as for Acetic acid)
- Propane [air, urban air close to ground]: 1.59e-5 kg; lognormal variance with pedigree 0.1786, pedigree (2,5,5,1,4)
  (same comment as for Acetic acid)
- Phosphorus [air, urban air close to ground]: 4.16e-6 kg; lognormal variance with pedigree 0.1786, pedigree (2,5,5,1,4)
  (same comment as for Acetic acid)
- BOD5, Biological Oxygen Demand [water, surface water]: 0.00114 kg; lognormal variance with pedigree 0.0807, pedigree (1,3,5,3,1)
  (same comment as for Water, unspecified natural origin)
- Polonium-210 [air, urban air close to ground]: 0.000193 kBq; lognormal variance with pedigree 0.4386, pedigree (2,5,5,1,4)
  (same comment as for Acetic acid)
- Particulates, < 2.5 um [air, urban air close to ground]: 0.000688 kg; lognormal variance with pedigree 0.4386, pedigree (2,5,5,1,4)
  (same comment as for Acetic acid)
- Hydrogen chloride [air, urban air close to ground]: 1.5e-5 kg; lognormal variance with pedigree 0.1786, pedigree (2,5,5,1,4)
  (same comment as for Acetic acid)
- Propene [air, urban air close to ground]: 7.79e-6 kg; lognormal variance with pedigree 0.1786, pedigree (2,5,5,1,4)
  (same comment as for Acetic acid)
- Silicon [air, urban air close to ground]: 0.000189 kg; lognormal variance with pedigree 0.7786, pedigree (2,5,5,1,4)
  (same comment as for Acetic acid)
- Chlorine [air, urban air close to ground]: 2.39e-6 kg; lognormal variance with pedigree 0.4386, pedigree (2,5,5,1,4)
  (same comment as for Acetic acid)
- Radium-226 [air, urban air close to ground]: 2.7e-5 kBq; lognormal variance with pedigree 0.4386, pedigree (2,5,5,1,4)
  (same comment as for Acetic acid)
- Hydrocarbons, aliphatic, unsaturated [air, urban air close to ground]: 4.91e-5 kg; lognormal variance with pedigree 0.1786, pedigree (2,5,5,1,4)
  (same comment as for Acetic acid)
- Pentane [air, urban air close to ground]: 2e-6 kg; lognormal variance with pedigree 0.1786, pedigree (2,5,5,1,4)
  (same comment as for Acetic acid)
- Xylene [air, urban air close to ground]: 5.09e-6 kg; lognormal variance with pedigree 0.1786, pedigree (2,5,5,1,4)
  (same comment as for Acetic acid)
- Titanium [air, urban air close to ground]: 4.66e-7 kg; lognormal variance with pedigree 0.7786, pedigree (2,5,5,1,4)
  (same comment as for Acetic acid)
- Fluorine [air, urban air close to ground]: 6.65e-7 kg; lognormal variance with pedigree 0.1786, pedigree (2,5,5,1,4)
  (same comment as for Acetic acid)
- Ethane [air, urban air close to ground]: 2.34e-5 kg; lognormal variance with pedigree 0.1786, pedigree (2,5,5,1,4)
  (same comment as for Acetic acid)
- Benzo(a)pyrene [air, urban air close to ground]: 3.75e-8 kg; lognormal variance with pedigree 0.1786, pedigree (2,5,5,1,4)
  (same comment as for Acetic acid)
- m-Xylene [air, urban air close to ground]: 1.6e-6 kg; lognormal variance with pedigree 0.1786, pedigree (2,5,5,1,4)
  (same comment as for Acetic acid)
- Molybdenum [air, urban air close to ground]: 8.76e-8 kg; lognormal variance with pedigree 0.7786, pedigree (2,5,5,1,4)
  (same comment as for Acetic acid)
- Methanol [air, urban air close to ground]: 5.94e-7 kg; lognormal variance with pedigree 0.1786, pedigree (2,5,5,1,4)
  (same comment as for Acetic acid)
- Cobalt [air, urban air close to ground]: 9.73e-8 kg; lognormal variance with pedigree 0.7786, pedigree (2,5,5,1,4)
  (same comment as for Acetic acid)
- Uranium [air, urban air close to ground]: 8.28e-9 kg; lognormal variance with pedigree 0.7786, pedigree (2,5,5,1,4)
  (same comment as for Acetic acid)
- Phenol, pentachloro- [air, urban air close to ground]: 1.08e-10 kg; lognormal variance with pedigree 0.1786, pedigree (2,5,5,1,4)
  (same comment as for Acetic acid)
- Dinitrogen monoxide [air, urban air close to ground]: 3.63e-5 kg; lognormal variance with pedigree 0.1786, pedigree (2,5,5,1,4)
  (same comment as for Acetic acid)
- Ethyne [air, urban air close to ground]: 7.79e-6 kg; lognormal variance with pedigree 0.1786, pedigree (2,5,5,1,4)
  (same comment as for Acetic acid)
- Carbon monoxide, non-fossil [air, urban air close to ground]: 0.000639 kg; lognormal variance with pedigree 0.7786, pedigree (2,5,5,1,4)
  (same comment as for Acetic acid)
- Formaldehyde [air, urban air close to ground]: 2.59e-6 kg; lognormal variance with pedigree 0.1786, pedigree (2,5,5,1,4)
  (same comment as for Acetic acid)
- Nickel [air, urban air close to ground]: 9.28e-7 kg; lognormal variance with pedigree 0.7786, pedigree (2,5,5,1,4)
  (same comment as for Acetic acid)
- Arsenic [air, urban air close to ground]: 1.11e-7 kg; lognormal variance with pedigree 0.1786, pedigree (2,5,5,1,4)
  (same comment as for Acetic acid)
- Vanadium [air, urban air close to ground]: 3.24e-6 kg; lognormal variance with pedigree 0.7786, pedigree (2,5,5,1,4)
  (same comment as for Acetic acid)
- Copper [air, urban air close to ground]: 3.94e-7 kg; lognormal variance with pedigree 0.7786, pedigree (2,5,5,1,4)
  (same comment as for Acetic acid)
- Nitrogen oxides [air, urban air close to ground]: 0.00172 kg; lognormal variance with pedigree 0.0807, pedigree (1,3,5,3,1)
  (same comment as for Water, unspecified natural origin)
- Benzene, hexachloro- [air, urban air close to ground]: 9.58e-14 kg; lognormal variance with pedigree 0.1786, pedigree (2,5,5,1,4)
  (same comment as for Acetic acid)
- Thorium-228 [air, urban air close to ground]: 1.25e-5 kBq; lognormal variance with pedigree 0.4386, pedigree (2,5,5,1,4)
  (same comment as for Acetic acid)
- Potassium [air, urban air close to ground]: 0.000314 kg; lognormal variance with pedigree 0.7786, pedigree (2,5,5,1,4)
  (same comment as for Acetic acid)
- Benzene, ethyl- [air, urban air close to ground]: 3.99e-7 kg; lognormal variance with pedigree 0.1786, pedigree (2,5,5,1,4)
  (same comment as for Acetic acid)
- Suspended solids, unspecified [water, surface water]: 0.00115 kg; lognormal variance with pedigree 0.0807, pedigree (1,3,5,3,1)
  (same comment as for Water, unspecified natural origin)
- Water [water, unspecified]: 0.0637 m3; name water_to_water_unspecified; = water_cooling_UNO_input*(1-fraction_CW_to_air)+water_UNO_input*(1-fraction_PW_to_air); lognormal variance with pedigree 0.0807, pedigree (2,2,5,1,1)
  (same comment as for Water)
  property carbon content, fossil 0; name C_content_fossil
  property wet mass 1000 kg; name WM
  property dry mass 0 kg; name DM
  property fraction, origin: unspecified 1; name fraction_origin_unspecified_Ww
  property water in wet mass 1000 kg; name WWM
  property carbon content, non-fossil 0; name C_content_non_fossil
  property fraction, origin: fresh water 0; name fraction_origin_fresh_water_Ww
  property fraction, origin: salt water 0; name fraction_origin_salt_water_Ww
- Radon-222 [air, urban air close to ground]: 6.35e-6 kBq; lognormal variance with pedigree 0.4386, pedigree (2,5,5,1,4)
  (same comment as for Acetic acid)
- Iron [air, urban air close to ground]: 2.2e-5 kg; lognormal variance with pedigree 0.7786, pedigree (2,5,5,1,4)
  (same comment as for Acetic acid)
- Ethene [air, urban air close to ground]: 4.67e-5 kg; lognormal variance with pedigree 0.7786, pedigree (2,5,5,1,4)
  (same comment as for Acetic acid)
- Thorium-232 [air, urban air close to ground]: 7.78e-6 kBq; lognormal variance with pedigree 0.4386, pedigree (2,5,5,1,4)
  (same comment as for Acetic acid)
- Selenium [air, urban air close to ground]: 1.32e-7 kg; lognormal variance with pedigree 0.7786, pedigree (2,5,5,1,4)
  (same comment as for Acetic acid)
- Lead-210 [air, urban air close to ground]: 0.000105 kBq; lognormal variance with pedigree 0.4386, pedigree (2,5,5,1,4)
  (same comment as for Acetic acid)
- Carbon monoxide, fossil [air, urban air close to ground]: 0.00618 kg; lognormal variance with pedigree 0.7786, pedigree (2,5,5,1,4)
  (same comment as for Acetic acid)
- Radon-220 [air, urban air close to ground]: 6.35e-6 kBq; lognormal variance with pedigree 0.4386, pedigree (2,5,5,1,4)
  (same comment as for Acetic acid)
- Nitrogen [water, surface water]: 0.00015 kg; lognormal variance with pedigree 0.0807, pedigree (1,3,5,3,1)
  (same comment as for Water, unspecified natural origin)
- Methane, non-fossil [air, urban air close to ground]: 5.32e-6 kg; lognormal variance with pedigree 0.1786, pedigree (2,5,5,1,4)
  (same comment as for Acetic acid)
- Benzene [air, urban air close to ground]: 2.06e-5 kg; lognormal variance with pedigree 0.1786, pedigree (2,5,5,1,4)
  (same comment as for Acetic acid)
- Hydrogen sulfide [air, urban air close to ground]: 1.54e-7 kg; lognormal variance with pedigree 0.1786, pedigree (2,5,5,1,4)
  (same comment as for Acetic acid)
- Strontium [air, urban air close to ground]: 4.46e-7 kg; lognormal variance with pedigree 0.7786, pedigree (2,5,5,1,4)
  (same comment as for Acetic acid)
- Butane [air, urban air close to ground]: 1.17e-6 kg; lognormal variance with pedigree 0.4386, pedigree (2,5,5,1,4)
  (same comment as for Acetic acid)
- Chromium VI [air, urban air close to ground]: 2.37e-9 kg; lognormal variance with pedigree 0.7786, pedigree (2,5,5,1,4)
  (same comment as for Acetic acid)
- Particulates, > 2.5 um, and < 10um [air, urban air close to ground]: 7.14e-5 kg; lognormal variance with pedigree 0.2586, pedigree (2,5,5,1,4)
  (same comment as for Acetic acid)

## Sampling procedure
Based on literature and statistics (see dataset field “Published Source”)

## Extrapolations
This dataset has been extrapolated from year 2000 to the year of the calculation (2021). The uncertainty has been adjusted accordingly.

## Review by Hans-Jörg Althaus 2003-08-26
passed
