# treatment of used glider, passenger car, shredding

Dataset: EcoSpold 2, unit process
Geography: GLO
Time period: 2005-01-01 to 2021-12-31
Technology level: current
Classification: ISIC rev.4 ecoinvent: 3830:Materials recovery
Classification: EcoSpold01Categories: waste management/recycling
Tags: Treatment
Scenario: Business-as-Usual
System model: Allocation, cut-off by classification
Generated by: Andrea Del Duce
Published in: Hischier R. 2007
Database: ecoinvent
isCopyrightProtected: true
accessRestrictedTo: 1

## General comment
This dataset describes the shredding of the used glider of a passenger car. The entris are given per kg glider. The original data has been collected for the driver of a compact car with a glider weight of approximately 800 kg. Data is based on the e-waste shredding dataset which is based on literature. Infrastructure assumptions for the treatment facility are based on assumptions taken from weee. The output scrap and waste material quantities are derived from the respective glider dataset. The materialization of the glider is divided in 5 main fractions: scrap steel, scrap Aluminium, scrap Copper, scrap plastics and a shredding residue. These are the output waste flows of the process.The details concerning the materialization of the glider trated in this dataset are described in F. Habermacher "Modeling material inventories and environmental impacts of electric passenger cars", Master Thesis, Department of Environmental Sciences, ETH Zurich, 2011.
[This dataset was already contained in the ecoinvent database version 2. It was not individually updated during the transfer to ecoinvent version 3. Life Cycle Impact Assessment results may still have changed, as they are affected by changes in the supply chain, i.e. in other datasets. This dataset was generated following the ecoinvent quality guidelines for version 2. It may have been subject to central changes described in the ecoinvent version 3 change report (http://www.ecoinvent.org/database/ecoinvent-version-3/reports-of-changes/), and the results of the central updates were reviewed extensively. The changes added e.g. consistent water flows and other information throughout the database. The documentation of this dataset can be found in the ecoinvent reports of version 2, which are still available via the ecoinvent website. The change report linked above covers all central changes that were made during the conversion process.]

## Included activities start
The dataset takes as input the used glider and includes the treatment facility.

## Included activities end
This dataset returns the scrap fractions going to the specific recycling facilities and the emissions produced during the treatment process.

## Geography
Data from a European study, values used as global average data.

## Technology
Modern Shredder facility with 2 shredder, 2 magnetic separation & 2 Eddy-current separation steps.

## Parameters
- aluminum fraction recovery: 0.8258 dimensionless; name rec_f_Al
- steel fraction recovery: 0.95 dimensionless; name rec_f_Fe
- copper fraction recovery: 0.7821 dimensionless; name rec_f_Cu
- plastic fraction recovery: 0.8829 dimensionless; name rec_f_Plastic

## Reference product
- used glider, passenger car: -1 kg; name RP_amount_1; source F. Habermacher 2011; CPC 39990: Other wastes n.e.c.; By-product classification Waste
  production volume 4.8e10 kg; name RP_PV_1
    Estimate based on projections of passenger car production for 2012. Total of 60000000 vehicles for 2012..
  property price 0 EUR2005; name RP_amount_1_price_EUR2005
    Waste products are assigned a price of zero as they are assumed to require further treatment.

## By-products
- aluminium scrap, post-consumer: 0 kg; source F. Habermacher 2011; CPC 39363: Waste and scrap of aluminium; By-product classification Recyclable; pedigree (1,1,1,1,1)
  Metal outputs from glider shredding based on ecoinvent transfer coefficients from weee shredding (ecoinvent report 18, p.21). Material in glider given in Habermacher 2010.
  production volume 0 kg; = RP_PV_1 * (ABS( BP_amount_5) / ABS(RP_amount_1))
    Calculated from production volume of reference product using the relative outputs.
  property price 0.685 EUR2005
    Temporary price data. Calculated as 90% of purchasers price based on: estimated at 85% of new scrap
  property carbon content 0
    carbon content on a dry matter basis (reserved; not for manual entry)
  properties: carbon content, fossil 0, dry mass 1 kg, carbon content, non-fossil 0, water content 0, wet mass 1 kg, water in wet mass 0 kg, carbon allocation 0 kg
- iron scrap, unsorted: 0 kg; source F. Habermacher 2011; CPC 39310: Slag, dross, scalings and other waste from the manufacture of iron or steel; By-product classification Recyclable; pedigree (1,1,1,1,1)
  (same comment as for aluminium scrap, post-consumer)
  production volume 0 kg; = RP_PV_1 * (ABS( BP_amount_3) / ABS(RP_amount_1))
    Calculated from production volume of reference product using the relative outputs.
  property price 0.149 EUR2005
    Temporary price data. Calculated as 90% of purchasers price based on: estimated at 85% of sorted scrap
  property carbon content 0
    carbon content on a dry matter basis (reserved; not for manual entry)
  properties: carbon content, fossil 0, water in wet mass 0 kg, dry mass 1 kg, carbon content, non-fossil 0, wet mass 1 kg, water content 0, carbon allocation 0 kg
- copper scrap, sorted, pressed: 0 kg; source F. Habermacher 2011; CPC 39361: Waste and scrap of copper; By-product classification Recyclable; pedigree (1,1,1,1,1)
  (same comment as for aluminium scrap, post-consumer)
  production volume 0 kg; = RP_PV_1 * (ABS( BP_amount_2) / ABS(RP_amount_1))
    Calculated from production volume of reference product using the relative outputs.
  property price 2.84 EUR2005
    Temporary price data. Calculated as 90% of purchasers price based on: Source: USGS Mineral Yearbook 2007, Table 1 in <http://minerals.usgs.gov/minerals/pubs/commodity/recycle/myb1-2007-recyc.pdf>
  property carbon content 0
    carbon content on a dry matter basis (reserved; not for manual entry)
  properties: water in wet mass 0 kg, dry mass 1 kg, carbon content, fossil 0, water content 0, carbon content, non-fossil 0, wet mass 1 kg, carbon allocation 0 kg

## Inputs from technosphere
All rows: source F. Habermacher 2011
- mechanical treatment facility, waste electric and electronic equipment: 8e-10 unit; lognormal variance with pedigree 0.5701, pedigree (3,5,5,3,5)
  Value taken from shredding process for electronics waste. Pedigree matrix changed accordingly. Original comment:values from Swiss Recycling company in Morf (2004)
  EcoSpold01Location=GLO
  Uncertainty: rough estimation of infrastructure
- residue from shredder fraction from manual dismantling: 0 kg; name BP_amount_1; pedigree (1,1,1,1,1)
  Residue calculated after applying on 1 kg of glider the recovery fractions given in ecoinvent report 18, p.21. Materials in glider given in Habermacher 2010.
  production volume 0 kg
    Calculated from production volume of reference product using the relative outputs.
  property price 0 EUR2005; name BP_amount_1_price_EUR2005
  properties: carbon content, fossil 0.664925, wet mass 1 kg, dry mass 1 kg
- waste plastic, mixture: 0 kg; name BP_amount_4; pedigree (1,1,1,1,1)
  Sum of plastic materials in glider dataset. The final output has been calculated based on ecoinvent transfer coefficients from weee shredding (ecoinvent report 18, p.21). Materials in glider given in Habermacher 2010.
  production volume 0 kg
    Calculated from production volume of reference product using the relative outputs.
  property price 0 EUR2005; name BP_amount_4_price_EUR2005
  properties: heating value, net 30.79 MJ, water content 0.180638, carbon content, fossil 0.747344, dry mass 0.847 kg, wet mass 1 kg
  note on heating value, net: Value taken from the general comment of the treatment dataset.
- electricity, medium voltage: 0.066 kWh; lognormal variance with pedigree 0.0527, pedigree (3,3,5,3,1)
  EcoSpold01Location=UCTE
  Value taken from shredding process for electronics waste. Pedigree matrix changed accordingly. Original comment:values from Swiss Recycling company in Morf (2004)
  Uncertainty: literature values - based on survey of European companies
- aluminium scrap, post-consumer: -0.00417855 kg; lognormal variance with pedigree 0.0504, pedigree (2,3,5,4,3)
  (same comment as for aluminium scrap, post-consumer)
  production volume 2.0057e8 kg
  properties: price 0.685 EUR2005, dry mass 1 kg, wet mass 1 kg
- iron scrap, unsorted: -0.654265 kg; lognormal variance with pedigree 0.0504, pedigree (2,3,5,4,3)
  (same comment as for aluminium scrap, post-consumer)
  production volume 3.14047e10 kg
  properties: price 0.149 EUR2005, dry mass 1 kg, wet mass 1 kg
- copper scrap, sorted, pressed: -0.00662204 kg; lognormal variance with pedigree 0.0518, pedigree (2,4,5,4,3)
  (same comment as for aluminium scrap, post-consumer)
  production volume 3.17858e8 kg
  properties: dry mass 1 kg, price 2.84 EUR2005, wet mass 1 kg
- residue from shredder fraction from manual dismantling: -0.00267142, -0.176829 kg (2 entries); lognormal variance with pedigree 0.043, pedigree (2,3,5,4,2)
  (same comment as for residue from shredder fraction from manual dismantling)
  production volume 8.616e9 kg
- waste plastic, mixture: -0.0149571, -0.0011531, -0.000476272, -0.000452265, -0.0172578, -0.000192408, -8.72071e-5, -0.120814 kg (8 entries); lognormal variance with pedigree 0.0504, pedigree (2,3,5,4,3)
  (same comment as for waste plastic, mixture)
  production volume 7.45874e9 kg

## Emissions to nature
All rows: source Hischier R. 2007
- Zinc [air, urban air close to ground]: 1.309e-6 kg; lognormal variance with pedigree 0.1121, pedigree (3,4,5,3,3)
  Value taken from shredding process for electronics waste. Pedigree matrix changed accordingly. Original comment:values from Swiss Recycling company in Morf (2004)
  Uncertainty: values from Swiss Recycling company in Morf (2004)
- Antimony [air, urban air close to ground]: 1.19e-7 kg; lognormal variance with pedigree 0.1121, pedigree (3,4,5,3,3)
  (same comment as for Zinc)
- Nickel [air, urban air close to ground]: 1.61e-7 kg; lognormal variance with pedigree 0.1121, pedigree (3,4,5,3,3)
  (same comment as for Zinc)
- Mercury [air, urban air close to ground]: 1.19e-10 kg; lognormal variance with pedigree 0.1121, pedigree (3,4,5,3,3)
  (same comment as for Zinc)
- Polychlorinated biphenyls [air, urban air close to ground]: 1.89e-9 kg; lognormal variance with pedigree 0.1921, pedigree (3,4,5,3,3)
  (same comment as for Zinc)
- Tin [air, urban air close to ground]: 3.01e-7 kg; lognormal variance with pedigree 0.1101, pedigree (1,4,5,3,3)
  (same comment as for Zinc)
- Chlorine [air, urban air close to ground]: 3.22e-7 kg; lognormal variance with pedigree 0.1121, pedigree (3,4,5,3,3)
  (same comment as for Zinc)
- Copper [air, urban air close to ground]: 4.2e-7 kg; lognormal variance with pedigree 0.1121, pedigree (3,4,5,3,3)
  (same comment as for Zinc)
- Chromium [air, urban air close to ground]: 5.18e-8 kg; lognormal variance with pedigree 0.1121, pedigree (3,4,5,3,3)
  (same comment as for Zinc)
- Aluminium [air, urban air close to ground]: 1.4e-6 kg; lognormal variance with pedigree 0.1107, pedigree (2,4,5,3,3)
  (same comment as for Zinc)
- Lead [air, urban air close to ground]: 4.13e-7 kg; lognormal variance with pedigree 0.1121, pedigree (3,4,5,3,3)
  (same comment as for Zinc)
- Bromine [air, urban air close to ground]: 2.38e-7 kg; lognormal variance with pedigree 0.1121, pedigree (3,4,5,3,3)
  (same comment as for Zinc)
- Iron [air, urban air close to ground]: 4.83e-6 kg; lognormal variance with pedigree 0.1121, pedigree (3,4,5,3,3)
  (same comment as for Zinc)
- Phosphorus [air, urban air close to ground]: 1.4e-8 kg; lognormal variance with pedigree 0.1121, pedigree (3,4,5,3,3)
  (same comment as for Zinc)
- Cadmium [air, urban air close to ground]: 2.38e-8 kg; lognormal variance with pedigree 0.1121, pedigree (3,4,5,3,3)
  (same comment as for Zinc)

## Sampling procedure
own estimation

## Extrapolations
This dataset has been extrapolated from year 2005 to the year of the calculation (2021). The uncertainty has been adjusted accordingly.

## Review by Christian Bauer 2012-06-28
passed
