# rape oil mill operation

Dataset: EcoSpold 2, unit process
Geography: CH
Time period: 1998-01-01 to 2021-12-31
Technology level: current
Classification: ISIC rev.4 ecoinvent: 1040:Manufacture of vegetable and animal oils and fats
Classification: EcoSpold01Categories: biomass/fuels
Tags: ConvertedDataset
Scenario: Business-as-Usual
System model: Allocation, cut-off by classification
Share of production covered: 0 %
Generated by: Edgard Gnansounou
Published in: Jungbluth N. 2007
Database: ecoinvent
isCopyrightProtected: true
accessRestrictedTo: 1

## General comment
Inventory refers to the production of 1 kg rape oil, respectively rape meal. The multioutput-process 'rape seeds, in oil mill' delivers the co-products 'rape oil, at oil mill' and 'rape meal, at oil mill'. Economic allocation with allocation factor of 74.3% to rape oil. Allocation is done according to carbon balance for CO2 emissions.
[This dataset was already contained in the ecoinvent database version 2. It was not individually updated during the transfer to ecoinvent version 3. Life Cycle Impact Assessment results may still have changed, as they are affected by changes in the supply chain, i.e. in other datasets. This dataset was generated following the ecoinvent quality guidelines for version 2. It may have been subject to central changes described in the ecoinvent version 3 change report (http://www.ecoinvent.org/database/ecoinvent-version-3/reports-of-changes/), and the results of the central updates were reviewed extensively. The changes added e.g. consistent water flows and other information throughout the database. The documentation of this dataset can be found in the ecoinvent reports of version 2, which are still available via the ecoinvent website. The change report linked above covers all central changes that were made during the conversion process.]

## Included activities end
This process includes the transport of rape seeds to the mill, and the processing of the seeds to rape oil and rape meal. The oil extraction refers to the cold-press extraction technique. System boundary is at the oil mill.

## Geography
Data from biodiesel producers in CH, industrial data

## Technology
Cold pressing of rape seeds in a standard oil press (based on the EcoEnergie Etoy biodiesel pilot plant, CH), Swiss context.

## Time period
Data from 1998 to 2006, current technology in CH

## Parameters
- fraction, cooling water, cooling pond system, to air: 0.032 dimensionless; name fraction_CW_CP_to_air; lognormal variance with pedigree 0.0413, pedigree (2,3,1,3,1)
  Calculated based on literature value (Scown, C.D., 2011, Water Footprint of U.S. Transportation Fuels and supplying information of the article) (Vionnet, S., Quantis Water Database - Technical Report, 2012).
- fraction, cooling water, once-through system, to air: 0.004 dimensionless; name fraction_CW_OT_to_air; lognormal variance with pedigree 0.0413, pedigree (2,3,1,3,1)
  (same comment as for fraction, cooling water, cooling pond system, to air)
- fraction, process water, to air: 0.436296 dimensionless; name fraction_PW_to_air; lognormal variance with pedigree 0.092025, pedigree (4,4,3,2,4)
  Calculated based on literature value (Omni Tech International, 2010 & Schmidt, 2007, Life cycle assessment for rapeseed oil and palm oil & Sheenhan, 1998, An Overview of Biodiesel and Petroleum Diesel Life Cycles) (Vionnet, S., Quantis Water Database - Technical Report, 2012).
- fraction, cooling water, recirculating system, to air: 0.771 dimensionless; name fraction_CW_R_to_air; lognormal variance with pedigree 0.0413, pedigree (2,3,1,3,1)
  (same comment as for fraction, cooling water, cooling pond system, to air)
- fraction, cooling water, to air: 0.3875 dimensionless; name fraction_CW_to_air; = (0.5*fraction_CW_OT_to_air)+(0.5*fraction_CW_R_to_air); lognormal variance with pedigree 0.092025, pedigree (4,4,3,2,4)
  Calculated value based on literature value (see comments of the other parametres present in this dataset) and expert opinion. In the case when no industry/literature data are available about the type of cooling or directly fraction, cooling water, to air specific for the process a default assumption is applied. It is assumed that the once-through cooling system is used in 50% of all cases and recirculating system is used in another 50% of all cases.

## Reference product
- rape oil, crude: 1 kg; CPC 21641: Rape, colza and mustard oil, crude; By-product classification allocatable product; CAS 8002-13-9
  EcoSpold01Location=CH
  production volume 2.72e7 kg
    Approx. 6 kt of rape seeds were processed to biodiesel in 2004 in CH
    FAOSTAT
  property heating value, net 23.51 MJ
    LHV is calculated based on the Carbon content of the product. More details can be found on the respective documentation.
  property price 0.538 EUR2005
    Temporary price data. Calculated as 90% of purchasers price based on: 2004 prices are calculated from World Import/Export data (tonnes and US$) from FaoStat statistics (http://faostat.fao.org/site/535/default.aspx#ancor, TRADE). [Accessed 24 May 2010].
  property carbon content 0.776
    carbon content on a dry matter basis (reserved; not for manual entry)
  property true value 0.203983
    allocation property applied in "true value" allocation // value calculated from revenue
  properties: EcoSpold01Allocation_undefined_6 74.05, EcoSpold01Allocation_undefined_4 74.05, EcoSpold01Allocation_undefined_12 74.05, EcoSpold01Allocation_undefined_3 0, EcoSpold01Allocation_undefined_9 74.05, EcoSpold01Allocation_undefined_1 100, EcoSpold01Allocation_undefined_10 74.05, EcoSpold01Allocation_undefined_7 74.05, EcoSpold01Allocation_undefined_15 79.6264, EcoSpold01Allocation_undefined_16 79.6264, EcoSpold01Allocation_undefined_18 79.6264, EcoSpold01Allocation_undefined_17 79.6264, water in wet mass 0 kg, wet mass 1 kg, carbon content, non-fossil 0.776, carbon content, fossil 0, water content 0, dry mass 1 kg, EcoSpold01Allocation_undefined_5 74.05, EcoSpold01Allocation_undefined_8 74.05, EcoSpold01Allocation_undefined_13 75.39, EcoSpold01Allocation_undefined_11 74.05, EcoSpold01Allocation_undefined_2 100, carbon allocation 0.776 kg

## By-products
- rape meal: 0 kg; CPC 23319: Preparations used in animal feeding n.e.c.; By-product classification allocatable product
  EcoSpold01Location=CH
  production volume 4.45489e7 kg
    Approx. 6 kt of rape seeds were processed to biodiesel in 2004 in CH
    Calculated from oil output
  property carbon content, non-fossil 0.457233
    Composition data obtained from Table 2 in Uses of Canola Meal, J. Bonnardeaux, Department of Agriculture and Food, Western Australia, 2007. First, composition data were refered to 1 kg dry mass. Then, C-contents were calculated considering a C-content/dry mass of 46% in carbohydrates (including fibres), 53% in proteins and 75% in fats. All data from "Evolutionary and Biochemical Aspects", A.D. Kay and T. Vrede (in Global Ecology, 2010, Elsevier B.V., S.E. Jørgensen Ed.).
  property price 0.127 EUR2005
    Temporary price data. Calculated as 90% of purchasers price based on: 2004 prices are calculated from World Import/Export data (tonnes and US$) from FaoStat statistics (http://faostat.fao.org/site/535/default.aspx#ancor, TRADE)- Commodity: 'Cake of rape seed'. [Accessed 24 May 2010].
  property carbon content 0.457233
    carbon content on a dry matter basis (reserved; not for manual entry)
  property true value 0.0788479
    allocation property applied in "true value" allocation // value calculated from revenue
  properties: EcoSpold01Allocation_undefined_18 20.3736, EcoSpold01Allocation_undefined_15 20.3736, EcoSpold01Allocation_undefined_17 20.3736, EcoSpold01Allocation_undefined_16 20.3736, water in wet mass 0.1 kg, carbon content, fossil 0, water content 0.111111, wet mass 1 kg, dry mass 0.9 kg, EcoSpold01Allocation_undefined_4 25.95, EcoSpold01Allocation_undefined_13 24.61, EcoSpold01Allocation_undefined_7 25.95, EcoSpold01Allocation_undefined_11 25.95, EcoSpold01Allocation_undefined_6 25.95, EcoSpold01Allocation_undefined_8 25.95, EcoSpold01Allocation_undefined_10 25.95, EcoSpold01Allocation_undefined_12 25.95, EcoSpold01Allocation_undefined_14 100, EcoSpold01Allocation_undefined_5 25.95, EcoSpold01Allocation_undefined_2 0, EcoSpold01Allocation_undefined_3 100, EcoSpold01Allocation_undefined_9 25.95, carbon allocation 0.41151 kg

## Inputs from technosphere
- phosphoric acid, industrial grade, without water, in 85% solution state: 0.000679389 kg; lognormal variance with pedigree 0.040025, pedigree (1,1,5,2,1)
  EcoSpold01Location=RER
  Literature data & industrial data from biodiesel producer in CH
  Uncertainty: Literature data & industrial data from biodiesel producer in CH
  properties: dry mass 1 kg, wet mass 1 kg
- electricity, medium voltage: 0.117993 kWh; lognormal variance with pedigree 0.040025, pedigree (1,1,5,2,1)
  EcoSpold01Location=CH
  Industrial data from biodiesel producer in CH
  Uncertainty: Industrial data from biodiesel producer in CH
- oil mill: 6.3406e-10 unit; lognormal variance with pedigree 0.42, pedigree (1,1,5,1,4)
  EcoSpold01Location=CH
  Calculation, according to feed capacity and lifetime of the plant
  Uncertainty: Calculation, according to feed capacity and lifetime of the plant
- rape seed, organic: 0.019022 kg; lognormal variance with pedigree 0.040025, pedigree (1,1,5,2,1)
  Industrial data from biodiesel producer in CH
  EcoSpold01Location=CH
  Uncertainty: Industrial data from biodiesel producer in CH
  properties: water content 0.0638298, wet mass 1 kg, carbon content, non-fossil 0.574, dry mass 0.94 kg
  note on carbon content, non-fossil: Composition data obtained from Table 2.1 in Utilization of canola seed fractions in ruminant feeds, Master thesis by Ravindra Guptha Heendeniya, University of Saskatchewan (Canada), 2008 (http://library2.usask.ca/theses/available/etd-06162008-141937/unrestricted/THESES_Ravindra_Heendeniya_17_june_2008.pdf). First, composition data were refered to 1 kg dry mass. Then, C-contents were calculated considering a C-content/dry mass of 46% in carbohydrates (including fibres), 53% in proteins and 75% in fats. All data from "Evolutionary and Biochemical Aspects", A.D. Kay and T. Vrede (in Global Ecology, 2010, Elsevier B.V., S.E. Jørgensen Ed.).
- rape seed, Swiss integrated production: 1.88318 kg; lognormal variance with pedigree 0.040025, pedigree (1,1,5,2,1)
  (same comment as for rape seed, organic)
  properties: water content 0.0638298, carbon content, non-fossil 0.574, dry mass 0.94 kg, wet mass 1 kg

## Inputs from nature
- Water, cooling, unspecified natural origin [natural resource, in water]: 5.04693e-5 m3; name water_cooling_UNO_input; source Schmidt, J.H. 2007; lognormal variance with pedigree 0.0527, pedigree (2,4,5,3,1)
  Calculated based on literature (Schmidt, J.H., 2007, Life cycle assessment for rapeseed oil and palm oil; Omni Tech International, 2010, Life Cycle Impact of Soybean Production and Soy Industrial Products), (Vionnet, S., Quantis Water Database - Technical Report, 2012). The process starts when rapeseeds enter the oil plant. It includes the processes: raw material reception and storage, screening, pre-heating, rolling, conditioning, pressing, clarification, drying, solvent extraction, heating, centrifugation, drying, etc. The process ends when refined rapeseed oil leaves the plant. It is assumed that 80% of water use is allocated to cooling water and 20% of water is allocated as process water. The evaporation rate for process water used is the same as in case of oil production from soybeans.
  property carbon content, fossil 0.0104329; name C_content_fossil
  property dry mass 0.1101 kg; name DM
  property wet mass 1000 kg; name WM
  property carbon content, non-fossil 0; name C_content_non_fossil
  property water content 9081.65; name water_content
  property water in wet mass 999.89 kg; name WWM
- Carbon dioxide, in air [natural resource, in air]: 1.73174 kg; lognormal variance with pedigree 0.04, pedigree (1,1,5,1,1)
  Correction to close carbon balance of individual outputs
  Uncertainty: Correction to close carbon balance of individual outputs
- Water, unspecified natural origin [natural resource, in water]: 1.26173e-5 m3; name water_UNO_input; source Schmidt, J.H. 2007; lognormal variance with pedigree 0.052625, pedigree (3,3,5,2,1)
  Calculated based on literature (Schmidt, J.H., 2007, Life cycle assessment for rapeseed oil and palm oil; Omni Tech International, 2010, Life Cycle Impact of Soybean Production and Soy Industrial Products), (Vionnet, S., Quantis Water Database - Technical Report, 2012). The process starts when rapeseeds enter the oil plant. It includes the processes: raw material reception and storage, screening, pre-heating, rolling, conditioning, pressing, clarification, drying, solvent extraction, heating, centrifugation, drying, etc. It is assumed that 80% of water use is allocated to cooling water and 20% of water is allocated as process water. The evaporation rate for process water used is the same as in case of oil production from soybeans.

## Emissions to nature
- Water [water, unspecified]: 3.80249e-5 m3; name water_to_water_unspecified; = water_cooling_UNO_input*(1-fraction_CW_to_air)+water_UNO_input*(1-fraction_PW_to_air); lognormal variance with pedigree 0.0807, pedigree (2,2,5,1,1)
  Calculated value based on literature values and expert opinion. See comments in the parametres' comment field.
  property fraction, origin: salt water 0; name fraction_origin_salt_water_Ww
  property fraction, origin: unspecified 1; name fraction_origin_unspecified_Ww
  property fraction, origin: fresh water 0; name fraction_origin_fresh_water_Ww
- Carbon dioxide, non-fossil [air, urban air close to ground]: 1.74778 kg; lognormal variance with pedigree 0.04, pedigree (1,1,5,1,1)
  (same comment as for Carbon dioxide, in air)
- Water [air, unspecified]: 2.50617e-5 m3; name water_to_air_unspecified; = (water_cooling_UNO_input*fraction_CW_to_air)+(water_UNO_input*fraction_PW_to_air); lognormal variance with pedigree 0.0807, pedigree (2,2,5,1,1)
  (same comment as for Water)
  property fraction, origin: fresh water 0; name fraction_origin_fresh_water
  property fraction, origin: salt water 0; name fraction_origin_salt_water
  property fraction, origin: unspecified 1; name fraction_origin_unspecified

## Sampling procedure
Data from various biodiesel producers in CH, industrial data

## Review by Niels Jungbluth 2006-08-15
Passed.
none
