# nutrient supply from potassium chloride

Dataset: EcoSpold 2, unit process
Geography: RER
Time period: 2016-01-01 to 2021-12-31
Technology level: current
Classification: ISIC rev.4 ecoinvent: 0161:Support activities for crop production
Scenario: Business-as-Usual
System model: Allocation, cut-off by classification
Generated by: Avraam Symeonidis
Database: ecoinvent
isCopyrightProtected: true
accessRestrictedTo: 1

## General comment
This inventory describes the supply of nutrients from ''potassium chloride'' for fertiliser use.
No machinery expenditures or emissions to the environment are considered related to the actual application of this substance on soil during its agricultural use. The purpose of this activity is to connect the chemical production of ''potassium chloride'' with its generic use as fertilizer. The product ''potassium chloride'' is connected to the generic market for ''inorganic potassium fertiliser, as K2O'' through this supplying activity. In the agricultural context, ''potassium chloride'' can be used directly as a fertilizer input to crop production, eventually with other chemicals; alternatively, a generic input of ''inorganic potassium fertiliser, as K2O'' can be used instead, and this will represent the regional consumption mix for his type of nutrient. A way in between is allowed by using the generic input ''inorganic potassium fertiliser, as K2O'' and link to the activity providing it from a specific chemical.
In all cases, emissions associated to the application of the fertilizer have to be calculated in the crop production activity.

## Technology
Inventory based on composition of ''potassium chloride''.

## Reference product
- inorganic potassium fertiliser, as K2O: 1 kg; name RP; CPC 3463: Mineral or chemical fertilizers, potassic; By-product classification allocatable product
  production volume 3.17797e9 kg; = 12413961.55*1000*0.256
    The production volume has been extrapolated from the global production volume of this product in the database by employing GDP scaling. GDP for Europe is calculated to amount circa 25.6% of the global GDP. Original comment of the GLO dataset is: Esrimated value. Based on data from FAO, the global agricultural use of potash salt amounts to 12413961.55 t. The actual value here is calculated based on the nutrient content of the potash salt.
    References: Fertilizers by Product, FAOSTAT, 2020, Food and Agricultural Organization of the United Nations. Accessed at: http://www.fao.org/faostat/en/#data/RFB, on 12 of May 2020.
  property price 0.188 EUR2005; name RP_price_EUR2005
    Temporary price data. Calculated as 90% of purchasers price based on: 2004 import price calulated from FAOSTAT (http://faostat.fao.org/site/575/DesktopDefault.aspx?PageID=575#ancor [accessed 2011.01.27] Potash Fertilizers (K20 total nutrients) in kUSD/Mg
  property oxygen content 0.169852
    Oxygen content (on a dry matter basis) of inorganic potassium fertiliser, as K2O is calculated from the molecular formula of the substance (Potassium).
  property potassium content 0.830148
    Potassium content (on a dry matter basis) of inorganic potassium fertiliser, as K2O is calculated from the molecular formula of the substance (Potassium).
  property carbon content, fossil 0
    Carbon content, fossil is calculated based on the chemical formula of the substance.
  property carbon content 0
    carbon content on a dry matter basis (reserved; not for manual entry)
  properties: carbon content, non-fossil 0, dry mass 1 kg, water content 0, water in wet mass 0 kg, wet mass 1 kg, carbon allocation 0 kg

## Inputs from technosphere
- potassium chloride: 1.66667 kg; lognormal variance with pedigree 0.1702, pedigree (3,5,2,1,4)
  properties: chlorine content 0.475552, wet mass 1 kg, dry mass 1 kg, potassium content 0.524448
  note on chlorine content: Chlorine content (on a dry matter basis) of potassium chloride is calculated from the molecular formula of the substance (KCl).
  note on potassium content: Potassium content (on a dry matter basis) of potassium chloride is calculated from the molecular formula of the substance (KCl).

## Extrapolations
This dataset has been extrapolated from year 2019 to the year of the calculation (2021). The uncertainty has been adjusted accordingly.
