# compressed air energy storage plant construction, 200 MW electrical

Dataset: EcoSpold 2, unit process
Geography: RER
Time period: 2015-01-01 to 2021-12-31
Technology level: modern
Classification: ISIC rev.4 ecoinvent: 4220:Construction of utility projects
Synonyms: CAES
Scenario: Business-as-Usual
System model: Allocation, cut-off by classification
Generated by: Heidi Hottenroth
Published in: Bouman, Evert A. 2016
Database: ecoinvent
isCopyrightProtected: true
accessRestrictedTo: 1

## General comment
This dataset represents the construction of a compressed air energy storage plant.This energy storage system is based on using electricity to compress air and store it in underground caverns or porous rock formation. The air is released when needed and passed through a turbine to generate electricity. The plant consists of an underground air storage, compressors, expanders, and gas turbine. The compressed air energy storage (CAES) system makes use of a gas turbine for heating up the outflow of air from the storage location. This is a difference to the adiabatic CAES (also available in the database) which stores the heat generated during compression in a thermal storage and used it during decompression. The CAES system described has a typical electricity demand for air compression of 0.67 kWh per kWh of electricity output. In addition 4.2 MJ of natural gas is burned in the gas turbine during the generation of electricity.
Plant specifications:
system target rating: 200 MW
lifetime: 100 a
type of underground air storage: porous rock
("The porous rock formation does not have to be constructed and is considered to be of sufficient volume.")
Assumption according to Bouman, Evert A.; Øberg, Martha M.; Hertwich, Edgar G. (2016): Environmental impacts of balancing offshore wind power with compressed air energy storage (CAES). In: Energy 95, S. 91–98. DOI: 10.1016/j.energy.2015.11.041.

## Included activities start
The activity starts with the arrival of the raw materials for plant construction and components at the construction site. As underground air storage porous rock formation is assumed. Therefore no construction of this part of the plant is considered. Inputs and preparation/processing of construction materials, energy requirements during construction and land use are included.

## Included activities end
The activity ends with the dismantling of the plant.

## Geography
The scope of the underlying literature source is Europe.

## Technology
The plant consists of an underground air storage, compressors, expanders, and gas turbine; system target rating: 200 MW

## Time period
date of publications

## Parameters
- lifetime: 100 year

## Reference product
- compressed air energy storage plant, 200 MW electrical: 1 unit; name RP; CPC 53262: Power plants; By-product classification allocatable product
  production volume 1 unit; name PV_RP
    In the time frame of the dataset no plant was realized.
  property lifetime 100 year; name RP_lifetime
  property price 2.31555e6 EUR2005; name RP_price_EUR2005
    Calculated based on inputs: The price of the product has been calculated as a sum of the values of the material and energy inputs for this product. This value is therefore a rough estimation. It may underestimate the real price since there are additional expenses when producing any product. These expences can include for example labour costs, treatment of waste materials and profit for the producer. Please consider carefully whether this level of data quality is acceptable for your application.

## By-products
- aluminium scrap, post-consumer: 0 kg; CPC 39363: Waste and scrap of aluminium; By-product classification Recyclable; pedigree (1,1,1,1,1)
  Waste generated through dismantling of the plant. Based on the amount of the corresponding material inputs.It was assumed that 90% is recycled and 10% goes to landfill.
  production volume 0 kg; = abs(BP_alu_r/RP) * PV_RP
    Calculated from production volume of reference product using the relative outputs.
  property price 0.685 EUR2005; name BP_alu_r_price_EUR2005
    Temporary price data. Calculated as 90% of purchasers price based on: estimated at 85% of new scrap
  property carbon content 0
    carbon content on a dry matter basis (reserved; not for manual entry)
  properties: water in wet mass 0 kg, water content 0, dry mass 1 kg, carbon content, fossil 0, wet mass 1 kg, carbon content, non-fossil 0, carbon allocation 0 kg

## Inputs from technosphere
- scrap copper: 0 kg; name BP_copper; pedigree (1,1,1,1,1)
  Waste generated through dismantling of the plant. Based on the amount of the corresponding material inputs.
  production volume 0 kg
    Calculated from production volume of reference product using the relative outputs.
  property price 0 EUR2005; name BP_copper_price_EUR2005
  properties: wet mass 1 kg, dry mass 1 kg
- waste concrete: 0 kg; name BP_concrete; pedigree (1,1,1,1,1)
  (same comment as for scrap copper)
  production volume 0 kg
    Calculated from production volume of reference product using the relative outputs.
  property price 0 EUR2005; name BP_concrete_price_EUR2005
  property wet mass 1.08676 kg; name WM_waste_concrete
  properties: water content 0.086758, dry mass 1 kg
- steel, low-alloyed: 395000 kg; name steel_low; lognormal variance with pedigree 0.0073, pedigree (3,4,3,3,2)
  Literature Value. For plant construction.
  property carbon content, fossil 0.005; name CCF_steel_low
  properties: dry mass 1 kg, wet mass 1 kg
- sheet rolling, aluminium: 11200 kg; = alu; lognormal variance with pedigree 0.0527, pedigree (4,4,3,3,4)
  Calculated Value. Represents the processing of the aluminium.
- sheet rolling, steel: 1.323e6 kg; = steel_low + steel_un; lognormal variance with pedigree 0.0527, pedigree (4,4,3,3,4)
  Calculated Value. Represents the processing of the steel.
- polypropylene, granulate: 16100 kg; name plastic; lognormal variance with pedigree 0.0527, pedigree (4,4,3,3,4)
  Literature value. Assumption for plastic.
  property carbon content, fossil 0.857143; name CCF_polypropylene
  properties: wet mass 1 kg, heating value, net 32.78 MJ, dry mass 1 kg
  note on heating value, net: Value extracted from "treatment of waste polypropylene, open burning"
- heat, district or industrial, other than natural gas: 2.32e7 MJ; lognormal variance with pedigree 0.0912, pedigree (5,5,3,4,4)
  Literature Value. For plant construction.
  properties: heating value, net 1 MJ
- aluminium, wrought alloy: 11200 kg; name alu; lognormal variance with pedigree 0.0073, pedigree (3,4,3,3,2)
  Literature Value. For plant construction.
  properties: wet mass 1 kg, dry mass 1 kg
- concrete, normal: 1592.44 m3; name concrete; = 3.79E+06/WM_concrete; lognormal variance with pedigree 0.0073, pedigree (3,4,3,3,2)
  Calculated Value. 3.79E+06 kg of concrete from literature converted to m3 with wet mass property (2380 kg/m3)
  property wet mass 2380 kg; name WM_concrete
  properties: dry mass 2190 kg, water content 0.086758
- gas turbine, 80MW, for compressed air energy storage: 1 unit; lognormal variance with pedigree 0.0133, pedigree (3,3,3,3,3)
  Literature Value. Power rating: 80 MW
- injection moulding: 16100 kg; = plastic; lognormal variance with pedigree 0.0527, pedigree (4,4,3,3,4)
  Calculated Value. Represents the processing of the plastic.
- sheet rolling, copper: 53800 kg; = copper; lognormal variance with pedigree 0.0527, pedigree (4,4,3,3,4)
  Calculated Value. Represents the processing of the copper.
- waste polypropylene: -16100 kg; name BP_polyprop; = (plastic)*-1; lognormal variance with pedigree 0.0467, pedigree (3,4,3,3,4)
  (same comment as for scrap copper)
  production volume 16100 kg; = abs(BP_polyprop/RP)*PV_RP
    Calculated from production volume of reference product using the relative outputs.
  property price 0 EUR2005; name BP_polyprop_price_EUR2005
  properties: water content 0.189061, wet mass 1 kg, carbon content, fossil 0.857143, heating value, net 32.78 MJ, dry mass 0.841 kg
  note on heating value, net: Value assumed for all polypropylene products. Source: Phyllis2, database for (treated) biomass, algae, feedstocks for biogas production and biochar, https://phyllis.nl/Biomass/View/1186, ECN.TNO
- air compressor, screw-type compressor, 300kW: 42.0767 unit; = (1.0053E+05/4600) + (93023/4600); lognormal variance with pedigree 0.0147, pedigree (3,4,3,3,3)
  Calculated Value. This exchange represents both a compressor as well as an expander for compressed energy storage.
  Compressor: Power rating 134 MW,1.0053E+05 kg (Bouman, 2016)
  Expander: Power rating 124 MW, 93'023 kg (Bouman, 2016)
  The amount of the compressor has been scaled to represent the weights given in Bouman (2016). The weight of the air compressor is 4600 kg (see general comment of production dataset).
- scrap steel: 0 kg; name BP_steel; pedigree (1,1,1,1,1)
  (same comment as for scrap copper)
  production volume 0 kg
    Calculated from production volume of reference product using the relative outputs.
  property price 0 EUR2005; name BP_steel_price_EUR2005
  properties: wet mass 1 kg, carbon content, fossil 0.00324641, dry mass 1 kg
- diesel, burned in building machine: 2.32e7 MJ; lognormal variance with pedigree 0.0527, pedigree (4,4,3,3,4)
  Literature Value. For plant construction.
  properties: heating value, net 1 MJ
- electricity, medium voltage: 472000 kWh; lognormal variance with pedigree 0.0527, pedigree (4,4,3,3,4)
  Literature Value. For plant construction.
- steel, unalloyed: 928000 kg; name steel_un; lognormal variance with pedigree 0.0073, pedigree (3,4,3,3,2)
  Literature Value. For plant construction.
  property carbon content, fossil 0.0025; name CCF_steel_un
  properties: wet mass 1 kg, dry mass 1 kg
- copper, cathode: 53800 kg; name copper; lognormal variance with pedigree 0.0073, pedigree (3,4,3,3,2)
  Literature Value. For plant construction.
  properties: copper content 1, wet mass 1 kg, dry mass 1 kg
- waste aluminium: -1120 kg; name BP_alu; = (alu*0.1)*-1; lognormal variance with pedigree 0.0467, pedigree (3,4,3,3,4)
  (same comment as for aluminium scrap, post-consumer)
  production volume 1120 kg; = abs(BP_alu/RP) * PV_RP
    Calculated from production volume of reference product using the relative outputs.
  property price 0 EUR2005; name BP_alu_price_EUR2005
  properties: dry mass 1 kg, wet mass 1 kg
- stone wool, packed: 31900 kg; name wool; lognormal variance with pedigree 0.0073, pedigree (3,4,3,3,2)
  Literature Value. For plant construction.
  property carbon content, fossil 0.015401; name CCF_wool
  properties: wet mass 1 kg, dry mass 1 kg
- waste mineral wool: 0 kg; name BP_wool; pedigree (1,1,1,1,1)
  (same comment as for scrap copper)
  production volume 0 kg
    Calculated from production volume of reference product using the relative outputs.
  property price 0 EUR2005; name BP_wool_price_EUR2005
  properties: dry mass 1 kg, wet mass 1 kg, carbon content, fossil 0.015401
- aluminium scrap, post-consumer: -10080 kg; lognormal variance with pedigree 0.0467, pedigree (3,4,3,3,4)
  (same comment as for aluminium scrap, post-consumer)
  production volume 10080 kg
  properties: dry mass 1 kg, wet mass 1 kg
- scrap copper: -51388.9, -2411.06 kg (2 entries); lognormal variance with pedigree 0.0467, pedigree (3,4,3,3,4)
  (same comment as for scrap copper)
  production volume 53800 kg
- waste concrete: -3.77665e6, -13352.8 kg (2 entries); lognormal variance with pedigree 0.0467, pedigree (3,4,3,3,4)
  (same comment as for scrap copper)
  production volume 3.79e6 kg
  properties: wet mass 1.08676 kg, water content 0.086758, dry mass 1 kg
- scrap steel: -1.32133e6, -1674.07 kg (2 entries); lognormal variance with pedigree 0.0467, pedigree (3,4,3,3,4)
  (same comment as for scrap copper)
  production volume 1.323e6 kg
- waste mineral wool: -31540.1, -359.896 kg (2 entries); lognormal variance with pedigree 0.0467, pedigree (3,4,3,3,4)
  (same comment as for scrap copper)
  production volume 31900 kg

## Inputs from nature
- Occupation, industrial area [natural resource, land]: 2.8e6 m2*year; = 140*200*lifetime; lognormal variance with pedigree 0.0587, pedigree (4,5,3,3,2)
  Calculated Value. 200 MW*140 m²/MW*100 a; specific land use according to https://strom-online.ch/druckluftspeicher/
- Transformation, from pasture, man made [natural resource, land]: 28000 m2; = 200*140; lognormal variance with pedigree 0.0587, pedigree (4,5,3,3,2)
  Calculated Value. 200 MW*140 m²/MW https://strom-online.ch/druckluftspeicher/
- Transformation, to industrial area [natural resource, land]: 28000 m2; = 200*140; lognormal variance with pedigree 0.0587, pedigree (4,5,3,3,2)
  Calculated Value. 200 MW*140 m²/MW https://strom-online.ch/druckluftspeicher/

## Sampling procedure
inventory is completely based on literature data (Bouman et al. 2016)

## Extrapolations
This dataset has been extrapolated from year 2015 to the year of the calculation (2021). The uncertainty has been adjusted accordingly.

## Review by Carl Vadenbo 2021-01-19
remaining issues (to be addessed internally by ecoinvent):
- firstly, the dataset 'electricity production, compressed air storage, RER, 2015' did not get an activity link for its infrastructure requirements.
- Secondly, and probably more importantly, the issue that Avraam spotted last time about PV=1 in both RER and GLO for the compressed air energy storage plants (hence preventing GLO from being created as RoW during linking) still persists.
