# electronic component production, passive, unspecified

Dataset: EcoSpold 2, unit process
Geography: GLO
Time period: 1994-01-01 to 2021-12-31
Technology level: current
Classification: ISIC rev.4 ecoinvent: 2610:Manufacture of electronic components and boards
Classification: EcoSpold01Categories: electronics/component
Scenario: Business-as-Usual
System model: Allocation, cut-off by classification
Generated by: Roland Hischier
Published in: Hischier R. 2007
Database: ecoinvent
isCopyrightProtected: true
accessRestrictedTo: 1

## General comment
This dataset represents the production of 1 kg of passive electronic component, for all those cases, where no information is given about the passive component type. It is an unweighted mean value of: connectors, capacitors, inductors and resistors datasets. Hence, the uncertainty values are accordingly high.
[This dataset was already contained in the ecoinvent database version 2. It was not individually updated during the transfer to ecoinvent version 3. Life Cycle Impact Assessment results may still have changed, as they are affected by changes in the supply chain, i.e. in other datasets. This dataset was generated following the ecoinvent quality guidelines for version 2. It may have been subject to central changes described in the ecoinvent version 3 change report (http://www.ecoinvent.org/database/ecoinvent-version-3/reports-of-changes/), and the results of the central updates were reviewed extensively. The changes added e.g. consistent water flows and other information throughout the database. The documentation of this dataset can be found in the ecoinvent reports of version 2, which are still available via the ecoinvent website. The change report linked above covers all central changes that were made during the conversion process.]

## Included activities start
From reception of mix of various components at the factory gate.

## Included activities end
This dataset includes the mix of various components.

## Geography
Data represent a global valuable average composition of passive electronic components.

## Technology
see general comments

## Reference product
- electronic component, passive, unspecified: 1 kg; By-product classification allocatable product; CPC 471: Electronic valves and tubes; electronic components; parts thereof
  Average composition of passive electronic components, based on the composition of three different types of printed wiring board for all those cases, where passive components are not further specified.
  EcoSpold01Location=GLO
  production volume 1 kg
    Dummy value to be replaced by measured, estimated or calculated value
  property carbon content, non-fossil 0.0045566
    Calculated as the addition of C contents in the product composition
  property carbon content, fossil 0.317311
    Calculated as the addition of C contents in the product composition
  property price 40.122 EUR2005
    Calculated based on inputs: The price of the product has been calculated as a sum of the values of the material and energy inputs for this product. This value is therefore a rough estimation. It may underestimate the real price since there are additional expenses when producing any product. These expences can include for example labour costs, treatment of waste materials and profit for the producer. Please consider carefully whether this level of data quality is acceptable for your application.
  property carbon content 0.321868
    carbon content on a dry matter basis (reserved; not for manual entry)
  properties: dry mass 1 kg, wet mass 1 kg, water in wet mass 0 kg, water content 0, carbon allocation 0.321868 kg

## Inputs from technosphere
All rows: lognormal variance with pedigree 0.3306, pedigree (5,3,5,1,5)
- inductor, ring core choke type: 0.336 kg; source Behrendt S 1998
  EcoSpold01Location=GLO
  Estimation, based on literature and own assumptions.
  Uncertainty: calculated from Desktop PC, Laptop and TV mainboards
  properties: dry mass 1 kg, wet mass 1 kg, carbon content, fossil 0.445934
  note on carbon content, fossil: Calculated as the addition of C contents in the product composition, and referred to 1 kg DM inductor
- capacitor, tantalum-, for through-hole mounting: 0.0348 kg; source Behrendt S 1998
  (same comment as for inductor, ring core choke type)
  properties: dry mass 1 kg, wet mass 1 kg, carbon content, fossil 0.181224
  note on carbon content, fossil: Calculated as the addition of C contents in the product composition, and referred to 1 kg capacitors, and then to 1 kg DM
- electric connector, peripheral component interconnect buss: 0.182 kg; source Behrendt S 1998
  Estimation, based on literature and own assumptions.
  EcoSpold01Location=GLO
  Uncertainty: calculated from Desktop PC, Laptop and TV mainboards
  properties: carbon content, fossil 0.506549, wet mass 1 kg, dry mass 1 kg
  note on carbon content, fossil: Calculated as the addition of C contents in the product composition
- potentiometer, unspecified: 0.014175 kg; source Behrendt S 1998
  Estimation, based on literature and own assumptions.
  Uncertainty: calculated from Desktop PC, Laptop and TV mainboards
  properties: carbon content, fossil 0.570934, carbon content, non-fossil 0.0189996, dry mass 1 kg, wet mass 1 kg
  note on carbon content, fossil: Calculated as the addition of C contents in the product composition, and referred to 1 kg DM potentiometer (ecoinvent v2.2 report 18_I)
- resistor, wirewound, through-hole mounting: 0.014175 kg; source Behrendt S 1998
  (same comment as for potentiometer, unspecified)
  properties: carbon content, fossil 0.0174395, wet mass 1 kg, dry mass 1 kg
  note on carbon content, fossil: Calculated as the addition of C contents in the product composition, and referred to 1 kg DM resistor.
- capacitor, film type, for through-hole mounting: 0.105 kg
  Estimation, based on literature and own assumptions. This flow replaces the original capacitor, production mix
  Uncertainty: calculated from Desktop PC, Laptop and TV mainboards
  property carbon content, fossil 0.278876; name C_content_fossil
  property water in wet mass 0 kg; name WWM
  property carbon content, non-fossil 0; name C_content_non_fossil
  property water content 0; name water_content
  properties: wet mass 1 kg, dry mass 1 kg
- resistor, surface-mounted: 0.014175 kg; source Behrendt S 1998
  (same comment as for potentiometer, unspecified)
  properties: wet mass 1 kg, dry mass 1 kg, carbon content, fossil 0.00893558
- capacitor, electrolyte type, < 2cm height: 0.139 kg; source Behrendt S 1998
  (same comment as for electric connector, peripheral component interconnect buss)
  properties: wet mass 1 kg, dry mass 1 kg, carbon content, fossil 0.189636, carbon content, non-fossil 0.0222053
- electric connector, peripheral type buss: 0.103 kg; source Behrendt S 1998
  (same comment as for inductor, ring core choke type)
  properties: wet mass 1 kg, carbon content, fossil 0.160512, dry mass 1 kg
- resistor, metal film type, through-hole mounting: 0.014175 kg; source Behrendt S 1998
  (same comment as for potentiometer, unspecified)
  properties: carbon content, fossil 0.029003, dry mass 1 kg, wet mass 1 kg
- capacitor, for surface-mounting: 0.0438 kg; source Behrendt S 1998
  (same comment as for electric connector, peripheral component interconnect buss)
  properties: wet mass 1 kg, dry mass 1 kg

## Sampling procedure
Literature & own estimations

## Extrapolations
This dataset has been extrapolated from year 2007 to the year of the calculation (2021). The uncertainty has been adjusted accordingly.

## Review by Bo Weidema 2012-09-10
changed inputs of production mixes to specified inputs

## Review by Rolf Frischknecht 2007-09-21
passed.
-
