# inert material landfill construction

Dataset: EcoSpold 2, unit process
Geography: RoW
Time period: 1995-01-01 to 2021-12-31
Technology level: current
Classification: ISIC rev.4 ecoinvent: 4290:Construction of other civil engineering projects
Classification: EcoSpold01Categories: waste management/inert material landfill
Synonyms: cleanfill
Tags: ConvertedDataset
Scenario: Business-as-Usual
System model: Allocation, cut-off by classification
Generated by: Gabor Doka (obsolete)
Published in: Doka G. 2007
Database: ecoinvent
isCopyrightProtected: true
accessRestrictedTo: 1

## General comment
landfill for inert, insoluble, largely unpolluted, mostly mineral wastes like bricks, concrete, excavation material with carbon content below 5%. 450'000 m3 volume. Construction phase is 1 year; use phase is 10 years; aftercare phase is 5 years. Average waste density 1500 kg/m3.
[This dataset was already contained in the ecoinvent database version 2. It was not individually updated during the transfer to ecoinvent version 3. Life Cycle Impact Assessment results may still have changed, as they are affected by changes in the supply chain, i.e. in other datasets. This dataset was generated following the ecoinvent quality guidelines for version 2. It may have been subject to central changes described in the ecoinvent version 3 change report (http://www.ecoinvent.org/database/ecoinvent-version-3/reports-of-changes/), and the results of the central updates were reviewed extensively. The changes added e.g. consistent water flows and other information throughout the database. The documentation of this dataset can be found in the ecoinvent reports of version 2, which are still available via the ecoinvent website. The change report linked above covers all central changes that were made during the conversion process.]

## Included activities end
infrastructure materials for landfill construction, operation and aftercare. Including access road.

## Geography
Specific to the technology encountered in Switzerland in 2000. Well applicable to modern landfilling practices in Europe, North America or Japan.

## Technology
Swiss iner material landfill ('cleanfill') for largely unpolluted, inorganic wastes. 50% of the sites feature a base seal and leachate collection system. Recultivation and monitoring for 5 years after closure.

## Reference product
- inert material landfill: 1 unit; CPC 53290: Other civil engineering works; By-product classification allocatable product
  production volume 3.96633 unit
    This is a placeholder value that does not reflect real-world production volumes. This dataset does not currently require a real-world production volume to work in the database framework, and no actual data were collected yet. This has no negative effect on the results of the ecoinvent database.
  property price 2.94413e6 EUR2005
    Calculated based on inputs: The price of the product has been calculated as a sum of the values of the material and energy inputs for this product. This value is therefore a rough estimation. It may underestimate the real price since there are additional expenses when producing any product. These expences can include for example labour costs, treatment of waste materials and profit for the producer. Please consider carefully whether this level of data quality is acceptable for your application.

## Inputs from technosphere
- gravel, round: 7.11e7 kg; lognormal variance with pedigree 0.3532, pedigree (2,3,5,5,1)
  properties: dry mass 1 kg, wet mass 1 kg
- excavation, hydraulic digger: 195000 m3; lognormal variance with pedigree 0.3532, pedigree (2,3,5,5,1)
- pitch: 0 kg; pedigree (1,1,1,1,1)
  properties: heating value, net 28 MJ, carbon content, fossil 0.83, wet mass 1 kg, dry mass 1 kg
- extrusion, plastic film: 14500 kg; lognormal variance with pedigree 0.3532, pedigree (2,3,5,5,1)
- concrete, normal: 0 m3; pedigree (1,1,1,1,1)
  properties: water content 0.086758, dry mass 2190 kg, wet mass 2380 kg
- polyethylene, high density, granulate: 62900 kg; lognormal variance with pedigree 0.3532, pedigree (2,3,5,5,1)
  properties: wet mass 1 kg, dry mass 1 kg, carbon content, fossil 0.857143, heating value, net 42.47 MJ
  note on carbon content, fossil: Polyethylene is formed out of a huge amount of ethylene monomers (C2H4) (ecoinvent v2.2 report 11_II). MW=28 g/mol
- diesel, burned in building machine: 404000 MJ; lognormal variance with pedigree 0.3532, pedigree (2,3,5,5,1)
  properties: heating value, net 1 MJ
- excavation, skid-steer loader: 195000 m3; lognormal variance with pedigree 0.3532, pedigree (2,3,5,5,1)
- pitch: 55472.3, 3161.47, 183822, 143087, 6413.76, 9156.25, 808887 kg (7 entries); lognormal variance with pedigree 0.3532, pedigree (2,3,5,5,1)
- concrete, normal: 0.122132, 0.012726, 0.103026, 0.0579522, 0.245411, 0.00827757, 4.85047 m3 (7 entries); lognormal variance with pedigree 0.3532, pedigree (2,3,5,5,1)

## Inputs from nature
- Occupation, traffic area, road network [natural resource, land]: 288000 m2*year; lognormal variance with pedigree 0.0932, pedigree (2,3,5,5,1)
- Transformation, to traffic area, road network [natural resource, land]: 18000 m2; lognormal variance with pedigree 0.1732, pedigree (2,3,5,5,1)
- Transformation, from pasture, man made [natural resource, land]: 18000 m2; lognormal variance with pedigree 0.1732, pedigree (2,3,5,5,1)

## Sampling procedure
data from one literature source on sanitary landfill, adapted to features of this landfill type

## Extrapolations
assumed geometry and area with legal minimal material inputs This dataset has been copied from an original dataset covering the geography CH. The uncertainty has been adjusted accordingly.

## Review by Niels Jungbluth 2003-08-06
Passed.
