# treatment of waste plastic, mixture, municipal incineration with fly ash extraction

Dataset: EcoSpold 2, unit process
Geography: CH
Time period: 2006-01-01 to 2021-12-31
Technology level: current
Classification: ISIC rev.4 ecoinvent: 3821:Treatment and disposal of non-hazardous waste
Synonyms: municipal waste incineration
Scenario: Business-as-Usual
System model: Allocation, cut-off by classification
Share of production covered: 1.8 %
Generated by: Gabor Doka
Published in: Doka G. 2015
Database: ecoinvent
isCopyrightProtected: true
accessRestrictedTo: 1

## General comment
This dataset represents the activity of waste disposal of waste plastic, mixture in a municipal solid waste incinerator (MSWI) // Recommended use of this dataset: For plastic mixture, which goes to disposal as part of communal waste mixture. // // Waste composition (wet, in ppm): upper heating value 34.05 MJ/kg; lower heating value 30.79 MJ/kg; H2O 153000; O 73717; H 105910; C 633590; S 1406.7; N 6112; P n.a.; B n.a.; Cl 18131; Br 65.319; F 13.717; I n.a.; Ag n.a.; As 1.7729; Ba 174.03; Cd 75.786; Co 29.478; Cr 38.132; Cu 296.41; Hg 0.79234; Mn 74.574; Mo n.a.; Ni 19.222; Pb 435.81; Sb 40.093; Se 1.9596; Sn 24.453; V 268.88; Zn 521.69; Be 0.46656; Sc n.a.; Sr 82.582; Ti 933.13; Tl 0.37325; W n.a.; Si n.a.; Fe 3476.5; Ca n.a.; Al 186.63; K n.a.; Mg n.a.; Na 1367.5; // Share of carbon in waste that is biogenic 0%. // Share of metals in waste not oxidised and bulk-recyclable (exclude very small or thin parts) Iron: 0%; Alu: 0%; Copper: 0%. // Recovery of metal scrap from bottom ash to recycling: 0g iron scrap, 0g aluminium scrap, 0g copper scrap. From this waste, the FLUWA process in the technology mix recovers 0.00112kg (DM) of a hydroxide sludge to be recycled in zinc furnaces. // Ultimately one kg of this waste produces 0.02657 kg of bottom ash (can include some washed ash) and 0.008397 kg of residues, which are landfilled (technology mix). Additional solidification of residues with 0.003359 kg of cement.Net energy production: 3.93MJ/kg electric energy and 7.66MJ/kg thermal energy. //

## Included activities start
waste incineration from waste reception gate and delivery into waste bunker at incinerator plant site (without transports to the incinerator)

## Included activities end
Waste-specific short-term emissions to water from leachate. Long-term emissions from landfill to ground water.

## Geography
Specific to the technology mix encountered in Switzerland in 2012.

## Technology
average Swiss MSWI plants in 2010 (grate incinerators) with electrostatic precipitator for fly ash (ESP), wet flue gas scrubber and 25% SNCR , 42.77% SCR-high dust , 32.68% SCR-low dust -DeNOx facilities and 0% without Denox (weighted according to mass of burnt waste, representing Swiss average). Efficiency of iron scrap separation from slag : 58%. Efficiency of non-ferrous scrap separation from slag : 31%. The technology mix for this dataset includes a filter ash treatment (FLUWA) of a share of 46.22%. Gross electric efficiency technology mix 15.84% and Gross thermal efficiency technology mix 28.51%

## Time period
Waste composition as given in literature reference, theoretical data or other source. Transfer coefficients for modern MSWI.

## Reference product
- waste plastic, mixture: -1 kg; name RP_amount_1; By-product classification Waste; CPC 39270: Waste, parings and scrap of plastics
  Main reference product of this activity (supply of disposal service).
  production volume 3.4747e8 kg; name RP_PV_1
    based on corresponding global production volume of MSW fraction in conventional MSWI (wo fly ash extraction) and scaled down to annual Swiss incinerated MSW mass of 3.02 mio. tonnes.
  property heating value, net 30.79 MJ
    Value taken from the general comment of the treatment dataset.
  property price 0 EUR2005; name RP_amount_1_price_EUR2005
    Waste products are assigned a price of zero as they are assumed to require further treatment.
  property carbon content 0.74805
    carbon content on a dry matter basis (reserved; not for manual entry)
  properties: fluorine content 1.6195e-5, chlorine content 0.021406, sulfur content 0.0016609, oxygen content 0.087033, bromine content 7.7118e-5, hydrogen content 0.12504, nitrogen content 0.007216, cobalt content 3.4802e-5, barium content 0.00020546, cadmium content 8.9476e-5, arsenic content 2.0932e-6, manganese content 8.8045e-5, chromium content 4.502e-5, copper content 0.00034995, vanadium content 0.00031745, tin content 2.887e-5, nickel content 2.2694e-5, selenium content 2.3135e-6, lead content 0.00051454, zinc content 0.00061593, mercury content 9.3547e-7, aluminium content 0.00022034, antimony content 4.7336e-5, thallium content 4.4067e-7, carbon content, fossil 0.74805, beryllium content 5.5084e-7, strontium content 9.7499e-5, sodium content 0.0016145, titanium content 0.0011017, iron content 0.0041045, dry mass 0.847 kg, wet mass 1 kg, water in wet mass 0.153 kg, water content 0.18064, carbon allocation 0.633598 kg

## By-products
- electricity, for reuse in municipal waste incineration only: 0 kWh; name E_el_prod_MSWI; CPC 17100: Electrical energy; By-product classification allocatable product; pedigree (1,1,1,1,1)
  Net electricity generated from this waste and used in internal MSWI plant energy redistribution.
  Uncertainty: uncertainty is calculated from uncertainties in waste composition and uncertainties in energy efficiency and the uncertainty in internal energy demand
  production volume 3.7975e8 kWh
    calculated in proportion to reference product waste input to incinerator
  property exergy 3.6 MJ; name E_el_prod_MSWI_exergy
    This exergy property is based on the exergy content of the product.
  property true value relation 3.6; name E_el_prod_MSWI_true_value_relation
    property to calculate "true value" from
  property price 0.1 EUR2005; name E_el_prod_MSWI_price_EUR2005
    Estimated to be the same price as in case of electricity, medium voltage.
- heat, for reuse in municipal waste incineration only: 0 MJ; name E_th_prod_MSWI; By-product classification allocatable product; CPC 17300: Steam and hot water; pedigree (1,1,1,1,1)
  Net useful heat generated from this waste and used in internal MSWI plant energy redistribution.
  Uncertainty: uncertainty is calculated from uncertainties in waste composition and uncertainties in energy efficiency and the uncertainty in internal energy demand
  production volume 2.6617e9 MJ
    calculated in proportion to reference product waste input to incinerator
  property exergy 0.1842 MJ; name E_th_prod_MSWI_exergy
    This exergy property is based on the exergy content of the product.
  property price 0.0106 EUR2005; name E_th_prod_MSWI_price_EUR2005
    Average European district heat price from Ecoheatcool and Euroheat 2005-2006, Ecoheat Work package 1: The European heat market. Final report. 10.6 EUR/GJ i s the price of district heat. http://www.solarthermalworld.org/files/Ecoheatcool%20WP1%20Web.pdf?download
  property true value relation 0.1842; name E_th_prod_MSWI_true_value_relation
    property to calculate "true value" from
- metalliferous hydroxide sludge: 0 kg; By-product classification Recyclable; CPC 1429: Other non-ferrous metal ores and concentrates (other than uranium or thorium ores and concentrates); pedigree (1,1,1,1,1)
  Metalliferous hydroxide sludge from filter ash leaching (FLUWA).
  Uncertainty: uncertainty is calculated from uncertainties in waste composition and transfer coefficients to filter ash in incinerator and the uncertainty of the transfer coefficients of the FLUWA process.
  production volume 0 kg
    calculated in proportion to reference product waste input to incinerator
  property heating value, net 0 MJ
    Non combustible products are assumed to have an LHV equal to zero (0).
  property price 0.0042 EUR2005
    World market value of manure, deflated with barley world market price and consumer price index, based on [http://www.gov.pe.ca/photos/original/af_NM_manconv.pdf].
  property carbon content 0.029302
    carbon content on a dry matter basis (reserved; not for manual entry)
  properties: chlorine content 0.38866, oxygen content 0.37876, cobalt content 0.00064658, bromine content 0.001147, sulfur content 0.076921, chromium content 0.00016251, arsenic content 1.4605e-5, cadmium content 0.022959, mercury content 1.2837e-6, copper content 0.0001095, fluorine content 0.00017792, barium content 4.355e-5, antimony content 0.00038683, zinc content 0.081813, manganese content 6.7764e-5, lead content 0.0069957, titanium content 6.8041e-5, beryllium content 6.1992e-6, vanadium content 0.0013618, nickel content 1.5909e-5, selenium content 1.8504e-5, strontium content 8.3742e-7, water content 3, wet mass 1 kg, sodium content 0.0099872, tin content 1.9185e-5, water in wet mass 0.75 kg, aluminium content 1.145e-5, thallium content 3.3538e-6, carbon content, fossil 0.029302, dry mass 0.25 kg, iron content 0.00034108, carbon allocation 0.0073255 kg

## Inputs from technosphere
- water, decarbonised: 3.6761 kg; lognormal variance with pedigree 0.25223, pedigree (1,1,4,1,1)
  Incinerator process water used in flue gas scrubber stage.
  Uncertainty: uncertainty calculated from uncertainty in average water input, and the uncertainty of the waste composition of this waste
  properties: wet mass 1 kg
- chromium oxide, flakes: 1.8819e-6 kg; lognormal variance with pedigree 0.87663, pedigree (1,1,4,1,1)
  Input to DeNOx stage. Active component in SCR catalyst (vanadium pentoxide, V2O5), here approximated with the available chromium trioxide.
  Uncertainty: uncertainty calculated from uncertainty in average DeNOx input, uncertainty in the share of thermal NOx, uncertainty of nitrogen content in average municipal waste and the uncertainty in nitrogen content in *this* waste.
  properties: wet mass 1 kg, dry mass 1 kg
- quicklime, milled, packed: 0.0093545 kg; lognormal variance with pedigree 0.32088, pedigree (1,1,4,1,1)
  Auxilliary inputs for the flue gas treatment stage of the incinerator plant.
  Uncertainty: uncertainty calculated from uncertainty in average CaO input, of transfer coefficients in the incinerator, and the uncertainty of the waste composition of this waste
  properties: water content 0.010101, dry mass 0.99 kg, wet mass 1 kg
- process-specific burdens, slag landfill: 0.026571 kg; lognormal variance with pedigree 0.057544, pedigree (1,1,4,1,1)
  Mass-specific expenditures required for landfilling of bottom ash.;activityLink introduced to establish a direct link to the corresponding regional supply of this product
  Uncertainty: uncertainty is calculated from uncertainties in waste composition and transfer coefficients in incinerator
- chemical, inorganic: 0.00031009 kg; lognormal variance with pedigree 0.26867, pedigree (1,1,4,1,1)
  Auxilliary inputs for the wastewater treatment stage of the incinerator plant. Proxy for Polyelectrolyte.
  Uncertainty: uncertainty calculated from uncertainty in average Polyelectrolyte input, of transfer coefficients in the incinerator, and the uncertainty of the waste composition of this waste
  properties: wet mass 1 kg, carbon content, fossil 0.003, dry mass 1 kg
- heat, district or industrial, natural gas: 0.27524 MJ; lognormal variance with pedigree 0.55248, pedigree (1,1,4,1,1)
  Input to DeNOx stage, to heat up flue gas in low-dust SCR.
  Uncertainty: uncertainty calculated from uncertainty in average DeNOx input, uncertainty in the share of thermal NOx, uncertainty of nitrogen content in average municipal waste and the uncertainty in nitrogen content in *this* waste.
  properties: heating value, net 1 MJ
- hydrochloric acid, without water, in 30% solution state: 0.00030169 kg; lognormal variance with pedigree 0.089179, pedigree (1,1,4,1,1)
  Auxilliary inputs for the wastewater treatment stage of the incinerator plant.
  Uncertainty: uncertainty calculated from uncertainty in average HCl input, of transfer coefficients in the incinerator, and the uncertainty of the waste composition of this waste
  properties: dry mass 1 kg, wet mass 1 kg, heating value, net 3.32 MJ
- ammonia, anhydrous, liquid: 0.0014719 kg; lognormal variance with pedigree 0.55248, pedigree (1,1,4,1,1)
  Input to DeNOx stage (100% NH3).
  Uncertainty: uncertainty calculated from uncertainty in average DeNOx input, uncertainty in the share of thermal NOx, uncertainty of nitrogen content in average municipal waste and the uncertainty in nitrogen content in *this* waste.
  properties: dry mass 1 kg, wet mass 1 kg
- cationic resin: 4.0157e-6 kg; lognormal variance with pedigree 1.6063, pedigree (1,1,4,1,1)
  Auxilliary input for mercury removal in filter ash treatment (FLUWA).
  Uncertainty: uncertainty calculated from uncertainty in of transfer coefficients in the incinerator, and the uncertainty of the waste composition of this waste
  properties: carbon content, fossil 0.521606, dry mass 0.5 kg, water content 1, wet mass 1 kg, heating value, net 6.68 MJ
- residual material landfill: 3.4877e-11 unit; lognormal variance with pedigree 0.074246, pedigree (1,1,4,1,1)
  Landfill infrastructure required for landfilling of incineration residues.
  Uncertainty: uncertainty is calculated from uncertainties in waste composition and transfer coefficients in incinerator
- municipal waste incineration facility: 2.5e-10 unit
  Demands per kilogram waste.
- chemical, organic: 1.7783e-5 kg; lognormal variance with pedigree 0.86462, pedigree (1,1,4,1,1)
  Auxilliary inputs for the wastewater treatment stage of the incinerator plant. Proxy for (pure) Trisodium-trimercapto-s-triazine (CAS 17766-26-6), used as 15% diluted solution, aka TMT15.
  Uncertainty: uncertainty calculated from uncertainty in average TMT15 input, of transfer coefficients in the incinerator, and the uncertainty of the waste composition of this waste
  properties: carbon content, fossil 0.628, wet mass 1 kg, dry mass 1 kg, heating value, net 19.03 MJ
- waste cement, hydrated: -0.0083968 kg; lognormal variance with pedigree 0.08333, pedigree (1,1,4,1,1)
  Hydrated cement output for solidification of landfilled residual material.
  Uncertainty: Uncertainty calculated from uncertainty of the waste composition of this waste and transfer coefficients in the incinerator and of the solidification recipe.
  production volume 2.9176e6 kg
    calculated in proportion to reference product waste input to incinerator
  properties: wet mass 1 kg, dry mass 1 kg
- titanium dioxide: 9.2215e-5 kg; lognormal variance with pedigree 0.87663, pedigree (1,1,4,1,1)
  Input to DeNOx stage (TiO2 catalyst carrier)
  Uncertainty: uncertainty calculated from uncertainty in average DeNOx input, uncertainty in the share of thermal NOx, uncertainty of nitrogen content in average municipal waste and the uncertainty in nitrogen content in *this* waste.
  properties: dry mass 1 kg, wet mass 1 kg
- slag landfill: 4.7237e-11 unit; lognormal variance with pedigree 0.057544, pedigree (1,1,4,1,1)
  Landfill infrastructure required for landfilling of bottom ash.
  Uncertainty: uncertainty is calculated from uncertainties in waste composition and transfer coefficients in incinerator
- hydrogen peroxide, without water, in 50% solution state: 0.00056042 kg; lognormal variance with pedigree 0.11963, pedigree (1,1,4,1,1)
  Auxilliary oxidising agent for filter ash treatment (FLUWA).
  Uncertainty: uncertainty calculated from uncertainty in of transfer coefficients in the incinerator, and the uncertainty of the waste composition of this waste
  properties: dry mass 1 kg, wet mass 1 kg, heating value, net 7.13 MJ
- transport, freight, lorry, unspecified: 0.0015758 metric ton*km; lognormal variance with pedigree 0.03519, pedigree (1,1,4,1,1)
  Transport services to transport incineration residues to landfills and filter ash to external treatments (FLUWA).
  Uncertainty: uncertainty calculated from uncertainty of the waste composition of this waste, uncertainty of transfer coefficients and the uncertainty in generic transportation distances
- process-specific burdens, residual material landfill: 0.016741 kg; lognormal variance with pedigree 0.074246, pedigree (1,1,4,1,1)
  Mass-specific expenditures required for landfilling of incineration residues.;activityLink introduced to establish a direct link to the corresponding regional supply of this product
  Uncertainty: uncertainty is calculated from uncertainties in waste composition and transfer coefficients in incinerator
- cement, unspecified: 0.0033587 kg; lognormal variance with pedigree 0.08333, pedigree (1,1,4,1,1)
  Cement required for solidification of landfilled residual material.
  Uncertainty: Uncertainty calculated from uncertainty of the waste composition of this waste, of transfer coefficients in the incinerator and of the solidification recipe.
  properties: dry mass 1 kg, wet mass 1 kg
- iron (III) chloride, without water, in 40% solution state: 4.8651e-5 kg; lognormal variance with pedigree 0.25223, pedigree (1,1,4,1,1)
  Auxilliary inputs for the wastewater treatment stage of the incinerator plant.
  Uncertainty: uncertainty calculated from uncertainty in average FeCl3 input, of transfer coefficients in the incinerator, and the uncertainty of the waste composition of this waste
  properties: wet mass 1 kg, dry mass 1 kg
- spent activated carbon with mercury: -4.2271e-6 kg; name BP_amount_1; lognormal variance with pedigree 1.6063, pedigree (1,1,4,1,1)
  Spent ion exchanger charged with mercury, from FLUWA filter ash treatment, approximated here with Spent activated carbon with mercury, deposited undergound in a polyethylene Big Bag.
  Uncertainty: uncertainty calculated from uncertainty in of transfer coefficients in the incinerator, and the uncertainty of the waste composition of this waste.
  production volume 1468.79 kg; = ABS(RP_PV_1 * (BP_amount_1 / RP_amount_1))
    Calculated from production volume of reference product using the relative outputs.
  property price 0 EUR2005; name BP_amount_1_price_EUR2005
  properties: heating value, net 18.18 MJ, wet mass 1 kg, dry mass 1 kg, carbon content, fossil 0.6
- sodium hydroxide, without water, in 50% solution state: 0.0024939 kg; lognormal variance with pedigree 0.19682, pedigree (1,1,4,1,1)
  Auxilliary inputs for the flue gas treatment stage of the incinerator plant, and partially in the filter ash treatment (FLUWA).
  Uncertainty: uncertainty calculated from uncertainty in average NaOH input, of transfer coefficients in the incinerator, and the uncertainty of the waste composition of this waste
  properties: dry mass 1 kg, wet mass 1 kg, heating value, net 3.03 MJ
- metalliferous hydroxide sludge: -0.0044985 kg; lognormal variance with pedigree 0.065144, pedigree (1,1,4,1,1)
  (same comment as for metalliferous hydroxide sludge)
  production volume 1.5631e6 kg
  properties: chlorine content 0.38866, oxygen content 0.37876, sulfur content 0.076921, cadmium content 0.022959, zinc content 0.081813, lead content 0.0069957, water content 3, wet mass 1 kg, sodium content 0.0099872, price 0.0042 EUR2005, carbon content, fossil 0.029302, dry mass 0.25 kg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

## Inputs from nature
- Oxygen [natural resource, in air]: 2.4791 kg; lognormal variance with pedigree 0.025041, pedigree (1,1,4,1,1)
  Oxygen from ambient air needed to combust and oxidise this waste. Net demand, i.e. without O2 leaving the plant in flue gas uncombusted.
  Uncertainty: uncertainty is calculated from uncertainties in waste composition and transfer coefficients to flue gas and soild residues in incinerator

## Emissions to nature
- Sulfur dioxide [air, urban air close to ground]: 1.496e-5 kg; lognormal variance with pedigree 0.63313, pedigree (1,1,4,1,1)
  Emission to air from waste composition and transfer coefficients.
  Uncertainty: uncertainty is calculated from uncertainties in waste composition and transfer coefficients in incinerator
- Manganese [water, ground-, long-term]: 5.9127e-5 kg; lognormal variance with pedigree 1.2863, pedigree (1,1,4,1,1)
  Long-term emissions from landfilling of incineration residues.
  Uncertainty: uncertainty is calculated from uncertainties in waste composition and transfer coefficients in incinerator and landfills.
- Cadmium, ion [water, surface water]: 1.347e-8 kg; lognormal variance with pedigree 0.99548, pedigree (1,1,4,1,1)
  Emissions to water from waste composition and transfer coefficients in incinerator and landfills.
  Uncertainty: uncertainty is calculated from uncertainties in waste composition and transfer coefficients in incinerator and landfills
- Nitrogen oxides [air, urban air close to ground]: 0.000548 kg; lognormal variance with pedigree 0.60163, pedigree (1,1,4,1,1)
  Sum of fuel-Nox and thermal-NOx emitted to air after DeNOx stage.
  Uncertainty: uncertainty calculated from uncertainty in average N-emissions and uncertainty in the share of thermal NOx and the uncertainty in nitrogen content in *this* waste.
- Nickel, ion [water, ground-, long-term]: 1.8803e-5 kg; lognormal variance with pedigree 1.1717, pedigree (1,1,4,1,1)
  (same comment as for Manganese)
- Cobalt [water, surface water]: 4.8552e-9 kg; lognormal variance with pedigree 1.6526, pedigree (1,1,4,1,1)
  (same comment as for Cadmium, ion)
- Ammonia [air, urban air close to ground]: 1.7305e-6 kg; lognormal variance with pedigree 0.60163, pedigree (1,1,4,1,1)
  Nitrogen species emitted to air after DeNOx stage.
  Uncertainty: uncertainty calculated from uncertainty in average N-emissions and uncertainty in the share of thermal NOx and the uncertainty in nitrogen content in *this* waste.
- Lead [water, ground-, long-term]: 0.00030685 kg; lognormal variance with pedigree 2.3127, pedigree (1,1,4,1,1)
  (same comment as for Manganese)
- Chromium VI [water, surface water]: 5.8025e-7 kg; lognormal variance with pedigree 1.1752, pedigree (1,1,4,1,1)
  (same comment as for Cadmium, ion)
- Dinitrogen monoxide [air, urban air close to ground]: 9.1158e-5 kg; lognormal variance with pedigree 1.2092, pedigree (1,1,4,1,1)
  (same comment as for Ammonia)
- Antimony [water, ground-, long-term]: 1.6269e-5 kg; lognormal variance with pedigree 0.91149, pedigree (1,1,4,1,1)
  (same comment as for Manganese)
- Copper, ion [water, surface water]: 2.5645e-8 kg; lognormal variance with pedigree 1.00461, pedigree (1,1,4,1,1)
  (same comment as for Cadmium, ion)
- Cyanide [air, urban air close to ground]: 1.9585e-5 kg; lognormal variance with pedigree 1.2092, pedigree (1,1,4,1,1)
  (same comment as for Ammonia)
- Selenium [water, ground-, long-term]: 1.5038e-6 kg; lognormal variance with pedigree 0.9624, pedigree (1,1,4,1,1)
  (same comment as for Manganese)
- Mercury [water, surface water]: 4.2161e-9 kg; lognormal variance with pedigree 1.776, pedigree (1,1,4,1,1)
  (same comment as for Cadmium, ion)
- Hydrogen chloride [air, urban air close to ground]: 1.0346e-5 kg; lognormal variance with pedigree 0.329, pedigree (1,1,4,1,1)
  (same comment as for Sulfur dioxide)
- Tin, ion [water, ground-, long-term]: 1.6229e-5 kg; lognormal variance with pedigree 1.2605, pedigree (1,1,4,1,1)
  (same comment as for Manganese)
- Manganese [water, surface water]: 9.1156e-9 kg; lognormal variance with pedigree 1.0394, pedigree (1,1,4,1,1)
  (same comment as for Cadmium, ion)
- Bromine [air, urban air close to ground]: 3.2627e-8 kg; lognormal variance with pedigree 1.0534, pedigree (1,1,4,1,1)
  (same comment as for Sulfur dioxide)
- Vanadium, ion [water, ground-, long-term]: 7.9309e-5 kg; lognormal variance with pedigree 0.92543, pedigree (1,1,4,1,1)
  (same comment as for Manganese)
- Nickel, ion [water, surface water]: 1.274e-8 kg; lognormal variance with pedigree 1.8003, pedigree (1,1,4,1,1)
  (same comment as for Cadmium, ion)
- Hydrogen fluoride [air, urban air close to ground]: 9.2544e-8 kg; lognormal variance with pedigree 1.2452, pedigree (1,1,4,1,1)
  (same comment as for Sulfur dioxide)
- Zinc, ion [water, ground-, long-term]: 0.00023425 kg; lognormal variance with pedigree 1.5717, pedigree (1,1,4,1,1)
  (same comment as for Manganese)
- Lead [water, surface water]: 2.9677e-8 kg; lognormal variance with pedigree 0.66619, pedigree (1,1,4,1,1)
  (same comment as for Cadmium, ion)
- Arsenic [air, urban air close to ground]: 1.3888e-8 kg; lognormal variance with pedigree 1.5128, pedigree (1,1,4,1,1)
  (same comment as for Sulfur dioxide)
- Beryllium [water, ground-, long-term]: 4.3786e-7 kg; lognormal variance with pedigree 1.6335, pedigree (1,1,4,1,1)
  (same comment as for Manganese)
- Antimony [water, surface water]: 7.8797e-6 kg; lognormal variance with pedigree 1.0189, pedigree (1,1,4,1,1)
  (same comment as for Cadmium, ion)
- Barium [air, urban air close to ground]: 6.8307e-7 kg; lognormal variance with pedigree 0.9063, pedigree (1,1,4,1,1)
  (same comment as for Sulfur dioxide)
- Strontium [water, ground-, long-term]: 8.2493e-5 kg; lognormal variance with pedigree 0.99525, pedigree (1,1,4,1,1)
  (same comment as for Manganese)
- Selenium [water, surface water]: 3.9042e-7 kg; lognormal variance with pedigree 1.0532, pedigree (1,1,4,1,1)
  (same comment as for Cadmium, ion)
- Cadmium [air, urban air close to ground]: 3.8629e-8 kg; lognormal variance with pedigree 1.0313, pedigree (1,1,4,1,1)
  (same comment as for Sulfur dioxide)
- Titanium, ion [water, ground-, long-term]: 0.00027925 kg; lognormal variance with pedigree 0.90803, pedigree (1,1,4,1,1)
  (same comment as for Manganese)
- Tin, ion [water, surface water]: 2.2104e-8 kg; lognormal variance with pedigree 1.0612, pedigree (1,1,4,1,1)
  (same comment as for Cadmium, ion)
- Cobalt [air, urban air close to ground]: 5.361e-8 kg; lognormal variance with pedigree 1.149, pedigree (1,1,4,1,1)
  (same comment as for Sulfur dioxide)
- Thallium [water, ground-, long-term]: 2.8618e-7 kg; lognormal variance with pedigree 1.434, pedigree (1,1,4,1,1)
  (same comment as for Manganese)
- Vanadium, ion [water, surface water]: 3.1281e-7 kg; lognormal variance with pedigree 0.79721, pedigree (1,1,4,1,1)
  (same comment as for Cadmium, ion)
- Chromium [air, urban air close to ground]: 3.3298e-8 kg; lognormal variance with pedigree 1.1196, pedigree (1,1,4,1,1)
  (same comment as for Sulfur dioxide)
- Silicon [water, ground-, long-term]: 0.00034517 kg; lognormal variance with pedigree 0.00800076, pedigree (1,1,4,1,1)
  (same comment as for Manganese)
- Zinc, ion [water, surface water]: 3.187e-8 kg; lognormal variance with pedigree 0.67465, pedigree (1,1,4,1,1)
  (same comment as for Cadmium, ion)
- Copper [air, urban air close to ground]: 2.7148e-8 kg; lognormal variance with pedigree 0.86225, pedigree (1,1,4,1,1)
  (same comment as for Sulfur dioxide)
- Iron, ion [water, ground-, long-term]: 0.0017793 kg; lognormal variance with pedigree 0.72378, pedigree (1,1,4,1,1)
  (same comment as for Manganese)
- Beryllium [water, surface water]: 2.9036e-10 kg; lognormal variance with pedigree 2.2748, pedigree (1,1,4,1,1)
  (same comment as for Cadmium, ion)
- Mercury [air, urban air close to ground]: 2.2466e-8 kg; lognormal variance with pedigree 1.6132, pedigree (1,1,4,1,1)
  (same comment as for Sulfur dioxide)
- Calcium, ion [water, ground-, long-term]: 0.00014325 kg; lognormal variance with pedigree 1.4527, pedigree (1,1,4,1,1)
  (same comment as for Manganese)
- Strontium [water, surface water]: 5.3989e-8 kg; lognormal variance with pedigree 1.6644, pedigree (1,1,4,1,1)
  (same comment as for Cadmium, ion)
- Manganese [air, urban air close to ground]: 1.4242e-8 kg; lognormal variance with pedigree 1.0387, pedigree (1,1,4,1,1)
  (same comment as for Sulfur dioxide)
- Aluminium [water, ground-, long-term]: 0.00017394 kg; lognormal variance with pedigree 0.68014, pedigree (1,1,4,1,1)
  (same comment as for Manganese)
- Titanium, ion [water, surface water]: 1.8997e-7 kg; lognormal variance with pedigree 0.50953, pedigree (1,1,4,1,1)
  (same comment as for Cadmium, ion)
- Nickel [air, urban air close to ground]: 2.4147e-8 kg; lognormal variance with pedigree 1.2076, pedigree (1,1,4,1,1)
  (same comment as for Sulfur dioxide)
- Sodium, ion [water, ground-, long-term]: 0.000895 kg; lognormal variance with pedigree 0.40902, pedigree (1,1,4,1,1)
  (same comment as for Manganese)
- Thallium [water, surface water]: 2.6521e-10 kg; lognormal variance with pedigree 1.7229, pedigree (1,1,4,1,1)
  (same comment as for Cadmium, ion)
- Lead [air, urban air close to ground]: 3.5904e-8 kg; lognormal variance with pedigree 0.81097, pedigree (1,1,4,1,1)
  (same comment as for Sulfur dioxide)
- NMVOC, non-methane volatile organic compounds, unspecified origin [air, urban air close to ground]: 6.8344e-7 kg; lognormal variance with pedigree 0.091112, pedigree (1,1,4,1,1)
  Incomplete combustion product emitted to air.
  Uncertainty: uncertainty calculated from uncertainty in average operation emissions, and the uncertainty of the flue gas volume from this waste.
- Silicon [water, surface water]: 7.7802e-7 kg; lognormal variance with pedigree 0.55671, pedigree (1,1,4,1,1)
  (same comment as for Cadmium, ion)
- Antimony [air, urban air close to ground]: 3.2117e-11 kg; lognormal variance with pedigree 1.1636, pedigree (1,1,4,1,1)
  (same comment as for Sulfur dioxide)
- Particulates, < 2.5 um [air, urban air close to ground]: 1.793e-6 kg; lognormal variance with pedigree 0.41105, pedigree (1,1,4,1,1)
  (same comment as for NMVOC, non-methane volatile organic compounds, unspecified origin)
- Iron, ion [water, surface water]: 6.7078e-8 kg; lognormal variance with pedigree 1.0279, pedigree (1,1,4,1,1)
  (same comment as for Cadmium, ion)
- Selenium [air, urban air close to ground]: 2.3377e-8 kg; lognormal variance with pedigree 1.4984, pedigree (1,1,4,1,1)
  (same comment as for Sulfur dioxide)
- Particulates, > 2.5 um, and < 10um [air, urban air close to ground]: 9.0098e-9 kg; lognormal variance with pedigree 0.19474, pedigree (1,1,4,1,1)
  (same comment as for NMVOC, non-methane volatile organic compounds, unspecified origin)
- Calcium, ion [water, surface water]: 2.3914e-7 kg; lognormal variance with pedigree 0.90914, pedigree (1,1,4,1,1)
  (same comment as for Cadmium, ion)
- Tin [air, urban air close to ground]: 1.5973e-11 kg; lognormal variance with pedigree 1.2296, pedigree (1,1,4,1,1)
  (same comment as for Sulfur dioxide)
- Dioxins, measured as 2,3,7,8-tetrachlorodibenzo-p-dioxin [air, urban air close to ground]: 3.0033e-14 kg; lognormal variance with pedigree 0.41105, pedigree (1,1,4,1,1)
  (same comment as for NMVOC, non-methane volatile organic compounds, unspecified origin)
- Aluminium [water, surface water]: 6.3725e-8 kg; lognormal variance with pedigree 1.2964, pedigree (1,1,4,1,1)
  (same comment as for Cadmium, ion)
- Vanadium [air, urban air close to ground]: 5.7027e-6 kg; lognormal variance with pedigree 0.84759, pedigree (1,1,4,1,1)
  (same comment as for Sulfur dioxide)
- Benzene [air, urban air close to ground]: 1.5017e-8 kg; lognormal variance with pedigree 0.091112, pedigree (1,1,4,1,1)
  (same comment as for NMVOC, non-methane volatile organic compounds, unspecified origin)
- Sodium, ion [water, surface water]: 0.00045004 kg; lognormal variance with pedigree 0.19685, pedigree (1,1,4,1,1)
  (same comment as for Cadmium, ion)
- Zinc [air, urban air close to ground]: 3.4967e-7 kg; lognormal variance with pedigree 0.77445, pedigree (1,1,4,1,1)
  (same comment as for Sulfur dioxide)
- Toluene [air, urban air close to ground]: 3.0035e-8 kg; lognormal variance with pedigree 0.091112, pedigree (1,1,4,1,1)
  (same comment as for NMVOC, non-methane volatile organic compounds, unspecified origin)
- Chromium, ion [water, surface water]: 4.9505e-9 kg; lognormal variance with pedigree 0.71606, pedigree (1,1,4,1,1)
  (same comment as for Cadmium, ion)
- Strontium [air, urban air close to ground]: 8.2582e-9 kg; lognormal variance with pedigree 1.0313, pedigree (1,1,4,1,1)
  (same comment as for Sulfur dioxide)
- Benzene, pentachloro- [air, urban air close to ground]: 7.9342e-11 kg; lognormal variance with pedigree 0.091112, pedigree (1,1,4,1,1)
  (same comment as for NMVOC, non-methane volatile organic compounds, unspecified origin)
- BOD5, Biological Oxygen Demand [water, ground-, long-term]: 0.0015358 kg; lognormal variance with pedigree 0.023158, pedigree (1,1,4,1,1)
  (same comment as for Manganese)
- Titanium [air, urban air close to ground]: 7.7417e-7 kg; lognormal variance with pedigree 0.6945, pedigree (1,1,4,1,1)
  (same comment as for Sulfur dioxide)
- Benzene, hexachloro- [air, urban air close to ground]: 3.1401e-11 kg; lognormal variance with pedigree 0.091112, pedigree (1,1,4,1,1)
  (same comment as for NMVOC, non-methane volatile organic compounds, unspecified origin)
- COD, Chemical Oxygen Demand [water, ground-, long-term]: 0.0046952 kg; lognormal variance with pedigree 0.023158, pedigree (1,1,4,1,1)
  (same comment as for Manganese)
- Thallium [air, urban air close to ground]: 3.7325e-10 kg; lognormal variance with pedigree 1.7268, pedigree (1,1,4,1,1)
  (same comment as for Sulfur dioxide)
- Phenol, pentachloro- [air, urban air close to ground]: 6.5399e-12 kg; lognormal variance with pedigree 0.091112, pedigree (1,1,4,1,1)
  (same comment as for NMVOC, non-methane volatile organic compounds, unspecified origin)
- TOC, Total Organic Carbon [water, ground-, long-term]: 0.0018579 kg; lognormal variance with pedigree 0.023158, pedigree (1,1,4,1,1)
  (same comment as for Manganese)
- Iron [air, urban air close to ground]: 6.2305e-9 kg; lognormal variance with pedigree 0.57263, pedigree (1,1,4,1,1)
  (same comment as for Sulfur dioxide)
- Benzo(a)pyrene [air, urban air close to ground]: 3.3419e-13 kg; lognormal variance with pedigree 0.41105, pedigree (1,1,4,1,1)
  (same comment as for NMVOC, non-methane volatile organic compounds, unspecified origin)
- Sulfate [water, ground-, long-term]: 0.0033634 kg; lognormal variance with pedigree 0.45049, pedigree (1,1,4,1,1)
  (same comment as for Manganese)
- Aluminium [air, urban air close to ground]: 1.5216e-10 kg; lognormal variance with pedigree 0.95777, pedigree (1,1,4,1,1)
  (same comment as for Sulfur dioxide)
- Heat, waste [air, urban air close to ground]: 24.774 MJ; lognormal variance with pedigree 0.033654, pedigree (1,1,4,1,1)
  Waste heat generated from heating value of this waste plus any electricity required to process it.
  Uncertainty: uncertainty is calculated from uncertainties in waste composition and uncertainties in energy efficiency and the uncertainty in internal energy demand
- DOC, Dissolved Organic Carbon [water, ground-, long-term]: 0.0018579 kg; lognormal variance with pedigree 0.023158, pedigree (1,1,4,1,1)
  (same comment as for Manganese)
- Sodium [air, urban air close to ground]: 1.1227e-5 kg; lognormal variance with pedigree 0.63684, pedigree (1,1,4,1,1)
  (same comment as for Sulfur dioxide)
- Heat, waste [water, surface water]: 6.2878 MJ; lognormal variance with pedigree 0.033654, pedigree (1,1,4,1,1)
  (same comment as for Heat, waste)
- Nitrate [water, ground-, long-term]: 0.00021922 kg; lognormal variance with pedigree 0.44423, pedigree (1,1,4,1,1)
  (same comment as for Manganese)
- BOD5, Biological Oxygen Demand [water, surface water]: 0.00047136 kg; lognormal variance with pedigree 0.029247, pedigree (1,1,4,1,1)
  (same comment as for Cadmium, ion)
- Water [water, surface water]: 0.00125959 m3; lognormal variance with pedigree 1.0823, pedigree (1,1,4,1,1)
  Process water released to surface water.
  Uncertainty: uncertainty calculated from uncertainty in process water input and the uncertainty of fraction to surface water.
- Chloride [water, ground-, long-term]: 0.0022838 kg; lognormal variance with pedigree 0.30054, pedigree (1,1,4,1,1)
  (same comment as for Manganese)
- TOC, Total Organic Carbon [water, surface water]: 0.00021009 kg; lognormal variance with pedigree 0.028903, pedigree (1,1,4,1,1)
  (same comment as for Cadmium, ion)
- Water [air, urban air close to ground]: 0.00341449 m3; lognormal variance with pedigree 0.54708, pedigree (1,1,4,1,1)
  Water vapour from waste humidity, hydrogen oxidation and part of the process water.
  Uncertainty: Uncertainty calculated from uncertainty in waste composition, process water input and the uncertainty of fraction to air.
- Bromine [water, ground-, long-term]: 3.3861e-6 kg; lognormal variance with pedigree 1.0288, pedigree (1,1,4,1,1)
  (same comment as for Manganese)
- DOC, Dissolved Organic Carbon [water, surface water]: 0.00021009 kg; lognormal variance with pedigree 0.028903, pedigree (1,1,4,1,1)
  (same comment as for Cadmium, ion)
- Fluoride [water, ground-, long-term]: 9.1515e-6 kg; lognormal variance with pedigree 0.79403, pedigree (1,1,4,1,1)
  (same comment as for Manganese)
- COD, Chemical Oxygen Demand [water, surface water]: 0.00048167 kg; lognormal variance with pedigree 0.028904, pedigree (1,1,4,1,1)
  (same comment as for Cadmium, ion)
- Arsenic, ion [water, ground-, long-term]: 1.0809e-6 kg; lognormal variance with pedigree 1.5037, pedigree (1,1,4,1,1)
  (same comment as for Manganese)
- Sulfate [water, surface water]: 0.00057485 kg; lognormal variance with pedigree 0.31354, pedigree (1,1,4,1,1)
  (same comment as for Cadmium, ion)
- Barium [water, ground-, long-term]: 0.00012714 kg; lognormal variance with pedigree 1.2507, pedigree (1,1,4,1,1)
  (same comment as for Manganese)
- Nitrate [water, surface water]: 7.8525e-5 kg; lognormal variance with pedigree 0.2927, pedigree (1,1,4,1,1)
  (same comment as for Cadmium, ion)
- Cadmium, ion [water, ground-, long-term]: 1.2151e-5 kg; lognormal variance with pedigree 5.0096, pedigree (1,1,4,1,1)
  (same comment as for Manganese)
- Chloride [water, surface water]: 0.0154 kg; lognormal variance with pedigree 0.11456, pedigree (1,1,4,1,1)
  (same comment as for Cadmium, ion)
- Cobalt [water, ground-, long-term]: 2.5787e-5 kg; lognormal variance with pedigree 1.0937, pedigree (1,1,4,1,1)
  (same comment as for Manganese)
- Bromine [water, surface water]: 6.061e-5 kg; lognormal variance with pedigree 0.32365, pedigree (1,1,4,1,1)
  (same comment as for Cadmium, ion)
- Carbon monoxide, fossil [air, urban air close to ground]: 2.5528e-5 kg; lognormal variance with pedigree 0.8006, pedigree (1,1,4,1,1)
  (same comment as for NMVOC, non-methane volatile organic compounds, unspecified origin)
- Chromium VI [water, ground-, long-term]: 2.0161e-6 kg; lognormal variance with pedigree 2.4978, pedigree (1,1,4,1,1)
  (same comment as for Manganese)
- Fluoride [water, surface water]: 3.9923e-6 kg; lognormal variance with pedigree 0.83239, pedigree (1,1,4,1,1)
  (same comment as for Cadmium, ion)
- Carbon dioxide, fossil [air, urban air close to ground]: 2.3092 kg; lognormal variance with pedigree 0.0142958, pedigree (1,1,4,1,1)
  (same comment as for Sulfur dioxide)
- Copper, ion [water, ground-, long-term]: 0.00027925 kg; lognormal variance with pedigree 0.81662, pedigree (1,1,4,1,1)
  (same comment as for Manganese)
- Arsenic, ion [water, surface water]: 6.9325e-7 kg; lognormal variance with pedigree 1.3855, pedigree (1,1,4,1,1)
  (same comment as for Cadmium, ion)
- Methane, fossil [air, urban air close to ground]: 2.2526e-7 kg; lognormal variance with pedigree 0.091112, pedigree (1,1,4,1,1)
  (same comment as for NMVOC, non-methane volatile organic compounds, unspecified origin)
- Mercury [water, ground-, long-term]: 1.664e-7 kg; lognormal variance with pedigree 1.6394, pedigree (1,1,4,1,1)
  (same comment as for Manganese)
- Barium [water, surface water]: 7.384e-8 kg; lognormal variance with pedigree 0.7193, pedigree (1,1,4,1,1)
  (same comment as for Cadmium, ion)

## Extrapolations
This dataset has been extrapolated from year 2012 to the year of the calculation (2021). The uncertainty has been adjusted accordingly.
