# strawberry production, in unheated greenhouse

Dataset: EcoSpold 2, unit process
Geography: RoW
Time period: 2009-01-01 to 2021-12-31
Technology level: current
Classification: ISIC rev.4 ecoinvent: 0125:Growing of other tree and bush fruits and nuts
Tags: WFLDB
Scenario: Business-as-Usual
System model: Allocation, cut-off by classification
Generated by: [System]
Database: ecoinvent
isCopyrightProtected: true
accessRestrictedTo: 1

## General comment
This global dataset is a copy of the regional CH dataset, except for the following modifications.
The production volume represents the global annual production.
The geographicalCorrelation score of every pedigree matrix of was changed to '5'.
Yield of the global dataset = 60000 kg/ha, calculated as a weighted average of the regional yields.
The comments below were part of the CH regional dataset.
This dataset represents the production of 1 kg of strawberry. The reference flow is the average yield per ha.yr and year, from 2009 - 2012: yield (60t/ha.y) obtained under irrigated conditions (total amount of water 493 m3/ha.y). The data are representative for strawberry production in Switzerland under non-heated greenhouse conditions. Typically, greenhouses are heated from March to May as to enable a first early harvest. Greenhouses are then non-heated from May to October which results in two additional harvests. Mineral NPK fertiliser input is 288-108-384 kg/ha. No organic fertilisers are applied. Total active ingredients (a.i.) applied as pesticides amount to 27.5 kg a.i./ha.
The dataset was modelled within the project 'World Food LCA database (WFLDB)'. The aim of this project was to provide inventories of a broad variety of agricultural products and processes and to cover for each product at least 50% of the global export market.
PEF-Quality: data quality rating (DQR) = 2.0 (i.e. very good quality). This dataset refers to an average situation; for specific situations exchanges might differ substantially due to site specific parameters

## Included activities start
This activity starts with soil cultivation after the harvest of the previous crop.

## Included activities end
This activity ends with harvest and transport to the farm gate. Storage is not included.
The dataset includes all activities during a cycle, i.e. all machine operations, corresponding infrastructure, fuel use and sheds. Machine operations include: soil cultivation, fertilisation, pesticide application, harvesting, and on-farm transport. Further, direct field emissions and land use change are included. Irrigation is included, as well as greenhouses infrastructures and energy consumption when relevant. The inputs of seedlings, fertilisers and pesticides as well as packaging of fertilisers and pesticides are considered. Heavy metal uptake by the crop is considered.

## Technology
Conventional production

## Reference product
- strawberry: 1 kg; CPC 01354: Strawberries; By-product classification allocatable product
  production volume 2.77029e7 kg
    Source: FAOSTAT. Average, 2009-2012. Global greenhouse non-heated was calculated with the share from CH non heated to production of CH & US & ES
  property price 1.81 EUR2005
    Calculated from the trade statistics for the year 2005 published by the UN (COMTRADE database, accessed 20151105) as an average of 5 biggest importers of strawberry in the world; FR, DE, CA, UK and USA. Comtrade cathegory: 81010: Strawberries, fresh.
  property carbon content 0.04617
    carbon content on a dry matter basis (reserved; not for manual entry)
  properties: dry mass 0.101 kg, carbon content, fossil 0, water content 8.90099, wet mass 1 kg, water in wet mass 0.899 kg, carbon content, non-fossil 0.04617, carbon allocation 0.00466317 kg

## Inputs from technosphere
- pyrethroid-compound: 1.37031e-7 kg; lognormal variance with pedigree 0.0158498, pedigree (2,2,4,5,1)
  Proxy: Source for total amount of pesticides: literature value or expert estimation (Stoessel et al. 2012). Active ingredient is calculated based on the ecoinvent dataset Strawberry, open field, macro tunnel ES. For calculations see supporting documentation 'WFLDB-Documentation.pdf' (https://ecoquery.ecoinvent.org/File/Reports).
  properties: wet mass 1 kg, dry mass 1 kg, carbon content, fossil 0.623
- irrigation: 0 m3; source Stoessel F. 2012; pedigree (1,1,1,1,1)
  Literature value: Total amount of water used for irrigation (Stoessel et al. 2012). See supporting documentation 'WFLDB-Documentation.pdf' chapter 'Water use for irrigation' (https://ecoquery.ecoinvent.org/File/Reports).
  properties: water content 9089.91, dry mass 0.11 kg, wet mass 1000 kg
- trichloromethane: 0.000425893 kg; lognormal variance with pedigree 0.0158498, pedigree (2,2,4,5,1)
  (same comment as for pyrethroid-compound)
  properties: carbon content, fossil 0.101695, dry mass 1 kg, wet mass 1 kg, heating value, net 4.06 MJ
- glyphosate: 1.95485e-5 kg; lognormal variance with pedigree 0.0158498, pedigree (2,2,4,5,1)
  (same comment as for pyrethroid-compound)
  properties: dry mass 1 kg, wet mass 1 kg, carbon content, fossil 0.214286
- potassium sulfate: 0.000526222 kg; source Stoessel F. 2012; lognormal variance with pedigree 0.126177, pedigree (2,1,4,5,1)
  The exchange has been updated from 'potassium sulfate, as K2O' into 'potassium sulfate' and therefore its amount has been scaled (multiplied) from 0.0003 kg by 1.85 kg of 'potassium sulfate' per kg of 'potassium sulfate, as K2O'. Original comment of the exchange is: Calculated based on literature values or expert estimation: The total amount of nutrient (Stoessel et al. 2012) multiplied by the country-share of fertiliser type (IFA 2014). See supporting documentation 'WFLDB-Documentation.pdf' chapter 'Fertiliser application' for L3 and L4 data (https://ecoquery.ecoinvent.org/File/Reports).
  Corresponds to 17.1 kg/ha
  properties: dry mass 1 kg, wet mass 1 kg
- boric acid, anhydrous, powder: 1.07325e-5 kg; lognormal variance with pedigree 0.0158498, pedigree (2,2,4,5,1)
  (same comment as for pyrethroid-compound)
  properties: wet mass 1 kg, dry mass 1 kg
- packaging, for pesticides: 0.000915467 kg; lognormal variance with pedigree 0.0592, pedigree (4,3,4,5,4)
  Total amount of active substance/s of pesticides needed for the production of strawberry is calculated to be circa 4.58E-04 kg. Pesticide/s used in this dataset is/are: '[thio]carbamate-compound', 'acetamide-anillide-compound, unspecified', 'boric acid, anhydrous, powder', 'glyphosate', 'pyrethroid-compound', 'trichloromethane'. The total amount of active substance/s is doubled in order to account for the packaging of the dilluted product of pesticide/s that is/are applied. Therefore, 9.15E-04 kg of packaging for pesticides is justified with this exchange.
  properties: carbon content, fossil 0.85714, heating value, net 25.97 MJ, dry mass 1 kg, price 0.0642 EUR2005, wet mass 1 kg
- inorganic nitrogen fertiliser, as N: 0 kg; source Stoessel F. 2012; pedigree (1,1,1,1,1)
  Calculated based on literature values or expert estimation: The total amount of nutrient (Stoessel et al. 2012) multiplied by the country-share of fertiliser type (IFA 2014). See supporting documentation 'WFLDB-Documentation.pdf' chapter 'Fertiliser application' for L3 and L4 data (https://ecoquery.ecoinvent.org/File/Reports).
  Corresponds to 217 kg N/ha
  properties: dry mass 1 kg, wet mass 1 kg
- acetamide-anillide-compound, unspecified: 1.13713e-6 kg; lognormal variance with pedigree 0.0158498, pedigree (2,2,4,5,1)
  (same comment as for pyrethroid-compound)
  properties: wet mass 1 kg, carbon content, fossil 0.659175, dry mass 1 kg
- inorganic potassium fertiliser, as K2O: 0 kg; source Stoessel F. 2012; pedigree (1,1,1,1,1)
  Calculated based on literature values or expert estimation: The total amount of nutrient (Stoessel et al. 2012) multiplied by the country-share of fertiliser type (IFA 2014). See supporting documentation 'WFLDB-Documentation.pdf' chapter 'Fertiliser application' for L3 and L4 data (https://ecoquery.ecoinvent.org/File/Reports).
  Corresponds to 367.0 kg/ha
  properties: wet mass 1 kg, dry mass 1 kg
- greenhouse, plastic walls and roof: 0.166667 m2*year; source USF 2014; lognormal variance with pedigree 0.126177, pedigree (2,1,4,5,1)
  Calculated value: 1 ha divided by the yield in kg/ha. Note: greenhouse dataset stands for 1 m2 used over 1 year
  properties: lifetime 25 year, Surface 7 m2
- urea: 0 kg; source Stoessel F. 2012; pedigree (1,1,1,1,1)
  The exchange has been updated from 'urea, as N' into 'urea' and therefore its amount has been scaled (multiplied) from 0.0003 kg by 2.1438 kg of 'urea' per kg of 'urea, as N'. Original comment of the exchange is: Calculated based on literature values or expert estimation: The total amount of nutrient (Stoessel et al. 2012) multiplied by the country-share of fertiliser type (IFA 2014). See supporting documentation 'WFLDB-Documentation.pdf' chapter 'Fertiliser application' for L3 and L4 data (https://ecoquery.ecoinvent.org/File/Reports).
  Corresponds to 19.0 kg N/ha
  properties: wet mass 1 kg, dry mass 1 kg, carbon content, fossil 0.2
- [thio]carbamate-compound: 2.85348e-7 kg; lognormal variance with pedigree 0.0158498, pedigree (2,2,4,5,1)
  (same comment as for pyrethroid-compound)
  properties: wet mass 1 kg, dry mass 1 kg, carbon content, fossil 0.626349
- electricity, low voltage: 0 kWh; source Stoessel F. 2012; pedigree (1,1,1,1,1)
  Literature value or expert estimation (Stoessel et al. 2012).
- ammonium sulfate: 0.00017645 kg; source Stoessel F. 2012; lognormal variance with pedigree 0.126177, pedigree (2,1,4,5,1)
  Calculated based on literature values or expert estimation: The total amount of nutrient (Stoessel et al. 2012) multiplied by the country-share of fertiliser type (IFA 2014). See supporting documentation 'WFLDB-Documentation.pdf' chapter 'Fertiliser application' for L3 and L4 data (https://ecoquery.ecoinvent.org/File/Reports).
  Corresponds to 10.6 kg N/ha
  properties: wet mass 1 kg, dry mass 1 kg
- packaging film, low density polyethylene: 0.00316667 kg; source USF 2014
  Literature value or expert estimation (Personal communication with Union Suisse Fruit, 2014). Plastic film as soil cover (PE film). Lifespan: 1 year.
  properties: wet mass 1 kg, dry mass 1 kg, heating value, net 42.47 MJ, carbon content, fossil 0.857143
- mulching: 1.66667e-5 ha; lognormal variance with pedigree 0.126177, pedigree (2,1,4,5,1)
  Proxy: Similar crop and country used.
- packaging, for fertilisers: 0.0260472 kg; lognormal variance with pedigree 0.0592, pedigree (4,3,4,5,4)
  Total amount of active substance/s of fertilisers needed for the production of 'strawberry' is calculated to be circa 1.30E-02 kg. Fertiliser/s used in this dataset is/are: 'ammonia, liquid', 'ammonium nitrate, as N', 'ammonium sulfate, as N', 'nitrogen fertiliser, as N', 'phosphate fertiliser, as P2O5', 'potassium fertiliser, as K2O', 'potassium sulfate, as K2O', 'urea, as N'. The total amount of active substance/s is doubled in order to account for the packaging of the dilluted product of fertiliser/s that is/are applied. Therefore, 2.60E-02 kg of packaging for fertilisers is justified with this exchange.
  properties: carbon content, fossil 0.825301, dry mass 1 kg, heating value, net 25.01 MJ, price 0.0642 EUR2005, wet mass 1 kg
  note on carbon content, fossil: Considering a chemical formula (C2H4)n for polyethylene, carbon content-fossil is calculated to be 0.856286 kg of Carbon per kg of dry mass.
- ammonium nitrate: 0 kg; source Stoessel F. 2012; pedigree (1,1,1,1,1)
  The exchange has been updated from 'ammonium nitrate, as N' into 'ammonium nitrate' and therefore its amount has been scaled (multiplied) from 0.0011 kg by 2.8573 kg of 'ammonium nitrate' per kg of 'ammonium nitrate, as N'. Original comment of the exchange is: Calculated based on literature values or expert estimation: The total amount of nutrient (Stoessel et al. 2012) multiplied by the country-share of fertiliser type (IFA 2014). See supporting documentation 'WFLDB-Documentation.pdf' chapter 'Fertiliser application' for L3 and L4 data (https://ecoquery.ecoinvent.org/File/Reports).
  Corresponds to 67.8 kg N/ha
  properties: dry mass 1 kg, wet mass 1 kg
- transport, tractor and trailer, agricultural: 0.002 metric ton*km; lognormal variance with pedigree 0.164439, pedigree (4,1,4,5,1)
  On-farm transport: Yield (in tonnes) multiplied by the average distance from field to farm. The distance was assumed to be 2 km (proxy).
- ammonia, anhydrous, liquid: 0 kg; source Stoessel F. 2012; pedigree (1,1,1,1,1)
  Calculated based on literature values or expert estimation: The total amount of nutrient (Stoessel et al. 2012) multiplied by the country-share of fertiliser type (IFA 2014). See supporting documentation 'WFLDB-Documentation.pdf' chapter 'Fertiliser application' for L3 and L4 data (https://ecoquery.ecoinvent.org/File/Reports).
  Corresponds to 8.03 kg N/ha
  properties: wet mass 1 kg, dry mass 1 kg
- sowing: 1.66667e-5 ha; lognormal variance with pedigree 0.126177, pedigree (2,1,4,5,1)
  Proxy: Similar crop and country used.
- inorganic phosphorus fertiliser, as P2O5: 0 kg; source Stoessel F. 2012; pedigree (1,1,1,1,1)
  Calculated based on literature values or expert estimation: The total amount of nutrient (Stoessel et al. 2012) multiplied by the country-share of fertiliser type (IFA 2014). See supporting documentation 'WFLDB-Documentation.pdf' chapter 'Fertiliser application' for L3 and L4 data (https://ecoquery.ecoinvent.org/File/Reports).
  Corresponds to 108 kg P2O5/ha
  properties: wet mass 1 kg, dry mass 1 kg
- strawberry seedling, for planting: 0.716667 unit; source CDDL 2009; lognormal variance with pedigree 0.126177, pedigree (2,1,4,5,1)
  Literature value or expert estimation (CDDL 2009).
  properties: water content 0.73, dry mass 0.578035 kg, wet mass 1 kg, carbon content, non-fossil 0.439481
  note on carbon content, non-fossil: calculation: C-content of components according to ecoinvent report No. 15a. Source of composition: https://ndb.nal.usda.gov/ndb/search/. Unspecific seedling used as proxy.
- irrigation: 0.000123214, 5.23005e-6, 0.00110145, 1.80498e-5, 9.02565e-7, 5.125e-5, 8.34187e-6, 0.00211663, 4.06867e-5, 1.39058e-5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 m3 (16 entries); source Stoessel F. 2012; lognormal variance with pedigree 0.126177, pedigree (2,1,4,5,1)
  (same comment as for irrigation)
- inorganic nitrogen fertiliser, as N: 1.58139e-5, 2.27303e-5, 2.03156e-5, 7.13654e-5, 4.26203e-5, 5.2827e-7, 3.1631e-6, 0.000400783, 7.49035e-6, 1.12502e-6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 kg (29 entries); source Stoessel F. 2012; lognormal variance with pedigree 0.126177, pedigree (2,1,4,5,1)
  (same comment as for inorganic nitrogen fertiliser, as N)
- inorganic potassium fertiliser, as K2O: 4.15392e-6, 2.05844e-5, 4.17509e-5, 0.000516198, 3.69532e-5, 5.34454e-6, 8.89874e-6, 0.000864616, 3.0074e-5, 7.40827e-6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 kg (29 entries); source Stoessel F. 2012; lognormal variance with pedigree 0.126177, pedigree (2,1,4,5,1)
  (same comment as for inorganic potassium fertiliser, as K2O)
- urea: 0.000293092, 4.34086e-5, 0.000343227 kg (3 entries); source Stoessel F. 2012; lognormal variance with pedigree 0.126177, pedigree (2,1,4,5,1)
  (same comment as for urea)
- electricity, low voltage: 0.0214014, 0.00389679, 0.0879652, 0.307331, 0.0627431, 0.963307, 0.155846, 0.44751 kWh (8 entries); source Stoessel F. 2012; lognormal variance with pedigree 0.126177, pedigree (2,1,4,5,1)
  Literature value or expert estimation (Stoessel et al. 2012).
- ammonium nitrate: 0.000567064, 0.000737781, 0.00192502 kg (3 entries); source Stoessel F. 2012; lognormal variance with pedigree 0.126177, pedigree (2,1,4,5,1)
  (same comment as for ammonium nitrate)
- ammonia, anhydrous, liquid: 2.807e-5, 2.41295e-6, 3.75393e-6, 7.43787e-6, 7.28715e-6, 7.63771e-7, 3.41434e-6, 8.07733e-5 kg (8 entries); source Stoessel F. 2012; lognormal variance with pedigree 0.126177, pedigree (2,1,4,5,1)
  (same comment as for ammonia, anhydrous, liquid)
- inorganic phosphorus fertiliser, as P2O5: 1.31898e-5, 1.71126e-5, 1.37026e-5, 0.000107291, 2.26074e-5, 9.31509e-7, 2.45542e-6, 0.000253291, 4.56544e-6, 4.982e-7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 kg (29 entries); source Stoessel F. 2012; lognormal variance with pedigree 0.126177, pedigree (2,1,4,5,1)
  (same comment as for inorganic phosphorus fertiliser, as P2O5)

## Inputs from nature
- Transformation, from arable land, unspecified use [natural resource, land]: 0.166667 m2
  Land transformation: 1 ha divided by yield
- Energy, gross calorific value, in biomass [natural resource, biotic]: 1.93717 MJ; lognormal variance with pedigree 0.0158498, pedigree (2,2,4,5,1)
- Transformation, to arable land, unspecified use [natural resource, land]: 0.166667 m2
  Land transformation: 1 ha divided by yield
- Carbon dioxide, in air [natural resource, in air]: 0.182867 kg; lognormal variance with pedigree 0.0158498, pedigree (2,2,4,5,1)
  CO2 uptake by biomass
- Occupation, annual crop [natural resource, land]: 0.167117 m2*year
  Related to the duration from harvest date of previous crop to harvest date of main crop.

## Emissions to nature
- Acrinathrin [soil, agricultural]: 4.06656e-8 kg; lognormal variance with pedigree 0.0467216, pedigree (2,2,4,5,1)
  Calculated value - Direct emissions from pesticides 100% emitted to soil. See 'WFLDB-Guidelines.pdf', available at https://ecoquery.ecoinvent.org/File/Reports.
- Spinosad [soil, agricultural]: 3.12312e-7 kg; lognormal variance with pedigree 0.0467216, pedigree (2,2,4,5,1)
  (same comment as for Acrinathrin)
- Pyraclostrobin (prop) [soil, agricultural]: 2.90624e-7 kg; lognormal variance with pedigree 0.0467216, pedigree (2,2,4,5,1)
  (same comment as for Acrinathrin)
- Kresoxim-methyl [soil, agricultural]: 2.16883e-7 kg; lognormal variance with pedigree 0.0467216, pedigree (2,2,4,5,1)
  (same comment as for Acrinathrin)
- Dinitrogen monoxide [air, non-urban air or from high stacks]: 7.68411e-5 kg; source IPCC 2006; lognormal variance with pedigree 0.126664, pedigree (2,2,4,5,1)
  Calculated value - IPCC (2006). See 'WFLDB-Guidelines.pdf', available at https://ecoquery.ecoinvent.org/File/Reports.
- Nitrogen oxides [air, non-urban air or from high stacks]: 0.000169939 kg; source EEA 2013; lognormal variance with pedigree 0.126664, pedigree (2,2,4,5,1)
  Calculated value - EEA/EMEP (2013). See 'WFLDB-Guidelines.pdf', available at https://ecoquery.ecoinvent.org/File/Reports.
- Water [water, surface water]: 0.000657333 m3; lognormal variance with pedigree 0.126177, pedigree (2,1,4,5,1)
  Calculated value - Emission calculated from water balance. See 'WFLDB-Guidelines.pdf', available at https://ecoquery.ecoinvent.org/File/Reports.
- Lambda-cyhalothrin [soil, agricultural]: 9.88988e-8 kg; lognormal variance with pedigree 0.0467216, pedigree (2,2,4,5,1)
  (same comment as for Acrinathrin)
- Cadmium [soil, agricultural]: 1.24373e-7 kg; source Freiermuth R.  2006
  Comment on mathematicalRelation:
  1.35034852287e-07 from Calculated value - Freiermuth (2006). See 'WFLDB-Guidelines.pdf', available at https://ecoquery.ecoinvent.org/File/Reports.
  -1.06617e-08 from Crop, default, heavy metals uptake model
  Heavy metal uptake can be excluded by setting the parameter heavyMetalUptakeSwitch to zero.
- Zinc, ion [water, ground-]: 3.56062e-7 kg; source Freiermuth R.  2006; lognormal variance with pedigree 0.358938, pedigree (2,2,4,5,1)
  Calculated value - Freiermuth (2006). See 'WFLDB-Guidelines.pdf', available at https://ecoquery.ecoinvent.org/File/Reports.
- Boron [soil, agricultural]: 1.93936e-6 kg; lognormal variance with pedigree 0.0467216, pedigree (2,2,4,5,1)
  Calculated value - Direct emissions from pesticides 100% emitted to soil. See 'WFLDB-Guidelines.pdf', available at https://ecoquery.ecoinvent.org/File/Reports. This active ingredient is no longer registered in this specific country, but is used as a proxy
- Mercury [water, ground-]: 1.7358e-11 kg; source Freiermuth R.  2006; lognormal variance with pedigree 0.358938, pedigree (2,2,4,5,1)
  (same comment as for Zinc, ion)
- Chloropicrin [soil, agricultural]: 0.000433767 kg; lognormal variance with pedigree 0.0467216, pedigree (2,2,4,5,1)
  (same comment as for Boron)
- Lead [water, ground-]: 3.75154e-9 kg; source Freiermuth R.  2006; lognormal variance with pedigree 0.358938, pedigree (2,2,4,5,1)
  (same comment as for Zinc, ion)
- Glyphosate [soil, agricultural]: 1.99099e-5 kg; lognormal variance with pedigree 0.0467216, pedigree (2,2,4,5,1)
  (same comment as for Acrinathrin)
- Copper, ion [water, ground-]: 5.45636e-8 kg; source Freiermuth R.  2006; lognormal variance with pedigree 0.358938, pedigree (2,2,4,5,1)
  (same comment as for Zinc, ion)
- Water [air, non-urban air or from high stacks]: 0.0074 m3; lognormal variance with pedigree 0.126177, pedigree (2,1,4,5,1)
  (same comment as for Water)
- Chromium, ion [water, ground-]: 3.39751e-7 kg; source Freiermuth R.  2006; lognormal variance with pedigree 0.358938, pedigree (2,2,4,5,1)
  (same comment as for Zinc, ion)
- Mercury [soil, agricultural]: -9.6421e-10 kg; source Freiermuth R.  2006
  Comment on mathematicalRelation:
  -4.25838e-09 from Crop, default, heavy metals uptake model
  Heavy metal uptake can be excluded by setting the parameter heavyMetalUptakeSwitch to zero.
- Nickel [soil, agricultural]: 2.34078e-7 kg; source Freiermuth R.  2006
  Comment on mathematicalRelation:
  -1.09683e-07 from Crop, default, heavy metals uptake model
  Heavy metal uptake can be excluded by setting the parameter heavyMetalUptakeSwitch to zero.
- Cadmium, ion [water, ground-]: 7.69509e-10 kg; source Freiermuth R.  2006; lognormal variance with pedigree 0.358938, pedigree (2,2,4,5,1)
  (same comment as for Zinc, ion)
- Lead [soil, agricultural]: 1.25774e-7 kg; source Freiermuth R.  2006
  Comment on mathematicalRelation:
  1.82554469122e-07 from Calculated value - Freiermuth (2006). See 'WFLDB-Guidelines.pdf', available at https://ecoquery.ecoinvent.org/File/Reports.
  -5.678085e-08 from Crop, default, heavy metals uptake model
  Heavy metal uptake can be excluded by setting the parameter heavyMetalUptakeSwitch to zero.
- Copper [soil, agricultural]: -3.60702e-7 kg; source Freiermuth R.  2006
  Comment on mathematicalRelation:
  -6.958245e-07 from Crop, default, heavy metals uptake model
  Heavy metal uptake can be excluded by setting the parameter heavyMetalUptakeSwitch to zero.
- Nitrate [water, ground-]: 0.00141636 kg; lognormal variance with pedigree 0.177866, pedigree (2,2,4,5,1)
  Calculated value - SQCB-NO. See 'WFLDB-Guidelines.pdf', available at https://ecoquery.ecoinvent.org/File/Reports.
- Water [water, ground-]: 0.000164333 m3; lognormal variance with pedigree 0.126177, pedigree (2,1,4,5,1)
  (same comment as for Water)
- Phosphate [water, ground-]: 5.1437e-6 kg; source Prasuhn V.  2006; lognormal variance with pedigree 0.177866, pedigree (2,2,4,5,1)
  Calculated value - Prasuhn (2006). See 'WFLDB-Guidelines.pdf', available at https://ecoquery.ecoinvent.org/File/Reports.
- Boscalid [soil, agricultural]: 1.15816e-6 kg; lognormal variance with pedigree 0.0467216, pedigree (2,2,4,5,1)
  (same comment as for Acrinathrin)
- Zinc [soil, agricultural]: -9.73623e-7 kg; source Freiermuth R.  2006
  Comment on mathematicalRelation:
  2.38879176035e-06 from Calculated value - Freiermuth (2006). See 'WFLDB-Guidelines.pdf', available at https://ecoquery.ecoinvent.org/File/Reports.
  Heavy metal uptake can be excluded by setting the parameter heavyMetalUptakeSwitch to zero.
- Carbon dioxide, from soil or biomass stock [air, non-urban air or from high stacks]: 0.002995 kg; normal variance with pedigree 0.5452, pedigree (3,3,5,5,2)
  Global average LUC emissions according 2nd edition of the Quantis-modified tool developed by Blonk Consultants 'WFLDB-adapted-Blonk 2014 direct-land-use-change-assessment-tool_2015-05-18a.xlsx', tab. 'Country & land use unknown'. The emission are based on the relative change in production areas in all countries for a given crop. The weighted average is used which takes into acount relative difference in crop expansion into primary forest, secondary forest, grassland, perennial and annual land.
- Ammonia [air, non-urban air or from high stacks]: 0.000260663 kg; source EEA 2013; lognormal variance with pedigree 0.0467216, pedigree (2,2,4,5,1)
  Calculated value - EMEP/EEA (2013). See 'WFLDB-Guidelines.pdf', available at https://ecoquery.ecoinvent.org/File/Reports.
- Chromium [soil, agricultural]: 1.02349e-6 kg; source Freiermuth R.  2006
  Comment on mathematicalRelation:
  1.08071980396e-06 from Calculated value - Freiermuth (2006). See 'WFLDB-Guidelines.pdf', available at https://ecoquery.ecoinvent.org/File/Reports.
  -5.7225e-08 from Crop, default, heavy metals uptake model
  Heavy metal uptake can be excluded by setting the parameter heavyMetalUptakeSwitch to zero.
- Phosphate [water, surface water]: 1.63314e-5 kg; source Prasuhn V.  2006; lognormal variance with pedigree 0.187266, pedigree (3,2,4,5,3)
  (same comment as for Phosphate)
- Carbon dioxide, fossil [air, non-urban air or from high stacks]: 0.000746667 kg; lognormal variance with pedigree 0.0158498, pedigree (2,2,4,5,1)
  Calculated value - CO2 emissions from urea and lime. See 'WFLDB-Guidelines.pdf', available at https://ecoquery.ecoinvent.org/File/Reports.

## Sampling procedure
WFLDB Methodological Guidelines for the Life Cycle Inventory of Agricultural Products in the latest version, available at: https://ecoquery.ecoinvent.org/File/Reports. Data sources: Data were categorised from level 0 (L0) to level (L4) as follows: L0 = estimate, proxy; L1 = statistical data (e.g. FAOSTAT); L2 = L1 adapted to crop and country; L3 = literature data or L1 resp. L2 data approved by experts; medium detailing (i.e. kg of total N-fertiliser); L4 = L3 data of high detailing (i.e. portion N-fertiliser types).In this dataset data were obtained for yield: L3; Fertilisers: L4; Pesticides: L1; Machinery: L0; Irrigation: L2. For information regarding the calculation of individual exchanges see supporting documentation WFLDB-Documentation.pdf

## Extrapolations
The amount of the exchanges are copy from a regional dataset.

## Review by Assumpció ANTON 2016-05-30
Be aware that the use of statistics in input calculations could provide some specific inputs not common for specific crops, this should be corrected if better information is available and better reflexed in DQR . Currently, I would dissent for some of good marks provided, being a revision of criteria applied advisable.

Pesticides will need to be amended periodically checking for update of pesticides' ban.
