# sulfur stockpiling

Dataset: EcoSpold 2, unit process
Geography: CA-AB
Time period: 2007-01-01 to 2021-12-31
Technology level: current
Classification: ISIC rev.4 ecoinvent: 2011:Manufacture of basic chemicals
Scenario: Business-as-Usual
System model: Allocation, cut-off by classification
Generated by: Emilia Moreno Ruiz
Database: ecoinvent
isCopyrightProtected: true
accessRestrictedTo: 1

## General comment
Canada is one of the bigger producers of sulfur in the world, and one of the leading exporters. About two-thirds of Canadian sulfur is recovered at natural gas operations in Alberta, with some recovered from gas in British Columbia and from oil refineries in other parts of the country.
Much of the worldwide sulfur inventories are stockpiled in Canada and Kazakhstan. This dataset concerns the stockpiling in Alberta (Canada), where the major stockpiling facilities are located.
Sources:
-Sulfur, Joyce A. Ober, in minerals.usgs.gov/minerals/pubs/commodity/sulfur/myb1-2007-sulfu.xls

## Included activities start
The activity starts with the piling of recovered sulfur for storage

## Included activities end
The activity ends with the provision of the service of stockpiling the sulfur.

## Geography
dataset is valid for sulfur storage.

## Technology
The sulfur is stored in a stockpile, outside.

## Reference product
- sulfur stockpiling: 1 kg; CPC 34520: Sulphur, except sublimed sulphur, precipitated sulphur and colloidal sulphur; By-product classification allocatable product
  production volume 8.973e7 kg; = 8973000000*0.01
    It has been considered that 1% of the sulfur produced in 2005 in Canada was stockpiled.
    minerals.usgs.gov/minerals/pubs/commodity/sulfur/myb1-2006-sulfu.xls
  property price 0.132094 EUR2005
    Calculated based on inputs: The price of the product has been calculated as a sum of the values of the material and energy inputs for this product. This value is therefore a rough estimation. It may underestimate the real price since there are additional expenses when producing any product. These expences can include for example labour costs, treatment of waste materials and profit for the producer. Please consider carefully whether this level of data quality is acceptable for your application.

## Inputs from technosphere
- mastic asphalt: 0.00357144 kg; = 8.9286E-06*20E-2*2000; lognormal variance with pedigree 0.0427, pedigree (3,2,5,1,1)
  Estimation. It is estimated a ground sealing with 50 cm gravel bed, 3 mm plastic geo-sealing sheet and 20 cm of asphalt cover.
  The density of asphalt concrete is 2000 kg/m3.(http://www.substech.com/dokuwiki/doku.php?id=thermoplastic_low_density_polyethylene_ldpe)
  property carbon content, fossil 0.0968869; name C_content_fossil
  property water in wet mass 0 kg; name WWM
  property dry mass 1 kg; name DM
  property water content 0; name water_content
  property wet mass 1 kg; name WM
  property carbon content, non-fossil 0; name C_content_non_fossil
  properties: heating value, net 2.94 MJ
- steel, unalloyed: 3.45e-6 kg; = (122.5*1*2 + 25*2*2)/100000000; lognormal variance with pedigree 0.0427, pedigree (3,2,5,1,1)
  Estimation.
  The amount of steel is estimated from a picture of a typical sulfur storage area (see link below)
  http://www.kwhconstructors.com/services.bulk.maintenance.php?gallery=pacificcoastterminalssulfurstack-rake
  There are two main parts containing steel:
  - 1 steel structure and conveyor. The estimated dimensions are 25m*2m*2m
  - 1 steel track that has the lenght of the storage area. It is assumed a rectangular storage area with dimension of122.5m*40.8 m. The dimensions of the track are 122.5m*2m*1m
  properties: dry mass 1 kg, carbon content, fossil 0.0025, wet mass 1 kg
- sulfur: 1 kg
  sulfur losses due to storage are negligible.
  properties: dry mass 1 kg, wet mass 1 kg
- packaging film, low density polyethylene: 2.46429e-5 kg; = 8.9286E-06*3E-3*920; lognormal variance with pedigree 0.0427, pedigree (3,2,5,1,1)
  Estimation. It is estimated a ground sealing with 50 cm gravel bed, 3 mm plastic geo-sealing sheet and 20 cm of asphalt cover.
  The density of low density polyethylene is 920 kg/m3. (http://www.substech.com/dokuwiki/doku.php?id=thermoplastic_low_density_polyethylene_ldpe)
  properties: dry mass 1 kg, carbon content, fossil 0.857143, wet mass 1 kg, heating value, net 42.47 MJ
- gravel, crushed: 0.00669645 kg; = 8.9286E-06*50E-2*1500; lognormal variance with pedigree 0.0427, pedigree (3,2,5,1,1)
  Estimation. It is estimated a ground sealing with 50 cm gravel bed, 3 mm plastic geo-sealing sheet and 20 cm of asphalt cover.
  The density of gravel is 1500 kg/m3 (http://www.substech.com/dokuwiki/doku.php?id=thermoplastic_low_density_polyethylene_ldpe)
  properties: wet mass 1 kg, dry mass 1 kg

## Inputs from nature
- Transformation, to dump site [natural resource, land]: 8.92857e-6 m2; name transformation_area; = 0.000625/70; source Keystone Environmental LTD. 2007; lognormal variance with pedigree 0.1626, pedigree (2,4,5,1,1)
  Based on sulfur handling and storage project in Port Ridley, Alberta, Canada,
  The planned area for dry bulk sulfur storage is 5,000 m2.
  The max. capacity is 100,000 tonnes. The lifetime of the storage was not given and it has been estimated to 70 years.
  The average storage time is considered 20 years for 1 kg of sulfur. This is considered a reasonable time period, given the fact that sulfur storage are major pieces of engineering which should ensure proper storage and retrievability for decades, at least. Thus, after 20 years the stocked material should be retrieved or changed to a new placement, in order to renew the surface seal and ensure proper storage (estimation provided in written communication by Gabor Doka, 06/2012).
  The transformation is calculated as:
  occupation area / lifetime of stockpile
- Transformation, from unspecified [natural resource, land]: 8.92857e-6 m2; name transformation_from; = 0.000625/70; source Keystone Environmental LTD. 2007; lognormal variance with pedigree 0.1626, pedigree (2,4,5,1,1)
  (same comment as for Transformation, to dump site)
- Occupation, dump site [natural resource, land]: 0.001 m2*year; name occupation_area; = 20*5000*70/(100000000*70); source Keystone Environmental LTD. 2007; lognormal variance with pedigree 0.0826, pedigree (2,4,5,1,1)
  Based on sulfur handling and storage project in Port Ridley, Alberta, Canada,
  The planned area for dry bulk sulfur storage is 5,000 m2.
  The max. capacity is 100,000 tonnes. The lifetime of the storage was not given and it has been estimated to 70 years.
  The average storage time is considered 20 years for 1 kg of sulfur. This is considered a reasonable time period, given the fact that sulfur storage are major pieces of engineering which should ensure proper storage and retrievability for decades, at least. Thus, after 20 years the stocked material should be retrieved or changed to a new placement, in order to renew the surface seal and ensure proper storage (estimation provided in written communication by Gabor Doka, 06/2012).
  The occupation is calculated:
  20 (kg*years) *5000 (m2) *70 years /((100000000 (kg) * 70 (years) )

## Sampling procedure
Literature

## Extrapolations
This dataset has been extrapolated from year 2007 to the year of the calculation (2021). The uncertainty has been adjusted accordingly.
