# glass wool mat production, with plant-based binder, uncoated, Saint-Gobain ISOVER SA

Dataset: EcoSpold 2, unit process
Geography: CH
Time period: 2018-01-01 to 2021-12-31
Technology level: current
Classification: ISIC rev.4 ecoinvent: 2399:Manufacture of other non-metallic mineral products n.e.c.
Tags: branded dataset without logo
Scenario: Business-as-Usual
System model: Allocation, cut-off by classification
Share of production covered: 100 %
Generated by: Frank Werner
Database: ecoinvent
isCopyrightProtected: true
accessRestrictedTo: 1

## General comment
This dataset is provided by Saint-Gobain ISOVER SA, CH-1522 Lucens and represents a cradle-to-gate inventory of the average production of all glass woll mats, produced with plant-based binder in 2018 per kg. The average density of an St. Gobain ISOVER SA glass wool mat is 25.00 kg/m3.
The following packaging per m3 is not included: corrugated board, mixed fibre, single wall: 7.44E-04 kg/m3; paper, wood containing, LWC: 2.39E-04 kg/m3: packaging film, LDPE: 2.25E-02 kg/m3; EUR-flat pallet: 4.17E-03 pce/m3
More information on the glass wool by St. Gobain ISOVER SA and their technical specifications can be found under http://www.isover.ch/

## Included activities start
Gate-to-gate inventory: the dataset starts at the factory gate with raw material aquisition and covers the whole prodcution process from mixing of raw materials, melting, fibre forming & collecting, hardening & curing and internal processes (preparation of binders, workshop, etc.). Further on, transportation of raw materials and energy carrier for furnace and infrastructure are included. The dataset does not contain packaging.

## Included activities end
Gate-to-gate inventory: the included activity ends before packaging the product, ready to be shipped. Treatment of waste flows from production are included via the respective datasets.

## Geography
Plant-specific data from Saint-Gobian ISOVER SA, CH-1522 Lucens.

## Technology
imageUrlTagReplace2cbb45df-53df-4ba0-97bd-04777f7596ef
Glasswool is made from natural sand to which recycled glass (cullet) and fluxing agents are added. The material is melted to 1100°C in an electric furnace. The fibre is formed by centrifugation through drilled disks. Fiberising is integral. Binding products as well as elements specific to the usage are added and the wool mat is polymerised and rolled. The product is then packaged.

## Parameters
- fraction, water, completely softened, to air: 0.15 dimensionless; name fraction_WCS_to_air; = fraction_PW_to_air; lognormal variance with pedigree 0.092025, pedigree (4,4,3,2,4)
  Calculated value. See comment in the other parametres present in this dataset. Water, completely softened is considered to be always used as process water, thus process water fractions to air are applied to all water, completely softened input flows to calculate the amount of water consumed in the processes.
- fraction, process water, to air: 0.15 dimensionless; name fraction_PW_to_air; lognormal variance with pedigree 0.092025, pedigree (4,4,3,2,4)
  Literature value. In case when no industry/process specific data are available, default evaporation fraction value is used. This value is 15% and is based on literature (Statistics Canada, 2007 & Shaffer, K.H., 2008, Consumptive water use in the Great Lakes Basin, USGS & Shiklomanov, 2003, World Water Resources at the Beginning of the 21st Century) and has been approved by an expert.
- fraction, tap water, to air: 0.15 dimensionless; name fraction_TW_to_air; = fraction_PW_to_air; lognormal variance with pedigree 0.092025, pedigree (4,4,3,2,4)
  Calculated value. See comment in the other parametres present in this dataset. Tap water is considered to be always used as process water, thus process water fractions to air are applied to all tap water input flows to calculate the amount of water consumed in the processes.

## Reference product
- glass wool mat, uncoated, Saint-Gobain ISOVER SA: 1 kg; name RP; By-product classification allocatable product; CPC 37129: Voiles, webs, mats, mattresses, boards and other articles of glass fibres, except woven fabrics
  production volume 0.45 kg; name PV_RP
    Relative market share in the "market for glass wool mat, uncoated, Saint Gobain, ISOVER SA" in 2018.
    Representing 100% of production. Absolute production volume cannot be stated due to antitrust law.
  property price 1.77 EUR2005; name RP_price_EUR2005
    Calculated from EU prices by use of exchange rates.
  property heating value, net 0 MJ
    Non combustible products are assumed to have an LHV equal to zero (0).
  property carbon content 0.030272
    carbon content on a dry matter basis (reserved; not for manual entry)
  properties: wet mass 1 kg, water in wet mass 0 kg, dry mass 1 kg, water content 0, carbon content, fossil 0.011431, carbon content, non-fossil 0.018841, carbon allocation 0.030272 kg

## By-products
- waste wood, post-consumer: 0 kg; source J.C Scherz, ISOVER S.A 2019; CPC 3928: Sawdust and wood waste and scrap; By-product classification Recyclable; pedigree (1,1,1,1,1)
  production volume 0 kg; = PV_RP * (W_wood / RP)
    Calculated from production volume of reference product using the relative outputs.
  property price 0.079 EUR2005; name W_wood_price_EUR2005
    Temporary price data. Calculated as 90% of purchasers price based on: 2005 import prices (total trades (USD) divided by total weight (kg) in biggest economies of the world: EU27, USA, Brasil, China, India, Japan and Russia) from UN Commodity Trade Statistics Database (http://data.un.org/Explorer.aspxDatabase [Accessed 2011.06.23]). Commodity: Sawdust, wood waste or scrap
  property heating value, net 9.99 MJ
    LHV is calculated based on the Carbon content of the product. More details can be found on the respective documentation.

## Inputs from technosphere
All rows: source J.C Scherz, ISOVER S.A 2019
- chemical, organic: 3.04527e-6 kg; lognormal variance with pedigree 0.0008, pedigree (1,1,2,1,1)
  activity link set as transport is modelled with producer-specific transport distances and transport mean
  properties: carbon content, fossil 0.628, wet mass 1 kg, dry mass 1 kg, heating value, net 19.03 MJ
- water, completely softened: 0.882989 kg; name water_softened_input; lognormal variance with pedigree 0.0008, pedigree (1,1,2,1,1)
  activity link set as location of plant is known
  properties: wet mass 1 kg
- municipal solid waste: -0.00150183 kg; name W_MSW; lognormal variance with pedigree 0.0008, pedigree (1,1,2,1,1)
  production volume 0.000675823 kg; = PV_RP * (W_MSW / RP)
    Calculated from production volume of reference product using the relative outputs.
  property price 0 EUR2005; name W_MSW_price_EUR2005
  property water in wet mass 0.229 kg; name W_MSW_WWM
  property dry mass 0.771 kg; name W_MSW_DM
  property wet mass 1 kg; name W_MSW_WM
  property carbon content, fossil 0.17155; name W_MSW_C_content_fossil
  property carbon content, non-fossil 0.26165; name W_MSW_C_content_non_fossil
  property water content 0.29702; name W_MSW_water_content
  properties: heating value, net 11.74 MJ
  note on heating value, net: Value taken from the general comment of the treatment dataset.
- soda ash, light, crystalline, heptahydrate: 0.0172406 kg; name soda; lognormal variance with pedigree 0.0008, pedigree (1,1,2,1,1)
  (same comment as for chemical, organic)
  property dry mass 1 kg; name soda_DM
  property carbon content, fossil 0.051724; name soda_C_content_fossil
  property wet mass 1 kg; name soda_WM
  properties: heating value, net 3.43 MJ
- transport, freight, inland waterways, barge: 0.0245797 metric ton*km; lognormal variance with pedigree 0.1202, pedigree (1,1,2,1,1)
  includes transportation of all input materials specific for each provider as reported in SAP
- molybdenum: 1.65e-5 kg; lognormal variance with pedigree 0.0008, pedigree (1,1,2,1,1)
  activity link set as location of plant is known
  properties: dry mass 1 kg, wet mass 1 kg
- transport, freight train: 0.00273108 metric ton*km; lognormal variance with pedigree 0.1202, pedigree (1,1,2,1,1)
  (same comment as for transport, freight, inland waterways, barge)
- transport, freight, sea, container ship: 0.65932 metric ton*km; lognormal variance with pedigree 0.1202, pedigree (1,1,2,1,1)
  (same comment as for transport, freight, inland waterways, barge)
- stone wool factory: 4.43e-10 unit; lognormal variance with pedigree 0.3002, pedigree (1,1,2,1,1)
  activity link set as location of plant is known
- maize starch: 0.040959 kg; lognormal variance with pedigree 0.0008, pedigree (1,1,2,1,1)
  (same comment as for chemical, organic)
  properties: carbon content, non-fossil 0.46, dry mass 0.86 kg, water content 0.16279, wet mass 1 kg, heating value, net 11.64 MJ
- calcium nitrate: 0.00089 kg; lognormal variance with pedigree 0.0008, pedigree (1,1,2,1,1)
  calculated from the original input measured as N (molar mass of Ca(NO3)2 is 164 + tetrahydrate 72 per 2*14=28 mols of N)
  properties: wet mass 1 kg, dry mass 1 kg
- refractory, fireclay, packed: 0.00086054 kg; lognormal variance with pedigree 0.0008, pedigree (1,1,2,1,1)
  wearing parts; activity link set as transport is modelled with producer-specific transport distances and transport mean
  properties: dry mass 1 kg, wet mass 1 kg
- wastewater, average: -0.000628569 m3; name WWA_a; lognormal variance with pedigree 0.0008, pedigree (1,1,2,1,1)
  production volume 0.000282856 m3; = PV_RP * (WWA_a / RP)
    Calculated from production volume of reference product using the relative outputs.
  property price 0 EUR2005; name WWA_a_price_EUR2005
  properties: carbon content, non-fossil 0.19404, wet mass 1000 kg, dry mass 0.35 kg, water content 2856.14
- silicone product: 0.00673099 kg; lognormal variance with pedigree 0.0008, pedigree (1,1,2,1,1)
  (same comment as for chemical, organic)
  properties: heating value, net 9.83 MJ, dry mass 1 kg, carbon content, fossil 0.32432, wet mass 1 kg
- transport, freight, lorry 16-32 metric ton, EURO5: 0.425256 metric ton*km; lognormal variance with pedigree 0.1202, pedigree (1,1,2,1,1)
  (same comment as for transport, freight, inland waterways, barge)
- heat, district or industrial, natural gas: 3.88551 MJ; lognormal variance with pedigree 0.0008, pedigree (1,1,2,1,1)
  Activity link set as heat generation unit is known
  properties: heating value, net 1 MJ
- glass cullet, for Saint-Gobain ISOVER SA: 0.769217 kg; lognormal variance with pedigree 0.0008, pedigree (1,1,2,1,1)
  activity link set as location of plant is known
  properties: dry mass 1 kg, wet mass 1 kg
- iron-nickel-chromium alloy: 7.32368e-5 kg; lognormal variance with pedigree 0.0008, pedigree (1,1,2,1,1)
  Wearing parts; activity link set as transport is modelled with producer-specific transport distances and transport mean
  properties: wet mass 1 kg, dry mass 1 kg
- diesel, burned in building machine: 0.0249352 MJ; lognormal variance with pedigree 0.0008, pedigree (1,1,2,1,1)
  internal transport
  properties: heating value, net 1 MJ
- lubricating oil: 0.000596418 kg; lognormal variance with pedigree 0.0008, pedigree (1,1,2,1,1)
  (same comment as for chemical, organic)
  properties: dry mass 1 kg, wet mass 1 kg, carbon content, fossil 0.75, heating value, net 40.2 MJ
  note on heating value, net: Literature value, Source: IPCC 2006, 2006 IPCC Guidelines for National Greenhouse Gas Inventories, Prepared by the National Greenhouse Gas Inventories Programme, Eggleston H.S., Buendia L., Miwa K., Ngara T. and Tanabe K. (eds). Published: IGES, Japan
- waste polyethylene: -0.00121796 kg; name W_PE; lognormal variance with pedigree 0.0008, pedigree (1,1,2,1,1)
  production volume 0.000548084 kg; = PV_RP * (W_PE / RP)
    Calculated from production volume of reference product using the relative outputs.
  property price 0 EUR2005; name W_PE_price_EUR2005
  property water in wet mass 0.004 kg; name W_PE_WWM
  property carbon content, fossil 0.8253; name W_PE_C_content_fossil
  property water content 0.0040161; name W_PE_water_content
  property dry mass 0.996 kg; name W_PE_DM
  property wet mass 1 kg; name W_PE_WM
  properties: heating value, net 42.47 MJ
- tap water: 0.813435 kg; name tap_water_input; lognormal variance with pedigree 0.0008, pedigree (1,1,2,1,1)
  activity link set as location of plant is known
  properties: dry mass 0.00034 kg, wet mass 1 kg, carbon content, fossil 0.0017899, water content 2940.18
- manganese: 0.00643188 kg; lognormal variance with pedigree 0.0008, pedigree (1,1,2,1,1)
  (same comment as for chemical, organic)
  properties: dry mass 1 kg, wet mass 1 kg
- sodium phosphate: 0.00365344 kg; lognormal variance with pedigree 0.0008, pedigree (1,1,2,1,1)
  (same comment as for chemical, organic)
  properties: wet mass 1 kg, dry mass 1 kg
- scrap steel: -0.0019336 kg; name W_ScS; lognormal variance with pedigree 0.0008, pedigree (1,1,2,1,1)
  production volume 0.000870119 kg; = PV_RP * (W_ScS / RP)
    Calculated from production volume of reference product using the relative outputs.
  property price 0 EUR2005; name W_ScS_price_EUR2005
  property wet mass 1 kg; name W_ScS_WM
  property dry mass 1 kg; name W_ScS_DM
- fluorspar, 97% purity: 0.0703028 kg; lognormal variance with pedigree 0.0008, pedigree (1,1,2,1,1)
  (same comment as for chemical, organic)
  properties: wet mass 1 kg, dry mass 1 kg
- electricity, medium voltage, renewable energy products: 1.59 kWh; lognormal variance with pedigree 0.0008, pedigree (1,1,2,1,1)
  electricity consumed during production
- water, deionised: 0.0181 kg; name water_deionised; lognormal variance with pedigree 0.0008, pedigree (1,1,2,1,1)
  calculated: water contained in ancillary raw materials
  properties: wet mass 1 kg
- sodium borates: 0.065971 kg; lognormal variance with pedigree 0.0008, pedigree (1,1,2,1,1)
  (same comment as for chemical, organic)
  properties: dry mass 1 kg, wet mass 1 kg
- formic acid: 0.0321304 kg; lognormal variance with pedigree 0.0008, pedigree (1,1,2,1,1)
  (same comment as for chemical, organic)
  properties: dry mass 1 kg, carbon content, fossil 0.26, wet mass 1 kg, heating value, net 13.17 MJ
- waste wood, post-consumer: -0.00320495 kg; lognormal variance with pedigree 0.0008, pedigree (1,1,2,1,1)
  production volume 0.00144223 kg
  properties: heating value, net 9.99 MJ

## Emissions to nature
All rows: source J.C Scherz, ISOVER S.A 2019
- Nitrogen oxides [air, unspecified]: 0.00296053 kg; lognormal variance with pedigree 0.0402, pedigree (1,1,2,1,1)
  process-related emissions (fuel-related emissions are not significant compared to process-related emissions)
- Particulates, > 10 um [air, unspecified]: 0.000909443 kg; lognormal variance with pedigree 0.0402, pedigree (1,1,2,1,1)
  (same comment as for Nitrogen oxides)
- Water [air, unspecified]: 0.00108596 m3; name water_to_air_unspecified; = ((tap_water_input-(WWA_a*-1)*1000)/1000)+(water_softened_input/1000)+water_deionised/1000; lognormal variance with pedigree 0.098025, pedigree (4,4,4,2,4)
  Calculated value based on literature values and expert opinion. See comments in the parametres' comment field. Plus water content of glue/additives.
  property fraction, origin: salt water 0; name fraction_origin_salt_water
  property fraction, origin: unspecified 0; name fraction_origin_unspecified
  property fraction, origin: fresh water 1; name fraction_origin_fresh_water
- Carbon monoxide, fossil [air, non-urban air or from high stacks]: 0.000967492 kg; lognormal variance with pedigree 0.0402, pedigree (1,1,2,1,1)
  (same comment as for Nitrogen oxides)
- Carbon dioxide, fossil [air, non-urban air or from high stacks]: 0.0334301 kg; lognormal variance with pedigree 0.0008, pedigree (1,1,2,1,1)
  stoichiometric emission of CO2 from soda and other additives/raw materials

## Sampling procedure
Plant-specific data from administrative software (SAP) for material aquisition and on-site measurements (emissions).

## Extrapolations
This dataset has been extrapolated from year 2018 to the year of the calculation (2021). The uncertainty has been adjusted accordingly.

## Review by Bruno Peuportier 2020-05-04
The dataset has been updated accounting for our previous review.
