# plug production, inlet and outlet, for network cable

Dataset: EcoSpold 2, unit process
Geography: GLO
Time period: 2000-01-01 to 2021-12-31
Technology level: current
Classification: ISIC rev.4 ecoinvent: 2610:Manufacture of electronic components and boards
Classification: EcoSpold01Categories: electronics/component
Synonyms: Connector
Tags: ConvertedDataset
Scenario: Business-as-Usual
System model: Allocation, cut-off by classification
Generated by: Martin Lehmann
Published in: Hischier R. 2007
Database: ecoinvent
isCopyrightProtected: false
accessRestrictedTo: 1

## General comment
This dataset represents the production of 1 unit of a typical set of plugs (inlet and outlet) for a computer network cable. It is based on two plugs (2 identical ones) with a weight of 0.0086 kg. Main data are based on weighting and calculations of a Swiss type computer cable at EMPA la-boratories, supported by EPD information.
[This dataset was already contained in the ecoinvent database version 2. It was not individually updated during the transfer to ecoinvent version 3. Life Cycle Impact Assessment results may still have changed, as they are affected by changes in the supply chain, i.e. in other datasets. This dataset was generated following the ecoinvent quality guidelines for version 2. It may have been subject to central changes described in the ecoinvent version 3 change report (http://www.ecoinvent.org/database/ecoinvent-version-3/reports-of-changes/), and the results of the central updates were reviewed extensively. The changes added e.g. consistent water flows and other information throughout the database. The documentation of this dataset can be found in the ecoinvent reports of version 2, which are still available via the ecoinvent website. The change report linked above covers all central changes that were made during the conversion process.]

## Included activities start
From reception of metal and plastic materials at the factory gate.

## Included activities end
This dataset includes materials PVC, HIPS and brass with their respective manufacturing processes, infrastructure, electricity for the assembly of the plugs, plus the road and rail transportation for input materials from the regional storage to the production site.

## Geography
The data describes a typical set of plugs for a computer network cable in 2006. Plugs and cable are produced by international manufacturers and available all over the world. Therefore a global dataset is justifiable.

## Technology
The manufacturing process is represented by injection moulding and contouring (brass).

## Reference product
- plug, inlet and outlet, for network cable: 1 unit; By-product classification allocatable product; CPC 471: Electronic valves and tubes; electronic components; parts thereof
  EcoSpold01Location=GLO
  Category 5 cable, commonly known as Cat 5, is an unshielded twisted pair cable type designed for high signal integrity. Category 5 has been superseded by the Category 5e specification. This type of cable is often used in structured cabling for computer networks such as Ethernet, although it is also used to carry many other signals such as basic voice services, token ring, and ATM (Asynchrone Transfere Mode, at up to 155 Mbit/s, over short distances). Category 5 cable includes four twisted pairs in a single cable jacket. This use of balanced lines helps preserve a high signal-to-noise ratio despite interference from both external sources and other pairs (this latter form of interference is called crosstalk) .
  Patch cables come in two varieties, straight through or reversed. One application of patch cables is for patching between modular patch panels in system centers. This is the straight through variety. Another application is to connect workstation equipment to the wall jack, and these could be eitherstraight through or reversed depending upon the manufacturer. Reversed cables are normally used for voice systems. Cable types, connector types and cabling topologies are defined by TIA/EIA-568-B. TIA/EIA-568-B represents a set of three standards that address commercial building cabling for telecommunications products and services. Perhaps the best known feature of TIA/EIA-568-B.1-2001 is the pin/pair assignments for eight-conductor 100-ohm balanced twisted pair cabling. These assignments are named T568A and T568B and they define the pinout, or order of connections, for wires in 8P8C eight-pin modular connector plugs and jacks.
  production volume 1 unit
    Unknown
    Dummy value to be replaced by measured, estimated or calculated value
  property price 0.106514 EUR2005
    Calculated based on inputs: The price of the product has been calculated as a sum of the values of the material and energy inputs for this product. This value is therefore a rough estimation. It may underestimate the real price since there are additional expenses when producing any product. These expences can include for example labour costs, treatment of waste materials and profit for the producer. Please consider carefully whether this level of data quality is acceptable for your application.
  property carbon content, fossil 0.414034
    Calculated as the addition of C contents in the product composition
  property carbon content 0.414034
    carbon content on a dry matter basis (reserved; not for manual entry)
  properties: water content 0, wet mass 0.0086 kg, dry mass 0.0086 kg, water in wet mass 0 kg, carbon content, non-fossil 0, carbon allocation 0.00356069 kg

## Inputs from technosphere
- injection moulding: 0.00618 kg; lognormal variance with pedigree 0.0527, pedigree (2,4,5,3,1)
  Measured Value, in the Empa laboratories.
  EcoSpold01Location=RER
- contouring, brass: 0.002422 kg; lognormal variance with pedigree 0.0527, pedigree (2,4,5,3,1)
  Measured Value, in the Empa laboratories.
  EcoSpold01Location=RER
  properties: dry mass 0.039644 kg, wet mass 0.039644 kg
- brass: 0 kg; pedigree (1,1,1,1,1)
  Measured Value, in the Empa laboratories.
  EcoSpold01Location=CH
  properties: wet mass 1 kg, dry mass 1 kg
- electricity, medium voltage: 0.0008853 kWh; source Draka 2004; lognormal variance with pedigree 0.0527, pedigree (2,4,5,3,1)
  Estimation, based on literature.
  Further references:
  Nichigoh (2006) Environmental Product Declaration for Wire and Cable World Wide Standard Cable ECO-FLEX Series from <http://www.jia-page.or.jp/jia/epd/directory/nichigoh/nichigoh_e.pdf>.
  EcoSpold01Location=UCTE
- polystyrene, high impact: 0.00218 kg; lognormal variance with pedigree 0.0521, pedigree (1,4,5,3,1)
  Measured Value, in the Empa laboratories.
  EcoSpold01Location=RER
  properties: carbon content, fossil 0.923077, wet mass 1 kg, dry mass 1 kg, heating value, net 38.67 MJ
  note on carbon content, fossil: Chemical formula of polystyrene is (C8H8)n (ecoinvent v2.2 report 11_II)
- printed wiring board mounting facility: 1.7888e-9 unit; lognormal variance with pedigree 0.3527, pedigree (2,4,5,3,1)
  Proxy, infrastructure for printed wiring board is used.
  EcoSpold01Location=GLO
- polyvinylchloride, emulsion polymerised: 0.00051064 kg; lognormal variance with pedigree 0.0521, pedigree (1,4,5,3,1)
  EcoSpold01Location=RER
  Measured Value, in the Empa laboratories.
  properties: carbon content, fossil 0.387097, dry mass 1 kg, wet mass 1 kg, heating value, net 21.5 MJ
  note on carbon content, fossil: Monomer is vynyl chloride, C2H3Cl (ecoinvent v2.2 report 11_II). MW=62 g/mol
- polyvinylchloride, suspension polymerised: 0.00348936 kg; lognormal variance with pedigree 0.0521, pedigree (1,4,5,3,1)
  EcoSpold01Location=RER
  Measured Value, in the Empa laboratories.
  properties: heating value, net 21.5 MJ, carbon content, fossil 0.387097, dry mass 1 kg, wet mass 1 kg
- brass: 1.211e-5, 0.00240989 kg (2 entries); lognormal variance with pedigree 0.0527, pedigree (2,4,5,3,1)
  Measured Value, in the Empa laboratories.
  EcoSpold01Location=CH

## Sampling procedure
Weighing and measuring of materials. Literature for electricity consumption (assembly).

## Extrapolations
This dataset has been extrapolated from year 2006 to the year of the calculation (2021). The uncertainty has been adjusted accordingly.

## Review by Roland Hischier 2011-09-22
Transfer of documentation done.

## Review by Rolf Frischknecht 2007-11-07
passed
