# treatment of municipal solid waste, open dump, wet infiltration class (500mm)

Dataset: EcoSpold 2, unit process
Geography: GLO
Time period: 2006-01-01 to 2021-12-31
Technology level: current
Classification: ISIC rev.4 ecoinvent: 3821:Treatment and disposal of non-hazardous waste
Synonyms: municipal waste landfill
Scenario: Business-as-Usual
System model: Allocation, cut-off by classification
Share of production covered: 1 %
Generated by: Avraam Symeonidis
Database: ecoinvent
isCopyrightProtected: true
accessRestrictedTo: 1

## General comment
This dataset represents the activity of waste disposal of municipal solid waste in an open dump. Recommended use of this dataset: For municipal solid waste, which goes to disposal as part of unmanaged communal waste mixture.Inventoried waste contains 21% paper; 8% Mixed cardboard; 15% plastics; 3% laminated materials; 2% laminated packaging, e.g. tetra bricks; 3% combined goods e.g. diapers; 3% glass; 2% textiles; 8% minerals; 9% natural products; 22% compostable material; 2.65% inert metals; 1% volatile metals; 0.0065% batteries; 0.34% electronic goods; . // Waste composition (wet, in ppm): upper heating value 13.27 MJ/kg; lower heating value 11.74 MJ/kg; H2O 228830; O 257060; H 48250; C 334230; S 1119; N 3123.8; P 893.79; B 7.1933; Cl 6866.2; Br 13.552; F 56.358; I 0.0121; Ag 0.714; As 0.62521; Ba 149.04; Cd 11.748; Co 1.3453; Cr 315.21; Cu 1212.8; Hg 1.4424; Mn 259.36; Mo 1.9551; Ni 107.38; Pb 502.43; Sb 22.564; Se 0.31969; Sn 73.44; V 9.2147; Zn 1311.2; Be n.a.; Sc n.a.; Sr n.a.; Ti n.a.; Tl n.a.; W n.a.; Si 48510; Fe 29996; Ca 14062; Al 12420; K 2059.7; Mg 3377.7; Na 5143.9; . // Share of carbon in waste that is biogenic 60.4%. Share of metals in waste not oxidised and bulk-recyclable (exclude very small or thin parts) Iron: 60.03%; Alu: 17.81%; Copper: 72.83%. Overall degradability of waste during 100 years: 18.73%. Degradability of composing waste fractions: paper: 27%; Mixed cardboard: 32.4%; plastics: 1%; laminated materials: 18%; laminated packaging, e.g. tetra bricks: 18%; combined goods e.g. diapers: 18%; glass: 0%; textiles: 12%; minerals: 0%; natural products: 27%; compostable material: 27%; inert metals: 10%; volatile metals: 0%; batteries: 0%; electronic goods: 0%; ..

## Included activities start
from final waste deposition (without transports to the site)

## Included activities end
Waste-specific short-term emissions to air via landfill gas and landfill leachate. Waste-specific long-term emissions from landfill.

## Geography
Given name of landfill location is 'infiltration class 4 wet (2018)'. Landfill site with mean annual temperature (MAT) of 8 degC, mean annual precipitation (MAP) of 1100 mm/year, and net infiltration of 500 mm/year.
Climate adjustments result in an alpha t (temperature) for permafrost areas of 0.999. Total climate adjustments with alpha pt of 0.999.

## Technology
This is an inventory for an open, uncontrolled waste dump for municipal solid waste. Ultimate average landfill height is 7 meters. Operation phase duration is 15 years.Percentage of landfill gas directly emitted is 100w%. A Methane Correction Factor (MCF) for landfill air emissions of 0.7057 is employed.
Leachate of the landfill is not treated. Based on average waste composition and climate data the end of carbonate phase is estimated to be reached 1632 years after waste deposition.

## Reference product
- municipal solid waste: -1 kg; CPC 39910: Municipal waste; By-product classification Waste; pedigree (1,1,1,1,1)
  main reference product of this activity (supply of disposal service).
  Uncertainty: Uncertainty is not adjusted, as this is the refence product
  production volume 1 kg
    The amount of the annual production volume is a placeholder value. The contribution of this technology to the different local markets can be found in the markets themselves.
  property price 0 EUR2005
    Waste products are assigned a price of zero as they are assumed to require further treatment.
  property heating value, net 11.74 MJ
    Value taken from the general comment of the treatment dataset.
  property carbon content 0.4334
    carbon content on a dry matter basis (reserved; not for manual entry)
  properties: vanadium content 1.1949e-5, silicon content 0.062904, arsenic content 8.1073e-7, water in wet mass 0.22883 kg, carbon content, fossil 0.17157, barium content 0.00019326, cobalt content 1.7444e-6, potassium content 0.0026709, iodine content 1.569e-8, silver content 9.2586e-7, copper content 0.0015726, iron content 0.038897, molybdenum content 2.5352e-6, lead content 0.00065151, chromium content 0.00040874, water content 0.29672, calcium content 0.018235, aluminium content 0.016105, antimony content 2.9259e-5, magnesium content 0.0043799, dry mass 0.77117 kg, carbon content, non-fossil 0.26183, nickel content 0.00013925, wet mass 1 kg, tin content 9.5231e-5, sodium content 0.0066702, manganese content 0.00033632, mercury content 1.8704e-6, cadmium content 1.5233e-5, zinc content 0.0017003, selenium content 4.1455e-7, boron content 9.3277e-6, phosphorus content 0.001159, fluorine content 7.3081e-5, chlorine content 0.0089036, hydrogen content 0.062567, sulfur content 0.0014511, oxygen content 0.33334, heating value, gross 13.272 MJ, nitrogen content 0.0040508, bromine content 1.7573e-5, carbon allocation 0.334225 kg

## Inputs from nature
- Occupation, dump site [natural resource, land]: 0.0035714 m2*year; lognormal variance with pedigree 0.088256, pedigree (1,1,4,1,1)
  for landfill operation phase and spontaneous renaturation.
  Uncertainty: Uncertainty calculated from uncertainty in base parameters.

## Emissions to nature
- Copper, ion [water, ground-]: 2.9077e-7 kg; lognormal variance with pedigree 0.3761, pedigree (1,1,4,1,1)
  burden from short-term leachate to groundwater in uncontrolled landfill in moist cimate.
  Uncertainty: Uncertainty calculated from unertainty of the waste composition of this waste, uncertainty in waste decomposition and short-term leaching in landfill
- Cobalt [water, ground-, long-term]: 1.2292e-6 kg; lognormal variance with pedigree 0.39088, pedigree (1,1,4,1,1)
  Emissions from long-term leachate (>100a) directly from MSW landfill and indirectly via incineration of treatement sludge from leachate treatement.
  Uncertainty: Uncertainty calculated depending on waste input and uncertainty of long-term transfer coefficents in landfill.
- Nickel [air, non-urban air or from high stacks]: 9.5851e-11 kg; lognormal variance with pedigree 0.63979, pedigree (1,1,4,1,1)
  burden from direct release or incineration of landfill biogas; or windblown leachate evaporite in arid climates.
  Uncertainty: Uncertainty calculated from unertainty of the waste composition of this waste, uncertainty in waste decomposition and short-term leaching in landfill
- Cadmium, ion [water, ground-]: 1.3935e-7 kg; lognormal variance with pedigree 0.40573, pedigree (1,1,4,1,1)
  (same comment as for Copper, ion)
- Cadmium, ion [water, ground-, long-term]: 1.1607e-5 kg; lognormal variance with pedigree 0.31966, pedigree (1,1,4,1,1)
  (same comment as for Cobalt)
- Chromium [air, non-urban air or from high stacks]: 8.4167e-11 kg; lognormal variance with pedigree 0.64263, pedigree (1,1,4,1,1)
  (same comment as for Nickel)
- Mercury [water, ground-]: 2.991e-9 kg; lognormal variance with pedigree 0.52823, pedigree (1,1,4,1,1)
  (same comment as for Copper, ion)
- Fluoride [water, ground-, long-term]: 4.9761e-5 kg; lognormal variance with pedigree 0.26788, pedigree (1,1,4,1,1)
  (same comment as for Cobalt)
- Copper [air, non-urban air or from high stacks]: 8.3078e-11 kg; lognormal variance with pedigree 0.64126, pedigree (1,1,4,1,1)
  (same comment as for Nickel)
- Chromium VI [water, ground-]: 3.3667e-7 kg; lognormal variance with pedigree 0.37145, pedigree (1,1,4,1,1)
  (same comment as for Copper, ion)
- Bromine [water, ground-, long-term]: 1.1843e-5 kg; lognormal variance with pedigree 0.3152, pedigree (1,1,4,1,1)
  (same comment as for Cobalt)
- Mercury [air, non-urban air or from high stacks]: 1.1964e-9 kg; lognormal variance with pedigree 0.55775, pedigree (1,1,4,1,1)
  (same comment as for Nickel)
- Cobalt [water, ground-]: 1.1603e-7 kg; lognormal variance with pedigree 0.42411, pedigree (1,1,4,1,1)
  (same comment as for Copper, ion)
- Arsenic, ion [water, ground-, long-term]: 5.9479e-7 kg; lognormal variance with pedigree 0.41558, pedigree (1,1,4,1,1)
  (same comment as for Cobalt)
- Barium [air, non-urban air or from high stacks]: 2.7404e-9 kg; lognormal variance with pedigree 0.53014, pedigree (1,1,4,1,1)
  (same comment as for Nickel)
- Iodide [water, ground-]: 8.2173e-9 kg; lognormal variance with pedigree 0.48959, pedigree (1,1,4,1,1)
  (same comment as for Copper, ion)
- Iodide [water, ground-, long-term]: 3.7675e-9 kg; lognormal variance with pedigree 0.49266, pedigree (1,1,4,1,1)
  (same comment as for Cobalt)
- Cadmium [air, non-urban air or from high stacks]: 9.29e-10 kg; lognormal variance with pedigree 0.56631, pedigree (1,1,4,1,1)
  (same comment as for Nickel)
- Arsenic, ion [water, ground-]: 3.0002e-8 kg; lognormal variance with pedigree 0.46307, pedigree (1,1,4,1,1)
  (same comment as for Copper, ion)
- Silver, ion [water, ground-, long-term]: 7.14e-7 kg; lognormal variance with pedigree 0.41124, pedigree (1,1,4,1,1)
  (same comment as for Cobalt)
- Cobalt [air, non-urban air or from high stacks]: 2.9007e-11 kg; lognormal variance with pedigree 0.68038, pedigree (1,1,4,1,1)
  (same comment as for Nickel)
- Barium [water, ground-]: 1.0962e-5 kg; lognormal variance with pedigree 0.27231, pedigree (1,1,4,1,1)
  (same comment as for Copper, ion)
- Chloride [water, ground-, long-term]: 0.0056074 kg; lognormal variance with pedigree 0.11173, pedigree (1,1,4,1,1)
  (same comment as for Cobalt)
- Hydrogen chloride [air, non-urban air or from high stacks]: 1.7894e-5 kg; lognormal variance with pedigree 0.24461, pedigree (1,1,4,1,1)
  (same comment as for Nickel)
- Bromine [water, ground-]: 1.6854e-6 kg; lognormal variance with pedigree 0.3403, pedigree (1,1,4,1,1)
  (same comment as for Copper, ion)
- Phosphate [water, ground-, long-term]: 0.00018139 kg; lognormal variance with pedigree 0.63499, pedigree (1,1,4,1,1)
  (same comment as for Cobalt)
- Arsenic [air, non-urban air or from high stacks]: 4.2058e-10 kg; lognormal variance with pedigree 0.59163, pedigree (1,1,4,1,1)
  (same comment as for Nickel)
- Fluoride [water, ground-]: 1.0719e-6 kg; lognormal variance with pedigree 0.34005, pedigree (1,1,4,1,1)
  (same comment as for Copper, ion)
- Boron [water, ground-, long-term]: 7.1933e-15 kg; lognormal variance with pedigree 0.8163, pedigree (1,1,4,1,1)
  (same comment as for Cobalt)
- Bromine [air, non-urban air or from high stacks]: 2.3627e-8 kg; lognormal variance with pedigree 0.46022, pedigree (1,1,4,1,1)
  (same comment as for Nickel)
- Chloride [water, ground-]: 0.0012414 kg; lognormal variance with pedigree 0.12923, pedigree (1,1,4,1,1)
  (same comment as for Copper, ion)
- Nitrate [water, ground-, long-term]: 6.6454e-5 kg; lognormal variance with pedigree 0.13894, pedigree (1,1,4,1,1)
  (same comment as for Cobalt)
- Hydrogen fluoride [air, non-urban air or from high stacks]: 5.8159e-6 kg; lognormal variance with pedigree 0.29809, pedigree (1,1,4,1,1)
  (same comment as for Nickel)
- Boron [water, ground-]: 7.1933e-6 kg; lognormal variance with pedigree 0.33585, pedigree (1,1,4,1,1)
  (same comment as for Copper, ion)
- Nitrite [water, ground-, long-term]: 3.4392e-5 kg; lognormal variance with pedigree 0.13894, pedigree (1,1,4,1,1)
  (same comment as for Cobalt)
- Iodine [air, non-urban air or from high stacks]: 1.152e-10 kg; lognormal variance with pedigree 0.58104, pedigree (1,1,4,1,1)
  (same comment as for Nickel)
- Phosphate [water, ground-]: 4.1488e-5 kg; lognormal variance with pedigree 0.25503, pedigree (1,1,4,1,1)
  (same comment as for Copper, ion)
- Nitrogen, organic bound [water, ground-, long-term]: 0.0010328 kg; lognormal variance with pedigree 0.13894, pedigree (1,1,4,1,1)
  (same comment as for Cobalt)
- Methane, fossil [air, non-urban air or from high stacks]: 0.0012548 kg; lognormal variance with pedigree 0.047144, pedigree (1,1,4,1,1)
  burden from direct release or incineration of landfill biogas.
  Uncertainty: Uncertainty calculated from unertainty of the waste composition of this waste, uncertainty in waste decomposition and short-term leaching in landfill
- Nitrite [water, ground-]: 3.2684e-5 kg; lognormal variance with pedigree 0.13978, pedigree (1,1,4,1,1)
  (same comment as for Copper, ion)
- DOC, Dissolved Organic Carbon [water, ground-, long-term]: 0.27805 kg; lognormal variance with pedigree 0.0166369, pedigree (1,1,4,1,1)
  (same comment as for Cobalt)
- Sulfur dioxide [air, non-urban air or from high stacks]: 2.7408e-5 kg; lognormal variance with pedigree 0.25388, pedigree (1,1,4,1,1)
  (same comment as for Methane, fossil)
- Nitrogen, organic bound [water, ground-]: 0.00098149 kg; lognormal variance with pedigree 0.13978, pedigree (1,1,4,1,1)
  (same comment as for Copper, ion)
- Sulfate [water, ground-, long-term]: 0.0028701 kg; lognormal variance with pedigree 0.16889, pedigree (1,1,4,1,1)
  (same comment as for Cobalt)
- Nitrogen oxides [air, non-urban air or from high stacks]: 8.6438e-7 kg; lognormal variance with pedigree 0.20453, pedigree (1,1,4,1,1)
  (same comment as for Methane, fossil)
- Nitrate [water, ground-]: 6.3153e-5 kg; lognormal variance with pedigree 0.13978, pedigree (1,1,4,1,1)
  (same comment as for Copper, ion)
- TOC, Total Organic Carbon [water, ground-, long-term]: 0.27805 kg; lognormal variance with pedigree 0.0166369, pedigree (1,1,4,1,1)
  (same comment as for Cobalt)
- Hydrogen sulfide [water, ground-]: 5.697e-6 kg; lognormal variance with pedigree 0.20702, pedigree (1,1,4,1,1)
  (same comment as for Copper, ion)
- Ammonium, ion [water, ground-, long-term]: 0.00063189 kg; lognormal variance with pedigree 0.13894, pedigree (1,1,4,1,1)
  (same comment as for Cobalt)
- Carbon dioxide, non-fossil [air, non-urban air or from high stacks]: 0.11573 kg; lognormal variance with pedigree 0.008, pedigree (1,1,4,1,1)
  (same comment as for Methane, fossil)
- Sulfate [water, ground-]: 0.00021855 kg; lognormal variance with pedigree 0.20702, pedigree (1,1,4,1,1)
  (same comment as for Copper, ion)
- COD, Chemical Oxygen Demand [water, ground-, long-term]: 0.30412 kg; lognormal variance with pedigree 0.0166369, pedigree (1,1,4,1,1)
  (same comment as for Cobalt)
- Methane, non-fossil [air, non-urban air or from high stacks]: 0.027457 kg; lognormal variance with pedigree 0.047144, pedigree (1,1,4,1,1)
  (same comment as for Methane, fossil)
- DOC, Dissolved Organic Carbon [water, ground-]: 0.0016362 kg; lognormal variance with pedigree 0.12897, pedigree (1,1,4,1,1)
  (same comment as for Copper, ion)
- Hydrogen sulfide [water, ground-, long-term]: 7.4816e-5 kg; lognormal variance with pedigree 0.16889, pedigree (1,1,4,1,1)
  (same comment as for Cobalt)
- Carbon dioxide, fossil [air, non-urban air or from high stacks]: 0.0052893 kg; lognormal variance with pedigree 0.037011, pedigree (1,1,4,1,1)
  (same comment as for Methane, fossil)
- Ammonium, ion [water, ground-]: 0.00060051 kg; lognormal variance with pedigree 0.13978, pedigree (1,1,4,1,1)
  (same comment as for Copper, ion)
- BOD5, Biological Oxygen Demand [water, ground-, long-term]: 0.071996 kg; lognormal variance with pedigree 0.0166369, pedigree (1,1,4,1,1)
  (same comment as for Cobalt)
- Magnesium [water, ground-, long-term]: 0.0029693 kg; lognormal variance with pedigree 0.13353, pedigree (1,1,4,1,1)
  (same comment as for Cobalt)
- BOD5, Biological Oxygen Demand [water, ground-]: 0.00042366 kg; lognormal variance with pedigree 0.12897, pedigree (1,1,4,1,1)
  (same comment as for Copper, ion)
- Aluminium [water, ground-, long-term]: 0.012324 kg; lognormal variance with pedigree 0.093417, pedigree (1,1,4,1,1)
  (same comment as for Cobalt)
- Heat, waste [soil, industrial]: 1.732 MJ; lognormal variance with pedigree 0.033734, pedigree (1,1,4,1,1)
  burden from short-term decomposition of waste (0-100a).
  Uncertainty: Uncertainty calculated from unertainty of the waste composition of this waste, uncertainty in waste decomposition and short-term leaching in landfill
- Potassium, ion [water, ground-, long-term]: 0.0016325 kg; lognormal variance with pedigree 0.14962, pedigree (1,1,4,1,1)
  (same comment as for Cobalt)
- Heat, waste [water, ground-, long-term]: 11.086 MJ; lognormal variance with pedigree 0.024567, pedigree (1,1,4,1,1)
  burden from long-term decomposition of waste (>100a).
  Uncertainty: Uncertainty calculated from unertainty of the waste composition of this waste, uncertainty in waste decomposition and short-term leaching in landfill
- Sodium, ion [water, ground-, long-term]: 0.0040925 kg; lognormal variance with pedigree 0.12071, pedigree (1,1,4,1,1)
  (same comment as for Cobalt)
- TOC, Total Organic Carbon [water, ground-]: 0.0016362 kg; lognormal variance with pedigree 0.12897, pedigree (1,1,4,1,1)
  (same comment as for Copper, ion)
- Magnesium [water, ground-]: 0.00040826 kg; lognormal variance with pedigree 0.15926, pedigree (1,1,4,1,1)
  (same comment as for Copper, ion)
- Iron, ion [water, ground-, long-term]: 0.029965 kg; lognormal variance with pedigree 0.068361, pedigree (1,1,4,1,1)
  (same comment as for Cobalt)
- COD, Chemical Oxygen Demand [water, ground-]: 0.0017896 kg; lognormal variance with pedigree 0.12897, pedigree (1,1,4,1,1)
  (same comment as for Copper, ion)
- Sodium, ion [water, ground-]: 0.0010511 kg; lognormal variance with pedigree 0.13592, pedigree (1,1,4,1,1)
  (same comment as for Copper, ion)
- Zinc, ion [water, ground-, long-term]: 0.001309 kg; lognormal variance with pedigree 0.16359, pedigree (1,1,4,1,1)
  (same comment as for Cobalt)
- Potassium [air, non-urban air or from high stacks]: 1.0678e-7 kg; lognormal variance with pedigree 0.40966, pedigree (1,1,4,1,1)
  (same comment as for Nickel)
- Calcium, ion [water, ground-]: 0.00031309 kg; lognormal variance with pedigree 0.15781, pedigree (1,1,4,1,1)
  (same comment as for Copper, ion)
- Silicon [water, ground-, long-term]: 0.00041824 kg; lognormal variance with pedigree 1.4672, pedigree (1,1,4,1,1)
  (same comment as for Cobalt)
- Magnesium [air, non-urban air or from high stacks]: 1.0206e-7 kg; lognormal variance with pedigree 0.41178, pedigree (1,1,4,1,1)
  (same comment as for Nickel)
- Aluminium [water, ground-]: 9.5733e-5 kg; lognormal variance with pedigree 0.19233, pedigree (1,1,4,1,1)
  (same comment as for Copper, ion)
- Calcium, ion [water, ground-, long-term]: 0.013749 kg; lognormal variance with pedigree 0.089783, pedigree (1,1,4,1,1)
  (same comment as for Cobalt)
- Sodium [air, non-urban air or from high stacks]: 2.6279e-7 kg; lognormal variance with pedigree 0.38124, pedigree (1,1,4,1,1)
  (same comment as for Nickel)
- Potassium, ion [water, ground-]: 0.00042712 kg; lognormal variance with pedigree 0.16457, pedigree (1,1,4,1,1)
  (same comment as for Copper, ion)
- Tin, ion [water, ground-, long-term]: 7.3426e-5 kg; lognormal variance with pedigree 0.25878, pedigree (1,1,4,1,1)
  (same comment as for Cobalt)
- Calcium [air, non-urban air or from high stacks]: 7.8273e-8 kg; lognormal variance with pedigree 0.42396, pedigree (1,1,4,1,1)
  (same comment as for Nickel)
- Tin, ion [water, ground-]: 1.3628e-8 kg; lognormal variance with pedigree 0.47722, pedigree (1,1,4,1,1)
  (same comment as for Copper, ion)
- Vanadium, ion [water, ground-, long-term]: 1.1827e-6 kg; lognormal variance with pedigree 0.58935, pedigree (1,1,4,1,1)
  (same comment as for Cobalt)
- Aluminium [air, non-urban air or from high stacks]: 2.3933e-8 kg; lognormal variance with pedigree 0.46219, pedigree (1,1,4,1,1)
  (same comment as for Nickel)
- Vanadium, ion [water, ground-]: 1.8241e-7 kg; lognormal variance with pedigree 0.39901, pedigree (1,1,4,1,1)
  (same comment as for Copper, ion)
- Selenium [water, ground-, long-term]: 3.9612e-8 kg; lognormal variance with pedigree 0.7079, pedigree (1,1,4,1,1)
  (same comment as for Cobalt)
- Silicon [air, non-urban air or from high stacks]: 5.1841e-8 kg; lognormal variance with pedigree 0.44352, pedigree (1,1,4,1,1)
  (same comment as for Nickel)
- Silicon [water, ground-]: 0.00020736 kg; lognormal variance with pedigree 0.17266, pedigree (1,1,4,1,1)
  (same comment as for Copper, ion)
- Antimony [water, ground-, long-term]: 9.4617e-7 kg; lognormal variance with pedigree 0.92613, pedigree (1,1,4,1,1)
  (same comment as for Cobalt)
- Zinc [air, non-urban air or from high stacks]: 5.0861e-10 kg; lognormal variance with pedigree 0.58396, pedigree (1,1,4,1,1)
  (same comment as for Nickel)
- Zinc, ion [water, ground-]: 2.2887e-6 kg; lognormal variance with pedigree 0.30885, pedigree (1,1,4,1,1)
  (same comment as for Copper, ion)
- Lead [water, ground-, long-term]: 0.00050226 kg; lognormal variance with pedigree 0.19497, pedigree (1,1,4,1,1)
  (same comment as for Cobalt)
- Iron [air, non-urban air or from high stacks]: 7.7601e-9 kg; lognormal variance with pedigree 0.50162, pedigree (1,1,4,1,1)
  (same comment as for Nickel)
- Iron, ion [water, ground-]: 3.1041e-5 kg; lognormal variance with pedigree 0.23046, pedigree (1,1,4,1,1)
  (same comment as for Copper, ion)
- Molybdenum [water, ground-, long-term]: 3.5192e-7 kg; lognormal variance with pedigree 0.56004, pedigree (1,1,4,1,1)
  (same comment as for Cobalt)
- Tin [air, non-urban air or from high stacks]: 3.4071e-12 kg; lognormal variance with pedigree 0.74607, pedigree (1,1,4,1,1)
  (same comment as for Nickel)
- Selenium [water, ground-]: 6.0913e-9 kg; lognormal variance with pedigree 0.50947, pedigree (1,1,4,1,1)
  (same comment as for Copper, ion)
- Manganese [water, ground-, long-term]: 0.00025342 kg; lognormal variance with pedigree 0.21685, pedigree (1,1,4,1,1)
  (same comment as for Cobalt)
- Vanadium [air, non-urban air or from high stacks]: 4.5603e-11 kg; lognormal variance with pedigree 0.66571, pedigree (1,1,4,1,1)
  (same comment as for Nickel)
- Lead [water, ground-]: 1.6844e-7 kg; lognormal variance with pedigree 0.39391, pedigree (1,1,4,1,1)
  (same comment as for Copper, ion)
- Nickel, ion [water, ground-, long-term]: 0.000107 kg; lognormal variance with pedigree 0.24614, pedigree (1,1,4,1,1)
  (same comment as for Cobalt)
- Selenium [air, non-urban air or from high stacks]: 1.5228e-12 kg; lognormal variance with pedigree 0.77635, pedigree (1,1,4,1,1)
  (same comment as for Nickel)
- Antimony [water, ground-]: 1.2904e-7 kg; lognormal variance with pedigree 0.40602, pedigree (1,1,4,1,1)
  (same comment as for Copper, ion)
- Chromium VI [water, ground-, long-term]: 5.8227e-7 kg; lognormal variance with pedigree 2.6862, pedigree (1,1,4,1,1)
  (same comment as for Cobalt)
- Molybdenum [air, non-urban air or from high stacks]: 1.4066e-11 kg; lognormal variance with pedigree 0.70435, pedigree (1,1,4,1,1)
  (same comment as for Nickel)
- Manganese [water, ground-]: 5.9359e-6 kg; lognormal variance with pedigree 0.28411, pedigree (1,1,4,1,1)
  (same comment as for Copper, ion)
- Copper, ion [water, ground-, long-term]: 0.0012125 kg; lognormal variance with pedigree 0.16612, pedigree (1,1,4,1,1)
  (same comment as for Cobalt)
- Manganese [air, non-urban air or from high stacks]: 1.484e-9 kg; lognormal variance with pedigree 0.55012, pedigree (1,1,4,1,1)
  (same comment as for Nickel)
- Molybdenum [water, ground-]: 5.6264e-8 kg; lognormal variance with pedigree 0.43955, pedigree (1,1,4,1,1)
  (same comment as for Copper, ion)
- Mercury [water, ground-, long-term]: 1.4382e-6 kg; lognormal variance with pedigree 0.38847, pedigree (1,1,4,1,1)
  (same comment as for Cobalt)
- Lead [air, non-urban air or from high stacks]: 5.6147e-11 kg; lognormal variance with pedigree 0.65477, pedigree (1,1,4,1,1)
  (same comment as for Nickel)
- Nickel, ion [water, ground-]: 3.834e-7 kg; lognormal variance with pedigree 0.36873, pedigree (1,1,4,1,1)
  (same comment as for Copper, ion)
- Barium [water, ground-, long-term]: 0.00013807 kg; lognormal variance with pedigree 0.23534, pedigree (1,1,4,1,1)
  (same comment as for Cobalt)
- Antimony [air, non-urban air or from high stacks]: 3.226e-11 kg; lognormal variance with pedigree 0.67647, pedigree (1,1,4,1,1)
  (same comment as for Nickel)

## Extrapolations
This dataset has been extrapolated from year 2012 to the year of the calculation (2021). The uncertainty has been adjusted accordingly.
