# treatment of used smartphone, mechanical treatment

Dataset: EcoSpold 2, unit process
Geography: GLO
Time period: 2020-01-01 to 2021-12-31
Technology level: current
Classification: ISIC rev.4 ecoinvent: 3830:Materials recovery
Classification: EcoSpold01Categories: waste management/recycling
Tags: Treatment
Scenario: Business-as-Usual
System model: Allocation, cut-off by classification
Generated by: Nikolia Stoikou
Published in: Hischier R. 2007
Database: ecoinvent
isCopyrightProtected: true
accessRestrictedTo: 1

## General comment
Manual dismantling plus subsequent shredding/separation procedure, based on calculations in accordance with the composition data of the product.

## Included activities end
This dataset represents the mechanical treatment of a WEEE devices in Switzerland. Two process steps are included: manual depollution and the mechanical treatment (shredder) of the remaining part.

## Geography
European data, used as average for global situation

## Technology
4-step-procedure (shredder - separation - shredder - separation) as used currently often in Europe

## Reference product
- used smartphone: -1 kg; name RP; By-product classification Waste; CPC 39990: Other wastes n.e.c.
  production volume 1.4155e9 kg; name PV_RP; = 383000000+311000000+346300000+375200000
    Units sold from 4Q18: 383E6, 1Q19: 311E6, 2Q19:346.3E6, 3Q19:375.2E6. Source: Trendforce Corp, (2019, January 29). Global Smartphone Market Cooling in 2019 with a YoY Decline of 10% in Production Volume, Says TrendForce [Press Release]. Retrieved from https://press.trendforce.com/press/20190129-3208.html, Trendforce Corp, (2019, May 16). Apple Fell to Number Three in 1Q19, While a Worsening US-China Trade Dispute May Add Insult to Injury, Says TrendForce [Press Release]. Retrieved from https://press.trendforce.com/press/20190516-3245.html, Trendforce Corp, (2019, November 28). Global Smartphone Production Volume Grows 9.2% in 3Q19, with Minor Projected Decline in 4Q19, Says TrendForce [Press Release]. Retrieved from https://press.trendforce.com/press/20191128-3313.html
  property price 0 EUR2005; name RP_price_EUR2005
    Waste products are assigned a price of zero as they are assumed to require further treatment.
  property carbon content 0.156633
    carbon content on a dry matter basis (reserved; not for manual entry)
  properties: wet mass 1 kg, dry mass 1 kg, carbon content, non-fossil 8.93007e-5, carbon content, fossil 0.156544, water content 0, water in wet mass 0 kg, carbon allocation 0.156633 kg

## By-products
- electronics scrap: 0 kg; By-product classification Recyclable; CPC 39: Wastes or scraps; pedigree (1,1,1,1,1)
  Calculated - based on composition data
  production volume 0 kg; = PV_RP * abs( W3_elec_scrap/RP)
    Calculated from the production volume of the reference prdoduct in proportion to the respective output amounts.
  property carbon content, fossil 0.317311; name C_content_fossil
    Carbon content assumed equal with the intermediate exchange of "electronic component, passive, unspecified"
  property carbon content, non-fossil 0.0045566; name C_content_non_fossil
    (same comment as for electronics scrap)
  property water content 0; name water_content
  property water in wet mass 0 kg; name WWM
  property dry mass 1 kg; name DM
  property price 16.1 EUR2005
    Temporary price data. Calculated as 90% of purchasers price based on: 2005 import prices (total trades (USD) divided by total weight (kg) in biggest economies of the world: EU27, USA, Brasil, China, India, Japan and Russia) from UN Commodity Trade Statistics Database (http://data.un.org/Explorer.aspxDatabase [Accessed 2011.06.20]). Commodity: Waste/scrap, precious metals except pure gold/platinum
  property wet mass 1 kg; name WM
  property carbon content 0.321868
    carbon content on a dry matter basis (reserved; not for manual entry)
  properties: carbon allocation 0.321868 kg
- iron scrap, sorted, pressed: 0 kg; CPC 39310: Slag, dross, scalings and other waste from the manufacture of iron or steel; By-product classification Recyclable; pedigree (1,1,1,1,1)
  Calculated - based on composition data
  production volume 0 kg; = PV_RP * abs( W2_iron/RP)
    (same comment as for electronics scrap)
  property price 0.175 EUR2005
    Temporary price data. Calculated as 90% of purchasers price based on: 2005 import and export prices (total trades (USD) divided by total weight (kg) in biggest economies of the world: EU27, USA, Brasil, China, India, Japan and Russia) from UN Commodity Trade Statistics Database (http://data.un.org/Explorer.aspxDatabase [Accessed 2011.06.20]). Commodity: Waste or scrap, of cast iron
  property carbon content 0
    carbon content on a dry matter basis (reserved; not for manual entry)
  properties: dry mass 1 kg, wet mass 1 kg, carbon content, fossil 0, water in wet mass 0 kg, carbon content, non-fossil 0, water content 0, carbon allocation 0 kg

## Inputs from technosphere
- used cable: -0.00113 kg; name U3; lognormal variance with pedigree 0.2106, pedigree (5,5,5,5,5)
  Calculated - based on composition data
  production volume 1.59952e6 kg; = PV_RP * abs(U3/RP)
    (same comment as for electronics scrap)
  property price 0 EUR2005; name U3_price_EUR2005
  properties: carbon content, fossil 183.274, wet mass 1 kg, dry mass 1 kg
- waste plastic, consumer electronics: 0 kg; name W1_plastic; pedigree (1,1,1,1,1)
  Calculated - based on composition data
  EcoSpold01Location=CH
  Uncertainty: calculated - based on composition data
  production volume 0 kg
    (same comment as for electronics scrap)
  property price 0 EUR2005; name W1_plastic_price_EUR2005
  properties: dry mass 0.847 kg, wet mass 1 kg, water content 0.180638, carbon content, fossil 0.830215, heating value, net 34.78 MJ
  note on carbon content, fossil: C content in 1 kg DM was calculated using data in Tab A.2, ecoinvent v2.2 report 13_I
  note on heating value, net: Assumed equal to "waste plastic, consumer electronics, sorted".
- waste electric and electronic equipment: -0.43097 kg; name BP; = ((W1_plastic*-1)+ W2_iron+ W3_elec_scrap+ (W4_residue*-1))*-1; lognormal variance with pedigree 0.134, pedigree (3,4,5,1,4)
  calculated as the sum of the waste input
  EcoSpold01Location=GLO
  Uncertainty: rough estimation
  production volume 6.10038e8 kg; = PV_RP * abs( BP/RP)
    (same comment as for electronics scrap)
  property price 0 EUR2005; name BP_price_EUR2005
- used Li-ion battery: -0.23619 kg; name U1; lognormal variance with pedigree 0.0142, pedigree (3,4,2,1,1)
  Calculated - based on composition data
  production volume 3.34327e8 kg; = PV_RP * abs( U1/RP)
    (same comment as for electronics scrap)
  property price 0 EUR2005; name U1_price_EUR2005
  properties: carbon content, fossil 0.328011, wet mass 1 kg, dry mass 1 kg
- residue from mechanical treatment, laptop computer: 0 kg; name W4_residue; pedigree (1,1,1,1,1)
  (same comment as for waste plastic, consumer electronics)
  production volume 0 kg
    (same comment as for electronics scrap)
  property price 0 EUR2005; name W4_residue_price_EUR2005
  properties: wet mass 1 kg, dry mass 1 kg, heating value, net 31.96 MJ, carbon content, fossil 0.766065
  note on heating value, net: Value taken from the general comment of the treatment dataset.
  note on carbon content, fossil: Tab 4.19, ecoinvent v2.2 report 18_V, for details in fraction composition. Carbon content in plastic was calculated using data in Tab A.2, ecoinvent v2.2 report 13_I. Others was also considered plastic, and calculated the same way (from pg 70, ecoinvent v2.2 report 18_V). Ferro was assumed to have a C content of 0.012 kg C/ kg (C content of steel, calculated out of emission factors published in Commission Decision of 18 July 2007 establishing guidelines for the monitoring and reporting of greenhouse gas emissions pursuant to Directive 2003/87/EC of the European Parliament and of the Council (notified under document number C(2007) 3416)). The other component of the fraction were considered to content no C.
- used printed wiring boards: -0.05216 kg; name U2; lognormal variance with pedigree 0.0142, pedigree (3,4,2,1,1)
  EcoSpold01Location=GLO
  Calculated - based on composition data
  Uncertainty: calculated - based on composition data
  production volume 7.38325e7 kg; = PV_RP * abs( U2/RP)
    (same comment as for electronics scrap)
  property price 0 EUR2005; name U2_price_EUR2005
  properties: dry mass 1 kg, carbon content, non-fossil 0.000960142, carbon content, fossil 0.193742, wet mass 1 kg
  note on carbon content, non-fossil: Composition of printed wiring boards used to calculate C content
- used liquid crystal display module: 0 kg; name U4; pedigree (1,1,1,1,1)
  (same comment as for waste plastic, consumer electronics)
  production volume 0 kg
    (same comment as for electronics scrap)
  property price 0 EUR2005; name U4_price_EUR2005
  properties: carbon content, fossil 0.327872, dry mass 1 kg, wet mass 1 kg, carbon content, non-fossil 4.20542e-5
- electronics scrap: -0.02656 kg; lognormal variance with pedigree 0.2106, pedigree (5,5,5,5,5)
  Calculated - based on composition data
  production volume 3.75957e7 kg
  properties: price 16.1 EUR2005
  note on carbon content, fossil: Carbon content assumed equal with the intermediate exchange of "electronic component, passive, unspecified"
- iron scrap, sorted, pressed: -0.28377 kg; lognormal variance with pedigree 0.2106, pedigree (5,5,5,5,5)
  Calculated - based on composition data
  production volume 4.01676e8 kg
  properties: dry mass 1 kg, wet mass 1 kg, price 0.175 EUR2005
- waste plastic, consumer electronics: -0.00125565, -0.0831144 kg (2 entries); lognormal variance with pedigree 0.0142, pedigree (3,4,2,1,1)
  (same comment as for waste plastic, consumer electronics)
  production volume 1.19426e8 kg
- residue from mechanical treatment, laptop computer: -0.000539794, -0.0357302 kg (2 entries); lognormal variance with pedigree 0.0142, pedigree (3,4,2,1,1)
  (same comment as for waste plastic, consumer electronics)
  production volume 5.13402e7 kg
- used liquid crystal display module: -0.00415523, -0.275045 kg (2 entries); lognormal variance with pedigree 0.0142, pedigree (3,4,2,1,1)
  (same comment as for waste plastic, consumer electronics)
  production volume 3.95208e8 kg

## Sampling procedure
literature and own experiences

## Extrapolations
This dataset has been extrapolated from year 2020 to the year of the calculation (2021). The uncertainty has been adjusted accordingly.
