# Sohio process

Dataset: EcoSpold 2, unit process
Geography: RoW
Time period: 1989-01-01 to 2021-12-31
Technology level: current
Classification: ISIC rev.4 ecoinvent: 2011:Manufacture of basic chemicals
Classification: EcoSpold01Categories: chemicals/organics
Tags: ConvertedDataset
Scenario: Business-as-Usual
System model: Allocation, cut-off by classification
Share of production covered: 100 %
Generated by: Jürgen Sutter
Published in: Sutter, J. 2007
Database: ecoinvent
isCopyrightProtected: true
accessRestrictedTo: 1

## General comment
The multioutput-process "Sohio process" delivers the co-products acrylonitrile, hydrigen cyanide, and acetoinitrile. The allocation is based on mass balance.
[This dataset was already contained in the ecoinvent database version 2. It was not individually updated during the transfer to ecoinvent version 3. Life Cycle Impact Assessment results may still have changed, as they are affected by changes in the supply chain, i.e. in other datasets. This dataset was generated following the ecoinvent quality guidelines for version 2. It may have been subject to central changes described in the ecoinvent version 3 change report (http://www.ecoinvent.org/database/ecoinvent-version-3/reports-of-changes/), and the results of the central updates were reviewed extensively. The changes added e.g. consistent water flows and other information throughout the database. The documentation of this dataset can be found in the ecoinvent reports of version 2, which are still available via the ecoinvent website. The change report linked above covers all central changes that were made during the conversion process.]

## Included activities end
Sohio process including materials, energy uses, infrastructure and emissions.

## Geography
The inventory is modelled for Europe.

## Technology
Sohio process

## Time period
Time of publications.

## Parameters
- fraction, cooling water, once-through system, to air: 0.004 dimensionless; name fraction_CW_OT_to_air; lognormal variance with pedigree 0.0413, pedigree (2,3,1,3,1)
  Calculated based on literature value (Scown, C.D., 2011, Water Footprint of U.S. Transportation Fuels and supplying information of the article) (Vionnet, S., Quantis Water Database - Technical Report, 2012).
- fraction, cooling water, to air: 0.3875 dimensionless; name fraction_CW_to_air; = (0.5*fraction_CW_OT_to_air)+(0.5*fraction_CW_R_to_air); lognormal variance with pedigree 0.092025, pedigree (4,4,3,2,4)
  Calculated value based on literature value (see comments of the other parametres present in this dataset) and expert opinion. In the case when no industry/literature data are available about the type of cooling or directly fraction, cooling water, to air specific for the process a default assumption is applied. It is assumed that the once-through cooling system is used in 50% of all cases and recirculating system is used in another 50% of all cases.
- fraction, cooling water, recirculating system, to air: 0.771 dimensionless; name fraction_CW_R_to_air; lognormal variance with pedigree 0.0413, pedigree (2,3,1,3,1)
  (same comment as for fraction, cooling water, once-through system, to air)
- fraction, water, deionised, to air: 0.205 dimensionless; name fraction_WDI_to_air; = fraction_PW_to_air; lognormal variance with pedigree 0.092025, pedigree (4,4,3,2,4)
  Calculated value. See comment in the other parametres present in this dataset. Deionised water is considered to be always used as process water, thus process water fractions to air are applied to all deionised water input flows to calculate the amount of water consumed in the processes.
- fraction, process water, to air: 0.205 dimensionless; name fraction_PW_to_air; lognormal variance with pedigree 0.092025, pedigree (4,4,3,2,4)
  Literature value (Statistics Canada, 2007 & Shaffer, K.H., 2008, Consumptive water use in the Great Lakes Basin, USGS) (Vionnet, S., Quantis Water Database - Technical Report, 2012).
- fraction, cooling water, cooling pond system, to air: 0.032 dimensionless; name fraction_CW_CP_to_air; lognormal variance with pedigree 0.0413, pedigree (2,3,1,3,1)
  (same comment as for fraction, cooling water, once-through system, to air)

## Reference product
- acrylonitrile: 1 kg; By-product classification allocatable product; CPC 34150: Amine-function compounds; oxygen-function amino-compounds, except lysine and its esters and salts thereof and […]; CAS 107-13-1
  EcoSpold01Location=RER
  production volume 4e9 kg
    PCI Acrylonitrile Ltd. Report (Ullmann's Encyclopedia of Industrial Chemistry indicates 6000 million kg)
  property price 0.714 EUR2005
    Temporary price data. Calculated as 90% of purchasers price based on: 2004 import and export prices (total trades (USD) divided by total weight (kg) in EU27, USA, China, Japan and India) from UN Commodity Trade Statistics Database (http://data.un.org/Explorer.aspxDatabase [Accessed 2 July 2010]). Commodity: Acrylonitrile
  property heating value, net 27.43 MJ
    LHV is calculated based on the elemental composition of the substance. Based on the CAS number of the substance (000107-13-1), the chemical formula of the substance is found to be: C3H3N, (PubChem 2020).
    Reference: Kim, S., Chen, J., Cheng, T., Gindulyte, A., He, J., He, S., Li, Q., Shoemaker, B. A., Thiessen, P. A., Yu, B., Zaslavsky, L., Zhang, J., & Bolton, E. E. (2019). PubChem 2019 update: improved access to chemical data. Nucleic acids research, 47(D1), D1102–D1109. https://doi.org/10.1093/nar/gky1033
  property carbon content 0.679245
    carbon content on a dry matter basis (reserved; not for manual entry)
  property true value 0.714
    allocation property applied in "true value" allocation // value calculated from revenue
  properties: water in wet mass 0 kg, carbon content, fossil 0.679245, wet mass 1 kg, water content 0, carbon content, non-fossil 0, dry mass 1 kg, EcoSpold01Allocation_undefined_21 77.51, EcoSpold01Allocation_undefined_12 77.51, EcoSpold01Allocation_undefined_18 77.51, EcoSpold01Allocation_undefined_23 100, EcoSpold01Allocation_undefined_15 77.51, EcoSpold01Allocation_undefined_11 77.51, EcoSpold01Allocation_undefined_3 77.51, EcoSpold01Allocation_undefined_8 77.51, EcoSpold01Allocation_undefined_22 77.51, EcoSpold01Allocation_undefined_13 77.51, EcoSpold01Allocation_undefined_19 77.51, EcoSpold01Allocation_undefined_4 77.51, EcoSpold01Allocation_undefined_9 77.51, EcoSpold01Allocation_undefined_14 77.51, EcoSpold01Allocation_undefined_5 77.51, EcoSpold01Allocation_undefined_17 77.51, EcoSpold01Allocation_undefined_10 77.51, EcoSpold01Allocation_undefined_7 77.51, EcoSpold01Allocation_undefined_6 77.51, EcoSpold01Allocation_undefined_20 77.51, EcoSpold01Allocation_undefined_2 77.51, EcoSpold01Allocation_undefined_16 77.51, carbon allocation 0.679245 kg

## By-products
- acetonitrile: 0 kg; CPC 34150: Amine-function compounds; oxygen-function amino-compounds, except lysine and its esters and salts thereof and […]; By-product classification allocatable product; CAS 75-05-8
  EcoSpold01Location=RER
  production volume 4.8e8 kg
    Calculated relative to main output (acrylonitrile)
  property heating value, net 26.59 MJ
    LHV is calculated based on the elemental composition of the substance. Based on the CAS number of the substance (000075-05-8), the chemical formula of the substance is found to be: C2H3N, (PubChem 2020).
    Reference: Kim, S., Chen, J., Cheng, T., Gindulyte, A., He, J., He, S., Li, Q., Shoemaker, B. A., Thiessen, P. A., Yu, B., Zaslavsky, L., Zhang, J., & Bolton, E. E. (2019). PubChem 2019 update: improved access to chemical data. Nucleic acids research, 47(D1), D1102–D1109. https://doi.org/10.1093/nar/gky1033
  property price 0.968 EUR2005
    Temporary price data. Calculated as 90% of purchasers price based on: Source: 28 August 2006 issue of Chemical Market Reporter (ICIS)
  property carbon content 0.585366
    carbon content on a dry matter basis (reserved; not for manual entry)
  property true value 0.116208
    allocation property applied in "true value" allocation // value calculated from revenue
  properties: EcoSpold01Allocation_undefined_2 9.305, EcoSpold01Allocation_undefined_6 9.305, EcoSpold01Allocation_undefined_10 9.305, EcoSpold01Allocation_undefined_21 9.305, EcoSpold01Allocation_undefined_12 9.305, EcoSpold01Allocation_undefined_5 9.305, EcoSpold01Allocation_undefined_17 9.305, water content 0, wet mass 1 kg, carbon content, non-fossil 0, dry mass 1 kg, water in wet mass 0 kg, carbon content, fossil 0.585366, EcoSpold01Allocation_undefined_1 100, EcoSpold01Allocation_undefined_4 9.305, EcoSpold01Allocation_undefined_18 9.305, EcoSpold01Allocation_undefined_9 9.305, EcoSpold01Allocation_undefined_3 9.305, EcoSpold01Allocation_undefined_7 9.305, EcoSpold01Allocation_undefined_19 9.305, EcoSpold01Allocation_undefined_11 9.305, EcoSpold01Allocation_undefined_22 9.305, EcoSpold01Allocation_undefined_8 9.305, EcoSpold01Allocation_undefined_20 9.305, EcoSpold01Allocation_undefined_15 9.305, EcoSpold01Allocation_undefined_13 9.305, EcoSpold01Allocation_undefined_14 9.305, EcoSpold01Allocation_undefined_16 9.305, carbon allocation 0.585366 kg
- hydrogen cyanide: 0 kg; CPC 341: Basic organic chemicals; By-product classification allocatable product; CAS 74-90-8
  EcoSpold01Location=RER
  production volume 6.8e8 kg
    Calculated relative to main output (acrylonitrile)
  property heating value, net 17.95 MJ
    LHV is calculated based on the elemental composition of the substance. Based on the CAS number of the substance (000074-90-8), the chemical formula of the substance is found to be: CHN, (PubChem 2020).
    Reference: Kim, S., Chen, J., Cheng, T., Gindulyte, A., He, J., He, S., Li, Q., Shoemaker, B. A., Thiessen, P. A., Yu, B., Zaslavsky, L., Zhang, J., & Bolton, E. E. (2019). PubChem 2019 update: improved access to chemical data. Nucleic acids research, 47(D1), D1102–D1109. https://doi.org/10.1093/nar/gky1033
  property price 0.73 EUR2005
    Temporary price data. Calculated as 90% of purchasers price based on: 2004 import and export prices (total trades (USD) divided by total weight (kg) in EU27, USA, China, Japan and India) from UN Commodity Trade Statistics Database (http://data.un.org/Explorer.aspxDatabase [Accessed 2 July 2010]). Commodity: 'Cyanides and cyanide oxides of sodium'
  property carbon content 0.444444
    carbon content on a dry matter basis (reserved; not for manual entry)
  property true value 0.124181
    allocation property applied in "true value" allocation // value calculated from revenue
  properties: carbon content, fossil 0.444444, water content 0, dry mass 1 kg, wet mass 1 kg, carbon content, non-fossil 0, water in wet mass 0 kg, EcoSpold01Allocation_undefined_5 13.19, EcoSpold01Allocation_undefined_15 13.19, EcoSpold01Allocation_undefined_20 13.19, EcoSpold01Allocation_undefined_18 13.19, EcoSpold01Allocation_undefined_3 13.19, EcoSpold01Allocation_undefined_13 13.19, EcoSpold01Allocation_undefined_9 13.19, EcoSpold01Allocation_undefined_21 13.19, EcoSpold01Allocation_undefined_8 13.19, EcoSpold01Allocation_undefined_16 13.19, EcoSpold01Allocation_undefined_12 13.19, EcoSpold01Allocation_undefined_7 13.19, EcoSpold01Allocation_undefined_2 13.19, EcoSpold01Allocation_undefined_24 100, EcoSpold01Allocation_undefined_19 13.19, EcoSpold01Allocation_undefined_11 13.19, EcoSpold01Allocation_undefined_6 13.19, EcoSpold01Allocation_undefined_22 13.19, EcoSpold01Allocation_undefined_4 13.19, EcoSpold01Allocation_undefined_14 13.19, EcoSpold01Allocation_undefined_10 13.19, EcoSpold01Allocation_undefined_17 13.19, carbon allocation 0.444444 kg

## Inputs from technosphere
- heat, district or industrial, natural gas: 0 MJ; pedigree (1,1,1,1,1)
  Uncertainty: Chauvel 1989
  properties: heating value, net 1 MJ
- chemical factory, organics: 3.86076e-10 unit; lognormal variance with pedigree 0.448, pedigree (4,5,5,5,5)
  EcoSpold01Location=RER
  Estimation
  Uncertainty: Estimation
- water, deionised: 3.74507 kg; name water_deionised_input; source Chauvel, A. 1989; lognormal variance with pedigree 0.0526, pedigree (1,3,5,5,1)
  Literature value.
  EcoSpold01Location=CH
  Uncertainty: Chauvel 1989
  properties: wet mass 1 kg
- propylene: 0 kg; pedigree (1,1,1,1,1)
  Chauvel 1989
  EcoSpold01Location=RER
  Uncertainty: Chauvel 1989
  properties: dry mass 1 kg, wet mass 1 kg, heating value, net 43.22 MJ, carbon content, fossil 0.857143
- electricity, medium voltage: 0 kWh; pedigree (1,1,1,1,1)
  EcoSpold01Location=UCTE
  Chauvel 1989
  Uncertainty: Chauvel 1989
- sulfuric acid: 0.0374507 kg; lognormal variance with pedigree 0.0526, pedigree (1,3,5,5,1)
  EcoSpold01Location=RER
  Chauvel 1989
  Uncertainty: Chauvel 1989
  properties: dry mass 1 kg, wet mass 1 kg
- ammonia, anhydrous, liquid: 0 kg; pedigree (1,1,1,1,1)
  EcoSpold01Location=RER
  Chauvel 1989
  Uncertainty: Chauvel 1989
  properties: dry mass 1 kg, wet mass 1 kg
- heat, district or industrial, other than natural gas: 0 MJ; pedigree (1,1,1,1,1)
  Uncertainty: Chauvel 1989
  properties: heating value, net 1 MJ
- heat, district or industrial, natural gas: 0.0237245, 1.53934 MJ (2 entries); lognormal variance with pedigree 0.0526, pedigree (1,3,5,5,1)
  Uncertainty: Chauvel 1989
- propylene: 0.0165965, 0.866508 kg (2 entries); lognormal variance with pedigree 0.0526, pedigree (1,3,5,5,1)
  Chauvel 1989
  EcoSpold01Location=RER
  Uncertainty: Chauvel 1989
- electricity, medium voltage: 0.00275663, 0.000528602, 0.00887414, 0.129066, 0.018192, 0.0592722 kWh (6 entries); lognormal variance with pedigree 0.0526, pedigree (1,3,5,5,1)
  EcoSpold01Location=UCTE
  Chauvel 1989
  Uncertainty: Chauvel 1989
- ammonia, anhydrous, liquid: 0.078446, 0.00674338, 0.010491, 0.0207863, 0.0203651, 0.00213448, 0.00954192, 0.225734 kg (8 entries); lognormal variance with pedigree 0.0526, pedigree (1,3,5,5,1)
  EcoSpold01Location=RER
  Chauvel 1989
  Uncertainty: Chauvel 1989
- heat, district or industrial, other than natural gas: 0.000353638, 0.872083 MJ (2 entries); lognormal variance with pedigree 0.0526, pedigree (1,3,5,5,1)
  Uncertainty: Chauvel 1989

## Inputs from nature
- Water, cooling, unspecified natural origin [natural resource, in water]: 0.0299337 m3; name water_cooling_UNO_input; source Chauvel, A. 1989; lognormal variance with pedigree 0.0526, pedigree (1,3,5,5,1)
  Literature value.
  Uncertainty: Chauvel 1989

## Emissions to nature
- Propene [water, surface water]: 0.0130346 kg; lognormal variance with pedigree 0.448, pedigree (4,5,5,5,5)
  Estimation
  Uncertainty: Estimation
- Water [air, unspecified]: 0.012367 m3; name water_to_air_unspecified; lognormal variance with pedigree 0.0827, pedigree (2,2,5,5,1)
  Calculated value based on literature values and expert opinion. See comments in the parametres' comment field.
  property fraction, origin: fresh water 0.0620794; name fraction_origin_fresh_water
  property fraction, origin: unspecified 0.937921; name fraction_origin_unspecified
  property fraction, origin: salt water 0; name fraction_origin_salt_water
- Propene [air, urban air close to ground]: 3.25866e-5 kg; lognormal variance with pedigree 0.188, pedigree (4,5,5,5,5)
  Estimation
  Uncertainty: Estimation
- Water [water, unspecified]: 0.0213116 m3; name water_to_water_unspecified; lognormal variance with pedigree 0.0827, pedigree (2,2,5,5,1)
  (same comment as for Water)
  property fraction, origin: fresh water 0.139704; name fraction_origin_fresh_water_Ww
  property fraction, origin: salt water 0; name fraction_origin_salt_water_Ww
  property fraction, origin: unspecified 0.860296; name fraction_origin_unspecified_Ww
  property carbon content, non-fossil 0; name C_content_non_fossil
  property water in wet mass 1000 kg; name WWM
  property wet mass 1000 kg; name WM
  property carbon content, fossil 0; name C_content_fossil
  property dry mass 0 kg; name DM
- Ammonia [air, urban air close to ground]: 0.00338212 kg; lognormal variance with pedigree 0.218, pedigree (4,5,5,5,5)
  Estimation
  Uncertainty: Estimation
- TOC, Total Organic Carbon [water, surface water]: 0.0115687 kg; lognormal variance with pedigree 0.188, pedigree (4,5,5,5,5)
  Calculated from the water emissions
  Uncertainty: Calculated from the water emissions
- COD, Chemical Oxygen Demand [water, surface water]: 0.0385917 kg; lognormal variance with pedigree 0.188, pedigree (4,5,5,5,5)
  Calculated from the water emissions
  Uncertainty: Calculated from the water emissions
- DOC, Dissolved Organic Carbon [water, surface water]: 0.0115687 kg; lognormal variance with pedigree 0.188, pedigree (4,5,5,5,5)
  Calculated from the water emissions
  Uncertainty: Calculated from the water emissions
- Sulfate [water, surface water]: 0.0366868 kg; lognormal variance with pedigree 0.188, pedigree (4,5,5,5,5)
  Estimation
  Uncertainty: Estimation
- Carbon dioxide, fossil [air, urban air close to ground]: 0.471013 kg; lognormal variance with pedigree 0.1786, pedigree (4,5,5,5,5)
  Calculated from the water treatment
  Uncertainty: Calculated from the water treatment
- Ammonium, ion [water, surface water]: 0.0135283 kg; lognormal variance with pedigree 0.188, pedigree (4,5,5,5,5)
  Estimation
  Uncertainty: Estimation
- BOD5, Biological Oxygen Demand [water, surface water]: 0.0385917 kg; lognormal variance with pedigree 0.188, pedigree (4,5,5,5,5)
  Calculated from the water emissions
  Uncertainty: Calculated from the water emissions

## Sampling procedure
Literature data

## Extrapolations
Transports and emissions are modelled with standard methods. This dataset has been copied from an original dataset covering the geography RER. The uncertainty has been adjusted accordingly.

## Review by Roland Hischier 2010-02-07
passed.
none
