# treatment of waste plastic, mixture, municipal incineration

Dataset: EcoSpold 2, unit process
Geography: CH
Time period: 1994-01-01 to 2021-12-31
Technology level: outdated
Classification: ISIC rev.4 ecoinvent: 3821:Treatment and disposal of non-hazardous waste
Classification: EcoSpold01Categories: waste management/municipal incineration
Tags: Treatment; ConvertedDataset
Scenario: Business-as-Usual
System model: Allocation, cut-off by classification
Generated by: Gabor Doka (obsolete)
Published in: Doka G. 2007
Database: ecoinvent
isCopyrightProtected: true
accessRestrictedTo: 1

## General comment
Inventoried waste contains 100% Mixed various plastics; .
waste composition (wet, in ppm): upper heating value 34.05 MJ/kg; lower heating value 30.79 MJ/kg; H2O 153000; O 73717; H 105910; C 633590; S 1406.7; N 6112; P n.a.; B n.a.; Cl 18131; Br 65.319; F 13.717; I n.a.; Ag n.a.; As 1.7729; Ba 174.03; Cd 75.786; Co 29.478; Cr 38.132; Cu 296.41; Hg 0.79234; Mn 74.574; Mo n.a.; Ni 19.222; Pb 435.81; Sb 40.093; Se 1.9596; Sn 24.453; V 268.88; Zn 521.69; Be 0.46656; Sc n.a.; Sr 82.582; Ti 933.13; Tl 0.37325; W n.a.; Si n.a.; Fe 3476.5; Ca n.a.; Al 186.63; K n.a.; Mg n.a.; Na 1367.5;
Share of carbon in waste that is biogenic 0%.
Share of iron in waste that is metallic/recyclable 0%.
Net energy produced in MSWI: 3.48MJ/kg waste electric energy and 7.03MJ/kg waste thermal energy
Allocation of energy production: no substitution or expansion. Total burden allocated to waste disposal function of MSWI.
One kg of this waste produces 0.01693 kg of slag and 0.006594 kg of residues, which are landfilled. Additional solidification with 0.002638 kg of cement.
[This dataset was already contained in the ecoinvent database version 2. It was not individually updated during the transfer to ecoinvent version 3. Life Cycle Impact Assessment results may still have changed, as they are affected by changes in the supply chain, i.e. in other datasets. This dataset was generated following the ecoinvent quality guidelines for version 2. It may have been subject to central changes described in the ecoinvent version 3 change report (http://www.ecoinvent.org/database/ecoinvent-version-3/reports-of-changes/), and the results of the central updates were reviewed extensively. The changes added e.g. consistent water flows and other information throughout the database. The documentation of this dataset can be found in the ecoinvent reports of version 2, which are still available via the ecoinvent website. The change report linked above covers all central changes that were made during the conversion process.]

## Included activities end
waste-specific air and water emisions from incineration, auxiliary material consumption for flue gas cleaning. Short-term emissions to river water and long-term emisisons to ground water from slag compartment (from bottom slag) and residual material landfill (from solidified fly ashes and scrubber slugde). Process energy demands for MSWI.

## Geography
Specific to the technology mix encountered in Switzerland in 2000. Well applicable to modern incineration practices in Europe, North America or Japan.

## Technology
replaced by newer incineration technology with fly ash extraction. Average Swiss MSWI plants in 2000 with electrostatic precipitator for fly ash (ESP), wet flue gas scrubber and 29.4% SNCR , 32.2% SCR-high dust , 24.6% SCR-low dust -DeNOx facilities and 13.8% without Denox (by burnt waste, according to Swiss average). Share of waste incinerated in plants with magnetic scrap separation from slag : 50%. Gross electric efficiency technology mix 12.997% and Gross thermal efficiency technology mix 25.57%

## Time period
Waste composition as given in literature reference, theoretical data or other source. Transfer coefficients for modern Swiss MSWI. Emission speciation based on early 90ies data.

## Reference product
- waste plastic, mixture: -1 kg; By-product classification Waste; CPC 39270: Waste, parings and scrap of plastics
  EcoSpold01Location=CH
  production volume 0 kg; name RP_PV_1
    outdated. Replaced by newer incineration technology with fly ash extraction.
  property price 0 EUR2005
    Waste products are assigned a price of zero as they are assumed to require further treatment.
  property carbon content, fossil 0.747344
    C content in 1 kg DM was calculated using data in Tab A.2, ecoinvent v2.2 report 13_I
  property heating value, net 30.79 MJ
    Value taken from the general comment of the treatment dataset.
  property carbon content 0.747344
    carbon content on a dry matter basis (reserved; not for manual entry)
  properties: water content 0.180638, dry mass 0.847 kg, water in wet mass 0.153 kg, carbon content, non-fossil 0, wet mass 1 kg, carbon allocation 0.633 kg

## Inputs from technosphere
- municipal waste incineration facility: 2.5e-10 unit; lognormal variance with pedigree 0.04, pedigree (1,1,5,1,1)
  demands per kilogram waste. uncertainty is heeded in the module
  EcoSpold01Location=CH
- sodium hydroxide, without water, in 50% solution state: 0.0182 kg; lognormal variance with pedigree 0.33, pedigree (1,1,5,1,1)
  uncertainty calculated from uncertainty in average auxiliary material input, and the unertainty of the waste composition of this waste
  EcoSpold01Location=RER
  properties: wet mass 1 kg, dry mass 1 kg, heating value, net 3.03 MJ
- quicklime, milled, packed: 0.00313 kg; lognormal variance with pedigree 0.35, pedigree (1,1,5,1,1)
  EcoSpold01Location=CH
  uncertainty calculated from uncertainty in average auxiliary material input, and the unertainty of the waste composition of this waste
  properties: wet mass 1 kg, dry mass 0.99 kg, water content 0.010101
- cement, unspecified: 0.00264 kg; lognormal variance with pedigree 0.08, pedigree (1,1,5,1,1)
  Cement for solidification of landfilled residual material. Uncertainty calculated from unertainty of the waste composition of this waste, of transfer coefficients in the incinerator and of the solidification recipe.
  EcoSpold01Location=CH
  properties: dry mass 1 kg, wet mass 1 kg
- heat, district or industrial, natural gas: 0.02709 MJ; lognormal variance with pedigree 1.39, pedigree (1,1,5,1,1)
  uncertainty calculated from uncertainty in average DeNOx input, uncertainty in the share of thermal NOx, uncertainty of nitrogen content in average municipal waste and the unertainty in nitrogen content in *this* waste.
  EcoSpold01Location=RER
  properties: heating value, net 1 MJ
- residual material landfill: 1.37e-11 unit; lognormal variance with pedigree 0.07, pedigree (1,1,5,1,1)
  uncertainty is calculated from uncertainties in waste composition and transfer coefficients in incinerator
  EcoSpold01Location=CH
- chemical, inorganic: 5.44e-5 kg; lognormal variance with pedigree 0.33, pedigree (1,1,5,1,1)
  EcoSpold01Location=GLO
  Proxy for Polyelectrolyte. uncertainty calculated from uncertainty in average auxiliary material input, and the unertainty of the waste composition of this waste
  properties: wet mass 1 kg, carbon content, fossil 0.003, dry mass 1 kg
  note on carbon content, fossil: This dataset is an unweighted average of 20 inorganic substances (listed in Tab 88.1, ecoinvent v2.2 report 8, part II), being part of the top100 chemicals included in this database. The C-content has also been calculated as an unweighted average of the C content of the substances composing this dataset.
- chromium oxide, flakes: 1.8e-7 kg; lognormal variance with pedigree 2.09, pedigree (1,1,5,1,1)
  EcoSpold01Location=RER
  Proxy for vanadium pentoxide V2O5 in SCR catalyst, uncertainty calculated from uncertainty in average DeNOx input, uncertainty in the share of thermal NOx, uncertainty of nitrogen content in average municipal waste and the unertainty in nitrogen content in *this* waste.
  properties: dry mass 1 kg, wet mass 1 kg
- process-specific burdens, municipal waste incineration: 1 kg; lognormal variance with pedigree 0.04, pedigree (1,1,5,1,1)
  EcoSpold01Location=CH
  demands per kilogram waste. uncertainty is heeded in the module;activityLink introduced to establish a direct link to the corresponding regional supply of this product
- titanium dioxide: 8.83e-6 kg; lognormal variance with pedigree 2.09, pedigree (1,1,5,1,1)
  (same comment as for heat, district or industrial, natural gas)
  properties: wet mass 1 kg, dry mass 1 kg
- process-specific burdens, slag landfill: 0.0169 kg; lognormal variance with pedigree 0.09, pedigree (1,1,5,1,1)
  uncertainty is calculated from uncertainties in waste composition and transfer coefficients in incinerator;activityLink introduced to establish a direct link to the corresponding regional supply of this product
  EcoSpold01Location=CH
- waste cement, hydrated: -0.00659 kg; name BP_amount_1; lognormal variance with pedigree 0.08, pedigree (1,1,5,1,1)
  EcoSpold01Location=CH
  Hydrated cement for solidification of landfilled residual material. Uncertainty calculated from unertainty of the waste composition of this waste and transfer coefficients in the incinerator and of the solidification recipe.
  production volume 0 kg; = RP_PV_1* BP_amount_1
    Calculated from the production volume of waste plastic, mixture, 15.3% water in proportion to the respective output amounts.
  property price 0 EUR2005; name BP_amount_1_price_EUR2005
  properties: wet mass 1 kg, dry mass 1 kg
- hydrochloric acid, without water, in 30% solution state: 3.26e-5 kg; lognormal variance with pedigree 0.33, pedigree (1,1,5,1,1)
  EcoSpold01Location=RER
  uncertainty calculated from uncertainty in average auxiliary material input, and the unertainty of the waste composition of this waste
  properties: wet mass 1 kg, heating value, net 3.32 MJ, dry mass 1 kg
- slag landfill: 3.01e-11 unit; lognormal variance with pedigree 0.09, pedigree (1,1,5,1,1)
  EcoSpold01Location=CH
  uncertainty is calculated from uncertainties in waste composition and transfer coefficients in incinerator
- process-specific burdens, residual material landfill: 0.00659 kg; lognormal variance with pedigree 0.07, pedigree (1,1,5,1,1)
  (same comment as for process-specific burdens, slag landfill)
- ammonia, anhydrous, liquid: 0.000308 kg; lognormal variance with pedigree 1.39, pedigree (1,1,5,1,1)
  uncertainty calculated from uncertainty in average DeNOx input, uncertainty in the share of thermal NOx, uncertainty of nitrogen content in average municipal waste and the unertainty in nitrogen content in *this* waste.
  EcoSpold01Location=CH
  properties: dry mass 1 kg, wet mass 1 kg
- chemical, organic: 0.000303 kg; lognormal variance with pedigree 1.04, pedigree (1,1,5,1,1)
  EcoSpold01Location=GLO
  Proxy for TMT15. uncertainty calculated from uncertainty in average auxiliary material input, and the unertainty of the waste composition of this waste
  properties: wet mass 1 kg, carbon content, fossil 0.628, dry mass 1 kg, heating value, net 19.03 MJ
  note on carbon content, fossil: This dataset is an unweighted average of 20 organic substances (listed in Tab 88.1, ecoinvent v2.2 report 8, part II), being part of the top100 chemicals included in this database. The C-content has also been calculated as an unweighted average of the C content of the substances composing this dataset.
- iron (III) chloride, without water, in 40% solution state: 0.000114 kg; lognormal variance with pedigree 0.38, pedigree (1,1,5,1,1)
  (same comment as for quicklime, milled, packed)
  properties: wet mass 1 kg, dry mass 1 kg

## Emissions to nature
- Vanadium [air, urban air close to ground]: 2.69e-8 kg; lognormal variance with pedigree 0.9, pedigree (1,1,5,1,1)
  uncertainty is calculated from uncertainties in waste composition and transfer coefficients in incinerator
- Chloride [water, surface water]: 0.0177 kg; lognormal variance with pedigree 0.3, pedigree (1,1,5,1,1)
  uncertainty is calculated from uncertainties in waste composition and transfer coefficients in incinerator and landfills
- Sulfate [water, surface water]: 0.000683 kg; lognormal variance with pedigree 0.32, pedigree (1,1,5,1,1)
  (same comment as for Chloride)
- Bromine [water, ground-, long-term]: 1.14e-5 kg; lognormal variance with pedigree 1.06, pedigree (1,1,5,1,1)
  Long-term emissions from landfilling of incineration residues. uncertainty is calculated from uncertainties in waste composition and transfer coefficients in incinerator and landfills.
- Mercury [water, surface water]: 8.47e-9 kg; lognormal variance with pedigree 1.6, pedigree (1,1,5,1,1)
  (same comment as for Chloride)
- Mercury [water, ground-, long-term]: 4.12e-8 kg; lognormal variance with pedigree 3.41, pedigree (1,1,5,1,1)
  (same comment as for Bromine)
- Fluoride [water, ground-, long-term]: 1.22e-5 kg; lognormal variance with pedigree 0.87, pedigree (1,1,5,1,1)
  (same comment as for Bromine)
- Strontium [water, surface water]: 5.2e-8 kg; lognormal variance with pedigree 1.74, pedigree (1,1,5,1,1)
  (same comment as for Chloride)
- DOC, Dissolved Organic Carbon [water, ground-, long-term]: 0.00619 kg; lognormal variance with pedigree 0.05, pedigree (1,1,5,1,1)
  (same comment as for Bromine)
- TOC, Total Organic Carbon [water, ground-, long-term]: 0.00619 kg; lognormal variance with pedigree 0.05, pedigree (1,1,5,1,1)
  (same comment as for Bromine)
- Nitrate [water, ground-, long-term]: 0.00022 kg; lognormal variance with pedigree 0.48, pedigree (1,1,5,1,1)
  (same comment as for Bromine)
- Nickel, ion [water, ground-, long-term]: 1.8e-5 kg; lognormal variance with pedigree 1.17, pedigree (1,1,5,1,1)
  (same comment as for Bromine)
- Antimony [air, urban air close to ground]: 1.56e-13 kg; lognormal variance with pedigree 1.25, pedigree (1,1,5,1,1)
  (same comment as for Vanadium)
- Tin, ion [water, surface water]: 9.07e-10 kg; lognormal variance with pedigree 1.3, pedigree (1,1,5,1,1)
  (same comment as for Chloride)
- Cobalt [water, surface water]: 5.04e-9 kg; lognormal variance with pedigree 1.61, pedigree (1,1,5,1,1)
  (same comment as for Chloride)
- DOC, Dissolved Organic Carbon [water, surface water]: 1.74e-5 kg; lognormal variance with pedigree 0.27, pedigree (1,1,5,1,1)
  (same comment as for Chloride)
- Tin, ion [water, ground-, long-term]: 1.23e-5 kg; lognormal variance with pedigree 1.54, pedigree (1,1,5,1,1)
  (same comment as for Bromine)
- Barium [air, urban air close to ground]: 1.74e-7 kg; lognormal variance with pedigree 0.95, pedigree (1,1,5,1,1)
  (same comment as for Vanadium)
- Sulfur dioxide [air, urban air close to ground]: 5.99e-6 kg; lognormal variance with pedigree 0.67, pedigree (1,1,5,1,1)
  (same comment as for Vanadium)
- Carbon dioxide, fossil [air, urban air close to ground]: 2.3 kg; lognormal variance with pedigree 0.05, pedigree (1,1,5,1,1)
  (same comment as for Vanadium)
- BOD5, Biological Oxygen Demand [water, ground-, long-term]: 0.00511 kg; lognormal variance with pedigree 0.05, pedigree (1,1,5,1,1)
  (same comment as for Bromine)
- Vanadium, ion [water, ground-, long-term]: 4.61e-5 kg; lognormal variance with pedigree 1.61, pedigree (1,1,5,1,1)
  (same comment as for Bromine)
- Chromium, ion [water, surface water]: 1.22e-7 kg; lognormal variance with pedigree 1.14, pedigree (1,1,5,1,1)
  (same comment as for Chloride)
- Hydrogen fluoride [air, urban air close to ground]: 7.22e-9 kg; lognormal variance with pedigree 1.29, pedigree (1,1,5,1,1)
  (same comment as for Vanadium)
- Antimony [water, ground-, long-term]: 2.56e-5 kg; lognormal variance with pedigree 0.92, pedigree (1,1,5,1,1)
  (same comment as for Bromine)
- Zinc, ion [water, surface water]: 9.59e-8 kg; lognormal variance with pedigree 0.7, pedigree (1,1,5,1,1)
  (same comment as for Chloride)
- Cadmium, ion [water, ground-, long-term]: 7.6e-7 kg; lognormal variance with pedigree 6.87, pedigree (1,1,5,1,1)
  (same comment as for Bromine)
- Titanium, ion [water, surface water]: 4.5e-9 kg; lognormal variance with pedigree 2.06, pedigree (1,1,5,1,1)
  (same comment as for Chloride)
- Copper [air, urban air close to ground]: 2.19e-9 kg; lognormal variance with pedigree 0.91, pedigree (1,1,5,1,1)
  (same comment as for Vanadium)
- Thallium [air, urban air close to ground]: 3.73e-10 kg; lognormal variance with pedigree 1.76, pedigree (1,1,5,1,1)
  (same comment as for Vanadium)
- Bromine [air, urban air close to ground]: 1.96e-7 kg; lognormal variance with pedigree 1.07, pedigree (1,1,5,1,1)
  (same comment as for Vanadium)
- Iron, ion [water, ground-, long-term]: 0.00163 kg; lognormal variance with pedigree 1.31, pedigree (1,1,5,1,1)
  (same comment as for Bromine)
- Aluminium [water, surface water]: 1.55e-8 kg; lognormal variance with pedigree 1.21, pedigree (1,1,5,1,1)
  (same comment as for Chloride)
- Cyanide [air, urban air close to ground]: 5.5e-6 kg; lognormal variance with pedigree 1.5, pedigree (1,1,5,1,1)
  uncertainty calculated from uncertainty in average N-emissions, uncertainty in the share of thermal NOx, uncertainty of nitrogen content in average municipal waste and the unertainty in nitrogen content in *this* waste.
- Bromine [water, surface water]: 5.38e-5 kg; lognormal variance with pedigree 0.89, pedigree (1,1,5,1,1)
  (same comment as for Chloride)
- Strontium [air, urban air close to ground]: 8.26e-9 kg; lognormal variance with pedigree 1.06, pedigree (1,1,5,1,1)
  (same comment as for Vanadium)
- Aluminium [water, ground-, long-term]: 0.000138 kg; lognormal variance with pedigree 0.86, pedigree (1,1,5,1,1)
  (same comment as for Bromine)
- Beryllium [water, ground-, long-term]: 3.76e-7 kg; lognormal variance with pedigree 1.49, pedigree (1,1,5,1,1)
  (same comment as for Bromine)
- Manganese [air, urban air close to ground]: 4.06e-13 kg; lognormal variance with pedigree 1.17, pedigree (1,1,5,1,1)
  (same comment as for Vanadium)
- BOD5, Biological Oxygen Demand [water, surface water]: 2.37e-5 kg; lognormal variance with pedigree 0.16, pedigree (1,1,5,1,1)
  (same comment as for Chloride)
- Aluminium [air, urban air close to ground]: 2.92e-7 kg; lognormal variance with pedigree 0.94, pedigree (1,1,5,1,1)
  (same comment as for Vanadium)
- Mercury [air, urban air close to ground]: 2.74e-14 kg; lognormal variance with pedigree 1.74, pedigree (1,1,5,1,1)
  (same comment as for Vanadium)
- Selenium [air, urban air close to ground]: 9.85e-15 kg; lognormal variance with pedigree 1.64, pedigree (1,1,5,1,1)
  (same comment as for Vanadium)
- Tin [air, urban air close to ground]: 3.24e-8 kg; lognormal variance with pedigree 1.21, pedigree (1,1,5,1,1)
  (same comment as for Vanadium)
- Arsenic, ion [water, ground-, long-term]: 9.74e-7 kg; lognormal variance with pedigree 1.53, pedigree (1,1,5,1,1)
  (same comment as for Bromine)
- Arsenic [air, urban air close to ground]: 1.81e-14 kg; lognormal variance with pedigree 1.65, pedigree (1,1,5,1,1)
  (same comment as for Vanadium)
- Chloride [water, ground-, long-term]: 0.000428 kg; lognormal variance with pedigree 0.17, pedigree (1,1,5,1,1)
  (same comment as for Bromine)
- Sulfate [water, ground-, long-term]: 0.00353 kg; lognormal variance with pedigree 0.38, pedigree (1,1,5,1,1)
  (same comment as for Bromine)
- Arsenic, ion [water, surface water]: 7.99e-7 kg; lognormal variance with pedigree 1.29, pedigree (1,1,5,1,1)
  (same comment as for Chloride)
- Nitrogen oxides [air, urban air close to ground]: 0.000194 kg; lognormal variance with pedigree 1.5, pedigree (1,1,5,1,1)
  (same comment as for Cyanide)
- Titanium [air, urban air close to ground]: 9.33e-7 kg; lognormal variance with pedigree 0.73, pedigree (1,1,5,1,1)
  (same comment as for Vanadium)
- Nitrate [water, surface water]: 7.82e-5 kg; lognormal variance with pedigree 0.34, pedigree (1,1,5,1,1)
  (same comment as for Chloride)
- Barium [water, surface water]: 2.39e-8 kg; lognormal variance with pedigree 1.81, pedigree (1,1,5,1,1)
  (same comment as for Chloride)
- Thallium [water, ground-, long-term]: 2.18e-7 kg; lognormal variance with pedigree 1.31, pedigree (1,1,5,1,1)
  (same comment as for Bromine)
- Hydrogen chloride [air, urban air close to ground]: 2.01e-7 kg; lognormal variance with pedigree 0.39, pedigree (1,1,5,1,1)
  (same comment as for Vanadium)
- Lead [air, urban air close to ground]: 1.62e-8 kg; lognormal variance with pedigree 0.85, pedigree (1,1,5,1,1)
  (same comment as for Vanadium)
- Beryllium [air, urban air close to ground]: 4.67e-10 kg; lognormal variance with pedigree 1.73, pedigree (1,1,5,1,1)
  (same comment as for Vanadium)
- COD, Chemical Oxygen Demand [water, ground-, long-term]: 0.0156 kg; lognormal variance with pedigree 0.05, pedigree (1,1,5,1,1)
  (same comment as for Bromine)
- Selenium [water, surface water]: 6.38e-7 kg; lognormal variance with pedigree 1.21, pedigree (1,1,5,1,1)
  (same comment as for Chloride)
- Ammonia [air, urban air close to ground]: 4.84e-6 kg; lognormal variance with pedigree 1.5, pedigree (1,1,5,1,1)
  (same comment as for Cyanide)
- Cadmium [air, urban air close to ground]: 4.17e-9 kg; lognormal variance with pedigree 1.08, pedigree (1,1,5,1,1)
  (same comment as for Vanadium)
- Zinc, ion [water, ground-, long-term]: 8.09e-6 kg; lognormal variance with pedigree 5.41, pedigree (1,1,5,1,1)
  (same comment as for Bromine)
- Manganese [water, surface water]: 4.17e-9 kg; lognormal variance with pedigree 1.81, pedigree (1,1,5,1,1)
  (same comment as for Chloride)
- Strontium [water, ground-, long-term]: 8.25e-5 kg; lognormal variance with pedigree 1.03, pedigree (1,1,5,1,1)
  (same comment as for Bromine)
- Sodium [air, urban air close to ground]: 1.29e-5 kg; lognormal variance with pedigree 0.67, pedigree (1,1,5,1,1)
  (same comment as for Vanadium)
- Cobalt [air, urban air close to ground]: 9.36e-13 kg; lognormal variance with pedigree 1.27, pedigree (1,1,5,1,1)
  (same comment as for Vanadium)
- Nickel [air, urban air close to ground]: 8.3e-13 kg; lognormal variance with pedigree 1.32, pedigree (1,1,5,1,1)
  (same comment as for Vanadium)
- Sodium, ion [water, ground-, long-term]: 0.00106 kg; lognormal variance with pedigree 0.43, pedigree (1,1,5,1,1)
  (same comment as for Bromine)
- Thallium [water, surface water]: 2.29e-10 kg; lognormal variance with pedigree 1.91, pedigree (1,1,5,1,1)
  (same comment as for Chloride)
- Iron [air, urban air close to ground]: 1.16e-7 kg; lognormal variance with pedigree 0.58, pedigree (1,1,5,1,1)
  (same comment as for Vanadium)
- Cadmium, ion [water, surface water]: 3.44e-8 kg; lognormal variance with pedigree 1.01, pedigree (1,1,5,1,1)
  (same comment as for Chloride)
- Zinc [air, urban air close to ground]: 8.52e-9 kg; lognormal variance with pedigree 0.83, pedigree (1,1,5,1,1)
  (same comment as for Vanadium)
- Barium [water, ground-, long-term]: 0.000155 kg; lognormal variance with pedigree 0.98, pedigree (1,1,5,1,1)
  (same comment as for Bromine)
- Iron, ion [water, surface water]: 1.19e-6 kg; lognormal variance with pedigree 0.53, pedigree (1,1,5,1,1)
  (same comment as for Chloride)
- Antimony [water, surface water]: 1.39e-5 kg; lognormal variance with pedigree 0.95, pedigree (1,1,5,1,1)
  (same comment as for Chloride)
- Lead [water, surface water]: 1.21e-8 kg; lognormal variance with pedigree 0.91, pedigree (1,1,5,1,1)
  (same comment as for Chloride)
- TOC, Total Organic Carbon [water, surface water]: 1.74e-5 kg; lognormal variance with pedigree 0.27, pedigree (1,1,5,1,1)
  (same comment as for Chloride)
- Chromium VI [water, ground-, long-term]: 4.04e-6 kg; lognormal variance with pedigree 1.36, pedigree (1,1,5,1,1)
  (same comment as for Bromine)
- Chromium VI [water, surface water]: 1.24e-6 kg; lognormal variance with pedigree 1.07, pedigree (1,1,5,1,1)
  (same comment as for Chloride)
- Methane, fossil [air, urban air close to ground]: 6.38e-6 kg; lognormal variance with pedigree 0.091225, pedigree (2,3,5,2,1)
  Confidential data from 5 plants in Switzerland and Germany
  Uncertainty: & basic uncertainty of 1.5; confidential data from 5 plants in Switzerland and Germany
- Titanium, ion [water, ground-, long-term]: 0.00028 kg; lognormal variance with pedigree 1.07, pedigree (1,1,5,1,1)
  (same comment as for Bromine)
- Chromium [air, urban air close to ground]: 2.82e-12 kg; lognormal variance with pedigree 1.22, pedigree (1,1,5,1,1)
  (same comment as for Vanadium)
- Copper, ion [water, ground-, long-term]: 0.00024 kg; lognormal variance with pedigree 0.84, pedigree (1,1,5,1,1)
  (same comment as for Bromine)
- Cobalt [water, ground-, long-term]: 2.58e-5 kg; lognormal variance with pedigree 1.12, pedigree (1,1,5,1,1)
  (same comment as for Bromine)
- Sodium, ion [water, surface water]: 0.000296 kg; lognormal variance with pedigree 0.36, pedigree (1,1,5,1,1)
  (same comment as for Chloride)
- Vanadium, ion [water, surface water]: 1.81e-7 kg; lognormal variance with pedigree 1.09, pedigree (1,1,5,1,1)
  (same comment as for Chloride)
- Manganese [water, ground-, long-term]: 6.42e-5 kg; lognormal variance with pedigree 1.13, pedigree (1,1,5,1,1)
  (same comment as for Bromine)
- Lead [water, ground-, long-term]: 3.11e-5 kg; lognormal variance with pedigree 6.9, pedigree (1,1,5,1,1)
  (same comment as for Bromine)
- Carbon monoxide, fossil [air, urban air close to ground]: 0.000223 kg; lognormal variance with pedigree 0.690625, pedigree (1,3,5,2,1)
  Literature data from switzerland and germany adapted to plant age distribution in switzerland
  Uncertainty: & basic uncertainty of 5; literature data from switzerland and germany adapted to plant age distribution in switzerland
- COD, Chemical Oxygen Demand [water, surface water]: 4.23e-5 kg; lognormal variance with pedigree 0.29, pedigree (1,1,5,1,1)
  (same comment as for Chloride)
- Dinitrogen monoxide [air, urban air close to ground]: 2.58e-5 kg; lognormal variance with pedigree 1.5, pedigree (1,1,5,1,1)
  (same comment as for Cyanide)
- Selenium [water, ground-, long-term]: 1.32e-6 kg; lognormal variance with pedigree 1.03, pedigree (1,1,5,1,1)
  (same comment as for Bromine)
- Fluoride [water, surface water]: 1.05e-6 kg; lognormal variance with pedigree 0.91, pedigree (1,1,5,1,1)
  (same comment as for Chloride)
- Beryllium [water, surface water]: 2.9e-10 kg; lognormal variance with pedigree 1.94, pedigree (1,1,5,1,1)
  (same comment as for Chloride)
- Copper, ion [water, surface water]: 1.2e-8 kg; lognormal variance with pedigree 1.49, pedigree (1,1,5,1,1)
  (same comment as for Chloride)
- Nickel, ion [water, surface water]: 1.21e-8 kg; lognormal variance with pedigree 1.8, pedigree (1,1,5,1,1)
  (same comment as for Chloride)

## Sampling procedure
waste-specific calculation based on literature data

## Extrapolations
This dataset has been extrapolated from year 2000 to the year of the calculation (2021). The uncertainty has been adjusted accordingly.

## Review by Niels Jungbluth 2003-07-15
Passed. Calculation for standard deviation 95 of, i.e., infrastructure,
land occupation, transport services or other services can differ from
standard Pedigree approach used in this project and figures obtained by
this procedure.
