# forestry harvester production

Dataset: EcoSpold 2, unit process
Geography: GLO
Time period: 2012-01-01 to 2021-12-31
Technology level: current
Classification: ISIC rev.4 ecoinvent: 2821:Manufacture of agricultural and forestry machinery
Tags: Swiss Brushup completed
Scenario: Business-as-Usual
System model: Allocation, cut-off by classification
Generated by: Frank Werner
Published in: Spielmann, M. 2007
Database: ecoinvent
isCopyrightProtected: true
accessRestrictedTo: 1

## Included activities start
The activity starts with the semi-finished products and raw materials at the factory gate.

## Included activities end
The inventory accounts for the input and disposal of all materials, their (pre-) processing and the energy required for the production and maintenance of the forest machinery represented by this dataset. In addition, material for and emissions from disassembly are included.
Infrastructure for the production and maintenance of the machinery is inventoried as a rough guess from lorry production.
The dataset does not contain fuel consumption or related emissions. These issues are inventoried in the respective dataset on the operation of the machinery.

## Geography
The inventories apply to the production in Northern/Central Europe

## Parameters
- weight of the vehicle: 14000 kg/unit; name vehicle_weight
- lifetime of machine, productive machine hours: 17600 hour; name total_PMH; lognormal variance with pedigree 0.1042, pedigree (3,4,2,1,1)
  Spielmann et al. 2007
- maintenance factor: 0.7 dimensionless; name maintenance_factor; lognormal variance with pedigree 0.1048, pedigree (3,4,2,1,2)
  determined from Spielmann et al. 2007

## Reference product
- forestry harvester: 1 unit; CPC 441: Agricultural or forestry machinery and parts thereof; By-product classification allocatable product
  forestry harvester of use class II (80 - 120 kW) with a total weight of 14,000 kg as classified by Klvac, R., S. Ward, P. M. O. Owende and J. Lyons (2003): Energy audit of wood harvesting systems. Scandinavian Journal of Forest Research, 18(2): 176-183. Data on fuel consumption etc. can be found in the respective dataset on the operation of the machine.
  production volume 10000 unit; name p_machinery
    unqualified guess, no information available
  property lifetime 10 year; name lifetime; = total_PMH/8/220
    total productive machine hours divided by 8 hour/day divided by 220 working days/yera
  property price 24667 EUR2005
    Calculated based on inputs: The price of the product has been calculated as a sum of the values of the material and energy inputs for this product. This value is therefore a rough estimation. It may underestimate the real price since there are additional expenses when producing any product. These expences can include for example labour costs, treatment of waste materials and profit for the producer. Please consider carefully whether this level of data quality is acceptable for your application.
  property lifetime capacity [h] 17600 hour; = total_PMH
    Total of operation hours expected; in case of forest machinery: total of productive machine hours.

## By-products
- scrap lead acid battery: 0 kg; source Spielmann, M. 2007; By-product classification Recyclable; CPC 39364: Waste and scrap of lead; pedigree (1,1,1,1,1)
  production volume 0 kg; = p_machinery*w_lead
    Calculated from production volume of reference product using the relative outputs.
  property price 0 EUR2005; name w_lead_price_EUR2005
    Assumed without economic value

## Inputs from technosphere
- steel, chromium steel 18/8, hot rolled: 2380.57 kg; name m_chromium_steel; = (1+maintenance_factor)*1149.75+426; source Spielmann, M. 2007; lognormal variance with pedigree 0.235, pedigree (5,5,5,5,5)
  total material input for production and maintenance (estimated via default factor); the amount of material used in production is extrapolated from reference via total weight of machine; plus total weight of guide bars and chains consumed over service life, estimated based on Klvac et al. 2003
  properties: dry mass 1 kg, carbon content, fossil 0.0008, UVEK_link_2 2662, UVEK_relative_amount_1 1, UVEK_link_1 451, wet mass 1 kg, UVEK_relative_amount_2 1
  note on carbon content, fossil: Stainless steel model is the grade 304 steel (18/8 stainless, 18% chromium 8% nickel; max. 0.08% C)
  note on UVEK_link_2: to be used only in special submissions in coordination with ecoinvent and the Swiss FOEN.
- wastewater, average: 0 m3; name w_sewage; source Spielmann, M. 2007; pedigree (1,1,1,1,1)
  amounts of water inputs converted to m3
  production volume 0 m3
    Calculated from production volume of reference product using the relative outputs.
  properties: UVEK_link_1 4590, dry mass 0.346837 kg, water content 2882.2, carbon content, non-fossil 0.194039, wet mass 1000 kg, UVEK_relative_amount_1 -1
- flat glass, uncoated: 0 kg; name m_glass; source Spielmann, M. 2007; pedigree (1,1,1,1,1)
  total material input for production and maintenance (estimated via default factor); the amount of material used in production is extrapolated from reference via total weight of machine
  properties: dry mass 1 kg, wet mass 1 kg, UVEK_relative_amount_1 1, UVEK_link_1 2159
- scrap steel: 0 kg; name w_chromium_steel; pedigree (1,1,1,1,1)
  sum of all steel types for disposal
  production volume 0 kg
    Calculated from production volume of reference product using the relative outputs.
  properties: dry mass 1 kg, wet mass 1 kg
- polypropylene, granulate: 503.948 kg; name m_PP; = (1+maintenance_factor)*296.44; source Spielmann, M. 2007; lognormal variance with pedigree 0.235, pedigree (5,5,5,5,5)
  (same comment as for flat glass, uncoated)
  property carbon content, fossil 0.857143; name C_content_fossil_PP
  properties: UVEK_link_1 3548, dry mass 1 kg, heating value, net 32.78 MJ, wet mass 1 kg, UVEK_relative_amount_1 1
  note on heating value, net: Value extracted from "treatment of waste polypropylene, open burning"
  note on carbon content, fossil: Polypropylene is formed by the polymerisation of propylene, C3H6 (ecoinvent v2.2 report 11_II)
- road vehicle factory: 8.73e-7 unit; source Spielmann M. 2007; lognormal variance with pedigree 0.76, pedigree (5,5,5,5,5)
  no specific information available; proxy as for production of lorry 16 t
  properties: UVEK_relative_amount_1 1, UVEK_link_1 3829
- steel, low-alloyed: 16620.9 kg; name m_steel_unalloyed; = (1+maintenance_factor)*9777; lognormal variance with pedigree 0.235, pedigree (5,5,5,5,5)
  (same comment as for flat glass, uncoated)
  properties: UVEK_link_1 4222, UVEK_relative_amount_1 1, wet mass 1 kg, carbon content, fossil 0.005, dry mass 1 kg
  note on UVEK_link_1: Supposted to link to a DS for unalloyed steel (not to low-alloyed steel)
  note on carbon content, fossil: Low alloyed steel composition given in Tab. 3.2 ecoinvent v2.2 report 10_partII. Steel assumed to have a C content of 0.5%
- heat, district or industrial, natural gas: 89618.9 MJ; = (1+maintenance_factor)*52717; lognormal variance with pedigree 0.235, pedigree (5,5,5,5,5)
  total heat input for production and maintenance (estimated via default factor); the amount of heat used in production is extrapolated from reference via total weight of machine
  properties: heating value, net 1 MJ, UVEK_relative_amount_1 1, UVEK_link_1 2580
  note on UVEK_link_1: From a principal point of view, linking to a dataset representing a technology mix would be preferable.
- lead: 86 kg; name m_lead; source Spielmann, M. 2007; lognormal variance with pedigree 0.235, pedigree (5,5,5,5,5)
  for battery; the amount is extrapolated from reference via total weight of machine
  properties: UVEK_link_1 2778, dry mass 1 kg, UVEK_relative_amount_1 1, wet mass 1 kg
- waste glass sheet: 0 kg; name w_glass; source Spielmann, M. 2007; pedigree (1,1,1,1,1)
  production volume 0 kg
    Calculated from the production volume of harvester in proportion to the respective output amounts.
  properties: wet mass 1 kg, dry mass 1 kg
- aluminium, cast alloy: 41.395 kg; name m_aluminium; = (1+maintenance_factor)*24.35; source Spielmann, M. 2007; lognormal variance with pedigree 0.235, pedigree (5,5,5,5,5)
  (same comment as for flat glass, uncoated)
  properties: dry mass 1 kg, UVEK_link_1 162, wet mass 1 kg, UVEK_relative_amount_1 1
- water, completely softened: 0 kg; name m_water_softened; source Spielmann, M. 2007; pedigree (1,1,1,1,1)
  for battery; the amount is extrapolated from reference via total weight of machine
  property dry mass 0 kg; name m_water_softened_DM
  properties: UVEK_relative_amount_1 1, wet mass 1 kg, UVEK_link_1 4851
- acetylene: 0 kg; name m_acethylene; source Spielmann, M. 2007; pedigree (1,1,1,1,1)
  used during disassembly
  property dry mass 1 kg; name m_acethylene_DM
  property wet mass 1 kg; name m_acethylene_WM
  property carbon content, fossil 0.923077; name C_content_fossil_acetylene
  properties: UVEK_link_1 101, heating value, net 51.2 MJ, UVEK_relative_amount_1 1
  note on heating value, net: Based on literature, page 25 (Value may refer to HHV), Althaus H.-J., Chudacoff M., Hischier R., Jungbluth N., Osses M. and Primas A. (2007) Life Cycle Inventories of Chemicals. Final report ecoinvent data v2.0 No. 8. EMPA, Swiss Centre for Life Cycle Inventories, Dübendorf, CH, Online-Version under: www.ecoinvent.org.
- waste aluminium: -41.395 kg; name w_aluminium; = (m_aluminium)*-1; source Spielmann, M. 2007; lognormal variance with pedigree 0.203, pedigree (4,5,5,5,5)
  production volume 413950 kg; = p_machinery*w_aluminium
    Calculated from production volume of reference product using the relative outputs.
  property dry mass 1 kg; name w_aluminium_DM
  property wet mass 1 kg; name w_aluminium_WM
- electricity, medium voltage: 73875.2 kWh; = (1+maintenance_factor)*43456; lognormal variance with pedigree 0.235, pedigree (5,5,5,5,5)
  total electricity input for production and maintenance (estimated via default factor); the amount of electricity used in production is extrapolated from reference via total weight of machine
  properties: UVEK_link_1 1785, UVEK_relative_amount_1 1
- wire drawing, copper: 2.12 kg; = m_copper; source Spielmann, M. 2007; lognormal variance with pedigree 0.235, pedigree (5,5,5,5,5)
  properties: UVEK_relative_amount_1 1, UVEK_link_1 4895
- electronics, for control units: 69.87 kg; name m_electronics; source Spielmann, M. 2007; lognormal variance with pedigree 0.235, pedigree (5,5,5,5,5)
  total material input for production (no maintenance according to reference); the amount of material used in production is extrapolated from reference via total weight of machine
  property water content 0; name water_content
  property wet mass 1 kg; name m_electronics_WM
  property carbon content, non-fossil 0.00013442; name C_content_non_fossil_electronics
  property water in wet mass 0 kg; name WWM
  property dry mass 1 kg; name m_electronics_DM
  property carbon content, fossil 0.337146; name C_content_fossil_electronics
  properties: UVEK_link_1 2021, UVEK_relative_amount_1 1
- wastewater from lorry production: -5.321 m3; name w_WW; = ((1+maintenance_factor)*3.13)*-1; source Spielmann, M. 2007; lognormal variance with pedigree 0.203, pedigree (4,5,5,5,5)
  total production specific waste water from production and maintenance (estimated via default factor); the amount of waste water from production is extrapolated from reference via total weight of machine
  production volume 53210 m3; = p_machinery*w_WW
    Calculated from production volume of reference product using the relative outputs.
  properties: UVEK_link_1 4575, water content 2962.17, UVEK_relative_amount_1 -1, wet mass 1000 kg, dry mass 0.337476 kg
- cast iron: 1985 kg; name m_cast_iron; source Spielmann, M. 2007; lognormal variance with pedigree 0.235, pedigree (5,5,5,5,5)
  (same comment as for electronics, for control units)
  property carbon content, fossil 0.04; name C_content_fossil_cast_iron
  property wet mass 1 kg; name m_cast_iron_WM
  property dry mass 1 kg; name m_cast_iron_DM
  properties: UVEK_link_1 401, UVEK_relative_amount_1 1
- waste polypropylene: 0 kg; name w_PP; source Spielmann, M. 2007; pedigree (1,1,1,1,1)
  Input of PP correct for water content of waste flow
  production volume 0 kg
    Calculated from production volume of reference product using the relative outputs.
  property water content 0.189061; name WC_waste_PP
  property dry mass 0.841 kg; name DM_waste_polypropylene
  properties: wet mass 1 kg, UVEK_link_1 1042, heating value, net 32.78 MJ, carbon content, fossil 0.825208, UVEK_relative_amount_1 -1.18906
  note on heating value, net: Value assumed for all polypropylene products. Source: Phyllis2, database for (treated) biomass, algae, feedstocks for biogas production and biochar, https://phyllis.nl/Biomass/View/1186, ECN.TNO
- copper, cathode: 2.12 kg; name m_copper; source Spielmann, M. 2007; lognormal variance with pedigree 0.235, pedigree (5,5,5,5,5)
  (same comment as for electronics, for control units)
  properties: UVEK_link_1 595, dry mass 1 kg, UVEK_relative_amount_1 1, wet mass 1 kg
  note on UVEK_link_1: Should rather link to a consumption mix (or at least to a production mix, including copper from secondary sources)
- waste rubber, unspecified: 0 kg; name w_rubber; source Spielmann, M. 2007; pedigree (1,1,1,1,1)
  production volume 0 kg
    Calculated from production volume of reference product using the relative outputs.
  property dry mass 1 kg; name w_rubber_DM
  property wet mass 1 kg; name w_rubber_WM
  properties: UVEK_link_1 1079, UVEK_relative_amount_1 -1, heating value, net 27.19 MJ, carbon content, fossil 0.853
  note on heating value, net: Value taken from the general comment of the treatment dataset.
- powder coat, steel: 71.4 m2; = (1+maintenance_factor)*42; source Spielmann, M. 2007; lognormal variance with pedigree 0.235, pedigree (5,5,5,5,5)
  total powder coating input for production and maintenance (estimated via default factor)
  properties: UVEK_link_1 3613, UVEK_relative_amount_1 1
- tap water: 39984 kg; name m_tap_water; = (1+maintenance_factor)*23520; source Spielmann, M. 2007; lognormal variance with pedigree 0.235, pedigree (5,5,5,5,5)
  total water input for production and maintenance (estimated via default factor); the amount of water used in production is extrapolated from reference via total weight of machine
  property carbon content, fossil 0.00178991; name C_content_fossil
  property carbon content, non-fossil 0; name C_content_non_fossil
  properties: dry mass 0.000337476 kg, wet mass 1 kg, UVEK_relative_amount_1 1, water content 2962.17, UVEK_link_1 4285
- synthetic rubber: 260.44 kg; name m_rubber; = 29.64+230.8; source Spielmann, M. 2007; lognormal variance with pedigree 0.235, pedigree (5,5,5,5,5)
  rubber sealings and tubes plus rubber tyres (production and mantenance)
  property carbon content, fossil 0.871949; name C_content_fossil_rubber
  properties: wet mass 1 kg, UVEK_link_1 4277, heating value, net 26.42 MJ, UVEK_relative_amount_1 1, dry mass 1 kg
  note on carbon content, fossil: EPDM (Ethylene-propene-diene terpolymer) rubber is a terpolymer of ethylene, propene, and a diene with the residual unsaturated portion of the diene in the side chain (ecoinvent v2.2 report 7-part XX & Ullmann). Chemical formula (deduced from Evidences of Solvent-Induced Miscibility in Polychloroprene-co-Ethylene-Propene Diene Terpolymer Blends, Dubey et al., Journal of Applied Polymer Science, 2009, 111:1884-1891): C20H35
- waste electric and electronic equipment: -69.87 kg; name w_electronics; = (m_electronics)*-1; source Spielmann, M. 2007; lognormal variance with pedigree 0.203, pedigree (4,5,5,5,5)
  production volume 698700 kg; = p_machinery*w_electronics
    Calculated from production volume of reference product using the relative outputs.
  property carbon content, fossil 0.337146; name w_electronics_C_content_fossil; = C_content_fossil_electronics
  property carbon content, non-fossil 0.00013442; name w_electronics_C_content_non_fossil; = C_content_non_fossil_electronics
  property wet mass 1 kg; name w_electronics_WM
  property dry mass 1 kg; name w_electronics_DM
  properties: UVEK_relative_amount_1 -1, UVEK_link_1 928
- injection moulding: 503.948 kg; = m_PP; source Spielmann, M. 2007; lognormal variance with pedigree 0.23, pedigree (5,5,5,5,5)
  properties: UVEK_relative_amount_1 1, UVEK_link_1 2701
- scrap copper: 0 kg; name w_copper; source Spielmann, M. 2007; pedigree (1,1,1,1,1)
  (same comment as for flat glass, uncoated)
  production volume 0 kg
    Calculated from production volume of reference product using the relative outputs.
  property dry mass 1 kg; name w_copper_DM
  property wet mass 1 kg; name w_copper_WM
- steel, low-alloyed, hot rolled: 977.279 kg; name m_steel_low_alloyed; = (1+maintenance_factor)*574.87; source Spielmann, M. 2007; lognormal variance with pedigree 0.235, pedigree (5,5,5,5,5)
  (same comment as for flat glass, uncoated)
  properties: UVEK_relative_amount_9 6.30321, carbon content, fossil 0.005, dry mass 1 kg, UVEK_relative_amount_8 1.43255, UVEK_relative_amount_1 1, UVEK_relative_amount_2 1, wet mass 1 kg, UVEK_link_1 4222, UVEK_link_8 4417, UVEK_link_9 4433, UVEK_link_2 2662
  note on UVEK_relative_amount_9: scaling factor = amount of transport in corresponding KBOB dataset/amount of this input from technosphere. To be used only in special submissions in coordination with ecoinvent and the Swiss FOEN.
  note on UVEK_link_8: This link has been introduced to model transport specifically for the SAM model; to be used only in special submissions in coordination with ecoinvent and the Swiss FOEN.
- waste bulk iron, excluding reinforcement: 0 kg; name w_bulk_iron; source Spielmann, M. 2007; pedigree (1,1,1,1,1)
  production volume 0 kg
    Calculated from production volume of reference product using the relative outputs.
  property wet mass 1 kg; name w_bulk_iron_WM
  property dry mass 1 kg; name w_bulk_iron_DM
- oxygen, liquid: 0 kg; source Spielmann, M. 2007; pedigree (1,1,1,1,1)
  used during disassembly
  properties: wet mass 1 kg, UVEK_link_1 3319, UVEK_relative_amount_1 1, dry mass 1 kg
- scrap lead acid battery: -86 kg; source Spielmann, M. 2007; lognormal variance with pedigree 0.203, pedigree (4,5,5,5,5)
  production volume 860000 kg
- wastewater, average: -12.4991, -1.35217, -26.1508 m3 (3 entries); source Spielmann, M. 2007; lognormal variance with pedigree 0.203, pedigree (4,5,5,5,5)
  amounts of water inputs converted to m3
  production volume 400020 m3
- flat glass, uncoated: 23.6649, 114.919 kg (2 entries); source Spielmann, M. 2007; lognormal variance with pedigree 0.235, pedigree (5,5,5,5,5)
  (same comment as for flat glass, uncoated)
- scrap steel: -4864.73, -6.16344, -15107.9 kg (3 entries); lognormal variance with pedigree 0.203, pedigree (4,5,5,5,5)
  sum of all steel types for disposal
  production volume 1.99788e8 kg
- waste glass sheet: -28.4052, -0.723196, -109.456 kg (3 entries); source Spielmann, M. 2007; lognormal variance with pedigree 0.203, pedigree (4,5,5,5,5)
  production volume 1.38584e6 kg
- water, completely softened: 4.23538, 5.89262, 7.87201 kg (3 entries); source Spielmann, M. 2007; lognormal variance with pedigree 0.235, pedigree (5,5,5,5,5)
  for battery; the amount is extrapolated from reference via total weight of machine
- acetylene: 0.87, 4.13 kg (2 entries); source Spielmann, M. 2007; lognormal variance with pedigree 0.235, pedigree (5,5,5,5,5)
  used during disassembly
  properties: dry mass 1 kg, UVEK_link_1 101, heating value, net 51.2 MJ, wet mass 1 kg, UVEK_relative_amount_1 1, carbon content, fossil 0.923077
- waste polypropylene: -57.6782, -4.44665, -1.83663, -1.74405, -66.5505, -0.741976, -0.336293, -465.89 kg (8 entries); source Spielmann, M. 2007; lognormal variance with pedigree 0.203, pedigree (4,5,5,5,5)
  Input of PP correct for water content of waste flow
  production volume 5.99225e6 kg
  properties: water content 0.189061, wet mass 1 kg, UVEK_link_1 1042, dry mass 0.841 kg, heating value, net 32.78 MJ, carbon content, fossil 0.825208, UVEK_relative_amount_1 -1.18906
- waste rubber, unspecified: -127.543, -5.35423, -127.543 kg (3 entries); source Spielmann, M. 2007; lognormal variance with pedigree 0.203, pedigree (4,5,5,5,5)
  production volume 2.6044e6 kg
  properties: UVEK_link_1 1079, UVEK_relative_amount_1 -1, dry mass 1 kg, heating value, net 27.19 MJ, wet mass 1 kg, carbon content, fossil 0.853
- scrap copper: -0.67248, -0.0315513, -1.41597 kg (3 entries); source Spielmann, M. 2007; lognormal variance with pedigree 0.203, pedigree (4,5,5,5,5)
  (same comment as for flat glass, uncoated)
  production volume 21200 kg
  properties: dry mass 1 kg, wet mass 1 kg
- waste bulk iron, excluding reinforcement: -639.17, -16.7075, -1329.12 kg (3 entries); source Spielmann, M. 2007; lognormal variance with pedigree 0.203, pedigree (4,5,5,5,5)
  production volume 1.985e7 kg
  properties: wet mass 1 kg, dry mass 1 kg
- oxygen, liquid: 2.58372, 9.41628 kg (2 entries); source Spielmann, M. 2007; lognormal variance with pedigree 0.235, pedigree (5,5,5,5,5)
  used during disassembly

## Emissions to nature
- Carbon dioxide, fossil [air, non-urban air or from high stacks]: 16.9231 kg; = m_acethylene*C_content_fossil_acetylene/12*(12+2*16); source Spielmann, M. 2007; lognormal variance with pedigree 0.033, pedigree (1,1,4,1,1)
  acethylene converted to CO2
  property wet mass 1 kg; name WM

## Sampling procedure
Originally adapted from John Deere, environmental declaration for a Timberjack 770 D as documented in Spielmann, M,, L. Barreto, V. Erni, F. Frutig and O.Thees (2007): Life cycle assessment of energy wood supply of forest wood chips in Switzerland, Paul Scherrer Institute and Swiss Federal Institute for Forest, Snow and Landscape Research (WSL), unpublished.

## Extrapolations
This dataset has been extrapolated from year 2012 to the year of the calculation (2021). The uncertainty has been adjusted accordingly.
