# liquid crystal display production, minor components, auxilliaries and assembly effort

Dataset: EcoSpold 2, unit process
Geography: GLO
Time period: 2001-01-01 to 2021-12-31
Technology level: current
Classification: EcoSpold01Categories: electronics/module
Classification: ISIC rev.4 ecoinvent: 2620:Manufacture of computers and peripheral equipment
Tags: ConvertedDataset
Scenario: Business-as-Usual
System model: Allocation, cut-off by classification
Generated by: Roland Hischier
Published in: Hischier R. 2007
Database: ecoinvent
isCopyrightProtected: true
accessRestrictedTo: 1

## General comment
This dataset represents the average production efforts of 1 kg of LCD module. It represents all the production efforts for LCD module not included in the panel components dataset for LCD display production. Main data are based on information in a US-EPA LCA study about LCD and CRT production. The data represent the respective efforts for a 15-inch LCD computer screen, as it is produced in Japan in the late 1990s. Infrastructure are based on assumptions and simplifications and have thus, accordingly higher uncertainties
[This dataset was already contained in the ecoinvent database version 2. It was not individually updated during the transfer to ecoinvent version 3. Life Cycle Impact Assessment results may still have changed, as they are affected by changes in the supply chain, i.e. in other datasets. This dataset was generated following the ecoinvent quality guidelines for version 2. It may have been subject to central changes described in the ecoinvent version 3 change report (http://www.ecoinvent.org/database/ecoinvent-version-3/reports-of-changes/), and the results of the central updates were reviewed extensively. The changes added e.g. consistent water flows and other information throughout the database. The documentation of this dataset can be found in the ecoinvent reports of version 2, which are still available via the ecoinvent website. The change report linked above covers all central changes that were made during the conversion process.]

## Included activities start
From reception of raw materials and auxiliares at the factory gate.

## Included activities end
This dataset includes the auxiliaries and energy efforts as well as the related emissions (air/water) and waste amounts for the assembly of the complete LCD module. Estimations for infrastructure are included as well.

## Geography
Data from literature (based on information from Japanese producers) used as data for the global production average

## Technology
Current technology in Japan

## Parameters
- fraction, process water, to air: 0.15 dimensionless; name fraction_PW_to_air; lognormal variance with pedigree 0.092025, pedigree (4,4,3,2,4)
  Literature value. In case when no industry/process specific data are available, default evaporation fraction value is used. This value is 15% and is based on literature (Statistics Canada, 2007 & Shaffer, K.H., 2008, Consumptive water use in the Great Lakes Basin, USGS & Shiklomanov, 2003, World Water Resources at the Beginning of the 21st Century) and has been approved by an expert.

## Reference product
- liquid crystal display, minor components, auxilliaries and assembly effort: 1 kg; By-product classification allocatable product; CPC 47315: Monitors and projectors, principally used in an automatic data processing system
  The LCD technology is just one out of several in the last decades developed flat display technologies. Other types of flat display technologies are e.g. the Plasma Display Panel (PDP) or OLED (organic light emitting diodes) displays. It can be distinguished between the so-called (self-)emissive and non-emissive displays. While the first ones have their proper light source for the production of the picture, the second type of display - to which the LCD display belongs - requests an additional light source in order to produce the image. Non-emissive displays have a low power consumption and they are (most of time) readable even in bright sunlight. The general principle used is the fact that the so-called liquid crystal (LC) - a mixture of up to 15 different organic components - changes their properties of light passing through the crystals in function of an external electrical charge. Within the LCD technology it is distinguished between passive-matrix and active-matrix LCD displays. There each row or column of the display has a single electrical circuit. The pixels are addressed one at a time by row and column addresses. This type of display is called a passive matrix because the pixel must retain its state between refreshes without the benefit of a steady electrical charge. As the number of pixels (and, correspondingly, columns and rows) increases, this type of display becomes increasingly less feasible. Very slow response times and poor contrast are typical of passive-matrix LCDs.
  For high-resolution colour displays such as modern LCD computer monitors and televisions, an active matrix structure is used. A matrix of thin-film transistors (TFTs) is added to the polarizing and colour filters. Each pixel has its own dedicated transistor, which allows each column line to access one pixel. When a row line is activated, all of the column lines are connected to a row of pixels and the correct voltage is driven onto all of the column lines. The row line is then deactivated and the next row line is activated. All of the row lines are activated in sequence during a refresh operation. Active-matrix displays are much brighter and sharper than passive-matrix displays of the same size, and generally have quicker response times.
  As shown there, the front glass plate is used as substrate for the colour filters, while the back glass plate is the substrate for the TFT-array. The two glass plates are themselves assembled with a sealant, while spacers keep the gap between the two plates - a gap that is filled up with LC material.
  On the front plate, the colour filter contains the black matrix as well as the three colour filters (red, blue, green) and a transparent ITO layer as common electrode. These colour filters can be made thereby with either dyes or with pigments, using a variety of different colouring methods. The TFT-array consists of the actual TFT, storage capacitors, pixel electrodes and the interconnect wiring. Thereby, each pixel has its proper TFT, storage capacitor and pixel electrode in order that each pixel can be addressed individually.
  Apart the LCD panel, a TFT LCD module compromises also a driving circuit unit as well as the backlight system, plus an overall chassis for keeping the complete LCD module together. The driving circuit unit contains a set of IC chips and printed wiring boards, allowing actually addressing in the end each single pixel on the LCD panel.
  EcoSpold01Location=GLO
  production volume 1 kg
    Dummy value to be replaced by measured, estimated or calculated value
  properties: price 9.01 EUR2005

## Inputs from technosphere
- hydrogen, liquid: 0 kg; source Socolof M. L. 2001; pedigree (1,1,1,1,1)
  Literature Value.
  EcoSpold01Location=RER
  Uncertainty: data from an US-EPA LCA study
  properties: heating value, net 120.21 MJ, dry mass 1 kg, wet mass 1 kg
- phosphoric acid, industrial grade, without water, in 85% solution state: 0.010286 kg; source Socolof M. L. 2001; lognormal variance with pedigree 0.0407, pedigree (1,3,5,3,1)
  EcoSpold01Location=RER
  Literature Value.
  Uncertainty: data from an US-EPA LCA study
  properties: dry mass 1 kg, wet mass 1 kg
- propylene glycol, liquid: 0 kg; source Socolof M. L. 2001; pedigree (1,1,1,1,1)
  Literature Value.
  EcoSpold01Location=RER
  Uncertainty: data from an US-EPA LCA study
  properties: heating value, net 27.09 MJ, carbon content, fossil 0.473684, dry mass 1 kg, wet mass 1 kg
- toluene diisocyanate: 0 kg; source Socolof M. L. 2001; pedigree (1,1,1,1,1)
  Proxy with literature value, to represent triallyl isocyanurate, toluene diisocyanate is used.
  EcoSpold01Location=RER
  Uncertainty: data from an US-EPA LCA study
  properties: dry mass 1 kg, carbon content, fossil 0.62069, wet mass 1 kg, heating value, net 22.98 MJ
  note on carbon content, fossil: Toluene diisocyanate (TDI; CH3-C6H3-(N=C=O)2 (ecoinvent v2.2 report 11_II), C9H6N2O2. MW=174 g/mol
- carbon dioxide, liquid: 0 kg; source Socolof M. L. 2001; pedigree (1,1,1,1,1)
  EcoSpold01Location=RER
  Literature Value.
  Uncertainty: data from an US-EPA LCA study
  properties: carbon content, fossil 0.272727, dry mass 1 kg, wet mass 1 kg, heating value, net 8.27 MJ
- xylene: 0 kg; source Socolof M. L. 2001; pedigree (1,1,1,1,1)
  Literature Value.
  EcoSpold01Location=RER
  Uncertainty: data from an US-EPA LCA study
  properties: carbon content, fossil 0.905061, dry mass 1 kg, wet mass 1 kg, heating value, net 38.84 MJ
- aluminium sulfate, powder: 0 kg; source Socolof M. L. 2001; pedigree (1,1,1,1,1)
  Literature Value.
  EcoSpold01Location=RER
  Uncertainty: data from an US-EPA LCA study
  properties: wet mass 1 kg, dry mass 1 kg
- ethanol, without water, in 99.7% solution state, from ethylene: 0 kg; source Socolof M. L. 2001; pedigree (1,1,1,1,1)
  EcoSpold01Location=RER
  Literature Value.
  Uncertainty: data from an US-EPA LCA study
  properties: dry mass 1 kg, wet mass 1 kg, heating value, net 31.58 MJ, carbon content, fossil 0.521739
- nitric acid, without water, in 50% solution state: 0 kg; source Socolof M. L. 2001; pedigree (1,1,1,1,1)
  Literature Value.
  EcoSpold01Location=RER
  Uncertainty: data from an US-EPA LCA study
  properties: wet mass 1 kg, dry mass 1 kg
- sodium hydroxide, without water, in 50% solution state: 0.09349 kg; source Socolof M. L. 2001; lognormal variance with pedigree 0.0407, pedigree (1,3,5,3,1)
  Literature Value.
  EcoSpold01Location=RER
  Uncertainty: data from an US-EPA LCA study
  properties: heating value, net 3.03 MJ, dry mass 1 kg, wet mass 1 kg
- hydrochloric acid, without water, in 30% solution state: 0 kg; source Socolof M. L. 2001; pedigree (1,1,1,1,1)
  EcoSpold01Location=RER
  Literature Value.
  Uncertainty: data from an US-EPA LCA study
  properties: dry mass 1 kg, heating value, net 3.32 MJ, wet mass 1 kg
- waste plastic, consumer electronics: 0 kg; source Socolof M. L. 2001; pedigree (1,1,1,1,1)
  Estimation, based on literature. A 50:50 split between module assembly and monitor assembly is used.
  EcoSpold01Location=CH
  Uncertainty: data from an US-EPA LCA study - approximated with existing waste process
  production volume 0 kg
    Calculated from the production volume of liquid crystal display, minor components, auxilliaries and assembly effort in proportion to the respective output amounts.
  properties: dry mass 0.847 kg, wet mass 1 kg, carbon content, fossil 0.830215, water content 0.180638, heating value, net 34.78 MJ
  note on carbon content, fossil: C content in 1 kg DM was calculated using data in Tab A.2, ecoinvent v2.2 report 13_I
  note on heating value, net: Assumed equal to "waste plastic, consumer electronics, sorted".
- spent solvent mixture: 0 kg; source Socolof M. L. 2001; pedigree (1,1,1,1,1)
  (same comment as for waste plastic, consumer electronics)
  production volume 0 kg
    (same comment as for waste plastic, consumer electronics)
  properties: carbon content, fossil 0.571257, water content 0.197605, dry mass 0.835 kg, wet mass 1 kg, heating value, net 21.7 MJ
  note on carbon content, fossil: Tab A.7, ecoinvent v2.2 report 13_I. C content has been calculated after data in the tables, and then referred to 1 kg DM
  note on heating value, net: Value taken from the general comment of the treatment dataset.
- argon, crude, liquid: 0.0020495 kg; source Socolof M. L. 2001; lognormal variance with pedigree 0.0407, pedigree (1,3,5,3,1)
  EcoSpold01Location=RER
  Literature Value.
  Uncertainty: data from an US-EPA LCA study
  properties: wet mass 1 kg, dry mass 1 kg
- sodium phosphate: 0 kg; source Socolof M. L. 2001; pedigree (1,1,1,1,1)
  Proxy with literature value, to represent triphenyl phosphate, sodium phosphate is used.
  EcoSpold01Location=RER
  Uncertainty: data from an US-EPA LCA study
  properties: wet mass 1 kg, dry mass 1 kg
- waste glass: 0 kg; source Socolof M. L. 2001; pedigree (1,1,1,1,1)
  EcoSpold01Location=CH
  Estimation, based on literature. A 50:50 split between module assembly and monitor assembly is used.
  Uncertainty: data from an US-EPA LCA study
  production volume 0 kg
    (same comment as for waste plastic, consumer electronics)
  properties: dry mass 1 kg, wet mass 1 kg, heating value, net 0.05 MJ
  note on heating value, net: Value extracted from "treatment of waste glass, open dump, very wet infiltration class (1000mm)"
- methyl ethyl ketone: 0 kg; source Socolof M. L. 2001; pedigree (1,1,1,1,1)
  EcoSpold01Location=RER
  Literature Value.
  Uncertainty: data from an US-EPA LCA study
  properties: dry mass 1 kg, carbon content, fossil 0.666667, wet mass 1 kg, heating value, net 33.63 MJ
- electricity, medium voltage: 18.7357 kWh; source Socolof M. L. 2001; lognormal variance with pedigree 0.0407, pedigree (1,3,5,3,1)
  EcoSpold01Location=CN
  Estimation, based on literature. A 50:50 split between module assembly and monitor assembly is used.
  Uncertainty: data from an US-EPA LCA study
- lime, hydrated, packed: 0 kg; source Socolof M. L. 2001; pedigree (1,1,1,1,1)
  Literature Value.
  EcoSpold01Location=CH
  Uncertainty: data from an US-EPA LCA study
  properties: water content 0.00300903, wet mass 1 kg, dry mass 0.997 kg
- polycarbonate: 0.00025312 kg; source Socolof M. L. 2001; lognormal variance with pedigree 0.0407, pedigree (1,3,5,3,1)
  Proxy with literature value, to represent polyimide alignment layer, polycarbonate is used.
  EcoSpold01Location=RER
  Uncertainty: data from an US-EPA LCA study
  properties: heating value, net 29.57 MJ, carbon content, fossil 0.755906, dry mass 1 kg, wet mass 1 kg
  note on carbon content, fossil: Polycarbonate means here 2,2-bis(4-hydroxyphenyl)propane polycarbonate – also called bisphenol A polycarbonate ( -(O-C6H4-C(CH3)2-C6H4-O-CO)n- (ecoinvent v2.2 report 11_II), C16H14O3, MW=254 g/mol.
- heat, district or industrial, natural gas: 48.096 MJ; source Socolof M. L. 2001; lognormal variance with pedigree 0.0407, pedigree (1,3,5,3,1)
  EcoSpold01Location=RER
  Estimation, based on literature. A 50:50 split between module assembly and monitor assembly is used.
  Uncertainty: data from an US-EPA LCA study
  properties: heating value, net 1 MJ
- dimethyl sulfoxide: 0.017266 kg; source Socolof M. L. 2001; lognormal variance with pedigree 0.0407, pedigree (1,3,5,3,1)
  EcoSpold01Location=RER
  Literature Value.
  Uncertainty: data from an US-EPA LCA study
  properties: carbon content, fossil 0.307692, wet mass 1 kg, dry mass 1 kg, heating value, net 18.62 MJ
- N-methyl-2-pyrrolidone: 0.00021146 kg; source Socolof M. L. 2001; lognormal variance with pedigree 0.0407, pedigree (1,3,5,3,1)
  EcoSpold01Location=RER
  Literature Value.
  Uncertainty: data from an US-EPA LCA study
  properties: heating value, net 29.36 MJ, carbon content, fossil 0.585366, wet mass 1 kg, dry mass 1 kg
- wastewater from liquid crystal display production: -0.3737 m3; name wastewater_output; source Socolof M. L. 2001; lognormal variance with pedigree 0.0407, pedigree (1,3,5,3,1)
  Estimation, based on literature. A 50:50 split between module assembly and monitor assembly is used.
  EcoSpold01Location=CH
  Uncertainty: data from an US-EPA LCA study
  production volume 0.3737 m3
    (same comment as for waste plastic, consumer electronics)
  property price 0 EUR2005; name wastewater_output_price_EUR2005
  properties: water content 334.868, carbon content, fossil 0.734985, wet mass 1000 kg, dry mass 2.97736 kg
  note on carbon content, fossil: BOD is 3.37e-3 kg/kg (Tab 12.12, ecoinvent v2.2 report 18_III). BOD was converted to TOC, using conversion factors in Tab 4.10 (ecoinvent v2.2 report 13_IV). TOC was considered as Total Carbon.
- hydrogen peroxide, without water, in 50% solution state: 0 kg; source Socolof M. L. 2001; pedigree (1,1,1,1,1)
  Literature Value.
  EcoSpold01Location=RER
  Uncertainty: data from an US-EPA LCA study
  properties: dry mass 1 kg, wet mass 1 kg, heating value, net 7.13 MJ
- isopropanol: 0 kg; source Socolof M. L. 2001; pedigree (1,1,1,1,1)
  Literature Value.
  EcoSpold01Location=RER
  Uncertainty: data from an US-EPA LCA study
  properties: carbon content, fossil 0.6, dry mass 1 kg, wet mass 1 kg, heating value, net 34.3 MJ
- sulfuric acid: 0 kg; source Socolof M. L. 2001; pedigree (1,1,1,1,1)
  EcoSpold01Location=RER
  Literature Value.
  Uncertainty: data from an US-EPA LCA study
  properties: dry mass 1 kg, wet mass 1 kg
- polarizer, liquid crystals and colour filters, for liquid crystal display: 0.021875 kg; source Socolof M. L. 2001; lognormal variance with pedigree 0.0407, pedigree (1,3,5,3,1)
  EcoSpold01Location=GLO
  Literature Value.
  Uncertainty: data from an US-EPA LCA study
- ethylene glycol: 0.00021146 kg; source Socolof M. L. 2001; lognormal variance with pedigree 0.0407, pedigree (1,3,5,3,1)
  Proxy with literature value, to represent ethylene glycol, glycol ethersis used.
  EcoSpold01Location=RER
  Uncertainty: data from an US-EPA LCA study
  properties: heating value, net 23.44 MJ, carbon content, fossil 0.387097, wet mass 1 kg, dry mass 1 kg
- acetone, liquid: 0 kg; source Socolof M. L. 2001; pedigree (1,1,1,1,1)
  EcoSpold01Location=RER
  Literature Value.
  Uncertainty: data from an US-EPA LCA study
  properties: dry mass 1 kg, wet mass 1 kg, heating value, net 31.32 MJ, carbon content, fossil 0.62069
- cyclohexanol: 0 kg; source Socolof M. L. 2001; pedigree (1,1,1,1,1)
  EcoSpold01Location=RER
  Literature Value.
  Uncertainty: data from an US-EPA LCA study
  properties: heating value, net 36.32 MJ, carbon content, fossil 0.72, wet mass 1 kg, dry mass 1 kg
- waste mineral oil: 0 kg; source Socolof M. L. 2001; pedigree (1,1,1,1,1)
  EcoSpold01Location=CH
  Estimation, based on literature. A 50:50 split between module assembly and monitor assembly is used.
  Uncertainty: data from an US-EPA LCA study - approximated with existing waste process
  production volume 0 kg
    (same comment as for waste plastic, consumer electronics)
  properties: heating value, net 34.7 MJ, water content 0.111111, carbon content, fossil 0.864444, dry mass 0.9 kg, wet mass 1 kg
  note on carbon content, fossil: Tab A.6, ecoinvent v2.2 report 13_I. C content has been calculated after data in the tables, and then referred to 1 kg DM
- glass fibre: 3.8229e-7 kg; source Socolof M. L. 2001; lognormal variance with pedigree 0.0407, pedigree (1,3,5,3,1)
  EcoSpold01Location=RER
  Proxy with literature value, to represent mild fibre, glass fibre is used.
  Uncertainty: data from an US-EPA LCA study
  properties: dry mass 1 kg, wet mass 1 kg
- electronic component factory: 2e-8 unit; lognormal variance with pedigree 0.3861, pedigree (4,5,5,3,1)
  Proxy, due to a lack of specific information, the infrastructure module for the mounting of printed wiring boards is used.
  EcoSpold01Location=GLO
  Uncertainty: Estimation, based on electronic component production site
- refinery sludge: 0 kg; source Socolof M. L. 2001; pedigree (1,1,1,1,1)
  (same comment as for waste mineral oil)
  production volume 0 kg
    (same comment as for waste plastic, consumer electronics)
  properties: heating value, net 2.45 MJ, dry mass 0.105 kg, carbon content, fossil 0.767857, water content 8.52381, wet mass 1 kg
- hydrogen fluoride: 0 kg; source Socolof M. L. 2001; pedigree (1,1,1,1,1)
  Literature Value.
  EcoSpold01Location=GLO
  Uncertainty: data from an US-EPA LCA study
  properties: dry mass 1 kg, wet mass 1 kg, heating value, net 6.06 MJ
- sludge, NaCl electrolysis: -0.014922 kg; source Socolof M. L. 2001; lognormal variance with pedigree 0.1107, pedigree (1,3,5,3,4)
  (same comment as for waste plastic, consumer electronics)
  production volume 0.014922 kg
    (same comment as for waste plastic, consumer electronics)
  properties: dry mass 1 kg, wet mass 1 kg
- nitrogen, liquid: 0 kg; source Socolof M. L. 2001; pedigree (1,1,1,1,1)
  EcoSpold01Location=RER
  Literature Value.
  Uncertainty: data from an US-EPA LCA study
  properties: wet mass 1 kg, dry mass 1 kg
- chemical, organic: 0.15699 kg; source Socolof M. L. 2001; lognormal variance with pedigree 0.0407, pedigree (1,3,5,3,1)
  EcoSpold01Location=GLO
  Proxy with literature value, to represent 1,4-butanolide and 2-(2-butoxyethoxy)-ethanol acetate, chemicals organics is used. All auxiliaries are considered as process chemicals and due to a lack for more detailed information, a 50:50 split of the mean values is used.
  Uncertainty: data from an US-EPA LCA study
  properties: dry mass 1 kg, carbon content, fossil 0.628, wet mass 1 kg, heating value, net 19.03 MJ
  note on carbon content, fossil: This dataset is an unweighted average of 20 organic substances (listed in Tab 88.1, ecoinvent v2.2 report 8, part II), being part of the top100 chemicals included in this database. The C-content has also been calculated as an unweighted average of the C content of the substances composing this dataset.
- ammonia, anhydrous, liquid: 0 kg; source Socolof M. L. 2001; pedigree (1,1,1,1,1)
  EcoSpold01Location=RER
  Literature Value.
  Uncertainty: data from an US-EPA LCA study
  properties: wet mass 1 kg, dry mass 1 kg
- heat, district or industrial, other than natural gas: 12.114 MJ; source Socolof M. L. 2001; lognormal variance with pedigree 0.0407, pedigree (1,3,5,3,1)
  Estimation, based on literature. A 50:50 split between module assembly and monitor assembly is used. Fuel oil #4, liquid petroleum gas (LPG) and kerosene are summed up and translated into light fuel oil.
  EcoSpold01Location=RER
  Uncertainty: data from an US-EPA LCA study
  properties: heating value, net 1 MJ
- chlorine, liquid: 0 kg; source Socolof M. L. 2001; pedigree (1,1,1,1,1)
  Literature Value.
  EcoSpold01Location=RER
  Uncertainty: data from an US-EPA LCA study
  properties: wet mass 1 kg, dry mass 1 kg
- acetic acid, without water, in 98% solution state: 0.0016667 kg; source Socolof M. L. 2001; lognormal variance with pedigree 0.0407, pedigree (1,3,5,3,1)
  EcoSpold01Location=RER
  Literature Value.
  Uncertainty: data from an US-EPA LCA study
  properties: carbon content, fossil 0.400016, dry mass 1 kg, wet mass 1 kg, heating value, net 14.6 MJ
  note on heating value, net: Based on literature, page 10, Althaus H.-J., Chudacoff M., Hischier R., Jungbluth N., Osses M. and Primas A. (2007) Life Cycle Inventories of Chemicals. Final report ecoinvent data v2.0 No. 8. EMPA, Swiss Centre for Life Cycle Inventories, Dübendorf, CH, Online-Version under: www.ecoinvent.org.
- oxygen, liquid: 0 kg; source Socolof M. L. 2001; pedigree (1,1,1,1,1)
  EcoSpold01Location=RER
  Literature Value.
  Uncertainty: data from an US-EPA LCA study
  properties: dry mass 1 kg, wet mass 1 kg
- krypton, gaseous: 6.7188e-6 kg; source Socolof M. L. 2001; lognormal variance with pedigree 0.0407, pedigree (1,3,5,3,1)
  Literature Value.
  EcoSpold01Location=CH
  Uncertainty: data from an US-EPA LCA study
  properties: wet mass 1 kg, dry mass 1 kg
- hydrogen, liquid: 0.0207378, 0.0948822 kg (2 entries); source Socolof M. L. 2001; lognormal variance with pedigree 0.0407, pedigree (1,3,5,3,1)
  Literature Value.
  EcoSpold01Location=RER
  Uncertainty: data from an US-EPA LCA study
- propylene glycol, liquid: 0.00172701, 0.00349699 kg (2 entries); source Socolof M. L. 2001; lognormal variance with pedigree 0.0407, pedigree (1,3,5,3,1)
  Literature Value.
  EcoSpold01Location=RER
  Uncertainty: data from an US-EPA LCA study
- toluene diisocyanate: 2.65162e-6, 5.36918e-6 kg (2 entries); source Socolof M. L. 2001; lognormal variance with pedigree 0.0407, pedigree (1,3,5,3,1)
  (same comment as for toluene diisocyanate)
- carbon dioxide, liquid: 1.69369e-6, 8.04591e-6 kg (2 entries); source Socolof M. L. 2001; lognormal variance with pedigree 0.0407, pedigree (1,3,5,3,1)
  EcoSpold01Location=RER
  Literature Value.
  Uncertainty: data from an US-EPA LCA study
- xylene: 6.25248e-5, 0.000346325 kg (2 entries); source Socolof M. L. 2001; lognormal variance with pedigree 0.0407, pedigree (1,3,5,3,1)
  Literature Value.
  EcoSpold01Location=RER
  Uncertainty: data from an US-EPA LCA study
- aluminium sulfate, powder: 0.00475786, 0.0225861 kg (2 entries); source Socolof M. L. 2001; lognormal variance with pedigree 0.0407, pedigree (1,3,5,3,1)
  Literature Value.
  EcoSpold01Location=RER
  Uncertainty: data from an US-EPA LCA study
- ethanol, without water, in 99.7% solution state, from ethylene: 0.00108954, 0.00242606 kg (2 entries); source Socolof M. L. 2001; lognormal variance with pedigree 0.0407, pedigree (1,3,5,3,1)
  EcoSpold01Location=RER
  Literature Value.
  Uncertainty: data from an US-EPA LCA study
- nitric acid, without water, in 50% solution state: 0.000103805, 0.000258143, 0.000123689, 0.000788153, 0.000103421, 0.000425409, 0.000112152, 6.98625e-5, 0.000335708, 0.000908858 kg (10 entries); source Socolof M. L. 2001; lognormal variance with pedigree 0.0407, pedigree (1,3,5,3,1)
  Literature Value.
  EcoSpold01Location=RER
  Uncertainty: data from an US-EPA LCA study
- hydrochloric acid, without water, in 30% solution state: 0.00205087, 0.00917313 kg (2 entries); source Socolof M. L. 2001; lognormal variance with pedigree 0.0407, pedigree (1,3,5,3,1)
  EcoSpold01Location=RER
  Literature Value.
  Uncertainty: data from an US-EPA LCA study
- waste plastic, consumer electronics: -0.00312386, -0.206776 kg (2 entries); source Socolof M. L. 2001; lognormal variance with pedigree 0.1107, pedigree (1,3,5,3,4)
  (same comment as for waste plastic, consumer electronics)
  production volume 0.2099 kg
- spent solvent mixture: -0.243654, -0.00570843, -0.623578 kg (3 entries); source Socolof M. L. 2001; lognormal variance with pedigree 0.1107, pedigree (1,3,5,3,4)
  (same comment as for waste plastic, consumer electronics)
  production volume 0.87294 kg
- sodium phosphate: 0.0083828, 0.0397942 kg (2 entries); source Socolof M. L. 2001; lognormal variance with pedigree 0.0407, pedigree (1,3,5,3,1)
  (same comment as for sodium phosphate)
- waste glass: -0.0182599, -0.000885997, -8.26623e-5, -0.000369883, -0.00961287, -0.000125527, -2.01003e-5, -0.090593 kg (8 entries); source Socolof M. L. 2001; lognormal variance with pedigree 0.0407, pedigree (1,3,5,3,1)
  (same comment as for waste glass)
  production volume 0.11995 kg
- methyl ethyl ketone: 5.24405e-7, 1.3897e-6 kg (2 entries); source Socolof M. L. 2001; lognormal variance with pedigree 0.0407, pedigree (1,3,5,3,1)
  EcoSpold01Location=RER
  Literature Value.
  Uncertainty: data from an US-EPA LCA study
- lime, hydrated, packed: 0.000304674, 0.0358933 kg (2 entries); source Socolof M. L. 2001; lognormal variance with pedigree 0.0407, pedigree (1,3,5,3,1)
  Literature Value.
  EcoSpold01Location=CH
  Uncertainty: data from an US-EPA LCA study
- hydrogen peroxide, without water, in 50% solution state: 6.66089e-6, 3.16201e-5 kg (2 entries); source Socolof M. L. 2001; lognormal variance with pedigree 0.0407, pedigree (1,3,5,3,1)
  Literature Value.
  EcoSpold01Location=RER
  Uncertainty: data from an US-EPA LCA study
- isopropanol: 0.015814, 0.075071 kg (2 entries); source Socolof M. L. 2001; lognormal variance with pedigree 0.0407, pedigree (1,3,5,3,1)
  Literature Value.
  EcoSpold01Location=RER
  Uncertainty: data from an US-EPA LCA study
- sulfuric acid: 0.00689898, 0.052736 kg (2 entries); source Socolof M. L. 2001; lognormal variance with pedigree 0.0407, pedigree (1,3,5,3,1)
  EcoSpold01Location=RER
  Literature Value.
  Uncertainty: data from an US-EPA LCA study
- acetone, liquid: 0.000712615, 0.00196969 kg (2 entries); source Socolof M. L. 2001; lognormal variance with pedigree 0.0407, pedigree (1,3,5,3,1)
  EcoSpold01Location=RER
  Literature Value.
  Uncertainty: data from an US-EPA LCA study
- cyclohexanol: 1.74768e-6, 3.53882e-6 kg (2 entries); source Socolof M. L. 2001; lognormal variance with pedigree 0.0407, pedigree (1,3,5,3,1)
  EcoSpold01Location=RER
  Literature Value.
  Uncertainty: data from an US-EPA LCA study
- waste mineral oil: -0.00115086, -2.84907e-5, -0.00301335 kg (3 entries); source Socolof M. L. 2001; lognormal variance with pedigree 0.1107, pedigree (1,3,5,3,4)
  (same comment as for waste mineral oil)
  production volume 0.0041927 kg
- refinery sludge: -0.000753012, -3.44554e-5, -0.00725943 kg (3 entries); source Socolof M. L. 2001; lognormal variance with pedigree 0.1107, pedigree (1,3,5,3,4)
  (same comment as for waste mineral oil)
  production volume 0.0080469 kg
- hydrogen fluoride: 0.000278716, 0.000817684 kg (2 entries); source Socolof M. L. 2001; lognormal variance with pedigree 0.0407, pedigree (1,3,5,3,1)
  Literature Value.
  EcoSpold01Location=GLO
  Uncertainty: data from an US-EPA LCA study
- nitrogen, liquid: 0.330923, 1.20558 kg (2 entries); source Socolof M. L. 2001; lognormal variance with pedigree 0.0407, pedigree (1,3,5,3,1)
  EcoSpold01Location=RER
  Literature Value.
  Uncertainty: data from an US-EPA LCA study
- ammonia, anhydrous, liquid: 0.000122562, 0.000819165, 0.000190676, 0.00037014, 0.000377796, 0.000173426, 0.00142577, 3.87947e-5, 0.00410277 kg (9 entries); source Socolof M. L. 2001; lognormal variance with pedigree 0.0407, pedigree (1,3,5,3,1)
  EcoSpold01Location=RER
  Literature Value.
  Uncertainty: data from an US-EPA LCA study
- chlorine, liquid: 0.000672855, 0.00336364 kg (2 entries); source Socolof M. L. 2001; lognormal variance with pedigree 0.0407, pedigree (1,3,5,3,1)
  Literature Value.
  EcoSpold01Location=RER
  Uncertainty: data from an US-EPA LCA study
- oxygen, liquid: 0.000434539, 0.00158366 kg (2 entries); source Socolof M. L. 2001; lognormal variance with pedigree 0.0407, pedigree (1,3,5,3,1)
  EcoSpold01Location=RER
  Literature Value.
  Uncertainty: data from an US-EPA LCA study

## Inputs from nature
- Water, unspecified natural origin [natural resource, in water]: 0.3737 m3; name water_UNO_input; source Socolof M. L. 2001; lognormal variance with pedigree 0.0407, pedigree (1,3,5,3,1)
  Estimation, based on literature. A 50:50 split between module assembly and monitor assembly is used.
  Calculated value. The amount of water in this flow (input) to the process as provided by the data provider for eiv2 was 0.28125m3. This amount is adjusted, so the water balance is achieved.
  Uncertainty: data from an US-EPA LCA study

## Emissions to nature
- Nitrogen [water, surface water]: 0.020651 kg; source Socolof M. L. 2001; lognormal variance with pedigree 0.0807, pedigree (1,3,5,3,1)
  Estimation, based on literature. A 50:50 split between module assembly and monitor assembly is used.
  Uncertainty: data from an US-EPA LCA study
- Phosphoric acid [air, urban air close to ground]: 1.263e-5 kg; source Socolof M. L. 2001; lognormal variance with pedigree 0.0807, pedigree (1,3,5,3,1)
  (same comment as for Nitrogen)
- TOC, Total Organic Carbon [water, surface water]: 0.000258489 kg; lognormal variance with pedigree 0.0807, pedigree (1,3,5,3,1)
  Calculated Value, by default as TOC (gC) = COD/2.7 (COD measured in g O2). Should more correctly be calculated from the carbon content of the specified emissions to water.
  Uncertainty: data from an US-EPA LCA study
- Arsenic, ion [water, surface water]: 2.9688e-8 kg; source Socolof M. L. 2001; lognormal variance with pedigree 0.0807, pedigree (1,3,5,3,1)
  (same comment as for Nitrogen)
- Acetone [air, urban air close to ground]: 4.8437e-5 kg; source Socolof M. L. 2001; lognormal variance with pedigree 0.1607, pedigree (1,3,5,3,1)
  (same comment as for Nitrogen)
- Hydrocarbons, aromatic [water, surface water]: 0.00015312 kg; source Socolof M. L. 2001; lognormal variance with pedigree 0.3407, pedigree (1,3,5,3,1)
  (same comment as for Nitrogen)
- Ethane, 1,1,1-trichloro-, HCFC-140 [water, surface water]: 5.9635e-9 kg; source Socolof M. L. 2001; lognormal variance with pedigree 0.3407, pedigree (1,3,5,3,1)
  (same comment as for Nitrogen)
- Hydrogen fluoride [air, urban air close to ground]: 0.013568 kg; source Socolof M. L. 2001; lognormal variance with pedigree 0.0807, pedigree (1,3,5,3,1)
  (same comment as for Nitrogen)
- Boron trifluoride [air, urban air close to ground]: 0.0023906 kg; source Socolof M. L. 2001; lognormal variance with pedigree 0.1607, pedigree (1,3,5,3,1)
  (same comment as for Nitrogen)
- Lead [water, surface water]: 1.6068e-6 kg; source Socolof M. L. 2001; lognormal variance with pedigree 0.6907, pedigree (1,3,5,3,1)
  (same comment as for Nitrogen)
- BOD5, Biological Oxygen Demand [water, surface water]: 0.0045312 kg; source Socolof M. L. 2001; lognormal variance with pedigree 0.0807, pedigree (1,3,5,3,1)
  (same comment as for Nitrogen)
- Cyclohexane [air, urban air close to ground]: 1.263e-5 kg; source Socolof M. L. 2001; lognormal variance with pedigree 0.1607, pedigree (1,3,5,3,1)
  (same comment as for Nitrogen)
- Copper, ion [water, surface water]: 2.3906e-7 kg; source Socolof M. L. 2001; lognormal variance with pedigree 0.6907, pedigree (1,3,5,3,1)
  (same comment as for Nitrogen)
- Solids, inorganic [water, surface water]: 0.0019661 kg; source Socolof M. L. 2001; lognormal variance with pedigree 0.0807, pedigree (1,3,5,3,1)
  (same comment as for Nitrogen)
- Hydrogen chloride [air, urban air close to ground]: 0.015781 kg; source Socolof M. L. 2001; lognormal variance with pedigree 0.0807, pedigree (1,3,5,3,1)
  (same comment as for Nitrogen)
- Hydrogen [air, urban air close to ground]: 3.4635e-5 kg; source Socolof M. L. 2001; lognormal variance with pedigree 0.0807, pedigree (1,3,5,3,1)
  (same comment as for Nitrogen)
- Ammonia [air, urban air close to ground]: 0.016224 kg; source Socolof M. L. 2001; lognormal variance with pedigree 0.1607, pedigree (1,3,5,3,1)
  (same comment as for Nitrogen)
- NMVOC, non-methane volatile organic compounds, unspecified origin [air, urban air close to ground]: 0.027813 kg; source Socolof M. L. 2001; lognormal variance with pedigree 0.1607, pedigree (1,3,5,3,1)
  (same comment as for Nitrogen)
- Nickel, ion [water, surface water]: 5.9635e-8 kg; source Socolof M. L. 2001; lognormal variance with pedigree 0.6907, pedigree (1,3,5,3,1)
  (same comment as for Nitrogen)
- Cyanide [water, surface water]: 9.5313e-7 kg; source Socolof M. L. 2001; lognormal variance with pedigree 0.0807, pedigree (1,3,5,3,1)
  (same comment as for Nitrogen)
- Tetramethyl ammonium hydroxide [air, urban air close to ground]: 0.16745 kg; source Socolof M. L. 2001; lognormal variance with pedigree 0.1607, pedigree (1,3,5,3,1)
  (same comment as for Nitrogen)
- Diethylene glycol [air, urban air close to ground]: 2.5234e-5 kg; source Socolof M. L. 2001; lognormal variance with pedigree 0.1607, pedigree (1,3,5,3,1)
  (same comment as for Nitrogen)
- Phenol [water, surface water]: 5.9635e-8 kg; source Socolof M. L. 2001; lognormal variance with pedigree 0.3407, pedigree (1,3,5,3,1)
  (same comment as for Nitrogen)
- Chromium VI [water, surface water]: 5.9635e-8 kg; source Socolof M. L. 2001; lognormal variance with pedigree 0.6907, pedigree (1,3,5,3,1)
  (same comment as for Nitrogen)
- Iron, ion [water, surface water]: 6.849e-7 kg; source Socolof M. L. 2001; lognormal variance with pedigree 0.6907, pedigree (1,3,5,3,1)
  (same comment as for Nitrogen)
- Cadmium, ion [water, surface water]: 2.9688e-8 kg; source Socolof M. L. 2001; lognormal variance with pedigree 0.6907, pedigree (1,3,5,3,1)
  (same comment as for Nitrogen)
- Sodium tetrahydridoborate [air, urban air close to ground]: 0.0046354 kg; source Socolof M. L. 2001; lognormal variance with pedigree 0.1607, pedigree (1,3,5,3,1)
  (same comment as for Nitrogen)
- Phosphorus [water, surface water]: 0.0011224 kg; source Socolof M. L. 2001; lognormal variance with pedigree 0.0807, pedigree (1,3,5,3,1)
  (same comment as for Nitrogen)
- Antimony [water, surface water]: 2.9688e-8 kg; source Socolof M. L. 2001; lognormal variance with pedigree 0.0807, pedigree (1,3,5,3,1)
  (same comment as for Nitrogen)
- DOC, Dissolved Organic Carbon [water, surface water]: 0.000258489 kg; source Socolof M. L. 2001; lognormal variance with pedigree 0.0807, pedigree (1,3,5,3,1)
  Calculated Value, as equal to TOC.
  Uncertainty: data from an US-EPA LCA study
- Boron [water, surface water]: 1.1927e-6 kg; source Socolof M. L. 2001; lognormal variance with pedigree 0.0807, pedigree (1,3,5,3,1)
  (same comment as for Nitrogen)
- Fluoride [water, surface water]: 0.0033333 kg; source Socolof M. L. 2001; lognormal variance with pedigree 0.0807, pedigree (1,3,5,3,1)
  (same comment as for Nitrogen)
- Boric acid [air, urban air close to ground]: 3.5677e-7 kg; source Socolof M. L. 2001; lognormal variance with pedigree 0.1607, pedigree (1,3,5,3,1)
  (same comment as for Nitrogen)
- COD, Chemical Oxygen Demand [water, surface water]: 0.00069792 kg; source Socolof M. L. 2001; lognormal variance with pedigree 0.0807, pedigree (1,3,5,3,1)
  (same comment as for Nitrogen)
- Nitrogen oxides [air, urban air close to ground]: 7.0052e-5 kg; source Socolof M. L. 2001; lognormal variance with pedigree 0.0807, pedigree (1,3,5,3,1)
  (same comment as for Nitrogen)
- Sulfur hexafluoride [air, urban air close to ground]: 2.7924e-5 kg; source Socolof M. L. 2001; lognormal variance with pedigree 0.2426, pedigree (3,3,5,1,4)
  Estimation, based on literature. A 50:50 split between module assembly and monitor assembly is used.
  Uncertainty: tier 2b default emission factor according to IPCC guidelines
- Phosphate [water, surface water]: 5.9635e-8 kg; source Socolof M. L. 2001; lognormal variance with pedigree 0.0807, pedigree (1,3,5,3,1)
  (same comment as for Nitrogen)
- Phosphine [air, urban air close to ground]: 0.016302 kg; source Socolof M. L. 2001; lognormal variance with pedigree 0.0807, pedigree (1,3,5,3,1)
  (same comment as for Nitrogen)
- Nitrogen fluoride [air, urban air close to ground]: 6.9821e-6 kg; source Socolof M. L. 2001; lognormal variance with pedigree 0.1626, pedigree (3,3,5,1,4)
  (same comment as for Sulfur hexafluoride)
- Manganese [water, surface water]: 5.9635e-8 kg; source Socolof M. L. 2001; lognormal variance with pedigree 0.6907, pedigree (1,3,5,3,1)
  (same comment as for Nitrogen)
- Oils, unspecified [water, surface water]: 5.2604e-5 kg; source Socolof M. L. 2001; lognormal variance with pedigree 0.3407, pedigree (1,3,5,3,1)
  (same comment as for Nitrogen)
- Acetic acid [air, urban air close to ground]: 0.00035417 kg; source Socolof M. L. 2001; lognormal variance with pedigree 0.1607, pedigree (1,3,5,3,1)
  (same comment as for Nitrogen)
- Mercury [water, surface water]: 2.5234e-8 kg; source Socolof M. L. 2001; lognormal variance with pedigree 0.6907, pedigree (1,3,5,3,1)
  (same comment as for Nitrogen)
- Chromium, ion [water, surface water]: 2.3021e-6 kg; source Socolof M. L. 2001; lognormal variance with pedigree 0.6907, pedigree (1,3,5,3,1)
  (same comment as for Nitrogen)

## Sampling procedure
literature & own estimations

## Extrapolations
This dataset has been extrapolated from year 2001 to the year of the calculation (2021). The uncertainty has been adjusted accordingly.

## Review by Jürgen Sutter 2010-03-16
passed.

## Review by Roland Hischier 2011-09-22
Transfer of Documentation done.
