# carton board box production service, with gravure printing

Dataset: EcoSpold 2, unit process
Geography: CH
Time period: 1993-01-01 to 2021-12-31
Technology level: current
Classification: ISIC rev.4 ecoinvent: 1702:Manufacture of corrugated paper and paperboard and of containers of paper a
Classification: EcoSpold01Categories: paper & cardboard/cardboard & corrugated board
Tags: ConvertedDataset
Scenario: Business-as-Usual
System model: Allocation, cut-off by classification
Generated by: Roland Hischier
Published in: Hischier R. 2007
Database: ecoinvent
isCopyrightProtected: true
accessRestrictedTo: 1

## General comment
The input of cartonboard is not included into this module allowing the user to establish its own cartonboard boxes. Per kg of used cartonboard, 0.80 kg of this module are needed.
[This dataset was already contained in the ecoinvent database version 2. It was not individually updated during the transfer to ecoinvent version 3. Life Cycle Impact Assessment results may still have changed, as they are affected by changes in the supply chain, i.e. in other datasets. This dataset was generated following the ecoinvent quality guidelines for version 2. It may have been subject to central changes described in the ecoinvent version 3 change report (http://www.ecoinvent.org/database/ecoinvent-version-3/reports-of-changes/), and the results of the central updates were reviewed extensively. The changes added e.g. consistent water flows and other information throughout the database. The documentation of this dataset can be found in the ecoinvent reports of version 2, which are still available via the ecoinvent website. The change report linked above covers all central changes that were made during the conversion process.]

## Included activities end
This module includes the production of boxes out of cartonboard. It contains the steps of cutting, folding and printing with a gravure machine and therefore inks and glues are considered as well as the electricity consumption.

## Geography
Data from one modern Swiss plant

## Technology
Data of the used technology within the examined Swiss production plant

## Parameters
- fraction, process water, to air: 0.15 dimensionless; name fraction_PW_to_air; lognormal variance with pedigree 0.092025, pedigree (4,4,3,2,4)
  Literature value. In case when no industry/process specific data are available, default evaporation fraction value is used. This value is 15% and is based on literature (Statistics Canada, 2007 & Shaffer, K.H., 2008, Consumptive water use in the Great Lakes Basin, USGS & Shiklomanov, 2003, World Water Resources at the Beginning of the 21st Century) and has been approved by an expert.

## Reference product
- carton board box production, with gravure printing: 1 kg; CPC 32153: Cartons, boxes, cases, record sleeves and other packing containers (except bags) of paper, paperboard, cellulo[…]; By-product classification allocatable product
  EcoSpold01Location=CH
  production volume 0.0336675 kg
    This is a placeholder value that does not reflect real-world production volumes. This dataset does not currently require a real-world production volume to work in the database framework, and no actual data were collected yet. This has no negative effect on the results of the ecoinvent database. The placeholder value of this activity was scaled according to the nominal GDP of 2005 (source: United Nations, http://data.un.org/Glossary.aspx?q=GDP+%28current+US%24%29, accessed 20130726) to reflect an appropriate share of the global production volume, which is also a placeholder value.
  properties: price 0.85 EUR2005

## Inputs from technosphere
- solvent, organic: 0.0311 kg; lognormal variance with pedigree 0.0507, pedigree (1,3,5,3,1)
  Average from 1 Swiss producer
  EcoSpold01Location=GLO
  Uncertainty: average from 1 Swiss producer
  properties: carbon content, fossil 0.63072, heating value, net 19.11 MJ, dry mass 1 kg, wet mass 1 kg
  note on carbon content, fossil: Mixture of 15 of the most often used solvents (list in ecoinvent v2.2 report 11-III, pg 293). C content was calculated as an unweighted average of C content of the different solvents
- printing ink, offset, without solvent, in 47.5% solution state: 0.0349 kg; lognormal variance with pedigree 0.0507, pedigree (1,3,5,3,1)
  Average from 1 Swiss producer
  EcoSpold01Location=RER
  Uncertainty: average from 1 Swiss producer
  properties: wet mass 1 kg, carbon content, fossil 0.455266, heating value, net 20.51 MJ, dry mass 1 kg, carbon content, non-fossil 0.221773
  note on carbon content, fossil: C content was calculated as an addition of C content in the raw materials.
- electricity, medium voltage: 0.64 kWh; lognormal variance with pedigree 0.0507, pedigree (1,3,5,3,1)
  EcoSpold01Location=CH
  Average from 1 Swiss producer
  Uncertainty: average from 1 Swiss producer
- packaging box factory: 1.43e-9 unit; lognormal variance with pedigree 0.448, pedigree (4,5,5,5,5)
  Own assumption
  EcoSpold01Location=RER
  Uncertainty: own assumption
- heat, district or industrial, natural gas: 0.0013775 MJ; lognormal variance with pedigree 0.0507, pedigree (1,3,5,3,1)
  (same comment as for printing ink, offset, without solvent, in 47.5% solution state)
  properties: heating value, net 1 MJ
- heat, district or industrial, other than natural gas: 0.4655 MJ; lognormal variance with pedigree 0.0507, pedigree (1,3,5,3,1)
  EcoSpold01Location=RER
  Average from 1 Swiss producer
  Uncertainty: average from 1 Swiss producer
  properties: heating value, net 1 MJ
- hazardous waste, for underground deposit: -1.2e-5 kg; lognormal variance with pedigree 0.0507, pedigree (1,3,5,3,1)
  EcoSpold01Location=DE
  Average from 1 Swiss producer
  Uncertainty: average from 1 Swiss producer
  production volume 1.2e-5 kg
    Calculated from the production volume of carton board box production, with gravure printing in proportion to the respective output amounts.
  properties: dry mass 1 kg, carbon content, fossil 0.554667, wet mass 1 kg
  note on carbon content, fossil: Tab A.6, ecoinvent v2.2 report 13_I, average hazardous waste composition was used, and referred to 0% water mass. No waste-specific emission are currently inventoried for underground deposits. Accordingly, no waste composition must be specified. For generic, average waste to underground deposit deposition in a 200 liter steel drum without cement solidification is assumed (ecoinvent v2.2 report 13_I).
- municipal solid waste: -0.0517 kg; lognormal variance with pedigree 0.0507, pedigree (1,3,5,3,1)
  Average from 1 Swiss producer
  EcoSpold01Location=CH
  Uncertainty: average from 1 Swiss producer
  production volume 0.0517 kg
    (same comment as for hazardous waste, for underground deposit)
  properties: carbon content, fossil 0.171549, water content 0.297017, dry mass 0.771 kg, carbon content, non-fossil 0.194173, heating value, net 11.74 MJ, wet mass 1 kg
  note on carbon content, fossil: MSW composition in tab 4.1, ecoinvent v2.2 report 13_I. C content referred to 1 kg DM
  note on heating value, net: Value taken from the general comment of the treatment dataset.

## Inputs from nature
- Water, unspecified natural origin [natural resource, in water]: 0.00011 m3; name water_UNO_input; lognormal variance with pedigree 0.0507, pedigree (1,3,5,3,1)
  Average from 1 Swiss producer
  Uncertainty: average from 1 Swiss producer

## Emissions to nature
- Chromium, ion [water, surface water]: 1.85e-5 kg; lognormal variance with pedigree 0.0907, pedigree (1,3,5,3,1)
  Average from 1 Swiss producer
  Uncertainty: average from 1 Swiss producer
- Ammonia [air, urban air close to ground]: 4e-7 kg; lognormal variance with pedigree 0.0907, pedigree (1,3,5,3,1)
  Average from 1 Swiss producer
  Uncertainty: average from 1 Swiss producer
- COD, Chemical Oxygen Demand [water, surface water]: 0.000135 kg; lognormal variance with pedigree 0.0907, pedigree (1,3,5,3,1)
  Calculated as COD (g O2) = 2.7*TOC (gC).
  Uncertainty: average from 1 Swiss producer
- Water [water, unspecified]: 9.35e-5 m3; name water_to_water_unspecified; = water_UNO_input*(1-fraction_PW_to_air); lognormal variance with pedigree 0.0807, pedigree (2,2,5,1,1)
  Calculated value based on literature values and expert opinion. See comments in the parametres' comment field.
  property carbon content, fossil 0; name C_content_fossil
  property wet mass 1000 kg; name WM
  property fraction, origin: unspecified 1; name fraction_origin_unspecified_Ww
  property dry mass 0 kg; name DM
  property water in wet mass 1000 kg; name WWM
  property fraction, origin: fresh water 0; name fraction_origin_fresh_water_Ww
  property carbon content, non-fossil 0; name C_content_non_fossil
  property fraction, origin: salt water 0; name fraction_origin_salt_water_Ww
- BOD5, Biological Oxygen Demand [water, surface water]: 0.00027 kg; lognormal variance with pedigree 0.0907, pedigree (1,3,5,3,1)
  Calculated as 0.5*COD.
  Uncertainty: average from 1 Swiss producer
- Lead [water, surface water]: 1.2e-5 kg; lognormal variance with pedigree 0.0907, pedigree (1,3,5,3,1)
  Average from 1 Swiss producer
  Uncertainty: average from 1 Swiss producer
- DOC, Dissolved Organic Carbon [water, surface water]: 5e-5 kg; lognormal variance with pedigree 0.0907, pedigree (1,3,5,3,1)
  Calculated as equal to TOC.
  Uncertainty: average from 1 Swiss producer
- Nickel, ion [water, surface water]: 1.85e-5 kg; lognormal variance with pedigree 0.0907, pedigree (1,3,5,3,1)
  Average from 1 Swiss producer
  Uncertainty: average from 1 Swiss producer
- Water [air, unspecified]: 1.65e-5 m3; name water_to_air_unspecified; = (water_UNO_input*fraction_PW_to_air); lognormal variance with pedigree 0.0807, pedigree (2,2,5,1,1)
  (same comment as for Water)
  property fraction, origin: fresh water 0; name fraction_origin_fresh_water
  property fraction, origin: unspecified 1; name fraction_origin_unspecified
  property fraction, origin: salt water 0; name fraction_origin_salt_water
- TOC, Total Organic Carbon [water, surface water]: 5e-5 kg; lognormal variance with pedigree 0.0907, pedigree (1,3,5,3,1)
  Average from 1 Swiss producer
  Uncertainty: average from 1 Swiss producer

## Extrapolations
This dataset has been extrapolated from year 1993 to the year of the calculation (2021). The uncertainty has been adjusted accordingly.

## Review by Hans-Jörg Althaus 2003-08-26
Passed
