# ethylene glycol production

Dataset: EcoSpold 2, unit process
Geography: RER
Time period: 1997-01-01 to 2021-12-31
Technology level: current
Classification: ISIC rev.4 ecoinvent: 2011:Manufacture of basic chemicals
Classification: EcoSpold01Categories: chemicals/organics
Synonyms: monoethylene glycol; ethylene alcohol; 2-hydroxyethanol
Tags: combined production
Scenario: Business-as-Usual
System model: Allocation, cut-off by classification
Generated by: Mike Chudacoff
Published in: Althaus H.-J. 2007
Database: ecoinvent
isCopyrightProtected: true
accessRestrictedTo: 1

## General comment
This Multi-Output inventory is based on literature sources that are based on actual plant throughputs and measurements. The oxidation of ethylene oxide leads to the production of 1 kg of three coproducts: ethylene glycol, diethylene glycol (DEG) and triethylene glycol (TEG). Raw materials, energy consumption and emissions are modelled with literature data. Infrastructure is included with a default value.

## Included activities start
From the reception of ethylene oxide at the factory gate.

## Included activities end
This activity ends with the production of diethylene glycol, triethylene glycol and ethylene glycol, 100% at the factory gate. The dataset includes the input materials, energy uses, infrastructure and emissions.

## Geography
RER

## Technology
Ethylene is directly oxidized with air or oxygen in the presence of a catalyst to ethylene oxide (EO). The ethylene oxide is subsequently treated with water (hydrolyzed) and forms a variety of glycols, most notably mono ethylene glycol (MEG), di ethylene glycols (DEG) and tri ethylene glycols (TEG). About 40% of all European EO production is converted into glycols, globally the figure is about 70%. Usually, EO and MEG are produced together at integrated plants.
An ethylene oxide / water mixture is heated up to 190 - 200°C and pressurized to 14-22 bar. About 70 – 95% of the mixture consists of MEG, the rest primarily consisting of DEG and TEG. A yield for MEG of 67% is obtained. Poly-ethylene glycols are also formed, but can be controlled by using an excess of water. The usual configuration for glycols production is an integrated EO / EG plant.
Glycol products typically consist of 70 – 95% w/w of MEG, the primary co-product being DEG, some of which can further react to TEG. All of the EO feed is converted into MEG, DEG TEG as well as some heavy glycols, which may however be incinerated. 2 – 100 kg heavy glycols / ton EO can be produced.
C2H4 + 1/2 O2  C2H4O (1)
C2H4 O + H2O  HO-C2H4-OH (2)
HO-C2 H4-OH + C2H4O  HO- C2H4-O- C2H4-OH (3)
HO-C2 H4-O-C2H4-OH + C2H4O  HO- C2H4-O-C2H4-O-C2H4-OH (4)
(1) production of ethylene oxide
(2) production of MEG from EO and water
(3) production of DEG from EO and MEG
(4) production of TEG from EO and DEG

The water-glycol mixture is fed to multiple evaporators, where water is recovered and recycled. The water-free glycol mixture is separated by fractional distillation. Acids (e.g. 1% sulfuric acid) catalyse the hydration reaction and allow lower temperatures to be used
Based on the available figures for ethylene oxide production, it can be assumed that approximately 5 million tons of ethylene oxide were converted to glycols in Europe and the U.S. in 1997 (7 million tons of glycols based on the ration of molecular weights of MEG to EO). Further production capacity of at least 1.2 million tons is reported from Saudi Arabia, Kuwait and South Korea, giving a total of ca. 8.5 million tons of ethylene glycols production worldwide.
References:
IPPC Chemicals 2002. European Commission, Directorate General, Joint Research Center, “Reference Document on Best Available Techniques in the Large Volume Organic Chemical Industry”, February 2002

Wells 1999. G. Margaret Wells, “Handbook of Petrochemicals and Processes”, 2nd edition, Ashgate, 1999

## Parameters
- sum_of_the_reference_products: 0.965 dimensionless; lognormal variance with pedigree 0.0006, pedigree (1,1,1,1,1)
  Calculated value; sum of the reference products.
- efficiency: 1 dimensionless; name yield; lognormal variance with pedigree 0.0167, pedigree (4,2,4,1,1)
  Calculated value based on literature (IPPC, 2002). Output relative to input (requires additional specification).
- ethylene_oxide_input: 0.703703 kg; name ethylene_oxide_input_P; lognormal variance with pedigree 0.0006, pedigree (1,1,1,1,1)
  Calculated value. The amount of ethylene oxide on the input needed for production of 0.825 kg ethylene glycol, 0.1 kg diethylene glycol and 0.04 kg triethylene glycol produced in the multi-output activity.

## Reference product
- triethylene glycol: 0 kg; name triethylene_glycol_RP; source IPPC 2002; By-product classification allocatable product; CPC 34170: Ethers, alcohol peroxides, ether peroxides, epoxides, acetals and hemiacetals, and their halogenated, sulphona[…]; CAS 112-27-6
  Literature value.
  production volume 0 kg
    Unknown
    Calculated from output of monoethylene glycol (40/825). This makes up approximately half of the demand for triethylene glycol (the dedicated production route for triethylene glycol is the reaction of diethylene glycol with ethylene oxide).
  property dry mass 1 kg; name DM
  property wet mass 1 kg; name WM
  property water in wet mass 0 kg; name WWM
  property carbon content, fossil 0.479881; name C_content_fossil
  property water content 0; name water_content
  property heating value, net 25.84 MJ
    LHV is calculated based on the elemental composition of the substance. Based on the CAS number of the substance (000112-27-6), the chemical formula of the substance is found to be: C6H14O4, (PubChem 2020).
    Reference: Kim, S., Chen, J., Cheng, T., Gindulyte, A., He, J., He, S., Li, Q., Shoemaker, B. A., Thiessen, P. A., Yu, B., Zaslavsky, L., Zhang, J., & Bolton, E. E. (2019). PubChem 2019 update: improved access to chemical data. Nucleic acids research, 47(D1), D1102–D1109. https://doi.org/10.1093/nar/gky1033
  property price 0.601 EUR2005; name triethylene_glycol_RP_price_EUR2005
    Temporary price data. Calculated as 90% of purchasers price based on: Price for diethylene glycol applied, as price ranges do not differ significantly (http://www.icis.com/Articles/2005/12/22/629649/chemical-profile-triethylene-glycol-teg.html and http://www.icis.com/Articles/2007/11/19/9079180/Chemical-profile-Diethylene-Glycol.html accessed 2011.01.24)
  property carbon content, non-fossil 0; name C_content_non_fossil
  property carbon content 0.479881
    carbon content on a dry matter basis (reserved; not for manual entry)
  properties: carbon allocation 0.479881 kg
- diethylene glycol: 1 kg; name diethylene_glycol_RP; source IPPC 2002; CPC 34170: Ethers, alcohol peroxides, ether peroxides, epoxides, acetals and hemiacetals, and their halogenated, sulphona[…]; By-product classification allocatable product; CAS 111-46-6
  Literature value.
  production volume 2.61333e8 kg
    Unknown
    Calculated from output of monoethylene glycol (100/825)
  property price 0.601 EUR2005; name diethylene_glycol_RP_price_EUR2005
    Temporary price data. Calculated as 90% of purchasers price based on: 2004 prices for Import/Export data for world-leading producing country (US$ and tonnes) from UN Commodity Trade Statistics Database (http://data.un.org/Explorer.aspxDatabase [Accessed 2 July 2010]). Commodity: 2,2'-oxydiethanol(diethylene glycol)
  property calculation property, kg 0.825 kg; name diethylene_glycol_RP_calc_prop_kg
    A generic property to be defined individually in each dataset. For use in mathematical relations.
  property heating value, net 25.14 MJ
    LHV is calculated based on the elemental composition of the substance. Based on the CAS number of the substance (000111-46-6), the chemical formula of the substance is found to be: C4H10O3, (PubChem 2020).
    Reference: Kim, S., Chen, J., Cheng, T., Gindulyte, A., He, J., He, S., Li, Q., Shoemaker, B. A., Thiessen, P. A., Yu, B., Zaslavsky, L., Zhang, J., & Bolton, E. E. (2019). PubChem 2019 update: improved access to chemical data. Nucleic acids research, 47(D1), D1102–D1109. https://doi.org/10.1093/nar/gky1033
  property carbon content 0.45283
    carbon content on a dry matter basis (reserved; not for manual entry)
  properties: dry mass 1 kg, carbon content, fossil 0.45283, water content 0, carbon content, non-fossil 0, wet mass 1 kg, water in wet mass 0 kg, carbon allocation 0.45283 kg
- ethylene glycol: 0 kg; name ethylene_glycol_RP; source IPPC 2002; CPC 34170: Ethers, alcohol peroxides, ether peroxides, epoxides, acetals and hemiacetals, and their halogenated, sulphona[…]; By-product classification allocatable product; CAS 107-21-1
  Monoethylene glycol (MEG, C2H6O2) is a hydrocarbon compound with two hydroxy (alcohol) groups. It is a clear colourless liquid with a freezing point of - 12.6 °C and a boiling point of 197.3 °C. It is a stable, non-corrosive liquid. This chemical is very hygroscopic (will take up water) and reacts strongly with ethers and oxidizing agents. Ethylene glycol is classified as harmful by the EC Hazardous Substances directive. It is soluble in water, ethyl alcohol and ethers.
  There is a broad range of applications for ethylene glycol. Over half of the glycol is used for the production of polyester fibres, while PET production accounts for another fifth. When combined with corrosion inhibitors, it is used as antifreeze in automobiles, pumps and industrial heating and cooling equipment. Films and resins consume another 10% of ethylene glycol production. Other applications are as a humectant (moisture absorbing agent), as a plasticizer and as a softening agent.
  DEG is used in the fibre industry and as a tobacco humectant while TEG is used in the manufacture of celllophane for food packaging.
  Additional sources:
  Wells 1999. G. Margaret Wells, "Handbook of Petrochemicals and Processes", 2nd edition, Ashgate, 1999
  EcoSpold01Location=RER
  production volume 0 kg
    Unknown
    European production capacity is 11% of global production capacity (Al-AhmedRiyah A. (2001). Ethylene glycol - A global perspective. http://www.sabic.com/asia/en/newsandmediarelations/speeches/20010327.aspx). Calculated at 90% capacity utilisation.
  property price 0.642 EUR2005; name ethylene_glycol_RP_price_EUR2005
    Temporary price data. Calculated as 90% of purchasers price based on: 2004 prices for Import/Export data for world-leading producing country (US$ and tonnes) from UN Commodity Trade Statistics Database (http://data.un.org/Explorer.aspxDatabase [Accessed 2 July 2010]). Commodity: Ethylene glycol (ethanediol)
  property water content 0; name ethylene_glycol_RP_water_content
  property carbon content, fossil 0.387097; name ethylene_glycol_RP_C_content_fossil
    fossil carbon content on a dry matter basis
  property dry mass 1 kg; name ethylene_glycol_RP_DM
  property wet mass 1 kg; name ethylene_glycol_RP_WM
  property carbon content, non-fossil 0; name ethylene_glycol_R_C_content_non_fossil_0
    biogene carbon content on a dry matter basis
  property water in wet mass 0 kg; name ethylene_glycol_RP_WWM
  property heating value, net 23.44 MJ
    LHV is calculated based on the elemental composition of the substance. Based on the CAS number of the substance (000107-21-1), the chemical formula of the substance is found to be: C2H6O2, (PubChem 2020).
    Reference: Kim, S., Chen, J., Cheng, T., Gindulyte, A., He, J., He, S., Li, Q., Shoemaker, B. A., Thiessen, P. A., Yu, B., Zaslavsky, L., Zhang, J., & Bolton, E. E. (2019). PubChem 2019 update: improved access to chemical data. Nucleic acids research, 47(D1), D1102–D1109. https://doi.org/10.1093/nar/gky1033
  property carbon content 0.387097
    carbon content on a dry matter basis (reserved; not for manual entry)
  properties: carbon allocation 0.387097 kg

## Inputs from technosphere
- chemical factory, organics: 4.14508e-10 unit; = ((4e-10*ethylene_glycol_RP)/sum_of_the_reference_products)+((4e-10* triethylene_glycol_RP)/sum_of_the_reference_products)+((4e-10* diethylene_glycol_RP)/sum_of_the_reference_products); source Gendorf 2000; lognormal variance with pedigree 0.050725, pedigree (2,2,5,2,1)
  EcoSpold01Location=RER
  Estimation. Data was estimated based on the dataset "chemical plant, organics". This module assumes a built area of about 4.2 ha, an average output of 50'000 t/a, and plant life of fifty years.
  Uncertainty: infrastructure
- ethylene oxide: 0.830189 kg; name ethylene_oxide_input; = ((3*44*1/yield)/150*triethylene_glycol_RP)+((2*44*1/yield)/106*diethylene_glycol_RP)+((44*1/yield)/62*ethylene_glycol_RP); source IPPC 2002; lognormal variance with pedigree 0.050725, pedigree (2,2,5,2,1)
  EcoSpold01Location=RER
  Literature value.
  44 g/mol is a molecular weight of ethylene oxide (C2H4O).
  62 g/mol is a molecular weight of ethylen glycol (C2H6O2).
  106 g/mol is a molecular weight of diethylene glycol (C4H10O3).
  150 g/mol is a molecular weight of triethylene glycol (C6H14O4).
  Uncertainty: precursor
  properties: carbon content, fossil 0.545455, dry mass 1 kg, wet mass 1 kg, heating value, net 27.53 MJ
- electricity, medium voltage: 0.390674 kWh; = ((0.377*ethylene_glycol_RP)/sum_of_the_reference_products)+((0.377* triethylene_glycol_RP)/sum_of_the_reference_products)+((0.377* diethylene_glycol_RP)/sum_of_the_reference_products); source IPPC 2002; lognormal variance with pedigree 0.050725, pedigree (2,2,5,2,1)
  EcoSpold01Location=UCTE
  Estimation. The EO/EG process is both a consumer and a producer of energy. The EO section is typically a steam producer, the glycols section uses heat for dewatering. Catalyst selectivity and the relative size of the EO and EG parts determine if a plant is a net energy producer or importer.
  It must be assumed that some steam is utilized for glycol distillation.
  Uncertainty: power usage

## Inputs from nature
- Water, unspecified natural origin [natural resource, in water]: 0.00621762 m3; = ((0.006*ethylene_glycol_RP)/sum_of_the_reference_products)+((0.006* triethylene_glycol_RP)/sum_of_the_reference_products)+((0.006* diethylene_glycol_RP)/sum_of_the_reference_products); source IPPC 2002; lognormal variance with pedigree 0.208, pedigree (5,5,5,1,4)
  Estimation.
  Uncertainty: estimated with data from a large chem. plant

## Emissions to nature
All rows: source IPPC 2002; lognormal variance with pedigree 0.050725, pedigree (2,2,5,2,1)
- BOD5, Biological Oxygen Demand [water, surface water]: 0.000339294 kg; = (((0.0002876/ethylene_oxide_input_P)*3*44*1/yield)/150*triethylene_glycol_RP)+(((0.0002876/ethylene_oxide_input_P)*2*44*1/yield)/106*diethylene_glycol_RP)+(((0.0002876/ethylene_oxide_input_P)*44*1/yield)/62*ethylene_glycol_RP)
  Literature value.
  44 g/mol is a molecular weight of ethylene oxide (C2H4O).
  62 g/mol is a molecular weight of ethylen glycol (C2H6O2).
  106 g/mol is a molecular weight of diethylene glycol (C4H10O3).
  150 g/mol is a molecular weight of triethylene glycol (C6H14O4).
  0.0002876 kg is the amount of emissions of BOD based on literature.
  Uncertainty: emission
- DOC, Dissolved Organic Carbon [water, surface water]: 8.84454e-5 kg; = (((0.00007497/ethylene_oxide_input_P)*3*44*1/yield)/150*triethylene_glycol_RP)+(((0.00007497/ethylene_oxide_input_P)*2*44*1/yield)/106*diethylene_glycol_RP)+(((0.00007497/ethylene_oxide_input_P)*44*1/yield)/62*ethylene_glycol_RP)
  Literature value.
  44 g/mol is a molecular weight of ethylene oxide (C2H4O).
  62 g/mol is a molecular weight of ethylen glycol (C2H6O2).
  106 g/mol is a molecular weight of diethylene glycol (C4H10O3).
  150 g/mol is a molecular weight of triethylene glycol (C6H14O4).
  7.49E-05 kg is the amount of emissions of DOC based on literature.
  Uncertainty: emission
- TOC, Total Organic Carbon [water, surface water]: 8.84454e-5 kg; = (((0.00007497/ethylene_oxide_input_P)*3*44*1/yield)/150*triethylene_glycol_RP)+(((0.00007497/ethylene_oxide_input_P)*2*44*1/yield)/106*diethylene_glycol_RP)+(((0.00007497/ethylene_oxide_input_P)*44*1/yield)/62*ethylene_glycol_RP)
  Literature value. The reduction efficiency for TOC of the wastewater treatment plant is 60-70%,
  44 g/mol is a molecular weight of ethylene oxide (C2H4O).
  62 g/mol is a molecular weight of ethylen glycol (C2H6O2).
  106 g/mol is a molecular weight of diethylene glycol (C4H10O3).
  150 g/mol is a molecular weight of triethylene glycol (C6H14O4).
  7.49E-05 kg is the amount of emissions of TOC based on literature.
  Uncertainty: emission
- Ethene [air, urban air close to ground]: 7.07846e-6 kg; = (((6E-06/ethylene_oxide_input_P)*3*44*1/yield)/150*triethylene_glycol_RP)+(((6E-06/ethylene_oxide_input_P)*2*44*1/yield)/106*diethylene_glycol_RP)+(((6E-06/ethylene_oxide_input_P)*44*1/yield)/62*ethylene_glycol_RP)
  Literature value.
  44 g/mol is a molecular weight of ethylene oxide (C2H4O).
  62 g/mol is a molecular weight of ethylen glycol (C2H6O2).
  106 g/mol is a molecular weight of diethylene glycol (C4H10O3).
  150 g/mol is a molecular weight of triethylene glycol (C6H14O4).
  6E-06 kg is the amount of emissions of ethene based on literature.
  Uncertainty: emission
- COD, Chemical Oxygen Demand [water, surface water]: 0.000339294 kg; = (((0.0002876/ethylene_oxide_input_P)*3*44*1/yield)/150*triethylene_glycol_RP)+(((0.0002876/ethylene_oxide_input_P)*2*44*1/yield)/106*diethylene_glycol_RP)+(((0.0002876/ethylene_oxide_input_P)*44*1/yield)/62*ethylene_glycol_RP)
  (same comment as for BOD5, Biological Oxygen Demand)
- Acetaldehyde [air, urban air close to ground]: 1.65164e-6 kg; = (((1.4E-06/ethylene_oxide_input_P)*3*44*1/yield)/150*triethylene_glycol_RP)+(((1.4E-06/ethylene_oxide_input_P)*2*44*1/yield)/106*diethylene_glycol_RP)+(((1.4E-06/ethylene_oxide_input_P)*44*1/yield)/62*ethylene_glycol_RP)
  Literature value.
  44 g/mol is a molecular weight of ethylene oxide (C2H4O).
  62 g/mol is a molecular weight of ethylen glycol (C2H6O2).
  106 g/mol is a molecular weight of diethylene glycol (C4H10O3).
  150 g/mol is a molecular weight of triethylene glycol (C6H14O4).
  1.4E-06 kg is the amount of emissions of acetaldehyde based on literature.
  Uncertainty: emission

## Review by Emilia Moreno Ruiz 2012-05-11
trainee dataset, ok, Helen Hamilton

## Review by Heiko Kunst 2010-02-24
passed.
