# heat production, wood pellet, at furnace 25kW, state-of-the-art 2014

Dataset: EcoSpold 2, unit process
Geography: CH
Time period: 2014-01-01 to 2021-12-31
Technology level: modern
Classification: ISIC rev.4 ecoinvent: 3530:Steam and air conditioning supply
Classification: EcoSpold01Categories: wood energy/heating systems
Scenario: Business-as-Usual
System model: Allocation, cut-off by classification
Share of production covered: 100 %
Generated by: Christian Bauer
Published in: Bauer, C. 2007
Database: ecoinvent
isCopyrightProtected: true
accessRestrictedTo: 1

## General comment
Activity represents combustion of wood pellets in new (=installed in 2014) wood pellet furnaces in Switzerland. The inventory shall be considered valid for boilers with nominal capacities in the approximate range of 20 to 100 kW. The activity represents average annual operation including start/stop (warm up and cool down), which reduces the efficiency compared to rated values provided by boiler manufacturers and increases some emission factors such as CO. Air emission factors as well as other exchanges correspond to v2.2 except of PM, CO, NOx, CH4 and NMVOC. These key emission factors were updated based on latest available information.

## Included activities start
From reception of wood pellets.

## Included activities end
This activity describes the combustion of wood pellets until heat production at the boiler outlet. Included are the infrastructure, the wood requirements (average pellets, u=10%), the emissions to air, the electricity needed for operation, and the disposal of the ashes.

## Geography
valid for average Switzerland

## Technology
Modern boiler technology installed in CH in 2014

## Time period
Some emission data are from the second half of the 1990´s. However, key emission factors (PM, CO, NOx, CH4 and NMVOC) are updated in 2014. Activity can be considered as representative for new installations until 2020.

## Parameters
- scaling factor: 1.25 dimensionless; name scaling_factor; = 1/0.8
  the scaling factor corresponds to the inverse of the annual use efficiency. This efficiency represents an average annual value including start/stop operation (warm-up and cool down), which reduces the efficiency compared to rated values of the manufacturer. Source: Thomas Nussbaumer, Verenum, January 2014, personal communication.

## Reference product
- heat, central or small-scale, other than natural gas: 1 MJ; = 0.8* scaling_factor; source T. Nussbaumer 2014; CPC 17300: Steam and hot water; By-product classification allocatable product
  Original dataset referred to 1MJ energy input (end energy). Amount was scaled to 1 using annual use efficiency of 0.8 (according to source).
  EcoSpold01Location=CH
  production volume 7.24e8 MJ; name heat_apv; = 1810000000*0.4
    Literature value corresponding to useful energy in table F, heating device category 11b according to the source. 40% of total considered as "modern" technology corresponding to newly installed devices in this category. This fraction was estimated based on the trend in recent years: installations after 2007 (update of Swiss emission standards) are categorized as "modern".
  property price 0.0106 EUR2005
    Average European district heat price from Ecoheatcool and Euroheat 2005-2006, Ecoheat Work package 1: The European heat market. Final report. 10.6 EUR/GJ i s the price of district heat. http://www.solarthermalworld.org/files/Ecoheatcool%20WP1%20Web.pdf?download
  properties: Corresponding fuel use 1.17647 MJ, heating value, net 1 MJ

## Inputs from technosphere
- wood ash mixture, pure: -0.0002975 kg; name wood_ash; = (0.000238 * scaling_factor)*-1; source Bauer, C. 2007; lognormal variance with pedigree 0.002, pedigree (1,1,3,1,1)
  homogeneous fuel
  Amount was scaled to the amount of reference product.
  EcoSpold01Location=CH
  production volume 215390 kg; = heat_apv*wood_ash
    Calculated from the production volume of wood pellet, mixed, burned in furnace 50kW in proportion to the respective output amounts.
  property price 0 EUR2005; name wood_ash_price_EUR2005
  properties: wet mass 1 kg, dry mass 1 kg, carbon content, non-fossil 0.012
- wood pellet, measured as dry mass: 0.0667062 kg; = 0.053365 * scaling_factor; source Bauer, C. 2007; lognormal variance with pedigree 0.4707, pedigree (2,2,5,1,1)
  Literature value. Original amount (from the source, ecoinvent v2.2) was scaled to the amount of the new reference product using the annual efficiency. Corresponds to a LHV of 18.7 MJ/kg.
  EcoSpold01Location=RER
  properties: carbon content, non-fossil 0.494, heating value, net 13.38 MJ, dry mass 1 kg, wet mass 1.1 kg, water content 0.1
  note on carbon content, non-fossil: C content of dry mass is 0.494 kgC/kg dry wood (ecoinvent v2.2 report 9).
- electricity, low voltage: 0.0052125 kWh; = 0.00417 * scaling_factor; source Bauer, C. 2007; lognormal variance with pedigree 0.4707, pedigree (2,2,5,1,1)
  EcoSpold01Location=CH
  general assuption
  Amount was scaled to the amount of reference product.
- furnace, pellets, 25kW: 3.47222e-7 unit; = 1/(20*2000*25*3.6) * scaling_factor; lognormal variance with pedigree 0.4707, pedigree (2,2,5,1,1)
  Calculated value. Assuming 20 years lifetime, 2000 operational hours per year, 25kW capactiy.

## Emissions to nature
- Mercury [air, urban air close to ground]: 3.75e-10 kg; = 3E-10 * scaling_factor; source Bauer, C. 2007; lognormal variance with pedigree 0.4707, pedigree (2,2,5,1,1)
  extrapolation, based on measuring data of other emissions
  Amount was scaled to the amount of reference product.
- Arsenic [air, urban air close to ground]: 1.25e-9 kg; = 1E-09 * scaling_factor; source Bauer, C. 2007; lognormal variance with pedigree 0.4707, pedigree (2,2,5,1,1)
  (same comment as for Mercury)
- Formaldehyde [air, urban air close to ground]: 1.625e-7 kg; = 1.3E-07 * scaling_factor; source Bauer, C. 2007; lognormal variance with pedigree 0.4707, pedigree (2,2,5,1,1)
  (same comment as for Mercury)
- PAH, polycyclic aromatic hydrocarbons [air, urban air close to ground]: 1.3875e-8 kg; = 1.11E-08 * scaling_factor; source Bauer, C. 2007; lognormal variance with pedigree 0.4707, pedigree (2,2,5,1,1)
  (same comment as for Mercury)
- m-Xylene [air, urban air close to ground]: 1.5e-7 kg; = 1.2E-07 * scaling_factor; source Bauer, C. 2007; lognormal variance with pedigree 0.4707, pedigree (2,2,5,1,1)
  (same comment as for Mercury)
- Benzene, hexachloro- [air, urban air close to ground]: 9e-15 kg; = 7.2E-15 * scaling_factor; source Bauer, C. 2007; lognormal variance with pedigree 0.4707, pedigree (2,2,5,1,1)
  (same comment as for Mercury)
- Sodium [air, urban air close to ground]: 1.625e-6 kg; = 1.3E-06 * scaling_factor; source Bauer, C. 2007; lognormal variance with pedigree 0.4707, pedigree (2,2,5,1,1)
  (same comment as for Mercury)
- Magnesium [air, urban air close to ground]: 4.5e-7 kg; = 3.6E-07 * scaling_factor; source Bauer, C. 2007; lognormal variance with pedigree 0.4707, pedigree (2,2,5,1,1)
  (same comment as for Mercury)
- Potassium [air, urban air close to ground]: 2.925e-5 kg; = 2.34E-05 * scaling_factor; source Bauer, C. 2007; lognormal variance with pedigree 0.4707, pedigree (2,2,5,1,1)
  (same comment as for Mercury)
- Phenol, pentachloro- [air, urban air close to ground]: 1.0125e-11 kg; = 8.1E-12 * scaling_factor; source Bauer, C. 2007; lognormal variance with pedigree 0.4707, pedigree (2,2,5,1,1)
  (same comment as for Mercury)
- Benzene [air, urban air close to ground]: 1.1375e-6 kg; = 9.1E-07 * scaling_factor; source Bauer, C. 2007; lognormal variance with pedigree 0.4707, pedigree (2,2,5,1,1)
  (same comment as for Mercury)
- Hydrocarbons, aliphatic, unsaturated [air, urban air close to ground]: 3.875e-6 kg; = 3.1E-06 * scaling_factor; source Bauer, C. 2007; lognormal variance with pedigree 0.4707, pedigree (2,2,5,1,1)
  (same comment as for Mercury)
- Ammonia [air, urban air close to ground]: 2.1625e-6 kg; = 1.73E-06 * scaling_factor; source Bauer, C. 2007; lognormal variance with pedigree 0.4707, pedigree (2,2,5,1,1)
  (same comment as for Mercury)
- Dinitrogen monoxide [air, urban air close to ground]: 3.125e-6 kg; = 2.5E-06 * scaling_factor; source Bauer, C. 2007; lognormal variance with pedigree 0.4707, pedigree (2,2,5,1,1)
  (same comment as for Mercury)
- Cadmium [air, urban air close to ground]: 8.75e-10 kg; = 7E-10 * scaling_factor; source Bauer, C. 2007; lognormal variance with pedigree 0.4707, pedigree (2,2,5,1,1)
  (same comment as for Mercury)
- Dioxins, measured as 2,3,7,8-tetrachlorodibenzo-p-dioxin [air, urban air close to ground]: 3.875e-14 kg; = 3.1E-14 * scaling_factor; source Bauer, C. 2007; lognormal variance with pedigree 0.4707, pedigree (2,2,5,1,1)
  (same comment as for Mercury)
- Phosphorus [air, urban air close to ground]: 3.75e-7 kg; = 3E-07 * scaling_factor; source Bauer, C. 2007; lognormal variance with pedigree 0.4707, pedigree (2,2,5,1,1)
  (same comment as for Mercury)
- Carbon dioxide, non-fossil [air, urban air close to ground]: 0.120625 kg; = 0.0965 * scaling_factor; source Bauer, C. 2007; lognormal variance with pedigree 0.4707, pedigree (2,2,5,1,1)
  uncertainty of carbon content in the wood
  Amount was scaled to the amount of reference product.
- Lead [air, urban air close to ground]: 3.125e-8 kg; = 2.5E-08 * scaling_factor; source Bauer, C. 2007; lognormal variance with pedigree 0.4707, pedigree (2,2,5,1,1)
  (same comment as for Mercury)
- Toluene [air, urban air close to ground]: 3.75e-7 kg; = 3E-07 * scaling_factor; source Bauer, C. 2007; lognormal variance with pedigree 0.4707, pedigree (2,2,5,1,1)
  (same comment as for Mercury)
- NMVOC, non-methane volatile organic compounds, unspecified origin [air, urban air close to ground]: 1.1375e-5 kg; = 9.1E-06 * scaling_factor; source T. Nussbaumer 2014; lognormal variance with pedigree 0.0327, pedigree (2,2,3,1,1)
  estimation
- Chromium VI [air, urban air close to ground]: 5e-11 kg; = 4E-11 * scaling_factor; source Bauer, C. 2007; lognormal variance with pedigree 0.4707, pedigree (2,2,5,1,1)
  range of data
  Amount was scaled to the amount of reference product.
- Manganese [air, urban air close to ground]: 2.125e-7 kg; = 1.7E-07 * scaling_factor; source Bauer, C. 2007; lognormal variance with pedigree 0.4707, pedigree (2,2,5,1,1)
  (same comment as for Mercury)
- Copper [air, urban air close to ground]: 2.75e-8 kg; = 2.2E-08 * scaling_factor; source Bauer, C. 2007; lognormal variance with pedigree 0.4707, pedigree (2,2,5,1,1)
  (same comment as for Mercury)
- Water [air, urban air close to ground]: 6.67e-5 m3; lognormal variance with pedigree 0.0083, pedigree (2,2,3,1,2)
  calculated value, supposed to ensure correct water balance
- Benzo(a)pyrene [air, urban air close to ground]: 6.25e-10 kg; = 5E-10 * scaling_factor; source Bauer, C. 2007; lognormal variance with pedigree 0.4707, pedigree (2,2,5,1,1)
  (same comment as for Mercury)
- Sulfur dioxide [air, urban air close to ground]: 3.125e-6 kg; = 2.5E-06 * scaling_factor; source Bauer, C. 2007; lognormal variance with pedigree 0.4707, pedigree (2,2,5,1,1)
  (same comment as for Mercury)
- Particulates, > 2.5 um, and < 10um [air, urban air close to ground]: 1.875e-6 kg; = 1.5E-06 * scaling_factor; source T. Nussbaumer 2014; lognormal variance with pedigree 0.0327, pedigree (2,2,3,1,1)
  estimation
- Zinc [air, urban air close to ground]: 3.75e-7 kg; = 3E-07 * scaling_factor; source Bauer, C. 2007; lognormal variance with pedigree 0.4707, pedigree (2,2,5,1,1)
  (same comment as for Mercury)
- Chromium [air, urban air close to ground]: 4.95e-9 kg; = 3.96E-09 * scaling_factor; source Bauer, C. 2007; lognormal variance with pedigree 0.4707, pedigree (2,2,5,1,1)
  (same comment as for Mercury)
- Chlorine [air, urban air close to ground]: 2.25e-7 kg; = 1.8E-07 * scaling_factor; source Bauer, C. 2007; lognormal variance with pedigree 0.4707, pedigree (2,2,5,1,1)
  (same comment as for Mercury)
- Hydrocarbons, aliphatic, alkanes, unspecified [air, urban air close to ground]: 1.1375e-6 kg; = 9.1E-07 * scaling_factor; source Bauer, C. 2007; lognormal variance with pedigree 0.4707, pedigree (2,2,5,1,1)
  (same comment as for Mercury)
- Fluorine [air, urban air close to ground]: 6.25e-8 kg; = 5E-08 * scaling_factor; source Bauer, C. 2007; lognormal variance with pedigree 0.4707, pedigree (2,2,5,1,1)
  (same comment as for Mercury)
- Acetaldehyde [air, urban air close to ground]: 7.625e-8 kg; = 6.1E-08 * scaling_factor; source Bauer, C. 2007; lognormal variance with pedigree 0.4707, pedigree (2,2,5,1,1)
  (same comment as for Mercury)
- Particulates, < 2.5 um [air, urban air close to ground]: 3.375e-5 kg; = 27E-06 * scaling_factor; source T. Nussbaumer 2014; lognormal variance with pedigree 0.0327, pedigree (2,2,3,1,1)
  estimation
- Carbon monoxide, non-fossil [air, urban air close to ground]: 0.0001875 kg; = 1.5E-04 * scaling_factor; source T. Nussbaumer 2014; lognormal variance with pedigree 0.0327, pedigree (2,2,3,1,1)
  estimation
- Methane, non-fossil [air, urban air close to ground]: 4.875e-6 kg; = 3.9E-06 * scaling_factor; source Bauer, C. 2007; lognormal variance with pedigree 0.4707, pedigree (2,2,5,1,1)
  (same comment as for Mercury)
- Calcium [air, urban air close to ground]: 7.3125e-6 kg; = 5.85E-06 * scaling_factor; source Bauer, C. 2007; lognormal variance with pedigree 0.4707, pedigree (2,2,5,1,1)
  (same comment as for Mercury)
- Benzene, ethyl- [air, urban air close to ground]: 3.75e-8 kg; = 3E-08 * scaling_factor; source Bauer, C. 2007; lognormal variance with pedigree 0.4707, pedigree (2,2,5,1,1)
  (same comment as for Mercury)
- Nitrogen oxides [air, urban air close to ground]: 7.5e-5 kg; = 6E-05 * scaling_factor; source T. Nussbaumer 2014; lognormal variance with pedigree 0.0327, pedigree (2,2,3,1,1)
  estimation
- Bromine [air, urban air close to ground]: 7.5e-8 kg; = 6E-08 * scaling_factor; source Bauer, C. 2007; lognormal variance with pedigree 0.4707, pedigree (2,2,5,1,1)
  (same comment as for Mercury)
- Nickel [air, urban air close to ground]: 7.5e-9 kg; = 6E-09 * scaling_factor; source Bauer, C. 2007; lognormal variance with pedigree 0.4707, pedigree (2,2,5,1,1)
  (same comment as for Mercury)

## Sampling procedure
literature

## Extrapolations
This dataset has been extrapolated from year 2014 to the year of the calculation (2021). The uncertainty has been adjusted accordingly.
