# photovoltaic cell factory construction

Dataset: EcoSpold 2, unit process
Geography: RoW
Time period: 2000-01-01 to 2021-12-31
Technology level: current
Classification: ISIC rev.4 ecoinvent: 4290:Construction of other civil engineering projects
Classification: EcoSpold01Categories: photovoltaic/production of components
Tags: ConvertedDataset
Scenario: Business-as-Usual
System model: Allocation, cut-off by classification
Share of production covered: 6 %
Generated by: Niels Jungbluth
Published in: Jungbluth, N. 2007
Database: ecoinvent
isCopyrightProtected: true
accessRestrictedTo: 1

## General comment
New plant of Shell Solar in Gelsenkirchen. Capacity of 10 million solar cells per year. Life time assumed to be 25 years.
[This dataset was already contained in the ecoinvent database version 2. It was not individually updated during the transfer to ecoinvent version 3. Life Cycle Impact Assessment results may still have changed, as they are affected by changes in the supply chain, i.e. in other datasets. This dataset was generated following the ecoinvent quality guidelines for version 2. It may have been subject to central changes described in the ecoinvent version 3 change report (http://www.ecoinvent.org/database/ecoinvent-version-3/reports-of-changes/), and the results of the central updates were reviewed extensively. The changes added e.g. consistent water flows and other information throughout the database. The documentation of this dataset can be found in the ecoinvent reports of version 2, which are still available via the ecoinvent website. The change report linked above covers all central changes that were made during the conversion process.]

## Included activities end
Materials and land use for a new production plant.

## Geography
Gelsenkirchen, DE.

## Technology
New plant on old industrial site.

## Time period
Date of publication.

## Reference product
- photovoltaic cell factory: 1 unit; By-product classification allocatable product; CPC 53269: Other constructions for manufacturing
  EcoSpold01Location=DE
  production volume 3.75794 unit
    This is a placeholder value that does not reflect real-world production volumes. This dataset does not currently require a real-world production volume to work in the database framework, and no actual data were collected yet. This has no negative effect on the results of the ecoinvent database.
  property price 1.17425e7 EUR2005
    EU27 I/O database(in the 'EU & DK Input Output Database' (available in SimaPro)); -79 Building, non-residential EU 27 (calculated to be 38.169 EUR2003/kg). Based on consumption of (_53 Iron basic, virgin, EU27;7.25517782294095E-3 kg/EUR building; 0.45 EUR2003 per kg DS), (_61 Iron, after first processing, EU27;5.8766830719783E-3kg/EUR building; 0.62 EUR2003 per kg DS), (_65 Fabricated metal products, except machinery, EU27; 8.9167022775554E-3 kg/EUR building; 3.63 EUR2003 per kg DS) and (_66 Machinery and equipment n.e.c., EU27;4.15071881936446E-3 kg/EUR building; 5.71 EUR2003 per kg DS) - 310000 kg

## Inputs from technosphere
- waste reinforced concrete: 0 kg; pedigree (1,1,1,1,1)
  EcoSpold01Location=CH
  Estimation
  Uncertainty: Estimation
  production volume 0 kg
    Calculated from the production volume of photovoltaic cell factory in proportion to the respective output amounts.
  properties: wet mass 1 kg, dry mass 0.99418 kg, water content 0.00585407
- metal working machine, unspecified: 10000 kg; lognormal variance with pedigree 0.1526, pedigree (5,3,5,5,1)
  EcoSpold01Location=RER
  Rough estimation equipment
  Uncertainty: Rough estimation equipment
- waste reinforcement steel: -300000 kg; lognormal variance with pedigree 0.0821, pedigree (1,2,5,5,1)
  Estimation
  EcoSpold01Location=CH
  Uncertainty: Estimation
  production volume 900000 kg
    (same comment as for waste reinforced concrete)
  properties: dry mass 1 kg, wet mass 1 kg
- steel, low-alloyed, hot rolled: 110000 kg; lognormal variance with pedigree 0.0821, pedigree (1,2,5,5,1)
  EcoSpold01Location=RER
  Company information
  Uncertainty: Company information
  properties: wet mass 1 kg, dry mass 1 kg, carbon content, fossil 0.005
  note on carbon content, fossil: Low alloyed steel composition given in Tab. 3.2 ecoinvent v2.2 report 10_partII. Steel assumed to have a C content of 0.5%
- waste brick: 0 kg; pedigree (1,1,1,1,1)
  Estimation
  EcoSpold01Location=CH
  Uncertainty: Estimation
  production volume 0 kg
    (same comment as for waste reinforced concrete)
  properties: wet mass 1 kg, dry mass 1 kg
- concrete, normal: 0 m3; pedigree (1,1,1,1,1)
  Company information
  EcoSpold01Location=CH
  Uncertainty: Company information
  properties: water content 0.086758, dry mass 2190 kg, wet mass 2380 kg
- clay brick: 506 kg; lognormal variance with pedigree 0.0821, pedigree (1,2,5,5,1)
  Company information
  EcoSpold01Location=RER
  Uncertainty: Company information
  properties: dry mass 1 kg, wet mass 1 kg
- reinforcing steel: 190000 kg; lognormal variance with pedigree 0.0821, pedigree (1,2,5,5,1)
  EcoSpold01Location=RER
  Company information
  Uncertainty: Company information
  properties: carbon content, fossil 0.004, wet mass 1 kg, dry mass 1 kg
- waste reinforced concrete: -2937.84, -3.95706e6 kg (2 entries); lognormal variance with pedigree 0.0821, pedigree (1,2,5,5,1)
  EcoSpold01Location=CH
  Estimation
  Uncertainty: Estimation
  production volume 1.188e7 kg
- waste brick: -1.00136, -504.999 kg (2 entries); lognormal variance with pedigree 0.0821, pedigree (1,2,5,5,1)
  Estimation
  EcoSpold01Location=CH
  Uncertainty: Estimation
  production volume 1518 kg
- concrete, normal: 397.39, 11.9722, 41.4075, 335.223, 188.563, 798.511, 26.9333 m3 (7 entries); lognormal variance with pedigree 0.0821, pedigree (1,2,5,5,1)
  Company information
  EcoSpold01Location=CH
  Uncertainty: Company information

## Inputs from nature
- Transformation, from unspecified [natural resource, land]: 2725.8 m2; lognormal variance with pedigree 0.1621, pedigree (1,2,5,5,1)
  Company information
  Uncertainty: Company information
- Transformation, to industrial area [natural resource, land]: 2725.8 m2; lognormal variance with pedigree 0.1621, pedigree (1,2,5,5,1)
  Averaged company information
  Uncertainty: averaged company information
- Occupation, industrial area [natural resource, land]: 68144 m2*year; lognormal variance with pedigree 0.0821, pedigree (1,2,5,5,1)
  25a occupation, estimation for rapid changing technology
  Uncertainty: 25a occupation, estimation for rapid changing technology

## Sampling procedure
Information on webpage.

## Extrapolations
none This dataset has been copied from an original dataset covering the geography DE. The uncertainty has been adjusted accordingly.

## Review by Roberto Dones 2007-08-23
Passed.
none
