# wafer factory construction

Dataset: EcoSpold 2, unit process
Geography: DE
Time period: 2000-01-01 to 2021-12-31
Technology level: current
Classification: ISIC rev.4 ecoinvent: 4290:Construction of other civil engineering projects
Classification: EcoSpold01Categories: photovoltaic/production of components
Tags: ConvertedDataset
Scenario: Business-as-Usual
System model: Allocation, cut-off by classification
Share of production covered: 20 %
Generated by: Niels Jungbluth
Published in: Jungbluth, N. 2007
Database: ecoinvent
isCopyrightProtected: true
accessRestrictedTo: 1

## General comment
Plants of Wacker, DE in Wasserburg and Freiberg. Capacity of 1 million wafers per year. Life time assumed to be 25 years.
[This dataset was already contained in the ecoinvent database version 2. It was not individually updated during the transfer to ecoinvent version 3. Life Cycle Impact Assessment results may still have changed, as they are affected by changes in the supply chain, i.e. in other datasets. This dataset was generated following the ecoinvent quality guidelines for version 2. It may have been subject to central changes described in the ecoinvent version 3 change report (http://www.ecoinvent.org/database/ecoinvent-version-3/reports-of-changes/), and the results of the central updates were reviewed extensively. The changes added e.g. consistent water flows and other information throughout the database. The documentation of this dataset can be found in the ecoinvent reports of version 2, which are still available via the ecoinvent website. The change report linked above covers all central changes that were made during the conversion process.]

## Included activities end
Materials and land use for a new production plant.

## Geography
Two plants in DE and literature data.

## Technology
Wafer manufacturing plant for electronic and photovoltaics industry.

## Time period
Date of publication.

## Reference product
- wafer factory: 1 unit; CPC 53269: Other constructions for manufacturing; By-product classification allocatable product
  EcoSpold01Location=DE
  production volume 0.242058 unit
    This is a placeholder value that does not reflect real-world production volumes. This dataset does not currently require a real-world production volume to work in the database framework, and no actual data were collected yet. This has no negative effect on the results of the ecoinvent database. The placeholder value of this activity was scaled according to the nominal GDP of 2005 (source: United Nations, http://data.un.org/Glossary.aspx?q=GDP+%28current+US%24%29, accessed 20130726) to reflect an appropriate share of the global production volume, which is also a placeholder value.
  property price 50857.1 EUR2005
    Calculated based on inputs: The price of the product has been calculated as a sum of the values of the material and energy inputs for this product. This value is therefore a rough estimation. It may underestimate the real price since there are additional expenses when producing any product. These expences can include for example labour costs, treatment of waste materials and profit for the producer. Please consider carefully whether this level of data quality is acceptable for your application.

## Inputs from technosphere
- building, hall: 109.74 m2; lognormal variance with pedigree 0.3401, pedigree (1,2,5,1,1)
  EcoSpold01Location=CH
  Environmental report
  Uncertainty: Environmental report
- metal working machine, unspecified: 10000 kg; lognormal variance with pedigree 0.6206, pedigree (5,3,5,1,5)
  EcoSpold01Location=RER
  Rough estimation for equipment
  Uncertainty: Rough estimation for equipment
- water supply network: 0.021948 km; lognormal variance with pedigree 0.3401, pedigree (1,2,5,1,1)
  EcoSpold01Location=CH
  Environmental report, pipelines for drinking water
  Uncertainty: Environmental report, pipelines for drinking water

## Inputs from nature
- Transformation, to industrial area [natural resource, land]: 438.96 m2; lognormal variance with pedigree 0.1601, pedigree (1,2,5,1,1)
  Environmental report
  Uncertainty: Environmental report
- Transformation, to traffic area, road network [natural resource, land]: 329.22 m2; lognormal variance with pedigree 0.1601, pedigree (1,2,5,1,1)
  Share of area according to environmental report
  Uncertainty: share of area according to environmental report
- Transformation, from unspecified [natural resource, land]: 768.18 m2; lognormal variance with pedigree 0.1601, pedigree (1,2,5,1,1)
  Environmental report
  Uncertainty: Environmental report
- Occupation, industrial area [natural resource, land]: 2743.5 m2*year; lognormal variance with pedigree 0.1601, pedigree (1,2,5,1,1)
  25a occupation
  Uncertainty: 25a occupation

## Sampling procedure
Environmental report

## Extrapolations
This dataset has been extrapolated from year 2005 to the year of the calculation (2021). The uncertainty has been adjusted accordingly.

## Review by Roberto Dones 2007-11-19
Passed.
none
