# tillage, harrowing, by offset disc harrow

Dataset: EcoSpold 2, unit process
Geography: RoW
Time period: 2012-01-01 to 2021-12-31
Technology level: current
Classification: EcoSpold01Categories: agricultural means of production/work processes
Classification: ISIC rev.4 ecoinvent: 0161:Support activities for crop production
Scenario: Business-as-Usual
System model: Allocation, cut-off by classification
Generated by: Otávio Cavalett
Published in: Cavalett O. 2016
Database: ecoinvent
isCopyrightProtected: true
accessRestrictedTo: 1

## General comment
This dataset represents the harrowing operation in one hectare (ha). This tillage operation is mainly performed to break up the surface of the soil and to incorporate the limestone and gypsum. Functional Unit (FU) is one hectare of tillage harrowing. The operation time is about 1.38 hours per ha (62.5% of this time is effectively worked, discounting time for maintenance, waiting in the field and re-allocations between the plots).

## Included activities start
From agricultural field foreseen to be processed.

## Included activities end
This activity ends with harrowing. The dataset includes the diesel fuel consumption (26.04 L of diesel per hour of effective operation) and the amount of agricultural machinery and shed. Also taken into consideration is the amount of emissions to the air from diesel combustion and the emission to the soil from tyre abrasion during the work process.

## Geography
The dataset is modeled for agricultural production system in Brazil.

## Technology
This activity is performed with a tractor (power 220 hp; weight 9450 kg) plus a disc harrow implement (18 discs of diameter 32''; weight 2862 kg). Life spam of the tractor is considered as 13250 operating hours and of the implement as 8000 operating hours. Machinery used, fuel consumption and operation efficiencies were based on data from sugarcane mills in Brazil, expert's informations and unpublished data.

## Time period
Most of the data used to modelling this activity were collected in the last few years (2012-2014).

## Reference product
- tillage, harrowing, by offset disc harrow: 1 ha; CPC 86119: Other support services to crop production; By-product classification allocatable product
  production volume 1.7608e9 ha; = 27045769/5 + 1417222909.23 + 3315996707.627/7
    Gobal area of sugarcane, arable crops, permanent meadows and pasture, year 2014, according to the FAOSTAT data. This operation is assumed to occur every 5 year in sugarcane and every 7 years in permanent meadows and pasture.
  property price 15.83 EUR2005
    Calculated based on inputs: The price of the product has been calculated as a sum of the values of the material and energy inputs for this product. This value is therefore a rough estimation. It may underestimate the real price since there are additional expenses when producing any product. These expences can include for example labour costs, treatment of waste materials and profit for the producer. Please consider carefully whether this level of data quality is acceptable for your application.

## Inputs from technosphere
- diesel: 0 kg; source Otávio Cavalett 2016; pedigree (1,1,1,1,1)
  Proxy, based on data from sugarcane mills in Brazil, expert's informations and unpublished data. The main source of data for agricultural inputs and operations modelling prodedures is detailed in Cavalett et al., 2016.
  properties: dry mass 1 kg, wet mass 1 kg, carbon content, fossil 0.865, heating value, net 42.8 MJ
  note on carbon content, fossil: C-content of diesel is 86.5% (ecoinvent v2.2 report 6_IV, Tab 3.14)
- tractor, 4-wheel, agricultural: 0.983735 kg; source Otávio Cavalett 2016; lognormal variance with pedigree 0.0052, pedigree (2,3,3,5,1)
  (same comment as for diesel)
- agricultural machinery, tillage: 0.493448 kg; source Otávio Cavalett 2016; lognormal variance with pedigree 0.0052, pedigree (2,3,3,5,1)
  (same comment as for diesel)
- shed: 0.002 m2; lognormal variance with pedigree 0.0146, pedigree (3,3,3,5,3)
  Proxy, based on ecoinvent database.
- diesel: 0.138688, 5.82235, 0.407832, 0.589472, 12.1664 kg (5 entries); source Otávio Cavalett 2016; lognormal variance with pedigree 0.0052, pedigree (2,3,3,5,1)
  (same comment as for diesel)

## Emissions to nature
All rows: source Nemecek, T. 2007
- Dinitrogen monoxide [air, non-urban air or from high stacks]: 0.00229 kg; lognormal variance with pedigree 0.0641, pedigree (3,2,3,5,3)
  Proxy, based on 'Agricultural Field Work Processes'from Nemecek and Kagi, 2007.
- Lead [soil, agricultural]: 0.000272 kg; lognormal variance with pedigree 0.048, pedigree (3,4,3,5,1)
  Proxy, based on 'Agricultural Field Work Processes'from Nemecek and Kagi, 2007.
- Selenium [air, non-urban air or from high stacks]: 1.91e-7 kg; lognormal variance with pedigree 0.0641, pedigree (3,2,3,5,3)
  Proxy, based on 'Agricultural Field Work Processes'from Nemecek and Kagi, 2007.
- Zinc [soil, agricultural]: 0.00167 kg; lognormal variance with pedigree 0.048, pedigree (3,4,3,5,1)
  Proxy, based on 'Agricultural Field Work Processes'from Nemecek and Kagi, 2007.
- Copper [air, non-urban air or from high stacks]: 3.25e-5 kg; lognormal variance with pedigree 0.6641, pedigree (3,2,3,5,3)
  Proxy, based on 'Agricultural Field Work Processes'from Nemecek and Kagi, 2007.
- Particulates, < 2.5 um [air, non-urban air or from high stacks]: 0.16202 kg; lognormal variance with pedigree 0.0641, pedigree (3,2,3,5,3)
  Proxy, based on 'Agricultural Field Work Processes'from Nemecek and Kagi, 2007.
- Carbon dioxide, fossil [air, non-urban air or from high stacks]: 59.7 kg; lognormal variance with pedigree 0.0241, pedigree (3,2,3,5,3)
  Proxy, based on 'Agricultural Field Work Processes'from Nemecek and Kagi, 2007.
- Nitrogen oxides [air, non-urban air or from high stacks]: 0.8128 kg; lognormal variance with pedigree 0.0541, pedigree (3,2,3,5,3)
  Proxy, based on 'Agricultural Field Work Processes'from Nemecek and Kagi, 2007. Emissions of CO, NOx and NMVOC were estimated based on avarege of the agricultural process used in sugarcane production.
- Benzene [air, non-urban air or from high stacks]: 0.00014 kg; lognormal variance with pedigree 0.0641, pedigree (3,2,3,5,3)
  Proxy, based on 'Agricultural Field Work Processes'from Nemecek and Kagi, 2007.
- Nickel [air, non-urban air or from high stacks]: 1.34e-6 kg; lognormal variance with pedigree 0.6641, pedigree (3,2,3,5,3)
  Proxy, based on 'Agricultural Field Work Processes'from Nemecek and Kagi, 2007.
- Benzo(a)pyrene [air, non-urban air or from high stacks]: 5.74e-7 kg; lognormal variance with pedigree 0.6641, pedigree (3,2,3,5,3)
  Proxy, based on 'Agricultural Field Work Processes'from Nemecek and Kagi, 2007.
- Methane, fossil [air, non-urban air or from high stacks]: 0.00247 kg; lognormal variance with pedigree 0.0641, pedigree (3,2,3,5,3)
  Proxy, based on 'Agricultural Field Work Processes'from Nemecek and Kagi, 2007.
- Ammonia [air, non-urban air or from high stacks]: 0.000382 kg; lognormal variance with pedigree 0.0641, pedigree (3,2,3,5,3)
  Proxy, based on 'Agricultural Field Work Processes'from Nemecek and Kagi, 2007.
- Carbon monoxide, fossil [air, non-urban air or from high stacks]: 0.10327 kg; lognormal variance with pedigree 0.6641, pedigree (3,2,3,5,3)
  (same comment as for Nitrogen oxides)
- Chromium [air, non-urban air or from high stacks]: 9.56e-7 kg; lognormal variance with pedigree 0.6641, pedigree (3,2,3,5,3)
  Proxy, based on 'Agricultural Field Work Processes'from Nemecek and Kagi, 2007.
- Cadmium [air, non-urban air or from high stacks]: 1.91e-7 kg; lognormal variance with pedigree 0.6641, pedigree (3,2,3,5,3)
  Proxy, based on 'Agricultural Field Work Processes'from Nemecek and Kagi, 2007.
- Sulfur dioxide [air, non-urban air or from high stacks]: 0.0193 kg; lognormal variance with pedigree 0.0241, pedigree (3,2,3,5,3)
  Proxy, based on 'Agricultural Field Work Processes'from Nemecek and Kagi, 2007.
- PAH, polycyclic aromatic hydrocarbons [air, non-urban air or from high stacks]: 6.29e-5 kg; lognormal variance with pedigree 0.3241, pedigree (3,2,3,5,3)
  Proxy, based on 'Agricultural Field Work Processes'from Nemecek and Kagi, 2007.
- Cadmium [soil, agricultural]: 6.28e-5 kg; lognormal variance with pedigree 0.048, pedigree (3,4,3,5,1)
  Proxy, based on 'Agricultural Field Work Processes'from Nemecek and Kagi, 2007.
- Zinc [air, non-urban air or from high stacks]: 1.91e-5 kg; lognormal variance with pedigree 0.6641, pedigree (3,2,3,5,3)
  Proxy, based on 'Agricultural Field Work Processes'from Nemecek and Kagi, 2007.
- NMVOC, non-methane volatile organic compounds, unspecified origin [air, non-urban air or from high stacks]: 0.05737 kg; lognormal variance with pedigree 0.0641, pedigree (3,2,3,5,3)
  (same comment as for Nitrogen oxides)

## Sampling procedure
The main source of data for agricultural inputs and operations modelling procedures is detailed in Cavalett et al., 2016. Emissions from the agricultural process are estimated according to Nemecek and Kagi, 2007.

## Extrapolations
Extrapolated from Brazilian data, uncertainty adjusted accordingly.

## Review by Jens Lansche 2018-02-23
All review comments considered
