# glued laminated timber production, MUF-glue

Dataset: EcoSpold 2, unit process
Geography: CH
Time period: 2018-01-01 to 2021-12-31
Technology level: current
Classification: ISIC rev.4 ecoinvent: 1621:Manufacture of veneer sheets and wood-based panels
Synonyms: Glulam; Brettsperrholz; Brettschichtholz
Tags: Swiss brush-up completed
Scenario: Business-as-Usual
System model: Allocation, cut-off by classification
Generated by: Frank Werner
Database: ecoinvent
isCopyrightProtected: true
accessRestrictedTo: 1

## General comment
This dataset represents the production of glued laminated timber in Switzerland.
Glued laminated timber, also called glulam, is a type of structural engineered wood product comprising a number of layers of dimensional lumber bonded together with durable, moisture-resistant structural adhesives.
By laminating a number of smaller pieces of sawn timber a single large, strong, structural member is manufactured from smaller pieces. These structural members are used as vertical columns or horizontal beams, as well as curved, arched shapes. Glulam is readily produced in curved shapes and is available in a range of species and appearance characteristics to meet varied end-use requirements. Connections are usually made with bolts or plain steel dowels and steel plates.
Glulam optimizes the structural values of wood, which is a renewable resource. Because of their composition, large glulam members can be manufactured from a variety of smaller trees harvested from second-growth forests and plantations. Glulam provides the strength and versatility of large wood members without relying on the old growth-dependent solid-sawn timbers. As with other engineered wood products, it reduces the overall amount of wood used when compared to solid sawn timbers by diminishing the negative impact of knots and other small defects in each component board.
The high strength and stiffness of laminated timbers enable glulam beams and arches to span large distances without intermediate columns, allowing more design flexibility than with traditional timber construction. The size is limited only by transportation and handling constraints.

## Included activities start
From the reception at the factory gate of all materials and fuels used.

## Included activities end
This activity ends with the glued laminated timber with MUF-glue produced at the factory gate. The dataset includes the inputs to and outputs of the production processes and the available process emissions. Infrastructure is a rough estimate.

## Geography
Data for Switzerland

## Technology
Technology reflects a sample of Swiss glulam producers and represents gluelam with MUF adhesives.

## Parameters
- wood_fuel: 680; lognormal variance with pedigree 0.0256, pedigree (1,3,1,1,1)
  input of wood fuel used in production; value calculated from Rüter et al. 2012

## Reference product
- shavings, softwood, loose, measured as dry mass: 1 kg; name m_shavings; = 0.2095*418-wood_fuel/19.08; CPC 39283: Non-agglomerated wood waste and scrap; By-product classification allocatable product; pedigree (1,1,1,1,1)
  shavings from the 2 planing steps; yield x basic wood density of 418 kg/m3; minus shavings used internally for heating the production site, coverted to kg with lower heating value of 19.08 MJ/kg oven dry wood
  production volume 1.81761e7 kg; = m_shavings*glulam_MUF_pv
    Calculated from production volume of reference product using the relative outputs.
  property heating value, net 12.61 MJ
    LHV is calculated based on the Carbon content of the product. More details can be found on the respective documentation.
  property price 0.113 EUR2005; name m_shavings_price_EUR2005
    Calculated based on data from FAOSTAT (accessed 20140429). The price is calculated by using data on total world import quantity (m3) and import value (1000 USD), year 2005. 40461924 m3 of Chips and Particles was imported in the world in 2005. The import value was 3022227000 USD. The calculated price is thus (3022227000/40461924=74.7*0.8=) 62.2 Euro/m3. It is estimated, that the chips and particles are half hardwood (of density 650 kg/m3) and half softwood (of density 450 kg/m3), thus the remaining mixture has a density of 550 kg/m3. The recalculated price is (1/550*62.2=) 0.11 Euro/kg. Using the same approach the calculated price for 2010 was 0.123 Euro/kg.
  property carbon content 0.494
    carbon content on a dry matter basis (reserved; not for manual entry)
  property true value 5.86827; name m_shavings_true_value
    allocation property applied in "true value" allocation // value calculated from revenue
  properties: water in wet mass 0.15 kg, wet mass 1.15 kg, carbon content, fossil 0, water content 0.15, carbon content, non-fossil 0.494, dry mass 1 kg, carbon allocation 0.494 kg
- glued laminated timber, MUF-glue: 0 m3; By-product classification allocatable product
  production volume 350000 m3; name glulam_MUF_pv
    estimated from the existing PV for GLULAM indoor used and outdoor use for Switzerland+
  property heating value, net 5517.96 MJ
    LHV is calculated based on the Carbon content of the product. More details can be found on the respective documentation.The property is based on a value of 12.46MJ/kg
  property price 298 EUR2005
    Temporary price data. Calculated as 90% of purchasers price based on: Price for plywood applied (from 2004 World Import/Export (USD/cubicmeter) from FaoStat http://faostat.fao.org/site/626/default.aspx#ancor, accessed 14th June 2010)
  property carbon content 0.459069
    carbon content on a dry matter basis (reserved; not for manual entry)
  property true value 298
    allocation property applied in "true value" allocation // value calculated from revenue
  properties: dry mass 403.64 kg, carbon content, fossil 0.01638, water content 0.0975126, water in wet mass 39.36 kg, carbon content, non-fossil 0.442689, wet mass 443 kg, carbon allocation 185.299 kg

## By-products
- residual wood, dry: 0 m3; name m_residual_wood_dry; CPC 39283: Non-agglomerated wood waste and scrap; By-product classification allocatable product; pedigree (1,1,1,1,1)
  cuttings, etc. ; sent to internal chipping
  production volume 36668.4 m3; = m_residual_wood_dry*glulam_MUF_pv
    Calculated from production volume of reference product using the relative outputs.
  property price 26.9 EUR2005
    Temporary price data. Calculated as 90% of purchasers price based on: 2004 prices for World Import/Export (USD/cubicmeter) from FaoStat (http://faostat.fao.org/site/626/default.aspx#ancor, [accessed 10th June 2010]) Commodity: 'Chips and Particles' assuming this is for air-dry chips (10% water on a dry matter basis at 650 kg/m3) and no price difference for water content (i.e. assuming air-drying).
  property heating value, net 8030.06 MJ
    LHV is calculated based on the Carbon content of the product. More details can be found on the respective documentation.The property is based on a value of 12.7MJ/kg
  property dry mass 550 kg; name DM_residual_wood
  property carbon content 0.494
    carbon content on a dry matter basis (reserved; not for manual entry)
  property true value 2.81823; name m_residual_wood_dry_true_value
    allocation property applied in "true value" allocation // value calculated from revenue
  properties: carbon content, non-fossil 0.494, water content 0.15, wet mass 632.5 kg, carbon content, fossil 0, water in wet mass 82.5 kg, carbon allocation 271.7 kg

## Inputs from technosphere
- gluing mill: 6.2778e-10 unit; lognormal variance with pedigree 0.3002, pedigree (1,1,2,1,1)
  Estimate for infrastructure
  properties: lifetime capacity in m3 2.5e6 m3, lifetime 50 year, price 3.94119e7 EUR2005
- diesel, burned in building machine: 0.00392162 MJ; lognormal variance with pedigree 0.0047, pedigree (1,4,3,3,1)
  Diesel consumption for internal transport
  properties: UVEK_link_1 732, UVEK_relative_amount_1 1, heating value, net 1 MJ
  note on UVEK_link_1: to be used only in special submissions in coordination with ecoinvent and the Swiss FOEN
- furnace, wood chips, with silo, 300kW: 4.34077e-9 unit; = 2.31E-08*wood_fuel/1.33333; lognormal variance with pedigree 0.0008, pedigree (1,1,2,1,1)
  Infrastructure factor from DS "Heat, district or industrial, other than natural gas {CH}| heat production, wood chips from industry, at furnace 5000kW | Cut-off, U", multiplied by the input of wood fuel (direct wood fuel plus production residues); correction for assumed efficiency as original value refers to heat output
- electricity, medium voltage: 0.00959596 kWh; = 24.8+wood_fuel/19.08*0.0349; lognormal variance with pedigree 0.0028, pedigree (1,4,2,1,1)
  plant data, including 2 planing steps, gluing; in additon suction of shavings used internally for heat generation: electricty required: 0.0349 kWh/kg oven-dry shavings
  properties: UVEK_link_1 1710, UVEK_relative_amount_1 1
- wood ash mixture, pure: -0.000125275 kg; name w_wood_ash; = (0.000666666666666667*wood_fuel/1.33333)*-1; lognormal variance with pedigree 0.0014, pedigree (1,3,2,1,1)
  Amount derived from DS "Heat, district or industrial, other than natural gas {CH}| heat production, wood chips from industry, at furnace 300kW | Cut-off, U" on heat generation from industrial residual wood per MJ, multiplied by the input of wood fuel (direct wood fuel plus production residues ) scaled to reflect wood input per generated heat
  production volume 119000 kg; = w_wood_ash*glulam_MUF_pv
    Calculated from production volume of reference product using the relative outputs.
  property price 0 EUR2005; name w_wood_ash_price_EUR2005
  properties: carbon content, non-fossil 0.012, wet mass 1 kg, dry mass 1 kg
- melamine urea formaldehyde adhesive: 0.00298082 kg; lognormal variance with pedigree 0.0047, pedigree (1,4,3,3,1)
  Average glue input
  properties: UVEK_link_9 4433, wet mass 1 kg, heating value, net 14.65 MJ, UVEK_link_1 2931, carbon content, fossil 0.311708, UVEK_link_8 4417, UVEK_relative_amount_8 0.0499382, dry mass 1 kg, UVEK_relative_amount_9 0.0599258, UVEK_relative_amount_1 1
  note on UVEK_link_9: To be used only in special submissions in coordination with ecoinvent and the Swiss FOEN.
- waste mineral oil: -3.75824e-5 kg; name w_mineral_oil; = (m_lubricating_oil/DM_oil)*-1; lognormal variance with pedigree 0.002, pedigree (2,3,2,1,1)
  hydraulic oil and engine oil/grease; adjusted for water content of waste oil
  production volume 35700 kg; = w_mineral_oil*glulam_MUF_pv
    Calculated from production volume of reference product using the relative outputs.
  property price 0 EUR2005; name w_mineral_oil_price_EUR2005
  properties: water content 0.111111, wet mass 1 kg, dry mass 0.9 kg, carbon content, fossil 0.864444, heating value, net 34.7 MJ
  note on heating value, net: Value taken from the general comment of the treatment dataset.
- sawnwood, board, softwood, raw, dried (u=10%): 0.000482523 m3; name board_raw_u10; lognormal variance with pedigree 0.0008, pedigree (1,1,2,1,1)
  Raw material input
  property wet mass 418.67 kg; name WM
  property dry mass 418.176 kg; name basic_wood_d
  property water in wet mass 0.494 kg; name WWM
  property water content 0.00118132; name water_content
  properties: carbon content, non-fossil 0.494, heating value, net 5700.67 MJ
  note on heating value, net: Assumed equal to "sawnwood, softwood, dried (u=10%), planed".The property is based on a value of 13.38MJ/kg
- lubricating oil: 3.75824e-5 kg; name m_lubricating_oil; lognormal variance with pedigree 0.0108, pedigree (4,4,2,1,1)
  Literature value taken from Rüter & Diederichs (2012)
  property dry mass 1 kg; name DM_oil
  properties: carbon content, fossil 0.75, wet mass 1 kg, heating value, net 40.2 MJ
  note on heating value, net: Literature value, Source: IPCC 2006, 2006 IPCC Guidelines for National Greenhouse Gas Inventories, Prepared by the National Greenhouse Gas Inventories Programme, Eggleston H.S., Buendia L., Miwa K., Ngara T. and Tanabe K. (eds). Published: IGES, Japan

## Inputs from nature
- Carbon dioxide, non-fossil, resource correction [natural resource, in air]: 1.60168 kg; pedigree (1,1,1,1,1)
  This exchange has been added after economic allocation in order to re-balance the non-fossil carbon dioxide resource extraction.

## Emissions to nature
- Carbon dioxide, non-fossil [air, unspecified]: 0.0268088 kg; = 0.142666666666666*wood_fuel/1.33333; lognormal variance with pedigree 0.0098, pedigree (2,3,4,1,1)
  Emission factor from DS "Heat, district or industrial, other than natural gas {CH}| heat production, wood chips from industry, at furnace 300kW | Cut-off, U" on heat generation from industrial residual wood per MJ, multiplied by the input of wood fuel (direct wood fuel plus production residues ) scaled to reflect wood input per generated heat.
- Lead [air, unspecified]: 6.26374e-9 kg; = 3.33333333333333E-08*wood_fuel/1.33333; lognormal variance with pedigree 0.6592, pedigree (2,3,4,1,1)
  (same comment as for Carbon dioxide, non-fossil)
- Particulates, > 2.5 um, and < 10um [air, unspecified]: 2.25495e-5 kg; = 0.00012*wood_fuel/1.33333; lognormal variance with pedigree 0.1292, pedigree (2,3,4,1,1)
  (same comment as for Carbon dioxide, non-fossil)
- Sulfur dioxide [air, unspecified]: 6.26374e-7 kg; = 3.33333333333334E-06*wood_fuel/1.33333; lognormal variance with pedigree 0.0098, pedigree (2,3,4,1,1)
  (same comment as for Carbon dioxide, non-fossil)
- Arsenic [air, unspecified]: 2.5055e-10 kg; = 1.33333333333333E-09*wood_fuel/1.33333; lognormal variance with pedigree 0.6592, pedigree (2,3,4,1,1)
  (same comment as for Carbon dioxide, non-fossil)
- Acetaldehyde [air, unspecified]: 1.52835e-8 kg; = 8.13333333333333E-08*wood_fuel/1.33333; lognormal variance with pedigree 0.0492, pedigree (2,3,4,1,1)
  (same comment as for Carbon dioxide, non-fossil)
- Ammonia [air, unspecified]: 4.33451e-7 kg; = 2.30666666666667E-06*wood_fuel/1.33333; lognormal variance with pedigree 0.0492, pedigree (2,3,4,1,1)
  (same comment as for Carbon dioxide, non-fossil)
- Hydrocarbons, aliphatic, alkanes, unspecified [air, unspecified]: 2.28e-7 kg; = 1.21333333333333E-06*wood_fuel/1.33333; lognormal variance with pedigree 0.0492, pedigree (2,3,4,1,1)
  (same comment as for Carbon dioxide, non-fossil)
- Carbon monoxide, non-fossil [air, unspecified]: 0.000125275 kg; = 0.000666666666666667*wood_fuel/1.33333; lognormal variance with pedigree 0.6592, pedigree (2,3,4,1,1)
  (same comment as for Carbon dioxide, non-fossil)
- Manganese [air, unspecified]: 4.25934e-8 kg; name manganese; = 2.26666666666667E-07*wood_fuel/1.33333; lognormal variance with pedigree 0.6592, pedigree (2,3,4,1,1)
  (same comment as for Carbon dioxide, non-fossil)
- Calcium [air, unspecified]: 1.46572e-6 kg; = 0.0000078*wood_fuel/1.33333; lognormal variance with pedigree 0.6592, pedigree (2,3,4,1,1)
  (same comment as for Carbon dioxide, non-fossil)
- Formaldehyde [air, unspecified]: 2.23409e-6 kg; = 1.73333333333334E-07*wood_fuel/1.33333+0.005975; lognormal variance with pedigree 0.1292, pedigree (2,3,4,1,1)
  Emission factor from DS "Heat, district or industrial, other than natural gas {CH}| heat production, wood chips from industry, at furnace 300kW | Cut-off, U" on heat generation from industrial residual wood per MJ, multiplied by the input of wood fuel (direct wood fuel plus production residues ) scaled to reflect wood input per generated heat plus estimated emissions from wood and glue drying processes (according to Rüter & Diederichs 2012).
- Magnesium [air, unspecified]: 9.01979e-8 kg; name magnesium; = 0.00000048*wood_fuel/1.33333; lognormal variance with pedigree 0.6592, pedigree (2,3,4,1,1)
  (same comment as for Carbon dioxide, non-fossil)
- Sodium [air, unspecified]: 3.25715e-7 kg; = 1.73333333333334E-06*wood_fuel/1.33333; lognormal variance with pedigree 0.6592, pedigree (2,3,4,1,1)
  (same comment as for Carbon dioxide, non-fossil)
- PAH, polycyclic aromatic hydrocarbons [air, unspecified]: 2.7811e-9 kg; name pah; = 0.0000000148*wood_fuel/1.33333; lognormal variance with pedigree 0.3092, pedigree (2,3,4,1,1)
  (same comment as for Carbon dioxide, non-fossil)
- NMVOC, non-methane volatile organic compounds, unspecified origin [air, unspecified]: 1.75385e-6 kg; name nmvoc; = 9.33333333333334E-06*wood_fuel/1.33333; lognormal variance with pedigree 0.0492, pedigree (2,3,4,1,1)
  (same comment as for Carbon dioxide, non-fossil)
- Bromine [air, unspecified]: 1.5033e-8 kg; = 0.00000008*wood_fuel/1.33333; lognormal variance with pedigree 0.6592, pedigree (2,3,4,1,1)
  (same comment as for Carbon dioxide, non-fossil)
- Nickel [air, unspecified]: 1.5033e-9 kg; name nickel; = 0.000000008*wood_fuel/1.33333; lognormal variance with pedigree 0.6592, pedigree (2,3,4,1,1)
  (same comment as for Carbon dioxide, non-fossil)
- Dinitrogen monoxide [air, unspecified]: 6.26374e-7 kg; = 3.33333333333334E-06*wood_fuel/1.33333; lognormal variance with pedigree 0.0492, pedigree (2,3,4,1,1)
  (same comment as for Carbon dioxide, non-fossil)
- Phenol, pentachloro- [air, unspecified]: 2.02945e-12 kg; = 0.0000000000108*wood_fuel/1.33333; lognormal variance with pedigree 0.0492, pedigree (2,3,4,1,1)
  (same comment as for Carbon dioxide, non-fossil)
- Mercury [air, unspecified]: 7.51649e-11 kg; name mercury; = 0.0000000004*wood_fuel/1.33333; lognormal variance with pedigree 0.6592, pedigree (2,3,4,1,1)
  (same comment as for Carbon dioxide, non-fossil)
- m-Xylene [air, unspecified]: 3.0066e-8 kg; name mxylene; = 0.00000016*wood_fuel/1.33333; lognormal variance with pedigree 0.0492, pedigree (2,3,4,1,1)
  (same comment as for Carbon dioxide, non-fossil)
- Benzene [air, unspecified]: 2.28e-7 kg; = 1.21333333333333E-06*wood_fuel/1.33333; lognormal variance with pedigree 0.0492, pedigree (2,3,4,1,1)
  (same comment as for Carbon dioxide, non-fossil)
- Benzene, hexachloro- [air, unspecified]: 1.80396e-15 kg; = 9.60000000000001E-15*wood_fuel/1.33333; lognormal variance with pedigree 0.0492, pedigree (2,3,4,1,1)
  (same comment as for Carbon dioxide, non-fossil)
- Methane, non-fossil [air, unspecified]: 1.12747e-6 kg; = 0.000006*wood_fuel/1.33333; lognormal variance with pedigree 0.0492, pedigree (2,3,4,1,1)
  (same comment as for Carbon dioxide, non-fossil)
- Zinc [air, unspecified]: 7.51649e-8 kg; = 0.0000004*wood_fuel/1.33333; lognormal variance with pedigree 0.6592, pedigree (2,3,4,1,1)
  (same comment as for Carbon dioxide, non-fossil)
- Chromium [air, unspecified]: 9.92177e-10 kg; = 5.28000000000001E-09*wood_fuel/1.33333; lognormal variance with pedigree 0.6592, pedigree (2,3,4,1,1)
  (same comment as for Carbon dioxide, non-fossil)
- Potassium [air, unspecified]: 5.86286e-6 kg; = 0.0000312*wood_fuel/1.33333; lognormal variance with pedigree 0.0492, pedigree (2,3,4,1,1)
  (same comment as for Carbon dioxide, non-fossil)
- Particulates, < 2.5 um [air, unspecified]: 2.25495e-5 kg; = 0.00012*wood_fuel/1.33333; lognormal variance with pedigree 0.3092, pedigree (2,3,4,1,1)
  (same comment as for Carbon dioxide, non-fossil)
- Copper [air, unspecified]: 5.51209e-9 kg; = 2.93333333333334E-08*wood_fuel/1.33333; lognormal variance with pedigree 0.6592, pedigree (2,3,4,1,1)
  (same comment as for Carbon dioxide, non-fossil)
- Chlorine [air, unspecified]: 4.50989e-8 kg; = 0.00000024*wood_fuel/1.33333; lognormal variance with pedigree 0.6592, pedigree (2,3,4,1,1)
  (same comment as for Carbon dioxide, non-fossil)
- Chromium VI [air, unspecified]: 1.0022e-11 kg; = 5.33333333333334E-11*wood_fuel/1.33333; lognormal variance with pedigree 0.6592, pedigree (2,3,4,1,1)
  (same comment as for Carbon dioxide, non-fossil)
- Cadmium [air, unspecified]: 1.75385e-10 kg; = 9.33333333333334E-10*wood_fuel/1.33333; lognormal variance with pedigree 0.6592, pedigree (2,3,4,1,1)
  (same comment as for Carbon dioxide, non-fossil)
- Nitrogen oxides [air, unspecified]: 4.50989e-5 kg; = 0.00024*wood_fuel/1.33333; lognormal variance with pedigree 0.0492, pedigree (2,3,4,1,1)
  (same comment as for Carbon dioxide, non-fossil)
- Phosphorus [air, unspecified]: 7.51649e-8 kg; = 0.0000004*wood_fuel/1.33333; lognormal variance with pedigree 0.0492, pedigree (2,3,4,1,1)
  (same comment as for Carbon dioxide, non-fossil)
- Benzene, ethyl- [air, unspecified]: 7.51649e-9 kg; = 0.00000004*wood_fuel/1.33333; lognormal variance with pedigree 0.0492, pedigree (2,3,4,1,1)
  (same comment as for Carbon dioxide, non-fossil)
- Benzo(a)pyrene [air, unspecified]: 1.25275e-10 kg; = 6.66666666666667E-10*wood_fuel/1.33333; lognormal variance with pedigree 0.3092, pedigree (2,3,4,1,1)
  (same comment as for Carbon dioxide, non-fossil)
- Hydrocarbons, aliphatic, unsaturated [air, unspecified]: 7.76704e-7 kg; = 4.13333333333333E-06*wood_fuel/1.33333; lognormal variance with pedigree 0.0492, pedigree (2,3,4,1,1)
  (same comment as for Carbon dioxide, non-fossil)
- Toluene [air, unspecified]: 7.51649e-8 kg; = 0.0000004*wood_fuel/1.33333; lognormal variance with pedigree 0.0492, pedigree (2,3,4,1,1)
  (same comment as for Carbon dioxide, non-fossil)
- Dioxins, measured as 2,3,7,8-tetrachlorodibenzo-p-dioxin [air, unspecified]: 7.76704e-15 kg; = 4.13333333333333E-14*wood_fuel/1.33333; lognormal variance with pedigree 0.3092, pedigree (2,3,4,1,1)
  (same comment as for Carbon dioxide, non-fossil)
- Water [air, unspecified]: 1.12747e-5 m3; = 0.00006*wood_fuel/1.33333; lognormal variance with pedigree 0.098025, pedigree (4,4,4,2,4)
  Water emissions from the combustion of the wood (emission per MJ, scaled to wood input and extrapolated from wood input to heat generated) plus tap water input plus input of cooling water
- Fluorine [air, unspecified]: 1.25275e-8 kg; = 6.66666666666667E-08*wood_fuel/1.33333; lognormal variance with pedigree 0.0492, pedigree (2,3,4,1,1)
  (same comment as for Carbon dioxide, non-fossil)

## Sampling procedure
Sampling of six GLULAM producers in Switzerland

## Extrapolations
See Geography and Technology
