# treatment of waste paperboard, unsorted, sorting

Dataset: EcoSpold 2, unit process
Geography: RoW
Time period: 2012-01-01 to 2021-12-31
Technology level: current
Classification: ISIC rev.4 ecoinvent: 3830:Materials recovery
Scenario: Business-as-Usual
System model: Allocation, cut-off by classification
Generated by: Avraam Symeonidis
Database: ecoinvent
isCopyrightProtected: true
accessRestrictedTo: 1

## General comment
This activity represents the treatment of 1 kg waste paperboard (cardboard) from separate collection, i.e. a source-segregated municipal solid waste fraction, through sorting for recycling. The activity starts with receiving the unsorted waste paperboard, as collected from the households, at the sorting facility and ends when sorted fractions are produced.

## Included activities start
The activity starts with "waste paperboard, unsorted" being available to the sorting facility.

## Included activities end
The activity ends with "waste paperboard, unsorted" being sorted and "waste paperboard, sorted" available for transportation at the gate of the sorting facility.

## Reference product
- waste paperboard, unsorted: 0 kg; By-product classification Recyclable; CPC 39240: Waste and scrap of paper or paperboard
  production volume 0 kg; name PVRP; = 378736000*100/0.8
    PV value is scaled from the CH value given that Switzerland accounts for 0.8% of the global GDP.
  property price 0.03924 EUR2005; name RP_price_EUR2005
    Temporary price data. Calculated as 90% of purchasers price based on: Assumed to be 10% less than for sorted waste paperboard
  property carbon content 0.483259
    carbon content on a dry matter basis (reserved; not for manual entry)
  properties: water content 0.243781, water in wet mass 0.196 kg, heating value, net 15.92 MJ, wet mass 1 kg, carbon content, non-fossil 0.483259, dry mass 0.804 kg, carbon content, fossil 0, carbon allocation 0.38854 kg
- waste paperboard, sorted: 1 kg; name BP4; CPC 39240: Waste and scrap of paper or paperboard; By-product classification Recyclable; pedigree (1,1,1,1,1)
  The inventory available in ecoinvent 3.3 (cut-off) for “treatment of waste paper, unsorted, sorting {CH}” was used as a proxy for the sorting process of waste paperboard (cardboard) assuming that the energy need, auxiliary materials and waste content were similar. However, all the waste material flows were replaced with the values reported in the material flow analysis in Haupt et al. (2017).
  For more detail see the supporting information in M. Haupt et al. (2018), Life cycle inventories of waste management processes, Data in Brief 19 (2018) 1441-1457.
  Reference: M. Haupt, C. Vadenbo, S. Hellweg, (2017) Do we have the right performance indicators for the circular economy?: insightin tothe Swiss Waste Management System, J.Ind.Ecol. 21 (2017) 615-627, http://dx.doi.org/10.1111/jiec.12506.
  production volume 3.32356e10 kg; = BP4*PVRP/ABS(RP)
  property price 0.0436 EUR2005; name BP4_price_EUR2005
  properties: wet mass 1 kg, water content 0.243781, water in wet mass 0.196 kg, carbon content, non-fossil 0.483259, heating value, net 15.92 MJ, dry mass 0.804 kg, carbon content, fossil 0, carbon content 0.483259, carbon allocation 0.38854 kg

## By-products
- waste paperboard, sorted: 0 kg; CPC 39240: Waste and scrap of paper or paperboard; By-product classification Recyclable; pedigree (1,1,1,1,1)
  (same comment as for waste paperboard, sorted)
  production volume 0 kg; = BP4*PVRP/ABS(RP)
    Calculated based on the production volume of the reference product.
  property carbon content 0.483259
    carbon content on a dry matter basis (reserved; not for manual entry)
  properties: wet mass 1 kg, water content 0.243781, water in wet mass 0.196 kg, carbon content, non-fossil 0.483259, heating value, net 15.92 MJ, dry mass 0.804 kg, carbon content, fossil 0, carbon allocation 0.38854 kg

## Inputs from technosphere
- waste graphical paper: 0 kg; name BP6; pedigree (1,1,1,1,1)
  (same comment as for waste paperboard, sorted)
  production volume 0 kg
    Calculated based on the production volume of the reference product.
  property price 0 EUR2005; name BP6_price_EUR2005
  properties: dry mass 0.888 kg, water content 0.126126, carbon content, non-fossil 0.454955, heating value, net 14.12 MJ, wet mass 1 kg
  note on heating value, net: Value taken from the general comment of the treatment dataset.
- waste paper sorting facility: 5.99614e-10 unit; lognormal variance with pedigree 0.1786, pedigree (4,5,5,5,5)
  (same comment as for waste paperboard, sorted)
- electricity, medium voltage: 0 kWh; pedigree (1,1,1,1,1)
  (same comment as for waste paperboard, sorted)
- sheet rolling, steel: 0.00118735 kg; lognormal variance with pedigree 0.0466, pedigree (3,4,5,5,1)
  (same comment as for waste paperboard, sorted)
- scrap steel: -0.000742097 kg; name BP7; lognormal variance with pedigree 0.0512, pedigree (4,3,5,5,1)
  (same comment as for waste paperboard, sorted)
  production volume 2.4664e7 kg; = BP7*PVRP/ABS(RP)
    Calculated based on the production volume of the reference product.
  property price 0 EUR2005; name BP7_price_EUR2005
  properties: dry mass 1 kg, wet mass 1 kg
- waste paperboard: 0 kg; name BP5; pedigree (1,1,1,1,1)
  (same comment as for waste paperboard, sorted)
  production volume 0 kg
    Calculated based on the production volume of the reference product.
  property price 0 EUR2005; name BP5_price_EUR2005
  properties: heating value, net 15.92 MJ, dry mass 0.804 kg, wet mass 1 kg, water content 0.243781, carbon content, non-fossil 0.483259
- steel, unalloyed: 0.00118735 kg; lognormal variance with pedigree 0.0466, pedigree (3,4,5,5,1)
  (same comment as for waste paperboard, sorted)
  properties: carbon content, fossil 0.0025, wet mass 1 kg, dry mass 1 kg
- waste textile, soiled: -0.000742097 kg; name BP2; lognormal variance with pedigree 0.0512, pedigree (4,3,5,5,1)
  (same comment as for waste paperboard, sorted)
  production volume 2.4664e7 kg; = BP2*PVRP/ABS(RP)
    Calculated based on the production volume of the reference product.
  property price 0 EUR2005; name BP2_price_EUR2005
  properties: heating value, net 14.45 MJ, carbon content, non-fossil 0.570519, wet mass 1 kg, dry mass 0.75 kg, water content 0.333333
- waste wood, untreated: 0 kg; name BP1; pedigree (1,1,1,1,1)
  (same comment as for waste paperboard, sorted)
  production volume 0 kg
    Calculated based on the production volume of the reference product.
  property price 0 EUR2005; name BP1_price_EUR2005
  properties: dry mass 0.8 kg, water content 0.25, heating value, net 13.99 MJ, wet mass 1 kg, carbon content, non-fossil 0.48632
- lubricating oil: 1.18735e-5 kg; lognormal variance with pedigree 0.0466, pedigree (3,4,5,5,1)
  (same comment as for waste paperboard, sorted)
  properties: carbon content, fossil 0.75, wet mass 1 kg, dry mass 1 kg, heating value, net 40.2 MJ
  note on heating value, net: Literature value, Source: IPCC 2006, 2006 IPCC Guidelines for National Greenhouse Gas Inventories, Prepared by the National Greenhouse Gas Inventories Programme, Eggleston H.S., Buendia L., Miwa K., Ngara T. and Tanabe K. (eds). Published: IGES, Japan
- heat, central or small-scale, other than natural gas: 0.0144165 MJ; lognormal variance with pedigree 0.0466, pedigree (3,4,5,5,1)
  (same comment as for waste paperboard, sorted)
  properties: heating value, net 1 MJ
- waste plastic, mixture: 0 kg; name BP3; pedigree (1,1,1,1,1)
  (same comment as for waste paperboard, sorted)
  production volume 0 kg
    Calculated based on the production volume of the reference product.
  property price 0 EUR2005; name BP3_price_EUR2005
  properties: dry mass 0.847 kg, carbon content, fossil 0.747344, heating value, net 30.79 MJ, water content 0.180638, wet mass 1 kg
- waste paperboard, unsorted: 1.0142 kg
  production volume 3.37075e10 kg
  properties: water content 0.243781, heating value, net 15.92 MJ, wet mass 1 kg, carbon content, non-fossil 0.483259, dry mass 0.804 kg
- waste graphical paper: -0.00041736, -6.37327e-5, -5.57285e-6, -0.000230293, -2.24555e-5, -4.15674e-5, -0.00775313 kg (7 entries); lognormal variance with pedigree 0.0512, pedigree (4,3,5,5,1)
  (same comment as for waste paperboard, sorted)
  production volume 2.83636e8 kg
- electricity, medium voltage: 0.000115993, 2.22425e-5, 0.000373405, 0.00543083, 0.000765479, 0.00249405 kWh (6 entries); lognormal variance with pedigree 0.0512, pedigree (4,3,5,5,1)
  (same comment as for waste paperboard, sorted)
- waste paperboard: -0.000217753, -3.32518e-5, -2.90757e-6, -0.000120153, -1.17159e-5, -2.16874e-5, -0.00404511 kg (7 entries); lognormal variance with pedigree 0.0512, pedigree (4,3,5,5,1)
  (same comment as for waste paperboard, sorted)
  production volume 1.47984e8 kg
- waste wood, untreated: -4.98556e-5, -6.19033e-6, -4.52583e-7, -1.73868e-5, -2.62672e-6, -4.15263e-6, -0.000661432 kg (7 entries); lognormal variance with pedigree 0.0512, pedigree (4,3,5,5,1)
  (same comment as for waste paperboard, sorted)
  production volume 2.4664e7 kg
- waste plastic, mixture: -0.00117035, -7.81982e-5, -5.91401e-6, -3.22987e-5, -1.30483e-5, -3.06706e-5, -0.00819309 kg (7 entries); lognormal variance with pedigree 0.0512, pedigree (4,3,5,5,1)
  (same comment as for waste paperboard, sorted)
  production volume 3.16522e8 kg

## Extrapolations
This dataset for GLO has been extrapolated from the corresponding activity in Switzerland. The uncetainty information has been adjusted accordingly.
