# clay pit operation

Dataset: EcoSpold 2, unit process
Geography: CH
Time period: 1992-01-01 to 2021-12-31
Technology level: current
Classification: ISIC rev.4 ecoinvent: 0810:Quarrying of stone, sand and clay
Classification: EcoSpold01Categories: construction materials/additives
Synonyms: loam
Tags: ConvertedDataset
Scenario: Business-as-Usual
System model: Allocation, cut-off by classification
Generated by: Daniel Kellenberger (obsolete)
Published in: Kellenberger D. 2007
Database: ecoinvent
isCopyrightProtected: true
accessRestrictedTo: 1

## General comment
This dataset represents the production of 1 kg of clay in a mine, assuming a thickness of the clay layer in nature of 30m.
Clay pit. Image source: https://commons.wikimedia.org/wiki/File:Mettingen_Querenberg_Clay_Pit_02.jpg, accessed 20151211

## Included activities start
From clay at ground, unexcavated.

## Included activities end
The dataset ends with the transportation to first grinding machine. The dataset includes the land use and transformation and the recultivation of the area. The dataset doesn't include further treatments of the clay (i.e. water consumption).

## Geography
Data was obtained from Swiss industries.

## Technology
The typical technology for swiss clay mining was assumed.
Reserves and resources: The yearly amount of clay digged in the Swiss clay pits is between 100 and 100'000m3. The average amount is about 25'000m3. For the production of clay products in total about 1.4 Mio m3 raw material (loose volume) has been mined in the year 1991. The guaranteed amount of reserves of raw material (consolidated volume) in Switzerland is about 35 Mio. m3. This meets the Swiss demand for the next 35 to 40 years. It is assumed that about 70 Mio. m3 of raw material near the existing mines is an additionally available but not guaranteed reserve. In addition Switzerland has a huge potential on raw material specially molasse marl and opalinus clay. For other raw materials as for example loess clay the reserves are very small.
The Swiss Geotechnical Commission made the following general comment on resources of primary materials in Switzerland .
The resources used from the non-metallic minerals industry can be regarded as quarryable when their mining is possible with actual technology, the usage realisable with supportable financial and temporal expenditure and if the utilisation does not collide with other interests. This last point causes a lot of problems in Switzerland as in the intensely populated landscape (Middle Lands) all different kind of utilizations collide. These are for example water protection, set-tlement area etc. This circumstance reduces the real quarryable area fundamentally.
References:
Kündig R., Mumenthaler T., Eckardt P., Keusen H. R., Schindler C., Hofmann F., Vogler R. and Guntli P. (1997) Die mineralischen Rohstoffe der Schweiz. Schweizerische Geotechnische Kommission, Zürich.

## Reference product
- clay: 1 kg; CPC 15400: Clays; By-product classification allocatable product
  EcoSpold01Location=CH
  Ullmann's encyclopaedia of industrial chemistry describes the situation referring to the primary raw material in full range.
  "A great variety of clay sediments are used, ranging from loose to compact in consistency. The principal raw materials are loams, clays, marls, mudstone, shale, and slate together with smaller quantities of boulder clay, loess, and sand. They can contain all types of suitable clay minerals (layered silicates), such as illite, sericite, kaolinite, chlorite, and montmorillonite. Quartz is an important component and is always present, and there can also be considerable amounts of calcite, dolomite, and iron compounds. The composition and particle size are the two principal factors that determine the nature of the products." (Hauck et al. (1997))
  Wendehorst & Vollenschaar (1998) write that the main component of the raw material clay (and therefore brick) is Kaolin. Kaolin approaches the formula of the mineral kaolinite (Al2O3.2SiO2.2H2O). As all other clays it is weathered feldspar rock containing several impurities like quartz, mica, residual feldspar, calcite, organic substances and/or Fe-oxides. The various geological and weathering conditions determine the type and composition of clay beds.
  Kaolins are primary clays formed by local decomposition of feldspar. They are mainly found in small depressions rather than in vast stratified layers and they are relatively free from mineral impurities like iron. Their grain is coarse and they are not plastic, compared to most sedimentary clays. Pure kaolins are very refractory and their melting point exceeds 1’760 °C. They are very difficult to use in genuine state because of their low plasticity and high melting point. Consequently other materials are added to make Kaolin more plastic and to lower its melting point.
  "Some constituents used as raw material for the production of clay products are harmful. These are mainly coarse pyrites and limestone inclusions because they can cause spalling and sulphur compounds, which can cause efflorescence. Other harmful constituents are large carbonaceous particles and plant remains.
  Whereas common bricks may be manufactured from fairly low-quality clays, large hollow bricks require adequate plasticity of the clay body. For hollow bricks, clays and marls are used primarily, sometimes mixed with loam and shale. Other products with a porous structure are produced from these raw materials, e.g., face bricks, paving bricks, roofing tiles, drainage pipes, and cable conduits. Clinker, with its impervious or nearly impervious structure is produced mainly from shale and stoneware clays. Shale clay tends to be used for the manufacture of clinker face bricks, high-compressive-strength solid or hollow bricks, paving bricks, and sewer channel bricks. Stoneware clays are the first choice for high-quality face bricks, for split clinker flags and flooring tiles".
  production volume 3.25673e7 kg; = 18889035/0.58
    Estimated value. According to the European mineral statistics 2009-2013 (http://www.bgs.ac.uk/mineralsuk/statistics/europeanStatistics.html), Switzerland does not export Bentonite and imports 19982 tons. For Kaolin it exports 425 tons and imports 17924 tons. Similar values are reported from the Swiss statistical data (https://www.swiss-impex.admin.ch/, accessed 08.02.2016). The production volume for Switzerland are calculated based on the import volume for 2014. Code, name and import volume for CH in kg: 2508.1000 “Bentonite” 19,037,054 kg, 2508.3000 “ Fireclay (excl. expanded clays, kaolin and other kaolinic clays)” 7,608,438kg, 2508.4000 “Clays (excluding fireclay, expanded clay, and kaolin and other kaolinic clays)” 18,889,035 kg, and 2507.0000 “Kaolin and other kaolinic clays, whether or not calcined” 16,839,960 kg. The volume of produced clay is assigned to the different activities based on USGS (2015) estimates of uses in the USA (http://minerals.usgs.gov/minerals/pubs/commodity/clays/mcs-2015-clays.pdf, accessed 08.02.2016) and according to input of clay per reference product. Of common clay, 39% is used for brick (for which 50% is assumed to be used for clay bricks and 50% light clay bricks), 23% lightweight aggregate, 31% cement, and 7% other uses (USGS specifies that 9% of common clay is used for lightweight concrete block production in the 2013 Minerals yearbook http://minerals.usgs.gov/minerals/pubs/commodity/clays/myb1-2013-clays.pdf, accessed 08.02.2016). Of ball clay, 39% is used for floor and wall tiles, 17% sanitary ware, and 44% other uses. Of bentonite 26% absorbents, 24% drilling mud, 15% foundry sand bond (assumed to represent plaster clay), 11% iron ore pelletising, and 24% other uses. Of fire clay, 34% for heavy clay products, and 66% for refractory and other products. Of fuller’s earth, 70% absorbents, and 30% for other uses. The US produce 15 to 25 % of refined clays (without common clay and shale).
  property price 0.075 EUR2005
    Calculated value based on data from United Nations Commodity Trade Statistics Database (comtrade.un.org). UN comtrade category: 250840 Other clays(except expanded clay for insultaion). Year 2005. Using exchange rate of 1EURO = 1.209 USD. Average of price of import into 5 main markets (EU, US, JP, IN and CN). THe price of clay depends on the type. The price of expanded clay is: from United Nations Commodity Trade Statistics Database (comtrade.un.org). UN comtrade category: 6806 Slag wool, rock wool, insultaing materials not asbesto. Year 2005. Using exchange rate of 1EURO = 1.209 USD. Average of price of import into 5 main markets (EU, US, JP, IN and CN). The price of clay for plaster is: Calculated value based on data from United Nations Commodity Trade Statistics Database (comtrade.un.org). UN comtrade category: 250810 Bentonite. Year 2005. Using exchange rate of 1EURO = 1.209 USD. Average of price of import into 5 main markets (EU, US, JP, IN and CN). The price for clay for refractory production is: United Nations Commodity Trade Statistics Database (comtrade.un.org). UN comtrade category: 250830 Fire-clay. Year 2005. Using exchange rate of 1EURO = 1.209 USD. Average of price of import into 5 main markets (EU, US, JP, IN and CN).
  property carbon content, non-fossil 0
    The main component of clay is Kaolin (approx like kaolinite, Al2O3-2SiO2-2H2O), ecoinvent v2.2 report 7, part IV, pg 8
  property carbon content, fossil 0
    (same comment as for clay)
  property carbon content 0
    carbon content on a dry matter basis (reserved; not for manual entry)
  properties: water in wet mass 0.035 kg, dry mass 0.965 kg, water content 0.0362694, wet mass 1 kg, carbon allocation 0 kg

## Inputs from technosphere
- recultivation, bauxite mine: 1.67e-5 m2; lognormal variance with pedigree 0.2481, pedigree (5,2,5,1,3)
  EcoSpold01Location=GLO
  Proxy. The recultivation of a bauxite mine was used as a proxy.
  Estimation, based on a visit and an air photo of brickworks Gasser in Rapperswil BE.
- diesel, burned in building machine: 0.0297 MJ; source Bruck, M. 1996; lognormal variance with pedigree 0.0406, pedigree (1,3,5,1,1)
  EcoSpold01Location=GLO
  Literature vakue.This data considered the diesel compsumtion concerning the excavation.
  properties: heating value, net 1 MJ
- clay pit infrastructure: 2.5e-10 unit; = 1/( lifetimecapacity_kg); lognormal variance with pedigree 0.36, pedigree (4,4,5,5,3)
  Calculated value. From specifics for clay pit construction GLO 2002 dataset : Data are estimated based on an air-picture and sketches of the process. The avarage yearly production volume is about 100'000 t, Total land occupation: 40'000m; about 20'000m2 buildings (1'000m2 multi storey and 19'000m2 hall), 15'000m2 paved roads, 5'000m2 vegetation. Assumed weight of machines: 2'000t and service life of 25 years.
  property lifetime 50 year; name lifetime_yr
  property lifetime capacity [kg] 4e9 kg; name lifetimecapacity_kg; = capacity_kg*lifetime_yr
  property capacity [kg] 8e7 kg; name capacity_kg
  note on lifetime: See dataset for clay pit construction: "This dataset is applied to a plant with a total produced amount per unit (50 years) of 4,000,000,000 kg (yearly production = 80,000,000 kg).."

## Inputs from nature
- Clay, unspecified, in ground [natural resource, in ground]: 1 kg; lognormal variance with pedigree 0.04, pedigree (1,1,5,1,1)
  Estimation, based on a visit and an air photo of brickworks Gasser in Rapperswil BE.
  The density of the clay is 20,000 kg/m3.
- Transformation, from unspecified [natural resource, land]: 1.67e-5 m2; lognormal variance with pedigree 0.2401, pedigree (5,2,5,1,1)
  Estimation, based on a visit and an air photo of brickworks Gasser in Rapperswil BE.
- Transformation, to mineral extraction site [natural resource, land]: 1.67e-5 m2; lognormal variance with pedigree 0.2401, pedigree (5,2,5,1,1)
  Estimation, based on a visit and an air photo of brickworks Gasser in Rapperswil BE.
  The volume of the excavation amount of clay was based on an estimated thickness of the clay layer of 30m. Therefore, the total volume per m2 was 30 m3 of clay. As the density is 2.000 kg/m2, the total weight of 60,000 kg of excavated clay is obtained per m2. Thus per kg of clay, the land used is 1/60,000 m2. Regarding the soil removed before diggind, the layer is very small (maximum 0.5m) compared to the layer of clay and, therefore, is neglected.
- Occupation, mineral extraction site [natural resource, land]: 0.000167 m2*year; lognormal variance with pedigree 0.1601, pedigree (5,2,5,1,1)
  Estimation, based on a visit and an air photo of brickworks Gasser in Rapperswil BE.
  The transition form mining to recultivation is fluid, as there is no exact time when a certain area is exploited and being recultivated. It was assumed that after 10 years a certain mineable area is exploted and clay is digged to in a nearby area, and then the exhausted area is recultivated. So, the total occupation is 10 times the land transportation (10 years * 1.667E-05 m2 = 1.667E-04 m2a).

## Extrapolations
This dataset has been extrapolated from year 2002 to the year of the calculation (2021). The uncertainty has been adjusted accordingly.

## Review by Roland Hischier 2011-09-22
Transfer of documentation done.

## Review by Roberto Dones 2003-07-04
Passed
