# geothermal power plant construction, undefined type

Dataset: EcoSpold 2, unit process
Geography: GLO
Time period: 2008-01-01 to 2021-12-31
Technology level: current
Classification: ISIC rev.4 ecoinvent: 4220:Construction of utility projects
Tags: Geothermal power; Infrastructure
Scenario: Business-as-Usual
System model: Allocation, cut-off by classification
Generated by: Karin Treyer
Database: ecoinvent
isCopyrightProtected: true
accessRestrictedTo: 1

## General comment
This dataset stands for all types of geothermal power plants except for binary cycle (Hot-Dry-Rock) geothermal plants and therefore represents 89% of installed geothermal capacity worldwide and 91% of geothermal power produced, respectively (Ruggero, B. 2010. Geothermal Power Generation in the World. 2005-2010 Update Report. Proceedings World Geothermal Congress 2010; Bali, Indonesia, 25-29 April 2010). Due to data-unavailability, this dataset is only an extrapolated copy of the existing Hot-Dry-Rock geothermal plant dataset and has to be adapted by specialists. Ideally, there should be built representative datasets for each class or even type of geothermal plants, which are according to (Ruggero 2010): SMALL (binary, back pressure) - about 5 MW per unit; MEDIUM (flash plants) - about 30 MW per unit; BIG (dry steam) - about 45 MW per unit. The percentages given in this paper are the following for installed capacity: 1% Back pressure, 11% Binary, 20% Double Flash, 27% Dry Steam, and 41% Single Flash.

The proxy dataset has the following properties: Enhanced geothermal systems (EGS), also known as Hot-Dry-Rock (HDR) systems, enable the exploration of the Earth’s interior heat outside known geothermal provinces. EGS are exploited with artificial stimulation of tight rock formations by hydraulic fracturing in order to create an underground heat exchanger. Fluid is circulated in a closed circle during operation, whereby reservoir pressures and fluid throughputs are managed by balanced production and injection rates in multiple well array.

The plant modelled in this dataset consists out of three deep boreholes with depths between 5000 m and 6000 m. One of them is used as the injection well for the cold fluid leaving the generation unit, the other two as production wells, which provide the hot fluid, heated up within the hot rock formation. One test drilling of 2000m depth for exploration (rock, temperature gradient, aquifers, etc.) is conducted. Then, the injection and the production wells are drilled. The injection well is used for the stimulation of the rock (fracturing): A mixture of water and sand is pressed down with high pressure in order to enlarge the present fractures in the rock and to make it more permeable. During the operation of the power plant, water will pass through this permeable (hot) rock, be heated and pumped through the production well to the ORC unit.

A temperature gradient of 35-40°C per kilometer depth can be assumed. An Organic Rankine Cycle unit with binary cycle and a capacity of 3MWel is used for electricity generation. Further key components of the plant are chromium steel pipes between the injection wells and the generation unit and for water supply. A lifetime of 20 years is assumed for the power plant.

Source of the image: Geothermal Explorers Ltd. 2011. Project Deep Heat Mining Basel. http://www.geothermal.ch; visited January 2011.

## Included activities start
Construction of an unspecified geothermal power plant

## Included activities end
This activity ends with the geothermal power plant constructed and ready for electricity production.

Energy use for pumping is directly taken from the energy produced at the ORC unit.

This dataset doesn't include most of the dismantling activities. It does not include motor vehicles for internal transport and minor maintenance items. It does not include further buildings for administration or maintenance. The chromium steel pipes usually remain in the ground after use. No outputs to the environment (leaching) has been considered.

## Technology
In this dataset, an orginal 3MWel Hot-Dry-Rock power plant is extrapolated to a 30MWel plant.
Original dataset: Hot-Dry-Rock geothermal power plant

- Rock temperature in a depth of 5500m: ca. 230°C.

- ORC unit: 3MWel, 30MWth. No use of the thermal capacity.

- Flow rate: 224 m3/h

- Land required: 7500m2

## Parameters
- Operation time: 7000 hour/year; name operation_time; lognormal variance with pedigree 0.1406, pedigree (4,4,5,4,4)
  Estimation
- Production of electricity, new installed: 3.23148e9 kWh/year; name electricity_new; lognormal variance with pedigree 0.030325, pedigree (3,2,2,2,3)
  Estimated value/calculated value. Data sources: Ruggero, B. 2010. Geothermal Power Generation in the World. 2005-2010 Update Report. Proceedings World Geothermal Congress 2010; Bali, Indonesia, 25-29 April 2010
  Wikipedia. 2011. Geothermal electricity. Wikipedia, The Free Encyclopedia. Last visit on 12.12.2011
- fraction, process water, to air: 0.15 dimensionless; name fraction_PW_to_air; lognormal variance with pedigree 0.092025, pedigree (4,4,3,2,4)
  Literature value. In case when no industry/process specific data are available, default evaporation fraction value is used. This value is 15% and is based on literature (Statistics Canada, 2007 & Shaffer, K.H., 2008, Consumptive water use in the Great Lakes Basin, USGS & Shiklomanov, 2003, World Water Resources at the Beginning of the 21st Century) and has been approved by an expert.
- percentage: 0.91 dimensionless; lognormal variance with pedigree 0.043325, pedigree (3,2,5,2,2)
  Percentage of energy produced in back pressure, single/double flash, dry steam and hybrid geothermal power plants worldwide: 91%. [Ruggero, B. 2010. Geothermal Power Generation in the World. 2005-2010 Update Report. Proceedings World Geothermal Congress 2010; Bali, Indonesia, 25-29 April 2010]
  Uncertainty: Uncertainty slightly raised because the year the data are valid is not known for sure. However, it is sure that the value has been gathered in the latest in the beginning of 2010.

## Reference product
- geothermal power plant, undefined type: 1 unit; By-product classification allocatable product; CPC 53262: Power plants
  production volume 14.0031 unit; = ( electricity_new* percentage)/( operation_time* capacity_MW_undefined*1000)
    Calculated value
  property lifetime 20 year; name lifetime
    Estimation
  property price 1.6279e8 EUR2005
    Calculated based on inputs: The price of the product has been calculated as a sum of the values of the material and energy inputs for this product. This value is therefore a rough estimation. It may underestimate the real price since there are additional expenses when producing any product. These expences can include for example labour costs, treatment of waste materials and profit for the producer. Please consider carefully whether this level of data quality is acceptable for your application.
  property capacity [MW] 30 MW; name capacity_MW_undefined

## Inputs from technosphere
- chromium steel pipe: 302400 kg; = 37800*8; source Rogge S. 2004, p. p.93; lognormal variance with pedigree 0.2106, pedigree (5,5,5,5,5)
  Literature value/extrapolation. The original value for a 3MWel Hot-Dry-Rock plant was extrapolated with a factor 8, as there are assumed 8 well tripletts for the 30MWel plant.
  These are the fluid pipes for the connection of the production wells with the ORC unit and back into the injection well again. Data from (Rogge 2004) for an installed capacity of 1 MWel and a length of pipes of 1600 m are directly used for the modelled plant. The pipes are piped underground.
  If the working temperature of the water is lower than 90°C, there could also be used plastic pipes.
  properties: dry mass 1 kg, wet mass 1 kg, carbon content, fossil 0.0008
  note on carbon content, fossil: Stainless steel model is the grade 304 steel (18/8 stainless, 18% chromium 8% nickel; max. 0.08% C)
- diesel, burned in building machine: 1.456e7 MJ; = 1.82E+06*8; source Rogge S. 2004; lognormal variance with pedigree 0.2106, pedigree (5,5,5,5,5)
  Literature value/extrapolation. The original value for a 3MWel Hot-Dry-Rock plant was extrapolated with a factor 8, as there are assumed 8 well tripletts for the 30MWel plant.
  Used for stimulation (fracturing). After drilling of the boreholes, the injection well is used for the stimulation of the rock (fracturing): A mixture of water and sand is pressed down with high pressure in order to enlarge the present fractures in the rock and to make it more permeable. During the operation of the power plant, water will pass through this permeable (hot) rock, be heated and pumped to the ORC unit in the production well.
  properties: heating value, net 1 MJ
- sand: 0 kg; source Rogge S. 2004, p. p.93; pedigree (1,1,1,1,1)
  Literature value/extrapolation. The original value for a 3MWel Hot-Dry-Rock plant was extrapolated with a factor 8, as there are assumed 8 well tripletts for the 30MWel plant.
  Used for stimulation as fracture propping agent (proppant). After drilling of the boreholes, the injection well is used for the stimulation of the rock (fracturing): A mixture of water and sand is pressed down with high pressure in order to enlarge the present fractures in the rock and to make it more permeable. During the operation of the power plant, water will pass through this permeable (hot) rock, be heated and pumped to the ORC unit in the production well.
  Rogge (2004) assumes 60t of sand per well.
  properties: dry mass 1 kg, wet mass 1 kg
- steel, low-alloyed: 116800 kg; = 7300*2*8; source Rogge S. 2004, p. p.93; lognormal variance with pedigree 0.2106, pedigree (5,5,5,5,5)
  Literature value/estimated value/extrapolation. The original value for a 3MWel Hot-Dry-Rock plant was extrapolated with a factor 8, as there are assumed 8 well tripletts for the 30MWel plant.
  Used for rising pipes in the production well and the pump.
  Rogge (2004) assumes 7.3t of steel for these elements per production well.
  properties: dry mass 1 kg, carbon content, fossil 0.005, wet mass 1 kg
  note on carbon content, fossil: Low alloyed steel composition given in Tab. 3.2 ecoinvent v2.2 report 10_partII. Steel assumed to have a C content of 0.5%
- excavation, hydraulic digger: 24000 m3; = 3000*8; source Rogge S. 2004, p. p.93; lognormal variance with pedigree 0.2106, pedigree (5,5,5,5,5)
  Literature value/extrapolation. The original value for a 3MWel Hot-Dry-Rock plant was extrapolated with a factor 8, as there are assumed 8 well tripletts for the 30MWel plant.
  The chromium steel pipes will be piped in this trench.
- deep well, for geothermal power, onshore, 6000m: 145000 m; name deep_well; = 8*3*6000+2000/2; source Häring M. 2002; lognormal variance with pedigree 0.2106, pedigree (5,5,5,5,5)
  Estimated value/extrapolation. The original value for a 3MWel Hot-Dry-Rock plant was extrapolated with a factor 8, as there are assumed 8 well tripletts for the 30MWel plant. However, there is assumed only one test drilling.
  The plant modelled in this dataset consists out of three deep boreholes with depths of about 5500 m and, as the holes are not totally straight, a total length of about 6000m. One of them is used as the injection well for the cold fluid leaving the generation unit, the other two as production wells, which provide the hot fluid, heated up within the hot rock formation. One test drilling of 2000m depth is assumed, but with a smaller diameter than for the production and injection wells, therefore operating expenses should be smaller. A reduction of 50% is arbitrarily assumed.
- heat and power co-generation unit, organic Rankine cycle, 3MW electrical: 10 unit; = 1*10; source Häring M. 2002; lognormal variance with pedigree 0.2106, pedigree (5,5,5,5,5)
  Estimation/extrapolation. The original value for a 3MWel Hot-Dry-Rock plant was extrapolated with a factor 10 for the 30MWel plant.
- deep well closure: 145000 m; = deep_well; source Häring M. 2002; lognormal variance with pedigree 0.2106, pedigree (5,5,5,5,5)
  Estimated value/extrapolation. The original value for a 3MWel Hot-Dry-Rock plant was extrapolated with a factor 8, as there are assumed 8 well tripletts for the 30MWel plant.
  The plant modelled in this dataset consists out of three deep boreholes with depths of about 5500 m and, as the holes are not totally straight, a total length of about 6000m. One of them is used as the injection well for the cold fluid leaving the generation unit, the other two as production wells, which provide the hot fluid, heated up within the hot rock formation. One test drilling of 2000m depth is assumed, but with a smaller diameter than for the production and injection wells, therefore operating expenses should be smaller. A reduction of 50% is arbitrarily assumed.
- sand: 113.11, 21787.5, 260.867, 1.41784e6 kg (4 entries); source Rogge S. 2004, p. p.93; lognormal variance with pedigree 0.2106, pedigree (5,5,5,5,5)
  (same comment as for sand)

## Inputs from nature
- Transformation, to industrial area [natural resource, land]: 45000 m2; = land_use; source Häring M. 2002; lognormal variance with pedigree 0.25, pedigree (5,5,5,5,5)
  Estimated value/measured value/extrapolation. The original value for a 3MWel Hot-Dry-Rock plant was extrapolated with a factor 8, as there are assumed 8 well tripletts for the 30MWel plant.
  This value is taken from a projected geothermal plant in Switzerland. It includes land use of the well and of the whole power plant area, including buildings etc. It is estimated that the drillings are made greenfield.
- Water, unspecified natural origin [natural resource, in water]: 6000 m3; name water_UNO_input; = 8*3*250; source Rogge S. 2004, p. p.93; lognormal variance with pedigree 0.2106, pedigree (5,5,5,5,5)
  Literature value/extrapolation. The original value for a 3MWel Hot-Dry-Rock plant was extrapolated with a factor 8, as there are assumed 8 well tripletts for the 30MWel plant.
  Used for stimulation. After drilling of the boreholes, the injection well is used for the stimulation of the rock (fracturing): A mixture of water and sand is pressed down with high pressure in order to enlarge the present fractures in the rock and to make it more permeable. During the operation of the power plant, water will pass through this permeable (hot) rock, be heated and pumped to the ORC unit in the production well.
  Rogge (2004) assumes 250 m3 water per well.
  Literature value/extrapolation. The original value for a 3MWel Hot-Dry-Rock plant was extrapolated with a factor 8, as there are assumed 8 well tripletts for the 30MWel plant.
  Used for stimulation. After drilling of the boreholes, the injection well is used for the stimulation of the rock (fracturing): A mixture of water and sand is pressed down with high pressure in order to enlarge the present fractures in the rock and to make it more permeable. During the operation of the power plant, water will pass through this permeable (hot) rock, be heated and pumped to the ORC unit in the production well.
  Rogge (2004) assumes 250 m3 water per well.
- Transformation, from pasture, man made [natural resource, land]: 45000 m2; name land_use; = 6*7500; source Häring M. 2002; lognormal variance with pedigree 0.25, pedigree (5,5,5,5,5)
  Estimated value/measured value/extrapolation. The original value for a 3MWel Hot-Dry-Rock plant was extrapolated with a factor 6 (rough estimation). There are 8 well tripletts for the 30MWel plant assumed.
  This value is taken from a projected geothermal plant in Switzerland. It includes land use of the well and of the whole power plant area, including buildings etc. It is estimated that the drillings are made greenfield.
- Occupation, industrial area [natural resource, land]: 900000 m2*year; = land_use*lifetime; lognormal variance with pedigree 0.25, pedigree (5,5,5,5,5)
  Calculated value

## Emissions to nature
- Water [air, unspecified]: 900 m3; name water_to_air_unspecified; = water_UNO_input*fraction_PW_to_air; lognormal variance with pedigree 0.130025, pedigree (4,4,5,2,4)
  Calculated value based on literature values and expert opinion. See comments in the parametres' comment field.
  property fraction, origin: unspecified 1; name fraction_origin_unspecified
  property fraction, origin: fresh water 0; name fraction_origin_fresh_water
  property fraction, origin: salt water 0; name fraction_origin_salt_water
- Water [water, unspecified]: 5100 m3; name water_to_water_unspecified; = water_UNO_input*(1-fraction_PW_to_air); lognormal variance with pedigree 0.130025, pedigree (4,4,5,2,4)
  (same comment as for Water)
  property fraction, origin: salt water 0; name fraction_origin_salt_water_Ww
  property fraction, origin: fresh water 0; name fraction_origin_fresh_water_Ww
  property fraction, origin: unspecified 1; name fraction_origin_unspecified_Ww

## Sampling procedure
Literature

## Extrapolations
This dataset has been extrapolated from year 2008 to the year of the calculation (2021). The uncertainty has been adjusted accordingly.

## Review by Bo Weidema 2012-12-07
Extrapolation from 3MWel to 30MWel plant.
Documentation and assumptions reviewed and found adequate.

## Review by Bo Weidema 2012-01-12
passed
Reviewed for relevance of daatset structure, exchanges and quality of documentation and readability

## Review by Bo Weidema 2012-01-12
As an exception, this dataset was only reviewed by one reviewer.
