# heavy mineral sand quarry operation

Dataset: EcoSpold 2, unit process
Geography: RoW
Time period: 2015-01-01 to 2021-12-31
Technology level: current
Classification: EcoSpold01Categories: chemicals/inorganics
Classification: ISIC rev.4 ecoinvent: 0729:Mining of other non-ferrous metal ores
Scenario: Business-as-Usual
System model: Allocation, cut-off by classification
Share of production covered: 77 %
Generated by: Gediga Johannes
Published in: Johannes Gediga 2019
Database: ecoinvent
isCopyrightProtected: true
accessRestrictedTo: 1

## General comment
This dataset refers to the production of 1 kg of zircon sand (reference product) and 1.286 kg of ilmenite and 0.409 kg of rutile (co-products) as a result mining and mineral separation activities applied on the heavy mineral sands (HMS). This dataset is based on the Gediga et al (2019) publication. According to that source, the dataset is meant to be a global average representation of the zircon sand production (data taken from 8 companies including 10 production sites, covering all major producing countries – Australia, South Africa, Kenya, Senegal and USA) representing 77% of the global situation.
The authors of the abovementioned publication acknowledge the existence of radioactive emissions, but their values were not provided. These emissions were included for completeness purposes and their respective amounts were taken from the previous existing dataset in Ecoinvent about the production of zircon sand (''heavy mineral sand quarry operation, GLO,2000-2005'' provided by Ecoinvent version 3.7 - see respective exchange comments). Due to lack of information, the exchange ''waste for recovery'' was approximated as non-sulfudic overburden, based on the information provided in Lundberg 2012 – where it is stated that 90% of the extracted materials return to the mining void.

Reference 1: Gediga, J., Morfino, A., Finkbeiner, M., Schulz, M., & Harlow, K. (2019). Life cycle assess-ment of zircon sand. The International Journal of Life Cycle Assessment, 24(11), 1976-1984. doi:10.1007/s11367-019-01619-5.

Reference 2: Lundberg, M. (2012). Environmental analysis of zirconium alloy production. (11061 Student thesis), Retrieved from http://urn.kb.se/resolve?urn=urn:nbn:se:uu:diva-166178 DiVA da-tabase.
[This dataset is meant to replace the following datasets:
- heavy mineral sand quarry operation, GLO, 2000 - 2005]
[This dataset is meant to replace the following datasets:
- heavy mineral sand quarry operation, GLO, 2019 - 2023]

## Included activities start
The activity starts with the mining of the heavy mineral sands.

## Included activities end
The activity ends with the production of zircon sand, rutile and ilmenite.

## Geography
As mentioned in the general comment, the dataset is meant to be a global average representation of the zircon sand production (data taken from 8 companies including 10 production sites, covering all major producing countries – Australia, South Africa, Kenya, Senegal and USA) representing 77% of the global situation.

## Technology
There are two ways for mining zircon sand: dry & wet mining with the choice of mining depending on the structure of the geological deposit. During wet mining, floating dredges and a floating concentrator are utilized in an enclosed pond, where the concentrator moves behind the dredges. Wet mining is the preferred technique for large continuous deposits with amounts of clay.
For all other types of HMS deposits (hard-ground deposits, discontinuous deposits and small tonnage high-grade deposits), dry mining is the most preferred mining process. Dry mining utilizes earth-moving machinery (loaders, excavators, scrapes) for the purposes of sand excavation and transportation to the concentrator. The mining unit plants used in dry mining are mobile in order to minimize the transport distance of the sand.
After the transportation of the HMS to the respective concentrator, wet gravity separations techniques (spirals) are usually applied for the production of the heavy mineral concentrate (HMC), although some hard-rock sites use bulk froth flotation to extract the heavy minerals from the sand. The produced slurry from dry and wet mining is then fed to the concentrator, where the HMC (90-96% heavy minerals) is produced along with the tailings that are backfilled in the mined areas. The HMC is transported to a mineral separation plant (MSP), where the HMC is subjected to scrubbing, drying and is separated by magnetic, electrostatic and gravity separation, producing zircon sand, ilmenite and rutile, with the last two considered as byproducts.

## Time period
Data are considered representative of current production practices.

## Reference product
- ilmenite, 54% titanium dioxide: 1 kg; name bp1; CPC 4160: Other non-ferrous metals and articles thereof (including waste and scrap of some metals); cermets and articles […]; By-product classification allocatable product; CAS 12168-52-4; pedigree (1,1,1,1,1)
  The value represents the production of ilmenite as a result of the mineral separation plant (MSP) activities. The value is taken from Table 2 of the following publication: Gediga, J., Morfino, A., Finkbeiner, M., Schulz, M., & Harlow, K. (2019). Life cycle assessment of zircon sand. The International Journal of Life Cycle Assessment, 24(11), 1976-1984. doi:10.1007/s11367-019-01619-5. ). The value has been adjusted (compared to the original value reported) to represent the production of 1 kg of zircon.
  EcoSpold01Location=AU
  production volume 7.9714e8 kg; = PVRP*bp1
    Calculated from production volume of reference product using the relative outputs.
  property price 0.109695 EUR2005
    Price approximated with the price of "Ilmenite, bulk, minimum 54% TiO2, f.o.b. Australia" reported in the USGS Mineral Commodity Summaries for Titanium Mineral Concentrates from 2009 to 2017 (https://www.usgs.gov/centers/nmic/titanium-statistics-and-information). The prices given in USD were converted to EUR based on the annual exchange rates published by the European Central Bank (https://sdw.ecb.europa.eu/quickview.do?SERIES_KEY=120.EXR.A.USD.EUR.SP00.A), and then adjusted for inflation relative to 2005 by using the Harmonised Index of Consumer Prices (HICP) of the euro area, published by eurostat (https://ec.europa.eu/eurostat/databrowser/view/PRC_HICP_AIND/default/table).
  property carbon content 0
    carbon content on a dry matter basis (reserved; not for manual entry)
  property true value 0.141036; name bp1_true_value
    allocation property applied in "true value" allocation // value calculated from revenue
  properties: dry mass 1 kg, carbon content, fossil 0, water content 0, wet mass 1 kg, water in wet mass 0 kg, carbon content, non-fossil 0, carbon allocation 0 kg
- zircon, 50% zirconium: 0 kg; By-product classification allocatable product; CPC 4160: Other non-ferrous metals and articles thereof (including waste and scrap of some metals); cermets and articles […]; CAS 14940-68-2
  The value represents the production of zircon as a result of the mineral separation plant (MSP) activities. The value is taken from Table 2 of the following publication: Gediga, J., Morfino, A., Finkbeiner, M., Schulz, M., & Harlow, K. (2019). Life cycle assessment of zircon sand. The International Journal of Life Cycle Assessment, 24(11), 1976-1984. doi:10.1007/s11367-019-01619-5. ). The value has been adjusted (compared to the original value reported) to represent the production of 1 kg of zircon.
  production volume 6.2e8 kg; name PVRP; = (1530000 - 350000)*1000
    According to USGS (2021), the global production volume of zirconium mineral concentrates was estimated to be 1'530'000 metric tons in 2018. This value is used as best estimate of the production volume of zircon, 50% zirconium.
    As the production of zircon sand in South Africa is modelled in a different activity ("heavy mineral sand quarry operation and titania slag production"), the production volume of South Africa (350'000 metric tons) is subtracted in order to avoid double counting.
    References:
    USGS (2021). Zirconium and Hafnium Statistics and Information, Advance Data Release of the 2018 Annual Tables. https://prd-wret.s3.us-west-2.amazonaws.com/assets/palladium/production/atoms/files/myb1-2018-zirco-adv.xlsx
  property silicon content 0.151938
    The composition of zircon (except for Zirconium and Hafnium content) is taken from the following report: (Source: http://eastminerals.asia/wp-content/uploads/2018/11/East-Minerals-Zircon-Sand-Standard.pdf), which describes the composition of typical zircon. It contains maximum concentration of compounds in zircon.The calculation of the individual contents of each compound in zircon is based on the subtotal masses of the elements in each compound.The subtotal masses are calculated using the molecular weight calculator. (Source: https://www.lenntech.com/calculators/molecular/molecular-weight-calculator.htm). The maximum content of SiO2 in zircon is: 32.5%. The subtotal masses of SiO2 are: Si:46.75%, O:53.26%.
  property zirconium content 0.4976
    The Hafnium and Zirconium oxide contents (ZrO2 and HfO2) for typical zircon should be minimum 65% (Source: https://www.chemours.com/en/-/media/files/minerals/mineral-zircon-product-info.pdf). The calculation of the zircon content in zircon is based on the subtotal masses of the elements of the zircon sand (ZrSiO4).The subtotal masses are calculated using the molecular weight calculator. (Source: https://www.lenntech.com/calculators/molecular/molecular-weight-calculator.htm). The subtotal masses of ZrSiO4 are: Zr:49.76%, Si:15.32%, O:34.91. Finally, it should be noted that complete (hafnium-free) zirconium is not possible as there are bundled together. Therefore, the presence of hafnium in zirconium (in ppms) has not been taken into account for simplicity purposes.
  property price 0.343 EUR2005
    Temporary price data. Calculated as 90% of purchasers price based on: There are only prices in USA. It is assumed that they are the same in Europe and in the world. From Zircon in http://minerals.usgs.gov/minerals/pubs/commodity/zirconium/zircomcs07.pdf and http://minerals.usgs.gov/minerals/pubs/commodity/zirconium/mcs-2009-zirco.pdf [Accessed 20 May 2010]
  property aluminium content 0.0042344
    The composition of zircon (except for Zirconium and Hafnium content) is taken from the following report: (Source: http://eastminerals.asia/wp-content/uploads/2018/11/East-Minerals-Zircon-Sand-Standard.pdf), which describes the composition of typical zircon. It contains maximum concentration of compounds in zircon.The calculation of the individual contents of each compound in zircon is based on the subtotal masses of the elements in each compound.The subtotal masses are calculated using the molecular weight calculator. (Source: https://www.lenntech.com/calculators/molecular/molecular-weight-calculator.htm). The maximum content of Al2O3 in zircon is: 0.80%. The subtotal masses of Al2O3 are: Al:52.93%, O:47.08%.
  property oxygen content 0.346546
    Oxygen content in zircon is calculated as the sum of oxygen contents of each individual compound present (i.e ZrO2, HfO2, SiO2, Al2O3, TiO2 and Fe2O3) in zircon.The oxygen content in each compound is calculated by multiplying the amount of chemical compound content in zircon with the subtotal mass of oxygen in the compound using the molecular weight calculator. (Source: <https://www.lenntech.com/calculators/molecular/molecular-weight-calculator.htm>). The oxygen content of each compound is provided on the properties comment field of the other contained elements.
  property hafnium content 0.014
    The Hafnium and Zirconium oxide contents (ZrO2 and HfO2) for typical zircon should be minimum 65% (Source: https://www.chemours.com/en/-/media/files/minerals/mineral-zircon-product-info.pdf). The calculation of the hafnium content in zircon is assumed to be 1.4%. The amount has been assumed is such a way in order to ensure i) that the sum of ZrO2 and HfO2 is minimum 65% ii) that no extra hafnium is produced in each product throughout the Hafnium production chain (due to different values contained in literature regarding the hafnium content in zircon). Finally, it should be noted that complete (zirconium-free) hafnium is not possible as there are bundled together. Therefore, the presence of zirconium in hafnium (in ppms) has not been taken into account for simplicity purposes.
  property titanium content 0.0017979
    The composition of zircon (except for Zirconium and Hafnium content) is taken from the following report: (Source: http://eastminerals.asia/wp-content/uploads/2018/11/East-Minerals-Zircon-Sand-Standard.pdf), which describes the composition of typical zircon. It contains maximum concentration of compounds in zircon.The calculation of the individual contents of each compound in zircon is based on the subtotal masses of the elements in each compound.The subtotal masses are calculated using the molecular weight calculator. (Source: https://www.lenntech.com/calculators/molecular/molecular-weight-calculator.htm). The maximum content of TiO2 in zircon is: 0.3%. The subtotal masses of TiO2 are: Ti:59.93%, O:40.06%.
  property iron content 0.0010491
    The composition of zircon (except for Zirconium and Hafnium content) is taken from the following report: (Source: http://eastminerals.asia/wp-content/uploads/2018/11/East-Minerals-Zircon-Sand-Standard.pdf), which describes the composition of typical zircon. It contains maximum concentration of compounds in zircon.The calculation of the individual contents of each compound in zircon is based on the subtotal masses of the elements in each compound.The subtotal masses are calculated using the molecular weight calculator. (Source: https://www.lenntech.com/calculators/molecular/molecular-weight-calculator.htm). The maximum content of Fe2O3 in zircon is: 0.15%. The subtotal masses of Fe2O3 are: Fe:69.94%, O:30.06%.
  property carbon content 0
    carbon content on a dry matter basis (reserved; not for manual entry)
  property true value 0.343
    allocation property applied in "true value" allocation // value calculated from revenue
  properties: carbon content, non-fossil 0, water content 0, wet mass 1 kg, dry mass 1 kg, carbon content, fossil 0, water in wet mass 0 kg, carbon allocation 0 kg

## By-products
- rutile, 95% titanium dioxide: 0 kg; name bp2; CPC 4160: Other non-ferrous metals and articles thereof (including waste and scrap of some metals); cermets and articles […]; By-product classification allocatable product; CAS 1317-80-2; pedigree (1,1,1,1,1)
  The value represents the production of rutile as a result of the mineral separation plant (MSP) activities. The value is taken from Table 2 of the following publication: Gediga, J., Morfino, A., Finkbeiner, M., Schulz, M., & Harlow, K. (2019). Life cycle assessment of zircon sand. The International Journal of Life Cycle Assessment, 24(11), 1976-1984. doi:10.1007/s11367-019-01619-5. ). The value has been adjusted (compared to the original value reported) to represent the production of 1 kg of zircon.
  EcoSpold01Location=AU
  production volume 2.53555e8 kg; = PVRP*bp2
    Calculated from production volume of reference product using the relative outputs.
  property price 0.710382 EUR2005
    Price approximated with the price of "Rutile, bulk, minimum 95% TiO2, f.o.b. Australia" reported in the USGS Mineral Commodity Summaries for Titanium Mineral Concentrates from 2009 to 2018 (https://www.usgs.gov/centers/nmic/titanium-statistics-and-information). The prices given in USD were converted to EUR based on the annual exchange rates published by the European Central Bank (https://sdw.ecb.europa.eu/quickview.do?SERIES_KEY=120.EXR.A.USD.EUR.SP00.A), and then adjusted for inflation relative to 2005 by using the Harmonised Index of Consumer Prices (HICP) of the euro area, published by eurostat (https://ec.europa.eu/eurostat/databrowser/view/PRC_HICP_AIND/default/table).
  property carbon content 0
    carbon content on a dry matter basis (reserved; not for manual entry)
  property true value 0.290518; name bp2_true_value
    allocation property applied in "true value" allocation // value calculated from revenue
  properties: carbon content, non-fossil 0, dry mass 1 kg, carbon content, fossil 0, wet mass 1 kg, water in wet mass 0 kg, water content 0, carbon allocation 0 kg

## Inputs from technosphere
- diesel, burned in building machine: 0.252089 MJ; lognormal variance with pedigree 0.0033, pedigree (2,2,3,1,1)
  EcoSpold01Location=GLO
  The value represents the total diesel consumption from mining (0.03819 kg) and mineral separation plant (MSP) activities (1.03E-03 kg). The abovementioned values are taken from Table 2 of the following publication: Gediga, J., Morfino, A., Finkbeiner, M., Schulz, M., & Harlow, K. (2019). Life cycle assessment of zircon sand. The International Journal of Life Cycle Assessment, 24(11), 1976-1984. doi:10.1007/s11367-019-01619-5. These values have been summed, converted to MJ (gross calorific value of diesel is 45.4 MJ/kg according toTable 5.1, chapter 5.6.3, page 35 of the data quality guidelines of Ecoinvent version 3) and adjusted (compared to the original values reported) to represent the production of 1 kg of zircon.
- wastewater, average: 0 m3; name bp5; pedigree (1,1,1,1,1)
  The value represents the production of waste water as a result of the mineral separation plant (MSP) activities. The value is taken from Table 2 of the following publication: Gediga, J., Morfino, A., Finkbeiner, M., Schulz, M., & Harlow, K. (2019). Life cycle assessment of zircon sand. The International Journal of Life Cycle Assessment, 24(11), 1976-1984. doi:10.1007/s11367-019-01619-5. The value has been converted to m3 and adjusted (compared to the original value reported) to represent the production of 1 kg of zircon.
  production volume 0 m3
    Calculated from production volume of reference product using the relative outputs.
  property price 0 EUR2005; name bp5_price_EUR2005
  properties: dry mass 0.346837 kg, water content 2882.2, carbon content, non-fossil 0.194039, wet mass 1000 kg
  note on carbon content, non-fossil: 0.0673 kg TOC/m3 (Tab A.17, ecoinvent v2.2 report 13_I). TOC was considered as Total Carbon.
- heat, district or industrial, natural gas: 0 MJ; pedigree (1,1,1,1,1)
  EcoSpold01Location=RER
  The value represents the heat production through natural gas, during mineral separation plant (MSP) activities.The abovementioned value is taken from Table 2 of the following publication: Gediga, J., Morfino, A., Finkbeiner, M., Schulz, M., & Harlow, K. (2019). Life cycle assessment of zircon sand. The International Journal of Life Cycle Assessment, 24(11), 1976-1984. doi:10.1007/s11367-019-01619-5. The value has been adjusted (compared to the original value reported) to represent the production of 1 kg of zircon.
- non-sulfidic overburden, off-site: -1.98839 kg; name bp6; lognormal variance with pedigree 0.0087, pedigree (2,2,3,1,1)
  Proxy considered for the exchange ''waste for recovery'' as recorded in Gediga et al (2019) as a byproduct from the mining activities. The value is taken from Table 2 of the previously mentioned source (analytical reference below). Due to lack of information about this waste, the approximation was based on the information provided in Lundberg (2012). According to that source, over 90% of the extracted materials return to the mining void. Based on this, the ''waste for recovery'' was approximated as non-sulfidic overburden.
  Reference 1: Gediga, J., Morfino, A., Finkbeiner, M., Schulz, M., & Harlow, K. (2019). Life cycle assessment of zircon sand. The Interna-tional Journal of Life Cycle Assessment, 24(11), 1976-1984. doi:10.1007/s11367-019-01619-5. The value has been adjust-ed (compared to the original value reported) to represent the production of 1 kg of zircon.
  Reference 2: Lundberg, M. (2012). Environmental analysis of zirconium alloy production. (11061 Student thesis), Retrieved from http://urn.kb.se/resolve?urn=urn:nbn:se:uu:diva-166178 DiVA database.
  production volume 8.7048e9 kg; = PVRP*bp6
    Calculated from production volume of reference product using the relative outputs.
  property price 0 EUR2005; name bp6_price_EUR2005
  properties: dry mass 1 kg, wet mass 1 kg
- non-sulfidic tailing, off-site: -20.4504 kg; name bp3; = ((99.98+1.10)/0.7)*-1; lognormal variance with pedigree 0.0033, pedigree (2,2,3,1,1)
  The value represents the production of tailings as a result of the mining (99.98 kg) and mineral separation plant (MSP) activities (1.10 kg). The abovementioned values are taken from Table 2 of the following publication: Gediga, J., Morfino, A., Finkbeiner, M., Schulz, M., & Harlow, K. (2019). Life cycle assessment of zircon sand. The International Journal of Life Cycle Assessment, 24(11), 1976-1984. doi:10.1007/s11367-019-01619-5. Due to unknown consistency of the tailings associated with the zircon sand production, it has been assumed as worst-case scenario, that the mass of the tailings reported in the Gediga et al (2019) publication represents the dry mass of the tailings. This means that the original amount of the tailings (99.98 +1.10 =101.08 kg) will be dividied by 0.7 (dry mass of tailings) in order to calculate the total mass of the tailings with 0.7 dry mass (144.4 kg).
  production volume 8.9528e10 kg; = PVRP*bp3
    Calculated from production volume of reference product using the relative outputs.
  property price 0 EUR2005; name bp3_price_EUR2005
  properties: dry mass 0.7 kg, wet mass 1 kg, water content 0.428571
- sodium hydroxide, without water, in 50% solution state: 3.71053e-5 kg; lognormal variance with pedigree 0.0033, pedigree (2,2,3,1,1)
  The value represents the sodium hydroxide consumption, during mining activities.The abovementioned value is taken from Table 2 of the following publication: Gediga, J., Morfino, A., Finkbeiner, M., Schulz, M., & Harlow, K. (2019). Life cycle assessment of zircon sand. The International Journal of Life Cycle Assessment, 24(11), 1976-1984. doi:10.1007/s11367-019-01619-5. The value has been adjusted (compared to the original value reported) to represent the production of 1 kg of zircon.
  properties: dry mass 1 kg, wet mass 1 kg
- mine infrastructure, bauxite: 1.52651e-10 unit; lognormal variance with pedigree 0.416, pedigree (4,5,4,5,4)
  Infrastructural input considered from Ecoinvent guidelines as a proxy for heavy minerals sands mining. Due to lack of data, this value was taken from the dataset ''heavy mineral sand quarry operation, GLO,2000-2005'' provided by Ecoinvent version 3.7. This exchange amount has been scaled based on the sum of the amounts of zircon and the byproducts of ilmenite and rutile.
  EcoSpold01Location=GLO
- aluminium sulfate, without water, in 4.33% aluminium solution state: 6.95369e-5 kg; lognormal variance with pedigree 0.0033, pedigree (2,2,3,1,1)
  The value represents the aluminium sulphate consumption, during mining activities.The abovementioned value is taken from Table 2 of the following publication: Gediga, J., Morfino, A., Finkbeiner, M., Schulz, M., & Harlow, K. (2019). Life cycle assessment of zircon sand. The International Journal of Life Cycle Assessment, 24(11), 1976-1984. doi:10.1007/s11367-019-01619-5. The value has been adjusted (compared to the original value reported) to represent the production of 1 kg of zircon.
  properties: dry mass 1 kg, wet mass 1 kg
- waste mineral oil: 0 kg; name bp4; pedigree (1,1,1,1,1)
  The value represents the production of waste mineral oil as a result of the mining (6.09E-04 kg) and mineral separation plant (MSP) activities (2.63E-03 kg). The abovementioned values are taken from Table 2 of the following publication: Gediga, J., Morfino, A., Finkbeiner, M., Schulz, M., & Harlow, K. (2019). Life cycle assessment of zircon sand. The International Journal of Life Cycle Assessment, 24(11), 1976-1984. doi:10.1007/s11367-019-01619-5. These values have been summed and adjusted (compared to the original values reported) to represent the production of 1 kg of zircon.
  production volume 0 kg
    Calculated from production volume of reference product using the relative outputs.
  property price 0 EUR2005; name bp4_price_EUR2005
  properties: dry mass 0.9 kg, water content 0.111111, wet mass 1 kg, carbon content, fossil 0.864444
  note on carbon content, fossil: Tab A.6, ecoinvent v2.2 report 13_I. C content has been calculated after data in the tables, and then referred to 1 kg DM
- recultivation, bauxite mine: 0.00103039 m2; lognormal variance with pedigree 0.116, pedigree (4,5,4,5,4)
  EcoSpold01Location=GLO
  Proxy exchange used for mine recultivation of the heavy minerals sands mining. Due to lack of data, this value was taken from the dataset ''heavy mineral sand quarry operation, GLO,2000-2005'' provided by Ecoinvent version 3.7. This exchange amount has been scaled based on the sum of the amounts of zircon and the byproducts of ilmenite and rutile.
  Uncertainty: proxi process used
- sulfuric acid: 0.000991362 kg; lognormal variance with pedigree 0.0033, pedigree (2,2,3,1,1)
  The value represents the consumption of sulfuric acid, during mineral separation plant (MSP) activities.The abovementioned value is taken from Table 2 of the following publication: Gediga, J., Morfino, A., Finkbeiner, M., Schulz, M., & Harlow, K. (2019). Life cycle assessment of zircon sand. The International Journal of Life Cycle Assessment, 24(11), 1976-1984. doi:10.1007/s11367-019-01619-5. The value has been adjusted (compared to the original value reported) to represent the production of 1 kg of zircon.
  properties: wet mass 1 kg, dry mass 1 kg
- inert waste: 0 kg; name bp7; pedigree (1,1,1,1,1)
  The value represents the production of non-hazardous waste for landfilling as a result of the mining (0.17 kg) and mineral separation plant (MSP) activities (0.08 kg). The abovementioned values are taken from Table 2 of the following publication: Gediga, J., Morfino, A., Finkbeiner, M., Schulz, M., & Harlow, K. (2019). Life cycle assessment of zircon sand. The International Journal of Life Cycle Assessment, 24(11), 1976-1984. doi:10.1007/s11367-019-01619-5. These values have been summed and adjusted (compared to the original values reported) to represent the production of 1 kg of zircon.
  production volume 0 kg
    Calculated from production volume of reference product using the relative outputs.
  property price 0 EUR2005; name bp7_price_EUR2005
  properties: dry mass 1 kg, wet mass 1 kg
- lubricating oil: 0.000419204 kg; lognormal variance with pedigree 0.0033, pedigree (2,2,3,1,1)
  The value represents the lubricating oil consumption from mining (9.25E-04 kg) and mineral separation plant (MSP) activities (2.04E-03 kg). The abovementioned values are taken from Table 2 of the following publication: Gediga, J., Morfino, A., Finkbeiner, M., Schulz, M., & Harlow, K. (2019). Life cycle assessment of zircon sand. The International Journal of Life Cycle Assessment, 24(11), 1976-1984. doi:10.1007/s11367-019-01619-5. These values have been summed and adjusted (compared to the original values reported) to represent the production of 1 kg of zircon.
  properties: carbon content, fossil 0.75, dry mass 1 kg, wet mass 1 kg
  note on carbon content, fossil: Lubricating oil is produced from diesel. C-content/dry mass of fats and oils considered 75%, from: ecoinvent v2.2 report, n 15a, pg 40
- electricity, medium voltage: 0 kWh; pedigree (1,1,1,1,1)
  EcoSpold01Location=UCTE
  The value represents the total electricity consumption from mining (1.74 MJ) and mineral separation plant (MSP) activities (0.55 MJ). The abovementioned values are taken from Table 2 of the following publication: Gediga, J., Morfino, A., Finkbeiner, M., Schulz, M., & Harlow, K. (2019). Life cycle assessment of zircon sand. The International Journal of Life Cycle Assessment, 24(11), 1976-1984. doi:10.1007/s11367-019-01619-5. The values have been summed, converted to kWh and adjusted (compared to the original values reported) to represent the production of 1 kg of zircon.
- tap water: 0 kg; pedigree (1,1,1,1,1)
  Due to the fact that waste products (i.e products that have a treatment activity in the database) cannot be used as inputs from technosphere, the tap water serves as a proxy also for the input of the wastewater. The consumption of wastewater during mining and mineral separation plant (MSP) process is 5.68 kg and 1.68 kg respectively.
  The consumption of tap water, during mineral separation plant (MSP) activities is 1.23 kg.The abovementioned values are taken from Table 2 of the following publication: Gediga, J., Morfino, A., Finkbeiner, M., Schulz, M., & Harlow, K. (2019). Life cycle assessment of zircon sand. The International Journal of Life Cycle Assessment, 24(11), 1976-1984. doi:10.1007/s11367-019-01619-5. These values have been adjusted (compared to the original value reported) to represent the production of 1 kg of zircon sand.
  properties: wet mass 1 kg, water content 2962.17, dry mass 0.000337476 kg, carbon content, fossil 0.00178991
  note on carbon content, fossil: Bicarbonate content is 2.93 mol/m3. CO2 content is 0.1 mol/m3 (ecoinvent v2.2 report 8, Tab 93.1).
- water, harvested from rainwater: 0.0750602 kg; lognormal variance with pedigree 0.0033, pedigree (2,2,3,1,1)
  The value represents the consumption of rain water, during mining activities.The abovementioned value is taken from Table 2 of the following publication: Gediga, J., Morfino, A., Finkbeiner, M., Schulz, M., & Harlow, K. (2019). Life cycle assessment of zircon sand. The International Journal of Life Cycle Assessment, 24(11), 1976-1984. doi:10.1007/s11367-019-01619-5. The value has been adjusted (compared to the original value reported) to represent the production of 1 kg of zircon.
  properties: wet mass 1 kg, water content 2940.2, dry mass 0.00034 kg, carbon content, fossil 0.0017899
- wastewater, average: -0.000125474, -0.00115985 m3 (2 entries); lognormal variance with pedigree 0.0033, pedigree (2,2,3,1,1)
  (same comment as for wastewater, average)
  production volume 5.62689e6 m3
- heat, district or industrial, natural gas: 0.00511344, 0.122631 MJ (2 entries); lognormal variance with pedigree 0.0033, pedigree (2,2,3,1,1)
  (same comment as for heat, district or industrial, natural gas)
- waste mineral oil: -8.99809e-6, -0.000363471 kg (2 entries); lognormal variance with pedigree 0.0033, pedigree (2,2,3,1,1)
  (same comment as for waste mineral oil)
  production volume 1.6306e6 kg
- inert waste: -0.000302335, -0.0351034 kg (2 entries); lognormal variance with pedigree 0.0033, pedigree (2,2,3,1,1)
  (same comment as for inert waste)
  production volume 1.55e8 kg
- electricity, medium voltage: 0.000176422, 0.00405092, 0.00296175, 0.043076, 0.0136545, 0.00607159, 0.0197821 kWh (7 entries); lognormal variance with pedigree 0.0033, pedigree (2,2,3,1,1)
  (same comment as for electricity, medium voltage)
- tap water: 0.0244761, 0.00294627, 0.0048692, 0.122782, 0.00319414, 0.00908568, 1.04919 kg (7 entries); lognormal variance with pedigree 0.0033, pedigree (2,2,3,1,1)
  (same comment as for tap water)

## Inputs from nature
- Water, salt, ocean [natural resource, in water]: 0.000145559 m3; lognormal variance with pedigree 0.0033, pedigree (2,2,3,1,1)
  The value represents the sea water consumption during mining activities. The abovementioned values are taken from Table 2 of the following publication: Gediga, J., Morfino, A., Finkbeiner, M., Schulz, M., & Harlow, K. (2019). Life cycle assessment of zircon sand. The International Journal of Life Cycle Assessment, 24(11), 1976-1984. doi:10.1007/s11367-019-01619-5. The value has been converted to m3 and adjusted (compared to the original values reported) to represent the production of 1 kg of zircon.
- Gangue, in ground [natural resource, in ground]: 16.0771 kg; lognormal variance with pedigree 0.0033, pedigree (2,2,3,1,1)
  The amount of gangue extracted from the ground is calculated by subtracting the amount of all individual metal contents (Zirconium, Hafnium, Titanium, Silicon and Iron) extracted from the ground from the amount of ore mined. The amount of mined ore (after aggregation of the mining and MSP activities and adjustment to correspond to 1 kg of zircon sand production) needed for the production of 1 kg of Zircon sand is 116.13 kg (Source: Table 2 of the following publication: Gediga, J., Morfino, A., Finkbeiner, M., Schulz, M., & Harlow, K. (2019). Life cycle assessment of zircon sand. The International Journal of Life Cycle Assessment, 24(11), 1976-1984. doi:10.1007/s11367-019-01619-5).
- Iron, in ground [natural resource, in ground]: 0.0985679 kg; lognormal variance with pedigree 0.0033, pedigree (2,2,3,1,1)
  The amount of iron extracted from the ground is based on the following: i) The overall recovery rate of heavy minerals from the ore till the production of the final products (zircon, ilmenite and rutile) is 68% (Source: Mudd, G. M., & Jowitt, S. M. (2016). Rare earth elements from heavy mineral sands: assessing the potential of a forgotten resource. Applied Earth Science, 125(3), 107-113. doi:10.1080/03717453.2016.1194955). ii) The amount of iron contained in 1 kg of ilmenite (FeTiO3) is 0.1532 kg. (calculation based on the subtotal masses of FeTiO3 where: Fe: 31.86%, Ti:31.56%, Ο: 31.64%. Source: ( https://www.lenntech.com/calculators/molecular/molecular-weight-calculator.htm )
- Hafnium, in ground [natural resource, in ground]: 0.0020727 kg; lognormal variance with pedigree 0.0033, pedigree (2,2,3,1,1)
  The amount of Hafnium extracted from the ground is based on the fact that the amount of Hafnium content is on average 2% of the zirconium content in zircon (Source: Nielsen RH, Wilfing G (2000) Hafnium and Hafnium Compounds. Ullmann’s Encyclopedia of Industrial Chemistry. Wiley-VCH Verlag GmbH & Co. KGaA. Available: http://onlinelibrary.wiley.com/doi/10.1002/14356007.a12_559.pub2/abstract). Due to lack of data, it is assumed that the Hafnium content in ore is also 2% of the Zirconium content in ore. For the calculation of Zirconium content in ore, check the respective exchange comment.
- Titanium, in ground [natural resource, in ground]: 0.135528 kg; lognormal variance with pedigree 0.0033, pedigree (2,2,3,1,1)
  The amount of Titanium extracted from the ground is based on the following: i) The overall recovery rate of heavy minerals from the ore till the production of the final products (zircon, ilmenite and rutile) is 68% (Source: Mudd, G. M., & Jowitt, S. M. (2016). Rare earth elements from heavy mineral sands: assessing the potential of a forgotten resource. Applied Earth Science, 125(3), 107-113. doi:10.1080/03717453.2016.1194955). ii) The amount of Titanium contained in ilmenite (FeTiO3) and rutile (95% TiO2) per 1 kg of each individual mineral is 0.3156 kg for ilmenite and 0.5993 kg for rutile (calculation based on the subtotal masses of FeTiO3 and TiO2. For ilmenite; Fe: 31.86%, Ti:31.56%, Ο: 31.64%. For rutile: Ti: 59.93%, O:40.06%. Source: https://www.lenntech.com/calculators/molecular/molecular-weight-calculator.htm ). The titanium contents of ilmenite and rutile are summed in the end for the calculation of the total amount of Titanium extracted from the ground.
- Transformation, from pasture, man made [natural resource, land]: 0.000618237 m2; lognormal variance with pedigree 0.0346, pedigree (2,4,3,5,3)
  Land transformation input considered for heavy minerals sands mining. Due to lack of data, this value was taken from the dataset ''heavy mineral sand quarry operation, GLO,2000-2005'' provided by Ecoinvent version 3.7. This exchange amount has been scaled based on the sum of the amounts of zircon and the byproducts of ilmenite and rutile.
  Uncertainty: area as average from 5 mines, other data from one mine
- Transformation, to mineral extraction site [natural resource, land]: 0.00103039 m2; lognormal variance with pedigree 0.1546, pedigree (2,4,3,5,3)
  (same comment as for Transformation, from pasture, man made)
- Water, well, in ground [natural resource, in water]: 0.00663014 m3; lognormal variance with pedigree 6.0027, pedigree (2,2,3,1,1)
  The value represents the total ground water consumption during mining (18.97 kg) and mineral separation plant (MSP) activities (27.84 kg). The abovementioned values are taken from Table 2 of the following publication: Gediga, J., Morfino, A., Finkbeiner, M., Schulz, M., & Harlow, K. (2019). Life cycle assessment of zircon sand. The International Journal of Life Cycle Assessment, 24(11), 1976-1984. doi:10.1007/s11367-019-01619-5. These values have been summed, converted to m3 and adjusted (compared to the original values reported) to represent the production of 1 kg of zircon.
- Water, unspecified natural origin [natural resource, in water]: 0.00613511 m3; = 0.3*(bp3*-1)/1000; lognormal variance with pedigree 0.0033, pedigree (2,2,3,1,1)
  Input has been assumed for water balance purposes. Due to unknown consistency of the tailings associated with the zircon sand production, it has been assumed as worst-case scenario, that the mass of the tailings reported in the Gediga et al (2019) publication represents the dry mass of the tailings. This means that the original amount of the tailings (99.98 +1.10 =101.08 kg) will be dividied by 0.7 (dry mass of tailings) in order to calculate the total mass of the tailings with 0.7 dry mass (144.4 kg). Then the remaining mass that consists of water would originate from an unspecified water source (exchange: Water, unspecified natural origin) with the amount being equal to 0.3 (water in wet mass of the tailings multiplied by the previously calculated amount of tailings (144.4 kg).
- Silicon, in ground [natural resource, in ground]: 0.0319069 kg; lognormal variance with pedigree 0.0033, pedigree (2,2,3,1,1)
  The amount of Silicon extracted from the ground is based on the following: i) The overall recovery rate of heavy minerals from the ore till the production of the final products (zircon, ilmenite and rutile) is 68% (Source: Mudd, G. M., & Jowitt, S. M. (2016). Rare earth elements from heavy mineral sands: assessing the potential of a forgotten resource. Applied Earth Science, 125(3), 107-113. doi:10.1080/03717453.2016.1194955). ii) The amount of Silicon contained in 1 kg zircon (ZrSiO4) is 0.1532 kg. (calculation based on the subtotal masses of ZrSiO4 where: Zr: 49.76%, Si:15.32%, O:34.91%. Source: ( https://www.lenntech.com/calculators/molecular/molecular-weight-calculator.htm )
- Zirconium, in ground [natural resource, in ground]: 0.103635 kg; lognormal variance with pedigree 0.0226, pedigree (3,3,4,5,1)
  The amount of Zirconium extracted from the ground is based on the following: i) The overall recovery rate of heavy minerals from the ore till the production of the final products (zircon, ilmenite and rutile) is 68% (Source: Mudd, G. M., & Jowitt, S. M. (2016). Rare earth elements from heavy mineral sands: assessing the potential of a forgotten resource. Applied Earth Science, 125(3), 107-113. doi:10.1080/03717453.2016.1194955). ii) The amount of Zirconium contained in 1 kg zircon (ZrSiO4) is 0.4976 kg. (calculation based on the subtotal masses of ZrSiO4 where: Zr: 49.76%, Si:15.32%, O:34.91%. Source: ( https://www.lenntech.com/calculators/molecular/molecular-weight-calculator.htm )
  Uncertainty: uncertainty of ore composition
- Water, lake [natural resource, in water]: 0.00145615 m3; lognormal variance with pedigree 0.0033, pedigree (2,2,3,1,1)
  The value represents the total lake water consumption during mining (4.60 kg) and mineral separation plant (MSP) activities (5.69 kg). The originalabovementioned values are taken from Table 2 of the following publication: Gediga, J., Morfino, A., Finkbeiner, M., Schulz, M., & Harlow, K. (2019). Life cycle assessment of zircon sand. The International Journal of Life Cycle Assessment, 24(11), 1976-1984. doi:10.1007/s11367-019-01619-5.
- Transformation, from forest, unspecified [natural resource, land]: 0.000412158 m2; lognormal variance with pedigree 0.1546, pedigree (2,4,3,5,3)
  (same comment as for Transformation, from pasture, man made)
- Occupation, mineral extraction site [natural resource, land]: 0.0103039 m2*year; lognormal variance with pedigree 0.0746, pedigree (2,4,3,5,3)
  Land occupation input for heavy minerals sands mining. Due to lack of data, this value was taken from the dataset ''heavy mineral sand quarry operation, GLO,2000-2005'' provided by Ecoinvent version 3.7. This exchange amount has been scaled based on the sum of the amounts of zircon and the byproducts of ilmenite and rutile.
  Uncertainty: area as average from 5 mines, other data from one mine

## Emissions to nature
- Water [air, unspecified]: 0.00498683 m3; lognormal variance with pedigree 0.0427, pedigree (2,2,3,1,1)
  The value represents the production of water loss through evaporation and seepage as a result of the mining (8.32 kg) and mineral separation plant (MSP) activities (26.89 kg). The abovementioned values are taken from Table 2 of the following publication: Gediga, J., Morfino, A., Finkbeiner, M., Schulz, M., & Harlow, K. (2019). Life cycle assessment of zircon sand. The International Journal of Life Cycle Assessment, 24(11), 1976-1984. doi:10.1007/s11367-019-01619-5. These values have been summed, converted to m3 and adjusted (compared to the original values reported) to represent the production of 1 kg of zircon. Due to lack of data about the amount of water lost to the ground, it is assumed that the water is evaporated.
  property fraction, origin: fresh water 1; name fraction_origin_fresh_water
  property fraction, origin: unspecified 0; name fraction_origin_unspecified
  property fraction, origin: salt water 0; name fraction_origin_salt_water
- Uranium-238 [air, non-urban air or from high stacks]: 6.37318e-6 kBq; lognormal variance with pedigree 0.5426, pedigree (4,3,3,5,5)
  Due to lack of data, this value was taken from the dataset ''heavy mineral sand quarry operation, GLO,2000-2005'' provided by Ecoinvent version 3.7. This exchange was assumed for completeness purposes. This exchange amount has been scaled based on the sum of the amounts of zircon and the byproducts of ilmenite and rutile.
  Uncertainty: estimated from dust emissions
- Suspended solids, unspecified [water, surface water]: 1.75549e-5 kg; lognormal variance with pedigree 0.29, pedigree (4,5,3,5,5)
  Due to lack of data, this value was taken from the dataset ''heavy mineral sand quarry operation, GLO,2000-2005'' provided by Ecoinvent version 3.7. This exchange was assumed for completeness purposes. This exchange amount has been scaled based on the sum of the amounts of zircon and the byproducts of ilmenite and rutile.
  Uncertainty: estimation, high uncertainty
- Titanium, ion [water, unspecified]: 2.35094e-8 kg; lognormal variance with pedigree 0.6527, pedigree (2,2,3,1,1)
  The value represents the amount of titanium emitted to water as a result of the mineral separation plant (MSP) activities. The value is taken from Table 2 of the following publication: Gediga, J., Morfino, A., Finkbeiner, M., Schulz, M., & Harlow, K. (2019). Life cycle assessment of zircon sand. The International Journal of Life Cycle Assessment, 24(11), 1976-1984. doi:10.1007/s11367-019-01619-5. ). The value has been adjusted (compared to the original value reported) to represent the production of 1 kg of zircon.
- Radium-226 [air, non-urban air or from high stacks]: 2.18673e-5 kBq; lognormal variance with pedigree 0.5426, pedigree (4,3,3,5,5)
  (same comment as for Uranium-238)
- Thorium-232 [air, non-urban air or from high stacks]: 1.37386e-5 kBq; lognormal variance with pedigree 0.5426, pedigree (4,3,3,5,5)
  (same comment as for Uranium-238)
- Titanium [air, non-urban air or from high stacks]: 7.57684e-7 kg; lognormal variance with pedigree 0.6527, pedigree (2,2,3,1,1)
  The value represents the amount of titanium emitted to air as a result of the mineral separation plant (MSP) activities. The value is taken from Table 2 of the following publication: Gediga, J., Morfino, A., Finkbeiner, M., Schulz, M., & Harlow, K. (2019). Life cycle assessment of zircon sand. The International Journal of Life Cycle Assessment, 24(11), 1976-1984. doi:10.1007/s11367-019-01619-5. ). The value has been adjusted (compared to the original value reported) to represent the production of 1 kg of zircon.
- Water [water, unspecified]: 0.0028804 m3; lognormal variance with pedigree 0.0427, pedigree (2,2,3,1,1)
  The value represents the production of water released to environment (proxy) as a result of the mining activities. The value is taken from Table 2 of the following publication: Gediga, J., Morfino, A., Finkbeiner, M., Schulz, M., & Harlow, K. (2019). Life cycle assessment of zircon sand. The International Journal of Life Cycle Assessment, 24(11), 1976-1984. doi:10.1007/s11367-019-01619-5. The value has been converted to m3 and adjusted (compared to the original value reported) to represent the production of 1 kg of zircon.
  property water in wet mass 1000 kg; name WWM
  property fraction, origin: fresh water 1; name fraction_origin_fresh_water_Ww
  property dry mass 0 kg; name DM
  property carbon content, non-fossil 0; name C_content_non_fossil
  property fraction, origin: salt water 0; name fraction_origin_salt_water_Ww
  property carbon content, fossil 0; name C_content_fossil
  property wet mass 1000 kg; name WM
  property fraction, origin: unspecified 0; name fraction_origin_unspecified_Ww
- Zirconium [air, non-urban air or from high stacks]: 7.63349e-7 kg; lognormal variance with pedigree 0.6527, pedigree (2,2,3,1,1)
  The value represents the amount of zircon emitted to air as a result of the mineral separation plant (MSP) activities. The value is taken from Table 2 of the following publication: Gediga, J., Morfino, A., Finkbeiner, M., Schulz, M., & Harlow, K. (2019). Life cycle assessment of zircon sand. The International Journal of Life Cycle Assessment, 24(11), 1976-1984. doi:10.1007/s11367-019-01619-5. ). The value has been adjusted to represent the amount of Zirconium emitted (49.76% Zr content in zircon) and to refer to the production of 1 kg of zircon (compared to the original value reported).
- Particulates, > 2.5 um, and < 10um [air, non-urban air or from high stacks]: 3.76717e-5 kg; lognormal variance with pedigree 0.1227, pedigree (2,2,3,1,1)
  The value represents the amount of PM(2.5-10) emitted to air as a result of the mineral separation plant (MSP) activities. The value is taken from Table 2 of the following publication: Gediga, J., Morfino, A., Finkbeiner, M., Schulz, M., & Harlow, K. (2019). Life cycle assessment of zircon sand. The International Journal of Life Cycle Assessment, 24(11), 1976-1984. doi:10.1007/s11367-019-01619-5. ). The value has been adjusted (compared to the original value reported) to represent the production of 1 kg of zircon.

## Sampling procedure
The inputs and outputs considered here in this dataset are taken from Table 2 of the Gediga et al (2019) publication. The presented data in the publication are taken from 8 companies, representing 77% of the global production. For further information about the matching of the foreground data with the background data of Ecoinvent, please check the individual comments of each exchange. The authors of the abovementioned publication state that there are some radioactive emissions, however their values were not provided. To account for these emissions, the amount of radioactive emissions were taken from the previous existing dataset in Ecoinvent about the production of zircon sand (see respective exchange comments). The amounts of tailings (byproduct) has been slightly increased compared to the original value to ensure wet mass balance. The author's of the abovementioned publication acknowledge the existence of other byproducts from the production of the zircon sand, which were not mentioned in the source. However, those are considered minor and therefore those are also not contained in this dataset. Finally, due to the fact that waste products (i.e products that have a treatment activity in the database) cannot be used as inputs from technosphere, the tap water serves as a proxy also for the input of the wastewater.

Reference: Gediga, J., Morfino, A., Finkbeiner, M., Schulz, M., & Harlow, K. (2019). Life cycle assessment of zircon sand. The International Journal of Life Cycle Assessment, 24(11), 1976-1984. doi:10.1007/s11367-019-01619-5.

## Extrapolations
As mentioned in the sampling procedure section, radioactive emissions were not considered in the Gediga et al (2019) publication. To account for these emissions, their amounts were taken from the dataset ''heavy mineral sand quarry operation, GLO,2000-2005'' provided by Ecoinvent version 3.7, which refers to the production of zircon sand (see also respective exchange comments).

Reference: Gediga, J., Morfino, A., Finkbeiner, M., Schulz, M., & Harlow, K. (2019). Life cycle assessment of zircon sand. The International Journal of Life Cycle Assessment, 24(11), 1976-1984. doi:10.1007/s11367-019-01619-5.
