# polarizer, liquid crystals and colour filters production, for liquid crystal display

Dataset: EcoSpold 2, unit process
Geography: GLO
Time period: 2001-01-01 to 2021-12-31
Technology level: current
Classification: ISIC rev.4 ecoinvent: 2610:Manufacture of electronic components and boards
Classification: EcoSpold01Categories: electronics/component
Tags: ConvertedDataset
Scenario: Business-as-Usual
System model: Allocation, cut-off by classification
Generated by: Roland Hischier
Published in: Hischier R. 2007
Database: ecoinvent
isCopyrightProtected: true
accessRestrictedTo: 1

## General comment
This dataset represents the average production efforts of 1 kg the LCD module. It includes the production of the liquid crystals and the polarizer as well as the patterning of the colour filters. Main data are based on information in a US-EPA LCA study about LCD and CRT production. The data represent the respective efforts for a 15-inch LCD computer screen, as it is produced in Japan in the late 1990s. Infrastructure are based on assumptions and simplifications and have thus, accordingly higher uncertainties
[This dataset was already contained in the ecoinvent database version 2. It was not individually updated during the transfer to ecoinvent version 3. Life Cycle Impact Assessment results may still have changed, as they are affected by changes in the supply chain, i.e. in other datasets. This dataset was generated following the ecoinvent quality guidelines for version 2. It may have been subject to central changes described in the ecoinvent version 3 change report (http://www.ecoinvent.org/database/ecoinvent-version-3/reports-of-changes/), and the results of the central updates were reviewed extensively. The changes added e.g. consistent water flows and other information throughout the database. The documentation of this dataset can be found in the ecoinvent reports of version 2, which are still available via the ecoinvent website. The change report linked above covers all central changes that were made during the conversion process.]

## Included activities start
From reception of raw materials and auxiliares at the factory gate.

## Included activities end
This dataset includes the material and energy efforts as well as the related emissions (air/water) and waste amounts for the production of polarizer, liquid crystals as well as the patternin of color filters on the LCD panel. Estimations for infrastructure and transport of the raw materials are included as well.

## Geography
Data from literature (based on information from Japanese producers) – used as data for the global production average

## Technology
Current technology in Japan

## Parameters
- fraction, process water, to air: 0.061 dimensionless; name fraction_PW_to_air; lognormal variance with pedigree 0.092025, pedigree (4,4,3,2,4)
  Literature value (Statistics Canada, 2007 & Shaffer, K.H., 2008, Consumptive water use in the Great Lakes Basin, USGS) (Vionnet, S., Quantis Water Database - Technical Report, 2012).

## Reference product
- polarizer, liquid crystals and colour filters, for liquid crystal display: 1 kg; By-product classification allocatable product; CPC 471: Electronic valves and tubes; electronic components; parts thereof
  The LCD technology is just one out of several in the last decades developed flat display technologies. Other types of flat display technologies are e.g. the Plasma Display Panel (PDP) or OLED (organic light emitting diodes) displays. It can be distinguished between the so-called (self-)emissive and non-emissive displays. While the first ones have their proper light source for the production of the picture, the second type of display - to which the LCD display belongs - requests an additional light source in order to produce the image. Non-emissive displays have a low power consumption and they are (most of time) readable even in bright sunlight. The general principle used is the fact that the so-called liquid crystal (LC) - a mixture of up to 15 different organic components - changes their properties of light passing through the crystals in function of an external electrical charge. Within the LCD technology it is distinguished between passive-matrix and active-matrix LCD displays. There each row or column of the display has a single electrical circuit. The pixels are addressed one at a time by row and column addresses. This type of display is called a passive matrix because the pixel must retain its state between refreshes without the benefit of a steady electrical charge. As the number of pixels (and, correspondingly, columns and rows) increases, this type of display becomes increasingly less feasible. Very slow response times and poor contrast are typical of passive-matrix LCDs.
  For high-resolution colour displays such as modern LCD computer monitors and televisions, an active matrix structure is used. A matrix of thin-film transistors (TFTs) is added to the polarizing and colour filters. Each pixel has its own dedicated transistor, which allows each column line to access one pixel. When a row line is activated, all of the column lines are connected to a row of pixels and the correct voltage is driven onto all of the column lines. The row line is then deactivated and the next row line is activated. All of the row lines are activated in sequence during a refresh operation. Active-matrix displays are much brighter and sharper than passive-matrix displays of the same size, and generally have quicker response times.
  As shown there, the front glass plate is used as substrate for the colour filters, while the back glass plate is the substrate for the TFT-array. The two glass plates are themselves assembled with a sealant, while spacers keep the gap between the two plates - a gap that is filled up with LC material.
  On the front plate, the colour filter contains the black matrix as well as the three colour filters (red, blue, green) and a transparent ITO layer as common electrode. These colour filters can be made thereby with either dyes or with pigments, using a variety of different colouring methods. The TFT-array consists of the actual TFT, storage capacitors, pixel electrodes and the interconnect wiring. Thereby, each pixel has its proper TFT, storage capacitor and pixel electrode in order that each pixel can be addressed individually.
  Apart the LCD panel, a TFT LCD module compromises also a driving circuit unit as well as the backlight system, plus an overall chassis for keeping the complete LCD module together. The driving circuit unit contains a set of IC chips and printed wiring boards, allowing actually addressing in the end each single pixel on the LCD panel.
  EcoSpold01Location=GLO
  production volume 1 kg
    Dummy value to be replaced by measured, estimated or calculated value
  property price 22.1744 EUR2005
    Calculated based on inputs: The price of the product has been calculated as a sum of the values of the material and energy inputs for this product. This value is therefore a rough estimation. It may underestimate the real price since there are additional expenses when producing any product. These expences can include for example labour costs, treatment of waste materials and profit for the producer. Please consider carefully whether this level of data quality is acceptable for your application.

## Inputs from technosphere
- hydrogen, liquid: 0 kg; source Socolof M. L. 2001; pedigree (1,1,1,1,1)
  EcoSpold01Location=RER
  Literature Value.
  Uncertainty: data from an US-EPA LCA study
  properties: heating value, net 120.21 MJ, wet mass 1 kg, dry mass 1 kg
- inert waste: 0 kg; source Socolof M. L. 2001; pedigree (1,1,1,1,1)
  Literature Value.
  EcoSpold01Location=CH
  Uncertainty: data from an US-EPA LCA study - approximated with existing waste process
  production volume 0 kg
    Calculated from the production volume of polarizer, liquid crystals and colour filters, for liquid crystal display in proportion to the respective output amounts.
  properties: wet mass 1 kg, dry mass 1 kg
- tetrahydrofuran: 0.04775 kg; source Socolof M. L. 2001; lognormal variance with pedigree 0.0407, pedigree (1,3,5,3,1)
  Literature Value.
  EcoSpold01Location=RER
  Uncertainty: data from an US-EPA LCA study
  properties: wet mass 1 kg, dry mass 1 kg, carbon content, fossil 0.666667, heating value, net 33.63 MJ
- methyl ethyl ketone: 0 kg; source Socolof M. L. 2001; pedigree (1,1,1,1,1)
  Literature Value.
  EcoSpold01Location=RER
  Uncertainty: data from an US-EPA LCA study
  properties: heating value, net 33.63 MJ, carbon content, fossil 0.666667, dry mass 1 kg, wet mass 1 kg
- borax, anhydrous, powder: 0.0011412 kg; source Socolof M. L. 2001; lognormal variance with pedigree 0.0407, pedigree (1,3,5,3,1)
  Literature Value.
  EcoSpold01Location=RER
  Uncertainty: data from an US-EPA LCA study
  properties: wet mass 1 kg, dry mass 1 kg
- ethanol, without water, in 99.7% solution state, from ethylene: 0 kg; source Socolof M. L. 2001; pedigree (1,1,1,1,1)
  Literature Value.
  EcoSpold01Location=RER
  Uncertainty: data from an US-EPA LCA study
  properties: wet mass 1 kg, dry mass 1 kg, carbon content, fossil 0.521739, heating value, net 31.58 MJ
- heat, district or industrial, other than natural gas: 156.24 MJ; source Socolof M. L. 2001; lognormal variance with pedigree 0.0407, pedigree (1,3,5,3,1)
  Literature Value with estimation, Fuel oil #2, fuel oil #6 and kerosene are summed up and translated into light fuel oil.
  EcoSpold01Location=RER
  Uncertainty: data from an US-EPA LCA study
  properties: heating value, net 1 MJ
- boric acid, anhydrous, powder: 0.009125 kg; source Socolof M. L. 2001; lognormal variance with pedigree 0.0407, pedigree (1,3,5,3,1)
  Proxy with literature value, to represent orthoboric acid, boric acid is used.
  EcoSpold01Location=RER
  Uncertainty: data from an US-EPA LCA study
  properties: dry mass 1 kg, wet mass 1 kg
- hydrochloric acid, without water, in 30% solution state: 0 kg; source Socolof M. L. 2001; pedigree (1,1,1,1,1)
  EcoSpold01Location=RER
  Proxy with literature value, to represent perchloric acid, hydrochloric acid is used.
  Uncertainty: data from an US-EPA LCA study
  properties: wet mass 1 kg, dry mass 1 kg, heating value, net 3.32 MJ
- ethyl acetate: 0.0121 kg; source Socolof M. L. 2001; lognormal variance with pedigree 0.0407, pedigree (1,3,5,3,1)
  EcoSpold01Location=RER
  Literature Value.
  Uncertainty: data from an US-EPA LCA study
  properties: dry mass 1 kg, carbon content, fossil 0.545455, heating value, net 31.32 MJ, wet mass 1 kg
- heptane: 0.12875 kg; source Socolof M. L. 2001; lognormal variance with pedigree 0.0407, pedigree (1,3,5,3,1)
  Literature Value.
  EcoSpold01Location=RER
  Uncertainty: data from an US-EPA LCA study
  properties: carbon content, fossil 0.84, dry mass 1 kg, wet mass 1 kg, heating value, net 44.77 MJ
- chemical factory, organics: 4e-10 unit; lognormal variance with pedigree 0.3861, pedigree (4,5,5,3,1)
  EcoSpold01Location=RER
  Proxy, due to a lack of specific information, the infrastructure module for the production of organic chemicals is used.
  Uncertainty: Estimation, based on chemical production site
- dipropylene glycol monomethyl ether: 0 kg; source Socolof M. L. 2001; pedigree (1,1,1,1,1)
  Proxy with literature value, to represent photoresist, dipropylene glycol monomethyl ether is used.
  EcoSpold01Location=RER
  Uncertainty: data from an US-EPA LCA study
  properties: carbon content, fossil 0.567568, wet mass 1 kg, dry mass 1 kg, heating value, net 30.27 MJ
- electricity, medium voltage: 161.112 kWh; source Socolof M. L. 2001; lognormal variance with pedigree 0.0407, pedigree (1,3,5,3,1)
  Estimation, based on literature.
  EcoSpold01Location=CN
  Uncertainty: data from an US-EPA LCA study
- heat, district or industrial, natural gas: 49.032 MJ; source Socolof M. L. 2001; lognormal variance with pedigree 0.0407, pedigree (1,3,5,3,1)
  Literature Value.
  EcoSpold01Location=RER
  Uncertainty: data from an US-EPA LCA study
  properties: heating value, net 1 MJ
- municipal solid waste: 0 kg; source Socolof M. L. 2001; pedigree (1,1,1,1,1)
  (same comment as for inert waste)
  production volume 0 kg
    (same comment as for inert waste)
  properties: carbon content, fossil 0.171549, dry mass 0.771 kg, water content 0.297017, carbon content, non-fossil 0.261655, wet mass 1 kg, heating value, net 11.74 MJ
  note on carbon content, fossil: MSW composition in tab 4.1, ecoinvent v2.2 report 13_I. C content referred to 1 kg DM
  note on heating value, net: Value taken from the general comment of the treatment dataset.
- solvent, organic: 0.10337 kg; source Socolof M. L. 2001; lognormal variance with pedigree 0.0407, pedigree (1,3,5,3,1)
  Literature Value.
  EcoSpold01Location=GLO
  Uncertainty: data from an US-EPA LCA study
  properties: carbon content, fossil 0.63072, dry mass 1 kg, wet mass 1 kg, heating value, net 19.11 MJ
  note on carbon content, fossil: Mixture of 15 of the most often used solvents (list in ecoinvent v2.2 report 11-III, pg 293). C content was calculated as an unweighted average of C content of the different solvents
- dimethyl sulfoxide: 0.17875 kg; source Socolof M. L. 2001; lognormal variance with pedigree 0.0407, pedigree (1,3,5,3,1)
  Proxy with literature value, to represent exfoliation liquid, dimethyl sulfoxide is used.
  EcoSpold01Location=RER
  Uncertainty: data from an US-EPA LCA study
  properties: carbon content, fossil 0.307692, dry mass 1 kg, wet mass 1 kg, heating value, net 18.62 MJ
- carbon dioxide, liquid: 0 kg; source Socolof M. L. 2001; pedigree (1,1,1,1,1)
  EcoSpold01Location=RER
  Literature Value.
  Uncertainty: data from an US-EPA LCA study
  properties: carbon content, fossil 0.272727, wet mass 1 kg, dry mass 1 kg, heating value, net 8.27 MJ
- acetone, liquid: 0 kg; source Socolof M. L. 2001; pedigree (1,1,1,1,1)
  Literature Value.
  EcoSpold01Location=RER
  Uncertainty: data from an US-EPA LCA study
  properties: dry mass 1 kg, heating value, net 31.32 MJ, carbon content, fossil 0.62069, wet mass 1 kg
- wastewater from liquid crystal production: -0.0022062 m3; name wastewater_output; source Socolof M. L. 2001; lognormal variance with pedigree 0.0407, pedigree (1,3,5,3,1)
  EcoSpold01Location=CH
  Literature Value.
  Uncertainty: data from an US-EPA LCA study
  production volume 0.0022062 m3
    (same comment as for inert waste)
  property price 0 EUR2005; name wastewater_output_price_EUR2005
  properties: carbon content, fossil 0.997666, water content 15.5918, dry mass 60.2706 kg, wet mass 1000 kg
  note on carbon content, fossil: BOD is 9.26e-2 kg/kg (Tab 12.13, ecoinvent v2.2 report 18_III). BOD was converted to TOC, using conversion factors in Tab 4.10 (ecoinvent v2.2 report 13_IV). TOC was considered as Total Carbon.
- chemical, organic: 0.62987 kg; source Socolof M. L. 2001; lognormal variance with pedigree 0.0407, pedigree (1,3,5,3,1)
  Proxy with literature value, where no respective datasets were available chemicals organics is used.
  EcoSpold01Location=GLO
  Uncertainty: data from an US-EPA LCA study
  properties: dry mass 1 kg, carbon content, fossil 0.628, wet mass 1 kg, heating value, net 19.03 MJ
  note on carbon content, fossil: This dataset is an unweighted average of 20 organic substances (listed in Tab 88.1, ecoinvent v2.2 report 8, part II), being part of the top100 chemicals included in this database. The C-content has also been calculated as an unweighted average of the C content of the substances composing this dataset.
- steam, in chemical industry: 0 kg; source Socolof M. L. 2001; pedigree (1,1,1,1,1)
  EcoSpold01Location=RER
  Literature Value.
  Uncertainty: data from an US-EPA LCA study
  properties: wet mass 1 kg
- toluene, liquid: 0 kg; source Socolof M. L. 2001; pedigree (1,1,1,1,1)
  Literature Value.
  EcoSpold01Location=RER
  Uncertainty: data from an US-EPA LCA study
  properties: heating value, net 38.17 MJ, carbon content, fossil 0.913043, wet mass 1 kg, dry mass 1 kg
- nitrogen, liquid: 0 kg; source Socolof M. L. 2001; pedigree (1,1,1,1,1)
  Literature Value.
  EcoSpold01Location=RER
  Uncertainty: data from an US-EPA LCA study
  properties: dry mass 1 kg, wet mass 1 kg
- monochloropentafluoroethane: 0.003425 kg; source Socolof M. L. 2001; lognormal variance with pedigree 0.0407, pedigree (1,3,5,3,1)
  EcoSpold01Location=GLO
  Proxy with literature value, to represent HCFC-225ca and HCFC-225cb, monochloropentafluoroethane is used.
  Uncertainty: data from an US-EPA LCA study
  properties: heating value, net 4.71 MJ, dry mass 1 kg, carbon content, fossil 0.155844, wet mass 1 kg
- spent solvent mixture: 0 kg; source Socolof M. L. 2001; pedigree (1,1,1,1,1)
  Literature Value.
  EcoSpold01Location=CH
  Uncertainty: data from an US-EPA LCA study
  production volume 0 kg
    (same comment as for inert waste)
  properties: water content 0.197605, wet mass 1 kg, dry mass 0.835 kg, heating value, net 21.7 MJ, carbon content, fossil 0.571257
  note on carbon content, fossil: Tab A.7, ecoinvent v2.2 report 13_I. C content has been calculated after data in the tables, and then referred to 1 kg DM
- nitric acid, without water, in 50% solution state: 0 kg; source Socolof M. L. 2001; pedigree (1,1,1,1,1)
  EcoSpold01Location=RER
  Proxy with literature value, to represent nitric acid second cerium ammonium, nitric acid is used.
  Uncertainty: data from an US-EPA LCA study
  properties: dry mass 1 kg, wet mass 1 kg
- cyclohexane: 0.048625 kg; source Socolof M. L. 2001; lognormal variance with pedigree 0.0407, pedigree (1,3,5,3,1)
  Literature Value.
  EcoSpold01Location=RER
  Uncertainty: data from an US-EPA LCA study
  properties: carbon content, fossil 0.857143, dry mass 1 kg, wet mass 1 kg, heating value, net 43.22 MJ
- sulfuric acid: 0 kg; source Socolof M. L. 2001; pedigree (1,1,1,1,1)
  Literature Value.
  EcoSpold01Location=RER
  Uncertainty: data from an US-EPA LCA study
  properties: dry mass 1 kg, wet mass 1 kg
- polyester resin, unsaturated: 0 kg; source Socolof M. L. 2001; pedigree (1,1,1,1,1)
  Proxy with literature value, to represent polyester adhesive, polyester resin is used.
  EcoSpold01Location=RER
  Uncertainty: data from an US-EPA LCA study
  properties: carbon content, fossil 0.58584, wet mass 1 kg, dry mass 1 kg, heating value, net 17.75 MJ
  note on carbon content, fossil: (C8H6O2, C8H16O4, C5H12O2,C4H2O3)n was used as a representative formula for unsaturated polyester resin. This formula corresponds to the M390B Unsaturated Polyester Resin (National Industrial Chemicals Notification and Assessment Scheme, full public report, 1994).
- polyethylene terephthalate, granulate, amorphous: 0.7925 kg; source Socolof M. L. 2001; lognormal variance with pedigree 0.0407, pedigree (1,3,5,3,1)
  EcoSpold01Location=RER
  Literature Value.
  Uncertainty: data from an US-EPA LCA study
  properties: heating value, net 22.95 MJ, carbon content, fossil 0.625, dry mass 1 kg, wet mass 1 kg
  note on carbon content, fossil: Polymer of the ethylen terephtalate monomer (C10H8O4)n (ecoinvent v2.2 report 11_II), MW=192 g/mol
- hydrogen, liquid: 7.03995e-6, 3.22101e-5 kg (2 entries); source Socolof M. L. 2001; lognormal variance with pedigree 0.0407, pedigree (1,3,5,3,1)
  EcoSpold01Location=RER
  Literature Value.
  Uncertainty: data from an US-EPA LCA study
- inert waste: -0.00171502, -1.47709e-5, -0.00604521 kg (3 entries); source Socolof M. L. 2001; lognormal variance with pedigree 0.1107, pedigree (1,3,5,3,4)
  (same comment as for inert waste)
  production volume 0.007775 kg
- methyl ethyl ketone: 0.00165751, 0.00439249 kg (2 entries); source Socolof M. L. 2001; lognormal variance with pedigree 0.0407, pedigree (1,3,5,3,1)
  Literature Value.
  EcoSpold01Location=RER
  Uncertainty: data from an US-EPA LCA study
- ethanol, without water, in 99.7% solution state, from ethylene: 0.0453251, 0.100925 kg (2 entries); source Socolof M. L. 2001; lognormal variance with pedigree 0.0407, pedigree (1,3,5,3,1)
  Literature Value.
  EcoSpold01Location=RER
  Uncertainty: data from an US-EPA LCA study
- hydrochloric acid, without water, in 30% solution state: 0.0126992, 0.0568008 kg (2 entries); source Socolof M. L. 2001; lognormal variance with pedigree 0.0407, pedigree (1,3,5,3,1)
  (same comment as for hydrochloric acid, without water, in 30% solution state)
- dipropylene glycol monomethyl ether: 0.0873045, 0.414446 kg (2 entries); source Socolof M. L. 2001; lognormal variance with pedigree 0.0407, pedigree (1,3,5,3,1)
  (same comment as for dipropylene glycol monomethyl ether)
- municipal solid waste: -0.0105236, -6.45023e-5, -4.51362e-5, -0.00017913, -0.126688 kg (5 entries); source Socolof M. L. 2001; lognormal variance with pedigree 0.1107, pedigree (1,3,5,3,4)
  (same comment as for inert waste)
  production volume 0.1375 kg
- carbon dioxide, liquid: 0.0104773, 0.0497727 kg (2 entries); source Socolof M. L. 2001; lognormal variance with pedigree 0.0407, pedigree (1,3,5,3,1)
  EcoSpold01Location=RER
  Literature Value.
  Uncertainty: data from an US-EPA LCA study
- acetone, liquid: 0.0342054, 0.0945446 kg (2 entries); source Socolof M. L. 2001; lognormal variance with pedigree 0.0407, pedigree (1,3,5,3,1)
  Literature Value.
  EcoSpold01Location=RER
  Uncertainty: data from an US-EPA LCA study
- steam, in chemical industry: 0.271668, 1.54083 kg (2 entries); source Socolof M. L. 2001; lognormal variance with pedigree 0.0407, pedigree (1,3,5,3,1)
  EcoSpold01Location=RER
  Literature Value.
  Uncertainty: data from an US-EPA LCA study
- toluene, liquid: 0.0404412, 0.303309 kg (2 entries); source Socolof M. L. 2001; lognormal variance with pedigree 0.0407, pedigree (1,3,5,3,1)
  Literature Value.
  EcoSpold01Location=RER
  Uncertainty: data from an US-EPA LCA study
- nitrogen, liquid: 0.314985, 1.14751 kg (2 entries); source Socolof M. L. 2001; lognormal variance with pedigree 0.0407, pedigree (1,3,5,3,1)
  Literature Value.
  EcoSpold01Location=RER
  Uncertainty: data from an US-EPA LCA study
- spent solvent mixture: -0.300666, -0.00704415, -0.769489 kg (3 entries); source Socolof M. L. 2001; lognormal variance with pedigree 0.0407, pedigree (1,3,5,3,1)
  Literature Value.
  EcoSpold01Location=CH
  Uncertainty: data from an US-EPA LCA study
  production volume 1.0772 kg
- nitric acid, without water, in 50% solution state: 0.00454057, 0.0112916, 0.00541033, 0.034475, 0.00452377, 0.018608, 0.00490569, 0.00305589, 0.0146843, 0.0397548 kg (10 entries); source Socolof M. L. 2001; lognormal variance with pedigree 0.0407, pedigree (1,3,5,3,1)
  (same comment as for nitric acid, without water, in 50% solution state)
- sulfuric acid: 0.0228481, 0.174652 kg (2 entries); source Socolof M. L. 2001; lognormal variance with pedigree 0.0407, pedigree (1,3,5,3,1)
  Literature Value.
  EcoSpold01Location=RER
  Uncertainty: data from an US-EPA LCA study
- polyester resin, unsaturated: 0.000995575, 0.00681692 kg (2 entries); source Socolof M. L. 2001; lognormal variance with pedigree 0.0407, pedigree (1,3,5,3,1)
  (same comment as for polyester resin, unsaturated)

## Inputs from nature
- Water, unspecified natural origin [natural resource, in water]: 2.6 m3; name water_UNO_input; source Socolof M. L. 2001; lognormal variance with pedigree 0.0407, pedigree (1,3,5,3,1)
  Literature Value.
  Uncertainty: data from an US-EPA LCA study

## Emissions to nature
- TOC, Total Organic Carbon [water, surface water]: 0.0102315 kg; lognormal variance with pedigree 0.0807, pedigree (1,3,5,3,1)
  Calculated Value, by default as TOC (gC) = COD/2.7 (COD measured in g O2). Should more correctly be calculated from the carbon content of the specified emissions to water.
  Uncertainty: data from an US-EPA LCA study
- Water [water, unspecified]: 2.43919 m3; name water_to_water_unspecified; = water_UNO_input*(1-fraction_PW_to_air)-(wastewater_output*-1); lognormal variance with pedigree 0.0807, pedigree (2,2,5,1,1)
  Calculated value based on literature values and expert opinion. See comments in the parametres' comment field.
  property fraction, origin: salt water 0; name fraction_origin_salt_water_Ww
  property fraction, origin: unspecified 1; name fraction_origin_unspecified_Ww
  property fraction, origin: fresh water 0; name fraction_origin_fresh_water_Ww
  property carbon content, non-fossil 0; name C_content_non_fossil
  property water in wet mass 1000 kg; name WWM
  property carbon content, fossil 0; name C_content_fossil
  property dry mass 0 kg; name DM
  property wet mass 1000 kg; name WM
- Ethyl acetate [air, urban air close to ground]: 3.05e-5 kg; source Socolof M. L. 2001; lognormal variance with pedigree 0.1607, pedigree (1,3,5,3,1)
  Literature Value.
  Uncertainty: data from an US-EPA LCA study
- Phosphorus [water, surface water]: 0.00031 kg; source Socolof M. L. 2001; lognormal variance with pedigree 0.0807, pedigree (1,3,5,3,1)
  Literature Value.
  Uncertainty: data from an US-EPA LCA study
- Water [air, unspecified]: 0.1586 m3; name water_to_air_unspecified; = (water_UNO_input*fraction_PW_to_air); lognormal variance with pedigree 0.0807, pedigree (2,2,5,1,1)
  (same comment as for Water)
  property fraction, origin: fresh water 0; name fraction_origin_fresh_water
  property fraction, origin: unspecified 1; name fraction_origin_unspecified
  property fraction, origin: salt water 0; name fraction_origin_salt_water
- DOC, Dissolved Organic Carbon [water, surface water]: 0.0102315 kg; lognormal variance with pedigree 0.0807, pedigree (1,3,5,3,1)
  Calculated Value, as equal to TOC.
  Uncertainty: data from an US-EPA LCA study
- COD, Chemical Oxygen Demand [water, surface water]: 0.027625 kg; source Socolof M. L. 2001; lognormal variance with pedigree 0.0807, pedigree (1,3,5,3,1)
  Literature Value.
  Uncertainty: data from an US-EPA LCA study
- Methyl ethyl ketone [air, urban air close to ground]: 0.0016875 kg; source Socolof M. L. 2001; lognormal variance with pedigree 0.1607, pedigree (1,3,5,3,1)
  Literature Value.
  Uncertainty: data from an US-EPA LCA study
- BOD5, Biological Oxygen Demand [water, surface water]: 0.01675 kg; source Socolof M. L. 2001; lognormal variance with pedigree 0.0807, pedigree (1,3,5,3,1)
  Literature Value.
  Uncertainty: data from an US-EPA LCA study
- Hydrocarbons, chlorinated [air, urban air close to ground]: 0.0035 kg; source Socolof M. L. 2001; lognormal variance with pedigree 0.1387, pedigree (4,3,5,3,4)
  Literature Value.
  Uncertainty: Calculated from electricity input
- NMVOC, non-methane volatile organic compounds, unspecified origin [air, urban air close to ground]: 0.00097125 kg; source Socolof M. L. 2001; lognormal variance with pedigree 0.1607, pedigree (1,3,5,3,1)
  Literature Value.
  Uncertainty: data from an US-EPA LCA study
- Hydrogen chloride [air, urban air close to ground]: 9.15e-5 kg; source Socolof M. L. 2001; lognormal variance with pedigree 0.0807, pedigree (1,3,5,3,1)
  Literature Value.
  Uncertainty: data from an US-EPA LCA study
- Toluene [air, urban air close to ground]: 0.00068 kg; source Socolof M. L. 2001; lognormal variance with pedigree 0.1607, pedigree (1,3,5,3,1)
  Literature Value.
  Uncertainty: data from an US-EPA LCA study
- Suspended solids, unspecified [water, surface water]: 0.008075 kg; source Socolof M. L. 2001; lognormal variance with pedigree 0.0807, pedigree (1,3,5,3,1)
  Literature Value.
  Uncertainty: data from an US-EPA LCA study
- Heptane [air, urban air close to ground]: 0.00097125 kg; source Socolof M. L. 2001; lognormal variance with pedigree 0.1607, pedigree (1,3,5,3,1)
  Literature Value.
  Uncertainty: data from an US-EPA LCA study
- Nitrogen [water, surface water]: 0.0071375 kg; source Socolof M. L. 2001; lognormal variance with pedigree 0.0807, pedigree (1,3,5,3,1)
  Literature Value.
  Uncertainty: data from an US-EPA LCA study

## Sampling procedure
literature & own estimations

## Extrapolations
This dataset has been extrapolated from year 2001 to the year of the calculation (2021). The uncertainty has been adjusted accordingly.

## Review by Roland Hischier 2011-09-22
Transfer of documentation done.

## Review by Jürgen Sutter 2007-11-08
passed.
