# manganese dioxide production

Dataset: EcoSpold 2, unit process
Geography: GLO
Time period: 2000-01-01 to 2021-12-31
Technology level: current
Classification: ISIC rev.4 ecoinvent: 2011:Manufacture of basic chemicals
Synonyms: Manganese Black; Cement Black; Manganese dioxide; Manganese(IV) oxide; MnO2; Dioxomanganese
Scenario: Business-as-Usual
System model: Allocation, cut-off by classification
Generated by: Tereza Levova
Published in: Ullmann 2010
Database: ecoinvent
isCopyrightProtected: true
accessRestrictedTo: 1

## General comment
This dataset represents the production of 1 kg of manganese dioxide, with manganese sulfate as byproduct. Several types of synthetic manganese dioxide are produced commercially. The most important use of manganese dioxide is as depolarizer in dry-cell batteries, which use synthetic manganese dioxides that are electrochemically active. Other applications of manganese dioxides include the coloring of brick and ceramic, the use in welding rod manufacture, and the production of Mn chemicals and other chemical and metallurgical products (Reidies 2000).
In principle, synthetic manganese dioxide can be prepared either by a strictly chemical route (chemical manganese dioxide, CMD) or by electrochemical methods (electrolytic manganese dioxide, EMD) or by semisynthetic route from high-grade oxidic manganese ore. This dataset describes the semisynthetic route, since the data availability is much higher than in the case of the EMD technology.
This dataset is based on stoichiometric calculations, as well as data from a large chemical plant (Gendorf 2016).
References:
Reidies, A. H. 2000. Manganese Compounds. Ullmann's Encyclopedia of Industrial Chemistry.
Gendorf (2016) Umwelterklärung 2015, Werk Gendorf Industriepark, www.gendorf.de.

## Included activities start
The activity starts when the raw materials enter the process.

## Included activities end
This activity ends with the production of manganese dioxide, with manganese sulfate as a byproduct. The dataset includes the consumption of raw materials as well as energy uses, infrastructure use and emissions.

## Geography
The data in this dataset are not geography-specific. Some values are based on data from a large chemical factory located in Germany. These are assumed to be valid for this geography.

## Technology
Chemical manganese dioxide (CDM) and Electrolytic manganese dioxide (EDM) are the two dominant production routes. The semisynthetic route presented in this activity is rather marginal, but still used technology for which more data are available than for the other technologies. It is still produced in France at the rate of several thousand tonnes per year under the names Ergogene and Philodyne. The amounts of raw material is calculated using stoichiometric relations (yield of 95%). 0.2% of the unreacted amount of manganese (III) oxide is assumed to be released as manganese (Mn) into air as pollution. The remaining unreacted amount is assumed to leave the process as a part of wastewater. The wastewater treatment efficiency is assumed to be 90%, thus 10% of manganese (Mn) is assumed to be released to environment (water). 0.2% of the unreacted amount of sulfuric acid is assumed to be released as emissions into air. The remaining unreacted amount is assumed leave the process as a part of wastewater. The wastewater treatment efficiency is assumed to be 90%, thus 10% of sulfur (S) is assumed to be released to environment (water).

## Time period
Time of publications. Some values are based on data published by the Gendorf factory and are from the years 2011 to 2015. The time period has been adjusted accordingly. For more details, see the comments of the exchanges.

## Parameters
- efficiency (obsolete): 0.95 dimensionless; name process_efficiency; lognormal variance with pedigree 0.0187, pedigree (4,4,1,3,3)

## Reference product
- manganese sulfate: 1 kg; name manganese_sulfate_output; = ( manganese_sulfate_output_MW/ manganese_dioxide_output_MW); By-product classification allocatable product; CPC 34240: Phosphates of triammonium; salts and peroxysalts of inorganic acids and metals n.e.c.; CAS 7785-87-7; pedigree (1,1,1,1,1)
  Stoichiometric calculation with a yield of 95%.
  production volume 1.04214e7 kg; = RP_PV*manganese_sulfate_output/ABS(manganese_dioxide_output)
    Calculated from the production volume of manganese dioxide in proportion to the respective output amounts.
  property price 0.413 EUR2005; name manganese_sulfate_output_price_EUR2005
    Calculated value based on data from United Nations Commodity Trade Statistics Database (comtrade.un.org). UN comtrade category: 282090 Manganese oxides other than manganese dioxide. Prices from the year 2005. Using exchange rate of 1EURO = 1.209 USD. Average of price of import into 5 main markets (EU, US, JP, IN and CN).
  property molecular weight 150.999 g/mol; name manganese_sulfate_output_MW
  property carbon content 0
    carbon content on a dry matter basis (reserved; not for manual entry)
  property true value 0.717339; name manganese_sulfate_output_true_value
    allocation property applied in "true value" allocation // value calculated from revenue
  properties: water content 0, water in wet mass 0 kg, wet mass 1 kg, carbon content, fossil 0, carbon content, non-fossil 0, dry mass 1 kg, carbon allocation 0 kg
- manganese dioxide: 0 kg; name manganese_dioxide_output; CPC 34220: Zinc oxide; zinc peroxide; chromium oxides and hydroxides; manganese oxides; iron oxides and hydroxides; earth[…]; By-product classification allocatable product; CAS 1313-13-9
  Manganese oxide , MnO2, is deep black to dark brown and practically insoluble in water. Several types of synthetic manganese dioxide are produced commercially for specific end uses. The most important use of manganese dioxide is as depolarizer in dry-cell batteries, which use synthetic manganese dioxides that are electrochemically active. Other applications of manganese dioxides include the coloring of brick and ceramic, the use in welding rod manufacture, and the production of Mn chemicals and other chemical and metallurgical products (Reidies 2000).
  References:
  Reidies, A. H. 2000. Manganese Compounds. Ullmann's Encyclopedia of Industrial Chemistry.
  production volume 6e6 kg; name RP_PV; = 6000*1000
    This technology is applied in production in France (Ullmann's Encyclopedia of Industrial Chemistry). The production volume is estimated to be 'several thousand tonnes per year'. The two other technologies have world production volumes of (CMD=) 40,000 tones/year and (EMD=) 165,000 tones/year.
  property price 1.04 EUR2005; name manganese_dioxide_output_price_EUR2005
    Calculated value based on data from United Nations Commodity Trade Statistics Database (comtrade.un.org). UN comtrade category: 282010 Managanese dioxide. Prices from the year 2005. Using exchange rate of 1EURO = 1.209 USD. Average of price of import into 5 main markets (EU, US, JP, IN and CN).
  property molecular weight 86.936 g/mol; name manganese_dioxide_output_MW
  property carbon content 0
    carbon content on a dry matter basis (reserved; not for manual entry)
  property true value 1.04; name manganese_dioxide_output_true_value
    allocation property applied in "true value" allocation // value calculated from revenue
  properties: water content 0, wet mass 1 kg, water in wet mass 0 kg, carbon content, non-fossil 0, carbon content, fossil 0, dry mass 1 kg, carbon allocation 0 kg

## Inputs from technosphere
- heat, from steam, in chemical industry: 0 MJ; pedigree (1,1,1,1,1)
  Calculated based on literature data published by the industry. This value is a 5-year average of data (2011 - 2015) published by the Gendorf factory (Gendorf, 2016, Umwelterklärung, www.gendorf.de), (Gendorf, 2015, Umwelterklärung, www.gendorf.de), (Gendorf, 2014, Umwelterklärung, www.gendorf.de). The amount of heat used per kg of chemical substance produced is calculated using literature data published by the Gendorf factory based in Germany, which produces a wide range of chemical substances. The factory produced 1657400 tonnes of chemical substances in the year 2015 (Gendorf, 2016, Umwelterklärung, www.gendorf.de) and 740000 tonnes of intermediate products. The amount of heat in the year 2015 was 523500 GJ (Gendorf, 2016, Umwelterklärung, www.gendorf.de) of which 90% was obtained from natural gas and 10% from steam. The resulting amount of heat from steam is 0.22 MJ/kg of chemical product produced. The 5-year average (2011 - 2015, weighted by production volume) is 0.20 MJ/kg. Cross-reference: the amount of chemicals produced (excluding intermediate products) in the EU-28 in the year 2011 was 327 million tonnes (Eurostat, http://ec.europa.eu/eurostat/statistics-explained/index.php/Chemicals_production_statistics, accessed 20170126). The chemical and petrochemical industry sector consumed 2.33 EJ of energy in 2011 (European Commission - Joint Research Centre, 2014, BAT on Common Waste water and Waste Gas Treatment/Management Systems in the Chemical Sector). The resulting energy (both heat and electricity) consumed per kg of chemicals produced in 2011 is thus 7.13 MJ/kg. This is higher than the value calculated using data published by Gendorf – 3.85 MJ/kg, but that is to be expected as the intermediate products are not accounted for.
  properties: heating value, net 1 MJ
- tap water: 0.00611037 kg; lognormal variance with pedigree 0.0106, pedigree (2,3,2,4,3)
  Calculated based on literature data published by the industry. This value is a 5-year average of data (2011 - 2015) published by the Gendorf factory (Gendorf, 2016, Umwelterklärung, www.gendorf.de), (Gendorf, 2015, Umwelterklärung, www.gendorf.de), (Gendorf, 2014, Umwelterklärung, www.gendorf.de). The amount of tap water per kg of chemical substance produced is calculated using literature data published by the Gendorf factory based in Germany, which produces a wide range of chemical substances. The factory produced 1657400 tonnes of chemical substances in the year 2015 (Gendorf, 2016, Umwelterklärung, www.gendorf.de) and 740000 tonnes of intermediate products. The amount of tap water consumed in the year 2015 was 55100 tonnes (Gendorf, 2016, Umwelterklärung, www.gendorf.de). The resulting amount of tap water is 0.023 kg/kg of chemical product produced. The 5-year average (2011 - 2015, weighted by production volume) is 0.026 kg/kg.
  properties: water content 2962.17, dry mass 0.000337476 kg, carbon content, fossil 0.00178991, wet mass 1 kg
  note on carbon content, fossil: Bicarbonate content is 2.93 mol/m3. CO2 content is 0.1 mol/m3 (ecoinvent v2.2 report 8, Tab 93.1).
- wastewater, average: 0 m3; name BP_wastewater_average; pedigree (1,1,1,1,1)
  Calculated based on literature data published by the industry. This value is a 5-year average of data (2011 - 2015) published by the Gendorf factory (Gendorf, 2016, Umwelterklärung, www.gendorf.de), (Gendorf, 2015, Umwelterklärung, www.gendorf.de), (Gendorf, 2014, Umwelterklärung, www.gendorf.de). The amount of wastewater (which is later on treated in the municipal WWTP) per kg of chemical substance produced is calculated using literature data published by the Gendorf factory based in Germany, which produces a wide range of chemical substances. The factory produced 1657400 tonnes of chemical substances in the year 2015 (Gendorf, 2016, Umwelterklärung, www.gendorf.de) and 740000 tonnes of intermediate products. The amount of wastewater which is later on treated in the municipal WWTP in the year 2015 was 1200 tonnes (Gendorf, 2016, Umwelterklärung, www.gendorf.de). The resulting amount of wastewater is 2.7E-06 m3/kg of chemical product produced.
  production volume 0 m3
    (same comment as for manganese sulfate)
  property price 0 EUR2005; name BP_wastewater_average_price_EUR2005
  properties: water content 2882.2, dry mass 0.346837 kg, wet mass 1000 kg, carbon content, non-fossil 0.194039
  note on carbon content, non-fossil: 0.0673 kg TOC/m3 (Tab A.17, ecoinvent v2.2 report 13_I). TOC was considered as Total Carbon.
- heat, district or industrial, natural gas: 0.505281 MJ; source Gendorf 2000; lognormal variance with pedigree 0.0106, pedigree (2,3,2,4,3)
  Calculated based on literature data published by the industry. This value is a 5-year average of data (2011 - 2015) published by the Gendorf factory (Gendorf, 2016, Umwelterklärung, www.gendorf.de), (Gendorf, 2015, Umwelterklärung, www.gendorf.de), (Gendorf, 2014, Umwelterklärung, www.gendorf.de). The amount of heat used per kg of chemical substance produced is calculated using literature data published by the Gendorf factory based in Germany, which produces a wide range of chemical substances. The factory produced 1657400 tonnes of chemical substances in the year 2015 (Gendorf, 2016, Umwelterklärung, www.gendorf.de) and 740000 tonnes of intermediate products. The amount of heat in the year 2015 was 523500 GJ (Gendorf, 2016, Umwelterklärung, www.gendorf.de) of which 90% was obtained from natural gas and 10% from steam. The resulting amount of heat from natural gas is 2.02 MJ/kg of chemical product produced. The 5-year average (2011 - 2015, weighted by production volume) is 2.15 MJ/kg. Cross-reference: the amount of chemicals produced (excluding intermediate products) in the EU-28 in the year 2011 was 327 million tonnes (Eurostat, http://ec.europa.eu/eurostat/statistics-explained/index.php/Chemicals_production_statistics, accessed 20170126). The chemical and petrochemical industry sector consumed 2.33 EJ of energy in 2011 (European Commission - Joint Research Centre, 2014, BAT on Common Waste water and Waste Gas Treatment/Management Systems in the Chemical Sector). The resulting energy (both heat and electricity) consumed per kg of chemicals produced in 2011 is thus 7.13 MJ/kg. This is higher than the value calculated using data published by Gendorf – 3.85 MJ/kg, but that is to be expected as the intermediate products are not accounted for.
  properties: heating value, net 1 MJ
- sulfuric acid: 0 kg; name sulfuric_acid_input; pedigree (1,1,1,1,1)
  Stoichiometric calculation with a yield of 95%.
  property molecular weight 98.077 g/mol; name sulfuric_acid_input_MW
  properties: dry mass 1 kg, wet mass 1 kg
- electricity, medium voltage: 0.097766 kWh; source Gendorf 2000; lognormal variance with pedigree 0.0106, pedigree (2,3,2,4,3)
  Calculated based on literature data published by the industry. This value is a 5-year average of data (2011 - 2015) published by the Gendorf factory (Gendorf, 2016, Umwelterklärung, www.gendorf.de), (Gendorf, 2015, Umwelterklärung, www.gendorf.de), (Gendorf, 2014, Umwelterklärung, www.gendorf.de). The amount of electricity per kg of chemical substance produced is calculated using literature data published by the Gendorf factory based in Germany, which produces a wide range of chemical substances. The factory produced 1657400 tonnes of chemical substances in the year 2015 (Gendorf, 2016, Umwelterklärung, www.gendorf.de) and 740000 tonnes of intermediate products. The amount of electricity consumed in the year 2015 was 3498800 GJ (Gendorf, 2016, Umwelterklärung, www.gendorf.de). The resulting amount of electricity is 0.406 kWh/kg (year 2015) of chemical substance produced. The 5-year average (2011 - 2015, weighted by production volume) is 0.416 kWh/kg (1.5 MJ/kg). Cross-reference: the amount of chemicals produced (excluding intermediate products) in the EU-28 in the year 2011 was 327 million tonnes (Eurostat, http://ec.europa.eu/eurostat/statistics-explained/index.php/Chemicals_production_statistics, accessed 20170126). The chemical and petrochemical industry sector consumed 2.33 EJ of energy in 2011 (European Commission - Joint Research Centre, 2014, BAT on Common Waste water and Waste Gas Treatment/Management Systems in the Chemical Sector). The resulting energy (both heat and electricity) consumed per kg of chemicals produced in 2011 is thus 7.13 MJ/kg. This is higher than the value calculated using data published by Gendorf – 3.85 MJ/kg, but that is to be expected as the intermediate products are not accounted for.
- manganese(III) oxide: 0.449241 kg; name manganese_oxide_input; = (1/ process_efficiency)*( manganese_oxide_input_MW/ manganese_dioxide_output_MW); lognormal variance with pedigree 0.0248, pedigree (4,5,2,1,3)
  Stoichiometric calculation with a yield of 95%.
  property molecular weight 157.873 g/mol; name manganese_oxide_input_MW
  properties: wet mass 1 kg, dry mass 1 kg
- chemical factory, organics: 9.40058e-11 unit; source Gendorf 2000; lognormal variance with pedigree 0.31, pedigree (2,3,2,4,3)
  Calculated based on literature data published by the industry. For this activity, no information was readily available concerning infrastructure and land-use. Therefore, the infrastructure is estimated based on data from two chemical factories, the BASF site of Ludwigshafen and the chemical factory in Gendorf (which are both located in Germany), which produce a wide range of chemical substances. Based on this data, the following assumptions are made: the built area amounts to about 4.2 ha, the plant has an average output of 50'000 t/a and a lifespan of fifty years. The estimated infrastructure amount is therefore 4.00 E-10 units per kg of produced chemical.
  References:
  Althaus H.-J., Chudacoff M., Hischier R., Jungbluth N., Osses M. and Primas A. (2007) Life Cycle Inventories of Chemicals. ecoinvent report No. 8, v2.0. EMPA Dübendorf, Swiss Centre for Life Cycle Inventories, Dübendorf, CH.
  Gendorf (2000) Umwelterklärung 2000, Werk Gendorf. Werk Gendorf, Burgkirchen.
- heat, from steam, in chemical industry: 0.00704506, 0.0399578 MJ (2 entries); lognormal variance with pedigree 0.0106, pedigree (2,3,2,4,3)
  (same comment as for heat, from steam, in chemical industry)
- wastewater, average: -1.98269e-7, -2.1449e-8, -4.14821e-7 m3 (3 entries); lognormal variance with pedigree 0.0106, pedigree (2,3,2,4,3)
  (same comment as for wastewater, average)
  production volume 16.2 m3
- sulfuric acid: 0.0322866, 0.2468 kg (2 entries); lognormal variance with pedigree 0.0248, pedigree (4,5,2,1,3)
  Stoichiometric calculation with a yield of 95%.
  properties: dry mass 1 kg, wet mass 1 kg, molecular weight 98.077 g/mol

## Inputs from nature
- Water, well, in ground [natural resource, in water]: 0.000195062 m3; lognormal variance with pedigree 0.0106, pedigree (2,3,2,4,3)
  Calculated based on literature data published by the industry. This value is a 5-year average of data (2011 - 2015) published by the Gendorf factory (Gendorf, 2016, Umwelterklärung, www.gendorf.de), (Gendorf, 2015, Umwelterklärung, www.gendorf.de), (Gendorf, 2014, Umwelterklärung, www.gendorf.de). The amount of groundwater and surface water (river) extracted per kg of chemical substance produced is calculated using literature data published by the Gendorf factory based in Germany, which produces a wide range of chemical substances. The factory produced 1657400 tonnes of chemical substances in the year 2015 (Gendorf, 2016, Umwelterklärung, www.gendorf.de) and 740000 tonnes of intermediate products. The amount of groundwater and surface water (river) extracted in the year 2015 was 19950000 tonnes and 21488100 tonnes respectively (Gendorf, 2016, Umwelterklärung, www.gendorf.de).
- Water, river [natural resource, in water]: 0.000202112 m3; lognormal variance with pedigree 0.0106, pedigree (2,3,2,4,3)
  (same comment as for Water, well, in ground)
- Water, cooling, unspecified natural origin [natural resource, in water]: 0.00385424 m3; lognormal variance with pedigree 0.0106, pedigree (2,3,2,4,3)
  Calculated based on literature data published by the industry. This value is a 5-year average of data (2011 - 2015) published by the Gendorf factory (Gendorf, 2016, Umwelterklärung, www.gendorf.de), (Gendorf, 2015, Umwelterklärung, www.gendorf.de), (Gendorf, 2014, Umwelterklärung, www.gendorf.de). The amount of water for cooling extracted per kg of chemical substance produced is calculated using literature data published by the Gendorf factory based in Germany, which produces a wide range of chemical substances. The factory produced 1657400 tonnes of chemical substances in the year 2015 (Gendorf, 2016, Umwelterklärung, www.gendorf.de) and 740000 tonnes of intermediate products. The reported amounts of water extracted as groundwater and surface water (river) are assumed to be used entirely for cooling purposes.

## Emissions to nature
- Sulfur [water, unspecified]: 0.000505204 kg; name sulfur_emissions_water; = ((((1/process_efficiency)-1)*sulfuric_acid_input)-sulfuric_acid_emissions_air)*(sulfur_emissions_water_MW/ sulfuric_acid_input_MW)*0.1; lognormal variance with pedigree 0.0642, pedigree (4,5,2,1,3)
  In case of sulfuric acid (H2SO4), part of the unreacted volume evaporates as emission to air (0.2% of the input), the rest is released as sulfur (S) as a part of wastewater. The efficiency of the waste water treatment plant (WWTP) is assumed to be 90%, i.e. 10% of the volume of sulfur on the inflow to the WWTP is released to the environment.
  property molecular weight 35.065 g/mol; name sulfur_emissions_water_MW
- Water [water, unspecified]: 0.00397339 m3; lognormal variance with pedigree 0.0106, pedigree (2,3,2,4,3)
  Calculated based on literature data published by the industry (Gendorf, 2016, Umwelterklärung, www.gendorf.de). The amount of water released back to the environment consists of the amount of process water treated in the internal WWTP and then released back to the environment and the amount of cooling water released back to the environment. This amount also includes water produced by the reaction (0.207 kg per kg of manganese dioxide produced).
  property fraction, origin: salt water 0; name fraction_origin_salt_water_Ww
  property fraction, origin: fresh water 0; name fraction_origin_fresh_water_Ww
  property fraction, origin: unspecified 1; name fraction_origin_unspecified_Ww
- Manganese [water, unspecified]: 0.000791527 kg; name manganese_emissions_water; = ((((1/process_efficiency)-1)*manganese_oxide_input)*( manganese_emissions_water_MW/manganese_oxide_input_MW)-manganese_emissions_air)*0.1; lognormal variance with pedigree 0.0642, pedigree (4,5,2,1,3)
  In case of manganese (III) oxide (Mn2O3), part of the unreacted volume evaporates as emission to air (0.2% of the input) in the form of manganese (Mn), the rest is released as manganese as a part of wastewater. The efficiency of the waste water treatment plant (WWTP) is assumed to be 90%, i.e. 10% of the volume of manganese on the inflow to the WWTP is released to the environment.
  property molecular weight 54.938 g/mol; name manganese_emissions_water_MW
- Water [air, unspecified]: 0.00032902 m3; lognormal variance with pedigree 0.0106, pedigree (2,3,2,4,3)
  Calculated to ensure the water balance. In general, in the case of recirculating cooling systems, 77% of the water input evaporates to air. In case of once-through cooling systems, 4% of the water input evaporates to air. The process water has in the chemical industry an average evaporation rate of 20.5%. In the specific case of the Gendorf factory, the calculated evaporation rate based on the data published is 6.3%. This matches the qualitative information, that the majority of the cooling systems in Gendorf are once-through and that the amount of cooling water used is significantly higher than the amount of process water used (Gendorf, 2016, Umwelterklärung, www.gendorf.de).
  property fraction, origin: unspecified 1; name fraction_origin_unspecified
  property fraction, origin: fresh water 0; name fraction_origin_fresh_water
  property fraction, origin: salt water 0; name fraction_origin_salt_water
- Manganese [air, unspecified]: 0.000312661 kg; name manganese_emissions_air; = (0.002*manganese_oxide_input)*(manganese_emissions_air_MW/manganese_oxide_input_MW); lognormal variance with pedigree 0.0248, pedigree (4,5,2,1,3)
  It has been assumed that 0.2% of the volume of the input of manganese (III) oxide evaporates in the form of manganese as pollution into the air.
  property molecular weight 54.938 g/mol; name manganese_emissions_air_MW
- Sulfuric acid [air, unspecified]: 0.000558172 kg; name sulfuric_acid_emissions_air; = 0.002*sulfuric_acid_input; lognormal variance with pedigree 0.0248, pedigree (4,5,2,1,3)
  It is assumed that 0.2% of the volume of the input of sulfuric acid evaporates as pollution into the air.
  property molecular weight 98.077 g/mol; name sulfuric_acid_emissions_air_MW

## Sampling procedure
Literature data and stochiometric calculations. Some values are calculated based on data from a large chemical factory located in Germany. For more details, see the comments of the exchanges.

## Review by Emilia Moreno Ruiz 2017-08-08
This dataset was additionally reviewed in a separate review process by Eric Johnson of Atlantic Consulting as well as Emilia Moreno Ruiz and Gregor Wernet of ecoinvent.
