# road maintenance

Dataset: EcoSpold 2, unit process
Geography: RoW
Time period: 1990-01-01 to 2021-12-31
Technology level: current
Classification: ISIC rev.4 ecoinvent: 4210:Construction of roads and railways
Classification: EcoSpold01Categories: transport systems/road
Scenario: Business-as-Usual
System model: Allocation, cut-off by classification
Generated by: Andrew Simons
Published in: Spielmann M. 2007
Database: ecoinvent
isCopyrightProtected: true
accessRestrictedTo: 1

## General comment
The dataset represents the expenditures and interventions due to the operation and maintenance of road networks. The operation and maintenance of roads refers to aspects of lighting, weed control, line marking, etc. rather than the replacement and repair of road sections. It is therefore directly related to km use. The renewal of different road layers and eventual road disposal is accounted for in the road construction datasets. All environmental exchanges refer to one meter and year (m*year). Road operation and maintenance is therefore modelled as a constant renewal rather than as a one-time expenditure, and is assumed directly related to road use in km. In the transport datasets the value of 1.29E-03 m*year per km of transport should be applied. For freight transports this is then devided by the load transported to give road maintenance demand per metric ton*km. The dataset is based on a modeling of Swiss motorways and Class 1, 2 & 3 roads as described in the following sources:

Bundesamt für Statistik (2000) Mobilität in der Schweiz. Ergebnisse des Mikrozensus 2000 zum Verkehrsverhalten.Bundesamt für Statistik, Bern.

Maibach et al. (1999) Ökoinventar Transporte: Grundlagen für den ökologischen Vergleich von Transportsystemen und den Einbezug von Transportsystemen in Ökobilanzen. Technischer Schlussbericht. In: Schweizerischer Nationalfonds zur Förderung der wissenschaftlichen Forschung (ed. SPP Umwelt M.). 2nd Edition. INFRAS, Zürich.

## Included activities start
The dataset starts with land trransformation for the construction/replacement of roads.

## Included activities end
The dataset ends with emissions to the environment.

The dataset includes the energy for road operation and the materials used in road maintenance. It includes the NMVOC emissions to air from the solvent containing paint as well as salt used for de-icing which runs off to surface water. The dataset does not include road construction and disposal.

## Geography
Copied from "road construction, CH 2000". Data refers to average conditions in Switzerland.

## Technology
In order to account for the environmental interventions due to road operation and maintenance generic data for the Swiss road infrastructure is employed. The figures presented are based on inventories generated by Maibach et al. (1999). The data is presented for 1 meter of road and 1 year. Different road types have been distinguished; namely motorway (Nationalstrassen) and three different classes (1st class road, 2nd class road and 3rd class road) of the Swiss Road network. For all categories, the expenditures for operation and maintenance are recorded. 1500t of solvent containing paint per year is used on Swiss roads, 25% of which is solvent based. The dataset assumes that all solvent is emitted as NMVOC.
References:
Maibach M., Peter D. and Seiler B. (1999) Ökoinventar Transporte: Grundlagen für den ökologischen Vergleich von Transportsystemen und den Einbezug von Transportsystemen in Ökobilanzen. Technischer Schlussbericht. In: Schweizerischer Nationalfonds zur Förderung der wissenschaftlichen Forschung (ed. SPP Umwelt M.). 2nd Edition.
Stolz J. (2001) Luftschadstoff-Emissionen von Strassenbaustellen. Teil I: PAH und VOC. Nr. 126. Bundesamt für Umwelt, Wald und Landschaft (BUWAL), Bern
BUWAL (1995) Handbuch: Emissionsfaktoren für stationäre Quellen. Bundesamt fuer Umwelt, Wald und Landschaft, Bern
Wresowar M. and Sieghardt M. (2000) Studie über die Auswirkung stickstoffhältiger Auftaumittel. Auswirkungen auf Boden und Bewuchs. Vergleich mit herkömmlichen Auftaumitteln. pdf-file from http://www.magwien.gv.at/ma22/pool/doc/auftaumittel.pdf.
Hüsler W., Willi E., Meier E., Bachmann P. and Brodkowski L. (1989) Verkehrsflächen der Schweiz: Groberhebung. zur Raumplanung. Bundesamt für Raumplanung (BRP), Bern as pdf-File under: N
BfS (2000) Mobilität in der Schweiz. Ergebnisse des Mikrozensus 2000 zum Verkehrsverhalten. Bundesamt für Statistik, Bern
BFE (2003) Gesamte Erzeugung und Abgabe Elektrischer Enegie in der Schweiz. 1991. Bundesamt für Energie, Bern, Online-Version under: http://www.energie-schweiz.ch/.

## Time period
Road lenght is based on Swiss statistical data (2000) and extrapolated using the conversion factors supplied centrally by ecoinvent. The material consumption represents a situation in the early 1990ties.

## Parameters
- road network, Switzerland: 71150 km; name road_network_CH
  The length of the Swiss road network considering motorways and Class 1, 2 & 3 roads.
  Data from:
  Bundesamt für Statistik (2000) Mobilität in der Schweiz. Ergebnisse des Mikrozensus 2000 zum Verkehrsverhalten. Bundesamt für Statistik, Bern.
  Maibach et al. (1999) Ökoinventar Transporte: Grundlagen für den ökologischen Vergleich von Transportsystemen und den Einbezug von Transportsystemen in Ökobilanzen. Technischer Schlussbericht. In: Schweizerischer Nationalfonds zur Förderung der wissenschaftlichen Forschung (ed. SPP Umwelt M.). 2nd Edition. INFRAS, Zürich.

## Reference product
- road maintenance: 1 m*year; CPC 54211: General construction services of highways (except elevated highways), streets and roads; By-product classification allocatable product
  production volume 8.69835e9 m*year; = road_network_CH*1000*(1/0.007919)
    Extrapolated value. Value taken from Switzerland and extrapolated using the relative GDPs of Switzerland and GLO in 2000. Relative GDPs supplied centrally by ecoinvnet. 1 m*year refers to the provision of 1m road as a function of the relative lifetime of its parts. The annual production volume is therefor the length of the road network which it is representing.
  property price 2.67739 EUR2005
    Calculated based on inputs: The price of the product has been calculated as a sum of the values of the material and energy inputs for this product. This value is therefore a rough estimation. It may underestimate the real price since there are additional expenses when producing any product. These expences can include for example labour costs, treatment of waste materials and profit for the producer. Please consider carefully whether this level of data quality is acceptable for your application.

## Inputs from technosphere
- gravel, crushed: 0 kg; name gravel; source Maibach M. 1999; pedigree (1,1,1,1,1)
  Gravel used for maintenance of road surfaces.
  EcoSpold01Location=CH
  Uncertainty: literature studies and own calculations. Pedigree matrix set according to expert judgment.
  properties: wet mass 1 kg, dry mass 1 kg
- electricity, medium voltage: 0 kWh; source BFE 2003; pedigree (1,1,1,1,1)
  Calculated value. Electricity used for lighting of highways and tunnels.
  EcoSpold01Location=CH
  Uncertainty: literature studies and own calculations. Pedigree matrix set according to expert judgment.
- alkyd paint, white, without water, in 60% solution state: 0.00739 kg; source Maibach M. 1999; lognormal variance with pedigree 0.1032, pedigree (2,3,5,5,1)
  Calculated value. Road marking.
  Uncertainty: literature studies and own calculations. Pedigree matrix set according to expert judgment.
  properties: wet mass 1 kg, dry mass 1 kg, carbon content, non-fossil 0.161654, carbon content, fossil 0.414587, heating value, net 17.46 MJ
- sodium chloride, powder: 2.57 kg; source Maibach M. 1999; lognormal variance with pedigree 0.1032, pedigree (2,3,5,5,1)
  Calculated value. De-icing of roads.
  Uncertainty: literature studies and own calculations. Pedigree matrix set according to expert judgment.
  properties: wet mass 1 kg, dry mass 1 kg
- glyphosate: 4.96e-5 kg; source Maibach M. 1999; lognormal variance with pedigree 0.1032, pedigree (2,3,5,5,1)
  Calculated value. Herbicide for weed control.
  Uncertainty: literature studies and own calculations. Pedigree matrix set according to expert judgment.
  properties: carbon content, fossil 0.214286, dry mass 1 kg, wet mass 1 kg
- alkyd paint, white, without solvent, in 60% solution state: 0.0123 kg; source Maibach M. 1999; lognormal variance with pedigree 0.1032, pedigree (2,3,5,5,1)
  (same comment as for alkyd paint, white, without water, in 60% solution state)
  properties: dry mass 1 kg, wet mass 1 kg, carbon content, non-fossil 0.199629, carbon content, fossil 0.140367, heating value, net 10.3 MJ
  note on carbon content, non-fossil: C content was calculated as an addition of C content in the raw materials.
- transport, passenger car, large size, diesel, EURO 4: 0.502 km; source Maibach M. 1999; lognormal variance with pedigree 0.1106, pedigree (4,3,5,5,1)
  Used to represent the transport of maintenance personnel and equipment. The GLO dataset uses a vehicle of reasonable emissions standards.
  Uncertainty: Own calculations. Pedigree matrix set according to expert judgment.
- gravel, crushed: 0.372166, 0.0340717, 1.70376 kg (3 entries); source Maibach M. 1999; lognormal variance with pedigree 0.0546, pedigree (3,3,5,5,1)
  (same comment as for gravel, crushed)
- electricity, medium voltage: 0.240759, 0.0461672, 0.775052, 11.2724, 1.58886, 5.17673 kWh (6 entries); source BFE 2003; lognormal variance with pedigree 0.0546, pedigree (3,3,5,5,1)
  (same comment as for electricity, medium voltage)

## Emissions to nature
- Sodium, ion [water, surface water]: 1.03 kg; lognormal variance with pedigree 0.1032, pedigree (2,3,5,5,1)
  Assumed that all salt eventually washes off the road to surface water.
  Uncertainty: literature studies and own calculations. Pedigree matrix set according to expert judgment.
- NMVOC, non-methane volatile organic compounds, unspecified origin [air, unspecified]: 0.00527 kg; source Maibach M. 1999; lognormal variance with pedigree 0.1032, pedigree (2,3,5,5,1)
  1500t solvent containing paint per year (on Swiss roads), 25% of which is solvent. All solvent emitted as NMVOC.
  Uncertainty: literature studies and own calculations. Pedigree matrix set according to expert judgment.
- Chloride [water, surface water]: 1.54 kg; lognormal variance with pedigree 0.1032, pedigree (2,3,5,5,1)
  (same comment as for Sodium, ion)

## Sampling procedure
national statistics and literature

## Extrapolations
This dataset has been copied from an original dataset covering the geography CH. The uncertainty has been adjusted accordingly.
