# photovoltaic laminate production, a-Si

Dataset: EcoSpold 2, unit process
Geography: US
Time period: 1997-01-01 to 2021-12-31
Technology level: current
Classification: ISIC rev.4 ecoinvent: 2610:Manufacture of electronic components and boards
Classification: EcoSpold01Categories: photovoltaic/production of components
Synonyms: PV-module; Solarmodul; amorphous silicon
Tags: ConvertedDataset
Scenario: Business-as-Usual
System model: Allocation, cut-off by classification
Share of production covered: 100 %
Generated by: Niels Jungbluth
Published in: Jungbluth, N. 2007
Database: ecoinvent
isCopyrightProtected: true
accessRestrictedTo: 1

## General comment
Production of photovoltaic thin film laminates. Deposition of nine thin-film layers on the triple-junction cell. The laminates ASR128 produced at United Solar have a size of 2.3 m2. The weight is 2.7 kg per m2. The rated nominal power is about 128Wp per laminate. The efficiency is estimated here for newer products with 6.45% at the beginning of the life time. Degradation has to be taken into account with achieved yields.
[This dataset was already contained in the ecoinvent database version 2. It was not individually updated during the transfer to ecoinvent version 3. Life Cycle Impact Assessment results may still have changed, as they are affected by changes in the supply chain, i.e. in other datasets. This dataset was generated following the ecoinvent quality guidelines for version 2. It may have been subject to central changes described in the ecoinvent version 3 change report (http://www.ecoinvent.org/database/ecoinvent-version-3/reports-of-changes/), and the results of the central updates were reviewed extensively. The changes added e.g. consistent water flows and other information throughout the database. The documentation of this dataset can be found in the ecoinvent reports of version 2, which are still available via the ecoinvent website. The change report linked above covers all central changes that were made during the conversion process.]

## Included activities end
Electricity and heat use, materials, transport of materials, disposal of wastes and the product. Data for direct air and water emissions were not available. It can be expected that small amount of NMVOC will be emitted from the lamination process.

## Geography
Data for United Solar in the United States.

## Technology
Production technology of thin film a-Si cells. The modules contain triple junction cells, which are made in a continuous roll-to-roll deposition on stainless steel. The cell is deposited using a vapour-deposition process at low temperatures.

## Time period
Data refer to 2005. Some are extrapolated from older information.

## Parameters
- fraction, tap water, to air: 0.15 dimensionless; name fraction_TW_to_air; = fraction_PW_to_air; lognormal variance with pedigree 0.092025, pedigree (4,4,3,2,4)
  Calculated value. See comment in the other parametres present in this dataset. Tap water is considered to be always used as process water, thus process water fractions to air are applied to all tap water input flows to calculate the amount of water consumed in the processes.
- fraction, process water, to air: 0.15 dimensionless; name fraction_PW_to_air; lognormal variance with pedigree 0.092025, pedigree (4,4,3,2,4)
  Literature value. In case when no industry/process specific data are available, default evaporation fraction value is used. This value is 15% and is based on literature (Statistics Canada, 2007 & Shaffer, K.H., 2008, Consumptive water use in the Great Lakes Basin, USGS & Shiklomanov, 2003, World Water Resources at the Beginning of the 21st Century) and has been approved by an expert.

## Reference product
- photovoltaic laminate, a-Si: 1 m2; CPC 47150: Diodes, transistors and similar semi-conductor devices; photosensitive semi-conductor devices; light emitting […]; By-product classification allocatable product
  EcoSpold01Location=US
  production volume 145547 m2
    8.1 MW in 2005
    128 W/2.3 m2. Production is 8.1 MW in 2005 (from Tab 9.10, ecoinvent v2 report 6_XII)
  property price 279 EUR2005
    Calculated based on literature (EPIA - European Photovoltaic Industry association, Solar Photovoltaics competing in the energy sector On the road to competitiveness, 2011, http://www.epia.org/publications/epiapublications.html). The price of PV laminate is 5 EUR/Wp. The rated nominal power of a laminate which has a size of 2.3m2 is 128Wp. Thus (1/2.3*128=) 55Wp is the power of 1m2. The price of 1m2 of such a laminate is then (55*5=) 278 EUR/m2.

## Inputs from technosphere
- polyethylene, high density, granulate: 1.0988 kg; lognormal variance with pedigree 0.0426, pedigree (3,3,5,1,1)
  Pacca 2006
  EcoSpold01Location=RER
  Uncertainty: Pacca 2006
  properties: heating value, net 42.47 MJ, carbon content, fossil 0.857143, dry mass 1 kg, wet mass 1 kg
  note on carbon content, fossil: Polyethylene is formed out of a huge amount of ethylene monomers (C2H4) (ecoinvent v2.2 report 11_II). MW=28 g/mol
- steel, low-alloyed, hot rolled: 0.96357 kg; lognormal variance with pedigree 0.0426, pedigree (3,3,5,1,1)
  Pacca 2006
  Uncertainty: Pacca 2006
  properties: wet mass 1 kg, dry mass 1 kg, carbon content, fossil 0.005
  note on carbon content, fossil: Low alloyed steel composition given in Tab. 3.2 ecoinvent v2.2 report 10_partII. Steel assumed to have a C content of 0.5%
- heat, district or industrial, other than natural gas: 5.59541 MJ; lognormal variance with pedigree 0.0426, pedigree (3,3,5,1,1)
  Pacca 2006
  EcoSpold01Location=RER
  Uncertainty: Pacca 2006
  properties: heating value, net 1 MJ
- transport, freight train: 0.000178736 metric ton*km; = cadmium_telluride * 200/1000
  The cadmium telluride is assumed to be transported 200 km by rail. This is the standard rail transport distance for the US (see table 4.2, p. 635/926 in Classen et al., 2009).
  References:
  Classen M., Althaus H.-J., Blaser S., Tuchschmid M., Jungbluth N., Doka G., Faist Emmenegger M. and Scharnhorst W. (2009) Life Cycle Inventories of Metals. Final report ecoinvent data v2.1, No 10. EMPA Dübendorf, Swiss Centre for Life Cycle Inventories, Dübendorf, CH, Online-Version under: www.ecoinvent.ch
- polyvinylfluoride, film: 0.12306 kg; lognormal variance with pedigree 0.0426, pedigree (3,3,5,1,1)
  EcoSpold01Location=US
  Pacca 2006
  Uncertainty: Pacca 2006
  properties: carbon content, fossil 0.521739, wet mass 1 kg, dry mass 1 kg, heating value, net 23.7 MJ
- oxygen, liquid: 0.00048526 kg; lognormal variance with pedigree 0.0426, pedigree (3,3,5,1,1)
  Pacca 2006
  EcoSpold01Location=RER
  Uncertainty: Pacca 2006
  properties: wet mass 1 kg, dry mass 1 kg
- tap water: 39.672 kg; name tap_water_input; lognormal variance with pedigree 0.0426, pedigree (3,3,5,1,1)
  EcoSpold01Location=RER
  Pacca 2006
  Uncertainty: Pacca 2006
  properties: dry mass 0.000337476 kg, wet mass 1 kg, carbon content, fossil 0.00178991, water content 2962.17
  note on carbon content, fossil: Bicarbonate content is 2.93 mol/m3. CO2 content is 0.1 mol/m3 (ecoinvent v2.2 report 8, Tab 93.1).
- indium: 0.00089368 kg; lognormal variance with pedigree 0.062, pedigree (3,4,5,1,3)
  EcoSpold01Location=RER
  Indium tin oxide, amount less than 0.05%
  Uncertainty: Indium tin oxide, amount less than 0.05%
  properties: wet mass 1 kg, dry mass 1 kg
- glass fibre reinforced plastic, polyamide, injection moulded: 0.035768 kg; lognormal variance with pedigree 0.0426, pedigree (3,3,5,1,1)
  Pacca 2006
  EcoSpold01Location=RER
  Uncertainty: Pacca 2006
  properties: dry mass 1 kg, wet mass 1 kg, carbon content, fossil 0.446018
  note on carbon content, fossil: Polyamide resin assimilate to Nylon 66 (ecoinvent v2.2 report 7_XIII). Nylon 66 is derived from hexamethylene diamine and adipic acid and has the following structure: -(HN-(CH2)6-NH-CO-(CH2)4-CO)n- (ecoinvent v2.2 report 11_II), C12H22N2O2. MW=226 g/mol. Here Nylon 66 is – mainly for improved stiffness and stability – modified with glass fibres. The glass fibre content in the product is assumed of 30%. (ecoinvent v2.2 report 11_II)
- waste plastic, mixture: -0.34567 kg; lognormal variance with pedigree 0.0586, pedigree (4,3,5,1,1)
  EcoSpold01Location=CH
  Calculation for end of life disposal
  Uncertainty: Calculation for end of life disposal
  production volume 50311.2 kg
    Calculated from the production volume of photovoltaic laminate, a-Si in proportion to the respective output amounts.
  properties: wet mass 1 kg, carbon content, fossil 0.747344, heating value, net 30.79 MJ, dry mass 0.847 kg, water content 0.180638
  note on carbon content, fossil: C content in 1 kg DM was calculated using data in Tab A.2, ecoinvent v2.2 report 13_I
  note on heating value, net: Value taken from the general comment of the treatment dataset.
- photovoltaic panel factory: 4e-6 unit; lognormal variance with pedigree 0.3421, pedigree (1,4,5,3,1)
  EcoSpold01Location=GLO
  Assumption
  Uncertainty: Assumption
- aluminium alloy, AlMg3: 0.014311 kg; lognormal variance with pedigree 0.0426, pedigree (3,3,5,1,1)
  EcoSpold01Location=RER
  Pacca 2006
  Uncertainty: Pacca 2006
  properties: dry mass 1 kg, wet mass 1 kg
- brazing solder, cadmium free: 0.0026204 kg; lognormal variance with pedigree 0.0426, pedigree (3,3,5,1,1)
  Solder lead
  EcoSpold01Location=RER
  Uncertainty: Solder lead
  properties: wet mass 1 kg, dry mass 1 kg
- wastewater from glass production: -0.039672 m3; name wastewater_output; lognormal variance with pedigree 0.0586, pedigree (4,3,5,1,1)
  Calculation with water use
  EcoSpold01Location=CH
  Uncertainty: Calculation with water use
  production volume 5774.14 m3
    (same comment as for waste plastic, mixture)
  property price 0 EUR2005; name wastewater_output_price_EUR2005
  properties: dry mass 1.09356 kg, water content 913.443, wet mass 1000 kg, carbon content, fossil 0.0455242
  note on carbon content, fossil: COD= 0.115 kg/m3 (Tab A.18, ecoinvent v2.2 report 13_I). COD was converted to TOC, using conversion factors in Tab 4.10 (ecoinvent v2.2 report 13_IV). TOC was considered as Total Carbon.
- waste rubber, unspecified: -0.067574 kg; lognormal variance with pedigree 0.0586, pedigree (4,3,5,1,1)
  (same comment as for waste plastic, mixture)
  production volume 9835.18 kg
    (same comment as for waste plastic, mixture)
  properties: dry mass 1 kg, carbon content, fossil 0.853, wet mass 1 kg, heating value, net 27.19 MJ
- copper, cathode: 0.066842 kg; lognormal variance with pedigree 0.0426, pedigree (3,3,5,1,1)
  EcoSpold01Location=RER
  Busbar and wire
  Uncertainty: Busbar and wire
  properties: wet mass 1 kg, dry mass 1 kg
- transport, freight, lorry, unspecified: 8.9368e-5 metric ton*km; = cadmium_telluride * 100/1000
  The cadmium telluride is assumed to be transported 100 km by lorry. This is the standard road transport distance for the US (see table 4.2, p. 635/926 in Classen et al., 2009).
  References:
  Classen M., Althaus H.-J., Blaser S., Tuchschmid M., Jungbluth N., Doka G., Faist Emmenegger M. and Scharnhorst W. (2009) Life Cycle Inventories of Metals. Final report ecoinvent data v2.1, No 10. EMPA Dübendorf, Swiss Centre for Life Cycle Inventories, Dübendorf, CH, Online-Version under: www.ecoinvent.ch
- electricity, medium voltage: 48.22 kWh; lognormal variance with pedigree 0.0426, pedigree (3,3,5,1,1)
  Pacca 2006
  EcoSpold01Location=US
  Uncertainty: Pacca 2006
- municipal solid waste: -0.03 kg; lognormal variance with pedigree 0.0421, pedigree (1,4,5,3,1)
  EcoSpold01Location=CH
  Alsema (personal communication) 2007, production waste
  Uncertainty: Alsema (personal communication) 2007, production waste
  production volume 4366.41 kg
    (same comment as for waste plastic, mixture)
  properties: wet mass 1 kg, water content 0.297017, dry mass 0.771 kg, carbon content, fossil 0.171549, carbon content, non-fossil 0.261655, heating value, net 11.74 MJ
  note on carbon content, fossil: MSW composition in tab 4.1, ecoinvent v2.2 report 13_I. C content referred to 1 kg DM
- polyethylene, low density, granulate: 0.018435 kg; lognormal variance with pedigree 0.0426, pedigree (3,3,5,1,1)
  Pacca 2006
  EcoSpold01Location=RER
  Uncertainty: Pacca 2006
  properties: heating value, net 42.47 MJ, dry mass 1 kg, wet mass 1 kg, carbon content, fossil 0.857143
- hydrogen, liquid: 0.02185 kg; lognormal variance with pedigree 0.0426, pedigree (3,3,5,1,1)
  EcoSpold01Location=RER
  Pacca 2006
  Uncertainty: Pacca 2006
  properties: wet mass 1 kg, dry mass 1 kg, heating value, net 120.21 MJ
- soft solder, Sn97Cu3: 0.0097052 kg; lognormal variance with pedigree 0.0426, pedigree (3,3,5,1,1)
  Solder tin
  EcoSpold01Location=RER
  Uncertainty: Solder tin
  properties: wet mass 1 kg, dry mass 1 kg
- synthetic rubber: 0.067574 kg; lognormal variance with pedigree 0.0426, pedigree (3,3,5,1,1)
  Duraseal, coating of cables and rubber wire insulation
  EcoSpold01Location=RER
  Uncertainty: Duraseal, coating of cables and rubber wire insulation
  properties: wet mass 1 kg, dry mass 1 kg, carbon content, fossil 0.871949, heating value, net 26.42 MJ
  note on carbon content, fossil: EPDM (Ethylene-propene-diene terpolymer) rubber is a terpolymer of ethylene, propene, and a diene with the residual unsaturated portion of the diene in the side chain (ecoinvent v2.2 report 7-part XX & Ullmann). Chemical formula (deduced from Evidences of Solvent-Induced Miscibility in Polychloroprene-co-Ethylene-Propene Diene Terpolymer Blends, Dubey et al., Journal of Applied Polymer Science, 2009, 111:1884–1891): C20H35
- phosphane: 7.4994e-5 kg; lognormal variance with pedigree 0.0426, pedigree (3,3,5,1,1)
  Phosphine (H3P)
  Uncertainty: Phosphine (H3P)
  properties: wet mass 1 kg, dry mass 1 kg
- wire drawing, copper: 0.066842 kg; lognormal variance with pedigree 0.0586, pedigree (4,3,5,1,1)
  EcoSpold01Location=RER
  Assumption
  Uncertainty: Assumption
- silicon tetrahydride: 0.0035777 kg; lognormal variance with pedigree 0.0426, pedigree (3,3,5,1,1)
  EcoSpold01Location=RER
  Pacca 2006
  Uncertainty: Pacca 2006
  properties: dry mass 1 kg, wet mass 1 kg, heating value, net 15.09 MJ
- waste polyvinylfluoride: -0.12306 kg; lognormal variance with pedigree 0.0586, pedigree (4,3,5,1,1)
  (same comment as for waste plastic, mixture)
  production volume 17911 kg
    (same comment as for waste plastic, mixture)
  properties: heating value, net 27.89 MJ, wet mass 1 kg, dry mass 0.998 kg, water content 0.00200401, carbon content, fossil 0.571142
- packaging film, low density polyethylene: 0.3099 kg; lognormal variance with pedigree 0.0426, pedigree (3,3,5,1,1)
  Madico, window film
  EcoSpold01Location=RER
  Uncertainty: Madico, window film
  properties: wet mass 1 kg, dry mass 1 kg, carbon content, fossil 0.857143, heating value, net 42.47 MJ
- cadmium telluride, semiconductor-grade: 0.00089368 kg; name cadmium_telluride; lognormal variance with pedigree 0.062, pedigree (3,4,5,1,3)
  EcoSpold01Location=US
  Cadmium stannate (Cd2SnO4), amount less than 0.05%.
  This product is assumed to be supplied exclusively by the production in the US, therefore a direct activity link to the activity "cadmium telluride production, semiconductor-grade" in the US is used.
  Uncertainty: Cadmium stannate (Cd2SnO4), amount less than 0.05%
  properties: dry mass 1 kg, wet mass 1 kg

## Sampling procedure
Literature data based on producer information.

## Extrapolations
This dataset has been extrapolated from year 2005 to the year of the calculation (2021). The uncertainty has been adjusted accordingly.

## Review by Roberto Dones 2007-08-23
Passed.
none
