# biomethane production, high pressure from synthetic gas, wood, fluidised technology

Dataset: EcoSpold 2, unit process
Geography: CH
Time period: 2008-01-01 to 2021-12-31
Technology level: current
Classification: EcoSpold01Categories: biomass/fuels
Classification: ISIC rev.4 ecoinvent: 3520:Manufacture of gas; distribution of gaseous fuels through mains
Scenario: Business-as-Usual
System model: Allocation, cut-off by classification
Share of production covered: 0 %
Generated by: Andrea Del Duce
Published in: Andrea Del Duce 2015
Database: ecoinvent
isCopyrightProtected: true
accessRestrictedTo: 1

## General comment
This datasets describes the production of methane from wood. The feedstock is first gasified and then methanised. This dataset describes methane production through a fluidised technology. Gas composition (% mol.) of the gas is 96% CH4 (min.). Density is 0.752 kg/Nm3. Lower heating value of the gas is 34.4 MJ/Nm3. Process heat is supplied by methane combustion. Inventory refers to the net production of 1 Nm3 syngas. Net methane yield is 0.270 Nm3/kg of wood (dry matter) with a conversion efficiency (lower heating value of the methane/lower heating value of the required wood) of around 50%.
This dataset was already contained in the ecoinvent database version 2. It was then updated individually veryfing the original data and transofrmation into a v3 dataset. The fuel characteristics as well as production processes are the same as in the original ecoinvent v2 dataset. The values of the exchanges were updated based on some new scaling calculations where the specific values indicated for the differernt processing steps discussed in the ecoinvent report nr. 17 have been considered instead of the final value originally presented. The changes are minor and concern only a few exchanges.
[This dataset is meant to replace the following datasets:]

## Included activities start
The activity begins with the transport of the wood and other required auxiliaries to the production site.

## Included activities end
This process refers to the conversion of wood chips into synthetic methane (96% vol.) through gasification and subsequent methanation. It includes drying (down to 10-15% moisture) and further comminution of wood chips (down to a size of 30x30x30 mm), FICFB (Fast Internally Circulating Fluidised Bed of the BCL type) gasification of the wood chips, treatment and conditioning of the resulting syngas to remove impurities and contaminants, methanation of the the syngas to methane, and compression of methane to natural gas network pressure (30-70 bar).

## Geography
Data from Paul Scherrer Institut (PSI, Switzerland) and the pilot gasification plant in Güssing (Austria)

## Technology
Gasification technology is FICFB (fast internally circulating fluidized bed of the BCL type). Technology for methanation is developed by PSI.

## Time period
Data mainly from 2004, pilot scale, future technology

## Parameters
- fraction, process water, to air: 0.15 dimensionless; name fraction_PW_to_air; lognormal variance with pedigree 0.092025, pedigree (4,4,3,2,4)
- fraction, tap water, to air: 0.15 dimensionless; name fraction_TW_to_air; lognormal variance with pedigree 0.092025, pedigree (4,4,3,2,4)

## Reference product
- biomethane, high pressure: 1 m3; name RP_amount_1; CPC 17200: Coal gas, water gas, producer gas and similar gases, other than petroleum gases and other gaseous hydrocarbons; By-product classification allocatable product; CAS 74-82-8
  EcoSpold01Location=CH
  production volume 586920 m3; name rp_pv
    In 2004, CH syngas production is limited to 2 pilot-scale Fixed bed gasifiers.
    134 m3 per GWh. 1 pilot plant; 0.5 MW. See dataset on synthetic gas factory construction.
  property carbon content, non-fossil 0.695496
    Carbon content calculated from composition of the gas, 96% (in vol) methane, 2% (in vol) CO2 (Tab 13.3, ecoinvent v2.2 report 17). The composition in %vol was converted in % weight using density data of the different gases from tab 19.1, ecoinvent v2.2 report 17, part 19.
  property price 0.144 EUR2005
    Temporary price data. Calculated as 90% of purchasers price based on: Same prices per energy output as natural gas, based on the proportional heating value (55.5 MJ/kg for methane; 54.8 MJ/kg for natural gas)
  property heating value, net 34.97 MJ
    Literature value, Source: United Nations Statistics Division (2018) International Recommendations for Energy Statistics (IRES). Available at: http://unstats.un.org/unsd/statcom/doc11/BG-IRES.pdf.
  property carbon content 0.695496
    carbon content on a dry matter basis (reserved; not for manual entry)
  properties: water content 0, wet mass 0.752 kg, dry mass 0.752 kg, water in wet mass 0 kg, carbon content, fossil 0, carbon allocation 0.523013 kg

## Inputs from technosphere
All rows: source Jungbluth N. 2007
- electricity, medium voltage: 0.8288 kWh; = 0.133+0.0588+0.137+0.5; lognormal variance with pedigree 0.0146, pedigree (2,4,3,1,1)
  Based on PSI data (Ecogas project) plus calculations. The specific value refers to the specific steps detailed in the ecoinvent v2.2 report nr. 17 and not just to the final value originally presented.The mathematical relation descibes the sum of the electricity requirements from the various processing steps as derived from the values in the ecoinvent v2.2 report nr. 17.
  EcoSpold01Location=CH
  Uncertainty: Based on PSI data (Ecogas project) plus calculations
- charcoal: 0.019805 kg; lognormal variance with pedigree 0.0146, pedigree (2,4,3,1,1)
  Based on PSI data (Ecogas project) plus calculations
  EcoSpold01Location=GLO
  Uncertainty: Based on PSI data (Ecogas project) plus calculations
  properties: heating value, net 28.4 MJ, dry mass 1 kg, carbon content, non-fossil 0.8, wet mass 1 kg
  note on heating value, net: Indicative value. Reference: Fuels - Higher and Lower Calorific Values, available at: https://www.engineeringtoolbox.com/fuels-higher-calorific-values-d_169.html
- wood chips, dry, measured as dry mass: 0.814 kg; lognormal variance with pedigree 0.032625, pedigree (3,3,3,2,3)
  Yield based on PSI data (Ecogas project) plus calculations, distribution of wood qualities from IEA Task 33 CH report
  EcoSpold01Location=RER
  Uncertainty: Yield based on PSI data (Ecogas project) plus calculations, distribution of wood qualities from IEA Task 33 CH report
  properties: water content 0.4, carbon content, non-fossil 0.494, wet mass 1.4 kg, dry mass 1 kg, heating value, net 9.99 MJ
  note on carbon content, non-fossil: C content of dry mass is 0.494 kgC/kg dry wood (ecoinvent v2.2 report 9).
- synthetic gas factory: 2.9022e-9 unit; lognormal variance with pedigree 0.3146, pedigree (2,4,3,1,1)
  Calculation
  EcoSpold01Location=CH
  Uncertainty: Calculation
- industrial furnace, natural gas: 2.0621e-8 unit; lognormal variance with pedigree 0.332625, pedigree (3,3,3,2,3)
  EcoSpold01Location=RER
  Calculation, based on 'heat, natural gas, at boiler modulating' (according to heat supply from methane)
  Uncertainty: Calculation, based on 'heat, natural gas, at boiler modulating' (according to heat supply from methane)
- inert waste: -0.179 kg; name inertwaste_out; lognormal variance with pedigree 0.0146, pedigree (2,4,3,1,1)
  EcoSpold01Location=CH
  Based on PSI data (Ecogas project) plus calculations, recalculated based on the data in the ecoinvent v2.2 report nr. 17.
  Uncertainty: Based on PSI data (Ecogas project) plus calculations
  production volume 105059 kg; = inertwaste_out*rp_pv
    Calculated from the production volume of methane, 96% by volume in proportion to the respective output amounts.The formula multiplies the exchange output with the production volume of the reference product.
  property price 0 EUR2005; name inertwaste_out_price_EUR2005
  properties: wet mass 1 kg, dry mass 1 kg
- wastewater, from residence: -0.0010769 m3; name wastewater_out; lognormal variance with pedigree 0.0146, pedigree (2,4,3,1,1)
  Based on PSI data (Ecogas project) plus calculations
  EcoSpold01Location=CH
  Uncertainty: Based on PSI data (Ecogas project) plus calculations
  production volume 632.054 m3; = wastewater_out*rp_pv
    Calculated from the production volume of methane, 96% by volume in proportion to the respective output amounts. The formula multiplies the exchange output with the production volume of the reference product.
  property price 0 EUR2005; name wastewater_out_price_EUR2005
  properties: carbon content, non-fossil 0.199421, water content 2962.17, wet mass 1000 kg, dry mass 0.337476 kg
  note on carbon content, non-fossil: 0.0673 kg TOC/m3 (Tab A.17, ecoinvent v2.2 report 13_I). TOC was considered as Total Carbon.
- silica sand: 0.0495 kg; lognormal variance with pedigree 0.0146, pedigree (2,4,3,1,1)
  EcoSpold01Location=DE
  Based on PSI data (Ecogas project) plus calculations. The specific value refers to the specific steps detailed in the ecoinvent v2.2 report nr. 17 and not just to the final value originally presented.
  Uncertainty: Based on PSI data (Ecogas project) plus calculations
  properties: dry mass 0.99 kg, wet mass 1 kg, water content 0.010101
- electricity, low voltage: 0.0081749 kWh; lognormal variance with pedigree 0.032625, pedigree (3,3,3,2,3)
  Calculation, based on 'heat, natural gas, at boiler modulating' (according to heat supply from methane)
  EcoSpold01Location=UCTE
  Uncertainty: Calculation, based on 'heat, natural gas, at boiler modulating' (according to heat supply from methane)
- waste zeolite: -0.00812 kg; name BP_amount_1; lognormal variance with pedigree 0.028, pedigree (4,5,3,1,1)
  Based on PSI data (Ecogas project) plus calculations, recalculated based on the data in the ecoinvent v2.2 report nr. 17.
  production volume 4765.79 kg; = rp_pv * (BP_amount_1 / RP_amount_1)
    Calculated from production volume of reference product using the relative outputs.
  property price 0 EUR2005; name BP_amount_1_price_EUR2005
  properties: wet mass 1 kg, water content 0.0526316, dry mass 0.95 kg
- tap water: 0.559 kg; name tap_water_input; lognormal variance with pedigree 0.0146, pedigree (2,4,3,1,1)
  (same comment as for wastewater, from residence)
  properties: dry mass 0.000337476 kg, wet mass 1 kg, water content 2962.17, carbon content, fossil 0.00178991
  note on carbon content, fossil: Bicarbonate content is 2.93 mol/m3. CO2 content is 0.1 mol/m3 (ecoinvent v2.2 report 8, Tab 93.1).
- zeolite, powder: 0.00812 kg; lognormal variance with pedigree 0.0052, pedigree (2,4,3,1,1)
  Based on PSI data (Ecogas project) plus calculations. The specific value refers to the specific steps detailed in the ecoinvent v2.2 report nr. 17 and not just to the final value originally presented.
  properties: dry mass 1 kg, wet mass 1 kg
- fatty acid methyl ester: 0.014622 kg; lognormal variance with pedigree 0.0146, pedigree (2,4,3,1,1)
  Based on PSI data (Ecogas project) plus calculations
  Uncertainty: Based on PSI data (Ecogas project) plus calculations
  properties: dry mass 1 kg, wet mass 1 kg, heating value, net 37.2 MJ, carbon content, non-fossil 0.732, carbon content, fossil 0.041
  note on heating value, net: Based on literature, report 17, page 439. Jungbluth, N., Chudacoff, M., Dauriat, A., Dinkel, F., Doka, G., Faist Emmenegger, M., Gnansounou, E., Kljun, N., Schleiss, K., Spielmann, M., Stettler, C., Sutter, J. 2007: Life Cycle Inventories of Bioenergy. ecoinvent report No. 17, Swiss Centre for Life Cycle Inventories, Dübendorf, CH.
- sodium hydroxide, without water, in 50% solution state: 0.00323 kg; lognormal variance with pedigree 0.032625, pedigree (3,3,3,2,3)
  Calculation from a typical quality of untreated syngas from wood
  EcoSpold01Location=RER
  Uncertainty: Calculation from a typical quality of untreated syngas from wood
  properties: dry mass 1 kg, wet mass 1 kg, heating value, net 3.03 MJ
- dolomite: 0.0396 kg; lognormal variance with pedigree 0.0052, pedigree (2,4,3,1,1)
  (same comment as for zeolite, powder)
  properties: carbon content, fossil 0.130435, dry mass 1 kg, wet mass 1 kg, heating value, net 3.95 MJ
- heat, central or small-scale, other than natural gas: 0.000613 MJ; lognormal variance with pedigree 0.0146, pedigree (2,4,3,1,1)
  (same comment as for zeolite, powder)
  properties: heating value, net 1 MJ
- nickel, class 1: 4.2942e-10 kg; lognormal variance with pedigree 0.0146, pedigree (2,4,3,1,1)
  (same comment as for charcoal)
  properties: dry mass 1 kg, wet mass 1 kg
- waste mineral oil: -0.014622 kg; name wasteoil_out; lognormal variance with pedigree 0.0146, pedigree (2,4,3,1,1)
  (same comment as for wastewater, from residence)
  production volume 8581.94 kg; = wasteoil_out*rp_pv
    (same comment as for inert waste)
  property price 0 EUR2005; name wasteoil_out_price_EUR2005
  properties: heating value, net 34.7 MJ, water content 0.111111, carbon content, fossil 0.864444, wet mass 1 kg, dry mass 0.9 kg
  note on heating value, net: Value taken from the general comment of the treatment dataset.
  note on carbon content, fossil: Tab A.6, ecoinvent v2.2 report 13_I. C content has been calculated after data in the tables, and then referred to 1 kg DM
- wood ash mixture, pure: -0.034982 kg; name woodash_out; lognormal variance with pedigree 0.0146, pedigree (2,4,3,1,1)
  EcoSpold01Location=CH
  Based on PSI data (Ecogas project) plus calculations
  Uncertainty: Based on PSI data (Ecogas project) plus calculations
  production volume 20531.6 kg; = woodash_out*rp_pv
    (same comment as for inert waste)
  property price 0 EUR2005; name woodash_out_price_EUR2005
  properties: carbon content, non-fossil 0.012, wet mass 1 kg, dry mass 1 kg
- zinc: 0.0018694 kg; lognormal variance with pedigree 0.0146, pedigree (2,4,3,1,1)
  EcoSpold01Location=RER
  Based on PSI data (Ecogas project) plus calculations
  Uncertainty: Based on PSI data (Ecogas project) plus calculations
  properties: wet mass 1 kg, dry mass 1 kg
- sulfuric acid: 0.0128 kg; lognormal variance with pedigree 0.032625, pedigree (3,3,3,2,3)
  EcoSpold01Location=RER
  Calculation from a typical quality of untreated syngas from wood
  Uncertainty: Calculation from a typical quality of untreated syngas from wood
  properties: dry mass 1 kg, wet mass 1 kg
- wood chips, wet, measured as dry mass: 2.88725 kg; lognormal variance with pedigree 0.032625, pedigree (3,3,3,2,3)
  Yield based on PSI data (Ecogas project) plus calculations, distribution of wood qualities from IEA Task 33 CH report.
  EcoSpold01Location=RER
  Uncertainty: Yield based on PSI data (Ecogas project) plus calculations, distribution of wood qualities from IEA Task 33 CH report
  properties: water content 1.4, carbon content, non-fossil 0.494, wet mass 2.4 kg, dry mass 1 kg, heating value, net 10.84 MJ
  note on heating value, net: Value based on the dataset 'softwood forestry, mixed species, sustainable forest management'
- aluminium oxide, non-metallurgical: 4.2942e-10 kg; lognormal variance with pedigree 0.0146, pedigree (2,4,3,1,1)
  (same comment as for zinc)
  properties: dry mass 1 kg, wet mass 1 kg

## Emissions to nature
All rows: source Jungbluth N. 2007
- Propane [air, urban air close to ground]: 1.473e-6 kg; lognormal variance with pedigree 0.072625, pedigree (3,3,3,2,3)
  Calculation, based on 'heat, natural gas, at boiler modulating' (according to heat supply from methane)
  Uncertainty: Calculation, based on 'heat, natural gas, at boiler modulating' (according to heat supply from methane)
- Formaldehyde [air, urban air close to ground]: 7.3648e-7 kg; lognormal variance with pedigree 0.072625, pedigree (3,3,3,2,3)
  (same comment as for Propane)
- Carbon monoxide, non-fossil [air, urban air close to ground]: 0.0034281 kg; lognormal variance with pedigree 0.672625, pedigree (3,3,3,2,3)
  Calculation, based on 'heat, natural gas, at boiler modulating' (according to heat supply from methane), and PSI data
  Uncertainty: Calculation, based on 'heat, natural gas, at boiler modulating' (according to heat supply from methane), and PSI data
- Sulfur dioxide [air, urban air close to ground]: 4.0506e-6 kg; lognormal variance with pedigree 0.032625, pedigree (3,3,3,2,3)
  (same comment as for Propane)
- Benzo(a)pyrene [air, urban air close to ground]: 7.3648e-11 kg; lognormal variance with pedigree 0.332625, pedigree (3,3,3,2,3)
  (same comment as for Propane)
- Nitrogen oxides [air, urban air close to ground]: 0.0020825 kg; lognormal variance with pedigree 0.072625, pedigree (3,3,3,2,3)
  (same comment as for Carbon monoxide, non-fossil)
- Acetic acid [air, urban air close to ground]: 1.1047e-6 kg; lognormal variance with pedigree 0.072625, pedigree (3,3,3,2,3)
  (same comment as for Propane)
- Pentane [air, urban air close to ground]: 8.8377e-6 kg; lognormal variance with pedigree 0.072625, pedigree (3,3,3,2,3)
  (same comment as for Propane)
- NMVOC, non-methane volatile organic compounds, unspecified origin [air, urban air close to ground]: 4.9354e-5 kg; lognormal variance with pedigree 0.0546, pedigree (2,4,3,1,1)
  Based on PSI data from the Ecogas project
  Uncertainty: Based on PSI data from the Ecogas project
- Benzene [air, urban air close to ground]: 2.9459e-6 kg; lognormal variance with pedigree 0.072625, pedigree (3,3,3,2,3)
  (same comment as for Propane)
- Carbon dioxide, non-fossil [air, urban air close to ground]: 4.8938 kg; lognormal variance with pedigree 0.013225, pedigree (3,3,3,2,3)
  Calculation, to close carbon balance
  Uncertainty: Calculation, to close carbon balance
- Propionic acid [air, urban air close to ground]: 1.473e-7 kg; lognormal variance with pedigree 0.072625, pedigree (3,3,3,2,3)
  (same comment as for Propane)
- Butane [air, urban air close to ground]: 5.1553e-6 kg; lognormal variance with pedigree 0.072625, pedigree (3,3,3,2,3)
  (same comment as for Propane)
- Dioxins, measured as 2,3,7,8-tetrachlorodibenzo-p-dioxin [air, urban air close to ground]: 0 kg; pedigree (1,1,1,1,1)
  (same comment as for Propane)
- PAH, polycyclic aromatic hydrocarbons [air, urban air close to ground]: 9.6363e-7 kg; lognormal variance with pedigree 0.332625, pedigree (3,3,3,2,3)
  (same comment as for Carbon monoxide, non-fossil)
- Acetaldehyde [air, urban air close to ground]: 7.3648e-9 kg; lognormal variance with pedigree 0.072625, pedigree (3,3,3,2,3)
  (same comment as for Propane)
- Particulates, < 2.5 um [air, urban air close to ground]: 5.4583e-5 kg; lognormal variance with pedigree 0.332625, pedigree (3,3,3,2,3)
  (same comment as for Carbon monoxide, non-fossil)
- Hydrocarbons, aliphatic, alkanes, unspecified [air, urban air close to ground]: 7.3626e-5 kg; lognormal variance with pedigree 0.0546, pedigree (2,4,3,1,1)
  (same comment as for NMVOC, non-methane volatile organic compounds, unspecified origin)
- Hydrocarbons, aliphatic, unsaturated [air, urban air close to ground]: 0.00025081 kg; lognormal variance with pedigree 0.0546, pedigree (2,4,3,1,1)
  (same comment as for NMVOC, non-methane volatile organic compounds, unspecified origin)
- Water [air, unspecified]: 0.00492 m3; name water_to_air_unspecified; lognormal variance with pedigree 0.0427, pedigree (2,2,3,1,1)
  Calculated value based on literature values and expert opinion. See comments in the parametres' comment field.The dataset is not wtaer balanced. Specific information on the water balance was not found.
  property fraction, origin: unspecified 0; name fraction_origin_unspecified
  property fraction, origin: salt water 0; name fraction_origin_salt_water
  property fraction, origin: fresh water 1; name fraction_origin_fresh_water
- Dinitrogen monoxide [air, urban air close to ground]: 3.6824e-6 kg; lognormal variance with pedigree 0.072625, pedigree (3,3,3,2,3)
  (same comment as for Propane)
- Methane, non-fossil [air, urban air close to ground]: 1.473e-5 kg; lognormal variance with pedigree 0.072625, pedigree (3,3,3,2,3)
  (same comment as for Propane)
- Toluene [air, urban air close to ground]: 1.473e-6 kg; lognormal variance with pedigree 0.072625, pedigree (3,3,3,2,3)
  (same comment as for Propane)
- Mercury [air, urban air close to ground]: 2.2094e-10 kg; lognormal variance with pedigree 0.672625, pedigree (3,3,3,2,3)
  (same comment as for Propane)

## Sampling procedure
Data from one source, pilot-to-demonstration plant operation data

## Extrapolations
This dataset has been extrapolated from year 2016 to the year of the calculation (2021). The uncertainty has been adjusted accordingly.
