# treatment of sulfidic tailings, from gold mine operation, tailings impoundment

Dataset: EcoSpold 2, unit process
Geography: CA
Time period: 2015-01-01 to 2021-12-31
Technology level: current
Classification: ISIC rev.4 ecoinvent: 3822:Treatment and disposal of hazardous waste
Synonyms: sulphidic; tailing; tails; pond
Scenario: Business-as-Usual
System model: Allocation, cut-off by classification
Share of production covered: 80 %
Generated by: David Turner
Database: ecoinvent
isCopyrightProtected: true
accessRestrictedTo: 1

## General comment
This dataset represents the activity of waste disposal of sulfidic tailings, from gold mine operation in a tailings impoundment in Canada.
Background: Tailings, a waste material produced during mineral concentration (beneficiation), often contain significant quantities of mobile toxic metals and are typically produced in large quantities. To manage these wastes, tailings are commonly stored behind dammed impoundments, known as tailings ponds. These ponds pose a significant long-term pollution risk as metals may leach out into the surrounding environment, potentially over very long timeframes.
Modelling approach: This dataset was produced using a model developed specifically for assessing the long-term emissions of tailings disposal (see Doka, 2017). The tailings disposal model is based on the modelling framework applied in existing landfill process models used in ecoinvent and is based on a top-down approach. Literature data on measurements of deposited tailings compositions (solids) and measured current concentrations in leachate (liquid) form the basis of the model and are used to characterise pollutant mobility and calculate the currently occurring rate of emissions of the landfill. Heeding chief parameters, such as hydrology, pH development and elemental chemistry, these emissions are then projected into the future. Tailings composition is based on the typical composition of tailings at gold mine sites worldwide; i.e. composition is not region-specific. Land use was calculated following the approach described by Doka (2008). Based on an assumed generic final height of a tailings impoundment of 60 m and an assumed tailings density of 2200 kg/m3, a land area of 7.58E-06 m2 is required per kilogram of sulfidic tailings. The land is assumed to be converted from unknown origin to a disposal site. After an operational phase of 30 years, spontaneous restoration of a consolidated state is assumed to be reached after one hundred years. The total occupation time is therefore 130 years and the land occupation per kilogram tailings is 9.85E-04 m2.
Waste composition (wet, in ppm): H2O 300000; O 621300; H na; C 6145; S 305.88; N 5.0454; P 192.55; B 54.583; Cl 102.61; Br 0.22894; F 772.88; I na; Ag 9.7097; As 61.447; Ba 356.57; Cd 3.9592; Co 10.634; Cr 46.594; Cu 489.41; Hg 0.40262; Mn 142.11; Mo 10.949; Ni 17.077; Pb 155.09; Sb 34.059; Se 4.2887; Sn 26.979; V 142.69; Zn 190.19; Be 1.9806; Sc 13.343; Sr 100.02; Ti 122.75; Tl 2.6154; W 9.3995; Si 39700; Fe 10240; Ca 2631.2; Al 11955; K 2187; Mg 1408.9; Na 1044.1. // Share of carbon in waste that is biogenic 0%.
Activity extent: The dataset includes all potential emissions to the environment and land use changes. Input exchanges of infrastructure, materials, energy, and water are not included here but are accounted for in the activity, gold mine operation.
References
Doka, G. (2008). Life Cycle Inventory data of mining waste: Emissions from sulfidic tailings disposal. Zürich, Switzerland: Doka Life Cycle Assessments.
Doka, G. (2017). A model for waste-specific and climate-specific life cycle inventories of tailings impoundments. Zürich, Switzerland: Doka Life Cycle Assessments.

## Included activities start
The activity starts at the point of waste deposition in the impoundment. All upstream activities, including the pumping of tailings to the site, any dewatering or treatment, or other transport-related activities are excluded.

## Included activities end
Waste-specific short- and long-term emissions to the environment via impoundment leachate; land transformation and occupation. Note that the structural integrity of the site is assumed to be unwavering during the entie modelled time horizon; i.e. accidental releases of leachate (due to impoundment failure) are not considered.

## Geography
Given name of site is 'Gold deposits; Canada'. Impoundment site with mean annual temperature (MAT) of 0.874563736555142 degC, mean annual precipitation (MAP) of 943.62361678244 mm/year, mean annual actual evaporation (EAT) of 326.739677148541 mm/year, and net infiltration of 780.25377820817 mm/year (using half of natural surface evapotranspiration).
Temperature at site can result in permafrost conditions, which slows down water flow by a factor of 0.991.

## Technology
This is an inventory for an impoundment of copper ore beneficiation tailings waste. The following assumptions were made concerning technology: final impoundment height is 60 meters; operation phase duration is 30 years; and impoundment leachates are released into the environment untreated.

## Time period
'Data on average composition of tailings and tailings-derived leachates from literature sources published between 1994 and 2017 (mean publication date: 2009±6). Mean annual temperature and precipitation data for 1970-2000 (source: Fick and Hijmans, 2017); mean annual evapotranspiration for 1950-2000 (source: Fekete et al., 2002). Production volume based on world mine production data from the USGS Minerals Yearbook 2015. Transfer coefficients from prospective, tailings-specific model.
References:
Fekete, B. M., Vorosmarty, C. J. & Grabs, W. (2002). High-resolution fields of global runoff combining observed river discharge and simulated water balances. Global Biogeochemical Cycles, 16, 15-1 - 15-10.
Fick, S. E. & Hijmans, R. J. (2017). Worldclim 2: New 1-km spatial resolution climate surfaces for global land areas. International Journal of Climatology, 37, 4302-4315.'

## Reference product
- sulfidic tailings, from gold mine operation: -1 kg; By-product classification Waste
  main reference product of this activity (supply of disposal service).
  production volume 2.37e6 kg
    Estimate of the national tailings production volume from the mining and concentration of sulfidic gold ores, based on national mine production of gold from sulfide mineral deposits (kg) multiplied by estimated tailings generation rate per kg of mined gold (6328 kg per kg mined gold).
  property price 0 EUR2005
    Waste products are assigned a price of zero as they are assumed to require further treatment.
  property carbon content 0.0087785
    carbon content on a dry matter basis (reserved; not for manual entry)
  properties: magnesium content 0.0020127, calcium content 0.0037589, nitrogen content 7.2076e-6, lead content 0.00022156, thallium content 3.7362e-6, molybdenum content 1.5641e-5, vanadium content 0.00020384, wet mass 1 kg, aluminium content 0.017079, zinc content 0.0002717, titanium content 0.00017536, water content 0.42857, potassium content 0.0031243, fluorine content 0.0011041, tin content 3.8541e-5, strontium content 0.00014288, copper content 0.00069916, iron content 0.014628, silicon content 0.056714, sodium content 0.0014916, beryllium content 2.8295e-6, carbon content, fossil 0.0087785, water in wet mass 0.3 kg, barium content 0.00050938, carbon content, non-fossil 0, oxygen content 0.88758, chromium content 6.6562e-5, phosphorus content 0.00027508, manganese content 0.00020301, bromine content 3.2706e-7, silver content 1.3871e-5, cadmium content 5.656e-6, chlorine content 0.00014659, mercury content 5.7517e-7, sulfur content 0.00043697, nickel content 2.4396e-5, antimony content 4.8655e-5, arsenic content 8.7781e-5, boron content 7.7976e-5, selenium content 6.1267e-6, cobalt content 1.5191e-5, dry mass 0.7 kg, scandium content 1.9061e-5, tungsten content 1.3428e-5, carbon allocation 0.00614495 kg

## Inputs from nature
- Occupation, dump site [natural resource, land]: 0.00098485 m2*year; lognormal variance with pedigree 0.14986, pedigree (1,1,2,1,1)
  for impoundment operation phase and 100 year renaturation phase.
  Uncertainty: U
- Transformation, to dump site [natural resource, land]: 7.5758e-6 m2; lognormal variance with pedigree 0.030796, pedigree (1,1,2,1,1)
  conversion to impoundment area.
  Uncertainty: U
- Transformation, from unspecified [natural resource, land]: 7.5758e-6 m2; lognormal variance with pedigree 0.030796, pedigree (1,1,2,1,1)
  conversion of impoundment area.
  Uncertainty: U

## Emissions to nature
- Tin, ion [water, ground-]: 4.9131e-8 kg; lognormal variance with pedigree 0.42819, pedigree (1,1,2,1,1)
  burden from short-term leachate to groundwater in uncontrolled impoundment in moist cimate.
  Uncertainty: U
- DOC, Dissolved Organic Carbon [water, ground-, long-term]: 0.0010766 kg; lognormal variance with pedigree 0.29645, pedigree (1,1,2,1,1)
  Emissions from long-term leachate (>100a) directly from tailings impoundment.
  Uncertainty: U
- Thallium [water, ground-, long-term]: 2.6145e-6 kg; lognormal variance with pedigree 0.36127, pedigree (1,1,2,1,1)
  (same comment as for DOC, Dissolved Organic Carbon)
- DOC, Dissolved Organic Carbon [water, ground-]: 1.7973e-6 kg; lognormal variance with pedigree 0.31026, pedigree (1,1,2,1,1)
  (same comment as for Tin, ion)
- Thallium [water, ground-]: 8.5039e-10 kg; lognormal variance with pedigree 0.56121, pedigree (1,1,2,1,1)
  (same comment as for Tin, ion)
- Copper, ion [water, ground-, long-term]: 0.000489 kg; lognormal variance with pedigree 0.18804, pedigree (1,1,2,1,1)
  (same comment as for DOC, Dissolved Organic Carbon)
- Sulfate [water, ground-, long-term]: 0.00015845 kg; lognormal variance with pedigree 0.20776, pedigree (1,1,2,1,1)
  (same comment as for DOC, Dissolved Organic Carbon)
- COD, Chemical Oxygen Demand [water, ground-]: 1.6371e-7 kg; lognormal variance with pedigree 0.31026, pedigree (1,1,2,1,1)
  (same comment as for Tin, ion)
- Sodium, ion [water, ground-, long-term]: 0.0010266 kg; lognormal variance with pedigree 0.1632, pedigree (1,1,2,1,1)
  (same comment as for DOC, Dissolved Organic Carbon)
- Copper, ion [water, ground-]: 4.1293e-7 kg; lognormal variance with pedigree 0.35677, pedigree (1,1,2,1,1)
  (same comment as for Tin, ion)
- Strontium [water, ground-, long-term]: 9.9773e-5 kg; lognormal variance with pedigree 0.2407, pedigree (1,1,2,1,1)
  (same comment as for DOC, Dissolved Organic Carbon)
- COD, Chemical Oxygen Demand [water, ground-, long-term]: 9.8062e-5 kg; lognormal variance with pedigree 0.29645, pedigree (1,1,2,1,1)
  (same comment as for DOC, Dissolved Organic Carbon)
- Strontium [water, ground-]: 2.4515e-7 kg; lognormal variance with pedigree 0.37515, pedigree (1,1,2,1,1)
  (same comment as for Tin, ion)
- Cobalt [water, ground-]: 1.7489e-7 kg; lognormal variance with pedigree 0.39174, pedigree (1,1,2,1,1)
  (same comment as for Tin, ion)
- Sulfate [water, ground-]: 0.00054535 kg; lognormal variance with pedigree 0.20407, pedigree (1,1,2,1,1)
  (same comment as for Tin, ion)
- Chromium VI [water, ground-, long-term]: 3.8055e-7 kg; lognormal variance with pedigree 1.7107, pedigree (1,1,2,1,1)
  (same comment as for DOC, Dissolved Organic Carbon)
- Sodium, ion [water, ground-]: 1.7514e-5 kg; lognormal variance with pedigree 0.23923, pedigree (1,1,2,1,1)
  (same comment as for Tin, ion)
- Cobalt [water, ground-, long-term]: 1.0459e-5 kg; lognormal variance with pedigree 0.31515, pedigree (1,1,2,1,1)
  (same comment as for DOC, Dissolved Organic Carbon)
- Silver, ion [water, ground-, long-term]: 9.7077e-6 kg; lognormal variance with pedigree 0.31815, pedigree (1,1,2,1,1)
  (same comment as for DOC, Dissolved Organic Carbon)
- Chloride [water, ground-]: 2.9464e-5 kg; lognormal variance with pedigree 0.25011, pedigree (1,1,2,1,1)
  (same comment as for Tin, ion)
- Silver, ion [water, ground-]: 1.9983e-9 kg; lognormal variance with pedigree 0.53317, pedigree (1,1,2,1,1)
  (same comment as for Tin, ion)
- Chloride [water, ground-, long-term]: 7.3146e-5 kg; lognormal variance with pedigree 0.24084, pedigree (1,1,2,1,1)
  (same comment as for DOC, Dissolved Organic Carbon)
- Silicon [water, ground-, long-term]: 0.00021645 kg; lognormal variance with pedigree 1.7507, pedigree (1,1,2,1,1)
  (same comment as for DOC, Dissolved Organic Carbon)
- Chromium VI [water, ground-]: 1.2053e-8 kg; lognormal variance with pedigree 0.4736, pedigree (1,1,2,1,1)
  (same comment as for Tin, ion)
- Silicon [water, ground-]: 6.8268e-6 kg; lognormal variance with pedigree 0.27402, pedigree (1,1,2,1,1)
  (same comment as for Tin, ion)
- Calcium, ion [water, ground-]: 7.9751e-5 kg; lognormal variance with pedigree 0.19298, pedigree (1,1,2,1,1)
  (same comment as for Tin, ion)
- Selenium [water, ground-, long-term]: 1.8542e-7 kg; lognormal variance with pedigree 0.96161, pedigree (1,1,2,1,1)
  (same comment as for DOC, Dissolved Organic Carbon)
- Calcium, ion [water, ground-, long-term]: 0.0025515 kg; lognormal variance with pedigree 0.13342, pedigree (1,1,2,1,1)
  (same comment as for DOC, Dissolved Organic Carbon)
- Scandium [water, ground-, long-term]: 1.3272e-5 kg; lognormal variance with pedigree 0.30764, pedigree (1,1,2,1,1)
  (same comment as for DOC, Dissolved Organic Carbon)
- Bromine [water, ground-, long-term]: 1.5651e-7 kg; lognormal variance with pedigree 0.44894, pedigree (1,1,2,1,1)
  (same comment as for DOC, Dissolved Organic Carbon)
- Selenium [water, ground-]: 5.9826e-9 kg; lognormal variance with pedigree 0.49752, pedigree (1,1,2,1,1)
  (same comment as for Tin, ion)
- Bromine [water, ground-]: 4.4103e-10 kg; lognormal variance with pedigree 0.58203, pedigree (1,1,2,1,1)
  (same comment as for Tin, ion)
- Potassium, ion [water, ground-, long-term]: 0.00065619 kg; lognormal variance with pedigree 0.22986, pedigree (1,1,2,1,1)
  (same comment as for DOC, Dissolved Organic Carbon)
- Cadmium, ion [water, ground-]: 2.4132e-8 kg; lognormal variance with pedigree 0.45374, pedigree (1,1,2,1,1)
  (same comment as for Tin, ion)
- Scandium [water, ground-]: 7.1311e-8 kg; lognormal variance with pedigree 0.41772, pedigree (1,1,2,1,1)
  (same comment as for Tin, ion)
- Cadmium, ion [water, ground-, long-term]: 3.9351e-6 kg; lognormal variance with pedigree 0.34769, pedigree (1,1,2,1,1)
  (same comment as for DOC, Dissolved Organic Carbon)
- Phosphate [water, ground-, long-term]: 0.00053159 kg; lognormal variance with pedigree 0.2191, pedigree (1,1,2,1,1)
  (same comment as for DOC, Dissolved Organic Carbon)
- BOD5, Biological Oxygen Demand [water, ground-, long-term]: 1.9612e-6 kg; lognormal variance with pedigree 0.29645, pedigree (1,1,2,1,1)
  (same comment as for DOC, Dissolved Organic Carbon)
- Phosphate [water, ground-]: 5.8489e-5 kg; lognormal variance with pedigree 0.24917, pedigree (1,1,2,1,1)
  (same comment as for Tin, ion)
- Boron [water, ground-, long-term]: 1.0602e-6 kg; lognormal variance with pedigree 1.2316, pedigree (1,1,2,1,1)
  (same comment as for DOC, Dissolved Organic Carbon)
- Potassium, ion [water, ground-]: 1.303e-6 kg; lognormal variance with pedigree 0.31938, pedigree (1,1,2,1,1)
  (same comment as for Tin, ion)
- Boron [water, ground-]: 3.3778e-8 kg; lognormal variance with pedigree 0.43969, pedigree (1,1,2,1,1)
  (same comment as for Tin, ion)
- BOD5, Biological Oxygen Demand [water, ground-]: 3.2742e-9 kg; lognormal variance with pedigree 0.31026, pedigree (1,1,2,1,1)
  (same comment as for Tin, ion)
- Nickel, ion [water, ground-, long-term]: 1.6985e-5 kg; lognormal variance with pedigree 0.29946, pedigree (1,1,2,1,1)
  (same comment as for DOC, Dissolved Organic Carbon)
- Beryllium [water, ground-]: 9.0079e-9 kg; lognormal variance with pedigree 0.48541, pedigree (1,1,2,1,1)
  (same comment as for Tin, ion)
- Nickel, ion [water, ground-]: 9.2535e-8 kg; lognormal variance with pedigree 0.40912, pedigree (1,1,2,1,1)
  (same comment as for Tin, ion)
- Beryllium [water, ground-, long-term]: 1.9716e-6 kg; lognormal variance with pedigree 0.37035, pedigree (1,1,2,1,1)
  (same comment as for DOC, Dissolved Organic Carbon)
- Molybdenum [water, ground-, long-term]: 4.876e-6 kg; lognormal variance with pedigree 0.35442, pedigree (1,1,2,1,1)
  (same comment as for DOC, Dissolved Organic Carbon)
- Barium [water, ground-]: 3.7103e-9 kg; lognormal variance with pedigree 0.51215, pedigree (1,1,2,1,1)
  (same comment as for Tin, ion)
- Molybdenum [water, ground-]: 2.0694e-7 kg; lognormal variance with pedigree 0.38682, pedigree (1,1,2,1,1)
  (same comment as for Tin, ion)
- Antimony [water, ground-, long-term]: 7.6746e-7 kg; lognormal variance with pedigree 1.1755, pedigree (1,1,2,1,1)
  (same comment as for DOC, Dissolved Organic Carbon)
- Mercury [water, ground-]: 6.586e-10 kg; lognormal variance with pedigree 0.56922, pedigree (1,1,2,1,1)
  (same comment as for Tin, ion)
- Zinc, ion [water, ground-]: 1.4563e-6 kg; lognormal variance with pedigree 0.31845, pedigree (1,1,2,1,1)
  (same comment as for Tin, ion)
- Barium [water, ground-, long-term]: 0.00035524 kg; lognormal variance with pedigree 0.1985, pedigree (1,1,2,1,1)
  (same comment as for DOC, Dissolved Organic Carbon)
- Manganese [water, ground-, long-term]: 0.00014042 kg; lognormal variance with pedigree 0.22902, pedigree (1,1,2,1,1)
  (same comment as for DOC, Dissolved Organic Carbon)
- Zinc, ion [water, ground-, long-term]: 0.00018873 kg; lognormal variance with pedigree 0.21933, pedigree (1,1,2,1,1)
  (same comment as for DOC, Dissolved Organic Carbon)
- Aluminium [water, ground-, long-term]: 0.011941 kg; lognormal variance with pedigree 0.08674, pedigree (1,1,2,1,1)
  (same comment as for DOC, Dissolved Organic Carbon)
- Mercury [water, ground-, long-term]: 4.0196e-7 kg; lognormal variance with pedigree 0.42187, pedigree (1,1,2,1,1)
  (same comment as for DOC, Dissolved Organic Carbon)
- Vanadium, ion [water, ground-, long-term]: 1.8702e-7 kg; lognormal variance with pedigree 2.9822, pedigree (1,1,2,1,1)
  (same comment as for DOC, Dissolved Organic Carbon)
- Antimony [water, ground-]: 2.4491e-8 kg; lognormal variance with pedigree 0.45048, pedigree (1,1,2,1,1)
  (same comment as for Tin, ion)
- Magnesium [water, ground-]: 4.3457e-5 kg; lognormal variance with pedigree 0.21257, pedigree (1,1,2,1,1)
  (same comment as for Tin, ion)
- Vanadium, ion [water, ground-]: 5.9023e-9 kg; lognormal variance with pedigree 0.49699, pedigree (1,1,2,1,1)
  (same comment as for Tin, ion)
- Aluminium [water, ground-]: 1.3907e-5 kg; lognormal variance with pedigree 0.24506, pedigree (1,1,2,1,1)
  (same comment as for Tin, ion)
- Manganese [water, ground-]: 1.6938e-6 kg; lognormal variance with pedigree 0.31495, pedigree (1,1,2,1,1)
  (same comment as for Tin, ion)
- Tungsten [water, ground-]: 3.4322e-8 kg; lognormal variance with pedigree 0.44112, pedigree (1,1,2,1,1)
  (same comment as for Tin, ion)
- Nitrate [water, ground-, long-term]: 8.4511e-6 kg; lognormal variance with pedigree 0.34225, pedigree (1,1,2,1,1)
  (same comment as for DOC, Dissolved Organic Carbon)
- Magnesium [water, ground-, long-term]: 0.0013654 kg; lognormal variance with pedigree 0.15349, pedigree (1,1,2,1,1)
  (same comment as for DOC, Dissolved Organic Carbon)
- Tungsten [water, ground-, long-term]: 1.0256e-6 kg; lognormal variance with pedigree 0.62571, pedigree (1,1,2,1,1)
  (same comment as for DOC, Dissolved Organic Carbon)
- Nitrate [water, ground-]: 9.8902e-6 kg; lognormal variance with pedigree 0.3425, pedigree (1,1,2,1,1)
  (same comment as for Tin, ion)
- Lead [water, ground-]: 3.0016e-8 kg; lognormal variance with pedigree 0.44316, pedigree (1,1,2,1,1)
  (same comment as for Tin, ion)
- TOC, Total Organic Carbon [water, ground-, long-term]: 0.0010766 kg; lognormal variance with pedigree 0.29645, pedigree (1,1,2,1,1)
  (same comment as for DOC, Dissolved Organic Carbon)
- Ammonium, ion [water, ground-, long-term]: 5.3541e-7 kg; lognormal variance with pedigree 0.34225, pedigree (1,1,2,1,1)
  (same comment as for DOC, Dissolved Organic Carbon)
- Lead [water, ground-, long-term]: 0.00015506 kg; lognormal variance with pedigree 0.22611, pedigree (1,1,2,1,1)
  (same comment as for DOC, Dissolved Organic Carbon)
- Arsenic, ion [water, ground-]: 2.7733e-8 kg; lognormal variance with pedigree 0.44608, pedigree (1,1,2,1,1)
  (same comment as for Tin, ion)
- Iron, ion [water, ground-, long-term]: 0.010231 kg; lognormal variance with pedigree 0.091342, pedigree (1,1,2,1,1)
  (same comment as for DOC, Dissolved Organic Carbon)
- Arsenic, ion [water, ground-, long-term]: 8.7287e-7 kg; lognormal variance with pedigree 1.388, pedigree (1,1,2,1,1)
  (same comment as for DOC, Dissolved Organic Carbon)
- Hydrogen sulfide [water, ground-, long-term]: 1.7051e-5 kg; lognormal variance with pedigree 0.20776, pedigree (1,1,2,1,1)
  (same comment as for DOC, Dissolved Organic Carbon)
- TOC, Total Organic Carbon [water, ground-]: 1.7973e-6 kg; lognormal variance with pedigree 0.31026, pedigree (1,1,2,1,1)
  (same comment as for Tin, ion)
- Ammonium, ion [water, ground-]: 6.2658e-7 kg; lognormal variance with pedigree 0.3425, pedigree (1,1,2,1,1)
  (same comment as for Tin, ion)
- Iron, ion [water, ground-]: 8.5712e-6 kg; lognormal variance with pedigree 0.26033, pedigree (1,1,2,1,1)
  (same comment as for Tin, ion)
- Titanium, ion [water, ground-, long-term]: 0.00012274 kg; lognormal variance with pedigree 0.23389, pedigree (1,1,2,1,1)
  (same comment as for DOC, Dissolved Organic Carbon)
- Fluoride [water, ground-, long-term]: 0.00052836 kg; lognormal variance with pedigree 0.18204, pedigree (1,1,2,1,1)
  (same comment as for DOC, Dissolved Organic Carbon)
- Tin, ion [water, ground-, long-term]: 2.693e-5 kg; lognormal variance with pedigree 0.28429, pedigree (1,1,2,1,1)
  (same comment as for DOC, Dissolved Organic Carbon)
- Fluoride [water, ground-]: 1.4888e-6 kg; lognormal variance with pedigree 0.31513, pedigree (1,1,2,1,1)
  (same comment as for Tin, ion)
- Titanium, ion [water, ground-]: 8.1371e-9 kg; lognormal variance with pedigree 0.48638, pedigree (1,1,2,1,1)
  (same comment as for Tin, ion)
- Hydrogen sulfide [water, ground-]: 5.8685e-5 kg; lognormal variance with pedigree 0.20407, pedigree (1,1,2,1,1)
  (same comment as for Tin, ion)

## Sampling procedure
Tailings model based on observed leachate concentrations in literature. Extrapolated to 60'000 years heeding chemical characteristics. Initial waste composition from various literature sources. Climate information for national copper deposits (identified from the USGS Major Mineral Deposits database) from literature as follows: global mean annual temperature and precipitation data from Fick and Hijmans (2017); global mean annual evapotranspiration data from Fekete et al. (2002).

References:
Fekete, B. M., Vorosmarty, C. J. & Grabs, W. (2002). High-resolution fields of global runoff combining observed river discharge and simulated water balances. Global Biogeochemical Cycles, 16, 15-1 - 15-10.
Fick, S. E. & Hijmans, R. J. (2017). Worldclim 2: New 1-km spatial resolution climate surfaces for global land areas. International Journal of Climatology, 37, 4302-4315.

## Extrapolations
This dataset has been extrapolated from year 2019 to the year of the calculation (2021). The uncertainty has been adjusted accordingly.
