# pipeline construction, natural gas, high pressure distribution network

Dataset: EcoSpold 2, unit process
Geography: CH
Time period: 2012-01-01 to 2021-12-31
Technology level: current
Classification: EcoSpold01Categories: natural gas/fuels
Classification: ISIC rev.4 ecoinvent: 4220:Construction of utility projects
Scenario: Business-as-Usual
System model: Allocation, cut-off by classification
Share of production covered: 100 %
Generated by: Mireille Faist Emmenegger
Published in: Faist Emmenegger, Mireille 2015
Database: ecoinvent
isCopyrightProtected: true
accessRestrictedTo: 1

## General comment
Pipeline infrastructure for gas distribution in the high and middle pressure distribution network. Life time 40 years. Annual transport of 19 TJ/km/a. 6'380 km pipelines (about 2'000 km steel, 4'000 km PE, 400 km cast iron).
Material requirements of the pipeline system are round 20t/km steel, 0.7 t/km cast iron, 3t/km PE, 0.6 t/km bitumes, 800t/km sand, 4t/km cement. These values are calculated based on the material density, the thickness of the pipeline wall and the kilometers of the various pipeline types.

## Included activities end
This dataset describes the infrastructure needed for the Swiss high (>1 bar) and middle (>0.1 bar) pressure distribution network.

## Geography
Data is based on Swiss data.

## Technology
The length of the pipelines is based on statistics, whereas the thickness of the pipeline is estimated.

## Reference product
- pipeline, natural gas, high pressure distribution network: 1 km; name RP_amount_1; By-product classification allocatable product; CPC 53251: Local pipelines
  EcoSpold01Location=CH
  production volume 159.45 km; name RP_PV_1; = 6378/40
    6378km
  property price 142127 EUR2005
    Calculated based on inputs: The price of the product has been calculated as a sum of the values of the material and energy inputs for this product. This value is therefore a rough estimation. It may underestimate the real price since there are additional expenses when producing any product. These expences can include for example labour costs, treatment of waste materials and profit for the producer. Please consider carefully whether this level of data quality is acceptable for your application.
  properties: lifetime capacity [MJ] 7.65e8 MJ, lifetime 40 year

## Inputs from technosphere
- sand: 793200 kg; name sand_kg_HP; lognormal variance with pedigree 0.0492, pedigree (4,3,5,1,1)
  According to 2012 material share in network and estimates on pipelines' weight
  EcoSpold01Location=CH
  Uncertainty: qualified estimate
  properties: wet mass 1 kg, dry mass 1 kg
- concrete, normal: 2.73 m3; name concrete_m3; lognormal variance with pedigree 0.0492, pedigree (4,3,5,1,1)
  (same comment as for sand)
  properties: dry mass 2190 kg, water content 0.086758, wet mass 2380 kg
- cast iron: 771.57 kg; name cast_iron_pipe_kg; lognormal variance with pedigree 0.0492, pedigree (4,3,5,1,1)
  According to 2012 material share in network and estimates on pipelines' weight
  EcoSpold01Location=RER
  Uncertainty: qualified estimate
  properties: dry mass 1 kg, carbon content, fossil 0.04, wet mass 1 kg
  note on carbon content, fossil: Cast iron is made by remelting pig iron in small furnaces (e.g. cupola furnaces or electric arc furnaces) and poured into moulds to make castings. It usually contains 2% to 6% carbon (ecoinvent v2.2 report 10_partII). An average content of 4% was considered
- waste bitumen: -300 kg; = (bitumen_kg/2)*-1; lognormal variance with pedigree 0.1286, pedigree (4,3,5,1,1)
  Based on material requirements of the pipeline. It is assumed that half of the pipelines are left in the soil (modelled with pipeline in inert material landfill) and half of the pipeline materials are excavated.
  EcoSpold01Location=CH
  Uncertainty: qualified estimate
  production volume 47835 kg; = 300*159.45
    Calculated from the production volume of pipeline, natural gas, high pressure distribution network in proportion to the respective output amounts (amount time kilometers).
  properties: heating value, net 40.2 MJ, carbon content, fossil 0.842657, water content 0.0141988, dry mass 0.986 kg, wet mass 1 kg
  note on heating value, net: Literature value, Source: IPCC 2006, 2006 IPCC Guidelines for National Greenhouse Gas Inventories, Prepared by the National Greenhouse Gas Inventories Programme, Eggleston H.S., Buendia L., Miwa K., Ngara T. and Tanabe K. (eds). Published: IGES, Japan
- polyethylene, high density, granulate: 2100.92 kg; name HDPE_pipe_kg; lognormal variance with pedigree 0.0492, pedigree (4,3,5,1,1)
  EcoSpold01Location=RER
  According to 2012 material share in network and estimates on pipelines' weight
  Uncertainty: qualified estimate
  properties: carbon content, fossil 0.857143, wet mass 1 kg, dry mass 1 kg, heating value, net 42.47 MJ
  note on carbon content, fossil: Polyethylene is formed out of a huge amount of ethylene monomers (C2H4) (ecoinvent v2.2 report 11_II). MW=28 g/mol
- building, hall, steel construction: 0.2 m2; source Faist Emmenegger, M. 2007; lognormal variance with pedigree 0.3486, pedigree (4,3,5,1,1)
  qualified estimate
  EcoSpold01Location=CH
  Uncertainty: qualified estimate
- drawing of pipe, steel: 20419.3 kg; = steel_pipe_kg+ cast_iron_pipe_kg; lognormal variance with pedigree 0.0492, pedigree (4,3,5,1,1)
  EcoSpold01Location=RER
  According to 2012 material share in network and estimates on pipelines' weight. The drawing of the cast iron pipelines are added here.
  Uncertainty: qualified estimate
- waste reinforcement steel: -10209.6 kg; name BP_amount_2; = ((steel_pipe_kg+ cast_iron_pipe_kg)/2)*-1; lognormal variance with pedigree 0.1286, pedigree (4,3,5,1,1)
  Based on material requirements of the pipeline. It is assumed that half of the pipelines are left in the soil (modelled with pipeline in inert material landfill) and half of the pipeline materials are excavated.
  production volume 1.62793e6 kg; = RP_PV_1 * (BP_amount_2 / RP_amount_1)
    Calculated from production volume of reference product using the relative outputs.
  property price 0 EUR2005; name BP_amount_2_price_EUR2005
  properties: dry mass 1 kg, wet mass 1 kg
- polyethylene, low density, granulate: 1200 kg; name LDPE_pipe_kg; lognormal variance with pedigree 0.0492, pedigree (4,3,5,1,1)
  (same comment as for cast iron)
  properties: wet mass 1 kg, dry mass 1 kg, carbon content, fossil 0.857143, heating value, net 42.47 MJ
- excavation, skid-steer loader: 19000 m3; lognormal variance with pedigree 0.0492, pedigree (4,3,5,1,1)
  EcoSpold01Location=RER
  qualified estimate;activityLink introduced to establish a direct link to the corresponding regional supply of this product
  Uncertainty: qualified estimate
- pitch: 600 kg; name bitumen_kg; lognormal variance with pedigree 0.0492, pedigree (4,3,5,1,1)
  (same comment as for polyethylene, high density, granulate)
  properties: dry mass 1 kg, heating value, net 28 MJ, wet mass 1 kg, carbon content, fossil 0.83
- transport, helicopter: 4.8 hour; lognormal variance with pedigree 0.1686, pedigree (4,3,5,1,1)
  qualified estimate
  EcoSpold01Location=GLO
  Uncertainty: qualified estimate
- cement, unspecified: 3900 kg; lognormal variance with pedigree 0.0492, pedigree (4,3,5,1,1)
  EcoSpold01Location=CH
  According to 2012 material share in network and estimates on pipelines' weight
  Uncertainty: qualified estimate
  properties: wet mass 1 kg, dry mass 1 kg
- building, multi-storey: 16 m3; lognormal variance with pedigree 0.3486, pedigree (4,3,5,1,1)
  qualified estimate
  EcoSpold01Location=RER
  Uncertainty: qualified estimate
- excavation, hydraulic digger: 1200 m3; lognormal variance with pedigree 0.0492, pedigree (4,3,5,1,1)
  (same comment as for polyethylene, high density, granulate)
- transport, helicopter, LTO cycle: 1.92 unit; source Faist Emmenegger, M. 2007; lognormal variance with pedigree 0.0492, pedigree (4,3,5,1,1)
  EcoSpold01Location=GLO
  qualified estimate
  Uncertainty: qualified estimate
- transport, passenger car: 960 km; lognormal variance with pedigree 0.1686, pedigree (4,3,5,1,1)
  qualified estimate
  EcoSpold01Location=CH
  Uncertainty: qualified estimate
- decommissioned pipeline, natural gas: -11860.1 kg; = (( steel_pipe_kg+ LDPE_pipe_kg+ HDPE_pipe_kg+ cast_iron_pipe_kg)/2)*-1; lognormal variance with pedigree 0.1286, pedigree (4,3,5,1,1)
  EcoSpold01Location=CH
  Based on material requirements of the pipeline. It is assumed that half of the pipelines are left in the soil (modelled with pipeline in inert material landfill) and half of the pipeline materials are excavated. We assume that the sand is left in the ground.
  Uncertainty: qualified estimate
  production volume 1.89108e6 kg; = 11860*159.45
    (same comment as for waste bitumen)
  properties: dry mass 1 kg, carbon content, fossil 0.857143, wet mass 1 kg
  note on carbon content, fossil: Carbon content, fossil has been calculated from the carbon content from ethylene or polypropylene.
- waste concrete, not reinforced: -3276 kg; name BP_amount_1; = (concrete_m3*2400/2)*-1; lognormal variance with pedigree 0.1286, pedigree (4,3,5,1,1)
  (same comment as for waste reinforcement steel)
  production volume 522358 kg; = RP_PV_1 * (BP_amount_1 / RP_amount_1)
    Calculated from production volume of reference product using the relative outputs.
  property price 0 EUR2005; name BP_amount_1_price_EUR2005
  properties: dry mass 1 kg, wet mass 1 kg
- waste plastic, mixture: -1650.46 kg; = ((LDPE_pipe_kg+ HDPE_pipe_kg)/2)*-1; lognormal variance with pedigree 0.1286, pedigree (4,3,5,1,1)
  EcoSpold01Location=CH
  Based on material requirements of the pipeline. It is assumed that half of the pipelines are left in the soil (modelled with pipeline in inert material landfill) and half of the pipeline materials are excavated.
  Uncertainty: qualified estimate
  production volume 263092 kg; = 1650*159.45
    (same comment as for waste bitumen)
  properties: dry mass 0.847 kg, water content 0.180638, wet mass 1 kg, carbon content, fossil 0.747344, heating value, net 30.79 MJ
  note on carbon content, fossil: C content in 1 kg DM was calculated using data in Tab A.2, ecoinvent v2.2 report 13_I
  note on heating value, net: Value taken from the general comment of the treatment dataset.
- reinforcing steel: 19647.7 kg; name steel_pipe_kg; lognormal variance with pedigree 0.0492, pedigree (4,3,5,1,1)
  (same comment as for polyethylene, high density, granulate)
  properties: carbon content, fossil 0.004, wet mass 1 kg, dry mass 1 kg

## Inputs from nature
All rows: source Faist Emmenegger, M. 2007
- Transformation, to industrial area [natural resource, land]: 2.49 m2; lognormal variance with pedigree 0.1686, pedigree (4,3,5,1,1)
  qualified estimate
  Uncertainty: qualified estimate
- Transformation, from forest, unspecified [natural resource, land]: 2000 m2; lognormal variance with pedigree 0.1686, pedigree (4,3,5,1,1)
  qualified estimate
  Uncertainty: qualified estimate
- Transformation, to annual crop [natural resource, land]: 2000 m2; lognormal variance with pedigree 0.1686, pedigree (4,3,5,1,1)
  qualified estimate
  Uncertainty: qualified estimate
- Occupation, construction site [natural resource, land]: 3330 m2*year; lognormal variance with pedigree 0.0886, pedigree (4,3,5,1,1)
  qualified estimate
  Uncertainty: qualified estimate
- Transformation, from unspecified [natural resource, land]: 2.49 m2; lognormal variance with pedigree 0.1686, pedigree (4,3,5,1,1)
  qualified estimate
  Uncertainty: qualified estimate
- Occupation, industrial area [natural resource, land]: 49.7 m2*year; lognormal variance with pedigree 0.0886, pedigree (4,3,5,1,1)
  qualified estimate
  Uncertainty: qualified estimate

## Sampling procedure
statistics

## Extrapolations
This dataset has been extrapolated from year 2012 to the year of the calculation (2021). The uncertainty has been adjusted accordingly.
