# sodium hypochlorite production, product in 15% solution state

Dataset: EcoSpold 2, unit process
Geography: CA-QC
Time period: 1997-01-01 to 2021-12-31
Technology level: current
Classification: ISIC rev.4 ecoinvent: 2011:Manufacture of basic chemicals
Synonyms: Antiformin; Sodium oxychloride; Clorox; 7681-52-9; Milton; SODIUM HYPOCHLORITE
Scenario: Business-as-Usual
System model: Allocation, cut-off by classification
Generated by: Pascal Lesage
Published in: Althaus H.-J. 2007
Database: ecoinvent
isCopyrightProtected: true
accessRestrictedTo: 1

## General comment
This dataset represents the production of 1 kg of sodium hypochlorite (NaOCl) from chlorine emissions captured in a 50% sodium hydroxide solution. Sodium hypochlorite is an inorganic compound which takes the form of a pale yellow-greenish liquid with a chlorine odor. It is used primarily for household sanitizing and bleaching solutions as well as for water treatment (pools).
The inventory is based on literature data and estimations.
References:
Althaus H.-J., Chudacoff M., Hischier R., Jungbluth N., Osses M. and Primas A. (2007) Life Cycle Inventories of Chemicals. Final report ecoinvent data v2.0 No. 8. Swiss Centre for Life Cycle Inventories, Dübendorf, CH.

## Included activities start
The activity starts when the raw materials enter the process.

## Included activities end
This activity ends with the production of sodium hypochlorite. The dataset includes all precursor compounds, as well as emissions to air and infrastructure.

## Geography
The data has no specific geographic location.

## Technology
NaOCl is prepared by reacting a dilute caustic soda solution with liquid or gaseous chlorine. The reaction mixture is cooled, as the reaction is exothermic. The reaction is the following:
Cl2 + 2 NaOH -> NaOCl + NaCl + H2O
The resulting solution is stabilized by adjusting the pH-value. The yield is nearly 100% of the theoretical value based on chlorine, according to industry sources.

## Time period
Date of published literature.

## Parameters
- Quebec gross domestic product 2011: 3.11e11 USD(2011); name quebecGDP2011; lognormal variance with pedigree 0.0006, pedigree (1,1,1,1,1)
  Quebec Gross domestic product for 2011, expressed in 2011 USD. Source: Institut de la statistique du Québec. Converted from CAD to USD using a yearly average exchange rate of 0.989 CAD/USD (Source: bank of Canada).
- world gross domestic product 2011: 7e13 USD(2011); name worldGDP2011; lognormal variance with pedigree 0.0006, pedigree (1,1,1,1,1)
  World Gross domestic product for 2011, expressed in 2011 USD. Source: World Bank.

## Reference product
- sodium hypochlorite, without water, in 15% solution state: 1 kg; name RP; CPC 34240: Phosphates of triammonium; salts and peroxysalts of inorganic acids and metals n.e.c.; By-product classification allocatable product; CAS 7681-52-9
  Sodium hypochlorite is an inorganic compound which takes the form of a pale yellow-greenish liquid with a chlorine odor. It is used primarily for household sanitizing and bleaching solutions as well as for water treatment (pools).
  production volume 6.95402e7 kg; name RP_PV
    Estimated value. The Quebec production volume is extrapolated from the global production volume based on reports from the Chemistry industry Association of Canada, Cefic (European Chemical Industry Council), and the American Chemistry Council.
    According to the Chemistry Industry Association of Canada in 2016 Quebec represents the 19% of all chemical industries in Canada, with a values of 10 billion dollars in shipment.
    The production volume of Quebec is therefore calculated based on the share of Quebec sales 10 billion Canadian dollars over the global sales of chemicals 3,534 billion euros reported by Cefic. According to this calculation Quebec share of chemicals sales globally is of 0.2%, this also fits with Cefic data according to which NAFTA covers 16.5% of chemicals sales of which 14.7% are attributed to the US alone.
    The global production volume:
    Estimated value. The global production volume is extrapolated from the European production volume based on reports from Cefic (European Chemical Industry Council), and the American Chemistry Council.
    According to Cefic (2016a) the global sales of chemicals in the year 2015 was 3 534 billion euros. The reported share of sales per region are: EU28 14.7%; Other Europe (Switzerland, Norway, Turkey, Russia and Ukraine) 2.7%; NAFTA (US, Canada and Mexico) 16.5%; Latin America 3.8%; China 39.9%; Japan 3.9%; Republic of Korea 3.2%; India 2.2%; Rest of Asia 11.9%; Rest of the World 1.3%. Cefic also reports the US total sales, which amount to 518.7 billion euros out of the global 3 534 billion euros (14.7%). The same share is reported by the American Chemistry Council (2016), according to which the USA sales account for 15% of global sales for the year 2016.
    European production volume:
    Estimated value. According to the European Chemical Agency, the consumption of Sodium hypochlorite for the year of 2016 is estimated to be 5500000000 kg. The aforementioned value is the average of the range given in the literature. According to the European Chemical Industry Council (Cefic, 2016a), the total sales of chemicals of the European Union in 2016 amounted to 519 billion euros. Chemical imports were valued at 91 billion euros for the first 11 months of 2016. Based on this, the value for the total imports for the year 2016 was extrapolated, yielding a value of 99.3 billion euros. Furthermore, Cefic (2016b) reports a trade surplus (exports-imports) of 46.4 billion euros (once again extrapolated for the whole year using the value of 42 billion euros for the first 11 months of 2016). Considering all the aforementioned information, the total chemical consumption in the EU is calculated to be 472.6 billion euros (total sales-exports+imports). It is therefore calculated that production is 110% of consumption. This value is used to scale the information on chemical consumption to production. The European production volume is therefore 6050000000 kg.
    Since no data were found for the global production this value was scaled accordingly.
    References:
    Chemistry Industry Association of Canada 2016. Chemistry Industry Economic Profile 2016. Retrieved from: http://www.canadianchemistry.ca/library/uploads/Statistical_Review_2016_VF.pdf
    American Chemistry Council 2016. Outlook: U.S. Chemical Industry Continues to Outpace Industrial Output; Accounts for More Than One-Half of Construction Spending by Manufacturing Sector. Accessible at: https://www.americanchemistry.com/Media/PressReleasesTranscripts/ACC-news-releases/US-Chemical-Industry-Continues-to-Outpace-Industrial-Output.html ,
    European Chemical Agency, Brief profile of Sodium hypochlorite, Accessible at: https://echa.europa.eu/brief-profile/-/briefprofile/100.028.944
    Cefic 2016a. Facts and figures 2016 of the European chemical industry. Accessible at: http://www.cefic.org/Facts-and-Figures/Chemicals-Industry-Profile/
    Cefic 2016b. 2016: EU chemicals output posts positive growth for third year running. Accessible at: http://www.cefic.org/Documents/RESOURCES/Chemical%20Trends%20Report/March-2017-Cefic-Chemicals-Trends-Report.pdf
  property price 0.34 EUR2005
    Calculated value based on data from United Nations Commodity Trade Statistics Database (comtrade.un.org). UN comtrade category: 282890 Hypochlorites nes, chlorites & hypobromides of metals. Year 2005. Using exchange rate of 1EURO = 1.209 USD. Average of price of import into 5 main markets (EU, US, JP, IN and CN).
  property carbon content 0
    carbon content on a dry matter basis (reserved; not for manual entry)
  properties: dry mass 1 kg, wet mass 1 kg, water in wet mass 0 kg, carbon content, fossil 0, carbon content, non-fossil 0, water content 0, carbon allocation 0 kg

## Inputs from technosphere
- chlorine, gaseous: 0.952448 kg; lognormal variance with pedigree 0.1786, pedigree (4,5,5,5,5)
  Calculated value, based on stoichiometry. The yield for chlorine is nearly 100% according to industry sources.
  properties: wet mass 1 kg, dry mass 1 kg
- sodium hydroxide, without water, in 50% solution state: 1.07442 kg; lognormal variance with pedigree 0.1786, pedigree (4,5,5,5,5)
  Estimated value, based on a stoichiometric calculation with an assumed yield of 100%.
  properties: wet mass 1 kg, dry mass 1 kg, heating value, net 3.03 MJ
- heat, district or industrial, natural gas: 1.0488 MJ; lognormal variance with pedigree 0.0606, pedigree (4,3,5,5,1)
  Uncertainty: s
  properties: heating value, net 1 MJ
- electricity, medium voltage: 0.0281504 kWh; lognormal variance with pedigree 0.0426, pedigree (1,3,5,5,1)
  Electricity consumption.
  Uncertainty: p
- heat, district or industrial, other than natural gas: 0.585396 MJ; lognormal variance with pedigree 0.0606, pedigree (4,3,5,5,1)
  Uncertainty: s
  properties: heating value, net 1 MJ
- chemical factory, organics: 4e-10 unit; lognormal variance with pedigree 0.3498, pedigree (2,3,5,4,3)
  Calculated based on literature data published by the industry. For this activity, no information was readily available concerning infrastructure and land-use. Therefore, the infrastructure is estimated based on data from two chemical factories, the BASF site of Ludwigshafen and the chemical factory in Gendorf (which are both located in Germany), which produce a wide range of chemical substances. Based on this data, the following assumptions are made: the built area amounts to about 4.2 ha, the plant has an average output of 50'000 t/a and a lifespan of fifty years. The estimated infrastructure amount is therefore 4.00 E-10 units per kg of produced chemical.
  References:
  Althaus H.-J., Chudacoff M., Hischier R., Jungbluth N., Osses M. and Primas A. (2007) Life Cycle Inventories of Chemicals. ecoinvent report No. 8, v2.0. EMPA Dübendorf, Swiss Centre for Life Cycle Inventories, Dübendorf, CH.
  Gendorf (2000) Umwelterklärung 2000, Werk Gendorf. Werk Gendorf, Burgkirchen.

## Emissions to nature
- Sodium, ion [water, surface water]: 0.308837 kg; lognormal variance with pedigree 0.218, pedigree (4,5,5,5,5)
  Calculated value, based on stoichiometry.
- Chloride [water, surface water]: 0.476224 kg; lognormal variance with pedigree 0.218, pedigree (4,5,5,5,5)
  Calculated value, based on stoichiometry.
- Water [water, unspecified]: 0.000241806 m3; lognormal variance with pedigree 0.218, pedigree (4,5,5,5,5)
  Calculated based on the amount of process water and water released by the reaction.

## Sampling procedure
Based on literature data and stoichiometric calculations.

## Extrapolations
This dataset has been extrapolated from year 2000 to the year of the calculation (2021). The uncertainty has been adjusted accordingly.

## Review by Emilia Moreno Ruiz 2017-08-08
This dataset was additionally reviewed in a separate review process by Eric Johnson of Atlantic Consulting as well as Emilia Moreno Ruiz and Gregor Wernet of ecoinvent.
