# treatment of copper scrap by electrolytic refining

Dataset: EcoSpold 2, unit process
Geography: RoW
Time period: 1994-01-01 to 2021-12-31
Technology level: current
Classification: ISIC rev.4 ecoinvent: 2420:Manufacture of basic precious and other non-ferrous metals
Tags: ConvertedDataset
Scenario: Business-as-Usual
System model: Allocation, cut-off by classification
Share of production covered: 15.3 %
Generated by: Mischa Classen
Published in: Althaus H.-J. 2000
Database: ecoinvent
isCopyrightProtected: true
accessRestrictedTo: 1

## General comment
The module describes the production of secondary copper in Germany with a production of 176'000 t copper cathodes in 1994. It is designed for the use of the metal as part of the consumption mix 'copper, at regional storage'. It is not to be used if the impact of the secondary copper is considerable. In such cases, a more detailed analysis has to be conducted.

## Included activities end
The module includes the collection and handling of the copper scrap, the refining and the processes for waste water treatment.

## Geography
This module is valid for one single very big plant, which is taken as proxy for the RER.

## Technology
In three different stages different types of copper scrap and 10% of the feed of blister copper are refined to copper cathodes. Waste water is led to a communal treatment plant.

## Parameters
- fraction, process water, to air: 0.15 dimensionless; name fraction_PW_to_air; lognormal variance with pedigree 0.092025, pedigree (4,4,3,2,4)
  Literature value. In case when no industry/process specific data are available, default evaporation fraction value is used. This value is 15% and is based on literature (Statistics Canada, 2007 & Shaffer, K.H., 2008, Consumptive water use in the Great Lakes Basin, USGS & Shiklomanov, 2003, World Water Resources at the Beginning of the 21st Century) and has been approved by an expert.
- fraction, tap water, to air: 0.15 dimensionless; name fraction_TW_to_air; = fraction_PW_to_air; lognormal variance with pedigree 0.092025, pedigree (4,4,3,2,4)

## Reference product
- copper scrap, sorted, pressed: 0 kg; CPC 39361: Waste and scrap of copper; By-product classification Recyclable
  production volume 0 kg; name RP_PV; = ABS(RP_amount/copper_amount)*copper_PV
    Calculated from the production volume of copper in proportion to the respective output amounts.
  property price 2.84 EUR2005
    Temporary price data. Calculated as 90% of purchasers price based on: Source: USGS Mineral Yearbook 2007, Table 1 in <http://minerals.usgs.gov/minerals/pubs/commodity/recycle/myb1-2007-recyc.pdf>
  property carbon content 0
    carbon content on a dry matter basis (reserved; not for manual entry)
  properties: dry mass 1 kg, water content 0, carbon content, fossil 0, carbon content, non-fossil 0, wet mass 1 kg, water in wet mass 0 kg, carbon allocation 0 kg
- copper, cathode: 1 kg; name copper_amount; By-product classification allocatable product; CPC 41413: Refined copper and copper alloys, unwrought; master alloys of copper; CAS 7440-50-8
  production volume 3.55332e9 kg; name copper_PV
  properties: dry mass 1 kg, price 3.57105 EUR2005, water in wet mass 0 kg, water content 0, carbon content, non-fossil 0, wet mass 1 kg, carbon content, fossil 0, carbon content 0, carbon allocation 0 kg

## By-products
- copper, cathode: 0 kg; By-product classification allocatable product; CPC 41413: Refined copper and copper alloys, unwrought; master alloys of copper; CAS 7440-50-8
  production volume 0 kg; name copper_PV
    Source: USGS Minerals Yearbook 2015. Available from: https://www.usgs.gov/centers/nmic/copper-statistics-and-information (downloaded 21 June 2019), Table 22 (grand total, secondary) minus PV of copper from 'treatment of used cable [GLO]'
  property price 3.57105 EUR2005
    Price calculated as 5-year market average (2015-2019; USD/kg; USGS [2020]) and converted to EUR2005 (USD2019/EUR2005 exchange rate: 0.62; Official Data Foundation [2020] and Macrotrends [2020]).
    References:
    Official Data Foundation (2020). Inflation Calculator [Online]. Available from: https://www.officialdata.org/us/inflation/2005?endYear=2019&amount=1 [Accessed 28/07/2020]
    USGS (2020). Mineral Commodity Summaries 2020 [Online]. Available from: https://pubs.usgs.gov/periodicals/mcs2020/mcs2020.pdf [Accessed 28/07/2020]
    Macrotrends (2020). Euro Dollar Exchange Rate (EUR USD) - Historical Chart [Online]. Available from: https://www.macrotrends.net/2548/euro-dollar-exchange-rate-historical-chart [Accessed 28/07/2020]
  property carbon content 0
    carbon content on a dry matter basis (reserved; not for manual entry)
  properties: dry mass 1 kg, water in wet mass 0 kg, water content 0, carbon content, non-fossil 0, wet mass 1 kg, carbon content, fossil 0, carbon allocation 0 kg

## Inputs from technosphere
- chemical factory, organics: 4e-10 unit; lognormal variance with pedigree 0.3621, pedigree (3,2,5,5,3)
- tap water: 0 kg; name tap_water_input; pedigree (1,1,1,1,1)
  Estimated value. Amount of tap water on the input is equal to the amount of wastewater plus losses (water to air).
  properties: dry mass 0.000337476 kg, wet mass 1 kg, water content 2962.17, carbon content, fossil 0.00178991
  note on carbon content, fossil: Bicarbonate content is 2.93 mol/m3. CO2 content is 0.1 mol/m3 (ecoinvent v2.2 report 8, Tab 93.1).
- silica sand: 0.0625 kg; lognormal variance with pedigree 0.0446, pedigree (2,4,5,5,1)
  properties: wet mass 1 kg, dry mass 0.99 kg, water content 0.010101
- non-ferrous metal smelter: 9.57e-12 unit; lognormal variance with pedigree 0.3621, pedigree (3,2,5,5,3)
- lime, packed: 0.0739 kg; lognormal variance with pedigree 0.0446, pedigree (2,4,5,5,1)
  properties: carbon content, fossil 0.117492, wet mass 1 kg, dry mass 0.998 kg, water content 0.00200401
  note on carbon content, fossil: Table 3.1, ecoinvent v2.2 report 7, part VII, pg 3. MW CaCO3=100, MW MgCO3=84
- heat, district or industrial, other than natural gas: 0 MJ; pedigree (1,1,1,1,1)
  properties: heating value, net 1 MJ
- wastewater, unpolluted: -0.001 m3; name wastewater_amount; lognormal variance with pedigree 0.0446, pedigree (2,4,5,5,1)
  production volume 3.55332e6 m3; = ABS(wastewater_amount/copper_amount)*copper_PV
    (same comment as for copper scrap, sorted, pressed)
  property price 0 EUR2005; name wastewater_amount_price_EUR2005
  properties: carbon content, fossil 0.00178991, wet mass 1000 kg, carbon content, non-fossil 0.00178991, dry mass 0.337476 kg, water content 2962.17
  note on carbon content, fossil: Assumed to be like in tap water. Bicarbonate content is 2.93 mol/m3. CO2 content is 0.1 mol/m3 (ecoinvent v2.2 report 8, Tab 93.1).
- copper, anode: 0.114 kg; lognormal variance with pedigree 0.0446, pedigree (2,4,5,5,1)
  properties: wet mass 1 kg, copper content 0.997, dry mass 1 kg
- electricity, high voltage: 0 kWh; pedigree (1,1,1,1,1)
- copper scrap, sorted, pressed: 1.31 kg
  production volume 4.65485e9 kg
  properties: dry mass 1 kg, price 2.84 EUR2005, wet mass 1 kg
- tap water: 0.018313, 0.00220439, 0.00364312, 0.091865, 0.00238984, 0.00679787, 1.05126 kg (7 entries); lognormal variance with pedigree 0.090625, pedigree (4,4,5,2,4)
  (same comment as for tap water)
- heat, district or industrial, other than natural gas: 0.00311102, 7.67189 MJ (2 entries); lognormal variance with pedigree 0.0446, pedigree (2,4,5,5,1)
- electricity, high voltage: 0.0137383, 0.00263377, 0.0446555, 0.643022, 0.101978, 0.293973 kWh (6 entries); lognormal variance with pedigree 0.0446, pedigree (2,4,5,5,1)

## Emissions to nature
- Copper [air, non-urban air or from high stacks]: 8.5e-5 kg; lognormal variance with pedigree 0.6946, pedigree (2,4,5,5,1)
- Particulates, < 2.5 um [air, non-urban air or from high stacks]: 0.000282 kg; lognormal variance with pedigree 0.3546, pedigree (2,4,5,5,1)
- Dioxins, measured as 2,3,7,8-tetrachlorodibenzo-p-dioxin [air, non-urban air or from high stacks]: 5e-11 kg; lognormal variance with pedigree 1.3646, pedigree (2,4,5,5,1)
- Copper, ion [water, surface water]: 1e-6 kg; lognormal variance with pedigree 0.6946, pedigree (2,4,5,5,1)
- Antimony [air, non-urban air or from high stacks]: 3e-6 kg; lognormal variance with pedigree 0.6946, pedigree (2,4,5,5,1)
- Particulates, > 10 um [air, non-urban air or from high stacks]: 9.4e-5 kg; lognormal variance with pedigree 0.0846, pedigree (2,4,5,5,1)
- Sulfur dioxide [air, non-urban air or from high stacks]: 0.003 kg; lognormal variance with pedigree 0.0446, pedigree (2,4,5,5,1)
- Lead [air, non-urban air or from high stacks]: 9e-5 kg; lognormal variance with pedigree 0.6946, pedigree (2,4,5,5,1)
- Nickel, ion [water, surface water]: 3e-7 kg; lognormal variance with pedigree 0.6946, pedigree (2,4,5,5,1)
- Lead [water, surface water]: 5e-7 kg; lognormal variance with pedigree 0.6946, pedigree (2,4,5,5,1)
- Water [air, unspecified]: 0.000176471 m3; name water_to_air_unspecified; = (tap_water_input/1000)*fraction_TW_to_air; lognormal variance with pedigree 0.130025, pedigree (4,4,5,2,4)
  Calculated value based on literature values and expert opinion. See comments in the parametres' comment field.
  property fraction, origin: salt water 0; name fraction_origin_salt_water
  property fraction, origin: fresh water 1; name fraction_origin_fresh_water
  property fraction, origin: unspecified 0; name fraction_origin_unspecified
- Arsenic, ion [water, surface water]: 1e-7 kg; lognormal variance with pedigree 0.6946, pedigree (2,4,5,5,1)
- Nitrogen oxides [air, non-urban air or from high stacks]: 0.001 kg; lognormal variance with pedigree 0.0446, pedigree (2,4,5,5,1)
- Carbon monoxide, fossil [air, non-urban air or from high stacks]: 0.002 kg; lognormal variance with pedigree 0.6946, pedigree (2,4,5,5,1)
- Zinc, ion [water, surface water]: 2e-7 kg; lognormal variance with pedigree 0.6946, pedigree (2,4,5,5,1)
- Water [water, unspecified]: 0 m3; name water_to_water_unspecified; = (tap_water_input/1000)*(1-fraction_TW_to_air)-0.000763358778625954; pedigree (1,1,1,1,1)
  (same comment as for Water)
  property fraction, origin: fresh water 1; name fraction_origin_fresh_water_Ww
  property fraction, origin: salt water 0; name fraction_origin_salt_water_Ww
  property fraction, origin: unspecified 0; name fraction_origin_unspecified_Ww
- Cadmium [air, non-urban air or from high stacks]: 3e-6 kg; lognormal variance with pedigree 0.6946, pedigree (2,4,5,5,1)
- Particulates, > 2.5 um, and < 10um [air, non-urban air or from high stacks]: 9.4e-5 kg; lognormal variance with pedigree 0.1646, pedigree (2,4,5,5,1)
- Nickel [air, non-urban air or from high stacks]: 1e-6 kg; lognormal variance with pedigree 0.6946, pedigree (2,4,5,5,1)
- Cadmium, ion [water, surface water]: 1e-8 kg; lognormal variance with pedigree 0.6946, pedigree (2,4,5,5,1)
- Zinc [air, non-urban air or from high stacks]: 0.000375 kg; lognormal variance with pedigree 0.6946, pedigree (2,4,5,5,1)
- Arsenic [air, non-urban air or from high stacks]: 2e-6 kg; lognormal variance with pedigree 0.6946, pedigree (2,4,5,5,1)

## Sampling procedure
literature

## Extrapolations
see Geography and Technology This dataset has been copied from an original dataset covering the geography RER. The uncertainty has been adjusted accordingly.
