# treatment of waste gypsum plasterboard, recycling

Dataset: EcoSpold 2, unit process
Geography: CH
Time period: 1994-01-01 to 2021-12-31
Technology level: current
Classification: ISIC rev.4 ecoinvent: 3830:Materials recovery
Classification: EcoSpold01Categories: waste management/recycling
Synonyms: selenite; calcium sulfate dihydrate (has CAS 10101-41-4); natural gypsum (has CAS 13397-24-5); alabaster
Tags: Treatment; ConvertedDataset
Scenario: Business-as-Usual
System model: Allocation, cut-off by classification
Generated by: Gabor Doka (obsolete)
Published in: Doka G. 2007
Database: ecoinvent
isCopyrightProtected: true
accessRestrictedTo: 1

## General comment
The waste contains 1kg gypsum (GSD=100%). Waste density is 1000 kg/m3.
[This dataset was already contained in the ecoinvent database version 2. It was not individually updated during the transfer to ecoinvent version 3. Life Cycle Impact Assessment results may still have changed, as they are affected by changes in the supply chain, i.e. in other datasets. This dataset was generated following the ecoinvent quality guidelines for version 2. It may have been subject to central changes described in the ecoinvent version 3 change report (http://www.ecoinvent.org/database/ecoinvent-version-3/reports-of-changes/), and the results of the central updates were reviewed extensively. The changes added e.g. consistent water flows and other information throughout the database. The documentation of this dataset can be found in the ecoinvent reports of version 2, which are still available via the ecoinvent website. The change report linked above covers all central changes that were made during the conversion process.]

## Included activities end
energy for dismantling, particulate matter emissions from dismantling and handling,

## Geography
Specific to the technology mix encountered in Switzerland in late 1990ies

## Technology
Building demolition with skid-steer loaders.

## Reference product
- waste gypsum plasterboard: -1 kg; CPC 39990: Other wastes n.e.c.; By-product classification Waste; CAS 13397-24-5
  EcoSpold01Location=CH
  production volume 41 kg
    proportion from ecoinvent v2 report 13_V; value to be replaced by value to be calculated from the demand for this treatment activity
  property price 0 EUR2005
    Waste products are assigned a price of zero as they are assumed to require further treatment.
  property heating value, net 0 MJ
    Non combustible products are assumed to have an LHV equal to zero (0).
  property carbon content 0
    carbon content on a dry matter basis (reserved; not for manual entry)
  properties: carbon content, fossil 0, water content 0.239157, carbon content, non-fossil 0, dry mass 0.807 kg, wet mass 1 kg, water in wet mass 0.193 kg, carbon allocation 0 kg

## Inputs from technosphere
- diesel, burned in building machine: 0.0359 MJ; lognormal variance with pedigree 0.07, pedigree (1,1,5,1,1)
  energy for demolition. Uncertainty from range in (DAFSTB 1996)
  EcoSpold01Location=GLO
  properties: heating value, net 1 MJ

## Emissions to nature
- Particulates, < 2.5 um [air, urban air close to ground]: 1.66e-5 kg; lognormal variance with pedigree 0.3613, pedigree (2,3,5,3,1)
  Emission from dismantling and handling. from one extrapolated PM10 emission factor and generic PM fractions from measurements
  Uncertainty: & basic uncertainty of 3; from one extrapolated PM10 emission factor and generic PM fractions from measurements
- Particulates, > 2.5 um, and < 10um [air, urban air close to ground]: 6.34e-5 kg; lognormal variance with pedigree 0.1813, pedigree (2,3,5,3,1)
  Emission from dismantling and handling. from one extrapolated PM10 emission factor and generic PM fractions from measurements
  Uncertainty: & basic uncertainty of 2; from one extrapolated PM10 emission factor and generic PM fractions from measurements
- Particulates, > 10 um [air, urban air close to ground]: 8.35e-5 kg; lognormal variance with pedigree 0.0913, pedigree (2,3,5,3,1)
  Emission from dismantling and handling. from one extrapolated PM10 emission factor and generic PM fractions from measurements
  Uncertainty: & basic uncertainty of 1.5; from one extrapolated PM10 emission factor and generic PM fractions from measurements

## Sampling procedure
waste-specific calculation based on literature data

## Extrapolations
This dataset has been extrapolated from year 2002 to the year of the calculation (2021). The uncertainty has been adjusted accordingly.

## Review by Niels Jungbluth 2003-05-22
Passed.
