# residential sewer grid construction, 0.087 km

Dataset: EcoSpold 2, unit process
Geography: CH
Time period: 1996-01-01 to 2021-12-31
Technology level: current
Classification: EcoSpold01Categories: waste management/wastewater treatment
Classification: ISIC rev.4 ecoinvent: 4220:Construction of utility projects
Synonyms: sewer infrastructure for residential building area
Tags: ConvertedDataset
Scenario: Business-as-Usual
System model: Allocation, cut-off by classification
Generated by: Gabor Doka (obsolete)
Published in: Doka G. 2007
Database: ecoinvent
isCopyrightProtected: true
accessRestrictedTo: 1

## General comment
Sewer system for residential building area. Average length 0.087 km. The lifetime is 100 years including a renovation after 70 years.
[This dataset was already contained in the ecoinvent database version 2. It was not individually updated during the transfer to ecoinvent version 3. Life Cycle Impact Assessment results may still have changed, as they are affected by changes in the supply chain, i.e. in other datasets. This dataset was generated following the ecoinvent quality guidelines for version 2. It may have been subject to central changes described in the ecoinvent version 3 change report (http://www.ecoinvent.org/database/ecoinvent-version-3/reports-of-changes/), and the results of the central updates were reviewed extensively. The changes added e.g. consistent water flows and other information throughout the database. The documentation of this dataset can be found in the ecoinvent reports of version 2, which are still available via the ecoinvent website. The change report linked above covers all central changes that were made during the conversion process.]

## Included activities end
Infrastructure materials for private, residential sewer system, transports, dismantling.

## Geography
Specific to the technology mix and human settlement structure encountered in Switzerland around 1996.

## Technology
Underground sewer system with pipes

## Parameters
- fraction, process water, to air: 0.15 dimensionless; name fraction_PW_to_air; lognormal variance with pedigree 0.092025, pedigree (4,4,3,2,4)
  Literature value. In case when no industry/process specific data are available, default evaporation fraction value is used. This value is 15% and is based on literature (Statistics Canada, 2007 & Shaffer, K.H., 2008, Consumptive water use in the Great Lakes Basin, USGS & Shiklomanov, 2003, World Water Resources at the Beginning of the 21st Century) and has been approved by an expert.
- fraction, tap water, to air: 0.15 dimensionless; name fraction_TW_to_air; = fraction_PW_to_air; lognormal variance with pedigree 0.092025, pedigree (4,4,3,2,4)
  Calculated value. See comment in the other parametres present in this dataset. Tap water is considered to be always used as process water, thus process water fractions to air are applied to all tap water input flows to calculate the amount of water consumed in the processes.

## Reference product
- residential sewer grid, 0.087 km: 1 km; CPC 53253: Sewage and water treatment plants; By-product classification allocatable product
  EcoSpold01Location=CH
  production volume 0.0336675 km
    This is a placeholder value that does not reflect real-world production volumes. This dataset does not currently require a real-world production volume to work in the database framework, and no actual data were collected yet. This has no negative effect on the results of the ecoinvent database. The placeholder value of this activity was scaled according to the nominal GDP of 2005 (source: United Nations, http://data.un.org/Glossary.aspx?q=GDP+%28current+US%24%29, accessed 20130726) to reflect an appropriate share of the global production volume, which is also a placeholder value.
  property price 122300 EUR2005
    Calculated based on literature value (PE-80 Pipe Systems: 17 Years of Successful Application in teh Public Sewer Network System of Göttingen, Pipeline Technology 2006 Conferece, http://www.pipeline-conference.com/sites/default/files/papers/124%20Fiedler.pdf). In general the costs for construction and maintenance of sewer grid varies significantly from region to region. In Göttingen app. 700 km of sewers are being managed. The annual investments in maintenance, renewal and construction of new sewer grid are 16 mio. Euro. With a lifetime of 100 years the cost of 1km of sewer grid is estimated to be (16000000*100/700=) 2.29E+06 Euro/km.

## Inputs from technosphere
All rows: lognormal variance with pedigree 0.3607, pedigree (2,2,5,1,1)
- diesel, burned in building machine: 42200 MJ
  Data from one inventory study (Labhardt 1996)
  EcoSpold01Location=GLO
  Uncertainty: & basic uncertainty of 3; Data from one inventory study (Labhardt 1996)
  properties: heating value, net 1 MJ
- waste concrete, not reinforced: -926000 kg
  EcoSpold01Location=CH
  Data from one inventory study (Labhardt 1996)
  Uncertainty: & basic uncertainty of 3; Data from one inventory study (Labhardt 1996)
  production volume 926000 kg
    Calculated from the production volume of residential sewer grid, 0.087 km in proportion to the respective output amounts.
  properties: wet mass 1 kg, dry mass 1 kg
- excavation, hydraulic digger: 6450 m3
  EcoSpold01Location=RER
  Data from one inventory study (Labhardt 1996)
  Uncertainty: & basic uncertainty of 3; Data from one inventory study (Labhardt 1996)
- cement, unspecified: 26000 kg
  (same comment as for waste concrete, not reinforced)
  properties: dry mass 1 kg, wet mass 1 kg
- polyvinylchloride, suspension polymerised: 6193.61 kg
  (same comment as for excavation, hydraulic digger)
  properties: heating value, net 21.5 MJ, carbon content, fossil 0.387097, dry mass 1 kg, wet mass 1 kg
  note on carbon content, fossil: Monomer is vynyl chloride, C2H3Cl (ecoinvent v2.2 report 11_II). MW=62 g/mol
- gravel, round: 252800 kg
  Data from one inventory study (Labhardt 1996)
  EcoSpold01Location=CH
  Uncertainty: & basic uncertainty of 3; Data from one inventory study (Labhardt 1996)
  properties: wet mass 1 kg, dry mass 1 kg
- concrete, sole plate and foundation: 264 m3
  (same comment as for gravel, round)
  properties: water content 0.0816327, dry mass 2205 kg, wet mass 2385 kg
- gravel, crushed: 67200 kg
  (same comment as for gravel, round)
  properties: wet mass 1 kg, dry mass 1 kg
- electricity, medium voltage: 5890 kWh
  (same comment as for gravel, round)
- waste polyvinylchloride: -7100 kg
  (same comment as for gravel, round)
  production volume 7100 kg
    (same comment as for waste concrete, not reinforced)
  properties: heating value, net 21.51 MJ, water content 0.00200401, carbon content, fossil 0.440882, dry mass 0.998 kg, wet mass 1 kg
  note on heating value, net: Value taken from the general comment of the treatment dataset.
  note on carbon content, fossil: C content in 1 kg DM was calculated using data in Tab A.1, ecoinvent v2.2 report 13_I
- polyvinylchloride, emulsion polymerised: 906.386 kg
  (same comment as for excavation, hydraulic digger)
  properties: wet mass 1 kg, dry mass 1 kg, carbon content, fossil 0.387097, heating value, net 21.5 MJ
- waste polyethylene: -19300 kg
  (same comment as for waste concrete, not reinforced)
  production volume 19300 kg
    (same comment as for waste concrete, not reinforced)
  properties: heating value, net 42.47 MJ, water content 0.00401606, carbon content, fossil 0.825301, wet mass 1 kg, dry mass 0.996 kg
- cast iron: 5130 kg
  Data from one inventory study (Labhardt 1996)
  EcoSpold01Location=RER
  Uncertainty: & basic uncertainty of 3; Data from one inventory study (Labhardt 1996)
  properties: carbon content, fossil 0.04, wet mass 1 kg, dry mass 1 kg
  note on carbon content, fossil: Cast iron is made by remelting pig iron in small furnaces (e.g. cupola furnaces or electric arc furnaces) and poured into moulds to make castings. It usually contains 2% to 6% carbon (ecoinvent v2.2 report 10_partII). An average content of 4% was considered
- polyethylene, high density, granulate: 19300 kg
  (same comment as for excavation, hydraulic digger)
  properties: carbon content, fossil 0.857143, wet mass 1 kg, dry mass 1 kg, heating value, net 42.47 MJ
  note on carbon content, fossil: Polyethylene is formed out of a huge amount of ethylene monomers (C2H4) (ecoinvent v2.2 report 11_II). MW=28 g/mol
- tap water: 3.16e6 kg; name tap_water_input
  (same comment as for excavation, hydraulic digger)
  properties: water content 2962.17, carbon content, fossil 0.00178991, wet mass 1 kg, dry mass 0.000337476 kg
  note on carbon content, fossil: Bicarbonate content is 2.93 mol/m3. CO2 content is 0.1 mol/m3 (ecoinvent v2.2 report 8, Tab 93.1).
- sand: 201000 kg
  (same comment as for waste concrete, not reinforced)
  properties: wet mass 1 kg, dry mass 1 kg

## Emissions to nature
- Water [water, unspecified]: 2686 m3; name water_to_water_unspecified; = (tap_water_input/1000)*(1-fraction_TW_to_air); lognormal variance with pedigree 0.0807, pedigree (2,2,5,1,1)
  Calculated value based on literature values and expert opinion. See comments in the parametres' comment field.
  property fraction, origin: fresh water 1; name fraction_origin_fresh_water_Ww
  property fraction, origin: salt water 0; name fraction_origin_salt_water_Ww
  property fraction, origin: unspecified 0; name fraction_origin_unspecified_Ww
  property dry mass 0 kg; name DM
  property carbon content, fossil 0; name C_content_fossil
  property carbon content, non-fossil 0; name C_content_non_fossil
  property water in wet mass 1000 kg; name WWM
  property wet mass 1000 kg; name WM
- Water [air, unspecified]: 474 m3; name water_to_air_unspecified; = (tap_water_input/1000*fraction_TW_to_air); lognormal variance with pedigree 0.0807, pedigree (2,2,5,1,1)
  (same comment as for Water)
  property fraction, origin: salt water 0; name fraction_origin_salt_water
  property fraction, origin: fresh water 1; name fraction_origin_fresh_water
  property fraction, origin: unspecified 0; name fraction_origin_unspecified

## Sampling procedure
data from literature

## Extrapolations
This dataset has been extrapolated from year 1996 to the year of the calculation (2021). The uncertainty has been adjusted accordingly.

## Review by Niels Jungbluth 2003-06-11
Passed.
