# clinker production

Dataset: EcoSpold 2, unit process
Geography: CO
Time period: 2014-01-01 to 2021-12-31
Technology level: current
Classification: ISIC rev.4 ecoinvent: 2394:Manufacture of cement, lime and plaster
Classification: EcoSpold01Categories: construction materials/binder
Synonyms: rotary kiln; clinker; cement
Tags: combined production
Scenario: Business-as-Usual
System model: Allocation, cut-off by classification
Share of production covered: 81 %
Generated by: Simon Gmünder
Published in: Gmünder S. 2017
Database: ecoinvent
isCopyrightProtected: true
accessRestrictedTo: 1

## General comment
The dataset describes the production of Portland cement clinker. Clinker is made by sintering a mixture composed mainly of limestone and clay at temperatures up to 1400 °C.
Primary fuels such as coal and natural gas are used along with alternative fuels are considered as a reference product (including used tyres, waste plastic, textiles, sludge, etc. ) and a waste (solid and inert waste). The dataset is mainly based on sustainability reports of three principal clinker producers of Colombia (Argos, Cemex and Holcim).

## Included activities start
From the reception of traditional and alternative fuels and raw materials at the factory gate.

## Included activities end
This activity ends with the cooling of the produced clinker. It includes the whole manufacturing process to produce clinker (raw material provision, grinding and mixing; rotary kiln process), internal processes (transport, etc.) and for the infrastructure only the rotary kiln (material consumption) is taken into account. No administration is included.

## Geography
Representative clinker production in Colombia. Data based from main clinker producers.

## Technology
This dataset represents the current technology for clinker production in Colombia

## Time period
The production volume of 2016 is considered. Data from sustainability reports of 2014 to 2017 is used. Not all the data for all exchanges was available for the same year, consequently the time period covers several years (the latest available is used).

## Parameters
- water withdrawal, per kg of clinker: 0.00102336 m3/kg; name water_withdrawal; lognormal variance with pedigree 0.092025, pedigree (4,4,3,2,4)
  Calculated value. The values reported from the sustainability reports from Argos and Cemex from 2016 are used to extrapolate the average water withdrawal for cement and clinker production.
- fraction, process water, to air: 0.24 dimensionless; name fraction_PW_to_air; lognormal variance with pedigree 0.042125, pedigree (3,2,1,2,1)
  Literature value. Water emitted to air refers to the water that is removed from the system and thus is not available for later use (CSI consumption indicator in litres per ton of cement). According to the sustainability reports of Argos and Cemex, the share of water consumed is about 26% and 20% respectively. Weighted with the production volume, in Colombia 24% of the water withdrawn is emitted to the air and the remaining is infiltrated.
- fraction, water, to water: 0 dimensionless; name fraction_PW_to_water
  (same comment as for fraction, process water, to air)

## Reference product
- sewage sludge, dried: 0 kg; name sewage_sludge; By-product classification Waste; CPC 39920: Sewage sludge
  Calculated value. Information was provided for the total energy consumption for clinker production for Colombia in 2012. The information is based on statistics of all Colombian producers in TJ (terajoules). The clinker production in 2012 was 8.7 Mt (Ministerio de Minas y Energia, 2017). According to ASOCRETO five percent of the energy was provided by secondary fuels. Since the share of the different secondary fuels is not provided we’ve used the weighted average of the data published by Argos, Holcim and Cemex, which represents 81% of the market share. The LHV are taken from (Dauriat et al., 2014)
  Dauriat, A., Porté, C., Delerce, C., Guignard, C., & Adams, A. (2014). WBCSD CSI tool for EPDs of concrete and cement: LCA core model and database report.
  production volume 0 kg
    Calculated value from sustainability report (Holcim, 2015)
  property price 0 EUR2005; name sewage_sludge_price_EUR2005
    Waste products are assigned a price of zero as they are assumed to require further treatment.
  property carbon content 0.4096
    carbon content on a dry matter basis (reserved; not for manual entry)
  properties: carbon content, fossil 0, carbon content, non-fossil 0.4096, water in wet mass 0.01 kg, dry mass 0.99 kg, wet mass 1 kg, water content 0.010101, carbon allocation 0.405504 kg
- waste textile, soiled: 0 kg; name textile_waste; CPC 39270: Waste, parings and scrap of plastics; By-product classification Waste
  Calculated value. LHV from (Dauriat et al., 2014)
  Dauriat, A., Porté, C., Delerce, C., Guignard, C., & Adams, A. (2014). WBCSD CSI tool for EPDs of concrete and cement: LCA core model and database report.
  production volume 0 kg
    The total production of clinker in Colombia was 9’932’817 ton in 2016 (Ministerio de Minas y Energia, 2017)"
  property heating value, net 14.45 MJ
    Value taken from the general comment of the treatment dataset.
  property price 0 EUR2005; name textile_waste_price_EUR2005
    (same comment as for sewage sludge, dried)
  property carbon content 0.570519
    carbon content on a dry matter basis (reserved; not for manual entry)
  properties: water content 0.333333, carbon content, fossil 0, carbon content, non-fossil 0.570519, dry mass 0.75 kg, water in wet mass 0.25 kg, wet mass 1 kg, carbon allocation 0.42789 kg
- used tyre: 0 kg; name usedtyre; CPC 39260: Used pneumatic tyres of rubber; By-product classification Waste
  (same comment as for sewage sludge, dried)
  production volume 0 kg
    Calculated value from sustainability report (Argos, 2017)
  property dry mass 1 kg; name usedtyre_DM
  property water content 0; name usedtyre_water_content
  property carbon content, non-fossil 0; name usedtyre_C_content_non_fossil
  property carbon content, fossil 0.82; name usedtyre_C_content_fossil
  property heating value, net 24.85 MJ
    LHV is calculated based on the Carbon content of the product. More details can be found on the respective documentation.
  property price 0 EUR2005; name usedtyre_price_EUR2005
    (same comment as for sewage sludge, dried)
  property wet mass 1 kg; name usedtyre_WM
  property water in wet mass 0 kg; name usedtyre_WWM
  property carbon content 0.82
    carbon content on a dry matter basis (reserved; not for manual entry)
  properties: carbon allocation 0.82 kg
- inert waste: 0 kg; name inert_waste; CPC 39: Wastes or scraps; By-product classification Waste
  (same comment as for sewage sludge, dried)
  production volume 0 kg
    Calculated value from sustainability report (Cemex, 2016)
  property price 0 EUR2005; name inert_waste_price_EUR2005
    (same comment as for sewage sludge, dried)
  property carbon content 0
    carbon content on a dry matter basis (reserved; not for manual entry)
  properties: water in wet mass 0 kg, water content 0, dry mass 1 kg, wet mass 1 kg, carbon content, non-fossil 0, carbon content, fossil 0, carbon allocation 0 kg
- wastewater, average: 0 m3; CPC 39920: Sewage sludge; By-product classification Waste
  Calculated value.The values reported from the sustainability reports from Argos and Cemex from 2016 are used to extrapolate the average water withdrawal for cement and clinker production. 7% is from wastwater from other industries.
  production volume 0 m3
    Calculated from production volume of reference product using the relative outputs.
  property carbon content, non-fossil 0.194039
    0.0673 kg TOC/m3 (Tab A.17, ecoinvent v2.2 report 13_I). TOC was considered as Total Carbon.
  property price 0 EUR2005
    (same comment as for sewage sludge, dried)
  property carbon content 0.194039
    carbon content on a dry matter basis (reserved; not for manual entry)
  properties: water in wet mass 999.653 kg, water content 2882.2, wet mass 1000 kg, carbon content, fossil 0, dry mass 0.346837 kg, carbon allocation 0.0673 kg
- biowaste: 0 kg; name biomass_waste; By-product classification Waste; CPC 391: Wastes from food and tobacco industry
  (same comment as for sewage sludge, dried)
  production volume 0 kg
    Calculated value from sustainability report (Holcim, 2015)
  property price 0 EUR2005; name biomass_waste_price_EUR2005
    (same comment as for sewage sludge, dried)
  property heating value, net 4.29 MJ
    Value taken from the general comment of the treatment dataset.
  property carbon content 0.1624
    carbon content on a dry matter basis (reserved; not for manual entry)
  properties: carbon content, fossil 0, water in wet mass 0.6 kg, nitrogen content 0, water content 1.5, wet mass 1 kg, carbon content, non-fossil 0.1624, dry mass 0.4 kg, carbon allocation 0.06496 kg
- waste plastic, mixture: 0 kg; name waste_pharma; By-product classification Waste; CPC 39270: Waste, parings and scrap of plastics
  (same comment as for sewage sludge, dried)
  production volume 0 kg
    Calculated value from sustainability report (Holcim, 2015)
  property price 0 EUR2005; name waste_pharma_price_EUR2005
    (same comment as for sewage sludge, dried)
  property heating value, net 30.79 MJ
    Value taken from the general comment of the treatment dataset.
  property carbon content 0.747344
    carbon content on a dry matter basis (reserved; not for manual entry)
  properties: carbon content, fossil 0.747344, water content 0.180638, water in wet mass 0.153 kg, wet mass 1 kg, carbon content, non-fossil 0, dry mass 0.847 kg, carbon allocation 0.633 kg
- clinker: 1 kg; CPC 37430: Cement clinkers; By-product classification allocatable product
  production volume 9.93282e9 kg; name clinker_PV
    "Literature value
  property price 0.047 EUR2005; name clinker_price_EUR2005
    Calculated value based on data from United Nations Commodity Trade Statistics Database (comtrade.un.org). UN comtrade category: 252310 Cement Clinkers. Using exchange rate of 1EURO = 1.209 USD. Average of price of import into 5 main markets (EU, US, JP, IN and CN).
  property carbon content 0
    carbon content on a dry matter basis (reserved; not for manual entry)
  properties: carbon content, fossil 0, dry mass 1 kg, water in wet mass 0 kg, carbon content, non-fossil 0, wet mass 1 kg, water content 0, carbon allocation 0 kg

## Inputs from technosphere
- electricity, medium voltage: 0.0814 kWh; = 0.0814* clinker; source Argos 2017; lognormal variance with pedigree 0.0032, pedigree (2,1,3,1,1)
  Calculated as a weighted average (by production volume) of the regional activities.
  Calculation based on the electricity demand reported in kWh per ton of cement by Argos, Holcim and Cemex (81% market share). A default electricity consumption of cement (37kWh per ton of cement) and a clinker-to-cement ratio of 60% was used.
  The sustainability reports of the cement manufacturers only include the total electricity used for clinker and concrete production. The weighted average value is 85 kWh per ton of cement. According to ecoinvent, the electricity consumption for cement is 37 kWh per ton of cement (43%), while the remaining 57% is used for clinker production. For Colombia, using a clinker-to-cement ratio of 60% it results in an electricity consumption of 69 kWh per ton of clinker, which is comparable to the GNR value for Latin America (excl. Brazil) of 72 kWh per ton of clinker (WBCSD, 2016).
- industrial machine, heavy, unspecified: 3.76e-5 kg; = 3.76E-05* clinker; lognormal variance with pedigree 0.334, pedigree (4,4,3,5,1)
  Literature value. The data from global clinker production is used, since no Colombian specific data is available and the relevance of the infrastructure is rather low.
- lubricating oil: 4.71e-5 kg; = 4.71E-05* clinker; lognormal variance with pedigree 0.0146, pedigree (2,1,3,5,1)
  Literature value. Auxiliary materials include parts of infrastructure and lubrication oil. The data from clinker production.GLO (accessed on 2018/01/04) is used, since no Colombian specific data is available and the relevance of the auxiliary materials is rather low.
  properties: wet mass 1 kg, carbon content, fossil 0.75, dry mass 1 kg, heating value, net 40.2 MJ
  note on carbon content, fossil: Lubricating oil is produced from diesel. C-content/dry mass of fats and oils considered 75%, from: ecoinvent v2.2 report, n 15a, pg 40
  note on heating value, net: Literature value, Source: IPCC 2006, 2006 IPCC Guidelines for National Greenhouse Gas Inventories, Prepared by the National Greenhouse Gas Inventories Programme, Eggleston H.S., Buendia L., Miwa K., Ngara T. and Tanabe K. (eds). Published: IGES, Japan
- refractory, basic, packed: 0.00019 kg; = 0.00019* clinker; lognormal variance with pedigree 0.0146, pedigree (2,1,3,5,1)
  (same comment as for lubricating oil)
  properties: wet mass 1 kg, dry mass 1 kg
- natural gas, high pressure: 0.0177759 m3; = 0.0177759381267218* clinker; source Manuel Lascarro 2017; lognormal variance with pedigree 0.0032, pedigree (2,1,3,1,1)
  Calculated value. Information was provided for the total energy consumption for clinker production for Colombia in 2012. The information is based on statistics of all Colombian producers in TJ (terajoules). The clinker production in 2012 was 8.7 Mt (Ministerio de Minas y Energia, 2017). According to ASOCRETO five percent of the energy was provided by secondary fuels. Since the share of the different secondary fuels is not provided we’ve used the weighted average of the data published by Argos, Holcim and Cemex, which represents 81% of the market share. The LHV are taken from (Dauriat et al., 2014)
  properties: heating value, net 36.3 MJ
- calcareous marl: 0.191 kg; = 0.191* clinker; source Pacasmayo 2014; lognormal variance with pedigree 0.0053, pedigree (2,2,3,5,1)
  Estimated value. For Colombia the same total amount of material input was assumed as for the global ecoinvent dataset (1.74kg of primary and secondary raw material per kg of clinker produced), given the limitation in data availability. The material composition is based on data from the Pacasmayo cement producer, representing 20% of the Peruvian market. The clinker composition in Peru (Pacasmayo, 2014) is 72% limestone, 15% clays, 2% iron oxide and 11% calcareous marl. The same share is assumed for Colombia.
  properties: wet mass 1 kg, carbon content, fossil 0.087767, dry mass 1 kg
  note on carbon content, fossil: composed from 3/4 pure limestone and 1/4 clay, ecoinvent v2.2 report 7 part II pg 14. C content of limestone is 0.117 kg/kg WM
- tap water: 9.21021e-5 kg; name tap_water_input; = 9.210213E-05* clinker; source Argos 2017; lognormal variance with pedigree 0.0032, pedigree (2,1,3,1,1)
  Calculated value.The values reported from the sustainability reports from Argos and Cemex from 2016 are used to extrapolate the average water withdrawal for cement and clinker production. 9% is from tap water.
- limestone, crushed, for mill: 1.25 kg; = 1.25* clinker; source Pacasmayo 2014; lognormal variance with pedigree 0.0067, pedigree (3,2,3,5,1)
  (same comment as for calcareous marl)
  properties: water content 0.00200401, carbon content, fossil 0.117492, wet mass 1 kg, dry mass 0.998 kg
- cement factory: 6.2e-12 unit; = 6.2E-12* clinker; lognormal variance with pedigree 0.3146, pedigree (2,1,3,5,1)
  (same comment as for industrial machine, heavy, unspecified)
- clay: 0.26 kg; = 0.26* clinker; source Pacasmayo 2014; lognormal variance with pedigree 0.0053, pedigree (2,2,3,5,1)
  (same comment as for calcareous marl)
  properties: wet mass 1 kg, dry mass 0.965 kg, water content 0.0362694
- iron ore, crude ore, 46% Fe: 0.0347 kg; = 0.0347* clinker; source Pacasmayo 2014; lognormal variance with pedigree 0.0146, pedigree (2,1,3,5,1)
  (same comment as for calcareous marl)
  properties: wet mass 1 kg, dry mass 1 kg
- steel, chromium steel 18/8, hot rolled: 5.86e-5 kg; = 5.86E-05* clinker; lognormal variance with pedigree 0.0146, pedigree (2,1,3,5,1)
  (same comment as for lubricating oil)
  properties: dry mass 1 kg, wet mass 1 kg, carbon content, fossil 0.0008
  note on carbon content, fossil: Stainless steel model is the grade 304 steel (18/8 stainless, 18% chromium 8% nickel; max. 0.08% C)
- municipal solid waste: -4.45e-5 kg; name MSW; = (4.45E-05* clinker)*-1; lognormal variance with pedigree 0.0052, pedigree (2,1,3,5,1)
  Literature value. The data from global clinker production is used, since no Colombian specific data is available. Cement kiln dust (CKD) discarded as solid waste.
  Consulted on October 20th 2017
  production volume 442010 kg; = clinker_PV* MSW/clinker
    Calculated from production volume of reference product using the relative outputs.
  properties: water content 0.297017, heating value, net 11.74 MJ, carbon content, non-fossil 0.261655, carbon content, fossil 0.171549, dry mass 0.771 kg, wet mass 1 kg
  note on heating value, net: Value taken from the general comment of the treatment dataset.
  note on carbon content, non-fossil: MSW composition in tab 4.1, ecoinvent v2.2 report 13_I. C content referred to 1 kg DM
- refractory, high aluminium oxide, packed: 0.000137 kg; = 0.000137* clinker; lognormal variance with pedigree 0.0146, pedigree (2,1,3,5,1)
  (same comment as for lubricating oil)
  properties: dry mass 1 kg, wet mass 1 kg
- hard coal: 0.119399 kg; = 0.11939907* clinker+ sewage_sludge*0+ usedtyre*0+ waste_pharma*0+ textile_waste*0+ biomass_waste*0+ inert_waste*0; source Manuel Lascarro 2017; lognormal variance with pedigree 0.0033, pedigree (2,2,3,1,1)
  (same comment as for natural gas, high pressure)
  properties: carbon content, fossil 0.845, water content 0.0638298, dry mass 0.94 kg, wet mass 1 kg, heating value, net 28.9 MJ
  note on carbon content, fossil: C content 75-94% (specified in Tab 1.1, report 6, part VI). A mean content of 0.845 kg C/ kg dry hard coal was considered
  note on heating value, net: Net calorific value. LHV of 28.9 MJ/Kg from (Quantis, CSI-Tool for EPDs for cement and concrete, 2015)
- inert waste, for final disposal: -0.000179 kg; name inert_waste_disposal; = (0.000179* clinker)*-1; lognormal variance with pedigree 0.0052, pedigree (2,1,3,5,1)
  (same comment as for municipal solid waste)
  production volume 1.77797e6 kg; = clinker_PV* inert_waste_disposal/clinker
    Calculated from production volume of reference product using the relative outputs.
  property price 0 EUR2005; name inert_waste_disposal_price_EUR2005
  properties: wet mass 1 kg, water content 0.00502513, dry mass 0.995 kg
- refractory, fireclay, packed: 8.21e-5 kg; = 8.21E-05* clinker; lognormal variance with pedigree 0.0146, pedigree (2,1,3,5,1)
  (same comment as for lubricating oil)
  properties: wet mass 1 kg, dry mass 1 kg

## Inputs from nature
- Water, well, in ground [natural resource, in water]: 0.000685649 m3; = 0.00068564919* clinker; source Argos 2017; lognormal variance with pedigree 0.0101, pedigree (3,2,3,1,1)
  Calculated value. The values reported from the sustainability reports from Argos and Cemex from 2016 are used to extrapolate the average water withdrawal for cement and clinker production. The shares are calculated as following: surface water (67%), ground water (11%), tap water (9%), rain water (6%) and waste water (7%).
- Water, in air [natural resource, in air]: 6.14014e-5 m3; = 6.140142E-05* clinker; source Argos 2017; lognormal variance with pedigree 0.0101, pedigree (3,2,3,1,1)
  (same comment as for Water, well, in ground)
- Water, river [natural resource, in water]: 0.000112569 m3; = 0.00011256927* clinker; source Argos 2017; lognormal variance with pedigree 0.0101, pedigree (3,2,3,1,1)
  (same comment as for Water, well, in ground)

## Emissions to nature
- Antimony [air, unspecified]: 3.09e-7 kg; = 0.000000309* clinker; source Quantis 2015; lognormal variance with pedigree 0.062, pedigree (1,5,3,5,1)
  Literature value. The data is based on the LCA core model of the WBCSD-CSI EPD tool (Dauriat et al., 2014) (Dauriat et al., 2014)
  Dauriat, A., Porté, C., Delerce, C., Guignard, C., & Adams, A. (2014). WBCSD CSI tool for EPDs of concrete and cement: LCA core model and database report.
- Formaldehyde [air, urban air close to ground]: 7.68e-6 kg; = 7.68E-06* clinker; source Quantis 2015; lognormal variance with pedigree 0.062, pedigree (1,5,3,5,1)
  (same comment as for Antimony)
- Chrysene [air, unspecified]: 5.65e-13 kg; = 5.65E-13* clinker; lognormal variance with pedigree 0.3046, pedigree (2,1,3,5,1)
  Literature value. This value was taken from the "clinker production, GLO" dataset as it was considered adequate also for this dataset.
  Consulted on October 20th 2017
- Vanadium [air, unspecified]: 5.37e-8 kg; = 5.37E-08* clinker; source Quantis 2015; lognormal variance with pedigree 0.056, pedigree (1,4,3,5,1)
  (same comment as for Antimony)
- Ethene [air, urban air close to ground]: 1.32e-5 kg; = 1.32E-05* clinker; source Quantis 2015; lognormal variance with pedigree 0.062, pedigree (1,5,3,5,1)
  (same comment as for Antimony)
- Benzene [air, non-urban air or from high stacks]: 4.01e-6 kg; = 4.01E-06* clinker; source Quantis 2015; lognormal variance with pedigree 0.062, pedigree (1,5,3,5,1)
  (same comment as for Antimony)
- Lead [air, unspecified]: 1.71e-7 kg; = 1.71E-07* clinker; source Quantis 2015; lognormal variance with pedigree 0.062, pedigree (1,5,3,5,1)
  (same comment as for Antimony)
- Beryllium [air, unspecified]: 3.53e-9 kg; = 3.53E-09* clinker; source Quantis 2015; lognormal variance with pedigree 0.056, pedigree (1,4,3,5,1)
  (same comment as for Antimony)
- Methane, non-fossil [air, urban air close to ground]: 4.7e-7 kg; = 4.7E-07* clinker; source Quantis 2015; lognormal variance with pedigree 0.0142, pedigree (3,2,3,3,1)
  Literature value. The total methane emissions are taken from the model as standard values specified in the CSI EPD tool (Dauriat et al., 2014). The share of biogenic and fossil emissions is based on the type of the kiln fuel input and is the biogenic emissions in Colombia are 6% of the total emissions (Gmünder, 2017).
- Indeno(1,2,3-cd)pyrene [air, unspecified]: 1.13e-12 kg; = 1.13E-12* clinker; lognormal variance with pedigree 0.3046, pedigree (2,1,3,5,1)
  (same comment as for Chrysene)
- Water [air, unspecified]: 0.000245606 m3; name water_to_air; = 0.00024560568* clinker; source Argos 2017; lognormal variance with pedigree 0.0048, pedigree (3,2,3,3,1)
  (same comment as for fraction, process water, to air)
  property fraction, origin: unspecified 0.826531; name fraction_origin_unspecified
  property fraction, origin: salt water 0; name fraction_origin_salt_water
  property fraction, origin: fresh water 0.173469; name fraction_origin_fresh_water
- Carbon dioxide, fossil [air, unspecified]: 0.88 kg; = 0.88* clinker; source Manuel Lascarro 2017; lognormal variance with pedigree 0.0053, pedigree (2,2,3,5,1)
  Calculated value. The data is based on the fuel inputs and the emissions are calculated based on the LCA core model of the WBCSD-CSI EPD tool (Dauriat et al., 2014) (Dauriat et al., 2014)
  Dauriat, A., Porté, C., Delerce, C., Guignard, C., & Adams, A. (2014). WBCSD CSI tool for EPDs of concrete and cement: LCA core model and database report.
- Zinc [air, unspecified]: 5.28e-7 kg; = 5.28E-07* clinker; source Quantis 2015; lognormal variance with pedigree 0.056, pedigree (1,4,3,5,1)
  (same comment as for Antimony)
- Dibenz(a,h)anthracene [air, unspecified]: 2.88e-12 kg; = 2.88E-12* clinker; lognormal variance with pedigree 0.3046, pedigree (2,1,3,5,1)
  (same comment as for Chrysene)
- Cadmium [air, unspecified]: 1.61e-8 kg; = 1.61E-08* clinker; source Quantis 2015; lognormal variance with pedigree 0.056, pedigree (1,4,3,5,1)
  (same comment as for Antimony)
- Carbon dioxide, non-fossil [air, unspecified]: 0.0237 kg; = 0.0237* clinker; source Manuel Lascarro 2017; lognormal variance with pedigree 0.0053, pedigree (2,2,3,5,1)
  (same comment as for Carbon dioxide, fossil)
- Methane, fossil [air, unspecified]: 1.75e-5 kg; = 1.75E-05* clinker; source Quantis 2015; lognormal variance with pedigree 0.1346, pedigree (2,1,3,5,1)
  (same comment as for Methane, non-fossil)
- Chromium [air, unspecified]: 9.37e-8 kg; = 9.37E-08* clinker; source Quantis 2015; lognormal variance with pedigree 0.062, pedigree (1,5,3,5,1)
  (same comment as for Antimony)
- Particulates, > 2.5 um, and < 10um [air, non-urban air or from high stacks]: 4.72e-5 kg; = 4.72E-05* clinker; source Quantis 2015; lognormal variance with pedigree 0.304, pedigree (1,4,3,1,1)
  Calculated value. Values on total PM emissions from sustainability reports are used (Argos and Holcim) and the same distribution based on the WBCSD-CSI EPD tool is assumed (48% < 2.5um, 18% > 2.5 um, and < 10um and 34% > 10um).
- Thallium [air, unspecified]: 3.2e-8 kg; = 3.2E-08* clinker; source Quantis 2015; lognormal variance with pedigree 0.062, pedigree (1,5,3,5,1)
  (same comment as for Antimony)
- Hydrogen fluoride [air, urban air close to ground]: 2.31e-6 kg; = 2.31E-06* clinker; source Quantis 2015; lognormal variance with pedigree 0.062, pedigree (1,5,3,5,1)
  (same comment as for Antimony)
- Chromium VI [air, unspecified]: 5.44e-10 kg; = 5.44E-10* clinker; lognormal variance with pedigree 0.0446, pedigree (2,1,3,5,1)
  (same comment as for Chrysene)
- Methane, dichloro-, HCC-30 [air, unspecified]: 5.18e-8 kg; = 5.18E-08* clinker; lognormal variance with pedigree 0.3046, pedigree (2,1,3,5,1)
  (same comment as for Chrysene)
- Propane [air, urban air close to ground]: 8.36e-6 kg; = 8.36E-06* clinker; source Quantis 2015; lognormal variance with pedigree 0.062, pedigree (1,5,3,5,1)
  (same comment as for Antimony)
- Hydrogen chloride [air, unspecified]: 2.31e-5 kg; = 2.31E-05* clinker; source Quantis 2015; lognormal variance with pedigree 0.056, pedigree (1,4,3,5,1)
  (same comment as for Antimony)
- Nitrogen oxides [air, unspecified]: 0.00177 kg; = 0.00177* clinker; source Argos 2017; lognormal variance with pedigree 0.0446, pedigree (2,1,3,5,1)
  Calculated value. Values on NOx emissions from sustainability reports are used.
- Particulates, > 10 um [air, non-urban air or from high stacks]: 8.91e-5 kg; = 8.91E-05* clinker; source Quantis 2015; lognormal variance with pedigree 0.124, pedigree (1,4,3,1,1)
  (same comment as for Particulates, > 2.5 um, and < 10um)
- Sulfur dioxide [air, unspecified]: 0.000736 kg; = 0.000736* clinker; source Argos 2017; lognormal variance with pedigree 0.0106, pedigree (2,1,3,5,1)
  Calculated value. Values on total SO2 emissions from sustainability reports are used.
- Manganese [air, unspecified]: 5.1e-8 kg; = 5.1E-08* clinker; source Quantis 2015; lognormal variance with pedigree 0.056, pedigree (1,4,3,5,1)
  (same comment as for Antimony)
- Cobalt [air, unspecified]: 1.92e-8 kg; = 1.92E-08* clinker; source Quantis 2015; lognormal variance with pedigree 0.056, pedigree (1,4,3,5,1)
  (same comment as for Antimony)
- Carbon monoxide, fossil [air, unspecified]: 0.00112 kg; = 0.00112* clinker; source Manuel Lascarro 2017; lognormal variance with pedigree 0.6546, pedigree (2,1,3,5,1)
  Literature value. The total carbon monoxide are taken from the model as standard values specified in the CSI EPD tool (Dauriat et al., 2014). The share of biogenic and fossil emissions is based on the type of the kiln fuel input and is the biogenic emissions in Colombia are 6% of the total emissions (Gmünder, 2017).
- Phosphorus [air, unspecified]: 3.48e-13 kg; = 3.48E-13* clinker; lognormal variance with pedigree 0.0446, pedigree (2,1,3,5,1)
  (same comment as for Chrysene)
- Pyrene [air, unspecified]: 3.44e-11 kg; = 3.44E-11* clinker; lognormal variance with pedigree 0.3046, pedigree (2,1,3,5,1)
  (same comment as for Chrysene)
- Benzo(a)pyrene [air, unspecified]: 2.28e-7 kg; = 2.28E-07* clinker; source Quantis 2015; lognormal variance with pedigree 0.056, pedigree (1,4,3,5,1)
  (same comment as for Antimony)
- Nickel [air, unspecified]: 6.92e-8 kg; = 6.92E-08* clinker; source Quantis 2015; lognormal variance with pedigree 0.062, pedigree (1,5,3,5,1)
  (same comment as for Antimony)
- Water [water, unspecified]: 0.000777751 m3; = 0.00077775132* clinker; source Argos 2017; lognormal variance with pedigree 0.0047, pedigree (3,2,3,1,1)
  (same comment as for fraction, process water, to air)
- Phenanthrene [air, unspecified]: 6.6e-10 kg; = 6.6E-10* clinker; lognormal variance with pedigree 0.6546, pedigree (2,1,3,5,1)
  (same comment as for Chrysene)
- Xylene [air, urban air close to ground]: 2e-6 kg; = 2E-06* clinker; source Quantis 2015; lognormal variance with pedigree 0.062, pedigree (1,5,3,5,1)
  (same comment as for Antimony)
- Particulates, < 2.5 um [air, non-urban air or from high stacks]: 0.000126 kg; = 0.000126* clinker; source Quantis 2015; lognormal variance with pedigree 0.304, pedigree (1,4,3,1,1)
  (same comment as for Particulates, > 2.5 um, and < 10um)
- Arsenic [air, unspecified]: 1.02e-7 kg; = 1.02E-07* clinker; source Quantis 2015; lognormal variance with pedigree 0.062, pedigree (1,5,3,5,1)
  (same comment as for Antimony)
- Hydrogen sulfide [air, urban air close to ground]: 6.12e-7 kg; = 6.12E-07* clinker; source Quantis 2015; lognormal variance with pedigree 0.0101, pedigree (3,2,3,1,1)
  (same comment as for Antimony)
- Selenium [air, unspecified]: 5.55e-8 kg; = 5.55E-08* clinker; source Quantis 2015; lognormal variance with pedigree 0.056, pedigree (1,4,3,5,1)
  (same comment as for Antimony)
- Carbon monoxide, non-fossil [air, non-urban air or from high stacks]: 3.02e-5 kg; = 3.02E-05* clinker; source Manuel Lascarro 2017; lognormal variance with pedigree 0.6542, pedigree (3,2,3,3,1)
  (same comment as for Carbon monoxide, fossil)
- Ethane [air, non-urban air or from high stacks]: 1e-5 kg; = 1E-05* clinker; source Quantis 2015; lognormal variance with pedigree 0.062, pedigree (1,5,3,5,1)
  (same comment as for Antimony)
- Ammonia [air, unspecified]: 6.92e-5 kg; = 6.92E-05* clinker; source Quantis 2015; lognormal variance with pedigree 0.056, pedigree (1,4,3,5,1)
  (same comment as for Antimony)
- Dioxins, measured as 2,3,7,8-tetrachlorodibenzo-p-dioxin [air, unspecified]: 5.5e-14 kg; = 5.5E-14* clinker; source Quantis 2015; lognormal variance with pedigree 0.062, pedigree (1,5,3,5,1)
  (same comment as for Antimony)
- Acetaldehyde [air, non-urban air or from high stacks]: 3.98e-6 kg; = 3.98E-06* clinker; source Quantis 2015; lognormal variance with pedigree 0.062, pedigree (1,5,3,5,1)
  (same comment as for Antimony)
- Fluorene [air, unspecified]: 4.28e-11 kg; = 4.28E-11* clinker; lognormal variance with pedigree 0.3046, pedigree (2,1,3,5,1)
  (same comment as for Antimony)
- Copper [air, unspecified]: 6.29e-8 kg; = 6.29E-08* clinker; source Quantis 2015; lognormal variance with pedigree 0.062, pedigree (1,5,3,5,1)
  (same comment as for Antimony)
- Toluene [air, urban air close to ground]: 2e-6 kg; = 2E-06* clinker; source Quantis 2015; lognormal variance with pedigree 0.062, pedigree (1,5,3,5,1)
  (same comment as for Antimony)
- Fluoranthene [air, unspecified]: 4.72e-11 kg; = 4.72E-11* clinker; lognormal variance with pedigree 0.3046, pedigree (2,1,3,5,1)
  (same comment as for Antimony)
- Tin [air, unspecified]: 1.08e-6 kg; = 1.08E-06* clinker; lognormal variance with pedigree 0.6646, pedigree (2,1,3,5,1)
  (same comment as for Antimony)
- Hydrocarbons, aliphatic, alkanes, unspecified [air, urban air close to ground]: 5.21e-8 kg; = 5.21E-08* clinker; source Quantis 2015; lognormal variance with pedigree 0.062, pedigree (1,5,3,5,1)
  (same comment as for Antimony)
- Mercury [air, unspecified]: 5.1e-8 kg; = 5.1E-08* clinker; source Quantis 2015; lognormal variance with pedigree 0.062, pedigree (1,5,3,5,1)
  (same comment as for Antimony)

## Sampling procedure
The data is compiled based on different data sources, including sustainability reports, literature values and expert judgements. Most data is derived from sustainability reports of the three principal clinker producers of Colombia (Argos, Cemex and Holcim). The data is checked, completed and validated by local experts. In total, it is estimated that the data considered is representative for 81% of clinker production in all the country (market share of the three main clinker producers).
Unit flows were calculated by dividing the amounts of inputs and outputs by the total clinker production in mass.
The amount of the exchanges were calculated considering the arithmetic/weighted average of the sample. No conversion to the geometric mean of the lognormal distribution was done, for consistency reasons with other Ecoinvent datasets.

## Extrapolations
The life cycle inventory model is based on the PCR for cement and concrete(Environdec, 2010), as well as on the LCA core model of the WBCSD-CSI EPD tool (Dauriat et al., 2014).
Air emissions (expect CO2, NOx and SO2) are modelled on literature values (Dauriat et al., 2014). The infrastructure, auxiliary materials, wastes are based on the global ecoinvent dataset for clinker production.

Standard basic uncertainty values were used.

Dauriat, A., Porté, C., Delerce, C., Guignard, C., & Adams, A. (2014). WBCSD CSI tool for EPDs of concrete and cement: LCA core model and database report.

Environdec. (2010). Product category rules of UN CPC 3744 Cement.

## Review by Marion Sié 2017-12-07
The author specifies the LHV of secondary fuels are specified in the Published source report.
