# hard coal preparation, crushing and destoning

Dataset: EcoSpold 2, unit process
Geography: ZA
Time period: 2014-01-01 to 2021-12-31
Technology level: current
Classification: ISIC rev.4 ecoinvent: 0510:Mining of hard coal
Classification: EcoSpold01Categories: hard coal/production
Scenario: Business-as-Usual
System model: Allocation, cut-off by classification
Generated by: Philippa Notten
Published in: Notten P.J. 2017
Database: ecoinvent
isCopyrightProtected: true
accessRestrictedTo: 1

## General comment
This dataset represents the production of 1 kg of crushed and screened coal in South Africa. Around 34% of South Africa's saleable coal has undergone simple coal preparation only (crushing and destoning) (SACRM, 2011). The crushed coal product is used almost exclusively by the domestic coal market, primarily in electricity generation and in the production of synthetic fuels and chemicals. Total production in 2014 amounted to 90 million tonnes (DMR, 2015). This dataset includes ONLY the waste produced, the land required for its disposal and methane emissions associated with coal crushing.This is because disaggregated data was not available for the mining operations, so energy use and preparation plant area are included in the coal mining datasets.Similarly, where generic mining factors have been used in the mining datasets (e.g. for particulates and infrastructure), these are assumed to include coal preparation. No addtional water use or emissions are assumed to arise from simple coal preparation.

Reference(s):
SACRM (2011) Overview of South African Coal Value Chain. Available at: http://www.sanedi.org.za/archived/wp-content/uploads/2013/08/sacrm value chain overview.pdf (Accessed: July 2015);
DMR (2015) Mineral Production and Sales and Mining Labour Statistics Tables 1993 - 2014, Department of Mineral Resources. Available at: http://www.dmr.gov.za/ (Accessed: March 2017).
[This dataset is meant to replace the following datasets:]

## Included activities start
Coal preparation (crushing and screening), starting from hard coal, run-of mine.

## Included activities end
This activity ends with 1 kg hard coal (useable output) at the coal preparation facility. This dataset includes mining waste produced and land used for coal waste disposal, Energy use and land for the preparation plant are not included in this dataset as they are included in the mining datasets (they were not able to be disaggregated from the mining data). No water use or water emissions are attributed to the simple coal preparation process. Particulates are similarly not included because the generic value applied in the mining datasets is assumed to include coal preparation.

## Geography
Coal preparation efficiency is representative of coal mining in South Africa as a whole, with the land requirements for disposal extrapolated from colliereis mining the Witbank the Highveld coalfields in South Africa. Infrastructure requriements are generic (not South African specific).

## Technology
This dataset is representative of simple coal preparation in South Africa (crushing and screening only), with an overall efficiency of 98%.

## Time period
2014 is chosen as a base year because this is the latest year for which coal production and yield data were available (i.e. the most recent government statistics on coal mining). The industry data on which the dataset is based is somewhat earlier than 2014 (mid 2000 to 2010), but expert opinion consulted is that mining operations have not changed much over this time, thus it made sense to use the most recent production data.

## Parameters
- coal preparation efficiency: 0.98 dimensionless; name prep_efficiency
  Overall coal preparation yield of 98% applied for coal undergoing crushing and destoning. Yield applied is average value from SACRM mine data sample (range from 89%-99%)), which aligns with industry expert estimate of 96% (Prevost, 2015). Reference(s): The South African Coal Roadmap (SACRM) (2011). Overview of the South African Coal Value Chain. http://www.sanedi.org.za/archived/wp-content/uploads/2013/08/sacrm%20value%20chain%20overview.pdf; Prevost X (2015) Coal chain, 2014 http://www.fossilfuel.co.za/conferences/2015/JCMV-X/Session-1/02Xavier-Prevost.pdf

## Reference product
- hard coal: 1 kg; name hard_coal; CPC 11010: Hard coal; By-product classification allocatable product
  EcoSpold01Location=ZA
  This dataset represents the production of 1 kg of saleable coal (crushed and screened) in South Africa. Around 34% of South Africa's saleable coal has undergone simple coal preparation only (crushing and destoning) (SACRM, 2011). The crushed coal product is used almost exclusively by the domestic coal market, primarily in electricity generation and in the production of synthetic fuels and chemicals. Total production in 2014 amounted to 90 million tonnes (DMR, 2015). Reference(s): SACRM (2011) Overview of South African Coal Value Chain. Available at: http://www.sanedi.org.za/archived/wp-content/uploads/2013/08/sacrm value chain overview.pdf (Accessed: July 2015); DMR (2015) Mineral Production and Sales and Mining Labour Statistics Tables 1993 - 2014, Department of Mineral Resources. Available at: http://www.dmr.gov.za/ (Accessed: March 2017).
  production volume 8.97e10 kg; name pv_crushed_coal
    Total production of saleable coal that had undergone crushing and screening only amounted to 90 million tonnes in 2014 (total production volume from DMR, 2015, with percentage of coal undergoing crushing only, as well as crushing yield from SACRM, 2011). The crushed coal product is used almost exclusively by the domestic coal market, primarily in electricity generation and in the production of synthetic fuels and chemicals.Reference(s): SACRM (2011) Overview of South African Coal Value Chain. Available at: http://www.sanedi.org.za/archived/wp-content/uploads/2013/08/sacrm value chain overview.pdf (Accessed: July 2015); DMR (2015) Mineral Production and Sales and Mining Labour Statistics Tables 1993 - 2014, Department of Mineral Resources. Available at: http://www.dmr.gov.za/ (Accessed: March 2017).
  property heating value, net 20 MJ
    Based on the Characterization factor of Hard coal in the CED method
  property price 0.036 EUR2005; name hard_coal_price_EUR2005
    Steam coal import costs in EU in IEA key world energy statistics 2003-2004.
  property carbon content, fossil 0.47
    C content 75-94% (specified in Tab 1.1, report 6, part VI). A mean content of 0.845 kg C/ kg dry hard coal was considered
  property carbon content 0.47
    carbon content on a dry matter basis (reserved; not for manual entry)
  properties: sulfur content 1, ash content 0.29 kg, carbon content, non-fossil 0, wet mass 1 kg, dry mass 0.998 kg, water content 0.00200401, water in wet mass 0.002 kg, carbon allocation 0.46906 kg

## Inputs from technosphere
- hard coal, run-of-mine: 0.897959 kg; = (hard_coal/prep_efficiency)*0.88; lognormal variance with pedigree 0.0441, pedigree (3,2,5,1,1)
  Hard coal supply from underground mines. A coal preparation yield of 98% is applied for coal undergoing crushing and destoning (average value from SACRM mine data sample, and aligns with industry expert estimate of 96% (Prevost, 2015). Using a combination of DMR (2015) and SACMR (2011) production statistics, coal supply to simple coal preparation (crushing and destoning) is as follows: 88% from underground mining, 8% for surface, dragline, and 4% from surface, truck and shovel. Reference(s): The South African Coal Roadmap (SACRM) (2011). Overview of the South African Coal Value Chain. http://www.sanedi.org.za/archived/wp-content/uploads/2013/08/sacrm%20value%20chain%20overview.pdf; Prevost X (2015) Coal chain, 2014 http://www.fossilfuel.co.za/conferences/2015/JCMV-X/Session-1/02Xavier-Prevost.pdf
  Uncertainty: Basic variance from variation in yield in SACRM mine data sample
  properties: carbon content, fossil 0.47, heating value, net 27.91 MJ, water content 0.00200401, dry mass 0.998 kg, wet mass 1 kg
  note on heating value, net: Based on the Characterization factor of Hard coal in the CED method
- spoil from hard coal mining: -0.0204082 kg; name spoil; = (hard_coal*(hard_coal/prep_efficiency-1))*-1; lognormal variance with pedigree 0.0441, pedigree (3,2,5,1,1)
  EcoSpold01Location=GLO
  Overall coal preparation yield of 98% applied for coal undergoing crushing and destoning, resulting in 20 kg coal waste per tonne coal beneficiated. Yield applied is average value from SACRM mine data sample (range from 89%-99%)), which aligns with industry expert estimate of 96% (Prevost, 2015). Reference(s): The South African Coal Roadmap (SACRM) (2011). Overview of the South African Coal Value Chain. http://www.sanedi.org.za/archived/wp-content/uploads/2013/08/sacrm%20value%20chain%20overview.pdf; Prevost X (2015) Coal chain, 2014 http://www.fossilfuel.co.za/conferences/2015/JCMV-X/Session-1/02Xavier-Prevost.pdf
  Uncertainty: Basic variance from SACRM mine data sample
  production volume 1.83061e9 kg; = pv_crushed_coal*spoil
    Calculated from the production volume of hard coal in proportion to the respective output amounts.
  property price 0 EUR2005; name spoil_price_EUR2005
  properties: carbon content, fossil 0.007879, wet mass 1 kg, dry mass 1 kg
  note on carbon content, fossil: Composition of coal spoil is adopted by proxy from lignite spoil (pg 19, Doka G. (2009) Life Cycle Inventory of the disposal of lignite spoil, coal spoil and coal tailings. Doka Life Cycle Assessments, Zurich. Commissioned by the Swiss Centre for Life Cycle Inventories ecoinvent Centre)
- hard coal, run-of-mine: 0.0408163 kg; = (hard_coal/prep_efficiency)*0.04; lognormal variance with pedigree 0.0441, pedigree (3,2,5,1,1)
  Hard coal supply from surface truck and shovel mines. A coal preparation yield of 98% is applied for coal undergoing crushing and destoning (average value from SACRM mine data sample, and aligns with industry expert estimate of 96% (Prevost, 2015). Using a combination of DMR (2015) and SACMR (2011) production statistics, coal supply to simple coal preparation (crushing and destoning) is as follows: 88% from underground mining, 8% for surface, dragline, and 4% from surface, truck and shovel. Reference(s): The South African Coal Roadmap (SACRM) (2011). Overview of the South African Coal Value Chain. http://www.sanedi.org.za/archived/wp-content/uploads/2013/08/sacrm%20value%20chain%20overview.pdf; Prevost X (2015) Coal chain, 2014 http://www.fossilfuel.co.za/conferences/2015/JCMV-X/Session-1/02Xavier-Prevost.pdf
  Uncertainty: Basic variance from variation in yield in SACRM mine data sample
  properties: heating value, net 27.91 MJ, dry mass 0.998 kg, wet mass 1 kg, carbon content, fossil 0.47, water content 0.00200401
- hard coal, run-of-mine: 0.0816327 kg; = (hard_coal/prep_efficiency)*0.08; lognormal variance with pedigree 0.0441, pedigree (3,2,5,1,1)
  Hard coal supply from surface dragline mines. A coal preparation yield of 98% is applied for coal undergoing crushing and destoning (average value from SACRM mine data sample, and aligns with industry expert estimate of 96% (Prevost, 2015). Using a combination of DMR (2015) and SACMR (2011) production statistics, coal supply to simple coal preparation (crushing and destoning) is as follows: 88% from underground mining, 8% for surface, dragline, and 4% from surface, truck and shovel. Reference(s): The South African Coal Roadmap (SACRM) (2011). Overview of the South African Coal Value Chain. http://www.sanedi.org.za/archived/wp-content/uploads/2013/08/sacrm%20value%20chain%20overview.pdf; Prevost X (2015) Coal chain, 2014 http://www.fossilfuel.co.za/conferences/2015/JCMV-X/Session-1/02Xavier-Prevost.pdf
  Uncertainty: Basic variance from variation in yield in SACRM mine data sample
  properties: carbon content, fossil 0.47, water content 0.00200401, dry mass 0.998 kg, wet mass 1 kg, heating value, net 27.91 MJ

## Inputs from nature
- Occupation, dump site [natural resource, land]: 0.003975 m2*year; = discard_area*30*25; lognormal variance with pedigree 0.1212, pedigree (2,3,5,1,1)
  Assumes active dump area lifetime of 30 years and revegetation time of 25 years. A relatively long time is chosen as dumps present the greatest challenge to rehabilitation of coal mines.
  Uncertainty: Variance derived from data sample
- Transformation, to dump site [natural resource, land]: 5.3e-6 m2; name discard_area; lognormal variance with pedigree 0.1212, pedigree (2,3,5,1,1)
  Total land transformed for mineral extraction activities at 10 collieries in South Africa, assuming constant coal production over a 30 year mine life (industry data), with 4% of land use designated as coal and spoil disposal areas in the four coal mines in the sample with crushing and screening facilities only.
  Uncertainty: Variance derived from data sample (same value applied as occupation).
- Transformation, from grassland, natural, for livestock grazing [natural resource, land]: 5.3e-6 m2; = discard_area; lognormal variance with pedigree 0.1212, pedigree (2,3,5,1,1)
  Total land transformed for mineral extraction activities at 10 collieries in South Africa, assuming constant coal production over a 30 year mine life (industry data), with 4% of land use designated as coal and spoil disposal areas in the four coal mines in the sample with crushing and screening facilities only. Coal mines fall predominantly in the grasslands regions of South Africa, thus this is chosen as the default.
  Uncertainty: Variance derived from data sample (same value applied as occupation).

## Emissions to nature
- Methane, fossil [air, non-urban air or from high stacks]: 0.000106 kg; source DEA (RSA) 2014; lognormal variance with pedigree 0.168, pedigree (4,1,5,1,1)
  Emission factor taken from South Africa's National GHG Inventory for post-mining coal handling and storage (0.18 m3/tonne, underground mine). Emission factor is for underground coal only, with surface coal given an emission factor of 0. The emissions are therefore adjusted for the percenatge of coal undergoing crushing and destoning supplied from surface mines. Reference: Department of Environment (2014) GHG NATIONAL INVENTORY REPORT SOUTH AFRICA 2000 -2010, November 2014. http://unfccc.int/resource/docs/natc/zafnir1.pdf
- Carbon dioxide, fossil [air, non-urban air or from high stacks]: 3.11e-5 kg; source DEA (RSA) 2014; lognormal variance with pedigree 0.168, pedigree (4,1,5,1,1)
  Emission factor for low temperature oxidation of coal taken from South Africa's National GHG Inventory for post-mining coal handling and storage (0.18 m3/tonne, underground mine). Emission factor is for underground coal only, with surface coal given an emission factor of 0. The emissions are therefore adjusted for the percenatge of coal undergoing crushing and destoning supplied from surface mines. Reference: Department of Environment (2014) GHG NATIONAL INVENTORY REPORT SOUTH AFRICA 2000 -2010, November 2014. http://unfccc.int/resource/docs/natc/zafnir1.pdf

## Sampling procedure
Production volume is from DMR (2015), with the percentage of coal undergoing crushing and the coal preparation efficiency from SACRM (2011). Methane emissions are calculated using post-mining emission factors derived for South Africa's national GHG reporting (DEA, 2014). Land use for dump areas are from three mines with crushing plants only. References: Department of Minerals and Resources (2015) South Africa's Mineral Industry (SAMI) 2014/2015. Pretoria; DEA (2014) GHG NATIONAL INVENTORY REPORT SOUTH AFRICA 2000 -2010, November 2014. http://unfccc.int/resource/docs/natc/zafnir1.pdf (accessed September 2017); Pulles, W., Boer, R. & Nel, S. 2001. A Generic Water Balance for the South African Coal Mining Industry. Water
Research Commission Report No. 801/1/01; SACRM (2011) Overview of South African Coal Value Chain. Available at: http://www.sanedi.org.za/archived/wp-content/uploads/2013/08/sacrm value chain overview.pdf (Accessed: July 2015).

## Extrapolations
This dataset has been extrapolated from year 2014 to the year of the calculation (2021). The uncertainty has been adjusted accordingly.

## Review by Christian Bauer 2017-11-23
passed
