# cathode production, NMC111, for Li-ion battery

Dataset: EcoSpold 2, unit process
Geography: RoW
Time period: 2017-01-01 to 2021-12-31
Technology level: current
Classification: ISIC rev.4 ecoinvent: 2720:Manufacture of batteries and accumulators
Synonyms: nickel-manganese-cobalt 111 cathode
Scenario: Business-as-Usual
System model: Allocation, cut-off by classification
Generated by: Eleonora Crenna
Published in: Dai, Q. 2019
Database: ecoinvent
isCopyrightProtected: true
accessRestrictedTo: 1

## General comment
This dataset represents the production of 1 kg nickel-manganese-cobalt (NMC) cathode for Li-ion batteries, with nickel manganese and cobalt in ratio 1:1:1 (NMC111). Data are based on literature and expert judgement. For infrastructure, the ecoinvent dataset "chemical factory, organics" is accounted. This dataset is a copy of the corresponding regional dataset. Production volume was adjusted.

## Included activities start
The activity starts when NMC111 oxide and other materials enter the process at the factory.

## Included activities end
The activity ends with the production of NMC111 cathode at factory gate.

## Geography
This dataset is considered representative of the global situation. It is based on data from the geography China, which is the leader country of Li-ion battery material production.

## Technology
The positive electrode is made of a transition metal oxide (Li-NMC oxide), a conductive additive (carbon black) and a polymer binder (polyvinylidene fluoride, PVDF) mixed in ratio 95:2.5:2.5. The solvent N-methyl-2-pyrrolidone (NMP) is used to prepare the cathode slurry. The input materials are mixed to form a slurry, then the mixture is dried with the solvent evaporating away, cut and calendered to form the cathode of a Li-ion battery. The energy required to coat the aluminium conductor foil with the cathode slurry is included in this dataset, because it was not possible to separate it from the energy required for the drying step.

## Time period
The time period is from 2017 (year of the publication of data) and 2020 (year of the dataset)

## Reference product
- cathode, NMC111, for Li-ion battery: 1 kg; By-product classification allocatable product; CPC 46430: Parts of primary cells, primary batteries and electric accumulators (including separators); CAS 346417-97-8
  production volume 6.74847e7 kg
    The PV is expressed in kg. According to UN Comtrade (https://comtrade.un.org/data/, HS code: 850760) 1317479226 kg Li-ion batteries were traded worldwide in 2019. Approximately 20% are NMC111 Li-ion batteries (Benchmark Mineral Intelligence, 2019. The Current Position of Li-ion Raw Material Supply and the Role of Recycling). NMC111 cathode represents approximately 30% weight of a battery pack
  property price 18.8728 EUR2005
    Calculated based on inputs: The price of the product has been calculated as a sum of the values of the material and energy inputs for this product. This value is therefore a rough estimation. It may underestimate the real price since there are additional expenses when producing any product. These expences can include for example labour costs, treatment of waste materials and profit for the producer. Please consider carefully whether this level of data quality is acceptable for your application.
  property carbon content 0.0342935
    carbon content on a dry matter basis (reserved; not for manual entry)
  properties: dry mass 1 kg, carbon content, fossil 0.0342935, water in wet mass 0 kg, water content 0, carbon content, non-fossil 0, wet mass 1 kg, carbon allocation 0.0342935 kg

## Inputs from technosphere
- carbon black: 0.025 kg; lognormal variance with pedigree 0.006, pedigree (3,3,2,5,2)
  Based on literature and expert judgement. NMC oxide, carbon black and the binder are mixed in a ratio 95:2.5:2.5.
  properties: dry mass 1 kg, wet mass 1 kg, heating value, net 25.76 MJ, carbon content, fossil 0.85
- NMC111 oxide: 0.95 kg; lognormal variance with pedigree 0.006, pedigree (3,3,2,5,2)
  (same comment as for carbon black)
  property dry mass 1 kg; name RefProd_DM
  property wet mass 1 kg; name RefProd_WM
  property water content 0; name RefProd_water_content
  property carbon content, non-fossil 0; name RefProd_C_content_non_fossil
  property water in wet mass 0 kg; name RefProd_WWM
  property carbon content, fossil 0; name RefProd_C_content_fossil
- chemical factory, organics: 4e-10 unit; lognormal variance with pedigree 0.36, pedigree (5,5,3,5,3)
  Calculated based on literature data published by the industry. For this activity, no information was readily available concerning infrastructure and land-use. Therefore, the infrastructure is estimated based on data from two chemical factories, the BASF site of Ludwigshafen and the chemical factory in Gendorf (which are both located in Germany), which produce a wide range of chemical substances. Based on this data, the following assumptions are made: the built area amounts to about 4.2 ha, the plant has an average output of 50'000 t/a and a lifespan of fifty years. The estimated infrastructure amount is therefore 4.00 E-10 units per kg of produced chemical.
  References:
  Althaus H.-J., Chudacoff M., Hischier R., Jungbluth N., Osses M. and Primas A. (2007) Life Cycle Inventories of Chemicals. ecoinvent report No. 8, v2.0. EMPA Dübendorf, Swiss Centre for Life Cycle Inventories, Dübendorf, CH.
  Gendorf (2000) Umwelterklärung 2000, Werk Gendorf. Werk Gendorf, Burgkirchen.om ecoinvent)
- heat, district or industrial, natural gas: 0 MJ; pedigree (1,1,1,1,1)
  Literature. Original value of 56-71 MJ/kWh cell taken from Dai et al. (2017), representing the energy demand for electrode drying & NMP recovery. It refers to 43Ah, 3.7 V NMC cells. This value is calculated considering the average energy demand, the storage capacity per NMC111 cell (0.167 kWh/cell according to Dai et al., 2019) and the share of cathode in the cell.
  Reference:
  Dai et al. (2017). Update of Life Cycle Analysis of Lithium-Ion Batteries in the GREET Model. ArgonneNational Laboratory.
  Dai et al. (2019). Life cycle analysis of lithium-ion batteries for automotive applications. Batteries, 5(2), 48.
  properties: heating value, net 1 MJ
- electricity, medium voltage: 0 kWh; pedigree (1,1,1,1,1)
  Calculated value based on Pettinger & Dong (2016). Specifically, this value results from summing the energy demand for cathode slurry preparation with NMP-based solvent, slitting and calendaring, in terms of kWh electricity per cell (0.331 kWh/cell). Original value refers to a 40 Ah, 3.7 V generic Li-ion battery. The specific energy capacity of NMC cell is 0.197 kWh/kg cell (Dai et al. 2019)
  Reference:
  Pettinger, K. H., & Dong, W. (2016). When does the operation of a battery become environmentally positive?. Journal of The Electrochemical Society, 164(1), A6274.
  Dai, Q., Kelly, J. C., Gaines, L., & Wang, M. (2019). Life cycle analysis of lithium-ion batteries for automotive applications. Batteries, 5(2), 48.
- polyvinylfluoride: 0.025 kg; lognormal variance with pedigree 0.006, pedigree (3,3,2,5,2)
  Based on literature and expert judgement. NMC oxide, carbon black and the binder are mixed in a ratio 95:2.5:2.5. PVF is used as a proxy for PVDF (binder)
  properties: heating value, net 23.7 MJ, dry mass 1 kg, wet mass 1 kg, carbon content, fossil 0.521739
- N-methyl-2-pyrrolidone: 0.0056 kg; name solvent_input; = 0.28*0.02; lognormal variance with pedigree 0.006, pedigree (2,4,2,5,2)
  Based on literature. NMP is used as a solvent in the production of NMC cathode. Approximately 98% NMP is recovered via evaporation for re-use in the production of cathode material (Emilson, E., & Dahllöf, L., 2019. Lithium‐Ion Vehicle Battery Production. IVL Technical Report).
  Reference:
  Cloutier, Julie, 2015. Est-ce que le stockage d’énergie au Québec pourrait être avantageux d’un point de vue environnemental? Analyse du cycle de vie attributionnelle et conséquentielle. MSc. Env. Dissertation, University of Sherbrooke. Available at: https://www.usherbrooke.ca/environnement/fileadmin/sites/environnement/documents/Essais_2015/Cloutier_Julie_MEnv_2015.pdf
  properties: wet mass 1 kg, dry mass 1 kg, carbon content, fossil 0.585366, heating value, net 29.36 MJ
- heat, district or industrial, natural gas: 1.03533, 24.8293 MJ (2 entries); lognormal variance with pedigree 0.006, pedigree (3,3,2,5,2)
  (same comment as for heat, district or industrial, natural gas)
- electricity, medium voltage: 0.00851272, 0.00163237, 0.0374819, 0.0274041, 0.12634, 0.0561785, 0.183038 kWh (7 entries); lognormal variance with pedigree 0.0152, pedigree (3,3,3,5,3)
  (same comment as for electricity, medium voltage)

## Emissions to nature
- N-methyl-2-pyrrolidone [air, unspecified]: 0.0056 kg; = solvent_input; lognormal variance with pedigree 0.0454, pedigree (2,4,2,5,2)
  Calculated value to obtain mass balance.

## Sampling procedure
From Literature and expert judgement.

## Extrapolations
The dataset is extrapolated from CN data; the uncertainty has been adjusted accordingly.
