# inverter production, 2.5kW

Dataset: EcoSpold 2, unit process
Geography: RER
Time period: 2004-01-01 to 2021-12-31
Technology level: current
Classification: EcoSpold01Categories: photovoltaic/production of components
Classification: ISIC rev.4 ecoinvent: 2790:Manufacture of other electrical equipment
Synonyms: inverse rectifier
Tags: ConvertedDataset
Scenario: Business-as-Usual
System model: Allocation, cut-off by classification
Generated by: Matthias Tuchschmid (obsolete)
Published in: Jungbluth, N. 2007
Database: ecoinvent
isCopyrightProtected: true
accessRestrictedTo: 1

## General comment
Production of an inverter (2500W) with an efficiency of 93.5% (total efficiency factor which includes MPP-Tracking) for photovoltaic plant. Total weight about 18.5 kg.
[This dataset was already contained in the ecoinvent database version 2. It was not individually updated during the transfer to ecoinvent version 3. Life Cycle Impact Assessment results may still have changed, as they are affected by changes in the supply chain, i.e. in other datasets. This dataset was generated following the ecoinvent quality guidelines for version 2. It may have been subject to central changes described in the ecoinvent version 3 change report (http://www.ecoinvent.org/database/ecoinvent-version-3/reports-of-changes/), and the results of the central updates were reviewed extensively. The changes added e.g. consistent water flows and other information throughout the database. The documentation of this dataset can be found in the ecoinvent reports of version 2, which are still available via the ecoinvent website. The change report linked above covers all central changes that were made during the conversion process.]

## Included activities end
Materials, packaging and electricity use for the production of an inverse rectifier. Disposal of the product after use.

## Geography
Production in RER.

## Technology
Inverter for a photovoltaic grid-connected system with a capacity of 2.5kWp.

## Reference product
- inverter, 2.5kW: 1 unit; CPC 4717: Parts for the goods of classes 4711, 4712 and 4714 to 4716; By-product classification allocatable product
  EcoSpold01Location=RER
  production volume 1.32237 unit
    This is a placeholder value that does not reflect real-world production volumes. This dataset does not currently require a real-world production volume to work in the database framework, and no actual data were collected yet. This has no negative effect on the results of the ecoinvent database. The placeholder value of this activity was scaled according to the nominal GDP of 2005 (source: United Nations, http://data.un.org/Glossary.aspx?q=GDP+%28current+US%24%29, accessed 20130726) to reflect an appropriate share of the global production volume, which is also a placeholder value.
  property price 111.693 EUR2005
    Calculated based on inputs: The price of the product has been calculated as a sum of the values of the material and energy inputs for this product. This value is therefore a rough estimation. It may underestimate the real price since there are additional expenses when producing any product. These expences can include for example labour costs, treatment of waste materials and profit for the producer. Please consider carefully whether this level of data quality is acceptable for your application.

## By-products
- waste paperboard, unsorted: 0 kg; By-product classification Recyclable; CPC 39240: Waste and scrap of paper or paperboard; pedigree (1,1,1,1,1)
  Calculation, different geographical location
  EcoSpold01Location=CH
  Uncertainty: Calculation, different geographical location
  production volume 0 kg
    Calculated from the production volume of inverter, 2.5kW in proportion to the respective output amounts.
  property price 0.03924 EUR2005
    Temporary price data. Calculated as 90% of purchasers price based on: Assumed to be 10% less than for sorted waste paperboard
  property carbon content, non-fossil 0.483259
    C content was calculated for 1 kg DM, using data in Tab A.3, ecoinvent v2.2 report 13_I.
  property carbon content 0.483259
    carbon content on a dry matter basis (reserved; not for manual entry)
  properties: water in wet mass 0.196 kg, water content 0.243781, wet mass 1 kg, dry mass 0.804 kg, carbon content, fossil 0, heating value, net 15.92 MJ, carbon allocation 0.38854 kg

## Inputs from technosphere
- electric connector, wire clamp: 0.237 kg; lognormal variance with pedigree 0.0512, pedigree (2,3,5,1,1)
  EcoSpold01Location=GLO
  Literature (de Wild 2006), Calculation
  Uncertainty: Literature (de Wild 2006), Calculation
  properties: wet mass 1 kg, carbon content, fossil 0.19653, dry mass 1 kg
  note on carbon content, fossil: Calculated as the addition of C contents in the product composition
- sheet rolling, steel: 9.8 kg; lognormal variance with pedigree 0.0512, pedigree (2,3,5,1,1)
  EcoSpold01Location=RER
  Literature (de Wild 2006)
  Uncertainty: Literature (de Wild 2006)
- aluminium, cast alloy: 1.4 kg; lognormal variance with pedigree 0.0512, pedigree (2,3,5,1,1)
  EcoSpold01Location=RER
  Literature (de Wild 2006), recycled after use
  Uncertainty: Literature (de Wild 2006), recycled after use
  properties: wet mass 1 kg, dry mass 1 kg
- printed wiring board, for through-hole mounting, Pb containing surface: 0.1123 m2; = 0.2246*0.5; lognormal variance with pedigree 0.0512, pedigree (2,3,5,1,1)
  Literature (de Wild 2006), Calculation
  This original value from production mix has been replaced by 2 flows. Each has 50% share in the production mix.
  Uncertainty: Literature (de Wild 2006), Calculation
  property wet mass 3.08 kg; name WM
  property water content 0; name water_content
  property dry mass 3.08 kg; name DM
  property water in wet mass 0 kg; name WWM
  property carbon content, fossil 0.203154; name C_content_fossil
  property carbon content, non-fossil 0; name C_content_non_fossil
- polystyrene foam slab: 0.3 kg; lognormal variance with pedigree 0.0612, pedigree (2,3,5,1,1)
  Literature (Schwarz 1992)
  EcoSpold01Location=RER
  Uncertainty: Literature (Schwarz 1992)
  properties: heating value, net 38.67 MJ, wet mass 1 kg, carbon content, fossil 0.859091, dry mass 1 kg
  note on carbon content, fossil: XPS consists in 91% of polystyrene, 7% of blowing agent and the re-maining 2% are flame retardants (bromine compounds) and other additives (ecoinvent v2.2 report 7, part XIV, pg69). The chemical formula of polystyrene is (C8H8)n. Here, the blowing agent is CO2.
- capacitor, film type, for through-hole mounting: 0.341 kg; lognormal variance with pedigree 0.0512, pedigree (2,3,5,1,1)
  Literature (de Wild 2006), Calculation
  EcoSpold01Location=GLO
  Uncertainty: Literature (de Wild 2006), Calculation
  properties: carbon content, fossil 0.278876, wet mass 1 kg, dry mass 1 kg
  note on carbon content, fossil: Calculated as the addition of C contents in the product composition, and referred to 1 kg capacitors, and then to 1 kg DM
- waste polystyrene: -0.31 kg; lognormal variance with pedigree 0.0532, pedigree (2,3,5,5,1)
  (same comment as for waste paperboard, unsorted)
  production volume 0.31 kg
    (same comment as for waste paperboard, unsorted)
  properties: carbon content, fossil 0.922579, dry mass 0.998 kg, wet mass 1 kg, water content 0.00200401, heating value, net 38.67 MJ
  note on heating value, net: Value taken from the general comment of the treatment dataset.
- printed wiring board, for through-hole mounting, Pb free surface: 0.1123 m2; = 0.2246*0.5; lognormal variance with pedigree 0.0512, pedigree (2,3,5,1,1)
  (same comment as for printed wiring board, for through-hole mounting, Pb containing surface)
  properties: dry mass 3.08 kg, carbon content, fossil 0.210221, wet mass 3.08 kg
- transistor, wired, small size, through-hole mounting: 0.038 kg; lognormal variance with pedigree 0.0512, pedigree (2,3,5,1,1)
  (same comment as for capacitor, film type, for through-hole mounting)
  properties: wet mass 1 kg, dry mass 1 kg, carbon content, fossil 0.080338
  note on carbon content, fossil: Calculated as the addition of C contents in the product composition, and referred to 1 kg DM transistor.
- inductor, ring core choke type: 0.351 kg; lognormal variance with pedigree 0.0512, pedigree (2,3,5,1,1)
  (same comment as for electric connector, wire clamp)
  properties: wet mass 1 kg, dry mass 1 kg, carbon content, fossil 0.445934
  note on carbon content, fossil: Calculated as the addition of C contents in the product composition, and referred to 1 kg DM inductor
- diode, glass-, for through-hole mounting: 0.047 kg; lognormal variance with pedigree 0.0512, pedigree (2,3,5,1,1)
  (same comment as for capacitor, film type, for through-hole mounting)
  properties: wet mass 1 kg, dry mass 1 kg, carbon content, fossil 0.0203273
- metal working factory: 8.9722e-9 unit; lognormal variance with pedigree 0.3526, pedigree (2,4,5,1,1)
  Calculation, based on annual production of electronic component production plant
  EcoSpold01Location=RER
  Uncertainty: Calculation, based on annual production of electronic component production plant
- fleece, polyethylene: 0.06 kg; lognormal variance with pedigree 0.0612, pedigree (2,3,5,1,1)
  EcoSpold01Location=RER
  Literature (Schwarz 1992)
  Uncertainty: Literature (Schwarz 1992)
  properties: wet mass 1 kg, carbon content, fossil 0.857143, dry mass 1 kg, heating value, net 42.47 MJ
  note on carbon content, fossil: Polyethylene is formed out of a huge amount of ethylene monomers (C2H4) (ecoinvent v2.2 report 11_II). MW=28 g/mol
- resistor, metal film type, through-hole mounting: 0.005 kg; lognormal variance with pedigree 0.0512, pedigree (2,3,5,1,1)
  (same comment as for capacitor, film type, for through-hole mounting)
  properties: dry mass 1 kg, carbon content, fossil 0.029003, wet mass 1 kg
  note on carbon content, fossil: Calculated as the addition of C contents in the product composition, and referred to 1 kg DM resistor.
- electricity, medium voltage: 21.2 kWh; lognormal variance with pedigree 0.0612, pedigree (2,3,5,1,1)
  EcoSpold01Location=UCTE
  Literature (Schwarz 1992)
  Uncertainty: Literature (Schwarz 1992)
- used printed wiring boards: -1.7028 kg; lognormal variance with pedigree 0.0532, pedigree (2,3,5,5,1)
  EcoSpold01Location=GLO
  Calculation, different geographical location
  Uncertainty: Calculation, different geographical location
  production volume 1.7028 kg
    (same comment as for waste paperboard, unsorted)
  properties: carbon content, fossil 0.193742, wet mass 1 kg, dry mass 1 kg, carbon content, non-fossil 0.000960142
  note on carbon content, fossil: Composition of printed wiring boards used to calculate C content
- steel, low-alloyed, hot rolled: 9.8 kg; lognormal variance with pedigree 0.0512, pedigree (2,3,5,1,1)
  Literature (de Wild 2006), recycled after use
  EcoSpold01Location=RER
  Uncertainty: Literature (de Wild 2006), recycled after use
  properties: dry mass 1 kg, carbon content, fossil 0.005, wet mass 1 kg
  note on carbon content, fossil: Low alloyed steel composition given in Tab. 3.2 ecoinvent v2.2 report 10_partII. Steel assumed to have a C content of 0.5%
- section bar extrusion, aluminium: 1.4 kg; lognormal variance with pedigree 0.0512, pedigree (2,3,5,1,1)
  EcoSpold01Location=RER
  Literature (de Wild 2006)
  Uncertainty: Literature (de Wild 2006)
- polyvinylchloride, suspension polymerised: 0.00111363 kg; lognormal variance with pedigree 0.0512, pedigree (2,3,5,1,1)
  Literature (de Wild 2006)
  EcoSpold01Location=RER
  Uncertainty: Literature (de Wild 2006)
  properties: carbon content, fossil 0.387097, wet mass 1 kg, dry mass 1 kg, heating value, net 21.5 MJ
  note on carbon content, fossil: Monomer is vynyl chloride, C2H3Cl (ecoinvent v2.2 report 11_II). MW=62 g/mol
- styrene-acrylonitrile copolymer: 0.01 kg; lognormal variance with pedigree 0.0512, pedigree (2,3,5,1,1)
  EcoSpold01Location=RER
  Literature (de Wild 2006)
  Uncertainty: Literature (de Wild 2006)
  properties: heating value, net 32.54 MJ, dry mass 1 kg, wet mass 1 kg, carbon content, fossil 0.856023
  note on carbon content, fossil: SAN is the abbreviation originating from its monomers styrene (C8H8) and acrylonitrile (C3H3N). The acrylonitrile content in SAN goes from 20 to 35 wt% (ecoinvent v2.2 report 11_II), an average content of 27.5% was considered. MW styrene =104 g/mol, MW acrylonitrile=53 g/mol
- copper, cathode: 5.51 kg; lognormal variance with pedigree 0.0512, pedigree (2,3,5,1,1)
  (same comment as for steel, low-alloyed, hot rolled)
  properties: wet mass 1 kg, dry mass 1 kg
- capacitor, tantalum-, for through-hole mounting: 0.023 kg; lognormal variance with pedigree 0.0512, pedigree (2,3,5,1,1)
  EcoSpold01Location=GLO
  Literature (de Wild 2006), Assumption for Ceramic Multilayer Chip Capacitors
  Uncertainty: Literature (de Wild 2006), Assumption for Ceramic Multilayer Chip Capacitors
  properties: carbon content, fossil 0.181224, dry mass 1 kg, wet mass 1 kg
- corrugated board box: 2.5 kg; lognormal variance with pedigree 0.0526, pedigree (2,4,5,1,1)
  EcoSpold01Location=RER
  Calculation, based on estimated dimension of inverse rectifier
  Uncertainty: Calculation, based on estimated dimension of inverse rectifier
  properties: dry mass 0.945 kg, heating value, net 12.86 MJ, water content 0.0582011, carbon content, non-fossil 0.432275, wet mass 1 kg, carbon content, fossil 0.000656085
  note on carbon content, non-fossil: Biogenic C content was calculated after biogenic C contents of chemicals used in the production of board (Tab 10.15 & 10.16, ecoinvent v2.2 report 11_III, part 10).
  note on carbon content, fossil: Fossil C content was calculated after fossil C contents of chemicals used in the production of board (Tab 10-15 & 10.16 ecoinvent v2.2 report 11_III, part 10)
- wire drawing, copper: 5.51 kg; lognormal variance with pedigree 0.0512, pedigree (2,3,5,1,1)
  Literature (de Wild 2006)
  EcoSpold01Location=RER
  Uncertainty: Literature (de Wild 2006)
- waste polyethylene: -0.06 kg; lognormal variance with pedigree 0.0532, pedigree (2,3,5,5,1)
  (same comment as for waste paperboard, unsorted)
  production volume 0.06 kg
    (same comment as for waste paperboard, unsorted)
  properties: carbon content, fossil 0.825301, heating value, net 42.47 MJ, dry mass 0.996 kg, wet mass 1 kg, water content 0.00401606
  note on carbon content, fossil: C content in 1 kg DM was calculated using data in Tab A.1, ecoinvent v2.2 report 13_I
- integrated circuit, logic type: 0.028 kg; lognormal variance with pedigree 0.0512, pedigree (2,3,5,1,1)
  (same comment as for electric connector, wire clamp)
  properties: carbon content, fossil 0.221701, wet mass 1 kg, dry mass 1 kg
- capacitor, electrolyte type, > 2cm height: 0.256 kg; lognormal variance with pedigree 0.0512, pedigree (2,3,5,1,1)
  (same comment as for capacitor, film type, for through-hole mounting)
  properties: carbon content, non-fossil 0.0349727, carbon content, fossil 0.16971, wet mass 1 kg, dry mass 1 kg
- waste paperboard, unsorted: -2.5 kg; lognormal variance with pedigree 0.0532, pedigree (2,3,5,5,1)
  (same comment as for waste paperboard, unsorted)
  production volume 2.5 kg
  properties: price 0.03924 EUR2005, water content 0.243781, wet mass 1 kg, dry mass 0.804 kg, carbon content, non-fossil 0.483259, heating value, net 15.92 MJ
  note on carbon content, non-fossil: C content was calculated for 1 kg DM, using data in Tab A.3, ecoinvent v2.2 report 13_I.

## Sampling procedure
Detailed analysis of materials for one product

## Extrapolations
This dataset has been extrapolated from year 2006 to the year of the calculation (2021). The uncertainty has been adjusted accordingly.

## Review by Christian Bauer 2009-02-15
passed
none
