# treatment of waste polyethylene terephthalate, for recycling, unsorted, sorting

Dataset: EcoSpold 2, unit process
Geography: CH
Time period: 2014-01-01 to 2021-12-31
Technology level: current
Classification: ISIC rev.4 ecoinvent: 3811:Collection of non-hazardous waste
Scenario: Business-as-Usual
System model: Allocation, cut-off by classification
Generated by: Thomas Kägi
Published in: Kägi T. 2017
Database: ecoinvent
isCopyrightProtected: true
accessRestrictedTo: 1

## General comment
The functional unit represents the treatment of unsorted waste polyethylene terephthalate, for recycling, yielding 1 kg of sorted waste polyethylene terephthalate, for recycling.
The collected PET bottles are sorted by colours in one of five sorting centres in Switzerland and compressed to 200 to 300 kg heavy bales for further processing. Foreign substances are sorted out and disposed of. Data were derived from involved sorting facilities (confidential).
For further information see Kägi et al. (2017). Life Cycle Inventories for Swiss Recycling Processes - Part Carbotech: Recycling of Cardboard, Glass, PE, PET, Tinplate

## Included activities start
Service is starting with the receipt of unsorted waste PET

## Included activities end
This module includes all processes of the sorting of waste PET up to the factory gate. Machinery infrastructure is excluded

## Allocation
no allocation involved

## Reference product
- waste polyethylene terephthalate, for recycling, unsorted: 0 kg; CPC 39270: Waste, parings and scrap of plastics; By-product classification Recyclable
  production volume 0 kg; name RP_PV
    40'000 t of waste PET recycled per year in Switzerland; waste input material (for treatment) scaled up accordingly
  property price 0.0315 EUR2005
    Convert from EU 27 price to the world by currency exchange rate.
  property carbon content 0.601
    carbon content on a dry matter basis (reserved; not for manual entry)
  properties: carbon content, fossil 0.601, dry mass 0.968 kg, wet mass 1 kg, carbon content, non-fossil 0, water in wet mass 0.032 kg, water content 0.0330579, heating value, net 22.95 MJ, carbon allocation 0.581768 kg
- waste polyethylene terephthalate, for recycling, sorted: 1 kg; name BP_waste_PET; CPC 39270: Waste, parings and scrap of plastics; By-product classification Recyclable; pedigree (1,1,1,1,1)
  production volume 4.86e7 kg; = ABS(BP_waste_PET/RP_amount*RP_PV)
  properties: wet mass 1 kg, water content 0.0141988, dry mass 0.986 kg, water in wet mass 0.014 kg, carbon content, non-fossil 0, carbon content, fossil 0.624, price 0.035 EUR2005, heating value, net 22.95 MJ, carbon content 0.624, carbon allocation 0.615264 kg

## By-products
- waste polyethylene terephthalate, for recycling, sorted: 0 kg; CPC 39270: Waste, parings and scrap of plastics; By-product classification Recyclable; pedigree (1,1,1,1,1)
  production volume 0 kg; = ABS(BP_waste_PET/RP_amount*RP_PV)
    (same comment as for waste polyethylene terephthalate, for recycling, unsorted)
  property price 0.035 EUR2005
    Convert from EU 27 price to the world by currency exchange rate.
  property carbon content 0.624
    carbon content on a dry matter basis (reserved; not for manual entry)
  properties: wet mass 1 kg, water content 0.0141988, dry mass 0.986 kg, water in wet mass 0.014 kg, carbon content, non-fossil 0, carbon content, fossil 0.624, heating value, net 22.95 MJ, carbon allocation 0.615264 kg
- iron scrap, unsorted: 0 kg; name BP_scrap_steel; CPC 39310: Slag, dross, scalings and other waste from the manufacture of iron or steel; By-product classification Recyclable; pedigree (1,1,1,1,1)
  The amount and annual production volume for the recyclable by-product output 'iron scrap, sorted' was set to 0 during the review of the database for the release of v3.4. This is a temporary solution to ensure the appropriate point of cut-off for this product within the database. Original amount: 0.00610286837513631
  production volume 0 kg; = ABS(BP_scrap_steel/RP_amount*RP_PV)
    (same comment as for waste polyethylene terephthalate, for recycling, unsorted)
  property price 0.149 EUR2005
    Temporary price data. Calculated as 90% of purchasers price based on: estimated at 85% of sorted scrap
  property carbon content 0
    carbon content on a dry matter basis (reserved; not for manual entry)
  properties: carbon content, fossil 0, wet mass 1 kg, water content 0, carbon content, non-fossil 0, dry mass 1 kg, water in wet mass 0 kg, carbon allocation 0 kg

## Inputs from technosphere
- waste preparation facility: 2.18103e-9 unit; lognormal variance with pedigree 0.2006, pedigree (5,1,5,1,5)
  activityLink introduced to establish a direct link to the corresponding regional supply of this product
  properties: lifetime capacity [kg] 5e8 kg, lifetime 50 year
- steel, low-alloyed: 0.00610287 kg; lognormal variance with pedigree 0.0026, pedigree (1,1,3,1,1)
  properties: dry mass 1 kg, wet mass 1 kg, carbon content, fossil 0.005
- electricity, low voltage: 0.0475223 kWh; lognormal variance with pedigree 0.0026, pedigree (1,1,3,1,1)
- diesel, burned in building machine: 0.116415 MJ; lognormal variance with pedigree 0.0426, pedigree (1,1,3,1,4)
  properties: heating value, net 1 MJ
- wire drawing, steel: 0.00610287 kg; lognormal variance with pedigree 0.010625, pedigree (1,5,3,2,1)
  (same comment as for waste preparation facility)
- heat, central or small-scale, other than natural gas: 0.0264124 MJ; lognormal variance with pedigree 0.0107, pedigree (1,2,3,1,3)
  properties: heating value, net 1 MJ
- municipal solid waste: -0.0905 kg; name BP_MSW; lognormal variance with pedigree 0.0026, pedigree (1,1,3,1,1)
  production volume 4.3983e6 kg; = ABS(BP_MSW/RP_amount*RP_PV)
    (same comment as for waste polyethylene terephthalate, for recycling, unsorted)
  property price 0 EUR2005; name BP_MSW_price_EUR2005
  properties: water content 0.297017, carbon content, non-fossil 0.261655, wet mass 1 kg, dry mass 0.771 kg, heating value, net 11.74 MJ, carbon content, fossil 0.171549
  note on carbon content, non-fossil: MSW composition in tab 4.1, ecoinvent v2.2 report 13_I. C content referred to 1 kg DM
  note on heating value, net: Value taken from the general comment of the treatment dataset.
- waste polyethylene terephthalate, for recycling, unsorted: 1.0905 kg
  production volume 5.29983e7 kg
  properties: carbon content, fossil 0.601, dry mass 0.968 kg, price 0.0315 EUR2005, wet mass 1 kg, water content 0.0330579, heating value, net 22.95 MJ

## Sampling procedure
Uncertainty estimation according to the pedigree matrix

## Extrapolations
This dataset has been extrapolated from year 2014 to the year of the calculation (2021). The uncertainty has been adjusted accordingly.
