# treatment of used bus

Dataset: EcoSpold 2, unit process
Geography: RoW
Time period: 1990-01-01 to 2021-12-31
Technology level: current
Classification: EcoSpold01Categories: transport systems/road
Classification: ISIC rev.4 ecoinvent: 3830:Materials recovery
Tags: ConvertedDataset; Treatment
Scenario: Business-as-Usual
System model: Allocation, cut-off by classification
Generated by: Michael Spielmann (obsolete)
Published in: Spielmann M. 2004
Database: ecoinvent
isCopyrightProtected: true
accessRestrictedTo: 1

## General comment
For the disposal of steel aluminium and cooper a cut off allocation is applied.
[This dataset was already contained in the ecoinvent database version 2. It was not individually updated during the transfer to ecoinvent version 3. Life Cycle Impact Assessment results may still have changed, as they are affected by changes in the supply chain, i.e. in other datasets. This dataset was generated following the ecoinvent quality guidelines for version 2. It may have been subject to central changes described in the ecoinvent version 3 change report (http://www.ecoinvent.org/database/ecoinvent-version-3/reports-of-changes/), and the results of the central updates were reviewed extensively. The changes added e.g. consistent water flows and other information throughout the database. The documentation of this dataset can be found in the ecoinvent reports of version 2, which are still available via the ecoinvent website. The change report linked above covers all central changes that were made during the conversion process.]

## Included activities end
The inventory includes disposal processes for bulk materials. For the disposal of tyres a cut off allocation is applied. However, the transportation of tyres to the cement works is taken into account

## Geography
Data represent Swiss conditions

## Technology
no technologies are specified

## Time period
Data represents conditions of the 1990ties

## Reference product
- used bus: -1 unit; CPC 39990: Other wastes n.e.c.; By-product classification Waste
  EcoSpold01Location=CH
  production volume 3.96633 unit
    This is a placeholder value that does not reflect real-world production volumes. This dataset does not currently require a real-world production volume to work in the database framework, and no actual data were collected yet. This has no negative effect on the results of the ecoinvent database.
  property price 0 EUR2005
    Waste products are assigned a price of zero as they are assumed to require further treatment.
  property carbon content, non-fossil 0.000544443
    Calculated from C content in input materials in the infrastructure
  property carbon content, fossil 0.094343
    Calculated from C content in input materials in the infrastructure
  property carbon content 0.0948874
    carbon content on a dry matter basis (reserved; not for manual entry)
  properties: dry mass 11000 kg, water in wet mass 0 kg, water content 0, wet mass 11000 kg, carbon allocation 1043.76 kg

## Inputs from technosphere
- waste emulsion paint: 0 kg; pedigree (1,1,1,1,1)
  Data is derived from material composition of a bus
  EcoSpold01Location=CH
  Uncertainty: Data is derived from material composition of a bus
  production volume 0 kg
    Calculated from the production volume of used bus in proportion to the respective output amounts.
  properties: heating value, net 8.18 MJ, carbon content, fossil 0.27, wet mass 1 kg, dry mass 1 kg
  note on carbon content, fossil: Tab A.4, ecoinvent v2.2 report 13_I. C content has been calculated after data in the tables, and then referred to 1 kg DM
- waste mineral oil: 0 kg; pedigree (1,1,1,1,1)
  (same comment as for waste emulsion paint)
  production volume 0 kg
    (same comment as for waste emulsion paint)
  properties: water content 0.111111, dry mass 0.9 kg, carbon content, fossil 0.864444, wet mass 1 kg, heating value, net 34.7 MJ
  note on carbon content, fossil: Tab A.6, ecoinvent v2.2 report 13_I. C content has been calculated after data in the tables, and then referred to 1 kg DM
  note on heating value, net: Value taken from the general comment of the treatment dataset.
- waste glass: 0 kg; pedigree (1,1,1,1,1)
  (same comment as for waste emulsion paint)
  production volume 0 kg
    (same comment as for waste emulsion paint)
  properties: wet mass 1 kg, dry mass 1 kg, heating value, net 0.05 MJ
  note on heating value, net: Value extracted from "treatment of waste glass, open dump, very wet infiltration class (1000mm)"
- waste plastic, mixture: 0 kg; pedigree (1,1,1,1,1)
  EcoSpold01Location=CH
  Data is derived from material composition of a bus
  Uncertainty: Data is derived from material composition of a bus
  production volume 0 kg
    (same comment as for waste emulsion paint)
  properties: heating value, net 30.79 MJ, water content 0.180638, carbon content, fossil 0.747344, dry mass 0.847 kg, wet mass 1 kg
  note on carbon content, fossil: C content in 1 kg DM was calculated using data in Tab A.2, ecoinvent v2.2 report 13_I
- waste emulsion paint: -1.03373, -10.9663 kg (2 entries); lognormal variance with pedigree 0.046, pedigree (3,4,5,5,1)
  (same comment as for waste emulsion paint)
  production volume 36 kg
- waste mineral oil: -6.96451, -18.2355 kg (2 entries); lognormal variance with pedigree 0.046, pedigree (3,4,5,5,1)
  (same comment as for waste emulsion paint)
  production volume 75.6 kg
- waste glass: -9.23015, -0.850723, -0.0193, -0.0793712, -0.12053, -0.355157, -17.3585, -86.9862 kg (8 entries); lognormal variance with pedigree 0.046, pedigree (3,4,5,5,1)
  (same comment as for waste emulsion paint)
  production volume 345 kg
- waste plastic, mixture: -61.5167, -4.11031, -0.310856, -1.69771, -0.685854, -1.61213, -52.4151, -430.651 kg (8 entries); lognormal variance with pedigree 0.046, pedigree (3,4,5,5,1)
  (same comment as for waste plastic, mixture)
  production volume 1659 kg

## Sampling procedure
Data is based on the material consumption of vehicles. For the transportation of used tyres an expert estimate is used.

## Extrapolations
none This dataset has been copied from an original dataset covering the geography CH. The uncertainty has been adjusted accordingly.
