# iron ore mine operation, 63% Fe

Dataset: EcoSpold 2, unit process
Geography: IN
Time period: 2000-01-01 to 2021-12-31
Technology level: current
Classification: EcoSpold01Categories: metals/extraction
Classification: ISIC rev.4 ecoinvent: 0710:Mining of iron ores
Scenario: Business-as-Usual
System model: Allocation, cut-off by classification
Share of production covered: 15 %
Generated by: Harshita Soni
Published in: Soni H. 2017
Database: ecoinvent
isCopyrightProtected: true
accessRestrictedTo: 1

## General comment
"Iron & steel is the driving force behind industrial
development in any country. The vitality of the
Iron & Steel Industry largely influences a country's
economic status. The mining of iron ore, an essential
raw material for Iron & Steel Industry, is arguably of
prime importance among all mining activities
undertaken by any country. With the total resources of over 31.32 billion tonnes of haematite (Fe2O3 ) and magnetite (Fe3O4), India is amongst the leading producers of iron ore in the world.
"
(Source: Indian Minerals
Yearbook 2015, Published in May 2017)
Iron & steel is the driving force behind industrial
development in any country. The vitality of the
Iron & Steel Industry largely influences a country's
economic status. The mining of iron ore, an essential
raw material for Iron & Steel Industry, is arguably of
prime importance among all mining activities
undertaken by any country. With the total resources of over 31.32 billion tonnes of haematite (Fe2O3 ) and magnetite (Fe3O4), India is amongst the leading producers of iron ore in the world.
(Source: Indian Bureau of Mines Year Book for 2015, Published in May 2017)
There were 290 reporting mines in 2014-15 as
against 322 in the previous year, The production of iron ore constituting lumps, fines and concentrates was at 128.9 million tonnes in the year 2014-15

According to National Minerial Development Corporation (NMDC), the total quantity of iron ore mined in India for the year April 2016- March 2017: 190 million tonnes. Quantity mined by NMDC for the same year is 28 million tonnes.

## Included activities start
Activity starts with iron ore mining.

## Included activities end
This activity ends at the exit of the iron ore mines.

## Geography
Data collected from Iron ore mines in India

## Technology
Haematite and magnetite are the most important iron ores in India. About 59% haematite ore deposits are found in the Eastern Sector while about 92% magnetite ore deposits occur in Southern Sector, especially in Karnataka. Of these, haematite is considered to be superior because of its higher grade.
Major resources of haematite are located in Odisha (7,183 million tonnes or 35%), Jharkhand (5,069 million tonnes or 25%), Chhattisgarh (4,031 million tonnes or 20%), Karnataka (2,269 million tonnes or 11%) and Goa (1,019 million tonnes or 5%). The balance resources of haematite are spread in Andhra Pradesh, Assam, Bihar, Madhya Pradesh, Maharashtra, Meghalaya, Rajasthan, Telangana and Uttar Pradesh
India's 98% magnetite resources are located in five States, namely, Karnataka (7,802 million tonnes or 72%) followed by Andhra Pradesh (1,392 million tonnes or 13%), Rajasthan (627 million tonnes or 6%), Tamil Nadu (507 million tonnes or 5%) and Goa (226 million tonnes or 2%). Assam, Bihar, Jharkhand, Kerala, Maharashtra, Meghalaya, Nagaland, Odisha and Telangana together account for the remaining 2% resources.

## Time period
Data collected for the period April 2016- March 2017.

## Parameters
- fraction_PW_to_air: 0.2 dimensionless; lognormal variance with pedigree 0.092025, pedigree (4,4,3,2,4)
  Literature value (Statistics Canada, 2007 & Shaffer, K.H., 2008, Consumptive water use in the Great Lakes Basin, USGS) (Vionnet, S., Quantis Water Database - Technical Report, 2012).

## Reference product
- iron ore, crude ore, 63% Fe: 1 kg; name RP_amount; By-product classification allocatable product; CPC 14100: Iron ores and concentrates, other than roasted iron pyrites
  production volume 2.34921e11 kg; name RP_PV; = 148000*1000*1000/0.63
    Data for the year 2019.
    Source: USGS (2021) Iron Ore. U.S. Geological Survey, Mineral Commodity Summaries, 2021, https://pubs.usgs.gov/periodicals/mcs2021/mcs2021-iron-ore.pdf (last accessed on 2021-07-22).
  property price 0.0452631 EUR2005
    Assuming that iron content (and the price of iron) in the determining factor in the price of iron ore, this value was calculated relative to the price for "iron ore, beneficiated, 65% Fe": (63/65) * 0.0467 (EUR/kg; price for iron ore, beneficiated, 65% Fe)
  property carbon content 0
    carbon content on a dry matter basis (reserved; not for manual entry)
  properties: water content 0, carbon content, fossil 0, iron content 0.63, wet mass 1 kg, water in wet mass 0 kg, dry mass 1 kg, carbon content, non-fossil 0, carbon allocation 0 kg

## Inputs from technosphere
- blasting: 0.00023451 kg; lognormal variance with pedigree 0.0053, pedigree (3,3,3,3,2)
  EcoSpold01Location=RER
  Based on data received from iron ore mines in India
- lubricating oil: 0 kg; pedigree (1,1,1,1,1)
  Based on data received from iron ore mines in India
  properties: wet mass 1 kg, dry mass 1 kg, carbon content, fossil 0.75, heating value, net 40.2 MJ
  note on carbon content, fossil: Lubricating oil is produced from diesel. C-content/dry mass of fats and oils considered 75%, from: ecoinvent v2.2 report, n 15a, pg 40
  note on heating value, net: Literature value, Source: IPCC 2006, 2006 IPCC Guidelines for National Greenhouse Gas Inventories, Prepared by the National Greenhouse Gas Inventories Programme, Eggleston H.S., Buendia L., Miwa K., Ngara T. and Tanabe K. (eds). Published: IGES, Japan
- electricity, medium voltage: 0.00204814 kWh; lognormal variance with pedigree 0.0053, pedigree (3,3,3,3,2)
  EcoSpold01Location=UCTE
  Based on data received from iron ore mines in India
- diesel, burned in building machine: 0.01608 MJ; lognormal variance with pedigree 0.0112, pedigree (3,3,3,1,2)
  Based on data received from iron ore mines in India
  properties: heating value, net 1 MJ
- wastewater, average: -6.5896e-5 m3; name wastewater; = (water_input * (1 - fraction_PW_to_air))*-1; lognormal variance with pedigree 0.25, pedigree (5,5,5,5,5)
  Calculated based on the amount of input water. For more information, refer to the parameter's comment.
  production volume 1.54803e7 m3; = wastewater / RP_amount * RP_PV
    Calculated from production volume of reference product using the relative outputs.
  property price 0 EUR2005; name wastewater_price_EUR2005
  properties: carbon content, non-fossil 0.194039, water content 2882.2, dry mass 0.346837 kg, wet mass 1000 kg
  note on carbon content, non-fossil: 0.0673 kg TOC/m3 (Tab A.17, ecoinvent v2.2 report 13_I). TOC was considered as Total Carbon.
- inert waste, for final disposal: -0.1495 kg; name inert_waste; lognormal variance with pedigree 0.0058, pedigree (3,3,3,1,2)
  Based on data received from iron ore mines in India
  production volume 3.51206e10 kg; = inert_waste / RP_amount * RP_PV
    Calculated from production volume of reference product using the relative outputs.
  property price 0 EUR2005; name inert_waste_price_EUR2005
  property iron content 0.4235; name inert_waste_Fe_content
  properties: wet mass 1 kg, dry mass 0.995 kg, water content 0.00502513
- recultivation, iron mine: 3.1e-5 m2; lognormal variance with pedigree 0.3153, pedigree (3,3,3,3,2)
  EcoSpold01Location=GLO
  Based on data received from iron ore mines in India
- mine infrastructure, iron: 8.3333e-13 unit; lognormal variance with pedigree 0.3153, pedigree (3,3,3,3,2)
  Based on ecoinvent dataset for "iron mine operation, GLO" accessed through ecoeditor on 20170815
  EcoSpold01Location=GLO

## Inputs from nature
- Transformation, from forest, unspecified [natural resource, land]: 3.1e-5 m2; lognormal variance with pedigree 0.0058, pedigree (3,3,3,1,2)
  Based on data received from iron ore mines in India
- Gangue, in ground [natural resource, in ground]: 0.4995 kg; lognormal variance with pedigree 0.0058, pedigree (3,3,3,1,2)
  gangue amount = iron ore, cruder ore, 63% Fe + inert waste, for final disposal - Iron, in ground
  = 1+ 0.1495 - 0.65
  = 0.4995 kg
- Water, unspecified natural origin [natural resource, in water]: 8.237e-5 m3; name water_input; lognormal variance with pedigree 0.0058, pedigree (3,3,3,1,2)
  Based on data received from iron ore mines in India
- Transformation, to mineral extraction site [natural resource, land]: 3.1e-5 m2; lognormal variance with pedigree 0.1353, pedigree (3,3,3,3,2)
  Based on data received from iron ore mines in India
- Occupation, mineral extraction site [natural resource, land]: 0.001189 m2*year; lognormal variance with pedigree 0.0553, pedigree (3,3,3,3,2)
  Based on data received from iron ore mines in India
- Iron, in ground [natural resource, in ground]: 0.63 kg; lognormal variance with pedigree 0.0058, pedigree (3,3,3,1,2)
  Based on data received from iron ore mines in India

## Emissions to nature
- Water [air, unspecified]: 1.6474e-5 m3; = water_input * fraction_PW_to_air; lognormal variance with pedigree 0.25, pedigree (5,5,5,5,5)
  (same comment as for wastewater, average)
- Particulates, > 10 um [air, non-urban air or from high stacks]: 0.0014415 kg; lognormal variance with pedigree 0.0553, pedigree (3,3,3,3,2)
  Based on ecoinvent dataset for "iron mine operation, GLO" accessed through ecoeditor on 20170815
- Particulates, < 2.5 um [air, non-urban air or from high stacks]: 0.00014415 kg; lognormal variance with pedigree 0.3153, pedigree (3,3,3,3,2)
  (same comment as for Particulates, > 10 um)
- Particulates, > 2.5 um, and < 10um [air, non-urban air or from high stacks]: 0.0012973 kg; lognormal variance with pedigree 0.1353, pedigree (3,3,3,3,2)
  (same comment as for Particulates, > 10 um)

## Sampling procedure
Data received from iron ore mines in India

Quantity of iron ore mined at sites from where data was received:
28,46,51,19,000 kg for the year April 2016 - March 2017.

Total quantity of iron ore mined in India for April 2106- March 2017: 190 million tonnes.

## Extrapolations
This dataset has been extrapolated from year 2017 to the year of the calculation (2021). The uncertainty has been adjusted accordingly.
