# building operation, budget hotel

Dataset: EcoSpold 2, unit process
Geography: PE
Time period: 2017-01-01 to 2021-12-31
Technology level: current
Classification: ISIC rev.4 ecoinvent: 5510:Short term accommodation activities
Synonyms: eco-lodge; 3 star hotel; basic hotel
Tags: single enterprise data
Scenario: Business-as-Usual
System model: Allocation, cut-off by classification
Generated by: Viachaslau Filimonau
Published in: Filimonau, V. 2018
Database: ecoinvent
isCopyrightProtected: true
accessRestrictedTo: 1

## General comment
This dataset represents the operation of a tourist accommodation facility located in Junín, Peru. The case study hotel is classed as budget hotel (comfort category 3*). It was first opened in 2006 although the building where the hotel resides was constructed in 1957. Prior to becoming a hotel, the building was used as a farm. The hotel has capacity of 50 beds and offers 20 double-size rooms with double or twin beds, with additional capacity to install an extra single bed in each room in the periods of high demand and if and when required. The hotel is made up by 21 stand-alone buildings, where 20 buildings host guest rooms and 1 building represents an administrative building. All buildings have 1 floor. The administrative building hosts a lobby, a restaurant, a bar and a conference hall. There is a swimming pool (70 m2) and a parking lot (220 m2) for guest use on site. Laundry is available on site. The hotel occupies a total area of 420000 m2 which is the legacy of it being a farm in the past. The area in actual use (i.e. the area occupied by all hotel buildings and amenities) is 2181 m2 and the hotel's Gross Floor Area (GFA) is 1366 m2. The average annual occupancy of the hotel is 30% which is equal to 5475 guest nights per year. The hotel's occupancy is significantly lower than the country's average of 66%
(Source: Hotel News Now 2015. The state of Peru's tourism, hotels. Available from: http://www.hotelnewsnow.biz/Articles/27650/The-state-of-Perus-tourism-hotels Accessed 16 March 2018). This can in part be explained by the hotel location which is rather remote. This is also because of the hotel positioning itself as an eco-lodge which does not appeal to the mass consumer.

## Included activities start
This dataset is modelled to represent the service of operating a hotel. It includes: energy and water consumption, furniture and in-room textiles (such as bed linen, bed mattrasses and curtains), electric and electronic equipment used in guest rooms and on hotel premises (including bulbs), cleaning and in-room consumables. The case study hotel has laundry on-site and this activity is included. Although the case study hotel has a restaurant on site, the inputs of food items have been excluded due to data availability. The energy and water consumption attibuted to restaurant operations have been included. Any waste generated in restaurant operations has been included. Activities include hotel operations and infrastructure based on 1 guest night stay and the lifeframe of the hotel building of 75 years.

## Included activities end
Activities end with guest departure from hotel premises. Due to data availability, the following processes have been excluded: room equipment (on-table lamp, door lock), bathroom equipment (showers, mirrors), kitchen equipment (mixer), food inputs in restaurant operations.

## Geography
The hotel is located in Junín, Perú

## Technology
Technology in use is considered current.

## Parameters
- occupancy rate/year: 0.3 dimensionless; name occupancy_y
  The hotel reports a 30% occupancy rate.

## Reference product
- building operation, budget hotel: 1 guest night; name RP; CPC 63111: Room or unit accommodation services for visitors, with daily housekeeping services; By-product classification allocatable product
  This reference product represents operation of a tourist accommodation facility classed as a budget hotel (comfort category 3*).
  production volume 3.99128e6 guest night; name RP_PV_1; = 5475*729
    Annual production volume is estimated based on the number of hotel guests in the case study hotel (data from hotel survey) multiplied by the number of 3* hotels in Peru. The case study hotel reported the annual production volume of 5475 guest nights (see parameters). There are 729 5* hotel properties in Peru (see building construction, budget hotel (PE), PE, 2017 - 2018 dataset). Assuming the annual production is fairly equal across all 3* hotel properties in Peru, the annual production volume for the whole destination can be estimated as 5475*729 = 3991275.
  property lifetime 75 year; name lifetime
  property price 6.65055 EUR2005; name RP_price_EUR2005
    Calculated based on inputs: The price of the product has been calculated as a sum of the values of the material and energy inputs for this product. This value is therefore a rough estimation. It may underestimate the real price since there are additional expenses when producing any product. These expences can include for example labour costs, treatment of waste materials and profit for the producer. Please consider carefully whether this level of data quality is acceptable for your application.

## Inputs from technosphere
- non-ionic surfactant: 0.0228311 kg; name surf; = 125* lifetime/(lifetime_guests*occupancy_y); lognormal variance with pedigree 0.302825, pedigree (1,4,2,2,2)
  Calculated value. Represents here laundry detergent. In terms of outputs assumed to have gone to wastewater.
- steel, low-alloyed, hot rolled: 0.00175342 kg; name steel; = (12*12)*(lifetime/15)/(lifetime_guests*occupancy_y); lognormal variance with pedigree 0.302825, pedigree (1,4,2,2,2)
  Calculated value. Represents here all chairs used across the hotel that are made of steel. Steel chair (unit) is assumed to have a weight of 12 kg, Furniture re-use Network, 2009. Average weights. Available from: http://democracy.york.gov.uk/documents/s2116/Annex%20C%20REcycling%20Report%20frnweights2005.pdf Accessed 13 January 2018. Acerage service life is assumed to be 15 years. This represents service life of an average piece of furniture. Source: European Commission 2013. BACKGROUND REPORT. Revision of Ecolabel and Green Public Procurement criteria for the product group
  Wooden Furniture. September 2013. Available from: http://susproc.jrc.ec.europa.eu/furniture/docs/Background_report_Furniture_September_2013.pdf Accessed 19 March 2018.
  properties: wet mass 1 kg, dry mass 1 kg, carbon content, fossil 0.005
  note on carbon content, fossil: Low alloyed steel composition given in Tab. 3.2 ecoinvent v2.2 report 10_partII. Steel assumed to have a C content of 0.5%
- dryer: 1.46119e-5 unit; = 1*(lifetime/12.5)/(lifetime_guests*occupancy_y); source Ardente, F. 2015; lognormal variance with pedigree 0.302825, pedigree (1,4,2,2,2)
  Calculated value. Assumed average service life of a dryer is 12.5 years. The amount of exchange is calculated as: amount of input product * (lifetime of the hotel/lifetime of the product) / (lifetime capacity). Source: Ardente F., and Talens Peiró L. 2015. Environmental Footprint and Material Efficiency Support for Product Policy - Report on Benefits and Impacts/costs of Options for Different Potential Material Efficiency Requirements for Dishwashers. JRC Science and Policy Report EUR27200EN. European Commission, March 2015. Available from: http://publications.jrc.ec.europa.eu/repository/bitstream/JRC95187/lb-na-27200-en-n.pdf Accessed 14 January 2018
  properties: lifetime 12.5 year, wet mass 50 kg, dry mass 50 kg, carbon content, fossil 5.63
- furniture, wooden: 0.0644018 kg; name furniture_w; = ((50*21)*(lifetime/15)/(lifetime_guests * occupancy_y))+((5*30)*(lifetime/15)/(lifetime_guests*occupancy_y))+((6*37)*(lifetime/15)/(lifetime_guests*occupancy_y))+((85*23)*(lifetime/15)/(lifetime_guests*occupancy_y))+((116*7)*(lifetime/15)/(lifetime_guests*occupancy_y))+((20*55)*(lifetime/15)/(lifetime_guests*occupancy_y)); lognormal variance with pedigree 0.302825, pedigree (1,4,2,2,2)
  Estimated value. Assumed average service life of all pieces of furniture is 15 years. This represents service life of an average piece of furniture. Source: European Commission 2013. BACKGROUND REPORT. Revision of Ecolabel and Green Public Procurement criteria for the product group Wooden Furniture. September 2013. Available from: http://susproc.jrc.ec.europa.eu/furniture/docs/Background_report_Furniture_September_2013.pdf Accessed 19 March 2018.
  This exchange represents the following: Bed single (unit). Assumed to have a weight of 21 kg, no headboard, Furniture re-use Network, 2009. Average weights. Available from: http://democracy.york.gov.uk/documents/s2116/Annex%20C%20REcycling%20Report%20frnweights2005.pdf Accessed 13 January 2018. Bed king/queen (unit). King bed is assumed to have a weight of 30 kg, no headboard, Furniture re-use Network, 2009. Average weights. Available from: http://democracy.york.gov.uk/documents/s2116/Annex%20C%20REcycling%20Report%20frnweights2005.pdf Accessed 13 January 2018. Sofa (unit). Sofa is assumed to have a weight of 37 kg, two seater, Furniture re-use Network, 2009. Average weights. Available from: http://democracy.york.gov.uk/documents/s2116/Annex%20C%20REcycling%20Report%20frnweights2005.pdf Accessed 13 January 2018. Table / desk (unit). Table unit is assumed to have a weight of 23 kg, Furniture re-use Network, 2009. Average weights. Available from: http://democracy.york.gov.uk/documents/s2116/Annex%20C%20REcycling%20Report%20frnweights2005.pdf Accessed 13 January 2018. Chair (unit). Chair is assumed to have a weight of 7 kg, Furniture re-use Network, 2009. Average weights. Available from: http://democracy.york.gov.uk/documents/s2116/Annex%20C%20REcycling%20Report%20frnweights2005.pdf Accessed 13 January 2018. Wardrobe (unit). Wardrobe is assumed to have a weight of 55 kg, double wardrobe, Furniture re-use Network, 2009. Average weights. Available from: http://democracy.york.gov.uk/documents/s2116/Annex%20C%20REcycling%20Report%20frnweights2005.pdf Accessed 13 January 2018. Furniture is combined across all instances of use within the hotel building.
  property carbon content, non-fossil 0.00807356; name furniture_w_C_content_non_fossil
  property dry mass 0.942177 kg; name furniture_w_DM
  property carbon content, fossil 0.0328084; name furniture_w_C_content_fossil
  property wet mass 1 kg; name furniture_w_WM
  note on carbon content, non-fossil: Calculated value. Calculation was based on the weighted avarage of non fossil carbon content of material inputs.
  note on carbon content, fossil: Calculated value. Calculation was based on the weighted avarage of fossil carbon content of material inputs.
- vacuum cleaner: 2.28311e-5 unit; name vacuum_cleaner; = 1*(lifetime/8)/(lifetime_guests*occupancy_y); lognormal variance with pedigree 0.302825, pedigree (1,4,2,2,2)
  Estimated value. No primary data on the number of vacuum cleaners in use by the case study hotel but assumed that at least one vacuum cleaner is present for housekeeping purposes. Assumed average service life of a vacuum cleaner is 8 years. Source: Gallego-Schmid et al. 2016. Life cycle environmental impacts of vacuum cleaners and the effects of European regulation. Science of the Total Environment, 559, 192-203.
  properties: lifetime 8 year, carbon content, fossil 2.59, wet mass 4.45 kg, dry mass 4.45 kg
- scrap steel: -0.00175342 kg; name scrap_steel; = (steel)*-1; lognormal variance with pedigree 0.003425, pedigree (1,4,2,2,2)
  Calculated value. Represents here scrap steel from furniture. The amount is set equivalent to the amount of input material.
  production volume 6998.4 kg; = RP_PV_1 * (scrap_steel / RP)
    Calculated from production volume of reference product using the relative outputs.
  property price 0 EUR2005; name scrap_steel_price_EUR2005
  properties: dry mass 1 kg, wet mass 1 kg
- cleaning consumables, without water, in 13.6% solution state: 0.00988639 kg; name clean; = 398*0.136*lifetime/(lifetime_guests*occupancy_y); lognormal variance with pedigree 0.302825, pedigree (1,4,2,2,2)
  Calculated value. Combined of all instances of use across the hotel operations. Represents the following cleaning luquids: window cleaner, bleach, washing up liquid, insect killer, pine disinfector, odour eliminator. In terms of outputs assumed to have gone to wastewater. As the product "cleaning consumables" is expressed as 100% active substance, the amount of cleaning consumables is multiplied by the average concentration of active substance. According to Golsteijn (2015) the average water content of cleaning consumables is 86.4%, the necessary water input is accounted for with the flow "water, compeltely softened, from decarbonised water, at user". For more information on how the cleaning consumables dataset was created please refer to the relevant dataset in ecoinvent.
  2015, Laura Golsteijn, A compilation of life cycle studies for six household detergent product categories in Europe: the basis for product-specific A.I.S.E. Charter Advanced Sustainability Profiles
  property wet mass 1 kg; name clean_WM
  property carbon content, fossil 0; name clean_C_content_fossil
  property carbon content, non-fossil 0; name clean_C_content_non_fossil
  properties: heating value, net 12.22 MJ
- tap water: 177.991 kg; name tap_water; = 332.2496811/(56/30); lognormal variance with pedigree 0.302825, pedigree (1,4,2,2,2)
  No data on the amount of water used was provided by the case study hotel. Hence, the data from the hotel of the same type (budget) but based in Rio de Janeiro (Brazil) were used as proxy with appropriate adjustments made to reflect the difference in occupancy (56% in the case of a budget hotel in Brazil compared to 30% in the case of a budget hotel in Peru).
  properties: water content 2962.17, wet mass 1 kg, dry mass 0.000337476 kg, carbon content, fossil 0.00178991
  note on carbon content, fossil: Bicarbonate content is 2.93 mol/m3. CO2 content is 0.1 mol/m3 (ecoinvent v2.2 report 8, Tab 93.1).
- tissue paper: 0.21 kg; name tissue_paper; = 114975/(25*4)* lifetime/(lifetime_guests*occupancy_y); lognormal variance with pedigree 0.302825, pedigree (1,4,2,2,2)
  Calculated value from meters to kg. Assuming a roll of 25 meters weights 250 g, so 1 kg of tissue paper is equal to 100 meters. Source: Sainsburys 2018. Andrex Toilet Paper. Available from: https://www.sainsburys.co.uk/webapp/wcs/stores/servlet/gb/groceries/andrex-toilet-tissue--classic-white-16x241-sheets?langId=44&storeId=10151&krypto=6KE3AoChB8jlwzzYGlgparsN%2BBruZBOjUaSVm%2BCnwAT0LLJPLAalDm9DhCtUDzK5uFGmUkJJ%2FMIaDVx%2BGRGKIHdBUxaNbCTzmIQiBcpr497qZYrRt4Kvvy%2BLLO40d8j3%2BY4eQ%2Fk%2BK4BXsq0FOjWLrDLelOp5CVxrDysmNwGM26k%3D&ddkey=https%3Agb%2Fgroceries%2Fandrex-toilet-tissue--classic-white-16x241-sheets Accessed 16 January 2018. In terms of outputs, assumed to have gone to wastewater.
  properties: heating value, net 10.22 MJ, dry mass 0.945 kg, wet mass 1 kg, carbon content, non-fossil 0.36169, water content 0.0582011, carbon content, fossil 2.22e-5
- microwave oven: 4.56621e-5 unit; name microwave; = 2*(lifetime/8)/(lifetime_guests*occupancy_y); lognormal variance with pedigree 0.302825, pedigree (1,4,2,2,2)
  Calculated value. Assumed average service life of a microwave oven is 8 years. Source: Gallego-Schmid et al. 2018. Environmental assessment of microwaves and the effect of European energy efficiency and waste management legislation. Science of the Total Environment, 618, 487-499.
  properties: lifetime 8 year
  note on lifetime: Source: Gallego-Schmid et al. 2018, 2018, Gallego-Schmid, A., Mendoza, J.M.F., Azapagic, A., Environmental assessment of microwaves and the effect of European energy efficiency and waste management legislation. , Science of the Total Environment, 618, 487-499, 1 - Article
- coffee maker: 3.65297e-5 unit; name coffee_m; = 1*(lifetime/5)/(lifetime_guests*occupancy_y); lognormal variance with pedigree 0.302825, pedigree (1,4,2,2,2)
  Calculated value. Assumed average service life of a coffee maker is 5 years. Source: Ashby 2009. Materials and the Environment: Eco-Informed Material Choice. Elsevier, Burlington, USA.
  properties: lifetime 5 year, carbon content, fossil 0.857611, dry mass 1.9 kg, wet mass 1.9 kg
- soap: 0.108 kg; = (146000/1000+445.3)* lifetime/(lifetime_guests*occupancy_y); lognormal variance with pedigree 0.302825, pedigree (1,4,2,2,2)
  Calculated value. Represents all toiletries provided in guest rooms (soap, shampoo, shower gel and body lotion). The amount of luquid toiletries (shampoo and shower gel) is converted from the consumption volume expressed in ml, assuming 1 liter of shampoo and shower gel is equal to 1 kg of shampoo and shower gel. In terms of outputs assumed to have gone to wastewater.
  properties: carbon content, non-fossil 0.692237, wet mass 1 kg, dry mass 0.87 kg, water content 0.149425, heating value, net 17.93 MJ
- refrigerator: 0.000109589 unit; = 6*(lifetime/10)/(lifetime_guests*occupancy_y); lognormal variance with pedigree 0.302825, pedigree (1,4,2,2,2)
  Calculated value. Assumed average service life of a refrigerator is 10 years. Source: Xiao et al. 2015. A life-cycle assessment of household refrigerators in China. Journal of Cleaner Production, 95, 301-310
  properties: lifetime 10 year
  note on lifetime: Source: Xiao, R. et al. 2015, 2015, Xiao, R., Zhang, Y., Liu, X., and Yuan, Z., A life-cycle assessment of household refrigerators in China, Journal of Cleaner Production, 95, 301-310, 1 - Article
- television: 0.000365297 unit; name TV; = 20*(lifetime/10)/(lifetime_guests*occupancy_y); lognormal variance with pedigree 0.302825, pedigree (1,4,2,2,2)
  Calculated value. Average service life of a television is assumed to be equal to 10 years. Source: Feng and Ma 2009. The energy consumption and environmental impacts of a color TV set in China. Journal of Cleaner Production, 17,13-25.
  properties: lifetime 10 year
  note on lifetime: As proposed by Dodbiba et al. 2008. Source: 2008, Dodbiba, G., Takahashi, K., Sadaki, J., Fujita, T., The recycling of plastic wastes from discarded TV sets: comparing energy recovery with mechanical recycling in the context of life cycle assessment, Journal of Cleaner Production, 16, 458-470, 0 - Undefined
- cookstove: 7.30594e-5 unit; = 6*(lifetime/15)/(lifetime_guests*occupancy_y); lognormal variance with pedigree 0.302825, pedigree (1,4,2,2,2)
  Calculated value. Assumed average service life of a cookstove is 15 years. Source: Jungbluth 1997. Life-Cycle-Assessment for Stoves and Ovens. UNS Working Paper No. 16, August 1997.
  properties: wet mass 57.9 kg, dry mass 57.9 kg, lifetime 15 year, carbon content, fossil 3.22
- wastewater, average: -0.177991 m3; name wastewater; = ( tap_water/1000)*-1; lognormal variance with pedigree 0.003425, pedigree (1,4,2,2,2)
  Calculated value. The amount of waste material is assumed to be equal to the amount of respective input material, tap water, with conversion from kg to m3. 1 m3 of water is assumed to be equal to 1000 kg of water.
  production volume 710411 m3; = RP_PV_1 * (wastewater / RP)
    Calculated from production volume of reference product using the relative outputs.
  property price 0 EUR2005; name wastewater_price_EUR2005
  properties: water content 2882.2, carbon content, non-fossil 0.194039, wet mass 1000 kg, dry mass 0.346837 kg
  note on carbon content, non-fossil: 0.0673 kg TOC/m3 (Tab A.17, ecoinvent v2.2 report 13_I). TOC was considered as Total Carbon.
- computer, laptop: 0.000228311 unit; name comp; = 5*(lifetime/4)/(lifetime_guests*occupancy_y); lognormal variance with pedigree 0.302825, pedigree (1,4,2,2,2)
  Calculated value. Assumed average service life of a computer is 4 years. Source: Choi et al. 2006. Life Cycle Assessment of a Personal Computer and its Effective Recycling Rate. Int J LCA, 11 (2), 122 - 128.
  properties: carbon content, non-fossil 1.2662e-5, dry mass 3.15 kg, carbon content, fossil 0.257799, wet mass 3.15 kg
- water, completely softened: 0.0628077 kg; = 398*0.864*lifetime/(lifetime_guests*occupancy_y); lognormal variance with pedigree 0.0454, pedigree (2,4,2,5,4)
  Calculated value. From the dataset for "cleaning consumables production" GLO 2011-2013, on average cleaning products contain 86% of water. Based on the literature source Golsteijn (2015) the dataset used to represent the water flow is "water, completely softened, at plant", version 2 dataset which corresponds to ecoinvent version 3 dataset "water, completely softened, from decarbonised waterm at user". The amount of water needed is therefore calculated based on the vale of 86% calculated based on Golsteijn (2015) and the amount of cleaning consumable which are expressed as 100% active substance.
  Laura Golsteijn, 2015, A compilation of life cycle studies for six household detergent product categories in Europe: the basis for product-specific A.I.S.E. Charter Advanced Sustainability Profiles
  properties: wet mass 1 kg
- textile, knit cotton: 0.0908128 kg; name textile_knit_cotton; = ((389*1.1/4)*(lifetime/0.25)/(lifetime_guests*occupancy_y))+((126*5*1.1)*(lifetime/10)/(lifetime_guests*occupancy_y)); lognormal variance with pedigree 0.302825, pedigree (1,4,2,2,2)
  Calculated value. Represents here the total number of cotton-made linen units and cotton-made curtains used by the hotel. For linen, it is assumed that, on average, 4 linen units make 1 kg in weight. Source: Filimonau et al. 2011. Reviewing the carbon footprint analysis of hotels: Life Cycle Energy Analysis (LCEA) as a holistic method for carbon impact appraisal of tourist accommodation. Journal of Cleaner Production, 19, 1917-1930. Assumed average service life is 0.25 years. Source: TRSA 2015. Hospitality Textile Life, Loss and Replacement. Available from: http://www.laundrycompliance.com/wp-content/uploads/2016/02/trsa-hospitality-hotel-linen-loss.pdf Accessed 16 March 2018. For curtains, it is assumed that a curtain has a weight of 5 kg. Source: Furniture re-use Network, 2009. Average weights. Available from: http://democracy.york.gov.uk/documents/s2116/Annex%20C%20REcycling%20Report%20frnweights2005.pdf Accessed 13 January 2018. Average service life of a curtain is assumed to be equal to average service life of a carpet which is 10 years. Source: Greenspec 2018. While life costing: carpets. Available from: http://www.greenspec.co.uk/building-design/carpets/ Accessed 16 March 2018. The amount accounts for 10% fabric loss in the cotton textile manufacturing process. Source: Baydar, G., Ciliz, N., and Mammadov, A., 2015. Life cycle assessment of cotton textile products in Turkey. Journal of Cleaner Production, 104(A), 213-223.
  properties: carbon content, non-fossil 0.46, dry mass 1 kg, wet mass 1 kg
- municipal solid waste: -7.30594 kg; name mun_solid_waste; = (40000* lifetime/(lifetime_guests*occupancy_y))*-1; lognormal variance with pedigree 0.003425, pedigree (1,4,2,2,2)
  Calculated data. The amount of exchange is calculated as: amount of input product * (lifetime of the hotel) / (lifetime capacity).
  production volume 2.916e7 kg; = RP_PV_1 * (mun_solid_waste / RP)
    Calculated from production volume of reference product using the relative outputs.
  property price 0 EUR2005; name mun_solid_waste_price_EUR2005
  properties: carbon content, non-fossil 0.261655, water content 0.297017, heating value, net 11.74 MJ, carbon content, fossil 0.171549, dry mass 0.771 kg, wet mass 1 kg
  note on carbon content, non-fossil: MSW composition in tab 4.1, ecoinvent v2.2 report 13_I. C content referred to 1 kg DM
  note on heating value, net: Value taken from the general comment of the treatment dataset.
- compact fluorescent lamp: 0.0307181 unit; name compact_bulb; = 185*(lifetime/1.1)/(lifetime_guests*occupancy_y); lognormal variance with pedigree 0.302825, pedigree (1,4,2,2,2)
  Calculated value. Average service life of a bulb is assumed to be equal to 1.1 year. Source: Elijošiutė et al. 2012. Life Cycle Assessment of Compact Fluorescent and Incandescent Lamps: Comparative Analysis. Environmental Research, Engineering and Management, 3(61), 65-72.
  properties: carbon content, fossil 0.009542, wet mass 0.075 kg, dry mass 0.075 kg, lifetime 1 year
  note on lifetime: Calculated from Elijosiute et al. 2012 who estimate the life time of a bulb to be eqaul to 10000 hours which equates to circa 1 year.
- heat, district or industrial, other than natural gas: 23.895 MJ; name heat_d; = (5233*25)* lifetime/(lifetime_guests*occupancy_y); lognormal variance with pedigree 0.302825, pedigree (1,4,2,2,2)
  Calculated value from liters of LPG. Assuming 1 liter of LPG is equal to 25 MJ. Source: LPG Gas Blog, 2018. LPG conversations. Available from: http://www.elgas.com.au/blog/389-lpg-conversions-kg-litres-mj-kwh-and-m3 Accessed 19 March 2018. LPG combines two instances of gas use in the hotel - gas for cooking and gas for heating.
  properties: corresponding fuel use, propane, furnace >100kW 1.05263 MJ, heating value, net 1 MJ
  note on corresponding fuel use, propane, furnace >100kW: Lower heating value of the fuel input related to the heat/electricity output, taken directly from ecoinvent v3.0 dataset "heat production, natural gas, at industrial furnace >100kW, GLO 2000".
- mattress: 0.00401826 unit; name mattress_p; = (55*2)*(lifetime/5)/(lifetime_guests*occupancy_y); lognormal variance with pedigree 0.302825, pedigree (1,4,2,2,2)
  Calculated value. Average service life of a mattress is assumed to be equal to 5 years. Source: Traveller 2017. How often do hotels change their mattresses? Available from: http://www.traveller.com.au/everyone-asks-how-often-do-hotels-change-their-mattresses-guv2kt Accessed 16 March 2018.
  properties: dry mass 20.8818 kg, wet mass 20.882 kg, carbon content, fossil 6.37262
  note on carbon content, fossil: Calculated value. The value of the mattress fossil carbon content is the sum of all fossil carbon content of input materials to the mattress manufacture extracted from Lanoe et al (2013).
- washing machine: 3.65297e-5 unit; name wash_mach; = 2*(lifetime/10)/(lifetime_guests*occupancy_y); lognormal variance with pedigree 0.302825, pedigree (1,4,2,2,2)
  Calculated value. Assumed average service life of a washing machine is 10 years. Source: Yuan et al. 2016. Life cycle assessment of horizontal-axis washing machines in China. Int J Life Cycle Assess, 21, 15-28
  properties: lifetime 10 year
  note on lifetime: Based on the estimate from Yuan et al. 2016. Source: Yuan et al. 2016, 2016, Yuan, Z., Zhang, Y., and Liu, X., Life cycle assessment of horizontal-axis washing machines in China, International Journal of Life Cycle Asse, 21, 15-28, 1 - Article
- waste textile, soiled: -0.0908128 kg; name waste_textile; = (textile_knit_cotton)*-1; lognormal variance with pedigree 0.003425, pedigree (1,4,2,2,2)
  Calculated value. The amount of waste material is assumed to be equal to the amount of respective input material, textile, knit cotton.
  production volume 362459 kg; = RP_PV_1 * (waste_textile / RP)
    Calculated from production volume of reference product using the relative outputs.
  property price 0 EUR2005; name waste_textile_price_EUR2005
  properties: heating value, net 14.45 MJ, wet mass 1 kg, water content 0.333333, dry mass 0.75 kg, carbon content, non-fossil 0.570519
- electricity, low voltage: 4.45812 kWh; name electr; = 24132* lifetime/(lifetime_guests*occupancy_y)+(2/3.6* textile_knit_cotton); lognormal variance with pedigree 0.302825, pedigree (1,4,2,2,2)
  Data from the hotel survey. The amount of exchange is calculated as: amount of input product * (lifetime of the hotel) / (number of guests during the lifetime of the hotel * hotel occupancy rate). The amount also includes electricity requirements to produce cotton textile products from raw cotton. It is estimated that 2 MJ of electricity is required to produce 1 kg of cotton textile product. This accounts for 10% fabric loss in the cotton textile manufacturing process. Source: Baydar, G., Ciliz, N., and Mammadov, A., 2015. Life cycle assessment of cotton textile products in Turkey. Journal of Cleaner Production, 104(A), 213-223.
- polyvinylchloride, bulk polymerised: 0.000974125 kg; name PVC; = (16*5)*lifetime/15/(lifetime_guests*occupancy_y); lognormal variance with pedigree 0.003425, pedigree (1,4,2,2,2)
  Calculated value. Represents here pouffees used by the case study hotel that are made of PVC. Pouffee is assumed to have a weight of 5 kg. Source: Furniture re-use Network, 2009. Average weights. Available from: http://democracy.york.gov.uk/documents/s2116/Annex%20C%20REcycling%20Report%20frnweights2005.pdf Accessed 13 January 2018. Average service life of a pouffee is assumed to be equal to 15 years which is equal to service life for an average piece of furniture. Source: European Commission 2013. BACKGROUND REPORT. Revision of Ecolabel and Green Public Procurement criteria for the product group
  Wooden Furniture. September 2013. Available from: http://susproc.jrc.ec.europa.eu/furniture/docs/Background_report_Furniture_September_2013.pdf Accessed 19 March 2018.
  properties: heating value, net 21.5 MJ, dry mass 1 kg, carbon content, fossil 0.387097, wet mass 1 kg
  note on carbon content, fossil: Monomer is vynyl chloride, C2H3Cl (ecoinvent v2.2 report 11_II). MW=62 g/mol
- building, budget hotel: 2.43531e-6 unit; name budget; = 1/(lifetime_guests*occupancy_y); lognormal variance with pedigree 0.302825, pedigree (1,4,2,2,2)
  Calculated value. The amount of infrastructure required is calculated based on the lifetime capacity (see properties) of the budget hotel and the occupancy rate (see parameters).;activityLink introduced to establish a direct link to the corresponding regional supply of this product
  property lifetime capacity 1.36875e6 guest night; name lifetime_guests; = 50*365*lifetime
  property lifetime 75 year; name build_lifetime
  note on lifetime capacity: The total capacity of the hotel is 236 guests. The lifetime capacity is calculated accordingly.
- waste polyvinylchloride product: -0.000974125 kg; name waste_PVC; = (PVC)*-1; lognormal variance with pedigree 0.003425, pedigree (1,4,2,2,2)
  Calculated value representative of the amount of the input product, PVC.
  production volume 3888 kg; = RP_PV_1 * (waste_PVC / RP)
    Calculated from production volume of reference product using the relative outputs.
  property price 0 EUR2005; name waste_PVC_price_EUR2005
  properties: wet mass 1 kg, carbon content, fossil 0.440882, water content 0.00200401, dry mass 0.998 kg, heating value, net 21.51 MJ

## Sampling procedure
Primary data from the hotel supplemented with literature-based calculations and estimates, where appropriate.

## Extrapolations
This dataset has been extrapolated from year 2018 to the year of the calculation (2021). The uncertainty has been adjusted accordingly.
