# tempering, flat glass

Dataset: EcoSpold 2, unit process
Geography: RER
Time period: 2000-01-01 to 2021-12-31
Technology level: current
Classification: EcoSpold01Categories: glass/construction
Classification: ISIC rev.4 ecoinvent: 2310:Manufacture of glass and glass products
Synonyms: toughening
Tags: ConvertedDataset
Scenario: Business-as-Usual
System model: Allocation, cut-off by classification
Generated by: Niels Jungbluth
Published in: Kellenberger D. 2007
Database: ecoinvent
isCopyrightProtected: true
accessRestrictedTo: 1

## General comment
Basic assumption of unit process raw data for the tempering of glass. Tempering or toughening is a special process of solidification of a glass sheet in order to make it particularly resistant to breakages. The process may be physical (thermal) or chemical. Here a thermal tempering is assumed. The result is a sheet of glass which is two or three times stronger than untempered glass.
[This dataset was already contained in the ecoinvent database version 2. It was not individually updated during the transfer to ecoinvent version 3. Life Cycle Impact Assessment results may still have changed, as they are affected by changes in the supply chain, i.e. in other datasets. This dataset was generated following the ecoinvent quality guidelines for version 2. It may have been subject to central changes described in the ecoinvent version 3 change report (http://www.ecoinvent.org/database/ecoinvent-version-3/reports-of-changes/), and the results of the central updates were reviewed extensively. The changes added e.g. consistent water flows and other information throughout the database. The documentation of this dataset can be found in the ecoinvent reports of version 2, which are still available via the ecoinvent website. The change report linked above covers all central changes that were made during the conversion process.]

## Included activities end
Gate to gate inventory for the process not including infrastructure and emissions.

## Geography
Assumption for RER.

## Technology
The glass sheet is heated to a temperature just below its softening point (about 640°C) and then immediately cooled by special jets of cold-air. These harden the surface of the glass, giving the inside more time to cool. This allows the external layer to crystallize into a wider lattice while the inside solidifies with greater compression than in the crystal lattice.

## Time period
Date of estimation.

## Reference product
- tempering, flat glass: 1 kg; CPC 88531: Glass manufacturing services; By-product classification allocatable product
  EcoSpold01Location=RER
  production volume 1.32237 kg
    This is a placeholder value that does not reflect real-world production volumes. This dataset does not currently require a real-world production volume to work in the database framework, and no actual data were collected yet. This has no negative effect on the results of the ecoinvent database. The placeholder value of this activity was scaled according to the nominal GDP of 2005 (source: United Nations, http://data.un.org/Glossary.aspx?q=GDP+%28current+US%24%29, accessed 20130726) to reflect an appropriate share of the global production volume, which is also a placeholder value.
  property price 0.391888 EUR2005
    Calculated based on inputs: The price of the product has been calculated as a sum of the values of the material and energy inputs for this product. This value is therefore a rough estimation. It may underestimate the real price since there are additional expenses when producing any product. These expences can include for example labour costs, treatment of waste materials and profit for the producer. Please consider carefully whether this level of data quality is acceptable for your application.

## Inputs from technosphere
- heat, district or industrial, natural gas: 1.197 MJ; lognormal variance with pedigree 0.118, pedigree (5,5,5,1,1)
  Estimation 20% of melting energy
  EcoSpold01Location=RER
  Uncertainty: Estimation 20% of melting energy
  properties: heating value, net 1 MJ
- flat glass, uncoated: 0.12 kg; lognormal variance with pedigree 0.0426, pedigree (3,3,5,1,1)
  Estimation 12% glass losses
  EcoSpold01Location=RER
  Uncertainty: Estimation 12% glass losses
  properties: dry mass 1 kg, wet mass 1 kg

## Sampling procedure
Assumption.

## Extrapolations
This dataset has been extrapolated from year 2000 to the year of the calculation (2021). The uncertainty has been adjusted accordingly.

## Review by Daniel Kellenberger (obsolete) 2003-06-18
passed
