# petrol blending for two-stroke engines

Dataset: EcoSpold 2, unit process
Geography: Europe without Switzerland
Time period: 1989-01-01 to 2021-12-31
Technology level: current
Classification: EcoSpold01Categories: oil/fuels
Classification: ISIC rev.4 ecoinvent: 1920:Manufacture of refined petroleum products
Scenario: Business-as-Usual
System model: Allocation, cut-off by classification
Generated by: Emilia Moreno Ruiz
Published in: Jungbluth, N. 2007
Database: ecoinvent
isCopyrightProtected: true
accessRestrictedTo: 1

## General comment
Rough estimation. Other mixing ratios from 1:5 up to 1:100 are possible. Energy use for mixing and additional fugitive emissions from mixing are neglected.
[This dataset was already contained in the ecoinvent database version 2. It was not individually updated during the transfer to ecoinvent version 3. Life Cycle Impact Assessment results may still have changed, as they are affected by changes in the supply chain, i.e. in other datasets. This dataset was generated following the ecoinvent quality guidelines for version 2. It may have been subject to central changes described in the ecoinvent version 3 change report (http://www.ecoinvent.org/database/ecoinvent-version-3/reports-of-changes/), and the results of the central updates were reviewed extensively. The changes added e.g. consistent water flows and other information throughout the database. The documentation of this dataset can be found in the ecoinvent reports of version 2, which are still available via the ecoinvent website. The change report linked above covers all central changes that were made during the conversion process.]
[This dataset is meant to replace the following datasets:
- petrol blending for two-stroke engines, RER, 1989 - 2000]

## Included activities end
Mixing of lubricant and petrol (ratio 1:50) at the petrol station.

## Geography
RER

## Technology
Mixing of two-stroke petrol at the fuel station.

## Time period
Literature, environmental reports and other information.

## Reference product
- petrol, two-stroke blend: 1 kg; CPC 333: Petroleum oils and oils obtained from bituminous materials, other than crude; preparations n.e.c. containing by […]; By-product classification allocatable product; CAS 86290-81-5
  EcoSpold01Location=RER
  production volume 1.2887 kg
    This is a placeholder value that does not reflect real-world production volumes. This dataset does not currently require a real-world production volume to work in the database framework, and no actual data were collected yet. This has no negative effect on the results of the ecoinvent database. The placeholder value of this activity was scaled according to the nominal GDP of 2005 (source: United Nations, http://data.un.org/Glossary.aspx?q=GDP+%28current+US%24%29, accessed 20130726) to reflect an appropriate share of the global production volume, which is also a placeholder value.
  property heating value, net 43.2 MJ
    Assumed equal to "petroleum". LHV for petroleum: Based on literature, page 7, Report6, part 4
  property price 0.71 EUR2005
    Average calculated from All Grades, Areas and Formulations in USA for 2005. Source: http://www.eia.gov/oil_gas/petroleum/data_publications/wrgp/mogas_history.html
  property carbon content 0.865
    carbon content on a dry matter basis (reserved; not for manual entry)
  properties: water in wet mass 0 kg, wet mass 1 kg, water content 0, carbon content, fossil 0.865, carbon content, non-fossil 0, dry mass 1 kg, carbon allocation 0.865 kg

## Inputs from technosphere
- lubricating oil: 0.02 kg; lognormal variance with pedigree 0.0526, pedigree (3,3,5,1,1)
  EcoSpold01Location=RER
  Literature
  Uncertainty: Literature
  properties: heating value, net 40.2 MJ, dry mass 1 kg, wet mass 1 kg, carbon content, fossil 0.75
  note on heating value, net: Literature value, Source: IPCC 2006, 2006 IPCC Guidelines for National Greenhouse Gas Inventories, Prepared by the National Greenhouse Gas Inventories Programme, Eggleston H.S., Buendia L., Miwa K., Ngara T. and Tanabe K. (eds). Published: IGES, Japan
  note on carbon content, fossil: Lubricating oil is produced from diesel. C-content/dry mass of fats and oils considered 75%, from: ecoinvent v2.2 report, n 15a, pg 40
- petrol, unleaded: 0.98 kg; lognormal variance with pedigree 0.04, pedigree (1,1,5,1,1)
  Statistics
  EcoSpold01Location=RER
  Uncertainty: Statistics
  properties: wet mass 1 kg, carbon content, fossil 0.865, heating value, net 43.2 MJ, dry mass 1 kg
  note on heating value, net: Assumed equal to "petroleum". LHV for petroleum: Based on literature, page 7, Report6, part 4

## Sampling procedure
Own estimation based on mixing ratio.

## Extrapolations
This dataset has been extrapolated from year 2000 to the year of the calculation (2021). The uncertainty has been adjusted accordingly.
