# wire drawing, steel

Dataset: EcoSpold 2, unit process
Geography: RER
Time period: 1997-01-01 to 2021-12-31
Technology level: current
Classification: EcoSpold01Categories: metals/processing
Classification: ISIC rev.4 ecoinvent: 2410:Manufacture of basic iron and steel
Tags: ConvertedDataset
Scenario: Business-as-Usual
System model: Allocation, cut-off by classification
Generated by: Silvio Blaser
Published in: Classen M. 2009
Database: ecoinvent
isCopyrightProtected: true
accessRestrictedTo: 1

## General comment
Wire drawing is a process in which wire rods/wires are reduced in diameter by drawing them through cone-shaped openings of a smaller cross section, so called dies. The input usually is wire rod of diameters raging from 5.5 to 16 mm obtained from hot rolling mills in form of coils. The final diameter size of dry drawn wire is between one and two millimetres, wet drawn wire has an even smaller diameter.
[This dataset was already contained in the ecoinvent database version 2. It was not individually updated during the transfer to ecoinvent version 3. Life Cycle Impact Assessment results may still have changed, as they are affected by changes in the supply chain, i.e. in other datasets. This dataset was generated following the ecoinvent quality guidelines for version 2. It may have been subject to central changes described in the ecoinvent version 3 change report (http://www.ecoinvent.org/database/ecoinvent-version-3/reports-of-changes/), and the results of the central updates were reviewed extensively. The changes added e.g. consistent water flows and other information throughout the database. The documentation of this dataset can be found in the ecoinvent reports of version 2, which are still available via the ecoinvent website. The change report linked above covers all central changes that were made during the conversion process.]

## Included activities end
Includes the process steps pre-treatment of the wire rod (mechanical descaling, pickling), dry or wet drawing (usually several drafts with decreasing die sizes), in some cases heat treatment (continuous-/discontinuous annealing, patenting, oil hardening) and Finishing. Does not include coating and the material being rolled

## Geography
Data-set is representative for European Union

## Technology
Average technique for EU. The processes of steel and stainless steel aren't fundamentally different, thus this module covers both materials

## Parameters
- fraction, cooling water, recirculating system, to air: 0.771 dimensionless; name fraction_CW_R_to_air; lognormal variance with pedigree 0.0413, pedigree (2,3,1,3,1)
  Calculated based on literature value (Scown, C.D., 2011, Water Footprint of U.S. Transportation Fuels and supplying information of the article) (Vionnet, S., Quantis Water Database - Technical Report, 2012).
- fraction, cooling water, to air: 0.3875 dimensionless; name fraction_CW_to_air; = (0.5*fraction_CW_OT_to_air)+(0.5*fraction_CW_R_to_air); lognormal variance with pedigree 0.092025, pedigree (4,4,3,2,4)
  Calculated value based on literature value (see comments of the other parametres present in this dataset) and expert opinion. In the case when no industry/literature data are available about the type of cooling or directly fraction, cooling water, to air specific for the process a default assumption is applied. It is assumed that the once-through cooling system is used in 50% of all cases and recirculating system is used in another 50% of all cases.
- fraction, cooling water, once-through system, to air: 0.004 dimensionless; name fraction_CW_OT_to_air; lognormal variance with pedigree 0.0413, pedigree (2,3,1,3,1)
  (same comment as for fraction, cooling water, recirculating system, to air)
- fraction, cooling water, cooling pond system, to air: 0.032 dimensionless; name fraction_CW_CP_to_air; lognormal variance with pedigree 0.0413, pedigree (2,3,1,3,1)
  (same comment as for fraction, cooling water, recirculating system, to air)

## Reference product
- wire drawing, steel: 1 kg; By-product classification allocatable product; CPC 89330: Metal forging, pressing, stamping, roll forming and powder metallurgy services
  EcoSpold01Location=RER
  production volume 2.55e10 kg
    6 to 7 million tonnes in 1996
    Estimate incl. CIS and Turkey based on year 2000 data in IISI: Steel Statistical Yearbook 2007 (data for 'Wire rod')
  property price 0.0571159 EUR2005
    Calculated based on inputs: The price of the product has been calculated as a sum of the values of the material and energy inputs for this product. This value is therefore a rough estimation. It may underestimate the real price since there are additional expenses when producing any product. These expences can include for example labour costs, treatment of waste materials and profit for the producer. Please consider carefully whether this level of data quality is acceptable for your application.

## Inputs from technosphere
- sludge from steel rolling: -0.035 kg; lognormal variance with pedigree 0.0986, pedigree (2,5,5,1,1)
  EcoSpold01Location=CH
  production volume 8.925e8 kg
    Calculated from the production volume of wire drawing, steel in proportion to the respective output amounts.
  properties: carbon content, fossil 0.0123943, water content 0.25, wet mass 1 kg, dry mass 0.8 kg
- hydrochloric acid, without water, in 30% solution state: 0.020009 kg; lognormal variance with pedigree 0.11, pedigree (1,1,5,1,1)
  composite
  EcoSpold01Location=RER
  properties: wet mass 1 kg, dry mass 1 kg, heating value, net 3.32 MJ
- lead: 0.0012845 kg; lognormal variance with pedigree 0.46, pedigree (1,1,5,1,1)
  EcoSpold01Location=RER
  composite
  properties: wet mass 1 kg, dry mass 1 kg
- lime, hydrated, loose weight: 6.3233e-5 kg; lognormal variance with pedigree 0.0666, pedigree (2,5,5,1,3)
  EcoSpold01Location=CH
  properties: dry mass 0.997 kg, water content 0.00300903, wet mass 1 kg
- sawnwood, softwood, raw, dried (u=20%): 0 m3; pedigree (1,1,1,1,1)
  EcoSpold01Location=RER
  properties: wet mass 540 kg, water content 0.2, dry mass 450 kg, carbon content, non-fossil 0.494, heating value, net 6514.84 MJ
  note on carbon content, non-fossil: C content of dry mass is 0.494 kgC/kg dry wood (ecoinvent v2.2 report 9)
- chemical, inorganic: 1.8407e-8 kg; lognormal variance with pedigree 0.0666, pedigree (2,5,5,1,3)
  EcoSpold01Location=GLO
  properties: carbon content, fossil 0.003, dry mass 1 kg, wet mass 1 kg
  note on carbon content, fossil: This dataset is an unweighted average of 20 inorganic substances (listed in Tab 88.1, ecoinvent v2.2 report 8, part II), being part of the top100 chemicals included in this database. The C-content has also been calculated as an unweighted average of the C content of the substances composing this dataset.
- municipal solid waste: -7.078e-11 kg; lognormal variance with pedigree 0.0586, pedigree (2,5,5,1,1)
  EcoSpold01Location=CH
  production volume 1.80489 kg
    (same comment as for sludge from steel rolling)
  properties: dry mass 0.771 kg, carbon content, fossil 0.171549, carbon content, non-fossil 0.261655, wet mass 1 kg, water content 0.297017, heating value, net 11.74 MJ
  note on carbon content, fossil: MSW composition in tab 4.1, ecoinvent v2.2 report 13_I. C content referred to 1 kg DM
  note on heating value, net: Value taken from the general comment of the treatment dataset.
- basic oxygen furnace waste: -0.0031623 kg; lognormal variance with pedigree 0.09, pedigree (1,1,5,1,1)
  calculated from max value assuming lognormal distribution
  EcoSpold01Location=CH
  production volume 8.06386e7 kg
    (same comment as for sludge from steel rolling)
  properties: wet mass 1 kg, dry mass 1 kg
- lubricating oil: 0.0025811 kg; lognormal variance with pedigree 0.26, pedigree (1,1,5,1,1)
  composite
  EcoSpold01Location=RER
  properties: dry mass 1 kg, carbon content, fossil 0.75, wet mass 1 kg, heating value, net 40.2 MJ
  note on carbon content, fossil: Lubricating oil is produced from diesel. C-content/dry mass of fats and oils considered 75%, from: ecoinvent v2.2 report, n 15a, pg 40
  note on heating value, net: Literature value, Source: IPCC 2006, 2006 IPCC Guidelines for National Greenhouse Gas Inventories, Prepared by the National Greenhouse Gas Inventories Programme, Eggleston H.S., Buendia L., Miwa K., Ngara T. and Tanabe K. (eds). Published: IGES, Japan
- heat, district or industrial, natural gas: 0.392217 MJ
  EcoSpold01Location=RER
  properties: heating value, net 1 MJ
- rolling mill: 1.6234e-9 unit; lognormal variance with pedigree 0.354, pedigree (3,4,5,1,1)
  EcoSpold01Location=RER
  activityLink introduced to establish a direct link to the corresponding regional supply of this product
- packaging film, low density polyethylene: 1.8872e-11 kg; lognormal variance with pedigree 0.084, pedigree (4,5,5,1,3)
  EcoSpold01Location=RER
  properties: carbon content, fossil 0.857143, wet mass 1 kg, dry mass 1 kg, heating value, net 42.47 MJ
  note on carbon content, fossil: Polyethylene is formed out of a huge amount of ethylene monomers (C2H4) (ecoinvent v2.2 report 11_II). MW=28 g/mol
- steel, unalloyed: 0.042762 kg; lognormal variance with pedigree 0.06, pedigree (1,1,5,1,1)
  composite
  EcoSpold01Location=RER
  properties: carbon content, fossil 0.0025, wet mass 1 kg, dry mass 1 kg
  note on carbon content, fossil: Unalloyed steels or carbon steels are those in which the level of an individual element in no case reaches or exceeds the limiting concentration given in Tab. 3.1 ecoinvent v2.2 report 10_partII. Assumed to have a C content of 0.25%
- electric arc furnace dust: -0.0012845 kg; lognormal variance with pedigree 0.46, pedigree (1,1,5,1,1)
  composite
  EcoSpold01Location=CH
  production volume 3.27548e7 kg
    (same comment as for sludge from steel rolling)
  properties: water content 0.182033, dry mass 0.846 kg, carbon content, fossil 0.01339, wet mass 1 kg
- corrugated board box: 4.7181e-12 kg; lognormal variance with pedigree 0.084, pedigree (4,5,5,1,3)
  EcoSpold01Location=RER
  properties: heating value, net 12.86 MJ, carbon content, fossil 0.00365437, water content 0.0582011, dry mass 0.945 kg, carbon content, non-fossil 0.450248, wet mass 1 kg
  note on carbon content, fossil: C content was calculated as an addition of C content in the raw materials.
- waste mineral oil: 0 kg; pedigree (1,1,1,1,1)
  EcoSpold01Location=CH
  composite
  production volume 0 kg
    (same comment as for sludge from steel rolling)
  properties: carbon content, fossil 0.864444, water content 0.111111, wet mass 1 kg, heating value, net 34.7 MJ, dry mass 0.9 kg
  note on carbon content, fossil: Tab A.6, ecoinvent v2.2 report 13_I. C content has been calculated after data in the tables, and then referred to 1 kg DM
- soap: 0.0025811 kg; lognormal variance with pedigree 0.26, pedigree (1,1,5,1,1)
  EcoSpold01Location=RER
  composite
  properties: heating value, net 17.93 MJ, water content 0.149425, carbon content, non-fossil 0.692237, wet mass 1 kg, dry mass 0.87 kg
  note on carbon content, non-fossil: Soap (CnH2n+1 COO Na) is produced by a combined saponification and neutralisation process performed on a blend of oleochemical feedstocks comprised of short chain (C12-14, derived from coconut or palm kernel oil) and long chain (C16-18, from tallow or palm oil) esters.The ratio of short to long fatty acid chains is 20:80 (ecoinvent v2.2 report 12). Short fatty acid has been estimated as C12.5H(2*12.5+1); MW R=176 g/mol. Long fatty acid has been estimated as C16H(2*16+1); MW R=225 g/mol. MW of COONa=67 g/mol
- sheet rolling, steel: 2.359e-11 kg; lognormal variance with pedigree 0.084, pedigree (4,5,5,1,3)
  activityLink introduced to establish a direct link to the corresponding regional supply of this product
  EcoSpold01Location=RER
- chemical, organic: 3.1623e-5 kg; lognormal variance with pedigree 0.37, pedigree (1,1,5,1,1)
  calculated from max value assuming lognormal distribution
  EcoSpold01Location=GLO
  properties: wet mass 1 kg, dry mass 1 kg, heating value, net 19.03 MJ, carbon content, fossil 0.628
  note on carbon content, fossil: This dataset is an unweighted average of 20 organic substances (listed in Tab 88.1, ecoinvent v2.2 report 8, part II), being part of the top100 chemicals included in this database. The C-content has also been calculated as an unweighted average of the C content of the substances composing this dataset.
- heat, district or industrial, other than natural gas: 6.67802e-5 MJ; lognormal variance with pedigree 0.084, pedigree (4,5,5,1,3)
  EcoSpold01Location=RER
  properties: heating value, net 1 MJ
- sulfuric acid: 0.0088388 kg; lognormal variance with pedigree 0.07, pedigree (1,1,5,1,1)
  calculated from max value assuming lognormal distribution
  EcoSpold01Location=RER
  properties: dry mass 1 kg, wet mass 1 kg
- electricity, medium voltage: 0.14142 kWh; lognormal variance with pedigree 0.0601, pedigree (3,5,5,3,1)
  EcoSpold01Location=UCTE
- waste mineral oil: -0.0612936, -0.00151739 kg (2 entries); lognormal variance with pedigree 0.42, pedigree (1,1,5,1,1)
  EcoSpold01Location=CH
  composite
  production volume 1.60168e9 kg

## Inputs from nature
- Water, cooling, unspecified natural origin [natural resource, in water]: 0.035 m3; name water_cooling_UNO_input; lognormal variance with pedigree 0.084, pedigree (4,5,5,1,3)

## Emissions to nature
- Sulfate [air, unspecified]: 7.3166e-8 kg; lognormal variance with pedigree 0.066, pedigree (1,5,5,1,3)
- Copper, ion [water, unspecified]: 3.3861e-7 kg; lognormal variance with pedigree 0.1386, pedigree (2,5,5,1,1)
- Water [air, unspecified]: 0.0135625 m3; name water_to_air_unspecified; = (water_cooling_UNO_input*fraction_CW_to_air); lognormal variance with pedigree 0.0807, pedigree (2,2,5,1,1)
  Calculated value based on literature values and expert opinion. See comments in the parametres' comment field.
  property fraction, origin: fresh water 0; name fraction_origin_fresh_water
  property fraction, origin: salt water 0; name fraction_origin_salt_water
  property fraction, origin: unspecified 1; name fraction_origin_unspecified
- Sulfate [water, unspecified]: 7.3458e-6 kg; lognormal variance with pedigree 0.08, pedigree (1,1,5,1,1)
  calculated from max value assuming lognormal distribution
- Water [water, unspecified]: 0.0214375 m3; name water_to_water_unspecified; = water_cooling_UNO_input*(1-fraction_CW_to_air); lognormal variance with pedigree 0.0807, pedigree (2,2,5,1,1)
  (same comment as for Water)
  property fraction, origin: fresh water 0; name fraction_origin_fresh_water_Ww
  property fraction, origin: unspecified 1; name fraction_origin_unspecified_Ww
  property carbon content, fossil 0; name C_content_fossil
  property wet mass 1000 kg; name WM
  property carbon content, non-fossil 0; name C_content_non_fossil
  property dry mass 0 kg; name DM
  property water in wet mass 1000 kg; name WWM
  property fraction, origin: salt water 0; name fraction_origin_salt_water_Ww
- Suspended solids, unspecified [water, unspecified]: 0.00018575 kg; lognormal variance with pedigree 0.0986, pedigree (2,5,5,1,1)
- Hydrocarbons, unspecified [water, unspecified]: 2.2044e-6 kg; lognormal variance with pedigree 0.3586, pedigree (2,5,5,1,1)
- Lead [air, unspecified]: 9.3199e-9 kg; lognormal variance with pedigree 0.71, pedigree (1,1,5,1,1)
  composite
- Zinc, ion [water, unspecified]: 2.6192e-7 kg; lognormal variance with pedigree 0.1386, pedigree (2,5,5,1,1)
- Hydrogen chloride [air, unspecified]: 3.9341e-6 kg; lognormal variance with pedigree 0.106, pedigree (1,5,5,1,3)
- Cadmium, ion [water, unspecified]: 1.75e-7 kg; lognormal variance with pedigree 0.1386, pedigree (2,5,5,1,1)
- Manganese [water, unspecified]: 7.1386e-7 kg; lognormal variance with pedigree 0.1386, pedigree (2,5,5,1,1)
- Aluminium [water, unspecified]: 1.6565e-6 kg; lognormal variance with pedigree 0.1386, pedigree (2,5,5,1,1)
- Particulates, > 2.5 um, and < 10um [air, unspecified]: 1.3693e-7 kg; lognormal variance with pedigree 0.1066, pedigree (2,5,5,1,3)
- NMVOC, non-methane volatile organic compounds, unspecified origin [air, unspecified]: 2.2097e-7 kg; lognormal variance with pedigree 0.1866, pedigree (2,5,5,1,3)
- COD, Chemical Oxygen Demand [water, unspecified]: 4.8129e-5 kg; lognormal variance with pedigree 0.0986, pedigree (2,5,5,1,1)
- TOC, Total Organic Carbon [water, unspecified]: 1.53e-5 kg; lognormal variance with pedigree 0.42, pedigree (5,5,5,5,5)
- Sulfur dioxide [air, unspecified]: 6.6815e-7 kg; lognormal variance with pedigree 0.066, pedigree (1,5,5,1,3)
- DOC, Dissolved Organic Carbon [water, unspecified]: 1.53e-5 kg; lognormal variance with pedigree 0.42, pedigree (5,5,5,5,5)
- Chromium VI [water, unspecified]: 3.5e-8 kg; lognormal variance with pedigree 0.1386, pedigree (2,5,5,1,1)
- Nickel, ion [water, unspecified]: 9.8995e-7 kg; lognormal variance with pedigree 0.1386, pedigree (2,5,5,1,1)
- BOD5, Biological Oxygen Demand [water, unspecified]: 4.8129e-5 kg; lognormal variance with pedigree 0.42, pedigree (5,5,5,5,5)
- Chloride [water, unspecified]: 0.0011469 kg; lognormal variance with pedigree 0.06, pedigree (1,1,5,1,1)
  composite
- Mercury [water, unspecified]: 3.5e-8 kg; lognormal variance with pedigree 0.1386, pedigree (2,5,5,1,1)
- Particulates, > 10 um [air, unspecified]: 5.4772e-8 kg; lognormal variance with pedigree 0.1066, pedigree (2,5,5,1,3)
- Carbon monoxide, fossil [air, unspecified]: 5.4772e-6 kg; lognormal variance with pedigree 0.7166, pedigree (2,5,5,1,3)
- Chromium, ion [water, unspecified]: 6.3e-7 kg; lognormal variance with pedigree 0.1386, pedigree (2,5,5,1,1)
- Lead [water, unspecified]: 3.5e-7 kg; lognormal variance with pedigree 0.1386, pedigree (2,5,5,1,1)
- Iron, ion [water, unspecified]: 0.00049889 kg; lognormal variance with pedigree 0.07, pedigree (1,1,5,1,1)
  composite
- Hydrogen [air, unspecified]: 1.5355e-9 kg; lognormal variance with pedigree 0.106, pedigree (1,5,5,1,3)

## Sampling procedure
Literature

## Extrapolations
This dataset has been extrapolated from year 2002 to the year of the calculation (2021). The uncertainty has been adjusted accordingly.

## Review by Roland Hischier 2010-02-07
Validated for v1.01
