# electricity production, nuclear, pressure water reactor, heavy water moderated

Dataset: EcoSpold 2, unit process
Geography: IN-GJ
Time period: 2010-01-01 to 2021-12-31
Technology level: modern
Classification: ISIC rev.4 ecoinvent: 3510:Electric power generation, transmission and distribution
Classification: EcoSpold01Categories: nuclear power/power plants
Synonyms: PWR
Tags: nuclear; India
Scenario: Business-as-Usual
System model: Allocation, cut-off by classification
Generated by: Muhammed Noor Hossain
Published in: Hossain, Muhammed Noor 2016
Database: ecoinvent
isCopyrightProtected: true
accessRestrictedTo: 1

## General comment
This dataset represents the production of high voltage electricity in a pressurized heavy water reactor nuclear plant in India - Gujarat (a state/union territory in India) in 2012. This dataset represents the CANDU technology (see nuclear plant construction for details) and has an installed power of 650MW (the average installed power for this technology). It is characterised by the use of heavy water (deuterium oxide) as moderator and coolant and the use of natural uranium (not enriched) as fuel. This dataset is extrapolated from the Quebec dataset, which is based on study on the production, transport and distribution of electricity in Quebec. It represents the production of Gentilly-2, the only nuclear plant in Quebec. Lifetime is estimated to 30 years for the plant based on Quebec data. Only main consumed products, wastes and emissions are included. Operation data were collected for the 2008-2013 period.
Some emission data were extrapolated from other nuclear technology (PWR).
[This dataset is meant to replace the following datasets:
- electricity production, nuclear, pressure water reactor, heavy water moderated, IN, 2010 - 2015]

## Included activities start
From the constructed power plant ready to produce electricity and from the fuel ready in the power plant.

## Included activities end
This activity ends with 1kWh of high voltage electricity produced at the power plant and arrived at the busbar.

The module includes: fuel elements, chemicals, and diesel requirements as well as the relevant transport requirements. Water use for cooling is included, but no cooling tower infrastructure. Considered radioactive waste streams are: spent fuel to conditioning (no reprocessing); operational low active waste for conditioning in the intermediate repository; and, contaminated waste from dismantling. Non-radioactive wastes are accounted for.

## Geography
Data extrapolated from Quebec dataset and a different GLO technology. Uncertainty has been adjusted accordingly.

## Technology
CANDU 6 technology is used in this plant. It is characterized by the use of heavy water as moderator and non-refined uranium as fuel. Some emission data were extrapolated from other nuclear technology. Uncertainty has been adjusted accordingly.

## Time period
Operation data were collected for the 2008-2013 period, but it is assumed valid for all the operation lifetime

## Parameters
- losses from gross electricity production: 0.105 dimensionless; name gross_net_electricity; lognormal variance with pedigree 0.0018, pedigree (2,1,1,1,2)
  Literature value. Own use of electricity plants in this State/Union Territory in 2012. The default loss as described by the CEA CO2 Baseline Database for the Indian Power Sector is applied, which is 10.5%. CEA. (2014). CO2 Baseline Database for the Indian Power Sector. User Guide, Ministry of Power, Government of India, New Delhi. Retrieved 12 04, 2016, from http://cea.nic.in/reports/others/thermal/tpece/cdm_co2/user_guide_ver10.pdf
- gross electricity production: 3.47034e9 kWh; name gross_el; lognormal variance with pedigree 0.0018, pedigree (2,1,1,1,2)
  Literature and calculated value. Annual production volume data were extracted from the annual thermal electricity generation report of Central Electricity Authority, India (CEA, 2013). The Annual Production Volume is for the time period of 01.04.2012 - 31.03.2013 since CEA documents annual electricity production data for the mentioned time period.
  CEA. (2013). Region Wise, State Wise, Sector Wise, Type Wise, Station Wise, Unit Wise Generation Report For 31-Mar-2013. Central Electricity Authority (CEA). Retrieved from 04 December, 2016 http://cea.nic.in/reports/daily/dgr/2013/March/31/dgr2.pdf

## Reference product
- electricity, high voltage: 1 kWh; name amount_RP; By-product classification allocatable product; CPC 17100: Electrical energy
  production volume 3.10595e9 kWh; name apv_electricity; = gross_el*(1- gross_net_electricity)
    Literature and calculated value. Annual production volume data were extracted from the annual thermal electricity generation report of Central Electricity Authority, India (CEA, 2013). The Annual Production Volume is for the time period of 01.04.2012 - 31.03.2013 since CEA documents annual electricity production data for the mentioned time period.
  property price 0.0977 EUR2005
    Temporary price data. Calculated as 90% of purchasers price based on: 94% of the average price (to account for a 6% loss in transformation and transmission) for electricity for industrial consumersin 2005 (excluded taxes). From IEA.

## By-products
- iron scrap, unsorted: 0 kg; CPC 39310: Slag, dross, scalings and other waste from the manufacture of iron or steel; By-product classification Recyclable; pedigree (1,1,1,1,1)
  Estimated value. Same amount entering the dataset is estimated as by-product
  production volume 0 kg; = apv_electricity * (BP_amount_2 / amount_RP)
    Calculated from production volume of reference product using the relative outputs.
  property price 0.149 EUR2005
    Temporary price data. Calculated as 90% of purchasers price based on: estimated at 85% of sorted scrap
  property carbon content 0
    carbon content on a dry matter basis (reserved; not for manual entry)
  properties: dry mass 1 kg, carbon content, fossil 0, carbon content, non-fossil 0, wet mass 1 kg, water content 0, water in wet mass 0 kg, carbon allocation 0 kg
- waste paper, unsorted: 0 kg; By-product classification Recyclable; CPC 39240: Waste and scrap of paper or paperboard; pedigree (1,1,1,1,1)
  Estimated value. Measured/calculated value for Quebec is extrapolated for GLO.
  production volume 0 kg; = waste_paper* apv_electricity/amount_RP
    Calculated from production volume of reference product using the relative outputs.
  property price 0.093 EUR2005; name waste_paper_price_EUR2005
    Temporary price data. Calculated as 90% of purchasers price based on: Assumed to be 10% less than for sorted waste paper
  properties: heating value, net 14.11 MJ

## Inputs from technosphere
- fly ash and scrubber sludge: -2.41935e-5 kg; name fly_ash; lognormal variance with pedigree 0.0059, pedigree (2,4,3,3,2)
  Estimated value. Measured/calculated value for Quebec is extrapolated for GLO.
  production volume 75144.1 kg; = fly_ash* apv_electricity/amount_RP
    Calculated from production volume of reference product using the relative outputs.
  property price 0 EUR2005; name fly_ash_price_EUR2005
  properties: water content 9, dry mass 0.1 kg, wet mass 1 kg, carbon content, fossil 0.167
  note on carbon content, fossil: Tab A.6, ecoinvent v2.2 report 13_I. C content has been calculated after data in the tables, and then referred to 1 kg DM
- carbon dioxide, liquid: 4.53281e-7 kg; lognormal variance with pedigree 0.0053, pedigree (2,4,3,3,1)
  Estimated value. Measured/calculated value for Quebec is extrapolated for GLO.
  properties: dry mass 1 kg, heating value, net 8.27 MJ, carbon content, fossil 0.272727, wet mass 1 kg
- lubricating oil: 4.89433e-7 kg; name lubricatingOil; lognormal variance with pedigree 0.0059, pedigree (2,4,3,3,2)
  Estimated value. Measured/calculated value for Quebec is extrapolated for GLO.
  properties: wet mass 1 kg, carbon content, fossil 0.75, heating value, net 40.2 MJ, dry mass 1 kg
  note on carbon content, fossil: Lubricating oil is produced from diesel. C-content/dry mass of fats and oils considered 75%, from: ecoinvent v2.2 report, n 15a, pg 40
  note on heating value, net: Literature value, Source: IPCC 2006, 2006 IPCC Guidelines for National Greenhouse Gas Inventories, Prepared by the National Greenhouse Gas Inventories Programme, Eggleston H.S., Buendia L., Miwa K., Ngara T. and Tanabe K. (eds). Published: IGES, Japan
- waste reinforced concrete: -0.0142102 kg; name BP_amount_3; = (concrete*DM_concrete)*-1; lognormal variance with pedigree 0.21, pedigree (5,5,5,5,5)
  Estimated value. Same amount entering the dataset is estimated as by-product
  production volume 4.41363e7 kg; = apv_electricity * (BP_amount_3 / amount_RP)
    Calculated from production volume of reference product using the relative outputs.
  property price 0 EUR2005; name BP_amount_3_price_EUR2005
  properties: wet mass 1 kg, water content 0.00585407, dry mass 0.99418 kg
- sodium hypochlorite, without water, in 15% solution state: 5.56174e-8 kg; lognormal variance with pedigree 0.0059, pedigree (2,4,3,3,2)
  Estimated value. Measured/calculated value for Quebec is extrapolated for GLO.
  properties: wet mass 1 kg, dry mass 1 kg
- helium: 4.89433e-7 kg; lognormal variance with pedigree 0.0059, pedigree (2,4,3,3,2)
  Estimated value. Measured/calculated value for Quebec is extrapolated for GLO.
  properties: dry mass 1 kg, wet mass 1 kg
- hazardous waste, for incineration: -2.36374e-6 kg; name haz_waste; lognormal variance with pedigree 0.0059, pedigree (2,4,3,3,2)
  Estimated value. Measured/calculated value for Quebec is extrapolated for GLO.
  production volume 7341.66 kg; = haz_waste* apv_electricity/amount_RP
    Calculated from production volume of reference product using the relative outputs.
  property price 0 EUR2005; name haz_waste_price_EUR2005
  properties: dry mass 0.75 kg, water content 0.333333, wet mass 1 kg, heating value, net 17 MJ, carbon content, fossil 0.554667
  note on heating value, net: Value taken from the general comment of the treatment dataset.
- reinforcing steel: 6.95217e-7 kg; name reinforcing_steel; lognormal variance with pedigree 0.0059, pedigree (2,4,3,3,2)
  Estimated value. Measured/calculated value for Quebec is extrapolated for GLO.
  properties: dry mass 1 kg, carbon content, fossil 0.004, wet mass 1 kg
- sodium hydroxide, without water, in 50% solution state: 2.34983e-5 kg; lognormal variance with pedigree 0.0059, pedigree (2,4,3,3,2)
  Estimated value. Measured/calculated value for Quebec is extrapolated for GLO.
  properties: dry mass 1 kg, wet mass 1 kg, heating value, net 3.03 MJ
- spent nuclear fuel: -2.25899e-5 kg; name spent_nuclear_fuel; lognormal variance with pedigree 0.0059, pedigree (2,4,3,3,2)
  Estimated value. Measured/calculated value for Quebec is extrapolated for GLO.Amount of spent fuel produced per year plus concrete of storage modules
  production volume 70163.2 kg; = spent_nuclear_fuel * apv_electricity/amount_RP
    Calculated from production volume of reference product using the relative outputs.
  property price 0 EUR2005; name spent_nuclear_fuel_price_EUR2005
  properties: dry mass 1 kg, wet mass 1 kg
- chemical, organic: 1.19855e-6 kg; lognormal variance with pedigree 0.0059, pedigree (2,4,3,3,2)
  Estimated value. Measured/calculated value for Quebec is extrapolated for GLO.
  properties: wet mass 1 kg, heating value, net 19.03 MJ, dry mass 1 kg, carbon content, fossil 0.628
  note on carbon content, fossil: This dataset is an unweighted average of 20 organic substances (listed in Tab 88.1, ecoinvent v2.2 report 8, part II), being part of the top100 chemicals included in this database. The C-content has also been calculated as an unweighted average of the C content of the substances composing this dataset.
- steel, low-alloyed, hot rolled: 1.6e-6 kg; name steel; lognormal variance with pedigree 0.0059, pedigree (2,4,3,3,2)
  Estimated value. Measured/calculated value for Quebec is extrapolated for GLO.
  properties: carbon content, fossil 0.005, dry mass 1 kg, wet mass 1 kg
  note on carbon content, fossil: Low alloyed steel composition given in Tab. 3.2 ecoinvent v2.2 report 10_partII. Steel assumed to have a C content of 0.5%
- diesel, burned in diesel-electric generating set, 10MW: 7.19027e-5 MJ; lognormal variance with pedigree 0.0059, pedigree (2,4,3,3,2)
  Estimated value. Measured/calculated value for Quebec is extrapolated for GLO.
  property heating value, gross 45.4 MJ; name GHVDiesel
  property density 0.84 kg/l; name densityDiesel
  property kgFuel_Input 5695.2 kg; name inputDiesel; = 6.78E+03*densityDiesel
  properties: heating value, net 1 MJ
  note on heating value, gross: Literature value. gross (upper) heating (calorific) value. Ecoinvent
- transport, freight, light commercial vehicle: 5.06863e-5 metric ton*km; lognormal variance with pedigree 0.0059, pedigree (2,4,3,3,2)
  Estimated value. Measured/calculated value for Quebec is extrapolated for GLO. This vehicle use corresponds to maintenance and operation services related to the operation of the whole company. Transports have been distributed among different activities (electricity production, transport and distribution) according to their respective use of these transports and, when the exact distribution was not available, according to the relative expenses of each activity.
- scrap steel: -2.29522e-6 kg; name BP_amount_1; = (reinforcing_steel+ steel)*-1; lognormal variance with pedigree 0.21, pedigree (5,5,5,5,5)
  Estimated value. Same amount entering the dataset is estimated as by-product
  production volume 7128.84 kg; = apv_electricity * (BP_amount_1 / amount_RP)
    Calculated from production volume of reference product using the relative outputs.
  property price 0 EUR2005; name BP_amount_1_price_EUR2005
  properties: wet mass 1 kg, dry mass 1 kg
- uranium hexafluoride: 2.36374e-5 kg; lognormal variance with pedigree 0.0059, pedigree (2,4,3,3,2)
  Estimated value. Measured/calculated value for Quebec is extrapolated for GLO.
  As CANDU reactors use natural uranium (unenriched UO2) but no data were collected for UO2 production (impurities removal from yellowcake, refining to UO3 and conversion to UO2) uranium hexafluoride is used as proxy (UO3 is used to produce both UO2 and UF6).
  properties: wet mass 1 kg, dry mass 1 kg
- cast iron: 6.95217e-7 kg; name iron; lognormal variance with pedigree 0.0059, pedigree (2,4,3,3,2)
  Estimated value. Measured/calculated value for Quebec is extrapolated for GLO.
  properties: dry mass 1 kg, carbon content, fossil 0.04, wet mass 1 kg
  note on carbon content, fossil: Cast iron is made by remelting pig iron in small furnaces (e.g. cupola furnaces or electric arc furnaces) and poured into moulds to make castings. It usually contains 2% to 6% carbon (ecoinvent v2.2 report 10_partII). An average content of 4% was considered
- chlorodifluoromethane: 2.8921e-8 kg; lognormal variance with pedigree 0.0059, pedigree (2,4,3,3,2)
  Estimated value. Measured/calculated value for Quebec is extrapolated for GLO.
  properties: wet mass 1 kg, heating value, net 5.61 MJ, dry mass 1 kg, carbon content, fossil 0.139535
- transport, freight, lorry, unspecified: 9.55882e-5 metric ton*km; lognormal variance with pedigree 0.1253, pedigree (2,4,3,3,2)
  (same comment as for transport, freight, light commercial vehicle)
- sodium percarbonate, powder: 1.6129e-6 kg; lognormal variance with pedigree 0.0059, pedigree (2,4,3,3,2)
  Estimated value. Measured/calculated value for Quebec is extrapolated for GLO.
  properties: dry mass 1 kg, carbon content, fossil 0.0902256, wet mass 1 kg, heating value, net 4.63 MJ
- anionic resin: 1.01235e-9 kg; lognormal variance with pedigree 0.0059, pedigree (2,4,3,3,2)
  Estimated value. Measured/calculated value for Quebec is extrapolated for GLO.
  property density 0.76 kg/l; name density_resinA
  properties: carbon content, fossil 0.680721, dry mass 0.5 kg, heating value, net 9.09 MJ, wet mass 1 kg, water content 1
  note on density: Literature value. Bulk density between 560 and 960. Source: DOWEX. Fundamentals of Ion Exchange http://msdssearch.dow.com/PublishedLiteratureDOWCOM/dh_0032/0901b803800326ca.pdf?filepath=liquidseps/pdfs/noreg/177-01837.pdf&fromPage=GetDoc
  note on carbon content, fossil: Cross-linked polystyrene beads are treated with chloromethyl methyl ether under anhydrous conditions, with either aluminum chloride or tin(IV) chloride as catalyst. Chloromethylated polystyrene is obtained. In a second stage, the chlorine in the chloromethylated group can be replaced by an amine (Anion exchange resins, in Ullmann). In this case, Trimethylamine, C3H9N, is used (ecoinvent v2.2 report 8-part 93). That is, the resine can be formulated as C12H18NCl (after Ullmann, Anion exchange resins). The resine is hydrated (ecoinvent v2.2 report 8, part II, Tab 93.7)
- transport, helicopter: 2.51634e-7 hour; lognormal variance with pedigree 0.1253, pedigree (2,4,3,3,2)
  (same comment as for transport, freight, light commercial vehicle)
- hydrazine: 3.42047e-7 kg; lognormal variance with pedigree 0.0059, pedigree (2,4,3,3,2)
  Estimated value. Measured/calculated value for Quebec is extrapolated for GLO.
  properties: dry mass 1 kg, heating value, net 15.13 MJ, wet mass 1 kg
- nitrogen, liquid: 5.64516e-7 kg; lognormal variance with pedigree 0.0059, pedigree (2,4,3,3,2)
  Estimated value. Measured/calculated value for Quebec is extrapolated for GLO.
  properties: wet mass 1 kg, dry mass 1 kg
- heavy water: 5.56174e-7 kg; lognormal variance with pedigree 0.0059, pedigree (2,4,3,3,2)
  Estimated value. Measured/calculated value for Quebec is extrapolated for GLO.
  properties: wet mass 1 kg
- concrete, normal: 6.48869e-6 m3; name concrete; lognormal variance with pedigree 0.0059, pedigree (2,4,3,3,2)
  Estimated value. Measured/calculated value for Quebec is extrapolated for GLO.
  property dry mass 2190 kg; name DM_concrete
  properties: wet mass 2380 kg, water content 0.086758
- sulfuric acid: 7.31368e-5 kg; lognormal variance with pedigree 0.0059, pedigree (2,4,3,3,2)
  Estimated value. Measured/calculated value for Quebec is extrapolated for GLO.
  properties: dry mass 1 kg, wet mass 1 kg
- aluminium sulfate, powder: 1.00389e-5 kg; lognormal variance with pedigree 0.0059, pedigree (2,4,3,3,2)
  Estimated value. Measured/calculated value for Quebec is extrapolated for GLO.
  properties: dry mass 1 kg, wet mass 1 kg
- chlorine, liquid: 2.52503e-6 kg; lognormal variance with pedigree 0.0059, pedigree (2,4,3,3,2)
  Estimated value. Measured/calculated value for Quebec is extrapolated for GLO.
  properties: dry mass 1 kg, wet mass 1 kg
- tap water: 0.0182147 kg; name drinking_water; lognormal variance with pedigree 0.0059, pedigree (2,4,3,3,2)
  Estimated value. Measured/calculated value for Quebec is extrapolated for GLO.
  properties: wet mass 1 kg, carbon content, fossil 0.00178991, dry mass 0.000337476 kg, water content 2962.17
  note on carbon content, fossil: Bicarbonate content is 2.93 mol/m3. CO2 content is 0.1 mol/m3 (ecoinvent v2.2 report 8, Tab 93.1).
- waste mineral oil: -2.64182e-6 kg; name waste_oil; lognormal variance with pedigree 0.0059, pedigree (2,4,3,3,2)
  Estimated value. Measured/calculated value for Quebec is extrapolated for GLO.
  production volume 8205.39 kg; = waste_oil* apv_electricity/amount_RP
    Calculated from production volume of reference product using the relative outputs.
  property price 0 EUR2005; name waste_oil_price_EUR2005
  properties: water content 0.111111, carbon content, fossil 0.864444, dry mass 0.9 kg, wet mass 1 kg, heating value, net 34.7 MJ
- transport, passenger car: 4.27451e-5 km; lognormal variance with pedigree 0.0059, pedigree (2,4,3,3,2)
  (same comment as for transport, freight, light commercial vehicle)
- nuclear power plant, pressure water reactor, 650MW: 8.01934e-12 unit; = 1/(lifetime*650000*8760*0.73); lognormal variance with pedigree 0.0059, pedigree (2,4,3,3,2)
  Calculated generic value, not country specific.The amount of infrastructure input is calculated based on the assumption of an average lifetime of 30 years for this type of power plant. An average load factor for nuclear power plants of 73% was applied (PRIS database, 2018).
  Reference(s): International Atomic Energy Agency. 2018. Power Reactor Information System (PRIS), World Statistics, Load Factor, accessible online athttps://pris.iaea.org/PRIS/WorldStatistics/WorldTrendinAverageLoadFactor.aspx, last accessed February 2018
  property lifetime 30 year; name lifetime
- low level radioactive waste for final repository: -8.95439e-9 m3; name low_level_waste_final; lognormal variance with pedigree 0.0059, pedigree (2,4,3,3,2)
  Estimated value. Measured/calculated value for Quebec is extrapolated for GLO.
  production volume 27.8119 m3; = low_level_waste_final * apv_electricity/amount_RP
    Calculated from production volume of reference product using the relative outputs.
  property price 0 EUR2005; name low_level_waste_final_price_EUR2005
  properties: dry mass 2500 kg, wet mass 2500 kg
- hydrogen, liquid: 1.28754e-6 kg; lognormal variance with pedigree 0.0059, pedigree (2,4,3,3,2)
  Estimated value. Measured/calculated value for Quebec is extrapolated for GLO.
  properties: dry mass 1 kg, heating value, net 120.21 MJ, wet mass 1 kg
- paper, woodfree, coated: 1.16796e-5 kg; = waste_paper; lognormal variance with pedigree 0.002, pedigree (1,1,3,1,1)
  Estimated value. Measured/calculated value for Quebec is extrapolated for GLO.
  Uncertainty: C
  properties: dry mass 0.945 kg, water content 0.0582011, wet mass 1 kg, carbon content, fossil 0.0590617, carbon content, non-fossil 0.22775, heating value, net 14.11 MJ
  note on carbon content, fossil: Fossil C content was calculated after fossil C contents of chemicals used in the production of the paper (in Tab 8.72 & 8.73 ecoinvent v2.2 report 11_III, part 8).
  note on carbon content, non-fossil: Biogenic C content was calculated after biogenic C contents of chemicals used in the production of the paper (in Tab 8.72 & 8.73 ecoinvent v2.2 report 11_III, part 8). The cellulose content in 1 kg of paper (on a wet mas basis) was estimated as (1-chemical content), C content of cellulose was considered 0.44 kgC/kg dry mass (ecoinvent v2.2 report, n 15a, pg 40)
- low level radioactive waste: -1.91046e-9 m3; name low_level_waste; lognormal variance with pedigree 0.0059, pedigree (2,4,3,3,2)
  Estimated value. Measured/calculated value for Quebec is extrapolated for GLO.
  production volume 5.93379 m3; = low_level_waste* apv_electricity/amount_RP
    Calculated from production volume of reference product using the relative outputs.
  property price 0 EUR2005; name low_level_waste_price_EUR2005
  properties: dry mass 2500 kg, wet mass 2500 kg
- cationic resin: 4.03671e-10 kg; lognormal variance with pedigree 0.0059, pedigree (2,4,3,3,2)
  Estimated value. Measured/calculated value for Quebec is extrapolated for GLO.
  property density 0.76 kg/l; name density_resinC
  properties: dry mass 0.5 kg, wet mass 1 kg, heating value, net 6.68 MJ, carbon content, fossil 0.521606, water content 1
  note on carbon content, fossil: Chemically inert polystyrene beads are treated with concentrated sulfuric or chlorosulfonic acid to give cross-linked polystyrene 3-sulfonic acid (Cation exchange resins, Ullmann). The resine was approximated as C8H8O3S (from Ullmann, Cation exchange resins). The resine is hydrated (ecoinvent v2.2 report 8, part II, Tab 93.5)
- municipal solid waste: -1.87987e-5 kg; name municipal_solid_waste; lognormal variance with pedigree 0.0059, pedigree (2,4,3,3,2)
  Estimated value. Measured/calculated value for Quebec is extrapolated for GLO.
  production volume 58387.8 kg; = municipal_solid_waste* apv_electricity/amount_RP
    Calculated from production volume of reference product using the relative outputs.
  property price 0 EUR2005; name municipal_solid_waste_price_EUR2005
  properties: heating value, net 11.74 MJ, water content 0.297017, carbon content, non-fossil 0.261655, wet mass 1 kg, dry mass 0.771 kg, carbon content, fossil 0.171549
  note on carbon content, non-fossil: MSW composition in tab 4.1, ecoinvent v2.2 report 13_I. C content referred to 1 kg DM
- iron scrap, unsorted: -6.95217e-7 kg; lognormal variance with pedigree 0.21, pedigree (5,5,5,5,5)
  Estimated value. Same amount entering the dataset is estimated as by-product
  production volume 2159.31 kg
  properties: price 0.149 EUR2005, dry mass 1 kg, wet mass 1 kg
- waste paper, unsorted: -1.16796e-5 kg; lognormal variance with pedigree 0.0059, pedigree (2,4,3,3,2)
  Estimated value. Measured/calculated value for Quebec is extrapolated for GLO.
  production volume 36276.4 kg

## Inputs from nature
- Water, cooling, unspecified natural origin [natural resource, in water]: 0.165934 m3; name cooling_water; lognormal variance with pedigree 0.0444, pedigree (2,4,5,4,2)
  Estimated value. Measured/calculated value for Quebec is extrapolated for GLO.
- Water, river [natural resource, in water]: 0.0184372 m3; name process_water; lognormal variance with pedigree 0.0059, pedigree (2,4,3,3,2)
  Estimated value. Measured/calculated value for Quebec is extrapolated for GLO.

## Emissions to nature
- Cobalt-60 [water, surface water]: 0.000700779 kBq; lognormal variance with pedigree 0.0059, pedigree (2,4,3,3,2)
  Estimated value. Measured/calculated value for Quebec is extrapolated for GLO.
- Strontium-89 [water, surface water]: 3.65e-6 kBq; lognormal variance with pedigree 0.4706, pedigree (2,5,5,5,5)
  Estimated value. Value extrapolated from a different PWR technology.
- Cerium-144 [water, surface water]: 4.82e-7 kBq; lognormal variance with pedigree 0.4706, pedigree (2,5,5,5,5)
  Estimated value. Value extrapolated from a different PWR technology.
- Iodine-133 [water, surface water]: 4.16e-7 kBq; lognormal variance with pedigree 0.4706, pedigree (2,5,5,5,5)
  Estimated value. Value extrapolated from a different PWR technology.
- Technetium-99m [water, surface water]: 2.81e-6 kBq; lognormal variance with pedigree 0.4706, pedigree (2,5,5,5,5)
  Estimated value. Value extrapolated from a different PWR technology.
- Carbon-14 [air, non-urban air or from high stacks]: 2.45829e-5 kBq; lognormal variance with pedigree 0.3053, pedigree (2,4,3,3,2)
  Estimated value. Measured/calculated value for Quebec is extrapolated for GLO.
- Niobium-95 [air, non-urban air or from high stacks]: 0.0286429 kBq; lognormal variance with pedigree 0.0059, pedigree (2,4,3,3,2)
  Estimated value. Measured/calculated value for Quebec is extrapolated for GLO.
- Radioactive species, other beta emitters [air, non-urban air or from high stacks]: 8.67e-8 kBq; lognormal variance with pedigree 0.4706, pedigree (2,5,5,5,5)
  Estimated value. Value extrapolated from a different PWR technology.
- Cesium-134 [water, surface water]: 0.00014683 kBq; lognormal variance with pedigree 0.0059, pedigree (2,4,3,3,2)
  Estimated value. Measured/calculated value for Quebec is extrapolated for GLO.
- Sodium-24 [water, surface water]: 9.98e-6 kBq; lognormal variance with pedigree 0.4706, pedigree (2,5,5,5,5)
  Estimated value. Value extrapolated from a different PWR technology.
- Iron-59 [water, surface water]: 0.0233593 kBq; lognormal variance with pedigree 0.0059, pedigree (2,4,3,3,2)
  Estimated value. Measured/calculated value for Quebec is extrapolated for GLO.
- Krypton-85m [air, non-urban air or from high stacks]: 0.00987 kBq; lognormal variance with pedigree 0.4706, pedigree (2,5,5,5,5)
  Estimated value. Value extrapolated from a different PWR technology.
- Zirconium-95 [air, non-urban air or from high stacks]: 5.78e-8 kBq; lognormal variance with pedigree 0.4706, pedigree (2,5,5,5,5)
  Estimated value. Value extrapolated from a different PWR technology.
- Xenon-135 [air, non-urban air or from high stacks]: 0.166 kBq; lognormal variance with pedigree 0.4706, pedigree (2,5,5,5,5)
  Estimated value. Value extrapolated from a different PWR technology.
- Antimony-122 [water, surface water]: 9.04e-7 kBq; lognormal variance with pedigree 0.4706, pedigree (2,5,5,5,5)
  Estimated value. Value extrapolated from a different PWR technology.
- Suspended solids, unspecified [water, surface water]: 1.76585e-5 kg; lognormal variance with pedigree 0.0059, pedigree (2,4,3,3,2)
  Estimated value. Measured/calculated value for Quebec is extrapolated for GLO.
- Iodine-133 [air, non-urban air or from high stacks]: 1.82e-6 kBq; lognormal variance with pedigree 0.4706, pedigree (2,5,5,5,5)
  Estimated value. Value extrapolated from a different PWR technology.
- Aerosols, radioactive, unspecified [air, non-urban air or from high stacks]: 1.3376e-6 kBq; lognormal variance with pedigree 0.0059, pedigree (2,4,3,3,2)
  Estimated value. Measured/calculated value for Quebec is extrapolated for GLO.
- Barium-140 [air, non-urban air or from high stacks]: 3.17e-10 kBq; lognormal variance with pedigree 0.4706, pedigree (2,5,5,5,5)
  Estimated value. Value extrapolated from a different PWR technology.
- Water [air, non-urban air or from high stacks]: 0.0368743 m3; = 0.2*(cooling_water+process_water); lognormal variance with pedigree 0.0073, pedigree (3,4,3,3,2)
  Estimated value. Estimation based on input of water. It is assumed that 20% of cooling water is evaporated and 80% is rejected to the river
- Antimony-125 [air, non-urban air or from high stacks]: 2.34e-8 kBq; lognormal variance with pedigree 0.4706, pedigree (2,5,5,5,5)
  Estimated value. Value extrapolated from a different PWR technology.
- Antimony-124 [air, non-urban air or from high stacks]: 4.75e-10 kBq; lognormal variance with pedigree 0.4706, pedigree (2,5,5,5,5)
  Estimated value. Value extrapolated from a different PWR technology.
- Molybdenum-99 [water, surface water]: 6e-9 kBq; lognormal variance with pedigree 0.3433, pedigree (2,2,5,5,2)
  Estimated value. Value extrapolated from a different PWR technology.
- Water [water, surface water]: 0.147515 m3; = 0.8*(cooling_water+process_water)+(drinking_water/1000); lognormal variance with pedigree 0.0133, pedigree (4,4,3,3,2)
  (same comment as for Water)
- Cobalt-57 [water, surface water]: 8.92e-6 kBq; lognormal variance with pedigree 0.4706, pedigree (2,5,5,5,5)
  Estimated value. Value extrapolated from a different PWR technology.
- Tellurium-123m [water, surface water]: 1.57e-6 kBq; lognormal variance with pedigree 0.4706, pedigree (2,5,5,5,5)
  Estimated value. Value extrapolated from a different PWR technology.
- Zinc-65 [water, surface water]: 0.00183537 kBq; lognormal variance with pedigree 0.0059, pedigree (2,4,3,3,2)
  Estimated value. Measured/calculated value for Quebec is extrapolated for GLO.
- Cesium-137 [water, surface water]: 0.000206897 kBq; lognormal variance with pedigree 0.0059, pedigree (2,4,3,3,2)
  Estimated value. Measured/calculated value for Quebec is extrapolated for GLO.
- Cesium-137 [air, non-urban air or from high stacks]: 7.28e-9 kBq; lognormal variance with pedigree 0.4706, pedigree (2,5,5,5,5)
  Estimated value. Value extrapolated from a different PWR technology.
- Antimony-124 [water, surface water]: 0.0256952 kBq; lognormal variance with pedigree 0.3053, pedigree (2,4,3,3,2)
  Estimated value. Measured/calculated value for Quebec is extrapolated for GLO.
- Strontium-90 [water, surface water]: 1.3e-6 kBq; lognormal variance with pedigree 0.4706, pedigree (2,5,5,5,5)
  Estimated value. Value extrapolated from a different PWR technology.
- Hydrocarbons, unspecified [water, surface water]: 1.23471e-6 kg; lognormal variance with pedigree 0.0059, pedigree (2,4,3,3,2)
  Estimated value. Measured/calculated value for Quebec is extrapolated for GLO.
- Iodine-131 [water, surface water]: 0.00500556 kBq; lognormal variance with pedigree 0.0059, pedigree (2,4,3,3,2)
  Estimated value. Measured/calculated value for Quebec is extrapolated for GLO.
- Ruthenium-103 [water, surface water]: 2.85e-7 kBq; lognormal variance with pedigree 0.4706, pedigree (2,5,5,5,5)
  Estimated value. Value extrapolated from a different PWR technology.
- Radioactive species, alpha emitters [water, surface water]: 3.02e-8 kBq; lognormal variance with pedigree 0.4706, pedigree (2,5,5,5,5)
  Estimated value. Value extrapolated from a different PWR technology.
- Iodine-131 [air, non-urban air or from high stacks]: 3.61513e-7 kBq; lognormal variance with pedigree 0.0059, pedigree (2,4,3,3,2)
  Estimated value. Measured/calculated value for Quebec is extrapolated for GLO.
- Niobium-95 [water, surface water]: 3.07e-6 kBq; lognormal variance with pedigree 0.4706, pedigree (2,5,5,5,5)
  Estimated value. Value extrapolated from a different PWR technology.
- Tellurium-132 [water, surface water]: 8.42e-8 kBq; lognormal variance with pedigree 0.4706, pedigree (2,5,5,5,5)
  Estimated value. Value extrapolated from a different PWR technology.
- Cobalt-60 [air, non-urban air or from high stacks]: 7.57e-8 kBq; lognormal variance with pedigree 0.4706, pedigree (2,5,5,5,5)
  Estimated value. Value extrapolated from a different PWR technology.
- Carbon-14 [water, surface water]: 0.00286429 kBq; lognormal variance with pedigree 0.0059, pedigree (2,4,3,3,2)
  Estimated value. Measured/calculated value for Quebec is extrapolated for GLO.
- Chromium-51 [water, surface water]: 7.56e-6 kBq; lognormal variance with pedigree 0.4706, pedigree (2,5,5,5,5)
  Estimated value. Value extrapolated from a different PWR technology.
- Silver-110 [air, non-urban air or from high stacks]: 3.13e-9 kBq; lognormal variance with pedigree 0.4706, pedigree (2,5,5,5,5)
  Estimated value. Value extrapolated from a different PWR technology.
- Cerium-141 [water, surface water]: 1.76e-7 kBq; lognormal variance with pedigree 0.4706, pedigree (2,5,5,5,5)
  Estimated value. Value extrapolated from a different PWR technology.
- Noble gases, radioactive, unspecified [air, non-urban air or from high stacks]: 0.259 kBq; lognormal variance with pedigree 0.4706, pedigree (2,5,5,5,5)
  Estimated value. Value extrapolated from a different PWR technology.
- Silver-110 [water, surface water]: 4.43e-6 kBq; lognormal variance with pedigree 0.4706, pedigree (2,5,5,5,5)
  Estimated value. Value extrapolated from a different PWR technology.
- Hydrogen-3, Tritium [water, surface water]: 133.482 kBq; lognormal variance with pedigree 0.0059, pedigree (2,4,3,3,2)
  Estimated value. Measured/calculated value for Quebec is extrapolated for GLO.
- Zirconium-95 [water, surface water]: 0.0116796 kBq; lognormal variance with pedigree 0.3053, pedigree (2,4,3,3,2)
  Estimated value. Measured/calculated value for Quebec is extrapolated for GLO.
- Lanthanum-140 [water, surface water]: 4.95e-7 kBq; lognormal variance with pedigree 0.4706, pedigree (2,5,5,5,5)
  Estimated value. Value extrapolated from a different PWR technology.
- Cobalt-58 [air, non-urban air or from high stacks]: 1.64e-8 kBq; lognormal variance with pedigree 0.4706, pedigree (2,5,5,5,5)
  Estimated value. Value extrapolated from a different PWR technology.
- Cesium-136 [water, surface water]: 2.81e-7 kBq; lognormal variance with pedigree 0.4706, pedigree (2,5,5,5,5)
  Estimated value. Value extrapolated from a different PWR technology.
- Xenon-133 [air, non-urban air or from high stacks]: 0.604 kBq; lognormal variance with pedigree 0.4706, pedigree (2,5,5,5,5)
  Estimated value. Value extrapolated from a different PWR technology.
- Antimony-125 [water, surface water]: 4.17e-5 kBq; lognormal variance with pedigree 0.4706, pedigree (2,5,5,5,5)
  Estimated value. Value extrapolated from a different PWR technology.
- Manganese-54 [water, surface water]: 1.31e-5 kBq; lognormal variance with pedigree 0.4706, pedigree (2,5,5,5,5)
  Estimated value. Value extrapolated from a different PWR technology.
- Cobalt-58 [water, surface water]: 0.00114 kBq; lognormal variance with pedigree 0.4706, pedigree (2,5,5,5,5)
  Estimated value. Value extrapolated from a different PWR technology.

## Sampling procedure
The inventory is generated using statistical data, literature data and modelling.

## Extrapolations
This dataset has been extrapolated from year 2015 to the year of the calculation (2021). The uncertainty has been adjusted accordingly.

## Review by Karin Treyer 2017-01-05
This dataset has been produced in a project on regionalisation of the Indian electricity mix on a states level.
In general, only key parameters have been adjusted to region-specific conditions, such as the electrical efficiency or power plants own use of electricity (losses from gross to net electricity). Whenever more accurate data will be available on e.g. region-specific emissions from power plants, these should be included in this dataset.
