# EUR-flat pallet production

Dataset: EcoSpold 2, unit process
Geography: RoW
Time period: 2000-01-01 to 2021-12-31
Technology level: current
Classification: EcoSpold01Categories: wooden materials/processing
Classification: ISIC rev.4 ecoinvent: 1623:Manufacture of wooden containers
Synonyms: stillage; Palett
Tags: ConvertedDataset
Scenario: Business-as-Usual
System model: Allocation, cut-off by classification
Generated by: Daniel Kellenberger (obsolete)
Published in: Kellenberger D. 2007
Database: ecoinvent
isCopyrightProtected: true
accessRestrictedTo: 1

## General comment
Module includes only materials (no production process) and should only be used for the packing and transportation of products.
[This dataset was already contained in the ecoinvent database version 2. It was not individually updated during the transfer to ecoinvent version 3. Life Cycle Impact Assessment results may still have changed, as they are affected by changes in the supply chain, i.e. in other datasets. This dataset was generated following the ecoinvent quality guidelines for version 2. It may have been subject to central changes described in the ecoinvent version 3 change report (http://www.ecoinvent.org/database/ecoinvent-version-3/reports-of-changes/), and the results of the central updates were reviewed extensively. The changes added e.g. consistent water flows and other information throughout the database. The documentation of this dataset can be found in the ecoinvent reports of version 2, which are still available via the ecoinvent website. The change report linked above covers all central changes that were made during the conversion process.]

## Included activities end
Includes only the materials and not the process of construction. The examined system is from gate to gate and as in most cases the paletts have a long life-span the waste treatment is not included. It must be included in the packing module

## Technology
Standard composition of materials

## Reference product
- EUR-flat pallet: 1 unit; By-product classification allocatable product; CPC 31700: Packing cases, boxes, crates, drums and similar packings, of wood; cable-drums of wood; pallets, box pallets a[…]
  production volume 6.6e8 unit
    Extrapolated as 3.2 times European production volume
  property price 7.97924 EUR2005
    Calculated based on inputs: The price of the product has been calculated as a sum of the values of the material and energy inputs for this product. This value is therefore a rough estimation. It may underestimate the real price since there are additional expenses when producing any product. These expences can include for example labour costs, treatment of waste materials and profit for the producer. Please consider carefully whether this level of data quality is acceptable for your application.
  property heating value, net 335.11 MJ
    LHV is calculated based on the Carbon content of the product. More details can be found on the respective documentation.
  property carbon content 0.502805
    carbon content on a dry matter basis (reserved; not for manual entry)
  properties: water content 0.2, dry mass 20.7676 kg, carbon content, non-fossil 0.47167, carbon content, fossil 0.0311351, wet mass 24.9211 kg, water in wet mass 4.15352 kg, carbon allocation 10.4421 kg

## Inputs from technosphere
- sawnwood, board, softwood, raw, dried (u=20%): 0.0335 m3; lognormal variance with pedigree 0.0606, pedigree (2,1,5,5,3)
  properties: wet mass 485.76 kg, dry mass 404.8 kg, heating value, net 5860.46 MJ, carbon content, non-fossil 0.494, water content 0.2
- particleboard, uncoated: 0.0117 m3; lognormal variance with pedigree 0.042, pedigree (1,1,5,5,1)
  EcoSpold01Location=RER
  properties: carbon content, non-fossil 0.4416, carbon content, fossil 0.045339, wet mass 637 kg, dry mass 599.3 kg, water content 0.0629067, heating value, net 8749.71 MJ
- steel, low-alloyed, hot rolled: 0.195 kg; lognormal variance with pedigree 0.0606, pedigree (2,1,5,5,3)
  EcoSpold01Location=RER
  properties: wet mass 1 kg, dry mass 1 kg, carbon content, fossil 0.005
  note on carbon content, fossil: Low alloyed steel composition given in Tab. 3.2 ecoinvent v2.2 report 10_partII. Steel assumed to have a C content of 0.5%

## Sampling procedure
internet search

## Extrapolations
This dataset has been copied from an original dataset covering the geography RER. The uncertainty has been adjusted accordingly.

## Review by Roberto Dones 2003-07-16
passed
