# bitumen seal production, V60

Dataset: EcoSpold 2, unit process
Geography: RER
Time period: 1994-01-01 to 2021-12-31
Technology level: current
Classification: ISIC rev.4 ecoinvent: 2399:Manufacture of other non-metallic mineral products n.e.c.
Classification: EcoSpold01Categories: plastics/others
Tags: ConvertedDataset
Scenario: Business-as-Usual
System model: Allocation, cut-off by classification
Generated by: Martin Lehmann
Published in: Kellenberger D. 2007
Database: ecoinvent
isCopyrightProtected: true
accessRestrictedTo: 1

## General comment
The dataset is applicable in the construction building sector. Bitumen sealing is used to protect the construction against water intrusion.
[This dataset was already contained in the ecoinvent database version 2. It was not individually updated during the transfer to ecoinvent version 3. Life Cycle Impact Assessment results may still have changed, as they are affected by changes in the supply chain, i.e. in other datasets. This dataset was generated following the ecoinvent quality guidelines for version 2. It may have been subject to central changes described in the ecoinvent version 3 change report (http://www.ecoinvent.org/database/ecoinvent-version-3/reports-of-changes/), and the results of the central updates were reviewed extensively. The changes added e.g. consistent water flows and other information throughout the database. The documentation of this dataset can be found in the ecoinvent reports of version 2, which are still available via the ecoinvent website. The change report linked above covers all central changes that were made during the conversion process.]

## Included activities end
The dataset describes the production of bitumen sealing V60. Included processes are the extrusion of polypropylene foil, the fabrication of the sealing, the infrastructure, the transport by road and rail as well as the disposal of the bitumen cuttings in a municipal incineration. The production of bitumen sealing does not include any chemical processes.

## Geography
The data of this dataset is taken from literature studies and producer information.

## Technology
Simple processes involved, a carrier material is being soaked with bitumen. The bitumen coatings are then gritted with minerals (talcum, sand).

## Time period
The production of bitumen sealing has not changed very much over the years, as there are no chemical processes involved.

## Reference product
- bitumen seal, V60: 1 kg; CPC 37940: Bituminous mixtures based on natural and artificial stone materials and bitumen, natural asphalt or related su[…]; By-product classification allocatable product
  EcoSpold01Location=RER
  production volume 1.32237 kg
    This is a placeholder value that does not reflect real-world production volumes. This dataset does not currently require a real-world production volume to work in the database framework, and no actual data were collected yet. This has no negative effect on the results of the ecoinvent database. The placeholder value of this activity was scaled according to the nominal GDP of 2005 (source: United Nations, http://data.un.org/Glossary.aspx?q=GDP+%28current+US%24%29, accessed 20130726) to reflect an appropriate share of the global production volume, which is also a placeholder value.
  property heating value, net 18.01 MJ
    LHV is calculated based on the Carbon content of the product. More details can be found on the respective documentation.
  property price 0.461515 EUR2005
    Calculated based on inputs: The price of the product has been calculated as a sum of the values of the material and energy inputs for this product. This value is therefore a rough estimation. It may underestimate the real price since there are additional expenses when producing any product. These expences can include for example labour costs, treatment of waste materials and profit for the producer. Please consider carefully whether this level of data quality is acceptable for your application.
  property carbon content, fossil 0.594316
    The production of bitumen sealing does not include any chemical processes (ecoinvent v2.2 report 7_part XXIII), C content was then calculated as a weighted average of C content of the different components
  property carbon content 0.594316
    carbon content on a dry matter basis (reserved; not for manual entry)
  properties: water content 0, carbon content, non-fossil 0, dry mass 1 kg, water in wet mass 0 kg, wet mass 1 kg, carbon allocation 0.594316 kg

## Inputs from technosphere
- extrusion, plastic film: 0.00101 kg; lognormal variance with pedigree 0.0527, pedigree (2,4,5,3,1)
  activityLink introduced to establish a direct link to the corresponding regional supply of this product
  EcoSpold01Location=RER
- sand: 0.0217 kg; lognormal variance with pedigree 0.0527, pedigree (2,4,5,3,1)
  EcoSpold01Location=CH
  properties: wet mass 1 kg, dry mass 1 kg
- polypropylene, granulate: 0.00101 kg; lognormal variance with pedigree 0.0527, pedigree (2,4,5,3,1)
  EcoSpold01Location=RER
  properties: heating value, net 32.78 MJ, carbon content, fossil 0.857143, dry mass 1 kg, wet mass 1 kg
  note on heating value, net: Value extracted from "treatment of waste polypropylene, open burning"
  note on carbon content, fossil: Polypropylene is formed by the polymerisation of propylene, C3H6 (ecoinvent v2.2 report 11_II)
- waste glass: -0.00293 kg; lognormal variance with pedigree 0.0707, pedigree (2,4,5,3,3)
  EcoSpold01Location=CH
  production volume 0.00293 kg
    Calculated from the production volume of bitumen seal, V60 in proportion to the respective output amounts.
  properties: heating value, net 0.05 MJ, dry mass 1 kg, wet mass 1 kg
  note on heating value, net: Value extracted from "treatment of waste glass, open dump, very wet infiltration class (1000mm)"
- pitch: 0 kg; pedigree (1,1,1,1,1)
  EcoSpold01Location=RER
  properties: carbon content, fossil 0.83, dry mass 1 kg, wet mass 1 kg, heating value, net 28 MJ
- lime: 0.258 kg; lognormal variance with pedigree 0.05, pedigree (1,1,5,1,1)
  EcoSpold01Location=CH
  composite
  properties: dry mass 1 kg, wet mass 1 kg, carbon content, fossil 0.120005
- glass fibre: 0.0131 kg; lognormal variance with pedigree 0.0527, pedigree (2,4,5,3,1)
  EcoSpold01Location=RER
  properties: wet mass 1 kg, dry mass 1 kg
- chemical factory, organics: 4e-10 unit; lognormal variance with pedigree 0.3527, pedigree (2,4,5,3,1)
  (same comment as for extrusion, plastic film)
- electricity, medium voltage: 0.42 kWh; lognormal variance with pedigree 0.0513, pedigree (2,3,5,3,1)
  EcoSpold01Location=UCTE
- waste bitumen sheet: -0.00716 kg; lognormal variance with pedigree 0.0707, pedigree (2,4,5,3,3)
  EcoSpold01Location=CH
  production volume 0.00716 kg
    (same comment as for waste glass)
  properties: carbon content, fossil 0.643207, water content 0.0152284, wet mass 1 kg, dry mass 0.985 kg, heating value, net 40.2 MJ
  note on carbon content, fossil: The bitumen sheet is made of 63% bitumen, 24% surface spread and filler (assumed to be pure SiO2), 6% carrier fleece (assumed to be PE) and 7% elastomer (assumed to be PS) (ecoinvent v2.2 report 13_I, pg 40). C content of bitumen, PE and PS from Tab A.6 and A.1 (ecoinvent v2.2 report 13_I, pg 40), respectively. C content of waste also given in the dataset
  note on heating value, net: Literature value, Source: IPCC 2006, 2006 IPCC Guidelines for National Greenhouse Gas Inventories, Prepared by the National Greenhouse Gas Inventories Programme, Eggleston H.S., Buendia L., Miwa K., Ngara T. and Tanabe K. (eds). Published: IGES, Japan
- pitch: 0.71033, 0.00467036 kg (2 entries); lognormal variance with pedigree 0.0527, pedigree (2,4,5,3,1)
  EcoSpold01Location=RER

## Emissions to nature
- Benzo(a)pyrene [air, unspecified]: 1.91e-9 kg; lognormal variance with pedigree 0.69, pedigree (1,1,5,1,1)
  estimation
- NMVOC, non-methane volatile organic compounds, unspecified origin [air, unspecified]: 0.00107 kg; lognormal variance with pedigree 0.1727, pedigree (2,4,5,3,1)

## Sampling procedure
Literature, database

## Extrapolations
This dataset has been extrapolated from year 2000 to the year of the calculation (2021). The uncertainty has been adjusted accordingly.

## Review by Rolf Frischknecht 2007-11-07
passed
