# water storage construction

Dataset: EcoSpold 2, unit process
Geography: RoW
Time period: 1993-01-01 to 2021-12-31
Technology level: current
Classification: ISIC rev.4 ecoinvent: 4220:Construction of utility projects
Classification: EcoSpold01Categories: water supply/production
Tags: ConvertedDataset
Scenario: Business-as-Usual
System model: Allocation, cut-off by classification
Share of production covered: 9 %
Generated by: Niels Jungbluth
Published in: Althaus H.-J. 2004
Database: ecoinvent
isCopyrightProtected: true
accessRestrictedTo: 1

## General comment
Estimation for a storage in Marin (NE) with a capacity of 2500 m3. Life time 70 years.
[This dataset was already contained in the ecoinvent database version 2. It was not individually updated during the transfer to ecoinvent version 3. Life Cycle Impact Assessment results may still have changed, as they are affected by changes in the supply chain, i.e. in other datasets. This dataset was generated following the ecoinvent quality guidelines for version 2. It may have been subject to central changes described in the ecoinvent version 3 change report (http://www.ecoinvent.org/database/ecoinvent-version-3/reports-of-changes/), and the results of the central updates were reviewed extensively. The changes added e.g. consistent water flows and other information throughout the database. The documentation of this dataset can be found in the ecoinvent reports of version 2, which are still available via the ecoinvent website. The change report linked above covers all central changes that were made during the conversion process.]

## Included activities end
Materials, transports, disposal for the infrastructure. Estimation for land use. No data for construction work.

## Geography
Data provided by a CH company in Marin (NE).

## Technology
water storage

## Time period
Time of publication.

## Reference product
- water storage: 1 unit; CPC 53231: Aqueducts and other water supply conduits, except pipelines; By-product classification allocatable product
  EcoSpold01Location=CH
  production volume 3.96633 unit
    This is a placeholder value that does not reflect real-world production volumes. This dataset does not currently require a real-world production volume to work in the database framework, and no actual data were collected yet. This has no negative effect on the results of the ecoinvent database.
  property price 5.17473e6 EUR2005
    From UN data http://data.un.org/Data.aspx?q=reservoir&d=ComTrade&f=_l1Code%3a74%3bcmdCode%3a730900 "Reservoirs/tanks/vats/etc, iron/steel capacity >300l" based on existing ecoinvent documentation from ecoinvent v.2.2. (From information in the dataset water storage.), the water storage has capacity of 2500 m3 which is > 300l. Total weight from material inputs: 1811 tonnes.

## Inputs from technosphere
- concrete, normal: 0 m3; pedigree (1,1,1,1,1)
  EcoSpold01Location=CH
  Literature
  Uncertainty: Literature
  properties: water content 0.086758, wet mass 2380 kg, dry mass 2190 kg
- lean concrete: 29.324 m3; lognormal variance with pedigree 0.0532, pedigree (2,3,5,5,1)
  Literature
  EcoSpold01Location=CH
  Uncertainty: Literature
  properties: water content 0.0528846, wet mass 2190 kg, dry mass 2080 kg
- waste reinforced concrete: 0 kg; pedigree (1,1,1,1,1)
  EcoSpold01Location=CH
  Estimation for materials used
  Uncertainty: Estimation for materials used
  production volume 0 kg
    Calculated from the production volume of water storage in proportion to the respective output amounts.
  properties: water content 0.00585407, dry mass 0.99418 kg, wet mass 1 kg
- steel, low-alloyed, hot rolled: 4542 kg; lognormal variance with pedigree 0.0532, pedigree (2,3,5,5,1)
  Literature
  EcoSpold01Location=RER
  Uncertainty: Literature
  properties: wet mass 1 kg, dry mass 1 kg, carbon content, fossil 0.005
  note on carbon content, fossil: Low alloyed steel composition given in Tab. 3.2 ecoinvent v2.2 report 10_partII. Steel assumed to have a C content of 0.5%
- reinforcing steel: 62691 kg; lognormal variance with pedigree 0.0532, pedigree (2,3,5,5,1)
  Literature
  EcoSpold01Location=RER
  Uncertainty: Literature
  properties: carbon content, fossil 0.004, dry mass 1 kg, wet mass 1 kg
- concrete, normal: 15.8998, 1.65674, 13.4125, 7.54452, 31.9489, 1.07762, 631.46 m3 (7 entries); lognormal variance with pedigree 0.0532, pedigree (2,3,5,5,1)
  EcoSpold01Location=CH
  Literature
  Uncertainty: Literature
- waste reinforced concrete: -105495, -1.5056e6 kg (2 entries); lognormal variance with pedigree 0.0532, pedigree (2,3,5,5,1)
  (same comment as for waste reinforced concrete)
  production volume 4.8333e6 kg

## Inputs from nature
- Transformation, from unspecified [natural resource, land]: 2500 m2; lognormal variance with pedigree 0.24, pedigree (5,5,5,5,1)
  Rough estimation
  Uncertainty: Rough estimation
- Occupation, industrial area [natural resource, land]: 175000 m2*year; lognormal variance with pedigree 0.16, pedigree (5,5,5,5,1)
  Rough estimation for 70a life time
  Uncertainty: Rough estimation for 70a life time
- Transformation, to industrial area [natural resource, land]: 2500 m2; lognormal variance with pedigree 0.24, pedigree (5,5,5,5,1)
  Rough estimation
  Uncertainty: Rough estimation

## Sampling procedure
Literature and own estimations

## Extrapolations
From single data to Swiss situation. This dataset has been copied from an original dataset covering the geography CH. The uncertainty has been adjusted accordingly.

## Review by Manuele Margni (obsolete) 2005-07-19
Passed
