# natural gas, high pressure, import from NO

Dataset: EcoSpold 2, unit process
Geography: DK
Time period: 2012-01-01 to 2021-12-31
Technology level: current
Classification: ISIC rev.4 ecoinvent: 4930:Transport via pipeline
Scenario: Business-as-Usual
System model: Allocation, cut-off by classification
Share of production covered: 100 %
Generated by: Mireille Faist Emmenegger
Published in: Faist Emmenegger, Mireille 2015
Database: ecoinvent
isCopyrightProtected: true
accessRestrictedTo: 1

## General comment
This dataset describes the transport needed for an average export of Norwegian natural gas (expressed in tkm). Gas losses and emissions during seasonal storage are included. An average distance of 1400 km is estimated for the export, of which are 650 km offshore pipeline.
Characteristics are based on the ecoinvent report v2 'Erdgas' from 2007: HV; 44.21 MJ/m-3; density, 0.84 kg/m-3, 0.719 kg CH4/m-3, 0.013 kg CO2/m-3

## Included activities start
'exit gate' of natural gas production field

## Included activities end
'entry gate' of natural gas national market

## Geography
The average weighted export distance is based on the trade movements 2012.

## Technology
The distance to the different countries is based on rough estimates using maps of natural gas pipeline infrastructure.

## Reference product
- natural gas, high pressure: 1 m3; CPC 12020: Natural gas, liquefied or in the gaseous state; By-product classification allocatable product; CAS 14493-06-2
  production volume 1.33e9 m3
    m3 imported in 2012 from NO to DK . Scaled to LHV of ecoinvent v3
  property price 0.166 EUR2005
    Temporary price data. Calculated as 90% of purchasers price based on: 2005 price for Europe-27 Import (US$ and kg) in UN Commodity Trade Statistics Database - Natural gas in gaseous state (http://data.un.org/Data.aspx?q=natural+gas&d=ComTrade&f=_l1Code%3a28%3bcmdCode%3a271121; accessed 4 January 2011), using density of natural gas of 0.8 kg/m3 for unit conversion.
  property carbon content, fossil 0.602381
    An average C content of 0.506 kg C/ m3 has been assumed (this average has been calculated using data in Tab 3.5, ecoinvent v2.2 report 6_V
  property heating value, net 39 MJ
    Literature value, Source: United Nations Statistics Division (2018) International Recommendations for Energy Statistics (IRES). Available at: http://unstats.un.org/unsd/statcom/doc11/BG-IRES.pdf.
  property carbon content 0.602381
    carbon content on a dry matter basis (reserved; not for manual entry)
  properties: water content 0, heating value, gross 0 MJ, dry mass 0.84 kg, wet mass 0.84 kg, water in wet mass 0 kg, carbon content, non-fossil 0, carbon allocation 0.506 kg

## Inputs from technosphere
- transport, pipeline, offshore, long distance, natural gas: 0.18431 metric ton*km; = 650*0.84/1000*1.33/3.94; lognormal variance with pedigree 0.1286, pedigree (2,1,4,1,1)
  Average distance is estimated based onoffshore pipeline length and multiplied by the density of natural gas. We consider only the share which is really imported from NO, the rest is produced in DK but modelled with NO natural gas.
  Uncertainty: A
- natural gas, high pressure: 0 m3; source Faist Emmenegger, M. 2007; pedigree (1,1,1,1,1)
  average losses of storage included (0.01%)
  Uncertainty: a
  properties: dry mass 0.84 kg, heating value, net 39 MJ, wet mass 0.84 kg, carbon content, fossil 0.602381
  note on heating value, net: Literature value, Source: United Nations Statistics Division (2018) International Recommendations for Energy Statistics (IRES). Available at: http://unstats.un.org/unsd/statcom/doc11/BG-IRES.pdf.
  note on carbon content, fossil: An average C content of 0.506 kg C/ m3 has been assumed (this average has been calculated using data in Tab 3.5, ecoinvent v2.2 report 6_V
- transport, pipeline, onshore, long distance, natural gas: 0.212665 metric ton*km; = (1400-650)*0.84/1000*1.33/3.94; lognormal variance with pedigree 0.1286, pedigree (2,1,4,1,1)
  Average distancemultiplied by the density of natural gas.We consider only the share which is really imported from NO, the rest is produced in DK but modelled with NO natural gas.
  Uncertainty: A
- natural gas, burned in gas motor, for storage: 0.0612 MJ; source Faist Emmenegger, M. 2007; lognormal variance with pedigree 0.0341, pedigree (4,1,4,3,3)
  Data from german industrial expert for 2001, standard technology
  Uncertainty: D
  properties: heating value, net 1 MJ
- natural gas, high pressure: 1.0001 m3; source Faist Emmenegger, M. 2007; lognormal variance with pedigree 0.0261, pedigree (4,1,4,3,1)
  average losses of storage included (0.01%)
  Uncertainty: a

## Emissions to nature
All rows: source Faist Emmenegger, M. 2007
- Carbon dioxide, fossil [air, non-urban air or from high stacks]: 1.3e-6 kg; lognormal variance with pedigree 0.0086, pedigree (2,1,4,1,1)
  calculated based on average losses and norwegian gas composition
  Uncertainty: c
- Ethane [air, non-urban air or from high stacks]: 7.4e-6 kg; lognormal variance with pedigree 0.1286, pedigree (2,1,4,1,1)
  calculated based on average losses and norwegian gas composition
  Uncertainty: c
- Mercury [air, non-urban air or from high stacks]: 1e-12 kg; lognormal variance with pedigree 0.0486, pedigree (2,1,4,1,1)
  calculated based on average losses and norwegian gas composition
  Uncertainty: c
- Methane, fossil [air, non-urban air or from high stacks]: 7.19e-5 kg; lognormal variance with pedigree 0.1286, pedigree (2,1,4,1,1)
  calculated based on average losses and norwegian gas composition
  Uncertainty: c
- Butane [air, non-urban air or from high stacks]: 6e-7 kg; lognormal variance with pedigree 0.1286, pedigree (2,1,4,1,1)
  calculated based on average losses and norwegian gas composition
  Uncertainty: c
- Propane [air, non-urban air or from high stacks]: 1.9e-6 kg; lognormal variance with pedigree 0.1286, pedigree (2,1,4,1,1)
  calculated based on average losses and norwegian gas composition
  Uncertainty: c
- NMVOC, non-methane volatile organic compounds, unspecified origin [air, non-urban air or from high stacks]: 2e-7 kg; lognormal variance with pedigree 0.1286, pedigree (2,1,4,1,1)
  calculated based on average losses and norwegian gas composition
  Uncertainty: c

## Sampling procedure
statistics

## Extrapolations
This dataset has been extrapolated from year 2012 to the year of the calculation (2021). The uncertainty has been adjusted accordingly.
