# consumer electronics production, mobile device, smartphone

Dataset: EcoSpold 2, unit process
Geography: GLO
Time period: 2014-01-01 to 2021-12-31
Technology level: current
Classification: ISIC rev.4 ecoinvent: 2630:Manufacture of communication equipment
Scenario: Business-as-Usual
System model: Allocation, cut-off by classification
Generated by: Johannes Müller
Database: ecoinvent
isCopyrightProtected: true
accessRestrictedTo: 1

## General comment
This activity represents the production of one unit of a smartphone. It includes the materials for the housing, coils, simcard holder, mainboard covers various parts for assembly. The battery, display, mainboard, earpiece + speaker, internal cables, connector, an external charging device as well as a data cable (Monier, 2007) are included through separate datasets. Data on the smartphone stem from a LCA study on the Fairphone 1, a mid-range smartphone from 2014 with 4.3 inch display and a total weight of 163.45g (Güvendik, 2014).
Sources:
- Güvendik, M. (2014). From smartphone to futurephone: assessing the environmental impacts of different circular economy scenarios of a smartphone using LCA.
- Monier, V. et al. (2007) Preparatory Studies for Eco-design Requirements of EuPs, Battery chargers and external power supplies, Final report.

## Included activities start
From reception of materials and auxiliares at the factory gate.

## Included activities end
The activity includes the materials, processes and energy use for the production of a smartphone. The dataset includes the exchange "used smartphone" to take into account the disposal. Data on factory and packaging are not included.

## Geography
Geography GLO was chosen because the dataset aims to represent the production of an average electronic device.

## Technology
Literature source points to manufacturing in China. The datasets includes the processing of metals and plastics as well as energy and tap water use.

## Time period
Data for composition are from 2014 but represent current technology.

## Parameters
- fraction, tap water, to air: 0.061 dimensionless; name fraction_TW_to_air; lognormal variance with pedigree 0.092025, pedigree (4,4,3,2,4)
  Calculated value. See comment in the other parametres present in this dataset. Tap water is considered to be always used as process water, thus process water fractions to air are applied to all tap water input flows to calculate the amount of water consumed in the processes.

## Reference product
- consumer electronics, mobile device, smartphone: 1 unit; name RP; By-product classification allocatable product; CPC 47222: Telephones for cellular networks or for other wireless networks
  production volume 1.4155e9 unit; name PV_RP; = 383000000+311000000+346300000+375200000
    Units sold from 4Q18: 383E6, 1Q19: 311E6, 2Q19:346.3E6, 3Q19:375.2E6. Source: Trendforce Corp, (2019, January 29). Global Smartphone Market Cooling in 2019 with a YoY Decline of 10% in Production Volume, Says TrendForce [Press Release]. Retrieved from https://press.trendforce.com/press/20190129-3208.html, Trendforce Corp, (2019, May 16). Apple Fell to Number Three in 1Q19, While a Worsening US-China Trade Dispute May Add Insult to Injury, Says TrendForce [Press Release]. Retrieved from https://press.trendforce.com/press/20190516-3245.html, Trendforce Corp, (2019, November 28). Global Smartphone Production Volume Grows 9.2% in 3Q19, with Minor Projected Decline in 4Q19, Says TrendForce [Press Release]. Retrieved from https://press.trendforce.com/press/20191128-3313.html
  property price 52.6138 EUR2005
    Calculated based on inputs: The price of the product has been calculated as a sum of the values of the material and energy inputs for this product. This value is therefore a rough estimation. It may underestimate the real price since there are additional expenses when producing any product. These expences can include for example labour costs, treatment of waste materials and profit for the producer. Please consider carefully whether this level of data quality is acceptable for your application.
  property weight 0.157867 kg; = (BP_used_smartphone*-1)
  property lifetime 2.5 year; name lifetime
    Source: Rensink, W. (2019, May 28). Smartphone-levensduur: updates door de 7 populairste merken. Retrieved from https://www.consumentenbond.nl/smartphone/smartphone-levensduur-hoeveel-updates-te-verwachten
  property lifetime capacity [h] 2965.62 hour; = lifetime*365*3.25
    Source: MacKay, J. (2019, March 21). Screen time stats 2019: Here’s how much you use your phone during the workday. Retrieved from https://blog.rescuetime.com/screen-time-stats-2018/

## Inputs from technosphere
- electronic component, passive, unspecified: 0.002175 kg; name el_comp; = 0.000375+0.00016+0.00072+0.00092; lognormal variance with pedigree 0.0138, pedigree (2,4,4,5,2)
  Literature Value. Unspecified Parts(0.000375kg)+Front Camera(0.00016kg) + Vibration Motor(0.00072kg) + Camera(0.00092kg)
  properties: carbon content, non-fossil 0.0045566, wet mass 1 kg, carbon content, fossil 0.317311, dry mass 1 kg
- printed wiring board, mounted mainboard, mobile device, double-sided, Pb free: 0.00295768 m2; name pwb; lognormal variance with pedigree 0.2106, pedigree (5,5,5,5,5)
  Measured Value. Measured PWB of an iPhone 12. Represents mainboard of smartphone.
  properties: carbon content, fossil 0.102905, dry mass 4.336 kg, wet mass 4.336 kg
- electric connector, peripheral type buss: 0.00191 kg; name el_conn; lognormal variance with pedigree 0.0138, pedigree (2,4,4,5,2)
  Literature Value. Represents data connector.
  properties: carbon content, fossil 0.160512, dry mass 1 kg, wet mass 1 kg
- brass: 0 kg; pedigree (1,1,1,1,1)
  Literature Value. Reprents Brass screws.
  properties: wet mass 1 kg, dry mass 1 kg
- cable, connector for computer, without plugs: 0.153231 m; name datacable; = (0.0075+0.00186+0.0006)/0.065; lognormal variance with pedigree 0.0138, pedigree (2,4,4,5,2)
  Literature Value. Represents the charing cable without plugs. Copper wire (0.0075kg) + Isolation (0.00186kg) + Nylon (0.0006kg) divided by dry mass of "cable, connector for computer, without plugs" (0.065kg/unit).
  Source: V. Monier, S. Mudgal, L. Turunen, K. Schischke, C. Ciaglia, and N. F. Nissen, “Preparatory Studies for Eco-design Requirements of EuPs, Battery chargers and external power supplies, Final report,” 2007.
  properties: dry mass 0.065 kg, wet mass 0.065 kg, carbon content, fossil 0.359823
- electricity, medium voltage: 0.44 kWh; lognormal variance with pedigree 0.0138, pedigree (2,4,4,5,2)
  Literature Value. Electricity used for the production of 1 unit smartphone.
- power adapter, for smartphone: 1 unit; lognormal variance with pedigree 0.0138, pedigree (2,4,4,5,2)
  Represents the charger for the smartphone.
  properties: dry mass 0.0597 kg, carbon content, fossil 0.492079, price 3 EUR2005, carbon content, non-fossil 0.000409144, wet mass 0.0597 kg
- tap water: 81.0739 kg; name tap_water_input; = 303*((BP_used_smartphone*-1)/0.590); lognormal variance with pedigree 0.0138, pedigree (2,4,4,5,2)
  Calculated Value. Derived from the "tap water" use (303kg) in the production of a tablet (0.590kg) (Hischier, 2014) and scaled down according to the weight of the smartphone.
  Source: Hischier, R., Achachlouei, M. A., & Hilty, L. M. (2014). Evaluating the sustainability of electronic media: Strategies for life cycle inventory data collection and their implications for LCA results. Environmental Modelling & Software, 56, 27-36.
  properties: wet mass 1 kg, dry mass 0.000337476 kg, carbon content, fossil 0.00178991, water content 2962.17
  note on carbon content, fossil: Bicarbonate content is 2.93 mol/m3. CO2 content is 0.1 mol/m3 (ecoinvent v2.2 report 8, Tab 93.1).
- steel, chromium steel 18/8: 0.04636 kg; name steel; = 0.02016+0.02491+0.00129; lognormal variance with pedigree 0.0138, pedigree (2,4,4,5,2)
  Literature Value. Represents shell(0.02016kg)+batter cap(0.02491)+simcard holder(0.00129kg)
  properties: wet mass 1 kg, dry mass 1 kg, carbon content, fossil 0.0008
  note on carbon content, fossil: Stainless steel model is the grade 304 steel (18/8 stainless, 18% chromium 8% nickel; max. 0.08% C)
- liquid crystal display, unmounted, mobile device: 0.0456304 kg; name lcd; lognormal variance with pedigree 0.0138, pedigree (2,4,4,5,2)
  Literature Value. Sum of all display components.
  properties: dry mass 1 kg, carbon content, fossil 0.0118222, wet mass 1 kg
- used smartphone: -0.157867 kg; name BP_used_smartphone; = (steel+pc+co+gl_fibre+brass+int_cable+polyeth+ferrite+el_comp+ind+el_conn+batt+lcd+pwb+el_speaker)*-1; lognormal variance with pedigree 0.0138, pedigree (2,4,4,5,2)
  Calculated Value. Sum of all the material inputs to the dataset.
  production volume 2.2346e8 kg; = PV_RP * (BP_used_smartphone/abs(RP))
    Calculated Value.
  property price 0 EUR2005; name BP_used_smartphone_price_EUR2005
  properties: carbon content, non-fossil 8.93007e-5, dry mass 1 kg, carbon content, fossil 0.156544, wet mass 1 kg
- inductor, miniature radio frequency chip: 6.05e-5 kg; name ind; lognormal variance with pedigree 0.0138, pedigree (2,4,4,5,2)
  Literature Value. Represents coils.
  properties: carbon content, fossil 0.0535842, wet mass 1 kg, dry mass 1 kg
- sheet rolling, chromium steel: 0.04636 kg; = steel; lognormal variance with pedigree 0.0138, pedigree (2,4,4,5,2)
  Literature Value. Service representing the processing of steel.
- ferrite: 1.7e-5 kg; lognormal variance with pedigree 0.0138, pedigree (2,4,4,5,2)
  Literature Value. Represents magnetic beads
  properties: wet mass 1 kg, dry mass 1 kg
- metal working, average for copper product manufacturing: 0.004196 kg; = co; lognormal variance with pedigree 0.0138, pedigree (2,4,4,5,2)
  Literature Value. Service representing the processing of copper.
- wastewater, unpolluted: 0 m3; name BP_wastewater; pedigree (1,1,1,1,1)
  Calculated value based on literature values and expert opinion. See comments in the parametres' comment field.
  production volume 0 m3
    Calculated Value.
  property price 0 EUR2005; name BP_wastewater_price_EUR2005
  properties: dry mass 0.337476 kg, carbon content, non-fossil 0.00178991, water content 2962.17, wet mass 1000 kg, carbon content, fossil 0.00178991
  note on carbon content, fossil: Assumed to be like in tap water. Bicarbonate content is 2.93 mol/m3. CO2 content is 0.1 mol/m3 (ecoinvent v2.2 report 8, Tab 93.1).
- used cable: -0.01316 kg; name BP_used_cable; = ((datacable*0.065)+(plugs*0.0585))*-1; lognormal variance with pedigree 0.0138, pedigree (2,4,4,5,2)
  Calculated Value. Equal to sum of cable and plugs. 0.065kg: 1 unit of cable, 0.0585kg: 1 unit of plugs
  production volume 1.8628e7 kg; = PV_RP * (BP_used_cable/abs(RP))
    Calculated Value.
  property price 0 EUR2005; name BP_used_cable_price_EUR2005
  properties: carbon content, fossil 0.35493, dry mass 1 kg, wet mass 1 kg
- cable, ribbon cable, 20-pin, with plugs: 0.000185 kg; name int_cable; lognormal variance with pedigree 0.0138, pedigree (2,4,4,5,2)
  Literature Value. Represents internal cables.
  properties: dry mass 1 kg, carbon content, fossil 0.648653, wet mass 1 kg
- polyethylene terephthalate, granulate, amorphous: 0.00055 kg; name polyeth; = 0.00031+0.00024; lognormal variance with pedigree 0.0138, pedigree (2,4,4,5,2)
  Literature Value. Represents Thin film(0.00031kg) + Plastic tape(0.00024kg)
  properties: dry mass 1 kg, wet mass 1 kg, heating value, net 22.95 MJ, carbon content, fossil 0.625
- copper, cathode: 0.004196 kg; name co; = 0.00394+0.000223+0.000033; lognormal variance with pedigree 0.0138, pedigree (2,4,4,5,2)
  Literature Value. Represents printed wiring boards covers (0.00394kg), screws(0.000223kg) and copper Coils(0.000033kg)
  properties: wet mass 1 kg, dry mass 1 kg
- electronic component, passive, mobile, earpiece and speaker: 0.00184217 kg; name el_speaker; lognormal variance with pedigree 0.0138, pedigree (2,4,4,5,2)
  Literature Value.
  properties: carbon content, fossil 0.186965, carbon content, non-fossil 0.00254276, wet mass 1 kg, dry mass 1 kg
- glass fibre reinforced plastic, polyester resin, hand lay-up: 0.000779 kg; name gl_fibre; lognormal variance with pedigree 0.0138, pedigree (2,4,4,5,2)
  Literature Value.
  properties: dry mass 1 kg, carbon content, fossil 0.246639, wet mass 1 kg
- casting, brass: 0.000144 kg; = brass; lognormal variance with pedigree 0.0138, pedigree (2,4,4,5,2)
  Literature Value. Service representing the processing brass.
- plug, inlet and outlet, for computer cable: 0.0547009 unit; name plugs; = 2*0.0016/0.0585; lognormal variance with pedigree 0.0138, pedigree (2,4,4,5,2)
  Literature Value. Represents the plugs of the charing cable. Two plugs (2*0.0016kg), dry mass of 1 Unit: 0.0585kg/unit.
  Source: V. Monier, S. Mudgal, L. Turunen, K. Schischke, C. Ciaglia, and N. F. Nissen, “Preparatory Studies for Eco-design Requirements of EuPs, Battery chargers and external power supplies, Final report,” 2007.
  properties: dry mass 0.0585 kg, wet mass 0.0585 kg, carbon content, fossil 0.3397
- battery, Li-ion, NCA, rechargeable, prismatic: 0.0386 kg; name batt; lognormal variance with pedigree 0.0138, pedigree (2,4,4,5,2)
  Literature Value.
  properties: carbon content, fossil 0.0607203, wet mass 1 kg, dry mass 0.976178 kg, carbon content, non-fossil 0.00128402, water content 0.0244033, copper content 0.0264099
- polycarbonate: 0.01246 kg; name pc; = 0.0035+0.00762+0.00134; lognormal variance with pedigree 0.0138, pedigree (2,4,4,5,2)
  Literature Value. Represents front housing(0.0035kg) + back housing(0.00762kg)+ plastic pieces (0.00134kg)
  properties: heating value, net 29.57 MJ, carbon content, fossil 0.755906, dry mass 1 kg, wet mass 1 kg
- injection moulding: 0.01246 kg; = pc; lognormal variance with pedigree 0.0138, pedigree (2,4,4,5,2)
  Literature Value. Service representing the processing of plastic.
- brass: 7.2e-7, 0.00014328 kg (2 entries); lognormal variance with pedigree 0.0138, pedigree (2,4,4,5,2)
  Literature Value. Reprents Brass screws.
- wastewater, unpolluted: -0.000609027, -0.0755194 m3 (2 entries); lognormal variance with pedigree 0.0138, pedigree (2,4,4,5,2)
  (same comment as for wastewater, unpolluted)
  production volume 1.0776e8 m3

## Emissions to nature
- Water [air, unspecified]: 0.00494551 m3; = (tap_water_input/1000*fraction_TW_to_air); lognormal variance with pedigree 0.0138, pedigree (2,4,4,5,2)
  (same comment as for wastewater, unpolluted)

## Sampling procedure
In the study (Güvendik, 2014), the phone was dismanteled and the components identified and weighed.

## Extrapolations
This dataset has been extrapolated from year 2020 to the year of the calculation (2021). The uncertainty has been adjusted accordingly.
