# natural gas production

Dataset: EcoSpold 2, unit process
Geography: RU
Time period: 2000-01-01 to 2021-12-31
Technology level: current
Classification: ISIC rev.4 ecoinvent: 0620:Extraction of natural gas
Scenario: Business-as-Usual
System model: Allocation, cut-off by classification
Share of production covered: 95 %
Generated by: Mireille Faist Emmenegger
Published in: Faist Emmenegger, Mireille 2015
Database: ecoinvent
isCopyrightProtected: true
accessRestrictedTo: 1

## General comment
This dataset represents the extraction of natural gas in the Russian Federation. Data stems from annual reports of oil and gas producers (Gazprom, Novatek, Likoil, Rusneft) and national GHG inventory (UNFCC).

## Included activities start
Exploration, production, processing and underground storage of natural gas.

## Included activities end
The activity ends with the feeding of produced gas in the pipeline for transport to the country where it is consumed. The leakages of production and processing of the raw gas are included.

## Geography
Mostly Russion data. Also valid for countries with mere natural gas production and similar technology standard.

## Technology
The data describes an average onshore technology for natural gas with a share of 4% out of combined oil gas production and 96% from mere natural gas production. Natural gas is assumed to 20% sour. It is assumed that about 30% of the produced water is discharged in surface water. Water emissions are differentiated between combined oil and gas production and gas production.

## Time period
Emissions to water are based on 1987 US data.

## Reference product
- natural gas, high pressure: 0 m3; name NG_HP_reference_Flow; CPC 12020: Natural gas, liquefied or in the gaseous state; By-product classification allocatable product; CAS 14493-06-2; pedigree (1,1,1,1,1)
  Adjust dataset to standardized LHV in ecoinvent v3
  production volume 5.92e11 m3; name PV_Ref; = 592*1000000000
    2012 value, BP statistics, billion m3
  property price 0.166 EUR2005; name NG_HP_reference_Flow_price_EUR2005
    Temporary price data. Calculated as 90% of purchasers price based on: 2005 price for Europe-27 Import (US$ and kg) in UN Commodity Trade Statistics Database - Natural gas in gaseous state (http://data.un.org/Data.aspx?q=natural+gas&d=ComTrade&f=_l1Code%3a28%3bcmdCode%3a271121; accessed 4 January 2011), using density of natural gas of 0.8 kg/m3 for unit conversion.
  property heating value, net 39 MJ
    Literature value, Source: United Nations Statistics Division (2018) International Recommendations for Energy Statistics (IRES). Available at: http://unstats.un.org/unsd/statcom/doc11/BG-IRES.pdf.
  property carbon content 0.602381
    carbon content on a dry matter basis (reserved; not for manual entry)
  property true value 0.154933; name NG_HP_reference_Flow_true_value
    allocation property applied in "true value" allocation // value calculated from revenue
  properties: carbon content, non-fossil 0, water content 0, dry mass 0.84 kg, water in wet mass 0 kg, carbon content, fossil 0.602381, wet mass 0.84 kg, carbon allocation 0.506 kg
- sulfur: 1 kg; name BP_amount_1; = 6416000000/PV_Ref* NG_HP_reference_Flow; CPC 34520: Sulphur, except sublimed sulphur, precipitated sulphur and colloidal sulphur; By-product classification allocatable product; CAS 7704-34-9
  The amount of sulfur produced as a by-product of natural gas production in Russia was 6416 thousand metric tonnes in 2012 (USGS. 2014. USGS Minerals Yearbook 2014, volume I, Commodity Report, accessed online https://minerals.usgs.gov/minerals/pubs/commodity/sulfur/index.html#mcs, Aug 8th, 2017). The amount of sulfur produced per m3 of NG depends on the gas composition and process parameters which may vary locally and over time.Here the total sulfur production is averaged over the total NG production, i.e. both sweet and sour gas. The separation of sulfur from natural gas actually happens during the sweetening process. For modelling reasons the sulfur output is included in the natural gas production dataset, not in the separate sweetening dataset.
  production volume 6.416e9 kg; = PV_Ref * (BP_amount_1 / NG_HP_reference_Flow)
    Calculated from production volume of reference product using the relative outputs.
  property price 0.0551778 EUR2005
    Price calculated based on price of elemental sulfur (f.o.b. mine or plant) reported in the USGS Minerals Yearbook for Sulfur from 2010 to 2019 (https://www.usgs.gov/centers/nmic/sulfur-statistics-and-information). The prices given in USD were converted to EUR based on the annual exchange rates published by the European Central Bank (https://sdw.ecb.europa.eu/quickview.do?SERIES_KEY=120.EXR.A.USD.EUR.SP00.A), and then adjusted for inflation relative to 2005 by using the Harmonised Index of Consumer Prices (HICP) of the euro area, published by eurostat (https://ec.europa.eu/eurostat/databrowser/view/PRC_HICP_AIND/default/table).
  property carbon content 0
    carbon content on a dry matter basis (reserved; not for manual entry)
  property true value 0.00055814; name BP_amount_1_true_value
    allocation property applied in "true value" allocation // value calculated from revenue
  properties: carbon content, fossil 0, dry mass 1 kg, carbon content, non-fossil 0, water in wet mass 0 kg, water content 0, wet mass 1 kg, carbon allocation 0 kg

## Inputs from technosphere
- water discharge from petroleum/natural gas extraction, onshore: -4.25832e-5 kg; name Water_discharge_RU; = (0.003*0.04)*-1
  From combined production (4% in Russia) 0.003 l/m3 natural gas produced, from mere natural gas production 0.001 l/m3 (96% in Russia) ; NAM 2001, BEB 2001, other. Here, this figure relates only to combined production.
  production volume 7.61143e7 kg; = PV_Ref * (Water_discharge_RU / NG_HP_reference_Flow)
    Calculated from production volume of reference product using the relative outputs.
  property price 0 EUR2005; name Water_discharge_RU_price_EUR2005
  properties: carbon content, non-fossil 0.00101223, water content 10.784, wet mass 1 kg, carbon content, fossil 0.00168491, dry mass 0.0848608 kg
- hazardous waste, for underground deposit: -2.19659e-5 kg; name BP_amount_4; lognormal variance with pedigree 0.0533, pedigree (2,2,5,5,2)
  From Russian gas producer with 6% market share; waste treatment similar to GLO.
  production volume 3.92623e7 kg; = PV_Ref * (BP_amount_4 / NG_HP_reference_Flow)
    Calculated from production volume of reference product using the relative outputs.
  property price 0 EUR2005; name BP_amount_4_price_EUR2005
  properties: wet mass 1 kg, carbon content, fossil 0.554667, dry mass 1 kg
  note on carbon content, fossil: Tab A.6, ecoinvent v2.2 report 13_I, average hazardous waste composition was used, and referred to 0% water mass. No waste-specific emission are currently inventoried for underground deposits. Accordingly, no waste composition must be specified. For generic, average waste to underground deposit deposition in a 200 liter steel drum without cement solidification is assumed (ecoinvent v2.2 report 13_I).
- municipal solid waste: -0.000197657 kg; name BP_amount_5; lognormal variance with pedigree 0.1727, pedigree (2,2,5,5,5)
  From Russian gas producer with 6% market share. Non-hazardous waste approximated with MSW.
  production volume 3.53297e8 kg; = PV_Ref * (BP_amount_5 / NG_HP_reference_Flow)
    Calculated from production volume of reference product using the relative outputs.
  property price 0 EUR2005; name BP_amount_5_price_EUR2005
  properties: water content 0.297017, carbon content, non-fossil 0.261655, carbon content, fossil 0.171549, heating value, net 11.74 MJ, dry mass 0.771 kg, wet mass 1 kg
  note on carbon content, non-fossil: MSW composition in tab 4.1, ecoinvent v2.2 report 13_I. C content referred to 1 kg DM
  note on heating value, net: Value taken from the general comment of the treatment dataset.
- sweet gas, burned in gas turbine: 0.0518343 MJ; = 0.0040129*36.4
  Novatek 2011
  properties: carbon content, fossil 0.589286, dry mass 0.0247059 kg, wet mass 0.0247059 kg, heating value, net 1 MJ
- diesel, burned in diesel-electric generating set, 10MW: 0.0074943 MJ
  Novatek 2011
  properties: heating value, net 1 MJ
- onshore well, oil/gas: 3.57841e-7 m
  Data from NG and combined Oil and NG producers with 91% share of NG production in Russia.; Gazprom 2011; Lukoil 2011; Rosneft 2011.
- drying, natural gas: 0.331203 m3; = 1* NG_HP_reference_Flow
  equals reference flow
- sweetening, natural gas: 0.0662406 m3; = 0.2* NG_HP_reference_Flow
  An estimated share of 20% of gas is sour and therefore has to be sweetened.
- onshore natural gas field infrastructure: 1.13832e-11 unit
- sour gas, burned in gas turbine: 0.0175476 MJ; = 0.0013585*36.4
  Novatek 2011
  properties: carbon content, fossil 0.571, heating value, net 1 MJ, dry mass 0.027027 kg, wet mass 0.027027 kg
- tap water: 7.70082e-6 kg
  From Russian gas producer with 6% market share (Novatek sustainability Report
  properties: wet mass 1 kg, dry mass 0.000337476 kg, carbon content, fossil 0.00178991, water content 2962.17
- waste natural gas, sweet: -0.0344727 MJ; name BP_amount_2; = (0.003336*.8*36.4)*-1; lognormal variance with pedigree 0.051325, pedigree (2,2,5,2,2)
  Official statistics and literature.; UNFCC 2014. Described in Faist et al. 2015
  production volume 6.16173e10 MJ; = PV_Ref * (BP_amount_2 / NG_HP_reference_Flow)
    Calculated from production volume of reference product using the relative outputs.
  property price 0 EUR2005; name BP_amount_2_price_EUR2005
  properties: carbon content, fossil 0.589286, wet mass 0.0247059 kg, dry mass 0.0247059 kg
- waste natural gas, sour: -0.00861817 MJ; name BP_amount_3; = (0.003336*.2*36.4)*-1; lognormal variance with pedigree 0.051325, pedigree (2,2,5,2,2)
  Official statistics and literature.; UNFCC 2014. Described in Faist et al. 2015
  production volume 1.54043e10 MJ; = PV_Ref * (BP_amount_3 / NG_HP_reference_Flow)
    Calculated from production volume of reference product using the relative outputs.
  property price 0 EUR2005; name BP_amount_3_price_EUR2005
  properties: carbon content, fossil 0.571226, wet mass 0.027027 kg, dry mass 0.027027 kg
  note on carbon content, fossil: Calculated out of data in Tab 3.4, ecoinvent v2.2 report 6_V.

## Inputs from nature
- Gas, natural, in ground [natural resource, in ground]: 0.331203 m3; = 1* NG_HP_reference_Flow; lognormal variance with pedigree 0.050725, pedigree (3,2,4,2,2)
  corresponds to reference flow

## Emissions to nature
- Chloride [water, surface water]: 2.48686e-6 kg; = 7.3e-3* 0.001*0.96; lognormal variance with pedigree 0.0907, pedigree (3,3,5,3,3)
  Based on US Data (EPA 1987) multiplied with discharged water of mere natural gas production (0.001 l/m3 for 96% of produced gas).
- NMVOC, non-methane volatile organic compounds, unspecified origin [air, non-urban air or from high stacks]: 1.65601e-6 kg; = 0.0010*0.005* NG_HP_reference_Flow; lognormal variance with pedigree 0.0907, pedigree (3,3,5,3,3)
  Calculations based on raw gas composition, industry emission and leakage factors;
- Ethane [air, non-urban air or from high stacks]: 9.93609e-6 kg; = 0.0060*0.005* NG_HP_reference_Flow; lognormal variance with pedigree 0.0907, pedigree (3,3,5,3,3)
  Calculations based on raw gas composition, industry emission and leakage factors;
- Arsenic, ion [water, surface water]: 6.81332e-12 kg; = 2.0E-8* 0.001*0.96; lognormal variance with pedigree 0.7002, pedigree (3,2,5,3,3)
  (same comment as for Chloride)
- Hydrogen sulfide [air, non-urban air or from high stacks]: 2.98083e-5 kg; = 0.018*0.005* NG_HP_reference_Flow; lognormal variance with pedigree 0.0907, pedigree (3,3,5,3,3)
  Calculations based on raw gas composition, industry emission and leakage factors;
- Propane [air, non-urban air or from high stacks]: 3.31203e-6 kg; = 0.0020*0.005* NG_HP_reference_Flow; lognormal variance with pedigree 0.0907, pedigree (3,3,5,3,3)
  Calculations based on raw gas composition, industry emission and leakage factors;
- Benzene [water, surface water]: 1.60113e-10 kg; = 4.7e-7* 0.001*0.96; lognormal variance with pedigree 0.0907, pedigree (3,3,5,3,3)
  (same comment as for Chloride)
- Carbon dioxide, fossil [air, non-urban air or from high stacks]: 1.65601e-6 kg; = 0.0010*0.005* NG_HP_reference_Flow; lognormal variance with pedigree 0.0513, pedigree (3,3,5,3,3)
  Calculations based on raw gas composition, industry emission and leakage factors;
- Methane, fossil [air, non-urban air or from high stacks]: 0.00118571 kg; = 0.716*0.005* NG_HP_reference_Flow; lognormal variance with pedigree 0.0907, pedigree (3,3,5,3,3)
  Calculations based on raw gas composition, industry emission and leakage factors;

## Sampling procedure
Statistics and other

## Extrapolations
Mostly Russion data. Some data (e.g. energy resource use) is extrapolated for the whole natural gas production. For
flaring, we use information from the UNFCCC report 2014, which reports and overall burning of
associated petroleum gas of 17.08 billion m3 with a recovery rate of 76 %. We allocated the flared gas
to both petroleum and gas production based on their calorific value to obtain data specific for natural gas.
