# harvesting, forestry harvester

Dataset: EcoSpold 2, unit process
Geography: RoW
Time period: 2012-01-01 to 2021-12-31
Technology level: current
Classification: ISIC rev.4 ecoinvent: 0220:Logging
Classification: EcoSpold01Categories: construction processes/machinery
Synonyms: mechanical harvesting
Scenario: Business-as-Usual
System model: Allocation, cut-off by classification
Generated by: [System]
Database: ecoinvent
isCopyrightProtected: true
accessRestrictedTo: 1

## General comment
The inventory refers to 1 productive machine hour (PMS) - referring to the operational time of the machine including breaks up to 15 minutes - of a forestry harvester class II (80 - 120 kW) with an average engine power of 100 kW and a total weight of 14,000 kg.
A harvester is a type of heavy forestry vehicle employed in cut-to-length logging operations for felling, delimbing and bucking trees. A forest harvester is typically employed together with a forwarder that hauls the logs to a roadside landing in an entirly mechanical harvesting operation.
Assumed fuel consumption: 12.8 l/PMH; total service life: 17,600 PMH, average daily transport distance of machinery: 25 km.
Productivity depends on the specific circumstances of the harvesting operation and is specified in the respective datasets.
If the dataset is used to model a feller buncher, an average fuel consumption of 12 l/PMH can be assumed, while values can range from 7 to 28 l/PMH (references, see below).
The following sources have been consulted for the elaboration and plausibilisation of the dataset:
Anonymous (2004): DIRECTIVE 2004/26/EC OF THE EUROPEAN PARLIAMENT AND OF THE COUNCIL of 21 April 2004 amending Directive 97/68/EC on the approximation of the laws of the Member States relating to measures against the emission of gaseous and particulate pollutants from internal combustion engines to be installed in non-road mobile machinery. Official Journal of the European Union: 30.4.2004
Athanassiadis, D., G. Lidestav and I. Wästerlund (1999): Fuel, hydraulic oil and lubricant consumption in Swedish mechanized harvesting operations, 1996. Journal of Forest Engineering, 10(1): 59-66.
Eriksson, L. N. and L. Gustavsson (2008): Biofuels from stumps and small roundwood - costs and CO2 benefits. Biomass and Bioenergy, 32: 897-902.
Fobrig, A. (2004): Holzernteverfahren; Vergleichende Erhebung und Beurteilung der Holzernteverfahren in der Bundesrepublik Deutschland; im Anhalt an KWF-Bericht Nr. 25 (Holzernteverfahren) und diverse Tagungsführer der KWF-Tagungen. Kuratorium für Waldarbeit und Forsttechnik e.V. (KWF), Gross-Umstadt.
Jirsousek, R., R. Klvac and A. Skoupy (2007): Productivity and costs of the mechanised cut-to-length wood harvesting system in clear-felling operations. Journal of Forest Science, 53(10): 476-482.
Kilpeläinen, A., A. Alam, H. Strandman and S. Kellomäki (2011): Life cycle assessment tool for estimating net CO2 exchange of forest production. GCM Bionenergy: 1-11.
Klvac, R. and A. Skoupy (2009): Characteristic fuel consumption and exhaust emissions in fully mechanized logging operations. Journal of Forest Research, 14(6): 328-334: referring to Freitas 2004.
Klvac, R., S. Ward, P. M. O. Owende and J. Lyons (2003): Energy audit of wood harvesting systems. Scandinavian Journal of Forest Research, 18(2): 176-183.
Knechtle, N. (1997): Materialprofile von Holzerntesystemen - Analyse ausgewählter Beispiele als Grundlage für ein forsttechnisches Ökoinventar. Diplomarbeit am Departement für Wald- und Holzforschung. ETH Zürich, Zürich.
Michelsen, O., C. Solli and A. H. Stroemann (2008): Environmental impact and added value in forestry operations in Norway. Journal of Industrial Ecology, 12(1): 69-81.
Petersen, A. K. (2006): A comparison of avoided greenhouse gas emissions when using different kinds of wood energy. Biomass and Bioenergy, 30: 605–617.
Riezinger, A. (2008): Die Ermittlung der ökologischen Effizienz der Bereitstellungskette von Waldhackgut anhand ausgewählter Fallstudien; Diplomarbeit. Universität der Bodenkultur (BOKU), Wien: referring to Schweinle and Thoroe 2001 (for consumption of hydraulic oil) and Pausch 2002 (for consumption of diesel fuel)
Spielmann, M., L. Barreto, V. Erni, F. Frutig and O. Thees (2007): Life cycle assessment of energy wood chip supply chains; a case study of near future supply of forest wood chips in Switzerland (unpublished). Paul Scherrer Institute (PSI), Swiss Federal Institute for Forest, Snow and Landscape Research (WSL), Villigen, Birmensdorf.
Wittkopf, S., U. Hömer and S. Feller (2003): Bereitstellungsverfahren für Waldhackschnitzel - Leistungen, Kosten, Rahmenbedingungen. Bayer. Landesanstalt für Wald und Forstwirtschaft, Freising.
Statements on the fuel consumption for a feller bunchers are bases on:
Eriksson, L. N. and L. Gustavsson (2008): Biofuels from stumps and small roundwood - costs and CO2 benefits. Biomass and Bioenergy, 32: 897-902.
Klvac, R. and A. Skoupy (2009): Characteristic fuel consumption and exhaust emissions in fully mechanized logging operations. Journal of Forest Research, 14(6): 328-334.
Lambrecht, U., H. Helms, K. Kuller and W. Knörr (2004): Entwicklung eines Modells zur Berechnung der Luftschadstoffemissionen und des Kraftstoffverbrauchs von Verbrennungsmotoren in mobilen Geräten und Maschinen; Endbericht. IFEU - Institut für Energie- und Umweltforschung Heidelberg GmbH, Heidelberg.

Markewitz, D. (2006): Fossil fuel carbon emissions from silviculture: Impacts on net carbon sequestration in forests. Forest Ecology and Management, 263: 153-161.
Spielmann, M., L. Barreto, V. Erni, F. Frutig and O. Thees (2007): Life cycle assessment of energy wood chip supply chains; a case study of near future supply of forest wood chips in Switzerland (unpublished). Paul Scherrer Institute (PSI), Swiss Federal Institute for Forest, Snow and Landscape Research (WSL), Villigen, Birmensdorf.

## Included activities start
Service beginning with the transport of the machinery to the logging site.

## Included activities end
Includes the input of machinery infrastructure, the input of diesel fuel, lubricants/greases as well as their disposal, and the emissions into air from diesel consumption. Wood is not included in the dataset.

## Geography
Emission profile according to European legislation

## Technology
Average european technology

## Parameters
- engine power: 100 kW; name EP; lognormal variance with pedigree 0.5526, pedigree (3,3,1,1,1)
  according to Jirousek et al. 2007
- share of EURO IIIa: 0.5 dimensionless; name EURO_IIIa; lognormal variance with pedigree 0.592, pedigree (5,4,1,1,1)
  assuming that the relevant share of foresassuming that the relevant share of forest machinery belongs to vehicle types tier EURO IIIa and EURO IIIb as define in the Guideline 97/68/EG by the European Commission.
- share of EURO IIIb: 0.490338 dimensionless; name EURO_IIIb; lognormal variance with pedigree 0.719098, pedigree (1,1,1,1,1)
  assuming that the relevant share of forest machinery belongs to vehicle types tier EURO IIIa and EURO IIIb as define in the Guideline 97/68/EG by the European Commission.
- lifetime of machine, productive machine hours: 17600 hour; name total_PMH; lognormal variance with pedigree 0.5526, pedigree (3,3,1,1,1)
  according to Spielmann et al. 2007
- diesel consumption: 12.8 l/hour; name diesel_consumption; lognormal variance with pedigree 0.592, pedigree (5,4,1,1,1)
  according to Jirousek et al. 2007 (see general comments field for total of evaulated literature)
- scaling factor: 8.61809 dimensionless; name scaling_factor
- load factor: 0.5 dimensionless; name LF; lognormal variance with pedigree 0.5526, pedigree (3,3,1,1,1)
  according to Lambrecht et al. 2004

## Reference product
- harvesting, forestry harvester: 1 hour; = 0.116034968098507 * scaling_factor; CPC 8614: Support and operation services to forestry and logging; By-product classification allocatable product
  Amount was scaled to 1.
  production volume 1.35156e7 hour; name p_harvesting; = 10000*total_PMH/10
    annual production of machinery: 10000 times total productive machine hours
  property price 8.658 EUR2005
    Calculated based on inputs: The price of the product has been calculated as a sum of the values of the material and energy inputs for this product. This value is therefore a rough estimation. It may underestimate the real price since there are additional expenses when producing any product. These expences can include for example labour costs, treatment of waste materials and profit for the producer. Please consider carefully whether this level of data quality is acceptable for your application.
  property carbon content 0
    carbon content on a dry matter basis (reserved; not for manual entry)
  properties: dry mass 0 kg, water content 0, carbon content, non-fossil 0, water in wet mass 0 kg, carbon content, fossil 0, carbon allocation 0 kg

## Inputs from technosphere
- vegetable oil, refined: 0.35346 kg; name m_oil_chainsaw; = 0.0410137198240982 * scaling_factor; source Klvac R. 2003; lognormal variance with pedigree 0.0682, pedigree (2,3,5,5,1)
  used for lubricating chain saw; estimate based on Klvac et al. (2003); value per l converted to kg
  Amount was scaled to the amount of reference product.
  properties: heating value, net 38.4 MJ, dry mass 1 kg, carbon content, non-fossil 0.768
  note on heating value, net: Values is approximated from HHV from "vegetable oil, crude". Source: Radovanovic,M.; Zivanovic,T.; Stojiljkovic,D.; Jovanovic,V.; Jerinic,N.; Knezevic,S. et.al. Utilization of sunflower husk as a fuel for industrial boilers - 20 years experience. Proc. 5th Eur. Conf. on Industrial Furnaces&Boilers 2000,vol.2,p.221-233. Available at: https://phyllis.nl/Biomass/View/2152
- transport, freight, lorry 16-32 metric ton, EURO5: 0 metric ton*km; source Spielmann, M. 2007; pedigree (1,1,1,1,1)
  transport of forest machinery calculated for the weight of the machinery, transported over 25 km and 8 productive machine hours (PMH) per day
  Amount was scaled to the amount of reference product.
- diesel, low-sulfur: 0 kg; name m_diesel; source Jirsousek R. 2007; pedigree (1,1,1,1,1)
  Density of diesel: 0.84 kg/l
  property water content 0; name water_content
  property carbon content, fossil 0.865; name C_content_fossil
  property carbon content, non-fossil 0; name C_content_non_fossil
  property water in wet mass 0 kg; name WWM
  properties: heating value, net 42.8 MJ, dry mass 1 kg
- lubricating oil: 0.51256 kg; name m_lubricating_oil; = 0.0594748832485707 * scaling_factor; source Klvac R. 2003; lognormal variance with pedigree 0.0682, pedigree (2,3,5,5,1)
  hydraulic oil and engine oil/grease; estimate based on Klvac et al. (2003); value per l converted to kg
  Amount was scaled to the amount of reference product.
  properties: dry mass 1 kg, carbon content, fossil 0.75, heating value, net 40.2 MJ
  note on heating value, net: Literature value, Source: IPCC 2006, 2006 IPCC Guidelines for National Greenhouse Gas Inventories, Prepared by the National Greenhouse Gas Inventories Programme, Eggleston H.S., Buendia L., Miwa K., Ngara T. and Tanabe K. (eds). Published: IGES, Japan
- waste mineral oil: -0.569511 kg; name w_mineral_oil; = (0.0660832036095229 * scaling_factor)*-1; source Klvac R. 2003; lognormal variance with pedigree 1.88726, pedigree (1,1,4,5,1)
  hydraulic oil and engine oil/grease; adjusted for water content of waste oil
  Amount was scaled to the amount of reference product.
  production volume 7.69727e6 kg; = w_mineral_oil*p_harvesting
    calculated
  property price 0 EUR2005; name w_mineral_oil_price_EUR2005
  property water content 0.111111; name WC_oil
  property dry mass 0.9 kg; name DM_oil
  properties: heating value, net 34.7 MJ, carbon content, fossil 0.864444
  note on heating value, net: Value taken from the general comment of the treatment dataset.
- forestry harvester: 5.68182e-5 unit; = 6.59289592178901E-06 * scaling_factor; source Spielmann, M. 2007; lognormal variance with pedigree 0.56, pedigree (1,1,4,5,1)
  assuming a service life of 17600 PMH (according to Spielmann et al. 2007); other sources report lower service lifes between 8000 - 12000 PMH (e.g. Knechtle 1997)
  Amount was scaled to the amount of reference product.
- transport, freight, lorry 16-32 metric ton, EURO5: 6.47634, 37.2737 metric ton*km (2 entries); source Spielmann, M. 2007; lognormal variance with pedigree 0.0696, pedigree (3,3,5,5,1)
  (same comment as for transport, freight, lorry 16-32 metric ton, EURO5)
- diesel, low-sulfur: 0.374838, 0.378407, 0.756563, 0.0250971, 0.169761, 9.03378 kg (6 entries); source Jirsousek R. 2007; lognormal variance with pedigree 0.0129963, pedigree (1,1,4,5,1)
  Density of diesel: 0.84 kg/l
  properties: carbon content, fossil 0.865, heating value, net 42.8 MJ, dry mass 1 kg

## Emissions to nature
- Dinitrogen monoxide [air, non-urban air or from high stacks]: 0.00128492 kg; = 0.000149095448948874 * scaling_factor; source Kellenberger D. 2007; lognormal variance with pedigree 0.01, pedigree (1,1,4,5,1)
  value per MJ taken from ecoinvent 2.2 dataset *diesel in building machine" converted to input of diesel as mass
  Amount was scaled to the amount of reference product.
- Nickel [air, non-urban air or from high stacks]: 7.53753e-7 kg; = 8.74617447512771E-08 * scaling_factor; source Kellenberger D. 2007; lognormal variance with pedigree 0.01, pedigree (1,1,4,5,1)
  (same comment as for Dinitrogen monoxide)
- NMVOC, non-methane volatile organic compounds, unspecified origin [air, non-urban air or from high stacks]: 0.0206924 kg; = 0.00240104190555809 * scaling_factor; source Lambrecht U. 2004; lognormal variance with pedigree 0.0130383, pedigree (1,1,4,5,1)
  emission model calculating hourly specific emissions as "engine power x load factor x base emission factor" as proposed by Lambrecht et al. (2004) and applied in Spielmann et al. (2007); values for base emission factors for VOC for vehicle classes EURO IIIa and EURO IIIb are taken from Guideline 97/68/EG, of which 97.6% are assumed to be NMVOC.
  Amount was scaled to the amount of reference product.
- Dioxins, measured as 2,3,7,8-tetrachlorodibenzo-p-dioxin [air, non-urban air or from high stacks]: 6.43448e-13 kg; = 7.4662465031578E-14 * scaling_factor; source Kellenberger D. 2007; lognormal variance with pedigree 0.01, pedigree (1,1,4,5,1)
  (same comment as for Dinitrogen monoxide)
- Methane, fossil [air, non-urban air or from high stacks]: 0.000503463 kg; = 5.84193385890156E-05 * scaling_factor; source Lambrecht U. 2004; lognormal variance with pedigree 0.0100011, pedigree (1,1,4,5,1)
  emission model calculating hourly specific emissions as "engine power x load factor x base emission factor" as proposed by Lambrecht et al. (2004) and applied in Spielmann et al. (2007); values for base emission factors for VOC for mobile machinery classes EURO IIIa and EURO IIIb are taken from European Directive 2004/ 26/EC, of which 2.4% are assumed to be methane.
  Amount was scaled to the amount of reference product.
- Copper [air, non-urban air or from high stacks]: 1.82463e-5 kg; = 2.11721418696689E-06 * scaling_factor; source Kellenberger D. 2007; lognormal variance with pedigree 0.01, pedigree (1,1,4,5,1)
  (same comment as for Dinitrogen monoxide)
- Particulates, > 10 um [air, non-urban air or from high stacks]: 0.000624826 kg; = 7.25016488947475E-05 * scaling_factor; source Lambrecht U. 2004; lognormal variance with pedigree 0.0100025, pedigree (1,1,4,5,1)
  emission model calculating hourly specific emissions as "engine power x load factor x base emission factor" as proposed by Lambrecht et al. (2004) and applied in Spielmann et al. (2007); values for base emission factors for particles for mobile machine classes EURO IIIa and EUROIIIb are taken from European Directive 2004/ 26/EC. The proportional distribution accross particle classes is made based on the ecoinvent v3 dataset "Diesel, burned in building machine/GLO".
  Amount was scaled to the amount of reference product.
- Carbon dioxide, fossil [air, non-urban air or from high stacks]: 33.5 kg; = 3.88717650841495 * scaling_factor; source Kellenberger D. 2007; lognormal variance with pedigree 0.0100006, pedigree (1,1,4,5,1)
  calculated from diesel input as 3.113 kg CO2/kg diesel as inventoried in the ecoinvent dataset diesel, burned in building machine
  Amount was scaled to the amount of reference product.
- Cadmium [air, non-urban air or from high stacks]: 1.07548e-7 kg; = 1.24792977267066E-08 * scaling_factor; source Kellenberger D. 2007; lognormal variance with pedigree 0.01, pedigree (1,1,4,5,1)
  (same comment as for Dinitrogen monoxide)
- Particulates, < 2.5 um [air, non-urban air or from high stacks]: 0.00897532 kg; = 0.00104145103060208 * scaling_factor; source Lambrecht U. 2004; lognormal variance with pedigree 0.0104842, pedigree (1,1,4,5,1)
  (same comment as for Particulates, > 10 um)
- Carbon monoxide, fossil [air, non-urban air or from high stacks]: 0.119497 kg; = 0.0138658863630073 * scaling_factor; source Kellenberger D. 2007; lognormal variance with pedigree 0.01, pedigree (1,1,4,5,1)
  (same comment as for Dinitrogen monoxide)
- Benzo(a)pyrene [air, non-urban air or from high stacks]: 3.22184e-7 kg; = 3.73845628479544E-08 * scaling_factor; source Kellenberger D. 2007; lognormal variance with pedigree 0.01, pedigree (1,1,4,5,1)
  (same comment as for Dinitrogen monoxide)
- Zinc [air, non-urban air or from high stacks]: 1.07548e-5 kg; = 1.24792977267066E-06 * scaling_factor; source Kellenberger D. 2007; lognormal variance with pedigree 0.01, pedigree (1,1,4,5,1)
  (same comment as for Dinitrogen monoxide)
- Oils, non-fossil [soil, forestry]: 0.0320463 kg; = 0.00371849707594808 * scaling_factor; source Kellenberger D. 2007; lognormal variance with pedigree 0.0100509, pedigree (1,1,4,5,1)
  10% of lubricating oil for chain saw assumed to remain in the forest
  Amount was scaled to the amount of reference product.
- Ammonia [air, non-urban air or from high stacks]: 0.000214636 kg; = 2.49052651212478E-05 * scaling_factor; source Kellenberger D. 2007; lognormal variance with pedigree 0.01, pedigree (1,1,4,5,1)
  (same comment as for Dinitrogen monoxide)
- Selenium [air, non-urban air or from high stacks]: 1.07548e-7 kg; = 1.24792977267066E-08 * scaling_factor; source Kellenberger D. 2007; lognormal variance with pedigree 0.01, pedigree (1,1,4,5,1)
  (same comment as for Dinitrogen monoxide)
- Nitrogen oxides [air, non-urban air or from high stacks]: 0.248999 kg; = 0.0288925336574483 * scaling_factor; source Lambrecht U. 2004; lognormal variance with pedigree 0.969404, pedigree (1,1,4,5,1)
  emission model calculating hourly specific emissions as "engine power x load factor x base emission factor" as proposed by Lambrecht et al. (2004) and applied in Spielmann et al. (2007); values for base emission factors for NOx for mobile machine class EUROIIIb are taken from the European Directive 2004/ 26/EC; for mobile machine class EURO IIIa values for base emission factors for NOx are calculated based on an assumed reduction of VOC emissions as compared to "Tier 2" limit for VOC of 1.0 g/kWh (following Spielmann et al. 2007).
  Amount was scaled to the amount of reference product.
  property dry mass 1 kg; name DM
- Particulates, > 2.5 um, and < 10um [air, non-urban air or from high stacks]: 0.000363241 kg; = 4.21486875807822E-05 * scaling_factor; source Lambrecht U. 2004; lognormal variance with pedigree 0.0100007, pedigree (1,1,4,5,1)
  (same comment as for Particulates, > 10 um)
- PAH, polycyclic aromatic hydrocarbons [air, non-urban air or from high stacks]: 3.6079e-5 kg; = 4.18643107498491E-06 * scaling_factor; source Kellenberger D. 2007; lognormal variance with pedigree 0.01, pedigree (1,1,4,5,1)
  (same comment as for Dinitrogen monoxide)

## Sampling procedure
Material and fuel input from literature sources (see general comments field); air-borne emissions taken from existing dataset on diesel consumption in building machines or - where emission levels beyond applicable European legislation - estimated with emissions model based on emission limits established in European Directive 2004/ 26/EC for non-road mobile machinery types EURO IIIa and IIIb (according to Lambrecht et al 2004 and e.g. applied in Spielmann et al. 2007).
