# treatment of waste polypropylene, unsanitary landfill, dry infiltration class (100mm)

Dataset: EcoSpold 2, unit process
Geography: GLO
Time period: 2006-01-01 to 2021-12-31
Technology level: current
Classification: ISIC rev.4 ecoinvent: 3821:Treatment and disposal of non-hazardous waste
Synonyms: municipal waste landfill
Scenario: Business-as-Usual
System model: Allocation, cut-off by classification
Share of production covered: 1 %
Generated by: Avraam Symeonidis
Database: ecoinvent
isCopyrightProtected: true
accessRestrictedTo: 1

## General comment
This dataset represents the activity of waste disposal of waste polypropylene in a unsanitary landfill. Recommended use of this dataset: For PP, which goes to disposal as part of managed communal waste mixture. // Waste composition (wet, in ppm): upper heating value 36.16 MJ/kg; lower heating value 32.78 MJ/kg; H2O 159000; O 32454; H 103430; C 694120; S 360.46; N 1095.3; P n.a.; B n.a.; Cl 1234.1; Br 8.0972; F 12.146; I n.a.; Ag n.a.; As 1.5385; Ba 202.43; Cd 28.663; Co 1.417; Cr 10.526; Cu 34.93; Hg 0.040486; Mn 25.371; Mo n.a.; Ni 0.80972; Pb 19.079; Sb 8.5021; Se 1.7004; Sn 3.2205; V 1862.4; Zn 288.78; Be 0.40486; Sc n.a.; Sr 71.661; Ti 809.72; Tl 0.32389; W n.a.; Si n.a.; Fe 1295.6; Ca 2186.3; Al 161.94; K n.a.; Mg 80.972; Na 1186.6; . // Share of carbon in waste that is biogenic 0%. Share of metals in waste not oxidised and bulk-recyclable (exclude very small or thin parts) Iron: 0%; Alu: 0%; Copper: 0%. Overall degradability of waste during 100 years: 1%.

## Included activities start
from final waste deposition (without transports to the site)

## Included activities end
Waste-specific short-term emissions to air via landfill gas and landfill leachate. Waste-specific long-term emissions from landfill.

## Geography
Given name of landfill location is 'infiltration class 2 dry (2018)'. Landfill site with mean annual temperature (MAT) of 8 degC, mean annual precipitation (MAP) of 550 mm/year, and net infiltration of 100 mm/year.
Climate adjustments result in an alpha t (temperature) for permafrost areas of 0.999. Total climate adjustments with alpha pt of 0.999.

## Technology
This is an inventory for an unsanitary, sub-controlled landfill for municipal solid waste. Ultimate average landfill height is 15 meters. Operation phase duration is 25 years.Percentage of landfill gas directly emitted is 100w%.
Leachate of the landfill is not treated. Based on average waste composition and climate data the end of carbonate phase is estimated to be reached 16577 years after waste deposition.

## Reference product
- waste polypropylene: -1 kg; CPC 39270: Waste, parings and scrap of plastics; By-product classification Waste; CAS 9003-07-0; pedigree (1,1,1,1,1)
  main reference product of this activity (supply of disposal service).
  Uncertainty: Uncertainty is not adjusted, as this is the refence product
  production volume 1 kg
    The amount of the annual production volume is a placeholder value. The contribution of this technology to the different local markets can be found in the markets themselves.
  property price 0 EUR2005
    Waste products are assigned a price of zero as they are assumed to require further treatment.
  property heating value, net 32.78 MJ
    Value assumed for all polypropylene products. Source: Phyllis2, database for (treated) biomass, algae, feedstocks for biogas production and biochar, https://phyllis.nl/Biomass/View/1186, ECN.TNO
  property carbon content 0.82535
    carbon content on a dry matter basis (reserved; not for manual entry)
  properties: vanadium content 0.0022145, beryllium content 4.8141e-7, selenium content 2.0219e-6, iron content 0.0015405, magnesium content 9.6281e-5, zinc content 0.00034338, thallium content 3.8512e-7, sodium content 0.001411, strontium content 8.5209e-5, lead content 2.2687e-5, carbon content, fossil 0.82535, calcium content 0.0025996, dry mass 0.841 kg, titanium content 0.00096281, antimony content 1.011e-5, tin content 3.8294e-6, water content 0.18906, water in wet mass 0.159 kg, aluminium content 0.00019256, wet mass 1 kg, chromium content 1.2517e-5, bromine content 9.6281e-6, barium content 0.0002407, fluorine content 1.4442e-5, chlorine content 0.0014674, hydrogen content 0.12298, manganese content 3.0168e-5, copper content 4.1533e-5, nickel content 9.6281e-7, nitrogen content 0.0013024, heating value, gross 36.159 MJ, cadmium content 3.4082e-5, sulfur content 0.00042861, oxygen content 0.03859, arsenic content 1.8293e-6, mercury content 4.8141e-8, cobalt content 1.6849e-6, carbon allocation 0.694119 kg

## Inputs from technosphere
- excavation, skid-steer loader: 0.00031708 m3; lognormal variance with pedigree 0.088256, pedigree (1,1,4,1,1)
  application of daily cover.
  Uncertainty: Uncertainty calculated from uncertainty in base parameters.
- diesel, burned in building machine: 0.046738 MJ; lognormal variance with pedigree 0.088256, pedigree (1,1,4,1,1)
  for waste distribution and compaction.
  Uncertainty: Uncertainty calculated from uncertainty in base parameters.
  properties: heating value, net 1 MJ

## Inputs from nature
- Occupation, dump site [natural resource, land]: 0.0023333 m2*year; lognormal variance with pedigree 0.088256, pedigree (1,1,4,1,1)
  for landfill operation phase and spontaneous renaturation.
  Uncertainty: Uncertainty calculated from uncertainty in base parameters.

## Emissions to nature
- Carbon dioxide, fossil [air, non-urban air or from high stacks]: 0.010872 kg; lognormal variance with pedigree 0.10195, pedigree (1,1,4,1,1)
  burden from direct release or incineration of landfill biogas.
  Uncertainty: Uncertainty calculated from unertainty of the waste composition of this waste, uncertainty in waste decomposition and short-term leaching in landfill
- Ammonium, ion [water, ground-]: 1.0424e-5 kg; lognormal variance with pedigree 0.23616, pedigree (1,1,4,1,1)
  burden from short-term leachate to groundwater in uncontrolled landfill in moist cimate.
  Uncertainty: Uncertainty calculated from unertainty of the waste composition of this waste, uncertainty in waste decomposition and short-term leaching in landfill
- Sodium, ion [water, ground-, long-term]: 0.0011376 kg; lognormal variance with pedigree 0.16687, pedigree (1,1,4,1,1)
  Emissions from long-term leachate (>100a) directly from MSW landfill and indirectly via incineration of treatement sludge from leachate treatement.
  Uncertainty: Uncertainty calculated depending on waste input and uncertainty of long-term transfer coefficents in landfill.
- DOC, Dissolved Organic Carbon [water, ground-]: 0.00020193 kg; lognormal variance with pedigree 0.21263, pedigree (1,1,4,1,1)
  (same comment as for Ammonium, ion)
- Magnesium [water, ground-, long-term]: 8.0473e-5 kg; lognormal variance with pedigree 0.25553, pedigree (1,1,4,1,1)
  (same comment as for Sodium, ion)
- Sulfate [water, ground-]: 3.7465e-6 kg; lognormal variance with pedigree 0.32725, pedigree (1,1,4,1,1)
  (same comment as for Ammonium, ion)
- Aluminium [water, ground-, long-term]: 0.00016186 kg; lognormal variance with pedigree 0.23247, pedigree (1,1,4,1,1)
  (same comment as for Sodium, ion)
- Sodium [air, non-urban air or from high stacks]: 1.2262e-8 kg; lognormal variance with pedigree 0.48072, pedigree (1,1,4,1,1)
  burden from direct release or incineration of landfill biogas; or windblown leachate evaporite in arid climates.
  Uncertainty: Uncertainty calculated from unertainty of the waste composition of this waste, uncertainty in waste decomposition and short-term leaching in landfill
- Iron, ion [water, ground-, long-term]: 0.0012954 kg; lognormal variance with pedigree 0.16398, pedigree (1,1,4,1,1)
  (same comment as for Sodium, ion)
- Heat, waste [soil, industrial]: 0.24878 MJ; lognormal variance with pedigree 0.077031, pedigree (1,1,4,1,1)
  burden from short-term decomposition of waste (0-100a).
  Uncertainty: Uncertainty calculated from unertainty of the waste composition of this waste, uncertainty in waste decomposition and short-term leaching in landfill
- Calcium, ion [water, ground-, long-term]: 0.0021834 kg; lognormal variance with pedigree 0.14711, pedigree (1,1,4,1,1)
  (same comment as for Sodium, ion)
- BOD5, Biological Oxygen Demand [water, ground-]: 5.2286e-5 kg; lognormal variance with pedigree 0.21263, pedigree (1,1,4,1,1)
  (same comment as for Ammonium, ion)
- Thallium [water, ground-, long-term]: 3.237e-7 kg; lognormal variance with pedigree 0.43664, pedigree (1,1,4,1,1)
  (same comment as for Sodium, ion)
- COD, Chemical Oxygen Demand [water, ground-]: 0.00022086 kg; lognormal variance with pedigree 0.21263, pedigree (1,1,4,1,1)
  (same comment as for Ammonium, ion)
- Strontium [water, ground-, long-term]: 7.1619e-5 kg; lognormal variance with pedigree 0.2596, pedigree (1,1,4,1,1)
  (same comment as for Sodium, ion)
- Heat, waste [water, ground-, long-term]: 35.798 MJ; lognormal variance with pedigree 0.020651, pedigree (1,1,4,1,1)
  burden from long-term decomposition of waste (>100a).
  Uncertainty: Uncertainty calculated from unertainty of the waste composition of this waste, uncertainty in waste decomposition and short-term leaching in landfill
- Titanium, ion [water, ground-, long-term]: 0.00080932 kg; lognormal variance with pedigree 0.1793, pedigree (1,1,4,1,1)
  (same comment as for Sodium, ion)
- TOC, Total Organic Carbon [water, ground-]: 0.00020193 kg; lognormal variance with pedigree 0.21263, pedigree (1,1,4,1,1)
  (same comment as for Ammonium, ion)
- Sodium, ion [water, ground-]: 4.9049e-5 kg; lognormal variance with pedigree 0.2182, pedigree (1,1,4,1,1)
  (same comment as for Ammonium, ion)
- Zinc, ion [water, ground-, long-term]: 0.00028865 kg; lognormal variance with pedigree 0.21327, pedigree (1,1,4,1,1)
  (same comment as for Sodium, ion)
- Magnesium [air, non-urban air or from high stacks]: 1.2477e-10 kg; lognormal variance with pedigree 0.63155, pedigree (1,1,4,1,1)
  (same comment as for Sodium)
- Magnesium [water, ground-]: 4.9907e-7 kg; lognormal variance with pedigree 0.36124, pedigree (1,1,4,1,1)
  (same comment as for Ammonium, ion)
- Vanadium, ion [water, ground-, long-term]: 0.0012832 kg; lognormal variance with pedigree 0.16092, pedigree (1,1,4,1,1)
  (same comment as for Sodium, ion)
- Aluminium [air, non-urban air or from high stacks]: 2.0214e-11 kg; lognormal variance with pedigree 0.68878, pedigree (1,1,4,1,1)
  (same comment as for Sodium)
- Aluminium [water, ground-]: 8.0856e-8 kg; lognormal variance with pedigree 0.41833, pedigree (1,1,4,1,1)
  (same comment as for Ammonium, ion)
- Beryllium [water, ground-, long-term]: 4.0463e-7 kg; lognormal variance with pedigree 0.42949, pedigree (1,1,4,1,1)
  (same comment as for Sodium, ion)
- Calcium [air, non-urban air or from high stacks]: 7.1083e-10 kg; lognormal variance with pedigree 0.57311, pedigree (1,1,4,1,1)
  (same comment as for Sodium)
- Calcium, ion [water, ground-]: 2.8433e-6 kg; lognormal variance with pedigree 0.30183, pedigree (1,1,4,1,1)
  (same comment as for Ammonium, ion)
- Tin, ion [water, ground-, long-term]: 3.2203e-6 kg; lognormal variance with pedigree 0.36226, pedigree (1,1,4,1,1)
  (same comment as for Sodium, ion)
- Iron [air, non-urban air or from high stacks]: 4.4435e-11 kg; lognormal variance with pedigree 0.66065, pedigree (1,1,4,1,1)
  (same comment as for Sodium)
- Titanium, ion [water, ground-]: 4.0428e-7 kg; lognormal variance with pedigree 0.36516, pedigree (1,1,4,1,1)
  (same comment as for Ammonium, ion)
- Antimony [water, ground-, long-term]: 2.5635e-6 kg; lognormal variance with pedigree 0.42014, pedigree (1,1,4,1,1)
  (same comment as for Sodium, ion)
- Thallium [air, non-urban air or from high stacks]: 4.7019e-14 kg; lognormal variance with pedigree 0.88819, pedigree (1,1,4,1,1)
  (same comment as for Sodium)
- Iron, ion [water, ground-]: 1.7774e-7 kg; lognormal variance with pedigree 0.3924, pedigree (1,1,4,1,1)
  (same comment as for Ammonium, ion)
- Selenium [water, ground-, long-term]: 1.1477e-6 kg; lognormal variance with pedigree 0.39276, pedigree (1,1,4,1,1)
  (same comment as for Sodium, ion)
- Beryllium [air, non-urban air or from high stacks]: 5.8774e-14 kg; lognormal variance with pedigree 0.88105, pedigree (1,1,4,1,1)
  (same comment as for Sodium)
- Strontium [water, ground-]: 4.1612e-8 kg; lognormal variance with pedigree 0.44051, pedigree (1,1,4,1,1)
  (same comment as for Ammonium, ion)
- Lead [water, ground-, long-term]: 1.9078e-5 kg; lognormal variance with pedigree 0.30359, pedigree (1,1,4,1,1)
  (same comment as for Sodium, ion)
- Titanium [air, non-urban air or from high stacks]: 1.0107e-10 kg; lognormal variance with pedigree 0.63561, pedigree (1,1,4,1,1)
  (same comment as for Sodium)
- Thallium [water, ground-]: 1.8808e-10 kg; lognormal variance with pedigree 0.61755, pedigree (1,1,4,1,1)
  (same comment as for Ammonium, ion)
- Nickel, ion [water, ground-, long-term]: 8.0925e-7 kg; lognormal variance with pedigree 0.40718, pedigree (1,1,4,1,1)
  (same comment as for Sodium, ion)
- Strontium [air, non-urban air or from high stacks]: 1.0403e-11 kg; lognormal variance with pedigree 0.71115, pedigree (1,1,4,1,1)
  (same comment as for Sodium)
- Zinc, ion [water, ground-]: 1.3664e-7 kg; lognormal variance with pedigree 0.40089, pedigree (1,1,4,1,1)
  (same comment as for Ammonium, ion)
- Manganese [water, ground-, long-term]: 2.5081e-5 kg; lognormal variance with pedigree 0.29413, pedigree (1,1,4,1,1)
  (same comment as for Sodium, ion)
- Zinc [air, non-urban air or from high stacks]: 3.0365e-11 kg; lognormal variance with pedigree 0.67498, pedigree (1,1,4,1,1)
  (same comment as for Sodium)
- Beryllium [water, ground-]: 2.351e-10 kg; lognormal variance with pedigree 0.61041, pedigree (1,1,4,1,1)
  (same comment as for Ammonium, ion)
- Copper, ion [water, ground-, long-term]: 3.4928e-5 kg; lognormal variance with pedigree 0.28351, pedigree (1,1,4,1,1)
  (same comment as for Sodium, ion)
- Tin [air, non-urban air or from high stacks]: 4.7387e-14 kg; lognormal variance with pedigree 0.885, pedigree (1,1,4,1,1)
  (same comment as for Sodium)
- Tin, ion [water, ground-]: 1.8955e-10 kg; lognormal variance with pedigree 0.61869, pedigree (1,1,4,1,1)
  (same comment as for Ammonium, ion)
- Mercury [water, ground-, long-term]: 4.0447e-8 kg; lognormal variance with pedigree 0.48845, pedigree (1,1,4,1,1)
  (same comment as for Sodium, ion)
- Vanadium [air, non-urban air or from high stacks]: 4.904e-10 kg; lognormal variance with pedigree 0.58496, pedigree (1,1,4,1,1)
  (same comment as for Sodium)
- Vanadium, ion [water, ground-]: 1.9616e-6 kg; lognormal variance with pedigree 0.31379, pedigree (1,1,4,1,1)
  (same comment as for Ammonium, ion)
- Cobalt [water, ground-, long-term]: 1.4125e-6 kg; lognormal variance with pedigree 0.38905, pedigree (1,1,4,1,1)
  (same comment as for Sodium, ion)
- Antimony [air, non-urban air or from high stacks]: 2.2388e-12 kg; lognormal variance with pedigree 0.76303, pedigree (1,1,4,1,1)
  (same comment as for Sodium)
- Selenium [water, ground-]: 1.791e-9 kg; lognormal variance with pedigree 0.54464, pedigree (1,1,4,1,1)
  (same comment as for Ammonium, ion)
- Chromium VI [water, ground-, long-term]: 1.6119e-7 kg; lognormal variance with pedigree 1.4148, pedigree (1,1,4,1,1)
  (same comment as for Sodium, ion)
- Selenium [air, non-urban air or from high stacks]: 4.4776e-13 kg; lognormal variance with pedigree 0.81581, pedigree (1,1,4,1,1)
  (same comment as for Sodium)
- Lead [water, ground-]: 1.1229e-9 kg; lognormal variance with pedigree 0.56003, pedigree (1,1,4,1,1)
  (same comment as for Ammonium, ion)
- Arsenic, ion [water, ground-, long-term]: 1.5357e-6 kg; lognormal variance with pedigree 0.38637, pedigree (1,1,4,1,1)
  (same comment as for Sodium, ion)
- Lead [air, non-urban air or from high stacks]: 3.7428e-13 kg; lognormal variance with pedigree 0.8175, pedigree (1,1,4,1,1)
  (same comment as for Sodium)
- Antimony [water, ground-]: 8.9552e-9 kg; lognormal variance with pedigree 0.49186, pedigree (1,1,4,1,1)
  (same comment as for Ammonium, ion)
- Cadmium, ion [water, ground-, long-term]: 2.8612e-5 kg; lognormal variance with pedigree 0.29008, pedigree (1,1,4,1,1)
  (same comment as for Sodium, ion)
- Nickel [air, non-urban air or from high stacks]: 1.1755e-13 kg; lognormal variance with pedigree 0.85873, pedigree (1,1,4,1,1)
  (same comment as for Sodium)
- Nickel, ion [water, ground-]: 4.7019e-10 kg; lognormal variance with pedigree 0.58809, pedigree (1,1,4,1,1)
  (same comment as for Ammonium, ion)
- Barium [water, ground-, long-term]: 0.00020011 kg; lognormal variance with pedigree 0.22506, pedigree (1,1,4,1,1)
  (same comment as for Sodium, ion)
- Mercury [air, non-urban air or from high stacks]: 1.108e-11 kg; lognormal variance with pedigree 0.69407, pedigree (1,1,4,1,1)
  (same comment as for Sodium)
- Mercury [water, ground-]: 2.77e-11 kg; lognormal variance with pedigree 0.66401, pedigree (1,1,4,1,1)
  (same comment as for Ammonium, ion)
- Fluoride [water, ground-, long-term]: 1.2091e-5 kg; lognormal variance with pedigree 0.31855, pedigree (1,1,4,1,1)
  (same comment as for Sodium, ion)
- Manganese [air, non-urban air or from high stacks]: 7.2558e-11 kg; lognormal variance with pedigree 0.65007, pedigree (1,1,4,1,1)
  (same comment as for Sodium)
- Copper, ion [water, ground-]: 1.7084e-9 kg; lognormal variance with pedigree 0.54607, pedigree (1,1,4,1,1)
  (same comment as for Ammonium, ion)
- Chloride [water, ground-, long-term]: 0.0012026 kg; lognormal variance with pedigree 0.16557, pedigree (1,1,4,1,1)
  (same comment as for Sodium, ion)
- Copper [air, non-urban air or from high stacks]: 4.8812e-13 kg; lognormal variance with pedigree 0.80783, pedigree (1,1,4,1,1)
  (same comment as for Sodium)
- Manganese [water, ground-]: 2.9023e-7 kg; lognormal variance with pedigree 0.38127, pedigree (1,1,4,1,1)
  (same comment as for Ammonium, ion)
- Bromine [water, ground-, long-term]: 7.8907e-6 kg; lognormal variance with pedigree 0.33196, pedigree (1,1,4,1,1)
  (same comment as for Sodium, ion)
- Chromium [air, non-urban air or from high stacks]: 2.9961e-13 kg; lognormal variance with pedigree 0.82572, pedigree (1,1,4,1,1)
  (same comment as for Sodium)
- Chromium VI [water, ground-]: 1.1984e-9 kg; lognormal variance with pedigree 0.55787, pedigree (1,1,4,1,1)
  (same comment as for Ammonium, ion)
- Nitrogen, organic bound [water, ground-, long-term]: 0.00071174 kg; lognormal variance with pedigree 0.16945, pedigree (1,1,4,1,1)
  (same comment as for Sodium, ion)
- Cobalt [air, non-urban air or from high stacks]: 1.1373e-12 kg; lognormal variance with pedigree 0.78612, pedigree (1,1,4,1,1)
  (same comment as for Sodium)
- Cobalt [water, ground-]: 4.5492e-9 kg; lognormal variance with pedigree 0.51498, pedigree (1,1,4,1,1)
  (same comment as for Ammonium, ion)
- Nitrate [water, ground-, long-term]: 4.5796e-5 kg; lognormal variance with pedigree 0.16945, pedigree (1,1,4,1,1)
  (same comment as for Sodium, ion)
- Cadmium [air, non-urban air or from high stacks]: 3.3584e-10 kg; lognormal variance with pedigree 0.59983, pedigree (1,1,4,1,1)
  (same comment as for Sodium)
- Arsenic, ion [water, ground-]: 2.76e-9 kg; lognormal variance with pedigree 0.53076, pedigree (1,1,4,1,1)
  (same comment as for Ammonium, ion)
- Nitrite [water, ground-, long-term]: 2.3701e-5 kg; lognormal variance with pedigree 0.16945, pedigree (1,1,4,1,1)
  (same comment as for Sodium, ion)
- Barium [air, non-urban air or from high stacks]: 5.7892e-10 kg; lognormal variance with pedigree 0.581, pedigree (1,1,4,1,1)
  (same comment as for Sodium)
- Cadmium, ion [water, ground-]: 5.0375e-8 kg; lognormal variance with pedigree 0.43512, pedigree (1,1,4,1,1)
  (same comment as for Ammonium, ion)
- Hydrogen sulfide [water, ground-, long-term]: 2.6142e-5 kg; lognormal variance with pedigree 0.20594, pedigree (1,1,4,1,1)
  (same comment as for Sodium, ion)
- Hydrogen fluoride [air, non-urban air or from high stacks]: 4.8357e-8 kg; lognormal variance with pedigree 0.43934, pedigree (1,1,4,1,1)
  (same comment as for Sodium)
- Barium [water, ground-]: 2.3157e-6 kg; lognormal variance with pedigree 0.3122, pedigree (1,1,4,1,1)
  (same comment as for Ammonium, ion)
- Ammonium, ion [water, ground-, long-term]: 0.00043547 kg; lognormal variance with pedigree 0.16945, pedigree (1,1,4,1,1)
  (same comment as for Sodium, ion)
- Bromine [air, non-urban air or from high stacks]: 2.8551e-9 kg; lognormal variance with pedigree 0.52922, pedigree (1,1,4,1,1)
  (same comment as for Sodium)
- Fluoride [water, ground-]: 8.9122e-9 kg; lognormal variance with pedigree 0.49182, pedigree (1,1,4,1,1)
  (same comment as for Ammonium, ion)
- DOC, Dissolved Organic Carbon [water, ground-, long-term]: 0.68719 kg; lognormal variance with pedigree 0.0090264, pedigree (1,1,4,1,1)
  (same comment as for Sodium, ion)
- Hydrogen chloride [air, non-urban air or from high stacks]: 4.4742e-7 kg; lognormal variance with pedigree 0.36283, pedigree (1,1,4,1,1)
  (same comment as for Sodium)
- Bromine [water, ground-]: 2.0367e-7 kg; lognormal variance with pedigree 0.3966, pedigree (1,1,4,1,1)
  (same comment as for Ammonium, ion)
- COD, Chemical Oxygen Demand [water, ground-, long-term]: 0.75161 kg; lognormal variance with pedigree 0.0090264, pedigree (1,1,4,1,1)
  (same comment as for Sodium, ion)
- Arsenic [air, non-urban air or from high stacks]: 3.8692e-11 kg; lognormal variance with pedigree 0.67093, pedigree (1,1,4,1,1)
  (same comment as for Sodium)
- Nitrate [water, ground-]: 1.0963e-6 kg; lognormal variance with pedigree 0.23616, pedigree (1,1,4,1,1)
  (same comment as for Ammonium, ion)
- BOD5, Biological Oxygen Demand [water, ground-, long-term]: 0.17793 kg; lognormal variance with pedigree 0.0090264, pedigree (1,1,4,1,1)
  (same comment as for Sodium, ion)
- Nitrogen oxides [air, non-urban air or from high stacks]: 1.5005e-8 kg; lognormal variance with pedigree 0.32839, pedigree (1,1,4,1,1)
  (same comment as for Carbon dioxide, fossil)
- Nitrite [water, ground-]: 5.6736e-7 kg; lognormal variance with pedigree 0.23616, pedigree (1,1,4,1,1)
  (same comment as for Ammonium, ion)
- Sulfate [water, ground-, long-term]: 0.0010028 kg; lognormal variance with pedigree 0.20594, pedigree (1,1,4,1,1)
  (same comment as for Sodium, ion)
- Sulfur dioxide [air, non-urban air or from high stacks]: 4.6985e-7 kg; lognormal variance with pedigree 0.38308, pedigree (1,1,4,1,1)
  (same comment as for Carbon dioxide, fossil)
- Chloride [water, ground-]: 3.104e-5 kg; lognormal variance with pedigree 0.23022, pedigree (1,1,4,1,1)
  (same comment as for Ammonium, ion)
- TOC, Total Organic Carbon [water, ground-, long-term]: 0.68719 kg; lognormal variance with pedigree 0.0090264, pedigree (1,1,4,1,1)
  (same comment as for Sodium, ion)
- Nitrogen, organic bound [water, ground-]: 1.7038e-5 kg; lognormal variance with pedigree 0.23616, pedigree (1,1,4,1,1)
  (same comment as for Ammonium, ion)
- Methane, fossil [air, non-urban air or from high stacks]: 0.0050214 kg; lognormal variance with pedigree 0.11208, pedigree (1,1,4,1,1)
  (same comment as for Carbon dioxide, fossil)
- Hydrogen sulfide [water, ground-]: 9.7662e-8 kg; lognormal variance with pedigree 0.32725, pedigree (1,1,4,1,1)
  (same comment as for Ammonium, ion)

## Extrapolations
This dataset has been extrapolated from year 2012 to the year of the calculation (2021). The uncertainty has been adjusted accordingly.
