# sputtering target production, sintered, indium tin oxide

Dataset: EcoSpold 2, unit process
Geography: RER
Time period: 2003-01-01 to 2021-12-31
Technology level: current
Classification: ISIC rev.4 ecoinvent: 2592:Treatment and coating of metals; machining
Classification: EcoSpold01Categories: electronics/module
Synonyms: sputtering target; Indium Zinn Oxid; Indium Tin Oxide
Tags: ConvertedDataset
Scenario: Business-as-Usual
System model: Allocation, cut-off by classification
Generated by: Mischa Classen
Published in: Hischier R. 2007
Database: ecoinvent
isCopyrightProtected: true
accessRestrictedTo: 1

## General comment
This module relates to 1 kg ITO net bound to a backplate. It comprises the forming of a high-density sintered body from ITO and its attachment to a copper backplate. Dimensions assumed: 610mm x 350mm. No direct process emissions are considered due to a lack of respective information.
[This dataset was already contained in the ecoinvent database version 2. It was not individually updated during the transfer to ecoinvent version 3. Life Cycle Impact Assessment results may still have changed, as they are affected by changes in the supply chain, i.e. in other datasets. This dataset was generated following the ecoinvent quality guidelines for version 2. It may have been subject to central changes described in the ecoinvent version 3 change report (http://www.ecoinvent.org/database/ecoinvent-version-3/reports-of-changes/), and the results of the central updates were reviewed extensively. The changes added e.g. consistent water flows and other information throughout the database. The documentation of this dataset can be found in the ecoinvent reports of version 2, which are still available via the ecoinvent website. The change report linked above covers all central changes that were made during the conversion process.]

## Included activities end
Production of nanoscaled powder, sintering, bonding, and production of backplate.

## Technology
Pressing at 250 Mpa, sintering at 1'500°C for 3h. Soldering with Indium to backplate

## Reference product
- sputtering target, sintered, indium tin oxide: 1 kg; CPC 88731: Metal treatment and coating services; By-product classification allocatable product
  EcoSpold01Location=RER
  production volume 1.32237 kg
    This is a placeholder value that does not reflect real-world production volumes. This dataset does not currently require a real-world production volume to work in the database framework, and no actual data were collected yet. This has no negative effect on the results of the ecoinvent database. The placeholder value of this activity was scaled according to the nominal GDP of 2005 (source: United Nations, http://data.un.org/Glossary.aspx?q=GDP+%28current+US%24%29, accessed 20130726) to reflect an appropriate share of the global production volume, which is also a placeholder value.
  property price 107.86 EUR2005
    Calculated based on inputs: The price of the product has been calculated as a sum of the values of the material and energy inputs for this product. This value is therefore a rough estimation. It may underestimate the real price since there are additional expenses when producing any product. These expences can include for example labour costs, treatment of waste materials and profit for the producer. Please consider carefully whether this level of data quality is acceptable for your application.
  property carbon content, non-fossil 0
    Technical data for a typical ITO target with an In2O3/SnO2 in a 90/10 wt% ratio are given in Tab. 1.1 (ecoinvent v2.2 report 16_part III-Annex I). The targets consist of a sintered and pressed ITO body and a backing plate from Cu or Ti.
  property carbon content, fossil 0
    (same comment as for sputtering target, sintered, indium tin oxide)
  property carbon content 0
    carbon content on a dry matter basis (reserved; not for manual entry)
  properties: water in wet mass 0 kg, water content 0, wet mass 1 kg, dry mass 1 kg, carbon allocation 0 kg

## Inputs from technosphere
- copper, cathode: 0.76648 kg; lognormal variance with pedigree 0.2608, pedigree (2,2,5,3,5)
  EcoSpold01Location=GLO
  properties: dry mass 1 kg, wet mass 1 kg
- sheet rolling, copper: 0.76648 kg; lognormal variance with pedigree 0.2608, pedigree (2,2,5,3,5)
  activityLink introduced to establish a direct link to the corresponding regional supply of this product
  EcoSpold01Location=RER
- electricity, medium voltage: 0.47505 kWh; lognormal variance with pedigree 0.2682, pedigree (4,2,5,3,5)
  EcoSpold01Location=UCTE
- indium: 0.022688 kg; lognormal variance with pedigree 0.2682, pedigree (4,2,5,3,5)
  EcoSpold01Location=RER
  properties: dry mass 1 kg, wet mass 1 kg
- indium tin oxide powder, nanoscale, for sputtering target: 1 kg; lognormal variance with pedigree 0.2682, pedigree (4,2,5,3,5)
  EcoSpold01Location=RER
  properties: dry mass 1 kg, wet mass 1 kg
- chemical factory, organics: 8e-10 unit; lognormal variance with pedigree 0.5682, pedigree (4,2,5,3,5)
  EcoSpold01Location=RER
  activityLink introduced to establish a direct link to the corresponding regional supply of this product

## Sampling procedure
Literature

## Extrapolations
This dataset has been extrapolated from year 2005 to the year of the calculation (2021). The uncertainty has been adjusted accordingly.

## Review by Roberto Dones 2007-08-22
Passed
