# treatment of wastewater from soft fibreboard production, capacity 5E9l/year

Dataset: EcoSpold 2, unit process
Geography: RoW
Time period: 2007-01-01 to 2021-12-31
Technology level: current
Classification: EcoSpold01Categories: waste management/wastewater treatment
Classification: ISIC rev.4 ecoinvent: 3700:Sewerage
Tags: Treatment; ConvertedDataset
Scenario: Business-as-Usual
System model: Allocation, cut-off by classification
Generated by: Frank Werner (obsolete)
Published in: Hischier, R. 2009
Database: ecoinvent
isCopyrightProtected: true
accessRestrictedTo: 1

## General comment
wastewater purified in a medium size municipal wastewater treatment plant (capacity class 3), with an average capacity size of 24900 per-captia-equivalents PCE. Average data from two production sites
[This dataset was already contained in the ecoinvent database version 2. It was not individually updated during the transfer to ecoinvent version 3. Life Cycle Impact Assessment results may still have changed, as they are affected by changes in the supply chain, i.e. in other datasets. This dataset was generated following the ecoinvent quality guidelines for version 2. It may have been subject to central changes described in the ecoinvent version 3 change report (http://www.ecoinvent.org/database/ecoinvent-version-3/reports-of-changes/), and the results of the central updates were reviewed extensively. The changes added e.g. consistent water flows and other information throughout the database. The documentation of this dataset can be found in the ecoinvent reports of version 2, which are still available via the ecoinvent website. The change report linked above covers all central changes that were made during the conversion process.]

## Included activities end
infrastructure materials for municipal wastewater treatment plant, transports, dismantling. Land use burdens.

## Geography
specific to the technology mix encountered in Switzerland in 2000. Well applicable to modern treatment practices in Europe, North America or Japan.

## Technology
three stage wastewater treatment (mechanical, biological, chemical) including sludge digestion (fermentation) according to the average technology in Switzerland

## Parameters
- fraction, process water, to air: 0.1 dimensionless; name fraction_PW_to_air; lognormal variance with pedigree 0.092025, pedigree (4,4,3,2,4)

## Reference product
- wastewater from soft fibreboard production: -1 m3; CPC 39920: Sewage sludge; By-product classification Waste
  EcoSpold01Location=CH
  production volume 3.96633 m3
    This is a placeholder value that does not reflect real-world production volumes. This dataset does not currently require a real-world production volume to work in the database framework, and no actual data were collected yet. This has no negative effect on the results of the ecoinvent database.
  property carbon content, non-fossil 0.999914
    COD= 100 kg/m3 (Tab A.17, ecoinvent v2.2 report 13_I). COD was converted to TOC, using conversion factors in Tab 4.10 (ecoinvent v2.2 report 13_IV). TOC was considered as Total Carbon.
  property price 0 EUR2005
    Waste products are assigned a price of zero as they are assumed to require further treatment.
  property carbon content 0.999914
    carbon content on a dry matter basis (reserved; not for manual entry)
  properties: wet mass 1000 kg, dry mass 43.2938 kg, water content 22.098, carbon content, fossil 0, water in wet mass 956.706 kg, carbon allocation 43.29 kg

## Inputs from technosphere
- residential sewer grid, 0.087 km: 2.8713e-7 km; lognormal variance with pedigree 0.042, pedigree (1,1,5,5,1)
  uncertainty heeded in exchanges of the module
  EcoSpold01Location=CH
- cement, unspecified: 0 kg; pedigree (1,1,1,1,1)
  burden from sludge incineration. Uncertainty calculated from wastewater composition and treatment model
  EcoSpold01Location=CH
  properties: dry mass 1 kg, wet mass 1 kg
- electricity, high voltage: 0 kWh; pedigree (1,1,1,1,1)
  EcoSpold01Location=CH
  burden from sludge incineration. Uncertainty calculated from wastewater composition and treatment model
- chemical, inorganic: 3.846e-8 kg; lognormal variance with pedigree 0.092, pedigree (1,1,5,5,1)
  EcoSpold01Location=GLO
  burden from sludge incineration. Uncertainty calculated from wastewater composition and treatment model
  properties: carbon content, fossil 0.003, dry mass 1 kg, wet mass 1 kg
  note on carbon content, fossil: This dataset is an unweighted average of 20 inorganic substances (listed in Tab 88.1, ecoinvent v2.2 report 8, part II), being part of the top100 chemicals included in this database. The C-content has also been calculated as an unweighted average of the C content of the substances composing this dataset.
- heat, district or industrial, other than natural gas: 0 MJ; pedigree (1,1,1,1,1)
  (same comment as for electricity, high voltage)
  properties: heating value, net 1 MJ
- process-specific burdens, slag landfill: 0 kg; pedigree (1,1,1,1,1)
  (same comment as for cement, unspecified)
- iron (III) chloride, without water, in 40% solution state: 0.00033469 kg; lognormal variance with pedigree 0.102, pedigree (1,1,5,5,1)
  EcoSpold01Location=CH
  direct wastewater treatment plant burden plus burden from sludge incineration. Uncertainty calculated from wastewater composition and treatment model
  properties: dry mass 1 kg, wet mass 1 kg
- sodium hydroxide, without water, in 50% solution state: 4.9618e-7 kg; lognormal variance with pedigree 0.092, pedigree (1,1,5,5,1)
  burden from sludge incineration. Uncertainty calculated from wastewater composition and treatment model
  EcoSpold01Location=RER
  properties: heating value, net 3.03 MJ, wet mass 1 kg, dry mass 1 kg
- municipal waste incineration facility: 5.862e-10 unit; lognormal variance with pedigree 0.052, pedigree (1,1,5,5,1)
  (same comment as for cement, unspecified)
- iron sulfate: 0.00024479 kg; lognormal variance with pedigree 0.102, pedigree (1,1,5,5,1)
  EcoSpold01Location=RER
  direct wastewater treatment plant burden. Uncertainty calculated from wastewater composition and treatment model
  properties: wet mass 1 kg, dry mass 1 kg
- electricity, low voltage: 0 kWh; pedigree (1,1,1,1,1)
  EcoSpold01Location=CH
  direct wastewater treatment plant burden. Uncertainty calculated from wastewater composition and treatment model
- chromium oxide, flakes: 4.7993e-9 kg; lognormal variance with pedigree 0.542, pedigree (1,1,5,5,1)
  (same comment as for sodium hydroxide, without water, in 50% solution state)
  properties: wet mass 1 kg, dry mass 1 kg
- titanium dioxide: 2.3517e-7 kg; lognormal variance with pedigree 0.542, pedigree (1,1,5,5,1)
  EcoSpold01Location=RER
  burden from sludge incineration. Uncertainty calculated from wastewater composition and treatment model
  properties: dry mass 1 kg, wet mass 1 kg
- sewer grid, 5E9l/year, 110 km: 2.1782e-7 km; lognormal variance with pedigree 0.042, pedigree (1,1,5,5,1)
  uncertainty heeded in exchanges of the module
  EcoSpold01Location=CH
- process-specific burdens, residual material landfill: 0 kg; pedigree (1,1,1,1,1)
  (same comment as for electricity, high voltage)
- wastewater treatment facility, capacity 5E9l/year: 5.6882e-9 unit; lognormal variance with pedigree 0.042, pedigree (1,1,5,5,1)
  EcoSpold01Location=CH
  uncertainty heeded in exchanges of the module
- waste cement, hydrated: 0 kg; pedigree (1,1,1,1,1)
  (same comment as for cement, unspecified)
  production volume 0 kg
    Calculated from the production volume of wastewater from soft fibreboard production in proportion to the respective output amounts.
  properties: dry mass 1 kg, wet mass 1 kg
- quicklime, milled, packed: 8.9959e-8 kg; lognormal variance with pedigree 0.092, pedigree (1,1,5,5,1)
  (same comment as for electricity, high voltage)
  properties: dry mass 0.99 kg, wet mass 1 kg, water content 0.010101
- hydrochloric acid, without water, in 30% solution state: 2.3076e-8 kg; lognormal variance with pedigree 0.092, pedigree (1,1,5,5,1)
  (same comment as for titanium dioxide)
  properties: dry mass 1 kg, wet mass 1 kg, heating value, net 3.32 MJ
- waste plastic, mixture: 0 kg; pedigree (1,1,1,1,1)
  direct wastewater treatment plant burden. Uncertainty calculated from wastewater composition and treatment model
  EcoSpold01Location=CH
  production volume 0 kg
    (same comment as for waste cement, hydrated)
  properties: water content 0.180638, carbon content, fossil 0.747344, dry mass 0.847 kg, wet mass 1 kg, heating value, net 30.79 MJ
  note on carbon content, fossil: C content in 1 kg DM was calculated using data in Tab A.2, ecoinvent v2.2 report 13_I
  note on heating value, net: Value taken from the general comment of the treatment dataset.
- aluminium sulfate, powder: 6.616e-5 kg; lognormal variance with pedigree 0.102, pedigree (1,1,5,5,1)
  direct wastewater treatment plant burden. Uncertainty calculated from wastewater composition and treatment model
  EcoSpold01Location=RER
  properties: wet mass 1 kg, dry mass 1 kg
- heat, district or industrial, natural gas: 0 MJ; pedigree (1,1,1,1,1)
  (same comment as for titanium dioxide)
  properties: heating value, net 1 MJ
- waste graphical paper: -0.0155 kg; lognormal variance with pedigree 0.042, pedigree (1,1,5,5,1)
  (same comment as for electricity, low voltage)
  production volume 0.062 kg
    (same comment as for waste cement, hydrated)
  properties: water content 0.126126, wet mass 1 kg, carbon content, non-fossil 0.454955, dry mass 0.888 kg, heating value, net 14.12 MJ
- residual material landfill: 3.8068e-12 unit; lognormal variance with pedigree 0.072, pedigree (1,1,5,5,1)
  (same comment as for cement, unspecified)
- ammonia, anhydrous, liquid: 0 kg; pedigree (1,1,1,1,1)
  (same comment as for electricity, high voltage)
  properties: wet mass 1 kg, dry mass 1 kg
- slag landfill: 7.5094e-12 unit; lognormal variance with pedigree 0.072, pedigree (1,1,5,5,1)
  (same comment as for electricity, high voltage)
- process-specific burdens, municipal waste incineration: 0 kg; pedigree (1,1,1,1,1)
  (same comment as for cement, unspecified)
- cement, unspecified: 0.000105539, 2.19595e-5, 1.60838e-6, 4.58442e-6, 0.000103678, 3.05155e-6, 3.3515e-5, 4.05494e-6, 0.000452909 kg (9 entries); lognormal variance with pedigree 0.082, pedigree (1,1,5,5,1)
  (same comment as for cement, unspecified)
- electricity, high voltage: 0.0034067, 0.000653097, 0.0150432, 0.0492992, 0.0110733, 0.159451, 0.0252874, 0.0728965 kWh (8 entries); lognormal variance with pedigree 0.492, pedigree (1,1,5,5,1)
  (same comment as for electricity, high voltage)
- heat, district or industrial, other than natural gas: 0.000778106, 0.0469858, 1.91884 MJ (3 entries); lognormal variance with pedigree 0.052, pedigree (1,1,5,5,1)
  (same comment as for electricity, high voltage)
- process-specific burdens, slag landfill: 0.00119486, 0.00302914 kg (2 entries); lognormal variance with pedigree 0.072, pedigree (1,1,5,5,1)
  (same comment as for cement, unspecified)
- electricity, low voltage: 0.00868417, 0.00158122, 0.0356941, 0.124707, 0.0254596, 0.390886, 0.0632386, 0.181589 kWh (8 entries); lognormal variance with pedigree 0.052, pedigree (1,1,5,5,1)
  (same comment as for electricity, low voltage)
- process-specific burdens, residual material landfill: 0.000516868, 0.00131033 kg (2 entries); lognormal variance with pedigree 0.072, pedigree (1,1,5,5,1)
  (same comment as for electricity, high voltage)
- waste cement, hydrated: -0.000516868, -0.00131033 kg (2 entries); lognormal variance with pedigree 0.082, pedigree (1,1,5,5,1)
  (same comment as for cement, unspecified)
  production volume 0.00724728 kg
- waste plastic, mixture: -0.00172425, -0.000115208, -8.71297e-6, -4.75849e-5, -1.92238e-5, -4.51863e-5, -0.00146914, -0.0120707 kg (8 entries); lognormal variance with pedigree 0.042, pedigree (1,1,5,5,1)
  (same comment as for waste plastic, mixture)
  production volume 0.0614782 kg
- heat, district or industrial, natural gas: 8.02563e-6, 0.00019231, 0.000520736 MJ (3 entries); lognormal variance with pedigree 0.222, pedigree (1,1,5,5,1)
  (same comment as for titanium dioxide)
- ammonia, anhydrous, liquid: 1.72208e-6, 1.48033e-7, 2.30301e-7, 4.56309e-7, 4.47062e-7, 4.68569e-8, 2.09468e-7, 4.95539e-6 kg (8 entries); lognormal variance with pedigree 0.222, pedigree (1,1,5,5,1)
  (same comment as for electricity, high voltage)
- process-specific burdens, municipal waste incineration: 0.663284, 1.68152 kg (2 entries); lognormal variance with pedigree 0.052, pedigree (1,1,5,5,1)
  (same comment as for cement, unspecified)

## Emissions to nature
- Cyanide [air, urban air close to ground]: 1.4656e-7 kg; lognormal variance with pedigree 0.242, pedigree (1,1,5,5,1)
  emission from sludge incineration. Uncertainty calculated from wastewater composition and treatment model
- Aluminium [water, ground-, long-term]: 7.7306e-6 kg; lognormal variance with pedigree 0.712, pedigree (1,1,5,5,1)
  (same comment as for Cyanide)
- Iron, ion [water, surface water]: 7.0249e-8 kg; lognormal variance with pedigree 0.662, pedigree (1,1,5,5,1)
  sewer overload discharge plus direct wastewater treatment plant emission plus emission from sludge incineration. Uncertainty calculated from wastewater composition and treatment model
- Carbon monoxide, non-fossil [air, urban air close to ground]: 0.0049024 kg; lognormal variance with pedigree 0.152, pedigree (1,1,5,5,1)
  direct digester gas emission plus emission from sludge incineration. Uncertainty calculated from wastewater composition and treatment model
- Phosphorus [air, urban air close to ground]: 3.5083e-8 kg; lognormal variance with pedigree 0.112, pedigree (1,1,5,5,1)
  (same comment as for Carbon monoxide, non-fossil)
- DOC, Dissolved Organic Carbon [water, surface water]: 0.22097 kg; lognormal variance with pedigree 0.082, pedigree (1,1,5,5,1)
  (same comment as for Iron, ion)
- Nitrogen [water, surface water]: 3.426e-5 kg; lognormal variance with pedigree 0.082, pedigree (1,1,5,5,1)
  direct wastewater treatment plant emission. Uncertainty calculated from wastewater composition and treatment model
- Iron, ion [water, ground-, long-term]: 9.6154e-5 kg; lognormal variance with pedigree 1.462, pedigree (1,1,5,5,1)
  (same comment as for Cyanide)
- COD, Chemical Oxygen Demand [water, ground-, long-term]: 0.012772 kg; lognormal variance with pedigree 0.112, pedigree (1,1,5,5,1)
  (same comment as for Cyanide)
- Chloride [water, surface water]: 0.00021945 kg; lognormal variance with pedigree 0.662, pedigree (1,1,5,5,1)
  (same comment as for Iron, ion)
- Phosphate [water, ground-, long-term]: 4.1087e-6 kg; lognormal variance with pedigree 4.272, pedigree (1,1,5,5,1)
  (same comment as for Cyanide)
- Carbon dioxide, non-fossil [air, urban air close to ground]: 6.119 kg; lognormal variance with pedigree 0.062, pedigree (1,1,5,5,1)
  direct wastewater treatment plant emission plus direct digester gas emission plus emission from sludge incineration. Uncertainty calculated from wastewater composition and treatment model
- Methane, non-fossil [air, urban air close to ground]: 0.015031 kg; lognormal variance with pedigree 0.142, pedigree (1,1,5,5,1)
  (same comment as for Carbon monoxide, non-fossil)
- Nitrogen oxides [air, urban air close to ground]: 5.0942e-5 kg; lognormal variance with pedigree 0.082, pedigree (1,1,5,5,1)
  (same comment as for Carbon monoxide, non-fossil)
- Sulfate [water, surface water]: 0.00021047 kg; lognormal variance with pedigree 0.082, pedigree (1,1,5,5,1)
  (same comment as for Iron, ion)
- TOC, Total Organic Carbon [water, ground-, long-term]: 0.0050538 kg; lognormal variance with pedigree 0.112, pedigree (1,1,5,5,1)
  (same comment as for Cyanide)
- Dinitrogen monoxide [air, urban air close to ground]: 9.7289e-6 kg; lognormal variance with pedigree 0.082, pedigree (1,1,5,5,1)
  direct wastewater treatment plant emission plus direct digester gas emission plus emission from sludge incineration plus emission from sludge spreading. Uncertainty calculated from wastewater composition and treatment model
- BOD5, Biological Oxygen Demand [water, ground-, long-term]: 0.0041776 kg; lognormal variance with pedigree 0.112, pedigree (1,1,5,5,1)
  (same comment as for Cyanide)
- Aluminium [air, urban air close to ground]: 1.6319e-8 kg; lognormal variance with pedigree 0.712, pedigree (1,1,5,5,1)
  (same comment as for Carbon monoxide, non-fossil)
- Phosphate [water, surface water]: 5.5693e-5 kg; lognormal variance with pedigree 0.082, pedigree (1,1,5,5,1)
  sewer overload discharge plus direct wastewater treatment plant emission plus emission from sludge incineration plus emission from sludge spreading. Uncertainty calculated from wastewater composition and treatment model
- Nitrite [water, surface water]: 4.5028e-5 kg; lognormal variance with pedigree 0.082, pedigree (1,1,5,5,1)
  (same comment as for Nitrogen)
- Nitrate [water, surface water]: 0.0033782 kg; lognormal variance with pedigree 0.062, pedigree (1,1,5,5,1)
  (same comment as for Iron, ion)
- Ammonium, ion [water, surface water]: 0.00077097 kg; lognormal variance with pedigree 0.062, pedigree (1,1,5,5,1)
  (same comment as for Nitrogen)
- Iron [air, urban air close to ground]: 6.8532e-9 kg; lognormal variance with pedigree 0.672, pedigree (1,1,5,5,1)
  (same comment as for Carbon monoxide, non-fossil)
- NMVOC, non-methane volatile organic compounds, unspecified origin [air, urban air close to ground]: 6.828e-5 kg; lognormal variance with pedigree 0.262, pedigree (1,1,5,5,1)
  direct digester gas emission. Uncertainty calculated from wastewater composition and treatment model
- COD, Chemical Oxygen Demand [water, surface water]: 0.88293 kg; lognormal variance with pedigree 0.082, pedigree (1,1,5,5,1)
  (same comment as for Iron, ion)
- Aluminium [water, surface water]: 8.6922e-10 kg; lognormal variance with pedigree 0.552, pedigree (1,1,5,5,1)
  (same comment as for Iron, ion)
- Water [air, unspecified]: 0.1 m3; name water_to_air_unspecified; lognormal variance with pedigree 0.0827, pedigree (2,2,5,5,1)
  Calculated value based on water balance.
  property fraction, origin: unspecified 1; name fraction_origin_unspecified
  property fraction, origin: salt water 0; name fraction_origin_salt_water
  property fraction, origin: fresh water 0; name fraction_origin_fresh_water
- Nitrate [water, ground-, long-term]: 5.8499e-6 kg; lognormal variance with pedigree 0.082, pedigree (1,1,5,5,1)
  (same comment as for Cyanide)
- Water [water, unspecified]: 0.9 m3; name water_to_water_unspecified; lognormal variance with pedigree 0.0827, pedigree (2,2,5,5,1)
  Calculated value based on water balance.
  property fraction, origin: fresh water 1; name fraction_origin_fresh_water_Ww
  property fraction, origin: salt water 0; name fraction_origin_salt_water_Ww
  property fraction, origin: unspecified 0; name fraction_origin_unspecified_Ww
  property water in wet mass 1000 kg; name WWM
  property carbon content, fossil 0; name C_content_fossil
  property carbon content, non-fossil 0; name C_content_non_fossil
  property wet mass 1000 kg; name WM
  property dry mass 0 kg; name DM
- DOC, Dissolved Organic Carbon [water, ground-, long-term]: 0.0050538 kg; lognormal variance with pedigree 0.112, pedigree (1,1,5,5,1)
  (same comment as for Cyanide)
- BOD5, Biological Oxygen Demand [water, surface water]: 0.28952 kg; lognormal variance with pedigree 0.072, pedigree (1,1,5,5,1)
  (same comment as for Iron, ion)
- TOC, Total Organic Carbon [water, surface water]: 0.23656 kg; lognormal variance with pedigree 0.082, pedigree (1,1,5,5,1)
  (same comment as for Iron, ion)
- Ammonia [air, urban air close to ground]: 5.2136e-6 kg; lognormal variance with pedigree 0.102, pedigree (1,1,5,5,1)
  direct digester gas emission plus emission from sludge incineration plus emission from sludge spreading. Uncertainty calculated from wastewater composition and treatment model

## Extrapolations
estimated from plant data on two sewage flows with the respective ecoinvent tool This dataset has been copied from an original dataset covering the geography CH. The uncertainty has been adjusted accordingly.

## Review by Hans-Jörg Althaus 2009-02-05
passed
none
