# tap water production, underground water with chemical treatment

Dataset: EcoSpold 2, unit process
Geography: Europe without Switzerland
Time period: 2012-01-01 to 2021-12-31
Technology level: current
Classification: EcoSpold01Categories: water supply/production
Classification: ISIC rev.4 ecoinvent: 3600:Water collection, treatment and supply
Synonyms: potable water
Tags: single enterprise data
Scenario: Business-as-Usual
System model: Allocation, cut-off by classification
Generated by: Tereza Levova
Database: ecoinvent
isCopyrightProtected: true
accessRestrictedTo: 1

## General comment
This dataset is created as a child of global dataset with edited production volume.

This dataset represents production of 1 kg of tap water under pressure at facility gate, ready for distribution in network. It represents average operation of tap water from underground water with chemical treatments. Water is pumped from aquifer, chemically enhanced (e.g. corosion inhibitor, ph, chloration, etc.) and pressurized for distribution. Inventory was constructed from reported energy inputs and wastes from a single plant located in Québec assumed to represent 8% of total production of tap water from this technology.
[This dataset is meant to replace the following datasets:
- tap water production and supply, Europe without Switzerland, 2000 - 2000]

## Included activities start
From the intake pumping of raw surface water into the water treatment plant.

## Included activities end
This dataset ends with the production of tap water, at facility gate, under pressure. It includes energy for intake pumping, lighting and heating of the building as well as the energy of the pump pressurizing water to the beginning of the network. Infrastructure for the facility is estimated. It excludes energy for pumping stations and water losses within the network which is included in the tap water market. Emissions to the environment occurring during the treatment and during the distribution were not considered as they are assumed negligible. Main substance in water that would be released in the environment are assumed to be considered in wastewater processes.

## Geography
Extrapolated from data from a single plant in Quebec (Canada).The uncertainty was adjusted accordingly.

## Time period
Time of publication.

## Reference product
- tap water: 1 kg; name tapwater; CPC 18000: Natural water; By-product classification allocatable product; CAS 7732-18-5
  production volume 2.00631e13 kg; name PV_tapwater; = (4.7824E14*0.184*0.228)
    Calculated based on estimates and literature values.
    4.78E11 m3/year is the amount of tap water produced in Europe (excluding Switzerland) yearly (Gleick, P., 2012, The World"s Water, Volume 7).
    18.4% is the share of tap water produced without any treatment or minimal treatment from ground water
    38% is the share of conventional treatment
    38.5% is the share of direct filtration treatment
    2.4% is the share of microstainer treatment
    2.6% is the share of ultrafiltration
    Estimated based on literature values (European Environment Agency, 2009, Water resources across Europe - confronting water scarcity and drought).
    54.3% of the ground water is extracted and supplied to the distriubution network without treatment
    22.8% of the ground water is extracted and supplied to the distriubution network with chemical treatment
    22.8% of the ground water is extracted and supplied to the distriubution network with desinfection
  property price 0.000397 EUR2005
    Converted from EU price by using Purchasing Power Parities (0.8458 in 2003 and 0.8426 in 2004)
  property carbon content 0.0017899
    carbon content on a dry matter basis (reserved; not for manual entry)
  properties: water content 2940.18, carbon content, non-fossil 0, dry mass 0.00034 kg, carbon content, fossil 0.0017899, wet mass 1 kg, water in wet mass 0.99966 kg, carbon allocation 6.08566e-7 kg

## Inputs from technosphere
- sodium silicate, solid: 8.54444e-7 kg; lognormal variance with pedigree 0.0118, pedigree (2,4,4,4,1)
  Measured value. Average use of chemical reported in surveyed underground water with chemical treatment plants. Note than 1 plant reported using this substance.
  properties: dry mass 1 kg, wet mass 1 kg
- sodium pyrophosphate: 8.12435e-7 kg; name tetrasodiumpyrophosphate; lognormal variance with pedigree 0.0132, pedigree (2,4,4,5,1)
  Measured value. Average use of tetrasodium pyrophosphate reported in surveyed underground water with chemical treatment plants. Note than 1 plant reported using this substance.
- sodium tripolyphosphate: 7.91365e-7 kg; lognormal variance with pedigree 0.0132, pedigree (2,4,4,5,1)
  (same comment as for sodium silicate, solid)
  properties: dry mass 1 kg, wet mass 1 kg
- pump station: 2.0568e-11 unit; lognormal variance with pedigree 0.0526, pedigree (5,4,4,5,1)
  Approximated process. Used to represent facility pumping both intake and at facility gate. Value taken directly from ecoinvent V2.2 tap water, at user module.
- sodium hypochlorite, without water, in 15% solution state: 1.2e-6 kg; lognormal variance with pedigree 0.0132, pedigree (2,4,4,5,1)
  Measured value. Average use of hypochlorite (dry basis) for disinfection in surveyed underground water with chemical treatment plants. Reported concentration of solution is 12% (w/w), input of exchange "water" was added accordingly. Note the 1 plants reported using this substance.
  properties: dry mass 1 kg, wet mass 1 kg
- sodium hydroxide, without water, in 50% solution state: 5.9524e-6 kg; lognormal variance with pedigree 0.0132, pedigree (2,4,4,5,1)
  Measured value. Average use of sodium hydroxide (dry basis) for adjustement in surveyed underground water with chemical treatment plants. Input of exchange "water", based on NaOH concentration, was added accordingly. Note that 1 plants reported using this substance.
  properties: heating value, net 3.03 MJ, wet mass 1 kg, dry mass 1 kg
- diesel, burned in building machine: 5.29805e-5 MJ; = diesel_use*density_diesel*NHV*43.2; lognormal variance with pedigree 0.008, pedigree (1,1,4,1,1)
  Calculated value.
  Uncertainty: C
  property heating value, net 1 MJ; name NHV
  property fuel input in physical units, L 1.46e-6 l; name diesel_use
  property density 0.84 kg/l; name density_diesel
  note on heating value, net: Literature. net (lower) heating (calorific) value for diesel in MJ/kg
  note on fuel input in physical units, L: Measured value. Average of diesel volume consumed in a year for emergency generators (both for emergency and routine maintenance runs).
- electricity, medium voltage: 0.000841 kWh; lognormal variance with pedigree 0.0118, pedigree (2,3,4,5,1)
  Measured value. Average electricity consumption for entire process including pumping for water intake and pumping for distribution at the plant gate. All plants (2) reported electricity use.
- tap water: 2.41269e-5 kg; lognormal variance with pedigree 0.0132, pedigree (3,3,4,5,1)
  Calculated value. Water content of hypochlorite solution, sodium hydroxide, sodium silicate solution, pyrophosphate solution and zinc polyphosphate solution.
  properties: carbon content, fossil 0.00178991, wet mass 1 kg, dry mass 0.000337476 kg, water content 2962.17
  note on carbon content, fossil: Bicarbonate content is 2.93 mol/m3. CO2 content is 0.1 mol/m3 (ecoinvent v2.2 report 8, Tab 93.1).

## Inputs from nature
- Water, well, in ground [natural resource, in water]: 0.001 m3; name waterIn
  Measured value. Data provider reported that no loss occurs thoughout water treatment.

## Sampling procedure
Based on data collected from a treatment plant using underground water and chemical treatment in Quebec (Canada). See corresponding Quebec dataset for more information. Note that percent representativeness is not supplied because technology-specific global production volumes is too uncertain. Should this information become available, the representativeness can be calculated by dividing the sum of the water treated by the Quebec plants that served as a basis for the Global dataset by the technology-specific global production volume. (9.74E9 kg/a)

## Extrapolations
This dataset has been extrapolated from year 2012 to the year of the calculation (2021). The uncertainty has been adjusted accordingly.
