# sawnwood production, hardwood, dried (u=20%), planed

Dataset: EcoSpold 2, unit process
Geography: RoW
Time period: 2014-01-01 to 2021-12-31
Technology level: current
Classification: ISIC rev.4 ecoinvent: 1610:Sawmilling and planing of wood
Classification: EcoSpold01Categories: wooden materials/extraction
Scenario: Business-as-Usual
System model: Allocation, cut-off by classification
Generated by: Emilia Moreno Ruiz
Database: ecoinvent
isCopyrightProtected: false
accessRestrictedTo: 1

## General comment
This activity is providing a more generic sawnwood product, combining inputs from the specific products issued from planing. The relative contribution is based on their Production Volumes.

## Included activities start
Entry of the specific products issued of the planing activity

## Included activities end
Delivery of the generic planed product

## Reference product
- sawnwood, hardwood, dried (u=20%), planed: 1 m3; By-product classification allocatable product; CPC 31102: Wood, sawn or chipped lengthwise, sliced or peeled, of a thickness exceeding 6 mm, of non-coniferous wood
  production volume 2.49505e7 m3; = 69997562.32*0.5
    50% of the Production Volume issued from the planing has been made accesible as this generic product
  property price 265 EUR2005
    Temporary price data. Calculated as 90% of purchasers price based on: 2004 export prices for the World+ according to: http://faostat.fao.org/site/626/DesktopDefault.aspx?PageID=626#ancor downloaded 28 April 2009; calculated as export value divided by export volume.
  property heating value, net 8626.13 MJ
    Assumed equal to "sawnwood, hardwood, raw, dried (u=20%)".The property is based on a value of 12.06MJ/kg
  property carbon content 0.494
    carbon content on a dry matter basis (reserved; not for manual entry)
  properties: water in wet mass 117.76 kg, carbon content, non-fossil 0.494, dry mass 588.8 kg, carbon content, fossil 0, water content 0.2, wet mass 706.56 kg, carbon allocation 290.867 kg

## Inputs from technosphere
- sawnwood, beam, hardwood, dried (u=20%), planed: 0.5 m3; name beam_planed
  The input share has been calculated using data from the planing activity
  property water in wet mass 117.76 kg; name beam_planed_WWM
  property carbon content, non-fossil 0.494; name beam_planed_C_content_non_fossil
  property wet mass 706.56 kg; name beam_planed_WM
  property dry mass 588.8 kg; name beam_planed_DM
  property water content 0.2; name beam_planed_water_content
  property carbon content, fossil 0; name beam_planed_C_content_fossil
  properties: heating value, net 8524.3 MJ
- sawnwood, board, hardwood, dried (u=20%), planed: 0.33 m3; name board_planed
  The input share has been calculated using data from the planing activity
  property dry mass 588.8 kg; name board_planed_DM
  property water in wet mass 117.76 kg; name board_planed_WWM
  property carbon content, non-fossil 0.494; name board_planed_C_content_non_fossil
  property carbon content, fossil 0; name board_planed_C_content_fossil
  property wet mass 706.56 kg; name board_planed_WM
  property water content 0.2; name board_planed_water_content
  properties: heating value, net 8524.3 MJ
- sawnwood, lath, hardwood, dried (u=20%), planed: 0.17 m3; name lath_planed
  The input share has been calculated using data from the planing activity
  properties: heating value, net 8524.3 MJ, wet mass 706.56 kg, water content 0.2, carbon content, non-fossil 0.494, dry mass 588.8 kg
