# potato seed production, at farm

Dataset: EcoSpold 2, unit process
Geography: GLO
Time period: 1996-01-01 to 2021-12-31
Technology level: current
Classification: ISIC rev.4 ecoinvent: 0113:Growing of vegetables and melons, roots and tubers
Classification: EcoSpold01Categories: agricultural means of production/seed
Synonyms: Solanum tuberosum L.
Scenario: Business-as-Usual
System model: Allocation, cut-off by classification
Share of production covered: 87 %
Generated by: Thomas Nemecek
Published in: Nemecek, T. 2007
Database: ecoinvent
isCopyrightProtected: true
accessRestrictedTo: 1

## General comment
This dataset represents the production of 1 kg of potato seed (fresh matter). The yield is 25000 kg/ha at a moisture content at storage of 80%.
[This dataset was already contained in the ecoinvent database version 2. It was not individually updated during the transfer to ecoinvent version 3. Life Cycle Impact Assessment results may still have changed, as they are affected by changes in the supply chain, i.e. in other datasets. This dataset was generated following the ecoinvent quality guidelines for version 2. It may have been subject to central changes described in the ecoinvent version 3 change report (http://www.ecoinvent.org/database/ecoinvent-version-3/reports-of-changes/), and the results of the central updates were reviewed extensively. The changes added e.g. consistent water flows and other information throughout the database. The documentation of this dataset can be found in the ecoinvent reports of version 2, which are still available via the ecoinvent website. The change report linked above covers all central changes that were made during the conversion process.]

## Included activities start
This activity starts after the harvest of the previous crop. The inputs of seeds, mineral fertilisers and pesticides are considered. Farm manure as an organic fertiliser is only accounted for in terms of direct field emissions; all pre-processes are included in the animal production systems.

## Included activities end
The dataset includes all machine operations and corresponding machine infrastructure and sheds. Machine operations are: soil cultivation, sowing, fertilisation, weed control, pest and pathogen control, harvest, transport from field to farm (1 km) and grading of the potatoes at the farm. Further, direct field emissions are included. The cultivation of green manure during winter before planting potatoes is also included. This activity ends after harvest and grading at the farm gate.

## Geography
Refers to an average production in the Swiss lowlands.

## Technology
Integrated production

## Time period
The yield data have been collected for the years 1996-2003.

## Reference product
- potato seed, at farm: 1 kg; name REF_PRODUCT; By-product classification allocatable product; CPC 01510: Potatoes
  production volume 3.49621e10 kg
    FAOSTAT 2011: 'potatoes', average of the years 1999-2002. http://faostat.fao.org/. The original value was split into conventional/integrated seed (98%) and organic seed (2%), where 2% organic production is an extrapolation from Europe to the world (http://www.fao.org/docrep/004/y3557e/y3557e09.htm).
  property water in wet mass 0.8 kg; name potato_seed_farm_WWM
  property wet mass 1 kg; name potato_seed_farm_WM
  property dry mass 0.2 kg; name REF_PRODUCT_DM
  property water content 4; name potato_seed_farm_water_content
  property energy content 3.518 MJ; name REF_PRODUCT_energy_content
    as gross calorific value (when relevant)
  property price 0.0265165 EUR2005; name REF_PRODUCT_price_EUR2005
    Calculated based on inputs: The price of the product has been calculated as a sum of the values of the material and energy inputs for this product. This value is therefore a rough estimation. It may underestimate the real price since there are additional expenses when producing any product. These expences can include for example labour costs, treatment of waste materials and profit for the producer. Please consider carefully whether this level of data quality is acceptable for your application.
  property carbon content, non-fossil 0.413567; name REF_PRODUCT_C_content_non_fossil
    biogene carbon content on a dry matter basis; For potato, seeds are tubers (Tab 1.14, ecoinvent report 15b). Composition data obtained from Potatoes, raw, skin, in (http://www.nal.usda.gov/fnic/foodcomp/search/). First, composition data were refered to 1 kg dry mass. Then, C-contents were calculated considering a C-content/dry mass of 44% in carbohydrates (including fibres), 53% in proteins and 75% in fats. All data from ecoinvent report, n 15a, pg 40, except C-content in protein, that comes from Determination of protein concentration by total organic carbon analysis, Rouwenhorst et al., 1991, J Biochem and Biophys Methods, 22:119-128.
  property carbon content, fossil 0; name REF_PRODUCT_C_content_fossil
    fossil carbon content on a dry matter basis
  property carbon content 0.413567
    carbon content on a dry matter basis (reserved; not for manual entry)
  properties: carbon allocation 0.0827133 kg

## Inputs from technosphere
- inorganic nitrogen fertiliser, as N: 0 kg; pedigree (1,1,1,1,1)
  Based on the inventory for commercial crop production 'potato production, Swiss integrated production'. Adaptations: see '01_crop production - seed production & processing_v1.0.pdf' - pdf-document on the dedicated talk page of ecoinvent (www.ecoinvent.org/documentation)
  properties: dry mass 1 kg, wet mass 1 kg
- packaging, for fertilisers: 0.00395895 kg; lognormal variance with pedigree 0.0912, pedigree (4,3,5,5,4)
  Total amount of active substance/s of fertilisers needed for the production of 'potato seed, at farm' is calculated to be circa 1.98E-03 kg. Fertiliser/s used in this dataset is/are: 'ammonium nitrate, as N', 'ammonium sulfate, as N', 'nitrogen fertiliser, as N', 'potassium chloride, as K2O', 'potassium sulfate, as K2O', 'urea, as N'. The total amount of active substance/s is doubled in order to account for the packaging of the dilluted product of fertiliser/s that is/are applied. Therefore, 3.96E-03 kg of packaging for fertilisers is justified with this exchange.
  properties: carbon content, fossil 0.825301, dry mass 1 kg, wet mass 1 kg, heating value, net 25.01 MJ, price 0.0642 EUR2005
  note on carbon content, fossil: Considering a chemical formula (C2H4)n for polyethylene, carbon content-fossil is calculated to be 0.856286 kg of Carbon per kg of dry mass.
- liquid manure spreading, by vacuum tanker: 0.0005234 m3; lognormal variance with pedigree 0.0426, pedigree (2,1,5,5,1)
  (same comment as for inorganic nitrogen fertiliser, as N)
- tillage, ploughing: 4e-5 ha; lognormal variance with pedigree 0.0426, pedigree (2,1,5,5,1)
  (same comment as for inorganic nitrogen fertiliser, as N)
- dithiocarbamate-compound: 0.0001704 kg; lognormal variance with pedigree 0.0427, pedigree (2,2,5,5,1)
  (same comment as for inorganic nitrogen fertiliser, as N)
  properties: dry mass 1 kg, wet mass 1 kg, carbon content, fossil 0.179339
  note on carbon content, fossil: Approximated as an unweighted average of the C-content of the dithiocarbamate-compounds (Tab 2.25 Sutter, 2010) Maneb and Mancozeb
- transport, tractor and trailer, agricultural: 0 metric ton*km; pedigree (1,1,1,1,1)
  (same comment as for inorganic nitrogen fertiliser, as N)
- solid manure loading and spreading, by hydraulic loader and spreader: 0.54808 kg; lognormal variance with pedigree 0.0426, pedigree (2,1,5,5,1)
  (same comment as for inorganic nitrogen fertiliser, as N)
- ammonium nitrate: 0 kg; pedigree (1,1,1,1,1)
  The exchange has been updated from 'ammonium nitrate, as N' into 'ammonium nitrate' and therefore its amount has been scaled (multiplied) from 0.0007 kg by 2.8573 kg of 'ammonium nitrate' per kg of 'ammonium nitrate, as N'. Original comment of the exchange is: Based on the inventory for commercial crop production 'potato production, Swiss integrated production'. Adaptations: see '01_crop production - seed production & processing_v1.0.pdf' - pdf-document on the dedicated talk page of ecoinvent (www.ecoinvent.org/documentation)
  properties: dry mass 1 kg, wet mass 1 kg
- urea: 0 kg; pedigree (1,1,1,1,1)
  The exchange has been updated from 'urea, as N' into 'urea' and therefore its amount has been scaled (multiplied) from 0.0002 kg by 2.1438 kg of 'urea' per kg of 'urea, as N'. Original comment of the exchange is: Based on the inventory for commercial crop production 'potato production, Swiss integrated production'. Adaptations: see '01_crop production - seed production & processing_v1.0.pdf' - pdf-document on the dedicated talk page of ecoinvent (www.ecoinvent.org/documentation)
  properties: carbon content, fossil 0.2, dry mass 1 kg, wet mass 1 kg
- application of plant protection product, by field sprayer: 0.000272 ha; lognormal variance with pedigree 0.0426, pedigree (2,1,5,5,1)
  (same comment as for inorganic nitrogen fertiliser, as N)
- packaging, for pesticides: 0.00069328 kg; lognormal variance with pedigree 0.0912, pedigree (4,3,5,5,4)
  Total amount of active substance/s of pesticides needed for the production of potato seed, at farm is calculated to be circa 3.47E-04 kg. Pesticide/s used in this dataset is/are: '[sulfonyl]urea-compound', '[thio]carbamate-compound', 'dithiocarbamate-compound', 'metolachlor', 'nitrile-compound', 'phthalimide-compound'. The total amount of active substance/s is doubled in order to account for the packaging of the dilluted product of pesticide/s that is/are applied. Therefore, 6.93E-04 kg of packaging for pesticides is justified with this exchange.
  properties: wet mass 1 kg, heating value, net 25.97 MJ, price 0.0642 EUR2005, carbon content, fossil 0.85714, dry mass 1 kg
- potato planting: 4e-5 ha; lognormal variance with pedigree 0.0426, pedigree (2,1,5,5,1)
  (same comment as for inorganic nitrogen fertiliser, as N)
- [thio]carbamate-compound: 3.24e-5 kg; lognormal variance with pedigree 0.0427, pedigree (2,2,5,5,1)
  (same comment as for inorganic nitrogen fertiliser, as N)
  properties: carbon content, fossil 0.626349, dry mass 1 kg, wet mass 1 kg
  note on carbon content, fossil: Approximated as an unweighted average of the C-content of the [thio]carbamate-compounds (Tab 2.25 Sutter, 2010) carbofuran,orbencarb, prosulfocarb
- ammonium sulfate: 0 kg; pedigree (1,1,1,1,1)
  (same comment as for inorganic nitrogen fertiliser, as N)
  properties: wet mass 1 kg, dry mass 1 kg
- fertilising, by broadcaster: 8e-5 ha; lognormal variance with pedigree 0.0426, pedigree (2,1,5,5,1)
  (same comment as for inorganic nitrogen fertiliser, as N)
- tillage, hoeing and earthing-up, potatoes: 8e-5 ha; lognormal variance with pedigree 0.0426, pedigree (2,1,5,5,1)
  (same comment as for inorganic nitrogen fertiliser, as N)
- potato grading: 1 kg; lognormal variance with pedigree 0.0426, pedigree (2,1,5,5,1)
  (same comment as for inorganic nitrogen fertiliser, as N)
- tillage, harrowing, by rotary harrow: 8e-5 ha; lognormal variance with pedigree 0.0426, pedigree (2,1,5,5,1)
  (same comment as for inorganic nitrogen fertiliser, as N)
- nitrile-compound: 6.24e-6 kg; lognormal variance with pedigree 0.0427, pedigree (2,2,5,5,1)
  (same comment as for inorganic nitrogen fertiliser, as N)
  properties: wet mass 1 kg, dry mass 1 kg, carbon content, fossil 0.344995
  note on carbon content, fossil: An unweighted average of the C content in chlorothalonil, dichlobenil, bromoxynil, ioxynil, substances classified as nitrile-compounds in Tab 2.25, Sutter 2010
- tillage, currying, by weeder: 4e-5 ha; lognormal variance with pedigree 0.0426, pedigree (2,1,5,5,1)
  (same comment as for inorganic nitrogen fertiliser, as N)
- potassium chloride: 0 kg; pedigree (1,1,1,1,1)
  The exchange has been updated from 'potassium chloride, as K2O' into 'potassium chloride' and therefore its amount has been scaled (multiplied) from 0.0006 kg by 1.5829 kg of 'potassium chloride' per kg of 'potassium chloride, as K2O'. Original comment of the exchange is: Based on the inventory for commercial crop production 'potato production, Swiss integrated production'. Adaptations: see '01_crop production - seed production & processing_v1.0.pdf' - pdf-document on the dedicated talk page of ecoinvent (www.ecoinvent.org/documentation)
  properties: wet mass 1 kg, dry mass 1 kg
- metolachlor: 6e-6 kg; lognormal variance with pedigree 0.0427, pedigree (2,2,5,5,1)
  (same comment as for inorganic nitrogen fertiliser, as N)
  properties: carbon content, fossil 0.633803, dry mass 1 kg, wet mass 1 kg
- harvesting, by complete harvester, ground crops: 4e-5 ha; lognormal variance with pedigree 0.0426, pedigree (2,1,5,5,1)
  (same comment as for inorganic nitrogen fertiliser, as N)
- phthalimide-compound: 0.0001312 kg; lognormal variance with pedigree 0.0427, pedigree (2,2,5,5,1)
  (same comment as for inorganic nitrogen fertiliser, as N)
  properties: dry mass 1 kg, carbon content, fossil 0.361204, wet mass 1 kg
  note on carbon content, fossil: C content of Captan (C9H8Cl3NO2S) was assumed to be C content of phtalamide-compounds. Tab 10.3, ecoinvent v2.2 report 15a for classification
- potato seed, for setting: 0.1248 kg; name SEED; lognormal variance with pedigree 0.0426, pedigree (2,1,5,5,1)
  (same comment as for inorganic nitrogen fertiliser, as N)
  property energy content 3.518 MJ; name SEED_energy_content
  property carbon content, non-fossil 0.413567; name SEED_C_content_non_fossil
  property water content 4; name potato_seed_setting_water_content
  property wet mass 1 kg; name potato_seed_setting_WM
  property water in wet mass 0.8 kg; name potato_seed_setting_WWM
  property dry mass 0.2 kg; name SEED_DM
  note on energy content: See chapter 'Product Properties' in '01_crop production - yields & inputs CH & Europe_v1.0.pdf', section 'AGRICULTURAL PRODUCTION IN SWITZERLAND' - pdf-document on the dedicated talk page of ecoinvent (www.ecoinvent.org/documentation)
  note on carbon content, non-fossil: biogene carbon content on a dry matter basis; Composition data obtained from Potatoes, raw, skin, in (http://www.nal.usda.gov/fnic/foodcomp/search/). First, composition data were refered to 1 kg dry mass. Then, C-contents were calculated considering a C-content/dry mass of 44% in carbohydrates (including fibres), 53% in proteins and 75% in fats. All data from ecoinvent report, n 15a, pg 40, except C-content in protein, that comes from Determination of protein concentration by total organic carbon analysis, Rouwenhorst et al., 1991, J Biochem and Biophys Methods, 22:119-128.
- potassium sulfate: 0 kg; pedigree (1,1,1,1,1)
  The exchange has been updated from 'potassium sulfate, as K2O' into 'potassium sulfate' and therefore its amount has been scaled (multiplied) from 0 kg by 1.85 kg of 'potassium sulfate' per kg of 'potassium sulfate, as K2O'. Original comment of the exchange is: Based on the inventory for commercial crop production 'potato production, Swiss integrated production'. Adaptations: see '01_crop production - seed production & processing_v1.0.pdf' - pdf-document on the dedicated talk page of ecoinvent (www.ecoinvent.org/documentation)
  properties: dry mass 1 kg, wet mass 1 kg
- [sulfonyl]urea-compound: 4e-7 kg; lognormal variance with pedigree 0.0427, pedigree (2,2,5,5,1)
  (same comment as for inorganic nitrogen fertiliser, as N)
  properties: dry mass 1 kg, carbon content, fossil 0.540853, wet mass 1 kg
  note on carbon content, fossil: Approximated as an unweighted average of the C-content of the [sulfonyl]urea-compounds (Tab 2.25 Sutter, 2010) chlorotoluron, Diuron, Linuron and Isoproturon.
- potato haulm cutting: 4e-5 ha; lognormal variance with pedigree 0.0426, pedigree (2,1,5,5,1)
  (same comment as for inorganic nitrogen fertiliser, as N)
- inorganic nitrogen fertiliser, as N: 2.401e-5, 7.75794e-7, 4.16279e-5, 2.84339e-7, 1.16852e-7, 2.11011e-6, 2.04067e-7, 2.66253e-6, 7.77996e-7, 2.70487e-6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 kg (30 entries); lognormal variance with pedigree 0.0426, pedigree (2,1,5,5,1)
  (same comment as for inorganic nitrogen fertiliser, as N)
- transport, tractor and trailer, agricultural: 4.05e-6, 0.00099595 metric ton*km (2 entries); lognormal variance with pedigree 0.0426, pedigree (2,1,5,5,1)
  (same comment as for inorganic nitrogen fertiliser, as N)
- ammonium nitrate: 0.000483373, 0.000335237, 0.000257666, 0.000874701 kg (4 entries); lognormal variance with pedigree 0.0426, pedigree (2,1,5,5,1)
  (same comment as for ammonium nitrate)
- urea: 3.77114e-5, 3.04206e-5, 0.000205397, 0.000240532 kg (4 entries); lognormal variance with pedigree 0.0426, pedigree (2,1,5,5,1)
  (same comment as for urea)
- ammonium sulfate: 1.21322e-5, 3.95358e-5 kg (2 entries); lognormal variance with pedigree 0.0426, pedigree (2,1,5,5,1)
  (same comment as for inorganic nitrogen fertiliser, as N)
- potassium chloride: 7.53955e-5, 0.000909119 kg (2 entries); lognormal variance with pedigree 0.0426, pedigree (2,1,5,5,1)
  (same comment as for potassium chloride)
- potassium sulfate: 1.31323e-5, 6.23407e-5 kg (2 entries); lognormal variance with pedigree 0.0426, pedigree (2,1,5,5,1)
  (same comment as for potassium sulfate)

## Inputs from nature
- Transformation, to annual crop, non-irrigated [natural resource, land]: 0.4 m2; lognormal variance with pedigree 0.0526, pedigree (2,1,5,5,1)
  Modelled, see chapter 'Land use' in '01_crop production_direct field emissions and natural resources_v1.0.pdf' - pdf-document on the dedicated talk page of ecoinvent (www.ecoinvent.org/documentation)
- Carbon dioxide, in air [natural resource, in air]: 0.265433 kg; = 44/12 * (REF_PRODUCT_C_content_non_fossil * REF_PRODUCT * REF_PRODUCT_DM - SEED_C_content_non_fossil * SEED * SEED_DM); lognormal variance with pedigree 0.0426, pedigree (2,1,5,5,1)
  Modelled,see chapter 'CO2 binding' in '01_crop production_direct field emissions and natural resources_v1.0.pdf' - pdf-document on the dedicated talk page of ecoinvent (www.ecoinvent.org/documentation)
- Occupation, annual crop, non-irrigated [natural resource, land]: 0.13889 m2*year; lognormal variance with pedigree 0.0426, pedigree (2,1,5,5,1)
  (same comment as for Transformation, to annual crop, non-irrigated)
- Energy, gross calorific value, in biomass [natural resource, biotic]: 3.8 MJ; lognormal variance with pedigree 0.0819, pedigree (2,3,5,3,4)
  Estimated based on literature value (Swiss Feed Database, http://www.feed-alp.admin.ch, accesseed 20131113).
- Transformation, from annual crop, non-irrigated [natural resource, land]: 0.4 m2; lognormal variance with pedigree 0.0526, pedigree (2,1,5,5,1)
  (same comment as for Transformation, to annual crop, non-irrigated)

## Emissions to nature
- Mercury [soil, agricultural]: 4.0102e-8 kg; lognormal variance with pedigree 0.0827, pedigree (2,2,5,5,1)
  Modelled, see chapter 'Emissions of heavy metals to agricultural soil, surface water and ground water' in '01_crop production_direct field emissions and natural resources_v1.0.pdf' - pdf-document on the dedicated talk page of ecoinvent (www.ecoinvent.org/documentation)
- Mercury [water, surface water]: 3.1141e-10 kg; lognormal variance with pedigree 0.1327, pedigree (2,2,5,5,1)
  (same comment as for Mercury)
- Cadmium, ion [water, surface water]: 4.8578e-10 kg; lognormal variance with pedigree 0.1327, pedigree (2,2,5,5,1)
  (same comment as for Mercury)
- Nickel, ion [water, surface water]: 7.594e-8 kg; lognormal variance with pedigree 0.1327, pedigree (2,2,5,5,1)
  (same comment as for Mercury)
- Fenpiclonil [soil, agricultural]: 6.24e-6 kg; lognormal variance with pedigree 0.0527, pedigree (2,2,5,5,1)
  Modelled, see chapter 'Emissions of pesticides to agricultural soil' in '01_crop production_direct field emissions and natural resources_v1.0.pdf' - pdf-document on the dedicated talk page of ecoinvent (www.ecoinvent.org/documentation)
- Phosphate [water, ground-]: 3.6782e-6 kg; lognormal variance with pedigree 0.0827, pedigree (2,2,5,5,1)
  Modelled, see chapter 'Emissions of phosphorous to the water' in '01_crop production_direct field emissions and natural resources_v1.0.pdf' - pdf-document on the dedicated talk page of ecoinvent (www.ecoinvent.org/documentation)
- Lead [water, ground-]: 9.3729e-9 kg; lognormal variance with pedigree 0.1327, pedigree (2,2,5,5,1)
  (same comment as for Mercury)
- Carbon dioxide, fossil [air, non-urban air or from high stacks]: 0.00037647 kg; lognormal variance with pedigree 0.0427, pedigree (2,2,5,5,1)
  Modelled, see chapter 'Release of fossil CO2 after urea applications' in '01_crop production_assessment methods of direct field emissions_v1.0.pdf' - pdf-document on the dedicated talk page of ecoinvent (www.ecoinvent.org/documentation)
- Phosphorus [water, surface water]: 4.1917e-6 kg; lognormal variance with pedigree 0.0827, pedigree (2,2,5,5,1)
  (same comment as for Phosphate)
- Copper, ion [water, surface water]: 8.6906e-8 kg; lognormal variance with pedigree 0.1327, pedigree (2,2,5,5,1)
  (same comment as for Mercury)
- Zinc, ion [water, surface water]: 1.9452e-7 kg; lognormal variance with pedigree 0.1327, pedigree (2,2,5,5,1)
  (same comment as for Mercury)
- Dinitrogen monoxide [air, non-urban air or from high stacks]: 0.000160927 kg; name N2O; lognormal variance with pedigree 0.0727, pedigree (2,2,5,5,1)
  Modelled, see chapter 'Emissions of N2O to the air' in '01_crop production_direct field emissions and natural resources_v1.0.pdf' - pdf-document on the dedicated talk page of ecoinvent (www.ecoinvent.org/documentation)
- Cadmium, ion [water, ground-]: 9.1746e-10 kg; lognormal variance with pedigree 0.1327, pedigree (2,2,5,5,1)
  (same comment as for Mercury)
- Nitrate [water, ground-]: 0.00355847 kg; lognormal variance with pedigree 0.0827, pedigree (2,2,5,5,1)
  Modelled with the 'SALCA-NO3 model' described in '01_crop production_direct field emissions and natural resources_v1.0.pdf' - pdf-document on the dedicated talk page of ecoinvent (www.ecoinvent.org/documentation)
- Copper [soil, agricultural]: 3.1899e-6 kg; lognormal variance with pedigree 0.0827, pedigree (2,2,5,5,1)
  (same comment as for Mercury)
- Lead [water, surface water]: 3.3602e-8 kg; lognormal variance with pedigree 0.1327, pedigree (2,2,5,5,1)
  (same comment as for Mercury)
- Zinc [soil, agricultural]: 2.4666e-5 kg; lognormal variance with pedigree 0.0827, pedigree (2,2,5,5,1)
  (same comment as for Mercury)
- Chlorothalonil [soil, agricultural]: 0.0001312 kg; lognormal variance with pedigree 0.0527, pedigree (2,2,5,5,1)
  (same comment as for Fenpiclonil)
- Zinc, ion [water, ground-]: 1.1733e-6 kg; lognormal variance with pedigree 0.1327, pedigree (2,2,5,5,1)
  (same comment as for Mercury)
- Lead [soil, agricultural]: 3.9337e-7 kg; lognormal variance with pedigree 0.0827, pedigree (2,2,5,5,1)
  (same comment as for Mercury)
- Ammonia [air, non-urban air or from high stacks]: 0.000733506 kg; lognormal variance with pedigree 0.0527, pedigree (2,2,5,5,1)
  Modelled with the 'AGRAMMON model' described in '01_crop production_direct field emissions and natural resources_v1.0.pdf' - pdf-document on the dedicated talk page of ecoinvent (www.ecoinvent.org/documentation)
- Cadmium [soil, agricultural]: 1.8657e-8 kg; lognormal variance with pedigree 0.0827, pedigree (2,2,5,5,1)
  (same comment as for Mercury)
- Chromium, ion [water, surface water]: 8.4649e-8 kg; lognormal variance with pedigree 0.1327, pedigree (2,2,5,5,1)
  (same comment as for Mercury)
- Mancozeb [soil, agricultural]: 0.0001704 kg; lognormal variance with pedigree 0.0527, pedigree (2,2,5,5,1)
  (same comment as for Fenpiclonil)
- Nickel [soil, agricultural]: 5.2573e-7 kg; lognormal variance with pedigree 0.0827, pedigree (2,2,5,5,1)
  (same comment as for Mercury)
- Chromium [soil, agricultural]: -2.8061e-7 kg
  (same comment as for Mercury)
- Nitrogen oxides [air, non-urban air or from high stacks]: 3.37947e-5 kg; = 0.21 * N2O; lognormal variance with pedigree 0.0727, pedigree (2,2,5,5,1)
  Modelled, see chapter 'Emissions of NOx to the air' in '01_crop production_direct field emissions and natural resources_v1.0.pdf' - pdf-document on the dedicated talk page of ecoinvent (www.ecoinvent.org/documentation)
- Phosphate [water, surface water]: 1.7133e-5 kg; lognormal variance with pedigree 0.0827, pedigree (2,2,5,5,1)
  (same comment as for Phosphate)
- Metribuzin [soil, agricultural]: 6e-6 kg; lognormal variance with pedigree 0.0527, pedigree (2,2,5,5,1)
  (same comment as for Fenpiclonil)
- Copper, ion [water, ground-]: 1.4111e-7 kg; lognormal variance with pedigree 0.1327, pedigree (2,2,5,5,1)
  (same comment as for Mercury)
- Orbencarb [soil, agricultural]: 3.24e-5 kg; lognormal variance with pedigree 0.0527, pedigree (2,2,5,5,1)
  (same comment as for Fenpiclonil)
- Teflubenzuron [soil, agricultural]: 4e-7 kg; lognormal variance with pedigree 0.0527, pedigree (2,2,5,5,1)
  (same comment as for Fenpiclonil)
- Mercury [water, ground-]: 4.37e-10 kg; lognormal variance with pedigree 0.1327, pedigree (2,2,5,5,1)
  (same comment as for Mercury)
- Chromium, ion [water, ground-]: 6.7504e-7 kg; lognormal variance with pedigree 0.1327, pedigree (2,2,5,5,1)
  (same comment as for Mercury)

## Sampling procedure
Data were compiled from statistics, pilot network, fertilising recommendations, documents from extension services, information provided by retailers and expert knowledge. The production data were verified and adjusted by a group of experts.

## Extrapolations
This dataset has been extrapolated from year 2003 to the year of the calculation (2021). The uncertainty has been adjusted accordingly.
