# uranium enrichment centrifuge facility construction

Dataset: EcoSpold 2, unit process
Geography: CN
Time period: 1980-01-01 to 2021-12-31
Technology level: current
Classification: EcoSpold01Categories: nuclear power/production
Classification: ISIC rev.4 ecoinvent: 4290:Construction of other civil engineering projects
Tags: ConvertedDataset
Scenario: Business-as-Usual
System model: Allocation, cut-off by classification
Generated by: Roberto Dones
Published in: Dones, R. 2007
Database: ecoinvent
isCopyrightProtected: true
accessRestrictedTo: 1

## General comment
The material and energy requirements for construction have been roughly estimated on the basis of the data from an old US reference and scaling them down by the ratio of the capacities (centrifuge process is modular, therefore in first approximation linearity can be assumed for requirements). It is assumed that 75% of reinforced concrete is dumped as non-contaminated waste from decommissioning. Transport requirements recalculated either using ecoinvent standard distances for Europe (e.g. for chemicals) or given average distances by train from Chinese 2004 statistics or own assumptions. This dataset has been developed with the goal to serve a preliminary estimation of the Chinese nuclear chain for the Chinese electricity mix. Hence, it cannot be used for comparisons of centrifuge enrichment infrastrucure among countries.
[This dataset was already contained in the ecoinvent database version 2. It was not individually updated during the transfer to ecoinvent version 3. Life Cycle Impact Assessment results may still have changed, as they are affected by changes in the supply chain, i.e. in other datasets. This dataset was generated following the ecoinvent quality guidelines for version 2. It may have been subject to central changes described in the ecoinvent version 3 change report (http://www.ecoinvent.org/database/ecoinvent-version-3/reports-of-changes/), and the results of the central updates were reviewed extensively. The changes added e.g. consistent water flows and other information throughout the database. The documentation of this dataset can be found in the ecoinvent reports of version 2, which are still available via the ecoinvent website. The change report linked above covers all central changes that were made during the conversion process.]

## Included activities end
The module includes: estimated land use of a plant with capacity of 1500 t SWU (separative work unit); energy (electricity, diesel, and light oil) and material requirements for the construction of the facility; transport requirements during construction; energy and transport requirements (for non-contaminated inerts concrete with reinforcing bars) during decommissioning; disposal of the non-contaminated inerts. The non contaminated metals are assumed to be recycled.

## Geography
US data adapted to China.

## Technology
Available construction material and energy data refer to a model plant in early 1980s.

## Reference product
- uranium enrichment centrifuge facility: 1 unit; By-product classification allocatable product; CPC 53269: Other constructions for manufacturing
  EcoSpold01Location=CN
  production volume 0.0222222 unit
    1 million SWU (http://www.wise-uranium.org/efac.html#ENR) ; Lifetime capacity per facility: 45 million SWU (1.5 million SWU in 30 years)
  property price 1.85338e9 EUR2005
    EU27 I/O database(in the 'EU & DK Input Output Database' (available in SimaPro)); -79 Building, non-residential EU 27 (calculated to be 38.169 EUR2003/kg). Based on consumption of (_53 Iron basic, virgin, EU27;7.25517782294095E-3 kg/EUR building; 0.45 EUR2003 per kg DS), (_61 Iron, after first processing, EU27;5.8766830719783E-3kg/EUR building; 0.62 EUR2003 per kg DS), (_65 Fabricated metal products, except machinery, EU27; 8.9167022775554E-3 kg/EUR building; 3.63 EUR2003 per kg DS) and (_66 Machinery and equipment n.e.c., EU27;4.15071881936446E-3 kg/EUR building; 5.71 EUR2003 per kg DS) - 48929000 kg

## Inputs from technosphere
- zinc: 33000 kg; lognormal variance with pedigree 0.16, pedigree (1,1,5,1,1)
  old reference
  EcoSpold01Location=RER
  properties: wet mass 1 kg, dry mass 1 kg
- reinforcing steel: 9e6 kg; lognormal variance with pedigree 0.16, pedigree (1,1,5,1,1)
  EcoSpold01Location=RER
  old reference
  properties: wet mass 1 kg, carbon content, fossil 0.004, dry mass 1 kg
- lubricating oil: 48000 kg; lognormal variance with pedigree 0.16, pedigree (1,1,5,1,1)
  old reference
  EcoSpold01Location=RER
  properties: wet mass 1 kg, dry mass 1 kg, heating value, net 40.2 MJ, carbon content, fossil 0.75
  note on heating value, net: Literature value, Source: IPCC 2006, 2006 IPCC Guidelines for National Greenhouse Gas Inventories, Prepared by the National Greenhouse Gas Inventories Programme, Eggleston H.S., Buendia L., Miwa K., Ngara T. and Tanabe K. (eds). Published: IGES, Japan
  note on carbon content, fossil: Lubricating oil is produced from diesel. C-content/dry mass of fats and oils considered 75%, from: ecoinvent v2.2 report, n 15a, pg 40
- aluminium, wrought alloy: 6.5e6 kg; lognormal variance with pedigree 0.16, pedigree (1,1,5,1,1)
  old reference
  EcoSpold01Location=RER
  properties: wet mass 1 kg, dry mass 1 kg
- diesel, burned in building machine: 6.9e8 MJ; lognormal variance with pedigree 0.16, pedigree (1,1,5,1,1)
  old reference
  EcoSpold01Location=GLO
  properties: heating value, net 1 MJ
- electricity, medium voltage: 5.9e6 kWh; lognormal variance with pedigree 0.16, pedigree (1,1,5,1,1)
  old reference
  EcoSpold01Location=CN
- brass: 26000 kg; lognormal variance with pedigree 0.16, pedigree (1,1,5,1,1)
  old reference
  EcoSpold01Location=CH
  properties: dry mass 1 kg, wet mass 1 kg
- steel, chromium steel 18/8, hot rolled: 1.63e7 kg
  EcoSpold01Location=RER
  properties: wet mass 1 kg, carbon content, fossil 0.0008, dry mass 1 kg
  note on carbon content, fossil: Stainless steel model is the grade 304 steel (18/8 stainless, 18% chromium 8% nickel; max. 0.08% C)
- diesel, burned in diesel-electric generating set, 10MW: 6.9e8 MJ; lognormal variance with pedigree 0.16, pedigree (1,1,5,1,1)
  EcoSpold01Location=GLO
  old reference
  properties: heating value, net 1 MJ
- concrete, normal: 75000 m3; lognormal variance with pedigree 0.16, pedigree (1,1,5,1,1)
  old reference
  EcoSpold01Location=CH
  properties: dry mass 2190 kg, wet mass 2380 kg, water content 0.086758
- waste reinforced concrete: -6.8e7 kg; lognormal variance with pedigree 0.16, pedigree (1,1,5,1,1)
  old reference
  EcoSpold01Location=CH
  production volume 1.51111e6 kg
    Calculated from the production volume of uranium enrichment centrifuge facility in proportion to the respective output amounts.
  properties: water content 0.00585407, dry mass 0.99418 kg, wet mass 1 kg
- copper, cathode: 770000 kg; lognormal variance with pedigree 0.16, pedigree (1,1,5,1,1)
  EcoSpold01Location=RER
  old reference
  properties: dry mass 1 kg, wet mass 1 kg
- steel, low-alloyed, hot rolled: 1.63e7 kg; lognormal variance with pedigree 0.16, pedigree (1,1,5,1,1)
  old reference
  EcoSpold01Location=RER
  properties: carbon content, fossil 0.005, wet mass 1 kg, dry mass 1 kg
  note on carbon content, fossil: Low alloyed steel composition given in Tab. 3.2 ecoinvent v2.2 report 10_partII. Steel assumed to have a C content of 0.5%

## Inputs from nature
All rows: lognormal variance with pedigree 0.16, pedigree (1,1,5,1,1)
- Transformation, to unspecified [natural resource, land]: 150000 m2
  own estimation
- Transformation, to industrial area [natural resource, land]: 150000 m2
  own estimation
- Transformation, from industrial area [natural resource, land]: 150000 m2
  own estimation
- Transformation, from unspecified [natural resource, land]: 150000 m2
  own estimation
- Occupation, industrial area [natural resource, land]: 4.5e6 m2*year
  own estimation

## Sampling procedure
Literature

## Extrapolations
This dataset has been extrapolated from year 2000 to the year of the calculation (2021). The uncertainty has been adjusted accordingly.

## Review by Rolf Frischknecht 2007-09-05
passed
