# treatment of waste emulsion paint, hazardous waste incineration, with energy recovery

Dataset: EcoSpold 2, unit process
Geography: CH
Time period: 1997-01-01 to 2021-12-31
Technology level: current
Classification: ISIC rev.4 ecoinvent: 3822:Treatment and disposal of hazardous waste
Tags: Treatment; ConvertedDataset
Scenario: Business-as-Usual
System model: Allocation, cut-off by classification
Share of production covered: 39 %
Generated by: Gabor Doka (obsolete)
Published in: Doka G. 2008
Database: ecoinvent
isCopyrightProtected: true
accessRestrictedTo: 1

## General comment
Inventoried waste contains 100% Emulsion paint (remains); . waste composition (wet, in ppm): upper heating value 11.14 MJ/kg; lower heating value 10.51 MJ/kg; H2O n.a.; O 214760; H 31708; C 268330; S n.a.; N n.a.; P n.a.; B n.a.; Cl 86465; Br n.a.; F n.a.; I n.a.; Ag n.a.; As 0.44122; Ba n.a.; Cd 0.016849; Co n.a.; Cr 1.248; Cu n.a.; Hg 0.0085442; Mn n.a.; Mo n.a.; Ni 0.95527; Pb 0.64946; Sb n.a.; Se n.a.; Sn n.a.; V n.a.; Zn 6.5444; Be n.a.; Sc n.a.; Sr n.a.; Ti 135000; Tl n.a.; W n.a.; Si 149810; Fe n.a.; Ca 113920; Al n.a.; K n.a.; Mg n.a.; Na n.a.; Share of carbon in waste that is biogenic 0%. Net energy produced in HWI: 17.11MJ/kg thermal energy and 1.27MJ/kg electric energy. Allocation of energy production: no substitution or expansion. 100% of burden allocated to waste disposal function of HWI. One kg of this waste produces 0.707 kg of residues, which are landfilled. Additional solidification with 0.2828 kg of cement.
[This dataset is meant to replace the following datasets:]

## Included activities end
waste-specific air and water emissions from incineration, auxiliary material consumption for flue gas cleaning. Short-term emissions to river water and long-term emissions to ground water from residual material landfill (from solidified fly ashes and scrubber slugde). Process energy demands for HWI.

## Geography
Specific to the technology encountered in Switzerland in 2000. Well applicable to modern incineration practices in Europe or North America or Japan.

## Technology
Swiss HWI plant in 2000 with wet flue gas scrubber and low-dust SCR DeNOx facility. Gross thermal efficiency 74.4% and gross electric efficiency 10%.

## Time period
Transfer coefficients for modern Swiss MSWI. Emission speciation based on early 90ies data.

## Reference product
- waste emulsion paint: -1 kg; name RP; By-product classification Waste; CPC 39: Wastes or scraps
  production volume 6000 kg; name PV_RP
    The value is taken from information from Statistique des déchets spéciaux 2013', swiss statistics (http://www.bfs.admin.ch/bfs/portal/fr/index/themen/02/22/lexi.html, accessed 20151009) according to which: hazardous incineration 6000 municipal incineration 2219000
  property carbon content, fossil 0.27
    Tab A.4, ecoinvent v2.2 report 13_I. C content has been calculated after data in the tables, and then referred to 1 kg DM
  property heating value, net 8.18 MJ
    LHV is calculated based on the Carbon content of the product. More details can be found on the respective documentation.
  property price 0 EUR2005; name RP_price_EUR2005
    Waste products are assigned a price of zero as they are assumed to require further treatment.
  property carbon content 0.27
    carbon content on a dry matter basis (reserved; not for manual entry)
  properties: wet mass 1 kg, dry mass 1 kg, carbon content, non-fossil 0, water in wet mass 0 kg, water content 0, carbon allocation 0.27 kg

## By-products
- heat, for reuse in municipal waste incineration only: 0 MJ; name BP2; By-product classification allocatable product; CPC 17300: Steam and hot water; pedigree (1,1,1,1,1)
  production volume 102660 MJ; = BP2*PV_RP/ABS(RP)
    Calculated based on the production volume of the reference product.
  property price 0.0106 EUR2005; name BP2_price_EUR2005
    Average European district heat price from Ecoheatcool and Euroheat 2005-2006, Ecoheat Work package 1: The European heat market. Final report. 10.6 EUR/GJ i s the price of district heat. http://www.solarthermalworld.org/files/Ecoheatcool%20WP1%20Web.pdf?download
- electricity, for reuse in municipal waste incineration only: 0 kWh; name BP3; CPC 17100: Electrical energy; By-product classification allocatable product; pedigree (1,1,1,1,1)
  production volume 2116.67 kWh; = BP3*PV_RP/ABS(RP)
    Calculated based on the production volume of the reference product.
  property price 0.1 EUR2005; name BP3_price_EUR2005
    Estimated to be the same price as in case of electricity, medium voltage.

## Inputs from technosphere
- chemical, organic: 1.3709e-7 kg; lognormal variance with pedigree 1.66, pedigree (1,1,5,1,1)
  Proxy for TMT15. uncertainty calculated from uncertainty in average auxiliary material input, and the unertainty of the waste composition of this waste
  properties: dry mass 1 kg, wet mass 1 kg, heating value, net 19.03 MJ, carbon content, fossil 0.628
  note on carbon content, fossil: This dataset is an unweighted average of 20 organic substances (listed in Tab 88.1, ecoinvent v2.2 report 8, part II), being part of the top100 chemicals included in this database. The C-content has also been calculated as an unweighted average of the C content of the substances composing this dataset.
- process-specific burdens, hazardous waste incineration plant: 1 kg; lognormal variance with pedigree 0.04, pedigree (1,1,5,1,1)
  demands per kilogram waste. uncertainty is heeded in the module;activityLink introduced to establish a direct link to the corresponding regional supply of this product
- chemical, inorganic: 0.0016041 kg; lognormal variance with pedigree 0.12, pedigree (1,1,5,1,1)
  Proxy for Polyelectrolyte. uncertainty calculated from uncertainty in average auxiliary material input, and the unertainty of the waste composition of this waste
  properties: dry mass 1 kg, carbon content, fossil 0.003, wet mass 1 kg
  note on carbon content, fossil: This dataset is an unweighted average of 20 inorganic substances (listed in Tab 88.1, ecoinvent v2.2 report 8, part II), being part of the top100 chemicals included in this database. The C-content has also been calculated as an unweighted average of the C content of the substances composing this dataset.
- iron (III) chloride, without water, in 40% solution state: 0.078188 kg; lognormal variance with pedigree 0.19, pedigree (1,1,5,1,1)
  uncertainty calculated from uncertainty in average auxiliary material input, and the unertainty of the waste composition of this waste
  properties: dry mass 1 kg, wet mass 1 kg
- quicklime, milled, packed: 0.0072212 kg; lognormal variance with pedigree 0.23, pedigree (1,1,5,1,1)
  (same comment as for iron (III) chloride, without water, in 40% solution state)
  properties: dry mass 0.99 kg, wet mass 1 kg, water content 0.010101
- sodium hydroxide, without water, in 50% solution state: 0.091853 kg; lognormal variance with pedigree 0.23, pedigree (1,1,5,1,1)
  (same comment as for iron (III) chloride, without water, in 40% solution state)
  properties: wet mass 1 kg, dry mass 1 kg, heating value, net 3.03 MJ
- hazardous waste incineration facility: 1.25e-9 unit; lognormal variance with pedigree 0.04, pedigree (1,1,5,1,1)
  demands per kilogram waste. uncertainty is heeded in the module This exchange has an activity link directly to the producing activity because the product is primarily consumed in the same geographical area where it is produced.
- waste cement, hydrated: -0.70699 kg; name BP1; lognormal variance with pedigree 0.07, pedigree (1,1,5,1,1)
  Hydrated cement for solidification of landfilled residual material. Uncertainty calculated from unertainty of the waste composition of this waste and transfer coefficients in the incinerator and of the solidification recipe.
  production volume 4241.94 kg; = BP1*PV_RP/ABS(RP)
    Calculated from the production volume of waste emulsion paint, 0% water in proportion to the respective output amounts.
  property price 0 EUR2005; name BP1_price_EUR2005
  properties: dry mass 1 kg, wet mass 1 kg
- heat, central or small-scale, other than natural gas: 11.7406 MJ; lognormal variance with pedigree 0.16, pedigree (1,1,5,1,1)
  Uncertainty dependent on total energy required and heating value present, using experimental GSd for substraction from uc=A*GSDa^2-B
  properties: heating value, net 1 MJ
- hydrochloric acid, without water, in 30% solution state: 0.00096247 kg; lognormal variance with pedigree 0.12, pedigree (1,1,5,1,1)
  (same comment as for iron (III) chloride, without water, in 40% solution state)
  properties: heating value, net 3.32 MJ, wet mass 1 kg, dry mass 1 kg
- cement, unspecified: 0.2828 kg; lognormal variance with pedigree 0.07, pedigree (1,1,5,1,1)
  Cement for solidification of landfilled residual material. Uncertainty calculated from unertainty of the waste composition of this waste, of transfer coefficients in the incinerator and of the solidification recipe.
  properties: wet mass 1 kg, dry mass 1 kg
- process-specific burdens, residual material landfill: 0.70699 kg; lognormal variance with pedigree 0.06, pedigree (1,1,5,1,1)
  uncertainty is calculated from uncertainties in waste composition and transfer coefficients in incinerator;activityLink introduced to establish a direct link to the corresponding regional supply of this product
- residual material landfill: 1.4729e-9 unit; lognormal variance with pedigree 0.06, pedigree (1,1,5,1,1)
  uncertainty is calculated from uncertainties in waste composition and transfer coefficients in incinerator

## Emissions to nature
- TOC, Total Organic Carbon [water, surface water]: 5.8987e-6 kg; lognormal variance with pedigree 0.37, pedigree (1,1,5,1,1)
  uncertainty is calculated from uncertainties in waste composition and transfer coefficients in incinerator and landfills
- Titanium, ion [water, ground-, long-term]: 0.040035 kg; lognormal variance with pedigree 0.5, pedigree (1,1,5,1,1)
  Long-term emissions from landfilling of incineration residues. uncertainty is calculated from uncertainties in waste composition and transfer coefficients in incinerator and landfills.
- BOD5, Biological Oxygen Demand [water, surface water]: 1.3483e-5 kg; lognormal variance with pedigree 0.37, pedigree (1,1,5,1,1)
  (same comment as for TOC, Total Organic Carbon)
- Hydrogen chloride [air, urban air close to ground]: 2.6671e-5 kg; lognormal variance with pedigree 0.2, pedigree (1,1,5,1,1)
  (same comment as for residual material landfill)
- Arsenic, ion [water, ground-, long-term]: 0 kg; pedigree (1,1,1,1,1)
  (same comment as for Titanium, ion)
- Nickel [air, urban air close to ground]: 6.6869e-10 kg; lognormal variance with pedigree 1.64, pedigree (1,1,5,1,1)
  (same comment as for residual material landfill)
- COD, Chemical Oxygen Demand [water, ground-, long-term]: 0.0043595 kg; lognormal variance with pedigree 0.14, pedigree (1,1,5,1,1)
  (same comment as for Titanium, ion)
- Chromium [air, urban air close to ground]: 9.2276e-14 kg; lognormal variance with pedigree 1.68, pedigree (1,1,5,1,1)
  (same comment as for residual material landfill)
- Silicon [water, ground-, long-term]: 0.14912 kg; lognormal variance with pedigree 0.13, pedigree (1,1,5,1,1)
  (same comment as for Titanium, ion)
- Zinc [air, urban air close to ground]: 4.5811e-9 kg; lognormal variance with pedigree 1.39, pedigree (1,1,5,1,1)
  (same comment as for residual material landfill)
- Silicon [water, surface water]: 0.00033612 kg; lognormal variance with pedigree 0.68, pedigree (1,1,5,1,1)
  (same comment as for TOC, Total Organic Carbon)
- Cadmium, ion [water, ground-, long-term]: 1.1433e-10 kg; lognormal variance with pedigree 8.19, pedigree (1,1,5,1,1)
  (same comment as for Titanium, ion)
- Zinc, ion [water, surface water]: 8.7827e-8 kg; lognormal variance with pedigree 1.37, pedigree (1,1,5,1,1)
  (same comment as for TOC, Total Organic Carbon)
- Chloride [water, ground-, long-term]: 0.00010495 kg; lognormal variance with pedigree 0.2, pedigree (1,1,5,1,1)
  (same comment as for Titanium, ion)
- Lead [air, urban air close to ground]: 2.4107e-11 kg; lognormal variance with pedigree 1.71, pedigree (1,1,5,1,1)
  (same comment as for residual material landfill)
- DOC, Dissolved Organic Carbon [water, ground-, long-term]: 0.0019073 kg; lognormal variance with pedigree 0.14, pedigree (1,1,5,1,1)
  (same comment as for Titanium, ion)
- Lead [water, ground-, long-term]: 3.3686e-9 kg; lognormal variance with pedigree 8.59, pedigree (1,1,5,1,1)
  (same comment as for Titanium, ion)
- Arsenic [air, urban air close to ground]: 4.5005e-15 kg; lognormal variance with pedigree 1.83, pedigree (1,1,5,1,1)
  (same comment as for residual material landfill)
- Chloride [water, surface water]: 0.086334 kg; lognormal variance with pedigree 0.17, pedigree (1,1,5,1,1)
  (same comment as for TOC, Total Organic Carbon)
- Calcium [air, urban air close to ground]: 0.00018991 kg; lognormal variance with pedigree 0.17, pedigree (1,1,5,1,1)
  (same comment as for residual material landfill)
- Nickel, ion [water, ground-, long-term]: 2.7488e-7 kg; lognormal variance with pedigree 1.87, pedigree (1,1,5,1,1)
  (same comment as for Titanium, ion)
- Cadmium [air, urban air close to ground]: 9.2786e-13 kg; lognormal variance with pedigree 2, pedigree (1,1,5,1,1)
  (same comment as for residual material landfill)
- Titanium [air, urban air close to ground]: 0.000135 kg; lognormal variance with pedigree 0.15, pedigree (1,1,5,1,1)
  (same comment as for residual material landfill)
- Silicon [air, urban air close to ground]: 0.00034876 kg; lognormal variance with pedigree 0.14, pedigree (1,1,5,1,1)
  (same comment as for residual material landfill)
- Lead [water, surface water]: 1.7677e-11 kg; lognormal variance with pedigree 1.82, pedigree (1,1,5,1,1)
  (same comment as for TOC, Total Organic Carbon)
- Arsenic, ion [water, surface water]: 4.4122e-7 kg; lognormal variance with pedigree 1.72, pedigree (1,1,5,1,1)
  (same comment as for TOC, Total Organic Carbon)
- Carbon dioxide, fossil [air, urban air close to ground]: 0.97301 kg; lognormal variance with pedigree 0.09, pedigree (1,1,5,1,1)
  calculated from uncertainty in carbon in waste and transfer coefficients
- BOD5, Biological Oxygen Demand [water, ground-, long-term]: 0.0043595 kg; lognormal variance with pedigree 0.14, pedigree (1,1,5,1,1)
  (same comment as for Titanium, ion)
- Chromium VI [water, ground-, long-term]: 2.3622e-7 kg; lognormal variance with pedigree 1.59, pedigree (1,1,5,1,1)
  (same comment as for Titanium, ion)
- Mercury [water, surface water]: 9.0089e-11 kg; lognormal variance with pedigree 1.95, pedigree (1,1,5,1,1)
  (same comment as for TOC, Total Organic Carbon)
- COD, Chemical Oxygen Demand [water, surface water]: 1.3483e-5 kg; lognormal variance with pedigree 0.37, pedigree (1,1,5,1,1)
  (same comment as for TOC, Total Organic Carbon)
- Chromium VI [water, surface water]: 7.8757e-8 kg; lognormal variance with pedigree 1.67, pedigree (1,1,5,1,1)
  (same comment as for TOC, Total Organic Carbon)
- Nickel, ion [water, surface water]: 1.9581e-7 kg; lognormal variance with pedigree 1.61, pedigree (1,1,5,1,1)
  (same comment as for TOC, Total Organic Carbon)
- Mercury [water, ground-, long-term]: 3.9908e-10 kg; lognormal variance with pedigree 4.29, pedigree (1,1,5,1,1)
  (same comment as for Titanium, ion)
- Calcium, ion [water, ground-, long-term]: 0.010277 kg; lognormal variance with pedigree 1.6, pedigree (1,1,5,1,1)
  (same comment as for Titanium, ion)
- Calcium, ion [water, surface water]: 1.7156e-5 kg; lognormal variance with pedigree 1.05, pedigree (1,1,5,1,1)
  (same comment as for TOC, Total Organic Carbon)
- Titanium, ion [water, surface water]: 6.6836e-5 kg; lognormal variance with pedigree 0.88, pedigree (1,1,5,1,1)
  (same comment as for TOC, Total Organic Carbon)
- Mercury [air, urban air close to ground]: 0 kg; pedigree (1,1,1,1,1)
  (same comment as for residual material landfill)
- Carbon monoxide, fossil [air, urban air close to ground]: 1.2076e-5 kg; lognormal variance with pedigree 0.71, pedigree (1,4,5,1,3)
  1 plant for waste solvent incineration in Switzerland
- TOC, Total Organic Carbon [water, ground-, long-term]: 0.0019073 kg; lognormal variance with pedigree 0.14, pedigree (1,1,5,1,1)
  (same comment as for Titanium, ion)
- DOC, Dissolved Organic Carbon [water, surface water]: 5.8987e-6 kg; lognormal variance with pedigree 0.37, pedigree (1,1,5,1,1)
  (same comment as for TOC, Total Organic Carbon)
- Zinc, ion [water, ground-, long-term]: 7.9077e-8 kg; lognormal variance with pedigree 6.21, pedigree (1,1,5,1,1)
  (same comment as for Titanium, ion)
- Cadmium, ion [water, surface water]: 7.6138e-12 kg; lognormal variance with pedigree 1.91, pedigree (1,1,5,1,1)
  (same comment as for TOC, Total Organic Carbon)

## Sampling procedure
The 2 Swiss HWI plants, used as the inventory reference technology mix, have a total annual capacity of 53'000 tons of hazardous waste. This corresponds to 39% of the Swiss total installed capacity in 2000. Swiss average plants size is 20'000 t/a.

## Extrapolations
This dataset has been extrapolated from year 2000 to the year of the calculation (2021). The uncertainty has been adjusted accordingly.
