# treatment of waste sealing sheet, polyvinylchloride, municipal incineration with fly ash extraction

Dataset: EcoSpold 2, unit process
Geography: CH
Time period: 2006-01-01 to 2021-12-31
Technology level: current
Classification: ISIC rev.4 ecoinvent: 3821:Treatment and disposal of non-hazardous waste
Synonyms: municipal waste incineration
Scenario: Business-as-Usual
System model: Allocation, cut-off by classification
Share of production covered: 1.8 %
Generated by: Gabor Doka
Published in: Doka G. 2015
Database: ecoinvent
isCopyrightProtected: true
accessRestrictedTo: 1

## General comment
This dataset represents the activity of waste disposal of waste sealing sheet, polyvinylchloride in a municipal solid waste incinerator (MSWI) // Recommended use of this dataset: For disposal of bulk or small parts of PVC sealing sheet (waste building product) // Inventoried waste contains 1.7% Glass; 53.9% PVC sealing sheet; 11% Filler (lime); 33.4% plastiziser; . // Waste composition (wet, in ppm): upper heating value 23.26 MJ/kg; lower heating value 22.53 MJ/kg; H2O 1387.9; O 124680; H 61320; C 490710; S 1000; N 553.8; P n.a.; B n.a.; Cl 249040; Br 38.689; F 8.1246; I n.a.; Ag n.a.; As 1.2205; Ba 103.08; Cd 1.4498; Co 17.46; Cr 28.23; Cu 14.921; Hg 0.47261; Mn 44.17; Mo n.a.; Ni 11.754; Pb 14601; Sb 23.748; Se 1.1607; Sn 205.09; V 159.26; Zn 33.914; Be 0.27635; Sc n.a.; Sr 48.914; Ti 552.7; Tl 0.22108; W n.a.; Si 6104.5; Fe 2059.2; Ca 45238; Al 110.54; K n.a.; Mg n.a.; Na 1906; // Share of carbon in waste that is biogenic 0%. // Share of metals in waste not oxidised and bulk-recyclable (exclude very small or thin parts) Iron: 0%; Alu: 0%; Copper: 0%. // Recovery of metal scrap from bottom ash to recycling: 0g iron scrap, 0g aluminium scrap, 0g copper scrap. From this waste, the FLUWA process in the technology mix recovers 0.00925kg (DM) of a hydroxide sludge to be recycled in zinc furnaces. // Ultimately one kg of this waste produces 0.1833 kg of bottom ash (can include some washed ash) and 0.06951 kg of residues, which are landfilled (technology mix). Additional solidification of residues with 0.0278 kg of cement.Net energy production: 2.73MJ/kg electric energy and 5.67MJ/kg thermal energy. //

## Included activities start
waste incineration from waste reception gate and delivery into waste bunker at incinerator plant site (without transports to the incinerator)

## Included activities end
Waste-specific short-term emissions to water from leachate. Long-term emissions from landfill to ground water.

## Geography
Specific to the technology mix encountered in Switzerland in 2012.

## Technology
average Swiss MSWI plants in 2010 (grate incinerators) with electrostatic precipitator for fly ash (ESP), wet flue gas scrubber and 25% SNCR , 42.77% SCR-high dust , 32.68% SCR-low dust -DeNOx facilities and 0% without Denox (weighted according to mass of burnt waste, representing Swiss average). Efficiency of iron scrap separation from slag : 58%. Efficiency of non-ferrous scrap separation from slag : 31%. The technology mix for this dataset includes a filter ash treatment (FLUWA) of a share of 46.22%. Gross electric efficiency technology mix 15.84% and Gross thermal efficiency technology mix 28.51%

## Time period
Waste composition as given in literature reference, theoretical data or other source. Transfer coefficients for modern MSWI.

## Reference product
- waste sealing sheet, polyvinylchloride: -1 kg; name RP_amount_1; CPC 39270: Waste, parings and scrap of plastics; By-product classification Waste; CAS 9002-86-2
  Main reference product of this activity (supply of disposal service).
  production volume 2.7251e6 kg; name RP_PV_1
    based on corresponding global production volume of MSW fraction in conventional MSWI (wo fly ash extraction) and scaled down to annual Swiss incinerated MSW mass of 3.02 mio. tonnes.
  property price 0 EUR2005; name RP_amount_1_price_EUR2005
    Waste products are assigned a price of zero as they are assumed to require further treatment.
  property carbon content 0.491392
    carbon content on a dry matter basis (reserved; not for manual entry)
  properties: heating value, net 21.5 MJ, carbon content, fossil 0.491392, sodium content 0.0019086, water in wet mass 0.00138792 kg, iron content 0.002062, aluminium content 0.00011069, dry mass 0.998612 kg, chlorine content 0.24938, fluorine content 8.1359e-6, nitrogen content 0.00055457, wet mass 1 kg, water content 0.00138985, calcium content 0.045301, lead content 0.014621, bromine content 3.8743e-5, antimony content 2.3781e-5, oxygen content 0.12485, chromium content 2.8269e-5, sulfur content 0.0010014, hydrogen content 0.061405, manganese content 4.4232e-5, cobalt content 1.7484e-5, arsenic content 1.2222e-6, copper content 1.4942e-5, barium content 0.00010322, cadmium content 1.4518e-6, nickel content 1.177e-5, titanium content 0.00055346, mercury content 4.7327e-7, selenium content 1.1623e-6, vanadium content 0.00015948, strontium content 4.8982e-5, silicon content 0.006113, beryllium content 2.7673e-7, tin content 0.00020537, zinc content 3.3961e-5, thallium content 2.2139e-7, carbon allocation 0.49071 kg

## By-products
- heat, for reuse in municipal waste incineration only: 0 MJ; name E_th_prod_MSWI; By-product classification allocatable product; CPC 17300: Steam and hot water; pedigree (1,1,1,1,1)
  Net useful heat generated from this waste and used in internal MSWI plant energy redistribution.
  Uncertainty: uncertainty is calculated from uncertainties in waste composition and uncertainties in energy efficiency and the uncertainty in internal energy demand
  production volume 1.5454e7 MJ
    calculated in proportion to reference product waste input to incinerator
  property price 0.0106 EUR2005; name E_th_prod_MSWI_price_EUR2005
    Average European district heat price from Ecoheatcool and Euroheat 2005-2006, Ecoheat Work package 1: The European heat market. Final report. 10.6 EUR/GJ i s the price of district heat. http://www.solarthermalworld.org/files/Ecoheatcool%20WP1%20Web.pdf?download
  property true value relation 0.1842; name E_th_prod_MSWI_true_value_relation
    property to calculate "true value" from
  property exergy 0.1842 MJ; name E_th_prod_MSWI_exergy
    This exergy property is based on the exergy content of the product.
- metalliferous hydroxide sludge: 0 kg; By-product classification Recyclable; CPC 1429: Other non-ferrous metal ores and concentrates (other than uranium or thorium ores and concentrates); pedigree (1,1,1,1,1)
  Metalliferous hydroxide sludge from filter ash leaching (FLUWA).
  Uncertainty: uncertainty is calculated from uncertainties in waste composition and transfer coefficients to filter ash in incinerator and the uncertainty of the transfer coefficients of the FLUWA process.
  production volume 0 kg
    calculated in proportion to reference product waste input to incinerator
  property price 0.0042 EUR2005
    World market value of manure, deflated with barley world market price and consumer price index, based on [http://www.gov.pe.ca/photos/original/af_NM_manconv.pdf].
  property heating value, net 0 MJ
    Non combustible products are assumed to have an LHV equal to zero (0).
  property carbon content 0.002686
    carbon content on a dry matter basis (reserved; not for manual entry)
  properties: carbon content, fossil 0.002686, water in wet mass 0.75 kg, vanadium content 9.8102e-5, wet mass 1 kg, bromine content 8.2631e-5, oxygen content 0.31114, fluorine content 1.2818e-5, chlorine content 0.64931, sulfur content 0.0066507, mercury content 9.248e-8, arsenic content 1.0522e-6, nickel content 1.1461e-6, cobalt content 4.658e-5, chromium content 1.1707e-5, strontium content 6.0329e-8, manganese content 4.8818e-6, cadmium content 5.3182e-5, copper content 6.6446e-7, lead content 0.028505, barium content 3.1374e-6, aluminium content 8.249e-7, sodium content 0.00071949, titanium content 4.9018e-6, antimony content 2.7868e-5, tin content 1.957e-5, selenium content 1.3331e-6, zinc content 0.00059739, beryllium content 4.466e-7, iron content 2.4572e-5, thallium content 2.4161e-7, water content 3, dry mass 0.25 kg, carbon allocation 0.0006715 kg
- electricity, for reuse in municipal waste incineration only: 0 kWh; name E_el_prod_MSWI; CPC 17100: Electrical energy; By-product classification allocatable product; pedigree (1,1,1,1,1)
  Net electricity generated from this waste and used in internal MSWI plant energy redistribution.
  Uncertainty: uncertainty is calculated from uncertainties in waste composition and uncertainties in energy efficiency and the uncertainty in internal energy demand
  production volume 2.0699e6 kWh
    calculated in proportion to reference product waste input to incinerator
  property exergy 3.6 MJ; name E_el_prod_MSWI_exergy
    This exergy property is based on the exergy content of the product.
  property true value relation 3.6; name E_el_prod_MSWI_true_value_relation
    property to calculate "true value" from
  property price 0.1 EUR2005; name E_el_prod_MSWI_price_EUR2005
    Estimated to be the same price as in case of electricity, medium voltage.

## Inputs from technosphere
- quicklime, milled, packed: 0.12971 kg; lognormal variance with pedigree 0.061673, pedigree (1,1,4,1,1)
  Auxilliary inputs for the flue gas treatment stage of the incinerator plant.
  Uncertainty: uncertainty calculated from uncertainty in average CaO input, of transfer coefficients in the incinerator, and the uncertainty of the waste composition of this waste
  properties: water content 0.010101, wet mass 1 kg, dry mass 0.99 kg
- process-specific burdens, slag landfill: 0.1833 kg; lognormal variance with pedigree 0.042089, pedigree (1,1,4,1,1)
  Mass-specific expenditures required for landfilling of bottom ash.;activityLink introduced to establish a direct link to the corresponding regional supply of this product
  Uncertainty: uncertainty is calculated from uncertainties in waste composition and transfer coefficients in incinerator
- transport, freight, lorry, unspecified: 0.011692 metric ton*km; lognormal variance with pedigree 0.023889, pedigree (1,1,4,1,1)
  Transport services to transport incineration residues to landfills and filter ash to external treatments (FLUWA).
  Uncertainty: uncertainty calculated from uncertainty of the waste composition of this waste, uncertainty of transfer coefficients and the uncertainty in generic transportation distances
- chromium oxide, flakes: 7.7032e-7 kg; lognormal variance with pedigree 0.54793, pedigree (1,1,4,1,1)
  Input to DeNOx stage. Active component in SCR catalyst (vanadium pentoxide, V2O5), here approximated with the available chromium trioxide.
  Uncertainty: uncertainty calculated from uncertainty in average DeNOx input, uncertainty in the share of thermal NOx, uncertainty of nitrogen content in average municipal waste and the uncertainty in nitrogen content in *this* waste.
  properties: wet mass 1 kg, dry mass 1 kg
- hydrochloric acid, without water, in 30% solution state: 0.0030084 kg; lognormal variance with pedigree 0.032349, pedigree (1,1,4,1,1)
  Auxilliary inputs for the wastewater treatment stage of the incinerator plant.
  Uncertainty: uncertainty calculated from uncertainty in average HCl input, of transfer coefficients in the incinerator, and the uncertainty of the waste composition of this waste
  properties: wet mass 1 kg, dry mass 1 kg, heating value, net 3.32 MJ
- municipal waste incineration facility: 2.5e-10 unit
  Demands per kilogram waste.
- residual material landfill: 2.8872e-10 unit; lognormal variance with pedigree 0.035712, pedigree (1,1,4,1,1)
  Landfill infrastructure required for landfilling of incineration residues.
  Uncertainty: uncertainty is calculated from uncertainties in waste composition and transfer coefficients in incinerator
- chemical, organic: 4.3825e-6 kg; lognormal variance with pedigree 1.6039, pedigree (1,1,4,1,1)
  Auxilliary inputs for the wastewater treatment stage of the incinerator plant. Proxy for (pure) Trisodium-trimercapto-s-triazine (CAS 17766-26-6), used as 15% diluted solution, aka TMT15.
  Uncertainty: uncertainty calculated from uncertainty in average TMT15 input, of transfer coefficients in the incinerator, and the uncertainty of the waste composition of this waste
  properties: carbon content, fossil 0.628, dry mass 1 kg, wet mass 1 kg, heating value, net 19.03 MJ
- titanium dioxide: 3.7745e-5 kg; lognormal variance with pedigree 0.54793, pedigree (1,1,4,1,1)
  Input to DeNOx stage (TiO2 catalyst carrier)
  Uncertainty: uncertainty calculated from uncertainty in average DeNOx input, uncertainty in the share of thermal NOx, uncertainty of nitrogen content in average municipal waste and the uncertainty in nitrogen content in *this* waste.
  properties: dry mass 1 kg, wet mass 1 kg
- iron (III) chloride, without water, in 40% solution state: 0.00016781 kg; lognormal variance with pedigree 0.25185, pedigree (1,1,4,1,1)
  Auxilliary inputs for the wastewater treatment stage of the incinerator plant.
  Uncertainty: uncertainty calculated from uncertainty in average FeCl3 input, of transfer coefficients in the incinerator, and the uncertainty of the waste composition of this waste
  properties: dry mass 1 kg, wet mass 1 kg
- process-specific burdens, residual material landfill: 0.13858 kg; lognormal variance with pedigree 0.035712, pedigree (1,1,4,1,1)
  Mass-specific expenditures required for landfilling of incineration residues.;activityLink introduced to establish a direct link to the corresponding regional supply of this product
  Uncertainty: uncertainty is calculated from uncertainties in waste composition and transfer coefficients in incinerator
- chemical, inorganic: 0.0039741 kg; lognormal variance with pedigree 0.058935, pedigree (1,1,4,1,1)
  Auxilliary inputs for the wastewater treatment stage of the incinerator plant. Proxy for Polyelectrolyte.
  Uncertainty: uncertainty calculated from uncertainty in average Polyelectrolyte input, of transfer coefficients in the incinerator, and the uncertainty of the waste composition of this waste
  properties: dry mass 1 kg, carbon content, fossil 0.003, wet mass 1 kg
- slag landfill: 3.2586e-10 unit; lognormal variance with pedigree 0.042089, pedigree (1,1,4,1,1)
  Landfill infrastructure required for landfilling of bottom ash.
  Uncertainty: uncertainty is calculated from uncertainties in waste composition and transfer coefficients in incinerator
- hydrogen peroxide, without water, in 50% solution state: 0.0049984 kg; lognormal variance with pedigree 0.050201, pedigree (1,1,4,1,1)
  Auxilliary oxidising agent for filter ash treatment (FLUWA).
  Uncertainty: uncertainty calculated from uncertainty in of transfer coefficients in the incinerator, and the uncertainty of the waste composition of this waste
  properties: heating value, net 7.13 MJ, dry mass 1 kg, wet mass 1 kg
- waste cement, hydrated: -0.069509 kg; lognormal variance with pedigree 0.044796, pedigree (1,1,4,1,1)
  Hydrated cement output for solidification of landfilled residual material.
  Uncertainty: Uncertainty calculated from uncertainty of the waste composition of this waste and transfer coefficients in the incinerator and of the solidification recipe.
  production volume 189420 kg
    calculated in proportion to reference product waste input to incinerator
  properties: dry mass 1 kg, wet mass 1 kg
- cationic resin: 2.3785e-6 kg; lognormal variance with pedigree 1.6728, pedigree (1,1,4,1,1)
  Auxilliary input for mercury removal in filter ash treatment (FLUWA).
  Uncertainty: uncertainty calculated from uncertainty in of transfer coefficients in the incinerator, and the uncertainty of the waste composition of this waste
  properties: heating value, net 6.68 MJ, carbon content, fossil 0.521606, water content 1, wet mass 1 kg, dry mass 0.5 kg
- heat, district or industrial, natural gas: 0.11266 MJ; lognormal variance with pedigree 0.22936, pedigree (1,1,4,1,1)
  Input to DeNOx stage, to heat up flue gas in low-dust SCR.
  Uncertainty: uncertainty calculated from uncertainty in average DeNOx input, uncertainty in the share of thermal NOx, uncertainty of nitrogen content in average municipal waste and the uncertainty in nitrogen content in *this* waste.
  properties: heating value, net 1 MJ
- cement, unspecified: 0.027804 kg; lognormal variance with pedigree 0.044796, pedigree (1,1,4,1,1)
  Cement required for solidification of landfilled residual material.
  Uncertainty: Uncertainty calculated from uncertainty of the waste composition of this waste, of transfer coefficients in the incinerator and of the solidification recipe.
  properties: dry mass 1 kg, wet mass 1 kg
- spent activated carbon with mercury: -2.5037e-6 kg; name BP_amount_1; lognormal variance with pedigree 1.6728, pedigree (1,1,4,1,1)
  Spent ion exchanger charged with mercury, from FLUWA filter ash treatment, approximated here with Spent activated carbon with mercury, deposited undergound in a polyethylene Big Bag.
  Uncertainty: uncertainty calculated from uncertainty in of transfer coefficients in the incinerator, and the uncertainty of the waste composition of this waste.
  production volume 6.82283 kg; = ABS(RP_PV_1 * (BP_amount_1 / RP_amount_1))
    Calculated from production volume of reference product using the relative outputs.
  property price 0 EUR2005; name BP_amount_1_price_EUR2005
  properties: carbon content, fossil 0.6, wet mass 1 kg, dry mass 1 kg, heating value, net 18.18 MJ
- sodium hydroxide, without water, in 50% solution state: 0.027098 kg; lognormal variance with pedigree 0.053148, pedigree (1,1,4,1,1)
  Auxilliary inputs for the flue gas treatment stage of the incinerator plant, and partially in the filter ash treatment (FLUWA).
  Uncertainty: uncertainty calculated from uncertainty in average NaOH input, of transfer coefficients in the incinerator, and the uncertainty of the waste composition of this waste
  properties: heating value, net 3.03 MJ, wet mass 1 kg, dry mass 1 kg
- water, decarbonised: 47.112 kg; lognormal variance with pedigree 0.25185, pedigree (1,1,4,1,1)
  Incinerator process water used in flue gas scrubber stage.
  Uncertainty: uncertainty calculated from uncertainty in average water input, and the uncertainty of the waste composition of this waste
  properties: wet mass 1 kg
- ammonia, anhydrous, liquid: 0.00060246 kg; lognormal variance with pedigree 0.22936, pedigree (1,1,4,1,1)
  Input to DeNOx stage (100% NH3).
  Uncertainty: uncertainty calculated from uncertainty in average DeNOx input, uncertainty in the share of thermal NOx, uncertainty of nitrogen content in average municipal waste and the uncertainty in nitrogen content in *this* waste.
  properties: wet mass 1 kg, dry mass 1 kg
- metalliferous hydroxide sludge: -0.036986 kg; lognormal variance with pedigree 0.029477, pedigree (1,1,4,1,1)
  (same comment as for metalliferous hydroxide sludge)
  production volume 100790 kg
  properties: carbon content, fossil 0.002686, vanadium content 9.8102e-5, wet mass 1 kg, price 0.0042 EUR2005, oxygen content 0.31114, chlorine content 0.64931, sulfur content 0.0066507, lead content 0.028505, sodium content 0.00071949, zinc content 0.00059739, water content 3, dry mass 0.25 kg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

## Inputs from nature
- Oxygen [natural resource, in air]: 1.6682 kg; lognormal variance with pedigree 0.028952, pedigree (1,1,4,1,1)
  Oxygen from ambient air needed to combust and oxidise this waste. Net demand, i.e. without O2 leaving the plant in flue gas uncombusted.
  Uncertainty: uncertainty is calculated from uncertainties in waste composition and transfer coefficients to flue gas and soild residues in incinerator

## Emissions to nature
- Chromium VI [water, surface water]: 3.9423e-7 kg; lognormal variance with pedigree 1.213, pedigree (1,1,4,1,1)
  Emissions to water from waste composition and transfer coefficients in incinerator and landfills.
  Uncertainty: uncertainty is calculated from uncertainties in waste composition and transfer coefficients in incinerator and landfills
- Dinitrogen monoxide [air, urban air close to ground]: 8.2598e-6 kg; lognormal variance with pedigree 1.5171, pedigree (1,1,4,1,1)
  Nitrogen species emitted to air after DeNOx stage.
  Uncertainty: uncertainty calculated from uncertainty in average N-emissions and uncertainty in the share of thermal NOx and the uncertainty in nitrogen content in *this* waste.
- Antimony [water, ground-, long-term]: 9.6402e-6 kg; lognormal variance with pedigree 0.9705, pedigree (1,1,4,1,1)
  Long-term emissions from landfilling of incineration residues.
  Uncertainty: uncertainty is calculated from uncertainties in waste composition and transfer coefficients in incinerator and landfills.
- Copper, ion [water, surface water]: 1.3025e-9 kg; lognormal variance with pedigree 1.3165, pedigree (1,1,4,1,1)
  (same comment as for Chromium VI)
- Cyanide [air, urban air close to ground]: 1.7745e-6 kg; lognormal variance with pedigree 1.5171, pedigree (1,1,4,1,1)
  (same comment as for Dinitrogen monoxide)
- Selenium [water, ground-, long-term]: 8.9069e-7 kg; lognormal variance with pedigree 1.0178, pedigree (1,1,4,1,1)
  (same comment as for Antimony)
- Manganese [water, surface water]: 5.4572e-9 kg; lognormal variance with pedigree 1.0794, pedigree (1,1,4,1,1)
  (same comment as for Chromium VI)
- Hydrogen chloride [air, urban air close to ground]: 0.00014211 kg; lognormal variance with pedigree 0.081654, pedigree (1,1,4,1,1)
  Emission to air from waste composition and transfer coefficients.
  Uncertainty: uncertainty is calculated from uncertainties in waste composition and transfer coefficients in incinerator
- Tin, ion [water, ground-, long-term]: 0.00013611 kg; lognormal variance with pedigree 0.9913, pedigree (1,1,4,1,1)
  (same comment as for Antimony)
- Mercury [water, surface water]: 2.5837e-9 kg; lognormal variance with pedigree 1.8437, pedigree (1,1,4,1,1)
  (same comment as for Chromium VI)
- Bromine [air, urban air close to ground]: 1.9325e-8 kg; lognormal variance with pedigree 1.1196, pedigree (1,1,4,1,1)
  (same comment as for Hydrogen chloride)
- Vanadium, ion [water, ground-, long-term]: 4.8205e-5 kg; lognormal variance with pedigree 0.96595, pedigree (1,1,4,1,1)
  (same comment as for Antimony)
- Nickel, ion [water, surface water]: 8.1741e-9 kg; lognormal variance with pedigree 1.7999, pedigree (1,1,4,1,1)
  (same comment as for Chromium VI)
- Hydrogen fluoride [air, urban air close to ground]: 5.4814e-8 kg; lognormal variance with pedigree 1.3144, pedigree (1,1,4,1,1)
  (same comment as for Hydrogen chloride)
- Zinc, ion [water, ground-, long-term]: 1.6673e-5 kg; lognormal variance with pedigree 1.8482, pedigree (1,1,4,1,1)
  (same comment as for Antimony)
- Lead [water, surface water]: 9.9421e-7 kg; lognormal variance with pedigree 0.37546, pedigree (1,1,4,1,1)
  (same comment as for Chromium VI)
- Arsenic [air, urban air close to ground]: 8.2259e-9 kg; lognormal variance with pedigree 1.5631, pedigree (1,1,4,1,1)
  (same comment as for Hydrogen chloride)
- Beryllium [water, ground-, long-term]: 2.5935e-7 kg; lognormal variance with pedigree 1.7001, pedigree (1,1,4,1,1)
  (same comment as for Antimony)
- Antimony [water, surface water]: 4.6693e-6 kg; lognormal variance with pedigree 1.0849, pedigree (1,1,4,1,1)
  (same comment as for Chromium VI)
- Barium [air, urban air close to ground]: 4.0459e-7 kg; lognormal variance with pedigree 0.97983, pedigree (1,1,4,1,1)
  (same comment as for Hydrogen chloride)
- Strontium [water, ground-, long-term]: 4.8861e-5 kg; lognormal variance with pedigree 1.065, pedigree (1,1,4,1,1)
  (same comment as for Antimony)
- Selenium [water, surface water]: 2.3125e-7 kg; lognormal variance with pedigree 1.1097, pedigree (1,1,4,1,1)
  (same comment as for Chromium VI)
- Cadmium [air, urban air close to ground]: 7.3567e-10 kg; lognormal variance with pedigree 1.5559, pedigree (1,1,4,1,1)
  (same comment as for Hydrogen chloride)
- Titanium, ion [water, ground-, long-term]: 0.0001654 kg; lognormal variance with pedigree 0.97261, pedigree (1,1,4,1,1)
  (same comment as for Antimony)
- Tin, ion [water, surface water]: 1.8539e-7 kg; lognormal variance with pedigree 0.79607, pedigree (1,1,4,1,1)
  (same comment as for Chromium VI)
- Cobalt [air, urban air close to ground]: 3.1754e-8 kg; lognormal variance with pedigree 1.2223, pedigree (1,1,4,1,1)
  (same comment as for Hydrogen chloride)
- Thallium [water, ground-, long-term]: 1.7433e-7 kg; lognormal variance with pedigree 1.4667, pedigree (1,1,4,1,1)
  (same comment as for Antimony)
- Vanadium, ion [water, surface water]: 1.8921e-7 kg; lognormal variance with pedigree 0.84732, pedigree (1,1,4,1,1)
  (same comment as for Chromium VI)
- Chromium [air, urban air close to ground]: 1.9722e-8 kg; lognormal variance with pedigree 1.1636, pedigree (1,1,4,1,1)
  (same comment as for Hydrogen chloride)
- Silicon [water, ground-, long-term]: 0.0029096 kg; lognormal variance with pedigree 3.5681, pedigree (1,1,4,1,1)
  (same comment as for Antimony)
- Zinc, ion [water, surface water]: 2.0163e-9 kg; lognormal variance with pedigree 0.97885, pedigree (1,1,4,1,1)
  (same comment as for Chromium VI)
- Copper [air, urban air close to ground]: 1.3544e-9 kg; lognormal variance with pedigree 1.2589, pedigree (1,1,4,1,1)
  (same comment as for Hydrogen chloride)
- Iron, ion [water, ground-, long-term]: 0.0010569 kg; lognormal variance with pedigree 2.8364, pedigree (1,1,4,1,1)
  (same comment as for Antimony)
- Beryllium [water, surface water]: 1.7198e-10 kg; lognormal variance with pedigree 2.3415, pedigree (1,1,4,1,1)
  (same comment as for Chromium VI)
- Mercury [air, urban air close to ground]: 1.3307e-8 kg; lognormal variance with pedigree 1.6772, pedigree (1,1,4,1,1)
  (same comment as for Hydrogen chloride)
- Calcium, ion [water, ground-, long-term]: 0.046226 kg; lognormal variance with pedigree 0.19522, pedigree (1,1,4,1,1)
  (same comment as for Antimony)
- Strontium [water, surface water]: 3.1978e-8 kg; lognormal variance with pedigree 1.7335, pedigree (1,1,4,1,1)
  (same comment as for Chromium VI)
- Manganese [air, urban air close to ground]: 8.4356e-9 kg; lognormal variance with pedigree 1.1122, pedigree (1,1,4,1,1)
  (same comment as for Hydrogen chloride)
- Aluminium [water, ground-, long-term]: 0.00034058 kg; lognormal variance with pedigree 0.79382, pedigree (1,1,4,1,1)
  (same comment as for Antimony)
- Titanium, ion [water, surface water]: 1.1252e-7 kg; lognormal variance with pedigree 0.55418, pedigree (1,1,4,1,1)
  (same comment as for Chromium VI)
- Nickel [air, urban air close to ground]: 1.4302e-8 kg; lognormal variance with pedigree 1.2735, pedigree (1,1,4,1,1)
  (same comment as for Hydrogen chloride)
- Sodium, ion [water, ground-, long-term]: 0.0014924 kg; lognormal variance with pedigree 0.50317, pedigree (1,1,4,1,1)
  (same comment as for Antimony)
- Thallium [water, surface water]: 1.6514e-10 kg; lognormal variance with pedigree 1.7619, pedigree (1,1,4,1,1)
  (same comment as for Chromium VI)
- Lead [air, urban air close to ground]: 1.2028e-6 kg; lognormal variance with pedigree 0.36661, pedigree (1,1,4,1,1)
  (same comment as for Hydrogen chloride)
- NMVOC, non-methane volatile organic compounds, unspecified origin [air, urban air close to ground]: 1.2084e-6 kg; lognormal variance with pedigree 0.099542, pedigree (1,1,4,1,1)
  Incomplete combustion product emitted to air.
  Uncertainty: uncertainty calculated from uncertainty in average operation emissions, and the uncertainty of the flue gas volume from this waste.
- Silicon [water, surface water]: 6.6657e-6 kg; lognormal variance with pedigree 0.51777, pedigree (1,1,4,1,1)
  (same comment as for Chromium VI)
- Antimony [air, urban air close to ground]: 1.9023e-11 kg; lognormal variance with pedigree 1.2369, pedigree (1,1,4,1,1)
  (same comment as for Hydrogen chloride)
- Particulates, < 2.5 um [air, urban air close to ground]: 3.1702e-6 kg; lognormal variance with pedigree 0.42937, pedigree (1,1,4,1,1)
  (same comment as for NMVOC, non-methane volatile organic compounds, unspecified origin)
- Iron, ion [water, surface water]: 4.4699e-8 kg; lognormal variance with pedigree 0.94408, pedigree (1,1,4,1,1)
  (same comment as for Chromium VI)
- Selenium [air, urban air close to ground]: 1.3847e-8 kg; lognormal variance with pedigree 1.5703, pedigree (1,1,4,1,1)
  (same comment as for Hydrogen chloride)
- Particulates, > 2.5 um, and < 10um [air, urban air close to ground]: 1.5931e-8 kg; lognormal variance with pedigree 0.20727, pedigree (1,1,4,1,1)
  (same comment as for NMVOC, non-methane volatile organic compounds, unspecified origin)
- Calcium, ion [water, surface water]: 0.00019937 kg; lognormal variance with pedigree 0.66052, pedigree (1,1,4,1,1)
  (same comment as for Chromium VI)
- Tin [air, urban air close to ground]: 1.3396e-10 kg; lognormal variance with pedigree 0.95041, pedigree (1,1,4,1,1)
  (same comment as for Hydrogen chloride)
- Dioxins, measured as 2,3,7,8-tetrachlorodibenzo-p-dioxin [air, urban air close to ground]: 5.3103e-14 kg; lognormal variance with pedigree 0.42937, pedigree (1,1,4,1,1)
  (same comment as for NMVOC, non-methane volatile organic compounds, unspecified origin)
- Aluminium [water, surface water]: 4.3433e-7 kg; lognormal variance with pedigree 1.431, pedigree (1,1,4,1,1)
  (same comment as for Chromium VI)
- Vanadium [air, urban air close to ground]: 3.3777e-6 kg; lognormal variance with pedigree 0.91365, pedigree (1,1,4,1,1)
  (same comment as for Hydrogen chloride)
- Benzene [air, urban air close to ground]: 2.6553e-8 kg; lognormal variance with pedigree 0.099542, pedigree (1,1,4,1,1)
  (same comment as for NMVOC, non-methane volatile organic compounds, unspecified origin)
- Sodium, ion [water, surface water]: 0.00040031 kg; lognormal variance with pedigree 0.27178, pedigree (1,1,4,1,1)
  (same comment as for Chromium VI)
- Zinc [air, urban air close to ground]: 2.0992e-8 kg; lognormal variance with pedigree 1.1343, pedigree (1,1,4,1,1)
  (same comment as for Hydrogen chloride)
- Toluene [air, urban air close to ground]: 5.3106e-8 kg; lognormal variance with pedigree 0.099542, pedigree (1,1,4,1,1)
  (same comment as for NMVOC, non-methane volatile organic compounds, unspecified origin)
- Chromium, ion [water, surface water]: 2.9322e-9 kg; lognormal variance with pedigree 0.74649, pedigree (1,1,4,1,1)
  (same comment as for Chromium VI)
- Strontium [air, urban air close to ground]: 4.8914e-9 kg; lognormal variance with pedigree 1.0975, pedigree (1,1,4,1,1)
  (same comment as for Hydrogen chloride)
- Benzene, pentachloro- [air, urban air close to ground]: 1.4029e-10 kg; lognormal variance with pedigree 0.099542, pedigree (1,1,4,1,1)
  (same comment as for NMVOC, non-methane volatile organic compounds, unspecified origin)
- BOD5, Biological Oxygen Demand [water, ground-, long-term]: 0.0065936 kg; lognormal variance with pedigree 0.02694, pedigree (1,1,4,1,1)
  (same comment as for Antimony)
- Titanium [air, urban air close to ground]: 4.5854e-7 kg; lognormal variance with pedigree 0.76715, pedigree (1,1,4,1,1)
  (same comment as for Hydrogen chloride)
- Benzene, hexachloro- [air, urban air close to ground]: 5.5521e-11 kg; lognormal variance with pedigree 0.099542, pedigree (1,1,4,1,1)
  (same comment as for NMVOC, non-methane volatile organic compounds, unspecified origin)
- COD, Chemical Oxygen Demand [water, ground-, long-term]: 0.020158 kg; lognormal variance with pedigree 0.02694, pedigree (1,1,4,1,1)
  (same comment as for Antimony)
- Thallium [air, urban air close to ground]: 2.2108e-10 kg; lognormal variance with pedigree 1.7902, pedigree (1,1,4,1,1)
  (same comment as for Hydrogen chloride)
- Phenol, pentachloro- [air, urban air close to ground]: 1.1564e-11 kg; lognormal variance with pedigree 0.099542, pedigree (1,1,4,1,1)
  (same comment as for NMVOC, non-methane volatile organic compounds, unspecified origin)
- DOC, Dissolved Organic Carbon [water, ground-, long-term]: 0.0079765 kg; lognormal variance with pedigree 0.02694, pedigree (1,1,4,1,1)
  (same comment as for Antimony)
- Iron [air, urban air close to ground]: 3.6904e-9 kg; lognormal variance with pedigree 0.63684, pedigree (1,1,4,1,1)
  (same comment as for Hydrogen chloride)
- Benzo(a)pyrene [air, urban air close to ground]: 5.9089e-13 kg; lognormal variance with pedigree 0.42937, pedigree (1,1,4,1,1)
  (same comment as for NMVOC, non-methane volatile organic compounds, unspecified origin)
- TOC, Total Organic Carbon [water, ground-, long-term]: 0.0079765 kg; lognormal variance with pedigree 0.02694, pedigree (1,1,4,1,1)
  (same comment as for Antimony)
- Aluminium [air, urban air close to ground]: 9.0124e-11 kg; lognormal variance with pedigree 1.0313, pedigree (1,1,4,1,1)
  (same comment as for Hydrogen chloride)
- Heat, waste [air, urban air close to ground]: 17.384 MJ; lognormal variance with pedigree 0.040865, pedigree (1,1,4,1,1)
  Waste heat generated from heating value of this waste plus any electricity required to process it.
  Uncertainty: uncertainty is calculated from uncertainties in waste composition and uncertainties in energy efficiency and the uncertainty in internal energy demand
- Sulfate [water, ground-, long-term]: 0.0023909 kg; lognormal variance with pedigree 0.48567, pedigree (1,1,4,1,1)
  (same comment as for Antimony)
- Sodium [air, urban air close to ground]: 6.6501e-6 kg; lognormal variance with pedigree 0.59394, pedigree (1,1,4,1,1)
  (same comment as for Hydrogen chloride)
- Heat, waste [water, surface water]: 3.9785 MJ; lognormal variance with pedigree 0.040865, pedigree (1,1,4,1,1)
  (same comment as for Heat, waste)
- Nitrate [water, ground-, long-term]: 1.9863e-5 kg; lognormal variance with pedigree 0.751, pedigree (1,1,4,1,1)
  (same comment as for Antimony)
- TOC, Total Organic Carbon [water, surface water]: 0.00018207 kg; lognormal variance with pedigree 0.048959, pedigree (1,1,4,1,1)
  (same comment as for Chromium VI)
- Water [air, urban air close to ground]: 0.0314319 m3; lognormal variance with pedigree 0.74471, pedigree (1,1,4,1,1)
  Water vapour from waste humidity, hydrogen oxidation and part of the process water.
  Uncertainty: Uncertainty calculated from uncertainty in waste composition, process water input and the uncertainty of fraction to air.
- Chloride [water, ground-, long-term]: 0.031369 kg; lognormal variance with pedigree 0.060934, pedigree (1,1,4,1,1)
  (same comment as for Antimony)
- BOD5, Biological Oxygen Demand [water, surface water]: 0.00037486 kg; lognormal variance with pedigree 0.035607, pedigree (1,1,4,1,1)
  (same comment as for Chromium VI)
- Water [water, surface water]: 0.0161428 m3; lognormal variance with pedigree 1.0808, pedigree (1,1,4,1,1)
  Process water released to surface water.
  Uncertainty: uncertainty calculated from uncertainty in process water input and the uncertainty of fraction to surface water.
- Bromine [water, ground-, long-term]: 2.0056e-6 kg; lognormal variance with pedigree 1.0979, pedigree (1,1,4,1,1)
  (same comment as for Antimony)
- COD, Chemical Oxygen Demand [water, surface water]: 0.000423 kg; lognormal variance with pedigree 0.052157, pedigree (1,1,4,1,1)
  (same comment as for Chromium VI)
- Fluoride [water, ground-, long-term]: 5.4205e-6 kg; lognormal variance with pedigree 0.8481, pedigree (1,1,4,1,1)
  (same comment as for Antimony)
- DOC, Dissolved Organic Carbon [water, surface water]: 0.00018207 kg; lognormal variance with pedigree 0.048959, pedigree (1,1,4,1,1)
  (same comment as for Chromium VI)
- Arsenic, ion [water, ground-, long-term]: 8.1037e-7 kg; lognormal variance with pedigree 1.552, pedigree (1,1,4,1,1)
  (same comment as for Antimony)
- Sulfate [water, surface water]: 0.00040864 kg; lognormal variance with pedigree 0.33732, pedigree (1,1,4,1,1)
  (same comment as for Chromium VI)
- Barium [water, ground-, long-term]: 7.5306e-5 kg; lognormal variance with pedigree 1.3093, pedigree (1,1,4,1,1)
  (same comment as for Antimony)
- Nitrate [water, surface water]: 7.1151e-6 kg; lognormal variance with pedigree 0.50775, pedigree (1,1,4,1,1)
  (same comment as for Chromium VI)
- Cadmium, ion [water, ground-, long-term]: 2.3795e-7 kg; lognormal variance with pedigree 5.5007, pedigree (1,1,4,1,1)
  (same comment as for Antimony)
- Chloride [water, surface water]: 0.21152 kg; lognormal variance with pedigree 0.024751, pedigree (1,1,4,1,1)
  (same comment as for Chromium VI)
- Cobalt [water, ground-, long-term]: 1.5294e-5 kg; lognormal variance with pedigree 1.1599, pedigree (1,1,4,1,1)
  (same comment as for Antimony)
- Bromine [water, surface water]: 3.59e-5 kg; lognormal variance with pedigree 0.35461, pedigree (1,1,4,1,1)
  (same comment as for Chromium VI)
- Carbon monoxide, fossil [air, urban air close to ground]: 4.5137e-5 kg; lognormal variance with pedigree 0.8262, pedigree (1,1,4,1,1)
  (same comment as for NMVOC, non-methane volatile organic compounds, unspecified origin)
- Chromium VI [water, ground-, long-term]: 1.3902e-6 kg; lognormal variance with pedigree 2.6972, pedigree (1,1,4,1,1)
  (same comment as for Antimony)
- Fluoride [water, surface water]: 2.3646e-6 kg; lognormal variance with pedigree 0.88841, pedigree (1,1,4,1,1)
  (same comment as for Chromium VI)
- Carbon dioxide, fossil [air, urban air close to ground]: 1.7403 kg; lognormal variance with pedigree 0.022684, pedigree (1,1,4,1,1)
  (same comment as for Hydrogen chloride)
- Copper, ion [water, ground-, long-term]: 1.4076e-5 kg; lognormal variance with pedigree 1.2082, pedigree (1,1,4,1,1)
  (same comment as for Antimony)
- Arsenic, ion [water, surface water]: 6.5299e-7 kg; lognormal variance with pedigree 1.4334, pedigree (1,1,4,1,1)
  (same comment as for Chromium VI)
- Methane, fossil [air, urban air close to ground]: 3.983e-7 kg; lognormal variance with pedigree 0.099542, pedigree (1,1,4,1,1)
  (same comment as for NMVOC, non-methane volatile organic compounds, unspecified origin)
- Mercury [water, ground-, long-term]: 1.018e-7 kg; lognormal variance with pedigree 1.6851, pedigree (1,1,4,1,1)
  (same comment as for Antimony)
- Barium [water, surface water]: 4.3736e-8 kg; lognormal variance with pedigree 0.77016, pedigree (1,1,4,1,1)
  (same comment as for Chromium VI)
- Sulfur dioxide [air, urban air close to ground]: 1.0634e-5 kg; lognormal variance with pedigree 0.6775, pedigree (1,1,4,1,1)
  (same comment as for Hydrogen chloride)
- Manganese [water, ground-, long-term]: 3.5056e-5 kg; lognormal variance with pedigree 1.5868, pedigree (1,1,4,1,1)
  (same comment as for Antimony)
- Cadmium, ion [water, surface water]: 2.5995e-10 kg; lognormal variance with pedigree 1.4559, pedigree (1,1,4,1,1)
  (same comment as for Chromium VI)
- Nitrogen oxides [air, urban air close to ground]: 0.00022431 kg; lognormal variance with pedigree 0.27294, pedigree (1,1,4,1,1)
  Sum of fuel-Nox and thermal-NOx emitted to air after DeNOx stage.
  Uncertainty: uncertainty calculated from uncertainty in average N-emissions and uncertainty in the share of thermal NOx and the uncertainty in nitrogen content in *this* waste.
- Nickel, ion [water, ground-, long-term]: 1.1743e-5 kg; lognormal variance with pedigree 1.2107, pedigree (1,1,4,1,1)
  (same comment as for Antimony)
- Cobalt [water, surface water]: 2.9104e-9 kg; lognormal variance with pedigree 1.705, pedigree (1,1,4,1,1)
  (same comment as for Chromium VI)
- Ammonia [air, urban air close to ground]: 7.0834e-7 kg; lognormal variance with pedigree 0.27294, pedigree (1,1,4,1,1)
  (same comment as for Dinitrogen monoxide)
- Lead [water, ground-, long-term]: 0.010281 kg; lognormal variance with pedigree 1.8872, pedigree (1,1,4,1,1)
  (same comment as for Antimony)

## Extrapolations
This dataset has been extrapolated from year 2012 to the year of the calculation (2021). The uncertainty has been adjusted accordingly.
