# zinc scrap, post-consumer to generic market for zinc

Dataset: EcoSpold 2, unit process
Geography: GLO
Time period: 2018-01-01 to 2021-12-31
Technology level: current
Classification: ISIC rev.4 ecoinvent: 3830:Materials recovery
Scenario: Business-as-Usual
System model: Allocation, cut-off by classification
Generated by: Lucia Valsasina
Database: ecoinvent
isCopyrightProtected: true
accessRestrictedTo: 1

## General comment
This activity is linking secondary zinc to the market for primary zinc. This activity is a placeholder. The production volume is set to zero as the activity does not take part into the linking of attributional system models, but it is needed for the consequential system model.

## Included activities start
The activity starts with the recepetion of post-consumer material

## Included activities end
The activity ends with the virgin material ready for transport

## Reference product
- zinc scrap, post-consumer: 0 kg; By-product classification Recyclable; CPC 39365: Waste and scrap of zinc
  production volume 0 kg; name RP_PV_1
    The activity has zero production volume. This activity only represents the linking of secondary material to the market for primary material.
  property price 0.55 EUR2005; name RP_amount_1_price_EUR2005
    Calculated as five year geometric mean of prices from Lerecycle.com, 2013-2017 (GB price used as a proxy for GLO price)
  property carbon content 0
    carbon content on a dry matter basis (reserved; not for manual entry)
  properties: zinc content 1, water content 0, carbon content, non-fossil 0, dry mass 1 kg, water in wet mass 0 kg, carbon content, fossil 0, wet mass 1 kg, carbon allocation 0 kg
- zinc: 1 kg; name BP_amount_1; CPC 41442: Zinc, unwrought; By-product classification allocatable product; CAS 7440-66-6
  property price 1.04 EUR2005; name BP_amount_1_price_EUR2005
  properties: carbon content, fossil 0, wet mass 1 kg, dry mass 1 kg, water content 0, water in wet mass 0 kg, carbon content, non-fossil 0, carbon content 0, carbon allocation 0 kg

## By-products
- zinc: 0 kg; CPC 41442: Zinc, unwrought; By-product classification allocatable product; CAS 7440-66-6
  production volume 0 kg; = ABS(RP_PV_1 * (BP_amount_1 / RP_amount_1))
    Calculated from production volume of reference product using the relative outputs.
  property carbon content 0
    carbon content on a dry matter basis (reserved; not for manual entry)
  properties: carbon content, fossil 0, wet mass 1 kg, dry mass 1 kg, water content 0, water in wet mass 0 kg, carbon content, non-fossil 0, carbon allocation 0 kg

## Inputs from technosphere
- zinc scrap, post-consumer: 1 kg
  properties: zinc content 1, dry mass 1 kg, wet mass 1 kg

## Extrapolations
This dataset has been extrapolated from year 2018 to the year of the calculation (2021). The uncertainty has been adjusted accordingly.
