# synthetic gas production, from wood, at fixed bed gasifier

Dataset: EcoSpold 2, unit process
Geography: CH
Time period: 1995-01-01 to 2021-12-31
Technology level: current
Classification: EcoSpold01Categories: biomass/fuels
Classification: ISIC rev.4 ecoinvent: 3520:Manufacture of gas; distribution of gaseous fuels through mains
Synonyms: syngas; synthesis gas
Tags: ConvertedDataset
Scenario: Business-as-Usual
System model: Allocation, cut-off by classification
Share of production covered: 1 %
Generated by: Edgard Gnansounou
Published in: Jungbluth N. 2007
Database: ecoinvent
isCopyrightProtected: true
accessRestrictedTo: 1

## General comment
Composition (% mol.) of the resulting gas is 28.4% H2, 40.6% CO, 23.6% CO2, 5.9% CH4 and 1.5% CnHm (mol.) on a nitrogen and water free basis. Nitrogen content is 47.6%. Density is 1.15 kg/Nm3. Lower heating value of the gas is 5.2 MJ/Nm3. Heat is supplied by syngas combustion. Inventory refers to the net production of 1 Nm3 syngas. Net gas yield is 1.922 Nm3/kg of wood (dry matter).
[This dataset was already contained in the ecoinvent database version 2. It was not individually updated during the transfer to ecoinvent version 3. Life Cycle Impact Assessment results may still have changed, as they are affected by changes in the supply chain, i.e. in other datasets. This dataset was generated following the ecoinvent quality guidelines for version 2. It may have been subject to central changes described in the ecoinvent version 3 change report (http://www.ecoinvent.org/database/ecoinvent-version-3/reports-of-changes/), and the results of the central updates were reviewed extensively. The changes added e.g. consistent water flows and other information throughout the database. The documentation of this dataset can be found in the ecoinvent reports of version 2, which are still available via the ecoinvent website. The change report linked above covers all central changes that were made during the conversion process.]

## Included activities end
This process refers to the conversion of wood chips into synthetic gas. It includes drying (down to 10-15% moisture) and further comminution of wood chips (down to a size of 30x30x30 mm), fixed bed gasification of the wood chips and treatment of the resulting syngas to remove impurities and contaminants.

## Geography
Data from various literatures sources and gasification plants worldwide, and from one pilot plant in CH

## Technology
The technology corresponds to an average indirectly heated, atmospheric Fixed bed gasification, followed by a low temperature wet gas treatment. No energy integration with the subsequent processing of the gas is considered. The Fixed bed gasification plant is typically <2 MWth input capacity.

## Time period
Data from 1995 to 2004, first large scale facilities in the near future

## Parameters
- fraction, process water, to air: 0.15 dimensionless; name fraction_PW_to_air; lognormal variance with pedigree 0.092025, pedigree (4,4,3,2,4)
  Literature value. In case when no industry/process specific data are available, default evaporation fraction value is used. This value is 15% and is based on literature (Statistics Canada, 2007 & Shaffer, K.H., 2008, Consumptive water use in the Great Lakes Basin, USGS & Shiklomanov, 2003, World Water Resources at the Beginning of the 21st Century) and has been approved by an expert.
- fraction, tap water, to air: 0.15 dimensionless; name fraction_TW_to_air; = fraction_PW_to_air; lognormal variance with pedigree 0.092025, pedigree (4,4,3,2,4)
  Calculated value. See comment in the other parametres present in this dataset. Tap water is considered to be always used as process water, thus process water fractions to air are applied to all tap water input flows to calculate the amount of water consumed in the processes.

## Reference product
- synthetic gas: 1 m3; CPC 17200: Coal gas, water gas, producer gas and similar gases, other than petroleum gases and other gaseous hydrocarbons; By-product classification allocatable product
  EcoSpold01Location=CH
  production volume 586920 m3
    In 2004, CH syngas production is limited to 2 pilot-scale Fixed bed gasifiers.
    134 m3 per GWh. 1 pilot plant; 0.5 MW. See dataset on synthetic gas factory construction.
  property carbon content, non-fossil 0.15525
    Density of the gas (1.15 kg/Nm3), and dry mass were used to convert 0.135 kgC/kg in kg C/Nm3. All data from Tab 18.6, ecoinvent v2.2 report n 17.
  property heating value, net 6.21 MJ
    Value taken from the general comment of "synthetic gas production, from wood, at fluidized bed gasifier" dataset.
  property carbon content 0.15525
    carbon content on a dry matter basis (reserved; not for manual entry)
  properties: wet mass 1.15 kg, water in wet mass 0.105 kg, dry mass 1.045 kg, carbon content, fossil 0, water content 0.100478, price 0.15 EUR2005, carbon allocation 0.162236 kg

## Inputs from technosphere
- sodium hydroxide, without water, in 50% solution state: 0.00083927 kg; lognormal variance with pedigree 0.070625, pedigree (3,3,5,2,3)
  EcoSpold01Location=RER
  Calculated from a typical quality of untreated syngas from wood
  Uncertainty: Calculated from a typical quality of untreated syngas from wood
  properties: dry mass 1 kg, wet mass 1 kg, heating value, net 3.03 MJ
- tap water: 0.14794 kg; name tap_water_input; lognormal variance with pedigree 0.078025, pedigree (3,5,5,2,3)
  Weak data, one literature reference only (pilot plant)
  EcoSpold01Location=CH
  Uncertainty: Weak data, one literature reference only (pilot plant)
  properties: dry mass 0.000337476 kg, carbon content, fossil 0.00178991, wet mass 1 kg, water content 2962.17
  note on carbon content, fossil: Bicarbonate content is 2.93 mol/m3. CO2 content is 0.1 mol/m3 (ecoinvent v2.2 report 8, Tab 93.1).
- sulfuric acid: 0.0033346 kg; lognormal variance with pedigree 0.070625, pedigree (3,3,5,2,3)
  Calculated from a typical quality of untreated syngas from wood
  EcoSpold01Location=RER
  Uncertainty: Calculated from a typical quality of untreated syngas from wood
  properties: wet mass 1 kg, dry mass 1 kg
- electricity, medium voltage: 0.027492 kWh; lognormal variance with pedigree 0.070625, pedigree (3,3,5,2,3)
  EcoSpold01Location=CH
  Several literature sources
  Uncertainty: Several literature sources
- wood chips, dry, measured as dry mass: 0.102586 kg; lognormal variance with pedigree 0.069225, pedigree (2,3,5,2,3)
  EcoSpold01Location=RER
  Yield from literature survey, distribution from IEA Task 33 CH report
  Uncertainty: Yield from literature survey, distribution from IEA Task 33 CH report
  properties: dry mass 1 kg, wet mass 1.4 kg, water content 0.4, carbon content, non-fossil 0.494, heating value, net 9.99 MJ
  note on carbon content, non-fossil: C content of dry mass is 0.494 kgC/kg dry wood (ecoinvent v2.2 report 9).
- wastewater, from residence: -0.00010147 m3; lognormal variance with pedigree 0.094025, pedigree (4,5,5,2,3)
  Weak data, specific quality of waste water was not considered
  EcoSpold01Location=CH
  Uncertainty: Weak data, specific quality of waste water was not considered
  production volume 59.5548 m3
    Calculated from the production volume of synthetic gas in proportion to the respective output amounts.
  properties: wet mass 1000 kg, carbon content, non-fossil 0.199421, water content 2962.17, dry mass 0.337476 kg
  note on carbon content, non-fossil: 0.0673 kg TOC/m3 (Tab A.17, ecoinvent v2.2 report 13_I). TOC was considered as Total Carbon.
- wood chips, wet, measured as dry mass: 0.371291 kg; = 0.2984371+0.072854294; lognormal variance with pedigree 0.069225, pedigree (2,3,5,2,3)
  Yield from literature survey, distribution from IEA Task 33 CH report
  EcoSpold01Location=RER
  Uncertainty: Yield from literature survey, distribution from IEA Task 33 CH report
  properties: wet mass 2.4 kg, dry mass 1 kg, water content 1.4, carbon content, non-fossil 0.494, heating value, net 10.84 MJ
  note on heating value, net: Value based on the dataset 'softwood forestry, mixed species, sustainable forest management'
- synthetic gas factory: 9.1195e-10 unit; lognormal variance with pedigree 0.394025, pedigree (4,5,5,2,3)
  EcoSpold01Location=CH
  Calculated from the production and input capacity of the reference plant
  Uncertainty: Calculated from the production and input capacity of the reference plant
- wood ash mixture, pure: -0.0040567 kg; lognormal variance with pedigree 0.069225, pedigree (2,3,5,2,3)
  EcoSpold01Location=CH
  Average of several literature sources
  Uncertainty: Average of several literature sources
  production volume 2380.96 kg
    (same comment as for wastewater, from residence)
  properties: wet mass 1 kg, dry mass 1 kg, carbon content, non-fossil 0.012
- industrial furnace, natural gas: 1.8939e-9 unit; lognormal variance with pedigree 0.378025, pedigree (3,5,5,2,3)
  EcoSpold01Location=RER
  Calculation based on energy demand of the process
  Uncertainty: Calculation based on energy demand of the process

## Emissions to nature
- Sulfur dioxide [air, urban air close to ground]: 1.9546e-7 kg; lognormal variance with pedigree 0.2961, pedigree (4,5,5,3,5)
  Calculation, from syngas composition and natural gas combustion
  Uncertainty: Calculation, from syngas composition and natural gas combustion
- Methane, non-fossil [air, urban air close to ground]: 7.1077e-7 kg; lognormal variance with pedigree 0.3361, pedigree (4,5,5,3,5)
  (same comment as for Sulfur dioxide)
- Toluene [air, urban air close to ground]: 7.1077e-8 kg; lognormal variance with pedigree 0.3361, pedigree (4,5,5,3,5)
  (same comment as for Sulfur dioxide)
- Carbon monoxide, non-fossil [air, urban air close to ground]: 7.4631e-7 kg; lognormal variance with pedigree 0.9361, pedigree (4,5,5,3,5)
  (same comment as for Sulfur dioxide)
- Butane [air, urban air close to ground]: 2.4877e-7 kg; lognormal variance with pedigree 0.3361, pedigree (4,5,5,3,5)
  (same comment as for Sulfur dioxide)
- Carbon dioxide, non-fossil [air, urban air close to ground]: 0.37368 kg; lognormal variance with pedigree 0.058025, pedigree (1,1,5,2,3)
  Calculation, to close carbon balance
  Uncertainty: Calculation, to close carbon balance
- Nitrogen oxides [air, urban air close to ground]: 6.3619e-6 kg; lognormal variance with pedigree 0.3361, pedigree (4,5,5,3,5)
  (same comment as for Sulfur dioxide)
- Formaldehyde [air, urban air close to ground]: 3.5538e-8 kg; lognormal variance with pedigree 0.3361, pedigree (4,5,5,3,5)
  (same comment as for Sulfur dioxide)
- Pentane [air, urban air close to ground]: 4.2646e-7 kg; lognormal variance with pedigree 0.3361, pedigree (4,5,5,3,5)
  (same comment as for Sulfur dioxide)
- Propionic acid [air, urban air close to ground]: 7.1077e-9 kg; lognormal variance with pedigree 0.3361, pedigree (4,5,5,3,5)
  (same comment as for Sulfur dioxide)
- Acetaldehyde [air, urban air close to ground]: 3.5538e-10 kg; lognormal variance with pedigree 0.3361, pedigree (4,5,5,3,5)
  (same comment as for Sulfur dioxide)
- Benzene [air, urban air close to ground]: 1.4215e-7 kg; lognormal variance with pedigree 0.3361, pedigree (4,5,5,3,5)
  (same comment as for Sulfur dioxide)
- Benzo(a)pyrene [air, urban air close to ground]: 3.5538e-12 kg; lognormal variance with pedigree 0.5961, pedigree (4,5,5,3,5)
  (same comment as for Sulfur dioxide)
- Particulates, < 2.5 um [air, urban air close to ground]: 7.1077e-8 kg; lognormal variance with pedigree 0.5961, pedigree (4,5,5,3,5)
  (same comment as for Sulfur dioxide)
- Dioxins, measured as 2,3,7,8-tetrachlorodibenzo-p-dioxin [air, urban air close to ground]: 0 kg; pedigree (1,1,1,1,1)
  (same comment as for Sulfur dioxide)
- Acetic acid [air, urban air close to ground]: 5.3308e-8 kg; lognormal variance with pedigree 0.3361, pedigree (4,5,5,3,5)
  (same comment as for Sulfur dioxide)
- Water [water, unspecified]: 2.4279e-5 m3; name water_to_water_unspecified; = (tap_water_input/1000)*(1-fraction_TW_to_air)-0.00010147; lognormal variance with pedigree 0.0807, pedigree (2,2,5,1,1)
  Calculated value based on literature values and expert opinion. See comments in the parametres' comment field.
  property carbon content, non-fossil 0; name C_content_non_fossil
  property fraction, origin: fresh water 1; name fraction_origin_fresh_water_Ww
  property fraction, origin: unspecified 0; name fraction_origin_unspecified_Ww
  property fraction, origin: salt water 0; name fraction_origin_salt_water_Ww
  property carbon content, fossil 0; name C_content_fossil
  property dry mass 0 kg; name DM
  property water in wet mass 1000 kg; name WWM
  property wet mass 1000 kg; name WM
- Mercury [air, urban air close to ground]: 1.0662e-11 kg; lognormal variance with pedigree 0.9361, pedigree (4,5,5,3,5)
  (same comment as for Sulfur dioxide)
- Propane [air, urban air close to ground]: 7.1077e-8 kg; lognormal variance with pedigree 0.3361, pedigree (4,5,5,3,5)
  (same comment as for Sulfur dioxide)
- Water [air, unspecified]: 2.2191e-5 m3; name water_to_air_unspecified; = (tap_water_input/1000*fraction_TW_to_air); lognormal variance with pedigree 0.0807, pedigree (2,2,5,1,1)
  (same comment as for Water)
  property fraction, origin: unspecified 0; name fraction_origin_unspecified
  property fraction, origin: fresh water 1; name fraction_origin_fresh_water
  property fraction, origin: salt water 0; name fraction_origin_salt_water
- PAH, polycyclic aromatic hydrocarbons [air, urban air close to ground]: 3.5538e-9 kg; lognormal variance with pedigree 0.5961, pedigree (4,5,5,3,5)
  (same comment as for Sulfur dioxide)
- Dinitrogen monoxide [air, urban air close to ground]: 3.5538e-8 kg; lognormal variance with pedigree 0.3361, pedigree (4,5,5,3,5)
  (same comment as for Sulfur dioxide)

## Sampling procedure
Cross-checking of various literature sources and pilot-to-demonstration plant operation data, adapted to Swiss context

## Extrapolations
This dataset has been extrapolated from year 2006 to the year of the calculation (2021). The uncertainty has been adjusted accordingly.

## Review by Niels Jungbluth 2006-10-17
Passed.
none
