# wood pellet factory production

Dataset: EcoSpold 2, unit process
Geography: RoW
Time period: 2011-01-01 to 2021-12-31
Technology level: modern
Classification: ISIC rev.4 ecoinvent: 2822:Manufacture of metal-forming machinery and machine tools
Synonyms: wood pellets plant construction; wood pellets factory construction
Tags: single enterprise data
Scenario: Business-as-Usual
System model: Allocation, cut-off by classification
Generated by: Christian Bauer
Database: ecoinvent
isCopyrightProtected: true
accessRestrictedTo: 1

## General comment
This dataset represent the components of wood pellets factory, which produce pellets from wood residue from sawmills (mainly sawdust) and from woodchips. The raw materials is firstly pre-treated and dryed, then comminuted and mixed. In the end it is pellettized, cooled and bagged. This dataset includes all the machineries and devices necessaries for these processes (buildings, dryer, hammermills, hoppers, vibrating screen, conditioner, screw conveyors, cup elevators, several electric motors, pellet presses, horizontal cooler, packaging machine, pallettizer robot, exhaust after treatment devices such as cyclone and electrostatic precipitator, monitors and computer for monitoring). The dataset includes also the tower silos and materials in the external area, necessaries for store and deliver the final product.
Machineries are assumed to be replaced 1,5 times during the lifetime of the factory (tower silos are replaced only once). All values of exchanges are already adjusted for the factory lifetime. The production capacity of the pellet factory modeled is 50.000.000 kg/year.
Source of image: Marco Mina, 2011
This dataset is supported with a document which gives supplementary information of the infrastructure. Refer to the editors page.

## Included activities start
From the manufacturing of the infrastructures

## Included activities end
This activity ends with the disposal of the pellet factory in the end of its lifetime.

## Technology
The choice of the machineries and their specific capacity were made basing on an existing Swiss wood pellets production factory. Machineries models are still available on the market (2012).

## Reference product
- wood pellet factory: 1 unit; name RP_amount_1; By-product classification allocatable product; CPC 53269: Other constructions for manufacturing
  production volume 272 unit; name RP_PV_1; = 2.71E+10/5.00E+07
    Estimated value. Total world wood pellet production in 2014 was of 2.71E+10 kg. The capacity of the factory for this dataset is of 5.00E+07kg.
    Source: Dale, A. (2015) Production and Consumption of Wood Pellets in the European Union. WPAC conference November 2015. Halifax, Nova Scotia, Canada. Retrieved from: <http://www.pellet.org/images/2015/ArnoldDaleEkman.pdf>, accessed 6 May 2016
  property lifetime 50 year; name lifetime
  property capacity [kg/s] 1.58444 kg/s; name capacity_kg_per_s; = 50000000/31556926
    measured annual capacity (50 000 000 kg wood pellets) divided by the number of seconds in a year (31 556 926 seconds)
  property price 5.06142e6 EUR2005
    Calculated based on inputs: The price of the product has been calculated as a sum of the values of the material and energy inputs for this product. This value is therefore a rough estimation. It may underestimate the real price since there are additional expenses when producing any product. These expences can include for example labour costs, treatment of waste materials and profit for the producer. Please consider carefully whether this level of data quality is acceptable for your application.
  property lifetime capacity [kg] 2.5e9 kg; name lifetime_capacity_kg; = ( capacity_kg_per_s*31556926)* lifetime
    measured annual production (kg) * lifetime factory (50 years)

## By-products
- iron scrap, unsorted: 0 kg; CPC 39310: Slag, dross, scalings and other waste from the manufacture of iron or steel; By-product classification Recyclable; pedigree (1,1,1,1,1)
  calculated value
  production volume 0 kg; = RP_PV_1 * (BP_amount_8 / RP_amount_1)
    Calculated from production volume of reference product using the relative outputs.
  property price 0.149 EUR2005
    Temporary price data. Calculated as 90% of purchasers price based on: estimated at 85% of sorted scrap
  property carbon content 0
    carbon content on a dry matter basis (reserved; not for manual entry)
  properties: wet mass 1 kg, carbon content, non-fossil 0, dry mass 1 kg, water in wet mass 0 kg, water content 0, carbon content, fossil 0, lifetime 20 year, carbon allocation 0 kg

## Inputs from technosphere
- scrap copper: -1810 kg; name BP_amount_2; = (copper)*-1; lognormal variance with pedigree 0.0112, pedigree (1,3,4,5,1)
  calculated value
  production volume 492320 kg; = RP_PV_1 * (BP_amount_2 / RP_amount_1)
    Calculated from production volume of reference product using the relative outputs.
  property price 0 EUR2005; name BP_amount_2_price_EUR2005
  properties: dry mass 1 kg, wet mass 1 kg, lifetime 20 year
- polyethylene, high density, granulate: 78 kg; name polyethilene; source AEK Pellets AG 2011; lognormal variance with pedigree 0.0284, pedigree (2,3,4,5,1)
  literature value and calculated value. Value basically taken from questionnaire from an existing pellets factory and from several additional sources. Refer to supplementary information in the editors page
  properties: heating value, net 42.47 MJ, wet mass 1 kg, carbon content, fossil 0.857143, dry mass 1 kg
  note on carbon content, fossil: Polyethylene is formed out of a huge amount of ethylene monomers (C2H4) (ecoinvent v2.2 report 11_II). MW=28 g/mol
- tower silo, plastic: 12000 m3; source AEK Pellets AG 2011; lognormal variance with pedigree 0.0166, pedigree (1,3,4,5,1)
  estimation - value given from pellets company in the filled questionnaire (dimensions of the pellet silos in their factory). This dataset include its own disposal in the end of its lifetime.
- electronics scrap from control units: -101 kg; name BP_amount_3; = (electronics)*-1; lognormal variance with pedigree 0.0112, pedigree (1,3,4,5,1)
  calculated value
  production volume 27472 kg; = RP_PV_1 * (BP_amount_3 / RP_amount_1)
    Calculated from production volume of reference product using the relative outputs.
  property price 0 EUR2005; name BP_amount_3_price_EUR2005
  properties: carbon content, fossil 0.337146, dry mass 1 kg, lifetime 20 year, wet mass 1 kg, carbon content, non-fossil 0.00013442
- wire drawing, copper: 1810 kg; = copper; source AEK Pellets AG 2011; lognormal variance with pedigree 0.0112, pedigree (1,3,4,5,1)
  calculated value
- building, hall, steel construction: 1000 m2; source AEK Pellets AG 2011; lognormal variance with pedigree 0.0166, pedigree (1,3,4,5,1)
  measured value - building for drying process in the pellet factory modeled (datset includes the disposal of the building in the end of its lifetime)
- metal working, average for chromium steel product manufacturing: 127578 kg; = chromium_steel; source AEK Pellets AG 2011; lognormal variance with pedigree 0.0112, pedigree (1,3,4,5,1)
  calculated value
- building, multi-storey: 7000 m3; source AEK Pellets AG 2011; lognormal variance with pedigree 0.0166, pedigree (1,3,4,5,1)
  measured value - building for pelletting process in the pellet factory modeled (datset includes the disposal of the building in the end of its lifetime)
- scrap steel: -297096 kg; name BP_amount_7; = (steel_low_alloyed+reinforcing_steel+chromium_steel)*-1; lognormal variance with pedigree 0.0112, pedigree (1,3,4,5,1)
  calculated value
  production volume 8.08101e7 kg; = RP_PV_1 * (BP_amount_7 / RP_amount_1)
    Calculated from production volume of reference product using the relative outputs.
  property price 0 EUR2005; name BP_amount_7_price_EUR2005
  properties: dry mass 1 kg, lifetime 20 year, wet mass 1 kg
- cast iron: 573 kg; name cast_iron; source AEK Pellets AG 2011; lognormal variance with pedigree 0.0284, pedigree (2,3,4,5,1)
  (same comment as for polyethylene, high density, granulate)
  properties: dry mass 1 kg, wet mass 1 kg, carbon content, fossil 0.04
  note on carbon content, fossil: Cast iron is made by remelting pig iron in small furnaces (e.g. cupola furnaces or electric arc furnaces) and poured into moulds to make castings. It usually contains 2% to 6% carbon (ecoinvent v2.2 report 10_partII). An average content of 4% was considered
- steel, chromium steel 18/8: 127578 kg; name chromium_steel; source AEK Pellets AG 2011; lognormal variance with pedigree 0.0284, pedigree (2,3,4,5,1)
  (same comment as for polyethylene, high density, granulate)
  properties: dry mass 1 kg, wet mass 1 kg, carbon content, fossil 0.0008
  note on carbon content, fossil: Stainless steel model is the grade 304 steel (18/8 stainless, 18% chromium 8% nickel; max. 0.08% C)
- waste mineral wool: -1375 kg; name BP_amount_4; = (rock_wool)*-1; lognormal variance with pedigree 0.0112, pedigree (1,3,4,5,1)
  calculated value
  production volume 374000 kg; = RP_PV_1 * (BP_amount_4 / RP_amount_1)
    Calculated from production volume of reference product using the relative outputs.
  property price 0 EUR2005; name BP_amount_4_price_EUR2005
  properties: lifetime 20 year, wet mass 1 kg, dry mass 1 kg
- waste glass: 0 kg; name BP_amount_5; pedigree (1,1,1,1,1)
  calculated value
  production volume 0 kg
    Calculated from production volume of reference product using the relative outputs.
  property price 0 EUR2005; name BP_amount_5_price_EUR2005
  properties: lifetime 20 year, wet mass 1 kg, dry mass 1 kg, heating value, net 0.05 MJ
  note on heating value, net: Value extracted from "treatment of waste glass, open dump, very wet infiltration class (1000mm)"
- waste mineral oil: -25 kg; name BP_amount_9; = (lubricating_oil)*-1; lognormal variance with pedigree 0.0112, pedigree (1,3,4,5,1)
  calculated value
  production volume 6800 kg; = RP_PV_1 * (BP_amount_9 / RP_amount_1)
    Calculated from production volume of reference product using the relative outputs.
  property price 0 EUR2005; name BP_amount_9_price_EUR2005
  properties: carbon content, fossil 0.864444, water content 0.111111, heating value, net 34.7 MJ, dry mass 0.9 kg, wet mass 1 kg, lifetime 20 year
  note on carbon content, fossil: Tab A.6, ecoinvent v2.2 report 13_I. C content has been calculated after data in the tables, and then referred to 1 kg DM
  note on heating value, net: Value taken from the general comment of the treatment dataset.
- stone wool: 1375 kg; name rock_wool; source AEK Pellets AG 2011; lognormal variance with pedigree 0.0284, pedigree (2,3,4,5,1)
  (same comment as for polyethylene, high density, granulate)
  properties: dry mass 1 kg, wet mass 1 kg, carbon content, fossil 0.015401
  note on carbon content, fossil: The chemical composition of the glass fibres used in the rock wool production is similar to the composition of naturally cooled volcano basalt and has a composition listed in Tab. 3.1 and 3.2 in ecoinvent v2.2 report 16, part XIV. Rock wool contains: a minimum of 96% mineral fibres,between 0.5 and 3.0 weight percent of phenolic resin depending on the specific product characteristics, and about 0.2 percent mineral oil (ecoinvent v2.2 report 16, part XIV). An average composition of 1.8% phenolic resin, 0.2% mineral oil, and 98% mineral fibres has been assumed and used to calculate C content of the rock wool
- lubricating oil: 25 kg; name lubricating_oil; source AEK Pellets AG 2011; lognormal variance with pedigree 0.0284, pedigree (2,3,4,5,1)
  (same comment as for polyethylene, high density, granulate)
  properties: heating value, net 40.2 MJ, dry mass 1 kg, carbon content, fossil 0.75, wet mass 1 kg
  note on heating value, net: Literature value, Source: IPCC 2006, 2006 IPCC Guidelines for National Greenhouse Gas Inventories, Prepared by the National Greenhouse Gas Inventories Programme, Eggleston H.S., Buendia L., Miwa K., Ngara T. and Tanabe K. (eds). Published: IGES, Japan
  note on carbon content, fossil: Lubricating oil is produced from diesel. C-content/dry mass of fats and oils considered 75%, from: ecoinvent v2.2 report, n 15a, pg 40
- electronics, for control units: 101 kg; name electronics; source AEK Pellets AG 2011; lognormal variance with pedigree 0.0284, pedigree (2,3,4,5,1)
  (same comment as for polyethylene, high density, granulate)
  properties: dry mass 1 kg, carbon content, non-fossil 0.00013442, carbon content, fossil 0.337146, wet mass 1 kg
  note on carbon content, non-fossil: The control unit has a composition of 46% steel (housing), 32% plastics, 14% printed wiring boards and 8% cables (various types).;
- metal working, average for metal product manufacturing: 10532 kg; = cast_iron+reinforcing_steel; source AEK Pellets AG 2011; lognormal variance with pedigree 0.0112, pedigree (1,3,4,5,1)
  calculated value
- flat glass, uncoated: 138 kg; name flat_glass; source AEK Pellets AG 2011; lognormal variance with pedigree 0.0284, pedigree (2,3,4,5,1)
  (same comment as for polyethylene, high density, granulate)
  properties: dry mass 1 kg, wet mass 1 kg
- metal working, average for steel product manufacturing: 159559 kg; = steel_low_alloyed; source AEK Pellets AG 2011; lognormal variance with pedigree 0.0112, pedigree (1,3,4,5,1)
  calculated value
- steel, low-alloyed: 159559 kg; name steel_low_alloyed; source AEK Pellets AG 2011; lognormal variance with pedigree 0.0112, pedigree (1,3,4,5,1)
  (same comment as for polyethylene, high density, granulate)
  properties: wet mass 1 kg, dry mass 1 kg, carbon content, fossil 0.005
  note on carbon content, fossil: Low alloyed steel composition given in Tab. 3.2 ecoinvent v2.2 report 10_partII. Steel assumed to have a C content of 0.5%
- metal working, average for aluminium product manufacturing: 1566 kg; = aluminium; source AEK Pellets AG 2011; lognormal variance with pedigree 0.0112, pedigree (1,3,4,5,1)
  calculated value
- waste polyethylene: 0 kg; name BP_amount_6; pedigree (1,1,1,1,1)
  calculated value
  production volume 0 kg
    Calculated from production volume of reference product using the relative outputs.
  property price 0 EUR2005; name BP_amount_6_price_EUR2005
  properties: lifetime 20 year, dry mass 0.996 kg, carbon content, fossil 0.825301, water content 0.00401606, wet mass 1 kg, heating value, net 42.47 MJ
  note on carbon content, fossil: C content in 1 kg DM was calculated using data in Tab A.1, ecoinvent v2.2 report 13_I
- scrap aluminium: -1566 kg; name BP_amount_1; = (aluminium)*-1; lognormal variance with pedigree 0.0112, pedigree (1,3,4,5,1)
  calculated value
  production volume 425952 kg; = RP_PV_1 * (BP_amount_1 / RP_amount_1)
    Calculated from production volume of reference product using the relative outputs.
  property price 0 EUR2005; name BP_amount_1_price_EUR2005
  properties: wet mass 1 kg, lifetime 20 year, dry mass 1 kg
- reinforcing steel: 9959 kg; name reinforcing_steel; source AEK Pellets AG 2011; lognormal variance with pedigree 0.0284, pedigree (2,3,4,5,1)
  (same comment as for polyethylene, high density, granulate)
  properties: carbon content, fossil 0.004, dry mass 1 kg, wet mass 1 kg
- copper, cathode: 1810 kg; name copper; source AEK Pellets AG 2011; lognormal variance with pedigree 0.0284, pedigree (2,3,4,5,1)
  (same comment as for polyethylene, high density, granulate)
  properties: dry mass 1 kg, wet mass 1 kg
- aluminium, wrought alloy: 1566 kg; name aluminium; source AEK Pellets AG 2011; lognormal variance with pedigree 0.0284, pedigree (2,3,4,5,1)
  (same comment as for polyethylene, high density, granulate)
  properties: dry mass 1 kg, wet mass 1 kg
- iron scrap, unsorted: -573 kg; lognormal variance with pedigree 0.0112, pedigree (1,3,4,5,1)
  calculated value
  production volume 155856 kg
  properties: price 0.149 EUR2005, wet mass 1 kg, dry mass 1 kg, lifetime 20 year
- waste glass: -13.0453, -1.20236, -0.0272774, -0.112178, -0.170349, -0.501955, -122.941 kg (7 entries); lognormal variance with pedigree 0.0112, pedigree (1,3,4,5,1)
  calculated value
  production volume 37536 kg
- waste polyethylene: -9.5854, -0.640459, -0.0484369, -0.264533, -0.106868, -0.251199, -67.1031 kg (7 entries); lognormal variance with pedigree 0.0112, pedigree (1,3,4,5,1)
  calculated value
  production volume 21216 kg

## Inputs from nature
- Transformation, from unspecified [natural resource, land]: 11000 m2; name land_use; source AEK Pellets AG 2011; lognormal variance with pedigree 0.0112, pedigree (1,3,4,5,1)
  estimation - value given from pellets company in the filled questionnaire (total surface of the real pellet production factory modelled: building for drying process, building for pellettizing, external area for parking places/storage etc.)
- Occupation, industrial area [natural resource, land]: 550000 m2*year; = land_use* 50; source AEK Pellets AG 2011; lognormal variance with pedigree 0.0112, pedigree (1,3,4,5,1)
  calculated value (land_use * lifetime of the pellet factory) [lifetime of the pellet factory: 50 years]
- Transformation, to industrial area [natural resource, land]: 11000 m2; source AEK Pellets AG 2011; lognormal variance with pedigree 0.0112, pedigree (1,3,4,5,1)
  (same comment as for Transformation, from unspecified)

## Sampling procedure
visit at the pellet production factory, answers to a technical questionnaire, verified estimations with materials producers, literature review of machineries and materials

## Extrapolations
extrapolated from Swiss data

## Review by Bo Weidema 2012-02-29
Passed. Documentation adequate, inputs relevant, mass balance correct, and correct handling of capacity utilisation.

## Review by Bo Weidema 2012-02-29
This dataset has only been reviewed by one reviewer. Since this is an infrastructure dataset, this deviation from normal procedures is acceptable.
