# treatment of residue from mechanical treatment, laptop computer, municipal incineration with fly ash extraction

Dataset: EcoSpold 2, unit process
Geography: CH
Time period: 2006-01-01 to 2021-12-31
Technology level: current
Classification: ISIC rev.4 ecoinvent: 3821:Treatment and disposal of non-hazardous waste
Synonyms: municipal waste incineration; Kehrichtverbrennung; Siedlungsabfallverbrennung
Scenario: Business-as-Usual
System model: Allocation, cut-off by classification
Share of production covered: 100 %
Generated by: Gabor Doka
Published in: Doka G. 2015
Database: ecoinvent
isCopyrightProtected: true
accessRestrictedTo: 1

## General comment
This dataset represents the activity of waste disposal of residue from mechanical treatment, laptop computer in a municipal solid waste incinerator (MSWI) // Recommended use of this dataset: Only for incineration of shredder residues generated in the recycling (mechanical treatment) of laptop computers // Inventoried waste contains 1.85% rubber; 45.2% Plastics from electronic consumer goods; 45.2% Plastics from electronic industrial goods; 1.99% MSWI iron scrap; 3.61% Alu in MSW; 0.335% Glass; 1.71% wiring copper; 0.0372% Pb in ASR inert; 0.0188% silver; . // Waste composition (wet, in ppm): upper heating value 33.34 MJ/kg; lower heating value 31.96 MJ/kg; H2O 8363.2; O 50617; H 68908; C 752530; S 400.02; N 12031; P 468.2; B n.a.; Cl 6302.9; Br 4975.2; F 226.14; I n.a.; Ag 187.58; As 6.7843; Ba 160.11; Cd 136.45; Co 26.665; Cr 72.375; Cu 20243; Hg 0.76891; Mn 53.974; Mo 2.7137; Ni 474.07; Pb 514.24; Sb 4341.8; Se 1.7726; Sn 196.95; V 5.6506; Zn 698.91; Be 0.42204; Sc n.a.; Sr 74.701; Ti 4049.8; Tl 0.33763; W n.a.; Si 4501.6; Fe 17643; Ca 3059.2; Al 38275; K 105.84; Mg n.a.; Na 342.36; // Share of carbon in waste that is biogenic 0%. // Share of metals in waste not oxidised and bulk-recyclable (exclude very small or thin parts) Iron: 91.91%; Alu: 93.81%; Copper: 84.39%. // Recovery of metal scrap from bottom ash to recycling: 9.3819g iron scrap, 11.016g aluminium scrap, 5.2121g copper scrap. From this waste, the FLUWA process in the technology mix recovers 0.000846kg (DM) of a hydroxide sludge to be recycled in zinc furnaces. // Ultimately one kg of this waste produces 0.1182 kg of bottom ash (can include some washed ash) and 0.01104 kg of residues, which are landfilled (technology mix). Additional solidification of residues with 0.004414 kg of cement.Net energy production: 4.09MJ/kg electric energy and 7.95MJ/kg thermal energy. //

## Included activities start
waste incineration from waste reception gate and delivery into waste bunker at incinerator plant site (without transports to the incinerator)

## Included activities end
Waste-specific short-term emissions to water from leachate. Long-term emissions from landfill to ground water.

## Geography
Specific to the technology mix encountered in Switzerland in 2012.

## Technology
average Swiss MSWI plants in 2010 (grate incinerators) with electrostatic precipitator for fly ash (ESP), wet flue gas scrubber and 25% SNCR , 42.77% SCR-high dust , 32.68% SCR-low dust -DeNOx facilities and 0% without Denox (weighted according to mass of burnt waste, representing Swiss average). Efficiency of iron scrap separation from slag : 58%. Efficiency of non-ferrous scrap separation from slag : 31%. The technology mix for this dataset includes a filter ash treatment (FLUWA) of a share of 46.22%. Gross electric efficiency technology mix 15.84% and Gross thermal efficiency technology mix 28.51%

## Time period
Waste composition as given in literature reference, theoretical data or other source. Transfer coefficients for modern MSWI.

## Reference product
- residue from mechanical treatment, laptop computer: -1 kg; name RP_amount_1; CPC 39990: Other wastes n.e.c.; By-product classification Waste
  Main reference product of this activity (supply of disposal service).
  production volume 543930 kg; name RP_PV_1
    based on corresponding global production volume of MSW fraction in conventional MSWI (wo fly ash extraction) and scaled down to annual Swiss incinerated MSW mass of 3.02 mio. tonnes.
  property price 0 EUR2005; name RP_amount_1_price_EUR2005
    Waste products are assigned a price of zero as they are assumed to require further treatment.
  property heating value, net 31.96 MJ
    Value taken from the general comment of the treatment dataset.
  property carbon content 0.75888
    carbon content on a dry matter basis (reserved; not for manual entry)
  properties: tin content 0.00019861, silicon content 0.0045396, sodium content 0.00034525, titanium content 0.0040839, strontium content 7.5331e-5, water content 0.0084337, calcium content 0.003085, water in wet mass 0.0083632 kg, carbon content, fossil 0.75888, aluminium content 0.038597, iron content 0.017792, potassium content 0.00010673, barium content 0.00016146, hydrogen content 0.069489, oxygen content 0.051044, dry mass 0.99164 kg, sulfur content 0.00040339, phosphorus content 0.00047215, nitrogen content 0.012132, arsenic content 6.8415e-6, chlorine content 0.0063561, wet mass 1 kg, bromine content 0.0050171, silver content 0.00018916, cobalt content 2.6889e-5, lead content 0.00051858, molybdenum content 2.7366e-6, fluorine content 0.00022805, cadmium content 0.0001376, vanadium content 5.6982e-6, mercury content 7.7539e-7, beryllium content 4.256e-7, nickel content 0.00047807, chromium content 7.2985e-5, copper content 0.020414, manganese content 5.4429e-5, thallium content 3.4048e-7, zinc content 0.00070481, selenium content 1.7875e-6, antimony content 0.0043784, carbon allocation 0.752536 kg

## By-products
All rows: pedigree (1,1,1,1,1)
- metalliferous hydroxide sludge: 0 kg; By-product classification Recyclable; CPC 1429: Other non-ferrous metal ores and concentrates (other than uranium or thorium ores and concentrates)
  Metalliferous hydroxide sludge from filter ash leaching (FLUWA).
  Uncertainty: uncertainty is calculated from uncertainties in waste composition and transfer coefficients to filter ash in incinerator and the uncertainty of the transfer coefficients of the FLUWA process.
  production volume 0 kg
    calculated in proportion to reference product waste input to incinerator
  property heating value, net 0 MJ
    Non combustible products are assumed to have an LHV equal to zero (0).
  property price 0.0042 EUR2005
    World market value of manure, deflated with barley world market price and consumer price index, based on [http://www.gov.pe.ca/photos/original/af_NM_manconv.pdf].
  property carbon content 0.046248
    carbon content on a dry matter basis (reserved; not for manual entry)
  properties: arsenic content 7.4267e-5, bromine content 0.1161, oxygen content 0.32321, nickel content 0.00049844, copper content 0.0014184, phosphorus content 0.01049, barium content 5.3244e-5, chlorine content 0.17415, sulfur content 0.027969, fluorine content 0.003898, mercury content 1.6554e-6, lead content 0.0028447, cadmium content 0.054867, chromium content 0.00026895, antimony content 0.055615, molybdenum content 0.00019651, manganese content 7.5369e-6, vanadium content 4.5659e-6, sodium content 0.0012247, titanium content 0.00039242, beryllium content 7.4519e-6, cobalt content 0.00077723, selenium content 2.2243e-5, zinc content 0.14459, tin content 0.00019145, strontium content 1.0066e-6, silicon content 0.00016789, carbon content, fossil 0.046248, calcium content 0.033552, thallium content 4.0315e-6, iron content 0.0001861, wet mass 1 kg, potassium content 0.00079545, aluminium content 0.00017675, water content 3, water in wet mass 0.75 kg, dry mass 0.25 kg, carbon allocation 0.011562 kg
- heat, for reuse in municipal waste incineration only: 0 MJ; name E_th_prod_MSWI; By-product classification allocatable product; CPC 17300: Steam and hot water
  Net useful heat generated from this waste and used in internal MSWI plant energy redistribution.
  Uncertainty: uncertainty is calculated from uncertainties in waste composition and uncertainties in energy efficiency and the uncertainty in internal energy demand
  production volume 4.3217e6 MJ
    calculated in proportion to reference product waste input to incinerator
  property true value relation 0.1842; name E_th_prod_MSWI_true_value_relation
    property to calculate "true value" from
  property exergy 0.1842 MJ; name E_th_prod_MSWI_exergy
    This exergy property is based on the exergy content of the product.
  property price 0.0106 EUR2005; name E_th_prod_MSWI_price_EUR2005
    Average European district heat price from Ecoheatcool and Euroheat 2005-2006, Ecoheat Work package 1: The European heat market. Final report. 10.6 EUR/GJ i s the price of district heat. http://www.solarthermalworld.org/files/Ecoheatcool%20WP1%20Web.pdf?download
- electricity, for reuse in municipal waste incineration only: 0 kWh; name E_el_prod_MSWI; CPC 17100: Electrical energy; By-product classification allocatable product
  Net electricity generated from this waste and used in internal MSWI plant energy redistribution.
  Uncertainty: uncertainty is calculated from uncertainties in waste composition and uncertainties in energy efficiency and the uncertainty in internal energy demand
  production volume 618030 kWh
    calculated in proportion to reference product waste input to incinerator
  property exergy 3.6 MJ; name E_el_prod_MSWI_exergy
    This exergy property is based on the exergy content of the product.
  property true value relation 3.6; name E_el_prod_MSWI_true_value_relation
    property to calculate "true value" from
  property price 0.1 EUR2005; name E_el_prod_MSWI_price_EUR2005
    Estimated to be the same price as in case of electricity, medium voltage.
- iron scrap, sorted, pressed: 0 kg; CPC 39310: Slag, dross, scalings and other waste from the manufacture of iron or steel; By-product classification Recyclable
  Iron scrap recovered from this waste.
  Uncertainty: uncertainty calculated from uncertainty in waste composition, uncertainty of share of recyclable metal, uncertainty of transfer coefficient to bottom ash, uncertainty of the efficiency of scrap removal in MSWI plant.
  production volume 0 kg
    calculated in proportion to reference product waste input to incinerator
  property price 0.175 EUR2005
    Temporary price data. Calculated as 90% of purchasers price based on: 2005 import and export prices (total trades (USD) divided by total weight (kg) in biggest economies of the world: EU27, USA, Brasil, China, India, Japan and Russia) from UN Commodity Trade Statistics Database (http://data.un.org/Explorer.aspxDatabase [Accessed 2011.06.20]). Commodity: Waste or scrap, of cast iron
  property carbon content 0
    carbon content on a dry matter basis (reserved; not for manual entry)
  properties: wet mass 1 kg, carbon content, fossil 0, carbon content, non-fossil 0, water content 0, water in wet mass 0 kg, dry mass 1 kg, carbon allocation 0 kg
- aluminium scrap, post-consumer, prepared for melting: 0 kg; By-product classification Recyclable; CPC 39363: Waste and scrap of aluminium
  Aluminium scrap recovered from this waste.
  Uncertainty: uncertainty calculated from uncertainty in waste composition, uncertainty of share of recyclable metal, uncertainty of transfer coefficient to bottom ash, uncertainty of the efficiency of scrap removal in MSWI plant.
  production volume 0 kg
    calculated in proportion to reference product waste input to incinerator
  property price 0.806 EUR2005
    Temporary price data. Calculated as 90% of purchasers price based on: 2005 import and export prices (total trades (USD) divided by total weight (kg) in biggest economies of the world: EU27, USA, Brasil, China, India, Japan and Russia) from UN Commodity Trade Statistics Database (http://data.un.org/Explorer.aspxDatabase [Accessed 2011.06.17]). Commodity: Waste or scrap, aluminium
  property carbon content 0
    carbon content on a dry matter basis (reserved; not for manual entry)
  properties: water content 0, wet mass 1 kg, carbon content, non-fossil 0, carbon content, fossil 0, dry mass 1 kg, water in wet mass 0 kg, carbon allocation 0 kg
- copper scrap, sorted, pressed: 0 kg; CPC 39361: Waste and scrap of copper; By-product classification Recyclable
  Copper scrap recovered from this waste.
  Uncertainty: uncertainty calculated from uncertainty in waste composition, uncertainty of share of recyclable metal, uncertainty of transfer coefficient to bottom ash, uncertainty of the efficiency of scrap removal in MSWI plant.
  production volume 0 kg
    calculated in proportion to reference product waste input to incinerator
  property price 2.84 EUR2005
    Temporary price data. Calculated as 90% of purchasers price based on: Source: USGS Mineral Yearbook 2007, Table 1 in <http://minerals.usgs.gov/minerals/pubs/commodity/recycle/myb1-2007-recyc.pdf>
  property carbon content 0
    carbon content on a dry matter basis (reserved; not for manual entry)
  properties: water content 0, carbon content, fossil 0, water in wet mass 0 kg, carbon content, non-fossil 0, dry mass 1 kg, wet mass 1 kg, carbon allocation 0 kg

## Inputs from technosphere
- process-specific burdens, slag landfill: 0.11815 kg; lognormal variance with pedigree 0.04192, pedigree (1,1,4,1,1)
  Mass-specific expenditures required for landfilling of bottom ash.;activityLink introduced to establish a direct link to the corresponding regional supply of this product
  Uncertainty: uncertainty is calculated from uncertainties in waste composition and transfer coefficients in incinerator
- slag landfill: 2.1005e-10 unit; lognormal variance with pedigree 0.04192, pedigree (1,1,4,1,1)
  Landfill infrastructure required for landfilling of bottom ash.
  Uncertainty: uncertainty is calculated from uncertainties in waste composition and transfer coefficients in incinerator
- sodium hydroxide, without water, in 50% solution state: 0.001088 kg; lognormal variance with pedigree 0.19067, pedigree (1,1,4,1,1)
  Auxilliary inputs for the flue gas treatment stage of the incinerator plant, and partially in the filter ash treatment (FLUWA).
  Uncertainty: uncertainty calculated from uncertainty in average NaOH input, of transfer coefficients in the incinerator, and the uncertainty of the waste composition of this waste
  properties: wet mass 1 kg, dry mass 1 kg, heating value, net 3.03 MJ
- process-specific burdens, residual material landfill: 0.022002 kg; lognormal variance with pedigree 0.063121, pedigree (1,1,4,1,1)
  Mass-specific expenditures required for landfilling of incineration residues.;activityLink introduced to establish a direct link to the corresponding regional supply of this product
  Uncertainty: uncertainty is calculated from uncertainties in waste composition and transfer coefficients in incinerator
- quicklime, milled, packed: 0.003461 kg; lognormal variance with pedigree 0.38823, pedigree (1,1,4,1,1)
  Auxilliary inputs for the flue gas treatment stage of the incinerator plant.
  Uncertainty: uncertainty calculated from uncertainty in average CaO input, of transfer coefficients in the incinerator, and the uncertainty of the waste composition of this waste
  properties: water content 0.010101, wet mass 1 kg, dry mass 0.99 kg
- residual material landfill: 4.5837e-11 unit; lognormal variance with pedigree 0.063121, pedigree (1,1,4,1,1)
  Landfill infrastructure required for landfilling of incineration residues.
  Uncertainty: uncertainty is calculated from uncertainties in waste composition and transfer coefficients in incinerator
- hydrochloric acid, without water, in 30% solution state: 0.00033557 kg; lognormal variance with pedigree 0.075338, pedigree (1,1,4,1,1)
  Auxilliary inputs for the wastewater treatment stage of the incinerator plant.
  Uncertainty: uncertainty calculated from uncertainty in average HCl input, of transfer coefficients in the incinerator, and the uncertainty of the waste composition of this waste
  properties: dry mass 1 kg, wet mass 1 kg, heating value, net 3.32 MJ
- iron (III) chloride, without water, in 40% solution state: 6.7509e-5 kg; lognormal variance with pedigree 0.26708, pedigree (1,1,4,1,1)
  Auxilliary inputs for the wastewater treatment stage of the incinerator plant.
  Uncertainty: uncertainty calculated from uncertainty in average FeCl3 input, of transfer coefficients in the incinerator, and the uncertainty of the waste composition of this waste
  properties: dry mass 1 kg, wet mass 1 kg
- chemical, organic: 2.6139e-5 kg; lognormal variance with pedigree 0.75634, pedigree (1,1,4,1,1)
  Auxilliary inputs for the wastewater treatment stage of the incinerator plant. Proxy for (pure) Trisodium-trimercapto-s-triazine (CAS 17766-26-6), used as 15% diluted solution, aka TMT15.
  Uncertainty: uncertainty calculated from uncertainty in average TMT15 input, of transfer coefficients in the incinerator, and the uncertainty of the waste composition of this waste
  properties: wet mass 1 kg, dry mass 1 kg, carbon content, fossil 0.628, heating value, net 19.03 MJ
- chemical, inorganic: 0.0001578 kg; lognormal variance with pedigree 0.22165, pedigree (1,1,4,1,1)
  Auxilliary inputs for the wastewater treatment stage of the incinerator plant. Proxy for Polyelectrolyte.
  Uncertainty: uncertainty calculated from uncertainty in average Polyelectrolyte input, of transfer coefficients in the incinerator, and the uncertainty of the waste composition of this waste
  properties: carbon content, fossil 0.003, wet mass 1 kg, dry mass 1 kg
- cement, unspecified: 0.0044142 kg; lognormal variance with pedigree 0.072205, pedigree (1,1,4,1,1)
  Cement required for solidification of landfilled residual material.
  Uncertainty: Uncertainty calculated from uncertainty of the waste composition of this waste, of transfer coefficients in the incinerator and of the solidification recipe.
  properties: wet mass 1 kg, dry mass 1 kg
- waste cement, hydrated: -0.011035 kg; lognormal variance with pedigree 0.072205, pedigree (1,1,4,1,1)
  Hydrated cement output for solidification of landfilled residual material.
  Uncertainty: Uncertainty calculated from uncertainty of the waste composition of this waste and transfer coefficients in the incinerator and of the solidification recipe.
  production volume 6002.5 kg
    calculated in proportion to reference product waste input to incinerator
  properties: wet mass 1 kg, dry mass 1 kg
- transport, freight, lorry, unspecified: 0.005404 metric ton*km; lognormal variance with pedigree 0.03449, pedigree (1,1,4,1,1)
  Transport services to transport incineration residues to landfills and filter ash to external treatments (FLUWA).
  Uncertainty: uncertainty calculated from uncertainty of the waste composition of this waste, uncertainty of transfer coefficients and the uncertainty in generic transportation distances
- ammonia, anhydrous, liquid: 0.0021517 kg; lognormal variance with pedigree 0.6763, pedigree (1,1,4,1,1)
  Input to DeNOx stage (100% NH3).
  Uncertainty: uncertainty calculated from uncertainty in average DeNOx input, uncertainty in the share of thermal NOx, uncertainty of nitrogen content in average municipal waste and the uncertainty in nitrogen content in *this* waste.
  properties: dry mass 1 kg, wet mass 1 kg
- heat, district or industrial, natural gas: 0.40237 MJ; lognormal variance with pedigree 0.6763, pedigree (1,1,4,1,1)
  Input to DeNOx stage, to heat up flue gas in low-dust SCR.
  Uncertainty: uncertainty calculated from uncertainty in average DeNOx input, uncertainty in the share of thermal NOx, uncertainty of nitrogen content in average municipal waste and the uncertainty in nitrogen content in *this* waste.
  properties: heating value, net 1 MJ
- spent activated carbon with mercury: -4.102e-6 kg; name BP_amount_1; lognormal variance with pedigree 1.6101, pedigree (1,1,4,1,1)
  Spent ion exchanger charged with mercury, from FLUWA filter ash treatment, approximated here with Spent activated carbon with mercury, deposited undergound in a polyethylene Big Bag.
  Uncertainty: uncertainty calculated from uncertainty in of transfer coefficients in the incinerator, and the uncertainty of the waste composition of this waste.
  production volume 2.2312 kg; = ABS(RP_PV_1 * (BP_amount_1 / RP_amount_1))
    Calculated from production volume of reference product using the relative outputs.
  property price 0 EUR2005; name BP_amount_1_price_EUR2005
  properties: carbon content, fossil 0.6, wet mass 1 kg, dry mass 1 kg, heating value, net 18.18 MJ
- titanium dioxide: 0.00013481 kg; lognormal variance with pedigree 1.0326, pedigree (1,1,4,1,1)
  Input to DeNOx stage (TiO2 catalyst carrier)
  Uncertainty: uncertainty calculated from uncertainty in average DeNOx input, uncertainty in the share of thermal NOx, uncertainty of nitrogen content in average municipal waste and the uncertainty in nitrogen content in *this* waste.
  properties: wet mass 1 kg, dry mass 1 kg
- chromium oxide, flakes: 2.7512e-6 kg; lognormal variance with pedigree 1.0326, pedigree (1,1,4,1,1)
  Input to DeNOx stage. Active component in SCR catalyst (vanadium pentoxide, V2O5), here approximated with the available chromium trioxide.
  Uncertainty: uncertainty calculated from uncertainty in average DeNOx input, uncertainty in the share of thermal NOx, uncertainty of nitrogen content in average municipal waste and the uncertainty in nitrogen content in *this* waste.
  properties: wet mass 1 kg, dry mass 1 kg
- hydrogen peroxide, without water, in 50% solution state: 0.00074851 kg; lognormal variance with pedigree 0.091246, pedigree (1,1,4,1,1)
  Auxilliary oxidising agent for filter ash treatment (FLUWA).
  Uncertainty: uncertainty calculated from uncertainty in of transfer coefficients in the incinerator, and the uncertainty of the waste composition of this waste
  properties: heating value, net 7.13 MJ, dry mass 1 kg, wet mass 1 kg
- cationic resin: 3.8969e-6 kg; lognormal variance with pedigree 1.6101, pedigree (1,1,4,1,1)
  Auxilliary input for mercury removal in filter ash treatment (FLUWA).
  Uncertainty: uncertainty calculated from uncertainty in of transfer coefficients in the incinerator, and the uncertainty of the waste composition of this waste
  properties: carbon content, fossil 0.521606, wet mass 1 kg, heating value, net 6.68 MJ, dry mass 0.5 kg, water content 1
- municipal waste incineration facility: 2.5e-10 unit
  Demands per kilogram waste.
- water, decarbonised: 1.8707 kg; lognormal variance with pedigree 0.26708, pedigree (1,1,4,1,1)
  Incinerator process water used in flue gas scrubber stage.
  Uncertainty: uncertainty calculated from uncertainty in average water input, and the uncertainty of the waste composition of this waste
  properties: wet mass 1 kg
- metalliferous hydroxide sludge: -0.0033852 kg; lognormal variance with pedigree 0.070392, pedigree (1,1,4,1,1)
  (same comment as for metalliferous hydroxide sludge)
  production volume 1841.3 kg
  properties: bromine content 0.1161, oxygen content 0.32321, chlorine content 0.17415, sulfur content 0.027969, cadmium content 0.054867, antimony content 0.055615, zinc content 0.14459, carbon content, fossil 0.046248, calcium content 0.033552, wet mass 1 kg, water content 3, dry mass 0.25 kg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
- iron scrap, sorted, pressed: -0.0093819 kg; lognormal variance with pedigree 0.31834, pedigree (1,1,4,1,1)
  (same comment as for iron scrap, sorted, pressed)
  production volume 5103.1 kg
  properties: wet mass 1 kg, price 0.175 EUR2005, dry mass 1 kg
- aluminium scrap, post-consumer, prepared for melting: -0.011016 kg; lognormal variance with pedigree 0.23265, pedigree (1,1,4,1,1)
  (same comment as for aluminium scrap, post-consumer, prepared for melting)
  production volume 5992.2 kg
  properties: price 0.806 EUR2005, wet mass 1 kg, dry mass 1 kg
- copper scrap, sorted, pressed: -0.0052121 kg; lognormal variance with pedigree 0.3031, pedigree (1,1,4,1,1)
  (same comment as for copper scrap, sorted, pressed)
  production volume 2835 kg
  properties: dry mass 1 kg, wet mass 1 kg, price 2.84 EUR2005

## Inputs from nature
- Oxygen [natural resource, in air]: 2.5857 kg; lognormal variance with pedigree 0.0179589, pedigree (1,1,4,1,1)
  Oxygen from ambient air needed to combust and oxidise this waste. Net demand, i.e. without O2 leaving the plant in flue gas uncombusted.
  Uncertainty: uncertainty is calculated from uncertainties in waste composition and transfer coefficients to flue gas and soild residues in incinerator

## Emissions to nature
- Potassium [air, urban air close to ground]: 5.2288e-7 kg; lognormal variance with pedigree 0.97248, pedigree (1,1,4,1,1)
  Emission to air from waste composition and transfer coefficients.
  Uncertainty: uncertainty is calculated from uncertainties in waste composition and transfer coefficients in incinerator
- Chloride [water, surface water]: 0.0053563 kg; lognormal variance with pedigree 0.15707, pedigree (1,1,4,1,1)
  Emissions to water from waste composition and transfer coefficients in incinerator and landfills.
  Uncertainty: uncertainty is calculated from uncertainties in waste composition and transfer coefficients in incinerator and landfills
- Heat, waste [water, surface water]: 5.6521 MJ; lognormal variance with pedigree 0.024258, pedigree (1,1,4,1,1)
  Waste heat generated from heating value of this waste plus any electricity required to process it.
  Uncertainty: uncertainty is calculated from uncertainties in waste composition and uncertainties in energy efficiency and the uncertainty in internal energy demand
- Fluoride [water, ground-, long-term]: 0.00015088 kg; lognormal variance with pedigree 0.51868, pedigree (1,1,4,1,1)
  Long-term emissions from landfilling of incineration residues.
  Uncertainty: uncertainty is calculated from uncertainties in waste composition and transfer coefficients in incinerator and landfills.
- TOC, Total Organic Carbon [water, surface water]: 0.00024953 kg; lognormal variance with pedigree 0.026363, pedigree (1,1,4,1,1)
  (same comment as for Chloride)
- Bromine [water, surface water]: 0.0046165 kg; lognormal variance with pedigree 0.11904, pedigree (1,1,4,1,1)
  (same comment as for Chloride)
- Water [water, surface water]: 0.000634604 m3; lognormal variance with pedigree 1.1417, pedigree (1,1,4,1,1)
  Process water released to surface water.
  Uncertainty: uncertainty calculated from uncertainty in process water input and the uncertainty of fraction to surface water.
- Silver, ion [water, ground-, long-term]: 0.00018757 kg; lognormal variance with pedigree 0.88636, pedigree (1,1,4,1,1)
  (same comment as for Fluoride)
- Sodium [air, urban air close to ground]: 1.036e-6 kg; lognormal variance with pedigree 0.81829, pedigree (1,1,4,1,1)
  (same comment as for Potassium)
- Fluoride [water, surface water]: 6.5818e-5 kg; lognormal variance with pedigree 0.5458, pedigree (1,1,4,1,1)
  (same comment as for Chloride)
- Water [air, urban air close to ground]: 0.00177589 m3; lognormal variance with pedigree 0.7677, pedigree (1,1,4,1,1)
  Water vapour from waste humidity, hydrogen oxidation and part of the process water.
  Uncertainty: Uncertainty calculated from uncertainty in waste composition, process water input and the uncertainty of fraction to air.
- Arsenic, ion [water, ground-, long-term]: 4.1361e-6 kg; lognormal variance with pedigree 1.3278, pedigree (1,1,4,1,1)
  (same comment as for Fluoride)
- BOD5, Biological Oxygen Demand [water, surface water]: 0.00055984 kg; lognormal variance with pedigree 0.026591, pedigree (1,1,4,1,1)
  (same comment as for Chloride)
- Silver, ion [water, surface water]: 6.5125e-9 kg; lognormal variance with pedigree 1.982, pedigree (1,1,4,1,1)
  (same comment as for Chloride)
- Barium [water, ground-, long-term]: 0.00011697 kg; lognormal variance with pedigree 1.26, pedigree (1,1,4,1,1)
  (same comment as for Fluoride)
- COD, Chemical Oxygen Demand [water, surface water]: 0.00057209 kg; lognormal variance with pedigree 0.026382, pedigree (1,1,4,1,1)
  (same comment as for Chloride)
- Arsenic, ion [water, surface water]: 2.5736e-6 kg; lognormal variance with pedigree 1.2164, pedigree (1,1,4,1,1)
  (same comment as for Chloride)
- Carbon monoxide, fossil [air, urban air close to ground]: 2.4614e-5 kg; lognormal variance with pedigree 0.75638, pedigree (1,1,4,1,1)
  Incomplete combustion product emitted to air.
  Uncertainty: uncertainty calculated from uncertainty in average operation emissions, and the uncertainty of the flue gas volume from this waste.
- Cadmium, ion [water, ground-, long-term]: 2.2018e-5 kg; lognormal variance with pedigree 4.9218, pedigree (1,1,4,1,1)
  (same comment as for Fluoride)
- Barium [water, surface water]: 6.7934e-8 kg; lognormal variance with pedigree 0.72732, pedigree (1,1,4,1,1)
  (same comment as for Chloride)
- Carbon dioxide, fossil [air, urban air close to ground]: 2.7426 kg; lognormal variance with pedigree 0.0105169, pedigree (1,1,4,1,1)
  (same comment as for Potassium)
- Cobalt [water, ground-, long-term]: 2.3327e-5 kg; lognormal variance with pedigree 1.1067, pedigree (1,1,4,1,1)
  (same comment as for Fluoride)
- Cadmium, ion [water, surface water]: 2.431e-8 kg; lognormal variance with pedigree 0.93511, pedigree (1,1,4,1,1)
  (same comment as for Chloride)
- Methane, fossil [air, urban air close to ground]: 2.1719e-7 kg; lognormal variance with pedigree 0.077223, pedigree (1,1,4,1,1)
  (same comment as for Carbon monoxide, fossil)
- Copper, ion [water, ground-, long-term]: 0.014864 kg; lognormal variance with pedigree 0.29234, pedigree (1,1,4,1,1)
  (same comment as for Fluoride)
- Cobalt [water, surface water]: 4.3937e-9 kg; lognormal variance with pedigree 1.6648, pedigree (1,1,4,1,1)
  (same comment as for Chloride)
- Sulfur dioxide [air, urban air close to ground]: 4.0933e-6 kg; lognormal variance with pedigree 0.79803, pedigree (1,1,4,1,1)
  (same comment as for Potassium)
- Chromium VI [water, ground-, long-term]: 2.6751e-6 kg; lognormal variance with pedigree 2.949, pedigree (1,1,4,1,1)
  (same comment as for Fluoride)
- Chromium VI [water, surface water]: 7.2381e-7 kg; lognormal variance with pedigree 1.0924, pedigree (1,1,4,1,1)
  (same comment as for Chloride)
- Nitrogen oxides [air, urban air close to ground]: 0.00080113 kg; lognormal variance with pedigree 0.73135, pedigree (1,1,4,1,1)
  Sum of fuel-Nox and thermal-NOx emitted to air after DeNOx stage.
  Uncertainty: uncertainty calculated from uncertainty in average N-emissions and uncertainty in the share of thermal NOx and the uncertainty in nitrogen content in *this* waste.
- Mercury [water, ground-, long-term]: 1.6148e-7 kg; lognormal variance with pedigree 1.6427, pedigree (1,1,4,1,1)
  (same comment as for Fluoride)
- Copper, ion [water, surface water]: 6.7152e-7 kg; lognormal variance with pedigree 1.1475, pedigree (1,1,4,1,1)
  (same comment as for Chloride)
- Ammonia [air, urban air close to ground]: 2.5299e-6 kg; lognormal variance with pedigree 0.73135, pedigree (1,1,4,1,1)
  Nitrogen species emitted to air after DeNOx stage.
  Uncertainty: uncertainty calculated from uncertainty in average N-emissions and uncertainty in the share of thermal NOx and the uncertainty in nitrogen content in *this* waste.
- Manganese [water, ground-, long-term]: 5.2684e-5 kg; lognormal variance with pedigree 1.053, pedigree (1,1,4,1,1)
  (same comment as for Fluoride)
- Mercury [water, surface water]: 4.0914e-9 kg; lognormal variance with pedigree 1.7798, pedigree (1,1,4,1,1)
  (same comment as for Chloride)
- Dinitrogen monoxide [air, urban air close to ground]: 0.00017944 kg; lognormal variance with pedigree 1.1274, pedigree (1,1,4,1,1)
  (same comment as for Ammonia)
- Molybdenum [water, ground-, long-term]: 2.0923e-6 kg; lognormal variance with pedigree 1.4466, pedigree (1,1,4,1,1)
  (same comment as for Fluoride)
- Manganese [water, surface water]: 3.2153e-9 kg; lognormal variance with pedigree 1.918, pedigree (1,1,4,1,1)
  (same comment as for Chloride)
- Cyanide [air, urban air close to ground]: 3.855e-5 kg; lognormal variance with pedigree 1.1274, pedigree (1,1,4,1,1)
  (same comment as for Ammonia)
- Nickel, ion [water, ground-, long-term]: 0.0004635 kg; lognormal variance with pedigree 0.75155, pedigree (1,1,4,1,1)
  (same comment as for Fluoride)
- Molybdenum [water, surface water]: 4.5155e-7 kg; lognormal variance with pedigree 0.92565, pedigree (1,1,4,1,1)
  (same comment as for Chloride)
- Phosphorus [air, urban air close to ground]: 4.5963e-7 kg; lognormal variance with pedigree 0.78174, pedigree (1,1,4,1,1)
  (same comment as for Potassium)
- Lead [water, ground-, long-term]: 0.00047477 kg; lognormal variance with pedigree 0.89096, pedigree (1,1,4,1,1)
  (same comment as for Fluoride)
- Nickel, ion [water, surface water]: 3.1237e-7 kg; lognormal variance with pedigree 1.3897, pedigree (1,1,4,1,1)
  (same comment as for Chloride)
- Hydrogen chloride [air, urban air close to ground]: 3.4886e-6 kg; lognormal variance with pedigree 0.45487, pedigree (1,1,4,1,1)
  (same comment as for Potassium)
- Antimony [water, ground-, long-term]: 0.0017607 kg; lognormal variance with pedigree 0.42198, pedigree (1,1,4,1,1)
  (same comment as for Fluoride)
- Lead [water, surface water]: 1.6034e-8 kg; lognormal variance with pedigree 1.3455, pedigree (1,1,4,1,1)
  (same comment as for Chloride)
- Bromine [air, urban air close to ground]: 2.4851e-6 kg; lognormal variance with pedigree 0.48153, pedigree (1,1,4,1,1)
  (same comment as for Potassium)
- Selenium [water, ground-, long-term]: 1.3603e-6 kg; lognormal variance with pedigree 0.97297, pedigree (1,1,4,1,1)
  (same comment as for Fluoride)
- Antimony [water, surface water]: 0.00085246 kg; lognormal variance with pedigree 0.44901, pedigree (1,1,4,1,1)
  (same comment as for Chloride)
- Hydrogen fluoride [air, urban air close to ground]: 1.5257e-6 kg; lognormal variance with pedigree 0.87262, pedigree (1,1,4,1,1)
  (same comment as for Potassium)
- Tin, ion [water, ground-, long-term]: 0.00013512 kg; lognormal variance with pedigree 0.9707, pedigree (1,1,4,1,1)
  (same comment as for Fluoride)
- Selenium [water, surface water]: 3.5317e-7 kg; lognormal variance with pedigree 1.064, pedigree (1,1,4,1,1)
  (same comment as for Chloride)
- Arsenic [air, urban air close to ground]: 5.3143e-8 kg; lognormal variance with pedigree 1.3391, pedigree (1,1,4,1,1)
  (same comment as for Potassium)
- Vanadium, ion [water, ground-, long-term]: 8.9604e-7 kg; lognormal variance with pedigree 2.2251, pedigree (1,1,4,1,1)
  (same comment as for Fluoride)
- Tin, ion [water, surface water]: 1.662e-7 kg; lognormal variance with pedigree 0.79889, pedigree (1,1,4,1,1)
  (same comment as for Chloride)
- Barium [air, urban air close to ground]: 6.2844e-7 kg; lognormal variance with pedigree 0.921, pedigree (1,1,4,1,1)
  (same comment as for Potassium)
- Zinc, ion [water, ground-, long-term]: 0.00031663 kg; lognormal variance with pedigree 1.5182, pedigree (1,1,4,1,1)
  (same comment as for Fluoride)
- Vanadium, ion [water, surface water]: 3.6655e-9 kg; lognormal variance with pedigree 1.6111, pedigree (1,1,4,1,1)
  (same comment as for Chloride)
- Cadmium [air, urban air close to ground]: 6.9466e-8 kg; lognormal variance with pedigree 0.95041, pedigree (1,1,4,1,1)
  (same comment as for Potassium)
- Beryllium [water, ground-, long-term]: 3.9608e-7 kg; lognormal variance with pedigree 1.6463, pedigree (1,1,4,1,1)
  (same comment as for Fluoride)
- Zinc, ion [water, surface water]: 4.2538e-8 kg; lognormal variance with pedigree 0.6526, pedigree (1,1,4,1,1)
  (same comment as for Chloride)
- Cobalt [air, urban air close to ground]: 4.8494e-8 kg; lognormal variance with pedigree 1.1636, pedigree (1,1,4,1,1)
  (same comment as for Potassium)
- Strontium [water, ground-, long-term]: 7.4621e-5 kg; lognormal variance with pedigree 1.0086, pedigree (1,1,4,1,1)
  (same comment as for Fluoride)
- Beryllium [water, surface water]: 2.6265e-10 kg; lognormal variance with pedigree 2.2876, pedigree (1,1,4,1,1)
  (same comment as for Chloride)
- Chromium [air, urban air close to ground]: 4.1469e-8 kg; lognormal variance with pedigree 1.0387, pedigree (1,1,4,1,1)
  (same comment as for Potassium)
- Titanium, ion [water, ground-, long-term]: 0.0012119 kg; lognormal variance with pedigree 0.73302, pedigree (1,1,4,1,1)
  (same comment as for Fluoride)
- Strontium [water, surface water]: 4.8837e-8 kg; lognormal variance with pedigree 1.6776, pedigree (1,1,4,1,1)
  (same comment as for Chloride)
- Copper [air, urban air close to ground]: 2.6463e-7 kg; lognormal variance with pedigree 0.34048, pedigree (1,1,4,1,1)
  (same comment as for Potassium)
- Thallium [water, ground-, long-term]: 2.5913e-7 kg; lognormal variance with pedigree 1.4449, pedigree (1,1,4,1,1)
  (same comment as for Fluoride)
- Titanium, ion [water, surface water]: 8.2446e-7 kg; lognormal variance with pedigree 0.39385, pedigree (1,1,4,1,1)
  (same comment as for Chloride)
- Mercury [air, urban air close to ground]: 2.1801e-8 kg; lognormal variance with pedigree 1.6203, pedigree (1,1,4,1,1)
  (same comment as for Potassium)
- Silicon [water, ground-, long-term]: 0.00062551 kg; lognormal variance with pedigree 4.9171, pedigree (1,1,4,1,1)
  (same comment as for Fluoride)
- Thallium [water, surface water]: 2.4033e-10 kg; lognormal variance with pedigree 1.7335, pedigree (1,1,4,1,1)
  (same comment as for Chloride)
- Manganese [air, urban air close to ground]: 1.192e-9 kg; lognormal variance with pedigree 1.0975, pedigree (1,1,4,1,1)
  (same comment as for Potassium)
- Iron, ion [water, ground-, long-term]: 0.0042858 kg; lognormal variance with pedigree 0.4328, pedigree (1,1,4,1,1)
  (same comment as for Fluoride)
- Silicon [water, surface water]: 1.6311e-6 kg; lognormal variance with pedigree 0.65269, pedigree (1,1,4,1,1)
  (same comment as for Chloride)
- Molybdenum [air, urban air close to ground]: 3.5707e-9 kg; lognormal variance with pedigree 1.4696, pedigree (1,1,4,1,1)
  (same comment as for Potassium)
- Calcium, ion [water, ground-, long-term]: 0.0027877 kg; lognormal variance with pedigree 0.47319, pedigree (1,1,4,1,1)
  (same comment as for Fluoride)
- Iron, ion [water, surface water]: 8.5306e-8 kg; lognormal variance with pedigree 1.4005, pedigree (1,1,4,1,1)
  (same comment as for Chloride)
- Nickel [air, urban air close to ground]: 5.6931e-7 kg; lognormal variance with pedigree 0.78174, pedigree (1,1,4,1,1)
  (same comment as for Potassium)
- Aluminium [water, ground-, long-term]: 0.022197 kg; lognormal variance with pedigree 0.2314, pedigree (1,1,4,1,1)
  (same comment as for Fluoride)
- Calcium, ion [water, surface water]: 5.192e-5 kg; lognormal variance with pedigree 0.23645, pedigree (1,1,4,1,1)
  (same comment as for Chloride)
- Lead [air, urban air close to ground]: 1.0987e-8 kg; lognormal variance with pedigree 0.79635, pedigree (1,1,4,1,1)
  (same comment as for Potassium)
- Potassium, ion [water, ground-, long-term]: 7.594e-5 kg; lognormal variance with pedigree 0.65109, pedigree (1,1,4,1,1)
  (same comment as for Fluoride)
- Aluminium [water, surface water]: 5.3832e-7 kg; lognormal variance with pedigree 1.0303, pedigree (1,1,4,1,1)
  (same comment as for Chloride)
- Antimony [air, urban air close to ground]: 3.4747e-9 kg; lognormal variance with pedigree 0.55141, pedigree (1,1,4,1,1)
  (same comment as for Potassium)
- Sodium, ion [water, ground-, long-term]: 0.00027238 kg; lognormal variance with pedigree 0.72257, pedigree (1,1,4,1,1)
  (same comment as for Fluoride)
- Potassium, ion [water, surface water]: 2.8699e-5 kg; lognormal variance with pedigree 0.38402, pedigree (1,1,4,1,1)
  (same comment as for Chloride)
- Selenium [air, urban air close to ground]: 2.1147e-8 kg; lognormal variance with pedigree 1.5128, pedigree (1,1,4,1,1)
  (same comment as for Potassium)
- NMVOC, non-methane volatile organic compounds, unspecified origin [air, urban air close to ground]: 6.5896e-7 kg; lognormal variance with pedigree 0.077223, pedigree (1,1,4,1,1)
  (same comment as for Carbon monoxide, fossil)
- Sodium, ion [water, surface water]: 6.7909e-5 kg; lognormal variance with pedigree 0.42689, pedigree (1,1,4,1,1)
  (same comment as for Chloride)
- Tin [air, urban air close to ground]: 1.1995e-10 kg; lognormal variance with pedigree 0.95777, pedigree (1,1,4,1,1)
  (same comment as for Potassium)
- Particulates, < 2.5 um [air, urban air close to ground]: 1.7287e-6 kg; lognormal variance with pedigree 0.37971, pedigree (1,1,4,1,1)
  (same comment as for Carbon monoxide, fossil)
- BOD5, Biological Oxygen Demand [water, ground-, long-term]: 0.0018241 kg; lognormal variance with pedigree 0.020544, pedigree (1,1,4,1,1)
  (same comment as for Fluoride)
- Vanadium [air, urban air close to ground]: 1.4389e-8 kg; lognormal variance with pedigree 1.3682, pedigree (1,1,4,1,1)
  (same comment as for Potassium)
- Particulates, > 2.5 um, and < 10um [air, urban air close to ground]: 8.6872e-9 kg; lognormal variance with pedigree 0.1736, pedigree (1,1,4,1,1)
  (same comment as for Carbon monoxide, fossil)
- Chromium, ion [water, surface water]: 6.1654e-9 kg; lognormal variance with pedigree 0.65333, pedigree (1,1,4,1,1)
  (same comment as for Chloride)
- Zinc [air, urban air close to ground]: 4.6505e-7 kg; lognormal variance with pedigree 0.73803, pedigree (1,1,4,1,1)
  (same comment as for Potassium)
- Dioxins, measured as 2,3,7,8-tetrachlorodibenzo-p-dioxin [air, urban air close to ground]: 2.8957e-14 kg; lognormal variance with pedigree 0.37971, pedigree (1,1,4,1,1)
  (same comment as for Carbon monoxide, fossil)
- COD, Chemical Oxygen Demand [water, ground-, long-term]: 0.0055766 kg; lognormal variance with pedigree 0.020544, pedigree (1,1,4,1,1)
  (same comment as for Fluoride)
- Strontium [air, urban air close to ground]: 7.4701e-9 kg; lognormal variance with pedigree 1.046, pedigree (1,1,4,1,1)
  (same comment as for Potassium)
- Benzene [air, urban air close to ground]: 1.448e-8 kg; lognormal variance with pedigree 0.077223, pedigree (1,1,4,1,1)
  (same comment as for Carbon monoxide, fossil)
- TOC, Total Organic Carbon [water, ground-, long-term]: 0.0022067 kg; lognormal variance with pedigree 0.020544, pedigree (1,1,4,1,1)
  (same comment as for Fluoride)
- Titanium [air, urban air close to ground]: 3.3599e-6 kg; lognormal variance with pedigree 0.50931, pedigree (1,1,4,1,1)
  (same comment as for Potassium)
- Toluene [air, urban air close to ground]: 2.8959e-8 kg; lognormal variance with pedigree 0.077223, pedigree (1,1,4,1,1)
  (same comment as for Carbon monoxide, fossil)
- Sulfate [water, ground-, long-term]: 0.00096149 kg; lognormal variance with pedigree 0.59064, pedigree (1,1,4,1,1)
  (same comment as for Fluoride)
- Thallium [air, urban air close to ground]: 3.3763e-10 kg; lognormal variance with pedigree 1.7339, pedigree (1,1,4,1,1)
  (same comment as for Potassium)
- Benzene, pentachloro- [air, urban air close to ground]: 7.6501e-11 kg; lognormal variance with pedigree 0.077223, pedigree (1,1,4,1,1)
  (same comment as for Carbon monoxide, fossil)
- DOC, Dissolved Organic Carbon [water, ground-, long-term]: 0.0022067 kg; lognormal variance with pedigree 0.020544, pedigree (1,1,4,1,1)
  (same comment as for Fluoride)
- Silicon [air, urban air close to ground]: 4.1774e-9 kg; lognormal variance with pedigree 0.54436, pedigree (1,1,4,1,1)
  (same comment as for Potassium)
- DOC, Dissolved Organic Carbon [water, surface water]: 0.00024953 kg; lognormal variance with pedigree 0.026363, pedigree (1,1,4,1,1)
  (same comment as for Chloride)
- Benzene, hexachloro- [air, urban air close to ground]: 3.0276e-11 kg; lognormal variance with pedigree 0.077223, pedigree (1,1,4,1,1)
  (same comment as for Carbon monoxide, fossil)
- Nitrate [water, ground-, long-term]: 0.00043151 kg; lognormal variance with pedigree 0.36283, pedigree (1,1,4,1,1)
  (same comment as for Fluoride)
- Iron [air, urban air close to ground]: 2.5582e-9 kg; lognormal variance with pedigree 0.3998, pedigree (1,1,4,1,1)
  (same comment as for Potassium)
- Sulfate [water, surface water]: 0.00016142 kg; lognormal variance with pedigree 0.41345, pedigree (1,1,4,1,1)
  (same comment as for Chloride)
- Phenol, pentachloro- [air, urban air close to ground]: 6.3057e-12 kg; lognormal variance with pedigree 0.077223, pedigree (1,1,4,1,1)
  (same comment as for Carbon monoxide, fossil)
- Phosphate [water, ground-, long-term]: 4.132e-5 kg; lognormal variance with pedigree 5.1505, pedigree (1,1,4,1,1)
  (same comment as for Fluoride)
- Calcium [air, urban air close to ground]: 2.2154e-5 kg; lognormal variance with pedigree 0.5303, pedigree (1,1,4,1,1)
  (same comment as for Potassium)
- Nitrate [water, surface water]: 0.00015457 kg; lognormal variance with pedigree 0.24028, pedigree (1,1,4,1,1)
  (same comment as for Chloride)
- Benzo(a)pyrene [air, urban air close to ground]: 3.2222e-13 kg; lognormal variance with pedigree 0.37971, pedigree (1,1,4,1,1)
  (same comment as for Carbon monoxide, fossil)
- Chloride [water, ground-, long-term]: 0.00079588 kg; lognormal variance with pedigree 0.40169, pedigree (1,1,4,1,1)
  (same comment as for Fluoride)
- Aluminium [air, urban air close to ground]: 1.7675e-9 kg; lognormal variance with pedigree 0.32117, pedigree (1,1,4,1,1)
  (same comment as for Potassium)
- Phosphate [water, surface water]: 6.7451e-7 kg; lognormal variance with pedigree 0.37124, pedigree (1,1,4,1,1)
  (same comment as for Chloride)
- Heat, waste [air, urban air close to ground]: 24.573 MJ; lognormal variance with pedigree 0.024258, pedigree (1,1,4,1,1)
  (same comment as for Heat, waste)
- Bromine [water, ground-, long-term]: 0.00025791 kg; lognormal variance with pedigree 0.46954, pedigree (1,1,4,1,1)
  (same comment as for Fluoride)

## Extrapolations
This dataset has been extrapolated from year 2012 to the year of the calculation (2021). The uncertainty has been adjusted accordingly.
