# bitumen adhesive compound production, hot

Dataset: EcoSpold 2, unit process
Geography: RER
Time period: 1994-01-01 to 2021-12-31
Technology level: current
Classification: ISIC rev.4 ecoinvent: 2399:Manufacture of other non-metallic mineral products n.e.c.
Classification: EcoSpold01Categories: plastics/others
Synonyms: hot bonding compound, Heisskleber
Tags: ConvertedDataset
Scenario: Business-as-Usual
System model: Allocation, cut-off by classification
Generated by: Martin Lehmann
Published in: Kellenberger D. 2007
Database: ecoinvent
isCopyrightProtected: true
accessRestrictedTo: 1

## General comment
The dataset is applicable in the construction building sector. Bitumen adhesive compound is used to protect roads and roofs against water intrusion.
[This dataset was already contained in the ecoinvent database version 2. It was not individually updated during the transfer to ecoinvent version 3. Life Cycle Impact Assessment results may still have changed, as they are affected by changes in the supply chain, i.e. in other datasets. This dataset was generated following the ecoinvent quality guidelines for version 2. It may have been subject to central changes described in the ecoinvent version 3 change report (http://www.ecoinvent.org/database/ecoinvent-version-3/reports-of-changes/), and the results of the central updates were reviewed extensively. The changes added e.g. consistent water flows and other information throughout the database. The documentation of this dataset can be found in the ecoinvent reports of version 2, which are still available via the ecoinvent website. The change report linked above covers all central changes that were made during the conversion process.]

## Included activities end
The dataset describes the production of hot bitumen adhesive compound. Included sub-processes are the heating of the bitumen compound, the infrastructure, the transport by road and rail as well as the disposal of the compound cuttings in a municipal incineration.

## Geography
The data of this dataset is extracted from literature and producer information. Some own calculations (e.g. energy input, waste heat) were made.

## Technology
The technology involved is basically heating up the bitumen with a natural gas burner.

## Reference product
- bitumen adhesive compound, hot: 1 kg; CPC 37940: Bituminous mixtures based on natural and artificial stone materials and bitumen, natural asphalt or related su[…]; By-product classification allocatable product
  EcoSpold01Location=RER
  production volume 1.32237 kg
    This is a placeholder value that does not reflect real-world production volumes. This dataset does not currently require a real-world production volume to work in the database framework, and no actual data were collected yet. This has no negative effect on the results of the ecoinvent database. The placeholder value of this activity was scaled according to the nominal GDP of 2005 (source: United Nations, http://data.un.org/Glossary.aspx?q=GDP+%28current+US%24%29, accessed 20130726) to reflect an appropriate share of the global production volume, which is also a placeholder value.
  property price 0.26914 EUR2005
    Calculated based on inputs: The price of the product has been calculated as a sum of the values of the material and energy inputs for this product. This value is therefore a rough estimation. It may underestimate the real price since there are additional expenses when producing any product. These expences can include for example labour costs, treatment of waste materials and profit for the producer. Please consider carefully whether this level of data quality is acceptable for your application.
  property carbon content, fossil 0.83
    The hot bitumen adhesive compound is only composed of bitumen as raw material (ecoinvent v2.2 report 7_part XXIII). C content of bitumen is considered 83% (Tab 3.19, ecoinvent v2.2 report 6_IV)
  property heating value, net 25.15 MJ
    LHV is calculated based on the Carbon content of the product. More details can be found on the respective documentation.
  property carbon content 0.83
    carbon content on a dry matter basis (reserved; not for manual entry)
  properties: water content 0, carbon content, non-fossil 0, water in wet mass 0 kg, wet mass 1 kg, dry mass 1 kg, carbon allocation 0.83 kg

## Inputs from technosphere
- waste bitumen sheet: -0.0101 kg; lognormal variance with pedigree 0.0707, pedigree (2,4,5,3,3)
  EcoSpold01Location=CH
  production volume 0.0101 kg
    Calculated from the production volume of bitumen adhesive compound, hot in proportion to the respective output amounts.
  properties: heating value, net 40.2 MJ, carbon content, fossil 0.643207, water content 0.0152284, wet mass 1 kg, dry mass 0.985 kg
  note on heating value, net: Literature value, Source: IPCC 2006, 2006 IPCC Guidelines for National Greenhouse Gas Inventories, Prepared by the National Greenhouse Gas Inventories Programme, Eggleston H.S., Buendia L., Miwa K., Ngara T. and Tanabe K. (eds). Published: IGES, Japan
  note on carbon content, fossil: The bitumen sheet is made of 63% bitumen, 24% surface spread and filler (assumed to be pure SiO2), 6% carrier fleece (assumed to be PE) and 7% elastomer (assumed to be PS) (ecoinvent v2.2 report 13_I, pg 40). C content of bitumen, PE and PS from Tab A.6 and A.1 (ecoinvent v2.2 report 13_I, pg 40), respectively. C content of waste also given in the dataset
- chemical factory, organics: 4e-11 unit; lognormal variance with pedigree 0.3527, pedigree (2,4,5,3,1)
  EcoSpold01Location=RER
  activityLink introduced to establish a direct link to the corresponding regional supply of this product
- heat, district or industrial, natural gas: 1.197 MJ; lognormal variance with pedigree 0.0513, pedigree (2,3,5,3,1)
  EcoSpold01Location=RER
  properties: heating value, net 1 MJ
- pitch: 0 kg; pedigree (1,1,1,1,1)
  EcoSpold01Location=RER
  properties: heating value, net 28 MJ, carbon content, fossil 0.83, wet mass 1 kg, dry mass 1 kg
- pitch: 1.0034, 0.00659729 kg (2 entries); lognormal variance with pedigree 0.0527, pedigree (2,4,5,3,1)
  EcoSpold01Location=RER

## Emissions to nature
- Benzo(a)pyrene [air, unspecified]: 6.92e-9 kg; lognormal variance with pedigree 0.69, pedigree (1,1,5,1,1)
  estimation
- NMVOC, non-methane volatile organic compounds, unspecified origin [air, unspecified]: 0.0015 kg; lognormal variance with pedigree 0.1727, pedigree (2,4,5,3,1)

## Sampling procedure
Literature, database

## Extrapolations
This dataset has been extrapolated from year 2000 to the year of the calculation (2021). The uncertainty has been adjusted accordingly.

## Review by Rolf Frischknecht 2007-11-07
passed
