# chromite ore concentrate production

Dataset: EcoSpold 2, unit process
Geography: KZ
Time period: 1994-01-01 to 2021-12-31
Technology level: current
Classification: EcoSpold01Categories: metals/extraction
Classification: ISIC rev.4 ecoinvent: 0729:Mining of other non-ferrous metal ores
Scenario: Business-as-Usual
System model: Allocation, cut-off by classification
Generated by: Eleonora Crenna
Published in: Althaus H.-J. 2000
Database: ecoinvent
isCopyrightProtected: true
accessRestrictedTo: 1

## General comment
This dataset describes the production of 1 kg of chromite ore concentrate in Kazakhstan. It is designed for the use of chromite as intermediary product in the production of ferrochromium, dichromate and refractories. This data set is adapted from the existing global dataset of chromite ore concentrate production, in which process data is taken mainly from a material flow analysis for the consumption of chromium compounds in Germany. Electricity consumption is estimated from the feasibility study made in 2006 for the Voskhod mine in Kazakhstan using sublevel caving (SLC) and selective mining of metallurgical grade chromite ore (Bleiwas, 2011).
Reference:
Bleiwas, D. I. (2011). Estimates of electricity requirements for the recovery of mineral commodities, with examples applied to sub-Saharan Africa. US Department of the Interior, US Geological Survey.
[This dataset is meant to replace the following datasets:]

## Included activities start
Mining process starting from chromite ore, in ground.

## Included activities end
The activity ends with the gravity concentration of the material, at the beneficiation facility.

The dataset includes the crushing, grounding and screening of mined ore, the production infrastructure for mining and beneficiation,and the disposal of overburden and tailings.

## Geography
This dataset relates to the Kazakhstan situation and it is adapted from the existing global dataset.

## Technology
Mining is done both open pit and underground, followed by a benefication of the ore trough classification. Overburden and tailings are disposed near the mining site.
MINING:
Chromite ores are usually mined underground. An estimated share of 93% underground mining has been reported for activities in the mine production in Donskoy mine operation site (leader in chromite ore production in Kazakhstan), while the remaining 7% is open pit (Kaplunov et al. 2018).
Emissions and waste: The major emissions are due to mineral born pollutants in the effluents. Open cut mining generates large quantities of dust, which contains elevated contents of metals. Rain percolates through overburden and leads to metal emissions to groundwater. Overburden is deposed close to the mine.
BENEFICIATION:
After mining, the ore is first crushed in several stages with jaw and / or cone crushers, and then subsequently ground with rod and or ball mills and finally screened for classification. In a second step the classified material is subjected to gravity concentration to separate the metal-bearing particles from the unwanted minerals. For this drum separators and de-watering screens for lumps are used and cone separators and a high-gradient magnetic separator for fine material. No flotation is done. The separated gangue is disposed in tailings ponds, the concentrated ore is fed to the metallurgy, which is on-site. Chromite yields vary in a range from 65% to 85%. There's no treatment of wastewater.
Emissions and waste: Ore handling and processing produce large amounts of dust, containing PM10 and several metals from the ore itself. Tailings are deposed as piles and in ponds. Since the tailings are not sulphidic, no acid rock drainage (ARD) occurs. In the tailings material the most significant contents are Cr and Ni, which occur as insoluble compounds and are considered not to cause any negative effects.
References:
Adelhardt W. and Antrekowitsch H. (1998) Stoffmengenflüsse und Energie-bedarf bei der Gewinnung ausgewählter mineralischer Rohstoffe; Teilstudie Chrom. In: Geologisches Jahrbuch, Vol. Sonderhefte SH 3. Bundesanstalt für Geowissenschaften und Rohstoffe, Hannover. ISBN 3-510-95831-4.
IPPC (2002) Integrated Pollution Prevention and Control (IPPC); Draft Refer-ence Document on Best Available Techniques for Management of Tailings and Waste-Rock in Mining Activities. European Commission. Retrieved at 01.03.2003 from http://www.jrc.es/pub/english.cgi/0/733169
Kaplunov, D., Bekbergenov, D., & Djangulova, G. (2018). Particularities of solving the problem of sustainable development of chromite underground mining at deep horizons by means of combined geotechnology. In E3S Web of Conferences (Vol. 56, p. 01015). EDP Sciences.

## Time period
Data are considered valid from 1994 to 2017 (year of the production volume)

## Parameters
- fraction, process water, to air: 0.15 dimensionless; name fraction_PW_to_air; lognormal variance with pedigree 0.092025, pedigree (4,4,3,2,4)
  Literature value. In case when no industry/process specific data are available, default evaporation fraction value is used. This value is 15% and is based on literature (Statistics Canada, 2007 & Shaffer, K.H., 2008, Consumptive water use in the Great Lakes Basin, USGS & Shiklomanov, 2003, World Water Resources at the Beginning of the 21st Century) and has been approved by an expert.

## Reference product
- chromite ore concentrate: 1 kg; name RefProd; source Adelhardt W. 1998; By-product classification allocatable product; CPC 14290: Other non-ferrous metal ores and concentrates (other than uranium or thorium ores and concentrates)
  EcoSpold01Location=GLO
  The world-wide average calculated chromite (25.5% Cr) content of raw ores is 37.3%. Chromite ore rarely contains more than 50 % Cr2O3; other minerals such as SiO2 can also be present.Chromite is a spinel FeO · Cr2O3. It contains 44.9% Chromium.
  Uses: Chromite ore is the central intermediary product in the chromium industry. From it the three main product groups are made: ferrochromium, chromium chemicals and refractories. Chromite is used directly in the refractory industry to make bricks, mortar, and ramming and gunning mixes. Chromite enhances thermal shock and slag resistance, volume stability, strength and is used mainly in the ferrous and non-ferrous industry, cement industry and glass manufacturing. In foundries for certain applications chromite is used as moulding sand, for which chromite sand with more specific properties is applied.
  production volume 6.6888e9 kg; name PV_RP; = 6688800*1000
    According to USGS (2021), 6'688'800 metric tons of chromite ore were produced in Kazakhstan in 2018.
    Reference:
    USGS (2021). Chromium Statistics and Information, Advance Data Release of the 2019 Annual Tables. https://prd-wret.s3.us-west-2.amazonaws.com/assets/palladium/production/atoms/files/myb1-2019-chrom-adv.xlsx
  property price 0.16 EUR2005
    Calculated value based on data from United Nations Commodity Trade Statistics Database (comtrade.un.org). UN comtrade category: 261000 Chromium ores and concentrates. Year 2005. Using exchange rate of 1EURO = 1.209 USD. Average of price of import into 5 main markets (EU, US, JP, IN and CN).
  property iron content 0.249494; name RefProd_Fe_content; = 55.845/223.833
    iron content on a dry matter basis. Calculated value based on stoichiometry. Fe MW= 55.845 g/mol; FeOCr2O3 MW= 223.833 g/mol
  property carbon content, non-fossil 0
    Chromite [53293-42-8] is a spinel FeO · Cr2O3. In nature it is a mixture described by the formula (Fe2+, Mg)O · (Cr, Al, Fe3+)2O3 (ecoinvent v2.2 report 10-part VI)
  property chromium content 0.307; name chromium_content_in_chromite
    chromium content on a dry matter basis. See comment to "chromite ore concentrate" exchange.
  property carbon content, fossil 0
    (same comment as for chromite ore concentrate)
  property carbon content 0
    carbon content on a dry matter basis (reserved; not for manual entry)
  properties: wet mass 1 kg, water content 0, water in wet mass 0 kg, dry mass 1 kg, carbon allocation 0 kg

## Inputs from technosphere
- non-sulfidic tailing, off-site: -0.486 kg; name tailing_amount; source Adelhardt W. 1998; lognormal variance with pedigree 0.0101, pedigree (3,2,4,1,1)
  Estimation: No tailings are refilled.
  EcoSpold01Location=GLO
  Uncertainty: reported values
  production volume 3.25076e9 kg; = PV_RP*tailing_amount/RefProd
    Calculated from the production volume of chromite ore concentrate in proportion to the respective output amounts.
  property iron content 0.70632; name tailing_amount_Fe_content; = ((RefProd*RefProd_Fe_content-iron_input*iron_input)/DM_tailing)/0.486
  property dry mass 0.7 kg; name DM_tailing
  property chromium content 0.62537; name tailing_amount_Cr_content; = ((RefProd*chromium_content_in_chromite-chromium_input* chromium_input)/DM_tailing)/0.486
  property price 0 EUR2005; name tailing_amount_price_EUR2005
  properties: water content 0.428571, wet mass 1 kg
  note on chromium content: chromium content on a dry matter basis. Calculated value to obtain balance, based on the chromium content of ores and chromite. 0.486 kg = tailing amount
- mine infrastructure, open cast, non-ferrous metal: 3.76344e-12 unit; = (1/(300000*1000*62))*0.07; lognormal variance with pedigree 0.4, pedigree (5,5,3,1,1)
  EcoSpold01Location=GLO
  Estimation based on literature. Donskoy mine operation site is the leader in chromite ore production in Kazakhstan. The mine has a lifetime of 62 years (open in 1997, it is estimated to provide resources until 2059 under current extraction practice - Kazchrome report 2019). Production at the mine was estimated to be 300,000 t/yr of ore (USGS 2017). 93% of ore deposit is mined underground, while the remaining is open pit
  Uncertainty: rough estimate
- non-sulfidic overburden, off-site: -1.77 kg; name overburden_amount; source Adelhardt W. 1998; lognormal variance with pedigree 0.0101, pedigree (3,2,4,1,1)
  EcoSpold01Location=GLO
  Estimation: The overburden is disposed in piles near the mine. No overburden is refilled.
  production volume 1.18392e10 kg; = PV_RP*overburden_amount/RefProd
    (same comment as for non-sulfidic tailing, off-site)
  property price 0 EUR2005; name overburden_amount_price_EUR2005
  properties: wet mass 1 kg, dry mass 1 kg
- electricity, medium voltage: 0.048 kWh; lognormal variance with pedigree 0.0087, pedigree (2,2,4,1,1)
  EcoSpold01Location=UCTE
  Estimation. Original value of 0.048 kWh/kg chromite ore is taken from Bleiwas 2011.
  Reference:
  Bleiwas, D. I. (2011). Estimates of electricity requirements for the recovery of mineral commodities, with examples applied to sub-Saharan Africa. US Department of the Interior, US Geological Survey.
  Hilbrans H. and Hinrichs W. (1999) Stoffmengenflüsse und Energiebedarf bei der Gewinnung ausgewählter mineralischer Rohstoffe; Teilstudie Nickel. In: Geologisches Jahrbuch, Vol. Sonderhefte SH 7. Bundesanstalt für Geowissenschaften und Rohstoffe, Hannover. ISBN 3-510-95829-2.
- conveyor belt: 6.42e-8 m; lognormal variance with pedigree 0.4, pedigree (5,5,3,1,1)
  Estimation from dataset author.
  Modelled, based on “ISIC 0729” - pdf-document on the dedicated talk page of ecoinvent (www.ecoinvent.org/documentation).
  See part Regarding “chromite ore concentrate production, GLO 2003” dataset.
  EcoSpold01Location=RER
  Uncertainty: rough estimate
- steel, chromium steel 18/8, hot rolled: 0.000446 kg; source IPPC 2002; lognormal variance with pedigree 0.0133, pedigree (2,3,3,3,1)
  Estimation: The steel input (abrasion) for milling is documented for a single Finnish chromite mine (Kula) and amounts to 300 g / t ground ore.
  Proxy: The mill (jaws, balls, etc.) consists of special austenitic manganese steel of Hadfield grade, which is approximated with chromium steel in the inventory.
  EcoSpold01Location=RER
  properties: dry mass 1 kg, carbon content, fossil 0.0008, wet mass 1 kg
  note on carbon content, fossil: Stainless steel model is the grade 304 steel (18/8 stainless, 18% chromium 8% nickel; max. 0.08% C)
- mine infrastructure, underground, non-ferrous metal: 5e-11 unit; = (1/(300000*1000*62))*0.93; lognormal variance with pedigree 0.4, pedigree (5,5,3,1,1)
  (same comment as for mine infrastructure, open cast, non-ferrous metal)
- aluminium hydroxide factory: 3.12e-15 unit; lognormal variance with pedigree 0.4, pedigree (5,5,3,1,1)
  EcoSpold01Location=RER
  Estimation from dataset author.
  Proxy: "aluminium hydroxide factory" is used as a proxy for the infrastructure for chromite ore beneficiation.
  Uncertainty: rough estimate
- diesel, burned in building machine: 0.0807 MJ; source Adelhardt W. 1998; lognormal variance with pedigree 0.0087, pedigree (2,2,4,1,1)
  Estimation: Diesel consumption for functioning of mobile equipment used for exploration like drilling machines, scoop trams and underground trucks.
  EcoSpold01Location=GLO
  properties: heating value, net 1 MJ
- blasting: 0.00149 kg; source Adelhardt W. 1998; lognormal variance with pedigree 0.0087, pedigree (2,2,4,1,1)
  EcoSpold01Location=RER
  Literature value.

## Inputs from nature
- Gangue, in ground [natural resource, in ground]: 2.85306 kg; = RefProd+(tailing_amount*-1)+(overburden_amount*-1)-chromium_input-iron_input; lognormal variance with pedigree 0.0107, pedigree (3,2,4,1,1)
  Calculated to obtain mass balance considering 1.48 kg of ore and 1.74 kg of overburden per kg of chromite. See comment to "Chromium, in ground" exchange
- Iron, in ground [natural resource, in ground]: 0.0959375 kg; name iron_input; = chromium_input/3.2; lognormal variance with pedigree 0.009325, pedigree (2,2,4,2,1)
  Calculated based on the ratio Cr/Fe in chromite, according to Table 3.1, Part IV - Chromium in Classen et al. (2009). The ratio from Zimbabwe chromite is used as a proxy for Kazakhstan due to the similarity in chromite composition.
  Reference:
  Classen, M., Althaus, H.-J., Blaser, S., Tuchschmid, M., Jungbluth, N., Doka, G., Faist Emmenegger, M., Scharnhorst, W. (2009). Life Cycle Inventories of Metals. Final report ecoinvent data v2.1, No 10. EMPA Dübendorf, Swiss Centre for Life Cycle Inventories, Dübendorf, CH, Online-Version under: www.ecoinvent.ch
- Transformation, to mineral extraction site [natural resource, land]: 1.75e-7 m2; = 0.0025/1000*0.07; source Martens P. N. 2002; lognormal variance with pedigree 0.1301, pedigree (3,2,4,1,1)
  Estimation: No direct land use for underground mining (93%) is inventoried. Land use for open pit mining (7%) per tonne of ore is assessed with 0.0025m2/t.
  Uncertainty: calculation based on reported value
- Water, river [natural resource, in water]: 0.00269 m3; name water_river_input; source Adelhardt W. 1998; lognormal variance with pedigree 0.0087, pedigree (2,2,4,1,1)
  Estimation: In the beneficiation step, water is inventoried as originating from river without pumping activities.
- Occupation, mineral extraction site [natural resource, land]: 5.25e-6 m2*year; = 0.0025/1000*30*0.07; source Martens P. N. 2002; lognormal variance with pedigree 0.0501, pedigree (3,2,4,1,1)
  Estimation: No direct land use for underground mining (93%) is inventoried. Land use for open pit mining (7%) per tonne of ore is assessed with 0.0025m2/t. A occupation of 30 years is assumed.
  Uncertainty: calculation based on reported value
- Chromium, in ground [natural resource, in ground]: 0.307 kg; name chromium_input; source Adelhardt W. 1998; lognormal variance with pedigree 0.0087, pedigree (2,2,4,1,1)
  25.5% Cr in chromite; 11.6% in ore; Estimation: The world average chromium content after beneficiation amounts to 30.7% (44.9% Cr2O3), a yield from mining and beneficiation of 81% can be calculated. 1.48 kg of ore and 1.77 kg of overburden are extracted per kg of chromite.
  property chromium content 1; name chromium_content_in_ground
- Transformation, from unspecified [natural resource, land]: 1.75e-7 m2; = 0.0025/1000*0.07; source Martens P. N. 2002; lognormal variance with pedigree 0.1301, pedigree (3,2,4,1,1)
  (same comment as for Transformation, to mineral extraction site)

## Emissions to nature
- COD, Chemical Oxygen Demand [water, surface water]: 1.8e-7 kg; source Adelhardt W. 1998; lognormal variance with pedigree 1.332, pedigree (1,1,3,1,1)
  Modelled. Details are reported in Classen M., Althaus H.-J., Blaser S., Doka G., Jungbluth N. and Tuchschmid M. (2009) Life Cycle Inventories of Metals. Final report ecoinvent data v2.1 No.10. Swiss Centre for Life Cycle Inventories, Dübendorf, CH.
- Chromium [air, non-urban air or from high stacks]: 5.36e-8 kg; source NPI 2001; lognormal variance with pedigree 0.7321, pedigree (5,2,3,1,1)
  (same comment as for COD, Chemical Oxygen Demand)
- Particulates, > 2.5 um, and < 10um [air, non-urban air or from high stacks]: 7.41e-8 kg; source NPI 2001; lognormal variance with pedigree 0.2021, pedigree (5,2,3,1,1)
  (same comment as for COD, Chemical Oxygen Demand)
- Silicon [air, non-urban air or from high stacks]: 5.63e-9 kg; source NPI 2001; lognormal variance with pedigree 0.1221, pedigree (5,2,3,1,1)
  (same comment as for COD, Chemical Oxygen Demand)
- Water [air, unspecified]: 0.0004035 m3; name water_to_air_unspecified; = (water_river_input*fraction_PW_to_air); lognormal variance with pedigree 0.0427, pedigree (2,2,3,1,1)
  Calculated value based on literature values and expert opinion. See comments in the parametres' comment field.
  property fraction, origin: salt water 0; name fraction_origin_salt_water
  property fraction, origin: unspecified 0; name fraction_origin_unspecified
  property fraction, origin: fresh water 1; name fraction_origin_fresh_water
- Particulates, < 2.5 um [air, non-urban air or from high stacks]: 8.24e-9 kg; source NPI 2001; lognormal variance with pedigree 0.3821, pedigree (5,2,3,1,1)
  (same comment as for COD, Chemical Oxygen Demand)
- Water [water, unspecified]: 0.0022865 m3; name water_to_water_unspecified; = water_river_input*(1-fraction_PW_to_air); lognormal variance with pedigree 0.0427, pedigree (2,2,3,1,1)
  (same comment as for Water)
  property water in wet mass 1000 kg; name WWM
  property fraction, origin: unspecified 0; name fraction_origin_unspecified_Ww
  property fraction, origin: salt water 0; name fraction_origin_salt_water_Ww
  property carbon content, fossil 0; name C_content_fossil
  property carbon content, non-fossil 0; name C_content_non_fossil
  property wet mass 1000 kg; name WM
  property fraction, origin: fresh water 1; name fraction_origin_fresh_water_Ww
  property dry mass 0 kg; name DM
- TOC, Total Organic Carbon [water, surface water]: 7.04e-8 kg; source Weidema B. P. 2011; lognormal variance with pedigree 1.332, pedigree (1,1,3,1,1)
  Calculated value: Values for TOC are calculated by approximating the unknown organic matter with the simplified formula for organic matter C6H12O6. This gives 58.7 mg / l TOC and DOC respectively.
- DOC, Dissolved Organic Carbon [water, surface water]: 7.04e-8 kg; source Weidema B. P. 2011; lognormal variance with pedigree 1.332, pedigree (1,1,3,1,1)
  (same comment as for TOC, Total Organic Carbon)
- Iron [air, non-urban air or from high stacks]: 8.13e-6 kg; source NPI 2001; lognormal variance with pedigree 0.1221, pedigree (5,2,3,1,1)
  (same comment as for COD, Chemical Oxygen Demand)
- Oils, unspecified [water, surface water]: 1.2e-8 kg; source Adelhardt W. 1998; lognormal variance with pedigree 1.332, pedigree (1,1,3,1,1)
  (same comment as for COD, Chemical Oxygen Demand)
- Dissolved solids [water, surface water]: 6e-8 kg; source Adelhardt W. 1998; lognormal variance with pedigree 1.332, pedigree (1,1,3,1,1)
  (same comment as for COD, Chemical Oxygen Demand)
- Aluminium [air, non-urban air or from high stacks]: 8.57e-9 kg; source NPI 2001; lognormal variance with pedigree 0.1221, pedigree (5,2,3,1,1)
  (same comment as for COD, Chemical Oxygen Demand)
- BOD5, Biological Oxygen Demand [water, surface water]: 1.2e-7 kg; source Zimmermann P. 1996; lognormal variance with pedigree 1.332, pedigree (1,1,3,1,1)
  Estimation: 150 mg / l COD is assumed to amount to 150% of BOD.
- Chromium, ion [water, surface water]: 5.93e-11 kg; source Adelhardt W. 1998; lognormal variance with pedigree 1.332, pedigree (1,1,3,1,1)
  (same comment as for COD, Chemical Oxygen Demand)
- Magnesium [air, non-urban air or from high stacks]: 1.74e-8 kg; source NPI 2001; lognormal variance with pedigree 0.1221, pedigree (5,2,3,1,1)
  (same comment as for COD, Chemical Oxygen Demand)
- Particulates, > 10 um [air, non-urban air or from high stacks]: 8.52e-8 kg; source NPI 2001; lognormal variance with pedigree 0.1221, pedigree (5,2,3,1,1)
  (same comment as for COD, Chemical Oxygen Demand)
- Iron, ion [water, surface water]: 8.25e-9 kg; source Adelhardt W. 1998; lognormal variance with pedigree 1.332, pedigree (1,1,3,1,1)
  (same comment as for COD, Chemical Oxygen Demand)
- Calcium, ion [water, surface water]: 1.43e-7 kg; source Adelhardt W. 1998; lognormal variance with pedigree 1.332, pedigree (1,1,3,1,1)
  (same comment as for COD, Chemical Oxygen Demand)

## Sampling procedure
Data come from "chromite ore concentrate production, GLO" data set, except for the information on electricity consumption and mine infrastructure which are taken from Bleiwas 2011 and Kazchrome 2019/USGS 2017 respectively. The amount of iron in ground and gangue were added to the original dataset for the sake of mass balance.

Reference:
Bleiwas, D. I. (2011). Estimates of electricity requirements for the recovery of mineral commodities, with examples applied to sub-Saharan Africa. US Department of the Interior, US Geological Survey.
Hilbrans H. and Hinrichs W. (1999) Stoffmengenflüsse und Energiebedarf bei der Gewinnung ausgewählter mineralischer Rohstoffe; Teilstudie Nickel. In: Geologisches Jahrbuch, Vol. Sonderhefte SH 7. Bundesanstalt für Geowissenschaften und Rohstoffe, Hannover. ISBN 3-510-95829-2.
Kazchrome, 2019. Annual report 2018. Available at: https://www-aix-kz.s3.eu-central-1.amazonaws.com/uploads/2019/07/Kazchrome_AR2018_28062019-KFO.pdf (accessed March 2021)
USGS 2017. Minerals Yearbook - Chromium.

## Extrapolations
This dataset has been extrapolated from year 2017 to the year of the calculation (2021). The uncertainty has been adjusted accordingly.

## Review by Carl Vadenbo 2021-04-29
Accepted on 2021-06-29 after issues raised during cc-review had been addressed satisfactorily.
