# evaporation of natural gas

Dataset: EcoSpold 2, unit process
Geography: RER
Time period: 2001-01-01 to 2021-12-31
Technology level: current
Classification: EcoSpold01Categories: natural gas/production
Classification: ISIC rev.4 ecoinvent: 3520:Manufacture of gas; distribution of gaseous fuels through mains
Synonyms: LNG
Scenario: Business-as-Usual
System model: Allocation, cut-off by classification
Share of production covered: 100 %
Generated by: Mireille Faist Emmenegger (obsolete)
Published in: Faist Emmenegger, M. 2007
Database: ecoinvent
isCopyrightProtected: true
accessRestrictedTo: 1

## General comment
This dataset describes the evaporation of liquefied gas in a evaporation plant.
This dataset takes into account the transport of natural gas (expressed in tkm) on a freight ship between Algeria and the evaporation plant.
The process is normalized on the gaseous form of gas.

## Included activities start
The activity starts with the transport of natural gas, liquefied from DZ.

## Included activities end
The activity ends with the production of natural gas, high pressure.

## Geography
The data describes a gasification plant in Italy
In the case of the import process, data stems of reference book published in 1999 and is not specific for a country.
An average distance for transoceanic freight ship of 1800 km is estimated, using maps of LNG shipping routes.

## Technology
The plant was constructed between 1967 and 1970, and was modernized 1990-1996
For the import of liquefied gas, this new edition of Cerbe's reference book on natural gas describes actual technology

## Parameters
- fraction, process water, to air: 0.15 dimensionless; name fraction_PW_to_air; lognormal variance with pedigree 0.092025, pedigree (4,4,3,2,4)
  Literature value. In case when no industry/process specific data are available, default evaporation fraction value is used. This value is 15% and is based on literature (Statistics Canada, 2007 & Shaffer, K.H., 2008, Consumptive water use in the Great Lakes Basin, USGS & Shiklomanov, 2003, World Water Resources at the Beginning of the 21st Century) and has been approved by an expert.

## Reference product
- natural gas, high pressure: 1 m3; CPC 12020: Natural gas, liquefied or in the gaseous state; By-product classification allocatable product; CAS 14493-06-2
  production volume 5.15e10 m3
    This is the total amount of imports of liquified natural gas (LNG) to Europe & Eurasia in 2013 according to source: BP Statistical Review, June 2014, retrieved from http://www.bp.com/content/dam/bp-country/de_de/PDFs/brochures/BP-statistical-review-of-world-energy-2014-full-report.pdf, last accessed 20/06/2017. This information is consistent with a calculated value of 51.13 bn m3 LNG regasified natural gas in Europe in 2013 from source: IGU, 2017, World LNG Report, Figure 5.5, p 25, retrieved from https://energiatalgud.ee/img_auth.php/c/c5/IGU._World_LNG_Report_2013.pdf, last accessed 20/06/2017
  property carbon content, non-fossil 0; name C_content_non_fossil
  property wet mass 0.84 kg; name WM
  property heating value, gross 0 MJ; name Gross_Heat_Value
  property carbon content, fossil 0.602381; name C_content_fossil
  property water content 0; name water_content
  property price 0.166 EUR2005
    Temporary price data. Calculated as 90% of purchasers price based on: 2005 price for Europe-27 Import (US$ and kg) in UN Commodity Trade Statistics Database - Natural gas in gaseous state (http://data.un.org/Data.aspx?q=natural+gas&d=ComTrade&f=_l1Code%3a28%3bcmdCode%3a271121; accessed 4 January 2011), using density of natural gas of 0.8 kg/m3 for unit conversion.
  property heating value, net 39 MJ
    Literature value, Source: United Nations Statistics Division (2018) International Recommendations for Energy Statistics (IRES). Available at: http://unstats.un.org/unsd/statcom/doc11/BG-IRES.pdf.
  property dry mass 0.84 kg; name DM
  property water in wet mass 0 kg; name WWM
  property carbon content 0.602381
    carbon content on a dry matter basis (reserved; not for manual entry)
  properties: carbon allocation 0.506 kg

## Inputs from technosphere
- electricity, medium voltage: 0.051336 kWh; lognormal variance with pedigree 0.0587, pedigree (1,3,5,3,3)
  EcoSpold01Location=DZ
  Environmental report for italian plant, standard technology
  Uncertainty: Environmental report for italian plant, standard technology
- natural gas, liquefied: 1 m3; lognormal variance with pedigree 0.04, pedigree (1,1,5,1,1)
  gas input
  properties: heating value, net 39 MJ, carbon content, fossil 0.602381, wet mass 0.84 kg, dry mass 0.84 kg
  note on carbon content, fossil: An average C content of 0.506 kg C/ Nm3 has been assumed for natural gas (this average has been calculated using data in Tab 3.5, ecoinvent v2.2 report 6_V). It equals 0.60238 kg C per 0.84kg dry mass.
- natural gas processing plant: 7.89e-13 unit; lognormal variance with pedigree 0.3781, pedigree (4,4,5,3,3)
  EcoSpold01Location=GLO
  Estimation for infrastructure
  Uncertainty: estimation for infrastructure
- transport, freight, sea, tanker for liquefied natural gas: 1.512 metric ton*km; = 1800*DM/1000; lognormal variance with pedigree 0.162, pedigree (3,1,5,1,1)
  losses are acconted in this module. Average weighted distance is estimated.

## Inputs from nature
- Water, salt, ocean [natural resource, in water]: 0.000639 m3; name water_salt_ocean_input; lognormal variance with pedigree 0.0407, pedigree (1,3,5,3,1)
  Environmental report for italian plant
  Uncertainty: Environmental report for italian plant

## Emissions to nature
- Nitrogen oxides [air, non-urban air or from high stacks]: 2.14e-5 kg; lognormal variance with pedigree 0.0807, pedigree (1,3,5,3,1)
  Environmental report for italian plant
  Uncertainty: Environmental report for italian plant
- Water [air, unspecified]: 9.585e-5 m3; name water_to_air_unspecified; = (water_salt_ocean_input*fraction_PW_to_air); lognormal variance with pedigree 0.0807, pedigree (2,2,5,1,1)
  Calculated value based on literature values and expert opinion. See comments in the parametres' comment field.
  property fraction, origin: unspecified 0; name fraction_origin_unspecified
  property fraction, origin: fresh water 0; name fraction_origin_fresh_water
  property fraction, origin: salt water 1; name fraction_origin_salt_water
- Methane, fossil [air, non-urban air or from high stacks]: 0.000329 kg; lognormal variance with pedigree 0.1607, pedigree (1,3,5,3,1)
  Environmental report for italian plant
  Uncertainty: Environmental report for italian plant
- Carbon dioxide, fossil [air, non-urban air or from high stacks]: 0.0258 kg; lognormal variance with pedigree 0.0407, pedigree (1,3,5,3,1)
  Environmental report for italian plant
  Uncertainty: Environmental report for italian plant
- Water [water, unspecified]: 0.00054315 m3; name water_to_water_unspecified; = water_salt_ocean_input*(1-fraction_PW_to_air); lognormal variance with pedigree 0.0807, pedigree (2,2,5,1,1)
  (same comment as for Water)
  property fraction, origin: salt water 1; name fraction_origin_salt_water_Ww
  property fraction, origin: unspecified 0; name fraction_origin_unspecified_Ww
  property fraction, origin: fresh water 0; name fraction_origin_fresh_water_Ww
- Carbon monoxide, fossil [air, non-urban air or from high stacks]: 1.33e-5 kg; lognormal variance with pedigree 0.6907, pedigree (1,3,5,3,1)
  Environmental report for italian plant
  Uncertainty: Environmental report for italian plant

## Sampling procedure
environmental report

## Extrapolations
This dataset has been extrapolated from year 2001 to the year of the calculation (2021). The uncertainty has been adjusted accordingly.

## Review by Bo Weidema 2012-05-23
Passed. This dataset re-models the market structure of ecoinvent version 2.2 using the new modelling principles of version 3 for imports and markets.

## Review by Michael Spielmann (obsolete) 2003-09-22
Passed.
