# acetic acid production, product in 98% solution state

Dataset: EcoSpold 2, unit process
Geography: RoW
Time period: 1997-01-01 to 2021-12-31
Technology level: current
Classification: ISIC rev.4 ecoinvent: 2011:Manufacture of basic chemicals
Synonyms: Glacial acetic acid; Ethylic acid; Vinegar acid; Methanecarboxylic acid; Acetic acid; Ethanoic acid
Scenario: Business-as-Usual
System model: Allocation, cut-off by classification
Generated by: Hans-Jörg Althaus
Published in: Althaus H.-J. 2007
Database: ecoinvent
isCopyrightProtected: true
accessRestrictedTo: 1

## General comment
This dataset represents the production of acetic acid using the Celanese process. Acetic acid (CH3COOH) is a clear, colorless, corrosive liquid that has a pungent vinegar-like odor. It is found in dilute solutions in many plant and animal systems. Vinegar (4–12% acetic acid solutions produced by the fermentation of wines) has been known for more than 5000 years. Acetic acid is mainly used for the production of vinyl acetate and acetic anhydride. In the Celanese process (which was developed based on the Monsanto process), acetic acid is produced by carbonylation of methanol, using rhodium as catalyst (Le Berre et al. 2014).
This dataset is based on theoretical data from process analysis as well as estimations based on data from a large chemical factory (Gendorf 2016).
References:
Althaus H.-J., Chudacoff M., Hischier R., Jungbluth N., Osses M. and Primas A. (2007) Life Cycle Inventories of Chemicals. ecoinvent report No. 8, v2.0. EMPA Dübendorf, Swiss Centre for Life Cycle Inventories, Dübendorf, CH.
Le Berre, C., Serp, P., Kalck, P. and Torrence, G. P. 2014. Acetic Acid. Ullmann's Encyclopedia of Industrial Chemistry.
Gendorf (2016) Umwelterklärung 2015, Werk Gendorf Industriepark, www.gendorf.de.

## Included activities start
The activity starts when the raw materials enter the process.

## Included activities end
This activity ends with the production of acetic acid. The dataset includes the whole production process, including refining.

## Geography
The data in this dataset are not geography-specific. Some values are based on data from a large chemical factory located in Germany. These are assumed to be valid for this geography.

## Technology
The process represents the Celanese process (which is an optimized version of the Monsanto process) in which methanol reacts with carbon monoxide under the influence of a rhodium catalyst. It is assumed that 50% of the off-gas is burned as fuel, thus VOC emissions are reduced and CO2 is higher.
References:
Le Berre, C., Serp, P., Kalck, P. and Torrence, G. P. 2014. Acetic Acid. Ullmann's Encyclopedia of Industrial Chemistry.

## Time period
The data in this dataset come from different years, but overall form the most realistic picture of the production. Some values are based on data published by the Gendorf factory that were collected between 2011 and 2015. The time period has been adjusted accordingly. For more details, see the comments of the exchanges.

## Parameters
- fraction, cooling water, cooling pond system, to air: 0.032 dimensionless; name fraction_CW_CP_to_air; lognormal variance with pedigree 0.0413, pedigree (2,3,1,3,1)
  Calculated based on literature value (Scown, C.D., 2011, Water Footprint of U.S. Transportation Fuels and supplying information of the article) (Vionnet, S., Quantis Water Database - Technical Report, 2012).
- fraction, cooling water, recirculating system, to air: 0.771 dimensionless; name fraction_CW_R_to_air; lognormal variance with pedigree 0.0413, pedigree (2,3,1,3,1)
  (same comment as for fraction, cooling water, cooling pond system, to air)
- fraction, cooling water, once-through system, to air: 0.004 dimensionless; name fraction_CW_OT_to_air; lognormal variance with pedigree 0.0413, pedigree (2,3,1,3,1)
  (same comment as for fraction, cooling water, cooling pond system, to air)
- fraction, cooling water, to air: 0.3875 dimensionless; name fraction_CW_to_air; = (0.5*fraction_CW_OT_to_air)+(0.5*fraction_CW_R_to_air); lognormal variance with pedigree 0.092025, pedigree (4,4,3,2,4)
  Calculated value based on literature value (see comments of the other parametres present in this dataset) and expert opinion. In the case when no industry/literature data are available about the type of cooling or directly fraction, cooling water, to air specific for the process a default assumption is applied. It is assumed that the once-through cooling system is used in 50% of all cases and recirculating system is used in another 50% of all cases.
- fraction, water, decarbonised, to air: 0.3875 dimensionless; name fraction_WDC_to_air; = fraction_CW_to_air; lognormal variance with pedigree 0.092025, pedigree (4,4,3,2,4)
  Calculated value. See comments in the other parametres present in this dataset. Decarbonised water is considered to be always used as cooling water, thus cooling water fractions to air are applied to all carbonised water input flows to calculate the amount of water consumed in the processes.

## Reference product
- acetic acid, without water, in 98% solution state: 1 kg; name RP; By-product classification allocatable product; CPC 34120: Industrial monocarboxylic fatty acids; acid oils from refining; CAS 64-19-7
  Acetic acid (CH3COOH) is a clear, colorless, corrosive liquid that has a pungent vinegar-like odor. It is found in dilute solutions in many plant and animal systems. Vinegar (4–12% acetic acid solutions produced by the fermentation of wines) has been known for more than 5000 years. Acetic acid is mainly used for the production of vinyl acetate and acetic anhydride.
  References:
  Althaus H.-J., Chudacoff M., Hischier R., Jungbluth N., Osses M. and Primas A. (2007) Life Cycle Inventories of Chemicals. ecoinvent report No. 8, v2.0. EMPA Dübendorf, Swiss Centre for Life Cycle Inventories, Dübendorf, CH.
  Le Berre, C., Serp, P., Kalck, P. and Torrence, G. P. 2014. Acetic Acid. Ullmann's Encyclopedia of Industrial Chemistry.
  production volume 3e9 kg; name RP_PV
    Souce: http://en.wikipedia.org/wiki/Acetic_acid downloaded 23 April 2009. 75% is from methanol carbonylation
  property price 0.479 EUR2005
    Calculated value based on data from United Nations Commodity Trade Statistics Database (comtrade.un.org). UN comtrade category: 291521 Acetic aicid. Prices from the year 2005. Using exchange rate of 1EURO = 1.209 USD. Average of price of import into 5 main markets (EU, US, JP, IN and CN).
  property heating value, net 14.6 MJ
    Based on literature, page 10, Althaus H.-J., Chudacoff M., Hischier R., Jungbluth N., Osses M. and Primas A. (2007) Life Cycle Inventories of Chemicals. Final report ecoinvent data v2.0 No. 8. EMPA, Swiss Centre for Life Cycle Inventories, Dübendorf, CH, Online-Version under: www.ecoinvent.org.
  property carbon content 0.400016
    carbon content on a dry matter basis (reserved; not for manual entry)
  properties: carbon content, fossil 0.400016, wet mass 1 kg, water in wet mass 0 kg, carbon content, non-fossil 0, water content 0, dry mass 1 kg, carbon allocation 0.400016 kg

## Inputs from technosphere
- nitrogen, liquid: 0.019 kg; lognormal variance with pedigree 0.0106, pedigree (2,3,2,4,3)
  Calculated based on literature data published by the industry. This value is a 5-year average of data (2011 - 2015) published by the Gendorf factory (Gendorf, 2016, Umwelterklärung, www.gendorf.de), (Gendorf, 2015, Umwelterklärung, www.gendorf.de), (Gendorf, 2014, Umwelterklärung, www.gendorf.de). The amount of nitrogen used per kg of chemical substance produced is calculated using literature data published by the Gendorf factory based in Germany, which produces a wide range of chemical substances. The factory produced 1657400 tonnes of chemical substances in the year 2015 (Gendorf, 2016, Umwelterklärung, www.gendorf.de) and 740000 tonnes of intermediate products. The reported amount of nitrogen used in 2015 was 33512400 Nm3 (Gendorf, 2016, Umwelterklärung, www.gendorf.de). One Nm3 of nitrogen is equal to 1.2506 kg. The resulting amount of nitrogen - the 5-year average (2011 - 2015, weighted by production volume) is 0.019 kg/kg. Nitrogen is mainly used during the production of chemicals for 'blanketing', which is the process of applying gas to the vapour space of a container or vessel in order to control its composition.
  properties: dry mass 1 kg, wet mass 1 kg
- wastewater, unpolluted: -6.14e-5 m3; name BP_wastewater_unpolluted; lognormal variance with pedigree 0.39, pedigree (5,5,5,5,5)
  Calculated value based on mass balance.
  production volume 184200 m3; = RP_PV*BP_wastewater_unpolluted/ABS(RP)
    Calculated from the production volume of acetic acid, without water, in 98% solution state in proportion to the respective output amounts.
  property price 0 EUR2005; name BP_wastewater_unpolluted_price_EUR2005
  properties: dry mass 0.337476 kg, wet mass 1000 kg, water content 2962.17, carbon content, non-fossil 0.00178991, carbon content, fossil 0.00178991
  note on carbon content, fossil: Assumed to be like in tap water. Bicarbonate content is 2.93 mol/m3. CO2 content is 0.1 mol/m3 (ecoinvent v2.2 report 8, Tab 93.1).
- chemical factory, organics: 4e-10 unit; lognormal variance with pedigree 0.31, pedigree (2,3,2,4,3)
  Calculated based on literature data published by the industry. For this activity, no information was readily available concerning infrastructure and land-use. Therefore, the infrastructure is estimated based on data from two chemical factories, the BASF site of Ludwigshafen and the chemical factory in Gendorf (which are both located in Germany), which produce a wide range of chemical substances. Based on this data, the following assumptions are made: the built area amounts to about 4.2 ha, the plant has an average output of 50'000 t/a and a lifespan of fifty years. The estimated infrastructure amount is therefore 4.00 E-10 units per kg of produced chemical.
  References:
  Althaus H.-J., Chudacoff M., Hischier R., Jungbluth N., Osses M. and Primas A. (2007) Life Cycle Inventories of Chemicals. ecoinvent report No. 8, v2.0. EMPA Dübendorf, Swiss Centre for Life Cycle Inventories, Dübendorf, CH.
  Gendorf (2000) Umwelterklärung 2000, Werk Gendorf. Werk Gendorf, Burgkirchen.
- methanol: 0.54 kg; lognormal variance with pedigree 0.1786, pedigree (4,5,5,5,5)
  Estimated value based on expert judgement.
  properties: wet mass 1 kg, dry mass 1 kg, carbon content, fossil 0.375, heating value, net 26.49 MJ
- electricity, medium voltage: 0 kWh; pedigree (1,1,1,1,1)
  Estimated value based on expert judgement.
- heat, district or industrial, other than natural gas: 0 MJ; pedigree (1,1,1,1,1)
  Estimated value based on expert judgement.
  properties: heating value, net 1 MJ
- water, decarbonised: 0 kg; name water_decarbonised_input; pedigree (1,1,1,1,1)
  Personal communication (M. Overcash).
  properties: wet mass 1 kg
- carbon monoxide: 0.481 kg; lognormal variance with pedigree 0.0881, pedigree (4,2,5,5,3)
  Personal communication (M. Overcash).
  properties: wet mass 1 kg, dry mass 1 kg, carbon content, fossil 0.428571, heating value, net 12.99 MJ
  note on carbon content, fossil: CO. It is assumed that CO is produced from partial combustion of heavy heating oil.
- heat, district or industrial, natural gas: 0 MJ; pedigree (1,1,1,1,1)
  Estimated value based on expert judgement.
  properties: heating value, net 1 MJ
- electricity, medium voltage: 0.000718496, 0.000137777, 0.00231298, 0.0336403, 0.00474161, 0.0154489 kWh (6 entries); lognormal variance with pedigree 0.1786, pedigree (4,5,5,5,5)
  Estimated value based on expert judgement.
- heat, district or industrial, other than natural gas: 0.000203282, 0.5013 MJ (2 entries); lognormal variance with pedigree 0.1786, pedigree (4,5,5,5,5)
  Estimated value based on expert judgement.
- water, decarbonised: 0.00298086, 0.00775619, 0.0312825, 0.00398354, 0.0582066, 0.00038078, 0.0494096 kg (7 entries); lognormal variance with pedigree 0.0881, pedigree (4,2,5,5,3)
  Personal communication (M. Overcash).
- heat, district or industrial, natural gas: 0.0136375, 0.884859 MJ (2 entries); lognormal variance with pedigree 0.1786, pedigree (4,5,5,5,5)
  Estimated value based on expert judgement.

## Inputs from nature
- Water, cooling, unspecified natural origin [natural resource, in water]: 0.078 m3; name water_cooling_UNO_input; lognormal variance with pedigree 0.39, pedigree (5,5,5,5,5)
  Personal communication (B. Painter, Titanwood).

## Emissions to nature
- Nitrogen [air, unspecified]: 0.019 kg; lognormal variance with pedigree 0.0106, pedigree (2,3,2,4,3)
  Calculated value. The amount of nitrogen released to air is equal to the amount of nitrogen entering the activity.
- Carbon monoxide, fossil [air, unspecified]: 0.00632 kg; lognormal variance with pedigree 0.42, pedigree (5,5,5,5,5)
  Personal communication (M. Overcash).
- Methanol [air, unspecified]: 0.00252 kg; lognormal variance with pedigree 0.5, pedigree (5,5,5,5,5)
  Personal communication (M. Overcash).
- Water [water, unspecified]: 0.0478693 m3; = (water_decarbonised_input/1000)*(1-fraction_WDC_to_air)+water_cooling_UNO_input*(1-fraction_CW_to_air); lognormal variance with pedigree 0.0429, pedigree (2,2,2,5,1)
  Calculated as a fraction of the input of water. For more details, refer to the mathematical relation and the parameters.
  property wet mass 1000 kg; name WM
  property water in wet mass 1000 kg; name WWM
  property dry mass 0 kg; name DM
  property fraction, origin: unspecified 0.99803; name fraction_origin_unspecified_Ww
  property carbon content, fossil 0; name C_content_fossil
  property fraction, origin: fresh water 0.00197047; name fraction_origin_fresh_water_Ww
  property carbon content, non-fossil 0; name C_content_non_fossil
  property fraction, origin: salt water 0; name fraction_origin_salt_water_Ww
- Carbon dioxide, fossil [air, unspecified]: 0.0371 kg; lognormal variance with pedigree 0.39, pedigree (5,5,5,5,5)
  Personal communication (M. Overcash).
- Methane, fossil [air, unspecified]: 0.00499 kg; lognormal variance with pedigree 0.5, pedigree (5,5,5,5,5)
  Personal communication (M. Overcash).
- Water [air, unspecified]: 0.0302847 m3; = (water_decarbonised_input/1000*fraction_WDC_to_air)+(water_cooling_UNO_input*fraction_CW_to_air); lognormal variance with pedigree 0.0429, pedigree (2,2,2,5,1)
  (same comment as for Water)
  property fraction, origin: unspecified 0.99803; name fraction_origin_unspecified
  property fraction, origin: salt water 0; name fraction_origin_salt_water
  property fraction, origin: fresh water 0.00197047; name fraction_origin_fresh_water
- Acetic acid [air, unspecified]: 0.005 kg; lognormal variance with pedigree 0.5, pedigree (5,5,5,5,5)
  Personal communication (M. Overcash).
- Hydrogen [air, unspecified]: 0.000296 kg; lognormal variance with pedigree 0.5, pedigree (5,5,5,5,5)
  Personal communication (M. Overcash).

## Sampling procedure
Estimations based on industrial data and theoretical model. Some values are calculated based on data from a large chemical factory located in Germany. For more details, see the comments of the exchanges.

## Extrapolations
This dataset has been copied from an original dataset covering the geography RER. The uncertainty has been adjusted accordingly.

## Review by Gregor Wernet 2017-08-04
This dataset was additionally reviewed in a separate review process by Eric Johnson of Atlantic Consulting as well as Emilia Moreno Ruiz and Gregor Wernet of ecoinvent.
