# treatment of mill scale, residual material landfill

Dataset: EcoSpold 2, unit process
Geography: GLO
Time period: 1987-01-01 to 2021-12-31
Technology level: current
Classification: ISIC rev.4 ecoinvent: 3821:Treatment and disposal of non-hazardous waste
Scenario: Business-as-Usual
System model: Allocation, cut-off by classification
Generated by: Avraam Symeonidis
Database: ecoinvent
isCopyrightProtected: true
accessRestrictedTo: 1

## General comment
Steelmaking produces large quantities of by-products, with around 450-500 kg of by-products produced per tonne of steel. The main components of these are slags (approximately 80%), along with dusts and sludges from air pollution abatement equipment (flue gas scrubbing) and mill scale. The physical or chemical natures of these by-products means that it can be difficult to find possible uses. Hence, most of these by-products have historically been disposed of in landfills. However, new legislation and financial instruments, such as landfill taxes, mean that landfilling is now a costly and undesirable management solution. Instead, considerable efforts have been made to recover by-products for internal reuse or to sell them to other industries to recover value. The fraction of steelmaking by-products that is sent to landfill has drastically reduced. This activity represents the disposal of 'mill scale' in a residual material landfill. This type of landfill is designed to receive mostly inorganic (low carbon, <5 w-%) wastes in a physically stable form. Further information is provided in ecoinvent report no. 13, Part II: Landfills – Underground Deposits – Landfarming (Doka, 2009).
References
Doka, G. (2009). Life cycle inventories of waste treatment services. Ecoinvent report no. 13. Swiss Centre for Life Cycle Inventories, Dubendorf, Switzerland.
Inventoried waste contains 100% mill scale; .
waste composition (wet, in ppm): H2O 94500; O 86081; H n.a.; C 7620; S n.a.; N n.a.; P 200; B 5.6; Cl n.a.; Br n.a.; F n.a.; I n.a.; Ag 3.44; As 93.9; Ba 125; Cd 1.23; Co 70.3; Cr 1370; Cu 343; Hg 0.223; Mn 9390; Mo 1150; Ni 1450; Pb 2.45; Sb 67.6; Se 3.54; Sn 220; V 6.63; Zn 122; Be 0.886; Sc n.a.; Sr 32.1; Ti n.a.; Tl 0.886; W 8300; Si 2040; Fe 769000; Ca 11300; Al 1350; K 2640; Mg 950; Na 1560;
Share of carbon in waste that is biogenic 0%.
Additional solidification with 0.4 kg of cement. Note that value for oxygen content was calculated by assuming that other elements in the material are present as oxides and that any missing mass (either not reported or not detected) was assumed to be oxygen.

## Included activities start
Activity starts with the reception of the waste.

## Included activities end
Waste-specific short-term emissions to water from leachate. Long-term emissions from landfill to ground water. Expenditures for solidification with cement.

## Technology
Time period based on the range of years of publication from which composition data were taken. Note that the Residual Material Landfill modelling tool was published in 2009.

## Reference product
- mill scale: -1 kg; name RP; CPC 39310: Slag, dross, scalings and other waste from the manufacture of iron or steel; By-product classification Waste
  production volume 7.99163e7 kg; name PVRP
    Assuming that 100% of mill scale is sent for disposal in landfill (worldsteel, 2010).
    References:
    Worldsteel (2010). Steel industry by-products. World Steel Association: Brussels, Belgium.
  property selenium content 3.90944e-6
    The value of 'selenium content' is documented in Turner & Symeonidis, 2020.
    Reference: Turner David & Symeonidis Avraam, 2020, Life cycle inventories of the treatment of iron and steelmaking by-products, ecoinvent association, Zürich, Switzerland
  property carbon content, fossil 0.00841524
    The value of 'carbon content, fossil' is documented in Turner & Symeonidis, 2020.
    Reference: Turner David & Symeonidis Avraam, 2020, Life cycle inventories of the treatment of iron and steelmaking by-products, ecoinvent association, Zürich, Switzerland
  property tungsten content 0.00916621
    The value of 'tungsten content' is documented in Turner & Symeonidis, 2020.
    Reference: Turner David & Symeonidis Avraam, 2020, Life cycle inventories of the treatment of iron and steelmaking by-products, ecoinvent association, Zürich, Switzerland
  property phosphorus content 0.000220872
    The value of 'phosphorus content' is documented in Turner & Symeonidis, 2020.
    Reference: Turner David & Symeonidis Avraam, 2020, Life cycle inventories of the treatment of iron and steelmaking by-products, ecoinvent association, Zürich, Switzerland
  property potassium content 0.00291552
    The value of 'potassium content' is documented in Turner & Symeonidis, 2020.
    Reference: Turner David & Symeonidis Avraam, 2020, Life cycle inventories of the treatment of iron and steelmaking by-products, ecoinvent association, Zürich, Switzerland
  property silicon content 0.0022529
    The value of 'silicon content' is documented in Turner & Symeonidis, 2020.
    Reference: Turner David & Symeonidis Avraam, 2020, Life cycle inventories of the treatment of iron and steelmaking by-products, ecoinvent association, Zürich, Switzerland
  property antimony content 7.46549e-5
    The value of 'antimony content' is documented in Turner & Symeonidis, 2020.
    Reference: Turner David & Symeonidis Avraam, 2020, Life cycle inventories of the treatment of iron and steelmaking by-products, ecoinvent association, Zürich, Switzerland
  property manganese content 0.01037
    The value of 'manganese content' is documented in Turner & Symeonidis, 2020.
    Reference: Turner David & Symeonidis Avraam, 2020, Life cycle inventories of the treatment of iron and steelmaking by-products, ecoinvent association, Zürich, Switzerland
  property calcium content 0.0124793
    The value of 'calcium content' is documented in Turner & Symeonidis, 2020.
    Reference: Turner David & Symeonidis Avraam, 2020, Life cycle inventories of the treatment of iron and steelmaking by-products, ecoinvent association, Zürich, Switzerland
  property nickel content 0.00160133
    The value of 'nickel content' is documented in Turner & Symeonidis, 2020.
    Reference: Turner David & Symeonidis Avraam, 2020, Life cycle inventories of the treatment of iron and steelmaking by-products, ecoinvent association, Zürich, Switzerland
  property beryllium content 9.78465e-7
    The value of 'beryllium content' is documented in Turner & Symeonidis, 2020.
    Reference: Turner David & Symeonidis Avraam, 2020, Life cycle inventories of the treatment of iron and steelmaking by-products, ecoinvent association, Zürich, Switzerland
  property iron content 0.849255
    The value of 'iron content' is documented in Turner & Symeonidis, 2020.
    Reference: Turner David & Symeonidis Avraam, 2020, Life cycle inventories of the treatment of iron and steelmaking by-products, ecoinvent association, Zürich, Switzerland
  property cadmium content 1.35837e-6
    The value of 'cadmium content' is documented in Turner & Symeonidis, 2020.
    Reference: Turner David & Symeonidis Avraam, 2020, Life cycle inventories of the treatment of iron and steelmaking by-products, ecoinvent association, Zürich, Switzerland
  property price 0 EUR2005; name RP_price_EUR2005
    Waste products are assigned a price of zero as they are assumed to require further treatment.
  property lead content 2.70569e-6
    The value of 'lead content' is documented in Turner & Symeonidis, 2020.
    Reference: Turner David & Symeonidis Avraam, 2020, Life cycle inventories of the treatment of iron and steelmaking by-products, ecoinvent association, Zürich, Switzerland
  property strontium content 3.545e-5
    The value of 'strontium content' is documented in Turner & Symeonidis, 2020.
    Reference: Turner David & Symeonidis Avraam, 2020, Life cycle inventories of the treatment of iron and steelmaking by-products, ecoinvent association, Zürich, Switzerland
  property arsenic content 0.0001037
    The value of 'arsenic content' is documented in Turner & Symeonidis, 2020.
    Reference: Turner David & Symeonidis Avraam, 2020, Life cycle inventories of the treatment of iron and steelmaking by-products, ecoinvent association, Zürich, Switzerland
  property cobalt content 7.76367e-5
    The value of 'cobalt content' is documented in Turner & Symeonidis, 2020.
    Reference: Turner David & Symeonidis Avraam, 2020, Life cycle inventories of the treatment of iron and steelmaking by-products, ecoinvent association, Zürich, Switzerland
  property zinc content 0.000134732
    The value of 'zinc content' is documented in Turner & Symeonidis, 2020.
    Reference: Turner David & Symeonidis Avraam, 2020, Life cycle inventories of the treatment of iron and steelmaking by-products, ecoinvent association, Zürich, Switzerland
  property thallium content 9.78465e-7
    The value of 'thallium content' is documented in Turner & Symeonidis, 2020.
    Reference: Turner David & Symeonidis Avraam, 2020, Life cycle inventories of the treatment of iron and steelmaking by-products, ecoinvent association, Zürich, Switzerland
  property molybdenum content 0.00127002
    The value of 'molybdenum content' is documented in Turner & Symeonidis, 2020.
    Reference: Turner David & Symeonidis Avraam, 2020, Life cycle inventories of the treatment of iron and steelmaking by-products, ecoinvent association, Zürich, Switzerland
  property oxygen content 0.0950648
    The value of 'oxygen content' is documented in Turner & Symeonidis, 2020.
    Reference: Turner David & Symeonidis Avraam, 2020, Life cycle inventories of the treatment of iron and steelmaking by-products, ecoinvent association, Zürich, Switzerland
  property silver content 3.79901e-6
    The value of 'silver content' is documented in Turner & Symeonidis, 2020.
    Reference: Turner David & Symeonidis Avraam, 2020, Life cycle inventories of the treatment of iron and steelmaking by-products, ecoinvent association, Zürich, Switzerland
  property mercury content 2.46273e-7
    The value of 'mercury content' is documented in Turner & Symeonidis, 2020.
    Reference: Turner David & Symeonidis Avraam, 2020, Life cycle inventories of the treatment of iron and steelmaking by-products, ecoinvent association, Zürich, Switzerland
  property copper content 0.000378796
    The value of 'copper content' is documented in Turner & Symeonidis, 2020.
    Reference: Turner David & Symeonidis Avraam, 2020, Life cycle inventories of the treatment of iron and steelmaking by-products, ecoinvent association, Zürich, Switzerland
  property sodium content 0.00172281
    The value of 'sodium content' is documented in Turner & Symeonidis, 2020.
    Reference: Turner David & Symeonidis Avraam, 2020, Life cycle inventories of the treatment of iron and steelmaking by-products, ecoinvent association, Zürich, Switzerland
  property carbon content, non-fossil 0
    The value of 'carbon content, non-fossil' is documented in Turner & Symeonidis, 2020.
    Reference: Turner David & Symeonidis Avraam, 2020, Life cycle inventories of the treatment of iron and steelmaking by-products, ecoinvent association, Zürich, Switzerland
  property tin content 0.00024296
    The value of 'tin content' is documented in Turner & Symeonidis, 2020.
    Reference: Turner David & Symeonidis Avraam, 2020, Life cycle inventories of the treatment of iron and steelmaking by-products, ecoinvent association, Zürich, Switzerland
  property magnesium content 0.00104914
    The value of 'magnesium content' is documented in Turner & Symeonidis, 2020.
    Reference: Turner David & Symeonidis Avraam, 2020, Life cycle inventories of the treatment of iron and steelmaking by-products, ecoinvent association, Zürich, Switzerland
  property barium content 0.000138045
    The value of 'barium content' is documented in Turner & Symeonidis, 2020.
    Reference: Turner David & Symeonidis Avraam, 2020, Life cycle inventories of the treatment of iron and steelmaking by-products, ecoinvent association, Zürich, Switzerland
  property vanadium content 7.32192e-6
    The value of 'vanadium content' is documented in Turner & Symeonidis, 2020.
    Reference: Turner David & Symeonidis Avraam, 2020, Life cycle inventories of the treatment of iron and steelmaking by-products, ecoinvent association, Zürich, Switzerland
  property chromium content 0.00151298
    The value of 'chromium content' is documented in Turner & Symeonidis, 2020.
    Reference: Turner David & Symeonidis Avraam, 2020, Life cycle inventories of the treatment of iron and steelmaking by-products, ecoinvent association, Zürich, Switzerland
  property boron content 6.18443e-6
    The value of 'boron content' is documented in Turner & Symeonidis, 2020.
    Reference: Turner David & Symeonidis Avraam, 2020, Life cycle inventories of the treatment of iron and steelmaking by-products, ecoinvent association, Zürich, Switzerland
  property aluminium content 0.00149089
    The value of 'aluminium content' is documented in Turner & Symeonidis, 2020.
    Reference: Turner David & Symeonidis Avraam, 2020, Life cycle inventories of the treatment of iron and steelmaking by-products, ecoinvent association, Zürich, Switzerland
  property carbon content 0.00841524
    carbon content on a dry matter basis (reserved; not for manual entry)
  properties: dry mass 0.9055 kg, water content 0.104362, water in wet mass 0.0945 kg, wet mass 1 kg, carbon allocation 0.00762 kg

## Inputs from technosphere
- waste cement, hydrated: 0 kg; name BP; pedigree (1,1,1,1,1)
  Hydrated cement for solidification of residual material waste. Uncertainty in mass from solidification recipe.
  production volume 0 kg
    Calculated based on the production volume of the reference product.
  property price 0 EUR2005; name BP_price_EUR2005
  properties: wet mass 1 kg, dry mass 1 kg
- residual material landfill: 2.08333e-9 unit; lognormal variance with pedigree 0.082, pedigree (1,1,5,5,4)
  demands per kilogram waste. uncertainty is heeded in the module
- cement, unspecified: 0.4 kg; lognormal variance with pedigree 0.091084, pedigree (1,1,5,5,4)
  Cement for solidification of residual material waste. Uncertainty in mass from solidification recipe.
  properties: wet mass 1 kg, dry mass 1 kg
- process-specific burdens, residual material landfill: 0 kg; pedigree (1,1,1,1,1)
  demands per kilogram waste. uncertainty is heeded in the module
- waste cement, hydrated: -0.280494, -0.00841689, -0.71109 kg (3 entries); lognormal variance with pedigree 0.091084, pedigree (1,1,5,5,4)
  (same comment as for waste cement, hydrated)
  production volume 7.99163e7 kg
- process-specific burdens, residual material landfill: 0.280494, 0.00841689, 0.71109 kg (3 entries); lognormal variance with pedigree 0.082, pedigree (1,1,5,5,4)
  demands per kilogram waste. uncertainty is heeded in the module

## Emissions to nature
- Arsenic, ion [water, ground-, long-term]: 9.39e-14 kg; lognormal variance with pedigree 1.07604, pedigree (1,1,5,5,4)
  uncertainty is calculated from uncertainties in waste composition and transfer coefficients in incinerator and landfills.
- COD, Chemical Oxygen Demand [water, surface water]: 2.0776e-5 kg; lognormal variance with pedigree 1.12521, pedigree (1,1,5,5,4)
  uncertainty is calculated from uncertainties in waste composition and transfer coefficients in residual landfill
- Antimony [water, ground-, long-term]: 4.37603e-5 kg; lognormal variance with pedigree 1.10157, pedigree (1,1,5,5,4)
  (same comment as for Arsenic, ion)
- Molybdenum [water, ground-, long-term]: 5.2797e-6 kg; lognormal variance with pedigree 0.744895, pedigree (1,1,5,5,4)
  (same comment as for Arsenic, ion)
- Aluminium [water, surface water]: 6.69033e-7 kg; lognormal variance with pedigree 1.44498, pedigree (1,1,5,5,4)
  (same comment as for COD, Chemical Oxygen Demand)
- Copper, ion [water, ground-, long-term]: 1.32036e-5 kg; lognormal variance with pedigree 3.5327, pedigree (1,1,5,5,4)
  (same comment as for Arsenic, ion)
- Phosphate [water, ground-, long-term]: 0.000137003 kg; lognormal variance with pedigree 1.51294, pedigree (1,1,5,5,4)
  (same comment as for Arsenic, ion)
- Selenium [water, surface water]: 1.24841e-6 kg; lognormal variance with pedigree 1.5162, pedigree (1,1,5,5,4)
  (same comment as for COD, Chemical Oxygen Demand)
- Cadmium, ion [water, ground-, long-term]: 8.35033e-9 kg; lognormal variance with pedigree 7.85575, pedigree (1,1,5,5,4)
  (same comment as for Arsenic, ion)
- Chromium VI [water, ground-, long-term]: 0.000260146 kg; lognormal variance with pedigree 0.705313, pedigree (1,1,5,5,4)
  (same comment as for Arsenic, ion)
- Magnesium [water, surface water]: 1.80203e-7 kg; lognormal variance with pedigree 1.61716, pedigree (1,1,5,5,4)
  (same comment as for COD, Chemical Oxygen Demand)
- Manganese [water, surface water]: 1.29489e-7 kg; lognormal variance with pedigree 1.6745, pedigree (1,1,5,5,4)
  (same comment as for COD, Chemical Oxygen Demand)
- Boron [water, ground-, long-term]: 5.50618e-6 kg; lognormal variance with pedigree 1.42643, pedigree (1,1,5,5,4)
  (same comment as for Arsenic, ion)
- Mercury [water, ground-, long-term]: 1.0526e-8 kg; lognormal variance with pedigree 4.17489, pedigree (1,1,5,5,4)
  (same comment as for Arsenic, ion)
- Beryllium [water, ground-, long-term]: 3.20765e-7 kg; lognormal variance with pedigree 1.9251, pedigree (1,1,5,5,4)
  (same comment as for Arsenic, ion)
- Barium [water, ground-, long-term]: 1.03254e-6 kg; lognormal variance with pedigree 6.76544, pedigree (1,1,5,5,4)
  (same comment as for Arsenic, ion)
- Calcium, ion [water, surface water]: 1.70459e-6 kg; lognormal variance with pedigree 1.33598, pedigree (1,1,5,5,4)
  (same comment as for COD, Chemical Oxygen Demand)
- TOC, Total Organic Carbon [water, ground-, long-term]: 0.00492445 kg; lognormal variance with pedigree 0.529796, pedigree (1,1,5,5,4)
  (same comment as for Arsenic, ion)
- Iron, ion [water, surface water]: 6.4344e-6 kg; lognormal variance with pedigree 1.36745, pedigree (1,1,5,5,4)
  (same comment as for COD, Chemical Oxygen Demand)
- Tin, ion [water, surface water]: 6.95967e-9 kg; lognormal variance with pedigree 2.0471, pedigree (1,1,5,5,4)
  (same comment as for COD, Chemical Oxygen Demand)
- Silicon [water, surface water]: 4.58785e-6 kg; lognormal variance with pedigree 1.19604, pedigree (1,1,5,5,4)
  (same comment as for COD, Chemical Oxygen Demand)
- Sodium, ion [water, ground-, long-term]: 0.000974565 kg; lognormal variance with pedigree 0.687808, pedigree (1,1,5,5,4)
  (same comment as for Arsenic, ion)
- COD, Chemical Oxygen Demand [water, ground-, long-term]: 0.0124448 kg; lognormal variance with pedigree 0.529796, pedigree (1,1,5,5,4)
  (same comment as for Arsenic, ion)
- Thallium [water, ground-, long-term]: 3.20765e-7 kg; lognormal variance with pedigree 1.9251, pedigree (1,1,5,5,4)
  (same comment as for Arsenic, ion)
- Lead [water, ground-, long-term]: 1.27084e-8 kg; lognormal variance with pedigree 8.45586, pedigree (1,1,5,5,4)
  (same comment as for Arsenic, ion)
- Vanadium, ion [water, ground-, long-term]: 5.09591e-6 kg; lognormal variance with pedigree 1.42138, pedigree (1,1,5,5,4)
  (same comment as for Arsenic, ion)
- Iron, ion [water, ground-, long-term]: 0.00385421 kg; lognormal variance with pedigree 7.09586, pedigree (1,1,5,5,4)
  (same comment as for Arsenic, ion)
- Tungsten [water, ground-, long-term]: 0.00537293 kg; lognormal variance with pedigree 0.477238, pedigree (1,1,5,5,4)
  (same comment as for Arsenic, ion)
- Boron [water, surface water]: 4.38766e-8 kg; lognormal variance with pedigree 1.82008, pedigree (1,1,5,5,4)
  (same comment as for COD, Chemical Oxygen Demand)
- Zinc, ion [water, surface water]: 2.49621e-9 kg; lognormal variance with pedigree 2.18307, pedigree (1,1,5,5,4)
  (same comment as for COD, Chemical Oxygen Demand)
- Chromium VI [water, surface water]: 8.23542e-5 kg; lognormal variance with pedigree 0.86637, pedigree (1,1,5,5,4)
  (same comment as for COD, Chemical Oxygen Demand)
- Sodium, ion [water, surface water]: 0.000585435 kg; lognormal variance with pedigree 0.708265, pedigree (1,1,5,5,4)
  (same comment as for COD, Chemical Oxygen Demand)
- Cobalt [water, ground-, long-term]: 1.20187e-5 kg; lognormal variance with pedigree 1.87086, pedigree (1,1,5,5,4)
  (same comment as for Arsenic, ion)
- Thallium [water, surface water]: 5.35501e-10 kg; lognormal variance with pedigree 2.3855, pedigree (1,1,5,5,4)
  (same comment as for COD, Chemical Oxygen Demand)
- Calcium, ion [water, ground-, long-term]: 0.00102105 kg; lognormal variance with pedigree 1.87958, pedigree (1,1,5,5,4)
  (same comment as for Arsenic, ion)
- Strontium [water, surface water]: 1.94013e-8 kg; lognormal variance with pedigree 1.91367, pedigree (1,1,5,5,4)
  (same comment as for COD, Chemical Oxygen Demand)
- Mercury [water, surface water]: 1.75726e-11 kg; lognormal variance with pedigree 2.83131, pedigree (1,1,5,5,4)
  (same comment as for COD, Chemical Oxygen Demand)
- Strontium [water, ground-, long-term]: 1.16214e-5 kg; lognormal variance with pedigree 1.45327, pedigree (1,1,5,5,4)
  (same comment as for Arsenic, ion)
- Potassium, ion [water, ground-, long-term]: 0.00189582 kg; lognormal variance with pedigree 0.618227, pedigree (1,1,5,5,4)
  (same comment as for Arsenic, ion)
- Vanadium, ion [water, surface water]: 1.62713e-8 kg; lognormal variance with pedigree 1.94177, pedigree (1,1,5,5,4)
  (same comment as for COD, Chemical Oxygen Demand)
- Nickel, ion [water, ground-, long-term]: 0.000524954 kg; lognormal variance with pedigree 0.949335, pedigree (1,1,5,5,4)
  (same comment as for Arsenic, ion)
- Silver, ion [water, ground-, long-term]: 1.32421e-7 kg; lognormal variance with pedigree 4.14278, pedigree (1,1,5,5,4)
  (same comment as for Arsenic, ion)
- BOD5, Biological Oxygen Demand [water, surface water]: 6.79578e-6 kg; lognormal variance with pedigree 1.12521, pedigree (1,1,5,5,4)
  (same comment as for COD, Chemical Oxygen Demand)
- TOC, Total Organic Carbon [water, surface water]: 8.22111e-6 kg; lognormal variance with pedigree 1.12521, pedigree (1,1,5,5,4)
  (same comment as for COD, Chemical Oxygen Demand)
- Barium [water, surface water]: 1.72377e-9 kg; lognormal variance with pedigree 2.23188, pedigree (1,1,5,5,4)
  (same comment as for COD, Chemical Oxygen Demand)
- Tungsten [water, surface water]: 0.00292707 kg; lognormal variance with pedigree 0.501389, pedigree (1,1,5,5,4)
  (same comment as for COD, Chemical Oxygen Demand)
- Magnesium [water, ground-, long-term]: 0.000107942 kg; lognormal variance with pedigree 1.92879, pedigree (1,1,5,5,4)
  (same comment as for Arsenic, ion)
- Tin, ion [water, ground-, long-term]: 4.16884e-6 kg; lognormal variance with pedigree 4.87144, pedigree (1,1,5,5,4)
  (same comment as for Arsenic, ion)
- DOC, Dissolved Organic Carbon [water, ground-, long-term]: 0.00492445 kg; lognormal variance with pedigree 0.529796, pedigree (1,1,5,5,4)
  (same comment as for Arsenic, ion)
- Silver, ion [water, surface water]: 2.2107e-10 kg; lognormal variance with pedigree 2.50449, pedigree (1,1,5,5,4)
  (same comment as for COD, Chemical Oxygen Demand)
- Molybdenum [water, surface water]: 0.00114472 kg; lognormal variance with pedigree 0.721403, pedigree (1,1,5,5,4)
  (same comment as for COD, Chemical Oxygen Demand)
- Zinc, ion [water, ground-, long-term]: 1.49523e-6 kg; lognormal variance with pedigree 5.86138, pedigree (1,1,5,5,4)
  (same comment as for Arsenic, ion)
- Cobalt [water, surface water]: 2.00646e-8 kg; lognormal variance with pedigree 1.90788, pedigree (1,1,5,5,4)
  (same comment as for COD, Chemical Oxygen Demand)
- Cadmium, ion [water, surface water]: 1.39404e-11 kg; lognormal variance with pedigree 2.86796, pedigree (1,1,5,5,4)
  (same comment as for COD, Chemical Oxygen Demand)
- Manganese [water, ground-, long-term]: 7.75641e-5 kg; lognormal variance with pedigree 6.20806, pedigree (1,1,5,5,4)
  (same comment as for Arsenic, ion)
- Phosphate [water, surface water]: 2.28719e-7 kg; lognormal variance with pedigree 1.73349, pedigree (1,1,5,5,4)
  (same comment as for COD, Chemical Oxygen Demand)
- Silicon [water, ground-, long-term]: 0.00203541 kg; lognormal variance with pedigree 0.647327, pedigree (1,1,5,5,4)
  (same comment as for Arsenic, ion)
- Lead [water, surface water]: 2.1216e-11 kg; lognormal variance with pedigree 2.81359, pedigree (1,1,5,5,4)
  (same comment as for COD, Chemical Oxygen Demand)
- DOC, Dissolved Organic Carbon [water, surface water]: 8.22111e-6 kg; lognormal variance with pedigree 1.12521, pedigree (1,1,5,5,4)
  (same comment as for COD, Chemical Oxygen Demand)
- Beryllium [water, surface water]: 5.35501e-10 kg; lognormal variance with pedigree 2.3855, pedigree (1,1,5,5,4)
  (same comment as for COD, Chemical Oxygen Demand)
- Potassium, ion [water, surface water]: 0.000744176 kg; lognormal variance with pedigree 0.656532, pedigree (1,1,5,5,4)
  (same comment as for COD, Chemical Oxygen Demand)
- Arsenic, ion [water, surface water]: 9.39e-5 kg; lognormal variance with pedigree 1.0524, pedigree (1,1,5,5,4)
  (same comment as for COD, Chemical Oxygen Demand)
- BOD5, Biological Oxygen Demand [water, ground-, long-term]: 0.00407067 kg; lognormal variance with pedigree 0.529796, pedigree (1,1,5,5,4)
  (same comment as for Arsenic, ion)
- Nickel, ion [water, surface water]: 8.76385e-7 kg; lognormal variance with pedigree 1.40974, pedigree (1,1,5,5,4)
  (same comment as for COD, Chemical Oxygen Demand)
- Antimony [water, surface water]: 2.38397e-5 kg; lognormal variance with pedigree 1.12572, pedigree (1,1,5,5,4)
  (same comment as for COD, Chemical Oxygen Demand)
- Selenium [water, ground-, long-term]: 2.29159e-6 kg; lognormal variance with pedigree 1.49205, pedigree (1,1,5,5,4)
  (same comment as for Arsenic, ion)
- Aluminium [water, ground-, long-term]: 0.000400751 kg; lognormal variance with pedigree 1.06929, pedigree (1,1,5,5,4)
  (same comment as for Arsenic, ion)
- Copper, ion [water, surface water]: 2.20428e-8 kg; lognormal variance with pedigree 1.89442, pedigree (1,1,5,5,4)
  (same comment as for COD, Chemical Oxygen Demand)

## Sampling procedure
For more details about sampling procedures, refer to: Turner, D. & Symeonidis, A. (2020). Life cycle inventories of the treatment of iron and steelmaking by-products, ecoinvent association, Zürich, Switzerland.

## Extrapolations
This dataset has been extrapolated from year 2017 to the year of the calculation (2021). The uncertainty has been adjusted accordingly.
