# concentrated solar power plant construction, solar tower power plant, 20 MW

Dataset: EcoSpold 2, unit process
Geography: ZA
Time period: 2010-01-01 to 2021-01-01
Technology level: current
Classification: ISIC rev.4 ecoinvent: 4220:Construction of utility projects
Tags: Concentrated Solar Power; CSP
Scenario: Business-as-Usual
System model: Allocation, cut-off by classification
Generated by: Karin Treyer
Published in: Telsnig, Thomas 2015
Database: ecoinvent
isCopyrightProtected: true
accessRestrictedTo: 1

## General comment
This activity represents the construction of a concentrated solar power solar tower plant with a capacity of 20 MW in Upington, South Africa. The construction of the solar power plant requires five different units in order to produce electricity. The five key units are collector field area, receiver system, thermal storage unit, steam generation system and a power block unit. Further, site preparation activities are also included in the dataset (e.g. clearing shrubs, construction of roads, fences, providing water connectivity).
This dataset is entirely based on the detailed life cycle inventory as presented in the dissertation report by
Telsnig, Thomas. 2015. Standortabhängige Analyse und Bewertung solarthermischer Kraftwerke am Beispiel Südafrikas. Forschungsbericht. Band 123. ISSN 0938-1228. Institut für Energiewirtschaft und Rationelle Energieanwendung, Universität Stuttgart, Germany.

## Included activities start
The activity starts with the preparation of the site (land use, access roads, buildings, water supply, clearing shrubs, construction of roads, fences, etc.)

## Included activities end
The activity ends with the power plant ready for electricity production after combination of all necessary components and and all necessary preparations.

## Geography
The CSP plant represented in this dataset has been modelled specifically for South African conditions (see Telsnig 2015).

## Reference product
- concentrated solar power plant, solar tower, 20 MW: 1 unit; name RP_amount_1; By-product classification allocatable product; CPC 53262: Power plants; pedigree (1,1,1,1,1)
  Reference product unit for a concentrated solar plant construction of 20 mega watts.
  production volume 1 unit; name RP_PV_1
    Assumption
  property lifetime 30 year; name lifetime
    The economic lifetime of the plant is assumed to be 30 years.
  property price 1.303e8 EUR2005; name RP_amount_1_price_EUR2005
    Telsnig 2015: Investment cost for a 20MW CSP solar tower plant in South Africa (EUR2010) with limited storage capacity (see Table 4-4 in Telsnig, 2015). Apart from the cost of the components this includes about 25 million Euros of indirect cost and owner's cost.
    Reference(s): Telsnig, Thomas. 2015. Standortabhängige Analyse und Bewertung solarthermischer Kraftwerke am Beispiel Südafrikas. Forschungsbericht. Band 123. ISSN 0938-1228. Institut für Energiewirtschaft und Rationelle Energieanwendung, Universität Stuttgart, Germany.

## Inputs from technosphere
- waste reinforcement steel: -765.1 kg; name BP_amount_2; = (steel*0.35)*-1
  All steel types are assumed to be treated as reinforcing steel due to lack of other appropriate datasets in ecoinvent.
  For the time period 2003-2012, average steel recycling rate in South Africa amounted to 35% fo the total steel mass according to Telsnig 2015. The remaining steel is assumed to be sent to final disposal.
  production volume 765.1 kg; = RP_PV_1 * (BP_amount_2 / RP_amount_1)
    Calculated from production volume of reference product using the relative outputs.
  property price 0 EUR2005; name BP_amount_2_price_EUR2005
  properties: dry mass 1 kg, wet mass 1 kg
- steam generation system, solar tower power plant, 20 MW: 1 unit; lognormal variance with pedigree 0.0197, pedigree (4,4,4,3,2)
  Represents the steam generation unit input required for the complete construction of the 20MW solar tower. ;activityLink introduced to establish a direct link to the corresponding regional supply of this product
- collector field area, solar tower power plant, 20 MW: 1 unit; lognormal variance with pedigree 0.0197, pedigree (4,4,4,3,2)
  Represents the collector field area unit input required for the complete construction of the 20MW solar tower.
- building, hall, wood construction: 2411 m2; lognormal variance with pedigree 0.0197, pedigree (4,4,4,3,2)
  Includes warehouse maintenance, electrical control of building and security
- excavation, hydraulic digger: 22937 m3; lognormal variance with pedigree 0.0197, pedigree (4,4,4,3,2)
  Piping- yardpiping backfill and excavation. It is assumed that the whole excavated volume also has to be put back again once the pipes have been set.
- receiver system, solar tower power plant, 20 MW: 1 unit; lognormal variance with pedigree 0.0197, pedigree (4,4,4,3,2)
  Represents the receiver system unit input required for the complete construction of the 20MW solar tower. ;activityLink introduced to establish a direct link to the corresponding regional supply of this product
- waste reinforcement steel: -1420.9 kg; name BP_amount_3; = (steel*0.65)*-1
  (same comment as for waste reinforcement steel)
  production volume 1420.9 kg; = RP_PV_1 * (BP_amount_3 / RP_amount_1)
    Calculated from production volume of reference product using the relative outputs.
  property price 0 EUR2005; name BP_amount_3_price_EUR2005
  properties: wet mass 1 kg, dry mass 1 kg
- water supply network: 5 km; lognormal variance with pedigree 0.0197, pedigree (4,4,4,3,2)
  For sanitary sewers and drains
- steel, unalloyed: 2186 kg; name steel; lognormal variance with pedigree 0.0197, pedigree (4,4,4,3,2)
  Used for construction of site fences. The fences are 2 m tall and 2.4 kg in mass.
  properties: carbon content, fossil 0.0025, wet mass 1 kg, dry mass 1 kg
- wire drawing, steel: 2186 kg; = steel; lognormal variance with pedigree 0.0197, pedigree (4,4,4,3,2)
  Process done to draw wires from steel to construct fences
- thermal storage system, solar tower power plant, 20 MW: 1 unit; lognormal variance with pedigree 0.0197, pedigree (4,4,4,3,2)
  Represents the thernal storage unit input required for the complete construction of the 20MW solar tower. ;activityLink introduced to establish a direct link to the corresponding regional supply of this product
- road: 25414 m*year; lognormal variance with pedigree 0.0197, pedigree (4,4,4,3,2)
  Access roads primarily constructed for transport of construction materials, operational and maintenance activities.
- power block, solar tower power plant, 20 MW: 1 unit; lognormal variance with pedigree 0.0197, pedigree (4,4,4,3,2)
  Represents the power block unit input required for the complete construction of the 20MW solar tower.
- decommissioned road: -25414 m*year; name BP_amount_1; = (road)*-1; lognormal variance with pedigree 0.0197, pedigree (4,4,4,3,2)
  End of life treatment for roads constructed
  production volume 25414 m*year; = RP_PV_1 * (BP_amount_1 / RP_amount_1)
    Calculated from production volume of reference product using the relative outputs.
  property price 0 EUR2005; name BP_amount_1_price_EUR2005
  properties: carbon content, fossil 0.0220896, wet mass 122 kg, dry mass 122 kg

## Inputs from nature
- Transformation, to industrial area [natural resource, land]: 751888 m2; = transformation_from
  Process of transforming unused area to industrial sector
- Occupation, industrial area [natural resource, land]: 2.25566e7 m2*year; = transformation_from*lifetime
  Area occupied by CSP plant over the lifetime of the plant.
- Transformation, from grassland, natural (non-use) [natural resource, land]: 751888 m2; name transformation_from; lognormal variance with pedigree 0.0197, pedigree (4,4,4,3,2)
  Process of transforming unused area to industrial sector

## Sampling procedure
This dataset is entirely based on the detailed life cycle inventory as presented in the dissertation report by
Telsnig, Thomas. 2015. Standortabhängige Analyse und Bewertung solarthermischer Kraftwerke am Beispiel Südafrikas. Forschungsbericht. Band 123. ISSN 0938-1228. Institut für Energiewirtschaft und Rationelle Energieanwendung, Universität Stuttgart, Germany.

Further, data in Telsnig 2015 are not shown explicitely for the downscaled 20 MW solar tower power plant. This gap is filled in the ecoinvent report.

## Extrapolations
This dataset has been extrapolated from year 2020 to the year of the calculation (2021). The uncertainty has been adjusted accordingly.

## Review by Christopher Oberschelp 2017-03-13
Very detailed, structured and well-documented datasets. Main exchanges have been checked and make sense.
