# treatment of coal gas, in power plant

Dataset: EcoSpold 2, unit process
Geography: UA
Time period: 1990-01-01 to 2021-12-31
Technology level: current
Classification: ISIC rev.4 ecoinvent: 3510:Electric power generation, transmission and distribution
Classification: EcoSpold01Categories: natural gas/power plants
Synonyms: coke oven gas
Tags: fossil fuels; industrial gas power
Scenario: Business-as-Usual
System model: Allocation, cut-off by classification
Generated by: Karin Treyer
Published in: Faist Emmenegger, M. 2007
Database: ecoinvent
isCopyrightProtected: true
accessRestrictedTo: 1

## General comment
Activity represents electricity production from coal gas treatment in power plants. Based on European data.
This dataset represents the treatment of coke oven gas (coal gas) in an unspecified gas power plant with high voltage electricity and heat as by-product in Ukraine in 2012.
According to IEA (2008), coke oven gas is obtained as a by-product of solid fuel carbonisation and gasification operations carried out by coke producers and iron and steel plants not connected with gas works and municipal gas plants.
The efficiency calculations are based on IEA/OECD statistics (fuel inputs, electricity produced). No exergy correction could be made due to incomplete data (see ecoinvent report "Erdgas" p. 128 for details).
Water is used for wet cooling and as feed water in the steam circuit. In this dataset, 100% wet cooling and no once-through cooling is assumed.
EMISSIONS:
Emission data have partly been overtaken from a dataset representing the production of electricity in a natural gas power plant. Data have partly been adapted to the different composition of natural gas and coal gas (see tab. 11.16 in ecoinvent report "Erdgas").
Different sources served as basis for assumption of average emissions. Where possible, the most recent sources were taken into account, whereas older sources were taken in order to determine the remaining data gaps. The emissions have been fixed for the former UCTE region* and have been overtaken as such for all countries without value adaptation (adaptation of the uncertainty). See ecoinvent report "Erdgas" given as main source for details (Tab. 11.15 and tab. 11.17). In the following a short overview:
- Emissions of NOx, CO, CO2, SO2, particles, N2O and CH4 are mainly taken from CORINAIR 2001, Rentz et al. 2002, and Swedish EPA 2000 (see tab. 11.17) and are basically valid for European countries.
- NOx emissions are a major challenge in natural gas power plants. With rising temperature, emissions also rise; band widths of NOx emissions in literature are correspondingly large. There are several methods to diminish these emissions.
- CO is a result of incomplete burning. For economic and technical reasons, plant combustion is optimized and CO emissions are low.
- CO2 and SO2 emissions are depending on the composition of the used fuel.
Coal gas can have very different sulfur contents and is washed out. Efficiency of sulfur removal is assumed to reach 90%.
- Organic compound emissions are estimated on the basis of EPA 1998.
- Particles are assumed to be smaller than 2.5 micro-m
Sources:
EMEP/CORINAIR 2001: Joint EMEP/CORINAIR Atmospheric Emission Inventory Guidebook, Third Edition. Copenhagen: European Environment Agency, 2001. http://reports.eea.eu.int/technical_report_2001_3/en.
Rentz O., Karl U., Peter H. (2002). Ermittlung und Evaluierung von Emissionsfaktoren für Feuerungsanlagen in Deutschland für die Jahre 1995, 2000 und 2010. Deutsch- Französisches Institut für Umweltforschung, Uni Karsruhe. Endbericht. Im Auftrag des Umweltbundesamtes. Forschungsbericht 299 43 142. Umweltbundesamt. Berlin.
Swedish EPA (2000) Emission Factors. Swedish Environmental Protection Agency.
IEA/OECD. 2008. Coal information 2008. International Energy Agency (IEA), Paris Cedex (FR)
*former UCTE: Union for the Coordination of the Transmission of Electricity, since 2009 replaced by ENTSO-E European Network of Transmission System Operators for Electricity.

## Included activities start
From the coal gas ready to be treated in a gas power plant and from the gas power plant ready to produce electricity.

## Included activities end
This treatment activity ends with 1MJ of coal gas treated in a power plant.

This dataset includes:
- the emissions from burning
- all operation and maintenance activities and materials of the power plants.
- Cooling: It is a assumed that all plants use wet cooling with a cooling tower. No cooling tower is included in this dataset (will be implemented in future versions)

This dataset doesn"t include
- raw materials extraction, decommissioning and waste treatment as these activities are already included in the infrastructure datasets.
- transformation of the by-product electricity.

## Technology
A natural gas power plant with a capacity of 100 MW is taken as power plant infrastructure.

## Time period
The annual production volume is valid for the year 2012.

## Parameters
- electrical efficiency, country: 0.3 dimensionless; name efficiency_electrical_country; lognormal variance with pedigree 0.0167, pedigree (4,2,1,1,3)
  Literature value/calculated value. Net electrical efficiency based on the lower heating value (LHV).
  For all OECD countries, the IEA Energy statistics of OECD countries 2014 provides data for the year 2012 on fuel input (TJ, Net calorific value NCV) in CHP plants and electricity plants and gross electricity production (GWh) for each country. Together with the information on own use, the net electrical efficiency based on the NCV is calculated. From the statistics, electricity from coke oven gas is modelled in the dataset "treatment of coal gas", while electricity from "recovered gas (including blast furnace gas and other recovered gas) and gas works gas is modelled with the dataset "treatment of blast furnace gas".
  For all non-OECD countries, data from the IEA Energy statistics of non-OECD countries 2014 and the IEA electricity information have been used. The energy statistics source provides data on fuel input from coke oven gas (coal gas) as well as recovered gases and gas works gas (modelled as blast furnace gas). The electricity information provides information on total electricity production with "gases" (=gas works gas, coke oven gas, blast furnace gas and other recovered gases). This electricity production is allocated to the coal gas and blast furnace gas dataset in ecoinvent based on the fuel input. It cannot be differentiated between electricity only and CHP plants as total values only are given.
  IEA. 2014. Electricity Information 2014. ISBN 978-92-64-21692-1. International Energy Agency (IEA), Paris Cedex (FR).
  IEA/OECD. 2014. Energy statistics of non-OECD countries 2014. International Energy Agency (IEA), Paris Cedex (FR).
  IEA/OECD. 2014. Energy statistics of OECD countries 2014. International Energy Agency (IEA), Paris Cedex (FR).
  The original value calculated by the statistics was 0.029, which seems to be unrealistic. A value of 0.3 is therefore being used (own assumption).
- thermal efficiency: 0.145 dimensionless; name efficiency_thermal; lognormal variance with pedigree 0.0118, pedigree (2,3,1,5,3)
  Literature value/calculation for the thermal efficiency. IEA/OECD statistics provided data for OECD countries in total: Fuel input in CHP plants and the electricity and heat output. Not enough detailed data were available for non-OECD countries and/or the whole world, so that for this global dataset, the OECD value was overtaken. Data are for the category "coal manufactured gases" including coke oven gas, blast furnace gas and oxygen steel furnace gas. Fuel input data in the statistics are expressed in gross calorific values. Net calorific values are calculated according to IEA/OECD p. I.7 by multiplying the gross heat content with a factor 0.9, taking therefore the lower factor for coke oven gas, corresponding to a worst case scenario (blast furnace gas and oxygen steel furnace gas have a gross to net ratio of 1).
  IEA/OECD. 2010. Electricity Information 2010. International Energy Agency (IEA), Paris Cedex (FR). Part IV. Detailed OECD Electricity And Heat Data.
  nan
- electrical efficiency, global: 0.302 dimensionless; name efficiency_electrical_global; lognormal variance with pedigree 0.0167, pedigree (4,2,1,1,3)
  Literature value/calculated value. Net electrical efficiency based on the lower heating value (LHV).
  For all OECD countries, the IEA Energy statistics of OECD countries 2014 provides data for the year 2012 on fuel input (TJ, Net calorific value NCV) in CHP plants and electricity plants and gross electricity production (GWh) for each country. Together with the information on own use, the net electrical efficiency based on the NCV is calculated. From the statistics, electricity from coke oven gas is modelled in the dataset "treatment of coal gas", while electricity from "recovered gas (including blast furnace gas and other recovered gas) and gas works gas is modelled with the dataset "treatment of blast furnace gas".
  For all non-OECD countries, data from the IEA Energy statistics of non-OECD countries 2014 and the IEA electricity information have been used. The energy statistics source provides data on fuel input from coke oven gas (coal gas) as well as recovered gases and gas works gas (modelled as blast furnace gas). The electricity information provides information on total electricity production with "gases" (=gas works gas, coke oven gas, blast furnace gas and other recovered gases). This electricity production is allocated to the coal gas and blast furnace gas dataset in ecoinvent based on the fuel input. It cannot be differentiated between electricity only and CHP plants as total values only are given.
  IEA. 2014. Electricity Information 2014. ISBN 978-92-64-21692-1. International Energy Agency (IEA), Paris Cedex (FR).
  IEA/OECD. 2014. Energy statistics of non-OECD countries 2014. International Energy Agency (IEA), Paris Cedex (FR).
  IEA/OECD. 2014. Energy statistics of OECD countries 2014. International Energy Agency (IEA), Paris Cedex (FR).
- relation between the global and the country's efficiency: 1.00667 dimensionless; name relation_global_country; = efficiency_electrical_global/ efficiency_electrical_country; undefined min 1, max 1, standardDeviation95 0, pedigree (1,1,1,1,1)
  This factor brings the amounts of the exchanges in the global dataset into relation with the amounts in the country datasets.

## Reference product
- coal gas: 0 MJ; source Faist Emmenegger, M. 2007; By-product classification allocatable product; CPC 17200: Coal gas, water gas, producer gas and similar gases, other than petroleum gases and other gaseous hydrocarbons
  production volume 0 MJ; name apv_coal_gas; = apv_electricity*3.6*(1/efficiency_electrical_country)
    Calculated value.
  property price 0.015 EUR2005; name coal_gas_price_EUR2005
    Temporary price data. Calculated as 90% of purchasers price based on: 2004 prices calculated from Import/Export data (total trades (USD) divided by total weight (kg) in EU27, USA, China, Japan and India) from UN Trade data statistics (http://data.un.org/Explorer.aspx, Accessed 6 July 2010). Data from UN trade are in mass unit. Density at 0.8 kg/m3 and calorific value (lower) of 20 MJ/m3 to convert from kg to MJ.
  property carbon content 0.288181
    carbon content on a dry matter basis (reserved; not for manual entry)
  properties: carbon content, fossil 0.288181, water in wet mass 0 kg, wet mass 0.0294737 kg, water content 0, dry mass 0.0294737 kg, carbon content, non-fossil 0, carbon allocation 0.00849374 kg
- heat, district or industrial, other than natural gas: 1 MJ; = coal_gas*efficiency_thermal*(-1); source IEA/OECD 2010, p. IV.13; By-product classification allocatable product; CPC 17300: Steam and hot water; pedigree (1,1,1,1,1)
  Calculated value
  production volume 3.8106e8 MJ; = apv_coal_gas* efficiency_thermal
  properties: true value relation 0.1842, exergy 0.1842 MJ, price 0.0106 EUR2005, heating value, net 1 MJ, true value 0.000791247

## By-products
- heat, district or industrial, other than natural gas: 0 MJ; source IEA/OECD 2010, p. IV.13; By-product classification allocatable product; CPC 17300: Steam and hot water; pedigree (1,1,3,1,1)
  Calculated value
  production volume 0 MJ; = apv_coal_gas* efficiency_thermal
    Calculated from production volume of reference product using the relative outputs.
  property exergy 0.1842 MJ
    This exergy property is based on the exergy content of the product.
  property price 0.0106 EUR2005
    Average European district heat price from Ecoheatcool and Euroheat 2005-2006, Ecoheat Work package 1: The European heat market. Final report. 10.6 EUR/GJ i s the price of district heat. http://www.solarthermalworld.org/files/Ecoheatcool%20WP1%20Web.pdf?download
  properties: true value relation 0.1842, heating value, net 1 MJ
- electricity, high voltage: 0 kWh; source IEA/OECD 2010, p. II.8ff; By-product classification allocatable product; CPC 17100: Electrical energy; undefined min 0.0766667, max 0.0766667, standardDeviation95 0, pedigree (1,1,3,1,1)
  Calculated value. 1kWh = 3.6 MJ
  production volume 2.19e8 kWh; name apv_electricity
    Literature value/calculated value. Net electricity production in 2012.
    For all OECD countries, the IEA Energy statistics of OECD countries 2014 provides data for the year 2012 on gross electricity production (GWh) for each country. Together with the information on own use, the net electrical efficiency based on the NCV is calculated. From the statistics, electricity from coke oven gas is modelled in the dataset "treatment of coal gas", while electricity from "recovered gas (including blast furnace gas and other recovered gas) and gas works gas is modelled with the dataset "treatment of blast furnace gas".
    For all non-OECD countries, data from the IEA Energy statistics of non-OECD countries 2014 and the IEA electricity information have been used. The energy statistics source provides data on fuel input from coke oven gas (coal gas) as well as recovered gases and gas works gas (modelled as blast furnace gas). The electricity information provides information on total electricity production with "gases" (=gas works gas, coke oven gas, blast furnace gas and other recovered gases). This electricity production is allocated to the coal gas and blast furnace gas dataset in ecoinvent based on the fuel input. It cannot be differentiated between electricity only and CHP plants as total values only are given.
    IEA. 2014. Electricity Information 2014. ISBN 978-92-64-21692-1. International Energy Agency (IEA), Paris Cedex (FR).
    IEA/OECD. 2014. Energy statistics of non-OECD countries 2014. International Energy Agency (IEA), Paris Cedex (FR).
    IEA/OECD. 2014. Energy statistics of OECD countries 2014. International Energy Agency (IEA), Paris Cedex (FR).
  property price 0.0977 EUR2005
    Temporary price data. Calculated as 90% of purchasers price based on: 94% of the average price (to account for a 6% loss in transformation and transmission) for electricity for industrial consumersin 2005 (excluded taxes). From IEA.
  property exergy 3.6 MJ
    This exergy property is based on the exergy content of the product.
  property true value 0.00888742
    allocation property applied in "true value" allocation // value calculated from true value relation
  properties: true value relation 3.6

## Inputs from technosphere
- gas power plant, 100MW electrical: 0 unit; source Faist Emmenegger, M. 2007
  Literature value/calculated value. Amount of power plant needed for burning 1MJ of coal gas.
- gas power plant, 100MW electrical: 3.13475e-11 unit; source Faist Emmenegger, M. 2007; lognormal variance with pedigree 0.1707, pedigree (3,3,5,3,3)
  (same comment as for gas power plant, 100MW electrical)
- water, completely softened: 0.00360691 kg; source Röder, A. 2007; pedigree (1,1,3,1,1)
  Literature value/assumption. Feed water for the steam circuit lost when burning 1MJ of coal gas. Röder et al. 2007, Tab. 9.65 and Tab. 9.66, p. 160f. Faist Emmenegger et al. 2007 state that there have been nearly no information on water use in coal gas power plants and therefore neglected the water use. For consistency reasons, here it is assumed a certain water use also for the treatment of coal gas.
  properties: wet mass 1 kg
- water, decarbonised: 0.112761 kg; source Röder, A. 2007; pedigree (1,1,3,1,1)
  Literature value/calculated value. Cooling water, decarbonised, for the water lost in the cooling water circuit when burning 1 MJ of coal gas. Röder et al. 2007, Tab. 9.65 and Tab. 9.66, p. 160f. Faist Emmenegger et al. 2007 state that there have been nearly no information on water use in coal gas power plants and therefore neglected the water use. For consistency reasons, here it is assumed a certain water use also for the treatment of coal gas.
  properties: wet mass 1 kg
- coal gas: 0.563804 MJ; source Faist Emmenegger, M. 2007
  production volume 2.628e9 MJ
  properties: carbon content, fossil 0.288181, wet mass 0.0294737 kg, dry mass 0.0294737 kg

## Inputs from nature
- Water, cooling, unspecified natural origin [natural resource, in water]: 0.000572122 m3; pedigree (1,1,3,1,1)
  Exchange present due to parent child relationship

## Emissions to nature
- Dinitrogen monoxide [air, non-urban air or from high stacks]: 1.12761e-6 kg; source Faist Emmenegger, M. 2007, p. Tab. 11.17 p. 135 / Tab. 16.10; pedigree (4,3,5,4,4)
  Literature value. Range of values from different references.
- Dioxins, measured as 2,3,7,8-tetrachlorodibenzo-p-dioxin [air, non-urban air or from high stacks]: 0 kg; source Faist Emmenegger, M. 2007, p. Tab. 11.21, Tab. 16.10; pedigree (4,4,5,3,5)
  Literature value/calculated value. Value overtaken from the dataset of natural gas burned in a normal power plant (electricity production, natural gas, GLO 2008).
  Emissions when burning 1MJ of natural gas. Weighted average with electricity production data (Itten&Frischknecht 2012) and emission values of 11 countries
  (AT, BE, DE, ES, FR, GB, IT, JP, LU, NL, US) (Faist Emmenegger et al. 2007, JP and US in the appendix)
  Source:
  Itten R. and Frischknecht R. (2012) Life Cycle Inventories of Electricity Mixes and Grid. ESU-services Ltd., Uster, Switzerland.
- Benzo(a)pyrene [air, non-urban air or from high stacks]: 2.98253e-13 kg; source Faist Emmenegger, M. 2007, p. Tab. 11.19 p.138; pedigree (4,4,5,3,5)
  Literature value/calculated value. Value overtaken from the dataset of natural gas burned in a normal power plant (electricity production, natural gas, GLO 2008).
  Emissions when burning 1MJ of natural gas. Weighted average with electricity production data (Itten&Frischknecht 2012) and emission values of 11 countries
  (AT, BE, DE, ES, FR, GB, IT, JP, LU, NL, US) (Faist Emmenegger et al. 2007, JP and US in the appendix)
  Country emissions values estimate from range of values from different references. See Tab. 11.19, p. 138 in Faist Emmenegger et al. 2007.
  Source:
  Itten R. and Frischknecht R. (2012) Life Cycle Inventories of Electricity Mixes and Grid. ESU-services Ltd., Uster, Switzerland.
- Acenaphthene [air, non-urban air or from high stacks]: 4.47097e-13 kg; source Faist Emmenegger, M. 2007, p. Tab. 11.19 p.138; pedigree (4,4,5,3,5)
  (same comment as for Benzo(a)pyrene)
- Water [air, unspecified]: 7.69382e-6 m3; pedigree (1,1,3,1,1)
  Exchange present due to parent child relationship
- Toluene [air, non-urban air or from high stacks]: 8.45707e-10 kg; source Faist Emmenegger, M. 2007, p. Tab. 11.19 p.138; pedigree (4,4,5,3,5)
  (same comment as for Benzo(a)pyrene)
- Propionic acid [air, non-urban air or from high stacks]: 9.02087e-9 kg; source Faist Emmenegger, M. 2007, p. Tab. 11.19 p.138; pedigree (4,4,5,3,5)
  (same comment as for Benzo(a)pyrene)
- Butane [air, non-urban air or from high stacks]: 5.22083e-7 kg; source Faist Emmenegger, M. 2007, p. Tab. 11.19 p.138; pedigree (4,4,5,3,5)
  (same comment as for Benzo(a)pyrene)
- PAH, polycyclic aromatic hydrocarbons [air, non-urban air or from high stacks]: 4.51044e-9 kg; source Faist Emmenegger, M. 2007, p. Tab. 11.19 p.138; pedigree (4,4,5,3,5)
  (same comment as for Benzo(a)pyrene)
- Ethane [air, non-urban air or from high stacks]: 7.72412e-7 kg; source Faist Emmenegger, M. 2007, p. Tab. 11.19 p.138; pedigree (4,4,5,3,5)
  (same comment as for Benzo(a)pyrene)
- Particulates, < 2.5 um [air, non-urban air or from high stacks]: 5.63804e-7 kg; source Faist Emmenegger, M. 2007, p. Tab. 11.17 p. 135; pedigree (4,3,5,4,4)
  Literature value. Range of values from different references.
- Hexane [air, non-urban air or from high stacks]: 4.47097e-7 kg; source Faist Emmenegger, M. 2007, p. Tab. 11.19 p.138; pedigree (4,4,5,3,5)
  (same comment as for Benzo(a)pyrene)
- Formaldehyde [air, non-urban air or from high stacks]: 1.86619e-8 kg; source Faist Emmenegger, M. 2007, p. Tab. 11.19 p.138; pedigree (4,4,5,3,5)
  (same comment as for Benzo(a)pyrene)
- Nitrogen oxides [air, non-urban air or from high stacks]: 5.63804e-5 kg; source Faist Emmenegger, M. 2007, p. Tab. 11.17 p. 135; pedigree (4,3,5,4,4)
  Literature value/estimation. Range of values from different references.
- Methane, fossil [air, non-urban air or from high stacks]: 5.63804e-7 kg; source Faist Emmenegger, M. 2007, p. Tab. 11.17 p. 135; pedigree (4,3,5,4,4)
  Literature value. Range of values from different references.
- Lead [air, non-urban air or from high stacks]: 5.80719e-11 kg; source Faist Emmenegger, M. 2007, p. Tab 16.10; pedigree (4,4,5,5,5)
  Literature value/calculated value. Value overtaken from the dataset of natural gas burned in a normal power plant (electricity production, natural gas, GLO 2008).
  Emissions when burning 1MJ of natural gas. Weighted average with electricity production data (Itten&Frischknecht 2012) and emission values of 11 countries
  (AT, BE, DE, ES, FR, GB, IT, JP, LU, NL, US) (Faist Emmenegger et al. 2007, JP and US in the appendix. Only the US dataset contains heavy metals emissions.)
  Source:
  Itten R. and Frischknecht R. (2012) Life Cycle Inventories of Electricity Mixes and Grid. ESU-services Ltd., Uster, Switzerland.
- Pentane [air, non-urban air or from high stacks]: 6.48375e-7 kg; source Faist Emmenegger, M. 2007, p. Tab. 11.19 p.138; pedigree (4,4,5,3,5)
  (same comment as for Benzo(a)pyrene)
- Acetic acid [air, non-urban air or from high stacks]: 6.82203e-8 kg; source Faist Emmenegger, M. 2007, p. Tab. 11.19 p.138; pedigree (3,4,5,3,5)
  (same comment as for Benzo(a)pyrene)
- Carbon dioxide, fossil [air, non-urban air or from high stacks]: 0.0281902 kg; source Faist Emmenegger, M. 2007, p. Tab. 11.17 p. 135 / Tab. 16.10; pedigree (4,3,5,4,4)
  Literature value. Range of values from different references.
- Carbon monoxide, fossil [air, non-urban air or from high stacks]: 5.63804e-6 kg; source Faist Emmenegger, M. 2007, p. Tab. 11.17 p. 135 / Tab. 16.10; pedigree (4,3,5,4,4)
  Literature value. Range of values from different references. CO is a result of incomplete burning. For economic and technical reasons, plant combustion is optimized and CO emissions are low.
- Water [water, unspecified]: 0.000564429 m3; pedigree (1,1,3,1,1)
  Exchange present due to parent child relationship
- Propane [air, non-urban air or from high stacks]: 3.97482e-7 kg; source Faist Emmenegger, M. 2007, p. Tab. 11.19 p.138; pedigree (4,4,5,3,5)
  (same comment as for Benzo(a)pyrene)
- Sulfur dioxide [air, non-urban air or from high stacks]: 5.07424e-5 kg; source Faist Emmenegger, M. 2007, p. Tab. 11.17 p. 135; pedigree (4,3,5,4,4)
  Literature value. Range of values from different references.
- Benzene [air, non-urban air or from high stacks]: 5.22083e-10 kg; source Faist Emmenegger, M. 2007, p. Tab. 11.19 p.138; pedigree (4,4,5,3,5)
  (same comment as for Benzo(a)pyrene)
- Acetaldehyde [air, non-urban air or from high stacks]: 4.51044e-10 kg; source Faist Emmenegger, M. 2007, p. Tab. 11.19 p.138; pedigree (4,4,5,3,5)
  (same comment as for Benzo(a)pyrene)

## Sampling procedure
Literature and statistics

## Extrapolations
Emission data partly taken over from natural gas power plants.
Emission data partly from old references.
A natural gas power plant is taken as infrastructure input.
