# stibnite mine operation, 70% stibnite

Dataset: EcoSpold 2, unit process
Geography: CA-QC
Time period: 1994-01-01 to 2021-12-31
Technology level: current
Classification: ISIC rev.4 ecoinvent: 0729:Mining of other non-ferrous metal ores
Tags: recontextualization
Scenario: Business-as-Usual
System model: Allocation, cut-off by classification
Generated by: Pascal Lesage
Published in: Classen M. 2008
Database: ecoinvent
isCopyrightProtected: true
accessRestrictedTo: 1

## General comment
The model represents mining and beneficiation of Stibnite in China. China produces more than 80% of the global Antimony.
Child dataset exchanges identical to GLO dataset. Created to enable linking to regional markets (e.g. for electricity). Data quality indicators adjusted accordingly.
[This dataset was already contained in the ecoinvent database version 2. It was not individually updated during the transfer to ecoinvent version 3. Life Cycle Impact Assessment results may still have changed, as they are affected by changes in the supply chain, i.e. in other datasets. This dataset was generated following the ecoinvent quality guidelines for version 2. It may have been subject to central changes described in the ecoinvent version 3 change report (http://www.ecoinvent.org/database/ecoinvent-version-3/reports-of-changes/), and the results of the central updates were reviewed extensively. The changes added e.g. consistent water flows and other information throughout the database. The documentation of this dataset can be found in the ecoinvent reports of version 2, which are still available via the ecoinvent website. The change report linked above covers all central changes that were made during the conversion process.]

## Included activities end
The module includes the mining and the beneficiation step with the mining infrastructure and disposal of overburden and tailings (see part 'Auxiliary Processes').

## Technology
This module is approximated with values from molybdenum mining and beneficiation (coupled with copper mining)

## Parameters
- fraction, process water, to air: 0.2 dimensionless; lognormal variance with pedigree 0.092025, pedigree (4,4,3,2,4)

## Reference product
- stibnite ore, 70% stibnite: 1 kg; name stibnite_ore; By-product classification allocatable product; CPC 14290: Other non-ferrous metal ores and concentrates (other than uranium or thorium ores and concentrates)
  production volume 3000 kg; name ore_PV
    Estimated value form the Quebec production volume of antimony in 2009. Source: http://www.mindat.org/min-3782.html
  property price 0.92 EUR2005; name stibnite_ore_price_EUR2005
    Calculated value based on data from United Nations Commodity Trade Statistics Database (comtrade.un.org). UN comtrade category: 261710 Antimony ores and concentrates. Year 2005. Using exchange rate of 1EURO = 1.209 USD. Average of price of import into 5 main markets (EU, US, JP, IN and CN).
  property carbon content 0
    carbon content on a dry matter basis (reserved; not for manual entry)
  properties: carbon content, non-fossil 0, carbon content, fossil 0, wet mass 1 kg, water in wet mass 0 kg, dry mass 1 kg, water content 0, carbon allocation 0 kg

## Inputs from technosphere
- chemical, organic: 0.035445 kg; lognormal variance with pedigree 0.162, pedigree (1,1,5,5,1)
  reported values
  properties: wet mass 1 kg, dry mass 1 kg, heating value, net 19.03 MJ, carbon content, fossil 0.628
  note on carbon content, fossil: This dataset is an unweighted average of 20 organic substances (listed in Tab 88.1, ecoinvent v2.2 report 8, part II), being part of the top100 chemicals included in this database. The C-content has also been calculated as an unweighted average of the C content of the substances composing this dataset.
- mine infrastructure, underground, non-ferrous metal: 7.5328e-10 unit; lognormal variance with pedigree 0.448, pedigree (5,5,5,5,3)
- lime, packed: 0.19796 kg; lognormal variance with pedigree 0.042, pedigree (1,1,5,5,1)
  reported values
  properties: dry mass 0.998 kg, wet mass 1 kg, carbon content, fossil 0.117492, water content 0.00200401
  note on carbon content, fossil: Table 3.1, ecoinvent v2.2 report 7, part VII, pg 3. MW CaCO3=100, MW MgCO3=84
- sulfidic tailings, generic: -269.78 kg; name sulfudic_tailing; lognormal variance with pedigree 0.0427, pedigree (2,2,5,5,1)
  production volume 809340 kg; = ore_PV*(sulfudic_tailing/stibnite_ore)
    Calculated from the production volume of stibnite ore, 70% stibnite in proportion to the respective output amounts.
  property price 0 EUR2005; name sulfudic_tailing_price_EUR2005
  properties: calcium content 0.0045972, wet mass 1 kg, carbon content, fossil 0.0087785, aluminium content 0.014738, dry mass 0.7 kg, iron content 0.015374, potassium content 0.0025181, water content 0.428571, sodium content 0.0014472, magnesium content 0.0022359, silicon content 0.053273, oxygen content 0.89157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
- sodium cyanide: 0.0054949 kg; lognormal variance with pedigree 0.162, pedigree (1,1,5,5,1)
  reported values
  properties: heating value, net 7.43 MJ, dry mass 1 kg, carbon content, fossil 0.244898, wet mass 1 kg
- steel, chromium steel 18/8, hot rolled: 0.11679 kg; lognormal variance with pedigree 0.052, pedigree (1,1,5,5,1)
  reported values
  properties: carbon content, fossil 0.0008, wet mass 1 kg, dry mass 1 kg
  note on carbon content, fossil: Stainless steel model is the grade 304 steel (18/8 stainless, 18% chromium 8% nickel; max. 0.08% C)
- conveyor belt: 1.1912e-5 m; lognormal variance with pedigree 0.448, pedigree (5,5,5,5,3)
- diesel, burned in building machine: 0.0079416 MJ; lognormal variance with pedigree 0.0427, pedigree (2,2,5,5,1)
  properties: heating value, net 1 MJ
- aluminium hydroxide factory: 1.3197e-9 unit; lognormal variance with pedigree 0.3621, pedigree (3,2,5,5,3)
- chemical, inorganic: 0.12088 kg; lognormal variance with pedigree 0.162, pedigree (1,1,5,5,1)
  reported values
  properties: carbon content, fossil 0.003, dry mass 1 kg, wet mass 1 kg
  note on carbon content, fossil: This dataset is an unweighted average of 20 inorganic substances (listed in Tab 88.1, ecoinvent v2.2 report 8, part II), being part of the top100 chemicals included in this database. The C-content has also been calculated as an unweighted average of the C content of the substances composing this dataset.
- mine infrastructure, open cast, non-ferrous metal: 1.7285e-9 unit; lognormal variance with pedigree 0.448, pedigree (5,5,5,5,3)
- electricity, medium voltage: 3.9825 kWh; lognormal variance with pedigree 0.0432, pedigree (2,3,5,5,1)
- blasting: 0.15708 kg; lognormal variance with pedigree 0.0427, pedigree (2,2,5,5,1)

## Inputs from nature
- Transformation, from unspecified [natural resource, land]: 0.00027328 m2; lognormal variance with pedigree 0.1627, pedigree (2,2,5,5,1)
- Occupation, mineral extraction site [natural resource, land]: 0.0081752 m2*year; lognormal variance with pedigree 0.0827, pedigree (2,2,5,5,1)
- Water, river [natural resource, in water]: 0.23182 m3; lognormal variance with pedigree 0.0427, pedigree (2,2,5,5,1)
- Transformation, to mineral extraction site [natural resource, land]: 0.00027328 m2; lognormal variance with pedigree 0.1627, pedigree (2,2,5,5,1)
- Antimony, in ground [natural resource, in ground]: 0.7 kg; lognormal variance with pedigree 0.0427, pedigree (2,2,5,5,1)

## Emissions to nature
- Lead [air, non-urban air or from high stacks]: 1.0102e-6 kg; lognormal variance with pedigree 0.1021, pedigree (3,2,5,5,3)
- Nitrogen, organic bound [water, surface water]: 0.0052788 kg; lognormal variance with pedigree 1.372, pedigree (1,1,5,5,1)
  reported values
- Cadmium, ion [water, surface water]: 7.3577e-8 kg; lognormal variance with pedigree 1.372, pedigree (1,1,5,5,1)
  reported values
- Nickel [air, non-urban air or from high stacks]: 5.781e-6 kg; lognormal variance with pedigree 0.1021, pedigree (3,2,5,5,3)
- Chromium, ion [water, surface water]: 1.2672e-7 kg; lognormal variance with pedigree 1.372, pedigree (1,1,5,5,1)
  reported values
- Arsenic [air, non-urban air or from high stacks]: 1.0861e-7 kg; lognormal variance with pedigree 0.1021, pedigree (3,2,5,5,3)
- Fluorine [air, non-urban air or from high stacks]: 6.8905e-5 kg; lognormal variance with pedigree 0.1021, pedigree (3,2,5,5,3)
- Water [air, unspecified]: 0.046364 m3; lognormal variance with pedigree 0.0827, pedigree (2,2,5,5,1)
  Calculated value based on literature values and expert opinion. See comments in the parametres' comment field.
- Selenium [air, non-urban air or from high stacks]: 3.6146e-9 kg; lognormal variance with pedigree 0.1021, pedigree (3,2,5,5,3)
- Copper [air, non-urban air or from high stacks]: 3.6146e-6 kg; lognormal variance with pedigree 0.1021, pedigree (3,2,5,5,3)
- COD, Chemical Oxygen Demand [water, surface water]: 0.0024175 kg; lognormal variance with pedigree 1.372, pedigree (1,1,5,5,1)
  reported values
- Beryllium [air, non-urban air or from high stacks]: 1.8803e-7 kg; lognormal variance with pedigree 0.1021, pedigree (3,2,5,5,3)
- Cobalt [air, non-urban air or from high stacks]: 1.4423e-6 kg; lognormal variance with pedigree 0.1021, pedigree (3,2,5,5,3)
- Zinc [air, non-urban air or from high stacks]: 1.3723e-5 kg; lognormal variance with pedigree 0.1021, pedigree (3,2,5,5,3)
- Aluminium [water, surface water]: 2.0029e-5 kg; lognormal variance with pedigree 1.372, pedigree (1,1,5,5,1)
  reported values
- Calcium, ion [water, surface water]: 0.15883 kg; lognormal variance with pedigree 1.372, pedigree (1,1,5,5,1)
  reported values
- Particulates, > 10 um [air, non-urban air or from high stacks]: 0.0035504 kg; lognormal variance with pedigree 0.3741, pedigree (3,2,5,5,5)
- Dissolved solids [water, surface water]: 0.0011971 kg; lognormal variance with pedigree 1.372, pedigree (1,1,5,5,1)
  reported values
- Copper, ion [water, surface water]: 1.8336e-6 kg; lognormal variance with pedigree 1.372, pedigree (1,1,5,5,1)
  reported values
- Particulates, < 2.5 um [air, non-urban air or from high stacks]: 0.03673 kg; lognormal variance with pedigree 0.3741, pedigree (3,2,5,5,5)
- Cyanide [water, surface water]: 0.0006073 kg; lognormal variance with pedigree 0.1701, pedigree (4,2,5,5,4)
- Carbon dioxide, fossil [air, non-urban air or from high stacks]: 0.087007 kg; lognormal variance with pedigree 0.3326, pedigree (5,3,5,5,5)
- Boron [air, non-urban air or from high stacks]: 7.2409e-7 kg; lognormal variance with pedigree 0.1021, pedigree (3,2,5,5,3)
- Particulates, > 2.5 um, and < 10um [air, non-urban air or from high stacks]: 0.031942 kg; lognormal variance with pedigree 0.5541, pedigree (3,2,5,5,5)
- Cadmium [air, non-urban air or from high stacks]: 7.9416e-9 kg; lognormal variance with pedigree 0.1021, pedigree (3,2,5,5,3)
- Cobalt [water, surface water]: 1.8102e-7 kg; lognormal variance with pedigree 1.372, pedigree (1,1,5,5,1)
  reported values
- Water [water, unspecified]: 0.185456 m3; lognormal variance with pedigree 0.0827, pedigree (2,2,5,5,1)
  (same comment as for Water)
  property water in wet mass 1000 kg; name WWM
  property carbon content, non-fossil 0; name C_content_non_fossil
  property carbon content, fossil 0; name C_content_fossil
  property wet mass 1000 kg; name WM
  property dry mass 0 kg; name DM
- Chromium [air, non-urban air or from high stacks]: 7.2409e-6 kg; lognormal variance with pedigree 0.1021, pedigree (3,2,5,5,3)
- Arsenic, ion [water, surface water]: 6.8321e-7 kg; lognormal variance with pedigree 1.372, pedigree (1,1,5,5,1)
  reported values
- Sulfate [water, surface water]: 0.54657 kg; lognormal variance with pedigree 1.372, pedigree (1,1,5,5,1)
  reported values
- Nickel, ion [water, surface water]: 5.6467e-6 kg; lognormal variance with pedigree 1.372, pedigree (1,1,5,5,1)
  reported values
- Iron, ion [water, surface water]: 6.7153e-5 kg; lognormal variance with pedigree 1.372, pedigree (1,1,5,5,1)
  reported values
- Manganese [air, non-urban air or from high stacks]: 6.8905e-5 kg; lognormal variance with pedigree 0.1021, pedigree (3,2,5,5,3)
- DOC, Dissolved Organic Carbon [water, surface water]: 0.00094599 kg; lognormal variance with pedigree 1.372, pedigree (1,1,5,5,1)
  reported values
- BOD5, Biological Oxygen Demand [water, surface water]: 0.0024175 kg; lognormal variance with pedigree 1.372, pedigree (1,1,5,5,1)
  reported values
- Carbon disulfide [air, non-urban air or from high stacks]: 0.015708 kg; lognormal variance with pedigree 0.2501, pedigree (4,2,5,5,4)
- Mercury [air, non-urban air or from high stacks]: 3.6146e-9 kg; lognormal variance with pedigree 0.1021, pedigree (3,2,5,5,3)
- TOC, Total Organic Carbon [water, surface water]: 0.00094599 kg; lognormal variance with pedigree 1.372, pedigree (1,1,5,5,1)
  reported values
- Lead [water, surface water]: 6.4818e-7 kg; lognormal variance with pedigree 1.372, pedigree (1,1,5,5,1)
  reported values
- Mercury [water, surface water]: 8.7591e-9 kg; lognormal variance with pedigree 1.372, pedigree (1,1,5,5,1)
  reported values
- Manganese [water, surface water]: 5.7226e-6 kg; lognormal variance with pedigree 1.372, pedigree (1,1,5,5,1)
  reported values
- Antimony [air, non-urban air or from high stacks]: 1.4423e-8 kg; lognormal variance with pedigree 0.1021, pedigree (3,2,5,5,3)
- Zinc, ion [water, surface water]: 1.7577e-5 kg; lognormal variance with pedigree 1.372, pedigree (1,1,5,5,1)
  reported values

## Sampling procedure
literature

## Extrapolations
This dataset has been extrapolated from year 2003 to the year of the calculation (2021). The uncertainty has been adjusted accordingly.
