# furnace production, wood chips, with silo, 1000kW

Dataset: EcoSpold 2, unit process
Geography: RoW
Time period: 2010-01-01 to 2021-12-31
Technology level: modern
Classification: EcoSpold01Categories: oil/cogeneration
Classification: ISIC rev.4 ecoinvent: 2815:Manufacture of ovens, furnaces and furnace burners
Synonyms: wood fired boiler production; wood chips boiler production
Tags: biomass power
Scenario: Business-as-Usual
System model: Allocation, cut-off by classification
Generated by: Christian Bauer
Database: ecoinvent
isCopyrightProtected: true
accessRestrictedTo: 1

## General comment
This dataset represents the production and the disposal of a wood chips burning furnace for district heating networks, with the woodchips storage silo included.

## Included activities start
From reception of furnace components at the factory gate

## Included activities end
This activity ends with the disposal of the device in the end of its lifetime. The dataset includes the most important materials used for the fabrication of the furnace, the accumulation hot water tanks, the pipes for water connection, the screw conveyor system and the chimney flue pipes: steel, concrete, metal alloys, rock wool, plastics, electronic components, polystyrene, lubricating oil, paint. The dataset includes the basement for the furnace (60m2) and the wood chips storage silo in concrete (dimensions: 10x5x5m), which is assumed to be built in an external space out from an existing building. The dataset includes the land transformation and occupation and the energy and heat for the construction and the disposal of the device.

## Technology
Boiler of modern technology available on European and Swiss market, with conveyor grate technology and combustion chambers in refractory bricks, designed for an optimal combustion process. The model of reference is a woodchips boiler, brand Uniconfort mod.Global with capacity of 1000 kW. It was compared with two other models with similar technology (Froling mod.Lambdamat 1000kW, Schmid mod.Pyrotronic UTSR 1000kW). Represent the typical boiler for a district heating network or for heating several industrial/residential buildings.
Source of image: http://www.holzfeuerung.ch/index.php?ses=3a5003f8c163

## Time period
This model of furnace is commercialized in Europe and Switzerland and is still available on the market (end 2011)

## Reference product
- furnace, wood chips, with silo, 1000kW: 1 unit; name RP_amount_1; By-product classification allocatable product; CPC 43420: Industrial or laboratory furnaces and ovens, except non-electric bakery ovens; other industrial or laboratory […]
  EcoSpold01Location=GLO
  production volume 9975 unit; name RP_PV_1
    extrapolated with proportions (population) from the local dataset of Switzerland (from which value comes from an estimation of the auto furnaces >500kW produced within the country) - high uncertainty
  property capacity [MW] 1 MW; name capacity_MW
  property price 50373 EUR2005
    Calculated by 2.0 - Prices from UNDATA "Industrial furnace, oven, incinerator non-electric ne" (http://data.un.org/Data.aspx?q=industrial+furnace&d=ComTrade&f=_l1Code%3a84%3bcmdCode%3a841780). The prices are per kg and converted to per unit by summed weight of material concumption of the process in existing ecoinvent documentation from ecoinvent v.2.2. For weight of concrete, it is separately added for from price per m3 used of each unit and apply EU&DK input output database 2003 (0.08 Euro2003/kg DS of concrete => 176 Euro2003/m3 concrete).
  property lifetime 20 year; name lifetime
  property lifetime capacity [kWh] 1.752e8 kWh; name lifetime_capacity_kWh; = (lifetime*8760)*capacity_MW*1000
    calculated value

## By-products
- iron scrap, unsorted: 0 kg; CPC 39310: Slag, dross, scalings and other waste from the manufacture of iron or steel; By-product classification Recyclable; pedigree (1,1,1,1,1)
  disposal of cast iron
  production volume 0 kg; = RP_PV_1 * (BP_amount_6 / RP_amount_1)
    Calculated from production volume of reference product using the relative outputs.
  property price 0.149 EUR2005
    Temporary price data. Calculated as 90% of purchasers price based on: estimated at 85% of sorted scrap
  property carbon content 0
    carbon content on a dry matter basis (reserved; not for manual entry)
  properties: water in wet mass 0 kg, dry mass 1 kg, carbon content, fossil 0, wet mass 1 kg, water content 0, carbon content, non-fossil 0, carbon allocation 0 kg

## Inputs from technosphere
- electronics scrap from control units: -12 kg; name BP_amount_7; lognormal variance with pedigree 0.0107, pedigree (1,2,4,5,1)
  disposal of electronics for control units
  EcoSpold01Location=RER
  production volume 119700 kg; = RP_PV_1* BP_amount_7
    Calculated from production volume of reference product using the relative outputs.
  property price 0 EUR2005; name BP_amount_7_price_EUR2005
  properties: carbon content, fossil 0.337146, wet mass 1 kg, dry mass 1 kg, carbon content, non-fossil 0.00013442, lifetime 20 year
- heat, central or small-scale, other than natural gas: 0 MJ; source Uniconfort srl 2011; pedigree (1,1,1,1,1)
  EcoSpold01Location=CH
  estimation - data comes from a comparison between old dataset value and communication with Uniconfort producer (total annual heating value in factory/production)
  properties: heating value, net 1 MJ
- cast iron: 700 kg; source Uniconfort srl 2011; lognormal variance with pedigree 0.0298, pedigree (3,3,4,5,1)
  EcoSpold01Location=RER
  estimation
  properties: dry mass 1 kg, carbon content, fossil 0.04, wet mass 1 kg
  note on carbon content, fossil: Cast iron is made by remelting pig iron in small furnaces (e.g. cupola furnaces or electric arc furnaces) and poured into moulds to make castings. It usually contains 2% to 6% carbon (ecoinvent v2.2 report 10_partII). An average content of 4% was considered
- scrap copper: 0 kg; name BP_amount_8; pedigree (1,1,1,1,1)
  disposal of copper
  EcoSpold01Location=CH
  production volume 0 kg
    Calculated from production volume of reference product using the relative outputs.
  property price 0 EUR2005; name BP_amount_8_price_EUR2005
  properties: wet mass 1 kg, lifetime 20 year, dry mass 1 kg
- aluminium, wrought alloy: 63 kg; source Uniconfort srl 2011; lognormal variance with pedigree 0.0298, pedigree (3,3,4,5,1)
  EcoSpold01Location=RER
  estimation
  properties: dry mass 1 kg, wet mass 1 kg
- polystyrene foam slab: 155 kg; source Uniconfort srl 2011; lognormal variance with pedigree 0.0298, pedigree (3,3,4,5,1)
  calculated value - 3 accumulator hot water tanks 6000 liters [1719 dm3 (calculated value for insulation a tank 180*288 cm) * 0.03 kg/dm3 (specific weight polystyrene foam slab)]*3
  EcoSpold01Location=RER
  properties: carbon content, fossil 0.859091, dry mass 1 kg, wet mass 1 kg, heating value, net 38.67 MJ
  note on carbon content, fossil: XPS consists in 91% of polystyrene, 7% of blowing agent and the re-maining 2% are flame retardants (bromine compounds) and other additives (ecoinvent v2.2 report 7, part XIV, pg69). The chemical formula of polystyrene is (C8H8)n. Here, the blowing agent is CO2.
- waste mineral wool, for final disposal: 0 kg; name BP_amount_1; pedigree (1,1,1,1,1)
  EcoSpold01Location=CH
  disposal of insulation material (boiler + chimney)
  production volume 0 kg
    Calculated from production volume of reference product using the relative outputs.
  property price 0 EUR2005; name BP_amount_1_price_EUR2005
  properties: wet mass 1 kg, dry mass 1 kg, lifetime 20 year
- waste concrete: 0 kg; name BP_amount_9; pedigree (1,1,1,1,1)
  EcoSpold01Location=CH
  disposal of the concrete for the furnace basement and for the woodchips silo - around 38 m3 of concrete * 2350 kg/m3 (concrete density) = 89300 kg
  production volume 0 kg
    Calculated from production volume of reference product using the relative outputs.
  property price 0 EUR2005; name BP_amount_9_price_EUR2005
  properties: water content 1, wet mass 1 kg, dry mass 0.5 kg, lifetime 20 year
- alkyd paint, white, without solvent, in 60% solution state: 7 kg; source Uniconfort srl 2011; lognormal variance with pedigree 0.0298, pedigree (3,3,4,5,1)
  EcoSpold01Location=RER
  estimation
  properties: carbon content, fossil 0.140367, wet mass 1 kg, dry mass 1 kg, carbon content, non-fossil 0.199629, heating value, net 10.3 MJ
  note on carbon content, fossil: C content was calculated as an addition of C content in the raw materials.
- drawing of pipe, steel: 53 kg; source Uniconfort srl 2011; lognormal variance with pedigree 0.0298, pedigree (3,3,4,5,1)
  estimation - for water pipes connections
  EcoSpold01Location=RER
- electricity, low voltage: 0 kWh; source Uniconfort srl 2011; pedigree (1,1,1,1,1)
  Estimation - data derives from comparison between old dataset value, energy required for steel manufacturing (similar weight device) and suggestions from Uniconfort technician
  EcoSpold01Location=CH
- steel, chromium steel 18/8, hot rolled: 53 kg; name chromium_steel; source Uniconfort srl 2011; lognormal variance with pedigree 0.0298, pedigree (3,3,4,5,1)
  estimation . several components in the body of the furnace
  EcoSpold01Location=RER
  properties: wet mass 1 kg, dry mass 1 kg, carbon content, fossil 0.0008
  note on carbon content, fossil: Stainless steel model is the grade 304 steel (18/8 stainless, 18% chromium 8% nickel; max. 0.08% C)
- lubricating oil: 7 kg; source Uniconfort srl 2011; lognormal variance with pedigree 0.0298, pedigree (3,3,4,5,1)
  EcoSpold01Location=RER
  estimation - used for the manufacturing of the furnace and for the maintenance. It is just added to the internal part of the furnace. It is assumed not to be dispersed or disposed
  properties: carbon content, fossil 0.75, dry mass 1 kg, wet mass 1 kg, heating value, net 40.2 MJ
  note on carbon content, fossil: Lubricating oil is produced from diesel. C-content/dry mass of fats and oils considered 75%, from: ecoinvent v2.2 report, n 15a, pg 40
  note on heating value, net: Literature value, Source: IPCC 2006, 2006 IPCC Guidelines for National Greenhouse Gas Inventories, Prepared by the National Greenhouse Gas Inventories Programme, Eggleston H.S., Buendia L., Miwa K., Ngara T. and Tanabe K. (eds). Published: IGES, Japan
- refractory, fireclay, packed: 14200 kg; source Uniconfort srl 2011; lognormal variance with pedigree 0.0298, pedigree (3,3,4,5,1)
  EcoSpold01Location=DE
  estimation - refractory bricks in fireclay are used in the combustion chamber inside the furnace, for a efficient combustion (big quantity of refractory is necessary when woodchips have high content of water)
  properties: dry mass 1 kg, wet mass 1 kg
- waste polyethylene: 0 kg; name BP_amount_2; pedigree (1,1,1,1,1)
  disposal of plastic materials
  EcoSpold01Location=CH
  production volume 0 kg
    Calculated from production volume of reference product using the relative outputs.
  property price 0 EUR2005; name BP_amount_2_price_EUR2005
  properties: carbon content, fossil 0.825301, water content 0.00401606, dry mass 0.996 kg, wet mass 1 kg, lifetime 20 year, heating value, net 42.47 MJ
  note on carbon content, fossil: C content in 1 kg DM was calculated using data in Tab A.1, ecoinvent v2.2 report 13_I
  note on heating value, net: Value taken from the general comment of the treatment dataset.
- steel, low-alloyed, hot rolled: 24424 kg; name steel_low_alloyed; source Uniconfort srl 2011; lognormal variance with pedigree 0.0298, pedigree (3,3,4,5,1)
  Calculated value - calculated with the difference of the total weight of the device with the summa of the weight of all the other materials (also based on qualified technician suggestions)
  EcoSpold01Location=RER
  properties: dry mass 1 kg, carbon content, fossil 0.005, wet mass 1 kg
  note on carbon content, fossil: Low alloyed steel composition given in Tab. 3.2 ecoinvent v2.2 report 10_partII. Steel assumed to have a C content of 0.5%
- waste polystyrene isolation, flame-retardant: 0 kg; name BP_amount_3; pedigree (1,1,1,1,1)
  disposal of accumulator water tanks insulation
  production volume 0 kg
    Calculated from production volume of reference product using the relative outputs.
  property price 0 EUR2005; name BP_amount_3_price_EUR2005
  properties: water content 0.00199232, dry mass 0.998012 kg, carbon content, fossil 0.918145, wet mass 1 kg, heating value, net 38.67 MJ
  note on carbon content, fossil: Polystyrene isolation (EPS) is flame-retarded with hexa-bromo-cyclo-dodecan (C12H18Br6) and contains 0.67 w% bromine (ecoinvent v2.2 report 13_I, pg 39). The rest is polystyrene: (C8H8)n.
- iron-nickel-chromium alloy: 320 kg; source Uniconfort srl 2011; lognormal variance with pedigree 0.0298, pedigree (3,3,4,5,1)
  estimation - components for the conveyor grate in the combustion chamber
  EcoSpold01Location=RER
  properties: wet mass 1 kg, dry mass 1 kg
- scrap steel: 0 kg; name BP_amount_4; pedigree (1,1,1,1,1)
  disposal of steel low-alloyed and chromium steel (body of the furnace, accumulation water tanks, screw conveyor, chimney flue pipes)
  EcoSpold01Location=CH
  production volume 0 kg
    Calculated from production volume of reference product using the relative outputs.
  property price 0 EUR2005; name BP_amount_4_price_EUR2005
  properties: wet mass 1 kg, dry mass 1 kg, lifetime 20 year
- scrap aluminium: 0 kg; name BP_amount_10; pedigree (1,1,1,1,1)
  disposal of aluminium components in the furnace
  EcoSpold01Location=CH
  production volume 0 kg
    Calculated from production volume of reference product using the relative outputs.
  property price 0 EUR2005; name BP_amount_10_price_EUR2005
  properties: wet mass 1 kg, lifetime 20 year, dry mass 1 kg
- waste mineral oil: 0 kg; name BP_amount_5; pedigree (1,1,1,1,1)
  disposal of lubricating oil
  production volume 0 kg
    Calculated from production volume of reference product using the relative outputs.
  property price 0 EUR2005; name BP_amount_5_price_EUR2005
  properties: water content 0.111111, wet mass 1 kg, carbon content, fossil 0.864444, dry mass 0.9 kg, heating value, net 34.7 MJ
  note on carbon content, fossil: Tab A.6, ecoinvent v2.2 report 13_I. C content has been calculated after data in the tables, and then referred to 1 kg DM
- sheet rolling, steel: 805 kg; source Uniconfort srl 2011; lognormal variance with pedigree 0.0298, pedigree (3,3,4,5,1)
  estimation
  EcoSpold01Location=RER
- electronics, for control units: 12 kg; source Uniconfort srl 2011; lognormal variance with pedigree 0.0298, pedigree (3,3,4,5,1)
  estimation
  EcoSpold01Location=RER
  properties: carbon content, fossil 0.337146, wet mass 1 kg, carbon content, non-fossil 0.00013442, dry mass 1 kg
  note on carbon content, fossil: The control unit has a composition of 46% steel (housing), 32% plastics, 14% printed wiring boards and 8% cables (various types).;
- stone wool: 476 kg; source Uniconfort srl 2011; lognormal variance with pedigree 0.0298, pedigree (3,3,4,5,1)
  calculated value - summa of rock wool for the insulation of the chimney flue pipes (70 kg: 10m height, 54cm diameter, thickness rockwool 3cm) and rockwool inside the furnace (406 kg = 3125 dm3 * 0.13 kg/m3)
  EcoSpold01Location=CH
  properties: wet mass 1 kg, carbon content, fossil 0.015401, dry mass 1 kg
  note on carbon content, fossil: The chemical composition of the glass fibres used in the rock wool production is similar to the composition of naturally cooled volcano basalt and has a composition listed in Tab. 3.1 and 3.2 in ecoinvent v2.2 report 16, part XIV. Rock wool contains: a minimum of 96% mineral fibres,between 0.5 and 3.0 weight percent of phenolic resin depending on the specific product characteristics, and about 0.2 percent mineral oil (ecoinvent v2.2 report 16, part XIV). An average composition of 1.8% phenolic resin, 0.2% mineral oil, and 98% mineral fibres has been assumed and used to calculate C content of the rock wool
- concrete, normal: 0 m3; source Uniconfort srl 2011; pedigree (1,1,1,1,1)
  calculated value - basing on the silo dimensions (from furnace manual) the amount of concrete was calculated (3 m3 for the basement + 35m3 for the silo). [thickness of the walls of the silo: 20 cm]
  EcoSpold01Location=CH
  properties: water content 0.086758, dry mass 2190 kg, wet mass 2380 kg
- polyethylene, high density, granulate: 18 kg; source Uniconfort srl 2011; lognormal variance with pedigree 0.0298, pedigree (3,3,4,5,1)
  calculated value
  EcoSpold01Location=RER
  properties: carbon content, fossil 0.857143, wet mass 1 kg, dry mass 1 kg, heating value, net 42.47 MJ
  note on carbon content, fossil: Polyethylene is formed out of a huge amount of ethylene monomers (C2H4) (ecoinvent v2.2 report 11_II). MW=28 g/mol
- inert waste, for final disposal: -14200 kg; name BP_amount_11; lognormal variance with pedigree 0.0107, pedigree (1,2,4,5,1)
  EcoSpold01Location=CH
  disposal of the refractory bricks
  production volume 1.41645e8 kg; = RP_PV_1* BP_amount_11
    Calculated from production volume of reference product using the relative outputs.
  property price 0 EUR2005; name BP_amount_11_price_EUR2005
  properties: wet mass 1 kg, dry mass 0.995 kg, lifetime 20 year, water content 0.00502513
- copper, cathode: 28 kg; source Uniconfort srl 2011; lognormal variance with pedigree 0.0298, pedigree (3,3,4,5,1)
  EcoSpold01Location=RER
  estimation
  properties: dry mass 1 kg, wet mass 1 kg
- iron scrap, unsorted: -700 kg; lognormal variance with pedigree 0.0107, pedigree (1,2,4,5,1)
  disposal of cast iron
  production volume 6.9825e6 kg
  properties: dry mass 1 kg, wet mass 1 kg, price 0.149 EUR2005
- heat, central or small-scale, other than natural gas: 78.5803, 5721.42 MJ (2 entries); source Uniconfort srl 2011; lognormal variance with pedigree 0.101, pedigree (4,3,4,5,1)
  (same comment as for heat, central or small-scale, other than natural gas)
- scrap copper: -9.016, -18.984 kg (2 entries); lognormal variance with pedigree 0.0107, pedigree (1,2,4,5,1)
  disposal of copper
  EcoSpold01Location=CH
  production volume 279300 kg
- waste mineral wool, for final disposal: -205.034, -270.966 kg (2 entries); lognormal variance with pedigree 0.0107, pedigree (1,2,4,5,1)
  EcoSpold01Location=CH
  disposal of insulation material (boiler + chimney)
  production volume 4.7481e6 kg
- waste concrete: -6103.12, -83196.9 kg (2 entries); lognormal variance with pedigree 0.0107, pedigree (1,2,4,5,1)
  (same comment as for waste concrete)
  production volume 8.90768e8 kg
- electricity, low voltage: 37.1654, 6.7671, 152.759, 533.706, 108.959, 1672.86, 270.64, 777.139 kWh (8 entries); source Uniconfort srl 2011; lognormal variance with pedigree 0.101, pedigree (4,3,4,5,1)
  (same comment as for electricity, low voltage)
- waste polyethylene: -2.00235, -0.13379, -0.0101183, -0.0552599, -0.0223244, -0.0524744, -1.7061, -14.0176 kg (8 entries); lognormal variance with pedigree 0.0107, pedigree (1,2,4,5,1)
  disposal of plastic materials
  EcoSpold01Location=CH
  production volume 179550 kg
- waste polystyrene isolation, flame-retardant: -43.8455, -111.154 kg (2 entries); lognormal variance with pedigree 0.0107, pedigree (1,2,4,5,1)
  disposal of accumulator water tanks insulation
  production volume 1.54612e6 kg
- scrap steel: -5961.87, -18515.1 kg (2 entries); lognormal variance with pedigree 0.0107, pedigree (1,2,4,5,1)
  (same comment as for scrap steel)
  production volume 2.44158e8 kg
- scrap aluminium: -20.286, -42.714 kg (2 entries); lognormal variance with pedigree 0.0107, pedigree (1,2,4,5,1)
  disposal of aluminium components in the furnace
  EcoSpold01Location=CH
  production volume 628425 kg
- waste mineral oil: -1.93458, -5.06542 kg (2 entries); lognormal variance with pedigree 0.0107, pedigree (1,2,4,5,1)
  disposal of lubricating oil
  production volume 69825 kg
- concrete, normal: 0.85945, 0.0895535, 0.724998, 0.407812, 1.72697, 0.0582496, 34.133 m3 (7 entries); source Uniconfort srl 2011; lognormal variance with pedigree 0.0298, pedigree (3,3,4,5,1)
  (same comment as for concrete, normal)

## Inputs from nature
- Occupation, industrial area [natural resource, land]: 2400 m2*year; = land_use*20; source Uniconfort srl 2011; lognormal variance with pedigree 0.0752, pedigree (4,5,5,5,1)
  calculated value - (transformation * lifetime of the furnace) [lifetime of the furnace = 20 years]
- Transformation, from unspecified [natural resource, land]: 120 m2; name land_use; source Uniconfort srl 2011; lognormal variance with pedigree 0.0752, pedigree (4,5,5,5,1)
  calculated value - calculated area necessary for the furnace installation based on specific picture in the furnace manual
- Transformation, to industrial area [natural resource, land]: 120 m2; source Uniconfort srl 2011; lognormal variance with pedigree 0.0752, pedigree (4,5,5,5,1)
  (same comment as for Transformation, from unspecified)

## Sampling procedure
literature, furnace manual available for customers, personal communication from producer and technician, measurement during furnaces exposition

## Extrapolations
extrapolated from Italian and Swiss data

## Review by Bo Weidema 2012-02-22
This dataset has only been reviewed by one reviewer. Since this is an infrastructure dataset, this deviation from normal procedures is acceptable.

## Review by Bo Weidema 2012-02-22
Passed. Documentation adequate, inputs relevant, mass balance correct, and correct handling of capacity utilisation.
