# aluminium casting facility construction

Dataset: EcoSpold 2, unit process
Geography: RER
Time period: 2002-01-01 to 2021-12-31
Technology level: current
Classification: EcoSpold01Categories: metals/extraction
Classification: ISIC rev.4 ecoinvent: 4100:Construction of buildings
Tags: ConvertedDataset
Scenario: Business-as-Usual
System model: Allocation, cut-off by classification
Generated by: Hans-Jörg Althaus
Published in: Althaus H.-J. 2000
Database: ecoinvent
isCopyrightProtected: true
accessRestrictedTo: 1

## General comment
Medium sized plant. Output: 130'000 t/a, life time: 50 years. Site is shared with electrolysis plant. Total land use is allocated 50% to electrolysis, 50% to casting.
[This dataset was already contained in the ecoinvent database version 2. It was not individually updated during the transfer to ecoinvent version 3. Life Cycle Impact Assessment results may still have changed, as they are affected by changes in the supply chain, i.e. in other datasets. This dataset was generated following the ecoinvent quality guidelines for version 2. It may have been subject to central changes described in the ecoinvent version 3 change report (http://www.ecoinvent.org/database/ecoinvent-version-3/reports-of-changes/), and the results of the central updates were reviewed extensively. The changes added e.g. consistent water flows and other information throughout the database. The documentation of this dataset can be found in the ecoinvent reports of version 2, which are still available via the ecoinvent website. The change report linked above covers all central changes that were made during the conversion process.]

## Included activities end
Production hall, machinery and administrative buildings (including disposal)

## Geography
Some Swiss datasets are used for European processes.

## Technology
Technology of one medium sized plant in Norway

## Reference product
- aluminium casting facility: 1 unit; By-product classification allocatable product; CPC 53269: Other constructions for manufacturing
  production volume 1.32237 unit
    This is a placeholder value that does not reflect real-world production volumes. This dataset does not currently require a real-world production volume to work in the database framework, and no actual data were collected yet. This has no negative effect on the results of the ecoinvent database. The placeholder value of this activity was scaled according to the nominal GDP of 2005 (source: United Nations, http://data.un.org/Glossary.aspx?q=GDP+%28current+US%24%29, accessed 20130726) to reflect an appropriate share of the global production volume, which is also a placeholder value.
  property price 5.57178e7 EUR2005
    Upscale from EU 27 to the world by PPP (0.8458 in 2003 and 0,8426 in 2004)

## Inputs from technosphere
- industrial machine, heavy, unspecified: 2e6 kg; lognormal variance with pedigree 0.354, pedigree (3,4,5,1,1)
  activityLink introduced to establish a direct link to the corresponding regional supply of this product
- building, hall: 21700 m2; lognormal variance with pedigree 0.354, pedigree (3,4,5,1,1)
- waste concrete, not reinforced: 0 kg; pedigree (1,1,1,1,1)
  production volume 0 kg
    Calculated from the production volume of aluminium casting facility in proportion to the respective output amounts.
  properties: wet mass 1 kg, dry mass 1 kg
- concrete, normal: 909 m3; lognormal variance with pedigree 0.354, pedigree (3,4,5,1,1)
  properties: dry mass 2190 kg, water content 0.086758, wet mass 2380 kg
- building, multi-storey: 2000 m3; lognormal variance with pedigree 0.354, pedigree (3,4,5,1,1)
  (same comment as for industrial machine, heavy, unspecified)
- waste concrete, not reinforced: -1.97903e6, -20969.3 kg (2 entries); lognormal variance with pedigree 0.354, pedigree (3,4,5,1,1)
  production volume 2e6 kg

## Inputs from nature
- Transformation, to industrial area [natural resource, land]: 487600 m2; lognormal variance with pedigree 0.1726, pedigree (2,4,5,1,1)
- Transformation, from unspecified [natural resource, land]: 488000 m2; lognormal variance with pedigree 0.1726, pedigree (2,4,5,1,1)
- Occupation, industrial area [natural resource, land]: 2.438e7 m2*year; lognormal variance with pedigree 0.0926, pedigree (2,4,5,1,1)

## Sampling procedure
Internet search

## Extrapolations
This dataset has been extrapolated from year 2002 to the year of the calculation (2021). The uncertainty has been adjusted accordingly.

## Review by Roland Hischier 2003-08-20
Passed.
