# nitric acid production, product in 50% solution state

Dataset: EcoSpold 2, unit process
Geography: UN-SEASIA
Time period: 2011-01-01 to 2021-12-31
Technology level: current
Classification: ISIC rev.4 ecoinvent: 2012:Manufacture of fertilizers and nitrogen compounds
Synonyms: Azotic acid; Salpetersaeure; Hydrogen nitrate; Aqua fortis
Scenario: Business-as-Usual
System model: Allocation, cut-off by classification
Generated by: Anna Kounina
Database: ecoinvent
isCopyrightProtected: true
accessRestrictedTo: 1

## General comment
This dataset represents the production of 1 kg of nitric acid, with 100% HNO3, via the oxidation of ammonia (Ostwald process). Nitric acid is a colourless to yellow liquid with an acrid odour. It is a chemical of major industrial importance. Its main use is as a starting material in the production of ammonium-, calcium- and potassium-nitrates for the fertiliser industry. These nitrates are either used directly as fertilisers or are mixed into compound fertilisers. About 75 to 85% of the nitric acid produced are used in the fertiliser sector. Nitric acid is also used for the digestion of crude phosphates, as nitrating agent in the preparation of explosives and organic intermediates such as nitroalkanes and nitroaromatics. It is furthermore used in the production of adipic acid, in metallurgy and in rocket fuel production.
Nitric acid is produced with the Ostwald process where anhydrous ammonia is oxidized to nitric oxide, in the presence of platinum or rhodium gauze catalyst at a high temperature of about 500 K and a pressure of 9 atm.
4 NH3 + 5 O2 → 4 NO + 6 H2O
Nitric oxide is then reacted with oxygen in air to form nitrogen dioxide (NO2).
2 NO + O2 → 2 NO2
This is subsequently absorbed in water to form nitric acid (HNO3) and nitric oxide (NO).
3 NO2 + H2O → 2 HNO3 + NO
The process can however result in undesired chemical reactions:
4 NH3 + 3 O2 → 2 N2 + 6 H2O4 (production of hydroxyperoxide), or
NH3 + 4 O2 → 2 N2O + 6 H2O (production of nitrous oxide)
The production process involves the following main unit operations in their sequential order: air filtration, air compression, air/ammonia mixing, air/ammonia oxidation over catalytic gauzes, Energy recovery by steam generation and/or gas re-heating, gas cooling, gas compression, energy recovery and cooling (dual pressure plants only), absorption, with the production of nitric acid, waste gas (tail gas) heating, energy recovery by expansion of the waste gas to atmosphere, in a gas turbine. The reaction from ammonia to nitric acid is exothermic, therefore steam is generated as co-product.
The production results in emissions of nitrogen oxides (NO and NO2) and nitrous oxide (N2O) to air. In modern production plants, nitrous oxide emissions are abatted by catalytic decomposition, where N2O is split into gaseous nitrogen (N2) and oxygen (O2) with a catalyst. The dataset does not include the catalysts and is up to the user to add them if deemed relevant.
This dataset corresponds to the technology used in South East Asia, where it is assumed that N2O abatement technology is used for 20% of total nitric acid production in that geography (based on Integer Research, 2016).
The main data sources for this dataset are Fertilizers Europe (2014, 2016). Additional data sources are listed as follows.
References:
Fertilizers Europe (2000): Best Available Techniques for Pollution Prevention and Control in the European Fertilizer Industry. Booklet No. 1 of 8: Production of Ammonia. Fertilizers Europe, Brussels.
Kongshaug G. (1998): Energy Consumption and Greenhouse Gas Emissions in Fertilizer Production. IFA 20th July 1998
Davies J., Haglund C. (1999): Life Cycle Inventory of Fertiliser Production. SIK-Report No 654 1999. Chalmers University of Technology, Sweden.
Fertilizers Europe (2000): Best Available Techniques for Pollution Prevention and Control in the European Fertilizer Industry. Booklet No. 2 of 8: Production of Nitric Acid. Fertilizers Europe, Brussels.
Patyk R., Reinhardt, G.A. (1997): Düngemittel - Energie- und Stoffstrombilanzen. Vieweg Verlag, Braunschweig.
Fertilizers Europe (2014): Average Emissions Year 2011. Fertilizers Europe Environmental report (internal).
Fertilizers Europe (2016): Carbon Footprint Calculator for Fertilizer Production. Specification. Version 2.1
Fertilizers Europe (2016): Average Emissions Year 2014. Fertilizers Europe Environmental report (internal). Used for updated energy and GHG emission in Carbon Footprint Calculator
Integer Research (2016): Regional N2O and CO2emissions from ammonia and nitric acid production 2014. Internal report for Fertilizers Europe.
Althaus H.-J., Chudacoff M., Hischier R., Jungbluth N., Osses M. and Primas A. (2007) Life Cycle Inventories of Chemicals. ecoinvent report No. 8, v2.0. EMPA Dübendorf, Swiss Centre for Life Cycle Inventories, Dübendorf, CH.

## Included activities start
The activity includes all the raw and processed materials necessary to produce this product. Liquid ammonia, water and electricity are included. Direct emissions include ammonia, nitrous oxide and nitrogen oxides to air, as well as nitrogen to water.

## Included activities end
The activity ends with the final product being ready for transportation at the production site.

## Geography
The dataset is representative of nitric acid production in South East Asia, adapted from data collected in European plants.

## Technology
This datasets corresponds to the technology used in South East Asian nitric acid plants.
The nitric acid production consists of several steps: oxidation of ammonia with air to give nitric oxide and oxidation of the nitric oxide to nitrogen dioxide and absorption in water to give a solution of nitric acid. In the process, nitric oxide and water are formed.

## Time period
Primary data were collected on nitric acid production for the year 2013-2014. These data were based on annual average data based on different production plants.

## Reference product
- nitric acid, without water, in 50% solution state: 1 kg; name RP; CPC 34233: Nitric acid, sulphonitric acids; By-product classification allocatable product; CAS 7697-37-2
  production volume 8.60941e11 kg; name PVRP
    Kg/y,In 1987 nitric acid production is reported to be circa 26882000000000 Kg. The PV was scaled according to the nominal GDP in 2014 of the given region and the global nominal GDP in 2014 (retrieved from: https://unstats.un.org/unsd/snaama/Basic, accessed 20200512). The nominal GDP corresponds to GDP at current price-US Dollars (source: United Nations, http://data.un.org/Glossary.aspx?q=GDP+%28current+US%24%29, accessed 20200512).
  property price 0.127 EUR2005; name RP_price_EUR2005
    Official Data Foundation (2020). Inflation Calculator [Online]. Available from: https://www.officialdata.org/us/inflation/2005?endYear=2019&amount=1 [Accessed 28/07/2020]
  property nitrogen content 0.222283
    Nitrogen content (on a dry matter basis) of nitric acid, without water, in 50% solution state is calculated from the molecular formula of the substance (HNO3).
  property oxygen content 0.761721
    Oxygen content (on a dry matter basis) of nitric acid, without water, in 50% solution state is calculated from the molecular formula of the substance (HNO3).
  property hydrogen content 0.0159952
    Hydrogen content (on a dry matter basis) of nitric acid, without water, in 50% solution state is calculated from the molecular formula of the substance (HNO3).
  property carbon content, fossil 0
    Carbon content, fossil is calculated based on the chemical formula of the substance.
  property carbon content 0
    carbon content on a dry matter basis (reserved; not for manual entry)
  property true value 0.12446; name RP_true_value
    allocation property applied in "true value" allocation // value calculated from revenue
  properties: water content 0, dry mass 1 kg, water in wet mass 0 kg, carbon content, non-fossil 0, wet mass 1 kg, carbon allocation 0 kg

## By-products
- steam, in chemical industry: 0 kg; name BPS; CPC 17300: Steam and hot water; By-product classification allocatable product; CAS 7732-18-5; pedigree (1,1,1,1,1)
  production volume 5.59053e11 kg; = PVRP*BPS/RP
    Calculated based on the production volume of the reference product.
  property price 0.015 EUR2005; name BPS_price_EUR2005
    Data related to the price of steam were provided by Yara International (https://www.yara.com/)
  property carbon content 0
    carbon content on a dry matter basis (reserved; not for manual entry)
  property true value 0.00954545; name BPS_true_value
    allocation property applied in "true value" allocation // value calculated from revenue
  properties: carbon content, non-fossil 0, carbon content, fossil 0, wet mass 1 kg, water content 0, water in wet mass 0 kg, dry mass 1 kg, carbon allocation 0 kg

## Inputs from technosphere
- chemical factory, organics: 3.79089e-10 unit; lognormal variance with pedigree 0.306, pedigree (3,4,3,1,1)
  Data from Fertilizer Europe (2014).
- electricity, low voltage: 0 kWh; pedigree (1,1,1,1,1)
  Data from Fertilizer Europe (2014).
- ammonia, anhydrous, liquid: 0.269153 kg; lognormal variance with pedigree 0.0066, pedigree (3,4,3,1,1)
  Data from Fertilizer Europe (2014).
  properties: nitrogen content 0.822453, hydrogen content 0.177547, wet mass 1 kg, dry mass 1 kg
  note on nitrogen content: Nitrogen content (on a dry matter basis) of ammonia, anhydrous, liquid is calculated from the molecular formula of the substance (H3N).
  note on hydrogen content: Hydrogen content (on a dry matter basis) of ammonia, anhydrous, liquid is calculated from the molecular formula of the substance (H3N).
- tap water: 0.414155 kg; lognormal variance with pedigree 0.0066, pedigree (3,4,3,1,1)
  Data from Fertilizer Europe (2014).
  properties: water content 2962.17, wet mass 1 kg, carbon content, fossil 0.00178991, dry mass 0.000337476 kg
  note on carbon content, fossil: Bicarbonate content is 2.93 mol/m3. CO2 content is 0.1 mol/m3 (ecoinvent v2.2 report 8, Tab 93.1).
- electricity, low voltage: 0.000434934, 0.0021628, 8.62996e-5, 0.000185099, 3.26969e-5, 0.00145116, 0.000865881, 0.00108097, 0.00159785 kWh (9 entries); lognormal variance with pedigree 0.0066, pedigree (3,4,3,1,1)
  Data from Fertilizer Europe (2014).

## Inputs from nature
- Water, unspecified natural origin [natural resource, in water]: 0.00185754 m3; lognormal variance with pedigree 0.0066, pedigree (3,4,3,1,1)
  Estimation, based on various data sources (Althaus et al. 2007).

## Emissions to nature
All rows: lognormal variance with pedigree 0.046, pedigree (3,4,3,1,1)
- Water [water, surface water]: 0.00208499 m3; = 0.00064+0.00156
  Data from Fertilizer Europe (2014).
- Nitrogen [air, unspecified]: 0.000900336 kg
  Calculation, based on Fertilizer Europe (2016).
- Dinitrogen monoxide [air, urban air close to ground]: 0.00559156 kg
  Data from Fertilizer Europe (2016).
- Ammonia [air, urban air close to ground]: 0.00232192 kg
  Estimation, based on various data sources (Althaus et al. 2007).
- Nitrogen oxides [air, urban air close to ground]: 0.000407521 kg
  Data from Fertilizer Europe (2014).
- Nitrogen [water, surface water]: 0.000122256 kg
  Estimation, based on various data sources (Althaus et al. 2007).

## Extrapolations
The data were extrapolated from respective data for the geography of Europe, i.e. production of ammonia is adapted to reflect production in South East Asia.
