# petroleum and gas production, off-shore

Dataset: EcoSpold 2, unit process
Geography: BR
Time period: 2018-01-01 to 2021-12-31
Technology level: current
Classification: EcoSpold01Categories: natural gas/production
Classification: ISIC rev.4 ecoinvent: 0610:Extraction of crude petroleum
Tags: combined production; Combined Production
Scenario: Business-as-Usual
System model: Allocation, cut-off by classification
Share of production covered: 100 %
Generated by: F. Valebona; T. B. Rocha; F. L. Motta
Published in: Valebona, F. 2021
Database: ecoinvent
isCopyrightProtected: true
accessRestrictedTo: 1

## General comment
This dataset represents the Brazilian offshore production of petroleum and natural gas. In Brazilian production fields, 96% of petroleum and 80% of natural gas production takes place offshore, while the remaining quantities are produced onshore (ANP, 2019). After the exploration phase and drilling, oil and gas are moved to either fixed or anchored platforms by means of a pump. It can be assumed that data represent the average for production in Brazilian post and pre-salt fields.
Brazilian national statistics was used to re-contextualize the ‘petroleum and gas production, off-shore’ dataset for the Norwegian region, valid for the year of 2000, available in database version 3.6. The adapted parameters were the petroleum and natural gas production yields, as well as the amount of flaring, venting, natural gas consumed in turbines and produced water. The weighted parts of ethane, butane etc. of the produced gas have been used to break down NMVOC emissions in their different parts.
This dataset was developed under the Cornerstone project, an initiative from the Brazilian Business Network on Life cycle Assessment (Rede ACV) in collaboration with ecoinvent to increase the quantity and quality of inventories that represent Brazil, through a thorough adaptation of the datasets. More information about this project is available in redeacv.org.br/en/wg-database. Technical background is provided in Valebona F.; Rocha T.B.; Motta F. L. Cornerstone Project. Recontextualization of Datasets: Methodology. ACV Brasil, Brazil.
Reference:
Agência Nacional do Petróleo, Gás Natural e Biocombustíveis (2019). Anuário Estatístico 2019.
Available at: www.anp.gov.br/publicacoes/anuario-estatistico/5237-anuario-estatistico-2019.
Accessed in 04/06/2020.

## Included activities start
From exploration activities (i.e. fuel requirements and emissions for well testing). The production phase of petroleum and natural gas takes into account platform infrastructure, fuel and auxiliary chemicals consumption.

## Included activities end
The activity ends with the dried natural gas from a separate onshore drying plant and the produced crude petroleum at the offshore platform.

## Geography
Brazil

## Technology
All Brazilian production and exploration offshore fields have been included. Although, technology differences may occur among post and pre-salt fields, collected data represents the national average.

## Time period
Data representing the Brazilian situation in 2018 were collected for the petroleum and natural gas production yields, the amount of flaring, venting, natural gas composition, natural gas consumed in turbines and produced water. Although scaled according to the amount of produced energy, the remaining parameters refer to year 2000, as for the Norwegian region. Data is assumed to be valid from 2018 to 2021.

## Parameters
- fraction, process water, to air: 0.15 dimensionless; name fraction_PW_to_air; lognormal variance with pedigree 0.092025, pedigree (4,4,3,2,4)
  Literature value. In case when no industry/process specific data are available, default evaporation fraction value is used. This value is 15% and is based on literature (Statistics Canada, 2007 & Shaffer, K.H., 2008, Consumptive water use in the Great Lakes Basin, USGS & Shiklomanov, 2003, World Water Resources at the Beginning of the 21st Century) and has been approved by an expert.

## Reference product
- natural gas, high pressure: 0 m3; name natural_gas; source ANP 2019; CPC 12020: Natural gas, liquefied or in the gaseous state; By-product classification allocatable product; CAS 14493-06-2
  Without reinjected, flared and consumed natural gas.
  production volume 0 m3; name natural_gas_PV
    m3 of offshore natural gas produced in BR in 2018 (ANP, 2019). Refrence(s): Agência Nacional do Petróleo, Gás Natural e Biocombustíveis (2019). Anuário Estatístico 2019. Available at: www.anp.gov.br/publicacoes/anuario-estatistico/5237-anuario-estatistico-2019. Accessed in 04/06/2020
  property heating value, net 39 MJ
    Literature value, Source: United Nations Statistics Division (2018) International Recommendations for Energy Statistics (IRES). Available at: http://unstats.un.org/unsd/statcom/doc11/BG-IRES.pdf.
  property price 0.166 EUR2005; name natural_gas_price_EUR2005
    Temporary price data. Calculated as 90% of purchasers price based on: 2005 price for Europe-27 Import (US$ and kg) in UN Commodity Trade Statistics Database - Natural gas in gaseous state (http://data.un.org/Data.aspx?q=natural+gas&d=ComTrade&f=_l1Code%3a28%3bcmdCode%3a271121; accessed 4 January 2011), using density of natural gas of 0.8 kg/m3 for unit conversion.
  property carbon content, fossil 0.602381
    An average C content of 0.506 kg C/ m3 has been assumed (this average has been calculated using data in Tab 3.5, ecoinvent v2.2 report 6_V
  property amount in multioutput activity_m3 1.73255e10 m3; name natural_gas_amount_MO_m3
  property carbon content 0.602381
    carbon content on a dry matter basis (reserved; not for manual entry)
  properties: heating value, gross 0 MJ, wet mass 0.84 kg, water content 0, carbon content, non-fossil 0, dry mass 0.84 kg, water in wet mass 0 kg, carbon allocation 0.506 kg
- petroleum: 1 kg; name petroleum_RP; source ANP 2019; CPC 12010: Petroleum oils and oils obtained from bituminous minerals, crude; By-product classification allocatable product; CAS 8002-05-9
  EcoSpold01Location=NO
  production volume 1.28455e11 kg; name petroleum_RP_PV
    kg of offshore petroleum produced in BR in 2018 (ANP, 2019). Refrence(s): Agência Nacional do Petróleo, Gás Natural e Biocombustíveis (2019). Anuário Estatístico 2019. Available at: www.anp.gov.br/publicacoes/anuario-estatistico/5237-anuario-estatistico-2019. Accessed in 04/06/2020
  property price 0.192 EUR2005
    Temporary price data. Calculated as 90% of purchasers price based on: Crude oil prices from U.S. energy information administration_Independent statistics and analysis: Weekly All Countries Spot Price FOB Weighted by Estimated Export Volume (Dollars per Barrel) (http://tonto.eia.doe.gov/dnav/pet/pet_pri_wco_k_w.htm; accessed 06072010). Conversion factors - 0.159 m3/barrel with crude oil density of 853 kg/m3
  property amount in multioutput activity_kg 1.28455e11 kg; name petroleum_RP_amount_MO_kg
  property carbon content, fossil 0.85
    C-content of crude oil is 83-87% (ecoinven report 6_IV, Tab 3.2). An average C-content of 0.85 kg C/kg crude oil was considered
  property carbon content 0.85
    carbon content on a dry matter basis (reserved; not for manual entry)
  properties: dry mass 1 kg, carbon content, non-fossil 0, water content 0, water in wet mass 0 kg, wet mass 1 kg, heating value, net 43.2 MJ, carbon allocation 0.85 kg

## Inputs from technosphere
- waste mineral oil: -3.71973e-5 kg; name waste_mineral_oil; = ( waste_mineral_oil_amount_MO_kg*(0.5* petroleum_RP +0.5* natural_gas *0.84)/(0.5* 128454996629.38 +0.5*17325468174.381 *0.84))*-1; lognormal variance with pedigree 0.0606, pedigree (2,1,5,5,3)
  EcoSpold01Location=CH
  environmental report for the total Norwegian production, standard module. Scaled according to energy content of reference products.
  Uncertainty: environmental report for the total Norwegian production, standard module
  production volume 5.31953e6 kg; = waste_mineral_oil_amount_MO_kg*(0.5* petroleum_RP_PV +0.5* natural_gas_PV *0.84)/(0.5* petroleum_RP +0.5*natural_gas *0.84)
    Calculated from the production volume of reference products
  property amount in multioutput activity_kg 5.31953e6 kg; name waste_mineral_oil_amount_MO_kg; = 7569000*(natural_gas_amount_MO_m3*39+petroleum_RP_amount_MO_kg*42)/(49620000000*39+159590000000*42)
  property price 0 EUR2005; name waste_mineral_oil_price_EUR2005
  properties: dry mass 0.9 kg, wet mass 1 kg, water content 0.111111, carbon content, fossil 0.864444, heating value, net 34.7 MJ
  note on amount in multioutput activity_kg: Environmental report for the total Norwegian production, standard module. Scaled according to the energy content of reference products.
  note on carbon content, fossil: Tab A.6, ecoinvent v2.2 report 13_I. C content has been calculated after data in the tables, and then referred to 1 kg DM
  note on heating value, net: Value taken from the general comment of the treatment dataset.
- diesel, burned in diesel-electric generating set, 10MW: 0.0564472 MJ; name diesel_burned; = diesel_burned_amount_MO_MJ*(0.5* petroleum_RP +0.5* natural_gas *0.84)/(0.5* 128454996629.38 +0.5*17325468174.381 *0.84); lognormal variance with pedigree 0.06, pedigree (1,1,5,5,3)
  EcoSpold01Location=GLO
  environmental report for the total Norwegian production, standard module. Scaled according to energy content of reference products.
  Uncertainty: environmental report for the total Norwegian production, standard module
  property amount in multioutput activity_MJ 8.07242e9 MJ; name diesel_burned_amount_MO_MJ; = 11486000000*(natural_gas_amount_MO_m3*39+petroleum_RP_amount_MO_kg*42)/(49620000000*39+159590000000*42)
  properties: heating value, net 1 MJ
  note on amount in multioutput activity_MJ: environmental report for the total Norwegian production, standard module. Scaled according to energy content of reference products.
- sweet gas, burned in gas turbine: 1.23927 MJ; name sweet_gas_burned; = sweet_gas_burned_amount_MO_MJ*(0.5* petroleum_RP +0.5* natural_gas *0.84)/(0.5* 128454996629.38 +0.5*17325468174.381 *0.84); source Brazilian Ministry of Mines and Energy  2018; lognormal variance with pedigree 0, pedigree (1,1,1,1,1)
  Amount of gas consumed in turbines during exploration and production according to national statistics.
  EcoSpold01Location=NO
  Uncertainty: National statistics.
  property amount in multioutput activity_MJ 1.77226e11 MJ; name sweet_gas_burned_amount_MO_MJ
  properties: carbon content, fossil 0.589286, heating value, net 1 MJ, heating value, gross 1 MJ, dry mass 0.0247059 kg, wet mass 0.0247059 kg
- waste natural gas, sweet: -0.28589 MJ; name waste_NG_sweet; = ( waste_NG_sweet_amount_MO_MJ*(0.5* petroleum_RP +0.5* natural_gas *0.84)/(0.5* 128454996629.38 +0.5*17325468174.381 *0.84))*-1; source ANP 2019; lognormal variance with pedigree 0.0006, pedigree (2,1,1,1,1)
  Amount of flared gas calculated according to national statistics.
  The combined amount of Flaring and Losses (1.23E+9 m³) informed by ANP (2019) for the year 2018 is used to estimate the amount of flared and vented natural gas. The share of vented natural gas is estimated using the amount of fugitive methane emitted during exploration and production activities in 2012 (112,261,860 kg - MCTI, 2015). Considering that all methane fugitive emissions are due to venting, the final amount of vented natural gas in 2012 is calculated with the natural gas composition (0.73%vol of methane; compiled from anp.gov.br/dados-estatisticos). Thereby, the calculated amount of vented natural gas in 2012 is 2.15E+8 m³, which corresponds to 15% of the combined Flaring and Losses statistics for 2012. This calculated share was used to split the amount flared and vented natural gas in offshore production for 2018, respectively 1.05E+9 m³ and 1.83E+8 m³.
  References:
  [ANP 2019] Agência Nacional do Petróleo, Gás Natural e Biocombustíveis (2019). Anuário Estatístico 2019. Available at: www.anp.gov.br/publicacoes/anuario-estatistico/5237-anuario-estatistico-2019. Accessed in 04/06/2020.
  [MCTI 2015]
  Ministry of Science, Technology and Innovation (2015). Third Brazilian Inventory of Anthropic Emissions and Removals of Greenhouse Gases. Reference Reports. Energy Sector. Fugitive Emissions of Green House Gases in the Oil and Gas Industry. Petrobras e Centro de Estudos Integrados sobre Meio Ambiente e Mudanças Climáticas - Centro Clima/COPPE/UFRJ. Available at: https://sirene.mctic.gov.br/portal/opencms/textoGeral/2018/10/11/Relatorios_de_Referencia_do_II_Inventario_Brasileiro_de_Emissoes_e_Remocoes_Antropicas_de_Gases_de_Efeito_Estufa.html. Accessed in: 12/06/2020.
  EcoSpold01Location=GLO
  Uncertainty: Calculated according to Brazilian national statistics.
  production volume 4.08847e10 MJ; = waste_NG_sweet_amount_MO_MJ*(0.5* petroleum_RP_PV +0.5* natural_gas_PV *0.84)/(0.5* petroleum_RP +0.5*natural_gas *0.84)
    Calculated from the production volume of reference products
  property price 0 EUR2005; name waste_NG_sweet_price_EUR2005
  property amount in multioutput activity_MJ 4.08847e10 MJ; name waste_NG_sweet_amount_MO_MJ
  properties: carbon content, fossil 0.589286, heating value, gross 1 MJ, dry mass 0.0247059 kg, wet mass 0.0247059 kg
- low level radioactive waste: -1.74247e-7 m3; name low_level_radwaste; = ( low_level_radwaste_amount_MO_m3*(1* petroleum_RP +0* natural_gas *0.84)/(1* 128454996629.38 +0*17325468174.381 *0.84))*-1; lognormal variance with pedigree 0.0606, pedigree (2,1,5,5,3)
  data for GB. Scaled according to energy content of reference products.
  EcoSpold01Location=CH
  Uncertainty: data for GB
  production volume 22382.9 m3; = low_level_radwaste_amount_MO_m3*(1* petroleum_RP_PV +0* natural_gas_PV *0.84)/(1* petroleum_RP +0*natural_gas *0.84)
    Calculated from the production volume of reference products.
  property price 0 EUR2005; name low_level_radwaste_price_EUR2005
  property amount in multioutput activity_m3 22382.9 m3; name low_level_radwaste_amount_MO_m3; = 31848*(natural_gas_amount_MO_m3*39+petroleum_RP_amount_MO_kg*42)/(49620000000*39+159590000000*42)
  properties: dry mass 2500 kg, wet mass 2500 kg
  note on amount in multioutput activity_m3: data for GB. Scaled according to energy content of reference products.
- offshore well, oil/gas: 2.56794e-6 m; name offshore_well; = offshore_well_amount_MO_m*(0.5* petroleum_RP +0.5* natural_gas *0.84)/(0.5* 128454996629.38 +0.5*17325468174.381 *0.84); lognormal variance with pedigree 0.06, pedigree (1,1,5,5,3)
  EcoSpold01Location=OCE
  environmental report for the total Norwegian production, standard module. Scaled according to energy content of reference products.
  Uncertainty: environmental report for the total Norwegian production, standard module
  property amount in multioutput activity_m 367237 m; name offshore_well_amount_MO_m; = 522530*(natural_gas_amount_MO_m3*39+petroleum_RP_amount_MO_kg*42)/(49620000000*39+159590000000*42)
- offshore platform, natural gas: 0 unit; name offshore_plattform_NG; = offshore_plattform_NG_amount_MO_unit*(0* petroleum_RP +1* natural_gas *0.84)/(0* 128454996629.38 +1*17325468174.381 *0.84); pedigree (1,1,1,1,1)
  (same comment as for offshore well, oil/gas)
  property amount in multioutput activity_unit 1.25893 unit; name offshore_plattform_NG_amount_MO_unit; = 1,7913*(natural_gas_amount_MO_m3*39+petroleum_RP_amount_MO_kg*42)/(49620000000*39+159590000000*42)
- drying, natural gas: 0 m3; name drying_NG; = drying_NG_amount_MO_m3*(0* petroleum_RP +1* natural_gas *0.84)/(0* 128454996629.38 +1*17325468174.381 *0.84); pedigree (1,1,1,1,1)
  EcoSpold01Location=NO
  100% of produced natural gas is dried in inland processing plants.
  Uncertainty: Amount of dried natural gas accoding to Brazilian national production. Drying process according to Norwigian data.
  property amount in multioutput activity_m3 1.73255e10 m3; name drying_NG_amount_MO_m3
- hazardous waste, for underground deposit: -4.48e-5 kg; name hazardous_waste; = ( hazardous_waste_amount_MO_kg*(0.5* petroleum_RP +0.5* natural_gas *0.84)/(0.5* 128454996629.38 +0.5*17325468174.381 *0.84))*-1; lognormal variance with pedigree 0.0606, pedigree (2,1,5,5,3)
  EcoSpold01Location=DE
  environmental report for the total Norwegian production, standard module. Scaled according to energy content of reference products.
  Uncertainty: environmental report for the total Norwegian production, standard module
  production volume 6.40677e6 kg; = hazardous_waste_amount_MO_kg*(0.5* petroleum_RP_PV +0.5* natural_gas_PV *0.84)/(0.5* petroleum_RP +0.5*natural_gas *0.84)
    Calculated from the production volume of reference products.
  property price 0 EUR2005; name hazardous_waste_price_EUR2005
  property amount in multioutput activity_kg 6.40677e6 kg; name hazardous_waste_amount_MO_kg; = 9116000*(natural_gas_amount_MO_m3*39+petroleum_RP_amount_MO_kg*42)/(49620000000*39+159590000000*42)
  properties: wet mass 1 kg, dry mass 1 kg, carbon content, fossil 0.554667
  note on carbon content, fossil: Tab A.6, ecoinvent v2.2 report 13_I, average hazardous waste composition was used, and referred to 0% water mass. No waste-specific emission are currently inventoried for underground deposits. Accordingly, no waste composition must be specified. For generic, average waste to underground deposit deposition in a 200 liter steel drum without cement solidification is assumed (ecoinvent v2.2 report 13_I).
- offshore platform, petroleum: 4.46139e-11 unit; name offshore_plattform; = offshore_plattform_amount_MO_unit*(1* petroleum_RP +0* natural_gas *0.84)/(1* 128454996629.38 +0*17325468174.381 *0.84); lognormal variance with pedigree 0.372, pedigree (3,1,5,5,3)
  Data for GB. Scaled according to energy content of reference products.
  EcoSpold01Location=OCE
  Uncertainty: Data for GB
  property amount in multioutput activity_unit 5.73088 unit; name offshore_plattform_amount_MO_unit; = 8,1543*(natural_gas_amount_MO_m3*39+petroleum_RP_amount_MO_kg*42)/(49620000000*39+159590000000*42)
  note on amount in multioutput activity_unit: Data for GB. Scaled according to energy content of reference products.
- chemical, inorganic: 0.000216358 kg; name chem_inorg; = chem_inorg_amount_MO_kg*(0.5* petroleum_RP +0.5* natural_gas *0.84)/(0.5* 128454996629.38 +0.5*17325468174.381 *0.84); lognormal variance with pedigree 0.062, pedigree (3,1,5,5,3)
  EcoSpold01Location=GLO
  quantity from environmental. report, part organic chemicals from standard data. Scaled according to energy content of reference products.
  Uncertainty: quantity from environmental. report, part organic chemicals from standard data
  property amount in multioutput activity_kg 3.0941e7 kg; name chem_inorg_amount_MO_kg; = 44025000*(natural_gas_amount_MO_m3*39+petroleum_RP_amount_MO_kg*42)/(49620000000*39+159590000000*42)
  properties: wet mass 1 kg, dry mass 1 kg, carbon content, fossil 0.003
  note on amount in multioutput activity_kg: Quantity from Nowegian environmental report, part organic chemicals from standard data. Scaled according to the energy content of reference products.
  note on carbon content, fossil: This dataset is an unweighted average of 20 inorganic substances (listed in Tab 88.1, ecoinvent v2.2 report 8, part II), being part of the top100 chemicals included in this database. The C-content has also been calculated as an unweighted average of the C content of the substances composing this dataset.
- municipal solid waste: -3.31233e-5 kg; name MSW; = ( MSW_amount_MO_kg*(0.5* petroleum_RP +0.5* natural_gas *0.84)/(0.5* 128454996629.38 +0.5*17325468174.381 *0.84))*-1; lognormal variance with pedigree 0.0606, pedigree (2,1,5,5,3)
  environmental report for the total Norwegian production, standard module. Scaled according to energy content of reference products.
  EcoSpold01Location=CH
  Uncertainty: environmental report for the total Norwegian production, standard module
  production volume 4.73691e6 kg; = MSW_amount_MO_kg*(0.5* petroleum_RP_PV +0.5* natural_gas_PV *0.84)/(0.5* petroleum_RP +0.5*natural_gas *0.84)
    Calculated from the production volume of reference products
  property amount in multioutput activity_kg 4.73691e6 kg; name MSW_amount_MO_kg; = 6740000*(natural_gas_amount_MO_m3*39+petroleum_RP_amount_MO_kg*42)/(49620000000*39+159590000000*42)
  properties: dry mass 0.771 kg, heating value, net 11.74 MJ, water content 0.297017, carbon content, non-fossil 0.261655, carbon content, fossil 0.171549, wet mass 1 kg
  note on carbon content, non-fossil: MSW composition in tab 4.1, ecoinvent v2.2 report 13_I. C content referred to 1 kg DM
- waste wood, untreated: -7.21439e-6 kg; name waste_wood; = ( waste_wood_amount_MO_kg*(0.5* petroleum_RP +0.5* natural_gas *0.84)/(0.5* 128454996629.38 +0.5*17325468174.381 *0.84))*-1; lognormal variance with pedigree 0.0606, pedigree (2,1,5,5,3)
  (same comment as for waste mineral oil)
  production volume 1.03172e6 kg; = waste_wood_amount_MO_kg*(0.5* petroleum_RP_PV +0.5* natural_gas_PV *0.84)/(0.5* petroleum_RP +0.5*natural_gas *0.84)
    Calculated from the production volume of reference products
  property amount in multioutput activity_kg 1.03172e6 kg; name waste_wood_amount_MO_kg; = 1468000*(natural_gas_amount_MO_m3*39+petroleum_RP_amount_MO_kg*42)/(49620000000*39+159590000000*42)
  property price 0 EUR2005; name waste_wood_price_EUR2005
  properties: carbon content, non-fossil 0.48632, heating value, net 13.99 MJ, wet mass 1 kg, water content 0.25, dry mass 0.8 kg
  note on carbon content, non-fossil: Tab A.4, ecoinvent v2.2 report 13_I. C content has been referred to 1 kg DM,
- diesel: 0.000169165 kg; = diesel_amount_MO_kg*(0.5* petroleum_RP +0.5* natural_gas *0.84)/(0.5* 128454996629.38 +0.5*17325468174.381 *0.84); lognormal variance with pedigree 0.05, pedigree (1,1,5,5,3)
  EcoSpold01Location=RER
  environmental report for the total Norwegian production, partly with standard factors. Scaled according to energy content of reference products.
  Uncertainty: environmental report for the total Norwegian production, partly with standard factors.
  property amount in multioutput activity_kg 2.4192e7 kg; name diesel_amount_MO_kg; = 34422000*(natural_gas_amount_MO_m3*39+petroleum_RP_amount_MO_kg*42)/(49620000000*39+159590000000*42)
  properties: dry mass 1 kg, carbon content, fossil 0.865, wet mass 1 kg, heating value, net 42.8 MJ
  note on carbon content, fossil: C-content of diesel is 86.5% (ecoinvent v2.2 report 6_IV, Tab 3.14)
- chemical, organic: 0.000163218 kg; name chem_org; = chem_org_amount_MO_kg*(0.5* petroleum_RP +0.5* natural_gas *0.84)/(0.5* 128454996629.38 +0.5*17325468174.381 *0.84); lognormal variance with pedigree 0.062, pedigree (3,1,5,5,3)
  Quantity from environmental. report, part organic chemicals from standard data. Scaled according to energy content of reference products.
  EcoSpold01Location=GLO
  Uncertainty: quantity from environmental. report, part organic chemicals from standard data
  property amount in multioutput activity_kg 2.33416e7 kg; name chem_org_amount_MO_kg; = 33212000*(natural_gas_amount_MO_m3*39+petroleum_RP_amount_MO_kg*42)/(49620000000*39+159590000000*42)
  properties: heating value, net 19.03 MJ, wet mass 1 kg, dry mass 1 kg, carbon content, fossil 0.628
  note on carbon content, fossil: This dataset is an unweighted average of 20 organic substances (listed in Tab 88.1, ecoinvent v2.2 report 8, part II), being part of the top100 chemicals included in this database. The C-content has also been calculated as an unweighted average of the C content of the substances composing this dataset.
- spent antifreezer liquid: -1.0139e-7 kg; name spent_antifreezer; = ( spent_antifreezer_amount_MO_kg*(0.5* petroleum_RP +0.5* natural_gas *0.84)/(0.5* 128454996629.38 +0.5*17325468174.381 *0.84))*-1; lognormal variance with pedigree 0.0606, pedigree (2,1,5,5,3)
  (same comment as for waste mineral oil)
  production volume 14499.6 kg; = spent_antifreezer_amount_MO_kg*(0.5* petroleum_RP_PV +0.5* natural_gas_PV *0.84)/(0.5* petroleum_RP +0.5*natural_gas *0.84)
    Calculated from the production volume of reference products
  property amount in multioutput activity_kg 14499.6 kg; name spent_antifreezer_amount_MO_kg; = 20631*(natural_gas_amount_MO_m3*39+petroleum_RP_amount_MO_kg*42)/(49620000000*39+159590000000*42)
  property price 0 EUR2005; name spent_antifreezer_price_EUR2005
  properties: water content 1.07469, wet mass 1 kg, dry mass 0.482 kg, carbon content, fossil 0.431328, heating value, net 0.56 MJ
  note on carbon content, fossil: Tab A.7, ecoinvent v2.2 report 13_I. C content has been calculated after data in the tables, and then referred to 1 kg DM
- waste emulsion paint: -4.47213e-7 kg; name waste_emul_paint; = ( waste_emul_paint_amount_MO_kg*(0.5* petroleum_RP +0.5* natural_gas *0.84)/(0.5* 128454996629.38 +0.5*17325468174.381 *0.84))*-1; lognormal variance with pedigree 0.0606, pedigree (2,1,5,5,3)
  (same comment as for waste mineral oil)
  production volume 63955.3 kg; = waste_emul_paint_amount_MO_kg*(0.5* petroleum_RP_PV +0.5* natural_gas_PV *0.84)/(0.5* petroleum_RP +0.5*natural_gas *0.84)
    Calculated from the production volume of reference products
  property amount in multioutput activity_kg 63955.3 kg; name waste_emul_paint_amount_MO_kg; = 91000*(natural_gas_amount_MO_m3*39+petroleum_RP_amount_MO_kg*42)/(49620000000*39+159590000000*42)
  property price 0 EUR2005; name waste_emul_paint_price_EUR2005
  properties: dry mass 1 kg, carbon content, fossil 0.27, wet mass 1 kg, heating value, net 8.18 MJ
  note on carbon content, fossil: Tab A.4, ecoinvent v2.2 report 13_I. C content has been calculated after data in the tables, and then referred to 1 kg DM

## Inputs from nature
- Oil, crude, in ground [natural resource, in ground]: 1 kg; name oil_ground; = oil_ground_amount_MO_kg*(1* petroleum_RP +0* natural_gas *0.84)/(1* 128454996629.38 +0*17325468174.381 *0.84); source ANP 2019; lognormal variance with pedigree 0, pedigree (1,1,1,1,1)
  ANP Statistical Yearbook 2019 - Table 3.32 - Natural Gas Balance in Brazil - 2009/2019
  Uncertainty: National statistics.
  property amount in multioutput activity_kg 1.28455e11 kg; name oil_ground_amount_MO_kg
- Water, salt, sole [natural resource, in water]: 0.000614834 m3; name water_salt_sole_input; = water_salt_sole_input_amount_MO_m3*(0.99* petroleum_RP +0.01* natural_gas *0.84)/(0.99* 128454996629.38 +0.01*17325468174.381 *0.84); lognormal variance with pedigree 0.0006, pedigree (2,1,1,1,1)
  Water discharged. Total amount of produced water obtained from national statistics (anp.gov.br/dados-estatisticos).
  Discharged fraction calculated with standard parameters from Schori (2012).
  References:
  [ANP 2020]
  Agência Nacional do Petróleo, Gás Natural e Biocombustíveis. Satatistical data. Available at: anp.gov.br/dados-estatisticos
  [Schori 2012]
  Schori, S., Frischknecht, R. (2012). Life Cycle Inventory of Natural Gas Supply. ESU-services Ltd.
  Uncertainty: Calculated according to national statistics, partly with standard factors.
  property amount in multioutput activity_m3 7.90688e7 m3; name water_salt_sole_input_amount_MO_m3
- Gas, natural, in ground [natural resource, in ground]: 0.00013084 m3; name gas_ground; = gas_ground_amount_MO_m3*(0.00011* petroleum_RP +0.99989* natural_gas *0.84)/(0.00011* 128454996629.38 +0.99989*17325468174.381 *0.84); source ANP 2019; lognormal variance with pedigree 0, pedigree (1,1,1,1,1)
  (same comment as for Oil, crude, in ground)
  property amount in multioutput activity_m3 1.73255e10 m3; name gas_ground_amount_MO_m3
- Water, salt, ocean [natural resource, in water]: 0.000163437 m3; name water_salt_ocean_input; = water_salt_ocean_input_amount_MO_m3*(0.99* petroleum_RP +0.01* natural_gas *0.84)/(0.99* 128454996629.38 +0.01*17325468174.381 *0.84); lognormal variance with pedigree 0.0006, pedigree (2,1,1,1,1)
  Water reinjected. Total amount of produced water obtained from national statistics (anp.gov.br/dados-estatisticos).
  Reinjected fraction calculated with standard parameters from Schori (2012).
  References:
  [ANP 2020]
  Agência Nacional do Petróleo, Gás Natural e Biocombustíveis. Satatistical data. Available at: anp.gov.br/dados-estatisticos
  [Schori 2012]
  Schori, S., Frischknecht, R. (2012). Life Cycle Inventory of Natural Gas Supply. ESU-services Ltd.
  Uncertainty: Calculated according to national statistics, partly with standard factors.
  property amount in multioutput activity_m3 2.10183e7 m3; name water_salt_ocean_input_amount_MO_m3

## Emissions to nature
- TOC, Total Organic Carbon [water, surface water]: 8.4625e-5 kg; name TOC; = TOC_amount_MO_kg*(0.99* petroleum_RP +0.01* natural_gas *0.84)/(0.99* 128454996629.38 +0.01*17325468174.381 *0.84); lognormal variance with pedigree 0.1, pedigree (3,5,5,5,3)
  Extrapolation for sum parameter. Scaled according to energy content of reference products.
  Uncertainty: Extrapolation for sum parameter
  property amount in multioutput activity_kg 1.08829e7 kg; name TOC_amount_MO_kg; = 15485000*(natural_gas_amount_MO_m3*39+petroleum_RP_amount_MO_kg*42)/(49620000000*39+159590000000*42)
- Mercury [water, ocean]: 2.76728e-11 kg; name Hg_water; = Hg_water_amount_MO_kg*(0.99* petroleum_RP +0.01* natural_gas *0.84)/(0.99* 128454996629.38 +0.01*17325468174.381 *0.84); lognormal variance with pedigree 0.7, pedigree (1,1,5,5,3)
  environmental report for the total Norwegian production, partly with standard factors. Scaled according to energy content of reference products.
  Uncertainty: environmental report for the total Norwegian production, partly with standard factors.
  property amount in multioutput activity_kg 3.55877 kg; name Hg_water_amount_MO_kg; = 5*water_to_water_unspecifie_amount_MO_m3_0/111090000
- Nitrogen [water, surface water]: 1.34924e-8 kg; name N2; = N2_amount_MO_kg*(0.99* petroleum_RP +0.01* natural_gas *0.84)/(0.99* 128454996629.38 +0.01*17325468174.381 *0.84); lognormal variance with pedigree 0.092, pedigree (3,5,5,5,1)
  (same comment as for TOC, Total Organic Carbon)
  property amount in multioutput activity_kg 1735.16 kg; name N2_amount_MO_kg; = 2468,9*(natural_gas_amount_MO_m3*39+petroleum_RP_amount_MO_kg*42)/(49620000000*39+159590000000*42)
- Methane, bromochlorodifluoro-, Halon 1211 [air, non-urban air or from high stacks]: 3.58909e-10 kg; name halon; = halon_amount_MO_kg*(0.5* petroleum_RP +0.5* natural_gas *0.84)/(0.5* 128454996629.38 +0.5*17325468174.381 *0.84); lognormal variance with pedigree 0.0906, pedigree (2,1,5,5,3)
  Data calculated on the basis of losses and gas composition. Scaled from the Norwigian value according to amount of produced natural gas.
  Uncertainty: Data calculated on the basis of losses and gas composition. Scaled from the Norwigian value according to amount of produced natural gas.
  property amount in multioutput activity_kg 51.327 kg; name halon_amount_MO_kg; = 147*natural_gas_amount_MO_m3/49620000000
- Radon-222 [air, non-urban air or from high stacks]: 1.5227e-5 kBq; name Rd; = Rd_amount_MO_kBq*(0.5* petroleum_RP +0.5* natural_gas *0.84)/(0.5* 128454996629.38 +0.5*17325468174.381 *0.84); lognormal variance with pedigree 0.378, pedigree (4,1,5,5,3)
  Data calculated on the basis of losses and gas composition. Scaled from the Norwigian value according to amount of produced natural gas.
  Uncertainty: data calculated on the basis of losses and gas composition. Scaled from Norwegian value according to natural gas production.
  property amount in multioutput activity_kBq 2.17759e6 kBq; name Rd_amount_MO_kBq; = 6236600*natural_gas_amount_MO_m3/49620000000
- Xylene [water, ocean]: 1.84874e-6 kg; name xylene; = xylene_amount_MO_kg*(0.99* petroleum_RP +0.01* natural_gas *0.84)/(0.99* 128454996629.38 +0.01*17325468174.381 *0.84); lognormal variance with pedigree 0.342, pedigree (1,1,5,5,1)
  (same comment as for Mercury)
  property amount in multioutput activity_kg 237752 kg; name xylene_amount_MO_kg; = 338290*(natural_gas_amount_MO_m3*39+petroleum_RP_amount_MO_kg*42)/(49620000000*39+159590000000*42)
- Sulfur [water, surface water]: 4.67746e-8 kg; name S2; = S2_amount_MO_kg*(0.99* petroleum_RP +0.01* natural_gas *0.84)/(0.99* 128454996629.38 +0.01*17325468174.381 *0.84); lognormal variance with pedigree 0.092, pedigree (3,5,5,5,1)
  (same comment as for TOC, Total Organic Carbon)
  property amount in multioutput activity_kg 6015.31 kg; name S2_amount_MO_kg; = 8559*(natural_gas_amount_MO_m3*39+petroleum_RP_amount_MO_kg*42)/(49620000000*39+159590000000*42)
- Benzene [water, ocean]: 1.84874e-6 kg; name benzene; = benzene_amount_MO_kg*(0.99* petroleum_RP +0.01* natural_gas *0.84)/(0.99* 128454996629.38 +0.01*17325468174.381 *0.84); lognormal variance with pedigree 0.35, pedigree (1,1,5,5,3)
  environmental report for the total Norwegian production, assumption for the break down of BTX. Scaled according to energy content of reference products.
  Uncertainty: environmental report for the total Norwegian production, assumption for the break down of BTX.
  property amount in multioutput activity_kg 237752 kg; name benzene_amount_MO_kg; = 338290*(natural_gas_amount_MO_m3*39+petroleum_RP_amount_MO_kg*42)/(49620000000*39+159590000000*42)
- Propane [air, non-urban air or from high stacks]: 0.000228365 kg; name propane; = propane_amount_MO_kg*(0.5* petroleum_RP +0.5* natural_gas *0.84)/(0.5* 128454996629.38 +0.5*17325468174.381 *0.84); lognormal variance with pedigree 0.0406, pedigree (2,1,1,1,1)
  The volume of fugitive emissions is calculated from the amount of fugitive methane emitted during exploration and production activities in 2012 (112261860 kg - MCTI, 2015). This value is scaled according to the amount of Flaring and Losses informed by ANP (2019) for the years 2012 (1444.5E+06 m³) and 2018 (1358,2E+06 m³). Then, the share of propane is calculated based on natural gas composition (6.4 vol% - compiled from anp.gov.br/dados-estatisticos).
  The considered gas densities are 0.71 kg/m³ of methane; and 2.01 kg/m³ of propane.
  References:
  [ANP 2019] Agência Nacional do Petróleo, Gás Natural e Biocombustíveis (2019). Anuário Estatístico 2019. Available at: www.anp.gov.br/publicacoes/anuario-estatistico/5237-anuario-estatistico-2019. Accessed in 04/06/2020.
  [MCTI 2015]
  Ministry of Science, Technology and Innovation (2015). Third Brazilian Inventory of Anthropic Emissions and Removals of Greenhouse Gases. Reference Reports. Energy Sector. Fugitive Emissions of Green House Gases in the Oil and Gas Industry. Petrobras e Centro de Estudos Integrados sobre Meio Ambiente e Mudanças Climáticas - Centro Clima/COPPE/UFRJ. Available at: https://sirene.mctic.gov.br/portal/opencms/textoGeral/2018/10/11/Relatorios_de_Referencia_do_II_Inventario_Brasileiro_de_Emissoes_e_Remocoes_Antropicas_de_Gases_de_Efeito_Estufa.html. Accessed in: 12/06/2020.
  Uncertainty: Calculated according to national statistics.
  property amount in multioutput activity_kg 3.26582e7 kg; name propane_amount_MO_kg; = 0,91*((112261860/0,71)/0,73)*(0,064/0,73)*2,01*1358,2/1444,5
- COD, Chemical Oxygen Demand [water, surface water]: 0.000237781 kg; name COD; = COD_amount_MO_kg*(0.99* petroleum_RP +0.01* natural_gas *0.84)/(0.99* 128454996629.38 +0.01*17325468174.381 *0.84); lognormal variance with pedigree 0.1, pedigree (3,5,5,5,3)
  (same comment as for TOC, Total Organic Carbon)
  property amount in multioutput activity_kg 3.05791e7 kg; name COD_amount_MO_kg; = 43510000*(natural_gas_amount_MO_m3*39+petroleum_RP_amount_MO_kg*42)/(49620000000*39+159590000000*42)
- Carboxylic acids, unspecified [water, ocean]: 0.000153828 kg; name carboxylic_acid; = carboxylic_acid_amount_MO_kg*(0.99* petroleum_RP +0.01* natural_gas *0.84)/(0.99* 128454996629.38 +0.01*17325468174.381 *0.84); lognormal variance with pedigree 0.342, pedigree (1,1,5,5,1)
  (same comment as for Mercury)
  property amount in multioutput activity_kg 1.97826e7 kg; name carboxylic_acid_amount_MO_kg; = 28148000*(natural_gas_amount_MO_m3*39+petroleum_RP_amount_MO_kg*42)/(49620000000*39+159590000000*42)
- Mercury [air, non-urban air or from high stacks]: 7.6135e-12 kg; name Hg_air; = Hg_air_amount_MO_kg*(0.5* petroleum_RP +0.5* natural_gas *0.84)/(0.5* 128454996629.38 +0.5*17325468174.381 *0.84); lognormal variance with pedigree 0.118, pedigree (4,1,5,5,3)
  (same comment as for Methane, bromochlorodifluoro-, Halon 1211)
  property amount in multioutput activity_kg 1.08879 kg; name Hg_air_amount_MO_kg; = 3,1183*natural_gas_amount_MO_m3/49620000000
- Copper, ion [water, ocean]: 2.4186e-9 kg; name Cu; = Cu_amount_MO_kg*(0.99* petroleum_RP +0.01* natural_gas *0.84)/(0.99* 128454996629.38 +0.01*17325468174.381 *0.84); lognormal variance with pedigree 0.7, pedigree (1,1,5,5,3)
  environmental report for the total Norwegian production, partly with standard factors. Scaled according to amount of produced water.
  Uncertainty: environmental report for the total Norwegian production, partly with standard factors.
  property amount in multioutput activity_kg 311.037 kg; name Cu_amount_MO_kg; = 437*water_to_water_unspecifie_amount_MO_m3_0/111090000
- Oils, unspecified [water, ocean]: 1.7466e-5 kg; name oils; = oils_amount_MO_kg*(0.99* petroleum_RP +0.01* natural_gas *0.84)/(0.99* 128454996629.38 +0.01*17325468174.381 *0.84); lognormal variance with pedigree 0.35, pedigree (1,1,5,5,3)
  (same comment as for Mercury)
  property amount in multioutput activity_kg 2.24617e6 kg; name oils_amount_MO_kg; = 3196000*(natural_gas_amount_MO_m3*39+petroleum_RP_amount_MO_kg*42)/(49620000000*39+159590000000*42)
- Phenol [water, ocean]: 3.50719e-6 kg; name phenol; = phenol_amount_MO_kg*(0.99* petroleum_RP +0.01* natural_gas *0.84)/(0.99* 128454996629.38 +0.01*17325468174.381 *0.84); lognormal variance with pedigree 0.35, pedigree (1,1,5,5,3)
  (same comment as for Benzene)
  property amount in multioutput activity_kg 451032 kg; name phenol_amount_MO_kg; = 641760*(natural_gas_amount_MO_m3*39+petroleum_RP_amount_MO_kg*42)/(49620000000*39+159590000000*42)
- Nickel, ion [water, ocean]: 4.29481e-9 kg; name Ni; = Ni_amount_MO_kg*(0.99* petroleum_RP +0.01* natural_gas *0.84)/(0.99* 128454996629.38 +0.01*17325468174.381 *0.84); lognormal variance with pedigree 0.7, pedigree (1,1,5,5,3)
  (same comment as for Copper, ion)
  property amount in multioutput activity_kg 552.322 kg; name Ni_amount_MO_kg; = 776*water_to_water_unspecifie_amount_MO_m3_0/111090000
- Arsenic, ion [water, ocean]: 6.32599e-9 kg; name As; = As_amount_MO_kg*(0.99* petroleum_RP +0.01* natural_gas *0.84)/(0.99* 128454996629.38 +0.01*17325468174.381 *0.84); lognormal variance with pedigree 0.09, pedigree (1,1,5,5,3)
  (same comment as for Copper, ion)
  property amount in multioutput activity_kg 813.536 kg; name As_amount_MO_kg; = 1143*water_to_water_unspecifie_amount_MO_m3_0/111090000
- Water [water, unspecified]: 0.00066153 m3; name water_to_water_unspecified; = water_salt_ocean_input*(1-fraction_PW_to_air)+water_salt_sole_input*(1-fraction_PW_to_air); lognormal variance with pedigree 0.0406, pedigree (2,1,1,1,1)
  Calculated value based on literature values and expert opinion. See comments in the parametres' comment field.
  Uncertainty: Calculated according to national statistics.
  property carbon content, non-fossil 0; name C_content_non_fossil
  property wet mass 1000 kg; name WM
  property amount in multioutput activity_m3 7.90688e7 m3; name water_to_water_unspecifie_amount_MO_m3_0
  property fraction, origin: unspecified 0; name fraction_origin_unspecified_Ww
  property dry mass 0 kg; name DM
  property fraction, origin: fresh water 0; name fraction_origin_fresh_water_Ww
  property water in wet mass 1000 kg; name WWM
  property fraction, origin: salt water 1; name fraction_origin_salt_water_Ww
  property carbon content, fossil 0; name C_content_fossil
- Lead [water, ocean]: 3.01633e-9 kg; name Pb; = Pb_amount_MO_kg*(0.99* petroleum_RP +0.01* natural_gas *0.84)/(0.99* 128454996629.38 +0.01*17325468174.381 *0.84); lognormal variance with pedigree 0.7, pedigree (1,1,5,5,3)
  (same comment as for Copper, ion)
  property amount in multioutput activity_kg 387.906 kg; name Pb_amount_MO_kg; = 545*water_to_water_unspecifie_amount_MO_m3_0/111090000
- BOD5, Biological Oxygen Demand [water, surface water]: 0.000237781 kg; name BOD5; = BOD5_amount_MO_kg*(0.99* petroleum_RP +0.01* natural_gas *0.84)/(0.99* 128454996629.38 +0.01*17325468174.381 *0.84); lognormal variance with pedigree 0.1, pedigree (3,5,5,5,3)
  (same comment as for TOC, Total Organic Carbon)
  property amount in multioutput activity_kg 3.05791e7 kg; name BOD5_amount_MO_kg; = 43510000*(natural_gas_amount_MO_m3*39+petroleum_RP_amount_MO_kg*42)/(49620000000*39+159590000000*42)
- PAH, polycyclic aromatic hydrocarbons [water, ocean]: 2.44688e-7 kg; name PAH; = PAH_amount_MO_kg*(0.99* petroleum_RP +0.01* natural_gas *0.84)/(0.99* 128454996629.38 +0.01*17325468174.381 *0.84); lognormal variance with pedigree 0.35, pedigree (1,1,5,5,3)
  (same comment as for Benzene)
  property amount in multioutput activity_kg 31467.4 kg; name PAH_amount_MO_kg; = 44774*(natural_gas_amount_MO_m3*39+petroleum_RP_amount_MO_kg*42)/(49620000000*39+159590000000*42)
- Carbon dioxide, fossil [air, non-urban air or from high stacks]: 0.000925044 kg; name CO2_fossil; = CO2_fossil_amount_MO_kg*(0.5* petroleum_RP +0.5* natural_gas *0.84)/(0.5* 128454996629.38 +0.5*17325468174.381 *0.84); lognormal variance with pedigree 0.05, pedigree (1,1,5,5,3)
  (same comment as for Mercury)
  property amount in multioutput activity_kg 1.32289e8 kg; name CO2_fossil_amount_MO_kg; = 188230000*(natural_gas_amount_MO_m3*39+petroleum_RP_amount_MO_kg*42)/(49620000000*39+159590000000*42)
- Nitrogen oxides [air, non-urban air or from high stacks]: 1.22861e-6 kg; name NOx; = NOx_amount_MO_kg*(0.5* petroleum_RP +0.5* natural_gas *0.84)/(0.5* 128454996629.38 +0.5*17325468174.381 *0.84); lognormal variance with pedigree 0.09, pedigree (1,1,5,5,3)
  (same comment as for Mercury)
  property amount in multioutput activity_kg 175701 kg; name NOx_amount_MO_kg; = 250000*(natural_gas_amount_MO_m3*39+petroleum_RP_amount_MO_kg*42)/(49620000000*39+159590000000*42)
- Butane [air, non-urban air or from high stacks]: 9.95371e-5 kg; name butane; = butane_amount_MO_kg*(0.5* petroleum_RP +0.5* natural_gas *0.84)/(0.5* 128454996629.38 +0.5*17325468174.381 *0.84); lognormal variance with pedigree 0.0406, pedigree (2,1,1,1,1)
  The volume of fugitive emissions is calculated from the amount of fugitive methane emitted during exploration and production activities in 2012 (112261860 kg - MCTI, 2015). This value is scaled according to the amount of Flaring and Losses informed by ANP (2019) for the years 2012 (1444.5E+06 m³) and 2018 (1358,2E+06 m³). Then, the share of butane is calculated based on natural gas composition (2.1 vol% - compiled from anp.gov.br/dados-estatisticos).
  The considered gas densities are 0.71 kg/m³ of methane; and 2.67 kg/m³ of butane.
  References:
  [ANP 2019] Agência Nacional do Petróleo, Gás Natural e Biocombustíveis (2019). Anuário Estatístico 2019. Available at: www.anp.gov.br/publicacoes/anuario-estatistico/5237-anuario-estatistico-2019. Accessed in 04/06/2020.
  [MCTI 2015]
  Ministry of Science, Technology and Innovation (2015). Third Brazilian Inventory of Anthropic Emissions and Removals of Greenhouse Gases. Reference Reports. Energy Sector. Fugitive Emissions of Green House Gases in the Oil and Gas Industry. Petrobras e Centro de Estudos Integrados sobre Meio Ambiente e Mudanças Climáticas - Centro Clima/COPPE/UFRJ. Available at: https://sirene.mctic.gov.br/portal/opencms/textoGeral/2018/10/11/Relatorios_de_Referencia_do_II_Inventario_Brasileiro_de_Emissoes_e_Remocoes_Antropicas_de_Gases_de_Efeito_Estufa.html. Accessed in: 12/06/2020.
  Uncertainty: Calculated based on national statistics.
  property amount in multioutput activity_kg 1.42346e7 kg; name butane_amount_MO_kg; = 0,91*((112261860/0,71)/0,73)*(0,021/0,73)*2,67*1358,2/1444,5
- Chromium, ion [water, ocean]: 2.86136e-9 kg; name Cr; = Cr_amount_MO_kg*(0.99* petroleum_RP +0.01* natural_gas *0.84)/(0.99* 128454996629.38 +0.01*17325468174.381 *0.84); lognormal variance with pedigree 0.09, pedigree (1,1,5,5,3)
  (same comment as for Copper, ion)
  property amount in multioutput activity_kg 367.977 kg; name Cr_amount_MO_kg; = 517*water_to_water_unspecifie_amount_MO_m3_0/111090000
- Toluene [water, ocean]: 1.84874e-6 kg; name toluene; = toluene_amount_MO_kg*(0.99* petroleum_RP +0.01* natural_gas *0.84)/(0.99* 128454996629.38 +0.01*17325468174.381 *0.84); lognormal variance with pedigree 0.35, pedigree (1,1,5,5,3)
  (same comment as for Mercury)
  property amount in multioutput activity_kg 237752 kg; name toluene_amount_MO_kg; = 338290*(natural_gas_amount_MO_m3*39+petroleum_RP_amount_MO_kg*42)/(49620000000*39+159590000000*42)
- Water [air, unspecified]: 0.000116741 m3; name water_to_air_unspecified; = water_salt_ocean_input*fraction_PW_to_air+water_salt_sole_input*fraction_PW_to_air; lognormal variance with pedigree 0.0407, pedigree (2,2,1,1,1)
  Calculated value based on literature values and expert opinion. See comments in the parametres' comment field.
  property amount in multioutput activity_m3 2.10183e7 m3; name water_to_air_unspecified_amount_MO_m3
  property fraction, origin: fresh water 0; name fraction_origin_fresh_water
  property fraction, origin: salt water 1; name fraction_origin_salt_water
  property fraction, origin: unspecified 0; name fraction_origin_unspecified
- Ethane [air, non-urban air or from high stacks]: 0.00021885 kg; name ethane; = ethane_amount_MO_kg*(0.5* petroleum_RP +0.5* natural_gas *0.84)/(0.5* 128454996629.38 +0.5*17325468174.381 *0.84); lognormal variance with pedigree 0.0406, pedigree (2,1,1,1,1)
  The volume of fugitive emissions is calculated from the amount of fugitive methane emitted during exploration and production activities in 2012 (112261860 kg - MCTI, 2015). This value is scaled according to the amount of Flaring and Losses informed by ANP (2019) for the years 2012 (1444.5E+06 m³) and 2018 (1358,2E+06 m³). Then, the share of ethane is calculated based on natural gas composition (9.2 vol% - compiled from anp.gov.br/dados-estatisticos).
  The considered gas densities are 0.71 kg/m³ of methane; and 1.34 kg/m³ of ethane.
  References:
  [ANP 2019] Agência Nacional do Petróleo, Gás Natural e Biocombustíveis (2019). Anuário Estatístico 2019. Available at: www.anp.gov.br/publicacoes/anuario-estatistico/5237-anuario-estatistico-2019. Accessed in 04/06/2020.
  [MCTI 2015]
  Ministry of Science, Technology and Innovation (2015). Third Brazilian Inventory of Anthropic Emissions and Removals of Greenhouse Gases. Reference Reports. Energy Sector. Fugitive Emissions of Green House Gases in the Oil and Gas Industry. Petrobras e Centro de Estudos Integrados sobre Meio Ambiente e Mudanças Climáticas - Centro Clima/COPPE/UFRJ. Available at: https://sirene.mctic.gov.br/portal/opencms/textoGeral/2018/10/11/Relatorios_de_Referencia_do_II_Inventario_Brasileiro_de_Emissoes_e_Remocoes_Antropicas_de_Gases_de_Efeito_Estufa.html. Accessed in: 12/06/2020.
  Uncertainty: Calculated according to national statistics.
  property amount in multioutput activity_kg 3.12974e7 kg; name ethane_amount_MO_kg; = 0,91*((112261860/0,71)/0,73)*(0,092/0,73)*1,34*1358,2/1444,5
- NMVOC, non-methane volatile organic compounds, unspecified origin [air, non-urban air or from high stacks]: 0.00113867 kg; name NMVOC; = NMVOC_amount_MO_kg*(0.9617* petroleum_RP+0.0383* natural_gas *0.84)/(0.9617* 128454996629.38 +0.0383*17325468174.381 *0.84); lognormal variance with pedigree 0.17, pedigree (1,1,5,5,3)
  (same comment as for Mercury)
  property amount in multioutput activity_kg 1.46928e8 kg; name NMVOC_amount_MO_kg; = 209060000*(natural_gas_amount_MO_m3*39+petroleum_RP_amount_MO_kg*42)/(49620000000*39+159590000000*42)
- AOX, Adsorbable Organic Halogen as Cl [water, surface water]: 1.79901e-10 kg; name AOX; = AOX_amount_MO_kg*(0.99* petroleum_RP +0.01* natural_gas *0.84)/(0.99* 128454996629.38 +0.01*17325468174.381 *0.84); lognormal variance with pedigree 0.1, pedigree (3,5,5,5,3)
  (same comment as for TOC, Total Organic Carbon)
  property amount in multioutput activity_kg 23.1356 kg; name AOX_amount_MO_kg; = 32,919*(natural_gas_amount_MO_m3*39+petroleum_RP_amount_MO_kg*42)/(49620000000*39+159590000000*42)
- Methane, fossil [air, non-urban air or from high stacks]: 0.000715567 kg; name CH4_fossil; = CH4_fossil_amount_MO_kg*(0.7157* petroleum_RP +0.2843* natural_gas *0.84)/(0.7157* 128454996629.38 +0.2843*17325468174.381 *0.84); lognormal variance with pedigree 0.04, pedigree (1,1,1,1,1)
  The amount of fugitive methane emitted during exploration and production activities in 2012 (112261860 kg - MCTI, 2015) is scaled according to the amount of Flaring and Losses informed by ANP (2019) for the years 2012 (1444.5E+06 m³) and 2018 (1358,2E+06 m³).
  References:
  [ANP 2019] Agência Nacional do Petróleo, Gás Natural e Biocombustíveis (2019). Anuário Estatístico 2019. Available at: www.anp.gov.br/publicacoes/anuario-estatistico/5237-anuario-estatistico-2019. Accessed in 04/06/2020.
  [MCTI 2015]
  Ministry of Science, Technology and Innovation (2015). Third Brazilian Inventory of Anthropic Emissions and Removals of Greenhouse Gases. Reference Reports. Energy Sector. Fugitive Emissions of Green House Gases in the Oil and Gas Industry. Petrobras e Centro de Estudos Integrados sobre Meio Ambiente e Mudanças Climáticas - Centro Clima/COPPE/UFRJ. Available at: https://sirene.mctic.gov.br/portal/opencms/textoGeral/2018/10/11/Relatorios_de_Referencia_do_II_Inventario_Brasileiro_de_Emissoes_e_Remocoes_Antropicas_de_Gases_de_Efeito_Estufa.html. Accessed in: 12/06/2020.
  Uncertainty: Calculated according to national statistics.
  property amount in multioutput activity_kg 9.6055e7 kg; name CH4_fossil_amount_MO_kg; = 0,91*112261860*1358,2/1444,5
- Zinc, ion [water, ocean]: 8.26807e-8 kg; name Zn; = Zn_amount_MO_kg*(0.99* petroleum_RP +0.01* natural_gas *0.84)/(0.99* 128454996629.38 +0.01*17325468174.381 *0.84); lognormal variance with pedigree 0.7, pedigree (1,1,5,5,3)
  (same comment as for Copper, ion)
  property amount in multioutput activity_kg 10632.9 kg; name Zn_amount_MO_kg; = 14939*water_to_water_unspecifie_amount_MO_m3_0/111090000
- Cadmium, ion [water, ocean]: 7.74837e-10 kg; name Cd; = Cd_amount_MO_kg*(0.99* petroleum_RP +0.01* natural_gas *0.84)/(0.99* 128454996629.38 +0.01*17325468174.381 *0.84); lognormal variance with pedigree 0.7, pedigree (1,1,5,5,3)
  (same comment as for Copper, ion)
  property amount in multioutput activity_kg 99.6457 kg; name Cd_amount_MO_kg; = 140*water_to_water_unspecifie_amount_MO_m3_0/111090000
- DOC, Dissolved Organic Carbon [water, surface water]: 8.4625e-5 kg; name DOC; = DOC_amount_MO_kg*(0.99* petroleum_RP +0.01* natural_gas *0.84)/(0.99* 128454996629.38 +0.01*17325468174.381 *0.84); lognormal variance with pedigree 0.1, pedigree (3,5,5,5,3)
  (same comment as for TOC, Total Organic Carbon)
  property amount in multioutput activity_kg 1.08829e7 kg; name DOC_amount_MO_kg; = 15485000*(natural_gas_amount_MO_m3*39+petroleum_RP_amount_MO_kg*42)/(49620000000*39+159590000000*42)

## Sampling procedure
Data is based on the statistical yearbook published by the Petroleum, Gas and Biofuels Brazilian National Agency (ANP) and the Monthly Bulletin of the Natural Gas Industry from the Brazilian Ministry of Mines and Energy. They are based on the direct report from producers.

This activity results in the production of 1.73E+10 m³ of natural gas and 1.28E+11 kg of petroleum, produced in Brazilian offshore fields over 2018 (ANP, 2019).
The combined amount of Flaring and Losses (1.23E+9 m³) informed by ANP (2019) for the year 2018 is used to estimate the amount of flared and vented natural gas. The share of vented natural gas is estimated using the amount of fugitive methane emitted during exploration and production activities in 2012 (112,261,860 kg - MCTI, 2015). Considering that all methane fugitive emissions are due to venting, the final amount of vented natural gas in 2012 is calculated with the natural gas composition (0.73%vol of methane; 0.71 kg methane/m³; compiled from anp.gov.br/dados-estatisticos). Thereby, the calculated amount of vented natural gas in 2012 is 2.15E+8 m³, which corresponds to 15% of the combined Flaring and Losses statistics for 2012. This calculated share was used to split the amount flared and vented natural gas in offshore production for 2018, respectively 1.05E+9 m³ and 1.83E+8 m³.
Another adaptation is the amount of natural gas consumed in turbines during field exploration and production activities (4.54E+9 m³ - retrieved from MME, 2019).
References:
[ANP 2019] Agência Nacional do Petróleo, Gás Natural e Biocombustíveis (2019). Anuário Estatístico 2019. Available at: www.anp.gov.br/publicacoes/anuario-estatistico/5237-anuario-estatistico-2019. Accessed in 04/06/2020.
[MCTI 2015] Ministry of Science, Technology and Innovation (2015). Third Brazilian Inventory of Anthropic Emissions and Removals of Greenhouse Gases. Reference Reports. Energy Sector. Fugitive Emissions of Green House Gases in the Oil and Gas Industry. Petrobras e Centro de Estudos Integrados sobre Meio Ambiente e Mudanças Climáticas - Centro Clima/COPPE/UFRJ. Available at: https://sirene.mctic.gov.br/portal/opencms/textoGeral/2018/10/11/Relatorios_de_Referencia_do_II_Inventario_Brasileiro_de_Emissoes_e_Remocoes_Antropicas_de_Gases_de_Efeito_Estufa.html. Accessed in: 12/06/2020.
[MME 2019] Ministry of Mines and Energy (2019). Monthly Bulletin of the Natural Gas Industry. December 2018. Edition number 142. Available at: http://www.mme.gov.br/web/guest/secretarias/petroleo-gas-natural-ebiocombustiveis/publicacoes/boletim-mensal-de-acompanhamento-da-industria-de-gas-natural. Accessed in: 10/06/2020.

## Extrapolations
All flows contained in the original Norwegian dataset that could not be updated with Brazilian data were scaled according to the energy content of the reference products. Produced water composition, i.e. contaminants concentrations, was also extrapolated from the Norwigian dataset. The uncertainty information was adjusted accordingly.

Assumed energy contents are 39 MJ/m³ of natural gas and 42 MJ/kg of petroleum.

The carbon content properties of all air emissions were adjusted to consider 100% fossil carbon. However, waste treatment flows of ‘waste wood, untreated’ and ‘Municipal Solid Waste’ are responsible for unbalanced non-fossil carbon emissions, as in the original dataset representing the Norwegian geography.
