# packing, clay product

Dataset: EcoSpold 2, unit process
Geography: RoW
Time period: 2000-01-01 to 2021-12-31
Technology level: current
Classification: EcoSpold01Categories: construction materials/others
Classification: ISIC rev.4 ecoinvent: 8292:Packaging activities
Tags: ConvertedDataset
Scenario: Business-as-Usual
System model: Allocation, cut-off by classification
Generated by: Daniel Kellenberger (obsolete)
Published in: Kellenberger D. 2007
Database: ecoinvent
isCopyrightProtected: true
accessRestrictedTo: 1

## General comment
The packing and loading process is normalized with an annual production volume of 1'000'000 kg/a and a density of 1'600 m3/kg. The estimated lifespan of the machines is assumed to be 25 years.
[This dataset was already contained in the ecoinvent database version 2. It was not individually updated during the transfer to ecoinvent version 3. Life Cycle Impact Assessment results may still have changed, as they are affected by changes in the supply chain, i.e. in other datasets. This dataset was generated following the ecoinvent quality guidelines for version 2. It may have been subject to central changes described in the ecoinvent version 3 change report (http://www.ecoinvent.org/database/ecoinvent-version-3/reports-of-changes/), and the results of the central updates were reviewed extensively. The changes added e.g. consistent water flows and other information throughout the database. The documentation of this dataset can be found in the ecoinvent reports of version 2, which are still available via the ecoinvent website. The change report linked above covers all central changes that were made during the conversion process.]

## Included activities end
Includes the process of packing, transportation within the plant and loading of the bags on paletts. The machines used therefore are included in the infrastructure. The waste treatment after use by the end-user and transports of the packing materials are included.

## Geography
Data are from one company (packing, lime products) in Switzerland and adjusted for clay products.

## Technology
Assumption that the same process is used as for packing lime products

## Reference product
- packing, clay product: 1 kg; CPC 85400: Packaging services; By-product classification allocatable product
  EcoSpold01Location=CH
  production volume 3.96633 kg
    This is a placeholder value that does not reflect real-world production volumes. This dataset does not currently require a real-world production volume to work in the database framework, and no actual data were collected yet. This has no negative effect on the results of the ecoinvent database.
  properties: price 0.0729 EUR2005

## Inputs from technosphere
- waste polyethylene: 0 kg; pedigree (1,1,1,1,1)
  EcoSpold01Location=CH
  production volume 0 kg
    Calculated from the production volume of packing, clay product in proportion to the respective output amounts.
  properties: carbon content, fossil 0.825301, dry mass 0.996 kg, water content 0.00401606, wet mass 1 kg, heating value, net 42.47 MJ
  note on carbon content, fossil: C content in 1 kg DM was calculated using data in Tab A.1, ecoinvent v2.2 report 13_I
  note on heating value, net: Value taken from the general comment of the treatment dataset.
- electricity, medium voltage: 0 kWh; pedigree (1,1,1,1,1)
  EcoSpold01Location=UCTE
- extrusion, plastic film: 6.15e-5 kg; lognormal variance with pedigree 0.128, pedigree (4,5,5,5,4)
  EcoSpold01Location=RER
- waste wood, untreated: 0 kg; pedigree (1,1,1,1,1)
  EcoSpold01Location=CH
  production volume 0 kg
    (same comment as for waste polyethylene)
  properties: heating value, net 13.99 MJ, dry mass 0.8 kg, wet mass 1 kg, water content 0.25, carbon content, non-fossil 0.48632
  note on carbon content, non-fossil: Tab A.4, ecoinvent v2.2 report 13_I. C content has been referred to 1 kg DM,
- polyethylene, high density, granulate: 6.15e-5 kg; lognormal variance with pedigree 0.128, pedigree (4,5,5,5,4)
  EcoSpold01Location=RER
  properties: carbon content, fossil 0.857143, wet mass 1 kg, dry mass 1 kg, heating value, net 42.47 MJ
  note on carbon content, fossil: Polyethylene is formed out of a huge amount of ethylene monomers (C2H4) (ecoinvent v2.2 report 11_II). MW=28 g/mol
- industrial machine, heavy, unspecified: 0.0015 kg; lognormal variance with pedigree 0.49, pedigree (5,5,5,5,4)
  EcoSpold01Location=RER
- EUR-flat pallet: 6.25e-5 unit; lognormal variance with pedigree 0.158, pedigree (4,5,5,5,4)
  EcoSpold01Location=RER
  properties: carbon content, non-fossil 0.58833, carbon content, fossil 0.0311351, dry mass 18.3333 kg, water content 0.2, wet mass 22 kg, heating value, net 335.11 MJ
  note on carbon content, non-fossil: C content in components of the pallet (ecoinvent v2.2 report 7_part XVIII)
- waste polyethylene: -6.84137e-6, -4.57114e-7, -3.45708e-8, -1.88805e-7, -7.62749e-8, -1.79288e-7, -5.82917e-6, -4.78934e-5 kg (8 entries); lognormal variance with pedigree 0.128, pedigree (4,5,5,5,4)
  EcoSpold01Location=CH
  production volume 0.0001845 kg
- electricity, medium voltage: 3.14302e-5, 6.02696e-6, 0.000138388, 0.00045818, 0.00010118, 0.00147157, 0.000207419, 0.000675802 kWh (8 entries); lognormal variance with pedigree 0.1121, pedigree (1,2,5,5,4)
  EcoSpold01Location=UCTE
- waste wood, untreated: -0.000111204, -1.38076e-5, -1.00949e-6, -3.87814e-5, -5.85893e-6, -9.26248e-6, -0.000173145, -0.00147533 kg (8 entries); lognormal variance with pedigree 0.158, pedigree (4,5,5,5,4)
  EcoSpold01Location=CH
  production volume 0.0054852 kg

## Sampling procedure
Measured data of one Swiss plant

## Extrapolations
See geography This dataset has been copied from an original dataset covering the geography CH. The uncertainty has been adjusted accordingly.

## Review by Roberto Dones 2005-07-19
Passed
