# electricity production, nuclear, boiling water reactor

Dataset: EcoSpold 2, unit process
Geography: DE
Time period: 1990-01-01 to 2021-12-31
Technology level: current
Classification: ISIC rev.4 ecoinvent: 3510:Electric power generation, transmission and distribution
Classification: EcoSpold01Categories: nuclear power/power plants
Tags: nuclear power
Scenario: Business-as-Usual
System model: Allocation, cut-off by classification
Generated by: Karin Treyer
Published in: Dones, R. 2007
Database: ecoinvent
isCopyrightProtected: true
accessRestrictedTo: 1

## General comment
The average burnup 48 MWd/kg heavy metal around year 2000 has been assumed representative for the lifetime of the modeled plant. The average burnup corresponds to an average enrichment of 3.8% U235 for fresh uranium fuel elements. The utilisation factor for the infrastructure is the inverse of the total net electricity delivered in 40 years lifetime; the production of the Swiss BWR has been adjusted by the average country specific capacity factors for the period 1997 to 2002 with consideration of the different contributions from the two classes 1000 MW and 1300 MW; for this purpose, the infrastructure of the 1000 MW class has been increased by a factor of 1.2 to represent the plants belonging to the 1300 MW class and then the two contributions have been weighted by the energy production shares. Material requirements have been extrapolated from the Swiss BWR by the ratio of the capacity factors. The transport requirements are calculated with the standard distances for chemical and diesel requirements and assumed specific distances for fuel recharge and radioactive waste. Radioactive emission species to air and water are averages weighted by energy of the emissions from 1000 MW and 1300 MW BWRs in the period 1995 - 1999. The radioactive water emissions have been inputted to the most detailed available emission species; the difference between the "total beta-gamma (excluding H-3)" given by the reference and the sum of the detailed species has been inputted as "Radioactive species, Nuclides, unspecified". The radioactive waste streams are modeled according to share: spent fuel to reprocessing (40%) and conditioning (60%) (approximate share based on available information on the amount and fate of the total arisings of spent fuel from operational German nuclear power reactors); and, contaminated waste from dismantling. The latter stream has been recalculated by the ratio of the utilisation factors for infrastructure.
[This dataset was already contained in the ecoinvent database version 2. It was not individually updated during the transfer to ecoinvent version 3. Life Cycle Impact Assessment results may still have changed, as they are affected by changes in the supply chain, i.e. in other datasets. This dataset was generated following the ecoinvent quality guidelines for version 2. It may have been subject to central changes described in the ecoinvent version 3 change report (http://www.ecoinvent.org/database/ecoinvent-version-3/reports-of-changes/), and the results of the central updates were reviewed extensively. The changes added e.g. consistent water flows and other information throughout the database. The documentation of this dataset can be found in the ecoinvent reports of version 2, which are still available via the ecoinvent website. The change report linked above covers all central changes that were made during the conversion process.]

## Included activities end
The module includes fuel elements, chemicals, and diesel requirements as well as the relevant transport requirements. Water use (fresh and decarbonized) for cooling is included. Considered radioactive waste streams are: spent fuel to reprocessing and conditioning; operational low active waste for conditioning in the intermediate repository; and, contaminated waste from dismantling. Non-radioactive wastes are accounted for.

## Geography
Swiss data of one specific plant for requirements and all German BWRs for emissions.

## Technology
Standard technology for commercial operation.

## Parameters
- fraction, process water, to air: 0.15 dimensionless; name fraction_PW_to_air; lognormal variance with pedigree 0.092025, pedigree (4,4,3,2,4)
  Literature value. In case when no industry/process specific data are available, default evaporation fraction value is used. This value is 15% and is based on literature (Statistics Canada, 2007 & Shaffer, K.H., 2008, Consumptive water use in the Great Lakes Basin, USGS & Shiklomanov, 2003, World Water Resources at the Beginning of the 21st Century) and has been approved by an expert.
- fraction, cooling water, once-through system, to air: 0.004 dimensionless; name fraction_CW_OT_to_air; lognormal variance with pedigree 0.0413, pedigree (2,3,1,3,1)
  Calculated based on literature value (Scown, C.D., 2011, Water Footprint of U.S. Transportation Fuels and supplying information of the article) (Vionnet, S., Quantis Water Database - Technical Report, 2012).
- fraction, cooling water, recirculating system, to air: 0.771 dimensionless; name fraction_CW_R_to_air; lognormal variance with pedigree 0.0413, pedigree (2,3,1,3,1)
  (same comment as for fraction, cooling water, once-through system, to air)
- fraction, cooling water, cooling pond system, to air: 0.032 dimensionless; name fraction_CW_CP_to_air; lognormal variance with pedigree 0.0413, pedigree (2,3,1,3,1)
  (same comment as for fraction, cooling water, once-through system, to air)
- fraction, water, decarbonised, to air: 0.0380756 dimensionless; name fraction_WDC_to_air; = fraction_CW_to_air; lognormal variance with pedigree 0.092025, pedigree (4,4,3,2,4)
  Calculated value. See comments in the other parametres present in this dataset. Decarbonised water is considered to be always used as cooling water, thus cooling water fractions to air are applied to all carbonised water input flows to calculate the amount of water consumed in the processes.
- fraction, cooling water, to air: 0.0380756 dimensionless; name fraction_CW_to_air; lognormal variance with pedigree 0.092025, pedigree (4,4,3,2,4)
  Calculated value based on literature value (Scown, 2011 & Floerke, 2009, Future changes of freshwater needs in the electricity production sector & Stiegel, 2008, Estimating Freshwater Needs to Meet Future Thermoelectric Generation Requirements) (Vionnet, S., Quantis Water Database - Technical Report, 2012).

## Reference product
- electricity, high voltage: 1 kWh; name electricity; By-product classification allocatable product; CPC 17100: Electrical energy
  EcoSpold01Location=DE
  production volume 1.9926e10 kWh; name apv_el
    Literature value/statistics. Net production of grid-connected electricity in 2008. (Net = gross production minus direct electricity use needed for electricity production at the power plant).The annual production volume is valid for 2008, even if this dataset is valid for a longer time period.
  property price 0.0977 EUR2005; name electricity_price_EUR2005
    Temporary price data. Calculated as 90% of purchasers price based on: 94% of the average price (to account for a 6% loss in transformation and transmission) for electricity for industrial consumersin 2005 (excluded taxes). From IEA.

## Inputs from technosphere
- diesel, burned in diesel-electric generating set, 10MW: 0.000349 MJ; lognormal variance with pedigree 0.002, pedigree (1,1,3,1,1)
  own estimation
  EcoSpold01Location=GLO
  properties: heating value, net 1 MJ
- nitrogen, liquid: 5.83e-5 kg; lognormal variance with pedigree 0.002, pedigree (1,1,3,1,1)
  EcoSpold01Location=RER
  own estimation
  properties: dry mass 1 kg, wet mass 1 kg
- cast iron: 1.21e-7 kg; lognormal variance with pedigree 0.012, pedigree (1,1,3,1,1)
  extrapolation from another plant type
  EcoSpold01Location=RER
  properties: carbon content, fossil 0.04, wet mass 1 kg, dry mass 1 kg
  note on carbon content, fossil: Cast iron is made by remelting pig iron in small furnaces (e.g. cupola furnaces or electric arc furnaces) and poured into moulds to make castings. It usually contains 2% to 6% carbon (ecoinvent v2.2 report 10_partII). An average content of 4% was considered
- anionic resin: 1.11e-6 kg; lognormal variance with pedigree 0.002, pedigree (1,1,3,1,1)
  own estimation
  EcoSpold01Location=CH
  properties: water content 1, wet mass 1 kg, dry mass 0.5 kg, carbon content, fossil 0.680721, heating value, net 9.09 MJ
  note on carbon content, fossil: Cross-linked polystyrene beads are treated with chloromethyl methyl ether under anhydrous conditions, with either aluminum chloride or tin(IV) chloride as catalyst. Chloromethylated polystyrene is obtained. In a second stage, the chlorine in the chloromethylated group can be replaced by an amine (Anion exchange resins, in Ullmann). In this case, Trimethylamine, C3H9N, is used (ecoinvent v2.2 report 8-part 93). That is, the resine can be formulated as C12H18NCl (after Ullmann, Anion exchange resins). The resine is hydrated (ecoinvent v2.2 report 8, part II, Tab 93.7)
- concrete, normal: 1.67e-8 m3; lognormal variance with pedigree 0.002, pedigree (1,1,3,1,1)
  own estimation
  EcoSpold01Location=CH
  properties: wet mass 2380 kg, water content 0.086758, dry mass 2190 kg
- low level radioactive waste: -1.6568e-8 m3; name radio_waste_2; lognormal variance with pedigree 0.012, pedigree (1,1,3,1,1)
  EcoSpold01Location=CH
  own estimation
  production volume 330.134 m3; name apv_radiow_2; = apv_el/ electricity* radio_waste_2
    Calculated from the production volume of electricity, high voltage in proportion to the respective output amounts.
  property price 0 EUR2005; name radio_waste_2_price_EUR2005
  properties: dry mass 2500 kg, wet mass 2500 kg
- flat glass, coated: 4.13e-6 kg; lognormal variance with pedigree 0.002, pedigree (1,1,3,1,1)
  own estimation
  EcoSpold01Location=RER
  properties: dry mass 1 kg, wet mass 1 kg
- spent nuclear fuel: -2.63e-6 kg; name spent_nuclear; lognormal variance with pedigree 0.042, pedigree (1,1,3,1,1)
  EcoSpold01Location=RER
  own assumption
  production volume 52405.4 kg; name apv_fuel; = apv_el/ electricity* spent_nuclear
    (same comment as for low level radioactive waste)
  property price 0 EUR2005; name spent_nuclear_price_EUR2005
  properties: wet mass 1 kg, dry mass 1 kg
- cement, unspecified: 8.1e-6 kg; lognormal variance with pedigree 0.002, pedigree (1,1,3,1,1)
  EcoSpold01Location=CH
  own estimation
  properties: wet mass 1 kg, dry mass 1 kg
- acetylene: 3.4e-8 kg; lognormal variance with pedigree 0.002, pedigree (1,1,3,1,1)
  EcoSpold01Location=CH
  own estimation
  properties: wet mass 1 kg, dry mass 1 kg, carbon content, fossil 0.923077, heating value, net 51.2 MJ
  note on carbon content, fossil: C2H2. ecoinvent v2.2 report n 8. Produced from partial oxidation of natural gas
  note on heating value, net: Based on literature, page 25 (Value may refer to HHV), Althaus H.-J., Chudacoff M., Hischier R., Jungbluth N., Osses M. and Primas A. (2007) Life Cycle Inventories of Chemicals. Final report ecoinvent data v2.0 No. 8. EMPA, Swiss Centre for Life Cycle Inventories, Dübendorf, CH, Online-Version under: www.ecoinvent.org.
- oxygen, liquid: 1.58e-5 kg; lognormal variance with pedigree 0.002, pedigree (1,1,3,1,1)
  own estimation
  EcoSpold01Location=RER
  properties: dry mass 1 kg, wet mass 1 kg
- steel, low-alloyed, hot rolled: 5.7e-6 kg; lognormal variance with pedigree 0.062, pedigree (1,1,3,1,1)
  own assumption
  EcoSpold01Location=RER
  properties: dry mass 1 kg, wet mass 1 kg, carbon content, fossil 0.005
  note on carbon content, fossil: Low alloyed steel composition given in Tab. 3.2 ecoinvent v2.2 report 10_partII. Steel assumed to have a C content of 0.5%
- cationic resin: 1.11e-6 kg; lognormal variance with pedigree 0.002, pedigree (1,1,3,1,1)
  own estimation
  EcoSpold01Location=CH
  properties: wet mass 1 kg, water content 1, carbon content, fossil 0.521606, dry mass 0.5 kg, heating value, net 6.68 MJ
  note on carbon content, fossil: Chemically inert polystyrene beads are treated with concentrated sulfuric or chlorosulfonic acid to give cross-linked polystyrene 3-sulfonic acid (Cation exchange resins, Ullmann). The resine was approximated as C8H8O3S (from Ullmann, Cation exchange resins). The resine is hydrated (ecoinvent v2.2 report 8, part II, Tab 93.5)
- lubricating oil: 1.53e-6 kg; lognormal variance with pedigree 0.002, pedigree (1,1,3,1,1)
  own estimation
  EcoSpold01Location=RER
  properties: dry mass 1 kg, heating value, net 40.2 MJ, wet mass 1 kg, carbon content, fossil 0.75
  note on heating value, net: Literature value, Source: IPCC 2006, 2006 IPCC Guidelines for National Greenhouse Gas Inventories, Prepared by the National Greenhouse Gas Inventories Programme, Eggleston H.S., Buendia L., Miwa K., Ngara T. and Tanabe K. (eds). Published: IGES, Japan
  note on carbon content, fossil: Lubricating oil is produced from diesel. C-content/dry mass of fats and oils considered 75%, from: ecoinvent v2.2 report, n 15a, pg 40
- water, decarbonised: 3.27 kg; name water_decarbonised_input; lognormal variance with pedigree 0.012, pedigree (1,1,3,1,1)
  EcoSpold01Location=RER
  own estimation
  properties: wet mass 1 kg
- boric acid, anhydrous, powder: 2.42e-8 kg; lognormal variance with pedigree 0.002, pedigree (1,1,3,1,1)
  EcoSpold01Location=RER
  own estimation on a specific study
  properties: wet mass 1 kg, dry mass 1 kg
- argon, liquid: 2.46e-5 kg; lognormal variance with pedigree 0.002, pedigree (1,1,3,1,1)
  own estimation
  EcoSpold01Location=RER
  properties: dry mass 1 kg, wet mass 1 kg
- low level radioactive waste for final repository: -4.25e-8 m3; name radio_waste; lognormal variance with pedigree 0.042, pedigree (1,1,3,1,1)
  EcoSpold01Location=CH
  estrapolation from a different reactor type
  production volume 846.855 m3; name apv_radiow; = apv_el/ electricity* radio_waste
    (same comment as for low level radioactive waste)
  property price 0 EUR2005; name radio_waste_price_EUR2005
  properties: wet mass 2500 kg, dry mass 2500 kg
- waste mineral oil: -1.54e-6 kg; name mineral_oil; lognormal variance with pedigree 0.002, pedigree (1,1,3,1,1)
  own estimation
  EcoSpold01Location=CH
  production volume 30686 kg; name apv_oil; = apv_el/ electricity* mineral_oil
    (same comment as for low level radioactive waste)
  property price 0 EUR2005; name mineral_oil_price_EUR2005
  properties: wet mass 1 kg, dry mass 0.9 kg, heating value, net 34.7 MJ, carbon content, fossil 0.864444, water content 0.111111
  note on heating value, net: Value taken from the general comment of the treatment dataset.
  note on carbon content, fossil: Tab A.6, ecoinvent v2.2 report 13_I. C content has been calculated after data in the tables, and then referred to 1 kg DM
- nuclear fuel element, for boiling water reactor, UO2 4.0% & MOX: 2.63e-6 kg; lognormal variance with pedigree 0.012, pedigree (1,1,3,1,1)
  estimated variation over lifetime
  EcoSpold01Location=DE
  properties: dry mass 1 kg, wet mass 1 kg
- borax, anhydrous, powder: 3.03e-8 kg; lognormal variance with pedigree 0.002, pedigree (1,1,3,1,1)
  EcoSpold01Location=RER
  own estimation on a specific study
  properties: wet mass 1 kg, dry mass 1 kg
- fly ash and scrubber sludge: -2.06e-6 kg; name ash_sludge; lognormal variance with pedigree 0.002, pedigree (1,1,3,1,1)
  own estimation
  EcoSpold01Location=CH
  production volume 41047.6 kg; name apv_ash; = apv_el/ electricity* ash_sludge
    (same comment as for low level radioactive waste)
  property price 0 EUR2005; name ash_sludge_price_EUR2005
  properties: dry mass 0.1 kg, water content 9, wet mass 1 kg, carbon content, fossil 0.167
- chemical, inorganic: 6.3e-7 kg; lognormal variance with pedigree 0.002, pedigree (1,1,3,1,1)
  own estimation
  EcoSpold01Location=GLO
  properties: dry mass 1 kg, carbon content, fossil 0.003, wet mass 1 kg
  note on carbon content, fossil: This dataset is an unweighted average of 20 inorganic substances (listed in Tab 88.1, ecoinvent v2.2 report 8, part II), being part of the top100 chemicals included in this database. The C-content has also been calculated as an unweighted average of the C content of the substances composing this dataset.
- hazardous waste, for incineration: -9.16e-7 kg; name waste; lognormal variance with pedigree 0.002, pedigree (1,1,3,1,1)
  EcoSpold01Location=CH
  own estimation
  production volume 18252.2 kg; name apv_haz; = apv_el/ electricity* waste
    (same comment as for low level radioactive waste)
  property price 0 EUR2005; name waste_price_EUR2005
  properties: heating value, net 17 MJ, water content 0.333333, carbon content, fossil 0.554667, dry mass 0.75 kg, wet mass 1 kg
- carbon dioxide, liquid: 1.58e-7 kg; lognormal variance with pedigree 0.002, pedigree (1,1,3,1,1)
  own estimation
  EcoSpold01Location=RER
  properties: heating value, net 8.27 MJ, dry mass 1 kg, carbon content, fossil 0.272727, wet mass 1 kg
- paper, woodfree, coated: 6.07e-7 kg; lognormal variance with pedigree 0.002, pedigree (1,1,3,1,1)
  own estimation
  EcoSpold01Location=RER
  properties: heating value, net 14.11 MJ, water content 0.0582011, carbon content, non-fossil 0.22775, dry mass 0.945 kg, carbon content, fossil 0.0590617, wet mass 1 kg
  note on carbon content, non-fossil: Biogenic C content was calculated after biogenic C contents of chemicals used in the production of the paper (in Tab 8.72 & 8.73 ecoinvent v2.2 report 11_III, part 8). The cellulose content in 1 kg of paper (on a wet mas basis) was estimated as (1-chemical content), C content of cellulose was considered 0.44 kgC/kg dry mass (ecoinvent v2.2 report, n 15a, pg 40)
  note on carbon content, fossil: Fossil C content was calculated after fossil C contents of chemicals used in the production of the paper (in Tab 8.72 & 8.73 ecoinvent v2.2 report 11_III, part 8).
- hydrogen, liquid: 9.71e-6 kg; lognormal variance with pedigree 0.002, pedigree (1,1,3,1,1)
  own estimation
  EcoSpold01Location=RER
  properties: dry mass 1 kg, heating value, net 120.21 MJ, wet mass 1 kg
- nuclear power plant, boiling water reactor 1000MW: 3.03e-12 unit; lognormal variance with pedigree 0.002, pedigree (1,1,3,1,1)
  estimation of total net electricity over a lifetime
  EcoSpold01Location=DE
- reinforcing steel: 8.1e-7 kg; lognormal variance with pedigree 0.012, pedigree (1,1,3,1,1)
  extrapolation from another plant type
  EcoSpold01Location=RER
  properties: carbon content, fossil 0.004, dry mass 1 kg, wet mass 1 kg
- chemical, organic: 1.3e-6 kg; lognormal variance with pedigree 0.002, pedigree (1,1,3,1,1)
  EcoSpold01Location=GLO
  own estimation
  properties: heating value, net 19.03 MJ, dry mass 1 kg, wet mass 1 kg, carbon content, fossil 0.628
  note on carbon content, fossil: This dataset is an unweighted average of 20 organic substances (listed in Tab 88.1, ecoinvent v2.2 report 8, part II), being part of the top100 chemicals included in this database. The C-content has also been calculated as an unweighted average of the C content of the substances composing this dataset.

## Inputs from nature
- Water, river [natural resource, in water]: 0.00473 m3; name water_river_input; lognormal variance with pedigree 0.002, pedigree (1,1,3,1,1)
  own estimation
- Water, cooling, unspecified natural origin [natural resource, in water]: 0.073769 m3; name water_cooling_UNO_input; source Scown, C.D., et al. 2011; lognormal variance with pedigree 0.130025, pedigree (4,4,5,2,4)
  Calculated based on literature (Scown, C.D., et al., 2011, Water Footprint of U.S. Trasportation Fuels;Scown, C.D., et al., 2011, Water Footprint of U.S. Trasportation Fuels (SI); Stiegel, 2008, Estimating Freshwater Needs to Meet Future Thermoelectric Generation Requirements; Floerke, M., 2009, Future changes of freshwater needs in the electricity production sector), (Vionnet, S., Quantis Water Database - Technical Report, 2012). Water use in this process is modelled based on literature (see references). The process boundaries are given by the boundaries of the power plant. The process ends when the energy (MJ) is produced and ready to be used for electricity production (kWh).
  Calculated based on literature data.
  property carbon content, fossil 0.0104329; name C_content_fossil
  property water content 9081.65; name water_content
  property carbon content, non-fossil 0; name C_content_non_fossil
  property water in wet mass 999.89 kg; name WWM
  property dry mass 0.1101 kg; name DM
  property wet mass 1000 kg; name WM

## Emissions to nature
- Xenon-137 [air, non-urban air or from high stacks]: 0.000622 kBq; lognormal variance with pedigree 0.042, pedigree (1,1,3,1,1)
  uncertainty declared in reports for radioactive releases
- Krypton-88 [air, non-urban air or from high stacks]: 0.00149 kBq; lognormal variance with pedigree 0.042, pedigree (1,1,3,1,1)
  uncertainty declared in reports for radioactive releases
- Chromium-51 [water, surface water]: 1.89e-6 kBq; lognormal variance with pedigree 0.042, pedigree (1,1,3,1,1)
  uncertainty declared in reports for radioactive releases
- Radioactive species, other beta emitters [air, non-urban air or from high stacks]: 3.39e-6 kBq; lognormal variance with pedigree 0.042, pedigree (1,1,3,1,1)
  uncertainty declared in reports for radioactive releases
- Strontium-90 [water, surface water]: 1 kBq; lognormal variance with pedigree 0.042, pedigree (1,1,3,1,1)
  uncertainty declared in reports for radioactive releases
- Tellurium-123m [water, surface water]: 4.94e-10 kBq; lognormal variance with pedigree 0.042, pedigree (1,1,3,1,1)
  uncertainty declared in reports for radioactive releases
- Xenon-131m [air, non-urban air or from high stacks]: 0.00126 kBq; lognormal variance with pedigree 0.042, pedigree (1,1,3,1,1)
  uncertainty declared in reports for radioactive releases
- Technetium-99m [water, surface water]: 1.15e-7 kBq; lognormal variance with pedigree 0.042, pedigree (1,1,3,1,1)
  uncertainty declared in reports for radioactive releases
- Xenon-135 [air, non-urban air or from high stacks]: 0.146 kBq; lognormal variance with pedigree 0.042, pedigree (1,1,3,1,1)
  uncertainty declared in reports for radioactive releases
- Hydrogen-3, Tritium [water, surface water]: 0.245 kBq; lognormal variance with pedigree 0.042, pedigree (1,1,3,1,1)
  uncertainty declared in reports for radioactive releases
- Cobalt-58 [water, surface water]: 7.97e-7 kBq; lognormal variance with pedigree 0.042, pedigree (1,1,3,1,1)
  uncertainty declared in reports for radioactive releases
- Niobium-95 [water, surface water]: 5.62e-8 kBq; lognormal variance with pedigree 0.042, pedigree (1,1,3,1,1)
  uncertainty declared in reports for radioactive releases
- Strontium-89 [water, surface water]: 3.85e-8 kBq; lognormal variance with pedigree 0.042, pedigree (1,1,3,1,1)
  uncertainty declared in reports for radioactive releases
- Argon-41 [air, non-urban air or from high stacks]: 0.00137 kBq; lognormal variance with pedigree 0.042, pedigree (1,1,3,1,1)
  uncertainty declared in reports for radioactive releases
- Xenon-138 [air, non-urban air or from high stacks]: 0.00996 kBq; lognormal variance with pedigree 0.042, pedigree (1,1,3,1,1)
  uncertainty declared in reports for radioactive releases
- Krypton-85m [air, non-urban air or from high stacks]: 0.00309 kBq; lognormal variance with pedigree 0.042, pedigree (1,1,3,1,1)
  uncertainty declared in reports for radioactive releases
- Cesium-137 [water, surface water]: 3.79e-6 kBq; lognormal variance with pedigree 0.042, pedigree (1,1,3,1,1)
  uncertainty declared in reports for radioactive releases
- Xenon-133 [air, non-urban air or from high stacks]: 0.0585 kBq; lognormal variance with pedigree 0.042, pedigree (1,1,3,1,1)
  uncertainty declared in reports for radioactive releases
- Cesium-134 [water, surface water]: 1.64e-7 kBq; lognormal variance with pedigree 0.042, pedigree (1,1,3,1,1)
  uncertainty declared in reports for radioactive releases
- Krypton-89 [air, non-urban air or from high stacks]: 0.00011 kBq; lognormal variance with pedigree 0.042, pedigree (1,1,3,1,1)
  uncertainty declared in reports for radioactive releases
- Krypton-87 [air, non-urban air or from high stacks]: 0.00311 kBq; lognormal variance with pedigree 0.042, pedigree (1,1,3,1,1)
  uncertainty declared in reports for radioactive releases
- Antimony-124 [water, surface water]: 5.58e-8 kBq; lognormal variance with pedigree 0.042, pedigree (1,1,3,1,1)
  uncertainty declared in reports for radioactive releases
- Cobalt-60 [water, surface water]: 1.07e-5 kBq; lognormal variance with pedigree 0.042, pedigree (1,1,3,1,1)
  uncertainty declared in reports for radioactive releases
- Iodine-131 [water, surface water]: 4.07e-6 kBq; lognormal variance with pedigree 0.042, pedigree (1,1,3,1,1)
  uncertainty declared in reports for radioactive releases
- Xenon-135m [air, non-urban air or from high stacks]: 0.0972 kBq; lognormal variance with pedigree 0.042, pedigree (1,1,3,1,1)
  uncertainty declared in reports for radioactive releases
- Krypton-85 [air, non-urban air or from high stacks]: 0.0172 kBq; lognormal variance with pedigree 0.042, pedigree (1,1,3,1,1)
  uncertainty declared in reports for radioactive releases
- Silver-110 [water, surface water]: 2.25e-7 kBq; lognormal variance with pedigree 0.042, pedigree (1,1,3,1,1)
  uncertainty declared in reports for radioactive releases
- Iodine-131 [air, non-urban air or from high stacks]: 0.0367 kBq; lognormal variance with pedigree 0.042, pedigree (1,1,3,1,1)
  uncertainty declared in reports for radioactive releases
- Hydrogen-3, Tritium [air, non-urban air or from high stacks]: 0.0367 kBq; lognormal variance with pedigree 0.042, pedigree (1,1,3,1,1)
  uncertainty declared in reports for radioactive releases
- Radioactive species, Nuclides, unspecified [water, surface water]: 1.65e-5 kBq; lognormal variance with pedigree 0.042, pedigree (1,1,3,1,1)
  uncertainty declared in reports for radioactive releases
- Water [water, unspecified]: 0.0781262 m3; name water_to_water_unspecified; = (water_decarbonised_input/1000)*(1-fraction_WDC_to_air)+water_cooling_UNO_input*(1-fraction_CW_to_air)+water_river_input*(1-fraction_PW_to_air); lognormal variance with pedigree 0.130025, pedigree (4,4,5,2,4)
  Calculated value based on literature values and expert opinion. See comments in the parametres' comment field.
  property fraction, origin: unspecified 0.908277; name fraction_origin_unspecified_Ww
  property fraction, origin: salt water 0; name fraction_origin_salt_water_Ww
  property fraction, origin: fresh water 0.0917233; name fraction_origin_fresh_water_Ww
- Antimony-125 [water, surface water]: 2.02e-7 kBq; lognormal variance with pedigree 0.042, pedigree (1,1,3,1,1)
  uncertainty declared in reports for radioactive releases
- Xenon-133m [air, non-urban air or from high stacks]: 0.000764 kBq; lognormal variance with pedigree 0.042, pedigree (1,1,3,1,1)
  uncertainty declared in reports for radioactive releases
- Water [air, unspecified]: 0.00364281 m3; name water_to_air_unspecified; = (water_decarbonised_input/1000)*fraction_WDC_to_air+water_cooling_UNO_input*fraction_CW_to_air+water_river_input*fraction_PW_to_air; lognormal variance with pedigree 0.130025, pedigree (4,4,5,2,4)
  (same comment as for Water)
  property fraction, origin: salt water 0; name fraction_origin_salt_water
  property fraction, origin: unspecified 0.771054; name fraction_origin_unspecified
  property fraction, origin: fresh water 0.228946; name fraction_origin_fresh_water

## Sampling procedure
Literature and statistics of radioactive emissions.

## Extrapolations
This dataset has been extrapolated from year 2015 to the year of the calculation (2021). The uncertainty has been adjusted accordingly.

## Review by Carl Vadenbo 2015-07-27
The update of the whole electricity sector for the ecoinvent v3.2 database consist of hundreds of datasets. All these datasets have passed through a streamlined review processes where the underlying modelling of production volumes, technology shares and efficiencies was reviewed in detail prior to the datasets being submitted to the database.
