# chlor-alkali electrolysis, diaphragm cell

Dataset: EcoSpold 2, unit process
Geography: RoW
Time period: 2000-01-01 to 2021-12-31
Technology level: current
Classification: ISIC rev.4 ecoinvent: 2011:Manufacture of basic chemicals
Synonyms: Cloro; Chlore; Molecular chlorine; Chlor; Bertholite
Scenario: Business-as-Usual
System model: Allocation, cut-off by classification
Generated by: Roland Hischier
Published in: Althaus H.-J. 2007
Database: ecoinvent
isCopyrightProtected: true
accessRestrictedTo: 1

## General comment
This dataset represents the production of chlorine and sodium hydroxide (NaOH) by means of chlor-alkali electrolysis using a diaphragm cell. The chlor-alkali process is the main technology for the production of chlorine and sodium hydroxide. In this process, chlorine and sodium hydroxide are produced by electrolysis of a salt solution using either a mercury cell, diaphragm cell or membrane cell.
Chlorine is largely used in the synthesis of chlorinated organic compounds. PVC and isocyanates are the main drivers of chlor-alkali production in the EU-27 and EFTA countries (Euro Chlor 2013). These products are used in a wide range of applications, such as construction materials, plastics, clothing and pesticides.
Sodium hydroxide is a white odorless pellet or solid that is very soluble. Sodium hydroxide is used for the synthesis of other chemicals, and is used in the metal industry, the pulp and paper sector, the textile industry and in other various sectors.
This dataset is mainly based on a document concerning the best available techniques in the chlor-alkali manufacturing industry (European Commission 2001).
References:
Althaus H.-J., Chudacoff M., Hischier R., Jungbluth N., Osses M. and Primas A. (2007) Life Cycle Inventories of Chemicals. Final report ecoinvent data v2.0 No. 8. Swiss Centre for Life Cycle Inventories, Dübendorf, CH.
European Commission (2001) Integrated Pollution Prevention and Control (IPPC) - Reference Document on Best Available Techniques in the Chlor-Alkali Manufacturing Industry. Institute for Prospective Technological Studies, Sevilla.
Euro Chlor (2013) An Eco-profile and Environmental Product Declaration of the European Chlor-Alkali Industry, Chlorine (The chlor-alkali process).

## Included activities start
The activity starts when the raw materials enter the process.

## Included activities end
This activity ends with the production of gaseous chlorine and sodium hydroxide. Besides the electrolysis process in a diaphragm cell, the following process steps are included in this process: brine production, brine purification, brine resaturation as well as the final handling of the electrolysis products, without the chlorine liquefaction.

## Geography
European average values. The inventory is assumed to be representative of the global production.

## Technology
In the diaphragm process, all reactions take place in only one cell. A diaphragm is used to separate the feed brine (anolyte) and the chlorine formed at the anode from the sodium hydroxide containing solution (catholyte) and the hydrogen formed at the cathode. Without the diaphragm being present during electrolysis, chlorine and hydrogen would form an explosive mixture and sodium hydroxide and chlorine would react to form sodium hypochlorite (NaOCl). Diaphragms used to be made from asbestos but up-todate technology allows for asbestos-free polymer-based diaphragms. Purified brine is fed to the anode compartment and percolates through the diaphragm into the cathode compartment. The percolation rate is controlled by a difference in liquid level between both compartments. At the anodes (metal oxide coated titanium), chlorine gas is formed which is collected and directed to further processing. Cathodes, where water decomposition takes place, are made of activated carbon steel. Catholyte leaving the cell, also called cell liquor, is a mixture of 10-12 wt.-% sodium hydroxide and 15-17 wt.-% sodium chloride in water. This solution is usually evaporated to 50 wt.-% NaOH. In this process, simultaneously most of the salt is removed by precipitation to a final residual of 1 wt.-%. The resulting salt is typically recirculated to brine preparation. The advantage of diaphragm cells is that the quality requirements for the brine and the electrical energy consumption are low. Disadvantageous are the high amount of thermal energy necessary for sodium hydroxide concentration and the comparably low quality of the produced sodium hydroxide and chlorine.
References:
Euro Chlor (2013) An Eco-profile and Environmental Product Declaration of the European Chlor-Alkali Industry, Chlorine (The chlor-alkali process).

## Parameters
- fraction, cooling water, to air: 0.3875 dimensionless; name fraction_CW_to_air; = (0.5*fraction_CW_OT_to_air)+(0.5*fraction_CW_R_to_air); lognormal variance with pedigree 0.092025, pedigree (4,4,3,2,4)
  Calculated value based on literature value (see comments of the other parametres present in this dataset) and expert opinion. In the case when no industry/literature data are available about the type of cooling or directly fraction, cooling water, to air specific for the process a default assumption is applied. It is assumed that the once-through cooling system is used in 50% of all cases and recirculating system is used in another 50% of all cases.
- fraction, cooling water, once-through system, to air: 0.004 dimensionless; name fraction_CW_OT_to_air; lognormal variance with pedigree 0.0413, pedigree (2,3,1,3,1)
  Calculated based on literature value (Scown, C.D., 2011, Water Footprint of U.S. Transportation Fuels and supplying information of the article) (Vionnet, S., Quantis Water Database - Technical Report, 2012).
- fraction, process water, to air: 0.205 dimensionless; name fraction_PW_to_air; lognormal variance with pedigree 0.092025, pedigree (4,4,3,2,4)
  Literature value (Statistics Canada, 2007 & Shaffer, K.H., 2008, Consumptive water use in the Great Lakes Basin, USGS) (Vionnet, S., Quantis Water Database - Technical Report, 2012).
- fraction, cooling water, cooling pond system, to air: 0.032 dimensionless; name fraction_CW_CP_to_air; lognormal variance with pedigree 0.0413, pedigree (2,3,1,3,1)
  (same comment as for fraction, cooling water, once-through system, to air)
- fraction, cooling water, recirculating system, to air: 0.771 dimensionless; name fraction_CW_R_to_air; lognormal variance with pedigree 0.0413, pedigree (2,3,1,3,1)
  (same comment as for fraction, cooling water, once-through system, to air)

## Reference product
- sodium hydroxide, without water, in 50% solution state: 1 kg; name BP_sodium_hydroxide_without_water_in_50; CPC 34231: Chemical elements n.e.c.; inorganic acids except phosphoric, nitric and sulphonitric; inorganic oxygen compoun[…]; By-product classification allocatable product; CAS 1310-73-2
  production volume 9.6841e9 kg; = RP_PV*BP_sodium_hydroxide_without_water_in_50/ABS(RP)
    Calculated from the production volume of chlorine, gaseous in proportion to the respective output amounts.
  property heating value, net 3.03 MJ
    LHV is calculated based on the elemental composition of the substance. Based on the CAS number of the substance (001310-73-2), the chemical formula of the substance is found to be: NaOH, (PubChem 2020).
    Reference: Kim, S., Chen, J., Cheng, T., Gindulyte, A., He, J., He, S., Li, Q., Shoemaker, B. A., Thiessen, P. A., Yu, B., Zaslavsky, L., Zhang, J., & Bolton, E. E. (2019). PubChem 2019 update: improved access to chemical data. Nucleic acids research, 47(D1), D1102–D1109. https://doi.org/10.1093/nar/gky1033
  property price 0.191 EUR2005
    Temporary price data. Calculated as 90% of purchasers price based on: 2004 prices for World Import/Export data (US$ and tonnes) from UN Commodity Trade Statistics Database (http://data.un.org/Explorer.aspxDatabase [Accessed 2 July 2010]). Commodity: Sodium hydroxide (caustic soda) solid.
  property carbon content 0
    carbon content on a dry matter basis (reserved; not for manual entry)
  property true value 0.21583; name BP_sodium_hydroxide_without_true_value_0
    allocation property applied in "true value" allocation // value calculated from revenue
  properties: water in wet mass 0 kg, water content 0, dry mass 1 kg, carbon content, fossil 0, wet mass 1 kg, carbon content, non-fossil 0, carbon allocation 0 kg
- chlorine, gaseous: 0 kg; name RP; CPC 34231: Chemical elements n.e.c.; inorganic acids except phosphoric, nitric and sulphonitric; inorganic oxygen compoun[…]; By-product classification allocatable product; CAS 7782-50-5
  Chlorine is largely used in the synthesis of chlorinated organic compounds. PVC and isocyanates are the main drivers of chlor-alkali production in the EU-27 and EFTA countries (Euro Chlor 2013). These products are used in a wide range of applications, such as construction materials, plastics, clothing and pesticides.
  References:
  Euro Chlor (2013) An Eco-profile and Environmental Product Declaration of the European Chlor-Alkali Industry, Chlorine (The chlor-alkali process).
  production volume 8.57e9 kg; name RP_PV
    Approximate global production volume for chlorine by membrane cell technology in 2014 calculated as follows: total global production in 2006 was estimated to be 58 million metric tonnes (The Chlorine Institue, 2014), of which 74% by membrane cell technology, 17% by diaphragm cell technology and 4% by mercury cell technology in 2014 (IHS, 2014). No more recent statistic on global production volumes were available. In the past chlorine production volumes were at rather stable levels. Therefore, it is assumed that overall production volumes remained at constant level since 2006. Literature indicates that the share of mercury cell technology continues to decrease rapidly in the future, with a complete phase out expected around 2020. Note that this production volume is hence only valid for the year 2014. For the use of this dataset in chlorine supply chains later than 2014 it is recommended to adjust the production volume accordingly.
    Reference(s): The Chlorine Institute. 2014. Stewardship. Chlorine Manufacture. Accessed online at https://www.chlorineinstitute.org/stewardship/chlorine/chlorine-manufacture/, 9th of October 2017.
    IHS. 2014. Chemical Economics Handbook, Chlorine/Sodium Hydroxide (Chlor-Alkali). Accessed online at https://www.ihs.com/products/chlorine-sodium-chemical-economics-handbook.html, 9th of October 2017.
  property price 0.141 EUR2005
    Global average price for gaseous chlorine derived from the global average price of liquid chlorine by substracting the cost of inputs (0.07 KWh of electricity, medium voltage) needed for the liquefaction (0.007EUR/kg of liquid chlorine at an electricity price of 0.1EUR/kWh). The price for liquid chlorine (0.148 EUR/kg) was calculated as weighted average of the European (238Eur/tonne), US (223EUR/tonne) and the Chinese (84EUR/tonne) (Tecnon OrbiCHem, 2016) price according to the region's market shares (Europe 15%, US 20%, China 45%) scaled to 100% (ruschlor.ru, 2014).
    Reference(s):
    Tecnon OrbiCHem. 2016. Chem-Netfacts, Chemical insight an foresight - on a single page, Chlorine, 1 April 2016, document requested at http://www.orbichem.com/Chem-Netfacts.aspx?P_ID=208, 6 October 2017;
    ruschlor.ru. 2014. International Outlook for the Future of the Chinese Chlor-Alkali Industry retrieved from http://ruschlor.ru/english/images/stories/Pekin%20/Otchet_Engl/_.doc, 6 October 2017
  property carbon content 0
    carbon content on a dry matter basis (reserved; not for manual entry)
  property true value 0.141; name RP_true_value
    allocation property applied in "true value" allocation // value calculated from revenue
  properties: water content 0, water in wet mass 0 kg, carbon content, fossil 0, carbon content, non-fossil 0, wet mass 1 kg, dry mass 1 kg, carbon allocation 0 kg

## By-products
- hydrogen, liquid: 0 kg; name BP_hydrogen_liquid; CPC 34210: Hydrogen, nitrogen, oxygen, carbon dioxide and rare gases; inorganic oxygen compounds of non-metals n.e.c.; By-product classification allocatable product; CAS 1333-74-0
  production volume 2.3996e8 kg; = RP_PV*BP_hydrogen_liquid/ABS(RP)
    (same comment as for sodium hydroxide, without water, in 50% solution state)
  property price 2.68 EUR2005
    Calculated value based on data from United Nations Commodity Trade Statistics Database (comtrade.un.org). UN comtrade category: 280410 Hydrogen. Year 2005. Using exchange rate of 1EURO = 1.209 USD. Average of price of import into 5 main markets (EU, US, JP, IN and CN). Cross reference; Literature (http://www.ttcorp.com/pdf/marketReport.pdf). The price of hydrogen, liquid is 5-10 USD/kg.
  property heating value, net 120.21 MJ
    LHV is calculated based on the elemental composition of the substance. Based on the CAS number of the substance (001333-74-0), the chemical formula of the substance is found to be: H2, (PubChem 2020).
    Reference: Kim, S., Chen, J., Cheng, T., Gindulyte, A., He, J., He, S., Li, Q., Shoemaker, B. A., Thiessen, P. A., Yu, B., Zaslavsky, L., Zhang, J., & Bolton, E. E. (2019). PubChem 2019 update: improved access to chemical data. Nucleic acids research, 47(D1), D1102–D1109. https://doi.org/10.1093/nar/gky1033
  property carbon content 0
    carbon content on a dry matter basis (reserved; not for manual entry)
  property true value 0.07504; name BP_hydrogen_liquid_true_value
    allocation property applied in "true value" allocation // value calculated from revenue
  properties: carbon content, non-fossil 0, water in wet mass 0 kg, wet mass 1 kg, carbon content, fossil 0, water content 0, dry mass 1 kg, carbon allocation 0 kg

## Inputs from technosphere
- soda ash, light, crystalline, heptahydrate: 0.00508602 kg; lognormal variance with pedigree 0.0526, pedigree (1,3,5,5,1)
  EC IPPC study 2002
  Uncertainty: E
  properties: heating value, net 3.43 MJ, dry mass 1 kg, wet mass 1 kg, carbon content, fossil 0.0517241
- asbestos, crysotile type: 8.84525e-5 kg; lognormal variance with pedigree 0.2106, pedigree (5,5,5,5,5)
  EC IPPC study 2002
  Uncertainty: E
  properties: wet mass 1 kg, dry mass 1 kg
- sodium chloride, powder: 0.77396 kg; lognormal variance with pedigree 0.0526, pedigree (1,3,5,5,1)
  EC IPPC study 2002
  Uncertainty: E
  properties: wet mass 1 kg, dry mass 1 kg
- barite: 0.00154792 kg; lognormal variance with pedigree 0.0526, pedigree (1,3,5,5,1)
  EC IPPC study 2002
  Uncertainty: E
  properties: wet mass 1 kg, dry mass 1 kg
- sodium hydroxide, without water, in 50% solution state: 0.000884525 kg; lognormal variance with pedigree 0.0526, pedigree (1,3,5,5,1)
  EC IPPC study 2002
  Uncertainty: E
  properties: dry mass 1 kg, wet mass 1 kg, heating value, net 3.03 MJ
- calcium chloride: 0.00787228 kg; lognormal variance with pedigree 0.0526, pedigree (1,3,5,5,1)
  EC IPPC study 2002
  Uncertainty: E
  properties: wet mass 1 kg, dry mass 1 kg
- sulfite: 4.42263e-5 kg; lognormal variance with pedigree 0.0526, pedigree (1,3,5,5,1)
  EC IPPC study 2002
  Uncertainty: E
  properties: dry mass 1 kg, wet mass 1 kg
- carbon tetrachloride: 4.42263e-6 kg; lognormal variance with pedigree 0.0526, pedigree (1,3,5,5,1)
  EC IPPC study 2002
  Uncertainty: E
  properties: dry mass 1 kg, carbon content, fossil 0.0789474, wet mass 1 kg, heating value, net 2.37 MJ
- sulfuric acid: 0.00384769 kg; lognormal variance with pedigree 0.0526, pedigree (1,3,5,5,1)
  Data from survey in literature (Ayres 1997)
  Uncertainty: D
  properties: wet mass 1 kg, dry mass 1 kg
- sludge, NaCl electrolysis: -0.00676662 kg; name BP_sludge_NaCl_electrolysis; lognormal variance with pedigree 0.0526, pedigree (1,3,5,5,1)
  EC IPPC study 2002
  Uncertainty: E
  production volume 1.31121e8 kg; = RP_PV*BP_sludge_NaCl_electrolysis/ABS(RP)
    (same comment as for sodium hydroxide, without water, in 50% solution state)
  property price 0 EUR2005; name BP_sludge_NaCl_electrolysi_price_EUR2005
  properties: wet mass 1 kg, dry mass 1 kg
- electricity, medium voltage: 0 kWh; pedigree (1,1,1,1,1)
  EC IPPC study 2002
  Uncertainty: E
- hazardous waste, for underground deposit: -4.42263e-5 kg; name BP_hazardous_waste_for_underground; lognormal variance with pedigree 0.0526, pedigree (1,3,5,5,1)
  EC IPPC study 2002
  Uncertainty: E
  production volume 857000 kg; = RP_PV*BP_hazardous_waste_for_underground/ABS(RP)
    (same comment as for sodium hydroxide, without water, in 50% solution state)
  property price 0 EUR2005; name BP_hazardous_waste_for_und_price_EUR2005
  properties: carbon content, fossil 0.554667, dry mass 1 kg, wet mass 1 kg
  note on carbon content, fossil: Tab A.6, ecoinvent v2.2 report 13_I, average hazardous waste composition was used, and referred to 0% water mass. No waste-specific emission are currently inventoried for underground deposits. Accordingly, no waste composition must be specified. For generic, average waste to underground deposit deposition in a 200 liter steel drum without cement solidification is assumed (ecoinvent v2.2 report 13_I).
- chemical factory, organics: 1.76905e-10 unit; lognormal variance with pedigree 0.3498, pedigree (2,3,5,4,3)
  Calculated based on literature data published by the industry. For this activity, no information was readily available concerning infrastructure and land-use. Therefore, the infrastructure is estimated based on data from two chemical factories, the BASF site of Ludwigshafen and the chemical factory in Gendorf (which are both located in Germany), which produce a wide range of chemical substances. Based on this data, the following assumptions are made: the built area amounts to about 4.2 ha, the plant has an average output of 50'000 t/a and a lifespan of fifty years. The estimated infrastructure amount is therefore 4.00 E-10 units per kg of produced chemical.
  References:
  Althaus H.-J., Chudacoff M., Hischier R., Jungbluth N., Osses M. and Primas A. (2007) Life Cycle Inventories of Chemicals. ecoinvent report No. 8, v2.0. EMPA Dübendorf, Swiss Centre for Life Cycle Inventories, Dübendorf, CH.
  Gendorf (2000) Umwelterklärung 2000, Werk Gendorf. Werk Gendorf, Burgkirchen.
- hydrochloric acid, without water, in 30% solution state: 0.0110566 kg; lognormal variance with pedigree 0.0526, pedigree (1,3,5,5,1)
  EC IPPC study 2002
  Uncertainty: E
  properties: heating value, net 3.32 MJ, dry mass 1 kg, wet mass 1 kg
- electricity, medium voltage: 0.0199578, 0.00382705, 0.0642482, 0.934432, 0.131709, 0.429127 kWh (6 entries); lognormal variance with pedigree 0.0526, pedigree (1,3,5,5,1)
  EC IPPC study 2002
  Uncertainty: E

## Inputs from nature
- Water, cooling, unspecified natural origin [natural resource, in water]: 0.128256 m3; name water_cooling_UNO_input; lognormal variance with pedigree 0.1306, pedigree (2,5,5,5,4)
  estimate based on literature source
  Uncertainty: e
- Water, unspecified natural origin [natural resource, in water]: 0.000840299 m3; name water_UNO_input; lognormal variance with pedigree 0.0526, pedigree (1,3,5,5,1)
  EC IPPC study 2002
  Uncertainty: E

## Emissions to nature
- Chlorine [air, urban air close to ground]: 3.5381e-6 kg; lognormal variance with pedigree 0.1026, pedigree (1,3,5,5,1)
  EC IPPC study 2002
  Uncertainty: E
- Carbon dioxide, fossil [air, urban air close to ground]: 0.00137101 kg; lognormal variance with pedigree 0.0526, pedigree (1,3,5,5,1)
  EC IPPC study 2002
  Uncertainty: E
- DOC, Dissolved Organic Carbon [water, unspecified]: 4.84716e-8 kg; lognormal variance with pedigree 0.218, pedigree (4,5,5,5,5)
  Calculated value. The BOD, COD, TOC and BOD5 are calculated based on the amount and type of emissions released to water in the same activity.
- Hydrogen [air, urban air close to ground]: 0.000243244 kg; lognormal variance with pedigree 0.1026, pedigree (1,3,5,5,1)
  EC IPPC study 2002
  Uncertainty: E
- Chlorate [water, surface water]: 0.000928752 kg; lognormal variance with pedigree 0.1026, pedigree (1,3,5,5,1)
  EC IPPC study 2002
  Uncertainty: E
- BOD5, Biological Oxygen Demand [water, unspecified]: 1.39598e-7 kg; lognormal variance with pedigree 0.218, pedigree (4,5,5,5,5)
  (same comment as for DOC, Dissolved Organic Carbon)
- Methane, tetrachloro-, R-10 [air, urban air close to ground]: 9.95091e-7 kg; lognormal variance with pedigree 0.1826, pedigree (1,3,5,5,1)
  EC IPPC study 2002
  Uncertainty: E
- Chloride [water, surface water]: 0.00663394 kg; lognormal variance with pedigree 0.1026, pedigree (1,3,5,5,1)
  EC IPPC study 2002
  Uncertainty: E
- TOC, Total Organic Carbon [water, unspecified]: 4.84716e-8 kg; lognormal variance with pedigree 0.218, pedigree (4,5,5,5,5)
  (same comment as for DOC, Dissolved Organic Carbon)
- Particulates, < 2.5 um [air, urban air close to ground]: 1.76905e-11 kg; lognormal variance with pedigree 0.1826, pedigree (1,3,5,5,1)
  EC IPPC study 2002
  Uncertainty: E
- COD, Chemical Oxygen Demand [water, unspecified]: 1.39598e-7 kg; lognormal variance with pedigree 0.218, pedigree (4,5,5,5,5)
  (same comment as for DOC, Dissolved Organic Carbon)
- Solids, inorganic [water, surface water]: 9.24329e-6 kg; lognormal variance with pedigree 0.1026, pedigree (1,3,5,5,1)
  EC IPPC study 2002
  Uncertainty: E
- Sulfate [water, surface water]: 0.00349388 kg; lognormal variance with pedigree 0.1026, pedigree (1,3,5,5,1)
  EC IPPC study 2002
  Uncertainty: E
- Water [air, unspecified]: 0.0498715 m3; = (water_cooling_UNO_input*fraction_CW_to_air)+(water_UNO_input*fraction_PW_to_air); lognormal variance with pedigree 0.130025, pedigree (4,4,5,2,4)
  Calculated as a fraction of the input of water. For more details, refer to the mathematical relation and the parameters.
  property fraction, origin: unspecified 1; name fraction_origin_unspecified
  property fraction, origin: salt water 0; name fraction_origin_salt_water
  property fraction, origin: fresh water 0; name fraction_origin_fresh_water
- Chlorinated solvents, unspecified [water, surface water]: 2.65358e-7 kg; lognormal variance with pedigree 0.3626, pedigree (1,3,5,5,1)
  EC IPPC study 2002
  Uncertainty: E
- Bromate [water, surface water]: 0.000121622 kg; lognormal variance with pedigree 0.1026, pedigree (1,3,5,5,1)
  EC IPPC study 2002
  Uncertainty: E
- Water [water, unspecified]: 0.079225 m3; = water_cooling_UNO_input*(1-fraction_CW_to_air)+water_UNO_input*(1-fraction_PW_to_air); lognormal variance with pedigree 0.130025, pedigree (4,4,5,2,4)
  (same comment as for Water)
  property wet mass 1000 kg; name WM
  property carbon content, fossil 0; name C_content_fossil
  property carbon content, non-fossil 0; name C_content_non_fossil
  property dry mass 0 kg; name DM
  property fraction, origin: salt water 0; name fraction_origin_salt_water_Ww
  property fraction, origin: fresh water 0; name fraction_origin_fresh_water_Ww
  property fraction, origin: unspecified 1; name fraction_origin_unspecified_Ww
  property water in wet mass 1000 kg; name WWM

## Sampling procedure
Average values from the ranges indicated in the 'Reference Document on Best Available Techniques in the Chlor-Alkali Manufacturing Industry' published by the European Commission, IPPC (2001).

## Extrapolations
This dataset has been copied from an original dataset covering the geography RER. The uncertainty has been adjusted accordingly.

## Review by Gregor Wernet 2017-08-04
This dataset was additionally reviewed in a separate review process by Eric Johnson of Atlantic Consulting as well as Emilia Moreno Ruiz and Gregor Wernet of ecoinvent.
