# treatment of waste emulsion paint, municipal incineration

Dataset: EcoSpold 2, unit process
Geography: Europe without Switzerland
Time period: 2006-01-01 to 2021-12-31
Technology level: current
Classification: ISIC rev.4 ecoinvent: 3821:Treatment and disposal of non-hazardous waste
Synonyms: Siedlungsabfallverbrennung; Kehrichtverbrennung; municipal waste incineration
Scenario: Business-as-Usual
System model: Allocation, cut-off by classification
Share of production covered: 1.8 %
Generated by: [System]
Database: ecoinvent
isCopyrightProtected: true
accessRestrictedTo: 1

## General comment
This dataset represents the activity of waste disposal of waste emulsion paint in a municipal solid waste incinerator (MSWI) // Recommended use of this dataset: For small amounts of dried waste emulsion paint, which go to disposal as part of communal waste mixture, e.g. small leftovers or paint on other material. Larger amounts of waste paint, unused liquid paint or removed (stripped) paint are to be disposed in hazardous waste incinerator. // // Waste composition (wet, in ppm): upper heating value 11.14 MJ/kg; lower heating value 10.51 MJ/kg; H2O n.a.; O 214760; H 31708; C 268330; S n.a.; N n.a.; P n.a.; B n.a.; Cl 86465; Br n.a.; F n.a.; I n.a.; Ag n.a.; As 0.44122; Ba n.a.; Cd 0.016849; Co n.a.; Cr 1.248; Cu n.a.; Hg 0.0085442; Mn n.a.; Mo n.a.; Ni 0.95527; Pb 0.64946; Sb n.a.; Se n.a.; Sn n.a.; V n.a.; Zn 6.5444; Be n.a.; Sc n.a.; Sr n.a.; Ti 135000; Tl n.a.; W n.a.; Si 149810; Fe n.a.; Ca 113920; Al n.a.; K n.a.; Mg n.a.; Na n.a.; // Share of carbon in waste that is biogenic 0%. // Share of metals in waste not oxidised and bulk-recyclable (exclude very small or thin parts) Iron: 0%; Alu: 0%; Copper: 0%. // One kg of this waste produces 0.7064 kg of slag and 0.1612 kg of residues, which are landfilled. Additional solidification with 0.06448 kg of cement. // Net energy production: 1.14MJ/kg electric energy and 2.51MJ/kg thermal energy. // Recovery of metal scrap to recycling: 0g iron scrap, 0g aluminium scrap, 0g copper scrap.

## Included activities start
waste incineration from waste reception gate and delivery into waste bunker at incinerator plant site (without transports to the incinerator)

## Included activities end
Waste-specific short-term emissions to water from leachate. Long-term emissions from landfill to ground water.

## Technology
average Swiss MSWI plants in 2010 (grate incinerators) with electrostatic precipitator for fly ash (ESP), wet flue gas scrubber and 25% SNCR , 42.77% SCR-high dust , 32.68% SCR-low dust -DeNOx facilities and 0% without Denox (weighted according to mass of burnt waste, representing Swiss average). Efficiency of iron scrap separation from slag : 58%. Efficiency of non-ferrous scrap separation from slag : 31%. Gross electric efficiency technology mix 15.84% and Gross thermal efficiency technology mix 28.51%

## Time period
Waste composition as given in literature reference, theoretical data or other source. Transfer coefficients for modern MSWI.

## Reference product
- waste emulsion paint: -1 kg; name WP; By-product classification Waste; CPC 39: Wastes or scraps
  Main reference product of this activity (supply of disposal service).
  production volume 3.37182e8 kg; name WP_PV; = 5370000000*0.35*0.78*0.23
    Estimated value. Eu paint market is of 5.37E+09kg (EUROPEAN COMMISSION 2002)
    of which 55% is paint and 35% is emulsion paint (http://www.psgdover.com/en/mouvex-paint-coatings-market-overview/what-are-paint-a-coatings/defining-paintaccessed, accessed 20151009). 22% is considered hazardous waste and 78% non hazardous waste (http://archive.epa.gov/sectors/web/pdf/paint_quantity_report.pdf, accessed 20151009).
    In the EU (Eurostat municipal waste treatment), of hazardous waste 23% is sent to hazardous incineration. Of non hazardous waste 23% is sent to incineration. 37% is considered to be sent to landfilling and it is split between sanitary and inert landfill using the same shares assumed for the US (see relevant dataset: “23% is sent to inert material landfill (http://archive.epa.gov/sectors/web/pdf/paint_quantity_report.pdf, accessed 20151009). The rest (65%) is considered to go to sanitary landfill.”)
    EUROPEAN COMMISSION (2002) STUDY ON HAZARDOUS HOUSEHOLD WASTE (HHW) WITH A MAIN EMPHASIS ON HAZARDOUS HOUSEHOLD CHEMICALS (HHC). Retrieved from: <http://ec.europa.eu/environment/waste/studies/pdf/household_report.pdf>, accessed 11th July 2016
    Eurostat. Sustainable Development Indicator (SDI) on municipal waste
    Retrieved from: <http://ec.europa.eu/eurostat/web/waste/transboundary-waste-shipments/key-waste-streams/municipal-waste>, accessed 11th July 2016
  property heating value, net 8.18 MJ
    LHV is calculated based on the Carbon content of the product. More details can be found on the respective documentation.
  property price 0 EUR2005; name WP_price_EUR2005
    Waste products are assigned a price of zero as they are assumed to require further treatment.
  property carbon content 0.27
    carbon content on a dry matter basis (reserved; not for manual entry)
  properties: carbon content, fossil 0.27, dry mass 1 kg, wet mass 1 kg, water in wet mass 0 kg, carbon content, non-fossil 0, water content 0, carbon allocation 0.27 kg

## By-products
- heat, for reuse in municipal waste incineration only: 0 MJ; name E_th_prod_MSWI; By-product classification allocatable product; CPC 17300: Steam and hot water; pedigree (1,1,1,1,1)
  Net electricity generated from this waste and used in internal MSWI plant energy redistribution.
  production volume 8.47238e8 MJ; = E_th_prod_MSWI*WP_PV/ABS(WP)
    calculated in proportion to reference product waste input to incinerator
  property price 0.0106 EUR2005; name E_th_prod_MSWI_price_EUR2005
    Average European district heat price from Ecoheatcool and Euroheat 2005-2006, Ecoheat Work package 1: The European heat market. Final report. 10.6 EUR/GJ i s the price of district heat. http://www.solarthermalworld.org/files/Ecoheatcool%20WP1%20Web.pdf?download
  property true value relation 0.1842; name E_th_prod_MSWI_true_value_relation
    property to calculate 'true value' from
  property exergy 0.1842 MJ; name E_th_prod_MSWI_exergy
    This exergy property is based on the exergy content of the product.
- electricity, for reuse in municipal waste incineration only: 0 kWh; name E_el_prod_MSWI; CPC 17100: Electrical energy; By-product classification allocatable product; pedigree (1,1,1,1,1)
  (same comment as for heat, for reuse in municipal waste incineration only)
  production volume 1.06708e8 kWh; = E_el_prod_MSWI*WP_PV/ABS(WP)
    calculated in proportion to reference product waste input to incinerator
  property price 0.1 EUR2005; name E_el_prod_MSWI_price_EUR2005
    Estimated to be the same price as in case of electricity, medium voltage.
  property exergy 3.6 MJ; name E_el_prod_MSWI_exergy
    This exergy property is based on the exergy content of the product.
  property true value relation 3.6; name E_el_prod_MSWI_true_value_relation
    property to calculate 'true value' from

## Inputs from technosphere
- heat, district or industrial, natural gas: 0.065147 MJ; lognormal variance with pedigree 0.23735, pedigree (1,1,4,1,1)
  Input to DeNOx stage, to heat up flue gas in low-dust SCR.
  properties: heating value, net 1 MJ
- municipal waste incineration facility: 2.5e-10 unit
  Demands per kilogram waste.
- iron (III) chloride, without water, in 40% solution state: 0.0029127 kg; lognormal variance with pedigree 0.10898, pedigree (1,1,4,1,1)
  Auxilliary inputs for the wastewater treatment stage of the incinerator plant.
  properties: dry mass 1 kg, wet mass 1 kg
- transport, freight, lorry, unspecified: 0.034684 metric ton*km; lognormal variance with pedigree 0.021678, pedigree (1,1,4,1,1)
  Transport services to transport incineration residues to landfills.
- chemical, organic: 1.4587e-7 kg; lognormal variance with pedigree 1.878, pedigree (1,1,4,1,1)
  Auxilliary inputs for the wastewater treatment stage of the incinerator plant. Proxy for (pure) Trisodium-trimercapto-s-triazine (CAS 17766-26-6), used as 15% diluted solution, aka TMT15.
  properties: heating value, net 19.03 MJ, dry mass 1 kg, wet mass 1 kg, carbon content, fossil 0.628
- slag landfill: 1.2549e-9 unit; lognormal variance with pedigree 0.027769, pedigree (1,1,4,1,1)
  Landfill infrastructure required for landfilling of bottom ash.
- chromium oxide, flakes: 4.4544e-7 kg; lognormal variance with pedigree 0.64733, pedigree (1,1,4,1,1)
  Input to DeNOx stage.
  properties: wet mass 1 kg, dry mass 1 kg
- process-specific burdens, residual material landfill: 0.16121 kg; lognormal variance with pedigree 0.023237, pedigree (1,1,4,1,1)
  Mass-specific expenditures required for landfilling of incineration residues.;activityLink introduced to establish a direct link to the corresponding regional supply of this product
- waste cement, hydrated: -0.16121 kg; name BP_WS; lognormal variance with pedigree 0.032321, pedigree (1,1,4,1,1)
  Hydrated cement output for solidification of landfilled residual material.
  production volume 5.43572e7 kg; = BP_WS*WP_PV/ABS(WP)
    calculated in proportion to reference product waste input to incinerator
  property price 0 EUR2005; name BP_WS_price_EUR2005
  properties: dry mass 1 kg, wet mass 1 kg
- chemical, inorganic: 0.0027031 kg; lognormal variance with pedigree 0.12927, pedigree (1,1,4,1,1)
  Auxilliary inputs for the wastewater treatment stage of the incinerator plant. Proxy for Polyelectrolyte.
  properties: carbon content, fossil 0.003, dry mass 1 kg, wet mass 1 kg
- water, decarbonised: 0 kg; pedigree (1,1,1,1,1)
  Incinerator process water used in flue gas scrubber stage.
  properties: wet mass 1 kg
- titanium dioxide: 2.1827e-5 kg; lognormal variance with pedigree 0.64733, pedigree (1,1,4,1,1)
  Input to DeNOx stage (TiO2 catalyst carrier)
  properties: dry mass 1 kg, wet mass 1 kg
- process-specific burdens, slag landfill: 0.7059 kg; lognormal variance with pedigree 0.027769, pedigree (1,1,4,1,1)
  Mass-specific expenditures required for landfilling of bottom ash.;activityLink introduced to establish a direct link to the corresponding regional supply of this product
- ammonia, anhydrous, liquid: 0.00034838 kg; lognormal variance with pedigree 0.23735, pedigree (1,1,4,1,1)
  Input to DeNOx stage (100% NH3).
  properties: wet mass 1 kg, dry mass 1 kg
- quicklime, milled, packed: 0.046002 kg; lognormal variance with pedigree 0.14349, pedigree (1,1,4,1,1)
  Auxilliary inputs for the flue gas treatment stage of the incinerator plant.
  properties: water content 0.010101, dry mass 0.99 kg, wet mass 1 kg
- hydrochloric acid, without water, in 30% solution state: 0.0007105 kg; lognormal variance with pedigree 0.12927, pedigree (1,1,4,1,1)
  Auxilliary inputs for the wastewater treatment stage of the incinerator plant.
  properties: wet mass 1 kg, dry mass 1 kg, heating value, net 3.32 MJ
- residual material landfill: 3.3584e-10 unit; lognormal variance with pedigree 0.023237, pedigree (1,1,4,1,1)
  Landfill infrastructure required for landfilling of incineration residues.
- sodium hydroxide, without water, in 50% solution state: 0.0087931 kg; lognormal variance with pedigree 0.14349, pedigree (1,1,4,1,1)
  Auxilliary inputs for the flue gas treatment stage of the incinerator plant.
  properties: heating value, net 3.03 MJ, dry mass 1 kg, wet mass 1 kg
- cement, unspecified: 0.064482 kg; lognormal variance with pedigree 0.032321, pedigree (1,1,4,1,1)
  Cement required for solidification of landfilled residual material.
  properties: wet mass 1 kg, dry mass 1 kg
- water, decarbonised: 9.06646, 1.82775, 6.01, 0.331788 kg (4 entries); lognormal variance with pedigree 0.10898, pedigree (1,1,4,1,1)
  Incinerator process water used in flue gas scrubber stage.

## Inputs from nature
- Oxygen [natural resource, in air]: 1.2869 kg; lognormal variance with pedigree 0.035847, pedigree (1,1,4,1,1)
  Oxygen from ambient air needed to combust and oxidise this waste. Net demand, i.e. without O2 leaving the plant in flue gas uncombusted.

## Emissions to nature
- DOC, Dissolved Organic Carbon [water, ground-, long-term]: 0.00079736 kg; lognormal variance with pedigree 0.044145, pedigree (1,1,4,1,1)
  Long-term emissions from landfilling of incineration residues.
- Nickel [air, urban air close to ground]: 1.2e-9 kg; lognormal variance with pedigree 1.5989, pedigree (1,1,4,1,1)
  Emission to air from waste composition and transfer coefficients.
- Chromium, ion [water, surface water]: 9.6901e-11 kg; lognormal variance with pedigree 1.5845, pedigree (1,1,4,1,1)
  Emissions to water from waste composition and transfer coefficients in incinerator and landfills.
- Lead [air, urban air close to ground]: 5.3506e-11 kg; lognormal variance with pedigree 1.6701, pedigree (1,1,4,1,1)
  Emission to air from waste composition and transfer coefficients.
- Benzene [air, urban air close to ground]: 3.5309e-8 kg; lognormal variance with pedigree 0.12775, pedigree (1,1,4,1,1)
  Incomplete combustion product emitted to air.
- BOD5, Biological Oxygen Demand [water, surface water]: 0.00030985 kg; lognormal variance with pedigree 0.07643, pedigree (1,1,4,1,1)
  (same comment as for Chromium, ion)
- Chromium VI [water, surface water]: 3.4878e-8 kg; lognormal variance with pedigree 1.6103, pedigree (1,1,4,1,1)
  (same comment as for Chromium, ion)
- Calcium, ion [water, ground-, long-term]: 0.084857 kg; lognormal variance with pedigree 0.11749, pedigree (1,1,4,1,1)
  Long-term emissions from landfilling of incineration residues.
- Benzene, pentachloro- [air, urban air close to ground]: 1.8655e-10 kg; lognormal variance with pedigree 0.12775, pedigree (1,1,4,1,1)
  Incomplete combustion product emitted to air.
- Hydrogen chloride [air, urban air close to ground]: 4.9342e-5 kg; lognormal variance with pedigree 0.16578, pedigree (1,1,4,1,1)
  Emission to air from waste composition and transfer coefficients.
- Heat, waste [water, surface water]: 1.9584 MJ; lognormal variance with pedigree 0.076481, pedigree (1,1,4,1,1)
  Waste heat generated from heating value of this waste plus any electricity required to process it.
- Nickel, ion [water, surface water]: 6.4185e-10 kg; lognormal variance with pedigree 2.1249, pedigree (1,1,4,1,1)
  (same comment as for Chromium, ion)
- Water [water, surface water]: 0.00043578 m3; lognormal variance with pedigree 0.50931, pedigree (1,1,4,1,1)
  Process water released to surface water.
- Cadmium [air, urban air close to ground]: 8.5883e-12 kg; lognormal variance with pedigree 1.9506, pedigree (1,1,4,1,1)
  Emission to air from waste composition and transfer coefficients.
- Particulates, < 2.5 um [air, urban air close to ground]: 4.2156e-6 kg; lognormal variance with pedigree 0.48773, pedigree (1,1,4,1,1)
  Incomplete combustion product emitted to air.
- Arsenic, ion [water, surface water]: 3.0564e-7 kg; lognormal variance with pedigree 1.5632, pedigree (1,1,4,1,1)
  (same comment as for Chromium, ion)
- Zinc, ion [water, ground-, long-term]: 1.9901e-6 kg; lognormal variance with pedigree 3.4424, pedigree (1,1,4,1,1)
  Long-term emissions from landfilling of incineration residues.
- Silicon [water, ground-, long-term]: 0.01513 kg; lognormal variance with pedigree 4.7133, pedigree (1,1,4,1,1)
  Long-term emissions from landfilling of incineration residues.
- COD, Chemical Oxygen Demand [water, surface water]: 0.00031389 kg; lognormal variance with pedigree 0.074526, pedigree (1,1,4,1,1)
  (same comment as for Chromium, ion)
- Titanium [air, urban air close to ground]: 0.000112 kg; lognormal variance with pedigree 0.12605, pedigree (1,1,4,1,1)
  Emission to air from waste composition and transfer coefficients.
- Toluene [air, urban air close to ground]: 7.0618e-8 kg; lognormal variance with pedigree 0.12775, pedigree (1,1,4,1,1)
  Incomplete combustion product emitted to air.
- Phenol, pentachloro- [air, urban air close to ground]: 1.5377e-11 kg; lognormal variance with pedigree 0.12775, pedigree (1,1,4,1,1)
  Incomplete combustion product emitted to air.
- Carbon monoxide, fossil [air, urban air close to ground]: 6.0022e-5 kg; lognormal variance with pedigree 0.90678, pedigree (1,1,4,1,1)
  Incomplete combustion product emitted to air.
- Arsenic [air, urban air close to ground]: 3.4562e-9 kg; lognormal variance with pedigree 1.6914, pedigree (1,1,4,1,1)
  Emission to air from waste composition and transfer coefficients.
- Titanium, ion [water, ground-, long-term]: 0.040358 kg; lognormal variance with pedigree 0.33466, pedigree (1,1,4,1,1)
  Long-term emissions from landfilling of incineration residues.
- Arsenic, ion [water, ground-, long-term]: 1.3213e-7 kg; lognormal variance with pedigree 1.6836, pedigree (1,1,4,1,1)
  Long-term emissions from landfilling of incineration residues.
- Calcium [air, urban air close to ground]: 0.00089656 kg; lognormal variance with pedigree 0.12605, pedigree (1,1,4,1,1)
  Emission to air from waste composition and transfer coefficients.
- Cadmium, ion [water, ground-, long-term]: 1.2295e-9 kg; lognormal variance with pedigree 7.3822, pedigree (1,1,4,1,1)
  Long-term emissions from landfilling of incineration residues.
- Particulates, > 2.5 um, and < 10um [air, urban air close to ground]: 2.1184e-8 kg; lognormal variance with pedigree 0.248, pedigree (1,1,4,1,1)
  Incomplete combustion product emitted to air.
- Water [air, urban air close to ground]: 0.0010889 m3; lognormal variance with pedigree 0.3659, pedigree (1,1,4,1,1)
  Water vapour from waste humidity, hydrogen oxidation and part of the process water.
- Chloride [water, surface water]: 0.066381 kg; lognormal variance with pedigree 0.11303, pedigree (1,1,4,1,1)
  (same comment as for Chromium, ion)
- Mercury [water, ground-, long-term]: 5.4419e-10 kg; lognormal variance with pedigree 3.4337, pedigree (1,1,4,1,1)
  Long-term emissions from landfilling of incineration residues.
- Dioxins, measured as 2,3,7,8-tetrachlorodibenzo-p-dioxin [air, urban air close to ground]: 7.0614e-14 kg; lognormal variance with pedigree 0.48773, pedigree (1,1,4,1,1)
  Incomplete combustion product emitted to air.
- Calcium, ion [water, surface water]: 0.0012612 kg; lognormal variance with pedigree 0.14117, pedigree (1,1,4,1,1)
  (same comment as for Chromium, ion)
- COD, Chemical Oxygen Demand [water, ground-, long-term]: 0.0020151 kg; lognormal variance with pedigree 0.044145, pedigree (1,1,4,1,1)
  Long-term emissions from landfilling of incineration residues.
- NMVOC, non-methane volatile organic compounds, unspecified origin [air, urban air close to ground]: 1.6069e-6 kg; lognormal variance with pedigree 0.12775, pedigree (1,1,4,1,1)
  Incomplete combustion product emitted to air.
- Benzene, hexachloro- [air, urban air close to ground]: 7.383e-11 kg; lognormal variance with pedigree 0.12775, pedigree (1,1,4,1,1)
  Incomplete combustion product emitted to air.
- Chromium [air, urban air close to ground]: 1.0897e-9 kg; lognormal variance with pedigree 1.5703, pedigree (1,1,4,1,1)
  Emission to air from waste composition and transfer coefficients.
- Nickel, ion [water, ground-, long-term]: 9.1695e-7 kg; lognormal variance with pedigree 1.5508, pedigree (1,1,4,1,1)
  Long-term emissions from landfilling of incineration residues.
- TOC, Total Organic Carbon [water, surface water]: 0.00013708 kg; lognormal variance with pedigree 0.074776, pedigree (1,1,4,1,1)
  (same comment as for Chromium, ion)
- Silicon [air, urban air close to ground]: 2.3333e-7 kg; lognormal variance with pedigree 0.1617, pedigree (1,1,4,1,1)
  Emission to air from waste composition and transfer coefficients.
- Ammonia [air, urban air close to ground]: 4.096e-7 kg; lognormal variance with pedigree 0.29438, pedigree (1,1,4,1,1)
  Nitrogen species emitted to air after DeNOx stage.
- Methane, fossil [air, urban air close to ground]: 5.2964e-7 kg; lognormal variance with pedigree 0.12775, pedigree (1,1,4,1,1)
  Incomplete combustion product emitted to air.
- Lead [water, ground-, long-term]: 3.1401e-7 kg; lognormal variance with pedigree 4.7644, pedigree (1,1,4,1,1)
  Long-term emissions from landfilling of incineration residues.
- Silicon [water, surface water]: 3.6729e-5 kg; lognormal variance with pedigree 0.49236, pedigree (1,1,4,1,1)
  (same comment as for Chromium, ion)
- Zinc, ion [water, surface water]: 5.9045e-10 kg; lognormal variance with pedigree 1.0856, pedigree (1,1,4,1,1)
  (same comment as for Chromium, ion)
- Nitrogen oxides [air, urban air close to ground]: 0.00012971 kg; lognormal variance with pedigree 0.29438, pedigree (1,1,4,1,1)
  Sum of fuel-Nox and thermal-NOx emitted to air after DeNOx stage.
- TOC, Total Organic Carbon [water, ground-, long-term]: 0.00079736 kg; lognormal variance with pedigree 0.044145, pedigree (1,1,4,1,1)
  Long-term emissions from landfilling of incineration residues.
- Heat, waste [air, urban air close to ground]: 8.5656 MJ; lognormal variance with pedigree 0.076481, pedigree (1,1,4,1,1)
  (same comment as for Heat, waste)
- DOC, Dissolved Organic Carbon [water, surface water]: 0.00013708 kg; lognormal variance with pedigree 0.074776, pedigree (1,1,4,1,1)
  (same comment as for Chromium, ion)
- Chromium VI [water, ground-, long-term]: 1.1448e-7 kg; lognormal variance with pedigree 1.9949, pedigree (1,1,4,1,1)
  Long-term emissions from landfilling of incineration residues.
- Mercury [water, surface water]: 9.2793e-12 kg; lognormal variance with pedigree 1.4077, pedigree (1,1,4,1,1)
  (same comment as for Chromium, ion)
- Cadmium, ion [water, surface water]: 1.6149e-12 kg; lognormal variance with pedigree 1.608, pedigree (1,1,4,1,1)
  (same comment as for Chromium, ion)
- Benzo(a)pyrene [air, urban air close to ground]: 7.8574e-13 kg; lognormal variance with pedigree 0.48773, pedigree (1,1,4,1,1)
  Incomplete combustion product emitted to air.
- Zinc [air, urban air close to ground]: 4.3865e-9 kg; lognormal variance with pedigree 1.3536, pedigree (1,1,4,1,1)
  Emission to air from waste composition and transfer coefficients.
- Mercury [air, urban air close to ground]: 2.4226e-10 kg; lognormal variance with pedigree 1.9367, pedigree (1,1,4,1,1)
  Emission to air from waste composition and transfer coefficients.
- Lead [water, surface water]: 6.2125e-11 kg; lognormal variance with pedigree 1.3942, pedigree (1,1,4,1,1)
  (same comment as for Chromium, ion)
- Titanium, ion [water, surface water]: 5.0334e-5 kg; lognormal variance with pedigree 0.1966, pedigree (1,1,4,1,1)
  (same comment as for Chromium, ion)
- Carbon dioxide, fossil [air, urban air close to ground]: 0.97785 kg; lognormal variance with pedigree 0.0536, pedigree (1,1,4,1,1)
  Emission to air from waste composition and transfer coefficients.
- Chloride [water, ground-, long-term]: 0.020036 kg; lognormal variance with pedigree 0.1449, pedigree (1,1,4,1,1)
  Long-term emissions from landfilling of incineration residues.
- BOD5, Biological Oxygen Demand [water, ground-, long-term]: 0.00065912 kg; lognormal variance with pedigree 0.044145, pedigree (1,1,4,1,1)
  Long-term emissions from landfilling of incineration residues.

## Extrapolations
This dataset has been extrapolated from year 2012 to the year of the calculation (2021). The uncertainty has been adjusted accordingly.
