# beryllium production

Dataset: EcoSpold 2, unit process
Geography: US
Time period: 2013-01-01 to 2021-12-31
Technology level: current
Classification: ISIC rev.4 ecoinvent: 242:Manufacture of basic precious and other non-ferrous metals
Synonyms: primary beryllium; beryllium; be metal
Scenario: Business-as-Usual
System model: Allocation, cut-off by classification
Generated by: Philip Nuss
Published in: Philip Nuss 2014
Database: ecoinvent
isCopyrightProtected: true
accessRestrictedTo: 1

## General comment
This dataset represents the production of 1 kg beryllium metal in the US. Data come from the publication of Nuss & Eckelman (2014), based on the information provided by Materion Corporation, a company active in the sector of beryllium and related material production. Since it was not possible to disaggregate the production of beryllium metal from subsequent production of semi-finished products (e.g. alloy with >60% Be), the energy requirements used in this assessment include the additional semi-finished products production step. The recycling of Mg and F compounds is not accounted for in this dataset.
Nuss, P., Eckelman, M.J., 2014. Life cycle assessment of metals: A scientific synthesis. PLoS One 9, 1–12. https://doi.org/10.1371/journal.pone.0101298

## Included activities start
The activity starts when the beryllium hydroxide enters the process

## Included activities end
The activity ends with the production of 1 kg beryllium (metalic form) and semi-finished beryllium containing products.

## Technology
Beryllium metal is manufactured by magnesium reduction of anhydrous beryllium fluoride. First of all, beryllium hydroxide is dissolved in ammonium bifluoride solution, purified by precipitation treatments, with consequent cristallization of ammonium fluoroberyllate and emissions of water. Subsequently, the salt is heated resulting in the production of molten beryllium fluoride (BeF2) and emissions of NH4F gas. In the reduction phase, BeF2 is then mixed with molten magnesium to produce a mixture of beryllium pebbles (Be) and magnesium fluoride (MgF2). Refinement of the beryllium pebbles is conducted in a vacuum furnace. Finally, powder metallurgy, sintering, and hot pressing are used to produce beryllium metal. The reactions involved are the followings:
Be(OH)2 + 2NH4HF2 --> (NH4)2BeF4 + 2H2O
(NH4)2BeF4 --> BeF2 + 2NH4F
Mg + BeF2 --> Be + MgF2

References:
Nuss, P., & Eckelman, M. J. (2014). Life cycle assessment of metals: a scientific synthesis. PLoS One, 9(7), e101298.

Morana, S. J., & Simons, G. F. (1962). Beryllium extracted by the fluoride process. JOM, 14(8), 571-574.

## Parameters
- fraction, process water, to air: 0.15 dimensionless; name fraction_PW_to_air
  Literature value. In case when no industry/process specific data are available, default evaporation fraction value is used. This value is 15% and is based on literature (Statistics Canada, 2007 & Shaffer, K.H., 2008, Consumptive water use in the Great Lakes Basin, USGS & Shiklomanov, 2003, World Water Resources at the Beginning of the 21st Century) and has been approved by an expert.

## Reference product
- beryllium: 1 kg; name RefProd; source Philip Nuss 2014; By-product classification allocatable product; CPC 41601: Tungsten, molybdenum, tantalum, magnesium, cobalt, cadmium, titanium, zirconium, beryllium, gallium, hafnium, […]; CAS 7440-41-7
  production volume 20400 kg; name RefProd_PV; = 170000*0.12
    According to Nuss & Eckelman (2014), in 2011 roughly 12% of beryllium consumed globally is in its metallic form as beryllium, while 88% are consumed in the beryllium hydroxide formwhich is converted into copper-beryllium alloys. According to USGS 2020 (Mineral Commodity Summaries), beryllium US production in 2019 was 170000 kg.
  property dry mass 1 kg; name RefProd_DM
  property wet mass 1 kg; name RefProd_WM
  property beryllium content 1; name RefProd_Be_content
    beryllium content on a dry matter basis
  property carbon content, non-fossil 0; name RefProd_C_content_non_fossil
    biogene carbon content on a dry matter basis
  property carbon content, fossil 0; name RefProd_C_content_fossil
    fossil carbon content on a dry matter basis
  property water in wet mass 0 kg; name RefProd_WWM
  property price 362.212 EUR2005; name RefProd_price_EUR2005
    Price calculated based on the annual average price per kilogram of beryllium contained in beryllium-copper master alloy from 2010 to 2019. Prices taken from USGS Mineral Commodity Summaries for Beryllium (https://www.usgs.gov/centers/nmic/beryllium-statistics-and-information), which are expressed in USD. The prices were converted to EUR based on the annual exchange rates published by the European Central Bank (https://sdw.ecb.europa.eu/quickview.do?SERIES_KEY=120.EXR.A.USD.EUR.SP00.A), and then adjusted for inflation relative to 2005 by using the Harmonised Index of Consumer Prices (HICP) of the euro area, published by eurostat (https://ec.europa.eu/eurostat/databrowser/view/PRC_HICP_AIND/default/table).
  property water content 0; name RefProd_water_content
  property carbon content 0
    carbon content on a dry matter basis (reserved; not for manual entry)
  properties: carbon allocation 0 kg

## Inputs from technosphere
- chemical factory, organics: 8e-10 unit; source Philip Nuss 2014; lognormal variance with pedigree 0.315113, pedigree (3,2,2,3,1)
  Literature. Based on an output of 50,000 tons per year and 25 years lifetime.
- fly ash and scrubber sludge: -46.0289 kg; name sludge_amount; = ((0.404*0.95+(2*20.01/9.012)*0.95+0.000454*0.845)/0.1)*-1; lognormal variance with pedigree 0.0449, pedigree (3,2,2,5,4)
  Calculated value for obtaining mass balance, based on dry mass = 0.1. This exchange is used as a proxy for the removed emissions of NOx, HF and Be. Indeed, it contains such emissions removed with scrubbers. See comments to emissions to air of Nitrogen oxides, Hydrogen fluoride, Beryllium for further explanation on the values in the mathematical relation.
  production volume 938990 kg; = RefProd_PV* sludge_amount / RefProd
    Calculated from production volume of reference product using the relative outputs.
  property price 0 EUR2005; name sludge_amount_price_EUR2005
  properties: carbon content, fossil 0.167, dry mass 0.1 kg, wet mass 1 kg, water content 9
  note on carbon content, fossil: Tab A.6, ecoinvent v2.2 report 13_I. C content has been calculated after data in the tables, and then referred to 1 kg DM
- hydrogen fluoride: 4.9 kg; source Philip Nuss 2014; lognormal variance with pedigree 0.0139682, pedigree (3,2,2,3,1)
  Literature. Together with ammonia, it makes part of ammonium bifluoride which is used for dissolving beryllium hydroxide.
  properties: wet mass 1 kg, dry mass 1 kg, heating value, net 6.06 MJ
- ammonia, anhydrous, liquid: 4.4 kg; source Philip Nuss 2014; lognormal variance with pedigree 0.0139682, pedigree (3,2,2,3,1)
  Literature. Together with hydrogen fluoride, it makes part of ammonium bifluoride which is used for dissolving beryllium hydroxide.
  properties: dry mass 1 kg, wet mass 1 kg
- transport, freight, lorry, unspecified: 0.40545 metric ton*km; = beryllium_hydroxide_amount/1000 * 85; lognormal variance with pedigree 0.0826, pedigree (5,4,5,1,1)
  Calculated value based on the distance covered for transporting beryllium hydroxide within the US borders. Specifically, beryllium hydroxide is transported from Topaz-Spor Mountain region (Utah) to the facility in Delta (Utah) over a distance of 85 km circa.
  Reference:
  Nuss, P., & Eckelman, M. J. (2014). Life cycle assessment of metals: a scientific synthesis. PloS one, 9(7), e101298.
  USGS (2017). Minerals Yearbook - Beryllium.
- heat, district or industrial, natural gas: 1845 MJ; source Philip Nuss 2014; lognormal variance with pedigree 0.0139682, pedigree (3,2,2,3,1)
  Literature
  properties: heating value, net 1 MJ
- magnesium: 3 kg; source Philip Nuss 2014; lognormal variance with pedigree 0.0139682, pedigree (3,2,2,3,1)
  Literature. Used for the reduction of beryllium fluoride, intermediate product of the reaction.
  properties: wet mass 1 kg, dry mass 1 kg
- wastewater, average: -3.145 m3; name WW_amount; = (water_in*(1- fraction_PW_to_air))*-1; lognormal variance with pedigree 0.189568, pedigree (4,5,5,5,5)
  Calculated to obtain mass balance. See comments in the parametres' comment field.
  production volume 64158 m3; = RefProd_PV* WW_amount / RefProd
    Calculated from production volume of reference product using the relative outputs.
  property price 0 EUR2005; name WW_amount_price_EUR2005
  properties: wet mass 1000 kg, carbon content, non-fossil 0.194039, water content 2882.2, dry mass 0.346837 kg
  note on carbon content, non-fossil: 0.0673 kg TOC/m3 (Tab A.17, ecoinvent v2.2 report 13_I). TOC was considered as Total Carbon.
- sodium hydroxide, without water, in 50% solution state: 14.2 kg; source Philip Nuss 2014; lognormal variance with pedigree 0.0139682, pedigree (3,2,2,3,1)
  Literature
  properties: dry mass 1 kg, heating value, net 3.03 MJ, wet mass 1 kg
- beryllium hydroxide: 4.77 kg; name beryllium_hydroxide_amount; source Philip Nuss 2014; lognormal variance with pedigree 0.0139682, pedigree (3,2,2,3,1)
  Literature. According to USGS 2017 (Minerals Yearbook - Beryllium), beryllium hydroxide processed in the US to obtain beryllium metal come from the US. It is assumed to be processed nearby the location where the concentrates are produced.
  properties: wet mass 1 kg, dry mass 1 kg, beryllium content 0.2095
- inert waste, for final disposal: -14.0476 kg; name inert_waste_amount; source Philip Nuss 2014; lognormal variance with pedigree 0.0139682, pedigree (3,2,2,3,1)
  Residual waste. Calculated to obtain mass balance, based on difference between inputs and outputs
  production volume 286572 kg; = RefProd_PV* inert_waste_amount / RefProd
    Calculated from production volume of reference product using the relative outputs.
  property price 0 EUR2005; name inert_waste_amount_price_EUR2005
  properties: water content 0.00502513, wet mass 1 kg, dry mass 0.995 kg
- electricity, medium voltage: 512.54 kWh; source Philip Nuss 2014; lognormal variance with pedigree 0.0139682, pedigree (3,2,2,3,1)
  Literature. The original value is reported in MJ. Conversion factor: 0.2778 kWh/MJ

## Inputs from nature
- Water, unspecified natural origin [natural resource, in ground]: 3.7 m3; name water_in; lognormal variance with pedigree 0.0139682, pedigree (3,2,2,3,1)
  Literature

## Emissions to nature
- Water [water, unspecified]: 0.00399811 m3; = (36.031/9.012)/1000; lognormal variance with pedigree 0.0139682, pedigree (3,2,2,3,1)
  Emissions during beryllium hydroxide purification, calculated based on stoichiometric relation. H2O MW = 36.031 g/mol; Be = 9.012 g/mol.
- Hydrogen fluoride [air, unspecified]: 0.222037 kg; = (2*20.01/9.012)*(1-0.95); lognormal variance with pedigree 0.0139682, pedigree (3,2,2,3,1)
  2 NH4F is emitted during beryllium hydroxide purification. Emissions of hydrogen fluoride is calculated based on stoichiometric relation --> 2*HF MW / Be MW. HF MW = 20.01 g/mol; Be = 9.012 g/mol.
- Particulates, > 2.5 um, and < 10um [air, non-urban air or from high stacks]: 0.071 kg; source Philip Nuss 2014; lognormal variance with pedigree 0.315113, pedigree (3,2,2,3,1)
  Literature. The original source refers to Particulate < 10 um. Due to lack of information on the particle specific class size, this only class has be assumed,
- Nitrogen oxides [air, non-urban air or from high stacks]: 7.037e-5 kg; = 0.000454*(1-0.845); source Philip Nuss 2014; lognormal variance with pedigree 0.0158682, pedigree (3,2,2,5,1)
  Literature. Conservative estimate as it represents the cumulative emissions estimate per kg beryllium produced at all operations (i.e., includes alloying and production of semi-finished shapes sold to end-users). The value is adapted to consider the use of airborne emission control system such as venturi scrubber, with a removal efficiency of 84.5% on average (USEPA, 2003. Air Pollution Control Technology
  Fact Sheet- EPA-452/F-03-017)
- Water [air, non-urban air or from high stacks]: 0.555 m3; = (water_in* fraction_PW_to_air); lognormal variance with pedigree 0.189568, pedigree (4,5,5,5,5)
  Calculated to obtain mass balance. See comments in the parametres' comment field.
- Ammonia [air, unspecified]: 3.77963 kg; = (2*17.031/9.012); lognormal variance with pedigree 0.0139682, pedigree (3,2,2,3,1)
  2 NH4F is emitted during beryllium hydroxide purification. Emissions of ammonia is calculated based on stoichiometric relation --> 2*NH3 MW / Be MW. NH3 MW = 17.031 g/mol; Be = 9.012 g/mol.
- Magnesium [water, unspecified]: 2.69696 kg; = (24.305/9.012); lognormal variance with pedigree 0.0139682, pedigree (3,2,2,3,1)
  MgF2 is emitted during the reduction to beryllium metal. Emissions of magnesium is calculated based on stoichiometric relation --> Mg MW / Be MW. Mg MW = 24.305 g/mol; Be = 9.012 g/mol.
- Beryllium [air, non-urban air or from high stacks]: 0.0202 kg; = 0.404*(1-0.95); source Philip Nuss 2014; lognormal variance with pedigree 0.0566094, pedigree (3,2,2,5,1)
  The original value in the literature is 0.404 kg per kg of beryllium metal and semi-finished products produced. It is considered that NOx is removed by means of floating bed scrubber, with 95% efficiency.
  Reference:
  Jiuan, Y.L., 2005. Evaluation of wet scrubber systems. BSc Dissertation. University of Southern Queensland, Faculty of Engineering and Surveying
- Fluoride [water, unspecified]: 4.21616 kg; = (2*18.998/9.012); lognormal variance with pedigree 0.0139682, pedigree (3,2,2,3,1)
  MgF2 is emitted during the reduction to beryllium metal. Emissions of fluoride is calculated based on stoichiometric relation --> F2 MW / Be MW. F MW = 18.998 g/mol; Be = 9.012 g/mol.

## Sampling procedure
literature

## Extrapolations
This dataset has been extrapolated from year 2020 to the year of the calculation (2021). The uncertainty has been adjusted accordingly.

## Review by Carl Vadenbo 2021-03-05
Issues raised during cross-cutting review have been resolved satisfatorily.
