# skidding, skidder

Dataset: EcoSpold 2, unit process
Geography: RoW
Time period: 2012-01-01 to 2021-12-31
Technology level: current
Classification: EcoSpold01Categories: construction processes/machinery
Classification: ISIC rev.4 ecoinvent: 0220:Logging
Scenario: Business-as-Usual
System model: Allocation, cut-off by classification
Generated by: [System]
Database: ecoinvent
isCopyrightProtected: true
accessRestrictedTo: 1

## General comment
The inventory refers to 1 productive machine hour (PMS) - referring to the operational time of the machine including breaks up to 15 minutes - of a large skidder with an engine power of 130 kW and a total weight of 12,000 kg.
A skidder is any type of heavy vehicle used in a logging operation for pulling cut trees out of a forest in a process called "skidding", in which the logs are transported from the cutting site to a landing. Here they are loaded onto trucks and sent to the mill. Modern forms of skidders can pull trees with a cable/winch, or a grapple or a clam-bunk. See infrastructure dataset for more details.
Assumed fuel consumption: 13 l/PMH; total service life: 12,000 PMH, average daily transport distance of machinery: 25 km.
Productivity depends on the specific circumstances of the harvesting operation and is specified in the respective datasets.
The following sources have been consulted for the elaboration and plausibilisation of the dataset:
Anonymous (2004): DIRECTIVE 2004/26/EC OF THE EUROPEAN PARLIAMENT AND OF THE COUNCIL of 21 April 2004 amending Directive 97/68/EC on the approximation of the laws of the Member States relating to measures against the emission of gaseous and particulate pollutants from internal combustion engines to be installed in non-road mobile machinery. Official Journal of the European Union: 30.4.2004
Athanassiadis, D., G. Lidestav and I. Wästerlund (1999): Fuel, hydraulic oil and lubricant consumption in Swedish mechanized harvesting operations, 1996. Journal of Forest Engineering, 10(1): 59-66.
Klvac, R. and A. Skoupy (2009): Characteristic fuel consumption and exhaust emissions in fully mechanized logging operations. Journal of Forest Research, 14(6): 328-334: referring to Freitas 2004.
Klvac, R., S. Ward, P. M. O. Owende and J. Lyons (2003): Energy audit of wood harvesting systems. Scandinavian Journal of Forest Research, 18(2): 176-183.
Knechtle, N. (1997): Materialprofile von Holzerntesystemen - Analyse ausgewählter Beispiele als Grundlage für ein forsttechnisches Ökoinventar. Diplomarbeit am Departement für Wald- und Holzforschung. ETH Zürich, Zürich.
Markewitz, D. (2006): Fossil fuel carbon emissions from silviculture: Impacts on net carbon sequestration in forests. Forest Ecology and Management, 263: 153-161.
Riezinger, A. (2008): Die Ermittlung der ökologischen Effizienz der Bereitstellungskette von Waldhackgut anhand ausgewählter Fallstudien; Diplomarbeit. Universität der Bodenkultur (BOKU), Wien: referring to Schweinle and Thoroe 2001 (for consumption of hydraulic oil) and Pausch 2002 (for consumption of diesel fuel)
Spielmann, M., L. Barreto, V. Erni, F. Frutig and O. Thees (2007): Life cycle assessment of energy wood chip supply chains; a case study of near future supply of forest wood chips in Switzerland (unpublished). Paul Scherrer Institute (PSI), Swiss Federal Institute for Forest, Snow and Landscape Research (WSL), Villigen, Birmensdorf.
Wittkopf, S., U. Hömer and S. Feller (2003): Bereitstellungsverfahren für Waldhackschnitzel - Leistungen, Kosten, Rahmenbedingungen. Bayer. Landesanstalt für Wald und Forstwirtschaft, Freising.

## Included activities start
Service beginning with the transport of the machinery to the logging site.

## Included activities end
Includes the input of machinery infrastructure, the input of diesel fuel, lubricants/greases as well as their disposal, and the emissions into air from diesel consumption. Wood is not included in the dataset.

## Geography
Emission profile according to European legislation

## Technology
Average european technology

## Parameters
- share of EURO IIIa: 0.5 dimensionless; name EURO_IIIa; lognormal variance with pedigree 0.592, pedigree (5,4,1,1,1)
  assuming that the relevant share of foresassuming that the relevant share of forest machinery belongs to vehicle types tier EURO IIIa and EURO IIIb as define in the Guideline 97/68/EG by the European Commission.
- share of EURO IIIb: 0.490338 dimensionless; name EURO_IIIb; lognormal variance with pedigree 0.719098, pedigree (1,1,1,1,1)
  assuming that the relevant share of forest machinery belongs to vehicle types tier EURO IIIa and EURO IIIb as define in the Guideline 97/68/EG by the European Commission.
- load factor: 0.4 dimensionless; name LF; lognormal variance with pedigree 0.5526, pedigree (3,3,1,1,1)
  Personal oral communication, P. Wiss, Präsident des Verbandes Forstunternehmer Schweiz
- lifetime of machine, productive machine hours: 12000 hour; name total_PMH; lognormal variance with pedigree 0.5526, pedigree (3,3,1,1,1)
  Personal oral communication, P. Wiss, Präsident des Verbandes Forstunternehmer Schweiz
- diesel consumption: 13 l/hour; name diesel_consumption; lognormal variance with pedigree 0.592, pedigree (5,4,1,1,1)
  according to Klvac & Skoupy 2009, referring to Freitas 2004 (see general comments field for total of evaulated literature)
- scaling factor: 10 dimensionless; name scaling_factor
- engine power: 130.01 kW; name EP; lognormal variance with pedigree 0.5526, pedigree (3,3,1,1,1)
  own approximation based on several sources, particularly www.camox.at for Skidder Camox F175

## Reference product
- skidding, skidder: 1 hour; = 0.100000001233973 * scaling_factor; CPC 8614: Support and operation services to forestry and logging; By-product classification allocatable product
  Amount was scaled to 1.
  production volume 9.21516e6 hour; name p_harvesting; = 10000*total_PMH/10
    annual production of machinery: 10000 times total productive machine hours
  property price 7.7014 EUR2005
    Calculated based on inputs: The price of the product has been calculated as a sum of the values of the material and energy inputs for this product. This value is therefore a rough estimation. It may underestimate the real price since there are additional expenses when producing any product. These expences can include for example labour costs, treatment of waste materials and profit for the producer. Please consider carefully whether this level of data quality is acceptable for your application.

## Inputs from technosphere
- diesel, low-sulfur: 0 kg; name m_diesel; source Jirsousek R. 2007; pedigree (1,1,1,1,1)
  Density of diesel: 0.84 kg/l
  property carbon content, non-fossil 0; name C_content_non_fossil
  property water in wet mass 0 kg; name WWM
  property carbon content, fossil 0.865; name C_content_fossil
  property water content 0; name water_content
  properties: heating value, net 42.8 MJ, dry mass 1 kg
- waste mineral oil: -0.359289 kg; name w_mineral_oil; = (0.0359288893322418 * scaling_factor)*-1; source Klvac R. 2003; lognormal variance with pedigree 1.88726, pedigree (1,1,4,5,1)
  hydraulic oil and engine oil/grease; adjusted for water content of waste oil
  Amount was scaled to the amount of reference product.
  production volume 3.3109e6 kg; = w_mineral_oil*p_harvesting
    calculated
  property water content 0.111111; name WC_oil
  property dry mass 0.9 kg; name DM_oil
  property wet mass 1 kg; name w_mineral_oil_WM
  property price 0 EUR2005; name w_mineral_oil_price_EUR2005
  properties: carbon content, fossil 0.864444, heating value, net 34.7 MJ
  note on heating value, net: Value taken from the general comment of the treatment dataset.
- transport, freight, lorry 16-32 metric ton, EURO5: 0 metric ton*km; source Spielmann, M. 2007; pedigree (1,1,1,1,1)
  transport of forest machinery calculated for the weight of the machinery, transported over 25 km and 8 productive machine hours (PMH) per day
  Amount was scaled to the amount of reference product.
- lubricating oil: 0.32336 kg; name m_lubricating_oil; = 0.0323360003990176 * scaling_factor; source Klvac R. 2003; lognormal variance with pedigree 0.0682, pedigree (2,3,5,5,1)
  hydraulic oil and engine oil/grease; estimate based on Klvac et al. (2003); value per l converted to kg
  Amount was scaled to the amount of reference product.
  properties: heating value, net 40.2 MJ, dry mass 1 kg, carbon content, fossil 0.75
  note on heating value, net: Literature value, Source: IPCC 2006, 2006 IPCC Guidelines for National Greenhouse Gas Inventories, Prepared by the National Greenhouse Gas Inventories Programme, Eggleston H.S., Buendia L., Miwa K., Ngara T. and Tanabe K. (eds). Published: IGES, Japan
- skidder: 8.33333e-5 unit; = 8.33333344798571E-06 * scaling_factor; source Spielmann, M. 2007; lognormal variance with pedigree 0.56, pedigree (1,1,4,5,1)
  assuming a service life of 17600 PMH (according to Spielmann et al. 2007); other sources report lower service lifes between 8000 - 12000 PMH (e.g. Knechtle 1997)
  Amount was scaled to the amount of reference product.
- diesel, low-sulfur: 0.380486, 0.384109, 0.767961, 0.0254752, 0.172319, 9.16989 kg (6 entries); source Jirsousek R. 2007; lognormal variance with pedigree 0.0107403, pedigree (1,1,4,5,1)
  Density of diesel: 0.84 kg/l
  properties: heating value, net 42.8 MJ, dry mass 1 kg, carbon content, fossil 0.865
- transport, freight, lorry 16-32 metric ton, EURO5: 5.55115, 31.9488 metric ton*km (2 entries); source Spielmann, M. 2007; lognormal variance with pedigree 0.0696, pedigree (3,3,5,5,1)
  (same comment as for transport, freight, lorry 16-32 metric ton, EURO5)

## Emissions to nature
- NMVOC, non-methane volatile organic compounds, unspecified origin [air, non-urban air or from high stacks]: 0.0282406 kg; = 0.00282406022768796 * scaling_factor; source Lambrecht U. 2004; lognormal variance with pedigree 0.021279, pedigree (1,1,4,5,1)
  emission model calculating hourly specific emissions as "engine power x load factor x base emission factor" as proposed by Lambrecht et al. (2004) and applied in Spielmann et al. (2007); values for base emission factors for VOC for vehicle classes EURO IIIa and EURO IIIb are taken from Guideline 97/68/EG, of which 97.6% are assumed to be NMVOC.
  Amount was scaled to the amount of reference product.
- Dioxins, measured as 2,3,7,8-tetrachlorodibenzo-p-dioxin [air, non-urban air or from high stacks]: 6.53142e-13 kg; = 6.53142500060859E-14 * scaling_factor; source Kellenberger D. 2007; lognormal variance with pedigree 0.01, pedigree (1,1,4,5,1)
  value per MJ taken from ecoinvent 2.2 dataset *diesel in building machine" converted to input of diesel as mass
  Amount was scaled to the amount of reference product.
- Methane, fossil [air, non-urban air or from high stacks]: 0.000802332 kg; = 8.02332460411107E-05 * scaling_factor; source Lambrecht U. 2004; lognormal variance with pedigree 0.010007, pedigree (1,1,4,5,1)
  emission model calculating hourly specific emissions as "engine power x load factor x base emission factor" as proposed by Lambrecht et al. (2004) and applied in Spielmann et al. (2007); values for base emission factors for VOC for mobile machinery classes EURO IIIa and EURO IIIb are taken from European Directive 2004/ 26/EC, of which 2.4% are assumed to be methane.
  Amount was scaled to the amount of reference product.
- Copper [air, non-urban air or from high stacks]: 1.85213e-5 kg; = 1.85212551802972E-06 * scaling_factor; source Kellenberger D. 2007; lognormal variance with pedigree 0.01, pedigree (1,1,4,5,1)
  (same comment as for Dioxins, measured as 2,3,7,8-tetrachlorodibenzo-p-dioxin)
- Particulates, > 10 um [air, non-urban air or from high stacks]: 0.00047707 kg; = 4.77069534743161E-05 * scaling_factor; source Lambrecht U. 2004; lognormal variance with pedigree 0.010005, pedigree (1,1,4,5,1)
  emission model calculating hourly specific emissions as "engine power x load factor x base emission factor" as proposed by Lambrecht et al. (2004) and applied in Spielmann et al. (2007); values for base emission factors for particles for mobile machine classes EURO IIIa and EUROIIIb are taken from European Directive 2004/ 26/EC. The proportional distribution accross particle classes is made based on the ecoinvent v3 dataset "Diesel, burned in building machine/GLO".
  Amount was scaled to the amount of reference product.
- Carbon dioxide, fossil [air, non-urban air or from high stacks]: 34.0049 kg; = 3.40049388628084 * scaling_factor; source Kellenberger D. 2007; lognormal variance with pedigree 0.01, pedigree (1,1,4,5,1)
  calculated from diesel input as 3.113 kg CO2/kg diesel as inventoried in the ecoinvent dataset diesel, burned in building machine
  Amount was scaled to the amount of reference product.
- Cadmium [air, non-urban air or from high stacks]: 1.09168e-7 kg; = 1.09168103581601E-08 * scaling_factor; source Kellenberger D. 2007; lognormal variance with pedigree 0.01, pedigree (1,1,4,5,1)
  (same comment as for Dioxins, measured as 2,3,7,8-tetrachlorodibenzo-p-dioxin)
- Particulates, < 2.5 um [air, non-urban air or from high stacks]: 0.00963629 kg; = 0.000963629180283227 * scaling_factor; source Lambrecht U. 2004; lognormal variance with pedigree 0.0119925, pedigree (1,1,4,5,1)
  (same comment as for Particulates, > 10 um)
- Carbon monoxide, fossil [air, non-urban air or from high stacks]: 0.121298 kg; = 0.0121297892868445 * scaling_factor; source Kellenberger D. 2007; lognormal variance with pedigree 0.01, pedigree (1,1,4,5,1)
  (same comment as for Dioxins, measured as 2,3,7,8-tetrachlorodibenzo-p-dioxin)
- Benzo(a)pyrene [air, non-urban air or from high stacks]: 3.27038e-7 kg; = 3.27037780387616E-08 * scaling_factor; source Kellenberger D. 2007; lognormal variance with pedigree 0.01, pedigree (1,1,4,5,1)
  (same comment as for Dioxins, measured as 2,3,7,8-tetrachlorodibenzo-p-dioxin)
- Zinc [air, non-urban air or from high stacks]: 1.09168e-5 kg; = 1.09168103581601E-06 * scaling_factor; source Kellenberger D. 2007; lognormal variance with pedigree 0.01, pedigree (1,1,4,5,1)
  (same comment as for Dioxins, measured as 2,3,7,8-tetrachlorodibenzo-p-dioxin)
- Nitrogen oxides [air, non-urban air or from high stacks]: 0.218787 kg; = 0.0218787062089703 * scaling_factor; source Lambrecht U. 2004; lognormal variance with pedigree 0.374685, pedigree (1,1,4,5,1)
  emission model calculating hourly specific emissions as "engine power x load factor x base emission factor" as proposed by Lambrecht et al. (2004) and applied in Spielmann et al. (2007); values for base emission factors for NOx for mobile machine class EUROIIIb are taken from the European Directive 2004/ 26/EC; for mobile machine class EURO IIIa values for base emission factors for NOx are calculated based on an assumed reduction of VOC emissions as compared to "Tier 2" limit for VOC of 1.0 g/kWh (following Spielmann et al. 2007).
  Amount was scaled to the amount of reference product.
  property dry mass 1 kg; name DM
- Ammonia [air, non-urban air or from high stacks]: 0.00021787 kg; = 2.17869676806015E-05 * scaling_factor; source Kellenberger D. 2007; lognormal variance with pedigree 0.01, pedigree (1,1,4,5,1)
  (same comment as for Dioxins, measured as 2,3,7,8-tetrachlorodibenzo-p-dioxin)
- Selenium [air, non-urban air or from high stacks]: 1.09168e-7 kg; = 1.09168103581601E-08 * scaling_factor; source Kellenberger D. 2007; lognormal variance with pedigree 0.01, pedigree (1,1,4,5,1)
  (same comment as for Dioxins, measured as 2,3,7,8-tetrachlorodibenzo-p-dioxin)
- Particulates, > 2.5 um, and < 10um [air, non-urban air or from high stacks]: 0.000382929 kg; = 3.82928825808926E-05 * scaling_factor; source Lambrecht U. 2004; lognormal variance with pedigree 0.0100012, pedigree (1,1,4,5,1)
  (same comment as for Particulates, > 10 um)
- PAH, polycyclic aromatic hydrocarbons [air, non-urban air or from high stacks]: 3.66226e-5 kg; = 3.66226330391268E-06 * scaling_factor; source Kellenberger D. 2007; lognormal variance with pedigree 0.01, pedigree (1,1,4,5,1)
  (same comment as for Dioxins, measured as 2,3,7,8-tetrachlorodibenzo-p-dioxin)
- Dinitrogen monoxide [air, non-urban air or from high stacks]: 0.0013043 kg; = 0.000130429875579924 * scaling_factor; source Kellenberger D. 2007; lognormal variance with pedigree 0.01, pedigree (1,1,4,5,1)
  (same comment as for Dioxins, measured as 2,3,7,8-tetrachlorodibenzo-p-dioxin)
- Nickel [air, non-urban air or from high stacks]: 7.6511e-7 kg; = 7.65109785785578E-08 * scaling_factor; source Kellenberger D. 2007; lognormal variance with pedigree 0.01, pedigree (1,1,4,5,1)
  (same comment as for Dioxins, measured as 2,3,7,8-tetrachlorodibenzo-p-dioxin)

## Sampling procedure
Material and fuel input from literature sources (see general comments field); air-borne emissions taken from existing dataset on diesel consumption in building machines or - where emission levels beyond applicable European legislation - estimated with emissions model based on emission limits established in European Directive 2004/ 26/EC for non-road mobile machinery types EURO IIIa and IIIb (according to Lambrecht et al 2004 and e.g. applied in Spielmann et al. 2007).
