# soybean production

Dataset: EcoSpold 2, unit process
Geography: AR
Time period: 2009-01-01 to 2021-12-31
Technology level: current
Classification: ISIC rev.4 ecoinvent: 0111:Growing of cereals (except rice), leguminous crops and oil seeds
Tags: WFLDB
Scenario: Business-as-Usual
System model: Allocation, cut-off by classification
Generated by: Tuija Waldvogel
Published in: Nemecek T. 2015
Database: ecoinvent
isCopyrightProtected: true
accessRestrictedTo: 1

## General comment
This dataset represents the production of 1 kg of soybean. The average yield from 2009 - 2012 is 2.6 t/ha. The data are representative for soybean production in Argentina used for the export market. Mineral NPK fertiliser input is 4-12-0 kg/ha. No organic fertilisers are applied. Total active ingredients (a.i.) applied as pesticides amount to 0.92 kg a.i./ha.
The dataset was modelled within the project 'World Food LCA database (WFLDB)'. The aim of this project was to provide inventories of a broad variety of agricultural products and processes and to cover for each product at least 50% of the global export market. The export share of soybean produced in Argentina amounts to 14% of the global export (tonnage exported in 2010). The production system regarded in this dataset aimed at representing soybean produced in Argentina for the export market.
PEF-Quality: data quality rating (DQR) = 1.3 (i.e. excellent quality). This dataset refers to an average situation; for specific situations exchanges might differ substantially due to site specific parameters

## Included activities start
This activity starts with soil cultivation after the harvest of the previous crop.

## Included activities end
This activity ends with the harvest of soybean at farm gate. The dataset includes all machine operations, corresponding infrastructure, fuel use and sheds. Machine operations are: soil cultivation, sowing, fertilisation, pesticide application, harvesting, and on-farm transport. Further, direct field emissions and land use change are included. Heavy metal uptake by the crop is considered. The inputs of seeds, fertilisers and pesticides as well as packaging of fertilisers and pesticides are considered.

## Technology
Conventional production

## Parameters
- heavyMetalUptakeSwitch: 1 dimensionless
- LUC_crop_specific: 1 dimensionless
  This parameter allows to switch between a 'crop specific' and a 'country specific' approach when calculating the LUC of a crop. By default, the chosen approach is 'crop specific', so the value of the parameter is 1. If you want to apply a 'country specific' approach, turn the parameter to 0.

## Reference product
- soybean: 1 kg; CPC 01412: Soya beans, other; By-product classification allocatable product
  Reference flow: Yield = 2600.0 kg/ha
  production volume 4.31644e10 kg
    Source: FAOSTAT. Average, 2009-2012
  property price 0.239 EUR2005
    Calculated value based on data from United Nations Commodity Trade Statistics Database (comtrade.un.org). UN comtrade category: 1201 Soya beans. Using exchange rate of 1EURO = 1.209 USD. Average of price of import into 5 main markets (EU, US, JP, IN and CN).
  property carbon content 0.524508
    carbon content on a dry matter basis (reserved; not for manual entry)
  properties: wet mass 1 kg, water in wet mass 0.11 kg, carbon content, fossil 0, dry mass 0.89 kg, water content 0.123596, carbon content, non-fossil 0.524508, carbon allocation 0.466812 kg

## Inputs from technosphere
- packaging, for pesticides: 0.000711031 kg; lognormal variance with pedigree 0.0592, pedigree (4,3,4,5,4)
  Total amount of active substance/s of pesticides needed for the production of soybean is calculated to be circa 3.56E-04 kg. Pesticide/s used in this dataset is/are: 'cyclic N-compound', 'glyphosate', 'organophosphorus-compound, unspecified', 'phenoxy-compound', 'pyrethroid-compound', 'triazine-compound, unspecified'. The total amount of active substance/s is doubled in order to account for the packaging of the dilluted product of pesticide/s that is/are applied. Therefore, 7.11E-04 kg of packaging for pesticides is justified with this exchange.
  properties: heating value, net 25.97 MJ, dry mass 1 kg, wet mass 1 kg, price 0.0642 EUR2005, carbon content, fossil 0.85714
- inorganic phosphorus fertiliser, as P2O5: 0, 0.00161538 kg (2 entries)
  Calculated based on literature values or expert estimation: The total amount of nutrient (Personal written communication, Gustavo Elias, Yara, 2015) multiplied by the share of fertiliser type (Personal written communication, Gustavo Elias, Yara, 2015). See supporting documentation 'WFLDB-Documentation.pdf' chapter 'Fertiliser application' for L3 and L4 data (https://ecoquery.ecoinvent.org/File/Reports).
  Corresponds to 0.48 kg/ha
  properties: wet mass 1 kg, dry mass 1 kg
- single superphosphate: 0.0103297 kg
  The exchange has been updated from 'single superphosphate' into 'single superphosphate' and therefore its amount has been scaled (multiplied) from 0.0022 kg by 4.7619 kg of 'single superphosphate' per kg of 'single superphosphate'. Original comment of the exchange is: Calculated based on literature values or expert estimation: The total amount of nutrient (Personal written communication, Gustavo Elias, Yara, 2015) multiplied by the share of fertiliser type (Personal written communication, Gustavo Elias, Yara, 2015). See supporting documentation 'WFLDB-Documentation.pdf' chapter 'Fertiliser application' for L3 and L4 data (https://ecoquery.ecoinvent.org/File/Reports).
  Corresponds to 0.48 kg/ha
  properties: phosphorus content 0.0916484, wet mass 1 kg, dry mass 1 kg
- inorganic nitrogen fertiliser, as N: 0, 0, 0.000384615, 0.00115385 kg (4 entries)
  Calculated based on literature values or expert estimation: The total amount of nutrient (Personal written communication, Gustavo Elias, Yara, 2015) multiplied by the share of fertiliser type (Personal written communication, Gustavo Elias, Yara, 2015). See supporting documentation 'WFLDB-Documentation.pdf' chapter 'Fertiliser application' for L3 and L4 data (https://ecoquery.ecoinvent.org/File/Reports).
  Corresponds to 1.0 kg/ha
  properties: dry mass 1 kg, wet mass 1 kg
- triple superphosphate: 0.000401338 kg
  The exchange has been updated from 'triple superphosphate' into 'triple superphosphate' and therefore its amount has been scaled (multiplied) from 0.0002 kg by 2.1739 kg of 'triple superphosphate' per kg of 'triple superphosphate'. Original comment of the exchange is: Calculated based on literature values or expert estimation: The total amount of nutrient (Personal written communication, Gustavo Elias, Yara, 2015) multiplied by the share of fertiliser type (Personal written communication, Gustavo Elias, Yara, 2015). See supporting documentation 'WFLDB-Documentation.pdf' chapter 'Fertiliser application' for L3 and L4 data (https://ecoquery.ecoinvent.org/File/Reports).
  Corresponds to 0.48 kg/ha
  properties: phosphorus content 0.200754, dry mass 1 kg, wet mass 1 kg
  note on phosphorus content: Phosphorus content (on a dry matter basis) of triple superphosphate is calculated from the molecular formula of the nutrient present in the substance.
- inorganic phosphorus fertiliser, as P2O5: 0, 0, 0.000184615, 0.000461538 kg (4 entries)
  (same comment as for inorganic phosphorus fertiliser, as P2O5)
  properties: dry mass 1 kg, wet mass 1 kg
- transport, freight train: 0.001696 metric ton*km
  This represent the transport of fertilizers that are directly linked to their supplying activities, to better represent the fertilizer mix of the activity. Transport distance based on US BTS Commodity Flow Surveys 1993, 1997, 2002, 2007, US Dep. Of Transportation, Bureau of Transportation Statistics.
- packaging, for fertilisers: 0.0123077 kg; lognormal variance with pedigree 0.0592, pedigree (4,3,4,5,4)
  Total amount of active substance/s of fertilisers needed for the production of 'soybean' is calculated to be circa 6.15E-03 kg. Fertiliser/s used in this dataset is/are: 'nitrogen fertiliser, as N', 'nitrogen fertiliser, as N', 'phosphate fertiliser, as P2O5', 'phosphate fertiliser, as P2O5', 'phosphate fertiliser, as P2O5', 'phosphate fertiliser, as P2O5', 'phosphate fertiliser, as P2O5'. The total amount of active substance/s is doubled in order to account for the packaging of the dilluted product of fertiliser/s that is/are applied. Therefore, 1.23E-02 kg of packaging for fertilisers is justified with this exchange.
  properties: heating value, net 25.01 MJ, price 0.0642 EUR2005, wet mass 1 kg, dry mass 1 kg, carbon content, fossil 0.825301
  note on carbon content, fossil: Considering a chemical formula (C2H4)n for polyethylene, carbon content-fossil is calculated to be 0.856286 kg of Carbon per kg of dry mass.
- transport, freight, sea, container ship: 0.00517477 metric ton*km
  This represent the transport of fertilizers that are directly linked to their supplying activities, to better represent the fertilizer mix of the activity. The total marine transport volume differentiated into major commodity groups based on data from FearnResearch (2001): Fearnley's Annual Review 2000. Oslo: Fearnley/AS, p. 1-78. The category 'Other cargo' accounts for 38% of total maritime transport volume and has been distributed on commodity groups based on the proportions of transport by rail and inland waterways.
  The total marine transport volume differentiated into major commodity groups based on data from FearnResearch (2001): Fearnley's Annual Review 2000. Oslo: Fearnley/AS, p. 1-78. The category 'Other cargo' accounts for 38% of total maritime transport volume and has been distributed on commodity groups based on the proportions in the marine import and export of the US in 2001-2010.
- transport, freight, inland waterways, barge: 0.000286769 metric ton*km
  (same comment as for transport, freight train)
- transport, freight, lorry, unspecified: 0.000913846 metric ton*km
  This represent the transport of fertilizers that are directly linked to their supplying activities, to better represent the fertilizer mix of the activity. Transport distance based on US BTS Commodity Flow Surveys 1993, 1997, 2002, 2007, US Dep. Of Transportation, Bureau of Transportation Statistics. Of the total road transport, 6% is assumed to be by delivery van for goods with a large share of retail sale, and 3% for goods that are mainly sold via wholesale.
- tillage, ploughing: 0.000115385 ha; source Dalgaard R. 2008; lognormal variance with pedigree 0.124177, pedigree (2,1,4,1,1)
  Literature value or expert estimation (Dalgaard et al. 2008).
- land use change, annual crop: 0.000279462 ha; = 0.000279461538462*LUC_crop_specific+0.000154423076923*(1-LUC_crop_specific)
  Calculated value. Land use change (LUC) combines land transformation areas calculated with the adapted 'Direct Land Use Change Assessment Tool' version 2014 developed by Blonk Consultants and the carbon losses from soil organic carbon (SOC) and vegetation (VEG) as calculated in ecoinvent v3. See 'WFLDB-Guidelines.pdf', available at https://ecoquery.ecoinvent.org/File/Reports.
- combine harvesting: 0.000115385 ha; source Panichelli L. 2008; lognormal variance with pedigree 0.124177, pedigree (2,1,4,1,1)
  Literature value or expert estimation (Panichelli et al. 2008). This amount has been scaled to the diesel consumption of 10.61l/ha.
- fertilising, by broadcaster: 0.000384615 ha; lognormal variance with pedigree 0.124177, pedigree (2,1,4,1,1)
  Estimated from diesel use in agricultural machinery (Panichelli et al. 2008).
- sowing: 0.000384615 ha; source Dalgaard R. 2008; lognormal variance with pedigree 0.124177, pedigree (2,1,4,1,1)
  Literature value or expert estimation (Dalgaard et al. 2008).
- application of plant protection product, by field sprayer: 0.00165385 ha; lognormal variance with pedigree 0.124664, pedigree (2,2,4,1,1)
  Estimated from diesel use in agricultural machinery (Panichelli et al. 2008).
- transport, tractor and trailer, agricultural: 0.0136492 metric ton*km; lognormal variance with pedigree 0.162439, pedigree (4,1,4,1,1)
  On-farm transport: Yield (in tonnes) multiplied by the average distance from field to farm. The distance was obtained by extrapolation (modified MEXALCA approach). See supporting documentation 'WFLDB-Documentation.pdf' chapter 'Machinery processes' (https://ecoquery.ecoinvent.org/File/Reports). Corresponds to 35.5tkm/ha.
- cyclic N-compound: 2.4339e-6 kg; source Panichelli L. 2008; lognormal variance with pedigree 0.0138498, pedigree (2,2,4,1,1)
  Literature value or expert estimation (Panichelli et al. 2008).
  properties: carbon content, fossil 0.641962, wet mass 1 kg, dry mass 1 kg
- organophosphorus-compound, unspecified: 0.000204935 kg; source Panichelli L. 2008; lognormal variance with pedigree 0.0138498, pedigree (2,2,4,1,1)
  Literature value or expert estimation (Panichelli et al. 2008).
  properties: dry mass 1 kg, carbon content, fossil 0.260898, wet mass 1 kg
- triazine-compound, unspecified: 8.27527e-6 kg; source Panichelli L. 2008; lognormal variance with pedigree 0.0138498, pedigree (2,2,4,1,1)
  Literature value or expert estimation (Panichelli et al. 2008).
  properties: carbon content, fossil 0.475616, wet mass 1 kg, dry mass 1 kg
- phenoxy-compound: 0.000116827 kg; source Panichelli L. 2008; lognormal variance with pedigree 0.0138498, pedigree (2,2,4,1,1)
  Literature value or expert estimation (Panichelli et al. 2008).
  properties: wet mass 1 kg, dry mass 1 kg, carbon content, fossil 0.532559
- glyphosate: 1.13907e-6 kg; source Panichelli L. 2008; lognormal variance with pedigree 0.0138498, pedigree (2,2,4,1,1)
  Literature value or expert estimation (Panichelli et al. 2008).
  properties: wet mass 1 kg, dry mass 1 kg, carbon content, fossil 0.214286
- pyrethroid-compound: 2.19051e-5 kg; source Panichelli L. 2008; lognormal variance with pedigree 0.0138498, pedigree (2,2,4,1,1)
  Literature value or expert estimation (Panichelli et al. 2008).
  properties: carbon content, fossil 0.623, wet mass 1 kg, dry mass 1 kg
- soybean seed, for sowing: 0.0278846 kg; source Panichelli L. 2008; lognormal variance with pedigree 0.124177, pedigree (2,1,4,1,1)
  Literature value or expert estimation (Panichelli et al. 2008).
  properties: wet mass 1 kg, water content 0.123596, dry mass 0.89 kg, carbon content, non-fossil 0.43596

## Inputs from nature
- Occupation, annual crop [natural resource, land]: 2.40254 m2*year; lognormal variance with pedigree 0.0200616, pedigree (2,1,4,1,1)
  Related to the duration from harvest date of previous crop to harvest date of main crop: 228 days.
- Transformation, to arable land, unspecified use [natural resource, land]: 3.84615 m2; lognormal variance with pedigree 0.0442144, pedigree (2,1,4,1,1)
  10000 m2 divided by the life time of the crop.
- Transformation, from arable land, unspecified use [natural resource, land]: 3.84615 m2; lognormal variance with pedigree 0.0442144, pedigree (2,1,4,1,1)
  10000 m2 divided by the life time of the crop.
- Carbon dioxide, in air [natural resource, in air]: 2.10127 kg; lognormal variance with pedigree 0.0138498, pedigree (2,2,4,1,1)
  CO2 uptake by biomass
- Energy, gross calorific value, in biomass [natural resource, biotic]: 26.2915 MJ; lognormal variance with pedigree 0.0138498, pedigree (2,2,4,1,1)
  Gross energy content is related to MJ/kg dry matter of product. Source: ecoinvent data.

## Emissions to nature
- Zinc [soil, agricultural]: -3.65547e-5 kg; = 4.46730769231e-06 + ( - 4.1022e-05)*heavyMetalUptakeSwitch; source Freiermuth R.  2006
  Comment on mathematicalRelation:
  4.46730769231e-06 from Calculated value - Freiermuth (2006). See 'WFLDB-Guidelines.pdf', available at https://ecoquery.ecoinvent.org/File/Reports.
  -4.1022e-05 from Soybeans, heavy metals uptake model
  Heavy metal uptake can be excluded by setting the parameter heavyMetalUptakeSwitch to zero.
- Difenoconazole [soil, agricultural]: 2.22659e-6 kg; lognormal variance with pedigree 0.0447216, pedigree (2,2,4,1,1)
  Calculated value - 100% emission in soil. See 'WFLDB-Guidelines.pdf', available at https://ecoquery.ecoinvent.org/File/Reports.
- Chromium, ion [water, surface water]: 7.85615e-7 kg; source Freiermuth R.  2006; lognormal variance with pedigree 0.356938, pedigree (2,2,4,1,1)
  Calculated value - Freiermuth (2006). See 'WFLDB-Guidelines.pdf', available at https://ecoquery.ecoinvent.org/File/Reports.
- 2,4-D [soil, agricultural]: 0.000106876 kg; lognormal variance with pedigree 0.0447216, pedigree (2,2,4,1,1)
  (same comment as for Difenoconazole)
- Cadmium, ion [water, surface water]: 6.18692e-9 kg; source Freiermuth R.  2006; lognormal variance with pedigree 0.356938, pedigree (2,2,4,1,1)
  (same comment as for Chromium, ion)
- Glyphosate [soil, agricultural]: 1.04204e-6 kg; lognormal variance with pedigree 0.0447216, pedigree (2,2,4,1,1)
  (same comment as for Difenoconazole)
- Copper, ion [water, surface water]: 4.95423e-7 kg; source Freiermuth R.  2006; lognormal variance with pedigree 0.356938, pedigree (2,2,4,1,1)
  (same comment as for Chromium, ion)
- Metribuzin [soil, agricultural]: 6.23446e-6 kg; lognormal variance with pedigree 0.0447216, pedigree (2,2,4,1,1)
  (same comment as for Difenoconazole)
- Lead [water, surface water]: 1.52327e-7 kg; source Freiermuth R.  2006; lognormal variance with pedigree 0.356938, pedigree (2,2,4,1,1)
  (same comment as for Chromium, ion)
- Metsulfuron-methyl [soil, agricultural]: 1.33595e-6 kg; lognormal variance with pedigree 0.0447216, pedigree (2,2,4,1,1)
  (same comment as for Difenoconazole)
- Mercury [water, surface water]: 4.66769e-10 kg; source Freiermuth R.  2006; lognormal variance with pedigree 0.356938, pedigree (2,2,4,1,1)
  (same comment as for Chromium, ion)
- Cypermethrin [soil, agricultural]: 2.00393e-5 kg; lognormal variance with pedigree 0.0447216, pedigree (2,2,4,1,1)
  (same comment as for Difenoconazole)
- Nickel, ion [water, surface water]: 2.357e-7 kg; source Freiermuth R.  2006; lognormal variance with pedigree 0.356938, pedigree (2,2,4,1,1)
  (same comment as for Chromium, ion)
- Chlorpyrifos methyl [soil, agricultural]: 0.000187479 kg; lognormal variance with pedigree 0.0447216, pedigree (2,2,4,1,1)
  (same comment as for Difenoconazole)
- Zinc, ion [water, surface water]: 4.96962e-7 kg; source Freiermuth R.  2006; lognormal variance with pedigree 0.356938, pedigree (2,2,4,1,1)
  (same comment as for Chromium, ion)
- Endosulfan [soil, agricultural]: 3.02816e-5 kg; lognormal variance with pedigree 0.0447216, pedigree (2,2,4,1,1)
  (same comment as for Difenoconazole)
- Cadmium, ion [water, ground-]: 6.62692e-9 kg; source Freiermuth R.  2006; lognormal variance with pedigree 0.356938, pedigree (2,2,4,1,1)
  Calculated value - Freiermuth (2006). See 'WFLDB-Guidelines.pdf', available at https://ecoquery.ecoinvent.org/File/Reports. This emission might be overestimated in case of basic soils.
- Chromium, ion [water, ground-]: 3.49454e-6 kg; source Freiermuth R.  2006; lognormal variance with pedigree 0.356938, pedigree (2,2,4,1,1)
  (same comment as for Cadmium, ion)
- Copper, ion [water, ground-]: 4.81962e-7 kg; source Freiermuth R.  2006; lognormal variance with pedigree 0.356938, pedigree (2,2,4,1,1)
  (same comment as for Cadmium, ion)
- Lead [water, ground-]: 2.41119e-8 kg; source Freiermuth R.  2006; lognormal variance with pedigree 0.356938, pedigree (2,2,4,1,1)
  (same comment as for Cadmium, ion)
- Ammonia [air, non-urban air or from high stacks]: 0.000450769 kg; source EEA 2013; lognormal variance with pedigree 0.0447216, pedigree (2,2,4,1,1)
  Calculated value - EMEP/EEA (2013). See 'WFLDB-Guidelines.pdf', available at https://ecoquery.ecoinvent.org/File/Reports.
- Mercury [water, ground-]: 4.79385e-8 kg; source Freiermuth R.  2006; lognormal variance with pedigree 0.356938, pedigree (2,2,4,1,1)
  (same comment as for Cadmium, ion)
- Nitrogen oxides [air, non-urban air or from high stacks]: 6.06577e-5 kg; source EEA 2013; lognormal variance with pedigree 0.124664, pedigree (2,2,4,1,1)
  Calculated value - EEA/EMEP (2013). See 'WFLDB-Guidelines.pdf', available at https://ecoquery.ecoinvent.org/File/Reports.
- Nickel, ion [water, ground-]: 2.02227e-10 kg; source Freiermuth R.  2006; lognormal variance with pedigree 0.356938, pedigree (2,2,4,1,1)
  (same comment as for Cadmium, ion)
- Dinitrogen monoxide [air, non-urban air or from high stacks]: 0.000341117 kg; source IPCC 2006; lognormal variance with pedigree 0.124664, pedigree (2,2,4,1,1)
  Calculated value - IPCC (2006). See 'WFLDB-Guidelines.pdf', available at https://ecoquery.ecoinvent.org/File/Reports.
- Zinc, ion [water, ground-]: 1.004e-6 kg; source Freiermuth R.  2006; lognormal variance with pedigree 0.356938, pedigree (2,2,4,1,1)
  (same comment as for Cadmium, ion)
- Phosphate [water, surface water]: 0.000132712 kg; source Prasuhn V.  2006; lognormal variance with pedigree 0.175866, pedigree (2,2,4,1,1)
  Calculated value - Prasuhn (2006). See 'WFLDB-Guidelines.pdf', available at https://ecoquery.ecoinvent.org/File/Reports.
- Cadmium [soil, agricultural]: 2.67065e-7 kg; = 3.18665384615e-07 + ( - 5.16e-08)*heavyMetalUptakeSwitch; source Freiermuth R.  2006
  Comment on mathematicalRelation:
  -5.16e-08 from Soybeans, heavy metals uptake model
  Heavy metal uptake can be excluded by setting the parameter heavyMetalUptakeSwitch to zero.
- Chromium [soil, agricultural]: -1.62805e-6 kg; = -1.18084615385e-06 + ( - 4.472e-07)*heavyMetalUptakeSwitch; source Freiermuth R.  2006
  Comment on mathematicalRelation:
  -1.18084615385e-06 from Calculated value - Freiermuth (2006). See 'WFLDB-Guidelines.pdf', available at https://ecoquery.ecoinvent.org/File/Reports.
  -4.472e-07 from Soybeans, heavy metals uptake model
  Heavy metal uptake can be excluded by setting the parameter heavyMetalUptakeSwitch to zero.
- Copper [soil, agricultural]: -1.28714e-5 kg; = 1.14596153846e-07 + ( - 1.2986e-05)*heavyMetalUptakeSwitch; source Freiermuth R.  2006
  Comment on mathematicalRelation:
  1.14596153846e-07 from Calculated value - Freiermuth (2006). See 'WFLDB-Guidelines.pdf', available at https://ecoquery.ecoinvent.org/File/Reports.
  -1.2986e-05 from Soybeans, heavy metals uptake model
  Heavy metal uptake can be excluded by setting the parameter heavyMetalUptakeSwitch to zero.
- Mercury [soil, agricultural]: 2.54123e-9 kg; source Freiermuth R.  2006; lognormal variance with pedigree 0.175866, pedigree (2,2,4,1,1)
  (same comment as for Chromium, ion)
- Phosphorus [water, surface water]: 2.26962e-5 kg; source Prasuhn V.  2006; lognormal variance with pedigree 0.175866, pedigree (2,2,4,1,1)
  Calculated value - Prasuhn (2006) and SQCB-Erosion. See 'WFLDB-Guidelines.pdf', available at https://ecoquery.ecoinvent.org/File/Reports.
- Nitrate [water, ground-]: 0.0401488 kg; source Faist Emmenegger M. 2009; lognormal variance with pedigree 0.175866, pedigree (2,2,4,1,1)
- Lead [soil, agricultural]: 1.20155e-6 kg; = 1.27034615385e-06 + ( - 6.88e-08)*heavyMetalUptakeSwitch; source Freiermuth R.  2006
  Comment on mathematicalRelation:
  1.27034615385e-06 from Calculated value - Freiermuth (2006). See 'WFLDB-Guidelines.pdf', available at https://ecoquery.ecoinvent.org/File/Reports.
  -6.88e-08 from Soybeans, heavy metals uptake model
  Heavy metal uptake can be excluded by setting the parameter heavyMetalUptakeSwitch to zero.
- Nickel [soil, agricultural]: -4.10347e-6 kg; = 4.71730769231e-07 + ( - 4.5752e-06)*heavyMetalUptakeSwitch; source Freiermuth R.  2006
  Comment on mathematicalRelation:
  4.71730769231e-07 from Calculated value - Freiermuth (2006). See 'WFLDB-Guidelines.pdf', available at https://ecoquery.ecoinvent.org/File/Reports.
  -4.5752e-06 from Soybeans, heavy metals uptake model
  Heavy metal uptake can be excluded by setting the parameter heavyMetalUptakeSwitch to zero.
- Phosphate [water, ground-]: 5.15385e-5 kg; source Prasuhn V.  2006; lognormal variance with pedigree 0.175866, pedigree (2,2,4,1,1)
  Calculated value - Prasuhn (2006). See 'WFLDB-Guidelines.pdf', available at https://ecoquery.ecoinvent.org/File/Reports. This emission might be overestimated in case of basic soils.

## Sampling procedure
WFLDB Methodological Guidelines for the Life Cycle Inventory of Agricultural Products in the latest version, available at: (Report section: https://v30.ecoquery.ecoinvent.org/File/Reports). Data sources: Data were categorised from level 0 (L0) to level (L4) as follows: L0 = estimate, proxy; L1 = statistical data (e.g. FAOSTAT); L2 = L1 adapted to crop and country; L3 = literature data or L1 resp. L2 data approved by experts; medium detailing (i.e. kg of total N-fertiliser); L4 = L3 data of high detailing (i.e. portion N-fertiliser types).In this dataset data were obtained for yield: L3; Fertilisers: L4; Pesticides: L4; Machinery: L4; Irrigation: L3. For information regarding the calculation of individual exchanges see supporting documentation WFLDB-Documentation.pdf.

## Extrapolations
This dataset has been extrapolated from year 2012 to the year of the calculation (2021). The uncertainty has been adjusted accordingly.

## Review by Assumpció ANTON 2016-05-30
Be aware that the use of statistics in input calculations could provide some specific inputs not common for specific crops, this should be corrected if better information is available and better reflexed in DQR . Currently, I would dissent for some of good marks provided, being a revision of criteria applied advisable.

Pesticides will need to be amended periodically checking for update of pesticides' ban.
