# transport, freight, sea, tanker for petroleum

Dataset: EcoSpold 2, unit process
Geography: GLO
Time period: 2007-01-01 to 2021-12-31
Technology level: current
Classification: EcoSpold01Categories: transport systems/ship
Classification: ISIC rev.4 ecoinvent: 5012:Sea and coastal freight water transport
Scenario: Business-as-Usual
System model: Allocation, cut-off by classification
Generated by: Philippa Notten
Published in: Notten, P.J. 2018
Database: ecoinvent
isCopyrightProtected: true
accessRestrictedTo: 1

## General comment
The dataset represents the transport of one tonne of liquid goods by a tanker for petroleum over one kilometer. The DWT (load capacity) of the tanker for petroleum is 36,000 tonnes, and it is estimated to transport an average of 4,100 million tonne.kms per year for 25 years (the average DWT and annual kilometres are weighted averages over the size class from data in IMO (2015)).
The dataset represents the entire transport life cycle including the production and maintenance of the tanker for petroleum, the transportation of liquid goods in bulk, and the construction of the port. The scope of this dataset is the operation of the tanker for petroleum, which has inputs of the ship, maintenance and port facilities (i.e. ship production, ship mainenance and port construction inputs and emissions are contained in linked datasets).
Fuel consumption and the main emissions (CO2, NOx, SOx, PM, NMVOC, CO, CH4, N2O) are calculated as weighted averages over size classes from IMO (2015). Emisisons at sea, emissions in controlled areas (ECA) and emissions in ports from the main engine, auxiliary engine and boiler are considered. Weighted averages of speed reduction (23%) and capacity utilsation factors (48%) from IMO (2015) are applied (the capacity utilisation factors take into account both the cargo load factor and an empty trip factor). The share of trip length and port time inside emssion controlled areas (ECAs) (where other fuel quality is used) are estimated to 5% and 50% respectively.
Emissions other than those listed above are calculated based on emission factors per kg fuel consumed from ecoinvent v2 (Spielmann et al., 2007). Emissions of xylene, toluene and benzene are no longer split out from non-methane volatile organic compounds (NMVOCs) in the datset as the method used by Spielmann et al. (2007) is considered too approximate (based on hydrocarbon emissions from road vehicles).
Port facilities have not been updated are representative of a single large port (Rotterdam). One common port facility is assumed for all commodities and ship types. Vessel production and maintenance are global in scope and described in the individual datsets.
References:
IMO (2015) Third IMO Greenhouse Gas Study 2014. International Maritime Organization, London
Spielmann et al (2007) Transport services. ecoinvent Report No. 14. Villigen

## Included activities start
The scope of this dataset is the operation of the tanker, with the production and maintenance of the tanker and port facilities contained in linked datasets. The transportation service starts with demand for construction of a tanker and the consumption of fuel (and associated emissions).

## Included activities end
The dataset ends with the service of transporting 1 tonne over a distance of 1 km. The dataset includes the operation of an average tanker for petroleum and links to the production and maintenance of one ship and the construction of one port. Use of main engine, auxiliary engine and boiler is covered both at sea, in emission controlled areas and in port. The dataset includes the consumption of fuel, airborne gaseous emissions, particulate emissions, heavy metal emissions, persistent organic compounds (POPs) emissions, antifouling emissions to water and the disposal of bilge oil.

## Geography
tonne*km is from weighted averages (global shipping data); infrastructure demand calculated using data from the largest port in Europe (Rotteradam)

## Technology
Fuel consumption and emissions are representative of the current technology (used in 2012 and considering the age distribution of global fleet). Load capacity (36,000 tonnes), fuel consumption and emissions are global weighted averages on tkms over the size classes from IMO (2015).

## Time period
Fuel consumption and emissions are calculated hourly covering the years 2007 to 2012

## Reference product
- transport, freight, sea, tanker for petroleum: 1 metric ton*km; By-product classification allocatable product; CPC 65212: Coastal and transoceanic water transport services of freight by tankers
  production volume 3.01836e13 metric ton*km; name PV
    Total freight tonne kms calculated from IMO (2015) and IHSF data.
  property price 0.000316692 EUR2005
    Calculated based on inputs: The price of the product has been calculated as a sum of the values of the material and energy inputs for this product. This value is therefore a rough estimation. It may underestimate the real price since there are additional expenses when producing any product. These expences can include for example labour costs, treatment of waste materials and profit for the producer. Please consider carefully whether this level of data quality is acceptable for your application.

## Inputs from technosphere
- port facilities: 0 unit; pedigree (1,1,1,1,1)
  Calculated value. Calculation uses the average days at sea, average dead weight and average speed (per ship type) (all from IMO 2014), port capacity based on Rotterdam (average total throughput 2010-2012) and an assumed port life time of 100 years.
  EcoSpold01Location=RER
- maintenance, tanker, for petroleum: 9.80003e-12 unit; lognormal variance with pedigree 0.2166, pedigree (4,5,5,4,4)
  Lifetime tonne-kilometres derived from IMO (2015)
- tanker, for petroleum: 9.80003e-12 unit; lognormal variance with pedigree 0.2166, pedigree (4,5,5,4,4)
  Lifetime tonne-kilometres derived from IMO (2015)
  properties: carbon content, fossil 0.012, dry mass 7.7744e6 kg, wet mass 7.7744e6 kg
- heavy fuel oil: 0 kg; source IMO 2015; pedigree (1,1,1,1,1)
  Fuel consumed by the ship is modelled as HFO, even though a portion of the fuel consumed is marine diesel oil (MDO) (consumed in port and in restricted areas). Quantity of fuel consumed is weighted average of size classes from IMO 2015. Reference: IMO (2015) Third IMO Greenhouse Gas Study 2014. International Maritime Organization, London
  properties: dry mass 1 kg, wet mass 1 kg, carbon content, fossil 0.849, heating value, net 41.2 MJ
- bilge oil: 0 kg; name waste_oil; source Spielmann, M. 2007; pedigree (1,1,1,1,1)
  Estimate, applying an emission factor of 0.005 kg bilge oil per kg fuel consumed, as in ecoinvent v2 (spielmann et al, 2007). Uncertainty range also from ecoinvent v2. Reference: Spielmann et al (2007) Transport services. ecoinvent Report No. 14. Villigen
  production volume 0 kg
    Calculated from production volume of reference product using the relative outputs.
  property water content 9; name water_content
  property carbon content, fossil 0.84; name C_content_fossil
  property water in wet mass 0.9 kg; name WWM
  property dry mass 0.1 kg; name DM
  property carbon content, non-fossil 0; name C_content_non_fossil
  property price 0 EUR2005; name waste_oil_price_EUR2005
  property wet mass 1 kg; name WM
  properties: heating value, net 1.92 MJ
  note on heating value, net: Value taken from the general comment of the treatment dataset.
- heavy fuel oil: 0.000248908, 1.74582e-5, 5.16828e-5, 1.30417e-5, 6.70147e-5, 1.01662e-5, 0.00120816 kg (7 entries); source IMO 2015; lognormal variance with pedigree 0.0419, pedigree (2,2,5,1,2)
  (same comment as for heavy fuel oil)
- bilge oil: -2.60246e-6, -6.80267e-8, -5.41168e-6 kg (3 entries); source Spielmann, M. 2007; lognormal variance with pedigree 0.0827, pedigree (3,2,5,1,4)
  (same comment as for bilge oil)
  production volume 2.43949e8 kg
  properties: water content 9, carbon content, fossil 0.84, dry mass 0.1 kg, heating value, net 1.92 MJ, wet mass 1 kg

## Emissions to nature
- Particulates, > 10 um [air, non-urban air or from high stacks]: 3.75117e-6 kg; source IMO 2015; lognormal variance with pedigree 0.1613, pedigree (2,2,5,1,2)
  Calculated from emission factor per kg fuel consumption in IMO 2015. Size distribution from ecoinvent v2 (Spielmann et al, 2007). References: IMO (2015) Third IMO Greenhouse Gas Study 2014. International Maritime Organization, London; Spielmann et al (2007) Transport services. ecoinvent Report No. 14. Villigen.
- TOC, Total Organic Carbon [water, ocean]: 7.87e-5 kg; lognormal variance with pedigree 0.1221, pedigree (3,2,5,1,4)
  Extrapolated from ecoinvent v2 (Spielmann et al, 2007), applying an emission factor per kg fuel consumed. Reference: Spielmann et al (2007) Transport services. ecoinvent Report No. 14. Villigen. Comment in ecoinvent v2: Estimation. According to quality guidelines, derived from emissions of oil. Energy use and combustion emissions
- Oils, unspecified [water, ocean]: 9.09e-5 kg; lognormal variance with pedigree 0.1221, pedigree (3,2,5,1,4)
  Extrapolated from ecoinvent v2 (Spielmann et al, 2007), applying an emission factor per kg fuel consumed. Reference: Spielmann et al (2007) Transport services. ecoinvent Report No. 14. Villigen. Comment in ecoinvent v2: Estimation. Oil spilled is assumed to be 0.8 kg/t and an average transport of 8800 km is assumed
- Nickel [air, non-urban air or from high stacks]: 3.51885e-8 kg; source Spielmann, M. 2007; lognormal variance with pedigree 0.7321, pedigree (3,2,5,1,4)
  Extrapolated from ecoinvent v2 (Spielmann et al, 2007), applying an emission factor per kg fuel consumed. Reference: Spielmann et al (2007) Transport services. ecoinvent Report No. 14. Villigen. Comment in ecoinvent v2: Calculated value. The figures employed in this project represent a mix between the values for distilled and residual fuels (using a distilled/residual ratio of 28:72 according to IMO (2000)). Energy use and combustion emissions. Further references:
  IMO (2000) Study of greenhouse gas emissions from ships.
- Zinc [air, non-urban air or from high stacks]: 1.27723e-9 kg; source Spielmann, M. 2007; lognormal variance with pedigree 0.7321, pedigree (3,2,5,1,4)
  (same comment as for Nickel)
- Copper, ion [water, ocean]: 2.16798e-10 kg; lognormal variance with pedigree 0.1, pedigree (3,5,5,5,3)
  Total antifoul release based on Dutch environmental study (NNWB (2008)), assuming antifoul releases are the same for all ships. Average ship lifetime tonne-km calculated from IHSF data.
- Methane, fossil [air, non-urban air or from high stacks]: 7.93812e-8 kg; source IMO 2015; lognormal variance with pedigree 0.0813, pedigree (2,2,5,1,2)
  Calculated from emission factor per kg fuel consumption in IMO 2015. Reference: IMO (2015) Third IMO Greenhouse Gas Study 2014. International Maritime Organization, London
- Dioxins, measured as 2,3,7,8-tetrachlorodibenzo-p-dioxin [air, non-urban air or from high stacks]: 1.61643e-15 kg; source Spielmann, M. 2007; lognormal variance with pedigree 0.1221, pedigree (3,2,5,1,4)
  Extrapolated from ecoinvent v2 (Spielmann et al, 2007), applying an emission factor per kg fuel consumed. Reference: Spielmann et al (2007) Transport services. ecoinvent Report No. 14. Villigen. Comment in ecoinvent v2: Literature studies. Uncertainty range accounts for a factor between 1.25E-10 g/kg and 8E-09 g/kg. It's assumed an average value of 1ng/kg Dioxins, measured as 2,3,7,8-tetrachlorodibenzo-p-dioxin. Energy use and combustion emissions
- Selenium [air, non-urban air or from high stacks]: 5.57048e-10 kg; source Spielmann, M. 2007; lognormal variance with pedigree 0.7321, pedigree (3,2,5,1,4)
  (same comment as for Nickel)
- COD, Chemical Oxygen Demand [water, ocean]: 0.000286 kg; lognormal variance with pedigree 0.1221, pedigree (3,2,5,1,4)
  (same comment as for TOC, Total Organic Carbon)
- Cadmium [air, non-urban air or from high stacks]: 3.95405e-11 kg; source Spielmann, M. 2007; lognormal variance with pedigree 0.7321, pedigree (3,2,5,1,4)
  (same comment as for Nickel)
- Dinitrogen monoxide [air, non-urban air or from high stacks]: 2.57045e-7 kg; source IMO 2015; lognormal variance with pedigree 0.0813, pedigree (2,2,5,1,2)
  (same comment as for Methane, fossil)
- Hydrogen chloride [air, non-urban air or from high stacks]: 9.44868e-8 kg; source Spielmann, M. 2007; lognormal variance with pedigree 0.1221, pedigree (3,2,5,1,4)
  (same comment as for Nickel)
- Sulfur dioxide [air, non-urban air or from high stacks]: 7.00752e-5 kg; source IMO 2015; lognormal variance with pedigree 0.0419, pedigree (2,2,5,1,2)
  (same comment as for Methane, fossil)
- NMVOC, non-methane volatile organic compounds, unspecified origin [air, non-urban air or from high stacks]: 3.88936e-6 kg; source IMO 2015; lognormal variance with pedigree 0.0813, pedigree (2,2,5,1,2)
  (same comment as for Methane, fossil)
- Ammonia [air, non-urban air or from high stacks]: 6.46573e-7 kg; source Spielmann, M. 2007; lognormal variance with pedigree 0.1221, pedigree (3,2,5,1,4)
  Extrapolated from ecoinvent v2 (Spielmann et al, 2007), applying an emission factor per kg fuel consumed. Reference: Spielmann et al (2007) Transport services. ecoinvent Report No. 14. Villigen. Comment in ecoinvent v2: Estimation. Based on the emission of heavy fuel oil burned in industrial furnance. Energy use and combustion emissions
- Hydrogen fluoride [air, non-urban air or from high stacks]: 9.44868e-9 kg; source Spielmann, M. 2007; lognormal variance with pedigree 0.1221, pedigree (3,2,5,1,4)
  (same comment as for Nickel)
- Chromium [air, non-urban air or from high stacks]: 2.52412e-10 kg; source Spielmann, M. 2007; lognormal variance with pedigree 0.7321, pedigree (3,2,5,1,4)
  (same comment as for Nickel)
- Nitrogen oxides [air, non-urban air or from high stacks]: 0.000104971 kg; source IMO 2015; lognormal variance with pedigree 0.0813, pedigree (2,2,5,1,2)
  (same comment as for Methane, fossil)
- Particulates, < 2.5 um [air, non-urban air or from high stacks]: 2.62582e-6 kg; source IMO 2015; lognormal variance with pedigree 0.3413, pedigree (2,2,5,1,2)
  (same comment as for Particulates, > 10 um)
- Mercury [air, non-urban air or from high stacks]: 4.56332e-11 kg; source Spielmann, M. 2007; lognormal variance with pedigree 0.7321, pedigree (3,2,5,1,4)
  (same comment as for Nickel)
- Carbon dioxide, fossil [air, non-urban air or from high stacks]: 0.00504658 kg; source IMO 2015; lognormal variance with pedigree 0.0419, pedigree (2,2,5,1,2)
  (same comment as for Methane, fossil)
- Carbon monoxide, fossil [air, non-urban air or from high stacks]: 4.16383e-6 kg; source IMO 2015; lognormal variance with pedigree 0.6913, pedigree (2,2,5,1,2)
  (same comment as for Methane, fossil)
- Tributyltin compounds [water, ocean]: 3.17007e-11 kg; lognormal variance with pedigree 0.1, pedigree (3,5,5,5,3)
  (same comment as for Copper, ion)
- Arsenic [air, non-urban air or from high stacks]: 6.08028e-10 kg; source Spielmann, M. 2007; lognormal variance with pedigree 0.7321, pedigree (3,2,5,1,4)
  (same comment as for Nickel)
- PAH, polycyclic aromatic hydrocarbons [air, non-urban air or from high stacks]: 3.23287e-9 kg; source Spielmann, M. 2007; lognormal variance with pedigree 0.3821, pedigree (3,2,5,1,4)
  Extrapolated from ecoinvent v2 (Spielmann et al, 2007), applying an emission factor per kg fuel consumed. Reference: Spielmann et al (2007) Transport services. ecoinvent Report No. 14. Villigen. Comment in ecoinvent v2: Literature studies. For total PAHs 2mg/kg fuel is reported. Energy use and combustion emissions
- Lead [air, non-urban air or from high stacks]: 2.78524e-10 kg; source Spielmann, M. 2007; lognormal variance with pedigree 0.7321, pedigree (3,2,5,1,4)
  (same comment as for Nickel)
- BOD5, Biological Oxygen Demand [water, ocean]: 0.000286 kg; lognormal variance with pedigree 0.1221, pedigree (3,2,5,1,4)
  (same comment as for TOC, Total Organic Carbon)
- Copper [air, non-urban air or from high stacks]: 6.08028e-10 kg; source Spielmann, M. 2007; lognormal variance with pedigree 0.7321, pedigree (3,2,5,1,4)
  Extrapolated from ecoinvent v2 (Spielmann et al, 2007), applying an emission factor per kg fuel consumed. Reference: Spielmann et al (2007) Transport services. ecoinvent Report No. 14. Villigen. Comment in ecoinvent v2: Literature studies. The figures employed in this project represent a mix using a distilled/residual ratio of 28:72 IMO (2000). Energy use and combustion emissions
- Thiocyanate, ion [water, ocean]: 3.46376e-12 kg; lognormal variance with pedigree 0.1, pedigree (3,5,5,5,3)
  (same comment as for Copper, ion)
- Particulates, > 2.5 um, and < 10um [air, non-urban air or from high stacks]: 3.00094e-6 kg; source IMO 2015; lognormal variance with pedigree 0.3413, pedigree (2,2,5,1,2)
  (same comment as for Particulates, > 10 um)
- Fungicides, unspecified [water, ocean]: 2.07826e-11 kg; lognormal variance with pedigree 0.1, pedigree (3,5,5,5,3)
  Total antifoul release based on Dutch environmental study (NNWB (2008)), assuming antifoul releases are the same for all ships. Average ship lifetime tonne-km calculated from IHSF data. Unspecified fungicides to ocean water used as a proxy to cover a number of fungicides and algicides used in antifoul paint and released into the ocean environment. These compounds are: dichlofluanid (fungicide), cybutryne (fungicide), tolylfluanid (fungicide), Sea-nine (algicide), zineb (fungicide) and zinc pyrithione (algicide). These compounds are released from ships in equal concentrations according to the Dutch environmental study (NNWB, 2008).
- DOC, Dissolved Organic Carbon [water, ocean]: 7.87e-5 kg; lognormal variance with pedigree 0.1221, pedigree (3,2,5,1,4)
  (same comment as for TOC, Total Organic Carbon)
- Hydrocarbons, unspecified [water, ocean]: 2.54139e-8 kg; lognormal variance with pedigree 0.1, pedigree (3,5,5,5,3)
  Unspecified hydrocarbons to water used as a proxy for paint to water during ship usage. Total paint to water (less antifoul emissions) based on: Ship lightweight mass calculated from IHSF data, Papanikolaou (2014) data and Anink & Krikke (2011) data. Paint usage data estimated by Kameyama et al. (n.d.), Harish & Sunil (2014) and Nicolae et al. (2014). Paint emission data from OECD (2009). Average ship lifetime tonne-km calculated from IHSF data.

## Sampling procedure
Calculation of fuel consumption and emissions performed for each in-service ship during each hour of each year from 2007 to 2012 (data from IMO, 2015).

Reference:
IMO (2015) Third IMO Greenhouse Gas Study 2014. International Maritime Organization, London

## Extrapolations
This dataset has been extrapolated from year 2012 to the year of the calculation (2021). The uncertainty has been adjusted accordingly.
