# straw production, stand-alone production

Dataset: EcoSpold 2, unit process
Geography: RoW
Time period: 1995-01-01 to 2021-12-31
Technology level: current
Classification: ISIC rev.4 ecoinvent: 0111:Growing of cereals (except rice), leguminous crops and oil seeds
Classification: EcoSpold01Categories: agricultural production/plant production
Synonyms: litter; bedding; mulch
Tags: ConvertedDataset
Scenario: Business-as-Usual
System model: Allocation, cut-off by classification
Share of production covered: 0 %
Generated by: Fredy Dinkel
Published in: Jungbluth N. 2007
Database: ecoinvent
isCopyrightProtected: true
accessRestrictedTo: 1

## General comment
Refers to 1 kg dry matter of fresh straw from straw areas with 1.66 kg CO2 and 17.6 MJ per kg dry matter. The dry matter content of fresh straw is about 15% the density about 120 kg/m3
[This dataset was already contained in the ecoinvent database version 2. It was not individually updated during the transfer to ecoinvent version 3. Life Cycle Impact Assessment results may still have changed, as they are affected by changes in the supply chain, i.e. in other datasets. This dataset was generated following the ecoinvent quality guidelines for version 2. It may have been subject to central changes described in the ecoinvent version 3 change report (http://www.ecoinvent.org/database/ecoinvent-version-3/reports-of-changes/), and the results of the central updates were reviewed extensively. The changes added e.g. consistent water flows and other information throughout the database. The documentation of this dataset can be found in the ecoinvent reports of version 2, which are still available via the ecoinvent website. The change report linked above covers all central changes that were made during the conversion process.]

## Included activities end
The inventories include the cultivation of straw on a straw area. Included steps are harvest and loading for transport.

## Geography
Refers to straw areas in the Swiss plateau (lowlands <700m).

## Technology
Extensiv organic procduction.

## Parameters
- fraction, irrigation water to surface water: 0.2 dimensionless; name fraction_IW_to_surface_water; lognormal variance with pedigree 0.0886, pedigree (4,3,1,1,4)
- fraction, irrigation water, to ground water: 0.8 dimensionless; name fraction_IW_to_ground_water; lognormal variance with pedigree 0.0886, pedigree (4,3,1,1,4)
- fraction, irrigation water, to air: 0.586986 dimensionless; name fraction_IW_to_air; lognormal variance with pedigree 0.0409, pedigree (2,2,2,1,1)

## Reference product
- straw, stand-alone production: 1 kg; CPC 01913: Cereal straw, husks, unprepared, ground, pressed, or in the form of pellets; By-product classification allocatable product
  EcoSpold01Location=CH
  production volume 3.96633 kg
    This is a placeholder value that does not reflect real-world production volumes. This dataset does not currently require a real-world production volume to work in the database framework, and no actual data were collected yet. This has no negative effect on the results of the ecoinvent database.
  property heating value, net 0 MJ
    Non combustible products are assumed to have an LHV equal to zero (0).
  property carbon content, non-fossil 0.437377
    Composition data obtained as the average of those of Rye straw (http://beefmagazine.com/images/2009%20feed%20table.pdf), and Barley straw and Wheat straw (http://www.uwex.edu/ces/crops/uwforage/StrawFOF.pdf). First, composition data were refered to 1 kg dry mass. Then, C-contents were calculated considering a C-content/dry mass of 46% in carbohydrates (including fibres), 53% in proteins and 75% in fats. All data from "Evolutionary and Biochemical Aspects", A.D. Kay and T. Vrede (in Global Ecology, 2010, Elsevier B.V., S.E. Jørgensen Ed.).
  property carbon content 0.437377
    carbon content on a dry matter basis (reserved; not for manual entry)
  properties: dry mass 1 kg, water content 5.66667, wet mass 6.66667 kg, price 0.012 EUR2005, carbon content, fossil 0, water in wet mass 5.66667 kg, carbon allocation 0.437377 kg

## Inputs from technosphere
- irrigation: 0 m3; name water_irrigation_input; source Siebert, S. 2010; pedigree (1,1,1,1,1)
  Calculated based on literature values (Döll, 2010) and partially modelled at ETH (Pfister, S.).
  property dry mass 0.11 kg; name DM
  property carbon content, fossil 0; name C_content_fossil
  property water in wet mass 999.89 kg; name WWM
  property carbon content, non-fossil 0; name C_content_non_fossil
  property wet mass 1000 kg; name WM
  property water content 9089.91; name water_content
- fodder loading, by self-loading trailer: 0.056 m3; lognormal variance with pedigree 0.0707, pedigree (2,2,5,5,3)
  EcoSpold01Location=CH
  Calculation with 15% dry matter content and density of about 120 kg/m3
  Uncertainty: Calculation with 15% dry matter content and density of about 120 kg/m3
- mowing, by rotary mower: 0.0005 ha; lognormal variance with pedigree 0.0726, pedigree (3,3,5,5,3)
  (same comment as for fodder loading, by self-loading trailer)
- irrigation: 9.91526e-5, 4.20872e-6, 0.000886357, 1.4525e-5, 7.26312e-7, 4.12419e-5, 6.71287e-6, 0.00170329, 3.27414e-5, 1.11903e-5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 m3 (16 entries); source Siebert, S. 2010; lognormal variance with pedigree 0.0447, pedigree (2,2,5,5,1)
  (same comment as for irrigation)
  properties: dry mass 0.11 kg, wet mass 1000 kg, water content 9089.91

## Inputs from nature
- Occupation, pasture, man made, intensive [natural resource, land]: 5 m2*year; lognormal variance with pedigree 0.082, pedigree (1,1,5,5,1)
  Calculation for one ha cultivated during one year with a yield of 20 dt per year.
  Uncertainty: Calculation for one ha cultivated during one year with a yield of 20 dt per year.
- Carbon dioxide, in air [natural resource, in air]: 1.65 kg; lognormal variance with pedigree 0.0426, pedigree (2,1,5,5,1)
  Calculated with an uptake of 0.450 kg carbon per kg DM (value of 'Landschaftsheu', Schriftenreihe Nachwachsende Rohstoffe), resulting in 1.65 kg CO2 / kg DM
  Uncertainty: Calculated with an uptake of 0.450 kg carbon per kg DM (value of 'Landschaftsheu', Schriftenreihe Nachwachsende Rohstoffe), resulting in 1.65 kg CO2 / kg DM
- Energy, gross calorific value, in biomass [natural resource, biotic]: 17.6 MJ; lognormal variance with pedigree 0.0418844, pedigree (2,1,5,3,1)
- Transformation, from pasture, man made, extensive [natural resource, land]: 0.1 m2; lognormal variance with pedigree 0.1741, pedigree (3,2,5,5,1)
  Calculation for the cultivation of one ha during one year, life time of 50 years according the ecoinvent quality guidelines
  Uncertainty: Calculation for the cultivation of one ha during one year, life time of 50 years according the ecoinvent quality guidelines
- Transformation, to pasture, man made, extensive [natural resource, land]: 0.1 m2; lognormal variance with pedigree 0.1741, pedigree (3,2,5,5,1)
  (same comment as for Transformation, from pasture, man made, extensive)

## Emissions to nature
- Chromium [soil, agricultural]: -1.09e-6 kg
  Calculation input - output bilance using data about metal content of grass (Nemecek et al 2004)
- Zinc [soil, agricultural]: -4e-5 kg
  (same comment as for Chromium)
- Phosphate [water, ground-]: 6.871e-5 kg; lognormal variance with pedigree 0.1627, pedigree (2,2,5,5,4)
  Formula as in ecoinvent report 15, Kapitel 4.4 (Nemecek et al. 2004)
  Uncertainty: Formula as in ecoinvent report 15, Kapitel 4.4 (Nemecek et al. 2004)
- Nickel [soil, agricultural]: -1.68e-6 kg
  (same comment as for Chromium)
- Phosphorus [water, surface water]: 2.3045e-6 kg; lognormal variance with pedigree 0.1627, pedigree (2,2,5,5,4)
  (same comment as for Phosphate)
- Dinitrogen monoxide [air, non-urban air or from high stacks]: 0.000165 kg; lognormal variance with pedigree 0.1626, pedigree (2,1,5,5,4)
  (same comment as for Phosphate)
- Water [water, surface water]: 0.000879603 m3; name water_to_water_surface; lognormal variance with pedigree 0.1306, pedigree (4,3,5,5,4)
  Calculated value. See the parameters and their comments to understand the calculation.
  property fraction, origin: fresh water 1; name fraction_origin_fresh_water_Wsw
  property fraction, origin: salt water 0; name fraction_origin_salt_water_Wsw
- Lead [soil, agricultural]: -3.3e-6 kg
  (same comment as for Chromium)
- Mercury [soil, agricultural]: -1.5e-7 kg
  (same comment as for Chromium)
- Nitrogen oxides [air, non-urban air or from high stacks]: 3.465e-5 kg; lognormal variance with pedigree 0.1626, pedigree (2,1,5,5,4)
  (same comment as for Phosphate)
- Water [water, ground-]: 0.00351841 m3; name water_to_water_ground; lognormal variance with pedigree 0.1306, pedigree (4,3,5,5,4)
  Calculated value. See the parameters and their comments to understand the calculation.
  property fraction, origin: salt water 0; name fraction_origin_salt_water_Wgw
  property fraction, origin: fresh water 1; name fraction_origin_fresh_water_Wgw
  property fraction, origin: unspecified 0; name fraction_origin_unspecified_Wgw
- Cadmium [soil, agricultural]: -1.3e-7 kg
  (same comment as for Chromium)
- Phosphate [water, surface water]: 0.00017177 kg; lognormal variance with pedigree 0.1627, pedigree (2,2,5,5,4)
  (same comment as for Phosphate)
- Water [air, unspecified]: 0.00221853 m3; name water_to_air_unspecified; lognormal variance with pedigree 0.0827, pedigree (2,2,5,5,1)
  Calculated value based on literature values and expert opinion. See comments in the parametres' comment field.
  property fraction, origin: salt water 0; name fraction_origin_salt_water
  property fraction, origin: fresh water 1; name fraction_origin_fresh_water
  property fraction, origin: unspecified 0; name fraction_origin_unspecified
- Copper [soil, agricultural]: -8.6e-6 kg
  (same comment as for Chromium)

## Sampling procedure
Data were compiled from statistics, fertilising recommendations, documents from extension services and expert knowledge.

## Extrapolations
This dataset has been copied from an original dataset covering the geography CH. The uncertainty has been adjusted accordingly.

## Review by Niels Jungbluth 2005-12-02
Passed.
