# catch crop growing, ryegrass-Egyptian&Persian clover-mixture, August-October, organic fertiliser 60 kg N, two cuts

Dataset: EcoSpold 2, unit process
Geography: CH
Time period: 2011-01-01 to 2021-12-31
Technology level: current
Classification: ISIC rev.4 ecoinvent: 0161:Support activities for crop production
Scenario: Business-as-Usual
System model: Allocation, cut-off by classification
Generated by: Thomas Nemecek
Database: ecoinvent
isCopyrightProtected: true
accessRestrictedTo: 1

## General comment
This dataset represents the cultivation of ryegrass-Egyptian&Persian clover-mixture silage on an area of 1 ha. The dry matter yield is 3829.5 kg/ha. The moisture content of the silage at storage is 65%.

## Included activities start
This activity starts after the harvest of the previous crop. The input of seeds is included. Farm manure as an organic fertiliser - if applied - is only accounted for in terms of direct field emissions; all pre-processes are included in the animal production systems.

## Included activities end
The dataset includes all machine operations and corresponding machine infrastructure and sheds. Machine operations are: soil cultivation, sowing, manuring - if manure is applied -, mowing, haying, swathing, baling, bale loading and transport of silage bales to the farm. Further, direct field emissions are included. This activity ends after the transport of the bales to the farm at the farm gate.

## Technology
Swiss integrated production

## Reference product
- ryegrass-Egyptian&Persian clover-mixture silage: 1 kg; name REF_PRODUCT; source Lehmann J. 1991; By-product classification allocatable product; CPC 01919: Forage products, n.e.c.
  Dry matter yield per hectare; calculated based on Lehmann (1991): dry matter yield at 25 kg N/ha; 15% added due to higher fertilisation; 10% of silage loss are subtracted (Agridea 2007). --- Sources: AGRIDEA (2007) Landwirtschaftliches Handbuch Pflanzen und Tiere. Wirz Kalender, 2007. Ed. AGRIDEA, Lindau (Switzerland).
  production volume 1.05e6 kg; = 2100*500
    Area of ryegrass-Egyptian&Persian clover-mixture (SM106) in Switzerland estimated as 2,000ha (own estimate Agroscope). 25% of it for this inventory (since 4 different inventories for ryegrass-Egyptian&Persian clover-mixture silage in Switzerland).
  property dry mass 1 kg; name REF_PRODUCT_DM
  property carbon content, non-fossil 0.42211; name REF_PRODUCT_C_content_non_fossil
    Composition data obtained from 'L Leguminosenreicher Mischbestand, Stadium 3, Silage' in Swiss Feed Database ('Schweizerische Futtermitteldatenbank. V1.0'; http://www.feed-alp.admin.ch/start.php?action=adv_search&cmd=list_feed). First, composition data were refered to 1 kg dry mass. Then, C-contents were calculated considering a C-content/dry mass of 44% in carbohydrates (including fibres), 53% in proteins and 75% in fats. All data from ecoinvent report, n 15a, pg 40, except C-content in protein, that comes from Determination of protein concentration by total organic carbon analysis, Rouwenhorst et al., 1991, J Biochem and Biophys Methods, 22:119-128.
  property energy content 18.34 MJ
    Gross calorific value of 'L Leguminosenreicher Mischbestand, Stadium 3, Silage' in Swiss Feed Database ('Schweizerische Futtermitteldatenbank. V1.0'; http://www.feed-alp.admin.ch/start.php?action=adv_search&cmd=list_feed).
  property price 0.016 EUR2005; name REF_PRODUCT_price_EUR2005
    Assumed the same price of alfalfa-grass silage to ryegrass silage, based on data for 2016 in Manitoba (Canada) [https://www.gov.mb.ca/agriculture/business-and-economics/financial-management/pubs/cop_forage_cerealsilage.pdf].
  property carbon content 0.42211
    carbon content on a dry matter basis (reserved; not for manual entry)
  properties: wet mass 2.85714 kg, carbon allocation 0.42211 kg

## Inputs from technosphere
- baling: 0.00408173 unit; source Nemecek, T. 2007; lognormal variance with pedigree 0.0092, pedigree (2,1,4,1,1)
  Calculated from fresh matter yield (35% dry matter content) and bale weigth of 700 kg (fresh matter; Nemecek 2007).
  This exchange has an activity link directly to the producing activity because the product is primarily consumed in the same geographical area where it is produced.
- transport, tractor and trailer, agricultural: 0.001 metric ton*km; lognormal variance with pedigree 0.1364, pedigree (4,1,4,1,1)
  Transport of silage bales to farm; distance 1 km.
- mowing, by rotary mower: 0.000522261 ha; source Boessinger M. 2004; lognormal variance with pedigree 0.0092, pedigree (2,1,4,1,1)
  Assumption based on the number of cuts and current practice in Switzerland (cf. Boessinger et. al 2004)
  This exchange has an activity link directly to the producing activity because the product is primarily consumed in the same geographical area where it is produced.
- clover seed, Swiss integrated production, for sowing: 0.00423032 kg; name SEED_1; source Lehmann J. 1991; lognormal variance with pedigree 0.0092, pedigree (2,1,4,1,1)
  property carbon content, non-fossil 0.469421; name SEED_1_C_content_non_fossil
  property energy content 16.0776 MJ; name SEED_1_energy_content
  property dry mass 0.9 kg; name SEED_1_DM
  properties: wet mass 1 kg, water content 0.111111
  note on carbon content, non-fossil: biogene carbon content on a dry matter basis peas seeds values are used
  note on energy content: See chapter 'Product Properties' in '01_crop production - yields & inputs CH & Europe_v1.0.pdf', section 'AGRICULTURAL PRODUCTION IN SWITZERLAND' - pdf-document on the dedicated talk page of ecoinvent (www.ecoinvent.org/documentation)
- bale loading: 0.00408173 unit; source Nemecek, T. 2007; lognormal variance with pedigree 0.0092, pedigree (2,1,4,1,1)
  (same comment as for baling)
- tillage, harrowing, by rotary harrow: 0.000261131 ha; source Boessinger M. 2004; lognormal variance with pedigree 0.0092, pedigree (2,1,4,1,1)
  (same comment as for mowing, by rotary mower)
- grass seed, Swiss integrated production, for sowing: 0.00517039 kg; name SEED_2; source Lehmann J. 1991; lognormal variance with pedigree 0.0092, pedigree (2,1,4,1,1)
  property carbon content, non-fossil 0.464601; name SEED_2_C_content_non_fossil
  property dry mass 0.9 kg; name SEED_2_DM
  property energy content 16.299 MJ; name SEED_2_energy_content
  properties: wet mass 1 kg, water content 0.111111
  note on carbon content, non-fossil: biogene carbon content on a dry matter basis wheat grains values are used
  note on energy content: See chapter 'Product Properties' in '01_crop production - yields & inputs CH & Europe_v1.0.pdf', section 'AGRICULTURAL PRODUCTION IN SWITZERLAND' - pdf-document on the dedicated talk page of ecoinvent (www.ecoinvent.org/documentation).
- haying, by rotary tedder: 0.00104452 ha; source Boessinger M. 2004; lognormal variance with pedigree 0.0092, pedigree (2,1,4,1,1)
  (same comment as for mowing, by rotary mower)
- sowing: 0.000261131 ha; source Boessinger M. 2004; lognormal variance with pedigree 0.0092, pedigree (2,1,4,1,1)
  (same comment as for mowing, by rotary mower)
- tillage, cultivating, chiselling: 0.000261131 ha; source Boessinger M. 2004; lognormal variance with pedigree 0.0092, pedigree (2,1,4,1,1)
  (same comment as for mowing, by rotary mower)
- liquid manure spreading, by vacuum tanker: 0.0120522 m3; source Flisch R. 2009; lognormal variance with pedigree 0.0092, pedigree (2,1,4,1,1)
  Calculated based on the amount of applied nitrogen. Data on nutrient content of slurry from Flisch (2009). Slurry represents the only input of nitrogen.
  This exchange has an activity link directly to the producing activity because the product is primarily consumed in the same geographical area where it is produced.
- swath, by rotary windrower: 0.000522261 ha; source Boessinger M. 2004; lognormal variance with pedigree 0.0092, pedigree (2,1,4,1,1)
  (same comment as for mowing, by rotary mower)
- tillage, rolling: 0.000261131 ha; source Boessinger M. 2004; lognormal variance with pedigree 0.0092, pedigree (2,1,4,1,1)
  (same comment as for mowing, by rotary mower)

## Inputs from nature
- Energy, gross calorific value, in biomass [natural resource, biotic]: 18.34 MJ; lognormal variance with pedigree 0.0499, pedigree (2,3,4,3,4)
  (same comment as for ryegrass-Egyptian&Persian clover-mixture silage)
- Occupation, annual crop [natural resource, land]: 0.65818 m2*year; lognormal variance with pedigree 0.0109, pedigree (2,1,4,1,1)
  Modelled, see chapter 'Land use' in '01_crop production_direct field emissions and natural resources_v1.0.pdf' - pdf-document on the dedicated talk page of ecoinvent (www.ecoinvent.org/documentation)
- Carbon dioxide, in air [natural resource, in air]: 1.53326 kg; = 44/12 * (REF_PRODUCT_C_content_non_fossil * REF_PRODUCT * REF_PRODUCT_DM - (SEED_1_C_content_non_fossil * SEED_1 * SEED_1_DM + SEED_2_C_content_non_fossil * SEED_2 * SEED_2_DM)); lognormal variance with pedigree 0.0498, pedigree (2,2,4,1,1)
  Modelled,see chapter 'CO2 binding' in '01_crop production_direct field emissions and natural resources_v1.0.pdf' - pdf-document on the dedicated talk page of ecoinvent (www.ecoinvent.org/documentation)
- Transformation, to annual crop [natural resource, land]: 2.61131 m2; lognormal variance with pedigree 0.0169, pedigree (2,1,4,1,1)
  (same comment as for Occupation, annual crop)
- Transformation, from annual crop [natural resource, land]: 2.61131 m2; lognormal variance with pedigree 0.0169, pedigree (2,1,4,1,1)
  (same comment as for Occupation, annual crop)

## Emissions to nature
- Copper, ion [water, ground-]: 9.08171e-7 kg; lognormal variance with pedigree 0.0951, pedigree (2,2,4,1,1)
  Modelled, see chapter 'Emissions of heavy metals to agricultural soil, surface water and ground water' in '01_crop production_direct field emissions and natural resources_v1.0.pdf' - pdf-document on the dedicated talk page of ecoinvent (www.ecoinvent.org/documentation)
- Mercury [soil, agricultural]: 7.40149e-8 kg; lognormal variance with pedigree 0.0498, pedigree (2,2,4,1,1)
  (same comment as for Copper, ion)
- Zinc [soil, agricultural]: 4.99757e-5 kg; lognormal variance with pedigree 0.0498, pedigree (2,2,4,1,1)
  (same comment as for Copper, ion)
- Copper, ion [water, surface water]: 3.61248e-9 kg; lognormal variance with pedigree 0.0951, pedigree (2,2,4,1,1)
  (same comment as for Copper, ion)
- Dinitrogen monoxide [air, non-urban air or from high stacks]: 0.000831698 kg; name N2O; lognormal variance with pedigree 0.0498, pedigree (2,2,4,1,1)
  Modelled, see chapter 'Emissions of N2O to the air' in '01_crop production_direct field emissions and natural resources_v1.0.pdf' - pdf-document on the dedicated talk page of ecoinvent (www.ecoinvent.org/documentation)
- Cadmium, ion [water, ground-]: 4.49301e-9 kg; lognormal variance with pedigree 0.0951, pedigree (2,2,4,1,1)
  (same comment as for Copper, ion)
- Lead [soil, agricultural]: 1.65388e-6 kg; lognormal variance with pedigree 0.0498, pedigree (2,2,4,1,1)
  (same comment as for Copper, ion)
- Nickel, ion [water, surface water]: 2.52169e-10 kg; lognormal variance with pedigree 0.0951, pedigree (2,2,4,1,1)
  (same comment as for Copper, ion)
- Phosphate [water, surface water]: 4.81278e-5 kg; lognormal variance with pedigree 0.0498, pedigree (2,2,4,1,1)
  Modelled, see chapter 'Emissions of phosphorous to the water' in '01_crop production_direct field emissions and natural resources_v1.0.pdf' - pdf-document on the dedicated talk page of ecoinvent (www.ecoinvent.org/documentation)
- Zinc, ion [water, surface water]: 2.86565e-8 kg; lognormal variance with pedigree 0.0951, pedigree (2,2,4,1,1)
  (same comment as for Copper, ion)
- Phosphate [water, ground-]: 1.55855e-5 kg; lognormal variance with pedigree 0.0498, pedigree (2,2,4,1,1)
  (same comment as for Phosphate)
- Chromium, ion [water, ground-]: 3.80371e-6 kg; lognormal variance with pedigree 0.0951, pedigree (2,2,4,1,1)
  (same comment as for Copper, ion)
- Cadmium, ion [water, surface water]: 5.63076e-11 kg; lognormal variance with pedigree 0.0951, pedigree (2,2,4,1,1)
  (same comment as for Copper, ion)
- Nickel [soil, agricultural]: 1.30359e-6 kg; lognormal variance with pedigree 0.0498, pedigree (2,2,4,1,1)
  (same comment as for Copper, ion)
- Chromium [soil, agricultural]: -2.44917e-6 kg
  (same comment as for Copper, ion)
- Ammonia [air, non-urban air or from high stacks]: 0.00834345 kg; lognormal variance with pedigree 0.017, pedigree (2,2,4,1,1)
  Modelled with the 'AGRAMMON model' described in '01_crop production_direct field emissions and natural resources_v1.0.pdf' - pdf-document on the dedicated talk page of ecoinvent (www.ecoinvent.org/documentation)
- Lead [water, surface water]: 1.78023e-11 kg; lognormal variance with pedigree 0.0951, pedigree (2,2,4,1,1)
  (same comment as for Copper, ion)
- Nitrogen oxides [air, non-urban air or from high stacks]: 0.000174657 kg; = 0.21*N2O; lognormal variance with pedigree 0.0498, pedigree (2,2,4,1,1)
  Modelled, see chapter 'Emissions of NOx to the air' in '01_crop production_direct field emissions and natural resources_v1.0.pdf' - pdf-document on the dedicated talk page of ecoinvent (www.ecoinvent.org/documentation)
- Zinc, ion [water, ground-]: 6.77153e-6 kg; lognormal variance with pedigree 0.0951, pedigree (2,2,4,1,1)
  (same comment as for Copper, ion)
- Chromium, ion [water, surface water]: 1.82426e-8 kg; lognormal variance with pedigree 0.0951, pedigree (2,2,4,1,1)
  (same comment as for Copper, ion)
- Mercury [water, ground-]: 2.76642e-9 kg; lognormal variance with pedigree 0.0951, pedigree (2,2,4,1,1)
  (same comment as for Copper, ion)
- Nitrate [water, ground-]: 0.0279665 kg; lognormal variance with pedigree 0.0498, pedigree (2,2,4,1,1)
  Modelled with the 'SALCA-NO3 model' described in '01_crop production_direct field emissions and natural resources_v1.0.pdf' - pdf-document on the dedicated talk page of ecoinvent (www.ecoinvent.org/documentation)
- Cadmium [soil, agricultural]: 4.79018e-8 kg; lognormal variance with pedigree 0.0498, pedigree (2,2,4,1,1)
  (same comment as for Copper, ion)
- Copper [soil, agricultural]: 1.09482e-5 kg; lognormal variance with pedigree 0.0498, pedigree (2,2,4,1,1)
  (same comment as for Copper, ion)
- Lead [water, ground-]: 4.61679e-8 kg; lognormal variance with pedigree 0.0951, pedigree (2,2,4,1,1)
  (same comment as for Copper, ion)

## Sampling procedure
Data collected from literature and expert knowledge; some own estimates.

## Extrapolations
This dataset has been extrapolated from year 2011 to the year of the calculation (2021). The uncertainty has been adjusted accordingly.

## Review by Thomas Nemecek 2011-12-16
Passed internally.
