# treatment of raw sewage sludge, municipal incineration with fly ash extraction

Dataset: EcoSpold 2, unit process
Geography: CH
Time period: 2006-01-01 to 2021-12-31
Technology level: current
Classification: ISIC rev.4 ecoinvent: 3821:Treatment and disposal of non-hazardous waste
Synonyms: Kehrichtverbrennung; Siedlungsabfallverbrennung; municipal waste incineration
Scenario: Business-as-Usual
System model: Allocation, cut-off by classification
Share of production covered: 100 %
Generated by: Gabor Doka
Published in: Doka G. 2015
Database: ecoinvent
isCopyrightProtected: true
accessRestrictedTo: 1

## General comment
This dataset represents the activity of waste disposal of raw sewage sludge in a municipal solid waste incinerator (MSWI) // Recommended use of this dataset: for incineration of unfermented sewage sludge from treatment of average municipal wastewater // // Waste composition (wet, in ppm): upper heating value 5.077 MJ/kg; lower heating value 3.196 MJ/kg; H2O 730000; O 61097; H 13886; C 111090; S 5191.6; N 11827; P 5613.7; B n.a.; Cl n.a.; Br n.a.; F n.a.; I n.a.; Ag n.a.; As 0.50992; Ba n.a.; Cd 0.36239; Co 2.0891; Cr 15.796; Cu 72.712; Hg 0.36239; Mn 68.441; Mo 1.2364; Ni 6.8001; Pb 20.145; Sb n.a.; Se n.a.; Sn 5.1856; V n.a.; Zn 198.1; Be n.a.; Sc n.a.; Sr n.a.; Ti n.a.; Tl n.a.; W n.a.; Si 7705.6; Fe 34796; Ca 13075; Al 3862.6; K n.a.; Mg 1468; Na n.a.; // Share of carbon in waste that is biogenic 100%. // Share of metals in waste not oxidised and bulk-recyclable (exclude very small or thin parts) Iron: 0%; Alu: 0%; Copper: 0%. // Recovery of metal scrap from bottom ash to recycling: 0g iron scrap, 0g aluminium scrap, 0g copper scrap. From this waste, the FLUWA process in the technology mix recovers 0.00131kg (DM) of a hydroxide sludge to be recycled in zinc furnaces. // Ultimately one kg of this waste produces 0.1304 kg of bottom ash (can include some washed ash) and 0.009037 kg of residues, which are landfilled (technology mix). Additional solidification of residues with 0.003615 kg of cement.Net energy production: 0.27MJ/kg electric energy and 0.72MJ/kg thermal energy. //

## Included activities start
waste incineration from waste reception gate and delivery into waste bunker at incinerator plant site (without transports to the incinerator)

## Included activities end
Waste-specific short-term emissions to water from leachate. Long-term emissions from landfill to ground water.

## Geography
Specific to the technology mix encountered in Switzerland in 2012.

## Technology
average Swiss MSWI plants in 2010 (grate incinerators) with electrostatic precipitator for fly ash (ESP), wet flue gas scrubber and 25% SNCR , 42.77% SCR-high dust , 32.68% SCR-low dust -DeNOx facilities and 0% without Denox (weighted according to mass of burnt waste, representing Swiss average). Efficiency of iron scrap separation from slag : 58%. Efficiency of non-ferrous scrap separation from slag : 31%. The technology mix for this dataset includes a filter ash treatment (FLUWA) of a share of 46.22%. Gross electric efficiency technology mix 15.84% and Gross thermal efficiency technology mix 28.51%

## Time period
Waste composition as given in literature reference, theoretical data or other source. Transfer coefficients for modern MSWI.

## Reference product
- raw sewage sludge: -1 kg; name RP_amount_1; By-product classification Waste; CPC 39920: Sewage sludge
  Main reference product of this activity (supply of disposal service).
  production volume 4.8382e7 kg; name RP_PV_1
    based on corresponding global production volume of MSW fraction in conventional MSWI (wo fly ash extraction) and scaled down to annual Swiss incinerated MSW mass of 3.02 mio. tonnes.
  property price 0 EUR2005
    Waste products are assigned a price of zero as they are assumed to require further treatment.
  property heating value, net 3.2 MJ
    Value taken from the general comment of the treatment dataset.
  property carbon content 0.41143
    carbon content on a dry matter basis (reserved; not for manual entry)
  properties: aluminium content 0.014306, magnesium content 0.0054369, tin content 1.9206e-5, chromium content 5.8503e-5, water content 2.7037, molybdenum content 4.5792e-6, dry mass 0.27 kg, silicon content 0.028539, zinc content 0.0007337, iron content 0.12887, carbon content, non-fossil 0.41143, water in wet mass 0.73 kg, calcium content 0.048428, wet mass 1 kg, phosphorus content 0.020792, cobalt content 7.7373e-6, sulfur content 0.019228, hydrogen content 0.051429, arsenic content 1.8886e-6, lead content 7.4609e-5, manganese content 0.00025349, oxygen content 0.22629, cadmium content 1.3422e-6, nickel content 2.5186e-5, copper content 0.0002693, mercury content 1.3422e-6, nitrogen content 0.043803, carbon allocation 0.111086 kg

## By-products
- electricity, for reuse in municipal waste incineration only: 0 kWh; name E_el_prod_MSWI; CPC 17100: Electrical energy; By-product classification allocatable product; pedigree (1,1,1,1,1)
  Net electricity generated from this waste and used in internal MSWI plant energy redistribution.
  Uncertainty: uncertainty is calculated from uncertainties in waste composition and uncertainties in energy efficiency and the uncertainty in internal energy demand
  production volume 3.5795e6 kWh
    calculated in proportion to reference product waste input to incinerator
  property price 0.1 EUR2005; name E_el_prod_MSWI_price_EUR2005
    Estimated to be the same price as in case of electricity, medium voltage.
  property true value relation 3.6; name E_el_prod_MSWI_true_value_relation
    property to calculate "true value" from
  property exergy 3.6 MJ; name E_el_prod_MSWI_exergy
    This exergy property is based on the exergy content of the product.
- heat, for reuse in municipal waste incineration only: 0 MJ; name E_th_prod_MSWI; By-product classification allocatable product; CPC 17300: Steam and hot water; pedigree (1,1,1,1,1)
  Net useful heat generated from this waste and used in internal MSWI plant energy redistribution.
  Uncertainty: uncertainty is calculated from uncertainties in waste composition and uncertainties in energy efficiency and the uncertainty in internal energy demand
  production volume 3.4953e7 MJ
    calculated in proportion to reference product waste input to incinerator
  property true value relation 0.1842; name E_th_prod_MSWI_true_value_relation
    property to calculate "true value" from
  property exergy 0.1842 MJ; name E_th_prod_MSWI_exergy
    This exergy property is based on the exergy content of the product.
  property price 0.0106 EUR2005; name E_th_prod_MSWI_price_EUR2005
    Average European district heat price from Ecoheatcool and Euroheat 2005-2006, Ecoheat Work package 1: The European heat market. Final report. 10.6 EUR/GJ i s the price of district heat. http://www.solarthermalworld.org/files/Ecoheatcool%20WP1%20Web.pdf?download
- metalliferous hydroxide sludge: 0 kg; By-product classification Recyclable; CPC 1429: Other non-ferrous metal ores and concentrates (other than uranium or thorium ores and concentrates); pedigree (1,1,1,1,1)
  Metalliferous hydroxide sludge from filter ash leaching (FLUWA).
  Uncertainty: uncertainty is calculated from uncertainties in waste composition and transfer coefficients to filter ash in incinerator and the uncertainty of the transfer coefficients of the FLUWA process.
  production volume 0 kg
    calculated in proportion to reference product waste input to incinerator
  property heating value, net 0 MJ
    Non combustible products are assumed to have an LHV equal to zero (0).
  property price 0.0042 EUR2005
    World market value of manure, deflated with barley world market price and consumer price index, based on [http://www.gov.pe.ca/photos/original/af_NM_manconv.pdf].
  property carbon content 0.0044183
    carbon content on a dry matter basis (reserved; not for manual entry)
  properties: aluminium content 0.00020382, calcium content 0.10086, magnesium content 0.0017634, water content 3, dry mass 0.25 kg, cobalt content 3.9409e-5, water in wet mass 0.75 kg, copper content 2.3102e-5, oxygen content 0.53377, wet mass 1 kg, arsenic content 3.6126e-6, zinc content 0.026718, phosphorus content 0.084262, cadmium content 9.4419e-5, sulfur content 0.24414, manganese content 5.3486e-5, mercury content 5.0494e-7, chromium content 5.7894e-5, tin content 3.4989e-6, lead content 0.0002781, iron content 0.0029359, nickel content 4.8403e-6, carbon content, non-fossil 0.0044183, molybdenum content 5.7943e-5, silicon content 0.00031216, carbon allocation 0.00110458 kg

## Inputs from technosphere
- water, decarbonised: 0.32516 kg; lognormal variance with pedigree 0.42842, pedigree (1,1,4,1,1)
  Incinerator process water used in flue gas scrubber stage.
  Uncertainty: uncertainty calculated from uncertainty in average water input, and the uncertainty of the waste composition of this waste
  properties: wet mass 1 kg
- heat, district or industrial, natural gas: 0.26651 MJ; lognormal variance with pedigree 0.97887, pedigree (1,1,4,1,1)
  Input to DeNOx stage, to heat up flue gas in low-dust SCR.
  Uncertainty: uncertainty calculated from uncertainty in average DeNOx input, uncertainty in the share of thermal NOx, uncertainty of nitrogen content in average municipal waste and the uncertainty in nitrogen content in *this* waste.
  properties: heating value, net 1 MJ
- sodium hydroxide, without water, in 50% solution state: 0.0019836 kg; lognormal variance with pedigree 0.22607, pedigree (1,1,4,1,1)
  Auxilliary inputs for the flue gas treatment stage of the incinerator plant, and partially in the filter ash treatment (FLUWA).
  Uncertainty: uncertainty calculated from uncertainty in average NaOH input, of transfer coefficients in the incinerator, and the uncertainty of the waste composition of this waste
  properties: wet mass 1 kg, dry mass 1 kg, heating value, net 3.03 MJ
- municipal waste incineration facility: 2.5e-10 unit
  Demands per kilogram waste.
- slag landfill: 2.3181e-10 unit; lognormal variance with pedigree 0.054453, pedigree (1,1,4,1,1)
  Landfill infrastructure required for landfilling of bottom ash.
  Uncertainty: uncertainty is calculated from uncertainties in waste composition and transfer coefficients in incinerator
- transport, freight, lorry, unspecified: 0.0057692 metric ton*km; lognormal variance with pedigree 0.046348, pedigree (1,1,4,1,1)
  Transport services to transport incineration residues to landfills and filter ash to external treatments (FLUWA).
  Uncertainty: uncertainty calculated from uncertainty of the waste composition of this waste, uncertainty of transfer coefficients and the uncertainty in generic transportation distances
- chemical, organic: 3.2776e-6 kg; lognormal variance with pedigree 1.6826, pedigree (1,1,4,1,1)
  Auxilliary inputs for the wastewater treatment stage of the incinerator plant. Proxy for (pure) Trisodium-trimercapto-s-triazine (CAS 17766-26-6), used as 15% diluted solution, aka TMT15.
  Uncertainty: uncertainty calculated from uncertainty in average TMT15 input, of transfer coefficients in the incinerator, and the uncertainty of the waste composition of this waste
  properties: dry mass 1 kg, carbon content, fossil 0.628, wet mass 1 kg, heating value, net 19.03 MJ
- hydrochloric acid, without water, in 30% solution state: 0.00024593 kg; lognormal variance with pedigree 0.060565, pedigree (1,1,4,1,1)
  Auxilliary inputs for the wastewater treatment stage of the incinerator plant.
  Uncertainty: uncertainty calculated from uncertainty in average HCl input, of transfer coefficients in the incinerator, and the uncertainty of the waste composition of this waste
  properties: dry mass 1 kg, wet mass 1 kg, heating value, net 3.32 MJ
- process-specific burdens, slag landfill: 0.13039 kg; lognormal variance with pedigree 0.054453, pedigree (1,1,4,1,1)
  Mass-specific expenditures required for landfilling of bottom ash.;activityLink introduced to establish a direct link to the corresponding regional supply of this product
  Uncertainty: uncertainty is calculated from uncertainties in waste composition and transfer coefficients in incinerator
- waste cement, hydrated: -0.0090373 kg; lognormal variance with pedigree 0.058187, pedigree (1,1,4,1,1)
  Hydrated cement output for solidification of landfilled residual material.
  Uncertainty: Uncertainty calculated from uncertainty of the waste composition of this waste and transfer coefficients in the incinerator and of the solidification recipe.
  production volume 437240 kg
    calculated in proportion to reference product waste input to incinerator
  properties: dry mass 1 kg, wet mass 1 kg
- iron (III) chloride, without water, in 40% solution state: 2.9194e-6 kg; lognormal variance with pedigree 0.42842, pedigree (1,1,4,1,1)
  Auxilliary inputs for the wastewater treatment stage of the incinerator plant.
  Uncertainty: uncertainty calculated from uncertainty in average FeCl3 input, of transfer coefficients in the incinerator, and the uncertainty of the waste composition of this waste
  properties: wet mass 1 kg, dry mass 1 kg
- titanium dioxide: 8.9291e-5 kg; lognormal variance with pedigree 1.3914, pedigree (1,1,4,1,1)
  Input to DeNOx stage (TiO2 catalyst carrier)
  Uncertainty: uncertainty calculated from uncertainty in average DeNOx input, uncertainty in the share of thermal NOx, uncertainty of nitrogen content in average municipal waste and the uncertainty in nitrogen content in *this* waste.
  properties: wet mass 1 kg, dry mass 1 kg
- chromium oxide, flakes: 1.8223e-6 kg; lognormal variance with pedigree 1.3914, pedigree (1,1,4,1,1)
  Input to DeNOx stage. Active component in SCR catalyst (vanadium pentoxide, V2O5), here approximated with the available chromium trioxide.
  Uncertainty: uncertainty calculated from uncertainty in average DeNOx input, uncertainty in the share of thermal NOx, uncertainty of nitrogen content in average municipal waste and the uncertainty in nitrogen content in *this* waste.
  properties: wet mass 1 kg, dry mass 1 kg
- spent activated carbon with mercury: -1.9333e-6 kg; name BP_amount_1; lognormal variance with pedigree 1.7069, pedigree (1,1,4,1,1)
  Spent ion exchanger charged with mercury, from FLUWA filter ash treatment, approximated here with Spent activated carbon with mercury, deposited undergound in a polyethylene Big Bag.
  Uncertainty: uncertainty calculated from uncertainty in of transfer coefficients in the incinerator, and the uncertainty of the waste composition of this waste.
  production volume 93.5369 kg; = ABS(RP_PV_1 * (BP_amount_1 / RP_amount_1))
    Calculated from production volume of reference product using the relative outputs.
  property price 0 EUR2005; name BP_amount_1_price_EUR2005
  properties: heating value, net 18.18 MJ, wet mass 1 kg, dry mass 1 kg, carbon content, fossil 0.6
- process-specific burdens, residual material landfill: 0.018018 kg; lognormal variance with pedigree 0.049103, pedigree (1,1,4,1,1)
  Mass-specific expenditures required for landfilling of incineration residues.;activityLink introduced to establish a direct link to the corresponding regional supply of this product
  Uncertainty: uncertainty is calculated from uncertainties in waste composition and transfer coefficients in incinerator
- chemical, inorganic: 2.7428e-5 kg; lognormal variance with pedigree 0.11927, pedigree (1,1,4,1,1)
  Auxilliary inputs for the wastewater treatment stage of the incinerator plant. Proxy for Polyelectrolyte.
  Uncertainty: uncertainty calculated from uncertainty in average Polyelectrolyte input, of transfer coefficients in the incinerator, and the uncertainty of the waste composition of this waste
  properties: wet mass 1 kg, dry mass 1 kg, carbon content, fossil 0.003
- hydrogen peroxide, without water, in 50% solution state: 0.00060759 kg; lognormal variance with pedigree 0.063682, pedigree (1,1,4,1,1)
  Auxilliary oxidising agent for filter ash treatment (FLUWA).
  Uncertainty: uncertainty calculated from uncertainty in of transfer coefficients in the incinerator, and the uncertainty of the waste composition of this waste
  properties: heating value, net 7.13 MJ, wet mass 1 kg, dry mass 1 kg
- cement, unspecified: 0.0036149 kg; lognormal variance with pedigree 0.058187, pedigree (1,1,4,1,1)
  Cement required for solidification of landfilled residual material.
  Uncertainty: Uncertainty calculated from uncertainty of the waste composition of this waste, of transfer coefficients in the incinerator and of the solidification recipe.
  properties: dry mass 1 kg, wet mass 1 kg
- cationic resin: 1.8366e-6 kg; lognormal variance with pedigree 1.7069, pedigree (1,1,4,1,1)
  Auxilliary input for mercury removal in filter ash treatment (FLUWA).
  Uncertainty: uncertainty calculated from uncertainty in of transfer coefficients in the incinerator, and the uncertainty of the waste composition of this waste
  properties: dry mass 0.5 kg, heating value, net 6.68 MJ, carbon content, fossil 0.521606, wet mass 1 kg, water content 1
- ammonia, anhydrous, liquid: 0.0014252 kg; lognormal variance with pedigree 0.97887, pedigree (1,1,4,1,1)
  Input to DeNOx stage (100% NH3).
  Uncertainty: uncertainty calculated from uncertainty in average DeNOx input, uncertainty in the share of thermal NOx, uncertainty of nitrogen content in average municipal waste and the uncertainty in nitrogen content in *this* waste.
  properties: dry mass 1 kg, wet mass 1 kg
- residual material landfill: 3.7538e-11 unit; lognormal variance with pedigree 0.049103, pedigree (1,1,4,1,1)
  Landfill infrastructure required for landfilling of incineration residues.
  Uncertainty: uncertainty is calculated from uncertainties in waste composition and transfer coefficients in incinerator
- metalliferous hydroxide sludge: -0.0052307 kg; lognormal variance with pedigree 0.065247, pedigree (1,1,4,1,1)
  (same comment as for metalliferous hydroxide sludge)
  production volume 253070 kg
  properties: calcium content 0.10086, magnesium content 0.0017634, water content 3, dry mass 0.25 kg, oxygen content 0.53377, price 0.0042 EUR2005, wet mass 1 kg, zinc content 0.026718, phosphorus content 0.084262, sulfur content 0.24414, iron content 0.0029359, carbon content, non-fossil 0.0044183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

## Inputs from nature
- Oxygen [natural resource, in air]: 0.41821 kg; lognormal variance with pedigree 0.073219, pedigree (1,1,4,1,1)
  Oxygen from ambient air needed to combust and oxidise this waste. Net demand, i.e. without O2 leaving the plant in flue gas uncombusted.
  Uncertainty: uncertainty is calculated from uncertainties in waste composition and transfer coefficients to flue gas and soild residues in incinerator

## Emissions to nature
- Manganese [water, surface water]: 8.3672e-9 kg; lognormal variance with pedigree 1.0485, pedigree (1,1,4,1,1)
  Emissions to water from waste composition and transfer coefficients in incinerator and landfills.
  Uncertainty: uncertainty is calculated from uncertainties in waste composition and transfer coefficients in incinerator and landfills
- Carbon monoxide, non-fossil [air, urban air close to ground]: 7.201e-5 kg; lognormal variance with pedigree 0.77051, pedigree (1,1,4,1,1)
  Incomplete combustion product emitted to air.
  Uncertainty: uncertainty calculated from uncertainty in average operation emissions, and the uncertainty of the flue gas volume from this waste.
- Aluminium [water, ground-, long-term]: 0.0029936 kg; lognormal variance with pedigree 0.46312, pedigree (1,1,4,1,1)
  Long-term emissions from landfilling of incineration residues.
  Uncertainty: uncertainty is calculated from uncertainties in waste composition and transfer coefficients in incinerator and landfills.
- Molybdenum [water, surface water]: 2.0573e-7 kg; lognormal variance with pedigree 1.00594, pedigree (1,1,4,1,1)
  (same comment as for Manganese)
- Carbon dioxide, non-fossil [air, urban air close to ground]: 0.40475 kg; lognormal variance with pedigree 0.12008, pedigree (1,1,4,1,1)
  Emission to air from waste composition and transfer coefficients.
  Uncertainty: uncertainty is calculated from uncertainties in waste composition and transfer coefficients in incinerator
- Magnesium [water, ground-, long-term]: 0.0013672 kg; lognormal variance with pedigree 0.60415, pedigree (1,1,4,1,1)
  (same comment as for Aluminium)
- Nickel, ion [water, surface water]: 4.5442e-9 kg; lognormal variance with pedigree 1.9249, pedigree (1,1,4,1,1)
  (same comment as for Manganese)
- Methane, non-fossil [air, urban air close to ground]: 6.3543e-7 kg; lognormal variance with pedigree 0.081565, pedigree (1,1,4,1,1)
  (same comment as for Carbon monoxide, non-fossil)
- NMVOC, non-methane volatile organic compounds, unspecified origin [air, urban air close to ground]: 1.9279e-6 kg; lognormal variance with pedigree 0.081565, pedigree (1,1,4,1,1)
  (same comment as for Carbon monoxide, non-fossil)
- Lead [water, surface water]: 1.3722e-9 kg; lognormal variance with pedigree 0.96926, pedigree (1,1,4,1,1)
  (same comment as for Manganese)
- Sulfur dioxide [air, urban air close to ground]: 5.521e-5 kg; lognormal variance with pedigree 0.46723, pedigree (1,1,4,1,1)
  (same comment as for Carbon dioxide, non-fossil)
- Particulates, < 2.5 um [air, urban air close to ground]: 5.0577e-6 kg; lognormal variance with pedigree 0.38968, pedigree (1,1,4,1,1)
  (same comment as for Carbon monoxide, non-fossil)
- Antimony [water, surface water]: 3.0105e-10 kg; lognormal variance with pedigree 0.037563, pedigree (1,1,4,1,1)
  (same comment as for Manganese)
- Nitrogen oxides [air, urban air close to ground]: 0.00053062 kg; lognormal variance with pedigree 1.0439, pedigree (1,1,4,1,1)
  Sum of fuel-Nox and thermal-NOx emitted to air after DeNOx stage.
  Uncertainty: uncertainty calculated from uncertainty in average N-emissions and uncertainty in the share of thermal NOx and the uncertainty in nitrogen content in *this* waste.
- Particulates, > 2.5 um, and < 10um [air, urban air close to ground]: 2.5415e-8 kg; lognormal variance with pedigree 0.18028, pedigree (1,1,4,1,1)
  (same comment as for Carbon monoxide, non-fossil)
- Tin, ion [water, surface water]: 4.6878e-9 kg; lognormal variance with pedigree 1.2558, pedigree (1,1,4,1,1)
  (same comment as for Manganese)
- Ammonia [air, urban air close to ground]: 1.6756e-6 kg; lognormal variance with pedigree 1.0439, pedigree (1,1,4,1,1)
  Nitrogen species emitted to air after DeNOx stage.
  Uncertainty: uncertainty calculated from uncertainty in average N-emissions and uncertainty in the share of thermal NOx and the uncertainty in nitrogen content in *this* waste.
- Dioxins, measured as 2,3,7,8-tetrachlorodibenzo-p-dioxin [air, urban air close to ground]: 8.4718e-14 kg; lognormal variance with pedigree 0.38968, pedigree (1,1,4,1,1)
  (same comment as for Carbon monoxide, non-fossil)
- Vanadium, ion [water, surface water]: 5.5008e-10 kg; lognormal variance with pedigree 0.54562, pedigree (1,1,4,1,1)
  (same comment as for Manganese)
- Dinitrogen monoxide [air, urban air close to ground]: 0.00017639 kg; lognormal variance with pedigree 1.1295, pedigree (1,1,4,1,1)
  (same comment as for Ammonia)
- Benzene [air, urban air close to ground]: 4.2362e-8 kg; lognormal variance with pedigree 0.081565, pedigree (1,1,4,1,1)
  (same comment as for Carbon monoxide, non-fossil)
- Zinc, ion [water, surface water]: 1.2104e-8 kg; lognormal variance with pedigree 0.76253, pedigree (1,1,4,1,1)
  (same comment as for Manganese)
- Cyanide [air, urban air close to ground]: 3.7897e-5 kg; lognormal variance with pedigree 1.1295, pedigree (1,1,4,1,1)
  (same comment as for Ammonia)
- Toluene [air, urban air close to ground]: 8.4724e-8 kg; lognormal variance with pedigree 0.081565, pedigree (1,1,4,1,1)
  (same comment as for Carbon monoxide, non-fossil)
- Thallium [water, surface water]: 1.1277e-12 kg; lognormal variance with pedigree 0.72642, pedigree (1,1,4,1,1)
  (same comment as for Manganese)
- Phosphorus [air, urban air close to ground]: 5.7049e-6 kg; lognormal variance with pedigree 0.46773, pedigree (1,1,4,1,1)
  (same comment as for Carbon dioxide, non-fossil)
- Benzene, pentachloro- [air, urban air close to ground]: 2.2381e-10 kg; lognormal variance with pedigree 0.081565, pedigree (1,1,4,1,1)
  (same comment as for Carbon monoxide, non-fossil)
- Silicon [water, surface water]: 2.3931e-6 kg; lognormal variance with pedigree 0.54006, pedigree (1,1,4,1,1)
  (same comment as for Manganese)
- Arsenic [air, urban air close to ground]: 3.9943e-9 kg; lognormal variance with pedigree 1.6772, pedigree (1,1,4,1,1)
  (same comment as for Carbon dioxide, non-fossil)
- Benzene, hexachloro- [air, urban air close to ground]: 8.8577e-11 kg; lognormal variance with pedigree 0.081565, pedigree (1,1,4,1,1)
  (same comment as for Carbon monoxide, non-fossil)
- Iron, ion [water, surface water]: 6.656e-7 kg; lognormal variance with pedigree 0.81919, pedigree (1,1,4,1,1)
  (same comment as for Manganese)
- Cadmium [air, urban air close to ground]: 1.8471e-10 kg; lognormal variance with pedigree 1.7339, pedigree (1,1,4,1,1)
  (same comment as for Carbon dioxide, non-fossil)
- Phenol, pentachloro- [air, urban air close to ground]: 1.8448e-11 kg; lognormal variance with pedigree 0.081565, pedigree (1,1,4,1,1)
  (same comment as for Carbon monoxide, non-fossil)
- Calcium, ion [water, surface water]: 0.00023501 kg; lognormal variance with pedigree 0.15776, pedigree (1,1,4,1,1)
  (same comment as for Manganese)
- Cobalt [air, urban air close to ground]: 3.7993e-9 kg; lognormal variance with pedigree 1.4984, pedigree (1,1,4,1,1)
  (same comment as for Carbon dioxide, non-fossil)
- Benzo(a)pyrene [air, urban air close to ground]: 9.4269e-13 kg; lognormal variance with pedigree 0.38968, pedigree (1,1,4,1,1)
  (same comment as for Carbon monoxide, non-fossil)
- Aluminium [water, surface water]: 3.0648e-7 kg; lognormal variance with pedigree 0.83313, pedigree (1,1,4,1,1)
  (same comment as for Manganese)
- Chromium [air, urban air close to ground]: 1.3793e-8 kg; lognormal variance with pedigree 1.2369, pedigree (1,1,4,1,1)
  (same comment as for Carbon dioxide, non-fossil)
- Heat, waste [water, surface water]: 1.3058 MJ; lognormal variance with pedigree 0.106777, pedigree (1,1,4,1,1)
  Waste heat generated from heating value of this waste plus any electricity required to process it.
  Uncertainty: uncertainty is calculated from uncertainties in waste composition and uncertainties in energy efficiency and the uncertainty in internal energy demand
- Magnesium [water, surface water]: 1.1114e-5 kg; lognormal variance with pedigree 0.53455, pedigree (1,1,4,1,1)
  (same comment as for Manganese)
- Copper [air, urban air close to ground]: 6.6598e-9 kg; lognormal variance with pedigree 1.046, pedigree (1,1,4,1,1)
  (same comment as for Carbon dioxide, non-fossil)
- Chromium, ion [water, surface water]: 2.0507e-9 kg; lognormal variance with pedigree 0.80511, pedigree (1,1,4,1,1)
  (same comment as for Manganese)
- Mercury [air, urban air close to ground]: 1.0275e-8 kg; lognormal variance with pedigree 1.7127, pedigree (1,1,4,1,1)
  (same comment as for Carbon dioxide, non-fossil)
- Heat, waste [air, urban air close to ground]: 3.7445 MJ; lognormal variance with pedigree 0.106777, pedigree (1,1,4,1,1)
  (same comment as for Heat, waste)
- COD, Chemical Oxygen Demand [water, ground-, long-term]: 0.00082319 kg; lognormal variance with pedigree 0.098049, pedigree (1,1,4,1,1)
  (same comment as for Aluminium)
- Manganese [air, urban air close to ground]: 1.3071e-8 kg; lognormal variance with pedigree 1.0534, pedigree (1,1,4,1,1)
  (same comment as for Carbon dioxide, non-fossil)
- Water [water, surface water]: 0.000107002 m3; lognormal variance with pedigree 1.7871, pedigree (1,1,4,1,1)
  Process water released to surface water.
  Uncertainty: uncertainty calculated from uncertainty in process water input and the uncertainty of fraction to surface water.
- BOD5, Biological Oxygen Demand [water, ground-, long-term]: 0.00026926 kg; lognormal variance with pedigree 0.098049, pedigree (1,1,4,1,1)
  (same comment as for Aluminium)
- Molybdenum [air, urban air close to ground]: 1.6268e-9 kg; lognormal variance with pedigree 1.5703, pedigree (1,1,4,1,1)
  (same comment as for Carbon dioxide, non-fossil)
- Water [air, urban air close to ground]: 0.00104617 m3; lognormal variance with pedigree 1.2853, pedigree (1,1,4,1,1)
  Water vapour from waste humidity, hydrogen oxidation and part of the process water.
  Uncertainty: Uncertainty calculated from uncertainty in waste composition, process water input and the uncertainty of fraction to air.
- TOC, Total Organic Carbon [water, ground-, long-term]: 0.00032574 kg; lognormal variance with pedigree 0.098049, pedigree (1,1,4,1,1)
  (same comment as for Aluminium)
- Nickel [air, urban air close to ground]: 8.5425e-9 kg; lognormal variance with pedigree 1.3464, pedigree (1,1,4,1,1)
  (same comment as for Carbon dioxide, non-fossil)
- Sulfate [water, ground-, long-term]: 0.012413 kg; lognormal variance with pedigree 0.32237, pedigree (1,1,4,1,1)
  (same comment as for Aluminium)
- Lead [air, urban air close to ground]: 1.6596e-9 kg; lognormal variance with pedigree 1.2149, pedigree (1,1,4,1,1)
  (same comment as for Carbon dioxide, non-fossil)
- DOC, Dissolved Organic Carbon [water, ground-, long-term]: 0.00032574 kg; lognormal variance with pedigree 0.098049, pedigree (1,1,4,1,1)
  (same comment as for Aluminium)
- Tin [air, urban air close to ground]: 3.3873e-12 kg; lognormal variance with pedigree 1.4335, pedigree (1,1,4,1,1)
  (same comment as for Carbon dioxide, non-fossil)
- Nitrate [water, ground-, long-term]: 0.00042419 kg; lognormal variance with pedigree 0.36484, pedigree (1,1,4,1,1)
  (same comment as for Aluminium)
- Zinc [air, urban air close to ground]: 1.3278e-7 kg; lognormal variance with pedigree 0.89896, pedigree (1,1,4,1,1)
  (same comment as for Carbon dioxide, non-fossil)
- Phosphate [water, ground-, long-term]: 0.00050487 kg; lognormal variance with pedigree 4.8091, pedigree (1,1,4,1,1)
  (same comment as for Aluminium)
- Silicon [air, urban air close to ground]: 1.2002e-8 kg; lognormal variance with pedigree 0.47462, pedigree (1,1,4,1,1)
  (same comment as for Carbon dioxide, non-fossil)
- Arsenic, ion [water, ground-, long-term]: 3.1087e-7 kg; lognormal variance with pedigree 1.665, pedigree (1,1,4,1,1)
  (same comment as for Aluminium)
- Iron [air, urban air close to ground]: 6.236e-8 kg; lognormal variance with pedigree 0.29583, pedigree (1,1,4,1,1)
  (same comment as for Carbon dioxide, non-fossil)
- Cadmium, ion [water, ground-, long-term]: 5.8106e-8 kg; lognormal variance with pedigree 5.7113, pedigree (1,1,4,1,1)
  (same comment as for Aluminium)
- Calcium [air, urban air close to ground]: 0.0001029 kg; lognormal variance with pedigree 0.35349, pedigree (1,1,4,1,1)
  (same comment as for Carbon dioxide, non-fossil)
- Cobalt [water, ground-, long-term]: 1.8302e-6 kg; lognormal variance with pedigree 1.4354, pedigree (1,1,4,1,1)
  (same comment as for Aluminium)
- Aluminium [air, urban air close to ground]: 3.1493e-9 kg; lognormal variance with pedigree 0.56554, pedigree (1,1,4,1,1)
  (same comment as for Carbon dioxide, non-fossil)
- Chromium VI [water, ground-, long-term]: 8.4885e-7 kg; lognormal variance with pedigree 2.5938, pedigree (1,1,4,1,1)
  (same comment as for Aluminium)
- Magnesium [air, urban air close to ground]: 1.5484e-6 kg; lognormal variance with pedigree 0.63684, pedigree (1,1,4,1,1)
  (same comment as for Carbon dioxide, non-fossil)
- Copper, ion [water, ground-, long-term]: 6.8504e-5 kg; lognormal variance with pedigree 1.002, pedigree (1,1,4,1,1)
  (same comment as for Aluminium)
- COD, Chemical Oxygen Demand [water, surface water]: 8.445e-5 kg; lognormal variance with pedigree 0.101364, pedigree (1,1,4,1,1)
  (same comment as for Manganese)
- Mercury [water, ground-, long-term]: 7.6106e-8 kg; lognormal variance with pedigree 1.7251, pedigree (1,1,4,1,1)
  (same comment as for Aluminium)
- BOD5, Biological Oxygen Demand [water, surface water]: 8.2642e-5 kg; lognormal variance with pedigree 0.105464, pedigree (1,1,4,1,1)
  (same comment as for Manganese)
- Manganese [water, ground-, long-term]: 5.4266e-5 kg; lognormal variance with pedigree 1.3, pedigree (1,1,4,1,1)
  (same comment as for Aluminium)
- DOC, Dissolved Organic Carbon [water, surface water]: 3.6834e-5 kg; lognormal variance with pedigree 0.101868, pedigree (1,1,4,1,1)
  (same comment as for Manganese)
- Molybdenum [water, ground-, long-term]: 9.5325e-7 kg; lognormal variance with pedigree 1.5491, pedigree (1,1,4,1,1)
  (same comment as for Aluminium)
- TOC, Total Organic Carbon [water, surface water]: 3.6834e-5 kg; lognormal variance with pedigree 0.101868, pedigree (1,1,4,1,1)
  (same comment as for Manganese)
- Nickel, ion [water, ground-, long-term]: 6.6743e-6 kg; lognormal variance with pedigree 1.3039, pedigree (1,1,4,1,1)
  (same comment as for Aluminium)
- Sulfate [water, surface water]: 0.0021215 kg; lognormal variance with pedigree 0.22937, pedigree (1,1,4,1,1)
  (same comment as for Manganese)
- Lead [water, ground-, long-term]: 1.4184e-5 kg; lognormal variance with pedigree 2.7229, pedigree (1,1,4,1,1)
  (same comment as for Aluminium)
- Nitrate [water, surface water]: 0.00015195 kg; lognormal variance with pedigree 0.24155, pedigree (1,1,4,1,1)
  (same comment as for Manganese)
- Antimony [water, ground-, long-term]: 5.526e-10 kg; lognormal variance with pedigree 0.013413, pedigree (1,1,4,1,1)
  (same comment as for Aluminium)
- Phosphate [water, surface water]: 8.3586e-6 kg; lognormal variance with pedigree 0.21389, pedigree (1,1,4,1,1)
  (same comment as for Manganese)
- Tin, ion [water, ground-, long-term]: 3.4417e-6 kg; lognormal variance with pedigree 1.4592, pedigree (1,1,4,1,1)
  (same comment as for Aluminium)
- Arsenic, ion [water, surface water]: 2.2423e-7 kg; lognormal variance with pedigree 1.542, pedigree (1,1,4,1,1)
  (same comment as for Manganese)
- Vanadium, ion [water, ground-, long-term]: 1.7228e-7 kg; lognormal variance with pedigree 0.02524, pedigree (1,1,4,1,1)
  (same comment as for Aluminium)
- Cadmium, ion [water, surface water]: 6.442e-11 kg; lognormal variance with pedigree 1.6033, pedigree (1,1,4,1,1)
  (same comment as for Manganese)
- Zinc, ion [water, ground-, long-term]: 8.8953e-5 kg; lognormal variance with pedigree 1.6954, pedigree (1,1,4,1,1)
  (same comment as for Aluminium)
- Cobalt [water, surface water]: 3.4862e-10 kg; lognormal variance with pedigree 1.9727, pedigree (1,1,4,1,1)
  (same comment as for Manganese)
- Thallium [water, ground-, long-term]: 6.755e-10 kg; lognormal variance with pedigree 0.26601, pedigree (1,1,4,1,1)
  (same comment as for Aluminium)
- Chromium VI [water, surface water]: 2.447e-7 kg; lognormal variance with pedigree 1.287, pedigree (1,1,4,1,1)
  (same comment as for Manganese)
- Silicon [water, ground-, long-term]: 0.00082055 kg; lognormal variance with pedigree 5.0652, pedigree (1,1,4,1,1)
  (same comment as for Aluminium)
- Copper, ion [water, surface water]: 6.2929e-9 kg; lognormal variance with pedigree 1.1559, pedigree (1,1,4,1,1)
  (same comment as for Manganese)
- Iron, ion [water, ground-, long-term]: 0.017805 kg; lognormal variance with pedigree 0.36867, pedigree (1,1,4,1,1)
  (same comment as for Aluminium)
- Mercury [water, surface water]: 1.9283e-9 kg; lognormal variance with pedigree 1.8751, pedigree (1,1,4,1,1)
  (same comment as for Manganese)
- Calcium, ion [water, ground-, long-term]: 0.011099 kg; lognormal variance with pedigree 0.32223, pedigree (1,1,4,1,1)
  (same comment as for Aluminium)

## Extrapolations
This dataset has been extrapolated from year 2012 to the year of the calculation (2021). The uncertainty has been adjusted accordingly.
