# heat production, wood chips from industry, at furnace 5000kW, state-of-the-art 2014

Dataset: EcoSpold 2, unit process
Geography: CH
Time period: 2014-01-01 to 2021-12-31
Technology level: modern
Classification: EcoSpold01Categories: wood energy/heating systems
Classification: ISIC rev.4 ecoinvent: 3530:Steam and air conditioning supply
Synonyms: automatic wood heating system
Scenario: Business-as-Usual
System model: Allocation, cut-off by classification
Share of production covered: 100 %
Generated by: Christian Bauer
Database: ecoinvent
isCopyrightProtected: true
accessRestrictedTo: 1

## General comment
This activity represents the combustion of wood chips from industry in Switzerland in new (=installed in 2014) boilers. Equipped with an industrial electrostatic precipitator in order to comply with PM emission regulation as well as with an SNCR device for reduction of NOx emissions. Air emission factors as well as the boiler efficiency represent average annual operation including start and stop (warm-up and shut-down). Therefore, emission data will be higher and efficiency will be lower than rated values provided by manufacturers. The inventory shall be considered as being representative for boilers with nominal capacities above 2 MW.

## Included activities start
from delivery of wood chips

## Included activities end
This activity describes the combustion of wood chips from industry. Included are the infrastructure, the wood requirements (hardwood chips from forest), the emissions to air, the electricity needed for operation, and the disposal of the ashes.

## Geography
Represents average Swiss conditions and could be used for Europe as well.

## Technology
Modern boiler technology available on the Swiss market, installed in 2014.

## Time period
Key emission factors PM, CO, NMVOC, NOx, CH4 as well as the average annual efficiency have been updated using the latest available information. Other emission data are from the second half of the 1990´s.

## Parameters
- scaling factor: 1.25 dimensionless; name scaling_factor; = 1/0.8; lognormal variance with pedigree 0.0016, pedigree (2,1,1,1,1)
  The scaling factor corresponds to the inverse of the average annual efficiency of the heating system, including start/stop (warm up and cool down). Therefore, this efficiency will be lower than figures provided by manufacturers. The estimated value was provided by T.Nussbaumer, Verenum, and represents newly (=in 2014) installed boiler in this size category in Switzerland.

## Reference product
- heat, district or industrial, other than natural gas: 1 MJ; = 0.8 * scaling_factor; source Thomas Nussbaumer 2014; By-product classification allocatable product; CPC 17300: Steam and hot water
  EcoSpold01Location=CH
  The numbers used in the mathematical relation refer to the input of one MJ of fuel with the heat output depending on the efficiency of the furnace. Using the "scaling factor" (inverse of the efficiency) allows for scaling of the amount of the reference product to 1.
  production volume 1 MJ; name heat_apv
    Set to zero in order to obtain the correct share of heat from wood on the market for heat, district or industrial, other than natural gas in Switzerland.
    //Original Comment:
    Estimation: 50% of useful energy in Switzerland in 2012 in furnace category16a (other 50% in furnace 1000 kW); 40% of APV produced in "modern technology" boilers; 66% of wood chips used in 2012 are hardwood chips.
    1.86e9*0.4*0.66
  property price 0.0106 EUR2005
    Average European district heat price from Ecoheatcool and Euroheat 2005-2006, Ecoheat Work package 1: The European heat market. Final report. 10.6 EUR/GJ i s the price of district heat. http://www.solarthermalworld.org/files/Ecoheatcool%20WP1%20Web.pdf?download
  properties: heating value, net 1 MJ, Corresponding fuel use 1.18 MJ

## Inputs from technosphere
- NOx retained, by selective catalytic reduction: 0.000125 kg; = 1e-4* scaling_factor; lognormal variance with pedigree 0.4326, pedigree (2,1,3,1,1)
  difference between NOx emissions of current and modern 5000kW boiler; 5000 kW boiler is equipped with an SCR for NOx reduction.
  properties: wet mass 1 kg, dry mass 1 kg
- wood chips, dry, measured as dry mass: 0.0661376 kg; = 1/18.9 * scaling_factor; lognormal variance with pedigree 0.002, pedigree (1,1,3,1,1)
  uncertainty on energy and water content, and bulk density
  Amount was scaled to the amount of reference product.
  properties: carbon content, non-fossil 0.494, dry mass 1 kg, wet mass 1.4 kg, water content 0.4, heating value, net 9.99 MJ
  note on carbon content, non-fossil: C content of dry mass is 0.494 kgC/kg dry wood (ecoinvent v2.2 report 9).
- electricity, low voltage: 0.0052125 kWh; = 0.00417 * scaling_factor; source Bauer, C. 2007; lognormal variance with pedigree 0.4706, pedigree (2,1,5,1,1)
  literature. Original value [per MJ fuel input] was scaled to 1 MJ reference product output
  EcoSpold01Location=CH
- wood ash mixture, pure: -0.000625 kg; name wood_ash; = (0.0005 * scaling_factor)*-1; source Bauer, C. 2007; lognormal variance with pedigree 0.4706, pedigree (2,1,5,1,1)
  EcoSpold01Location=CH
  literature. Original value [per MJ fuel input] was scaled to 1 MJ reference product output
  production volume 0.000625 kg; = heat_apv*wood_ash
    Calculated from the production volume of wood chips, from forest, hardwood, burned in furnace 1000kW in proportion to the respective output amounts.
  property price 0 EUR2005; name wood_ash_price_EUR2005
  properties: wet mass 1 kg, carbon content, non-fossil 0.012, dry mass 1 kg
- furnace, wood chips, with silo, 5000kW: 1.38889e-9 unit; = 1/(5000*20*2000*3.6); lognormal variance with pedigree 0.4706, pedigree (2,1,5,1,1)
  estimation based on 20a lifetime, 2000h/a, 5000kW capacity
- dust collector, electrostatic precipitator, for industrial use: 1.38889e-9 unit; = 1/(5000*20*2000*3.6); lognormal variance with pedigree 0.4706, pedigree (2,1,5,1,1)
  estimation based on 20a lifetime, 2000h/a, 5000kW capacity

## Emissions to nature
- Acetaldehyde [air, urban air close to ground]: 7.625e-8 kg; = 6.1E-08 * scaling_factor; source Bauer, C. 2007; lognormal variance with pedigree 0.4706, pedigree (2,1,5,1,1)
  literature. Original value [per MJ fuel input] was scaled to 1 MJ reference product output
- Magnesium [air, urban air close to ground]: 4.5e-7 kg; = 3.6E-07 * scaling_factor; source Bauer, C. 2007; lognormal variance with pedigree 0.4706, pedigree (2,1,5,1,1)
  literature. Original value [per MJ fuel input] was scaled to 1 MJ reference product output
- Methane, non-fossil [air, urban air close to ground]: 1.5e-6 kg; = 1.2E-06 * scaling_factor; source Thomas Nussbaumer 2014; lognormal variance with pedigree 0.4326, pedigree (2,1,3,1,1)
  expert estimation (see source)
- Dinitrogen monoxide [air, urban air close to ground]: 2.875e-6 kg; = 2.3E-06 * scaling_factor; source Bauer, C. 2007; lognormal variance with pedigree 0.4706, pedigree (2,1,5,1,1)
  literature. Original value [per MJ fuel input] was scaled to 1 MJ reference product output
- Sulfur dioxide [air, urban air close to ground]: 3.125e-6 kg; = 2.5E-06 * scaling_factor; source Bauer, C. 2007; lognormal variance with pedigree 0.4706, pedigree (2,1,5,1,1)
  literature. Original value [per MJ fuel input] was scaled to 1 MJ reference product output
- Chromium [air, urban air close to ground]: 4.95e-9 kg; = 3.96E-09 * scaling_factor; source Bauer, C. 2007; lognormal variance with pedigree 0.4706, pedigree (2,1,5,1,1)
  literature. Original value [per MJ fuel input] was scaled to 1 MJ reference product output
- Bromine [air, urban air close to ground]: 7.5e-8 kg; = 6E-08 * scaling_factor; source Bauer, C. 2007; lognormal variance with pedigree 0.4706, pedigree (2,1,5,1,1)
  literature. Original value [per MJ fuel input] was scaled to 1 MJ reference product output
- Toluene [air, urban air close to ground]: 3.75e-7 kg; = 3E-07 * scaling_factor; source Bauer, C. 2007; lognormal variance with pedigree 0.4706, pedigree (2,1,5,1,1)
  literature. Original value [per MJ fuel input] was scaled to 1 MJ reference product output
- Calcium [air, urban air close to ground]: 7.3125e-6 kg; = 5.85E-06 * scaling_factor; source Bauer, C. 2007; lognormal variance with pedigree 0.4706, pedigree (2,1,5,1,1)
  literature. Original value [per MJ fuel input] was scaled to 1 MJ reference product output
- Water [air, urban air close to ground]: 6e-5 m3; lognormal variance with pedigree 0.0083, pedigree (2,2,3,1,2)
  introduced in order to guarantee a correct water balance; amount represents emissions during combustion as well as during natural wood drying in the storage silo
- Cadmium [air, urban air close to ground]: 8.75e-10 kg; = 7E-10 * scaling_factor; source Bauer, C. 2007; lognormal variance with pedigree 0.4706, pedigree (2,1,5,1,1)
  literature. Original value [per MJ fuel input] was scaled to 1 MJ reference product output
- Lead [air, urban air close to ground]: 3.125e-8 kg; = 2.5E-08 * scaling_factor; source Bauer, C. 2007; lognormal variance with pedigree 0.4706, pedigree (2,1,5,1,1)
  literature. Original value [per MJ fuel input] was scaled to 1 MJ reference product output
- Mercury [air, urban air close to ground]: 3.75e-10 kg; = 3E-10 * scaling_factor; source Bauer, C. 2007; lognormal variance with pedigree 0.4706, pedigree (2,1,5,1,1)
  literature. Original value [per MJ fuel input] was scaled to 1 MJ reference product output
- Benzene, hexachloro- [air, urban air close to ground]: 9e-15 kg; = 7.2E-15 * scaling_factor; source Bauer, C. 2007; lognormal variance with pedigree 0.4706, pedigree (2,1,5,1,1)
  literature. Original value [per MJ fuel input] was scaled to 1 MJ reference product output
- Nitrogen oxides [air, urban air close to ground]: 0.0001 kg; = 8e-5* scaling_factor; source Thomas Nussbaumer 2014; lognormal variance with pedigree 0.4326, pedigree (2,1,3,1,1)
  expert estimation (see source)
- Potassium [air, urban air close to ground]: 2.925e-5 kg; = 2.34E-05 * scaling_factor; source Bauer, C. 2007; lognormal variance with pedigree 0.4706, pedigree (2,1,5,1,1)
  literature. Original value [per MJ fuel input] was scaled to 1 MJ reference product output
- NMVOC, non-methane volatile organic compounds, unspecified origin [air, urban air close to ground]: 3.5e-6 kg; = 2.8E-06 * scaling_factor; source Thomas Nussbaumer 2014; lognormal variance with pedigree 0.4326, pedigree (2,1,3,1,1)
  expert estimation (see source)
- Fluorine [air, urban air close to ground]: 6.25e-8 kg; = 5E-08 * scaling_factor; source Bauer, C. 2007; lognormal variance with pedigree 0.4706, pedigree (2,1,5,1,1)
  literature. Original value [per MJ fuel input] was scaled to 1 MJ reference product output
- Sodium [air, urban air close to ground]: 1.625e-6 kg; = 1.3E-06 * scaling_factor; source Bauer, C. 2007; lognormal variance with pedigree 0.4706, pedigree (2,1,5,1,1)
  literature. Original value [per MJ fuel input] was scaled to 1 MJ reference product output
- Copper [air, urban air close to ground]: 2.75e-8 kg; = 2.2E-08 * scaling_factor; source Bauer, C. 2007; lognormal variance with pedigree 0.4706, pedigree (2,1,5,1,1)
  literature. Original value [per MJ fuel input] was scaled to 1 MJ reference product output
- Carbon dioxide, non-fossil [air, urban air close to ground]: 0.13375 kg; = 0.107 * scaling_factor; source Bauer, C. 2007; lognormal variance with pedigree 0.4706, pedigree (2,1,5,1,1)
  literature. Original value [per MJ fuel input] was scaled to 1 MJ reference product output
- Hydrocarbons, aliphatic, alkanes, unspecified [air, urban air close to ground]: 1.1375e-6 kg; = 9.1E-07 * scaling_factor; source Bauer, C. 2007; lognormal variance with pedigree 0.4706, pedigree (2,1,5,1,1)
  literature. Original value [per MJ fuel input] was scaled to 1 MJ reference product output
- Chlorine [air, urban air close to ground]: 2.25e-7 kg; = 1.8E-07 * scaling_factor; source Bauer, C. 2007; lognormal variance with pedigree 0.4706, pedigree (2,1,5,1,1)
  literature. Original value [per MJ fuel input] was scaled to 1 MJ reference product output
- m-Xylene [air, urban air close to ground]: 1.5e-7 kg; = 1.2E-07 * scaling_factor; source Bauer, C. 2007; lognormal variance with pedigree 0.4706, pedigree (2,1,5,1,1)
  literature. Original value [per MJ fuel input] was scaled to 1 MJ reference product output
- Benzene, ethyl- [air, urban air close to ground]: 3.75e-8 kg; = 3E-08 * scaling_factor; source Bauer, C. 2007; lognormal variance with pedigree 0.4706, pedigree (2,1,5,1,1)
  literature. Original value [per MJ fuel input] was scaled to 1 MJ reference product output
- Carbon monoxide, non-fossil [air, urban air close to ground]: 0.000125 kg; = 1E-04 * scaling_factor; source Thomas Nussbaumer 2014; lognormal variance with pedigree 0.4326, pedigree (2,1,3,1,1)
  expert estimation (see source)
- Chromium VI [air, urban air close to ground]: 5e-11 kg; = 4E-11 * scaling_factor; source Bauer, C. 2007; lognormal variance with pedigree 0.4706, pedigree (2,1,5,1,1)
  literature. Original value [per MJ fuel input] was scaled to 1 MJ reference product output
- Ammonia [air, urban air close to ground]: 2.1625e-6 kg; = 1.73E-06 * scaling_factor; source Bauer, C. 2007; lognormal variance with pedigree 0.4706, pedigree (2,1,5,1,1)
  literature. Original value [per MJ fuel input] was scaled to 1 MJ reference product output
- Benzene [air, urban air close to ground]: 1.1375e-6 kg; = 9.1E-07 * scaling_factor; source Bauer, C. 2007; lognormal variance with pedigree 0.4706, pedigree (2,1,5,1,1)
  literature. Original value [per MJ fuel input] was scaled to 1 MJ reference product output
- Benzo(a)pyrene [air, urban air close to ground]: 6.25e-10 kg; = 5E-10 * scaling_factor; source Bauer, C. 2007; lognormal variance with pedigree 0.4706, pedigree (2,1,5,1,1)
  literature. Original value [per MJ fuel input] was scaled to 1 MJ reference product output
- Dioxins, measured as 2,3,7,8-tetrachlorodibenzo-p-dioxin [air, urban air close to ground]: 3.875e-14 kg; = 3.1E-14 * scaling_factor; source Bauer, C. 2007; lognormal variance with pedigree 0.4706, pedigree (2,1,5,1,1)
  literature. Original value [per MJ fuel input] was scaled to 1 MJ reference product output
- Arsenic [air, urban air close to ground]: 1.25e-9 kg; = 1E-09 * scaling_factor; source Bauer, C. 2007; lognormal variance with pedigree 0.4706, pedigree (2,1,5,1,1)
  literature. Original value [per MJ fuel input] was scaled to 1 MJ reference product output
- PAH, polycyclic aromatic hydrocarbons [air, urban air close to ground]: 1.3875e-8 kg; = 1.11E-08 * scaling_factor; source Bauer, C. 2007; lognormal variance with pedigree 0.4706, pedigree (2,1,5,1,1)
  literature. Original value [per MJ fuel input] was scaled to 1 MJ reference product output
- Manganese [air, urban air close to ground]: 2.125e-7 kg; = 1.7E-07 * scaling_factor; source Bauer, C. 2007; lognormal variance with pedigree 0.4706, pedigree (2,1,5,1,1)
  literature. Original value [per MJ fuel input] was scaled to 1 MJ reference product output
- Zinc [air, urban air close to ground]: 3.75e-7 kg; = 3E-07 * scaling_factor; source Bauer, C. 2007; lognormal variance with pedigree 0.4706, pedigree (2,1,5,1,1)
  literature. Original value [per MJ fuel input] was scaled to 1 MJ reference product output
- Particulates, < 2.5 um [air, urban air close to ground]: 6.25e-6 kg; = 5E-06 * scaling_factor; source Thomas Nussbaumer 2014; lognormal variance with pedigree 0.4326, pedigree (2,1,3,1,1)
  expert estimation (see source)
- Phosphorus [air, urban air close to ground]: 3.75e-7 kg; = 3E-07 * scaling_factor; source Bauer, C. 2007; lognormal variance with pedigree 0.4706, pedigree (2,1,5,1,1)
  literature. Original value [per MJ fuel input] was scaled to 1 MJ reference product output
- Hydrocarbons, aliphatic, unsaturated [air, urban air close to ground]: 3.875e-6 kg; = 3.1E-06 * scaling_factor; source Bauer, C. 2007; lognormal variance with pedigree 0.4706, pedigree (2,1,5,1,1)
  literature. Original value [per MJ fuel input] was scaled to 1 MJ reference product output
- Formaldehyde [air, urban air close to ground]: 1.625e-7 kg; = 1.3E-07 * scaling_factor; source Bauer, C. 2007; lognormal variance with pedigree 0.4706, pedigree (2,1,5,1,1)
  literature. Original value [per MJ fuel input] was scaled to 1 MJ reference product output
- Phenol, pentachloro- [air, urban air close to ground]: 1.0125e-11 kg; = 8.1E-12 * scaling_factor; source Bauer, C. 2007; lognormal variance with pedigree 0.4706, pedigree (2,1,5,1,1)
  literature. Original value [per MJ fuel input] was scaled to 1 MJ reference product output
- Nickel [air, urban air close to ground]: 7.5e-9 kg; = 6E-09 * scaling_factor; source Bauer, C. 2007; lognormal variance with pedigree 0.4706, pedigree (2,1,5,1,1)
  literature. Original value [per MJ fuel input] was scaled to 1 MJ reference product output

## Sampling procedure
literature

## Extrapolations
This dataset has been extrapolated from year 2014 to the year of the calculation (2021). The uncertainty has been adjusted accordingly.
