# natural gas liquids fractionation

Dataset: EcoSpold 2, unit process
Geography: GLO
Time period: 2008-01-01 to 2021-12-31
Technology level: current
Classification: ISIC rev.4 ecoinvent: 2011:Manufacture of basic chemicals
Synonyms: NGL extraction; NGL fractionation
Tags: combined production
Scenario: Business-as-Usual
System model: Allocation, cut-off by classification
Generated by: Daria Dellenbach
Database: ecoinvent
isCopyrightProtected: true
accessRestrictedTo: 1

## General comment
This dataset represents the fractioning of natural gas liquids (NGL) to yield in ethane, propane, butane and pentane. NGL consists of 38% ethane, 33% propane, 18% butane and 11% pentane, the composition was approximated by using the yearly US field production (https://www.eia.gov/dnav/pet/pet_sum_snd_d_nus_mbbl_m_cur.htm).
[This dataset is meant to replace the following datasets:
- propane extraction, from liquefied petroleum gas, GLO, 2005 - 2005
- pentane extraction, from natural gas liquids, GLO, 2008 - 2008
- ethane extraction, from natural gas liquids, GLO, 2008 - 2008
- butane extraction, from natural gas liquids, GLO, 2008 - 2008]

## Included activities start
The activity starts with NGL entering the fractionator.

## Included activities end
The activity ends when separated hydrocarbons leave the fractionator. Energy use, cooling water and electricity are included. No emissions are included. Waste heat is considered to be recovered in a Waste heat recovery unit (WHRU).

## Geography
This dataset represents the average global fractioning.

## Technology
The recovered NGL stream is processed through a fractionation train consisting of up to five distillation towers in series: a demethanizer, a deethanizer, a depropanizer, a debutanizer and a butane splitter. The overhead product from the deethanizer is ethane and the bottom product is fed to the depropanizer. The overhead product from the depropanizer is propane and the bottom is fed to the debutanizer. The overhead product from the debutanizer is a mixture of normal and iso-butane, and the bottom is a C5+ gasoline mixture (pentane in this inventory). A slightly simplyfied fractioning process can be seen in the sketch below.
Source: Thompson S. M., Robertson G. (2011): Liquefied Petroleum Gas, in Ullmanns Encyclopedia of Industrial Chemistry, 7th Edition.

## Time period
Reference year of production volume

## Parameters
- technology efficiency: 1 dimensionless; name technology_efficiency
- lower heating value share, pentane: 0.125429 MJ/kg; name LHV_share_pentane; = pentane_lower_heating_value*0.13/ LHV_sum
  Share of LHV of the output. Amount of output: 0.13 kg.
- sum of lower heating values: 47.0275 MJ/kg; name LHV_sum; = ethane_lower_heating_value * 0.38 + butane_lower_heating_value*0.1 + propane_lower_heating_value *0.3 + pentane_lower_heating_value*0.13 + isobutane_lower_heating_value*0.09
  Total LHV of the reference products.
  ethane amount: 0.38 kg
  ethane LHV: 30.07 MJ/kg
  propane amount: 0.3 kg
  propane LHV: 44.097 MJ/kg
  butane amount: 0.1 kg
  butane LHV: 58.124 MJ/kg
  isobutane amount: 0.09 kg
  isobutane LHV: 45.893 MJ/kg
  pentane amount: 0.13kg
  pentane LHV: 72.151 MJ/kg
- lower heating value, propane: 46.743 MJ/kg; name propane_lower_heating_value
- lower heating value share, propane: 0.298185 MJ/kg; name LHV_share_propane; = propane_lower_heating_value*0.3/ LHV_sum
  Share of LHV of the output. Amount of output: 0.3 kg.
- lower heating value share: 0.0878288 MJ/kg; name LHV_share; = IF(ethane_amount; LHV_share_ethane)+IF(propane_amount; LHV_share_propane)+IF(butane_amount; LHV_share_butane)+IF(pentane_amount; LHV_share_pentane)+IF( isobutane_amount; LHV_share_isobutane)
  LHV share of the output.
- fraction of cooling water which evaporates to air, recirculating cooling system: 0.771 dimensionless; name fraction_CW_R_to_air; lognormal variance with pedigree 0.092025, pedigree (4,4,3,2,4)
  Calculated based on literature value (Scown, C.D., 2011, Water Footprint of U.S. Transportation Fuels and supplying information of the article) (Vionnet, S., Quantis Water Database - Technical Report, 2012).
- lower heating value share, isobutane: 0.0878288 MJ/kg; name LHV_share_isobutane; = isobutane_lower_heating_value*0.09/ LHV_sum
  Share of LHV of the output. Amount of output: 0.09 kg.
- lower heating value, isobutane: 45.893 MJ/kg; name isobutane_lower_heating_value
- lower heating value, pentane: 45.374 MJ/kg; name pentane_lower_heating_value
- lower heating value, ethane: 48.385 MJ/kg; name ethane_lower_heating_value
- lower heating value share, ethane: 0.390969 MJ/kg; name LHV_share_ethane; = ethane_lower_heating_value*0.38/ LHV_sum
  Share of LHV of the output. Amount of output: 0.38 kg.
- lower heating value share, butane: 0.0975876 MJ/kg; name LHV_share_butane; = butane_lower_heating_value*0.1/ LHV_sum
  Share of LHV of the output. Amount of output: 0.1 kg.
- lower heating value, butane: 45.893 MJ/kg; name butane_lower_heating_value
- fraction of cooling water which evaporates to air: 0.3875 dimensionless; name fraction_CW_to_air; = (0.5*fraction_CW_OT_to_air)+(0.5*fraction_CW_R_to_air); lognormal variance with pedigree 0.092025, pedigree (4,4,3,2,4)
  fraction of cooling water which evaporates to air, i.e. is consumed
- fraction of cooling water which evaporates to air, once-through cooling system: 0.004 dimensionless; name fraction_CW_OT_to_air; lognormal variance with pedigree 0.092025, pedigree (4,4,3,2,4)
  (same comment as for fraction of cooling water which evaporates to air, recirculating cooli)

## Reference product
All rows: By-product classification allocatable product
- isobutane: 1 kg; name isobutane_amount; CPC 33410: Propane and butanes, liquefied; CAS 75-28-5
  Composition of natural gas liquids derived from the EIA (https://www.eia.gov/dnav/pet/pet_sum_snd_d_nus_mbbl_m_cur.htm), reference year 2019.
  production volume 4.86884e10 kg
    Calculated value from global natural gas liquids production. Assumed that all NGL produced is fractioned into its components.
    The world supply of NGL in 2019 was 11'653 thousand barrels per day (source: EIA - US Energy Information Administration, available here: https://www.eia.gov/international/data/world/petroleum-and-other-liquids/more-petroleum-and-other-liquids-data?pd=5&p=000gfs0000000000000000000000000000vg&u=0&f=A&v=mapbubble&a=-&i=none&vo=value&t=C&g=00000000000000000000000000000000000000000000000001&l=249-ruvvvvvfvtvnvv1vrvvvvfvvvvvvfvvvou20evvvvvvvvvvnvvvs0008&s=94694400000&e=1609459200000&&ev=false).
    Gas condensates have a specific gravity of 0.8 kg/l or less.(Favennec, P.,Petroleum Refining: Refinery operation and management, Band 5, Technip Ed. 1998; pg 26)
    NGL contains 9% of isobutane.
  property price 0.45 EUR2005; name isobutane_amount_price_EUR2005
    According to freely accessible market study from ICIS (Independent Commodity Intelligence Services), accessible at https://www.icis.com/explore/resources/news/2011/11/08/9506547/isobutane-and-retail-gasoline-prices-jump-on-strong-alkylate/
  property heating value, net 45.89 MJ
    LHV is calculated based on the elemental composition of the substance. The chemical formula of the substance is found to be: C4H10, (PubChem 2020).
    Reference: Kim, S., Chen, J., Cheng, T., Gindulyte, A., He, J., He, S., Li, Q., Shoemaker, B. A., Thiessen, P. A., Yu, B., Zaslavsky, L., Zhang, J., & Bolton, E. E. (2019). PubChem 2019 update: improved access to chemical data. Nucleic acids research, 47(D1), D1102–D1109. https://doi.org/10.1093/nar/gky1033
  property carbon content 0.827586
    carbon content on a dry matter basis (reserved; not for manual entry)
  properties: carbon content, fossil 0.827586, carbon content, non-fossil 0, wet mass 1 kg, water in wet mass 0 kg, water content 0, dry mass 1 kg, carbon allocation 0.827586 kg
- propane: 0 kg; name propane_amount; CPC 33410: Propane and butanes, liquefied; CAS 74-98-6
  (same comment as for isobutane)
  production volume 0 kg
    Calculated value from global natural gas liquids production. Assumed that all NGL produced is fractioned into its components.
    The world supply of NGL in 2019 was 11'653 thousand barrels per day (source: EIA - US Energy Information Administration, available here: https://www.eia.gov/international/data/world/petroleum-and-other-liquids/more-petroleum-and-other-liquids-data?pd=5&p=000gfs0000000000000000000000000000vg&u=0&f=A&v=mapbubble&a=-&i=none&vo=value&t=C&g=00000000000000000000000000000000000000000000000001&l=249-ruvvvvvfvtvnvv1vrvvvvfvvvvvvfvvvou20evvvvvvvvvvnvvvs0008&s=94694400000&e=1609459200000&&ev=false).
    Gas condensates have a specific gravity of 0.8 kg/l or less.(Favennec, P.,Petroleum Refining: Refinery operation and management, Band 5, Technip Ed. 1998; pg 26)
    NGL contains 30% of propane.
  property heating value, net 46.4 MJ
    Indicative value. Reference: Fuels - Higher and Lower Calorific Values, available at: https://www.engineeringtoolbox.com/fuels-higher-calorific-values-d_169.html
  property price 0.267 EUR2005; name propane_amount_price_EUR2005
    Average import and export prices (total trades (USD) divided by total weight (kg) in EU27, USA, China, Japan and India) from UN data - Average of Propane and butane (http://data.un.org/Data.aspx?q=Butanes+&d=ComTrade&f=_l1Code%3a28%3bcmdCode%3a271113 and http://data.un.org/Data.aspx?q=propane&d=ComTrade&f=_l1Code%3a28%3bcmdCode%3a271112; accessed 1 June 10).
  property carbon content 0.818182
    carbon content on a dry matter basis (reserved; not for manual entry)
  properties: dry mass 1 kg, carbon content, fossil 0.818182, wet mass 1 kg, carbon content, non-fossil 0, water content 0, water in wet mass 0 kg, carbon allocation 0.818182 kg
- pentane: 0 kg; name pentane_amount; source Naini, Abbas 2000; CPC 333: Petroleum oils and oils obtained from bituminous materials, other than crude; preparations n.e.c. containing by […]; CAS 109-66-0
  (same comment as for isobutane)
  production volume 0 kg
    Calculated value from global natural gas liquids production. Assumed that all NGL produced is fractioned into its components.
    The world supply of NGL in 2019 was 11'653 thousand barrels per day (source: EIA - US Energy Information Administration, available here: https://www.eia.gov/international/data/world/petroleum-and-other-liquids/more-petroleum-and-other-liquids-data?pd=5&p=000gfs0000000000000000000000000000vg&u=0&f=A&v=mapbubble&a=-&i=none&vo=value&t=C&g=00000000000000000000000000000000000000000000000001&l=249-ruvvvvvfvtvnvv1vrvvvvfvvvvvvfvvvou20evvvvvvvvvvnvvvs0008&s=94694400000&e=1609459200000&&ev=false).
    Gas condensates have a specific gravity of 0.8 kg/l or less.(Favennec, P.,Petroleum Refining: Refinery operation and management, Band 5, Technip Ed. 1998; pg 26)
    NGL contains 13% of pentane.
  property price 1.1 EUR2005; name pentane_price_EUR2005
    Assumed equal to EU price.
  property heating value, net 45.37 MJ
    LHV is calculated based on the elemental composition of the substance. Based on the CAS number of the substance (000109-66-0), the chemical formula of the substance is found to be: C5H12, (PubChem 2020).
    Reference: Kim, S., Chen, J., Cheng, T., Gindulyte, A., He, J., He, S., Li, Q., Shoemaker, B. A., Thiessen, P. A., Yu, B., Zaslavsky, L., Zhang, J., & Bolton, E. E. (2019). PubChem 2019 update: improved access to chemical data. Nucleic acids research, 47(D1), D1102–D1109. https://doi.org/10.1093/nar/gky1033
  property carbon content 0.833333
    carbon content on a dry matter basis (reserved; not for manual entry)
  properties: wet mass 1 kg, carbon content, fossil 0.833333, dry mass 1 kg, water in wet mass 0 kg, carbon content, non-fossil 0, water content 0, carbon allocation 0.833333 kg
- butane: 0 kg; name butane_amount; CPC 341: Basic organic chemicals; CAS 106-97-8
  (same comment as for isobutane)
  production volume 0 kg
    Calculated value from global natural gas liquids production. Assumed that all NGL produced is fractioned into its components.
    The world supply of NGL in 2019 was 11'653 thousand barrels per day (source: EIA - US Energy Information Administration, available here: https://www.eia.gov/international/data/world/petroleum-and-other-liquids/more-petroleum-and-other-liquids-data?pd=5&p=000gfs0000000000000000000000000000vg&u=0&f=A&v=mapbubble&a=-&i=none&vo=value&t=C&g=00000000000000000000000000000000000000000000000001&l=249-ruvvvvvfvtvnvv1vrvvvvfvvvvvvfvvvou20evvvvvvvvvvnvvvs0008&s=94694400000&e=1609459200000&&ev=false).
    Gas condensates have a specific gravity of 0.8 kg/l or less.(Favennec, P.,Petroleum Refining: Refinery operation and management, Band 5, Technip Ed. 1998; pg 26)
    NGL contains 10% of butane.
  property price 0.26 EUR2005; name butane_amount_price_EUR2005
    Temporary price data. Calculated as 90% of purchasers price based on: 2004 import and export prices (total trades (USD) divided by total weight (kg) in EU27, USA, China, Japan and India) from UN Commodity Trade Statistics Database (http://data.un.org/Explorer.aspxDatabase [Accessed 2 July 2010]). Commodity: Butanes, liquefied
  property heating value, net 45.89 MJ
    LHV is calculated based on the elemental composition of the substance. Based on the CAS number of the substance (000106-97-8 ), which is found manually, the chemical formula of the substance is found to be: C4H10, (PubChem 2020).
    Reference: Kim, S., Chen, J., Cheng, T., Gindulyte, A., He, J., He, S., Li, Q., Shoemaker, B. A., Thiessen, P. A., Yu, B., Zaslavsky, L., Zhang, J., & Bolton, E. E. (2019). PubChem 2019 update: improved access to chemical data. Nucleic acids research, 47(D1), D1102–D1109. https://doi.org/10.1093/nar/gky1033
  property carbon content 0.827586
    carbon content on a dry matter basis (reserved; not for manual entry)
  properties: water content 0, carbon content, fossil 0.827586, dry mass 1 kg, water in wet mass 0 kg, wet mass 1 kg, carbon content, non-fossil 0, carbon allocation 0.827586 kg
- ethane: 0 kg; name ethane_amount; CPC 34: Basic chemicals; CAS 74-84-0
  (same comment as for isobutane)
  production volume 0 kg
    Calculated value from global natural gas liquids production. Assumed that all NGL produced is fractioned into its components.
    The world supply of NGL in 2019 was 11'653 thousand barrels per day (source: EIA - US Energy Information Administration, available here: https://www.eia.gov/international/data/world/petroleum-and-other-liquids/more-petroleum-and-other-liquids-data?pd=5&p=000gfs0000000000000000000000000000vg&u=0&f=A&v=mapbubble&a=-&i=none&vo=value&t=C&g=00000000000000000000000000000000000000000000000001&l=249-ruvvvvvfvtvnvv1vrvvvvfvvvvvvfvvvou20evvvvvvvvvvnvvvs0008&s=94694400000&e=1609459200000&&ev=false).
    Gas condensates have a specific gravity of 0.8 kg/l or less.(Favennec, P.,Petroleum Refining: Refinery operation and management, Band 5, Technip Ed. 1998; pg 26)
    NGL contains 38% of ethane.
  property price 0.3 EUR2005; name ethane_amount_price_EUR2005
    Estimated price based on freely available market reports (http://www.platts.com/news-feature/2013/petrochemicals/global-margins/ethane_rejection) (http://www.growthstockwire.com/3255/a-big-trend-change-is-coming-in-this-beaten-down-commodity) [Accessed 20140424].
  property heating value, net 48.38 MJ
    LHV is calculated based on the elemental composition of the substance. Based on the CAS number of the substance (000074-84-0), the chemical formula of the substance is found to be: C2H6, (PubChem 2020).
    Reference: Kim, S., Chen, J., Cheng, T., Gindulyte, A., He, J., He, S., Li, Q., Shoemaker, B. A., Thiessen, P. A., Yu, B., Zaslavsky, L., Zhang, J., & Bolton, E. E. (2019). PubChem 2019 update: improved access to chemical data. Nucleic acids research, 47(D1), D1102–D1109. https://doi.org/10.1093/nar/gky1033
  property carbon content 0.798875
    carbon content on a dry matter basis (reserved; not for manual entry)
  properties: dry mass 1 kg, carbon content, fossil 0.798875, water content 0, water in wet mass 0 kg, wet mass 1 kg, carbon content, non-fossil 0, carbon allocation 0.798875 kg

## Inputs from technosphere
- natural gas liquids: 0.975876 kg; name NGL; = 1* LHV_share; source Naini, Abbas 2000, p. 50; lognormal variance with pedigree 0.0108, pedigree (3,5,2,1,1)
  Composition of natural gas liquids derived from the EIA (https://www.eia.gov/dnav/pet/pet_sum_snd_d_nus_mbbl_m_cur.htm)
  property water content 0; name water_content
  property wet mass 1 kg; name WM
  property water in wet mass 0 kg; name WWM
  property carbon content, fossil 0.814602; name C_content_fossil
  property carbon content, non-fossil 0; name C_content_non_fossil
  property dry mass 1 kg; name DM
  properties: heating value, net 24.62 MJ
- electricity, medium voltage: 0.193399 kWh; = 0.19818* LHV_share; source Safruddin, Rahmat 2006; lognormal variance with pedigree 0.0094, pedigree (2,5,2,1,1)
  Industrial value. Reported electricity required by a NGL fractionation plant in Indonesia. The electric power required for the whole plant is 18 MW.
- heat, district or industrial, other than natural gas: 1.16038 MJ; = 1.18906* LHV_share; source Safruddin, Rahmat 2006; lognormal variance with pedigree 0.0094, pedigree (2,5,2,1,1)
  Industrial value. Total energy consumption for heat from hot oil in an NGL processing plant in Indonesia. Hot oil is used as a heating medium for the reboilers, distillation columns of fractionation and defrost heater. The energy consumption for the hot oil is 30 MW. It is assumed a constant energy use in time.
  properties: heating value, net 1 MJ
- chemical factory, organics: 3.9035e-10 unit; = 4E-10* LHV_share; lognormal variance with pedigree 0.51, pedigree (5,5,5,5,5)
  Estimation.

## Inputs from nature
- Water, cooling, unspecified natural origin [natural resource, in water]: 4.39144e-5 m3; name water_cooling_UNO_input; = 4.5E-05* LHV_share; source Hydrocarbon Processing 2008; lognormal variance with pedigree 0.0094, pedigree (4,3,2,1,1)
  Estimation. Due to lack of process specific data, the amount of cooling water of 4.5+E-5 m3/kg is estimated based on literature value for liquid petroleum gas extraction processes (Refining Processes Handbook 2008, www.hydrocarbonprocessing.com).

## Emissions to nature
- Water [water, unspecified]: 2.63487e-5 m3; name water_to_water_unspecified; = 2.7E-05* LHV_share; lognormal variance with pedigree 0.0409, pedigree (2,2,2,1,1)
  Assumption, 40% evaporated to air.
- Water [air, unspecified]: 1.75658e-5 m3; name water_to_air_unspecified; = 1.8E-05* LHV_share; lognormal variance with pedigree 0.0409, pedigree (2,2,2,1,1)
  Assumption, 40% evaporated to air.
