# petroleum and gas production, on-shore

Dataset: EcoSpold 2, unit process
Geography: BO
Time period: 2018-01-01 to 2021-12-31
Technology level: current
Classification: EcoSpold01Categories: oil/production
Classification: ISIC rev.4 ecoinvent: 0610:Extraction of crude petroleum
Tags: Combined Production; combined production
Scenario: Business-as-Usual
System model: Allocation, cut-off by classification
Share of production covered: 100 %
Generated by: F. Valebona; T. B. Rocha; F. L. Motta
Published in: Valebona, F. 2021
Database: ecoinvent
isCopyrightProtected: true
accessRestrictedTo: 1

## General comment
This dataset represents the Bolivian onshore production of petroleum and natural gas. After the exploration phase and drilling, oil and gas are moved to the surface through the wellbore by means of a pump. In Brazil, 31% of dry natural gas sales to the final consumer are imported from Bolivia via pipeline (ANP, 2019).
The data are valid for the Bolivian onshore production. Bolivian national statistics compiled by the Brazilian Ministry of Mines and Energy was used to re-contextualize the ‘petroleum and gas production, on-shore’ dataset for the Global region, valid for the 2000-2012 period, available in database version 3.6. The adapted parameters were the petroleum and natural gas production yields, as well as the amount of flaring, venting and natural gas consumed in turbines.
This dataset was developed under the Cornerstone project, an initiative from the Brazilian Business Network on Life cycle Assessment (Rede ACV) in collaboration with ecoinvent to increase the quantity and quality of inventories that represent Brazil, through a thorough adaptation of the datasets. More information about this project is available in redeacv.org.br/en/wg-database. Technical background is provided in Valebona F.; Rocha T.B.; Motta F. L. Cornerstone Project. Recontextualization of Datasets: Methodology. ACV Brasil, Brazil.
References:
Agência Nacional do Petróleo, Gás Natural e Biocombustíveis (2019). Anuário Estatístico 2019. Available at: www.anp.gov.br/publicacoes/anuario-estatistico/5237-anuario-estatistico-2019. Accessed in: 04/06/2020.
Ministry of Mines and Energy (2019). Monthly Bulletin of the Natural Gas Industry. December 2018. Edition number 142. Available at: http://www.mme.gov.br/web/guest/secretarias/petroleo-gas-natural-e-biocombustiveis/publicacoes/boletim-mensal-de-acompanhamento-da-industria-de-gas-natural. Accessed in: 10/06/2020.

## Included activities start
From exploration activities (i.e. fuel requirements and emissions from well testing). The production phase of petroleum and natural gas takes into account platform infrastructure, fuel and auxiliary chemicals consumption.

## Included activities end
The activity ends with the dried natural gas and the produced crude petroleum.

## Geography
Bolivia.

## Technology
All Bolivian production and exploration onshore fields have been included. Data refers to the national average.

## Time period
Data representing the Bolivian situation in 2018 were collected for the petroleum and natural gas production yields, the amount of flaring, venting, natural gas composition and natural gas consumed in turbines. Although scaled according to the amount of produced energy, the remaining parameters refer to the 2000-2012 period, as for the Global region. Data is assumed to be valid from 2018 to 2021.

## Reference product
- petroleum: 1 kg; source ANP 2019; CPC 12010: Petroleum oils and oils obtained from bituminous minerals, crude; By-product classification allocatable product; CAS 8002-05-9
  Amount of produced crude petroleum.
  EcoSpold01Location=NG
  production volume 2.08392e9 kg; name petroleum_PV
    kg of onshore petroleum produced in BO in 2018. Refrence(s): Instituto Nacional de Estadística - Bolivia - Produccion de Petroleo y Gas Natural segun Año y Mes, 1990 - 2020
  property amount in multioutput activity_kg 5.77928e9 kg; name petroleum_amount_MO_kg
  property price 0.192 EUR2005
    Temporary price data. Calculated as 90% of purchasers price based on: Crude oil prices from U.S. energy information administration_Independent statistics and analysis: Weekly All Countries Spot Price FOB Weighted by Estimated Export Volume (Dollars per Barrel) (http://tonto.eia.doe.gov/dnav/pet/pet_pri_wco_k_w.htm; accessed 06072010). Conversion factors - 0.159 m3/barrel with crude oil density of 853 kg/m3
  property carbon content, fossil 0.85
    C-content of crude oil is 83-87% (ecoinven report 6_IV, Tab 3.2). An average C-content of 0.85 kg C/kg crude oil was considered
  property carbon content 0.85
    carbon content on a dry matter basis (reserved; not for manual entry)
  properties: carbon content, non-fossil 0, water in wet mass 0 kg, wet mass 1 kg, water content 0, dry mass 1 kg, heating value, net 43.2 MJ, carbon allocation 0.85 kg
- natural gas, high pressure: 0 m3; name natural_gas; source ANP 2019; CPC 12020: Natural gas, liquefied or in the gaseous state; By-product classification allocatable product; CAS 14493-06-2
  Amount of produced natural gas. Without reinjected, flared and consumed natural gas.
  production volume 0 m3; name natural_gas_PV
    m3 of onshore natural gas produced in BR in 2018 (ANP, 2019). Refrence(s): Agência Nacional do Petróleo, Gás Natural e Biocombustíveis (2019). Anuário Estatístico 2019. Available at: www.anp.gov.br/publicacoes/anuario-estatistico/5237-anuario-estatistico-2019. Accessed in 04/06/2020
  property heating value, net 39 MJ
    Literature value, Source: United Nations Statistics Division (2018) International Recommendations for Energy Statistics (IRES). Available at: http://unstats.un.org/unsd/statcom/doc11/BG-IRES.pdf.
  property carbon content, fossil 0.602381
    An average C content of 0.506 kg C/ m3 has been assumed (this average has been calculated using data in Tab 3.5, ecoinvent v2.2 report 6_V
  property price 0.166 EUR2005; name natural_gas_price_EUR2005
    Temporary price data. Calculated as 90% of purchasers price based on: 2005 price for Europe-27 Import (US$ and kg) in UN Commodity Trade Statistics Database - Natural gas in gaseous state (http://data.un.org/Data.aspx?q=natural+gas&d=ComTrade&f=_l1Code%3a28%3bcmdCode%3a271121; accessed 4 January 2011), using density of natural gas of 0.8 kg/m3 for unit conversion.
  property amount in multioutput activity_m3 1.8781e10 m3; name natural_gas_amount_MO_m3
  property carbon content 0.602381
    carbon content on a dry matter basis (reserved; not for manual entry)
  properties: heating value, gross 0 MJ, dry mass 0.84 kg, water in wet mass 0 kg, water content 0, carbon content, non-fossil 0, wet mass 0.84 kg, carbon allocation 0.506 kg

## Inputs from technosphere
- onshore well, oil/gas: 4.40783e-6 m; name onshore_well; = onshore_well_amount_MO_m*(18780980000*39+2083924049,8*42)/(1,35E10*39+1,07E11*42)*(0.5* petroleum +0.5*natural_gas *0.84)/(0.5* 2083924049,8 +0.5*18780980000 *0.84); lognormal variance with pedigree 0.4252, pedigree (2,3,3,5,5)
  EcoSpold01Location=GLO
  Environmental report. Scaled from the GLO dataset according to energy content of reference products.
  Uncertainty: Environmental report. Uncertainty has been increased to reflect the extrapolation from a different region and time period.
  property amount in multioutput activity_m 482000 m; name onshore_well_amount_MO_m
- onshore petroleum field infrastructure: 1.3443e-10 unit; name onshore_petr_field; = onshore_petr_field_amount_MO_unit*(18780980000*39+2083924049,8*42)/(1,35E10*39+1,07E11*42)*(0.5* petroleum +0.5*natural_gas *0.84)/(0.5* 2083924049,8 +0.5*18780980000 *0.84); lognormal variance with pedigree 0.4252, pedigree (2,3,3,5,5)
  Questionnaire. Scaled from the GLO dataset according to energy content of reference products.
  EcoSpold01Location=GLO
  Uncertainty: Questionnaire. Uncertainty has been increased to reflect the extrapolation from a different region and time period.
  property amount in multioutput activity_unit 14.7 unit; name onshore_petr_field_amount_MO_unit
- spent antifreezer liquid: -9.37407e-10 kg; = (spent_antifreezer_amount_MO_kg*(18780980000*39+2083924049,8*42)/(1,35E10*39+1,07E11*42)*(0.50* petroleum+0.50* natural_gas *0.84)/(0.50* 2083924049,8 +0.50*18780980000 *0.84))*-1; lognormal variance with pedigree 0.06, pedigree (1,1,5,5,3)
  From an Norwegian environmental report (OLF 2000; 2001), as assumed for NL onshore production in Fast et al. (2007). Scaled from the GLO dataset according to energy content of reference products.
  Reference:
  Faist Emmenegger M., Heck T., Jungbluth N., Tuchschmid M. (2007) Erdgas. In: Dones, R. (Ed.) et al., Sachbilanzen von Energiesystemen: Grundlagen für den ökologischen Vergleich von Energiesystemen und den Einbezug von Energiesystemen in Ökobilanzen für die Schweiz. Final report ecoinvent No. 6-V, Paul Scherrer Institut, Villigen, Swiss Centre for Life Cycle Inventories, Dübendorf, Switzerland.
  production volume 16.742 kg; = spent_antifreezer_amount_MO_kg*(18780980000*39+2083924049,8*42)/(1,35E10*39+1,07E11*42)*(0.50* petroleum_PV +0.50* natural_gas_PV *0.84)/(0.50* 2083924049,8 +0.50*18780980000 *0.84)
    Calculated from the production volume of reference products
  property amount in multioutput activity_kg 102.506 kg; name spent_antifreezer_amount_MO_kg; = 3048,8*(0.50* 107000000000*4.9E8/1.31E12 +0.50* 13500000000 *0.84*5.45e10/6.37e11)/(0.50* 647220000 +0.50*35000000000 *0.84)
  properties: dry mass 0.482 kg, heating value, net 0.56 MJ, carbon content, fossil 0.431328, wet mass 1 kg, water content 1.07469
  note on heating value, net: Value taken from the general comment of the treatment dataset.
  note on amount in multioutput activity_kg: Mathematical relation with original values from the GLO dataset.
- offshore platform, petroleum: 4.49013e-11 unit; name offshore_plattform; = offshore_plattform_amount_MO_unit*(18780980000*39+2083924049,8*42)/(1,35E10*39+1,07E11*42)*(0.5* petroleum +0.5*natural_gas *0.84)/(0.5* 2083924049,8 +0.5*18780980000 *0.84); lognormal variance with pedigree 0.4252, pedigree (2,3,3,5,5)
  EcoSpold01Location=OCE
  Questionnaire. Scaled from the GLO dataset according to energy content of reference products.
  Uncertainty: Questionnaire. Uncertainty has been increased to reflect the extrapolation from a different region and time period.
  property amount in multioutput activity_unit 4.91 unit; name offshore_plattform_amount_MO_unit
- natural gas, vented: 0.000607381 m3; name nat_gas_vented; = nat_gas_vented_amount_MO_m3*(0.5* petroleum +0.5*natural_gas *0.84)/(0.5* 2083924049,8 +0.5*18780980000 *0.84); lognormal variance with pedigree 0.3306, pedigree (2,1,1,1,1)
  EcoSpold01Location=GLO
  Bolivian Flaring and Losses amount (7.30E+07 m³) for the year of 2018 is reported in the Monthly Bulletin of the Natural Gas Industry (MME, 2018). Brazilian data is used to calculate the share between flaring and venting.
  For Brazil, the share of vented natural gas is estimated using the amount of fugitive methane emitted during exploration and production activities in 2012 (112,261,860 kg - MCTI, 2015). Considering that all methane fugitive emissions are due to venting, the final amount of vented natural gas in 2012 is calculated with the natural gas composition (0.73%vol of methane; 0.71 kg methane/m³; compiled from anp.gov.br/dados-estatisticos). Thereby, the calculated amount of vented natural gas in 2012 is 2.15E+8 m³, which corresponds to 15% of the combined Flaring and Losses statistics for 2012. This calculated share was used to split the amount flared and vented natural gas in Bolivian onshore production for 2018, respectively 6.21E+7 m³ and 1.09E+7 m³.
  References:
  [ANP 2019] Agência Nacional do Petróleo, Gás Natural e Biocombustíveis (2019). Anuário Estatístico 2019. Available at: www.anp.gov.br/publicacoes/anuario-estatistico/5237-anuario-estatistico-2019. Accessed in 04/06/2020.
  [MCTI 2015]
  Ministry of Science, Technology and Innovation (2015). Third Brazilian Inventory of Anthropic Emissions and Removals of Greenhouse Gases. Reference Reports. Energy Sector. Fugitive Emissions of Green House Gases in the Oil and Gas Industry. Petrobras e Centro de Estudos Integrados sobre Meio Ambiente e Mudanças Climáticas - Centro Clima/COPPE/UFRJ. Available at: https://sirene.mctic.gov.br/portal/opencms/textoGeral/2018/10/11/Relatorios_de_Referencia_do_II_Inventario_Brasileiro_de_Emissoes_e_Remocoes_Antropicas_de_Gases_de_Efeito_Estufa.html. Accessed in: 12/06/2020.
  [MME 2018]
  Ministry of Mines and Energy (2018). Monthly Bulletin of the Natural Gas Industry. December
  2018. Edition number 142. Available at:
  http://www.mme.gov.br/web/guest/secretarias/petroleo-gas-natural-ebiocombustiveis/publicacoes/boletim-mensal-de-acompanhamento-da-industria-de-gas-natural.
  Accessed in: 10/06/2020.
  property amount in multioutput activity_m3 1.08478e7 m3; name nat_gas_vented_amount_MO_m3; = 73000000*0,1486
  properties: dry mass 0.84 kg, carbon content, fossil 0.602381, heating value, net 39 MJ, wet mass 0.84 kg
  note on carbon content, fossil: An average C content of 0.506 kg C/ m3 has been assumed (this average has been calculated using data in Tab 3.5, ecoinvent v2.2 report 6_V
  note on amount in multioutput activity_m3: Bolivian Flaring and Losses amount (7.30E+07 m³) for the year of 2018 is reported in the Monthly Bulletin of the Natural Gas Industry (MME, 2018). Brazilian data is used to calculate the share between flaring and losses. For Brazil, this share is calculated based on natural gas composition (compiled from anp.gov.br/dados-estatisticos) and amount of fugitive emissions. The amount of Flaring and Losses informed by ANP (2019) is used to estimate the amount of flared and vented natural gas. The share of vented natural gas is estimated using the amount of fugitive methane emitted during exploration and production activities in 2012 (MCTI, 2015). Considering that all methane fugitive emissions are due to venting, the final amount of vented natural gas is calculated with the natural gas composition. Thereby, the calculated amount of vented natural gas is 2.15E+8 m³, which corresponds to 15% of Flaring and Losses statistics for 2012. This calculated share was used to estimate the amount of flared and vented natural gas in onshore production. References: [ANP 2019] Agência Nacional do Petróleo, Gás Natural e Biocombustíveis (2019). Anuário Estatístico 2019. Available at: www.anp.gov.br/publicacoes/anuario-estatistico/5237-anuario-estatistico-2019. Accessed in 04/06/2020. [MCTI 2015] Ministry of Science, Technology and Innovation (2015). Third Brazilian Inventory of Anthropic Emissions and Removals of Greenhouse Gases. Reference Reports. Energy Sector. Fugitive Emissions of Green House Gases in the Oil and Gas Industry. Petrobras e Centro de Estudos Integrados sobre Meio Ambiente e Mudanças Climáticas - Centro Clima/COPPE/UFRJ. Available at: https://sirene.mctic.gov.br/portal/opencms/textoGeral/2018/10/11/Relatorios_de_Referencia_do_II_Inventario_Brasileiro_de_Emissoes_e_Remocoes_Antropicas_de_Gases_de_Efeito_Estufa.html. Accessed in: 12/06/2020. [MME 2018] Ministry of Mines and Energy (2018). Monthly Bulletin of the Natural Gas Industry. December 2018. Edition number 142. Available at: http://www.mme.gov.br/web/guest/secretarias/petroleo-gas-natural-ebiocombustiveis/publicacoes/boletim-mensal-de-acompanhamento-da-industria-de-gas-natural. Accessed in: 10/06/2020.
  note on heating value, net: Literature value, Source: United Nations Statistics Division (2018) International Recommendations for Energy Statistics (IRES). Available at: http://unstats.un.org/unsd/statcom/doc11/BG-IRES.pdf.
- pipeline, petroleum: 7.51709e-9 km; name pipeline; = pipeline_amount_MO_km*(18780980000*39+2083924049,8*42)/(1,35E10*39+1,07E11*42)*(0.5* petroleum +0.5*natural_gas *0.84)/(0.5* 2083924049,8 +0.5*18780980000 *0.84); lognormal variance with pedigree 0.4232, pedigree (2,3,1,5,5)
  EcoSpold01Location=RER
  Environmental report. Scaled from the GLO dataset according to energy content of reference products.
  Uncertainty: Environmental report. Uncertainty has been increased to reflect the extrapolation from a different region and time period.
  property amount in multioutput activity_km 822 km; name pipeline_amount_MO_km
- chemical, organic: 9.69357e-7 kg; name chem_org; = chem_org_amount_MO_kg*(18780980000*39+2083924049,8*42)/(1,35E10*39+1,07E11*42)*(0.5* petroleum +0.5*natural_gas *0.84)/(0.5* 2083924049,8 +0.5*18780980000 *0.84); lognormal variance with pedigree 0.4252, pedigree (2,3,3,5,5)
  EcoSpold01Location=GLO
  Generic value. Scaled from the GLO dataset according to energy content of reference products.
  Uncertainty: . Uncertainty has been increased to reflect the extrapolation from a different region and time period.
  property amount in multioutput activity_kg 106000 kg; name chem_org_amount_MO_kg
  properties: heating value, net 19.03 MJ, wet mass 1 kg, carbon content, fossil 0.628, dry mass 1 kg
  note on carbon content, fossil: This dataset is an unweighted average of 20 organic substances (listed in Tab 88.1, ecoinvent v2.2 report 8, part II), being part of the top100 chemicals included in this database. The C-content has also been calculated as an unweighted average of the C content of the substances composing this dataset.
- waste emulsion paint: -4.13482e-9 kg; = (waste_em_paint_amount_MO_kg*(18780980000*39+2083924049,8*42)/(1,35E10*39+1,07E11*42)*(0.50* petroleum+0.50* natural_gas *0.84)/(0.50* 2083924049,8 +0.50*18780980000 *0.84))*-1; lognormal variance with pedigree 0.06, pedigree (1,1,5,5,3)
  (same comment as for spent antifreezer liquid)
  production volume 73.8477 kg; = waste_em_paint_amount_MO_kg*(18780980000*39+2083924049,8*42)/(1,35E10*39+1,07E11*42)*(0.50* petroleum_PV+0.50* natural_gas_PV *0.84)/(0.50* 2083924049,8 +0.50*18780980000 *0.84)
    Calculated from the production volume of reference products
  property amount in multioutput activity_kg 452.146 kg; name waste_em_paint_amount_MO_kg; = 13448*(0.50* 107000000000*4.9E8/1.31E12 +0.50* 13500000000 *0.84*5.45e10/6.37e11)/(0.50* 647220000 +0.50*35000000000 *0.84)
  properties: wet mass 1 kg, carbon content, fossil 0.27, heating value, net 8.18 MJ, dry mass 1 kg
  note on carbon content, fossil: Tab A.4, ecoinvent v2.2 report 13_I. C content has been calculated after data in the tables, and then referred to 1 kg DM
- waste wood, untreated: -6.66989e-8 kg; = (waste_wood_amount_MO_kg*(18780980000*39+2083924049,8*42)/(1,35E10*39+1,07E11*42)*(0.50* petroleum+0.50* natural_gas *0.84)/(0.50* 2083924049,8 +0.50*18780980000 *0.84))*-1; lognormal variance with pedigree 0.06, pedigree (1,1,5,5,3)
  (same comment as for spent antifreezer liquid)
  production volume 1191.24 kg; = waste_wood_amount_MO_kg*(18780980000*39+2083924049,8*42)/(1,35E10*39+1,07E11*42)*(0.50* petroleum_PV +0.50* natural_gas_PV *0.84)/(0.50* 2083924049,8 +0.50*18780980000 *0.84)
    Calculated from the production volume of reference products
  property amount in multioutput activity_kg 7293.58 kg; name waste_wood_amount_MO_kg; = 216930*(0.50* 107000000000*4.9E8/1.31E12 +0.50* 13500000000 *0.84*5.45e10/6.37e11)/(0.50* 647220000 +0.50*35000000000 *0.84)
  properties: carbon content, non-fossil 0.48632, water content 0.25, wet mass 1 kg, dry mass 0.8 kg, heating value, net 13.99 MJ
- hazardous waste, for underground deposit: -4.14189e-7 kg; = (hazwaste_amount_MO_kg*(18780980000*39+2083924049,8*42)/(1,35E10*39+1,07E11*42)*(0.50* petroleum +0.50* natural_gas *0.84)/(0.50* 2083924049,8 +0.50*18780980000 *0.84))*-1; lognormal variance with pedigree 0.06, pedigree (1,1,5,5,3)
  From an Norwegian environmental report (OLF 2000; 2001), as assumed for NL onshore production in Fast et al. (2007). Scaled from the GLO dataset according to energy content of reference products.
  Reference:
  Faist Emmenegger M., Heck T., Jungbluth N., Tuchschmid M. (2007) Erdgas. In: Dones, R. (Ed.) et al., Sachbilanzen von Energiesystemen: Grundlagen für den ökologischen Vergleich von Energiesystemen und den Einbezug von Energiesystemen in Ökobilanzen für die Schweiz. Final report ecoinvent No. 6-V, Paul Scherrer Institut, Villigen, Swiss Centre for Life Cycle Inventories, Dübendorf, Switzerland.
  Uncertainty: Scaled from the GLO dataset according to energy content of reference products.
  production volume 7397.4 kg; = hazwaste_amount_MO_kg*(18780980000*39+2083924049,8*42)/(1,35E10*39+1,07E11*42)*(0.50* petroleum_PV +0.50* natural_gas_PV *0.84)/(0.50* 2083924049,8 +0.50*18780980000 *0.84)
    Calculated from the production volume of reference products
  property amount in multioutput activity_kg 45292 kg; name hazwaste_amount_MO_kg; = 1347100*(0.50*107000000000*4.9E8/1.31E12 +0.50*13500000000 *0.84*5.45e10/6.37e11)/(0.50* 647220000 +0.50*35000000000 *0.84)
  properties: dry mass 1 kg, wet mass 1 kg, carbon content, fossil 0.554667
  note on carbon content, fossil: Tab A.6, ecoinvent v2.2 report 13_I, average hazardous waste composition was used, and referred to 0% water mass. No waste-specific emission are currently inventoried for underground deposits. Accordingly, no waste composition must be specified. For generic, average waste to underground deposit deposition in a 200 liter steel drum without cement solidification is assumed (ecoinvent v2.2 report 13_I).
- waste mineral oil: -3.43902e-7 kg; = (waste_min_oil_amount_MO_kg*(18780980000*39+2083924049,8*42)/(1,35E10*39+1,07E11*42)*(0.50* petroleum+0.50* natural_gas *0.84)/(0.50* 2083924049,8 +0.50*18780980000 *0.84))*-1; lognormal variance with pedigree 0.06, pedigree (1,1,5,5,3)
  (same comment as for spent antifreezer liquid)
  production volume 6142.08 kg; = waste_min_oil_amount_MO_kg*(18780980000*39+2083924049,8*42)/(1,35E10*39+1,07E11*42)*(0.50* petroleum_PV +0.50* natural_gas_PV *0.84)/(0.50* 2083924049,8 +0.50*18780980000 *0.84)
    Calculated from the production volume of reference products
  property amount in multioutput activity_kg 37606 kg; name waste_min_oil_amount_MO_kg; = 1118500*(0.50* 107000000000*4.9E8/1.31E12 +0.50* 13500000000 *0.84*5.45e10/6.37e11)/(0.50* 647220000 +0.50*35000000000 *0.84)
  properties: heating value, net 34.7 MJ, carbon content, fossil 0.864444, dry mass 0.9 kg, wet mass 1 kg, water content 0.111111
  note on carbon content, fossil: Tab A.6, ecoinvent v2.2 report 13_I. C content has been calculated after data in the tables, and then referred to 1 kg DM
- waste natural gas, sweet: -0.135719 MJ; name waste_NG_sweet; = (waste_NG_sweet_amount_MO_MJ*(0.5* petroleum +0.5*natural_gas *0.84)/(0.5* 2083924049,8 +0.5*18780980000 *0.84))*-1; source ANP 2019; lognormal variance with pedigree 0.0306, pedigree (2,1,1,1,1)
  EcoSpold01Location=GLO
  Amount of flared gas calculated according to national statistics and standard parameters.
  Bolivian Flaring and Losses amount (7.30E+07 m³) for the year of 2018 is reported in the Monthly Bulletin of the Natural Gas Industry (MME, 2018). Brazilian data is used to calculate the share between flaring and venting.
  For Brazil, the share of vented natural gas is estimated using the amount of fugitive methane emitted during exploration and production activities in 2012 (112,261,860 kg - MCTI, 2015). Considering that all methane fugitive emissions are due to venting, the final amount of vented natural gas in 2012 is calculated with the natural gas composition (0.73%vol of methane; 0.71 kg methane/m³; compiled from anp.gov.br/dados-estatisticos). Thereby, the calculated amount of vented natural gas in 2012 is 2.15E+8 m³, which corresponds to 15% of the combined Flaring and Losses statistics for 2012. This calculated share was used to split the amount flared and vented natural gas in Bolivian onshore production for 2018, respectively 6.21E+7 m³ and 1.09E+7 m³.
  References:
  [ANP 2019] Agência Nacional do Petróleo, Gás Natural e Biocombustíveis (2019). Anuário Estatístico 2019. Available at: www.anp.gov.br/publicacoes/anuario-estatistico/5237-anuario-estatistico-2019. Accessed in 04/06/2020.
  [MCTI 2015]
  Ministry of Science, Technology and Innovation (2015). Third Brazilian Inventory of Anthropic Emissions and Removals of Greenhouse Gases. Reference Reports. Energy Sector. Fugitive Emissions of Green House Gases in the Oil and Gas Industry. Petrobras e Centro de Estudos Integrados sobre Meio Ambiente e Mudanças Climáticas - Centro Clima/COPPE/UFRJ. Available at: https://sirene.mctic.gov.br/portal/opencms/textoGeral/2018/10/11/Relatorios_de_Referencia_do_II_Inventario_Brasileiro_de_Emissoes_e_Remocoes_Antropicas_de_Gases_de_Efeito_Estufa.html. Accessed in: 12/06/2020.
  [MME 2018]
  Ministry of Mines and Energy (2018). Monthly Bulletin of the Natural Gas Industry. December
  2018. Edition number 142. Available at:
  http://www.mme.gov.br/web/guest/secretarias/petroleo-gas-natural-ebiocombustiveis/publicacoes/boletim-mensal-de-acompanhamento-da-industria-de-gas-natural.
  Accessed in: 10/06/2020.
  production volume 2.42394e9 MJ; = waste_NG_sweet_amount_MO_MJ*(0.5* petroleum_PV +0.5*natural_gas_PV *0.84)/(0.5* 2083924049,8 +0.5*18780980000 *0.84)
    Calculated from the production volume of reference products
  property amount in multioutput activity_MJ 2.42394e9 MJ; name waste_NG_sweet_amount_MO_MJ; = 73000000*39*(1-0,1486)
  property price 0 EUR2005; name waste_NG_sweet_price_EUR2005
  properties: dry mass 0.0247059 kg, wet mass 0.0247059 kg, carbon content, fossil 0.589286
  note on amount in multioutput activity_MJ: Bolivian Flaring and Losses amount (7.30E+07 m³) for the year of 2018 is reported in the Monthly Bulletin of the Natural Gas Industry (MME, 2018). Brazilian data is used to calculate the share between flaring and losses. For Brazil, the share of vented natural gas is estimated using the amount of fugitive methane emitted during exploration and production activities in 2012 (112,261,860 kg - MCTI, 2015). Considering that all methane fugitive emissions are due to venting, the final amount of vented natural gas in 2012 is calculated with the natural gas composition (0.73%vol of methane; compiled from anp.gov.br/dados-estatisticos). Thereby, the calculated amount of vented natural gas in 2012 is 2.15E+8 m³, which corresponds to 15% of the combined Flaring and Losses statistics for 2012. This calculated share was used to split the amount flared and vented natural gas in Bolivian onshore production for 2018, respectively 6.21E+7 m³ and 1.09E+7 m³. Assumed energy content of natural gas: 39 MJ/m³ References: [ANP 2019] Agência Nacional do Petróleo, Gás Natural e Biocombustíveis (2019). Anuário Estatístico 2019. Available at: www.anp.gov.br/publicacoes/anuario-estatistico/5237-anuario-estatistico-2019. Accessed in 04/06/2020. [MCTI 2015] Ministry of Science, Technology and Innovation (2015). Third Brazilian Inventory of Anthropic Emissions and Removals of Greenhouse Gases. Reference Reports. Energy Sector. Fugitive Emissions of Green House Gases in the Oil and Gas Industry. Petrobras e Centro de Estudos Integrados sobre Meio Ambiente e Mudanças Climáticas - Centro Clima/COPPE/UFRJ. Available at: https://sirene.mctic.gov.br/portal/opencms/textoGeral/2018/10/11/Relatorios_de_Referencia_do_II_Inventario_Brasileiro_de_Emissoes_e_Remocoes_Antropicas_de_Gases_de_Efeito_Estufa.html. Accessed in: 12/06/2020. [MME 2018] Ministry of Mines and Energy (2018). Monthly Bulletin of the Natural Gas Industry. December 2018. Edition number 142. Available at: http://www.mme.gov.br/web/guest/secretarias/petroleo-gas-natural-ebiocombustiveis/publicacoes/boletim-mensal-de-acompanhamento-da-industria-de-gas-natural. Accessed in: 10/06/2020.
- sweet gas, burned in gas turbine: 0.709361 MJ; name sweet_gas_burned; = sweet_gas_burned_amount_MO_MJ*(0.5* petroleum +0.5*natural_gas *0.84)/(0.50* 2083924049,8 +0.50*18780980000 *0.84); source Brazilian Ministry of Mines and Energy  2018; lognormal variance with pedigree 0.03, pedigree (1,1,1,1,1)
  EcoSpold01Location=NO
  Amount of gas consumed in turbines during exploration and production according to national statistics.
  [MME 2018]
  Ministry of Mines and Energy (2018). Monthly Bulletin of the Natural Gas Industry. December
  2018. Edition number 142. Available at:
  http://www.mme.gov.br/web/guest/secretarias/petroleo-gas-natural-ebiocombustiveis/publicacoes/boletim-mensal-de-acompanhamento-da-industria-de-gas-natural.
  Accessed in: 10/06/2020.
  property amount in multioutput activity_MJ 1.26692e10 MJ; name sweet_gas_burned_amount_MO_MJ; = 324850000*39
  properties: dry mass 0.0247059 kg, heating value, net 1 MJ, carbon content, fossil 0.589286, wet mass 0.0247059 kg
  note on amount in multioutput activity_MJ: Amount of gas consumed in turbines during exploration and production according to national statistics. Assumed energy content of natural gas: 39 MJ/m³ [MME 2018] Ministry of Mines and Energy (2018). Monthly Bulletin of the Natural Gas Industry. December 2018. Edition number 142. Available at: http://www.mme.gov.br/web/guest/secretarias/petroleo-gas-natural-ebiocombustiveis/publicacoes/boletim-mensal-de-acompanhamento-da-industria-de-gas-natural. Accessed in: 10/06/2020.
- low level radioactive waste: -2.15819e-9 m3; name low_level_waste; = (low_level_waste_amount_MO_m3*(18780980000*39+2083924049,8*42)/(1,35E10*39+1,07E11*42)*(0.5* petroleum +0.5*natural_gas *0.84)/(0.5* 2083924049,8 +0.5*18780980000 *0.84))*-1; lognormal variance with pedigree 0.37, pedigree (3,5,5,5,3)
  EcoSpold01Location=CH
  Generic value from GLO dataset. Scaled according to energy content of reference products.
  Uncertainty: Generic value from the GLO dataset. Uncertainty has been increased to reflect the extrapolation from a different time period.
  production volume 38.5452 m3; = low_level_waste_amount_MO_m3*(18780980000*39+2083924049,8*42)/(1,35E10*39+1,07E11*42)*(0.5* petroleum_PV +0.5*natural_gas_PV *0.84)/(0.5* 2083924049,8 +0.5*18780980000 *0.84)
    Calculated from the production volume of reference products
  property price 0 EUR2005; name low_level_waste_price_EUR2005
  property amount in multioutput activity_m3 236 m3; name low_level_waste_amount_MO_m3
  properties: dry mass 2500 kg, wet mass 2500 kg
- chemical, inorganic: 1.29857e-6 kg; name chem_inorg; = chem_inorg_amount_MO_kg*(18780980000*39+2083924049,8*42)/(1,35E10*39+1,07E11*42)*(0.5* petroleum +0.5*natural_gas *0.84)/(0.5* 2083924049,8 +0.5*18780980000 *0.84); lognormal variance with pedigree 0.4252, pedigree (2,3,3,5,5)
  Generic value. Scaled from the GLO dataset according to energy content of reference products.
  EcoSpold01Location=GLO
  Uncertainty: . Uncertainty has been increased to reflect the extrapolation from a different region and time period.
  property amount in multioutput activity_kg 142000 kg; name chem_inorg_amount_MO_kg
  properties: carbon content, fossil 0.003, wet mass 1 kg, dry mass 1 kg
  note on carbon content, fossil: This dataset is an unweighted average of 20 inorganic substances (listed in Tab 88.1, ecoinvent v2.2 report 8, part II), being part of the top100 chemicals included in this database. The C-content has also been calculated as an unweighted average of the C content of the substances composing this dataset.
- water discharge from petroleum/natural gas extraction, onshore: -3.55821 kg; name water_discharge; = (water_discharge_amount_MO_kg*(18780980000*39+2083924049,8*42)/(1,35E10*39+1,07E11*42)*(1* petroleum +0*natural_gas *0.84)/(1* 2083924049,8 +0*18780980000 *0.84))*-1; lognormal variance with pedigree 0.1627, pedigree (2,2,5,5,5)
  Environmental report. Scaled from the GLO dataset according to energy content of reference products.
  Reference:
  Faist Emmenegger M., Heck T., Jungbluth N., Tuchschmid M. (2007) Erdgas. In: Dones, R. (Ed.) et al., Sachbilanzen von Energiesystemen: Grundlagen für den ökologischen Vergleich von Energiesystemen und den Einbezug von Energiesystemen in ékobilanzen für die Schweiz. Final report ecoinvent No. 6-V, Paul Scherrer Institut, Villigen, Swiss Centre for Life Cycle Inventories, Dübendorf, Switzerland.
  EcoSpold01Location=GLO
  Uncertainty: Environmental report. Uncertainty has been increased to reflect the extrapolation from a different region and time period.
  production volume 7.41504e9 kg; = water_discharge_amount_MO_kg*(18780980000*39+2083924049,8*42)/(1,35E10*39+1,07E11*42)*(1* petroleum_PV +0*natural_gas_PV *0.84)/(1* 2083924049,8 +0*18780980000 *0.84)
    Calculated from the production volume of reference products
  property price 0 EUR2005; name water_discharge_price_EUR2005
  property amount in multioutput activity_kg 4.54e10 kg; name water_discharge_amount_MO_kg
  properties: carbon content, fossil 0.00269714, wet mass 1 kg, dry mass 0.0848608 kg, water content 10.784
- municipal solid waste: -0.000392315 kg; name MSW; = (MSW_amount_MO_kg*(18780980000*39+2083924049,8*42)/(1,35E10*39+1,07E11*42)*(0.5* petroleum +0.5*natural_gas *0.84)/(0.5* 2083924049,8 +0.5*18780980000 *0.84))*-1; lognormal variance with pedigree 0.1641, pedigree (3,2,5,5,5)
  EcoSpold01Location=CH
  Environmental report. Scaled from the GLO dataset according to energy content of reference products.
  Uncertainty: Environmental report. Uncertainty has been increased to reflect the extrapolation from a different region and time period.
  production volume 7.00673e6 kg; = MSW_amount_MO_kg*(18780980000*39+2083924049,8*42)/(1,35E10*39+1,07E11*42)*(0.5* petroleum_PV +0.5*natural_gas_PV *0.84)/(0.5* 2083924049,8 +0.5*18780980000 *0.84)
    Calculated from the production volume of reference porducts
  property amount in multioutput activity_kg 4.29e7 kg; name MSW_amount_MO_kg
  properties: carbon content, non-fossil 0.261655, wet mass 1 kg, dry mass 0.771 kg, carbon content, fossil 0.171549, water content 0.297017, heating value, net 11.74 MJ
  note on carbon content, non-fossil: MSW composition in tab 4.1, ecoinvent v2.2 report 13_I. C content referred to 1 kg DM

## Inputs from nature
- Gas, natural, in ground [natural resource, in ground]: 0 m3; name gas_ground; = gas_ground_amount_MO_m3*(0* petroleum +1*natural_gas *0.84)/(0* 2083924049,8 + 1*18780980000 *0.84); source ANP 2019; pedigree (1,1,1,1,1)
  ANP Statistical Yearbook 2019 - Table 3.32 - Natural Gas Balance in Brazil - 2009/2019
  Uncertainty: Production
  property amount in multioutput activity_m3 1.8781e10 m3; name gas_ground_amount_MO_m3
- Water, salt, sole [natural resource, in water]: 0.00328915 m3; = (water_discharge*-1)*0,9151392373965/990; lognormal variance with pedigree 0.0006, pedigree (2,1,1,1,1)
  Flow created to close the water balance. Produced water to be discharged.
  Total amount of produced water obtained from national statistics (anp.gov.br/dados-estatisticos).
  Discharged fraction calculated with standard parameters from Schori (2012). For onshore production, 10% is considered to be discharged and 90% reinjected.
  Property water in wet mass of water discharge from petroleum/natural gas extraction, onshore: 0,9151392373965 kg
  Property water in wet mass of Water, salt, sole (in water/natural resource): 990 kg
  References:
  [ANP 2020]
  Agência Nacional do Petróleo, Gás Natural e Biocombustíveis. Satatistical data. Available at: anp.gov.br/dados-estatisticos
  [Schori 2012]
  Schori, S., Frischknecht, R. (2012). Life Cycle Inventory of Natural Gas Supply. ESU-services Ltd.
- Oil, crude, in ground [natural resource, in ground]: 1 kg; name oil_ground; = oil_ground_amount_MO_kg*(1* petroleum +0*natural_gas *0.84)/(1* 2083924049,8 + 0*18780980000 *0.84); source ANP 2019; lognormal variance with pedigree 0, pedigree (1,1,1,1,1)
  Instituto Nacional de Estadística - Bolivia - Produccion de Petroleo y Gas Natural segun Año y Mes, 1990 - 2020
  property amount in multioutput activity_kg 2.08392e9 kg; name oil_ground_amount_MO_kg

## Emissions to nature
- Nitrogen [water, surface water]: 5.34061e-8 kg; name N2; = N2_amount_MO_kg*(18780980000*39+2083924049,8*42)/(1,35E10*39+1,07E11*42)*(0.5* petroleum +0.5*natural_gas *0.84)/(0.5* 2083924049,8 +0.5*18780980000 *0.84); lognormal variance with pedigree 0.212, pedigree (3,5,5,5,5)
  Extrapolation for sum parameter. Scaled according to energy content of reference products.
  Uncertainty: Extrapolation for sum parameter. Uncertainty has been increased to reflect the extrapolation from a different region.
  property amount in multioutput activity_kg 5840 kg; name N2_amount_MO_kg
- TOC, Total Organic Carbon [water, surface water]: 5.98075e-5 kg; name TOC; = TOC_amount_MO_kg*(18780980000*39+2083924049,8*42)/(1,35E10*39+1,07E11*42)*(0.5* petroleum +0.5*natural_gas *0.84)/(0.5* 2083924049,8 +0.5*18780980000 *0.84); lognormal variance with pedigree 0.212, pedigree (3,5,5,5,5)
  (same comment as for Nitrogen)
  property amount in multioutput activity_kg 6.54e6 kg; name TOC_amount_MO_kg
- Oils, unspecified [water, surface water]: 6.91352e-5 kg; name oils; = oils_amount_MO_kg*(18780980000*39+2083924049,8*42)/(1,35E10*39+1,07E11*42)*(0.5* petroleum +0.5*natural_gas *0.84)/(0.5* 2083924049,8 +0.5*18780980000 *0.84); lognormal variance with pedigree 0.4232, pedigree (2,3,1,5,5)
  Environmental report. Scaled from the GLO dataset according to energy content of reference products.
  Uncertainty: Environmental report. Uncertainty has been increased to reflect the extrapolation from a different region and time period.
  property amount in multioutput activity_kg 7.56e6 kg; name oils_amount_MO_kg
- DOC, Dissolved Organic Carbon [water, surface water]: 5.98075e-5 kg; name DOC; = DOC_amount_MO_kg*(18780980000*39+2083924049,8*42)/(1,35E10*39+1,07E11*42)*(0.5* petroleum +0.5*natural_gas *0.84)/(0.5* 2083924049,8 +0.5*18780980000 *0.84); lognormal variance with pedigree 0.212, pedigree (3,5,5,5,5)
  (same comment as for Nitrogen)
  property amount in multioutput activity_kg 6.54e6 kg; name DOC_amount_MO_kg
- AOX, Adsorbable Organic Halogen as Cl [water, surface water]: 7.12386e-10 kg; name AOX; = AOX_amount_MO_kg*(18780980000*39+2083924049,8*42)/(1,35E10*39+1,07E11*42)*(0.5* petroleum +0.5*natural_gas *0.84)/(0.5* 2083924049,8 +0.5*18780980000 *0.84); lognormal variance with pedigree 0.212, pedigree (3,5,5,5,5)
  (same comment as for Nitrogen)
  property amount in multioutput activity_kg 77.9 kg; name AOX_amount_MO_kg
- COD, Chemical Oxygen Demand [water, surface water]: 0.000217648 kg; name COD; = COD_amount_MO_kg*(18780980000*39+2083924049,8*42)/(1,35E10*39+1,07E11*42)*(0.5* petroleum +0.5*natural_gas *0.84)/(0.5* 2083924049,8 +0.5*18780980000 *0.84); lognormal variance with pedigree 0.212, pedigree (3,5,5,5,5)
  (same comment as for Nitrogen)
  property amount in multioutput activity_kg 2.38e7 kg; name COD_amount_MO_kg
- BOD5, Biological Oxygen Demand [water, surface water]: 0.000217648 kg; name BOD; = BOD_amount_MO_kg*(18780980000*39+2083924049,8*42)/(1,35E10*39+1,07E11*42)*(0.5* petroleum +0.5*natural_gas *0.84)/(0.5* 2083924049,8 +0.5*18780980000 *0.84); lognormal variance with pedigree 0.212, pedigree (3,5,5,5,5)
  (same comment as for Nitrogen)
  property amount in multioutput activity_kg 2.38e7 kg; name BOD_amount_MO_kg
- Sulfur [water, surface water]: 1.85641e-7 kg; name S2; = S2_amount_MO_kg*(18780980000*39+2083924049,8*42)/(1,35E10*39+1,07E11*42)*(0.5* petroleum +0.5*natural_gas *0.84)/(0.5* 2083924049,8 +0.5*18780980000 *0.84); lognormal variance with pedigree 0.212, pedigree (3,5,5,5,5)
  (same comment as for Nitrogen)
  property amount in multioutput activity_kg 20300 kg; name S2_amount_MO_kg
- Methane, bromotrifluoro-, Halon 1301 [air, non-urban air or from high stacks]: 6.29167e-8 kg; name halon; = halon_amount_MO_kg*(18780980000*39+2083924049,8*42)/(1,35E10*39+1,07E11*42)*(0.5* petroleum +0.5*natural_gas *0.84)/(0.5* 2083924049,8 +0.5*18780980000 *0.84); lognormal variance with pedigree 0.7747, pedigree (2,2,3,5,5)
  (same comment as for Oils, unspecified)
  property amount in multioutput activity_kg 6880 kg; name halon_amount_MO_kg

## Sampling procedure
Data is based on the Monthly Bulletin of the Natural Gas Industry from the Brazilian Ministry of Mines and Energy and the Bolivian National Statistics Institute. They are based on the direct report from producers.

This activity results in the production of 1.88E+10 m³ of natural gas and 2.08E+9 kg of petroleum, produced in Bolivian onshore fields over 2018 (MME, 2019; INE,2020).
Bolivian Flaring and Losses amount (7.30E+07 m³) for the year of 2018 is reported in the Monthly Bulletin of the Natural Gas Industry (MME, 2018). Brazilian data is used to calculate the share between flaring and venting.
For Brazil, the share of vented natural gas is estimated using the amount of fugitive methane emitted during exploration and production activities in 2012 (112,261,860 kg - MCTI, 2015). Considering that all methane fugitive emissions are due to venting, the final amount of vented natural gas in 2012 is calculated with the natural gas composition (0.73%vol of methane; 0.71 kg methane/m³; compiled from anp.gov.br/dados-estatisticos). Thereby, the calculated amount of vented natural gas in 2012 is 2.15E+8 m³, which corresponds to 15% of the combined Flaring and Losses statistics for 2012. This calculated share was used to split the amount flared and vented natural gas in Bolivian onshore production for 2018, respectively 6.21E+7 m³ and 1.09E+7 m³.
Another adaptation is the amount of natural gas consumed in turbines during field exploration and production activities (3.25E+8 m³ - retrieved from MME, 2019).
References:
[ANP 2019] Agência Nacional do Petróleo, Gás Natural e Biocombustíveis (2019). Anuário Estatístico 2019. Available at: www.anp.gov.br/publicacoes/anuario-estatistico/5237-anuario-estatistico-2019. Accessed in 04/06/2020.
[MCTI 2015] Ministry of Science, Technology and Innovation (2015). Third Brazilian Inventory of Anthropic Emissions and Removals of Greenhouse Gases. Reference Reports. Energy Sector. Fugitive Emissions of Green House Gases in the Oil and Gas Industry. Petrobras e Centro de Estudos Integrados sobre Meio Ambiente e Mudanças Climáticas - Centro Clima/COPPE/UFRJ. Available at: https://sirene.mctic.gov.br/portal/opencms/textoGeral/2018/10/11/Relatorios_de_Referencia_do_II_Inventario_Brasileiro_de_Emissoes_e_Remocoes_Antropicas_de_Gases_de_Efeito_Estufa.html. Accessed in: 12/06/2020.
[MME 2019] Ministry of Mines and Energy (2019). Monthly Bulletin of the Natural Gas Industry. December 2018. Edition number 142. Available at: http://www.mme.gov.br/web/guest/secretarias/petroleo-gas-natural-ebiocombustiveis/publicacoes/boletim-mensal-de-acompanhamento-da-industria-de-gas-natural. Accessed in: 10/06/2020.
[Bolivian National Statistics Institute 2020] Instituto Nacional de Estadística - Bolivia - Produccion de Petroleo y Gas Natural segun Año y Mes, 1990 - 2020 (2018 data)

## Extrapolations
All flows contained in the original Global dataset that could not be updated with Bolivian data were scaled according to the energy content of the reference products. The uncertainty information was adjusted accordingly.

Assumed energy contents are 39 MJ/m³ of natural gas and 42 MJ/kg of petroleum.

The carbon content properties of all air and water emissions were adjusted to consider 100% fossil carbon. However, waste treatment flows of ‘waste wood, untreated’ and ‘Municipal Solid Waste’ are responsible for unbalanced non-fossil carbon emissions, as in the original dataset representing the global geography.
