# treatment of waste polypropylene, open dump, hyperarid infiltration class (-250mm)

Dataset: EcoSpold 2, unit process
Geography: GLO
Time period: 2006-01-01 to 2021-12-31
Technology level: current
Classification: ISIC rev.4 ecoinvent: 3821:Treatment and disposal of non-hazardous waste
Synonyms: municipal waste landfill
Scenario: Business-as-Usual
System model: Allocation, cut-off by classification
Share of production covered: 1 %
Generated by: Avraam Symeonidis
Database: ecoinvent
isCopyrightProtected: true
accessRestrictedTo: 1

## General comment
This dataset represents the activity of waste disposal of waste polypropylene in a open dump. Recommended use of this dataset: For PP, which goes to disposal as part of unmanaged communal waste mixture. // Waste composition (wet, in ppm): upper heating value 36.16 MJ/kg; lower heating value 32.78 MJ/kg; H2O 159000; O 32454; H 103430; C 694120; S 360.46; N 1095.3; P n.a.; B n.a.; Cl 1234.1; Br 8.0972; F 12.146; I n.a.; Ag n.a.; As 1.5385; Ba 202.43; Cd 28.663; Co 1.417; Cr 10.526; Cu 34.93; Hg 0.040486; Mn 25.371; Mo n.a.; Ni 0.80972; Pb 19.079; Sb 8.5021; Se 1.7004; Sn 3.2205; V 1862.4; Zn 288.78; Be 0.40486; Sc n.a.; Sr 71.661; Ti 809.72; Tl 0.32389; W n.a.; Si n.a.; Fe 1295.6; Ca 2186.3; Al 161.94; K n.a.; Mg 80.972; Na 1186.6; . // Share of carbon in waste that is biogenic 0%. Share of metals in waste not oxidised and bulk-recyclable (exclude very small or thin parts) Iron: 0%; Alu: 0%; Copper: 0%. Overall degradability of waste during 100 years: 1%.

## Included activities start
from final waste deposition (without transports to the site)

## Included activities end
Waste-specific short-term emissions to air via landfill gas and landfill leachate. Waste-specific long-term emissions from landfill.

## Geography
Given name of landfill location is 'infiltration class 1 hyperarid (2018)'. Landfill site with mean annual temperature (MAT) of 8 degC, mean annual precipitation (MAP) of 350 mm/year, and net infiltration of -250 mm/year. Negative infiltration means that leachate flow is reversed and flows upward to the surface, where water is evaporated and dissolved solids become solid evaporites.
Climate adjustments result in an alpha t (temperature) for permafrost areas of 0.999. Total climate adjustments with alpha pt of 0.999.

## Technology
This is an inventory for an open, uncontrolled waste dump for municipal solid waste. Ultimate average landfill height is 7 meters. Operation phase duration is 15 years.Percentage of landfill gas directly emitted is 100w%. A Methane Correction Factor (MCF) for landfill air emissions of 0.7057 is employed.
Leachate of the landfill is not treated. Leachate flow is upward to the surface due to net negative infiltration. No leachate treatment can be performed. Based on average waste composition and climate data the end of carbonate phase is estimated to be reached 3171 years after waste deposition. Arid conditions at this location prompt formation of evaporites from landfill contents which are partially eroded by wind. It is assumed that 10% of these evaporites are eroded by wind and airborne. Initial decay in the first 100 years of this waste results in a wind erosion rate corresponding to 3.135 g/m2.year and long-term decay corresponds to wind erosion of 9.764 g/m2.year.

## Reference product
- waste polypropylene: -1 kg; CPC 39270: Waste, parings and scrap of plastics; By-product classification Waste; CAS 9003-07-0; pedigree (1,1,1,1,1)
  main reference product of this activity (supply of disposal service).
  Uncertainty: Uncertainty is not adjusted, as this is the refence product
  production volume 1 kg
    The amount of the annual production volume is a placeholder value. The contribution of this technology to the different local markets can be found in the markets themselves.
  property heating value, net 32.78 MJ
    Value assumed for all polypropylene products. Source: Phyllis2, database for (treated) biomass, algae, feedstocks for biogas production and biochar, https://phyllis.nl/Biomass/View/1186, ECN.TNO
  property price 0 EUR2005
    Waste products are assigned a price of zero as they are assumed to require further treatment.
  property carbon content 0.82535
    carbon content on a dry matter basis (reserved; not for manual entry)
  properties: nickel content 9.6281e-7, antimony content 1.011e-5, tin content 3.8294e-6, thallium content 3.8512e-7, fluorine content 1.4442e-5, aluminium content 0.00019256, titanium content 0.00096281, barium content 0.0002407, wet mass 1 kg, cadmium content 3.4082e-5, arsenic content 1.8293e-6, magnesium content 9.6281e-5, chlorine content 0.0014674, nitrogen content 0.0013024, hydrogen content 0.12298, heating value, gross 36.159 MJ, sulfur content 0.00042861, oxygen content 0.03859, beryllium content 4.8141e-7, water content 0.18906, mercury content 4.8141e-8, strontium content 8.5209e-5, lead content 2.2687e-5, carbon content, fossil 0.82535, bromine content 9.6281e-6, vanadium content 0.0022145, iron content 0.0015405, sodium content 0.001411, calcium content 0.0025996, dry mass 0.841 kg, chromium content 1.2517e-5, cobalt content 1.6849e-6, manganese content 3.0168e-5, water in wet mass 0.159 kg, copper content 4.1533e-5, selenium content 2.0219e-6, zinc content 0.00034338, carbon allocation 0.694119 kg

## Inputs from nature
- Occupation, dump site [natural resource, land]: 0.0035714 m2*year; lognormal variance with pedigree 0.088256, pedigree (1,1,4,1,1)
  for landfill operation phase and spontaneous renaturation.
  Uncertainty: Uncertainty calculated from uncertainty in base parameters.

## Emissions to nature
- Particulates, > 10 um [air, non-urban air or from high stacks]: 2.2391e-5 kg; lognormal variance with pedigree 0.14178, pedigree (1,1,4,1,1)
  burden from direct release or incineration of landfill biogas; or windblown leachate evaporite in arid climates.
  Uncertainty: Uncertainty calculated from unertainty of the waste composition of this waste, uncertainty in waste decomposition and short-term leaching in landfill
- Nitrogen [soil, industrial]: 0.0009842 kg; lognormal variance with pedigree 0.16327, pedigree (1,1,4,1,1)
  burden from leachate evaporite in arid climates deposited on landflill surface.
  Uncertainty: Uncertainty calculated from unertainty of the waste composition of this waste, uncertainty in waste decomposition and short-term leaching in landfill
- Manganese [air, low population density, long-term]: 2.5081e-6 kg; lognormal variance with pedigree 0.29413, pedigree (1,1,4,1,1)
  burden from windblown long-term leachate evaporite in arid climates.
  Uncertainty: Uncertainty calculated from unertainty of the waste composition of this waste, uncertainty in waste decomposition and short-term leaching in landfill
- Particulates, > 2.5 um, and < 10um [air, non-urban air or from high stacks]: 1.3434e-5 kg; lognormal variance with pedigree 0.16153, pedigree (1,1,4,1,1)
  (same comment as for Particulates, > 10 um)
- Chloride [soil, industrial]: 0.0011103 kg; lognormal variance with pedigree 0.15907, pedigree (1,1,4,1,1)
  (same comment as for Nitrogen)
- Arsenic [air, low population density, long-term]: 1.5357e-7 kg; lognormal variance with pedigree 0.38637, pedigree (1,1,4,1,1)
  (same comment as for Manganese)
- Methane, fossil [air, non-urban air or from high stacks]: 0.0035433 kg; lognormal variance with pedigree 0.11208, pedigree (1,1,4,1,1)
  burden from direct release or incineration of landfill biogas.
  Uncertainty: Uncertainty calculated from unertainty of the waste composition of this waste, uncertainty in waste decomposition and short-term leaching in landfill
- Bromine [soil, industrial]: 7.2849e-6 kg; lognormal variance with pedigree 0.32175, pedigree (1,1,4,1,1)
  (same comment as for Nitrogen)
- Cobalt [air, low population density, long-term]: 1.4125e-7 kg; lognormal variance with pedigree 0.38905, pedigree (1,1,4,1,1)
  (same comment as for Manganese)
- Sulfur [soil, industrial]: 0.0003242 kg; lognormal variance with pedigree 0.20465, pedigree (1,1,4,1,1)
  (same comment as for Nitrogen)
- Barium [air, low population density, long-term]: 2.0011e-5 kg; lognormal variance with pedigree 0.22506, pedigree (1,1,4,1,1)
  (same comment as for Manganese)
- Carbon dioxide, fossil [air, non-urban air or from high stacks]: 0.014936 kg; lognormal variance with pedigree 0.101952, pedigree (1,1,4,1,1)
  (same comment as for Methane, fossil)
- Sodium [air, non-urban air or from high stacks]: 4.9169e-6 kg; lognormal variance with pedigree 0.21702, pedigree (1,1,4,1,1)
  (same comment as for Particulates, > 10 um)
- Chromium [air, low population density, long-term]: 3.415e-9 kg; lognormal variance with pedigree 2.376, pedigree (1,1,4,1,1)
  (same comment as for Manganese)
- Carbon [soil, industrial]: 0.61865 kg; lognormal variance with pedigree 0.0090256, pedigree (1,1,4,1,1)
  (same comment as for Nitrogen)
- Cadmium [air, low population density, long-term]: 2.8612e-6 kg; lognormal variance with pedigree 0.29008, pedigree (1,1,4,1,1)
  (same comment as for Manganese)
- Heat, waste [soil, industrial]: 0.30518 MJ; lognormal variance with pedigree 0.061228, pedigree (1,1,4,1,1)
  burden from short-term decomposition of waste (0-100a).
  Uncertainty: Uncertainty calculated from unertainty of the waste composition of this waste, uncertainty in waste decomposition and short-term leaching in landfill
- Hydrogen fluoride [air, low population density, long-term]: 1.2091e-6 kg; lognormal variance with pedigree 0.31855, pedigree (1,1,4,1,1)
  (same comment as for Manganese)
- Heat, waste [water, ground-, long-term]: 35.798 MJ; lognormal variance with pedigree 0.020651, pedigree (1,1,4,1,1)
  burden from long-term decomposition of waste (>100a).
  Uncertainty: Uncertainty calculated from unertainty of the waste composition of this waste, uncertainty in waste decomposition and short-term leaching in landfill
- Hydrogen chloride [air, low population density, long-term]: 0.00012026 kg; lognormal variance with pedigree 0.16557, pedigree (1,1,4,1,1)
  (same comment as for Manganese)
- Thallium [air, non-urban air or from high stacks]: 1.8854e-11 kg; lognormal variance with pedigree 0.61561, pedigree (1,1,4,1,1)
  (same comment as for Particulates, > 10 um)
- Bromine [air, low population density, long-term]: 7.8907e-7 kg; lognormal variance with pedigree 0.33196, pedigree (1,1,4,1,1)
  (same comment as for Manganese)
- Calcium [air, non-urban air or from high stacks]: 2.8503e-7 kg; lognormal variance with pedigree 0.30036, pedigree (1,1,4,1,1)
  (same comment as for Particulates, > 10 um)
- Particulates, < 2.5 um [air, low population density, long-term]: 0.01671 kg; lognormal variance with pedigree 0.12904, pedigree (1,1,4,1,1)
  (same comment as for Manganese)
- Magnesium [air, non-urban air or from high stacks]: 5.003e-8 kg; lognormal variance with pedigree 0.35964, pedigree (1,1,4,1,1)
  (same comment as for Particulates, > 10 um)
- Sulfate [air, low population density, long-term]: 0.00010767 kg; lognormal variance with pedigree 0.20594, pedigree (1,1,4,1,1)
  (same comment as for Manganese)
- Iron [air, non-urban air or from high stacks]: 1.7818e-8 kg; lognormal variance with pedigree 0.39074, pedigree (1,1,4,1,1)
  (same comment as for Particulates, > 10 um)
- Nitrate [air, low population density, long-term]: 0.00047297 kg; lognormal variance with pedigree 0.16945, pedigree (1,1,4,1,1)
  (same comment as for Manganese)
- Aluminium [air, non-urban air or from high stacks]: 8.1055e-9 kg; lognormal variance with pedigree 0.41662, pedigree (1,1,4,1,1)
  (same comment as for Particulates, > 10 um)
- Particulates, > 2.5 um, and < 10um [air, low population density, long-term]: 0.025065 kg; lognormal variance with pedigree 0.083636, pedigree (1,1,4,1,1)
  (same comment as for Manganese)
- Strontium [air, non-urban air or from high stacks]: 4.1714e-9 kg; lognormal variance with pedigree 0.43876, pedigree (1,1,4,1,1)
  (same comment as for Particulates, > 10 um)
- Sodium [soil, industrial]: 0.001068 kg; lognormal variance with pedigree 0.15655, pedigree (1,1,4,1,1)
  (same comment as for Nitrogen)
- Titanium [air, non-urban air or from high stacks]: 4.0527e-8 kg; lognormal variance with pedigree 0.36354, pedigree (1,1,4,1,1)
  (same comment as for Particulates, > 10 um)
- Magnesium [soil, industrial]: 7.2875e-5 kg; lognormal variance with pedigree 0.25316, pedigree (1,1,4,1,1)
  (same comment as for Nitrogen)
- Beryllium [air, non-urban air or from high stacks]: 2.3568e-11 kg; lognormal variance with pedigree 0.60847, pedigree (1,1,4,1,1)
  (same comment as for Particulates, > 10 um)
- Calcium [soil, industrial]: 0.0019676 kg; lognormal variance with pedigree 0.14674, pedigree (1,1,4,1,1)
  (same comment as for Nitrogen)
- Tin [air, non-urban air or from high stacks]: 1.9001e-11 kg; lognormal variance with pedigree 0.61677, pedigree (1,1,4,1,1)
  (same comment as for Particulates, > 10 um)
- Particulates, > 10 um [air, low population density, long-term]: 0.041775 kg; lognormal variance with pedigree 0.063883, pedigree (1,1,4,1,1)
  (same comment as for Manganese)
- Vanadium [air, non-urban air or from high stacks]: 1.9664e-7 kg; lognormal variance with pedigree 0.31229, pedigree (1,1,4,1,1)
  (same comment as for Particulates, > 10 um)
- Aluminium [soil, industrial]: 0.00014575 kg; lognormal variance with pedigree 0.23226, pedigree (1,1,4,1,1)
  (same comment as for Nitrogen)
- Zinc [air, non-urban air or from high stacks]: 1.3694e-8 kg; lognormal variance with pedigree 0.39939, pedigree (1,1,4,1,1)
  (same comment as for Particulates, > 10 um)
- Titanium [soil, industrial]: 0.00072875 kg; lognormal variance with pedigree 0.17912, pedigree (1,1,4,1,1)
  (same comment as for Nitrogen)
- Nickel [air, non-urban air or from high stacks]: 4.7135e-11 kg; lognormal variance with pedigree 0.58618, pedigree (1,1,4,1,1)
  (same comment as for Particulates, > 10 um)
- Thallium [soil, industrial]: 2.915e-7 kg; lognormal variance with pedigree 0.4363, pedigree (1,1,4,1,1)
  (same comment as for Nitrogen)
- Selenium [air, non-urban air or from high stacks]: 1.7954e-10 kg; lognormal variance with pedigree 0.54277, pedigree (1,1,4,1,1)
  (same comment as for Particulates, > 10 um)
- Iron [soil, industrial]: 0.001166 kg; lognormal variance with pedigree 0.16393, pedigree (1,1,4,1,1)
  (same comment as for Nitrogen)
- Lead [air, non-urban air or from high stacks]: 1.1266e-10 kg; lognormal variance with pedigree 0.55757, pedigree (1,1,4,1,1)
  (same comment as for Particulates, > 10 um)
- Strontium [soil, industrial]: 6.4494e-5 kg; lognormal variance with pedigree 0.25933, pedigree (1,1,4,1,1)
  (same comment as for Nitrogen)
- Sodium [air, low population density, long-term]: 0.00011376 kg; lognormal variance with pedigree 0.16687, pedigree (1,1,4,1,1)
  (same comment as for Manganese)
- Manganese [air, non-urban air or from high stacks]: 2.9095e-8 kg; lognormal variance with pedigree 0.37963, pedigree (1,1,4,1,1)
  (same comment as for Particulates, > 10 um)
- Zinc [soil, industrial]: 0.0002599 kg; lognormal variance with pedigree 0.21308, pedigree (1,1,4,1,1)
  (same comment as for Nitrogen)
- Aluminium [air, low population density, long-term]: 1.6186e-5 kg; lognormal variance with pedigree 0.23247, pedigree (1,1,4,1,1)
  (same comment as for Manganese)
- Antimony [air, non-urban air or from high stacks]: 8.9772e-10 kg; lognormal variance with pedigree 0.49004, pedigree (1,1,4,1,1)
  (same comment as for Particulates, > 10 um)
- Beryllium [soil, industrial]: 3.6438e-7 kg; lognormal variance with pedigree 0.42916, pedigree (1,1,4,1,1)
  (same comment as for Nitrogen)
- Calcium [air, low population density, long-term]: 0.00021834 kg; lognormal variance with pedigree 0.14711, pedigree (1,1,4,1,1)
  (same comment as for Manganese)
- Copper [air, non-urban air or from high stacks]: 1.7132e-10 kg; lognormal variance with pedigree 0.54396, pedigree (1,1,4,1,1)
  (same comment as for Particulates, > 10 um)
- Selenium [soil, industrial]: 3.2431e-7 kg; lognormal variance with pedigree 0.53228, pedigree (1,1,4,1,1)
  (same comment as for Nitrogen)
- Magnesium [air, low population density, long-term]: 8.0473e-6 kg; lognormal variance with pedigree 0.25553, pedigree (1,1,4,1,1)
  (same comment as for Manganese)
- Chromium [air, non-urban air or from high stacks]: 1.2014e-10 kg; lognormal variance with pedigree 0.55599, pedigree (1,1,4,1,1)
  (same comment as for Particulates, > 10 um)
- Tin [soil, industrial]: 2.8984e-6 kg; lognormal variance with pedigree 0.36222, pedigree (1,1,4,1,1)
  (same comment as for Nitrogen)
- Strontium [air, low population density, long-term]: 7.1619e-6 kg; lognormal variance with pedigree 0.2596, pedigree (1,1,4,1,1)
  (same comment as for Manganese)
- Mercury [air, non-urban air or from high stacks]: 1.385e-11 kg; lognormal variance with pedigree 0.60747, pedigree (1,1,4,1,1)
  (same comment as for Particulates, > 10 um)
- Vanadium [soil, industrial]: 0.00036746 kg; lognormal variance with pedigree 0.29538, pedigree (1,1,4,1,1)
  (same comment as for Nitrogen)
- Thallium [air, low population density, long-term]: 3.237e-8 kg; lognormal variance with pedigree 0.43664, pedigree (1,1,4,1,1)
  (same comment as for Manganese)
- Cadmium [air, non-urban air or from high stacks]: 5.3731e-9 kg; lognormal variance with pedigree 0.40305, pedigree (1,1,4,1,1)
  (same comment as for Particulates, > 10 um)
- Antimony [soil, industrial]: 5.6503e-7 kg; lognormal variance with pedigree 0.75535, pedigree (1,1,4,1,1)
  (same comment as for Nitrogen)
- Titanium [air, low population density, long-term]: 8.0932e-5 kg; lognormal variance with pedigree 0.1793, pedigree (1,1,4,1,1)
  (same comment as for Manganese)
- Cobalt [air, non-urban air or from high stacks]: 4.5604e-10 kg; lognormal variance with pedigree 0.51313, pedigree (1,1,4,1,1)
  (same comment as for Particulates, > 10 um)
- Lead [soil, industrial]: 1.7172e-5 kg; lognormal variance with pedigree 0.30355, pedigree (1,1,4,1,1)
  (same comment as for Nitrogen)
- Iron [air, low population density, long-term]: 0.00012954 kg; lognormal variance with pedigree 0.16398, pedigree (1,1,4,1,1)
  (same comment as for Manganese)
- Barium [air, non-urban air or from high stacks]: 2.3214e-7 kg; lognormal variance with pedigree 0.31072, pedigree (1,1,4,1,1)
  (same comment as for Particulates, > 10 um)
- Nickel [soil, industrial]: 7.2875e-7 kg; lognormal variance with pedigree 0.40685, pedigree (1,1,4,1,1)
  (same comment as for Nitrogen)
- Zinc [air, low population density, long-term]: 2.8865e-5 kg; lognormal variance with pedigree 0.21327, pedigree (1,1,4,1,1)
  (same comment as for Manganese)
- Arsenic [air, non-urban air or from high stacks]: 3.1468e-10 kg; lognormal variance with pedigree 0.47088, pedigree (1,1,4,1,1)
  (same comment as for Particulates, > 10 um)
- Mercury [soil, industrial]: 3.6428e-8 kg; lognormal variance with pedigree 0.48804, pedigree (1,1,4,1,1)
  (same comment as for Nitrogen)
- Vanadium [air, low population density, long-term]: 4.0633e-5 kg; lognormal variance with pedigree 0.29708, pedigree (1,1,4,1,1)
  (same comment as for Manganese)
- Hydrogen fluoride [air, non-urban air or from high stacks]: 4.9247e-8 kg; lognormal variance with pedigree 0.43116, pedigree (1,1,4,1,1)
  (same comment as for Particulates, > 10 um)
- Manganese [soil, industrial]: 2.2834e-5 kg; lognormal variance with pedigree 0.28954, pedigree (1,1,4,1,1)
  (same comment as for Nitrogen)
- Beryllium [air, low population density, long-term]: 4.0463e-8 kg; lognormal variance with pedigree 0.42949, pedigree (1,1,4,1,1)
  (same comment as for Manganese)
- Hydrogen chloride [air, non-urban air or from high stacks]: 3.5513e-6 kg; lognormal variance with pedigree 0.19271, pedigree (1,1,4,1,1)
  (same comment as for Particulates, > 10 um)
- Chromium [soil, industrial]: 3.1813e-8 kg; lognormal variance with pedigree 2.3755, pedigree (1,1,4,1,1)
  (same comment as for Nitrogen)
- Tin [air, low population density, long-term]: 3.2203e-7 kg; lognormal variance with pedigree 0.36226, pedigree (1,1,4,1,1)
  (same comment as for Manganese)
- Nitrate [air, non-urban air or from high stacks]: 1.1321e-5 kg; lognormal variance with pedigree 0.23616, pedigree (1,1,4,1,1)
  burden from windblown leachate evaporite in arid climates.
  Uncertainty: Uncertainty calculated from unertainty of the waste composition of this waste, uncertainty in waste decomposition and short-term leaching in landfill
- Copper [soil, industrial]: 3.1437e-5 kg; lognormal variance with pedigree 0.28348, pedigree (1,1,4,1,1)
  (same comment as for Nitrogen)
- Lead [air, low population density, long-term]: 1.9078e-6 kg; lognormal variance with pedigree 0.30359, pedigree (1,1,4,1,1)
  (same comment as for Manganese)
- Bromine [air, non-urban air or from high stacks]: 2.3221e-8 kg; lognormal variance with pedigree 0.34412, pedigree (1,1,4,1,1)
  (same comment as for Particulates, > 10 um)
- Cobalt [soil, industrial]: 1.2753e-6 kg; lognormal variance with pedigree 0.38744, pedigree (1,1,4,1,1)
  (same comment as for Nitrogen)
- Nickel [air, low population density, long-term]: 8.0925e-8 kg; lognormal variance with pedigree 0.40718, pedigree (1,1,4,1,1)
  (same comment as for Manganese)
- Sulfur dioxide [air, non-urban air or from high stacks]: 4.6983e-7 kg; lognormal variance with pedigree 0.38308, pedigree (1,1,4,1,1)
  (same comment as for Methane, fossil)
- Barium [soil, industrial]: 0.00018219 kg; lognormal variance with pedigree 0.22116, pedigree (1,1,4,1,1)
  (same comment as for Nitrogen)
- Antimony [air, low population density, long-term]: 6.1886e-8 kg; lognormal variance with pedigree 0.75935, pedigree (1,1,4,1,1)
  (same comment as for Manganese)
- Nitrogen oxides [air, non-urban air or from high stacks]: 1.5004e-8 kg; lognormal variance with pedigree 0.32839, pedigree (1,1,4,1,1)
  (same comment as for Methane, fossil)
- Cadmium [soil, industrial]: 2.5796e-5 kg; lognormal variance with pedigree 0.28929, pedigree (1,1,4,1,1)
  (same comment as for Nitrogen)
- Selenium [air, low population density, long-term]: 3.5856e-8 kg; lognormal variance with pedigree 0.5345, pedigree (1,1,4,1,1)
  (same comment as for Manganese)
- Sulfate [air, non-urban air or from high stacks]: 4.0221e-7 kg; lognormal variance with pedigree 0.32726, pedigree (1,1,4,1,1)
  (same comment as for Nitrate)
- Fluoride [soil, industrial]: 1.089e-5 kg; lognormal variance with pedigree 0.31818, pedigree (1,1,4,1,1)
  (same comment as for Nitrogen)
- Copper [air, low population density, long-term]: 3.4928e-6 kg; lognormal variance with pedigree 0.28351, pedigree (1,1,4,1,1)
  (same comment as for Manganese)
- Particulates, < 2.5 um [air, non-urban air or from high stacks]: 8.9562e-6 kg; lognormal variance with pedigree 0.20694, pedigree (1,1,4,1,1)
  (same comment as for Particulates, > 10 um)
- Arsenic [soil, industrial]: 1.3846e-6 kg; lognormal variance with pedigree 0.38544, pedigree (1,1,4,1,1)
  (same comment as for Nitrogen)
- Mercury [air, low population density, long-term]: 4.0447e-9 kg; lognormal variance with pedigree 0.48845, pedigree (1,1,4,1,1)
  (same comment as for Manganese)

## Extrapolations
This dataset has been extrapolated from year 2012 to the year of the calculation (2021). The uncertainty has been adjusted accordingly.
