# wind power plant construction, 2MW, offshore, fixed parts

Dataset: EcoSpold 2, unit process
Geography: GLO
Time period: 1991-01-01 to 2021-12-31
Technology level: current
Classification: ISIC rev.4 ecoinvent: 4220:Construction of utility projects
Classification: EcoSpold01Categories: wind power/production of components
Tags: infrastructure; ConvertedDataset; wind power
Scenario: Business-as-Usual
System model: Allocation, cut-off by classification
Generated by: Christian Bauer
Published in: Burger, B. 2007
Database: ecoinvent
isCopyrightProtected: true
accessRestrictedTo: 1

## General comment
This dataset represents the fixed parts of a 2 MW offshore wind power plant, based on the dimensions of an offshore wind power plant of the type Bonus 2 MW.
[This dataset was already contained in the ecoinvent database version 2. It was not individually updated during the transfer to ecoinvent version 3. Life Cycle Impact Assessment results may still have changed, as they are affected by changes in the supply chain, i.e. in other datasets. This dataset was generated following the ecoinvent quality guidelines for version 2. It may have been subject to central changes described in the ecoinvent version 3 change report (http://www.ecoinvent.org/database/ecoinvent-version-3/reports-of-changes/), and the results of the central updates were reviewed extensively. The changes added e.g. consistent water flows and other information throughout the database. The documentation of this dataset can be found in the ecoinvent reports of version 2, which are still available via the ecoinvent website. The change report linked above covers all central changes that were made during the conversion process.]

## Included activities start
From pasture land forseen for the construction of a wind power plant.

## Included activities end
This activity ends with the fixed parts of a constructed wind power plant, having a lifetime of 20 years. The dataset includes apart the materials for fixed parts of a wind power plant also the construction efforts and the land use. It is assumed that only the steel tower is disposed off after use. All other materials from the foundation and the network connection are assumed to be left in the ocean.

## Technology
Technical details of the modeled 2 MW offshore wind power plant
References:
Stiesdal H. (2001) Middelgrunden Offshore. A newsletter for customers and business associates, Bonus energy A/S. General technical description, Technical specification, Drawings and design, Bonus 2 MW offshore. Isager/Bogtryt/Offset, Svendborg, Denmark. www.bonus.dk

## Parameters
- Installed capacity: 350 MW; name capacity_installed_new; lognormal variance with pedigree 0.0038, pedigree (2,1,3,1,2)
  Literature value/statistics. New installed capacity of wind power in the world, offshore, 2008. [WWEA, 2009. World Wind Energy Report 2008. World Wind Energy Association, Bonn. Table p.12f and chapter "offshore wind energy", p.8]
  Uncertainty: Data from 2008.

## Reference product
- wind power plant, 2MW, offshore, fixed parts: 1 unit; name RP_amount_1; By-product classification allocatable product; CPC 53262: Power plants
  Modeled, based on "wind power plant, 2MW, offshore" - pdf-document on the dedicated talk page of ecoinvent (www.ecoinvent.org/documentation). Includes details for the fixed parts (tower, fundament, network connection) of the 2MW offshore wind power plant.
  EcoSpold01Location=OCE
  production volume 175 unit; name apv_windpowerplant; = capacity_installed_new/2
    The offshore wind turbines are represented by 2MW wind turbines. There were 350MW new installed capacity worldwide in 2008.
  property price 3.45184e6 EUR2005
    Data from the report in Energie-spiegel, Facts for the energy decisions of tomorrow N0. 20 /June 2012 from the Paul Scherrer Institut (PSI), table 2. Capital costs for a wind turbine are 1.8-2.5 1000CHF/kWel for a turbine onshore and 2.7-4.0 1000CHF/kWel for a turbine offshore). The average of onshore values is used for onshore turbines and for offshore values to calculate the price of offshore turbines. The capacity of the turbine is used to calculate the price. The windturbne blades (mobile parts) account for 18-20% of initial investment costs (http://www.marketsandmarkets.com/Market-Reports/rotor-blade-market-286.html). Therefore it is assumed that fixed parts account for 80% of initial investment costs.

## Inputs from technosphere
- copper, cathode: 3900 kg; name copper; source Stiesdal H. 2001; lognormal variance with pedigree 0.34, pedigree (1,1,5,1,1)
  Estimation. The individual offshore wind turbines are connected to a central point. The distance between each plant is 180m. A cable length of 200m is assumed (conductor cross-section 3150 mm2). The share on the cable which leads to the mainland is 175 m for each plant. Additionally the power line is considered within the tower with 60 m (conductor cross-section 31'500 mm2). For the power line in the tower extrapolations are made. It is assumed that the cable in the tower needs less protection against external influences than the submarine cable. For the plant an effective cable length of 435 m is assumed (200 m + 175 m + 60 m) and the mass of copper is 3900 kg.
  EcoSpold01Location=RER
  properties: wet mass 1 kg, dry mass 1 kg
- diesel, burned in building machine: 876 MJ; source Stiesdal H. 2001; lognormal variance with pedigree 0.34, pedigree (1,1,5,1,1)
  EcoSpold01Location=GLO
  Calculated value. The whole mass of the fundament (2000 t) is lifted 15 m (5 m up and down each, 5 m as an equivalent for horizontal movement), the plant (247'710 kg without network connection) is lifted 60 m. An efficiency factor of 20% is assumed for the crane. For the electricity consumption the formula of potential energy is used.
  properties: heating value, net 1 MJ
- gravel, round: 0 kg; source Stiesdal H. 2001; pedigree (1,1,1,1,1)
  EcoSpold01Location=CH
  Estimation.
  properties: wet mass 1 kg, dry mass 1 kg
- excavation, hydraulic digger: 52500 m3; source Stiesdal H. 2001; lognormal variance with pedigree 0.08, pedigree (1,1,5,1,1)
  EcoSpold01Location=RER
  Proxy. Is assumed as no excavation of seabed exists.
- wire drawing, copper: 3900 kg; = copper; source Stiesdal H. 2001; lognormal variance with pedigree 0.0406, pedigree (1,1,5,1,1)
  Estimation. Construction effort for the whole amount of copper.
  EcoSpold01Location=RER
- reinforcing steel: 80000 kg; name reinforcing_steel; source Stiesdal H. 2001; lognormal variance with pedigree 0.08, pedigree (1,1,5,1,1)
  Estimation. The share of reinforcing steel is estimated by (Schleisner, 1999). No waste treatment is modelled as it is assumed that the foundation of the wind power plant will remain in the ocean after use.
  Further references:
  Schleisner (1999): Life cycle assessment of a wind farm and related externalities. Riso National Laboratory, Roskilde, Denmark.
  EcoSpold01Location=RER
  properties: wet mass 1 kg, carbon content, fossil 0.004, dry mass 1 kg
- lead: 7580 kg; source Stiesdal H. 2001; lognormal variance with pedigree 0.08, pedigree (1,1,5,1,1)
  Estimation. For the network connection 7575 kg of low-allowed steel are assumed for the sheath of the cable. No waste treatment is modelled as it is assumed that the network connection of the wind power plant will remain in the ocean after use.
  EcoSpold01Location=RER
  properties: dry mass 1 kg, wet mass 1 kg
- concrete, normal: 872 m3; name concrete; source Stiesdal H. 2001; lognormal variance with pedigree 0.08, pedigree (1,1,5,1,1)
  EcoSpold01Location=CH
  Estimation. The fundament has a weight of 2000 t. The share of concrete is estimated by (Schleisner, 1999). No waste treatment is modelled as it is assumed that the foundation of the wind power plant will remain in the ocean after use.
  Further references:
  Schleisner (1999): Life cycle assessment of a wind farm and related externalities. Riso National Laboratory, Roskilde, Denmark.
  properties: water content 0.086758, wet mass 2380 kg, dry mass 2190 kg
- gravel, crushed: 0 kg; source Stiesdal H. 2001; pedigree (1,1,1,1,1)
  Estimation.
  EcoSpold01Location=CH
  properties: dry mass 1 kg, wet mass 1 kg
- welding, arc, steel: 228 m; source Scholzen F. 1991; lognormal variance with pedigree 0.05, pedigree (1,1,5,1,1)
  EcoSpold01Location=RER
  Estimation. For the tower the most common welding process (MAG-C-process) is assumed. Welding is accounted at a length of 3.8 m height of the tower. The expenses for material consumption are estimated with a weld of 0.166 kg/m and is rounded up generously. A total of 228 m of welding seam in different forms and strenghts are estimated.
- epoxy resin, liquid: 0 kg; source Hagedorn G. 1991; pedigree (1,1,1,1,1)
  EcoSpold01Location=RER
  Calculated Value. For the exterior painting of the tower (60 m height) epoxy resin is used for two paintings. A surface of 1094 m2 is extrapolated from the 800 kW power plant (50 m height).
  properties: wet mass 1 kg, dry mass 1 kg, carbon content, fossil 0.42325, heating value, net 12.82 MJ
- sheet rolling, steel: 122000 kg; = steel_lowalloyed; source Stiesdal H. 2001; lognormal variance with pedigree 0.0406, pedigree (1,1,5,1,1)
  EcoSpold01Location=RER
  Estimation. Construction effort for the whole amount of steel.
- steel, low-alloyed, hot rolled: 122000 kg; name steel_lowalloyed; source Stiesdal H. 2001; lognormal variance with pedigree 0.04, pedigree (1,1,5,1,1)
  Estimation. The tower of the plant consists of 98'400 kg of steel. Additionally 15% are estimated for components and service platforms (14'760 kg). 50 kg of steel are used for welding. For the network connection 8766 kg of low-allowed steel are assumed for the sheath of the cable.
  EcoSpold01Location=RER
  properties: wet mass 1 kg, carbon content, fossil 0.005, dry mass 1 kg
  note on carbon content, fossil: Low alloyed steel composition given in Tab. 3.2 ecoinvent v2.2 report 10_partII. Steel assumed to have a C content of 0.5%
- scrap steel: 0 kg; name BP_amount_1
  Estimation. It is assumed that only the tower is broken down after the lifetime of the power plant. It is assumed that everything else is left in the ocean.
  production volume 0 kg
    Calculated from production volume of reference product using the relative outputs.
  property price 0 EUR2005; name BP_amount_1_price_EUR2005
  property carbon content, non-fossil 0; name C_content_non_fossil
  property water in wet mass 0 kg; name WWM
  property carbon content, fossil 0; name C_content_fossil
  property water content 0; name water_content
  properties: dry mass 1 kg, wet mass 1 kg
- polyvinylchloride, bulk polymerised: 3500 kg; source Stiesdal H. 2001; lognormal variance with pedigree 0.08, pedigree (1,1,5,1,1)
  EcoSpold01Location=RER
  Calculated value. As a filler for the submarine cable PVC is assumed. In(Schleisner, 1999) PEX is assumed instead. The mass per meter is proportional to the installed power (40 MW/5 MW) and multiplied by 8.
  Further references:
  Schleisner (1999): Life cycle assessment of a wind farm and related externalities. Riso National Laboratory, Roskilde, Denmark.
  properties: wet mass 1 kg, dry mass 1 kg, carbon content, fossil 0.387097, heating value, net 21.5 MJ
  note on carbon content, fossil: Monomer is vynyl chloride, C2H3Cl (ecoinvent v2.2 report 11_II). MW=62 g/mol
- gravel, round: 61.62, 236938 kg (2 entries); source Stiesdal H. 2001; lognormal variance with pedigree 0.08, pedigree (1,1,5,1,1)
  EcoSpold01Location=CH
  Estimation.
- gravel, crushed: 12406.2, 2709.97, 16.38, 248.097, 47619.4 kg (5 entries); source Stiesdal H. 2001; lognormal variance with pedigree 0.08, pedigree (1,1,5,1,1)
  Estimation.
  EcoSpold01Location=CH
- epoxy resin, liquid: 95.178, 451.822 kg (2 entries); source Hagedorn G. 1991; lognormal variance with pedigree 0.08, pedigree (1,1,5,1,1)
  (same comment as for epoxy resin, liquid)
- scrap steel: -23959.9, -30.3564, -74409.7 kg (3 entries)
  (same comment as for scrap steel)
  production volume 1.722e7 kg

## Inputs from nature
- Transformation, to seabed, infrastructure [natural resource, land]: 22.5 m2; lognormal variance with pedigree 0.08, pedigree (1,1,5,1,1)
  Estimation.
- Transformation, from seabed, unspecified [natural resource, land]: 22.5 m2; lognormal variance with pedigree 0.08, pedigree (1,1,5,1,1)
  Estimation. Merely the area for the fundament anchored in the seabed is taken into account.
- Occupation, seabed, infrastructure [natural resource, land]: 450 m2*year; lognormal variance with pedigree 0.08, pedigree (1,1,5,1,1)
  Estimation.

## Sampling procedure
Data are from a plant of the type Bonus 2 MW, installed at the wind farm Middelgrunden on the coast of Denmark.

## Extrapolations
This dataset has been extrapolated from year 2002 to the year of the calculation (2021). The uncertainty has been adjusted accordingly.

## Review by Roland Hischier 2011-09-23
Transfer of documentation done.

## Review by Thomas Nemecek 2005-07-19
Passed.
