# treatment of electronics scrap from control units

Dataset: EcoSpold 2, unit process
Geography: RER
Time period: 1990-01-01 to 2021-12-31
Technology level: current
Classification: ISIC rev.4 ecoinvent: 3830:Materials recovery
Classification: EcoSpold01Categories: waste management/building demolition
Tags: Treatment; ConvertedDataset
Scenario: Business-as-Usual
System model: Allocation, cut-off by classification
Generated by: Roland Hischier
Published in: Althaus H.-J. 2007
Database: ecoinvent
isCopyrightProtected: true
accessRestrictedTo: 1

## General comment
The dismantled control unit has a composition of 46% steel (housing), 32% plastics, 14% printed wiring boards and 8% cables (various types).
[This dataset was already contained in the ecoinvent database version 2. It was not individually updated during the transfer to ecoinvent version 3. Life Cycle Impact Assessment results may still have changed, as they are affected by changes in the supply chain, i.e. in other datasets. This dataset was generated following the ecoinvent quality guidelines for version 2. It may have been subject to central changes described in the ecoinvent version 3 change report (http://www.ecoinvent.org/database/ecoinvent-version-3/reports-of-changes/), and the results of the central updates were reviewed extensively. The changes added e.g. consistent water flows and other information throughout the database. The documentation of this dataset can be found in the ecoinvent reports of version 2, which are still available via the ecoinvent website. The change report linked above covers all central changes that were made during the conversion process.]

## Included activities end
This module includes the dismantling of the electronic control equipment. The included processes are: transport to dismantling site and dismantling. The further treatment itself is not part of this dataset here.

## Geography
Data used has no specific geographical origin (literature values).

## Technology
manual dismantling of the electronics for control units, assuming that big metal pieces are recycled, big plastic parts incinerated, and that cables and PWB are recycled through further treatment steps.

## Reference product
- electronics scrap from control units: -1 kg; name electronics_scrap_RP; CPC 39: Wastes or scraps; By-product classification Waste
  EcoSpold01Location=RER
  production volume 1.32237 kg; name RP_PV_1
    This is a placeholder value that does not reflect real-world production volumes. This dataset does not currently require a real-world production volume to work in the database framework, and no actual data were collected yet. This has no negative effect on the results of the ecoinvent database. The placeholder value of this activity was scaled according to the nominal GDP of 2005 (source: United Nations, http://data.un.org/Glossary.aspx?q=GDP+%28current+US%24%29, accessed 20130726) to reflect an appropriate share of the global production volume, which is also a placeholder value.
  property price 0 EUR2005; name electronics_scrap_RP_price_EUR2005
    Waste products are assigned a price of zero as they are assumed to require further treatment.
  property carbon content 0.337281
    carbon content on a dry matter basis (reserved; not for manual entry)
  properties: water content 0, heating value, net 0 MJ, wet mass 1 kg, water in wet mass 0 kg, carbon content, fossil 0.337146, carbon content, non-fossil 0.00013442, dry mass 1 kg, carbon allocation 0.337281 kg

## Inputs from technosphere
- used printed wiring boards: -0.14 kg; name used_PWB_BP; lognormal variance with pedigree 0.1786, pedigree (4,5,5,5,5)
  EcoSpold01Location=GLO
  Based on composition of this device
  Uncertainty: based on composition of this device
  production volume 0.185132 kg; = ABS(RP_PV_1 * (used_PWB_BP / electronics_scrap_RP))
    Calculated from the production volume of waste electronics from control units in proportion to the respective output amounts.
  property price 0 EUR2005; name used_PWB_BP_price_EUR2005
  properties: wet mass 1 kg, carbon content, non-fossil 0.000960142, dry mass 1 kg, carbon content, fossil 0.193742
  note on carbon content, non-fossil: Composition of printed wiring boards used to calculate C content
- used cable: -0.08 kg; name used_cable_BP; lognormal variance with pedigree 0.1786, pedigree (4,5,5,5,5)
  Based on composition of this device
  Uncertainty: based on composition of this device
  production volume 0.10579 kg; = ABS(RP_PV_1 * (used_cable_BP / electronics_scrap_RP))
    Calculated from production volume of reference product using the relative outputs.
  property price 0 EUR2005; name used_cable_BP_price_EUR2005
  properties: dry mass 1 kg, carbon content, fossil 0.27472, wet mass 1 kg
  note on carbon content, fossil: According to the European company, 1 kg cable is split up into 0.66 kg of copper and 0.34 kg of plastics (ecoinvent v2.2 report 18_V, pg 97). Plastic C content (0.808) was calculated using data in Tab A.2, ecoinvent v2.2 report 13_I.
- scrap steel: 0 kg; name BP_amount_1; pedigree (1,1,1,1,1)
  Calculated value; the scrap steel as an exchange was not present in ecoinvent v2 due to cut-off rules.
  Uncertainty: based on composition of this device
  production volume 0 kg
    Calculated from production volume of reference product using the relative outputs.
  property price 0 EUR2005; name BP_amount_1_price_EUR2005
  properties: dry mass 1 kg, wet mass 1 kg
- waste plastic, industrial electronics: -0.32 kg; name waste_plastics_BP; lognormal variance with pedigree 0.1786, pedigree (4,5,5,5,5)
  EcoSpold01Location=CH
  Based on composition of this device
  Uncertainty: based on composition of this device
  production volume 0.423158 kg; = ABS(RP_PV_1 * (waste_plastics_BP / electronics_scrap_RP))
    (same comment as for used printed wiring boards)
  property price 0 EUR2005; name waste_plastics_BP_price_EUR2005
  properties: water content 0.180638, heating value, net 34.78 MJ, carbon content, fossil 0.81386, dry mass 0.847 kg, wet mass 1 kg
  note on carbon content, fossil: C content in 1 kg DM was calculated using data in Tab A.2, ecoinvent v2.2 report 13_I
- scrap steel: -0.459418, -0.000582066 kg (2 entries); lognormal variance with pedigree 0.1786, pedigree (4,5,5,5,5)
  (same comment as for scrap steel)
  production volume 0.60829 kg

## Sampling procedure
own estimations & literature

## Extrapolations
This dataset has been extrapolated from year 2005 to the year of the calculation (2021). The uncertainty has been adjusted accordingly.

## Review by Rolf Frischknecht 2007-11-08
passed.
