# water production, decarbonised

Dataset: EcoSpold 2, unit process
Geography: BR
Time period: 2010-01-01 to 2021-12-31
Technology level: current
Classification: ISIC rev.4 ecoinvent: 3600:Water collection, treatment and supply
Tags: recontextualization
Scenario: Business-as-Usual
System model: Allocation, cut-off by classification
Generated by: Laura Rubio
Published in: Jungbluth, N. 2007
Database: ecoinvent
isCopyrightProtected: true
accessRestrictedTo: 1

## General comment
This dataset represents production of 1 kg of decarbonised water. It is a rough estimation for the decarbonation process.

This dataset was created specifically for use in water cooling towers and flue gas scrubbers. The decarbonisation process is meant to remove organic suspended matter, as well as calcium bicarbonate.
This dataset is a copy of the global dataset and was created with the purpose to regionalize the production of decarbonised water. The production volume has been adapted. The original data for the inventory is described in Jungbluth (2017), section 13.3.1.
Reference:
Jungbluth N. (2007) Erdöl. In: Sachbilanzen von Energiesystemen: Grundlagen für den ökologischen Vergleich von Energiesystemen und den Einbezug von Energiesystemen in Ökobilanzen für die Schweiz (ed. Dones R.). Swiss Centre for Life Cycle Inventories, Dübendorf, CH.
[This dataset is meant to replace the following datasets:]

## Included activities start
From the intake of raw surface water into the plant.

## Included activities end
This dataset ends with the production of decarbonised water. It includes use of chemicals and some emissions for the treatment of water used in power plants.

## Geography
Extrapolated from data provided by CH company.The uncertaininty was adjusted accordingly

## Technology
Water treatment in power plants by precipitation or carbonates for the use as cooling water.
Decarbonazation is a method that removes carbon dioxide from water very effectively to minimizes the potential of carbonates precipitation of mineral salts. Moreover, reducing the carbon dioxide level in feed water also diminishes the ionic load on ion exchange processes mostly used in water treatment systems (Technology Deegremont, 2017).
The treatment involves feeding water into the top of a tower, at atmospheric pressure while air is injected from the bottom of the tower in a countercurrent flow design. When water bicarbonates are in contacted with air, cat ion exchanging processes are carried out converting them to carbonic acids, which easily break into water and carbon dioxide (Paramount, 2015). As the air moves to the top of the tower, it starts saturating with CO2 when contacting the water, where it is finally removed. High surface contact area in the tower bed, enhances CO2 transformation from the liquid to the gas phase (Technology Deegremont, 2017).

## Time period
Time of publication.

## Reference product
- water, decarbonised: 1 kg; name RP; CPC 18000: Natural water; By-product classification allocatable product; CAS 7732-18-5
  production volume 1.2721e12 kg; name RP_PV; = 1.2721E+09*1000
    Estimated value based on the total industrial water withdrawal according to AQUASTAT and assuming that 10% of the industrial water withdrawal is used for decarbonised water production.
    Source for industrial water withdrawals: Table 7.1 in World Water Assessment Programme. 2009. The United Nations World Water Development Report 3: Water in a Changing World. Paris: UNESCO, and London: Earthscan.
    Industrial water withdrawals value was taken from the AQUASTAT (FAO's global water information system, developed by the Land and Water Division and the most quoted source on global water statistics). This value comprises industrial water withdrawal which can include water from primary renewable and secondary freshwater resources, as well as water from over-abstraction of renewable groundwater or withdrawal from fossil groundwater, direct use of agricultural drainage water, direct use of (treated) wastewater, and desalinated water. This sector refers to self-supplied industries not connected to the public distribution network. The ratio between net consumption and withdrawal is estimated at less than 5%. It includes water for the cooling of thermoelectric and nuclear power plants, but it does not include hydropower. Water withdrawn by industries that are connected to the public supply network is generally included in municipal water withdrawal.
  property price 0.00046 EUR2005
    Converted from EU price by using Purchasing Power Parities (0.8458 in 2003 and 0.8426 in 2004)
  property carbon content 0
    carbon content on a dry matter basis (reserved; not for manual entry)
  properties: carbon content, fossil 0, carbon content, non-fossil 0, water in wet mass 1 kg, dry mass 0 kg, wet mass 1 kg, carbon allocation 0 kg

## Inputs from technosphere
- lime, hydrated, packed: 2.06e-7 kg; lognormal variance with pedigree 0.0986, pedigree (4,5,5,5,4)
  Literature information for a modern power plant taken from the 'water production and supply, decarbonised, GLO' dataset (accessed 20171214) as it was considered adequate also for this dataset.
  properties: wet mass 1 kg, water content 0.00300903, dry mass 0.997 kg
- iron (III) chloride, without water, in 40% solution state: 2.21e-7 kg; lognormal variance with pedigree 0.0986, pedigree (4,5,5,5,4)
  (same comment as for lime, hydrated, packed)
  properties: dry mass 1 kg, wet mass 1 kg
- hydrochloric acid, without water, in 30% solution state: 1.55e-8 kg; lognormal variance with pedigree 0.0986, pedigree (4,5,5,5,4)
  Literature information for a modern power plant, split of old data. This value was taken from the 'water production and supply,decarbonised, GLO' dataset (accessed 20171214) as it was considered adequate also for this dataset
  properties: heating value, net 3.32 MJ, wet mass 1 kg, dry mass 1 kg
- decarbonising waste: -0.000882857 kg; name ByP_01; = ((water_river_input*0.02)*1000*0.03/0.7)*-1; lognormal variance with pedigree 0.1647, pedigree (2,2,3,5,5)
  Estimated value copied from the amount of sewage sludge output in the dataset "water production, deionised" (GLO) as it was also considered adequate for this dataset. This value is based on the EPA guideline "Drinking Water Treatment Plant Residuals Management Technical Report" in which typical lime softening sludge volumes produced by water treatment plants are computed. 2% of the total water input was assumed as the produced sludge. The sludge contains calcium carbonate, magnesium hydroxide, other divalent ions, natural organic matter from the source water, inorganics, suspended solids, microorganisms, and radionuclides. Metals found in the softening sludges include calcium, magnesium, arsenic, barium, cadmium, chromium, lead, mercury, selenium, and silver (Cornwell, 1999). (Retrieved from: https://www.epa.gov/sites/production/files/2015-11/documents/dw-treatment-residuals-mgmt-tech-report-sept-2011.pdf)
  Moreover, based on the same EPA guideline, for lime softening carried out in conventional gravity sedimentation basins, the solids concentration of the sludge ranges from 2 to 4 percent. A solids concentration of 3 percent is assumed for the decarbonising waste. As the activity modelling the treatment of this waste is modelled based on a solids concentration of 70%, the amount is scaled accordingly.
  production volume 1.12308e9 kg; = ByP_01/ RP* RP_PV
    Calculated from the production volume of water, decarbonised, at user in proportion to the respective output amounts.
  property price 0 EUR2005; name ByP_01_price_EUR2005
  property wet mass 1 kg; name WM_BP01
  property water in wet mass 0.3 kg; name WWM_BP01; = WM_BP01 - DM_BP01
  property dry mass 0.7 kg; name DM_BP01
  properties: water content 0.428571
- electricity, medium voltage: 0.000125 kWh; lognormal variance with pedigree 0.1258, pedigree (2,3,3,5,5)
  Calculated value based on a LCA study: " Life cycle assessment of central softening of very hard drinking water" -B. Godskesen et al. This data was considered adequated for this dataset, although the registed data is for softened water with chemicals.
- wastewater, unpolluted: -2.52749e-5 m3; name BP_amount_1; = ((water_river_input- RP/1000-(ByP_01*-1)/1000*WWM_BP01)*(1-0.15))*-1; lognormal variance with pedigree 0.0447, pedigree (2,2,3,5,1)
  Calculated value based on literature values and expert opinion. This value was taken from the dataset "water production and supply, decarbonised" (GLO) dataset (accessed on 2017-12-14) as it was considered adequate also for this dataset. 15% of water lost during production of decarbonised water is considered to be lost to air. The rest (1-0.15=85%) is considered to be released as an emission of water to water.
  production volume 3.21522e7 m3; = RP_PV * (BP_amount_1 / RP)
    Calculated from production volume of reference product using the relative outputs.
  property price 0 EUR2005; name BP_amount_1_price_EUR2005
  properties: carbon content, non-fossil 0.00178991, wet mass 1000 kg, water content 2962.17, carbon content, fossil 0.00178991, dry mass 0.337476 kg
  note on carbon content, fossil: Assumed to be like in tap water. Bicarbonate content is 2.93 mol/m3. CO2 content is 0.1 mol/m3 (ecoinvent v2.2 report 8, Tab 93.1).

## Inputs from nature
- Water, river [natural resource, in water]: 0.00103 m3; name water_river_input; lognormal variance with pedigree 0.082, pedigree (5,5,3,5,1)
  Estimation taken from the 'water production and supply, decarbonised, GLO' dataset (accessed 20171214) as it was considered adequate also for this dataset.
  Uncertainty: E

## Emissions to nature
- Chloride [water, surface water]: 1.6e-7 kg; lognormal variance with pedigree 0.064, pedigree (3,4,4,5,1)
  Calculation taken from the 'water production and supply, decarbonised, GLO' dataset (accessed 20171214) as it was considered adequate also for this dataset.
  Uncertainty: C
- Water [air, unspecified]: 4.46027e-6 m3; name water_to_air_unspecified; = (water_river_input- RP/1000-(ByP_01*-1)/1000* WWM_BP01)*0.15; lognormal variance with pedigree 0.0447, pedigree (2,2,3,5,1)
  (same comment as for wastewater, unpolluted)
  property fraction, origin: salt water 0; name fraction_origin_salt_water
  property fraction, origin: unspecified 0; name fraction_origin_unspecified
  property fraction, origin: fresh water 1; name fraction_origin_fresh_water

## Sampling procedure
Literature and information of plant manufacturer. The inventory data is published in Jungbluth (2007), section 13.3.1.

Reference:
Jungbluth N. (2007) Erdöl. In: Sachbilanzen von Energiesystemen: Grundlagen für den ökologischen Vergleich von Energiesystemen und den Einbezug von Energiesystemen in Ökobilanzen für die Schweiz (ed. Dones R.). Swiss Centre for Life Cycle Inventories, Dübendorf, CH.

## Extrapolations
This dataset has been extrapolated from year 2017 to the year of the calculation (2021). The uncertainty has been adjusted accordingly.

## Review by Philippe Loubet 2018-02-19
The overall quality of these datasets is acceptable.

In the future it would be desirable to :
- include decarbonization process for other applications than water cooling systems
- consider different water quality types for this process (eg. tap water or raw river water)
- consider geographical representativness (that could for example modify notably the hardness of water
