# cooling energy, from natural gas, at cogen unit with absorption chiller 100kW

Dataset: EcoSpold 2, unit process
Geography: CH
Time period: 2000-01-01 to 2021-12-31
Technology level: current
Classification: ISIC rev.4 ecoinvent: 3530:Steam and air conditioning supply
Classification: EcoSpold01Categories: cooling/cogeneration
Tags: ConvertedDataset
Scenario: Business-as-Usual
System model: Allocation, cut-off by classification
Generated by: Alex Primas
Published in: Primas A. 2007
Database: ecoinvent
isCopyrightProtected: true
accessRestrictedTo: 1

## General comment
The module reflects an absorption chiller operated with heat from a natural gas operated cogeneration unit (allocation exergy). Life time for the total system assumed with 20 years or 20'000 full operating hours.
[This dataset was already contained in the ecoinvent database version 2. It was not individually updated during the transfer to ecoinvent version 3. Life Cycle Impact Assessment results may still have changed, as they are affected by changes in the supply chain, i.e. in other datasets. This dataset was generated following the ecoinvent quality guidelines for version 2. It may have been subject to central changes described in the ecoinvent version 3 change report (http://www.ecoinvent.org/database/ecoinvent-version-3/reports-of-changes/), and the results of the central updates were reviewed extensively. The changes added e.g. consistent water flows and other information throughout the database. The documentation of this dataset can be found in the ecoinvent reports of version 2, which are still available via the ecoinvent website. The change report linked above covers all central changes that were made during the conversion process.]

## Included activities end
The module includes heat input from a 160kWel cogeneration unit, electricity and water needed for operation and infrastructure (absorption chiller, air cooler, piping).

## Geography
Natural gas input for cogeneration unit and electricity demand modelled for Switzerland. Process applicable in central European conditions.

## Technology
Single stage absorption chiller with 100 kW cooling capacity connected to a 250 kW hybrid air cooler. Seasonal performance factor (SPF) of 0.6. Supply temperature of the chilled water 6°C. Operated with heat of a temperature of 85- 100°C.

## Parameters
- fraction, cooling water, once-through system, to air: 0.004 dimensionless; name fraction_CW_OT_to_air; lognormal variance with pedigree 0.0413, pedigree (2,3,1,3,1)
  Calculated based on literature value (Scown, C.D., 2011, Water Footprint of U.S. Transportation Fuels and supplying information of the article) (Vionnet, S., Quantis Water Database - Technical Report, 2012).
- fraction, water, decarbonised, to air: 0.3875 dimensionless; name fraction_WDC_to_air; = fraction_CW_to_air; lognormal variance with pedigree 0.092025, pedigree (4,4,3,2,4)
  Calculated value. See comments in the other parametres present in this dataset. Decarbonised water is considered to be always used as cooling water, thus cooling water fractions to air are applied to all carbonised water input flows to calculate the amount of water consumed in the processes.
- fraction, cooling water, to air: 0.3875 dimensionless; name fraction_CW_to_air; = (0.5*fraction_CW_OT_to_air)+(0.5*fraction_CW_R_to_air); lognormal variance with pedigree 0.092025, pedigree (4,4,3,2,4)
  Calculated value based on literature value (see comments of the other parametres present in this dataset) and expert opinion. In the case when no industry/literature data are available about the type of cooling or directly fraction, cooling water, to air specific for the process a default assumption is applied. It is assumed that the once-through cooling system is used in 50% of all cases and recirculating system is used in another 50% of all cases.
- fraction, cooling water, cooling pond system, to air: 0.032 dimensionless; name fraction_CW_CP_to_air; lognormal variance with pedigree 0.0413, pedigree (2,3,1,3,1)
  (same comment as for fraction, cooling water, once-through system, to air)
- fraction, cooling water, recirculating system, to air: 0.771 dimensionless; name fraction_CW_R_to_air; lognormal variance with pedigree 0.0413, pedigree (2,3,1,3,1)
  (same comment as for fraction, cooling water, once-through system, to air)

## Reference product
- cooling energy: 1 MJ; By-product classification allocatable product; CPC 69220: Distribution of steam, hot water and air-conditioning supply through mains (on own account)
  EcoSpold01Location=CH
  production volume 360000 MJ
    Unknown
    Cooling energy from one unit only (0.000000139 units/MJ cooling energy)
  property price 0.020684 EUR2005
    Calculated based on inputs: The price of the product has been calculated as a sum of the values of the material and energy inputs for this product. This value is therefore a rough estimation. It may underestimate the real price since there are additional expenses when producing any product. These expences can include for example labour costs, treatment of waste materials and profit for the producer. Please consider carefully whether this level of data quality is acceptable for your application.

## Inputs from technosphere
- electricity, low voltage: 0.02 kWh; lognormal variance with pedigree 0.072025, pedigree (3,4,5,2,3)
  Data based on average process efficiency
  EcoSpold01Location=CH
  Uncertainty: data based on average process efficiency
- water, decarbonised: 1.5 kg; name water_decarbonised_input; lognormal variance with pedigree 0.072025, pedigree (3,4,5,2,3)
  Data based on average process efficiency
  EcoSpold01Location=RER
  Uncertainty: data based on average process efficiency
  properties: wet mass 1 kg
- absorption chiller, 100kW: 1.39e-7 unit; lognormal variance with pedigree 0.370025, pedigree (4,4,5,2,1)
  EcoSpold01Location=CH
  Uncertainty of life time
  Uncertainty: uncertainty of life time
- heat, central or small-scale, natural gas: 1.67 MJ; lognormal variance with pedigree 0.054025, pedigree (3,4,5,2,1)
  Uncertainty of operation temperatures of source and supply
  EcoSpold01Location=CH
  Uncertainty: uncertainty of operation temperatures of source and supply
  properties: heating value, net 1 MJ

## Inputs from nature
- Heat, waste [air, urban air close to ground]: 0.072 MJ; lognormal variance with pedigree 0.072025, pedigree (3,4,5,2,3)
  Uncertainty electricity demand
  Uncertainty: uncertainty electricity demand

## Emissions to nature
- Water [air, unspecified]: 0.00058125 m3; name water_to_air_unspecified; = (water_decarbonised_input/1000*fraction_WDC_to_air); lognormal variance with pedigree 0.0807, pedigree (2,2,5,1,1)
  Calculated value based on literature values and expert opinion. See comments in the parametres' comment field.
  property fraction, origin: unspecified 0; name fraction_origin_unspecified
  property fraction, origin: fresh water 1; name fraction_origin_fresh_water
  property fraction, origin: salt water 0; name fraction_origin_salt_water
- Water [water, unspecified]: 0.00091875 m3; name water_to_water_unspecified; = (water_decarbonised_input/1000)*(1-fraction_WDC_to_air); lognormal variance with pedigree 0.0807, pedigree (2,2,5,1,1)
  (same comment as for Water)
  property fraction, origin: salt water 0; name fraction_origin_salt_water_Ww
  property carbon content, non-fossil 0; name C_content_non_fossil
  property water in wet mass 1000 kg; name WWM
  property dry mass 0 kg; name DM
  property wet mass 1000 kg; name WM
  property carbon content, fossil 0; name C_content_fossil
  property fraction, origin: unspecified 0; name fraction_origin_unspecified_Ww
  property fraction, origin: fresh water 1; name fraction_origin_fresh_water_Ww

## Sampling procedure
Literature data and manufacturer information

## Extrapolations
This dataset has been extrapolated from year 2005 to the year of the calculation (2021). The uncertainty has been adjusted accordingly.

## Review by Rolf Frischknecht 2007-08-13
passed
none
