# acetic anhydride production, ketene route

Dataset: EcoSpold 2, unit process
Geography: RER
Time period: 1981-01-01 to 2021-12-31
Technology level: current
Classification: ISIC rev.4 ecoinvent: 2011:Manufacture of basic chemicals
Classification: EcoSpold01Categories: chemicals/organics
Tags: ConvertedDataset
Scenario: Business-as-Usual
System model: Allocation, cut-off by classification
Share of production covered: 100 %
Generated by: Jürgen Sutter
Published in: Sutter, J. 2007
Database: ecoinvent
isCopyrightProtected: true
accessRestrictedTo: 1

## General comment
This data represents the production of 1 kg of acetic anhydride from ketene. Raw materials and energy consumptions are modelled with literature data. The emissions are estimated. Infrastructure is included with a default value.
[This dataset was already contained in the ecoinvent database version 2. It was not individually updated during the transfer to ecoinvent version 3. Life Cycle Impact Assessment results may still have changed, as they are affected by changes in the supply chain, i.e. in other datasets. This dataset was generated following the ecoinvent quality guidelines for version 2. It may have been subject to central changes described in the ecoinvent version 3 change report (http://www.ecoinvent.org/database/ecoinvent-version-3/reports-of-changes/), and the results of the central updates were reviewed extensively. The changes added e.g. consistent water flows and other information throughout the database. The documentation of this dataset can be found in the ecoinvent reports of version 2, which are still available via the ecoinvent website. The change report linked above covers all central changes that were made during the conversion process.]

## Included activities start
From the reception of acetic acid at the factory gate.

## Included activities end
This activity ends with 1 kg of acetic anhydride from ketene, 100% at the factory gate. The dataset includes the input materials, energy uses, infrastructure and emissions.

## Geography
The inventory is modelled for Europe.

## Technology
The ketene process for the production of acetic anhydride proceeds in two steps: the thermal cleavage of acetic acid to form ketene and the reaction of ketene with acetic acid.
Hot acetic acid vapor is broken into ketene and water at 700 – 750 °C in the presence of traces of phos-phoric acid catalyst. The pressure in the reactor is generally reduced so that the ketene can be isolated before it reacts with acetic acid or with water. The cleavage takes place in a multicoil reactor with coils made of highly heat-resistant steel alloys. Triethyl phosphate is employed as the catalyst.
The above figure shows how the vacuum process operates. Acetic acid is fed continuously into the evaporator (a). The acetic acid vapor leaving the evaporator passes over the catalyst evaporator (b), which is supplied continuously with catalyst, and thence into the ketene oven (c). The acetic acid is heated (d) and then cleaved (e). As soon as the cracked gases have left the oven, ammonia is added to prevent the ketene from reacting with the water or with the remaining acetic acid. For the same reason, and also to remove condensable gases, the hot gas is cooled in combined water and brine condensers (f), (g). A 40 – 48 % aqueous solution of acetic acid condenses at about 0 °C and is separated (h) from the cleavage gas (0 – 10 °C). About 4 – 8 % of this acetic acid results from the reaction of the condensed acetic anhydride with water.
Two processes are available for the reaction of ketene with acetic acid. The classical scrubber process is being replaced gradually by the Wacker process with liquid-ring pumping. After the reaction with the ketene with acetic acid, the raw anhydride is distilled.
References:
Held, H., Rengstl, A., Mayer, D.: Acetic anhydride and mixed fatty acid anhy-drides. In: Ullmann's Encyclopedia of Industrial Chemistry, Seventh Edi-tion, 2005 Electronic Release (ed. Fiedler E., Grossmann G., Kersebohm D., Weiss G. and Witte C.). 7 th Electronic Release Edition. Wiley InterScience, New York, Online-Version under: http://www.mrw.interscience.wiley.com/ueic/articles/a01_045/

## Time period
Time of publications

## Parameters
- fraction, cooling water, once-through system, to air: 0.004 dimensionless; name fraction_CW_OT_to_air; lognormal variance with pedigree 0.0413, pedigree (2,3,1,3,1)
  Calculated based on literature value (Scown, C.D., 2011, Water Footprint of U.S. Transportation Fuels and supplying information of the article) (Vionnet, S., Quantis Water Database - Technical Report, 2012).
- fraction, water, deionised, to air: 0.205 dimensionless; name fraction_WDI_to_air; = fraction_PW_to_air; lognormal variance with pedigree 0.092025, pedigree (4,4,3,2,4)
  Calculated value. See comment in the other parametres present in this dataset. Deionised water is considered to be always used as process water, thus process water fractions to air are applied to all deionised water input flows to calculate the amount of water consumed in the processes.
- fraction, cooling water, recirculating system, to air: 0.771 dimensionless; name fraction_CW_R_to_air; lognormal variance with pedigree 0.0413, pedigree (2,3,1,3,1)
  (same comment as for fraction, cooling water, once-through system, to air)
- fraction, cooling water, cooling pond system, to air: 0.032 dimensionless; name fraction_CW_CP_to_air; lognormal variance with pedigree 0.0413, pedigree (2,3,1,3,1)
  (same comment as for fraction, cooling water, once-through system, to air)
- fraction, cooling water, to air: 0.3875 dimensionless; name fraction_CW_to_air; = (0.5*fraction_CW_OT_to_air)+(0.5*fraction_CW_R_to_air); lognormal variance with pedigree 0.092025, pedigree (4,4,3,2,4)
  Calculated value based on literature value (see comments of the other parametres present in this dataset) and expert opinion. In the case when no industry/literature data are available about the type of cooling or directly fraction, cooling water, to air specific for the process a default assumption is applied. It is assumed that the once-through cooling system is used in 50% of all cases and recirculating system is used in another 50% of all cases.
- fraction, process water, to air: 0.205 dimensionless; name fraction_PW_to_air; lognormal variance with pedigree 0.092025, pedigree (4,4,3,2,4)
  Literature value (Statistics Canada, 2007 & Shaffer, K.H., 2008, Consumptive water use in the Great Lakes Basin, USGS) (Vionnet, S., Quantis Water Database - Technical Report, 2012).

## Reference product
- acetic anhydride: 1 kg; CPC 34120: Industrial monocarboxylic fatty acids; acid oils from refining; By-product classification allocatable product; CAS 108-24-7
  Acetic anhydride is a colourless liquid with a pungent odor and is strongly lachrymatory. It is miscible with polar solvents and dissolves in cold alcohol with slow decomposition.
  Acetic anhydride is used chiefly as an acetylating and dehydrating agent; it is used on a large scale for the acetylation of cellulose. Other areas of application for acetic anhydride are the production of poly(methylacrylimide) hard foam, acetylated plastic auxiliaries, explosives, particularly hexogen production, the production of certain types of brake fluids, the production of auxiliaries for drilling fluids, the detergent industry, for the production of cold - bleaching activators, the dyeing industry, in the preparation of organic intermediates, in the production of pharmaceuticals, in the food industry, flavors and fragrances, and herbicides such as metolachlor (Dual) and alachlor (Lasso).
  EcoSpold01Location=RER
  production volume 3.32024e8 kg
    Unknown
    production capacity according to OECD HIGH PRODUCTION VOLUME CHEMICALS PROGRAM SIDS INITIAL ASSESSMENT REPORT * 80% capacity utilisation * ketene route 77% (ecoinvent v2)
  property price 0.691 EUR2005
    Temporary price data. Calculated as 90% of purchasers price based on: Source: 28 August 2006 issue of Chemical Market Reporter (ICIS)
  property heating value, net 21.38 MJ
    LHV is calculated based on the elemental composition of the substance. Based on the CAS number of the substance (000108-24-7), the chemical formula of the substance is found to be: C4H6O3, (PubChem 2020).
    Reference: Kim, S., Chen, J., Cheng, T., Gindulyte, A., He, J., He, S., Li, Q., Shoemaker, B. A., Thiessen, P. A., Yu, B., Zaslavsky, L., Zhang, J., & Bolton, E. E. (2019). PubChem 2019 update: improved access to chemical data. Nucleic acids research, 47(D1), D1102–D1109. https://doi.org/10.1093/nar/gky1033
  property carbon content 0.470588
    carbon content on a dry matter basis (reserved; not for manual entry)
  properties: carbon content, fossil 0.470588, water content 0, carbon content, non-fossil 0, water in wet mass 0 kg, dry mass 1 kg, wet mass 1 kg, carbon allocation 0.470588 kg

## Inputs from technosphere
- chemical factory, organics: 4e-10 unit; lognormal variance with pedigree 0.448, pedigree (4,5,5,5,5)
  EcoSpold01Location=RER
  Estimation. Data was estimated based on the dataset "chemical plant, organics". This module assumes a built area of about 4.2 ha, an average output of 50'000 t/a, and plant life of fifty years. The estimated value is 4.00 E-10 units per kg of produced chemical.
  Uncertainty: Estimation
- electricity, medium voltage: 0.365247 kWh; source Chauvel, A. 1989; lognormal variance with pedigree 0.0707, pedigree (1,3,5,3,1)
  EcoSpold01Location=UCTE
  Estimation.
  Further references:
  Naran Lala, 2004. Acetic anhydride plant plant. Naran Lala PVT Ltd., Gujarat, India. Retrieved 10.11.2004 from http://www.naranlala.com/clabs.htm
  Kim S., Overcash M.: Energy in chemical manufacturing processes: gate-to-gate information for life cycle assessment. In: Journal of Chemical Technology & Biotechnology vol. 78, no. 9: 995- 1005(11). 2003
  Uncertainty: Chauvel 1989
- heat, district or industrial, natural gas: 7.72008 MJ; source Chauvel, A. 1989; lognormal variance with pedigree 0.0707, pedigree (1,3,5,3,1)
  Estimation.
  Further references:
  Naran Lala, 2004. Acetic anhydride plant plant. Naran Lala PVT Ltd., Gujarat, India. Retrieved 10.11.2004 from http://www.naranlala.com/clabs.htm
  Kim S., Overcash M.: Energy in chemical manufacturing processes: gate-to-gate information for life cycle assessment. In: Journal of Chemical Technology & Biotechnology vol. 78, no. 9: 995- 1005(11). 2003
  Uncertainty: Chauvel 1989
  properties: heating value, net 1 MJ
- heat, district or industrial, other than natural gas: 4.42638 MJ; source Chauvel, A. 1989; lognormal variance with pedigree 0.0707, pedigree (1,3,5,3,1)
  Estimation.
  Further references:
  Naran Lala, 2004. Acetic anhydride plant plant. Naran Lala PVT Ltd., Gujarat, India. Retrieved 10.11.2004 from http://www.naranlala.com/clabs.htm
  Kim S., Overcash M.: Energy in chemical manufacturing processes: gate-to-gate information for life cycle assessment. In: Journal of Chemical Technology & Biotechnology vol. 78, no. 9: 995- 1005(11). 2003
  EcoSpold01Location=RER
  Uncertainty: Chauvel 1989
  properties: heating value, net 1 MJ
- water, deionised: 0 kg; name water_deionised_input; source Chauvel, A. 1989; pedigree (1,1,1,1,1)
  Estimation.
  Further references:
  Naran Lala, 2004. Acetic anhydride plant plant. Naran Lala PVT Ltd., Gujarat, India. Retrieved 10.11.2004 from http://www.naranlala.com/clabs.htm
  Kim S., Overcash M.: Energy in chemical manufacturing processes: gate-to-gate information for life cycle assessment. In: Journal of Chemical Technology & Biotechnology vol. 78, no. 9: 995- 1005(11). 2003
  Estimation.
  Further references:
  Naran Lala, 2004. Acetic anhydride plant plant. Naran Lala PVT Ltd., Gujarat, India. Retrieved 10.11.2004 from http://www.naranlala.com/clabs.htm
  Kim S., Overcash M.: Energy in chemical manufacturing processes: gate-to-gate information for life cycle assessment. In: Journal of Chemical Technology & Biotechnology vol. 78, no. 9: 995- 1005(11). 2003
  EcoSpold01Location=CH
  Uncertainty: Chauvel 1989
  properties: wet mass 1 kg
- acetic acid, without water, in 98% solution state: 1.27 kg; source Chauvel, A. 1989; lognormal variance with pedigree 0.0707, pedigree (1,3,5,3,1)
  Estimation.
  Further references:
  Naran Lala, 2004. Acetic anhydride plant plant. Naran Lala PVT Ltd., Gujarat, India. Retrieved 10.11.2004 from http://www.naranlala.com/clabs.htm
  Wells, G. Margaret: Handbook of petrochemicals and processes. Aldershot, Hampshire 1991
  Rudd, D. F., Fathi-Afshar, S., Treviño, A. A., Stadtherr, M. A.: Petrochemical technology assessment. Wiley, New York 1981
  EcoSpold01Location=RER
  Uncertainty: Chauvel 1989
  properties: carbon content, fossil 0.400016, wet mass 1 kg, dry mass 1 kg, heating value, net 14.6 MJ
  note on heating value, net: Based on literature, page 10, Althaus H.-J., Chudacoff M., Hischier R., Jungbluth N., Osses M. and Primas A. (2007) Life Cycle Inventories of Chemicals. Final report ecoinvent data v2.0 No. 8. EMPA, Swiss Centre for Life Cycle Inventories, Dübendorf, CH, Online-Version under: www.ecoinvent.org.
- water, deionised: 0.617776, 0.00222384 kg (2 entries); source Chauvel, A. 1989; lognormal variance with pedigree 0.0707, pedigree (1,3,5,3,1)
  (same comment as for water, deionised)

## Inputs from nature
- Water, cooling, unspecified natural origin [natural resource, in water]: 0.3725 m3; name water_cooling_UNO_input; source Chauvel, A. 1989; lognormal variance with pedigree 0.0707, pedigree (1,3,5,3,1)
  Estimation.
  Further references:
  Naran Lala, 2004. Acetic anhydride plant plant. Naran Lala PVT Ltd., Gujarat, India. Retrieved 10.11.2004 from http://www.naranlala.com/clabs.htm
  Estimation.
  Further references:
  Naran Lala, 2004. Acetic anhydride plant plant. Naran Lala PVT Ltd., Gujarat, India. Retrieved 10.11.2004 from http://www.naranlala.com/clabs.htm
  Uncertainty: Chauvel 1989

## Emissions to nature
- Carbon dioxide, fossil [air, urban air close to ground]: 0.53422 kg; lognormal variance with pedigree 0.1786, pedigree (4,5,5,5,5)
  Estimation. Air emissions occurring from the purge vent, the distillation vent and fugitive emission sources were estimated to 0.2% of the raw material input.
  The carbon contained in the removed acetic acid during waste water treatment was accounted as CO2 emissions to air.
  It is assumed that the manufacturing plants are located in an urban/industrial area and consequently the emissions are categorised as emanating in a high population density area.
  Uncertainty: Calculated from the water treatment
- Water [water, unspecified]: 0.228649 m3; name water_to_water_unspecified; = (water_deionised_input/1000)*(1-fraction_WDI_to_air)+water_cooling_UNO_input*(1-fraction_CW_to_air); lognormal variance with pedigree 0.0807, pedigree (2,2,5,1,1)
  Calculated value based on literature values and expert opinion. See comments in the parametres' comment field.
  property fraction, origin: fresh water 0.0021557; name fraction_origin_fresh_water_Ww
  property fraction, origin: salt water 0; name fraction_origin_salt_water_Ww
  property fraction, origin: unspecified 0.997844; name fraction_origin_unspecified_Ww
  property wet mass 1000 kg; name WM
  property dry mass 0 kg; name DM
  property carbon content, fossil 0; name C_content_fossil
  property water in wet mass 1000 kg; name WWM
  property carbon content, non-fossil 0; name C_content_non_fossil
- COD, Chemical Oxygen Demand [water, surface water]: 0.0414 kg; lognormal variance with pedigree 0.188, pedigree (4,5,5,5,5)
  Calculation. This data was calculated from the amount of acetic acid in the treated waste water assuming a carbon conversion of 96% for COD and the worst case scenario: BOD=COD.
  It is assumed that the manufacturing plants are located in an urban/industrial area and consequently the emissions are categorized as emanating in a high population density area. The emissions into water are assumed to be emitted into rivers.
  Uncertainty: Calculated from the water emissions
- Acetic acid [water, surface water]: 0.040471 kg; lognormal variance with pedigree 0.448, pedigree (4,5,5,5,5)
  Estimation. The remaining amount of unreacted acetic acid was assumed to leave the production process with the waste water.
  It is assumed that the manufacturing plants are located in an urban/industrial area and consequently the emissions are categorized as emanating in a high population density area. The emissions into water are assumed to be emitted into rivers.
  Uncertainty: Estimation
- Acetic acid [air, urban air close to ground]: 0.00254 kg; lognormal variance with pedigree 0.188, pedigree (4,5,5,5,5)
  Estimation. Air emissions occurring from the purge vent, the distillation vent and fugitive emission sources were estimated to 0.2% of the raw material input.
  The carbon contained in the removed acetic acid during waste water treatment was accounted as CO2 emissions to air.
  It is assumed that the manufacturing plants are located in an urban/industrial area and consequently the emissions are categorised as emanating in a high population density area.
  Uncertainty: Estimation
- DOC, Dissolved Organic Carbon [water, surface water]: 0.0162 kg; lognormal variance with pedigree 0.188, pedigree (4,5,5,5,5)
  Calculation. This data was calculated from the amount of acetic acid in the treated waste water assuming a carbon conversion of 96% for COD and the worst case scenario: TOC=DOC.
  It is assumed that the manufacturing plants are located in an urban/industrial area and consequently the emissions are categorized as emanating in a high population density area. The emissions into water are assumed to be emitted into rivers.
  Uncertainty: Calculated from the water emissions
- BOD5, Biological Oxygen Demand [water, surface water]: 0.0414 kg; lognormal variance with pedigree 0.188, pedigree (4,5,5,5,5)
  (same comment as for COD, Chemical Oxygen Demand)
- Water [air, unspecified]: 0.144471 m3; name water_to_air_unspecified; = (water_deionised_input/1000*fraction_WDI_to_air)+(water_cooling_UNO_input*fraction_CW_to_air); lognormal variance with pedigree 0.0807, pedigree (2,2,5,1,1)
  (same comment as for Water)
  property fraction, origin: salt water 0; name fraction_origin_salt_water
  property fraction, origin: fresh water 0.000879762; name fraction_origin_fresh_water
  property fraction, origin: unspecified 0.99912; name fraction_origin_unspecified
- TOC, Total Organic Carbon [water, surface water]: 0.0162 kg; lognormal variance with pedigree 0.188, pedigree (4,5,5,5,5)
  (same comment as for DOC, Dissolved Organic Carbon)

## Sampling procedure
Literature data

## Extrapolations
This dataset has been extrapolated from year 2006 to the year of the calculation (2021). The uncertainty has been adjusted accordingly.

## Review by Roland Hischier 2007-09-01
passed.

## Review by Roland Hischier 2011-09-22
Transfer of documentation done.
