# cement production, blast furnace slag 25-70%

Dataset: EcoSpold 2, unit process
Geography: US
Time period: 2005-01-01 to 2021-12-31
Technology level: current
Classification: ISIC rev.4 ecoinvent: 2394:Manufacture of cement, lime and plaster
Synonyms: Portland blast furnace slag cement; IS
Scenario: Business-as-Usual
System model: Allocation, cut-off by classification
Share of production covered: 100 %
Generated by: Michael Elias Boesch
Published in: Boesch, M.E. 2010
Database: ecoinvent
isCopyrightProtected: true
accessRestrictedTo: 1

## General comment
The dataset describes the production of cement (IS) in the USA

## Included activities start
From cradle, i.e. including all upstream activities. As source of gypsum, waste gypsum from flue gas treatment is assumed.

## Included activities end
This activity ends with the cement produced in the cement mill. The dataset does not include packaging and administration.

## Reference product
- cement, blast furnace slag 25-70%: 1 kg; name cement; source Boesch, M.E. 2010; CPC 37440: Portland cement, aluminous cement, slag cement and similar hydraulic cements, except in the form of clinkers; By-product classification allocatable product
  Literature Value
  production volume 9.02e7 kg; name APV_cement; = 0.1%*9.02e10
    Estimated 0.1% marketshare
  property price 0.0615 EUR2005; name cement_price_EUR2005
    2005 import and export prices (total trades (USD) divided by total weight (kg) in China, India, USA, Japan, Russia and Europe, major producers and consumers (http://www.cementchina.net/freport/showfre.asp?id=749) from UN Commodity Trade Statistics Database (http://data.un.org/Explorer.aspxDatabase [Accessed 2 July 2010]). Commodity: Cement (portland, aluminious, slag or hydraulic)
  property carbon content 0
    carbon content on a dry matter basis (reserved; not for manual entry)
  properties: carbon content, fossil 0, water in wet mass 0 kg, carbon content, non-fossil 0, water content 0, dry mass 1 kg, wet mass 1 kg, carbon allocation 0 kg

## Inputs from technosphere
- electricity, medium voltage: 0.0734 kWh; = 0.0734* cement; source Boesch, M.E. 2010; lognormal variance with pedigree 0.0433, pedigree (3,3,5,3,1)
  Literature Value
  Uncertainty: Variance of log-transformed data was taken from ecoinvent report no 1, table 10.3. Value represents demand of products, electricity etc. for input/output group c.
- ground granulated blast furnace slag: 0.475 kg; name GGBFS; = 0.475* cement; source Boesch, M.E. 2010; lognormal variance with pedigree 0.0433, pedigree (3,3,5,3,1)
  (same comment as for electricity, medium voltage)
  properties: wet mass 1 kg, dry mass 0.99 kg
- heat, district or industrial, other than natural gas: 0.152 MJ; = 0.32*ABS(GGBFS); source Boesch, M.E. 2010; lognormal variance with pedigree 0.0086, pedigree (1,1,4,1,1)
  Heat for drying of blast furnace slag. Literature Value
  properties: heating value, net 1 MJ
- gypsum, mineral: 0.02625 kg; = 0.02625* cement; source Boesch, M.E. 2010; lognormal variance with pedigree 0.0433, pedigree (3,3,5,3,1)
  (same comment as for electricity, medium voltage)
  properties: dry mass 1 kg, wet mass 1 kg
- clinker: 0 kg; source Boesch, M.E. 2010; pedigree (1,1,1,1,1)
  (same comment as for electricity, medium voltage)
  properties: dry mass 1 kg, wet mass 1 kg
- ethylene glycol: 0.00031 kg; = 3.1e-4* cement; source Kellenberger D. 2007; lognormal variance with pedigree 0.0433, pedigree (3,3,5,3,1)
  Ancillary product for grinding
  Uncertainty: Variance of log-transformed data was taken from ecoinvent report no 1, table 10.3. Value represents demand of products, electricity etc. for input/output group c.
  properties: dry mass 1 kg, wet mass 1 kg, carbon content, fossil 0.387097, heating value, net 23.44 MJ
- steel, low-alloyed: 0.00011 kg; name steel; = 0.00011* cement; source Kellenberger D. 2007; lognormal variance with pedigree 0.0433, pedigree (3,3,5,3,1)
  Literature value
  Uncertainty: Variance of log-transformed data was taken from ecoinvent report no 1, table 10.3. Value represents demand of products, electricity etc. for input/output group c.
  property carbon content, fossil 0.005; name C_content_fossil
  property carbon content, non-fossil 0; name C_content_non_fossil
  property dry mass 1 kg; name DM
  property wet mass 1 kg; name WM
  property water content 0; name water_content
  property water in wet mass 0 kg; name WWM
- cement factory: 5.36e-11 unit; = 5.36e-11* cement; source Kellenberger D. 2007; lognormal variance with pedigree 0.3412, pedigree (2,1,5,4,1)
  Literature Value
  Uncertainty: Variance of log-transformed data was taken from ecoinvent report no 1, table 10.3. Value represents demand of infrastructure for input/output group c.
- clinker: 0.49875 kg; source Boesch, M.E. 2010; lognormal variance with pedigree 0.0433, pedigree (3,3,5,3,1)
  (same comment as for electricity, medium voltage)

## Emissions to nature
- Heat, waste [air, unspecified]: 0.264 MJ; = 0.264* cement; source Boesch, M.E. 2010; lognormal variance with pedigree 0.0827, pedigree (3,3,5,3,1)
  Literature Value
  Uncertainty: Variance of log-transformed data was taken from ecoinvent report no 1, table 10.3. Value represents others emitted to air for input/output group p.

## Sampling procedure
Data approximates average U.S. production

## Extrapolations
This dataset has been extrapolated from year 2009 to the year of the calculation (2021). The uncertainty has been adjusted accordingly.

## Review by Gabor Doka 2012-06-16
Passed (just). See review comments in "cement production, Portland blast furnace slag, 25-70% blast furnace slag, GLO, 2005 - 2009" and "cement production, Portland, CH, 2005 - 2009" which apply to (almost) all cement datasets.
