# maintenance, refrigeration machine

Dataset: EcoSpold 2, unit process
Geography: GLO
Time period: 2010-01-01 to 2021-12-31
Technology level: current
Classification: ISIC rev.4 ecoinvent: 3315:Repair of transport equipment, except motor vehicles
Classification: EcoSpold01Categories: transport systems/train
Scenario: Business-as-Usual
System model: Allocation, cut-off by classification
Generated by: Tereza Levova
Database: ecoinvent
isCopyrightProtected: true
accessRestrictedTo: 1

## General comment
This dataset describe materials needed for the maintenance of refrigeration machine during its lifetime.
There is not much maintenance needed during the lifetime of the refrigeration machine. Some parts (such as fans) are not as durable as others and need to be replaced more often.

## Included activities start
The activity starts with different materials needed for the maintenance of the container enter the activity.

## Parameters
- lifetime: 10 year; name lifetime_refrigeration_machine; lognormal variance with pedigree 0.0166, pedigree (4,5,1,1,1)
  Literature value. Lifetime of the refrigeration machine taken from the refrigeration machine production dataset.
- fraction, process water, to air: 0.15 dimensionless; name fraction_PW_to_air; lognormal variance with pedigree 0.0166, pedigree (4,5,1,1,1)
  Estimated.

## Reference product
- maintenance, refrigeration machine: 1 unit; name RP_amount_1; By-product classification allocatable product; CPC 87149: Maintenance and repair services of other transport equipment
  production volume 1.38812e6 unit; name RP_PV_1; = ((32.9*1000000*0.0625)/2)+(1200000*0.3)
    Calculated value.
    Each reefer container need one refrigeration machine.
    32.9 million TEU (Twenty-foot Equivalent unit) is the capacity of shipping containers in the world (World Shipping Council, http://www.worldshipping.org/about-the-industry/containers/global-container-fleet, accessed 20141014).
    Out of that 6.25% are reefers (refrigerated containers). It is assumed, that all of them need maintenance. One 40-food, high-cube container has a capacity of 2 TEU.
    1200000 units of refrigerated trucks in operation world wide in 2002 (IPCC/TEAP Special Report: Safeguarding the Ozone Layer and the Global Climate System).
    30% of them are estimated to be using this type of maintenance.
  property price 100 EUR2005
    Estimated based on expert judgement. The value of material used during the life long maintenance of the refrigeration machine are minimal. The total price is thus estimated.

## Inputs from technosphere
- wastewater, unpolluted: 0 m3; name BP_amount_1; pedigree (1,1,1,1,1)
  Calculated value.
  production volume 0 m3
    Calculated from production volume of reference product using the relative outputs.
  property price 0 EUR2005; name BP_amount_1_price_EUR2005
  properties: dry mass 0.337476 kg, carbon content, non-fossil 0.00178991, wet mass 1000 kg, carbon content, fossil 0.00178991, water content 2962.17
  note on carbon content, fossil: Assumed to be like in tap water. Bicarbonate content is 2.93 mol/m3. CO2 content is 0.1 mol/m3 (ecoinvent v2.2 report 8, Tab 93.1).
- lubricating oil: 0 kg; name oil_in; pedigree (1,1,1,1,1)
  Estimated value. It is estimated, that 1dl of oil is used once a year for the maintenance of the fans and motors of the refrigeration machine.
  properties: heating value, net 40.2 MJ, carbon content, fossil 0.75, dry mass 1 kg, wet mass 1 kg
  note on heating value, net: Literature value, Source: IPCC 2006, 2006 IPCC Guidelines for National Greenhouse Gas Inventories, Prepared by the National Greenhouse Gas Inventories Programme, Eggleston H.S., Buendia L., Miwa K., Ngara T. and Tanabe K. (eds). Published: IGES, Japan
  note on carbon content, fossil: Lubricating oil is produced from diesel. C-content/dry mass of fats and oils considered 75%, from: ecoinvent v2.2 report, n 15a, pg 40
- polypropylene, granulate: 0.000304107 kg; name PP_in; = (((POWER((0.440/2),2))*3.1416)*0.002); lognormal variance with pedigree 0.0186, pedigree (4,5,3,1,1)
  Estimated. It is estimated, that while the refrigeration machine has a lifetime of 10 years, the condensor fan made out of fibre reinforced polypropylene has a lifetime of only 5 years and is being replaced after those 5 years.
  properties: heating value, net 32.78 MJ, wet mass 1 kg, dry mass 1 kg, carbon content, fossil 0.857143
  note on heating value, net: Value extracted from "treatment of waste polypropylene, open burning"
- waste plastic, industrial electronics: 0 kg; name BP_amount_2; pedigree (1,1,1,1,1)
  Calculated value.
  production volume 0 kg
    Calculated from production volume of reference product using the relative outputs.
  property price 0 EUR2005; name BP_amount_2_price_EUR2005
  properties: carbon content, fossil 0.81386, water content 0.180638, dry mass 0.847 kg, heating value, net 34.78 MJ, wet mass 1 kg
- glass fibre reinforced plastic, polyamide, injection moulded: 0.000311725 kg; name PA_in; = ((POWER((0.315/2),2))*3.1416)*0.002*2; lognormal variance with pedigree 0.0186, pedigree (4,5,3,1,1)
  Estimated. It is estimated, that while the refrigeration machine has a lifetime of 10 years, the evaporator fans made out of fibre reinforced polyamide has a lifetime of only 5 years and is being replaced after those 5 years.
  properties: dry mass 1 kg, wet mass 1 kg, carbon content, fossil 0.446018
- building, hall: 0.000495986 m2; = 1/(( lifetime_building*365)/(2.235*2.025*2)); lognormal variance with pedigree 0.0186, pedigree (4,5,3,1,1)
  Calculated value based on estimates.
  1m2 of hall is available every day for 50 years
  1 refrigeration machine occupies the area of its based for the period of 2 days once a year for maintenance
  property lifetime 50 year; name lifetime_building
- waste polypropylene: 0 kg; name BP_amount_3; pedigree (1,1,1,1,1)
  Calculated value.
  production volume 0 kg
    Calculated from production volume of reference product using the relative outputs.
  property price 0 EUR2005; name BP_amount_3_price_EUR2005
  properties: wet mass 1 kg, carbon content, fossil 0.825208, water content 0.189061, dry mass 0.841 kg, heating value, net 32.78 MJ
  note on heating value, net: Value assumed for all polypropylene products. Source: Phyllis2, database for (treated) biomass, algae, feedstocks for biogas production and biochar, https://phyllis.nl/Biomass/View/1186, ECN.TNO
- tap water: 600 kg; name tap_water_in; = 2*30* lifetime_refrigeration_machine; lognormal variance with pedigree 0.0186, pedigree (4,5,3,1,1)
  Estimated value.
  It is estimated, that the refrigeration machine is being cleaned 2 times a year using 30 litres of water.
  properties: wet mass 1 kg, water content 2962.17, carbon content, fossil 0.00178991, dry mass 0.000337476 kg
  note on carbon content, fossil: Bicarbonate content is 2.93 mol/m3. CO2 content is 0.1 mol/m3 (ecoinvent v2.2 report 8, Tab 93.1).
- waste mineral oil: 0 kg; name BP_amount_4; pedigree (1,1,1,1,1)
  Calculated value.
  production volume 0 kg
    Calculated from production volume of reference product using the relative outputs.
  property price 0 EUR2005; name BP_amount_4_price_EUR2005
  properties: heating value, net 34.7 MJ, wet mass 1 kg, water content 0.111111, dry mass 0.9 kg, carbon content, fossil 0.864444
  note on heating value, net: Value taken from the general comment of the treatment dataset.
  note on carbon content, fossil: Tab A.6, ecoinvent v2.2 report 13_I. C content has been calculated after data in the tables, and then referred to 1 kg DM
- wastewater, unpolluted: -0.00408, -0.50592 m3 (2 entries); lognormal variance with pedigree 0.0186, pedigree (4,5,3,1,1)
  Calculated value.
  production volume 707944 m3
- lubricating oil: 0.174, 0.826 kg (2 entries); lognormal variance with pedigree 0.0186, pedigree (4,5,3,1,1)
  (same comment as for lubricating oil)
- waste plastic, industrial electronics: -4.63929e-6, -0.000307086 kg (2 entries); lognormal variance with pedigree 0.0186, pedigree (4,5,3,1,1)
  Calculated value.
  production volume 432.714 kg
- waste polypropylene: -2.92717e-5, -2.25668e-6, -9.32088e-7, -8.85105e-7, -3.37744e-5, -3.76553e-7, -1.70669e-7, -0.00023644 kg (8 entries); lognormal variance with pedigree 0.0186, pedigree (4,5,3,1,1)
  Calculated value.
  production volume 422.138 kg
- waste mineral oil: -0.274491, -0.00679531, -0.718713 kg (3 entries); lognormal variance with pedigree 0.0186, pedigree (4,5,3,1,1)
  Calculated value.
  production volume 1.38812e6 kg

## Emissions to nature
- Water [air, unspecified]: 0.09 m3; name water_to_air; = (tap_water_in* fraction_PW_to_air)/1000; lognormal variance with pedigree 0.0186, pedigree (4,5,3,1,1)
  Calculated value.

## Extrapolations
This dataset has been extrapolated from year 2014 to the year of the calculation (2021). The uncertainty has been adjusted accordingly.
