# sodium chloride to generic market for de-icer

Dataset: EcoSpold 2, unit process
Geography: GLO
Time period: 2012-01-01 to 2021-12-31
Technology level: current
Classification: EcoSpold01Categories: chemicals/organics
Classification: ISIC rev.4 ecoinvent: 2011:Manufacture of basic chemicals
Scenario: Business-as-Usual
System model: Allocation, cut-off by classification
Generated by: Sofia Parada Tur
Database: ecoinvent
isCopyrightProtected: true
accessRestrictedTo: 1

## General comment
This is a linking activity which links the product sodium chloride to the generic market for de-icer.
All chemicals that enter this market provide the function of a de-icer.
When the use of methanol is mandatory, this will be obtained from the market for methanol. In such case, the user will be accessing a niche market, because it defines specific product features aimed at satisfying specific market needs. When there are no specific product attributes to be fulfilled, these will be satisfied in the generic market. In the generic market the consumption of one product over another wil only be driven by best available price and not by the product attributes.

## Technology
non applicable

## Reference product
- de-icer: 1 kg; By-product classification allocatable product; CPC 34: Basic chemicals
  production volume 3.25e7 kg; = 32.5E6
    The consumption of sodium chloride for de-icer applications is given in the Ullmann Encyclopedia (see source field) for 2008, namely 32.5E6 tonnes.
  property price 0.13 EUR2005
    Temporary price data. Calculated as 90% of purchasers price based on: 2004 import and export prices (total trades (USD) divided by total weight (kg) in EU27, USA, China, Japan and India) from UN data - Calcium chloride (http://data.un.org/Data.aspx?q=calcium+chloride&d=ComTrade&f=_l1Code%3a29%3bcmdCode%3a282720; accessed 1 June 10).
  property carbon content 0
    carbon content on a dry matter basis (reserved; not for manual entry)
  properties: dry mass 1 kg, carbon content, fossil 0, carbon content, non-fossil 0, water content 0, wet mass 1 kg, water in wet mass 0 kg, carbon allocation 0 kg

## Inputs from technosphere
- sodium chloride, powder: 1 kg; lognormal variance with pedigree 0.0166, pedigree (4,1,4,1,1)
  properties: dry mass 1 kg, wet mass 1 kg

## Extrapolations
This dataset has been extrapolated from year 2012 to the year of the calculation (2021). The uncertainty has been adjusted accordingly.
