# wood preservative production, inorganic salt, containing Cr, outdoor use, ground contact

Dataset: EcoSpold 2, unit process
Geography: GLO
Time period: 2012-01-01 to 2021-12-31
Technology level: current
Classification: ISIC rev.4 ecoinvent: 2021:Manufacture of pesticides and other agrochemical products
Tags: Swiss brush-up completed
Scenario: Business-as-Usual
System model: Allocation, cut-off by classification
Generated by: Frank Werner
Database: ecoinvent
isCopyrightProtected: true
accessRestrictedTo: 1

## General comment
According to EN 335-1:2005, five use classes are distinguished for chemical wood protection based on the general exposure of wood in its application, wetting regime in service and the biological agents to be expected. This exposure scenario determines the potentially vulnerable zone of wood and the required treatment for the application of the wood preservative (see table)

## Included activities start
From reception of chemicals at the factory gate

## Included activities end
The datasets covers the components and preparation of a typical water-based/organic solvent based [as applicable] wood preservative for the use class according to EN 335-1:2006 as indicated in the name of the dataset, ready to be packed. In addition in contains an estimate for electricity consumption and for infrastructure. Packaging is not included.

## Geography
Data referring to (Central) European conditions

## Reference product
- wood preservative, inorganic salt, containing Cr: 1 kg; CPC 345: Miscellaneous basic chemical products; By-product classification allocatable product
  production volume 6.35e8 kg; name p_preservative
    Using the GLO value of 3.65E09 kg preservative derived from Vlosky (2009), the distribution on waterborne (60%), and the 29% Cr-containing, we obtain: 3.65E09 kg * *0.6 (waterborne) * 0.29 (C)r= 6.35E8kg
  property water content 0.680672; = 0.405/0.595
  property price 0.931763 EUR2005
    Calculated based on inputs: The price of the product has been calculated as a sum of the values of the material and energy inputs for this product. This value is therefore a rough estimation. It may underestimate the real price since there are additional expenses when producing any product. These expences can include for example labour costs, treatment of waste materials and profit for the producer. Please consider carefully whether this level of data quality is acceptable for your application.
  property carbon content 0
    carbon content on a dry matter basis (reserved; not for manual entry)
  properties: dry mass 0.595 kg, wet mass 1 kg, carbon content, non-fossil 0, carbon content, fossil 0, water in wet mass 0.405 kg, carbon allocation 0 kg

## Inputs from technosphere
- water, deionised: 0 kg; source Empa St. Gallen 2012; pedigree (1,1,1,1,1)
  solvent
  property carbon content, non-fossil 0; name C_content_non_fossil
  property wet mass 1 kg; name WM
  property water in wet mass 1 kg; name WWM
  property dry mass 0 kg; name DM
  properties: UVEK_relative_amount_1 1, UVEK_link_1 4853
  note on UVEK_relative_amount_1: to be used only in special submissions in coordination with ecoinvent and the Swiss FOEN
- sodium borates: 0.1 kg; source Empa St. Gallen 2012; lognormal variance with pedigree 0.235, pedigree (5,5,5,5,5)
  active ingredient: insecticide/fungizide
  properties: dry mass 1 kg, UVEK_relative_amount_9 6.8, UVEK_relative_amount_8 1.48, UVEK_link_8 4417, UVEK_relative_amount_1 1, UVEK_link_1 4125, wet mass 1 kg, UVEK_link_9 4433
  note on UVEK_relative_amount_9: Scaling factor = amount of transport in corresponding KBOB dataset/amount of this input from technosphere. Source for transport distance: Life Cycle Inventories of Wood as Fuel and Construction Material/2007/Werner F. To be used only in special submissions in coordination with ecoinvent and the Swiss FOEN
  note on UVEK_link_8: This link has been introduced to model transport specifically for the SAM model; to be used only in special submissions in coordination with ecoinvent and the Swiss FOEN.
- copper oxide: 0.1 kg; source Empa St. Gallen 2012; lognormal variance with pedigree 0.235, pedigree (5,5,5,5,5)
  active ingredient: fungizide
  properties: UVEK_link_1 589, wet mass 1 kg, dry mass 1 kg, UVEK_relative_amount_1 1
- sodium dichromate: 0.4375 kg; = 1.75*0.25; source Empa St. Gallen 2012; lognormal variance with pedigree 0.235, pedigree (5,5,5,5,5)
  ingredient for the production of chromic(VI) acid as reported in Künniger et al. 1996: Ökologische Bewertung von Fensterkonstruktionen verschiedener Rahmenmaterialien (ohne Verglasung). Empa Duebendorf. Chromic acid is used as a fixing agent
  properties: UVEK_link_1 4131, wet mass 1 kg, dry mass 1 kg, UVEK_relative_amount_1 1
- electricity, medium voltage: 0.0361111 kWh; = 0.13/3.6; source Künniger T. 2000; lognormal variance with pedigree 0.235, pedigree (5,5,5,5,5)
  value converted from MJ
  properties: UVEK_link_1 1785, UVEK_relative_amount_1 1
- boric acid, anhydrous, powder: 0.12 kg; source Empa St. Gallen 2012; lognormal variance with pedigree 0.235, pedigree (5,5,5,5,5)
  active ingredient: insecticide/fungizide
  properties: dry mass 1 kg, UVEK_link_1 329, UVEK_relative_amount_1 1, wet mass 1 kg
- sulfuric acid: 0 kg; source Empa St. Gallen 2012; pedigree (1,1,1,1,1)
  ingredient for the production of chromic(VI) acid as reported in Künniger et al. 1996: Ökologische Bewertung von Fensterkonstruktionen verschiedener Rahmenmaterialien (ohne Verglasung). Empa Duebendorf.
  properties: UVEK_link_1 4259, wet mass 1 kg, dry mass 1 kg, UVEK_relative_amount_1 1
- nitric acid, without water, in 50% solution state: 0 kg; source Empa St. Gallen 2012; pedigree (1,1,1,1,1)
  pH regulator
  property water content 0; name water_content
  properties: wet mass 1 kg, UVEK_relative_amount_1 1, dry mass 1 kg, UVEK_link_1 3226
- hazardous waste, for incineration: 0 kg; name m_hazardous_waste; source Nemecek, T. 2007; pedigree (1,1,1,1,1)
  estimated as 200 kg/t active ingredient
  production volume 0 kg
    Calculated from production volume of reference product using the relative outputs.
  properties: UVEK_relative_amount_1 -1, dry mass 1 kg, heating value, net 17 MJ, carbon content, fossil 0.554667, UVEK_link_1 965, wet mass 1 kg
  note on heating value, net: Value taken from the general comment of the treatment dataset.
  note on carbon content, fossil: Tab A.6, ecoinvent v2.2 report 13_I. C content has been calculated after data in the tables, and then referred to 1 kg DM
- chemical factory, organics: 4e-10 unit; source Althaus H.-J. 2007; lognormal variance with pedigree 0.76, pedigree (5,5,5,5,5)
  assumed to be equal as for paint production
  properties: UVEK_relative_amount_1 1, UVEK_link_1 430
- water, deionised: 0.095296, 0.000343042, 0.309361 kg (3 entries); source Empa St. Gallen 2012; lognormal variance with pedigree 0.235, pedigree (5,5,5,5,5)
  solvent
  properties: UVEK_relative_amount_1 1, wet mass 1 kg, UVEK_link_1 4853
- sulfuric acid: 0.0404903, 0.30951 kg (2 entries); source Empa St. Gallen 2012; lognormal variance with pedigree 0.235, pedigree (5,5,5,5,5)
  (same comment as for sulfuric acid)
- nitric acid, without water, in 50% solution state: 0.000803641, 0.00199851, 0.00095758, 0.00610177, 0.000800667, 0.00329346, 0.000868263, 0.000540865, 0.002599, 0.00703625 kg (10 entries); source Empa St. Gallen 2012; lognormal variance with pedigree 0.235, pedigree (5,5,5,5,5)
  pH regulator
- hazardous waste, for incineration: -0.020608, -0.000538681, -0.0428533 kg (3 entries); source Nemecek, T. 2007; lognormal variance with pedigree 0.203, pedigree (4,5,5,5,5)
  estimated as 200 kg/t active ingredient
  production volume 4.064e7 kg

## Sampling procedure
Ideal-type formulation of wood preservative for a water-/solvent-based [as applicable] wood preservative for the respective use class

## Extrapolations
This dataset has been extrapolated from year 2012 to the year of the calculation (2021). The uncertainty has been adjusted accordingly.
