# alfalfa/grass silage production

Dataset: EcoSpold 2, unit process
Geography: ZA
Time period: 2016-01-01 to 2021-12-31
Technology level: current
Classification: ISIC rev.4 ecoinvent: 0119:Growing of other non-perennial crops
Scenario: Business-as-Usual
System model: Allocation, cut-off by classification
Share of production covered: 75 %
Generated by: Ilhaam Patel
Published in: Russo, V 2017
Database: ecoinvent
isCopyrightProtected: true
accessRestrictedTo: 1

## General comment
This dataset represents the production of 1 kg of alfalfa/grass silage in the region of South Africa. An average yield is 5 tonnes/ha (wet mass) is assumed (the most recent yield data available is for the 2006/2007 growing season, thus it is assumed that yields have stayed relatively constant over the years).

Government agricultural statistics in South Africa do not disaggregate between dry hay and silage, thus the total production volume of 1.186 million tonnes applied in this dataset for the 2016-2017 growing season is for both of these products (DAFF, 2017).

The dataset is modelled with 61% of lucerne grown under irrigation, with the percentage grown under dryland conditons and that grown under irrigated conditions taken from the 2006 growing season (the latest for which this information is available). Inputs for dryland and irrigated lucerne cultivation are obtained from farm budgets, academic publications and the FAO. Emissions are calculated from fertilser and pesticide inputs.

## Included activities start
This activity starts with soil cultivation after the harvest of the previous crop.

## Included activities end
This activity ends after harvest and storage at the farm gate.
The dataset includes the inputs of seeds, mineral fertilisers, pesticides and all machine operations and corresponding machine infrastructure and sheds. Machine operations are: soil cultivation, sowing, fertilisation, weed control, pest and pathogen control, swathing, haying, bulk loading for hay ensiled. Direct field emissions are also included. Use of car, van, or pick-up for servicing people (e.g. from farm to field) is excluded from the activities.

## Geography
The inventory is modelled for the region of South Africa.

## Technology
The data are intended to reflect current equipment and processes.

## Time period
Current production in South Africa

## Parameters
- fraction, irrigation water, to ground water: 0.8 dimensionless; name fraction_IW_to_ground_water; lognormal variance with pedigree 0.0886, pedigree (4,3,1,1,4)
  Literature value (Doll, 2011) cross referenced with expert opinion.
- fraction, irrigation water to surface water: 0.2 dimensionless; name fraction_IW_to_surface_water; lognormal variance with pedigree 0.0886, pedigree (4,3,1,1,4)
  Literature value (Doll, 2011) cross referenced with expert opinion.
- fraction, irrigation water, to air: 0.72 dimensionless; name fraction_IW_to_air; lognormal variance with pedigree 0.0409, pedigree (2,2,2,1,1)
  Literature value (Siebert, 2010) (Vionnet, S., Quantis Water Database - Technical Report, 2012).
- fraction, process water, to air: 0.72 dimensionless; name fraction_PW_to_air; lognormal variance with pedigree 0.0413, pedigree (2,2,1,4,1)
  For agricultural crop dataset, distinction is made between irrigation water and process water. Process water is the water that comes with manure or pesticide application. A fraction of the process water input evaporates to the air and the remaining is considered emitted to surface water and ground water.
  By default, the same value as for irrigation is assumed - Literature value (Siebert, 2010) (Vionnet, S., Quantis Water Database - Technical Report, 2012).
- fraction, process water to water, to ground water: 0.8 dimensionless; name fraction_PWtoW_to_ground_water; lognormal variance with pedigree 0.0886, pedigree (4,3,1,1,4)
  For agricultural crop dataset, distinction is made between irrigation water and process water. Process water is the water that comes with manure or pesticide application. A fraction of the process water input evaporates to the air and the remaining is considered emitted to surface water and ground water.
  By default, the same value as for irrigation is assumed - Literature value (Doll, 2011) cross referenced with expert opinion.
- water content at harvest: 0.54 kg/kg; name harvest_wc; lognormal variance with pedigree 0.01, pedigree (1,1,1,1,1)
  Material water content at harvest (wet mass basis). See supporting documentation '01 crop production - Québec.pdf' available on ecoinvent reports web page (https://ecoquery.ecoinvent.org/File/Reports).
- fraction, process water to water, to surface water: 0.2 dimensionless; name fraction_PWtoW_to_surface_water; lognormal variance with pedigree 0.0892, pedigree (4,3,1,4,4)
  (same comment as for fraction, process water to water, to ground water)

## Reference product
- alfalfa-grass silage: 1 kg; name REF_PRODUCT; CPC 01912: Alfalfa for forage and silage; By-product classification allocatable product
  Alfalfa silage
  production volume 1.186e6 kg
    No disaggregated statistics are available for production of dry hay and silage in South Africa. The total production of hay in the 2016-2017 growing season equates to 1,186,000 tonnes. Reference(s): DAFF (2017) Abstract of Agricultural Statistics 2017, Department of Agriculture, Forestry and Fisheries of South Africa, Available at: http://www.daff.gov.za/Daffweb3/Portals/0/Statistics%20and%20Economic%20Analysis/Statistical%20Information/Abstract%202017.pdf. (Accessed September 2017).
  property water content 1.85714; name REF_PRODUCT_water_content; = 0.65/0.35
  property water in wet mass 0.65 kg; name REF_PRODUCT_WWM
  property energy content 18.55 MJ; name REF_PRODUCT_energy_content
    Gross energy content on a dry matter basis. Average of Alfalfa and red clover silage. Source: Feedipedia (http://www.feedipedia.org)
  property carbon content, fossil 0; name REF_PRODUCT_C_content_fossil
    fossil carbon content on a dry matter basis
  property price 0.13 EUR2005; name REF_PRODUCT_price_EUR2005
    Price estimated to be the same as in case of grass silage.
  property wet mass 1 kg; name REF_PRODUCT_WM
  property carbon content, non-fossil 0.484; name REF_PRODUCT_C_content_non_fossil
    biogene carbon content on a dry matter basis. Composition data obtained from Feedipedia (http://www.feedipedia.org). First, composition data were refered to 1 kg dry mass. Then, C-contents were calculated considering a C-content/dry mass of 46% in carbohydrates (including fibres), 53% in proteins and 75% in fats. All data from 'Evolutionary and Biochemical Aspects', A.D. Kay and T. Vrede (in Global Ecology, 2010, Elsevier B.V., S.E. Jørgensen Ed.).
  property dry mass 0.35 kg; name REF_PRODUCT_DM
  property carbon content 0.484
    carbon content on a dry matter basis (reserved; not for manual entry)
  properties: carbon allocation 0.1694 kg

## Inputs from technosphere
- inorganic nitrogen fertiliser, as N: 0.00172 kg; lognormal variance with pedigree 0.0412, pedigree (2,1,5,1,1)
  This figure represents N from MAP, CAN, and DAP. Based on average mineral application rates, a breakdown of the mineral nutrient by fertiliser type based on that of national mineral fertiliser demand (FAO, 2005) and average yield of 5tonnes/ha (Stats SA, 2007). See details for disaggregation in supporting documentation. Reference(s): FAO (2005) Fertiliser Use by Crop in South Africa, Food and Agriculture Organisation ofo the United Nations, Available at: ftp://ftp.fao.org/agl/agll/docs/fertusesouthafrica.pdf. (Accessed August 2017); Stats SA (2007) Census of Commercial Agriculture, 2007: Financial and Production Statistics, Available at: http://www.nda.agric.za/docs/statsinfo/Censcoagric2007.pdf. (Accessed September 2017).
  properties: wet mass 1 kg, dry mass 1 kg
- molybdenum: 9.28e-6 kg; lognormal variance with pedigree 0.0112, pedigree (2,4,4,1,1)
  Average molybdenum requirement, based on sodium molybdate application rate of 0.45 ka/ha for irrigated lucerne in commercial enterprise budget for KwaZulu-Natal province of South Africa, with yield of 15 tonnes/ha (KZN DARD, 2012) and molybdenum (Mo) requirement of 100g/ha. It was assumed that the rate of application of agricultural gypsum would be the same for irrigated and dryland lucerne. Reference(s): KZN DARD (2012) Production and Marketing of Lucerne, KZN Agriculture & Rural Development, Available at: http://www.kzndard.gov.za/images/Documents/RESOURCE_CENTRE/GUIDELINE_DOCUMENTS/RESEARCH_REPORTS/Lucerne%20Production%20and%20Marketing.pdf. (Accessed August 2017).
  properties: wet mass 1 kg, dry mass 1 kg
- lime: 0.1 kg; name LIME_CaCO3; lognormal variance with pedigree 0.0039, pedigree (2,2,3,1,2)
  Based on the dolomite lime consumption recommendations of 3 tonnes/ha for irrigated lucerne in commercial enterprise budget for KwaZulu-Natal province of South Africa, with yield of 15 tonnes/ha (KZN DARD, 2012). Dolomite lime is composed of 50% CaCO3 and 40% MgCO3, this figure represents lime as CaCO3. It was further assumed that the rate of application of lime (as CaCO3) would be the same for irrigated and dryland lucerne per tonne. Reference(s): KZN DARD (2012) Production and Marketing of Lucerne, KZN Agriculture & Rural Development, Available at: http://www.kzndard.gov.za/images/Documents/RESOURCE_CENTRE/GUIDELINE_DOCUMENTS/RESEARCH_REPORTS/Lucerne%20Production%20and%20Marketing.pdf. (Accessed August 2017).
  properties: carbon content, fossil 0.120005, wet mass 1 kg, dry mass 1 kg
- clover seed, Swiss integrated production, for sowing: 0.00176 kg; name SEED; lognormal variance with pedigree 0.0098, pedigree (2,3,4,1,1)
  Proxy for alfalfa seed. Figure is weighted average of seed consumption for irrigated and dryland production systems for lucerne and the % breakdown of production by irrigated and dryland production. The seed consumption from commercial enterprise budgets (combuds) for the Western Cape (DAFF, 2008a), North West (DAFF, 2008b), KwaZulu-Natal (KZN DARD, 2012), and Free State (Computus, 2016). Reference(s): DAFF (2008a) Commercial Enterprise Budget - Lucerne Hay - Establishment and Maintenance in Bree River Valley, Department of Agriculture, Forestry and Fisheries of South Africa; DAFF (2008b) Commercial Enterprise Budget - Lucerne Hay - Establishment and Maintenance in North West, Department of Agriculture, Forestry and Fisheries of South Africa;
  KZN DARD (2012) Production and Marketing of Lucerne, KZN Agriculture & Rural Development, Available at: http://www.kzndard.gov.za/images/Documents/RESOURCE_CENTRE/GUIDELINE_DOCUMENTS/RESEARCH_REPORTS/Lucerne%20Production%20and%20Marketing.pdf. (Accessed August 2017); Grain SA (2014) Conservation Agriculture: Part 8, Grain South Africa, Available at: http://www.grainsa.co.za/conservation-agriculture:-part-8. (Accessed September 2017); Computus (2016) Enterprise Budgets 2009/2010, Computus Management Information (Pty) Ltd, Available at: http://www.computus.co.za/Publikasies/Vertakkingsbegrotings15Engels.pdf. (Accessed September 2017).
  property carbon content, non-fossil 0.469421; name SEED_C_content_non_fossil
  properties: wet mass 1 kg, dry mass 0.9 kg, water content 0.111111
- pyrethroid-compound: 2.73e-6 kg; lognormal variance with pedigree 0.0098, pedigree (2,3,4,1,1)
  This figure represents the mass of the active ingredient for the pesticide Karate EC, lambda-cyhalothrin (pyrethroid). Average application rate was extracted from commercial enterprise budgets for irrigated lucerne in KwaZulu-Natal, South Africa (KZN DARD, 2012). Reference(s): KZN DARD (2012) Production and Marketing of Lucerne, KZN Agriculture & Rural Development, Available at: http://www.kzndard.gov.za/images/Documents/RESOURCE_CENTRE/GUIDELINE_DOCUMENTS/RESEARCH_REPORTS/Lucerne%20Production%20and%20Marketing.pdf. (Accessed August 2017).
  properties: carbon content, fossil 0.623, wet mass 1 kg, dry mass 1 kg
- potassium chloride: 0.000753459 kg; lognormal variance with pedigree 0.0412, pedigree (2,1,5,1,1)
  The exchange has been updated from 'potassium chloride, as K2O' into 'potassium chloride' and therefore its amount has been scaled (multiplied) from 0.0005 kg by 1.5829 kg of 'potassium chloride' per kg of 'potassium chloride, as K2O'. Original comment of the exchange is: This figure represents K2O from KCl. Total amount of K as K2O determined from the calculated nitrogen application rates and the typical mineral ratio of nutrients N:P:K annually consumed by lucerne in the region (FAO, 2005). K2O based fertilisers are all imported, with the bulk of imports being KCl. See details for disaggregation in supporting documentation. Reference(s): FAO (2005) Fertiliser Use by Crop in South Africa, Food and Agriculture Organisation ofo the United Nations, Available at: ftp://ftp.fao.org/agl/agll/docs/fertusesouthafrica.pdf. (Accessed August 2017).
  properties: wet mass 1 kg, dry mass 1 kg
- swath, by rotary windrower: 0.000397 ha; lognormal variance with pedigree 0.0099, pedigree (2,3,4,3,1)
  For the swathing, haying and fodder loading field processes it was estimated that approximately 3 cuttings would take place throughout the year, based on a first cutting yield of 1.5-2 tonnes/ha (KZN DARD, 2012) and the assumption that 100% of these processes were performed mechanically. The fodder loading dataset includes cutting, loading and transportation of the cut lucerne to the farm to be ensiled. A density of approximately 800kg/m3 was assumed. Using this data and the correlating ecoinvent datasets, the total diesel consumption [kg/ha] was determined, which correlated well with the total diesel consumption reported in the commercial enterprise budgets for irrigated lucerne in the KwaZulu-Natal Province (KZN DARD, 2012). Reference(s): KZN DARD (2012) Production and Marketing of Lucerne, KZN Agriculture & Rural Development, Available at: http://www.kzndard.gov.za/images/Documents/RESOURCE_CENTRE/GUIDELINE_DOCUMENTS/RESEARCH_REPORTS/Lucerne%20Production%20and%20Marketing.pdf. (Accessed August 2017).
- irrigation: 0.1 m3; name water_irrigation_input; lognormal variance with pedigree 0.0052, pedigree (2,4,3,1,1)
  Calculated from the blue water use for lucerne production in one of the major lucerne growing regions in South Africa (Vaalharts) (Scheepers and Jordaan, 2016) and the irrigated national tonnages according to the AgriCensus. This gives a water use per irrigated tonne of lucerne produced of 170 m3/tonne. In this dataset, 61% of lucerne is grown under irrigation. References: Scheepers M. E. and Jordaan H. (2016) Assessing the Blue and Green Water Footprint of Lucerne for Milk Production in South Africa, Sustainability 2016, Volume 8 (49), Available at: file:///C:/Users/lenov/Downloads/sustainability-08-00049.pdf. (Accessed September 2017); Stats SA (2007) Census of Commercial Agriculture, 2007: Financial and Production Statistics, Available at: http://www.nda.agric.za/docs/statsinfo/Censcoagric2007.pdf. (Accessed September 2017).
  properties: wet mass 1000 kg, dry mass 0.11 kg, water content 9089.91
- inorganic phosphorus fertiliser, as P2O5: 0.0117 kg; lognormal variance with pedigree 0.0039, pedigree (2,2,3,1,2)
  This figure represents P2O5 from MAP (11% N, 52% P2O5), DAP (18% N, 46% P2O5), based on the nitrogen input, with the remainder assumed to be SSP. Total amount of P as P2O5 based on average mineral application rates, a breakdown of the mineral nutrient by fertiliser type based on that of national mineral fertiliser demand (FAO, 2005) and average yield of 5tonnes/ha (Stats SA, 2007). See details for disaggregation in supporting documentation. Reference(s): FAO (2005) Fertiliser Use by Crop in South Africa, Food and Agriculture Organisation ofo the United Nations, Available at: ftp://ftp.fao.org/agl/agll/docs/fertusesouthafrica.pdf. (Accessed August 2017); Stats SA (2007) Census of Commercial Agriculture, 2007: Financial and Production Statistics, Available at: http://www.nda.agric.za/docs/statsinfo/Censcoagric2007.pdf. (Accessed September 2017).
  properties: dry mass 1 kg, wet mass 1 kg
- borax, anhydrous, powder: 0.00162 kg; lognormal variance with pedigree 0.0052, pedigree (3,3,3,1,1)
  For boron (B) micro-nutrient suppl, where low levels of boron are present. Average of recommended application rates of boron applied in this dataset, ranges from 0.5-3kg/ha depending on the type of soil, i.e. medium textured or sandy (NLT, 2008). Borax anhydrous is at 21.47% boron. Reference(s): NLT (2008) Lucerne Management: Fertilisation, National Lucern Trust of South Africa. Available at: http://www.lusern.org/index.php?option=com_content&view=article&id=148&Itemid=222. (Accessed August 2017).
  properties: wet mass 1 kg, dry mass 1 kg
- organophosphorus-compound, unspecified: 4.17e-5 kg; lognormal variance with pedigree 0.0098, pedigree (2,3,4,1,1)
  This figure represents the mass of the active ingredient for the pesticides Rogor (Dimethoate) and Folimat (Omethoate). The average application rates were each extracted from commercial enterprise budgets for irrigated lucerne in the North West and Western Cape provinces, South Africa (DAFF, 2008a; DAFF, 2008b). It was assumed that the application rate would be the same for irrigated and dryland per tonne of lucerne. Reference(s): DAFF (2008a) Commercial Enterprise Budget - Lucerne Hay - Establishment and Maintenance in North West, Department of Agriculture, Forestry and Fisheries of South Africa; DAFF (2008b) Commercial Enterprise Budget - Lucerne Hay - Establishment and Maintenance in Bree River Valley, Department of Agriculture, Forestry and Fisheries of South Africa.
  properties: wet mass 1 kg, carbon content, fossil 0.260898, dry mass 1 kg
- application of plant protection product, by field sprayer: 0.000198 ha; lognormal variance with pedigree 0.0098, pedigree (2,3,4,1,1)
  Estimated using annual frequency of 1 and 100% mechanical operation. The frequency and breakdown of mechanical versus manual field work process data for conventional irrigated wheat in South Africa was used as a proxy for lucerne ploughing, seedbed preparation, sowing, and organic and synthetic fertiliser application (FAO, 2015). Using this data and the correlating ecoinvent datasets, the total diesel consumption [kg/ha] was determined, which correlated well with the total diesel consumption reported in the commercial enterprise budgets for irrigated lucerne in the KwaZulu-Natal Province (KZN DARD, 2012). Reference(s): FAO (2015) Online Database: Global Database of GHG Emissions Related to Feed Crop, Food and Agriculture Organisation of the United Nations, Available at: http://www.fao.org/partnerships/leap/database/ghg-crops/en/. (Accessed September 2017); KZN DARD (2012) Production and Marketing of Lucerne, KZN Agriculture & Rural Development, Available at: http://www.kzndard.gov.za/images/Documents/RESOURCE_CENTRE/GUIDELINE_DOCUMENTS/RESEARCH_REPORTS/Lucerne%20Production%20and%20Marketing.pdf. (Accessed August 2017).
- haying, by rotary tedder: 0.000397 ha; lognormal variance with pedigree 0.0099, pedigree (2,3,4,3,1)
  (same comment as for swath, by rotary windrower)
- pesticide, unspecified: 3.7e-5 kg; lognormal variance with pedigree 0.0098, pedigree (2,3,4,1,1)
  This figure represents the mass of the active ingredient for the herbicide Focus Ultra, cyclohenanone. Average application rate was extracted from commercial enterprise budgets for irrigated lucerne in the North West province, South Africa (DAFF, 2008). It was assumed that the application rate would be the same for irrigated and dryland per tonne of lucerne. Reference(s): DAFF (2008) Commercial Enterprise Budget - Lucerne Hay - Establishment and Maintenance in North West, Department of Agriculture, Forestry and Fisheries of South Africa.
  properties: wet mass 1 kg, dry mass 1 kg, carbon content, fossil 0.486978
- packaging, for fertilisers: 0.299884 kg; lognormal variance with pedigree 0.0532, pedigree (4,3,3,5,4)
  Total amount of active substance/s of fertilisers needed for the production of 'alfalfa-grass silage' is calculated to be circa 1.50E-01 kg. Fertiliser/s used in this dataset is/are: 'ammonium sulfate, as N', 'gypsum, mineral', 'lime', 'nitrogen fertiliser, as N', 'phosphate fertiliser, as P2O5', 'potassium chloride, as K2O', 'potassium sulfate, as K2O', 'urea, as N'. The total amount of active substance/s is doubled in order to account for the packaging of the dilluted product of fertiliser/s that is/are applied. Therefore, 3.00E-01 kg of packaging for fertilisers is justified with this exchange.
  properties: price 0.0642 EUR2005, carbon content, fossil 0.825301, wet mass 1 kg, heating value, net 25.01 MJ, dry mass 1 kg
  note on carbon content, fossil: Considering a chemical formula (C2H4)n for polyethylene, carbon content-fossil is calculated to be 0.856286 kg of Carbon per kg of dry mass.
- gypsum, mineral: 0.03 kg; lognormal variance with pedigree 0.0112, pedigree (2,4,4,1,1)
  Based on the agricultural gypsum consumption recommendations of 0.4 tonnes/ha for irrigated lucerne in commercial enterprise budget for KwaZulu-Natal province of South Africa, with yield of 15 tonnes/ha (KZN DARD, 2012). It was assumed that the rate of application of agricultural gypsum would be the same for irrigated and dryland lucerne. Reference(s): KZN DARD (2012) Production and Marketing of Lucerne, KZN Agriculture & Rural Development, Available at: http://www.kzndard.gov.za/images/Documents/RESOURCE_CENTRE/GUIDELINE_DOCUMENTS/RESEARCH_REPORTS/Lucerne%20Production%20and%20Marketing.pdf. (Accessed August 2017).
  properties: dry mass 1 kg, wet mass 1 kg
- fodder loading, by self-loading trailer: 0.00125 m3; lognormal variance with pedigree 0.004, pedigree (2,2,3,3,2)
  (same comment as for swath, by rotary windrower)
- tillage, rotary cultivator: 0.000198 ha; lognormal variance with pedigree 0.0039, pedigree (2,2,3,1,2)
  (same comment as for application of plant protection product, by field sprayer)
- ammonium sulfate: 0.0011 kg; lognormal variance with pedigree 0.0412, pedigree (2,1,5,1,1)
  Based on average mineral application rates, a breakdown of the mineral nutrient by fertiliser type based on that of national mineral fertiliser demand (FAO, 2005) and average yield of 5tonnes/ha (Stats SA, 2007). See details for disaggregation in supporting documentation. Reference(s): FAO (2005) Fertiliser Use by Crop in South Africa, Food and Agriculture Organisation ofo the United Nations, Available at: ftp://ftp.fao.org/agl/agll/docs/fertusesouthafrica.pdf. (Accessed August 2017); Stats SA (2007) Census of Commercial Agriculture, 2007: Financial and Production Statistics, Available at: http://www.nda.agric.za/docs/statsinfo/Censcoagric2007.pdf. (Accessed September 2017).
  properties: wet mass 1 kg, dry mass 1 kg
- sowing: 9.91e-5 ha; lognormal variance with pedigree 0.0039, pedigree (2,2,3,1,2)
  Estimated using annual frequency of 1 and 50% mechanical operation. The frequency and breakdown of mechanical versus manual field work process data for conventional irrigated wheat in South Africa was used as a proxy for lucerne ploughing, seedbed preparation, sowing, and organic and synthetic fertiliser application (FAO, 2015). Using this data and the correlating ecoinvent datasets, the total diesel consumption [kg/ha] was determined, which correlated well with the total diesel consumption reported in the commercial enterprise budgets for irrigated lucerne in the KwaZulu-Natal Province (KZN DARD, 2012). Reference(s): FAO (2015) Online Database: Global Database of GHG Emissions Related to Feed Crop, Food and Agriculture Organisation of the United Nations, Available at: http://www.fao.org/partnerships/leap/database/ghg-crops/en/. (Accessed September 2017); KZN DARD (2012) Production and Marketing of Lucerne, KZN Agriculture & Rural Development, Available at: http://www.kzndard.gov.za/images/Documents/RESOURCE_CENTRE/GUIDELINE_DOCUMENTS/RESEARCH_REPORTS/Lucerne%20Production%20and%20Marketing.pdf. (Accessed August 2017).
- tillage, ploughing: 0.000198 ha; lognormal variance with pedigree 0.0039, pedigree (2,2,3,1,2)
  (same comment as for application of plant protection product, by field sprayer)
- potassium sulfate: 0.00791785 kg; lognormal variance with pedigree 0.0412, pedigree (2,1,5,1,1)
  The exchange has been updated from 'potassium sulfate, as K2O' into 'potassium sulfate' and therefore its amount has been scaled (multiplied) from 0.0043 kg by 1.85 kg of 'potassium sulfate' per kg of 'potassium sulfate, as K2O'. Original comment of the exchange is: This figure represents K2O from potassium sulphate. Total amount of K as K2O determined from the calculated nitrogen application rates and the typical mineral ratio of nutrients N:P:K annually consumed by lucerne in the region (FAO, 2005). K2O based fertilisers are all imported, with the bulk of imports being KCl. See details for disaggregation in supporting documentation. Reference(s): FAO (2005) Fertiliser Use by Crop in South Africa, Food and Agriculture Organisation ofo the United Nations, Available at: ftp://ftp.fao.org/agl/agll/docs/fertusesouthafrica.pdf. (Accessed August 2017).
  properties: dry mass 1 kg, wet mass 1 kg
- fertilising, by broadcaster: 0.000198 ha; lognormal variance with pedigree 0.0039, pedigree (2,2,3,1,2)
  (same comment as for application of plant protection product, by field sprayer)
- urea: 0.00142777 kg; name UREA_N; lognormal variance with pedigree 0.0039, pedigree (2,2,3,1,2)
  The exchange has been updated from 'urea, as N' into 'urea' and therefore its amount has been scaled (multiplied) from 0.0007 kg by 2.1438 kg of 'urea' per kg of 'urea, as N'. Original comment of the exchange is: Based on average mineral application rates, a breakdown of the mineral nutrient by fertiliser type based on that of national mineral fertiliser demand (FAO, 2005) and average yield of 5tonnes/ha (Stats SA, 2007). See details for disaggregation in supporting documentation. Reference(s): FAO (2005) Fertiliser Use by Crop in South Africa, Food and Agriculture Organisation ofo the United Nations, Available at: ftp://ftp.fao.org/agl/agll/docs/fertusesouthafrica.pdf. (Accessed August 2017); Stats SA (2007) Census of Commercial Agriculture, 2007: Financial and Production Statistics, Available at: http://www.nda.agric.za/docs/statsinfo/Censcoagric2007.pdf. (Accessed September 2017).
  properties: dry mass 1 kg, carbon content, fossil 0.2, wet mass 1 kg
- packaging, for pesticides: 0.00342142 kg; lognormal variance with pedigree 0.0532, pedigree (4,3,3,5,4)
  Total amount of active substance/s of pesticides needed for the production of alfalfa-grass silage is calculated to be circa 1.71E-03 kg. Pesticide/s used in this dataset is/are: 'borax, anhydrous, powder', 'molybdenum', 'organophosphorus-compound, unspecified', 'pesticide, unspecified', 'pyrethroid-compound'. The total amount of active substance/s is doubled in order to account for the packaging of the dilluted product of pesticide/s that is/are applied. Therefore, 3.42E-03 kg of packaging for pesticides is justified with this exchange.
  properties: carbon content, fossil 0.85714, price 0.0642 EUR2005, heating value, net 25.97 MJ, dry mass 1 kg, wet mass 1 kg

## Inputs from nature
- Energy, gross calorific value, in biomass [natural resource, biotic]: 17.897 MJ; lognormal variance with pedigree 0.2106, pedigree (5,5,5,5,5)
  Assumed to be the same as in case of 'alfalfa-grass mixture, Swiss integrated production'.
- Transformation, to pasture, man made [natural resource, land]: 1.98 m2; lognormal variance with pedigree 0.1253, pedigree (3,3,3,3,5)
  Overall yield for 2015/2016 growing season of 5 tonnes/ha equates to 1.98 ha/kg. Due to lack of more recent data, the yield was assumed to be the same as that for the 2006/2007 growing season (Stats SA, 2007). Reference(s): Stats SA (2007) Census of Commercial Agriculture, 2007: Financial and Production Statistics, Available at: http://www.nda.agric.za/docs/statsinfo/Censcoagric2007.pdf. (Accessed September 2017).
- Carbon dioxide, in air [natural resource, in air]: 0.620073 kg; = 44/12 * (REF_PRODUCT_C_content_non_fossil* REF_PRODUCT* REF_PRODUCT_DM-SEED_C_content_non_fossil * SEED* REF_PRODUCT_DM); lognormal variance with pedigree 0.21, pedigree (5,5,5,5,5)
  Estimate is not geography specific. Calculated value, see chapter 'CO2 binding' in '01 crop production-direct field emissions natural resources v1.2.pdf' available on ecoinvent reports web page (https://ecoquery.ecoinvent.org/File/Reports). The 44/12 ratio is the stoichiometric mass ratio of carbon dioxide to carbon.
- Transformation, from pasture, man made [natural resource, land]: 1.98 m2; lognormal variance with pedigree 0.1253, pedigree (3,3,3,3,5)
  (same comment as for Transformation, to pasture, man made)
- Occupation, pasture, man made [natural resource, land]: 1.98 m2*year; lognormal variance with pedigree 0.0107, pedigree (2,2,4,1,1)
  Land occupation per growing season is taken to be 12 months, because where crop rotation is practiced, it is on an annual basis. Overall yield for 2015/2016 growing season of 5 tonnes/ha equates to 1.98 ha/kg. Due to lack of more recent data, the yield was assumed to be the same as that for the 2006/2007 growing season (Stats SA, 2007). Reference(s): Stats SA (2007) Census of Commercial Agriculture, 2007: Financial and Production Statistics, Available at: http://www.nda.agric.za/docs/statsinfo/Censcoagric2007.pdf. (Accessed September 2017).

## Emissions to nature
- Phosphate [water, surface water]: 0.000122 kg; lognormal variance with pedigree 0.0812, pedigree (2,3,5,1,1)
  Modelled using the SALCA-P model as recommended by Nemecek and Schnetzer (2012). See supporting documentation for further details. Reference(s): Nemecek T., Bengoa X., Lansche J., Mouron P., Riedener E., Rossi V. & Humbert S. (2015) Methodological Guidelines for the Life Cycle Inventory of Agricultural Products. Version 3.0, July 2015. World Food LCA Database (WFLDB). Quantis and Agroscope, Lausanne and Zurich, Switzerland.
  property carbon content, non-fossil 0; name C_content_non_fossil
  property carbon content, fossil 0; name C_content_fossil
  property dry mass 1 kg; name DM
  property water content 0; name water_content
  property wet mass 1 kg; name WM
  property water in wet mass 0 kg; name WWM
- Mercury [soil, agricultural]: 1.35e-10 kg; lognormal variance with pedigree 0.0492, pedigree (2,3,4,1,1)
  Emissions of heavy metals to soil and surface water estimated based on recommended method in Nemecek and Schnetzer (2011). See documentation for further details. Reference(s): Nemecek and Schnetzer (2011) Methods of Assessment of Direct Field Emissions for LCIs of Agricultural Production Systems, Life cycle inventories of Swiss and European agricultural production systems.
- Nitrate [water, ground-]: 0.0308 kg; lognormal variance with pedigree 0.0812, pedigree (2,3,5,1,1)
  Modelled according to the 2006 IPCC Guidelines for National Greenhouse Gas Inventories. Default emission factor of 0.3 kg N input emitted as NO3 (kg NO3-N) applied to production under irrigation, which accounts for 61% of total production in South Africa. An emission factor of zero was assumed for dryland alfalfa production, as prescribed. See supporting documentation for further details.
- Lead [soil, agricultural]: 7.15e-8 kg; lognormal variance with pedigree 0.0492, pedigree (2,3,4,1,1)
  (same comment as for Mercury)
- Carbon dioxide, fossil [air, non-urban air or from high stacks]: 0.0450463 kg; = UREA_N*0.466461632733939*1.571 +LIME_CaCO3*0.44; lognormal variance with pedigree 0.0092, pedigree (2,3,4,1,1)
  Calculated value. Based on CO2 emissions from limestone and urea application calculated from C content (IPCC, 2006). Emission factors are EF=1.57 kg CO2/kg N for urea, and EF=0.44 kg CO2/kg CaCO3 for limestone. See supporting documentation.
- Copper, ion [water, surface water]: -1.1e-5 kg; normal variance with pedigree 0.0492, pedigree (2,3,4,1,1)
  (same comment as for Mercury)
- Dinitrogen monoxide [air, non-urban air or from high stacks]: 0.000744 kg; name N2O; lognormal variance with pedigree 0.0712, pedigree (2,3,5,1,1)
  Modelled according to the 2006 IPCC Guidelines for National Greenhouse Gas Inventories. See supporting documentation for further details.
- Lead [water, surface water]: 4.24e-6 kg; lognormal variance with pedigree 0.0492, pedigree (2,3,4,1,1)
  (same comment as for Mercury)
- Ammonia [air, non-urban air or from high stacks]: 0.000722 kg; lognormal variance with pedigree 0.0492, pedigree (2,3,5,1,1)
  (same comment as for Dinitrogen monoxide)
- Zinc, ion [water, surface water]: -1.76e-5 kg; normal variance with pedigree 0.0492, pedigree (2,3,4,1,1)
  (same comment as for Mercury)
- Mercury [water, surface water]: -1.43e-7 kg; normal variance with pedigree 0.0492, pedigree (2,3,4,1,1)
  (same comment as for Mercury)
- Nitrogen oxides [air, non-urban air or from high stacks]: 0.000156 kg; lognormal variance with pedigree 0.0492, pedigree (2,3,5,1,1)
  (same comment as for Dinitrogen monoxide)
  property emission ratio 0.21 kg/kg; name NOx_to_N2O
- Pesticides, unspecified [soil, agricultural]: 8.15e-5 kg; lognormal variance with pedigree 0.0422, pedigree (2,3,4,1,1)
  Assumed that all pesticides emitted into the soil. See documentation for further details.
- Cadmium [soil, agricultural]: 8.11e-9 kg; lognormal variance with pedigree 0.0492, pedigree (2,3,4,1,1)
  (same comment as for Mercury)
- Nickel, ion [water, surface water]: 3.61e-7 kg; lognormal variance with pedigree 0.0492, pedigree (2,3,4,1,1)
  (same comment as for Mercury)
- Water [air, unspecified]: 0.072 m3; name water_to_air_unspecified; = water_irrigation_input*fraction_IW_to_air; lognormal variance with pedigree 0.0092, pedigree (2,3,4,1,1)
  Calculated value based on literature values and expert opinion. See comments in the parameters' comment field.
- Phosphate [water, ground-]: 4.25e-5 kg; lognormal variance with pedigree 0.0812, pedigree (2,3,5,1,1)
  (same comment as for Phosphate)
- Water [water, ground-]: 0.0224 m3; name water_to_water_ground; = water_irrigation_input*(1-fraction_IW_to_air)*fraction_IW_to_ground_water; source Siebert S. 2010; lognormal variance with pedigree 0.0092, pedigree (2,3,4,1,1)
  Calculated value. See the parameters and their comments to understand the calculation.
- Copper [soil, agricultural]: 5.7e-7 kg; lognormal variance with pedigree 0.0492, pedigree (2,3,4,1,1)
  (same comment as for Mercury)
- Chromium, ion [water, surface water]: 3.02e-5 kg; lognormal variance with pedigree 0.0492, pedigree (2,3,4,1,1)
  (same comment as for Mercury)
- Cadmium, ion [water, surface water]: 4.25e-7 kg; lognormal variance with pedigree 0.0492, pedigree (2,3,4,1,1)
  (same comment as for Mercury)
- Phosphorus [water, surface water]: 0.000175 kg; lognormal variance with pedigree 0.0812, pedigree (2,3,5,1,1)
  (same comment as for Phosphate)
- Zinc [soil, agricultural]: 2.51e-6 kg; lognormal variance with pedigree 0.0492, pedigree (2,3,4,1,1)
  (same comment as for Mercury)
- Water [water, surface water]: 0.0056 m3; name water_to_water_surface; = water_irrigation_input*(1-fraction_IW_to_air)*fraction_IW_to_surface_water; lognormal variance with pedigree 0.0092, pedigree (2,3,4,1,1)
  Calculated value. See the parameters and their comments to understand the calculation.
- Chromium [soil, agricultural]: 4.12e-6 kg; lognormal variance with pedigree 0.0492, pedigree (2,3,4,1,1)
  (same comment as for Mercury)

## Sampling procedure
Energy and material inputs, as well as land use and production (yield) are from commercial enterprise budgets (Combuds) for lucerne farms in South Africa (five irrigated and two dryland). The National LucerneTrust (NLT, 2008) and academic publications provided further sources of inputs, planting schedules etc. References are provided in the comment fields). A breakdown in the kind of fertilisers used is obtained from the FAO (2005). Lucerne production volumes and areas are obtained from government agricultural statistics (
DAFF, 2017). Reference(s): FAO (2005) Fertiliser Use by Crop in South Africa, Food and Agriculture Organisation ofo the United Nations, Available at: ftp://ftp.fao.org/agl/agll/docs/fertusesouthafrica.pdf. (Accessed August 2017); NLT (2008) Official Website, National Lucerne Trust, Available at: http://www.lusern.org/. (Accessed October 2017); DAFF (2017) Abstract of Agricultural Statistics 2017, Department of Agriculture, Forestry and Fisheries of South Africa, Available at: http://www.daff.gov.za/Daffweb3/Portals/0/Statistics%20and%20Economic%20Analysis/Statistical%20Information/Abstract%202017.pdf. (Accessed September 2017).

## Extrapolations
This dataset has been extrapolated from year 2017 to the year of the calculation (2021). The uncertainty has been adjusted accordingly.

## Review by Assumpció ANTON 2017-11-21
Please,be aware to consider further flow updates as far as better information or emission models are available.

It could be advisable to have a specific report, similar to Ecoinvent report n.º 15 or WFLDB guidelines but specific for South African crops, where specific parameters, scaling factors used to build and calculate emissions are explained. That would help further parctitioners to validate datasets or change what they may consider.
