# mulberry production

Dataset: EcoSpold 2, unit process
Geography: IN
Time period: 2014-01-01 to 2021-12-31
Technology level: current
Classification: EcoSpold01Categories: agricultural production/plant production
Classification: ISIC rev.4 ecoinvent: 0127:Growing of beverage crops
Scenario: Business-as-Usual
System model: Allocation, cut-off by classification
Generated by: Archana Datta
Database: ecoinvent
isCopyrightProtected: true
accessRestrictedTo: 1

## General comment
This inventory dataset exclusively covers the field activity for the production of 1kg mulberry leaves in India in 2016. The farm has a yield of 30,000 kg Mulberry leaves per ha for this crop cycle. Mineral NPK fertilizer input is 300-125-125 kg/ha. Organic fertilizer applied amounts to 40,000 kg/ha of manure from cattle dung in two doses at first and fifth crop cycle.
In India, Mulberry is a perennial crop and once properly raised in the first year it can come to full yielding capacity during the second year and lasts for over 15 years in the field without any significant detonation in yield of leaves. In order to get good leaf yield, training and pruning is regularly performed. Harvesting is done on regular basis. Picking of leaves should be carried out in time, when the leaves are at correct stage of maturity for harvest. In shoot harvest method, harvesting can be done at an interval of 70 days, in leaf harvest method first harvest is taken 70 days after first pruning, and subsequent harvest at an interval of 55 days. Amongst the various inputs irrigation ranks high in giving quick and good results. Normally, the annual expected yield is 40-50 tonnes of leaves per hectare.
This dataset covers only the field activities for the production of mulberry leaves. That means the technical boundary ends at the harvesting of the mature leaves.

## Included activities start
This activity starts right after the harvest of the previous crop.

## Included activities end
This activity ends with harvest of mulberry leaves as the final product of the cultivation process. The primary purpose of this activity is to generate leaves to feed to the silkworms.

## Technology
Cultivation of mulberry plant from conventional production standards

## Reference product
- mulberry leaves: 1 kg; name RP_amount_1; CPC 01353: Raspberries, blackberries, mulberries and loganberries; By-product classification allocatable product
  production volume 6.27e9 kg; name RP_PV_1; = 209000*30000
    209000 ha of land was under mulberry cultivation in India in 2015-16. This is multiplied with yeald per hectare. Source: Central Silk Board, Bengaluru, India
  property price 7.54245 EUR2005; name RP_amount_1_price_EUR2005
    Estimated value. The values is highly uncertain as the prices reported onlive vary significantly and most of the prices that can be found refer to the leaves used for tea or extract of leaves. The price is taken from the website everythingsilkworms.com.au (retrieved from: everythingsilkworms.com.au, 2018. Bag of Fresh Mulberry leaves, retrieved from: https://everythingsilkworms.com.au/product/bag-of-fresh-mulberry-leaves/, accessed 1Feb2018). The website reports a value of 9.99USD. The website is considered to be a reliable source for prices for small quantities, bulk prices are most likely quite lower than this.
  property carbon content 0.475
    carbon content on a dry matter basis (reserved; not for manual entry)
  properties: water content 7.11688, dry mass 0.1232 kg, wet mass 1 kg, water in wet mass 0.8768 kg, carbon content, fossil 0, carbon content, non-fossil 0.475, carbon allocation 0.05852 kg

## Inputs from technosphere
- waste wood, untreated: -0.403333 kg; name BP_amount_1; lognormal variance with pedigree 0.0046, pedigree (1,4,3,1,1)
  Data represents mulberry sticks with calorific value of 4600 cal/kg wood
  production volume 2.5289e9 kg; = RP_PV_1* BP_amount_1/ RP_amount_1
    calculated from the production volume of the reference product using relative values
  property price 0 EUR2005; name BP_amount_1_price_EUR2005
  properties: heating value, net 13.99 MJ
  note on heating value, net: Value taken from the general comment of the treatment dataset.
- ammonium sulfate: 6.60563e-5 kg; lognormal variance with pedigree 0.0046, pedigree (1,4,3,1,1)
  Calculated Value. This value has been calculated by using the Ecoinvent LCI calculation tool for crop production.
  properties: wet mass 1 kg, dry mass 1 kg
- lime: 0.208109 kg; lognormal variance with pedigree 0.0046, pedigree (1,4,3,1,1)
  The data was collected for a hectare area through interview
  properties: dry mass 1 kg, carbon content, fossil 0.120005, wet mass 1 kg
- planting tree: 0.0230633 unit; lognormal variance with pedigree 0.0052, pedigree (2,4,3,1,1)
  cut stems planted
- ammonia, anhydrous, liquid: 8.57849e-7 kg; lognormal variance with pedigree 0.0046, pedigree (1,4,3,1,1)
  (same comment as for ammonium sulfate)
  properties: dry mass 1 kg, wet mass 1 kg
- manure, solid, cattle: 1.33333 kg; lognormal variance with pedigree 0.0046, pedigree (1,4,3,1,1)
  The data was collected for a hectare area through interview
  properties: wet mass 1 kg, dry mass 0.22 kg, carbon content, non-fossil 0.441, water content 3.5454
- fruit tree seedling, for planting: 0.0230633 unit; lognormal variance with pedigree 0.0052, pedigree (2,4,3,1,1)
  cut stems planted
  properties: carbon content, non-fossil 1, wet mass 0.03 kg, dry mass 0.03 kg
- urea: 0.00851091 kg; lognormal variance with pedigree 0.0046, pedigree (1,4,3,1,1)
  The exchange has been updated from 'urea, as N' into 'urea' and therefore its amount has been scaled (multiplied) from 0.004 kg by 2.1438 kg of 'urea' per kg of 'urea, as N'. Original comment of the exchange is: The data was collected for a hectare area through interview
  properties: carbon content, fossil 0.2, wet mass 1 kg, dry mass 1 kg
- cyclic N-compound: 9.86667e-5 kg; lognormal variance with pedigree 0.0126, pedigree (4,4,3,1,1)
  (same comment as for ammonium sulfate)
  properties: wet mass 1 kg, dry mass 1 kg, carbon content, fossil 0.641962
- inorganic potassium fertiliser, as K2O: 0.00121754 kg; lognormal variance with pedigree 0.0046, pedigree (1,4,3,1,1)
  (same comment as for ammonium sulfate)
  properties: dry mass 1 kg, wet mass 1 kg
- packaging, for fertilisers: 0.452884 kg; lognormal variance with pedigree 0.0532, pedigree (4,3,3,5,4)
  Total amount of active substance/s of fertilisers needed for the production of 'mulberry leaves' is calculated to be circa 2.26E-01 kg. Fertiliser/s used in this dataset is/are: 'ammonia, liquid', 'ammonium nitrate, as N', 'ammonium sulfate, as N', 'lime', 'nitrogen fertiliser, as N', 'phosphate fertiliser, as P2O5', 'phosphate rock, as P2O5, beneficiated, dry', 'potassium chloride, as K2O', 'potassium fertiliser, as K2O', 'potassium sulfate, as K2O', 'urea, as N'. The total amount of active substance/s is doubled in order to account for the packaging of the dilluted product of fertiliser/s that is/are applied. Therefore, 4.53E-01 kg of packaging for fertilisers is justified with this exchange.
  properties: carbon content, fossil 0.825301, price 0.0642 EUR2005, heating value, net 25.01 MJ, dry mass 1 kg, wet mass 1 kg
  note on carbon content, fossil: Considering a chemical formula (C2H4)n for polyethylene, carbon content-fossil is calculated to be 0.856286 kg of Carbon per kg of dry mass.
- inorganic nitrogen fertiliser, as N: 0.00596252 kg; lognormal variance with pedigree 0.0046, pedigree (1,4,3,1,1)
  This exchange is an aggregation of amounts:
  0.00397001208843117. Comment:
  6.072361560298029E-4. Comment:
  6.072361560298029E-4. Comment:
  6.157629520522409E-4. Comment:
  1.57406163741649E-5. Comment:
  1.4653261235374302E-4. Comment:
  properties: dry mass 1 kg, wet mass 1 kg
- potassium chloride: 0.00463609 kg; lognormal variance with pedigree 0.0046, pedigree (1,4,3,1,1)
  The exchange has been updated from 'potassium chloride, as K2O' into 'potassium chloride' and therefore its amount has been scaled (multiplied) from 0.0029 kg by 1.5829 kg of 'potassium chloride' per kg of 'potassium chloride, as K2O'. Original comment of the exchange is: Calculated Value. This value has been calculated by using the Ecoinvent LCI calculation tool for crop production.
  properties: wet mass 1 kg, dry mass 1 kg
- packaging, for pesticides: 0.000264 kg; lognormal variance with pedigree 0.0532, pedigree (4,3,3,5,4)
  Total amount of active substance/s of pesticides needed for the production of mulberry leaves is calculated to be circa 1.32E-04 kg. Pesticide/s used in this dataset is/are: 'cyclic N-compound', 'mancozeb'. The total amount of active substance/s is doubled in order to account for the packaging of the dilluted product of pesticide/s that is/are applied. Therefore, 2.64E-04 kg of packaging for pesticides is justified with this exchange.
  properties: dry mass 1 kg, price 0.0642 EUR2005, wet mass 1 kg, carbon content, fossil 0.85714, heating value, net 25.97 MJ
- mancozeb: 3.33333e-5 kg; lognormal variance with pedigree 0.044, pedigree (1,4,3,1,1)
  The data was collected for a hectare area through interview
  properties: dry mass 1 kg, carbon content, fossil 0.17759, wet mass 1 kg
- ammonium nitrate: 2.01594e-6 kg; lognormal variance with pedigree 0.0052, pedigree (2,4,3,1,1)
  The exchange has been updated from 'ammonium nitrate, as N' into 'ammonium nitrate' and therefore its amount has been scaled (multiplied) from 0 kg by 2.8573 kg of 'ammonium nitrate' per kg of 'ammonium nitrate, as N'. Original comment of the exchange is: Calculated Value. This value has been calculated by using the Ecoinvent LCI calculation tool for crop production.
  properties: dry mass 1 kg, wet mass 1 kg
- potassium sulfate: 3.74812e-5 kg; lognormal variance with pedigree 0.0046, pedigree (1,4,3,1,1)
  The exchange has been updated from 'potassium sulfate, as K2O' into 'potassium sulfate' and therefore its amount has been scaled (multiplied) from 0 kg by 1.85 kg of 'potassium sulfate' per kg of 'potassium sulfate, as K2O'. Original comment of the exchange is: Calculated Value. This value has been calculated by using the Ecoinvent LCI calculation tool for crop production.
  properties: dry mass 1 kg, wet mass 1 kg
- trellis system, wooden poles, soft wood, tar impregnated: 3.33333e-5 ha; lognormal variance with pedigree 0.0126, pedigree (4,4,3,1,1)
  (same comment as for ammonium sulfate)
- irrigation: 0.329467 m3; lognormal variance with pedigree 0.018, pedigree (4,4,3,1,1)
  The data was collected for a hectare area through interview
  properties: dry mass 0.11 kg, water content 9089.91, wet mass 1000 kg
- phosphate rock, beneficiated: 1.18032e-5 kg; lognormal variance with pedigree 0.0126, pedigree (4,4,3,1,1)
  The exchange has been updated from 'phosphate rock, as P2O5, beneficiated, dry' into 'phosphate rock, beneficiated' and therefore its amount has been scaled (multiplied) from 0 kg by 3.125 kg of 'phosphate rock, beneficiated' per kg of 'phosphate rock, as P2O5, beneficiated, dry'. Original comment of the exchange is: The data was collected for a hectare area through interview
  properties: dry mass 1 kg, wet mass 1 kg
- tillage, harrowing, by rotary harrow: 7.52174e-5 ha; lognormal variance with pedigree 0.0046, pedigree (1,4,3,1,1)
  The data was collected for a hectare area through interview. The tillage activity was scaled based on the diesel used for tillage in the ecoinvent dataset and the diesel consumption data collected in the project
- establishing orchard: 0.0230633 unit; lognormal variance with pedigree 0.0052, pedigree (2,4,3,1,1)
  cut stems planted
- inorganic phosphorus fertiliser, as P2O5: 0.00416289 kg; lognormal variance with pedigree 0.0046, pedigree (1,4,3,1,1)
  This exchange is an aggregation of amounts:
  1.850879334932225E-5. Comment:
  3.401548271713546E-4. Comment:
  0.0015277814944029502. Comment:
  0.0015277814944029502. Comment:
  7.48663037010525E-4. Comment:
  properties: wet mass 1 kg, dry mass 1 kg
- land use change, perennial crop: 9.35366e-6 ha; lognormal variance with pedigree 0.0128, pedigree (4,4,3,1,1)
  (same comment as for ammonium sulfate)

## Inputs from nature
- Transformation, to permanent crop, irrigated [natural resource, land]: 0.0166667 m2; lognormal variance with pedigree 0.0054, pedigree (2,4,3,1,1)
  (same comment as for ammonium sulfate)
- Energy, gross calorific value, in biomass [natural resource, biotic]: 5.694 MJ; lognormal variance with pedigree 0.0046, pedigree (1,4,3,1,1)
- Transformation, from permanent crop, irrigated [natural resource, land]: 0.0166667 m2; lognormal variance with pedigree 0.0054, pedigree (2,4,3,1,1)
  (same comment as for ammonium sulfate)
- Occupation, permanent crop, irrigated [natural resource, land]: 0.333333 m2*year; lognormal variance with pedigree 0.006, pedigree (1,4,3,1,1)
  (same comment as for ammonium sulfate)
- Carbon dioxide, in air [natural resource, in air]: 0.76948 kg; lognormal variance with pedigree 0.0046, pedigree (1,4,3,1,1)
  (same comment as for ammonium sulfate)

## Emissions to nature
- Copper, ion [water, surface water]: 2.30018e-6 kg; lognormal variance with pedigree 0.094, pedigree (1,4,3,1,1)
  (same comment as for ammonium sulfate)
- Chromium [soil, agricultural]: 2.63364e-5 kg; lognormal variance with pedigree 0.044, pedigree (1,4,3,1,1)
  (same comment as for ammonium sulfate)
- Chromium, ion [water, surface water]: 1.6113e-6 kg; lognormal variance with pedigree 0.094, pedigree (1,4,3,1,1)
  (same comment as for ammonium sulfate)
- Water [air, non-urban air or from high stacks]: 0.168028 m3; lognormal variance with pedigree 0.0046, pedigree (1,4,3,1,1)
  (same comment as for ammonium sulfate)
- Cadmium, ion [water, surface water]: 1.69281e-8 kg; lognormal variance with pedigree 0.094, pedigree (1,4,3,1,1)
  (same comment as for ammonium sulfate)
- Nitrogen oxides [air, non-urban air or from high stacks]: 0.00103031 kg; lognormal variance with pedigree 0.044, pedigree (1,4,3,1,1)
  (same comment as for ammonium sulfate)
- Cadmium, ion [water, ground-]: 1.53351e-9 kg; lognormal variance with pedigree 0.094, pedigree (1,4,3,1,1)
  (same comment as for ammonium sulfate)
- Zinc [soil, agricultural]: 5.36091e-6 kg; lognormal variance with pedigree 0.044, pedigree (1,4,3,1,1)
  (same comment as for ammonium sulfate)
- Dinitrogen monoxide [air, non-urban air or from high stacks]: 0.000323619 kg; lognormal variance with pedigree 0.034, pedigree (1,4,3,1,1)
  (same comment as for ammonium sulfate)
- Phosphate [water, ground-]: 6.13238e-6 kg; lognormal variance with pedigree 0.044, pedigree (1,4,3,1,1)
  (same comment as for ammonium sulfate)
- Carbon dioxide, fossil [air, non-urban air or from high stacks]: 0.100863 kg; lognormal variance with pedigree 0.0046, pedigree (1,4,3,1,1)
  (same comment as for ammonium sulfate)
- Mancozeb [soil, agricultural]: 3.33333e-5 kg; lognormal variance with pedigree 0.044, pedigree (1,4,3,1,1)
  (same comment as for ammonium sulfate)
- Ammonia [air, non-urban air or from high stacks]: 0.00281498 kg; lognormal variance with pedigree 0.012, pedigree (1,4,3,1,1)
  (same comment as for ammonium sulfate)
- Nitrate [water, ground-]: 0.00689959 kg; lognormal variance with pedigree 0.044, pedigree (1,4,3,1,1)
  (same comment as for ammonium sulfate)
- Water [water, ground-]: 0.128492 m3; lognormal variance with pedigree 0.0046, pedigree (1,4,3,1,1)
  (same comment as for ammonium sulfate)
- Phosphorus [water, surface water]: 0.000123132 kg; lognormal variance with pedigree 0.044, pedigree (1,4,3,1,1)
  (same comment as for ammonium sulfate)
- Water [water, surface water]: 0.0329467 m3; lognormal variance with pedigree 0.0046, pedigree (1,4,3,1,1)
  (same comment as for ammonium sulfate)
- Phosphate [water, surface water]: 4.73343e-5 kg; lognormal variance with pedigree 0.044, pedigree (1,4,3,1,1)
  (same comment as for ammonium sulfate)
- Zinc, ion [water, surface water]: 3.70075e-6 kg; lognormal variance with pedigree 0.094, pedigree (1,4,3,1,1)
  (same comment as for ammonium sulfate)
- Zinc, ion [water, ground-]: 9.69014e-7 kg; lognormal variance with pedigree 0.094, pedigree (1,4,3,1,1)
  (same comment as for ammonium sulfate)
- Nickel, ion [water, surface water]: 1.35954e-6 kg; lognormal variance with pedigree 0.094, pedigree (1,4,3,1,1)
  (same comment as for ammonium sulfate)
- Mercury [water, ground-]: 4.21762e-11 kg; lognormal variance with pedigree 0.094, pedigree (1,4,3,1,1)
  (same comment as for ammonium sulfate)
- Nickel [soil, agricultural]: 1.18539e-7 kg; lognormal variance with pedigree 0.044, pedigree (1,4,3,1,1)
  (same comment as for ammonium sulfate)
- Lead [soil, agricultural]: -4.89064e-7 kg
  (same comment as for ammonium sulfate)
- Mercury [water, surface water]: 4.49128e-9 kg; lognormal variance with pedigree 0.094, pedigree (1,4,3,1,1)
  (same comment as for ammonium sulfate)
- Copper, ion [water, ground-]: 1.17496e-7 kg; lognormal variance with pedigree 0.094, pedigree (1,4,3,1,1)
  (same comment as for ammonium sulfate)
- Lead [water, surface water]: 9.10937e-7 kg; lognormal variance with pedigree 0.094, pedigree (1,4,3,1,1)
  (same comment as for ammonium sulfate)
- Lead [water, ground-]: 1.22091e-8 kg; lognormal variance with pedigree 0.094, pedigree (1,4,3,1,1)
  (same comment as for ammonium sulfate)
- Imidacloprid [soil, agricultural]: 9.86667e-5 kg; lognormal variance with pedigree 0.044, pedigree (1,4,3,1,1)
  (same comment as for ammonium sulfate)
- Mercury [soil, agricultural]: 4.24266e-8 kg; lognormal variance with pedigree 0.044, pedigree (1,4,3,1,1)
  (same comment as for ammonium sulfate)
- Chromium, ion [water, ground-]: 7.03708e-7 kg; lognormal variance with pedigree 0.094, pedigree (1,4,3,1,1)
  (same comment as for ammonium sulfate)
- Copper [soil, agricultural]: -7.30398e-7 kg
  (same comment as for ammonium sulfate)
- Cadmium [soil, agricultural]: 1.98317e-7 kg; lognormal variance with pedigree 0.044, pedigree (1,4,3,1,1)
  (same comment as for ammonium sulfate)

## Sampling procedure
Focus group discussion, expert interviews, literature data and assumptions. The inventory dataset is based on data collected from farmer and silk worm rearer at Guna district, in the state of Madhya Pradesh (North India). Data has been collected through field visit and interview. Sample was considered representative as they are practicing sericulture as per government operated training programs.The literature data were supported by a total of three focus group discussions among the farmers and experts from the government centers (Resham Kendras - silk growing areas) in India. Standardized questionnaires were developed and adapted to mulberry-specific cultivation and post-harvest situation. The secondary data from literature and the primary data from surveys were compared and matched to obtain highest data quality.

## Extrapolations
This dataset has been extrapolated from year 2017 to the year of the calculation (2021). The uncertainty has been adjusted accordingly.
