# treatment of waste polyethylene, municipal incineration with fly ash extraction

Dataset: EcoSpold 2, unit process
Geography: CH
Time period: 2006-01-01 to 2021-12-31
Technology level: current
Classification: ISIC rev.4 ecoinvent: 3821:Treatment and disposal of non-hazardous waste
Synonyms: municipal waste incineration
Scenario: Business-as-Usual
System model: Allocation, cut-off by classification
Share of production covered: 1.8 %
Generated by: Gabor Doka
Published in: Doka G. 2015
Database: ecoinvent
isCopyrightProtected: true
accessRestrictedTo: 1

## General comment
This dataset represents the activity of waste disposal of waste polyethylene in a municipal solid waste incinerator (MSWI) // Recommended use of this dataset: For PE, which goes to disposal as part of communal waste mixture. // // Waste composition (wet, in ppm): upper heating value 42.82 MJ/kg; lower heating value 42.47 MJ/kg; H2O 4000; O 38435; H 122490; C 822050; S 426.9; N 1297.2; P n.a.; B n.a.; Cl 1461.5; Br 9.5896; F 14.384; I n.a.; Ag n.a.; As 1.822; Ba 239.74; Cd 33.946; Co 1.6782; Cr 12.466; Cu 41.367; Hg 0.047948; Mn 30.047; Mo n.a.; Ni 0.95896; Pb 22.596; Sb 10.069; Se 2.0138; Sn 3.814; V 2205.6; Zn 342.01; Be 0.47948; Sc n.a.; Sr 84.868; Ti 958.96; Tl 0.38358; W n.a.; Si n.a.; Fe 1534.3; Ca 2589.2; Al 191.79; K n.a.; Mg 95.896; Na 1405.4; // Share of carbon in waste that is biogenic 0%. // Share of metals in waste not oxidised and bulk-recyclable (exclude very small or thin parts) Iron: 0%; Alu: 0%; Copper: 0%. // Recovery of metal scrap from bottom ash to recycling: 0g iron scrap, 0g aluminium scrap, 0g copper scrap. From this waste, the FLUWA process in the technology mix recovers 0.00041kg (DM) of a hydroxide sludge to be recycled in zinc furnaces. // Ultimately one kg of this waste produces 0.02985 kg of bottom ash (can include some washed ash) and 0.005391 kg of residues, which are landfilled (technology mix). Additional solidification of residues with 0.002156 kg of cement.Net energy production: 5.55MJ/kg electric energy and 10.69MJ/kg thermal energy. //

## Included activities start
waste incineration from waste reception gate and delivery into waste bunker at incinerator plant site (without transports to the incinerator)

## Included activities end
Waste-specific short-term emissions to water from leachate. Long-term emissions from landfill to ground water.

## Geography
Specific to the technology mix encountered in Switzerland in 2012.

## Technology
average Swiss MSWI plants in 2010 (grate incinerators) with electrostatic precipitator for fly ash (ESP), wet flue gas scrubber and 25% SNCR , 42.77% SCR-high dust , 32.68% SCR-low dust -DeNOx facilities and 0% without Denox (weighted according to mass of burnt waste, representing Swiss average). Efficiency of iron scrap separation from slag : 58%. Efficiency of non-ferrous scrap separation from slag : 31%. The technology mix for this dataset includes a filter ash treatment (FLUWA) of a share of 46.22%. Gross electric efficiency technology mix 15.84% and Gross thermal efficiency technology mix 28.51%

## Time period
Waste composition as given in literature reference, theoretical data or other source. Transfer coefficients for modern MSWI.

## Reference product
- waste polyethylene: -1 kg; name RP_amount_1; By-product classification Waste; CPC 39270: Waste, parings and scrap of plastics; CAS 9002-88-4
  Main reference product of this activity (supply of disposal service).
  production volume 1.3727e8 kg; name RP_PV_1
    based on corresponding global production volume of MSW fraction in conventional MSWI (wo fly ash extraction) and scaled down to annual Swiss incinerated MSW mass of 3.02 mio. tonnes.
  property heating value, net 42.47 MJ
    Value taken from the general comment of the treatment dataset.
  property price 0 EUR2005; name RP_amount_1_price_EUR2005
    Waste products are assigned a price of zero as they are assumed to require further treatment.
  property carbon content 0.82535
    carbon content on a dry matter basis (reserved; not for manual entry)
  properties: sulfur content 0.00042861, nitrogen content 0.0013024, water in wet mass 0.004 kg, wet mass 1 kg, magnesium content 9.6281e-5, hydrogen content 0.12298, water content 0.0040161, bromine content 9.6281e-6, arsenic content 1.8293e-6, chromium content 1.2517e-5, manganese content 3.0168e-5, cadmium content 3.4082e-5, oxygen content 0.03859, mercury content 4.8141e-8, cobalt content 1.6849e-6, antimony content 1.011e-5, copper content 4.1533e-5, tin content 3.8294e-6, barium content 0.0002407, fluorine content 1.4442e-5, selenium content 2.0219e-6, beryllium content 4.8141e-7, vanadium content 0.0022145, lead content 2.2687e-5, zinc content 0.00034338, calcium content 0.0025996, nickel content 9.6281e-7, iron content 0.0015405, dry mass 0.996 kg, carbon content, fossil 0.82535, sodium content 0.001411, thallium content 3.8512e-7, strontium content 8.5209e-5, titanium content 0.00096281, aluminium content 0.00019256, chlorine content 0.0014674, carbon allocation 0.822049 kg

## By-products
- electricity, for reuse in municipal waste incineration only: 0 kWh; name E_el_prod_MSWI; CPC 17100: Electrical energy; By-product classification allocatable product; pedigree (1,1,1,1,1)
  Net electricity generated from this waste and used in internal MSWI plant energy redistribution.
  Uncertainty: uncertainty is calculated from uncertainties in waste composition and uncertainties in energy efficiency and the uncertainty in internal energy demand
  production volume 2.1179e8 kWh
    calculated in proportion to reference product waste input to incinerator
  property exergy 3.6 MJ; name E_el_prod_MSWI_exergy
    This exergy property is based on the exergy content of the product.
  property true value relation 3.6; name E_el_prod_MSWI_true_value_relation
    property to calculate "true value" from
  property price 0.1 EUR2005; name E_el_prod_MSWI_price_EUR2005
    Estimated to be the same price as in case of electricity, medium voltage.
- heat, for reuse in municipal waste incineration only: 0 MJ; name E_th_prod_MSWI; By-product classification allocatable product; CPC 17300: Steam and hot water; pedigree (1,1,1,1,1)
  Net useful heat generated from this waste and used in internal MSWI plant energy redistribution.
  Uncertainty: uncertainty is calculated from uncertainties in waste composition and uncertainties in energy efficiency and the uncertainty in internal energy demand
  production volume 1.468e9 MJ
    calculated in proportion to reference product waste input to incinerator
  property exergy 0.1842 MJ; name E_th_prod_MSWI_exergy
    This exergy property is based on the exergy content of the product.
  property price 0.0106 EUR2005; name E_th_prod_MSWI_price_EUR2005
    Average European district heat price from Ecoheatcool and Euroheat 2005-2006, Ecoheat Work package 1: The European heat market. Final report. 10.6 EUR/GJ i s the price of district heat. http://www.solarthermalworld.org/files/Ecoheatcool%20WP1%20Web.pdf?download
  property true value relation 0.1842; name E_th_prod_MSWI_true_value_relation
    property to calculate "true value" from
- metalliferous hydroxide sludge: 0 kg; By-product classification Recyclable; CPC 1429: Other non-ferrous metal ores and concentrates (other than uranium or thorium ores and concentrates); pedigree (1,1,1,1,1)
  Metalliferous hydroxide sludge from filter ash leaching (FLUWA).
  Uncertainty: uncertainty is calculated from uncertainties in waste composition and transfer coefficients to filter ash in incinerator and the uncertainty of the transfer coefficients of the FLUWA process.
  production volume 0 kg
    calculated in proportion to reference product waste input to incinerator
  property price 0.0042 EUR2005
    World market value of manure, deflated with barley world market price and consumer price index, based on [http://www.gov.pe.ca/photos/original/af_NM_manconv.pdf].
  property heating value, net 0 MJ
    Non combustible products are assumed to have an LHV equal to zero (0).
  property carbon content 0.10427
    carbon content on a dry matter basis (reserved; not for manual entry)
  properties: chlorine content 0.085931, sulfur content 0.064023, oxygen content 0.44409, fluorine content 0.00051173, barium content 0.00016455, lead content 0.00099481, chromium content 0.00014572, cadmium content 0.028206, mercury content 2.1306e-7, nickel content 2.1768e-6, copper content 4.1914e-5, antimony content 0.00026645, arsenic content 4.1166e-5, cobalt content 0.00010096, tin content 8.2071e-6, strontium content 2.3604e-6, bromine content 0.00046185, manganese content 7.4886e-5, water content 3, beryllium content 1.7473e-5, selenium content 5.2156e-5, zinc content 0.1471, vanadium content 0.030637, magnesium content 0.00036737, titanium content 0.00019178, aluminium content 3.2274e-5, dry mass 0.25 kg, iron content 0.00041287, calcium content 0.063693, wet mass 1 kg, carbon content, fossil 0.10427, sodium content 0.02815, thallium content 9.4531e-6, water in wet mass 0.75 kg, carbon allocation 0.0260675 kg

## Inputs from technosphere
- process-specific burdens, residual material landfill: 0.010747 kg; lognormal variance with pedigree 0.056273, pedigree (1,1,4,1,1)
  Mass-specific expenditures required for landfilling of incineration residues.;activityLink introduced to establish a direct link to the corresponding regional supply of this product
  Uncertainty: uncertainty is calculated from uncertainties in waste composition and transfer coefficients in incinerator
- ammonia, anhydrous, liquid: 0.0011607 kg; lognormal variance with pedigree 0.2099, pedigree (1,1,4,1,1)
  Input to DeNOx stage (100% NH3).
  Uncertainty: uncertainty calculated from uncertainty in average DeNOx input, uncertainty in the share of thermal NOx, uncertainty of nitrogen content in average municipal waste and the uncertainty in nitrogen content in *this* waste.
  properties: dry mass 1 kg, wet mass 1 kg
- chemical, organic: 5.2325e-6 kg; lognormal variance with pedigree 0.98397, pedigree (1,1,4,1,1)
  Auxilliary inputs for the wastewater treatment stage of the incinerator plant. Proxy for (pure) Trisodium-trimercapto-s-triazine (CAS 17766-26-6), used as 15% diluted solution, aka TMT15.
  Uncertainty: uncertainty calculated from uncertainty in average TMT15 input, of transfer coefficients in the incinerator, and the uncertainty of the waste composition of this waste
  properties: carbon content, fossil 0.628, dry mass 1 kg, wet mass 1 kg, heating value, net 19.03 MJ
- titanium dioxide: 7.272e-5 kg; lognormal variance with pedigree 0.50047, pedigree (1,1,4,1,1)
  Input to DeNOx stage (TiO2 catalyst carrier)
  Uncertainty: uncertainty calculated from uncertainty in average DeNOx input, uncertainty in the share of thermal NOx, uncertainty of nitrogen content in average municipal waste and the uncertainty in nitrogen content in *this* waste.
  properties: wet mass 1 kg, dry mass 1 kg
- chemical, inorganic: 4.9477e-5 kg; lognormal variance with pedigree 0.21109, pedigree (1,1,4,1,1)
  Auxilliary inputs for the wastewater treatment stage of the incinerator plant. Proxy for Polyelectrolyte.
  Uncertainty: uncertainty calculated from uncertainty in average Polyelectrolyte input, of transfer coefficients in the incinerator, and the uncertainty of the waste composition of this waste
  properties: carbon content, fossil 0.003, dry mass 1 kg, wet mass 1 kg
- spent activated carbon with mercury: -2.558e-7 kg; name BP_amount_1; lognormal variance with pedigree 1.9284, pedigree (1,1,4,1,1)
  Spent ion exchanger charged with mercury, from FLUWA filter ash treatment, approximated here with Spent activated carbon with mercury, deposited undergound in a polyethylene Big Bag.
  Uncertainty: uncertainty calculated from uncertainty in of transfer coefficients in the incinerator, and the uncertainty of the waste composition of this waste.
  production volume 35.1137 kg; = ABS(RP_PV_1 * (BP_amount_1 / RP_amount_1))
    Calculated from production volume of reference product using the relative outputs.
  property price 0 EUR2005; name BP_amount_1_price_EUR2005
  properties: heating value, net 18.18 MJ, dry mass 1 kg, wet mass 1 kg, carbon content, fossil 0.6
- process-specific burdens, slag landfill: 0.029852 kg; lognormal variance with pedigree 0.068069, pedigree (1,1,4,1,1)
  Mass-specific expenditures required for landfilling of bottom ash.;activityLink introduced to establish a direct link to the corresponding regional supply of this product
  Uncertainty: uncertainty is calculated from uncertainties in waste composition and transfer coefficients in incinerator
- cement, unspecified: 0.0021562 kg; lognormal variance with pedigree 0.065357, pedigree (1,1,4,1,1)
  Cement required for solidification of landfilled residual material.
  Uncertainty: Uncertainty calculated from uncertainty of the waste composition of this waste, of transfer coefficients in the incinerator and of the solidification recipe.
  properties: wet mass 1 kg, dry mass 1 kg
- municipal waste incineration facility: 2.5e-10 unit
  Demands per kilogram waste.
- waste cement, hydrated: -0.0053906 kg; lognormal variance with pedigree 0.065357, pedigree (1,1,4,1,1)
  Hydrated cement output for solidification of landfilled residual material.
  Uncertainty: Uncertainty calculated from uncertainty of the waste composition of this waste and transfer coefficients in the incinerator and of the solidification recipe.
  production volume 739960 kg
    calculated in proportion to reference product waste input to incinerator
  properties: wet mass 1 kg, dry mass 1 kg
- cationic resin: 2.4301e-7 kg; lognormal variance with pedigree 1.9284, pedigree (1,1,4,1,1)
  Auxilliary input for mercury removal in filter ash treatment (FLUWA).
  Uncertainty: uncertainty calculated from uncertainty in of transfer coefficients in the incinerator, and the uncertainty of the waste composition of this waste
  properties: carbon content, fossil 0.521606, wet mass 1 kg, dry mass 0.5 kg, water content 1, heating value, net 6.68 MJ
- sodium hydroxide, without water, in 50% solution state: 0.00039108 kg; lognormal variance with pedigree 0.2185, pedigree (1,1,4,1,1)
  Auxilliary inputs for the flue gas treatment stage of the incinerator plant, and partially in the filter ash treatment (FLUWA).
  Uncertainty: uncertainty calculated from uncertainty in average NaOH input, of transfer coefficients in the incinerator, and the uncertainty of the waste composition of this waste
  properties: dry mass 1 kg, wet mass 1 kg, heating value, net 3.03 MJ
- residual material landfill: 2.2391e-11 unit; lognormal variance with pedigree 0.056273, pedigree (1,1,4,1,1)
  Landfill infrastructure required for landfilling of incineration residues.
  Uncertainty: uncertainty is calculated from uncertainties in waste composition and transfer coefficients in incinerator
- slag landfill: 5.307e-11 unit; lognormal variance with pedigree 0.068069, pedigree (1,1,4,1,1)
  Landfill infrastructure required for landfilling of bottom ash.
  Uncertainty: uncertainty is calculated from uncertainties in waste composition and transfer coefficients in incinerator
- quicklime, milled, packed: 0.00059969 kg; lognormal variance with pedigree 0.8072, pedigree (1,1,4,1,1)
  Auxilliary inputs for the flue gas treatment stage of the incinerator plant.
  Uncertainty: uncertainty calculated from uncertainty in average CaO input, of transfer coefficients in the incinerator, and the uncertainty of the waste composition of this waste
  properties: dry mass 0.99 kg, wet mass 1 kg, water content 0.010101
- chromium oxide, flakes: 1.4841e-6 kg; lognormal variance with pedigree 0.50047, pedigree (1,1,4,1,1)
  Input to DeNOx stage. Active component in SCR catalyst (vanadium pentoxide, V2O5), here approximated with the available chromium trioxide.
  Uncertainty: uncertainty calculated from uncertainty in average DeNOx input, uncertainty in the share of thermal NOx, uncertainty of nitrogen content in average municipal waste and the uncertainty in nitrogen content in *this* waste.
  properties: wet mass 1 kg, dry mass 1 kg
- water, decarbonised: 0.58654 kg; lognormal variance with pedigree 0.43659, pedigree (1,1,4,1,1)
  Incinerator process water used in flue gas scrubber stage.
  Uncertainty: uncertainty calculated from uncertainty in average water input, and the uncertainty of the waste composition of this waste
  properties: wet mass 1 kg
- transport, freight, lorry, unspecified: 0.0015136 metric ton*km; lognormal variance with pedigree 0.04711, pedigree (1,1,4,1,1)
  Transport services to transport incineration residues to landfills and filter ash to external treatments (FLUWA).
  Uncertainty: uncertainty calculated from uncertainty of the waste composition of this waste, uncertainty of transfer coefficients and the uncertainty in generic transportation distances
- hydrochloric acid, without water, in 30% solution state: 0.00014222 kg; lognormal variance with pedigree 0.060889, pedigree (1,1,4,1,1)
  Auxilliary inputs for the wastewater treatment stage of the incinerator plant.
  Uncertainty: uncertainty calculated from uncertainty in average HCl input, of transfer coefficients in the incinerator, and the uncertainty of the waste composition of this waste
  properties: wet mass 1 kg, dry mass 1 kg, heating value, net 3.32 MJ
- heat, district or industrial, natural gas: 0.21705 MJ; lognormal variance with pedigree 0.2099, pedigree (1,1,4,1,1)
  Input to DeNOx stage, to heat up flue gas in low-dust SCR.
  Uncertainty: uncertainty calculated from uncertainty in average DeNOx input, uncertainty in the share of thermal NOx, uncertainty of nitrogen content in average municipal waste and the uncertainty in nitrogen content in *this* waste.
  properties: heating value, net 1 MJ
- hydrogen peroxide, without water, in 50% solution state: 0.00032887 kg; lognormal variance with pedigree 0.070083, pedigree (1,1,4,1,1)
  Auxilliary oxidising agent for filter ash treatment (FLUWA).
  Uncertainty: uncertainty calculated from uncertainty in of transfer coefficients in the incinerator, and the uncertainty of the waste composition of this waste
  properties: dry mass 1 kg, wet mass 1 kg, heating value, net 7.13 MJ
- iron (III) chloride, without water, in 40% solution state: 0.0001723 kg; lognormal variance with pedigree 0.43659, pedigree (1,1,4,1,1)
  Auxilliary inputs for the wastewater treatment stage of the incinerator plant.
  Uncertainty: uncertainty calculated from uncertainty in average FeCl3 input, of transfer coefficients in the incinerator, and the uncertainty of the waste composition of this waste
  properties: dry mass 1 kg, wet mass 1 kg
- metalliferous hydroxide sludge: -0.0016402 kg; lognormal variance with pedigree 0.083924, pedigree (1,1,4,1,1)
  (same comment as for metalliferous hydroxide sludge)
  production volume 225150 kg
  properties: chlorine content 0.085931, sulfur content 0.064023, oxygen content 0.44409, cadmium content 0.028206, water content 3, zinc content 0.1471, vanadium content 0.030637, dry mass 0.25 kg, calcium content 0.063693, wet mass 1 kg, carbon content, fossil 0.10427, sodium content 0.02815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

## Inputs from nature
- Oxygen [natural resource, in air]: 3.1367 kg; lognormal variance with pedigree 0.019631, pedigree (1,1,4,1,1)
  Oxygen from ambient air needed to combust and oxidise this waste. Net demand, i.e. without O2 leaving the plant in flue gas uncombusted.
  Uncertainty: uncertainty is calculated from uncertainties in waste composition and transfer coefficients to flue gas and soild residues in incinerator

## Emissions to nature
- Sodium, ion [water, surface water]: 0.0004625 kg; lognormal variance with pedigree 0.19558, pedigree (1,1,4,1,1)
  Emissions to water from waste composition and transfer coefficients in incinerator and landfills.
  Uncertainty: uncertainty is calculated from uncertainties in waste composition and transfer coefficients in incinerator and landfills
- Thallium [air, urban air close to ground]: 3.8358e-10 kg; lognormal variance with pedigree 1.7197, pedigree (1,1,4,1,1)
  Emission to air from waste composition and transfer coefficients.
  Uncertainty: uncertainty is calculated from uncertainties in waste composition and transfer coefficients in incinerator
- Benzene [air, urban air close to ground]: 6.4391e-9 kg; lognormal variance with pedigree 0.074629, pedigree (1,1,4,1,1)
  Incomplete combustion product emitted to air.
  Uncertainty: uncertainty calculated from uncertainty in average operation emissions, and the uncertainty of the flue gas volume from this waste.
- BOD5, Biological Oxygen Demand [water, ground-, long-term]: 0.0019926 kg; lognormal variance with pedigree 0.019644, pedigree (1,1,4,1,1)
  Long-term emissions from landfilling of incineration residues.
  Uncertainty: uncertainty is calculated from uncertainties in waste composition and transfer coefficients in incinerator and landfills.
- Iron [air, urban air close to ground]: 2.7498e-9 kg; lognormal variance with pedigree 0.67282, pedigree (1,1,4,1,1)
  (same comment as for Thallium)
- Toluene [air, urban air close to ground]: 1.2878e-8 kg; lognormal variance with pedigree 0.074629, pedigree (1,1,4,1,1)
  (same comment as for Benzene)
- Chromium, ion [water, surface water]: 1.6185e-9 kg; lognormal variance with pedigree 0.82938, pedigree (1,1,4,1,1)
  (same comment as for Sodium, ion)
- Calcium [air, urban air close to ground]: 2.0377e-5 kg; lognormal variance with pedigree 0.55141, pedigree (1,1,4,1,1)
  (same comment as for Thallium)
- Benzene, pentachloro- [air, urban air close to ground]: 3.402e-11 kg; lognormal variance with pedigree 0.074629, pedigree (1,1,4,1,1)
  (same comment as for Benzene)
- COD, Chemical Oxygen Demand [water, ground-, long-term]: 0.0060917 kg; lognormal variance with pedigree 0.019644, pedigree (1,1,4,1,1)
  (same comment as for BOD5, Biological Oxygen Demand)
- Magnesium [air, urban air close to ground]: 1.0115e-7 kg; lognormal variance with pedigree 0.99455, pedigree (1,1,4,1,1)
  (same comment as for Thallium)
- Benzene, hexachloro- [air, urban air close to ground]: 1.3464e-11 kg; lognormal variance with pedigree 0.074629, pedigree (1,1,4,1,1)
  (same comment as for Benzene)
- DOC, Dissolved Organic Carbon [water, ground-, long-term]: 0.0024105 kg; lognormal variance with pedigree 0.019644, pedigree (1,1,4,1,1)
  (same comment as for BOD5, Biological Oxygen Demand)
- Aluminium [air, urban air close to ground]: 1.5637e-10 kg; lognormal variance with pedigree 0.95777, pedigree (1,1,4,1,1)
  (same comment as for Thallium)
- Phenol, pentachloro- [air, urban air close to ground]: 2.8041e-12 kg; lognormal variance with pedigree 0.074629, pedigree (1,1,4,1,1)
  (same comment as for Benzene)
- TOC, Total Organic Carbon [water, ground-, long-term]: 0.0024105 kg; lognormal variance with pedigree 0.019644, pedigree (1,1,4,1,1)
  (same comment as for BOD5, Biological Oxygen Demand)
- Sodium [air, urban air close to ground]: 1.1538e-5 kg; lognormal variance with pedigree 0.62967, pedigree (1,1,4,1,1)
  (same comment as for Thallium)
- Heat, waste [water, surface water]: 7.1705 MJ; lognormal variance with pedigree 0.026528, pedigree (1,1,4,1,1)
  Waste heat generated from heating value of this waste plus any electricity required to process it.
  Uncertainty: uncertainty is calculated from uncertainties in waste composition and uncertainties in energy efficiency and the uncertainty in internal energy demand
- Sulfate [water, ground-, long-term]: 0.0010207 kg; lognormal variance with pedigree 0.57588, pedigree (1,1,4,1,1)
  (same comment as for BOD5, Biological Oxygen Demand)
- COD, Chemical Oxygen Demand [water, surface water]: 0.00062494 kg; lognormal variance with pedigree 0.025514, pedigree (1,1,4,1,1)
  (same comment as for Sodium, ion)
- Benzo(a)pyrene [air, urban air close to ground]: 1.4329e-13 kg; lognormal variance with pedigree 0.37366, pedigree (1,1,4,1,1)
  (same comment as for Benzene)
- Nitrate [water, ground-, long-term]: 4.6526e-5 kg; lognormal variance with pedigree 0.64005, pedigree (1,1,4,1,1)
  (same comment as for BOD5, Biological Oxygen Demand)
- BOD5, Biological Oxygen Demand [water, surface water]: 0.00061156 kg; lognormal variance with pedigree 0.025676, pedigree (1,1,4,1,1)
  (same comment as for Sodium, ion)
- Water [water, surface water]: 0.000200352 m3; lognormal variance with pedigree 1.8197, pedigree (1,1,4,1,1)
  Process water released to surface water.
  Uncertainty: uncertainty calculated from uncertainty in process water input and the uncertainty of fraction to surface water.
- Chloride [water, ground-, long-term]: 0.0001841 kg; lognormal variance with pedigree 0.60372, pedigree (1,1,4,1,1)
  (same comment as for BOD5, Biological Oxygen Demand)
- TOC, Total Organic Carbon [water, surface water]: 0.00027258 kg; lognormal variance with pedigree 0.025489, pedigree (1,1,4,1,1)
  (same comment as for Sodium, ion)
- Bromine [water, ground-, long-term]: 4.9713e-7 kg; lognormal variance with pedigree 1.2815, pedigree (1,1,4,1,1)
  (same comment as for BOD5, Biological Oxygen Demand)
- DOC, Dissolved Organic Carbon [water, surface water]: 0.00027258 kg; lognormal variance with pedigree 0.025489, pedigree (1,1,4,1,1)
  (same comment as for Sodium, ion)
- Heat, waste [air, urban air close to ground]: 31.272 MJ; lognormal variance with pedigree 0.026528, pedigree (1,1,4,1,1)
  (same comment as for Heat, waste)
- Fluoride [water, ground-, long-term]: 9.5968e-6 kg; lognormal variance with pedigree 0.78915, pedigree (1,1,4,1,1)
  (same comment as for BOD5, Biological Oxygen Demand)
- Sulfate [water, surface water]: 0.00017445 kg; lognormal variance with pedigree 0.39961, pedigree (1,1,4,1,1)
  (same comment as for Sodium, ion)
- Water [air, urban air close to ground]: 0.00136795 m3; lognormal variance with pedigree 1.2478, pedigree (1,1,4,1,1)
  Water vapour from waste humidity, hydrogen oxidation and part of the process water.
  Uncertainty: Uncertainty calculated from uncertainty in waste composition, process water input and the uncertainty of fraction to air.
- Arsenic, ion [water, ground-, long-term]: 1.1108e-6 kg; lognormal variance with pedigree 1.5001, pedigree (1,1,4,1,1)
  (same comment as for BOD5, Biological Oxygen Demand)
- Nitrate [water, surface water]: 1.6666e-5 kg; lognormal variance with pedigree 0.42697, pedigree (1,1,4,1,1)
  (same comment as for Sodium, ion)
- Carbon monoxide, fossil [air, urban air close to ground]: 1.0946e-5 kg; lognormal variance with pedigree 0.74779, pedigree (1,1,4,1,1)
  (same comment as for Benzene)
- Barium [water, ground-, long-term]: 0.00017515 kg; lognormal variance with pedigree 1.2154, pedigree (1,1,4,1,1)
  (same comment as for BOD5, Biological Oxygen Demand)
- Chloride [water, surface water]: 0.0012414 kg; lognormal variance with pedigree 0.24831, pedigree (1,1,4,1,1)
  (same comment as for Sodium, ion)
- Carbon dioxide, fossil [air, urban air close to ground]: 2.996 kg; lognormal variance with pedigree 0.0092141, pedigree (1,1,4,1,1)
  (same comment as for Thallium)
- Cadmium, ion [water, ground-, long-term]: 5.4425e-6 kg; lognormal variance with pedigree 5.1155, pedigree (1,1,4,1,1)
  (same comment as for BOD5, Biological Oxygen Demand)
- Bromine [water, surface water]: 8.8983e-6 kg; lognormal variance with pedigree 0.44317, pedigree (1,1,4,1,1)
  (same comment as for Sodium, ion)
- Methane, fossil [air, urban air close to ground]: 9.6586e-8 kg; lognormal variance with pedigree 0.074629, pedigree (1,1,4,1,1)
  (same comment as for Benzene)
- Cobalt [water, ground-, long-term]: 1.4696e-6 kg; lognormal variance with pedigree 1.4644, pedigree (1,1,4,1,1)
  (same comment as for BOD5, Biological Oxygen Demand)
- Fluoride [water, surface water]: 4.1865e-6 kg; lognormal variance with pedigree 0.82734, pedigree (1,1,4,1,1)
  (same comment as for Sodium, ion)
- Sulfur dioxide [air, urban air close to ground]: 4.5398e-6 kg; lognormal variance with pedigree 0.78928, pedigree (1,1,4,1,1)
  (same comment as for Thallium)
- Chromium VI [water, ground-, long-term]: 6.6564e-7 kg; lognormal variance with pedigree 2.6322, pedigree (1,1,4,1,1)
  (same comment as for BOD5, Biological Oxygen Demand)
- Arsenic, ion [water, surface water]: 7.0029e-7 kg; lognormal variance with pedigree 1.382, pedigree (1,1,4,1,1)
  (same comment as for Sodium, ion)
- Nitrogen oxides [air, urban air close to ground]: 0.00043215 kg; lognormal variance with pedigree 0.24936, pedigree (1,1,4,1,1)
  Sum of fuel-Nox and thermal-NOx emitted to air after DeNOx stage.
  Uncertainty: uncertainty calculated from uncertainty in average N-emissions and uncertainty in the share of thermal NOx and the uncertainty in nitrogen content in *this* waste.
- Copper, ion [water, ground-, long-term]: 3.8973e-5 kg; lognormal variance with pedigree 1.0766, pedigree (1,1,4,1,1)
  (same comment as for BOD5, Biological Oxygen Demand)
- Barium [water, surface water]: 1.0172e-7 kg; lognormal variance with pedigree 0.68881, pedigree (1,1,4,1,1)
  (same comment as for Sodium, ion)
- Ammonia [air, urban air close to ground]: 1.3647e-6 kg; lognormal variance with pedigree 0.24936, pedigree (1,1,4,1,1)
  Nitrogen species emitted to air after DeNOx stage.
  Uncertainty: uncertainty calculated from uncertainty in average N-emissions and uncertainty in the share of thermal NOx and the uncertainty in nitrogen content in *this* waste.
- Mercury [water, ground-, long-term]: 1.0072e-8 kg; lognormal variance with pedigree 1.9189, pedigree (1,1,4,1,1)
  (same comment as for BOD5, Biological Oxygen Demand)
- Cadmium, ion [water, surface water]: 6.0336e-9 kg; lognormal variance with pedigree 1.0838, pedigree (1,1,4,1,1)
  (same comment as for Sodium, ion)
- Dinitrogen monoxide [air, urban air close to ground]: 1.9347e-5 kg; lognormal variance with pedigree 1.4058, pedigree (1,1,4,1,1)
  (same comment as for Ammonia)
- Manganese [water, ground-, long-term]: 2.3825e-5 kg; lognormal variance with pedigree 1.4107, pedigree (1,1,4,1,1)
  (same comment as for BOD5, Biological Oxygen Demand)
- Cobalt [water, surface water]: 2.7905e-10 kg; lognormal variance with pedigree 2.0048, pedigree (1,1,4,1,1)
  (same comment as for Sodium, ion)
- Cyanide [air, urban air close to ground]: 4.1566e-6 kg; lognormal variance with pedigree 1.4058, pedigree (1,1,4,1,1)
  (same comment as for Ammonia)
- Nickel, ion [water, ground-, long-term]: 9.5635e-7 kg; lognormal variance with pedigree 1.5362, pedigree (1,1,4,1,1)
  (same comment as for BOD5, Biological Oxygen Demand)
- Chromium VI [water, surface water]: 1.9177e-7 kg; lognormal variance with pedigree 1.317, pedigree (1,1,4,1,1)
  (same comment as for Sodium, ion)
- Hydrogen chloride [air, urban air close to ground]: 8.3403e-7 kg; lognormal variance with pedigree 0.6396, pedigree (1,1,4,1,1)
  (same comment as for Thallium)
- Lead [water, ground-, long-term]: 1.591e-5 kg; lognormal variance with pedigree 2.7015, pedigree (1,1,4,1,1)
  (same comment as for BOD5, Biological Oxygen Demand)
- Copper, ion [water, surface water]: 3.5802e-9 kg; lognormal variance with pedigree 1.2182, pedigree (1,1,4,1,1)
  (same comment as for Sodium, ion)
- Bromine [air, urban air close to ground]: 4.79e-9 kg; lognormal variance with pedigree 1.3027, pedigree (1,1,4,1,1)
  (same comment as for Thallium)
- Antimony [water, ground-, long-term]: 4.086e-6 kg; lognormal variance with pedigree 1.0682, pedigree (1,1,4,1,1)
  (same comment as for BOD5, Biological Oxygen Demand)
- Mercury [water, surface water]: 2.5514e-10 kg; lognormal variance with pedigree 2.0938, pedigree (1,1,4,1,1)
  (same comment as for Sodium, ion)
- Hydrogen fluoride [air, urban air close to ground]: 9.7047e-8 kg; lognormal variance with pedigree 1.2389, pedigree (1,1,4,1,1)
  (same comment as for Thallium)
- Selenium [water, ground-, long-term]: 1.5454e-6 kg; lognormal variance with pedigree 0.95953, pedigree (1,1,4,1,1)
  (same comment as for BOD5, Biological Oxygen Demand)
- Manganese [water, surface water]: 3.6747e-9 kg; lognormal variance with pedigree 1.138, pedigree (1,1,4,1,1)
  (same comment as for Sodium, ion)
- Arsenic [air, urban air close to ground]: 1.4272e-8 kg; lognormal variance with pedigree 1.5128, pedigree (1,1,4,1,1)
  (same comment as for Thallium)
- Tin, ion [water, ground-, long-term]: 2.5314e-6 kg; lognormal variance with pedigree 1.4979, pedigree (1,1,4,1,1)
  (same comment as for BOD5, Biological Oxygen Demand)
- Nickel, ion [water, surface water]: 6.6609e-10 kg; lognormal variance with pedigree 2.1243, pedigree (1,1,4,1,1)
  (same comment as for Sodium, ion)
- Barium [air, urban air close to ground]: 9.4099e-7 kg; lognormal variance with pedigree 0.86959, pedigree (1,1,4,1,1)
  (same comment as for Thallium)
- Vanadium, ion [water, ground-, long-term]: 0.00064936 kg; lognormal variance with pedigree 0.71274, pedigree (1,1,4,1,1)
  (same comment as for BOD5, Biological Oxygen Demand)
- Lead [water, surface water]: 1.5389e-9 kg; lognormal variance with pedigree 0.95759, pedigree (1,1,4,1,1)
  (same comment as for Sodium, ion)
- Cadmium [air, urban air close to ground]: 1.7302e-8 kg; lognormal variance with pedigree 1.1343, pedigree (1,1,4,1,1)
  (same comment as for Thallium)
- Zinc, ion [water, ground-, long-term]: 0.00015357 kg; lognormal variance with pedigree 1.6248, pedigree (1,1,4,1,1)
  (same comment as for BOD5, Biological Oxygen Demand)
- Antimony [water, surface water]: 1.979e-6 kg; lognormal variance with pedigree 1.1932, pedigree (1,1,4,1,1)
  (same comment as for Sodium, ion)
- Cobalt [air, urban air close to ground]: 3.0521e-9 kg; lognormal variance with pedigree 1.5272, pedigree (1,1,4,1,1)
  (same comment as for Thallium)
- Beryllium [water, ground-, long-term]: 4.4998e-7 kg; lognormal variance with pedigree 1.63, pedigree (1,1,4,1,1)
  (same comment as for BOD5, Biological Oxygen Demand)
- Selenium [water, surface water]: 4.0123e-7 kg; lognormal variance with pedigree 1.0503, pedigree (1,1,4,1,1)
  (same comment as for Sodium, ion)
- Chromium [air, urban air close to ground]: 1.0886e-8 kg; lognormal variance with pedigree 1.2662, pedigree (1,1,4,1,1)
  (same comment as for Thallium)
- Strontium [water, ground-, long-term]: 8.4777e-5 kg; lognormal variance with pedigree 0.99162, pedigree (1,1,4,1,1)
  (same comment as for BOD5, Biological Oxygen Demand)
- Tin, ion [water, surface water]: 3.4479e-9 kg; lognormal variance with pedigree 1.2944, pedigree (1,1,4,1,1)
  (same comment as for Sodium, ion)
- Copper [air, urban air close to ground]: 3.7888e-9 kg; lognormal variance with pedigree 1.1196, pedigree (1,1,4,1,1)
  (same comment as for Thallium)
- Titanium, ion [water, ground-, long-term]: 0.00028698 kg; lognormal variance with pedigree 0.90469, pedigree (1,1,4,1,1)
  (same comment as for BOD5, Biological Oxygen Demand)
- Vanadium, ion [water, surface water]: 2.5621e-6 kg; lognormal variance with pedigree 0.62094, pedigree (1,1,4,1,1)
  (same comment as for Sodium, ion)
- Mercury [air, urban air close to ground]: 1.3595e-9 kg; lognormal variance with pedigree 1.9367, pedigree (1,1,4,1,1)
  (same comment as for Thallium)
- Thallium [water, ground-, long-term]: 2.9386e-7 kg; lognormal variance with pedigree 1.4317, pedigree (1,1,4,1,1)
  (same comment as for BOD5, Biological Oxygen Demand)
- Zinc, ion [water, surface water]: 2.0893e-8 kg; lognormal variance with pedigree 0.71244, pedigree (1,1,4,1,1)
  (same comment as for Sodium, ion)
- Manganese [air, urban air close to ground]: 5.7384e-9 kg; lognormal variance with pedigree 1.1563, pedigree (1,1,4,1,1)
  (same comment as for Thallium)
- Silicon [water, ground-, long-term]: 0.00022159 kg; lognormal variance with pedigree 0.00800076, pedigree (1,1,4,1,1)
  (same comment as for BOD5, Biological Oxygen Demand)
- Beryllium [water, surface water]: 2.984e-10 kg; lognormal variance with pedigree 2.2713, pedigree (1,1,4,1,1)
  (same comment as for Sodium, ion)
- Nickel [air, urban air close to ground]: 1.2047e-9 kg; lognormal variance with pedigree 1.5989, pedigree (1,1,4,1,1)
  (same comment as for Thallium)
- Iron, ion [water, ground-, long-term]: 0.00078535 kg; lognormal variance with pedigree 0.88714, pedigree (1,1,4,1,1)
  (same comment as for BOD5, Biological Oxygen Demand)
- Strontium [water, surface water]: 5.5484e-8 kg; lognormal variance with pedigree 1.6608, pedigree (1,1,4,1,1)
  (same comment as for Sodium, ion)
- Lead [air, urban air close to ground]: 1.8616e-9 kg; lognormal variance with pedigree 1.2003, pedigree (1,1,4,1,1)
  (same comment as for Thallium)
- Calcium, ion [water, ground-, long-term]: 0.0022592 kg; lognormal variance with pedigree 0.49227, pedigree (1,1,4,1,1)
  (same comment as for BOD5, Biological Oxygen Demand)
- Titanium, ion [water, surface water]: 1.9523e-7 kg; lognormal variance with pedigree 0.50725, pedigree (1,1,4,1,1)
  (same comment as for Sodium, ion)
- Antimony [air, urban air close to ground]: 8.0659e-12 kg; lognormal variance with pedigree 1.3464, pedigree (1,1,4,1,1)
  (same comment as for Thallium)
- Aluminium [water, ground-, long-term]: 0.00016683 kg; lognormal variance with pedigree 0.72595, pedigree (1,1,4,1,1)
  (same comment as for BOD5, Biological Oxygen Demand)
- Thallium [water, surface water]: 2.7215e-10 kg; lognormal variance with pedigree 1.7205, pedigree (1,1,4,1,1)
  (same comment as for Sodium, ion)
- Selenium [air, urban air close to ground]: 2.4025e-8 kg; lognormal variance with pedigree 1.4984, pedigree (1,1,4,1,1)
  (same comment as for Thallium)
- Magnesium [water, ground-, long-term]: 8.9312e-5 kg; lognormal variance with pedigree 0.96027, pedigree (1,1,4,1,1)
  (same comment as for BOD5, Biological Oxygen Demand)
- Silicon [water, surface water]: 4.9947e-7 kg; lognormal variance with pedigree 0.55671, pedigree (1,1,4,1,1)
  (same comment as for Sodium, ion)
- Tin [air, urban air close to ground]: 2.4914e-12 kg; lognormal variance with pedigree 1.4768, pedigree (1,1,4,1,1)
  (same comment as for Thallium)
- Sodium, ion [water, ground-, long-term]: 0.00091978 kg; lognormal variance with pedigree 0.40643, pedigree (1,1,4,1,1)
  (same comment as for BOD5, Biological Oxygen Demand)
- Iron, ion [water, surface water]: 2.9734e-8 kg; lognormal variance with pedigree 1.1086, pedigree (1,1,4,1,1)
  (same comment as for Sodium, ion)
- Vanadium [air, urban air close to ground]: 4.6778e-5 kg; lognormal variance with pedigree 0.57263, pedigree (1,1,4,1,1)
  (same comment as for Thallium)
- NMVOC, non-methane volatile organic compounds, unspecified origin [air, urban air close to ground]: 2.9304e-7 kg; lognormal variance with pedigree 0.074629, pedigree (1,1,4,1,1)
  (same comment as for Benzene)
- Calcium, ion [water, surface water]: 4.664e-5 kg; lognormal variance with pedigree 0.2379, pedigree (1,1,4,1,1)
  (same comment as for Sodium, ion)
- Zinc [air, urban air close to ground]: 2.2923e-7 kg; lognormal variance with pedigree 0.82561, pedigree (1,1,4,1,1)
  (same comment as for Thallium)
- Particulates, < 2.5 um [air, urban air close to ground]: 7.6877e-7 kg; lognormal variance with pedigree 0.37366, pedigree (1,1,4,1,1)
  (same comment as for Benzene)
- Aluminium [water, surface water]: 4.5586e-8 kg; lognormal variance with pedigree 1.259, pedigree (1,1,4,1,1)
  (same comment as for Sodium, ion)
- Strontium [air, urban air close to ground]: 8.4868e-9 kg; lognormal variance with pedigree 1.024, pedigree (1,1,4,1,1)
  (same comment as for Thallium)
- Particulates, > 2.5 um, and < 10um [air, urban air close to ground]: 3.8632e-9 kg; lognormal variance with pedigree 0.16958, pedigree (1,1,4,1,1)
  (same comment as for Benzene)
- Magnesium [water, surface water]: 7.2606e-7 kg; lognormal variance with pedigree 0.80409, pedigree (1,1,4,1,1)
  (same comment as for Sodium, ion)
- Titanium [air, urban air close to ground]: 7.956e-7 kg; lognormal variance with pedigree 0.6945, pedigree (1,1,4,1,1)
  (same comment as for Thallium)
- Dioxins, measured as 2,3,7,8-tetrachlorodibenzo-p-dioxin [air, urban air close to ground]: 1.2877e-14 kg; lognormal variance with pedigree 0.37366, pedigree (1,1,4,1,1)
  (same comment as for Benzene)

## Extrapolations
This dataset has been extrapolated from year 2012 to the year of the calculation (2021). The uncertainty has been adjusted accordingly.
