# computer production, desktop, without screen

Dataset: EcoSpold 2, unit process
Geography: GLO
Time period: 1998-01-01 to 2021-12-31
Technology level: current
Classification: EcoSpold01Categories: electronics/devices
Classification: ISIC rev.4 ecoinvent: 2620:Manufacture of computers and peripheral equipment
Synonyms: PC
Tags: ConvertedDataset
Scenario: Business-as-Usual
System model: Allocation, cut-off by classification
Generated by: Martin Lehmann
Published in: Hischier R. 2007
Database: ecoinvent
isCopyrightProtected: false
accessRestrictedTo: 1

## General comment
This dataset represents the production of 1 unit of desktop computer. The data represent a typical desktop computer used at home or in an office. The data sources are mainly based on weighing and calculations at EMPA laboratories.Material data are taken from own measurements of a typical computer, examined at the EMPA laboratories, type Mandax Pentium 4, built in 2002. (Pentium 4, processor speed 2000 MHz, 40 GB RAM HDD, 512 MB working memory, total weight without screen and cardboard packaging 11.3 kg). Computer parts like Graphic card, Network card, Hard disk drive, CD Rom drive, Power supply unit, Printed wiring boards (e.g. motherboard) and batteries are inventoried in individual datasets.
[This dataset was already contained in the ecoinvent database version 2. It was not individually updated during the transfer to ecoinvent version 3. Life Cycle Impact Assessment results may still have changed, as they are affected by changes in the supply chain, i.e. in other datasets. This dataset was generated following the ecoinvent quality guidelines for version 2. It may have been subject to central changes described in the ecoinvent version 3 change report (http://www.ecoinvent.org/database/ecoinvent-version-3/reports-of-changes/), and the results of the central updates were reviewed extensively. The changes added e.g. consistent water flows and other information throughout the database. The documentation of this dataset can be found in the ecoinvent reports of version 2, which are still available via the ecoinvent website. The change report linked above covers all central changes that were made during the conversion process.]

## Included activities start
From reception of raw materials and auxiliaries at the factory gate.

## Included activities end
This dataset includes the materials (mainly metals and plastics) with their respective manufacturing processes (e.g. sheet rolling or blow moulding). Further inventoried is the infrastructure (factory), the electricity for the assembly of the desktop computer, the water consumption and industrial waste water, the required ship, rail and road transport for input materials, the packaging, plus the disposal of the computer.

## Geography
The data is based on weighing a typical desktop computer at the EMPA laboratories in St. Gallen. Such a desktop computer like other PC brands may be assembled anywhere in the world.

## Technology
The production of a desktop computer includes the steel processing steps rolling, cutting, mill cutting, and coating. Plastic parts are blow moulded or extruded into required shapes. The process technology of the parts (capacitors, resistors, microchips etc.) mounted onto the printed wiring board are described in the individual datasets.

## Parameters
- fraction, process water, to air: 0.061 dimensionless; name fraction_PW_to_air; lognormal variance with pedigree 0.092025, pedigree (4,4,3,2,4)
  Literature value (Statistics Canada, 2007 & Shaffer, K.H., 2008, Consumptive water use in the Great Lakes Basin, USGS) (Vionnet, S., Quantis Water Database - Technical Report, 2012).
- fraction, tap water, to air: 0.061 dimensionless; name fraction_TW_to_air; = fraction_PW_to_air; lognormal variance with pedigree 0.092025, pedigree (4,4,3,2,4)
  Calculated value. See comment in the other parametres present in this dataset. Tap water is considered to be always used as process water, thus process water fractions to air are applied to all tap water input flows to calculate the amount of water consumed in the processes.

## Reference product
- computer, desktop, without screen: 1 unit; CPC 45230: Automatic data processing machines, comprising in the same housing at least a central processing unit and an i[…]; By-product classification allocatable product
  Constructed of different datasets: refined material input: e.g. steel, aluminium, PP, processing of materials: e.g. sheet rolling, die casting, press moulding, entire components: e.g. Hard Disk Drive, CD Rom Drive, battery, populated and unpopulated PWBs: includes e.g. ICs, capacitors, resistors, diodes, expansion slots (for populated PWB), energy for computer assembly: electricity, medium voltage, production UCTE, water consumption, emissions, waste: e.g. industrial waste water, transport: transport by transoceanic freight ship as well as 32 t lorry and rail for computer parts from regional storage to production plant (ecoinvent standard transport distances), infrastructure, Packaging: cardboard and PP (or PS/PE), disposal: disposal of computer and packaging to WEEE treatment.
  EcoSpold01Location=GLO
  production volume 1 unit
    Dummy value to be replaced by measured, estimated or calculated value
  property price 511 EUR2005
    Prices are calculated on basis of Industrial Commodity Statistics Database from UN statistics (http://data.un.org ). Commodity: 'Desktop PCs'. Only data for 9 countries were available.
  property carbon content, non-fossil 0.000485011
    Calculated as the addition of C contents in the product composition, then referred to 1 kg DM
  property carbon content, fossil 0.0877555
    (same comment as for computer, desktop, without screen)
  property carbon content 0.0882405
    carbon content on a dry matter basis (reserved; not for manual entry)
  properties: dry mass 11.3 kg, water content 0, water in wet mass 0 kg, wet mass 11.3 kg, carbon allocation 0.997117 kg

## Inputs from technosphere
- used desktop computer: -11.3 kg; lognormal variance with pedigree 0.0701, pedigree (1,4,5,3,3)
  EcoSpold01Location=CH
  Measured Value.
  production volume 11.3 kg
    Calculated from the production volume of computer, desktop, without screen in proportion to the respective output amounts.
  properties: carbon content, non-fossil 0.000485011, wet mass 1 kg, carbon content, fossil 0.0877555, dry mass 1 kg
  note on carbon content, non-fossil: Composition data from desktop computer, divided by ist weight 11.3 kg (Tab 4.15, ecoinvent v2.2 report 18_V)
- wastewater, unpolluted: 0 m3; source Fujitsu L. 2003; pedigree (1,1,1,1,1)
  EcoSpold01Location=CH
  Estimation, based on literature.
  production volume 0 m3
    (same comment as for used desktop computer)
  properties: wet mass 1000 kg, water content 2962.17, carbon content, non-fossil 0.00178991, carbon content, fossil 0.00178991, dry mass 0.337476 kg
  note on carbon content, fossil: Assumed to be like in tap water. Bicarbonate content is 2.93 mol/m3. CO2 content is 0.1 mol/m3 (ecoinvent v2.2 report 8, Tab 93.1).
- printed wiring board, mounted mainboard, desktop computer, Pb containing: 0.15078 kg; lognormal variance with pedigree 0.0701, pedigree (1,4,5,3,3)
  EcoSpold01Location=GLO
  Measured Value.
  properties: dry mass 1 kg, carbon content, non-fossil 0.00406047, carbon content, fossil 0.214344, wet mass 1 kg
  note on carbon content, non-fossil: C content was calculated as the addition of C content in the PWB components
- steel, chromium steel 18/8, hot rolled: 0.032 kg; lognormal variance with pedigree 0.0701, pedigree (1,4,5,3,3)
  Measured Value.
  EcoSpold01Location=RER
  properties: dry mass 1 kg, carbon content, fossil 0.0008, wet mass 1 kg
  note on carbon content, fossil: Stainless steel model is the grade 304 steel (18/8 stainless, 18% chromium 8% nickel; max. 0.08% C)
- printed wiring board, surface mounted, unspecified, Pb free: 0.14231 kg; = 0.2033*0.7; lognormal variance with pedigree 0.0701, pedigree (1,4,5,3,3)
  Measured Value. This original value from production mix has been replaced by 2 flows. Pb-containing has a share of 0.3, Pb-free has a share of 0.7.
  properties: wet mass 1 kg, dry mass 1 kg, carbon content, fossil 0.132522
- corrugated board box: 0 kg; source Atlantic Consulting 1998; pedigree (1,1,1,1,1)
  EcoSpold01Location=RER
  Literature Value.
  properties: carbon content, non-fossil 0.433862, dry mass 0.945 kg, water content 0.0582011, wet mass 1 kg, heating value, net 12.86 MJ, carbon content, fossil 0.000486772
  note on carbon content, non-fossil: Biogenic C content was calculated after biogenic C contents of chemicals used in the production of board (Tab 10.15 & 10.16, ecoinvent v2.2 report 11_III, part 10).
  note on carbon content, fossil: Fossil C content was calculated after fossil C contents of chemicals used in the production of board (Tab 10-15 & 10.16 ecoinvent v2.2 report 11_III, part 10)
- printed wiring board, for surface mounting, Pb containing surface: 0.0039 m2; = 0.0078*0.5; lognormal variance with pedigree 0.0701, pedigree (1,4,5,3,3)
  Measured Value.
  This original value from production mix has been replaced by 2 flows. Each has 50% share in the production mix.
  property carbon content, non-fossil 0; name C_content_non_fossil
  property water in wet mass 0 kg; name WWM
  property dry mass 3.26 kg; name DM
  property wet mass 3.26 kg; name WM
  property carbon content, fossil 0.109783; name C_content_fossil
  property water content 0; name water_content
- disk drive, CD/DVD, ROM, for desktop computer: 1 unit; lognormal variance with pedigree 0.0701, pedigree (1,4,5,3,3)
  Measured Value.
  EcoSpold01Location=GLO
  properties: dry mass 0.938 kg, carbon content, non-fossil 9.00773e-5, wet mass 0.938 kg, carbon content, fossil 0.231154
  note on carbon content, non-fossil: Calculated as the addition of C contents in the product composition, and then referred to 1 kg DM
- cable, network cable, category 5, without plugs: 3 m; lognormal variance with pedigree 0.0701, pedigree (1,4,5,3,3)
  Measured Value.
  EcoSpold01Location=GLO
  properties: carbon content, fossil 0.203917, wet mass 0.036 kg, dry mass 0.036 kg
  note on carbon content, fossil: Calculated as the addition of C contents in the product composition. Then referred to 1 kg DM
- sheet rolling, steel: 6.2123 kg; lognormal variance with pedigree 0.0701, pedigree (1,4,5,3,3)
  Measured Value.
  EcoSpold01Location=RER
- acrylonitrile-butadiene-styrene copolymer: 0.0319 kg; lognormal variance with pedigree 0.0701, pedigree (1,4,5,3,3)
  Measured Value.
  EcoSpold01Location=RER
  properties: heating value, net 35.58 MJ, dry mass 1 kg, carbon content, fossil 0.853081, wet mass 1 kg
  note on carbon content, fossil: ABS is the abbreviation originating from its monomers acrylonitrile, butadiene and styrene. It was assumed that every monomer was present in the same proportion, so the basic ABS monomer was considered (C8H8·C4H6·C3H3N), and the MW=104+54+53=211 g/mol
- powder coat, steel: 0.3977 m2; lognormal variance with pedigree 0.0701, pedigree (1,4,5,3,3)
  Measured Value.
  EcoSpold01Location=RER
- steel, low-alloyed, hot rolled: 6.2123 kg; lognormal variance with pedigree 0.0701, pedigree (1,4,5,3,3)
  EcoSpold01Location=RER
  Measured Value.
  properties: wet mass 1 kg, dry mass 1 kg, carbon content, fossil 0.005
  note on carbon content, fossil: Low alloyed steel composition given in Tab. 3.2 ecoinvent v2.2 report 10_partII. Steel assumed to have a C content of 0.5%
- plug, inlet and outlet, for network cable: 1 unit; lognormal variance with pedigree 0.0701, pedigree (1,4,5,3,3)
  Measured Value.
  EcoSpold01Location=GLO
  properties: carbon content, fossil 0.414034, dry mass 0.0086 kg, wet mass 0.0086 kg
  note on carbon content, fossil: Calculated as the addition of C contents in the product composition
- electricity, medium voltage: 2.7214 kWh; source Stachura 2006; lognormal variance with pedigree 0.0701, pedigree (1,4,5,3,3)
  EcoSpold01Location=UCTE
  Estimation, based on literature, OGIP basic datasheet and own calculations.
- battery, Li-ion, rechargeable, prismatic: 0.0029 kg; lognormal variance with pedigree 0.0701, pedigree (1,4,5,3,3)
  EcoSpold01Location=GLO
  Measured Value.
  properties: wet mass 1 kg, carbon content, fossil 0.328011, dry mass 1 kg
- polymer foaming: 0.16 kg; source Atlantic Consulting 1998; lognormal variance with pedigree 0.0701, pedigree (1,4,5,3,3)
  Literature Value.
  EcoSpold01Location=RER
- aluminium, cast alloy: 0.00874816 kg; lognormal variance with pedigree 0.0701, pedigree (1,4,5,3,3)
  EcoSpold01Location=RER
  Measured Value.
  properties: wet mass 1 kg, dry mass 1 kg
- printed wiring board, surface mounted, unspecified, Pb containing: 0.06099 kg; = 0.2033*0.3; lognormal variance with pedigree 0.0701, pedigree (1,4,5,3,3)
  (same comment as for printed wiring board, surface mounted, unspecified, Pb free)
  properties: wet mass 1 kg, dry mass 1 kg, carbon content, fossil 0.132522
- hot rolling, steel: 0.032 kg; lognormal variance with pedigree 0.0701, pedigree (1,4,5,3,3)
  EcoSpold01Location=RER
  Measured Value.
- waste polypropylene: 0 kg; source Atlantic Consulting 1998; pedigree (1,1,1,1,1)
  Literature Value. Disposed of via a municipal incineration plant.
  EcoSpold01Location=CH
  production volume 0 kg
    (same comment as for used desktop computer)
  properties: heating value, net 32.78 MJ, wet mass 1 kg, water content 0.189061, carbon content, fossil 0.825208, dry mass 0.841 kg
  note on heating value, net: Value assumed for all polypropylene products. Source: Phyllis2, database for (treated) biomass, algae, feedstocks for biogas production and biochar, https://phyllis.nl/Biomass/View/1186, ECN.TNO
  note on carbon content, fossil: C content in 1 kg DM was calculated using data in Tab A.1, ecoinvent v2.2 report 13_I
- power supply unit, for desktop computer: 1 unit; lognormal variance with pedigree 0.0701, pedigree (1,4,5,3,3)
  EcoSpold01Location=CN
  Measured Value.
  properties: wet mass 1.47 kg, carbon content, fossil 0.23443, dry mass 1.47 kg, carbon content, non-fossil 0.00159217
  note on carbon content, fossil: Calculated as the addition of C contents in the product composition, then referred to 1 kg DM
- integrated circuit, memory type: 0.015 kg; lognormal variance with pedigree 0.0701, pedigree (1,4,5,3,3)
  Measured Value.
  EcoSpold01Location=GLO
  properties: carbon content, fossil 0.113389, wet mass 1 kg, dry mass 1 kg
- copper, cathode: 0.062475 kg; lognormal variance with pedigree 0.0701, pedigree (1,4,5,3,3)
  EcoSpold01Location=RER
  Measured Value.
  properties: dry mass 1 kg, wet mass 1 kg
- section bar extrusion, aluminium: 0.39454 kg; lognormal variance with pedigree 0.0701, pedigree (1,4,5,3,3)
  EcoSpold01Location=RER
  Measured Value.
- aluminium, wrought alloy: 0.38579 kg; lognormal variance with pedigree 0.0701, pedigree (1,4,5,3,3)
  Measured Value.
  EcoSpold01Location=RER
  properties: dry mass 1 kg, wet mass 1 kg
- polypropylene, granulate: 0.2046 kg; source Atlantic Consulting 1998; lognormal variance with pedigree 0.0701, pedigree (1,4,5,3,3)
  EcoSpold01Location=RER
  Measured and literature Value.
  Further references:
  Hewlett Packard (2002) Environmental Profile: Embedded & Personal Systems. Download of 070213 from <http://www.hp.com/hpinfo/globalcitizenship/environment/productdata/edsembedded--.html>.
  properties: heating value, net 32.78 MJ, carbon content, fossil 0.857143, dry mass 1 kg, wet mass 1 kg
  note on heating value, net: Value extracted from "treatment of waste polypropylene, open burning"
  note on carbon content, fossil: Polypropylene is formed by the polymerisation of propylene, C3H6 (ecoinvent v2.2 report 11_II)
- hard disk drive, for desktop computer: 1 unit; lognormal variance with pedigree 0.0701, pedigree (1,4,5,3,3)
  Measured Value.
  EcoSpold01Location=GLO
  properties: carbon content, fossil 0.0163016, carbon content, non-fossil 7.01321e-5, dry mass 0.575 kg, wet mass 0.575 kg
- plug, inlet and outlet, for computer cable: 1 unit; lognormal variance with pedigree 0.0701, pedigree (1,4,5,3,3)
  Measured Value.
  EcoSpold01Location=GLO
  properties: dry mass 0.0585 kg, carbon content, fossil 0.3397, wet mass 0.0585 kg
- cable, ribbon cable, 20-pin, with plugs: 0.0506 kg; lognormal variance with pedigree 0.0701, pedigree (1,4,5,3,3)
  Measured Value.
  EcoSpold01Location=GLO
  properties: carbon content, fossil 0.648653, wet mass 1 kg, dry mass 1 kg
- printed wiring board, for surface mounting, Pb free surface: 0.0039 m2; = 0.0078*0.5; lognormal variance with pedigree 0.0701, pedigree (1,4,5,3,3)
  (same comment as for printed wiring board, for surface mounting, Pb containing surface)
  properties: carbon content, fossil 0.109783, wet mass 3.26 kg, dry mass 3.26 kg
- photovoltaic cell factory: 1.3333e-8 unit; lognormal variance with pedigree 0.3701, pedigree (1,4,5,3,3)
  EcoSpold01Location=DE
  Proxy, due to a lack of data of the infrastructure for the computer production the photovoltaic cell factory was used. It was assumed a life-time of 25 years, and a annual production volume of 3’000’000 pieces.
- cable, connector for computer, without plugs: 2.5 m; lognormal variance with pedigree 0.0701, pedigree (1,4,5,3,3)
  EcoSpold01Location=GLO
  Measured Value.
  properties: wet mass 0.065 kg, carbon content, fossil 0.359823, dry mass 0.065 kg
- stretch blow moulding: 0.10149 kg; lognormal variance with pedigree 0.0701, pedigree (1,4,5,3,3)
  Measured Value.
  EcoSpold01Location=RER
- tap water: 1620 kg; name tap_water_input; source Fujitsu L. 2003; lognormal variance with pedigree 0.0701, pedigree (1,4,5,3,3)
  Estimation, based on literature.
  EcoSpold01Location=RER
  properties: carbon content, fossil 0.00178991, wet mass 1 kg, water content 2962.17, dry mass 0.000337476 kg
  note on carbon content, fossil: Bicarbonate content is 2.93 mol/m3. CO2 content is 0.1 mol/m3 (ecoinvent v2.2 report 8, Tab 93.1).
- polyethylene, high density, granulate: 0.02499 kg; lognormal variance with pedigree 0.0701, pedigree (1,4,5,3,3)
  Measured Value.
  EcoSpold01Location=RER
  properties: heating value, net 42.47 MJ, wet mass 1 kg, carbon content, fossil 0.857143, dry mass 1 kg
  note on carbon content, fossil: Polyethylene is formed out of a huge amount of ethylene monomers (C2H4) (ecoinvent v2.2 report 11_II). MW=28 g/mol
- wire drawing, copper: 0.062475 kg; lognormal variance with pedigree 0.0701, pedigree (1,4,5,3,3)
  EcoSpold01Location=RER
  Measured Value.
- wastewater, unpolluted: -0.01296, -1.60704 m3 (2 entries); source Fujitsu L. 2003; lognormal variance with pedigree 0.0701, pedigree (1,4,5,3,3)
  EcoSpold01Location=CH
  Estimation, based on literature.
  production volume 1.62 m3
- corrugated board box: 0.452194, 0.020218, 1.71759 kg (3 entries); source Atlantic Consulting 1998; lognormal variance with pedigree 0.0701, pedigree (1,4,5,3,3)
  EcoSpold01Location=RER
  Literature Value.
- waste polypropylene: -0.0154007, -0.00118731, -0.0004904, -0.000465681, -0.0177698, -0.000198116, -8.97941e-5, -0.124398 kg (8 entries); source Atlantic Consulting 1998; lognormal variance with pedigree 0.0701, pedigree (1,4,5,3,3)
  Literature Value. Disposed of via a municipal incineration plant.
  EcoSpold01Location=CH
  production volume 0.16 kg

## Emissions to nature
- Water [air, unspecified]: 0.09882 m3; name water_to_air_unspecified; = (tap_water_input/1000*fraction_TW_to_air); lognormal variance with pedigree 0.0807, pedigree (2,2,5,1,1)
  Calculated value based on literature values and expert opinion. See comments in the parametres' comment field.
  property fraction, origin: fresh water 1; name fraction_origin_fresh_water
  property fraction, origin: salt water 0; name fraction_origin_salt_water
  property fraction, origin: unspecified 0; name fraction_origin_unspecified

## Sampling procedure
Own measurements at laboratory (weighing) and manufacturer information.

## Extrapolations
This dataset has been extrapolated from year 2006 to the year of the calculation (2021). The uncertainty has been adjusted accordingly.

## Review by Roland Hischier 2011-09-22
Transfer of documentation done.

## Review by Jürgen Sutter 2007-11-08
passed.
-
