# air filter production, central unit, 600 m3/h

Dataset: EcoSpold 2, unit process
Geography: RER
Time period: 2003-01-01 to 2021-12-31
Technology level: current
Classification: ISIC rev.4 ecoinvent: 2819:Manufacture of other general-purpose machinery
Classification: EcoSpold01Categories: ventilation/production of components
Tags: ConvertedDataset
Scenario: Business-as-Usual
System model: Allocation, cut-off by classification
Generated by: Alex Primas
Published in: Hässig, W. 2007
Database: ecoinvent
isCopyrightProtected: true
accessRestrictedTo: 1

## General comment
Production of a typical component used for a ventilation system in a multi family house. The house considered in the investigation includes 6 flats with 130 m2 floor area each and a ventilation rate of 120 m3/h.
[This dataset was already contained in the ecoinvent database version 2. It was not individually updated during the transfer to ecoinvent version 3. Life Cycle Impact Assessment results may still have changed, as they are affected by changes in the supply chain, i.e. in other datasets. This dataset was generated following the ecoinvent quality guidelines for version 2. It may have been subject to central changes described in the ecoinvent version 3 change report (http://www.ecoinvent.org/database/ecoinvent-version-3/reports-of-changes/), and the results of the central updates were reviewed extensively. The changes added e.g. consistent water flows and other information throughout the database. The documentation of this dataset can be found in the ecoinvent reports of version 2, which are still available via the ecoinvent website. The change report linked above covers all central changes that were made during the conversion process.]

## Included activities end
Materials used for the production. Estimation of electricity use for the different production steps. Energy use for heating of the production building. Transport of raw materials to the plant. Estimation for the Infrastructure of the Production site included.

## Geography
Data for production in Austria used.

## Technology
Bag filter made of polyester fleece, frame galvanised steel. Total weight per element 0.4 kg

## Time period
Materials investigated in 2003

## Reference product
- air filter, central unit, 600 m3/h: 1 unit; CPC 43914: Filtering or purifying machinery and apparatus, for liquids or gases, except oil filters, petrol filters and a[…]; By-product classification allocatable product
  EcoSpold01Location=RER
  production volume 1.32237 unit
    This is a placeholder value that does not reflect real-world production volumes. This dataset does not currently require a real-world production volume to work in the database framework, and no actual data were collected yet. This has no negative effect on the results of the ecoinvent database. The placeholder value of this activity was scaled according to the nominal GDP of 2005 (source: United Nations, http://data.un.org/Glossary.aspx?q=GDP+%28current+US%24%29, accessed 20130726) to reflect an appropriate share of the global production volume, which is also a placeholder value.
  property price 0.723995 EUR2005
    Calculated based on inputs: The price of the product has been calculated as a sum of the values of the material and energy inputs for this product. This value is therefore a rough estimation. It may underestimate the real price since there are additional expenses when producing any product. These expences can include for example labour costs, treatment of waste materials and profit for the producer. Please consider carefully whether this level of data quality is acceptable for your application.
  property carbon content, fossil 0.085325
    C content was calculated as an addition of C content in the product components (Bag filter made of polyester fleece, frame galvanised steel). Then, it was referred to 1 kg DM
  property carbon content 0.085325
    carbon content on a dry matter basis (reserved; not for manual entry)
  properties: water content 0, dry mass 0.4 kg, carbon content, non-fossil 0, water in wet mass 0 kg, wet mass 0.4 kg, carbon allocation 0.03413 kg

## Inputs from technosphere
- heat, district or industrial, natural gas: 0.551 MJ; lognormal variance with pedigree 0.076, pedigree (4,5,5,1,1)
  EcoSpold01Location=RER
  Data estimated from related companies
  Uncertainty: Data estimated from related companies
  properties: heating value, net 1 MJ
- polyethylene terephthalate, granulate, amorphous: 0.0525 kg; lognormal variance with pedigree 0.0526, pedigree (2,4,5,1,1)
  Questionnaire
  EcoSpold01Location=RER
  Uncertainty: Questionnaire
  properties: dry mass 1 kg, carbon content, fossil 0.625, wet mass 1 kg, heating value, net 22.95 MJ
  note on carbon content, fossil: Polymer of the ethylen terephtalate monomer (C10H8O4)n (ecoinvent v2.2 report 11_II), MW=192 g/mol
- heat, district or industrial, other than natural gas: 0.551 MJ; lognormal variance with pedigree 0.07, pedigree (1,1,5,1,1)
  EcoSpold01Location=RER
  4,5,1,1,1,5; Data estimated from related companies
  properties: heating value, net 1 MJ
- steel, unalloyed: 0.243 kg; lognormal variance with pedigree 0.0526, pedigree (2,4,5,1,1)
  EcoSpold01Location=RER
  Questionnaire
  Uncertainty: Questionnaire
  properties: carbon content, fossil 0.0025, dry mass 1 kg, wet mass 1 kg
  note on carbon content, fossil: Unalloyed steels or carbon steels are those in which the level of an individual element in no case reaches or exceeds the limiting concentration given in Tab. 3.1 ecoinvent v2.2 report 10_partII. Assumed to have a C content of 0.25%
- waste polyethylene terephthalate: -0.0025 kg; lognormal variance with pedigree 0.07, pedigree (4,4,5,1,1)
  EcoSpold01Location=CH
  Estimations on precentage material disposed
  Uncertainty: Estimations on precentage material disposed
  production volume 0.0025 kg
    Calculated from the production volume of air filter, central unit, 600 m3/h in proportion to the respective output amounts.
  properties: water content 0.00200401, carbon content, fossil 0.554108, dry mass 0.998 kg, wet mass 1 kg, heating value, net 22.95 MJ
  note on carbon content, fossil: C content in 1 kg DM was calculated using data in Tab A.1, ecoinvent v2.2 report 13_I
  note on heating value, net: Value taken from the general comment of the treatment dataset.
- plastic processing factory: 2.96e-10 unit; lognormal variance with pedigree 0.394, pedigree (4,5,5,1,3)
  EcoSpold01Location=RER
  Calculated with data of a similar company
  Uncertainty: Calculated with data of a similar company
- electricity, medium voltage: 0.203 kWh; lognormal variance with pedigree 0.108, pedigree (3,5,5,1,3)
  EcoSpold01Location=UCTE
  Data estimated from related processes
  Uncertainty: Data estimated from related processes
- polar fleece production, energy use only: 0.0525 kg; lognormal variance with pedigree 0.072, pedigree (3,4,5,1,3)
  Questionnaire, approximation for technology
  EcoSpold01Location=RER
  Uncertainty: Questionnaire, approximation for technology
- zinc coat, coils: 0.1 m2; lognormal variance with pedigree 0.054, pedigree (3,4,5,1,1)
  EcoSpold01Location=RER
  Questionnaire, estimations
  Uncertainty: Questionnaire, estimations
- sheet rolling, steel: 0.385 kg; lognormal variance with pedigree 0.054, pedigree (3,4,5,1,1)
  EcoSpold01Location=RER
  Questionnaire, estimations
  Uncertainty: Questionnaire, estimations
- steel, low-alloyed: 0.142 kg; lognormal variance with pedigree 0.0526, pedigree (2,4,5,1,1)
  EcoSpold01Location=RER
  Questionnaire
  Uncertainty: Questionnaire
  properties: carbon content, fossil 0.005, dry mass 1 kg, wet mass 1 kg
  note on carbon content, fossil: Low alloyed steel composition given in Tab. 3.2 ecoinvent v2.2 report 10_partII. Steel assumed to have a C content of 0.5%

## Sampling procedure
Questionnaire and technical information of producer. Data of one common product used.

## Extrapolations
This dataset has been extrapolated from year 2003 to the year of the calculation (2021). The uncertainty has been adjusted accordingly.

## Review by Rolf Frischknecht 2007-08-16
passed
none
