# diesel, burned in building machine

Dataset: EcoSpold 2, unit process
Geography: GLO
Time period: 1996-01-01 to 2021-12-31
Technology level: current
Classification: ISIC rev.4 ecoinvent: 4312:Site preparation
Classification: EcoSpold01Categories: construction processes/machinery
Synonyms: engine; construction
Tags: ConvertedDataset
Scenario: Business-as-Usual
System model: Allocation, cut-off by classification
Generated by: Daniel Kellenberger (obsolete)
Published in: Kellenberger D. 2007
Database: ecoinvent
isCopyrightProtected: true
accessRestrictedTo: 1

## General comment
This module is based on the data included in the report Oekoinventare von Energiesystemen 1996. The diesel consumption and the emissions are updated using the Swiss "Offroad database" and applied to year 2000. This moduleshould not be used if its relative importance would be high in a certain environmental inventory.
[This dataset was already contained in the ecoinvent database version 2. It was not individually updated during the transfer to ecoinvent version 3. Life Cycle Impact Assessment results may still have changed, as they are affected by changes in the supply chain, i.e. in other datasets. This dataset was generated following the ecoinvent quality guidelines for version 2. It may have been subject to central changes described in the ecoinvent version 3 change report (http://www.ecoinvent.org/database/ecoinvent-version-3/reports-of-changes/), and the results of the central updates were reviewed extensively. The changes added e.g. consistent water flows and other information throughout the database. The documentation of this dataset can be found in the ecoinvent reports of version 2, which are still available via the ecoinvent website. The change report linked above covers all central changes that were made during the conversion process.]

## Included activities end
Includes the inputs " building machine" for infrastructure, lubricating oil and fuel consumption, and some measured air emissions as output.

## Geography
Certain elementary flows or intermediate product flows are extrapolated from RER and CH conditions.

## Technology
Average current technology for one typical machine representing the category.

## Reference product
- diesel, burned in building machine: 1 MJ; CPC 543: Site preparation services; By-product classification allocatable product
  EcoSpold01Location=GLO
  production volume 1 MJ
    Unknown
    Dummy value to be replaced by measured, estimated or calculated value
  property price 0.0188 EUR2005
    Estimated price. The amount of diesel needed to produce 1MJ of energy is 0.0234 kg. The price of diesel is 0.37 EUR. The resulting price is 0.0086 EUR. On top of the value of diesel there are other inputs from technosphere such as infrastructure. Therefore it has been decided, that the price will be set the 0.0187 EUR, i.e. the same as in case of "diesel, burned in diesel-electric generating set".
  properties: heating value, net 1 MJ

## Inputs from technosphere
- building machine: 1.34e-7 unit; lognormal variance with pedigree 0.3581, pedigree (1,5,5,3,1)
  EcoSpold01Location=RER
- lubricating oil: 0 kg; pedigree (1,1,1,1,1)
  EcoSpold01Location=RER
  properties: wet mass 1 kg, dry mass 1 kg, carbon content, fossil 0.75, heating value, net 40.2 MJ
  note on carbon content, fossil: Lubricating oil is produced from diesel. C-content/dry mass of fats and oils considered 75%, from: ecoinvent v2.2 report, n 15a, pg 40
  note on heating value, net: Literature value, Source: IPCC 2006, 2006 IPCC Guidelines for National Greenhouse Gas Inventories, Prepared by the National Greenhouse Gas Inventories Programme, Eggleston H.S., Buendia L., Miwa K., Ngara T. and Tanabe K. (eds). Published: IGES, Japan
- diesel: 0.0234 kg; lognormal variance with pedigree 0.0581, pedigree (1,5,5,3,1)
  EcoSpold01Location=RER
  properties: heating value, net 42.8 MJ, carbon content, fossil 0.865, wet mass 1 kg, dry mass 1 kg
  note on carbon content, fossil: C-content of diesel is 86.5% (ecoinvent v2.2 report 6_IV, Tab 3.14)
- waste mineral oil: 0 kg; pedigree (1,1,1,1,1)
  EcoSpold01Location=CH
  production volume 0 kg
    Calculated from the production volume of diesel, burned in building machine in proportion to the respective output amounts.
  properties: wet mass 1 kg, dry mass 0.9 kg, heating value, net 34.7 MJ, water content 0.111111, carbon content, fossil 0.864444
  note on heating value, net: Value taken from the general comment of the treatment dataset.
  note on carbon content, fossil: Tab A.6, ecoinvent v2.2 report 13_I. C content has been calculated after data in the tables, and then referred to 1 kg DM
- lubricating oil: 8.9436e-5, 0.000424564 kg (2 entries); lognormal variance with pedigree 0.0581, pedigree (1,5,5,3,1)
  EcoSpold01Location=RER
- waste mineral oil: -0.000141088, -3.49279e-6, -0.000369419 kg (3 entries); lognormal variance with pedigree 0.0581, pedigree (1,5,5,3,1)
  EcoSpold01Location=CH
  production volume 0.000514 kg

## Emissions to nature
- Particulates, < 2.5 um [air, unspecified]: 9.43e-5 kg; lognormal variance with pedigree 0.3581, pedigree (1,5,5,3,1)
- Particulates, > 10 um [air, unspecified]: 6.28e-6 kg; lognormal variance with pedigree 0.0981, pedigree (1,5,5,3,1)
- Sulfur dioxide [air, unspecified]: 2.36e-5 kg; lognormal variance with pedigree 0.0581, pedigree (1,5,5,3,1)
- Benzo(a)pyrene [air, unspecified]: 7.01e-10 kg; lognormal variance with pedigree 0.3581, pedigree (1,5,5,3,1)
- Carbon dioxide, fossil [air, unspecified]: 0.073 kg; lognormal variance with pedigree 0.0581, pedigree (1,5,5,3,1)
- Copper [air, unspecified]: 3.97e-8 kg; lognormal variance with pedigree 0.6981, pedigree (1,5,5,3,1)
- Zinc [air, unspecified]: 2.34e-8 kg; lognormal variance with pedigree 0.6981, pedigree (1,5,5,3,1)
- Particulates, > 2.5 um, and < 10um [air, unspecified]: 4.19e-6 kg; lognormal variance with pedigree 0.1781, pedigree (1,5,5,3,1)
- Dioxins, measured as 2,3,7,8-tetrachlorodibenzo-p-dioxin [air, unspecified]: 1.4e-15 kg; lognormal variance with pedigree 0.0981, pedigree (1,5,5,3,1)
- Ammonia [air, unspecified]: 4.67e-7 kg; lognormal variance with pedigree 0.0981, pedigree (1,5,5,3,1)
- Nickel [air, unspecified]: 1.64e-9 kg; lognormal variance with pedigree 0.6981, pedigree (1,5,5,3,1)
- Chromium [air, unspecified]: 1.17e-9 kg; lognormal variance with pedigree 0.6981, pedigree (1,5,5,3,1)
- Methane, fossil [air, unspecified]: 3.75e-6 kg; lognormal variance with pedigree 0.0981, pedigree (1,5,5,3,1)
- Dinitrogen monoxide [air, unspecified]: 2.8e-6 kg; lognormal variance with pedigree 0.0981, pedigree (1,5,5,3,1)
- Carbon monoxide, fossil [air, unspecified]: 0.000266 kg; lognormal variance with pedigree 0.6981, pedigree (1,5,5,3,1)
- Selenium [air, unspecified]: 2.34e-10 kg; lognormal variance with pedigree 0.6981, pedigree (1,5,5,3,1)
- Nitrogen oxides [air, unspecified]: 0.00103 kg; lognormal variance with pedigree 0.0981, pedigree (1,5,5,3,1)
- Cadmium [air, unspecified]: 2.34e-10 kg; lognormal variance with pedigree 0.6981, pedigree (1,5,5,3,1)
- PAH, polycyclic aromatic hydrocarbons [air, unspecified]: 7.85e-8 kg; lognormal variance with pedigree 0.3581, pedigree (1,5,5,3,1)
- NMVOC, non-methane volatile organic compounds, unspecified origin [air, unspecified]: 0.000121 kg; lognormal variance with pedigree 0.0981, pedigree (1,5,5,3,1)

## Sampling procedure
Some data from the LCA study Oekoinventare von Energiesystemen 1996 and emissions from the Swiss "Offroad" database.

## Extrapolations
This dataset has been extrapolated from year 2001 to the year of the calculation (2021). The uncertainty has been adjusted accordingly.

## Review by Roberto Dones 2005-07-19
passed
