# Mannheim process

Dataset: EcoSpold 2, unit process
Geography: RoW
Time period: 2000-01-01 to 2021-12-31
Technology level: current
Classification: ISIC rev.4 ecoinvent: 2011:Manufacture of basic chemicals
Synonyms: Muriatic acid; Hydrogen chloride; Chlorohydric acid; Acide chlorhydrique; 7647-01-0
Scenario: Business-as-Usual
System model: Allocation, cut-off by classification
Generated by: Roland Hischier
Published in: Althaus H.-J. 2007
Database: ecoinvent
isCopyrightProtected: true
accessRestrictedTo: 1

## General comment
This dataset represents the co-production of sodium sulfate and hydrochloric acid by means of the Mannheim process.
Sodium sulfate is found in nature in the anhydrous form (thenardite) or the decahydrate form (Glauber's salt). Sodium sulfate is also produced chemically – either as a by-product of other processes or as the main product of a process. Sodium sulfate is used for the production of soap and detergents, textiles, pulp and paper, glass and for a variety of other uses – e.g. carpet fresheners or starch manufacturing.
Hydrogen chloride (HCl) is a colorless to yellowish fuming liquid with a sharp, pungent odor. It is a strong highly corrosive acid. The main applications
for HCl are according to (Inchem hcl):
- Acidizing (activation) of petroleum wells
- Manufacture of dyes, phenols and plastics
- Ore reduction (manganese, radium, vanadium, tantalum, tin and tungsten)
- Food processing (corn, syrup, sodium glutamate)
- Pickling and metal cleaning
- Industrial acidizing
- Water treatment
- Resin regeneration and demineralizers
Due to a lack of industrial data, this dataset is based on literature and stoichiometric calculations.
References:
Althaus H.-J., Chudacoff M., Hischier R., Jungbluth N., Osses M. and Primas A. (2007) Life Cycle Inventories of Chemicals. ecoinvent report No. 8, v2.0. EMPA Dübendorf, Swiss Centre for Life Cycle Inventories, Dübendorf, CH.

## Included activities start
The activity starts when the raw materials enter the process.

## Included activities end
This activity ends with the production of hydrochloric acid and sodium sulfate. The consumption of raw materials and chemicals used for production are taken into account, as well as emissions to air and water. The energy demand and infrastructure use are estimated. The production of solid wastes is omitted.

## Geography
The data used has no specific geographical origin as it is based on stoechiometric calculations and estimations. It is assumed to be representative of the production processes in this geography.

## Technology
Production of sodium sulfate and HCl by the Mannheim process. This process can be summarized with the following overall stoechiometric reaction:
2 NaCl + H2SO4 → Na2SO4 + 2 HCl

## Parameters
- fraction, cooling water, to air: 0.3875 dimensionless; name fraction_CW_to_air; = (0.5*fraction_CW_OT_to_air)+(0.5*fraction_CW_R_to_air); lognormal variance with pedigree 0.092025, pedigree (4,4,3,2,4)
  Calculated value based on literature value (see comments of the other parametres present in this dataset) and expert opinion. In the case when no industry/literature data are available about the type of cooling or directly fraction, cooling water, to air specific for the process a default assumption is applied. It is assumed that the once-through cooling system is used in 50% of all cases and recirculating system is used in another 50% of all cases.
- fraction, cooling water, cooling pond system, to air: 0.032 dimensionless; name fraction_CW_CP_to_air; lognormal variance with pedigree 0.0413, pedigree (2,3,1,3,1)
  Calculated based on literature value (Scown, C.D., 2011, Water Footprint of U.S. Transportation Fuels and supplying information of the article) (Vionnet, S., Quantis Water Database - Technical Report, 2012).
- fraction, cooling water, recirculating system, to air: 0.771 dimensionless; name fraction_CW_R_to_air; lognormal variance with pedigree 0.0413, pedigree (2,3,1,3,1)
  (same comment as for fraction, cooling water, cooling pond system, to air)
- fraction, cooling water, once-through system, to air: 0.004 dimensionless; name fraction_CW_OT_to_air; lognormal variance with pedigree 0.0413, pedigree (2,3,1,3,1)
  (same comment as for fraction, cooling water, cooling pond system, to air)
- fraction, process water, to air: 0.205 dimensionless; name fraction_PW_to_air; lognormal variance with pedigree 0.092025, pedigree (4,4,3,2,4)
  Literature value (Statistics Canada, 2007 & Shaffer, K.H., 2008, Consumptive water use in the Great Lakes Basin, USGS) (Vionnet, S., Quantis Water Database - Technical Report, 2012).

## Reference product
- hydrochloric acid, without water, in 30% solution state: 1 kg; name RP; By-product classification allocatable product; CPC 34: Basic chemicals; CAS 7647-01-0
  Sodium sulfate is found in nature in the anhydrous form (thenardite) or the decahydrate form (Glauber's salt). Sodium sulfate is also produced chemically – either as a by-product of other processes or as the main product of a process. Sodium sulfate is used for the production of soap and detergents, textiles, pulp and paper, glass and for a variety of other uses – e.g. carpet fresheners or starch manufacturing.
  Hydrogen chloride (HCl) is a colorless to yellowish fuming liquid with a sharp, pungent odor. It is a strong highly corrosive acid. The main applications
  for HCl are according to (Inchem hcl):
  - Acidizing (activation) of petroleum wells
  - Manufacture of dyes, phenols and plastics
  - Ore reduction (manganese, radium, vanadium, tantalum, tin and tungsten)
  - Food processing (corn, syrup, sodium glutamate)
  - Pickling and metal cleaning
  - Industrial acidizing
  - Water treatment
  - Resin regeneration and demineralizers
  References:
  Althaus H.-J., Chudacoff M., Hischier R., Jungbluth N., Osses M. and Primas A. (2007) Life Cycle Inventories of Chemicals. ecoinvent report No. 8, v2.0. EMPA Dübendorf, Swiss Centre for Life Cycle Inventories, Dübendorf, CH.
  production volume 1.43601e10 kg; name RP_PV
    Estimated value. The global production volume is extrapolated from the European production volume based on reports from Cefic (European Chemical Industry Council), and the American Chemistry Council.
    According to Cefic (2016a) the global sales of chemicals in the year 2015 was 3 534 billion euros. The reported share of sales per region are: EU28 14.7%; Other Europe (Switzerland, Norway, Turkey, Russia and Ukraine) 2.7%; NAFTA (US, Canada and Mexico) 16.5%; Latin America 3.8%; China 39.9%; Japan 3.9%; Republic of Korea 3.2%; India 2.2%; Rest of Asia 11.9%; Rest of the World 1.3%. Cefic also reports the US total sales, which amount to 518.7 billion euros out of the global 3 534 billion euros (14.7%). The same share is reported by the American Chemistry Council (2016), according to which the USA sales account for 15% of global sales for the year 2016.
    European production volume:
    Estimated value. According to the European Chemical Agency, the consumption of Hydrogen chloride for the year of 2016 is estimated to be 5500000000 kg. The aforementioned value is the average of the range given in the literature. According to the European Chemical Industry Council (Cefic, 2016a), the total sales of chemicals of the European Union in 2016 amounted to 519 billion euros. Chemical imports were valued at 91 billion euros for the first 11 months of 2016. Based on this, the value for the total imports for the year 2016 was extrapolated, yielding a value of 99.3 billion euros. Furthermore, Cefic (2016b) reports a trade surplus (exports-imports) of 46.4 billion euros (once again extrapolated for the whole year using the value of 42 billion euros for the first 11 months of 2016). Considering all the aforementioned information, the total chemical consumption in the EU is calculated to be 472.6 billion euros (total sales-exports+imports). It is therefore calculated that production is 110% of consumption. This value is used to scale the information on chemical consumption to production. The European production volume is therefore 6050000000 kg.
    HCl is generated from combustion of chlorine with hydrogen as well as from the sodium sulfate pathway (Mannheim process). As both routes produce nearly equal amounts of HCl, it is assumed that they each amount to 50% of HCl production that is actually sold on the market.
    References:
    American Chemistry Council 2016. Outlook: U.S. Chemical Industry Continues to Outpace Industrial Output; Accounts for More Than One-Half of Construction Spending by Manufacturing Sector. Accessible at: https://www.americanchemistry.com/Media/PressReleasesTranscripts/ACC-news-releases/US-Chemical-Industry-Continues-to-Outpace-Industrial-Output.html
    European Chemical Agency, Brief profile of Hydrogen chloride, Accessible at: https://echa.europa.eu/brief-profile/-/briefprofile/100.028.723
    Cefic 2016a. Facts and figures 2016 of the European chemical industry. Accessible at: http://www.cefic.org/Facts-and-Figures/Chemicals-Industry-Profile/
    Cefic 2016b. 2016: EU chemicals output posts positive growth for third year running. Accessible at: http://www.cefic.org/Documents/RESOURCES/Chemical%20Trends%20Report/March-2017-Cefic-Chemicals-Trends-Report.pdf
    Althaus H.-J., Chudacoff M., Hischier R., Jungbluth N., Osses M. and Primas A. (2007) Life Cycle Inventories of Chemicals. Final report ecoinvent data v2.0 No. 8. EMPA, Swiss Centre for Life Cycle Inventories, Dübendorf, CH
  property price 0.127 EUR2005
    Temporary price data. Calculated as 90% of purchasers price based on: 2004 Import/Export data (total trades (USD) divided by total weight (kg) in EU27, USA, China, Japan and India) from UN Commodity Trade Statistics Database (http://data.un.org/Explorer.aspxDatabase [Accessed 2 July 2010]). Commodity: Hydrogen chloride (hydrochloric acid).
  property heating value, net 3.32 MJ
    LHV is calculated based on the elemental composition of the substance. Based on the CAS number of the substance (007647-01-0), the chemical formula of the substance is found to be: HCl, (PubChem 2020).
    Reference: Kim, S., Chen, J., Cheng, T., Gindulyte, A., He, J., He, S., Li, Q., Shoemaker, B. A., Thiessen, P. A., Yu, B., Zaslavsky, L., Zhang, J., & Bolton, E. E. (2019). PubChem 2019 update: improved access to chemical data. Nucleic acids research, 47(D1), D1102–D1109. https://doi.org/10.1093/nar/gky1033
  property carbon content 0
    carbon content on a dry matter basis (reserved; not for manual entry)
  property true value 0.127; name RP_true_value
    allocation property applied in "true value" allocation // value calculated from revenue
  properties: water in wet mass 0 kg, water content 0, dry mass 1 kg, carbon content, non-fossil 0, carbon content, fossil 0, wet mass 1 kg, carbon allocation 0 kg

## By-products
- sodium sulfate, anhydrite: 0 kg; name BP_sodium_sulfate_anhydrite; CPC 34240: Phosphates of triammonium; salts and peroxysalts of inorganic acids and metals n.e.c.; By-product classification allocatable product; CAS 7757-82-6
  production volume 2.79923e10 kg; = RP_PV*BP_sodium_sulfate_anhydrite/ABS(RP)
    Calculated from the production volume of hydrochloric acid, without water, in 30% solution state in proportion to the respective output amounts.
  property price 0.191 EUR2005
    Temporary price data. Calculated as 90% of purchasers price based on: 2004 Import/Export data (total trades (USD) divided by total weight (kg) in EU27, USA, China, Japan and India) from UN Commodity Trade Statistics Database (http://data.un.org/Explorer.aspxDatabase [Accessed 2 July 2010]). Commodity: Sodium sulphates other than disodium sulphate
  property carbon content 0
    carbon content on a dry matter basis (reserved; not for manual entry)
  property true value 0.37232; name BP_sodium_sulfate_anhydrite_true_value
    allocation property applied in "true value" allocation // value calculated from revenue
  properties: carbon content, non-fossil 0, wet mass 1 kg, water content 0, water in wet mass 0 kg, carbon content, fossil 0, dry mass 1 kg, carbon allocation 0 kg

## Inputs from technosphere
- heat, district or industrial, natural gas: 0 MJ; pedigree (1,1,1,1,1)
  Information from Ullmann's Encyclopedia
  Uncertainty: i
  properties: heating value, net 1 MJ
- sodium chloride, powder: 0.429364 kg; lognormal variance with pedigree 0.1786, pedigree (4,5,5,5,5)
  Stoechiometric calc., yield 99.8%-90%
  Uncertainty: s
  properties: dry mass 1 kg, wet mass 1 kg
- chemical factory, organics: 1.98321e-10 unit; lognormal variance with pedigree 0.3498, pedigree (2,3,5,4,3)
  Calculated based on literature data published by the industry. For this activity, no information was readily available concerning infrastructure and land-use. Therefore, the infrastructure is estimated based on data from two chemical factories, the BASF site of Ludwigshafen and the chemical factory in Gendorf (which are both located in Germany), which produce a wide range of chemical substances. Based on this data, the following assumptions are made: the built area amounts to about 4.2 ha, the plant has an average output of 50'000 t/a and a lifespan of fifty years. The estimated infrastructure amount is therefore 4.00 E-10 units per kg of produced chemical.
  References:
  Althaus H.-J., Chudacoff M., Hischier R., Jungbluth N., Osses M. and Primas A. (2007) Life Cycle Inventories of Chemicals. ecoinvent report No. 8, v2.0. EMPA Dübendorf, Swiss Centre for Life Cycle Inventories, Dübendorf, CH.
  Gendorf (2000) Umwelterklärung 2000, Werk Gendorf. Werk Gendorf, Burgkirchen.
- heat, district or industrial, other than natural gas: 0 MJ; pedigree (1,1,1,1,1)
  Information from Ullmann's Encyclopedia
  Uncertainty: i
  properties: heating value, net 1 MJ
- electricity, medium voltage: 0 kWh; pedigree (1,1,1,1,1)
  Information from Ullmann's Encyclopedia
  Uncertainty: i
- sulfuric acid: 0.360448 kg; lognormal variance with pedigree 0.1786, pedigree (4,5,5,5,5)
  Stoechiometric calc., yield 99.8%-90%
  Uncertainty: s
  properties: dry mass 1 kg, wet mass 1 kg
- heat, district or industrial, natural gas: 0.0128684, 0.834952 MJ (2 entries); lognormal variance with pedigree 0.096, pedigree (4,5,5,5,3)
  Information from Ullmann's Encyclopedia
  Uncertainty: i
- heat, district or industrial, other than natural gas: 0.00034366, 0.847477 MJ (2 entries); lognormal variance with pedigree 0.096, pedigree (4,5,5,5,3)
  Information from Ullmann's Encyclopedia
  Uncertainty: i
- electricity, medium voltage: 0.000406228, 7.78971e-5, 0.00130773, 0.0190198, 0.00268085, 0.0087346 kWh (6 entries); lognormal variance with pedigree 0.096, pedigree (4,5,5,5,3)
  Information from Ullmann's Encyclopedia
  Uncertainty: i

## Inputs from nature
- Water, cooling, unspecified natural origin [natural resource, in water]: 0.0128908 m3; name water_cooling_UNO_input; lognormal variance with pedigree 0.096, pedigree (4,5,5,5,3)
  Information from Ullmann's Encyclopedia
  Uncertainty: i
- Water, unspecified natural origin [natural resource, in water]: 0.000694122 m3; name water_UNO_input; lognormal variance with pedigree 0.096, pedigree (4,5,5,5,3)
  Information from Ullmann's Encyclopedia
  Uncertainty: i

## Emissions to nature
- Sulfate [water, surface water]: 0.0169564 kg; lognormal variance with pedigree 0.23, pedigree (5,5,5,5,4)
  Calculated from mass bilance
  Uncertainty: c
- Sulfate [air, urban air close to ground]: 0.000704038 kg; lognormal variance with pedigree 0.26, pedigree (5,5,5,5,5)
  Assumption, 0.2% of input = air emission
  Uncertainty: a
- Water [water, unspecified]: 0.00844746 m3; = water_cooling_UNO_input*(1-fraction_CW_to_air)+water_UNO_input*(1-fraction_PW_to_air); lognormal variance with pedigree 0.0827, pedigree (2,2,5,5,1)
  Calculated as a fraction of the input of water. For more details, refer to the mathematical relation and the parameters.
  property wet mass 1000 kg; name WM
  property water in wet mass 1000 kg; name WWM
  property fraction, origin: unspecified 1; name fraction_origin_unspecified_Ww
  property fraction, origin: salt water 0; name fraction_origin_salt_water_Ww
  property carbon content, non-fossil 0; name C_content_non_fossil
  property carbon content, fossil 0; name C_content_fossil
  property fraction, origin: fresh water 0; name fraction_origin_fresh_water_Ww
  property dry mass 0 kg; name DM
- Sodium, ion [water, surface water]: 0.00842862 kg; lognormal variance with pedigree 0.23, pedigree (5,5,5,5,4)
  Calculated from mass bilance
  Uncertainty: c
- Water [air, unspecified]: 0.00513749 m3; = (water_cooling_UNO_input*fraction_CW_to_air)+(water_UNO_input*fraction_PW_to_air); lognormal variance with pedigree 0.0827, pedigree (2,2,5,5,1)
  (same comment as for Water)
  property fraction, origin: unspecified 1; name fraction_origin_unspecified
  property fraction, origin: salt water 0; name fraction_origin_salt_water
  property fraction, origin: fresh water 0; name fraction_origin_fresh_water
- Chloride [water, surface water]: 0.0130396 kg; lognormal variance with pedigree 0.23, pedigree (5,5,5,5,4)
  Calculated from mass bilance
  Uncertainty: c

## Sampling procedure
The data is based on literature and stoechiometric calculations.

## Extrapolations
This dataset has been copied from an original dataset covering the geography RER. The uncertainty has been adjusted accordingly.

## Review by Emilia Moreno Ruiz 2017-08-08
This dataset was additionally reviewed in a separate review process by Eric Johnson of Atlantic Consulting as well as Emilia Moreno Ruiz and Gregor Wernet of ecoinvent.
