# treatment of waste polypropylene, municipal incineration

Dataset: EcoSpold 2, unit process
Geography: CH
Time period: 1994-01-01 to 2021-12-31
Technology level: outdated
Classification: EcoSpold01Categories: waste management/municipal incineration
Classification: ISIC rev.4 ecoinvent: 3821:Treatment and disposal of non-hazardous waste
Synonyms: PP
Tags: Treatment; ConvertedDataset
Scenario: Business-as-Usual
System model: Allocation, cut-off by classification
Generated by: Gabor Doka (obsolete)
Published in: Doka G. 2007
Database: ecoinvent
isCopyrightProtected: true
accessRestrictedTo: 1

## General comment
Inventoried waste contains 100% PP; .
waste composition (wet, in ppm): upper heating value 36.16 MJ/kg; lower heating value 32.78 MJ/kg; H2O 159000; O 32454; H 103430; C 694120; S 360.46; N 1095.3; P n.a.; B n.a.; Cl 1234.1; Br 8.0972; F 12.146; I n.a.; Ag n.a.; As 1.5385; Ba 202.43; Cd 28.663; Co 1.417; Cr 10.526; Cu 34.93; Hg 0.040486; Mn 25.371; Mo n.a.; Ni 0.80972; Pb 19.079; Sb 8.5021; Se 1.7004; Sn 3.2205; V 1862.4; Zn 288.78; Be 0.40486; Sc n.a.; Sr 71.661; Ti 809.72; Tl 0.32389; W n.a.; Si n.a.; Fe 1295.6; Ca 2186.3; Al 161.94; K n.a.; Mg 80.972; Na 1186.6;
Share of carbon in waste that is biogenic 0%.
Share of iron in waste that is metallic/recyclable 0%.
Net energy produced in MSWI: 3.74MJ/kg waste electric energy and 7.54MJ/kg waste thermal energy
Allocation of energy production: no substitution or expansion. Total burden allocated to waste disposal function of MSWI.
One kg of this waste produces 0.01618 kg of slag and 0.004865 kg of residues, which are landfilled. Additional solidification with 0.001946 kg of cement.
[This dataset was already contained in the ecoinvent database version 2. It was not individually updated during the transfer to ecoinvent version 3. Life Cycle Impact Assessment results may still have changed, as they are affected by changes in the supply chain, i.e. in other datasets. This dataset was generated following the ecoinvent quality guidelines for version 2. It may have been subject to central changes described in the ecoinvent version 3 change report (http://www.ecoinvent.org/database/ecoinvent-version-3/reports-of-changes/), and the results of the central updates were reviewed extensively. The changes added e.g. consistent water flows and other information throughout the database. The documentation of this dataset can be found in the ecoinvent reports of version 2, which are still available via the ecoinvent website. The change report linked above covers all central changes that were made during the conversion process.]

## Included activities end
waste-specific air and water emisions from incineration, auxiliary material consumption for flue gas cleaning. Short-term emissions to river water and long-term emisisons to ground water from slag compartment (from bottom slag) and residual material landfill (from solidified fly ashes and scrubber slugde). Process energy demands for MSWI.

## Geography
Specific to the technology mix encountered in Switzerland in 2000. Well applicable to modern incineration practices in Europe, North America or Japan.

## Technology
replaced by newer incineration technology with fly ash extraction. Average Swiss MSWI plants in 2000 with electrostatic precipitator for fly ash (ESP), wet flue gas scrubber and 29.4% SNCR , 32.2% SCR-high dust , 24.6% SCR-low dust -DeNOx facilities and 13.8% without Denox (by burnt waste, according to Swiss average). Share of waste incinerated in plants with magnetic scrap separation from slag : 50%. Gross electric efficiency technology mix 12.997% and Gross thermal efficiency technology mix 25.57%

## Time period
Waste composition as given in literature reference, theoretical data or other source. Transfer coefficients for modern Swiss MSWI. Emission speciation based on early 90ies data.

## Reference product
- waste polypropylene: -1 kg; CPC 39270: Waste, parings and scrap of plastics; By-product classification Waste; CAS 9003-07-0
  EcoSpold01Location=CH
  production volume 0 kg; name RP_PV_1
    outdated. Replaced by newer incineration technology with fly ash extraction.
  property heating value, net 32.78 MJ
    Value assumed for all polypropylene products. Source: Phyllis2, database for (treated) biomass, algae, feedstocks for biogas production and biochar, https://phyllis.nl/Biomass/View/1186, ECN.TNO
  property price 0 EUR2005
    Waste products are assigned a price of zero as they are assumed to require further treatment.
  property carbon content, fossil 0.825208
    C content in 1 kg DM was calculated using data in Tab A.1, ecoinvent v2.2 report 13_I
  property carbon content 0.825208
    carbon content on a dry matter basis (reserved; not for manual entry)
  properties: carbon content, non-fossil 0, water content 0.189061, water in wet mass 0.159 kg, dry mass 0.841 kg, wet mass 1 kg, carbon allocation 0.694 kg

## Inputs from technosphere
- slag landfill: 2.88e-11 unit; lognormal variance with pedigree 0.09, pedigree (1,1,5,1,1)
  EcoSpold01Location=CH
  uncertainty is calculated from uncertainties in waste composition and transfer coefficients in incinerator
- cement, unspecified: 0.00195 kg; lognormal variance with pedigree 0.07, pedigree (1,1,5,1,1)
  Cement for solidification of landfilled residual material. Uncertainty calculated from unertainty of the waste composition of this waste, of transfer coefficients in the incinerator and of the solidification recipe.
  EcoSpold01Location=CH
  properties: wet mass 1 kg, dry mass 1 kg
- waste cement, hydrated: -0.00487 kg; name BP_amount_1; lognormal variance with pedigree 0.07, pedigree (1,1,5,1,1)
  Hydrated cement for solidification of landfilled residual material. Uncertainty calculated from unertainty of the waste composition of this waste and transfer coefficients in the incinerator and of the solidification recipe.
  EcoSpold01Location=CH
  production volume 0 kg; = RP_PV_1* BP_amount_1
    Calculated from the production volume of waste polypropylene, 15.9% water in proportion to the respective output amounts.
  property price 0 EUR2005; name BP_amount_1_price_EUR2005
  properties: dry mass 1 kg, wet mass 1 kg
- heat, district or industrial, natural gas: 0.004851 MJ; lognormal variance with pedigree 1.6, pedigree (1,1,5,1,1)
  EcoSpold01Location=RER
  uncertainty calculated from uncertainty in average DeNOx input, uncertainty in the share of thermal NOx, uncertainty of nitrogen content in average municipal waste and the unertainty in nitrogen content in *this* waste.
  properties: heating value, net 1 MJ
- chemical, organic: 0.000114 kg; lognormal variance with pedigree 1.18, pedigree (1,1,5,1,1)
  EcoSpold01Location=GLO
  Proxy for TMT15. uncertainty calculated from uncertainty in average auxiliary material input, and the unertainty of the waste composition of this waste
  properties: dry mass 1 kg, wet mass 1 kg, carbon content, fossil 0.628, heating value, net 19.03 MJ
  note on carbon content, fossil: This dataset is an unweighted average of 20 organic substances (listed in Tab 88.1, ecoinvent v2.2 report 8, part II), being part of the top100 chemicals included in this database. The C-content has also been calculated as an unweighted average of the C content of the substances composing this dataset.
- ammonia, anhydrous, liquid: 5.53e-5 kg; lognormal variance with pedigree 1.6, pedigree (1,1,5,1,1)
  uncertainty calculated from uncertainty in average DeNOx input, uncertainty in the share of thermal NOx, uncertainty of nitrogen content in average municipal waste and the unertainty in nitrogen content in *this* waste.
  EcoSpold01Location=CH
  properties: wet mass 1 kg, dry mass 1 kg
- hydrochloric acid, without water, in 30% solution state: 2.54e-6 kg; lognormal variance with pedigree 0.53, pedigree (1,1,5,1,1)
  uncertainty calculated from uncertainty in average auxiliary material input, and the unertainty of the waste composition of this waste
  EcoSpold01Location=RER
  properties: dry mass 1 kg, wet mass 1 kg, heating value, net 3.32 MJ
- chemical, inorganic: 4.24e-6 kg; lognormal variance with pedigree 0.53, pedigree (1,1,5,1,1)
  Proxy for Polyelectrolyte. uncertainty calculated from uncertainty in average auxiliary material input, and the unertainty of the waste composition of this waste
  EcoSpold01Location=GLO
  properties: dry mass 1 kg, wet mass 1 kg, carbon content, fossil 0.003
  note on carbon content, fossil: This dataset is an unweighted average of 20 inorganic substances (listed in Tab 88.1, ecoinvent v2.2 report 8, part II), being part of the top100 chemicals included in this database. The C-content has also been calculated as an unweighted average of the C content of the substances composing this dataset.
- process-specific burdens, slag landfill: 0.0162 kg; lognormal variance with pedigree 0.09, pedigree (1,1,5,1,1)
  EcoSpold01Location=CH
  uncertainty is calculated from uncertainties in waste composition and transfer coefficients in incinerator;activityLink introduced to establish a direct link to the corresponding regional supply of this product
- iron (III) chloride, without water, in 40% solution state: 5.41e-5 kg; lognormal variance with pedigree 0.46, pedigree (1,1,5,1,1)
  uncertainty calculated from uncertainty in average auxiliary material input, and the unertainty of the waste composition of this waste
  EcoSpold01Location=CH
  properties: dry mass 1 kg, wet mass 1 kg
- quicklime, milled, packed: 0.000214 kg; lognormal variance with pedigree 0.67, pedigree (1,1,5,1,1)
  (same comment as for iron (III) chloride, without water, in 40% solution state)
  properties: wet mass 1 kg, dry mass 0.99 kg, water content 0.010101
- sodium hydroxide, without water, in 50% solution state: 0.00134 kg; lognormal variance with pedigree 0.59, pedigree (1,1,5,1,1)
  (same comment as for hydrochloric acid, without water, in 30% solution state)
  properties: dry mass 1 kg, wet mass 1 kg, heating value, net 3.03 MJ
- process-specific burdens, residual material landfill: 0.00487 kg; lognormal variance with pedigree 0.06, pedigree (1,1,5,1,1)
  uncertainty is calculated from uncertainties in waste composition and transfer coefficients in incinerator;activityLink introduced to establish a direct link to the corresponding regional supply of this product
  EcoSpold01Location=CH
- titanium dioxide: 1.58e-6 kg; lognormal variance with pedigree 2.31, pedigree (1,1,5,1,1)
  (same comment as for heat, district or industrial, natural gas)
  properties: wet mass 1 kg, dry mass 1 kg
- residual material landfill: 1.01e-11 unit; lognormal variance with pedigree 0.06, pedigree (1,1,5,1,1)
  (same comment as for slag landfill)
- process-specific burdens, municipal waste incineration: 1 kg; lognormal variance with pedigree 0.04, pedigree (1,1,5,1,1)
  EcoSpold01Location=CH
  demands per kilogram waste. uncertainty is heeded in the module;activityLink introduced to establish a direct link to the corresponding regional supply of this product
- chromium oxide, flakes: 3.23e-8 kg; lognormal variance with pedigree 2.31, pedigree (1,1,5,1,1)
  EcoSpold01Location=RER
  Proxy for vanadium pentoxide V2O5 in SCR catalyst, uncertainty calculated from uncertainty in average DeNOx input, uncertainty in the share of thermal NOx, uncertainty of nitrogen content in average municipal waste and the unertainty in nitrogen content in *this* waste.
  properties: wet mass 1 kg, dry mass 1 kg
- municipal waste incineration facility: 2.5e-10 unit; lognormal variance with pedigree 0.04, pedigree (1,1,5,1,1)
  EcoSpold01Location=CH
  demands per kilogram waste. uncertainty is heeded in the module

## Emissions to nature
- BOD5, Biological Oxygen Demand [water, surface water]: 2.6e-5 kg; lognormal variance with pedigree 0.16, pedigree (1,1,5,1,1)
  uncertainty is calculated from uncertainties in waste composition and transfer coefficients in incinerator and landfills
- Magnesium [water, surface water]: 2.83e-7 kg; lognormal variance with pedigree 1.51, pedigree (1,1,5,1,1)
  (same comment as for BOD5, Biological Oxygen Demand)
- Hydrogen chloride [air, urban air close to ground]: 1.37e-8 kg; lognormal variance with pedigree 0.72, pedigree (1,1,5,1,1)
  uncertainty is calculated from uncertainties in waste composition and transfer coefficients in incinerator
- Nickel [air, urban air close to ground]: 3.49e-14 kg; lognormal variance with pedigree 1.73, pedigree (1,1,5,1,1)
  (same comment as for Hydrogen chloride)
- Zinc, ion [water, ground-, long-term]: 4.48e-6 kg; lognormal variance with pedigree 5.48, pedigree (1,1,5,1,1)
  Long-term emissions from landfilling of incineration residues. uncertainty is calculated from uncertainties in waste composition and transfer coefficients in incinerator and landfills.
- TOC, Total Organic Carbon [water, surface water]: 1.9e-5 kg; lognormal variance with pedigree 0.27, pedigree (1,1,5,1,1)
  (same comment as for BOD5, Biological Oxygen Demand)
- Titanium [air, urban air close to ground]: 8.1e-7 kg; lognormal variance with pedigree 0.75, pedigree (1,1,5,1,1)
  (same comment as for Hydrogen chloride)
- Sodium, ion [water, surface water]: 0.000257 kg; lognormal variance with pedigree 0.37, pedigree (1,1,5,1,1)
  (same comment as for BOD5, Biological Oxygen Demand)
- Nickel, ion [water, ground-, long-term]: 7.58e-7 kg; lognormal variance with pedigree 1.58, pedigree (1,1,5,1,1)
  (same comment as for Zinc, ion)
- Zinc [air, urban air close to ground]: 4.72e-9 kg; lognormal variance with pedigree 0.91, pedigree (1,1,5,1,1)
  (same comment as for Hydrogen chloride)
- Chromium, ion [water, surface water]: 3.35e-8 kg; lognormal variance with pedigree 1.32, pedigree (1,1,5,1,1)
  (same comment as for BOD5, Biological Oxygen Demand)
- Cobalt [water, surface water]: 2.42e-10 kg; lognormal variance with pedigree 1.99, pedigree (1,1,5,1,1)
  (same comment as for BOD5, Biological Oxygen Demand)
- Lead [water, ground-, long-term]: 1.36e-6 kg; lognormal variance with pedigree 7.26, pedigree (1,1,5,1,1)
  (same comment as for Zinc, ion)
- COD, Chemical Oxygen Demand [water, surface water]: 4.64e-5 kg; lognormal variance with pedigree 0.28, pedigree (1,1,5,1,1)
  (same comment as for BOD5, Biological Oxygen Demand)
- BOD5, Biological Oxygen Demand [water, ground-, long-term]: 0.0056 kg; lognormal variance with pedigree 0.05, pedigree (1,1,5,1,1)
  (same comment as for Zinc, ion)
- Selenium [water, ground-, long-term]: 1.14e-6 kg; lognormal variance with pedigree 1.05, pedigree (1,1,5,1,1)
  (same comment as for Zinc, ion)
- Mercury [water, ground-, long-term]: 2.11e-9 kg; lognormal variance with pedigree 3.69, pedigree (1,1,5,1,1)
  (same comment as for Zinc, ion)
- Bromine [water, surface water]: 6.67e-6 kg; lognormal variance with pedigree 1.14, pedigree (1,1,5,1,1)
  (same comment as for BOD5, Biological Oxygen Demand)
- Iron [air, urban air close to ground]: 4.33e-8 kg; lognormal variance with pedigree 0.71, pedigree (1,1,5,1,1)
  (same comment as for Hydrogen chloride)
- Barium [air, urban air close to ground]: 2.02e-7 kg; lognormal variance with pedigree 0.93, pedigree (1,1,5,1,1)
  (same comment as for Hydrogen chloride)
- Fluoride [water, surface water]: 9.34e-7 kg; lognormal variance with pedigree 0.93, pedigree (1,1,5,1,1)
  (same comment as for BOD5, Biological Oxygen Demand)
- Magnesium [water, ground-, long-term]: 7.47e-5 kg; lognormal variance with pedigree 1.01, pedigree (1,1,5,1,1)
  (same comment as for Zinc, ion)
- Barium [water, surface water]: 2.78e-8 kg; lognormal variance with pedigree 1.79, pedigree (1,1,5,1,1)
  (same comment as for BOD5, Biological Oxygen Demand)
- Selenium [water, surface water]: 5.54e-7 kg; lognormal variance with pedigree 1.23, pedigree (1,1,5,1,1)
  (same comment as for BOD5, Biological Oxygen Demand)
- Sodium, ion [water, ground-, long-term]: 0.000919 kg; lognormal variance with pedigree 0.45, pedigree (1,1,5,1,1)
  (same comment as for Zinc, ion)
- Cadmium [air, urban air close to ground]: 1.58e-9 kg; lognormal variance with pedigree 1.2, pedigree (1,1,5,1,1)
  (same comment as for Hydrogen chloride)
- Chloride [water, ground-, long-term]: 2.91e-5 kg; lognormal variance with pedigree 0.33, pedigree (1,1,5,1,1)
  (same comment as for Zinc, ion)
- Nitrate [water, surface water]: 1.4e-5 kg; lognormal variance with pedigree 0.49, pedigree (1,1,5,1,1)
  (same comment as for BOD5, Biological Oxygen Demand)
- Vanadium, ion [water, ground-, long-term]: 0.000319 kg; lognormal variance with pedigree 1.38, pedigree (1,1,5,1,1)
  (same comment as for Zinc, ion)
- Cobalt [water, ground-, long-term]: 1.24e-6 kg; lognormal variance with pedigree 1.51, pedigree (1,1,5,1,1)
  (same comment as for Zinc, ion)
- Titanium, ion [water, surface water]: 3.9e-9 kg; lognormal variance with pedigree 2.08, pedigree (1,1,5,1,1)
  (same comment as for BOD5, Biological Oxygen Demand)
- Carbon monoxide, fossil [air, urban air close to ground]: 0.000223 kg; lognormal variance with pedigree 0.690625, pedigree (1,3,5,2,1)
  Literature data from switzerland and germany adapted to plant age distribution in switzerland
  Uncertainty: & basic uncertainty of 5; literature data from switzerland and germany adapted to plant age distribution in switzerland
- Aluminium [air, urban air close to ground]: 2.53e-7 kg; lognormal variance with pedigree 0.95, pedigree (1,1,5,1,1)
  (same comment as for Hydrogen chloride)
- Aluminium [water, ground-, long-term]: 0.00012 kg; lognormal variance with pedigree 0.88, pedigree (1,1,5,1,1)
  (same comment as for Zinc, ion)
- Cobalt [air, urban air close to ground]: 4.5e-14 kg; lognormal variance with pedigree 1.66, pedigree (1,1,5,1,1)
  (same comment as for Hydrogen chloride)
- Manganese [water, surface water]: 1.42e-9 kg; lognormal variance with pedigree 1.94, pedigree (1,1,5,1,1)
  (same comment as for BOD5, Biological Oxygen Demand)
- Selenium [air, urban air close to ground]: 8.55e-15 kg; lognormal variance with pedigree 1.66, pedigree (1,1,5,1,1)
  (same comment as for Hydrogen chloride)
- Arsenic, ion [water, ground-, long-term]: 8.45e-7 kg; lognormal variance with pedigree 1.55, pedigree (1,1,5,1,1)
  (same comment as for Zinc, ion)
- Ammonia [air, urban air close to ground]: 8.68e-7 kg; lognormal variance with pedigree 1.71, pedigree (1,1,5,1,1)
  uncertainty calculated from uncertainty in average N-emissions, uncertainty in the share of thermal NOx, uncertainty of nitrogen content in average municipal waste and the unertainty in nitrogen content in *this* waste.
- Copper [air, urban air close to ground]: 2.58e-10 kg; lognormal variance with pedigree 1.2, pedigree (1,1,5,1,1)
  (same comment as for Hydrogen chloride)
- Bromine [air, urban air close to ground]: 2.43e-8 kg; lognormal variance with pedigree 1.35, pedigree (1,1,5,1,1)
  (same comment as for Hydrogen chloride)
- Antimony [water, ground-, long-term]: 5.43e-6 kg; lognormal variance with pedigree 1.1, pedigree (1,1,5,1,1)
  (same comment as for Zinc, ion)
- Mercury [water, surface water]: 4.33e-10 kg; lognormal variance with pedigree 1.93, pedigree (1,1,5,1,1)
  (same comment as for BOD5, Biological Oxygen Demand)
- Methane, fossil [air, urban air close to ground]: 6.38e-6 kg; lognormal variance with pedigree 0.091225, pedigree (2,3,5,2,1)
  Confidential data from 5 plants in Switzerland and Germany
  Uncertainty: & basic uncertainty of 1.5; confidential data from 5 plants in Switzerland and Germany
- Thallium [water, surface water]: 1.98e-10 kg; lognormal variance with pedigree 1.93, pedigree (1,1,5,1,1)
  (same comment as for BOD5, Biological Oxygen Demand)
- Mercury [air, urban air close to ground]: 1.4e-15 kg; lognormal variance with pedigree 2.06, pedigree (1,1,5,1,1)
  (same comment as for Hydrogen chloride)
- Copper, ion [water, surface water]: 1.42e-9 kg; lognormal variance with pedigree 1.75, pedigree (1,1,5,1,1)
  (same comment as for BOD5, Biological Oxygen Demand)
- Manganese [air, urban air close to ground]: 1.38e-13 kg; lognormal variance with pedigree 1.31, pedigree (1,1,5,1,1)
  (same comment as for Hydrogen chloride)
- Manganese [water, ground-, long-term]: 2.18e-5 kg; lognormal variance with pedigree 1.27, pedigree (1,1,5,1,1)
  (same comment as for Zinc, ion)
- Calcium, ion [water, surface water]: 8.26e-6 kg; lognormal variance with pedigree 1.05, pedigree (1,1,5,1,1)
  (same comment as for BOD5, Biological Oxygen Demand)
- TOC, Total Organic Carbon [water, ground-, long-term]: 0.00678 kg; lognormal variance with pedigree 0.05, pedigree (1,1,5,1,1)
  (same comment as for Zinc, ion)
- Titanium, ion [water, ground-, long-term]: 0.000243 kg; lognormal variance with pedigree 1.09, pedigree (1,1,5,1,1)
  (same comment as for Zinc, ion)
- Cadmium, ion [water, ground-, long-term]: 2.88e-7 kg; lognormal variance with pedigree 6.96, pedigree (1,1,5,1,1)
  (same comment as for Zinc, ion)
- Beryllium [water, ground-, long-term]: 3.26e-7 kg; lognormal variance with pedigree 1.5, pedigree (1,1,5,1,1)
  (same comment as for Zinc, ion)
- Tin, ion [water, ground-, long-term]: 1.62e-6 kg; lognormal variance with pedigree 1.79, pedigree (1,1,5,1,1)
  (same comment as for Zinc, ion)
- Beryllium [air, urban air close to ground]: 4.05e-10 kg; lognormal variance with pedigree 1.74, pedigree (1,1,5,1,1)
  (same comment as for Hydrogen chloride)
- Cadmium, ion [water, surface water]: 1.3e-8 kg; lognormal variance with pedigree 1.14, pedigree (1,1,5,1,1)
  (same comment as for BOD5, Biological Oxygen Demand)
- Arsenic [air, urban air close to ground]: 1.57e-14 kg; lognormal variance with pedigree 1.66, pedigree (1,1,5,1,1)
  (same comment as for Hydrogen chloride)
- Beryllium [water, surface water]: 2.52e-10 kg; lognormal variance with pedigree 1.96, pedigree (1,1,5,1,1)
  (same comment as for BOD5, Biological Oxygen Demand)
- Strontium [water, ground-, long-term]: 7.16e-5 kg; lognormal variance with pedigree 1.05, pedigree (1,1,5,1,1)
  (same comment as for Zinc, ion)
- DOC, Dissolved Organic Carbon [water, surface water]: 1.9e-5 kg; lognormal variance with pedigree 0.27, pedigree (1,1,5,1,1)
  (same comment as for BOD5, Biological Oxygen Demand)
- Barium [water, ground-, long-term]: 0.00018 kg; lognormal variance with pedigree 0.96, pedigree (1,1,5,1,1)
  (same comment as for Zinc, ion)
- Hydrogen fluoride [air, urban air close to ground]: 6.39e-9 kg; lognormal variance with pedigree 1.31, pedigree (1,1,5,1,1)
  (same comment as for Hydrogen chloride)
- Magnesium [air, urban air close to ground]: 1.11e-7 kg; lognormal variance with pedigree 1.05, pedigree (1,1,5,1,1)
  (same comment as for Hydrogen chloride)
- Lead [water, surface water]: 5.31e-10 kg; lognormal variance with pedigree 1.22, pedigree (1,1,5,1,1)
  (same comment as for BOD5, Biological Oxygen Demand)
- Sulfate [water, surface water]: 0.000175 kg; lognormal variance with pedigree 0.41, pedigree (1,1,5,1,1)
  (same comment as for BOD5, Biological Oxygen Demand)
- Vanadium, ion [water, surface water]: 1.26e-6 kg; lognormal variance with pedigree 0.88, pedigree (1,1,5,1,1)
  (same comment as for BOD5, Biological Oxygen Demand)
- Copper, ion [water, ground-, long-term]: 2.82e-5 kg; lognormal variance with pedigree 1.11, pedigree (1,1,5,1,1)
  (same comment as for Zinc, ion)
- Nitrogen oxides [air, urban air close to ground]: 3.48e-5 kg; lognormal variance with pedigree 1.71, pedigree (1,1,5,1,1)
  (same comment as for Ammonia)
- Antimony [water, surface water]: 2.95e-6 kg; lognormal variance with pedigree 1.13, pedigree (1,1,5,1,1)
  (same comment as for BOD5, Biological Oxygen Demand)
- Arsenic, ion [water, surface water]: 6.94e-7 kg; lognormal variance with pedigree 1.31, pedigree (1,1,5,1,1)
  (same comment as for BOD5, Biological Oxygen Demand)
- Nitrate [water, ground-, long-term]: 3.93e-5 kg; lognormal variance with pedigree 0.7, pedigree (1,1,5,1,1)
  (same comment as for Zinc, ion)
- Iron, ion [water, ground-, long-term]: 0.000607 kg; lognormal variance with pedigree 1.42, pedigree (1,1,5,1,1)
  (same comment as for Zinc, ion)
- Lead [air, urban air close to ground]: 7.08e-10 kg; lognormal variance with pedigree 1.26, pedigree (1,1,5,1,1)
  (same comment as for Hydrogen chloride)
- Chromium VI [water, surface water]: 3.43e-7 kg; lognormal variance with pedigree 1.22, pedigree (1,1,5,1,1)
  (same comment as for BOD5, Biological Oxygen Demand)
- Sulfur dioxide [air, urban air close to ground]: 1.54e-6 kg; lognormal variance with pedigree 0.85, pedigree (1,1,5,1,1)
  (same comment as for Hydrogen chloride)
- Strontium [water, surface water]: 4.51e-8 kg; lognormal variance with pedigree 1.76, pedigree (1,1,5,1,1)
  (same comment as for BOD5, Biological Oxygen Demand)
- Thallium [water, ground-, long-term]: 1.89e-7 kg; lognormal variance with pedigree 1.33, pedigree (1,1,5,1,1)
  (same comment as for Zinc, ion)
- Sulfate [water, ground-, long-term]: 0.000904 kg; lognormal variance with pedigree 0.5, pedigree (1,1,5,1,1)
  (same comment as for Zinc, ion)
- Sodium [air, urban air close to ground]: 1.12e-5 kg; lognormal variance with pedigree 0.68, pedigree (1,1,5,1,1)
  (same comment as for Hydrogen chloride)
- Zinc, ion [water, surface water]: 5.31e-8 kg; lognormal variance with pedigree 0.77, pedigree (1,1,5,1,1)
  (same comment as for BOD5, Biological Oxygen Demand)
- Dinitrogen monoxide [air, urban air close to ground]: 4.63e-6 kg; lognormal variance with pedigree 1.71, pedigree (1,1,5,1,1)
  (same comment as for Ammonia)
- Aluminium [water, surface water]: 1.35e-8 kg; lognormal variance with pedigree 1.22, pedigree (1,1,5,1,1)
  (same comment as for BOD5, Biological Oxygen Demand)
- COD, Chemical Oxygen Demand [water, ground-, long-term]: 0.0171 kg; lognormal variance with pedigree 0.05, pedigree (1,1,5,1,1)
  (same comment as for Zinc, ion)
- Tin [air, urban air close to ground]: 4.27e-9 kg; lognormal variance with pedigree 1.48, pedigree (1,1,5,1,1)
  (same comment as for Hydrogen chloride)
- Tin, ion [water, surface water]: 1.19e-10 kg; lognormal variance with pedigree 1.51, pedigree (1,1,5,1,1)
  (same comment as for BOD5, Biological Oxygen Demand)
- Chloride [water, surface water]: 0.0012 kg; lognormal variance with pedigree 0.61, pedigree (1,1,5,1,1)
  (same comment as for BOD5, Biological Oxygen Demand)
- Fluoride [water, ground-, long-term]: 1.08e-5 kg; lognormal variance with pedigree 0.89, pedigree (1,1,5,1,1)
  (same comment as for Zinc, ion)
- Vanadium [air, urban air close to ground]: 1.86e-7 kg; lognormal variance with pedigree 0.66, pedigree (1,1,5,1,1)
  (same comment as for Hydrogen chloride)
- Bromine [water, ground-, long-term]: 1.42e-6 kg; lognormal variance with pedigree 1.34, pedigree (1,1,5,1,1)
  (same comment as for Zinc, ion)
- DOC, Dissolved Organic Carbon [water, ground-, long-term]: 0.00678 kg; lognormal variance with pedigree 0.05, pedigree (1,1,5,1,1)
  (same comment as for Zinc, ion)
- Nickel, ion [water, surface water]: 5.08e-10 kg; lognormal variance with pedigree 2.21, pedigree (1,1,5,1,1)
  (same comment as for BOD5, Biological Oxygen Demand)
- Strontium [air, urban air close to ground]: 7.17e-9 kg; lognormal variance with pedigree 1.08, pedigree (1,1,5,1,1)
  (same comment as for Hydrogen chloride)
- Iron, ion [water, surface water]: 4.43e-7 kg; lognormal variance with pedigree 0.65, pedigree (1,1,5,1,1)
  (same comment as for BOD5, Biological Oxygen Demand)
- Calcium, ion [water, ground-, long-term]: 0.0019 kg; lognormal variance with pedigree 0.58, pedigree (1,1,5,1,1)
  (same comment as for Zinc, ion)
- Antimony [air, urban air close to ground]: 3.31e-14 kg; lognormal variance with pedigree 1.46, pedigree (1,1,5,1,1)
  (same comment as for Hydrogen chloride)
- Chromium [air, urban air close to ground]: 7.78e-13 kg; lognormal variance with pedigree 1.39, pedigree (1,1,5,1,1)
  (same comment as for Hydrogen chloride)
- Cyanide [air, urban air close to ground]: 9.86e-7 kg; lognormal variance with pedigree 1.71, pedigree (1,1,5,1,1)
  (same comment as for Ammonia)
- Chromium VI [water, ground-, long-term]: 1.11e-6 kg; lognormal variance with pedigree 1.51, pedigree (1,1,5,1,1)
  (same comment as for Zinc, ion)
- Calcium [air, urban air close to ground]: 3.64e-6 kg; lognormal variance with pedigree 0.61, pedigree (1,1,5,1,1)
  (same comment as for Hydrogen chloride)
- Carbon dioxide, fossil [air, urban air close to ground]: 2.52 kg; lognormal variance with pedigree 0.04, pedigree (1,1,5,1,1)
  (same comment as for Hydrogen chloride)
- Thallium [air, urban air close to ground]: 3.24e-10 kg; lognormal variance with pedigree 1.77, pedigree (1,1,5,1,1)
  (same comment as for Hydrogen chloride)

## Sampling procedure
waste-specific calculation based on literature data

## Extrapolations
This dataset has been extrapolated from year 2000 to the year of the calculation (2021). The uncertainty has been adjusted accordingly.

## Review by Niels Jungbluth 2003-07-15
Passed. Calculation for standard deviation 95 of, i.e., infrastructure,
land occupation, transport services or other services can differ from
standard Pedigree approach used in this project and figures obtained by
this procedure.
