# potassium sulfate production

Dataset: EcoSpold 2, unit process
Geography: RoW
Time period: 1999-01-01 to 2021-12-31
Technology level: current
Classification: ISIC rev.4 ecoinvent: 2012:Manufacture of fertilizers and nitrogen compounds
Synonyms: 7778-80-5; Sulfuric acid potassium salt; potassium sulfate; Potassium sulphate; Dipotassium sulfate; Sulfuric acid dipotassium salt
Scenario: Business-as-Usual
System model: Allocation, cut-off by classification
Generated by: Angelika Heil
Published in: Nemecek, T. 2007
Database: ecoinvent
isCopyrightProtected: true
accessRestrictedTo: 1

## General comment
This dataset represents the production of 1 kg of potassium sulfate from potassium chloride and sulfuric acid. Potassium sulfate forms colorless, nonhygroscopic crystals. It is, after potassium chloride, the most important potassium-containing fertilizer, being used mainly for special crops. It constitutes about 5% of the world demand for potash fertilizers. Potassium sulfate is also used in industry for the production of other potassium compounds, accelerators for rapid-setting cements, synthetic rubbers, desensitizers for explosives, lubricants, powdered fire extinguishers, dyes, explosives, and pharmaceuticals.
This dataset is based on detailed literature studies and specifications from the manufacturer.
References:
Schultz, H., Bauer, G., Schachl, E., Hagedorn, F. and Schmittinger, P. 2000. Potassium Compounds. Ullmann's Encyclopedia of Industrial Chemistry.
Nemecek T., Kägi T. and Blaser S. (2007) Life Cycle Inventories of Agricultural Production Systems. Final report ecoinvent v2.0 No.15. Swiss Centre for Life Cycle Inventories, Dübendorf, CH.

## Included activities start
The activity starts when the raw materials enter the process.

## Included activities end
This activity ends with the production of potassium sulfate from potassium chloride and sulfuric acid. Production and waste treatment of catalysts, coating and packaging of the final fertiliser products were not included. Infrastructure was included by means of a proxy module.

## Geography
According to the reference used for this inventory, the European average is derived from mean values of several fertiliser plants within Europe. The production of raw materials and/or intermediates outside Europe was taken into account by considering the production technology in the respective country and the relative import shares. The inventory is assumed to be representative of the global production.

## Technology
The production inventory was derived from detailed literature studies and specifications from the manufacturer, relevant for the European production.

## Time period
Year when the main reference used for this inventory was published.

## Reference product
- potassium sulfate: 1 kg; name RP; By-product classification allocatable product; CPC 34632: Potassium sulphate (sulphate of potash); CAS 7778-80-5
  Potassium sulfate forms colorless, nonhygroscopic crystals. It is, after potassium chloride, the most important potassium-containing fertilizer, being used mainly for special crops. It constitutes about 5% of the world demand for potash fertilizers. Potassium sulfate is also used in industry for the production of other potassium compounds, accelerators for rapid-setting cements, synthetic rubbers, desensitizers for explosives, lubricants, powdered fire extinguishers, dyes, explosives, and pharmaceuticals.
  production volume 4.22912e9 kg; name RP_PV
    According to the OECD the worldwide production of potassium sulfate for 2006 was about 5.12 million tonnes.
    Reference(s):
    OECD. 2007. Screening Information Dataset, Initial Assessment Profile for SIAM 25. Retrieved from: http://webnet.oecd.org/hpv/ui/handler.axd?id=c5333e82-7c08-4417-b46f-41c52ee7851f, 15 June 2017.
  property price 0.188 EUR2005; name RP_price_EUR2005
    Temporary price data. Calculated as 90% of purchasers price based on: 2004 import price calulated from FAOSTAT (http://faostat.fao.org/site/575/DesktopDefault.aspx?PageID=575#ancor [accessed 2011.01.27] Potash Fertilizers (K20 total nutrients) in kUSD/Mg
  property oxygen content 0.367255
    Oxygen content (on a dry matter basis) of potassium sulfate is calculated from the molecular formula of the substance (K2O4S).
  property potassium content 0.448737
    Potassium content (on a dry matter basis) of potassium sulfate is calculated from the molecular formula of the substance (K2O4S).
  property carbon content, fossil 0
    Carbon content, fossil is calculated based on the chemical formula of the substance.
  property sulfur content 0.184008
    Sulfur content (on a dry matter basis) of potassium sulfate is calculated from the molecular formula of the substance (K2O4S).
  property carbon content 0
    carbon content on a dry matter basis (reserved; not for manual entry)
  properties: carbon content, non-fossil 0, water content 0, water in wet mass 0 kg, dry mass 1 kg, wet mass 1 kg, carbon allocation 0 kg

## Inputs from technosphere
- sulfuric acid: 0.610823 kg; lognormal variance with pedigree 0.0426, pedigree (2,1,5,5,1)
  The exchange was updated from 'potassium sulfate, as K2O' into 'potassium sulfate' and therefore its amount has been scaled (multiplied) from 0.6108 kg by 0.5405 kg of 'potassium sulfate' per kg of 'potassium sulfate, as K2O'. Original comment of the exchange: Source: Nemecek T., Kägi T. and Blaser S. (2007) Life Cycle Inventories of Agricultural Production Systems. Final report ecoinvent v2.0 No.15. Swiss Centre for Life Cycle Inventories, Dübendorf, CH. refering to Davis J, Haglund C (1999). Life Cycle Inventory (LCI) of Fertiliser Production - Fertiliser Products Used in Sweden and Western Europe.
  properties: wet mass 1 kg, dry mass 1 kg
- potassium chloride: 0.881306 kg; lognormal variance with pedigree 0.0426, pedigree (2,1,5,5,1)
  The exchange was updated from 'potassium sulfate, as K2O' into 'potassium sulfate' and therefore its amount has been scaled (multiplied) from 1.63049 kg by 0.5405 kg of 'potassium sulfate' per kg of 'potassium sulfate, as K2O'. The amount of 'potassium chloride' has been updated from ' potassium chloride, as K2O' into 'potassium chloride' and therefore its amount has been scaled (multiplied) from 1.03 kg by 1.583 kg of 'potassium chloride' per kg of 'potassium chloride, as K2O'. Original comment of the exchange is: Source: Nemecek T., Kägi T. and Blaser S. (2007) Life Cycle Inventories of Agricultural Production Systems. Final report ecoinvent v2.0 No.15. Swiss Centre for Life Cycle Inventories, Dübendorf, CH. refering to Davis J, Haglund C (1999). Life Cycle Inventory (LCI) of Fertiliser Production - Fertiliser Products Used in Sweden and Western Europe.
  properties: chlorine content 0.475552, dry mass 1 kg, wet mass 1 kg, potassium content 0.524448
  note on chlorine content: Chlorine content (on a dry matter basis) of potassium chloride is calculated from the molecular formula of the substance (KCl).
  note on potassium content: Potassium content (on a dry matter basis) of potassium chloride is calculated from the molecular formula of the substance (KCl).
- heat, district or industrial, other than natural gas: 0 MJ; pedigree (1,1,1,1,1)
  The exchange was updated from 'potassium sulfate, as K2O' into 'potassium sulfate' and therefore its amount has been scaled (multiplied) from 3.1136 kg by 0.5405 kg of 'potassium sulfate' per kg of 'potassium sulfate, as K2O'. Original comment of the exchange: Source: Nemecek T., Kägi T. and Blaser S. (2007) Life Cycle Inventories of Agricultural Production Systems. Final report ecoinvent v2.0 No.15. Swiss Centre for Life Cycle Inventories, Dübendorf, CH. refering to Davis J, Haglund C (1999). Life Cycle Inventory (LCI) of Fertiliser Production - Fertiliser Products Used in Sweden and Western Europe.
  properties: heating value, net 1 MJ
- chemical factory, organics: 8e-10 unit; lognormal variance with pedigree 0.3498, pedigree (2,3,5,4,3)
  Calculated based on literature data published by the industry. For this activity, no information was readily available concerning infrastructure and land-use. Therefore, the infrastructure is estimated based on data from two chemical factories, the BASF site of Ludwigshafen and the chemical factory in Gendorf (which are both located in Germany), which produce a wide range of chemical substances. Based on this data, the following assumptions are made: the built area amounts to about 4.2 ha, the plant has an average output of 50'000 t/a and a lifespan of fifty years. The estimated infrastructure amount is therefore 4.00 E-10 units per kg of produced chemical. Additional assumptions were made in the case of this dataset.
  References:
  Althaus H.-J., Chudacoff M., Hischier R., Jungbluth N., Osses M. and Primas A. (2007) Life Cycle Inventories of Chemicals. ecoinvent report No. 8, v2.0. EMPA Dübendorf, Swiss Centre for Life Cycle Inventories, Dübendorf, CH.
  Gendorf (2000) Umwelterklärung 2000, Werk Gendorf. Werk Gendorf, Burgkirchen.
- electricity, medium voltage: 0 kWh; pedigree (1,1,1,1,1)
  The exchange was updated from 'potassium sulfate, as K2O' into 'potassium sulfate' and therefore its amount has been scaled (multiplied) from 0.0659 kg by 0.5405 kg of 'potassium sulfate' per kg of 'potassium sulfate, as K2O'. Original comment of the exchange: Source: Nemecek T., Kägi T. and Blaser S. (2007) Life Cycle Inventories of Agricultural Production Systems. Final report ecoinvent v2.0 No.15. Swiss Centre for Life Cycle Inventories, Dübendorf, CH. refering to Davis J, Haglund C (1999). Life Cycle Inventory (LCI) of Fertiliser Production - Fertiliser Products Used in Sweden and Western Europe.
- heat, district or industrial, other than natural gas: 0.00126207, 3.11231 MJ (2 entries); lognormal variance with pedigree 0.0426, pedigree (2,1,5,5,1)
  (same comment as for heat, district or industrial, other than natural gas)
- electricity, medium voltage: 0.000831277, 0.000159403, 0.00267605, 0.0389207, 0.0054859, 0.0178739 kWh (6 entries); lognormal variance with pedigree 0.0426, pedigree (2,1,5,5,1)
  (same comment as for electricity, medium voltage)

## Emissions to nature
- Particulates, < 2.5 um [air, urban air close to ground]: 6.43256e-9 kg; lognormal variance with pedigree 0.3712, pedigree (2,3,5,5,3)
  The exchange was updated from 'potassium sulfate, as K2O' into 'potassium sulfate' and therefore its amount has been scaled (multiplied) from 0 kg by 0.5405 kg of 'potassium sulfate' per kg of 'potassium sulfate, as K2O'. Original comment of the exchange: Nemecek T., Kägi T. and Blaser S. (2007) Life Cycle Inventories of Agricultural Production Systems. Final report ecoinvent v2.0 No.15. Swiss Centre for Life Cycle Inventories, Dübendorf, CH.
- Particulates, > 10 um [air, urban air close to ground]: 2.03247e-8 kg; lognormal variance with pedigree 0.1112, pedigree (2,3,5,5,3)
  (same comment as for Particulates, < 2.5 um)
- Particulates, > 2.5 um, and < 10um [air, urban air close to ground]: 8.91909e-9 kg; lognormal variance with pedigree 0.1812, pedigree (2,3,5,5,3)
  (same comment as for Particulates, < 2.5 um)

## Sampling procedure
The values given in the reference originate from manufacturers and/or other data sources which in turn refer to the real situation and hence are considered reliable.

## Extrapolations
This dataset has been copied from an original dataset covering the geography RER. The uncertainty has been adjusted accordingly.
