# mustard production

Dataset: EcoSpold 2, unit process
Geography: IN
Time period: 2015-01-01 to 2021-12-31
Technology level: current
Classification: ISIC rev.4 ecoinvent: 0111:Growing of cereals (except rice), leguminous crops and oil seeds
Scenario: Business-as-Usual
System model: Allocation, cut-off by classification
Generated by: Sanjeevan Bajaj
Database: ecoinvent
isCopyrightProtected: true
accessRestrictedTo: 1

## General comment
This dataset represents the production of 1 kg of Mustard during October, 2016-March, 2017 at a farm located in village Balahri Kalan, District Fatehgarh Sahib of Punjab. In this area, fields are irrigated with ground water using electric pump for surface irrigation. The farm has a yield of 2,500 kg fresh matter per ha for this crop cycle. Sowing date for the crop is 19-October, 2016 and harvesting date is 15-March, 2017. Mineral NP fertilizer input is 148.75-86.25 kg/ha. Machinery is used only for soil cultivation with fuel consumption of 12.48 kg/ha using plough, planking and rotary cultivator for soil tillage

## Included activities start
This activity starts about six weeks after the harvest of the previous crop. The soil is prepared for cultivation in first week of October and sowing of seeds started about two weeks after soil preparation. Thereafter the crop is mature for harvesting in about 5 months.

## Included activities end
The activity ends with the harvesting of the mature mustard from the Mustard plant

## Technology
Cultivation of Mustard follows conventional production standards

## Time period
Soil cultivating date for the main crop: 05-October, 2016; Harvesting date main crop: 15-March, 2017. The soil cultivation, sowing and harvesting dates are taken as the middle date of the week or fortnight told to the data collector by the farmer. Total time from date of sowing to date of harvesting comes to 148 days. The data is collected for one crop cycle. The cycle of one year is considered for entry in ecoeditor.

## Reference product
- mustard: 1 kg; CPC 01442: Mustard seed; By-product classification allocatable product
  production volume 6.82e9 kg; = 6820*1000*1000
    http://agriexchange.apeda.gov.in/India%20Production/India_Productions.aspx?cat=Agri&hscode=1017 production volume is given in thousand tonnes
  property price 0.277065 EUR2005
    Literature value. Price from FAOSTAT data Producer Prices - Annual (retrieved from: http://www.fao.org/faostat/en/#data/PP, accessed 15Feb2018). Data from 2005.
  property carbon content, non-fossil 0.475
    Carbon content on a dry mass basis derived from faostat.
    Reference: http://www.fao.org/forestry/17111/en"
  property carbon content 0.475
    carbon content on a dry matter basis (reserved; not for manual entry)
  properties: water in wet mass 0.053 kg, dry mass 0.947 kg, carbon content, fossil 0, water content 0.0559662, wet mass 1 kg, carbon allocation 0.449825 kg

## Inputs from technosphere
- diesel, burned in agricultural machinery: 0.0763852 MJ; lognormal variance with pedigree 0.0034, pedigree (2,4,2,1,1)
  Planking.The data was collected for a hectare area through interview
- tillage, rotary cultivator: 0.000116834 ha; lognormal variance with pedigree 0.0034, pedigree (2,4,2,1,1)
  The data was collected for a hectare area through interview
- packaging, for fertilisers: 0.188 kg; lognormal variance with pedigree 0.0514, pedigree (4,3,2,5,4)
  Total amount of active substance/s of fertilisers needed for the production of 'mustard' is calculated to be circa 9.40E-02 kg. Fertiliser/s used in this dataset is/are: 'nitrogen fertiliser, as N', 'phosphate fertiliser, as P2O5', 'urea, as N'. The total amount of active substance/s is doubled in order to account for the packaging of the dilluted product of fertiliser/s that is/are applied. Therefore, 1.88E-01 kg of packaging for fertilisers is justified with this exchange.
  properties: dry mass 1 kg, wet mass 1 kg, carbon content, fossil 0.825301, price 0.0642 EUR2005, heating value, net 25.01 MJ
  note on carbon content, fossil: Considering a chemical formula (C2H4)n for polyethylene, carbon content-fossil is calculated to be 0.856286 kg of Carbon per kg of dry mass.
- rape seed, for sowing: 0.001 kg; lognormal variance with pedigree 0.0034, pedigree (2,4,2,1,1)
  The data was collected for a hectare area through interview
  properties: dry mass 0.94 kg, water content 0.0638298, wet mass 1 kg, carbon content, non-fossil 0.574
- inorganic phosphorus fertiliser, as P2O5: 0.0345 kg; lognormal variance with pedigree 0.0034, pedigree (2,4,2,1,1)
  The data was collected for a hectare area through interview
  properties: wet mass 1 kg, dry mass 1 kg
- irrigation: 0.126 m3; lognormal variance with pedigree 0.0034, pedigree (2,4,2,1,1)
  The data was collected for a hectare area through interview
  properties: water content 9089.91, wet mass 1000 kg, dry mass 0.11 kg
- land use change, annual crop: 2.7954e-5 ha
  Calculated Value. This value has been calculated by using the ecoinvent crop LCI calculation tool. The value is an approximation from rapeseed as no data for this crop and geography were available.
- inorganic nitrogen fertiliser, as N: 0.013685 kg; lognormal variance with pedigree 0.0034, pedigree (2,4,2,1,1)
  The data was collected for a hectare area through interview
  properties: dry mass 1 kg, wet mass 1 kg
- tillage, ploughing: 6.31172e-5 ha; lognormal variance with pedigree 0.0034, pedigree (2,4,2,1,1)
  The data was collected for a hectare area through interview
- urea: 0.0982182 kg; lognormal variance with pedigree 0.0034, pedigree (2,4,2,1,1)
  The exchange has been updated from 'urea, as N' into 'urea' and therefore its amount has been scaled (multiplied) from 0.0458 kg by 2.1438 kg of 'urea' per kg of 'urea, as N'. Original comment of the exchange is: The data was collected for a hectare area through interview
  properties: dry mass 1 kg, carbon content, fossil 0.2, wet mass 1 kg

## Inputs from nature
- Transformation, from annual crop, irrigated [natural resource, land]: 4 m2; lognormal variance with pedigree 0.0108, pedigree (2,4,2,1,1)
  Calculated Value. This value has been calculated by using the ecoinvent LCI calculation tool for crop production.
- Occupation, annual crop, irrigated [natural resource, land]: 1.83333 m2*year; lognormal variance with pedigree 0.0048, pedigree (2,4,2,1,1)
  (same comment as for Transformation, from annual crop, irrigated)
- Energy, gross calorific value, in biomass [natural resource, biotic]: 23.3024 MJ; lognormal variance with pedigree 0.0034, pedigree (2,4,2,1,1)
  The data was collected for a hectare area through interview
- Carbon dioxide, in air [natural resource, in air]: 1.51835 kg; lognormal variance with pedigree 0.0034, pedigree (2,4,2,1,1)
  (same comment as for Transformation, from annual crop, irrigated)
- Transformation, to annual crop, irrigated [natural resource, land]: 4 m2; lognormal variance with pedigree 0.0828, pedigree (2,4,2,1,1)
  (same comment as for Transformation, from annual crop, irrigated)

## Emissions to nature
- Water [water, ground-]: 0.04914 m3; lognormal variance with pedigree 0.0034, pedigree (2,4,2,1,1)
  (same comment as for Transformation, from annual crop, irrigated)
- Mercury [water, ground-]: 1.949e-10 kg; lognormal variance with pedigree 0.0928, pedigree (2,4,2,1,1)
  (same comment as for Transformation, from annual crop, irrigated)
- Zinc, ion [water, surface water]: 8.11374e-6 kg; lognormal variance with pedigree 0.0928, pedigree (2,4,2,1,1)
  (same comment as for Transformation, from annual crop, irrigated)
- Lead [water, ground-]: 3.91272e-8 kg; lognormal variance with pedigree 0.0928, pedigree (2,4,2,1,1)
  (same comment as for Transformation, from annual crop, irrigated)
- Mercury [water, surface water]: 1.48219e-8 kg; lognormal variance with pedigree 0.0928, pedigree (2,4,2,1,1)
  (same comment as for Transformation, from annual crop, irrigated)
- Nickel, ion [water, surface water]: 4.54226e-6 kg; lognormal variance with pedigree 0.0928, pedigree (2,4,2,1,1)
  (same comment as for Transformation, from annual crop, irrigated)
- Nickel [soil, agricultural]: -2.35743e-6 kg
  (same comment as for Transformation, from annual crop, irrigated)
- Copper, ion [water, ground-]: 6.06455e-7 kg; lognormal variance with pedigree 0.0928, pedigree (2,4,2,1,1)
  (same comment as for Transformation, from annual crop, irrigated)
- Zinc [soil, agricultural]: -1.91917e-5 kg
  (same comment as for Transformation, from annual crop, irrigated)
- Lead [water, surface water]: 1.72215e-6 kg; lognormal variance with pedigree 0.0928, pedigree (2,4,2,1,1)
  (same comment as for Transformation, from annual crop, irrigated)
- Mercury [soil, agricultural]: -1.70678e-8 kg
  (same comment as for Transformation, from annual crop, irrigated)
- Lead [soil, agricultural]: -1.56392e-6 kg
  (same comment as for Transformation, from annual crop, irrigated)
- Copper, ion [water, surface water]: 4.58566e-6 kg; lognormal variance with pedigree 0.0928, pedigree (2,4,2,1,1)
  (same comment as for Transformation, from annual crop, irrigated)
- Copper [soil, agricultural]: -6.44462e-6 kg
  (same comment as for Transformation, from annual crop, irrigated)
- Chromium [soil, agricultural]: 9.9548e-6 kg; lognormal variance with pedigree 0.0428, pedigree (2,4,2,1,1)
  (same comment as for Transformation, from annual crop, irrigated)
- Chromium, ion [water, surface water]: 5.7958e-6 kg; lognormal variance with pedigree 0.0928, pedigree (2,4,2,1,1)
  (same comment as for Transformation, from annual crop, irrigated)
- Dinitrogen monoxide [air, non-urban air or from high stacks]: 0.0015055 kg; lognormal variance with pedigree 0.0328, pedigree (2,4,2,1,1)
  (same comment as for Transformation, from annual crop, irrigated)
- Chromium, ion [water, ground-]: 3.76463e-6 kg; lognormal variance with pedigree 0.0928, pedigree (2,4,2,1,1)
  (same comment as for Transformation, from annual crop, irrigated)
- Carbon dioxide, fossil [air, non-urban air or from high stacks]: 0.0719759 kg; lognormal variance with pedigree 0.0034, pedigree (2,4,2,1,1)
  (same comment as for Transformation, from annual crop, irrigated)
- Phosphate [water, surface water]: 0.000119585 kg; lognormal variance with pedigree 0.0428, pedigree (2,4,2,1,1)
  (same comment as for Transformation, from annual crop, irrigated)
- Cadmium [soil, agricultural]: 1.5067e-6 kg; lognormal variance with pedigree 0.0428, pedigree (2,4,2,1,1)
  (same comment as for Transformation, from annual crop, irrigated)
- Phosphate [water, ground-]: 3.93494e-5 kg; lognormal variance with pedigree 0.0428, pedigree (2,4,2,1,1)
  (same comment as for Transformation, from annual crop, irrigated)
- Nitrogen oxides [air, non-urban air or from high stacks]: 0.00364903 kg; lognormal variance with pedigree 0.0428, pedigree (2,4,2,1,1)
  (same comment as for Transformation, from annual crop, irrigated)
- Cadmium, ion [water, surface water]: 5.55811e-8 kg; lognormal variance with pedigree 0.0928, pedigree (2,4,2,1,1)
  (same comment as for Transformation, from annual crop, irrigated)
- Water [air, non-urban air or from high stacks]: 0.06426 m3; lognormal variance with pedigree 0.0034, pedigree (2,4,2,1,1)
  (same comment as for Transformation, from annual crop, irrigated)
- Cadmium, ion [water, ground-]: 8.55018e-9 kg; lognormal variance with pedigree 0.0928, pedigree (2,4,2,1,1)
  (same comment as for Transformation, from annual crop, irrigated)
- Ammonia [air, non-urban air or from high stacks]: 0.0104394 kg; lognormal variance with pedigree 0.0108, pedigree (2,4,2,1,1)
  (same comment as for Transformation, from annual crop, irrigated)
- Phosphorus [water, surface water]: 0.00051014 kg; lognormal variance with pedigree 0.0428, pedigree (2,4,2,1,1)
  (same comment as for Transformation, from annual crop, irrigated)
- Zinc, ion [water, ground-]: 3.98605e-6 kg; lognormal variance with pedigree 0.0928, pedigree (2,4,2,1,1)
  (same comment as for Transformation, from annual crop, irrigated)
- Water [water, surface water]: 0.0126 m3; lognormal variance with pedigree 0.0034, pedigree (2,4,2,1,1)
  (same comment as for Transformation, from annual crop, irrigated)
- Nitrate [water, ground-]: 0.0462869 kg; lognormal variance with pedigree 0.0428, pedigree (2,4,2,1,1)
  (same comment as for Transformation, from annual crop, irrigated)

## Sampling procedure
The farmer was identified and contacted by agriculture science faculty familiar with the local farmers in the region. Data was collected directly from the farmer through semi-structured interview using a questionnaire based on the input requirements of the ecoinvent LCI calculation tool for crop production. The farmer does not maintain any written records and has provided the data from recent memory. In this region, typically farmers are unable to provide exact name of active ingredient in the pesticide they use and the same was noted from details given on the pesticide packet. Individual farmer is not able to calculate fuel consumption for his own farm alone and this information has been collected from farming community of the area

## Extrapolations
This dataset has been extrapolated from year 2018 to the year of the calculation (2021). The uncertainty has been adjusted accordingly.
