# photovoltaic laminate production, ribbon-Si

Dataset: EcoSpold 2, unit process
Geography: RoW
Time period: 2005-01-01 to 2021-12-31
Technology level: current
Classification: ISIC rev.4 ecoinvent: 2610:Manufacture of electronic components and boards
Classification: EcoSpold01Categories: photovoltaic/production of components
Synonyms: polycrystalline; silicon; multi-crystalline
Tags: ConvertedDataset
Scenario: Business-as-Usual
System model: Allocation, cut-off by classification
Share of production covered: 5 %
Generated by: Mariska J. de Wild-Scholten
Published in: Jungbluth, N. 2007
Database: ecoinvent
isCopyrightProtected: true
accessRestrictedTo: 1

## General comment
Unit process raw data for 1 m2 of PV panel. Investigated for the production of solar panels and laminates with 60 solar cells a 156*156cm2 with a capacity of 192 Wp. Cell size and amount and capacity might differ between different producers.
[This dataset was already contained in the ecoinvent database version 2. It was not individually updated during the transfer to ecoinvent version 3. Life Cycle Impact Assessment results may still have changed, as they are affected by changes in the supply chain, i.e. in other datasets. This dataset was generated following the ecoinvent quality guidelines for version 2. It may have been subject to central changes described in the ecoinvent version 3 change report (http://www.ecoinvent.org/database/ecoinvent-version-3/reports-of-changes/), and the results of the central updates were reviewed extensively. The changes added e.g. consistent water flows and other information throughout the database. The documentation of this dataset can be found in the ecoinvent reports of version 2, which are still available via the ecoinvent website. The change report linked above covers all central changes that were made during the conversion process.]

## Included activities end
Production of the cell matrix, cutting of foils and washing of glass, production of laminate, isolation. Disposal after end of life. Data for direct air and water emissions were not available. It can be expected that small amount of NMVOC will be emitted from the lamination process.

## Geography
Production plants in Western Europe.

## Technology
Modern production plant.

## Time period
Date of data investigation. Some older data from 2001.

## Parameters
- fraction, tap water, to air: 0.15 dimensionless; name fraction_TW_to_air; lognormal variance with pedigree 0.092025, pedigree (4,4,3,2,4)
- fraction, process water, to air: 0.15 dimensionless; name fraction_PW_to_air; lognormal variance with pedigree 0.092025, pedigree (4,4,3,2,4)

## Reference product
- photovoltaic laminate, ribbon-Si: 1 m2; By-product classification allocatable product; CPC 47150: Diodes, transistors and similar semi-conductor devices; photosensitive semi-conductor devices; light emitting […]
  EcoSpold01Location=RER
  production volume 365040 m2
    156*156cm2 with a capacity of 192 Wp (Tab 8.4, ecoinvent v2 report 6_XII). Total production worldwide of panels is 1500MW in 2005. Tab 12.6 (ecoinvent v2 report 6_XII) gives the share of the different types of photovoltaic cells, that was assumed as the share of the different panels. From information in ecoinvent v2 report 6_XII, laminate were treated as panels.
  property price 79.4758 EUR2005
    Calculated based on inputs: The price of the product has been calculated as a sum of the values of the material and energy inputs for this product. This value is therefore a rough estimation. It may underestimate the real price since there are additional expenses when producing any product. These expences can include for example labour costs, treatment of waste materials and profit for the producer. Please consider carefully whether this level of data quality is acceptable for your application.

## Inputs from technosphere
- lubricating oil: 0.0016069 kg; lognormal variance with pedigree 0.044, pedigree (1,4,5,5,1)
  EcoSpold01Location=RER
  GSS 2001, auxiliary material
  Uncertainty: GSS 2001, auxiliary material
  properties: dry mass 1 kg, wet mass 1 kg, heating value, net 40.2 MJ, carbon content, fossil 0.75
  note on heating value, net: Literature value, Source: IPCC 2006, 2006 IPCC Guidelines for National Greenhouse Gas Inventories, Prepared by the National Greenhouse Gas Inventories Programme, Eggleston H.S., Buendia L., Miwa K., Ngara T. and Tanabe K. (eds). Published: IGES, Japan
  note on carbon content, fossil: Lubricating oil is produced from diesel. C-content/dry mass of fats and oils considered 75%, from: ecoinvent v2.2 report, n 15a, pg 40
- municipal solid waste: 0 kg; pedigree (1,1,1,1,1)
  Alsema (personal communication) 2007, production waste
  EcoSpold01Location=CH
  Uncertainty: Alsema (personal communication) 2007, production waste
  production volume 0 kg
    Calculated from the production volume of photovoltaic laminate, ribbon-Si in proportion to the respective output amounts.
  properties: heating value, net 11.74 MJ, carbon content, fossil 0.171549, water content 0.297017, dry mass 0.771 kg, carbon content, non-fossil 0.261655, wet mass 1 kg
  note on heating value, net: Value taken from the general comment of the treatment dataset.
  note on carbon content, fossil: MSW composition in tab 4.1, ecoinvent v2.2 report 13_I. C content referred to 1 kg DM
- brazing solder, cadmium free: 0.0087647 kg; lognormal variance with pedigree 0.044, pedigree (1,4,5,5,1)
  De Wild 2007, Sn60Pb40 plating on tabbing material, Sn plating on interconnect/terminal ribbons
  EcoSpold01Location=RER
  Uncertainty: de Wild 2007, Sn60Pb40 plating on tabbing material, Sn plating on interconnect/terminal ribbons
  properties: wet mass 1 kg, dry mass 1 kg
- wire drawing, copper: 0.11269 kg; lognormal variance with pedigree 0.044, pedigree (1,4,5,5,1)
  Estimation for use of copper wires
  EcoSpold01Location=RER
  Uncertainty: estimation for use of copper wires
- waste plastic, mixture: 0 kg; pedigree (1,1,1,1,1)
  Calculation, including disposal of the panel after life time
  EcoSpold01Location=CH
  Uncertainty: Calculation, including disposal of the panel after life time
  production volume 0 kg
    (same comment as for municipal solid waste)
  properties: water content 0.180638, dry mass 0.847 kg, carbon content, fossil 0.747344, wet mass 1 kg, heating value, net 30.79 MJ
  note on carbon content, fossil: C content in 1 kg DM was calculated using data in Tab A.2, ecoinvent v2.2 report 13_I
- nickel, class 1: 0.00016277 kg; lognormal variance with pedigree 0.044, pedigree (1,4,5,5,1)
  De Wild 2007, plating on interconnect ribbons
  EcoSpold01Location=GLO
  Uncertainty: de Wild 2007, plating on interconnect ribbons
  properties: dry mass 1 kg, wet mass 1 kg
- 1-propanol: 0.0081386 kg; lognormal variance with pedigree 0.044, pedigree (1,4,5,5,1)
  De Wild 2007, soldering flux, 95% propanol
  EcoSpold01Location=RER
  Uncertainty: de Wild 2007, soldering flux, 95% propanol
  properties: carbon content, fossil 0.6, wet mass 1 kg, dry mass 1 kg, heating value, net 34.3 MJ
- ethylvinylacetate, foil: 1.0017 kg; lognormal variance with pedigree 0.044, pedigree (1,4,5,5,1)
  EcoSpold01Location=RER
  De Wild 2007, EVA consumption 0.96 kg/m2, 6% more than glass area
  Uncertainty: de Wild 2007, EVA consumption 0.96 kg/m2, 6% more than glass area
  properties: carbon content, fossil 0.79734, wet mass 1 kg, dry mass 1 kg, heating value, net 35.99 MJ
  note on carbon content, fossil: Ethylene vinyl acetate copolymer contains 20% of vinyl acetate (ecoinvent v2.2 report 11_II)
- waste polyvinylfluoride: -0.1104 kg; lognormal variance with pedigree 0.044, pedigree (1,4,5,5,1)
  EcoSpold01Location=CH
  Calculation, including disposal of the panel after life time
  Uncertainty: Calculation, including disposal of the panel after life time
  production volume 40300.4 kg
    (same comment as for municipal solid waste)
  properties: heating value, net 27.89 MJ, carbon content, fossil 0.571142, dry mass 0.998 kg, water content 0.00200401, wet mass 1 kg
- tempering, flat glass: 10.079 kg; lognormal variance with pedigree 0.044, pedigree (1,4,5,5,1)
  EcoSpold01Location=RER
  De Wild 2007
  Uncertainty: de Wild 2007
- polyethylene terephthalate, granulate, amorphous: 0.37297 kg; lognormal variance with pedigree 0.044, pedigree (1,4,5,5,1)
  De Wild 2007, back foil, for solar cell module, 350 micron thickness: 2x37 micron polyvinyl fluoride, 250 micron polyethylene terephthalate; 0.488 g/m2, 7% cutting loss
  EcoSpold01Location=RER
  Uncertainty: de Wild 2007, back foil, for solar cell module, 350 micron thickness: 2x37 micron polyvinyl fluoride, 250 micron polyethylene terephthalate; 0.488 g/m2, 7% cutting loss
  properties: heating value, net 22.95 MJ, carbon content, fossil 0.625, dry mass 1 kg, wet mass 1 kg
  note on carbon content, fossil: Polymer of the ethylen terephtalate monomer (C10H8O4)n (ecoinvent v2.2 report 11_II), MW=192 g/mol
- corrugated board box: 0 kg; pedigree (1,1,1,1,1)
  EcoSpold01Location=RER
  De Wild 2007, packaging estimation
  Uncertainty: de Wild 2007, packaging estimation
  properties: carbon content, non-fossil 0.432275, water content 0.0582011, carbon content, fossil 0.000656085, wet mass 1 kg, dry mass 0.945 kg, heating value, net 12.86 MJ
  note on carbon content, non-fossil: Biogenic C content was calculated after biogenic C contents of chemicals used in the production of board (Tab 10.15 & 10.16, ecoinvent v2.2 report 11_III, part 10).
  note on carbon content, fossil: Fossil C content was calculated after fossil C contents of chemicals used in the production of board (Tab 10-15 & 10.16 ecoinvent v2.2 report 11_III, part 10)
- waste mineral oil: -0.0016069 kg; lognormal variance with pedigree 0.044, pedigree (1,4,5,5,1)
  Calculation, oil used during production
  EcoSpold01Location=CH
  Uncertainty: Calculation, oil used during production
  production volume 586.583 kg
    (same comment as for municipal solid waste)
  properties: wet mass 1 kg, dry mass 0.9 kg, heating value, net 34.7 MJ, carbon content, fossil 0.864444, water content 0.111111
  note on carbon content, fossil: Tab A.6, ecoinvent v2.2 report 13_I. C content has been calculated after data in the tables, and then referred to 1 kg DM
- methanol: 0.0021556 kg; lognormal variance with pedigree 0.044, pedigree (1,4,5,5,1)
  EcoSpold01Location=CH
  GSS 2001, auxiliary material
  Uncertainty: GSS 2001, auxiliary material
  properties: carbon content, fossil 0.375, wet mass 1 kg, dry mass 1 kg, heating value, net 26.49 MJ
- silicone product: 0.12195 kg; lognormal variance with pedigree 0.044, pedigree (1,4,5,5,1)
  De Wild 2007, kit to attach frame and junction box and for diaphragm of laminator
  EcoSpold01Location=RER
  Uncertainty: de Wild 2007, kit to attach frame and junction box and for diaphragm of laminator
  properties: carbon content, fossil 0.324324, wet mass 1 kg, dry mass 1 kg, heating value, net 9.83 MJ
  note on carbon content, fossil: The term silicones is used for compounds in which silicon atoms are linked via oxygen atoms, each silicon atom bearing one or several organic groups. In industrially important silicones, these groups are usually methyl or phenyl (ecoinvent v2.2 report 8_part71 & Ullmann). The chemical formula was considered to be [Si(CH3)2O]n (Ullmann).
- photovoltaic cell, ribbon-Si: 0.93241 m2; lognormal variance with pedigree 0.044, pedigree (1,4,5,5,1)
  De Wild 2007, Estimation 60 cells a 1.56dm2 +2% cell loss
  EcoSpold01Location=RER
  Uncertainty: de Wild 2007, Estimation 60 cells a 1.56dm2 +2% cell loss
  properties: carbon content, fossil 0.0139333, dry mass 0.68 kg, wet mass 0.68 kg
  note on carbon content, fossil: C content was calculated as the addition of C content in the components
- glass fibre reinforced plastic, polyamide, injection moulded: 0.18781 kg; lognormal variance with pedigree 0.044, pedigree (1,4,5,5,1)
  De Wild 2007, polyphenylenoxid for junction box
  EcoSpold01Location=RER
  Uncertainty: de Wild 2007, polyphenylenoxid for junction box
  properties: carbon content, fossil 0.446018, wet mass 1 kg, dry mass 1 kg
  note on carbon content, fossil: Polyamide resin assimilate to Nylon 66 (ecoinvent v2.2 report 7_XIII). Nylon 66 is derived from hexamethylene diamine and adipic acid and has the following structure: -(HN-(CH2)6-NH-CO-(CH2)4-CO)n- (ecoinvent v2.2 report 11_II), C12H22N2O2. MW=226 g/mol. Here Nylon 66 is – mainly for improved stiffness and stability – modified with glass fibres. The glass fibre content in the product is assumed of 30%. (ecoinvent v2.2 report 11_II)
- wastewater, from residence: -0.021286 m3; lognormal variance with pedigree 0.044, pedigree (1,4,5,5,1)
  EcoSpold01Location=CH
  Calculation, water use
  Uncertainty: Calculation, water use
  production volume 7770.24 m3
    (same comment as for municipal solid waste)
  properties: carbon content, non-fossil 0.199421, wet mass 1000 kg, dry mass 0.337476 kg, water content 2962.17
  note on carbon content, non-fossil: 0.0673 kg TOC/m3 (Tab A.17, ecoinvent v2.2 report 13_I). TOC was considered as Total Carbon.
- copper, cathode: 0.11269 kg; lognormal variance with pedigree 0.044, pedigree (1,4,5,5,1)
  EcoSpold01Location=RER
  De Wild 2007, copper ribbons for cell interconnection
  Uncertainty: de Wild 2007, copper ribbons for cell interconnection
  properties: wet mass 1 kg, dry mass 1 kg
- acetone, liquid: 0.012959 kg; lognormal variance with pedigree 0.044, pedigree (1,4,5,5,1)
  De Wild 2007, cleaning fluid
  EcoSpold01Location=RER
  Uncertainty: de Wild 2007, cleaning fluid
  properties: dry mass 1 kg, wet mass 1 kg, heating value, net 31.32 MJ, carbon content, fossil 0.62069
- electricity, medium voltage: 0 kWh; pedigree (1,1,1,1,1)
  EcoSpold01Location=UCTE
  Calculated mean figure of 3 companies
  Uncertainty: calculated mean figure of 3 companies
- photovoltaic panel factory: 4e-6 unit; lognormal variance with pedigree 0.344, pedigree (1,4,5,5,1)
  EcoSpold01Location=GLO
  Literature
  Uncertainty: Literature
- tap water: 0 kg; name tap_water_input; pedigree (1,1,1,1,1)
  De Wild 2007, glass rinsing and general use
  EcoSpold01Location=RER
  Uncertainty: de Wild 2007, glass rinsing and general use
  properties: water content 2962.17, carbon content, fossil 0.00178991, wet mass 1 kg, dry mass 0.000337476 kg
  note on carbon content, fossil: Bicarbonate content is 2.93 mol/m3. CO2 content is 0.1 mol/m3 (ecoinvent v2.2 report 8, Tab 93.1).
- heat, district or industrial, natural gas: 0 MJ; pedigree (1,1,1,1,1)
  EcoSpold01Location=RER
  Calculated mean figure of 3 companies
  Uncertainty: calculated mean figure of 3 companies
  properties: heating value, net 1 MJ
- polyvinylfluoride, film: 0.1104 kg; lognormal variance with pedigree 0.044, pedigree (1,4,5,5,1)
  EcoSpold01Location=US
  De Wild 2007, back foil, for solar cell module, 350 micron thickness: 2x37 micron polyvinyl fluoride, 250 micron polyethylene terephthalate; 0.488 g/m2, 7% cutting loss
  Uncertainty: de Wild 2007, back foil, for solar cell module, 350 micron thickness: 2x37 micron polyvinyl fluoride, 250 micron polyethylene terephthalate; 0.488 g/m2, 7% cutting loss
  properties: heating value, net 23.7 MJ, carbon content, fossil 0.521739, wet mass 1 kg, dry mass 1 kg
- vinyl acetate: 0.0016434 kg; lognormal variance with pedigree 0.044, pedigree (1,4,5,5,1)
  GSS 2001, ethylacetat, auxiliary material
  EcoSpold01Location=RER
  Uncertainty: GSS 2001, ethylacetat, auxiliary material
  properties: carbon content, fossil 0.55814, dry mass 1 kg, wet mass 1 kg, heating value, net 25.35 MJ
  note on carbon content, fossil: Vinyl acetate (CH3CO2CH=CH2) (ecoinvent v2.2 report 11_II), C4H6O2. MW=86 g/mol
- solar glass, low-iron: 10.079 kg; lognormal variance with pedigree 0.062, pedigree (1,4,5,5,3)
  De Wild 2007, 4mm thickness (3.2-4 mm for different producers), 1% losses, density 2.5 g/cm3
  EcoSpold01Location=RER
  Uncertainty: de Wild 2007, 4mm thickness (3.2-4 mm for different producers), 1% losses, density 2.5 g/cm3
  properties: dry mass 1 kg, wet mass 1 kg
- municipal solid waste: -4.2322e-5, -1.06641e-5, -1.52396e-5, -0.0299318 kg (4 entries); lognormal variance with pedigree 0.044, pedigree (1,4,5,5,1)
  (same comment as for municipal solid waste)
  production volume 10951.2 kg
- waste plastic, mixture: -0.207204, -0.0138446, -0.00104704, -0.00571832, -0.00231013, -0.00543008, -1.45055 kg (7 entries); lognormal variance with pedigree 0.044, pedigree (1,4,5,5,1)
  (same comment as for waste plastic, mixture)
  production volume 615494 kg
- corrugated board box: 0.0127464, 1.08285 kg (2 entries); lognormal variance with pedigree 0.044, pedigree (1,4,5,5,1)
  (same comment as for corrugated board box)
- electricity, medium voltage: 0.0593793, 0.0113864, 0.191154, 2.78016, 0.391865, 1.27676 kWh (6 entries); lognormal variance with pedigree 0.0446, pedigree (3,3,5,5,1)
  (same comment as for electricity, medium voltage)
- tap water: 0.331338, 0.0398842, 0.0659152, 1.66212, 0.0432397, 0.122995, 19.0205 kg (7 entries); lognormal variance with pedigree 0.044, pedigree (1,4,5,5,1)
  (same comment as for tap water)
- heat, district or industrial, natural gas: 0.0738629, 4.79253 MJ (2 entries); lognormal variance with pedigree 0.0446, pedigree (3,3,5,5,1)
  (same comment as for heat, district or industrial, natural gas)

## Emissions to nature
- Water [air, unspecified]: 0.0031929 m3; name water_to_air_unspecified; lognormal variance with pedigree 0.0827, pedigree (2,2,5,5,1)
  Calculated value based on literature values and expert opinion. See comments in the parametres' comment field.
  property fraction, origin: fresh water 1; name fraction_origin_fresh_water
  property fraction, origin: unspecified 0; name fraction_origin_unspecified
  property fraction, origin: salt water 0; name fraction_origin_salt_water

## Sampling procedure
Environmental reports, direct contacts with factory representatives and publication of plant data.

## Extrapolations
Assumption for laminate production with data for panels. Materials for frames neglected. This dataset has been copied from an original dataset covering the geography RER. The uncertainty has been adjusted accordingly.

## Review by Roberto Dones 2007-08-23
Passed.
none
