# treatment of lead in car shredder residue, municipal incineration with fly ash extraction

Dataset: EcoSpold 2, unit process
Geography: CH
Time period: 2006-01-01 to 2021-12-31
Technology level: current
Classification: ISIC rev.4 ecoinvent: 3821:Treatment and disposal of non-hazardous waste
Synonyms: municipal waste incineration; Siedlungsabfallverbrennung; Kehrichtverbrennung
Scenario: Business-as-Usual
System model: Allocation, cut-off by classification
Share of production covered: 100 %
Generated by: Gabor Doka
Published in: Doka G. 2015
Database: ecoinvent
isCopyrightProtected: true
accessRestrictedTo: 1

## General comment
This dataset represents the activity of waste disposal of lead in car shredder residue in a municipal solid waste incinerator (MSWI) // Recommended use of this dataset: For disposal of rather fine or dusty lead, which goes to incineration as part of Automotive Shredder Residue (ASR). Due to fine grain size of the particles, 50% burnability is assumed, therefore not suited for less fine lead parts in waste. Pure, isolated lead fractions will not be disposed in incinerators, but rather go to recycling. // Inventoried waste contains 50% Pb in ASR burnable; 50% Pb in ASR inert; . // Waste composition (wet, in ppm): H2O n.a.; O n.a.; H n.a.; C n.a.; S n.a.; N n.a.; P n.a.; B n.a.; Cl n.a.; Br n.a.; F n.a.; I n.a.; Ag n.a.; As n.a.; Ba n.a.; Cd n.a.; Co n.a.; Cr n.a.; Cu n.a.; Hg n.a.; Mn n.a.; Mo n.a.; Ni n.a.; Pb 1000000; Sb n.a.; Se n.a.; Sn n.a.; V n.a.; Zn n.a.; Be n.a.; Sc n.a.; Sr n.a.; Ti n.a.; Tl n.a.; W n.a.; Si n.a.; Fe n.a.; Ca n.a.; Al n.a.; K n.a.; Mg n.a.; Na n.a.; // Share of carbon in waste that is biogenic 60.4%. // Share of metals in waste not oxidised and bulk-recyclable (exclude very small or thin parts) Iron: 0%; Alu: 0%; Copper: 0%. // Recovery of metal scrap from bottom ash to recycling: 0g iron scrap, 0g aluminium scrap, 0g copper scrap. From this waste, the FLUWA process in the technology mix recovers 0.00972kg (DM) of a hydroxide sludge to be recycled in zinc furnaces. // Ultimately one kg of this waste produces 1.171 kg of bottom ash (can include some washed ash) and 0.1504 kg of residues, which are landfilled (technology mix). Additional solidification of residues with 0.06014 kg of cement.Net energy production: 0MJ/kg electric energy and 0MJ/kg thermal energy. //

## Included activities start
waste incineration from waste reception gate and delivery into waste bunker at incinerator plant site (without transports to the incinerator)

## Included activities end
Waste-specific short-term emissions to water from leachate. Long-term emissions from landfill to ground water.

## Geography
Specific to the technology mix encountered in Switzerland in 2012.

## Technology
average Swiss MSWI plants in 2010 (grate incinerators) with electrostatic precipitator for fly ash (ESP), wet flue gas scrubber and 25% SNCR , 42.77% SCR-high dust , 32.68% SCR-low dust -DeNOx facilities and 0% without Denox (weighted according to mass of burnt waste, representing Swiss average). Efficiency of iron scrap separation from slag : 58%. Efficiency of non-ferrous scrap separation from slag : 31%. The technology mix for this dataset includes a filter ash treatment (FLUWA) of a share of 46.22%. Gross electric efficiency technology mix 15.84% and Gross thermal efficiency technology mix 28.51%

## Time period
Waste composition as given in literature reference, theoretical data or other source. Transfer coefficients for modern MSWI.

## Reference product
- lead in car shredder residue: -1 kg; CPC 39364: Waste and scrap of lead; By-product classification Waste; CAS 7439-92-1
  Main reference product of this activity (supply of disposal service).
  production volume 132850 kg
    based on corresponding global production volume of MSW fraction in conventional MSWI (wo fly ash extraction) and scaled down to annual Swiss incinerated MSW mass of 3.02 mio. tonnes.
  property price 0 EUR2005
    Waste products are assigned a price of zero as they are assumed to require further treatment.
  properties: lead content 1, wet mass 1 kg, dry mass 1 kg

## By-products
- metalliferous hydroxide sludge: 0 kg; By-product classification Recyclable; CPC 1429: Other non-ferrous metal ores and concentrates (other than uranium or thorium ores and concentrates); pedigree (1,1,1,1,1)
  Metalliferous hydroxide sludge from filter ash leaching (FLUWA).
  Uncertainty: uncertainty is calculated from uncertainties in waste composition and transfer coefficients to filter ash in incinerator and the uncertainty of the transfer coefficients of the FLUWA process.
  production volume 0 kg
    calculated in proportion to reference product waste input to incinerator
  property price 0.0042 EUR2005
    World market value of manure, deflated with barley world market price and consumer price index, based on [http://www.gov.pe.ca/photos/original/af_NM_manconv.pdf].
  property heating value, net 0 MJ
    Non combustible products are assumed to have an LHV equal to zero (0).
  properties: lead content 0.92831, wet mass 1 kg, water content 3, dry mass 0.25 kg, oxygen content 0.071688, water in wet mass 0.75 kg

## Inputs from technosphere
- chromium oxide, flakes: 3.2084e-8 kg; lognormal variance with pedigree 0.4953, pedigree (1,1,4,1,1)
  Input to DeNOx stage. Active component in SCR catalyst (vanadium pentoxide, V2O5), here approximated with the available chromium trioxide.
  Uncertainty: uncertainty calculated from uncertainty in average DeNOx input, uncertainty in the share of thermal NOx, uncertainty of nitrogen content in average municipal waste and the uncertainty in nitrogen content in *this* waste.
  properties: dry mass 1 kg, wet mass 1 kg
- iron (III) chloride, without water, in 40% solution state: 0.0049395 kg; lognormal variance with pedigree 0.021901, pedigree (1,1,4,1,1)
  Auxilliary inputs for the wastewater treatment stage of the incinerator plant.
  Uncertainty: uncertainty calculated from uncertainty in average FeCl3 input, of transfer coefficients in the incinerator, and the uncertainty of the waste composition of this waste
  properties: dry mass 1 kg, wet mass 1 kg
- titanium dioxide: 1.5721e-6 kg; lognormal variance with pedigree 0.4953, pedigree (1,1,4,1,1)
  Input to DeNOx stage (TiO2 catalyst carrier)
  Uncertainty: uncertainty calculated from uncertainty in average DeNOx input, uncertainty in the share of thermal NOx, uncertainty of nitrogen content in average municipal waste and the uncertainty in nitrogen content in *this* waste.
  properties: dry mass 1 kg, wet mass 1 kg
- process-specific burdens, residual material landfill: 0.29978 kg; lognormal variance with pedigree 0.00873344, pedigree (1,1,4,1,1)
  Mass-specific expenditures required for landfilling of incineration residues.;activityLink introduced to establish a direct link to the corresponding regional supply of this product
  Uncertainty: uncertainty is calculated from uncertainties in waste composition and transfer coefficients in incinerator
- hydrochloric acid, without water, in 30% solution state: 0.0042473 kg; lognormal variance with pedigree 0.00886514, pedigree (1,1,4,1,1)
  Auxilliary inputs for the wastewater treatment stage of the incinerator plant.
  Uncertainty: uncertainty calculated from uncertainty in average HCl input, of transfer coefficients in the incinerator, and the uncertainty of the waste composition of this waste
  properties: heating value, net 3.32 MJ, dry mass 1 kg, wet mass 1 kg
- heat, district or industrial, natural gas: 0.0046923 MJ; lognormal variance with pedigree 0.15042, pedigree (1,1,4,1,1)
  Input to DeNOx stage, to heat up flue gas in low-dust SCR.
  Uncertainty: uncertainty calculated from uncertainty in average DeNOx input, uncertainty in the share of thermal NOx, uncertainty of nitrogen content in average municipal waste and the uncertainty in nitrogen content in *this* waste.
  properties: heating value, net 1 MJ
- slag landfill: 2.081e-9 unit; lognormal variance with pedigree 0.0141403, pedigree (1,1,4,1,1)
  Landfill infrastructure required for landfilling of bottom ash.
  Uncertainty: uncertainty is calculated from uncertainties in waste composition and transfer coefficients in incinerator
- sodium hydroxide, without water, in 50% solution state: 0.0030642 kg; lognormal variance with pedigree 0.00887538, pedigree (1,1,4,1,1)
  Auxilliary inputs for the flue gas treatment stage of the incinerator plant, and partially in the filter ash treatment (FLUWA).
  Uncertainty: uncertainty calculated from uncertainty in average NaOH input, of transfer coefficients in the incinerator, and the uncertainty of the waste composition of this waste
  properties: wet mass 1 kg, dry mass 1 kg, heating value, net 3.03 MJ
- ammonia, anhydrous, liquid: 2.5093e-5 kg; lognormal variance with pedigree 0.15042, pedigree (1,1,4,1,1)
  Input to DeNOx stage (100% NH3).
  Uncertainty: uncertainty calculated from uncertainty in average DeNOx input, uncertainty in the share of thermal NOx, uncertainty of nitrogen content in average municipal waste and the uncertainty in nitrogen content in *this* waste.
  properties: wet mass 1 kg, dry mass 1 kg
- water, decarbonised: 1.1752 kg; lognormal variance with pedigree 0.021901, pedigree (1,1,4,1,1)
  Incinerator process water used in flue gas scrubber stage.
  Uncertainty: uncertainty calculated from uncertainty in average water input, and the uncertainty of the waste composition of this waste
  properties: wet mass 1 kg
- heat, for reuse in municipal waste incineration only: 0.034839 MJ; name E_th_prod_MSWI; lognormal variance with pedigree 0.00859512, pedigree (1,1,4,1,1)
  Net heat required to incinerate this waste (subsidiesed from high-calorific waste fractions).
  Uncertainty: uncertainty is calculated from uncertainties in waste composition and uncertainties in energy efficiency and the uncertainty in internal energy demand
- municipal waste incineration facility: 2.5e-10 unit
  Demands per kilogram waste.
- waste cement, hydrated: -0.15036 kg; lognormal variance with pedigree 0.0178175, pedigree (1,1,4,1,1)
  Hydrated cement output for solidification of landfilled residual material.
  Uncertainty: Uncertainty calculated from uncertainty of the waste composition of this waste and transfer coefficients in the incinerator and of the solidification recipe.
  production volume 19975 kg
    calculated in proportion to reference product waste input to incinerator
  properties: dry mass 1 kg, wet mass 1 kg
- electricity, for reuse in municipal waste incineration only: 0.03061 kWh; name E_el_prod_MSWI; lognormal variance with pedigree 0.00859512, pedigree (1,1,4,1,1)
  Net electricity required to incinerate this waste (subsidiesed from high-calorific waste fractions).
  Uncertainty: uncertainty is calculated from uncertainties in waste composition and uncertainties in energy efficiency and the uncertainty in internal energy demand
- transport, freight, lorry, unspecified: 0.056233 metric ton*km; lognormal variance with pedigree 0.0122766, pedigree (1,1,4,1,1)
  Transport services to transport incineration residues to landfills and filter ash to external treatments (FLUWA).
  Uncertainty: uncertainty calculated from uncertainty of the waste composition of this waste, uncertainty of transfer coefficients and the uncertainty in generic transportation distances
- cement, unspecified: 0.060143 kg; lognormal variance with pedigree 0.0178175, pedigree (1,1,4,1,1)
  Cement required for solidification of landfilled residual material.
  Uncertainty: Uncertainty calculated from uncertainty of the waste composition of this waste, of transfer coefficients in the incinerator and of the solidification recipe.
  properties: wet mass 1 kg, dry mass 1 kg
- residual material landfill: 6.2453e-10 unit; lognormal variance with pedigree 0.00873344, pedigree (1,1,4,1,1)
  Landfill infrastructure required for landfilling of incineration residues.
  Uncertainty: uncertainty is calculated from uncertainties in waste composition and transfer coefficients in incinerator
- hydrogen peroxide, without water, in 50% solution state: 0.010744 kg; lognormal variance with pedigree 0.00887538, pedigree (1,1,4,1,1)
  Auxilliary oxidising agent for filter ash treatment (FLUWA).
  Uncertainty: uncertainty calculated from uncertainty in of transfer coefficients in the incinerator, and the uncertainty of the waste composition of this waste
  properties: dry mass 1 kg, wet mass 1 kg, heating value, net 7.13 MJ
- chemical, inorganic: 9.9134e-5 kg; lognormal variance with pedigree 0.021901, pedigree (1,1,4,1,1)
  Auxilliary inputs for the wastewater treatment stage of the incinerator plant. Proxy for Polyelectrolyte.
  Uncertainty: uncertainty calculated from uncertainty in average Polyelectrolyte input, of transfer coefficients in the incinerator, and the uncertainty of the waste composition of this waste
  properties: carbon content, fossil 0.003, dry mass 1 kg, wet mass 1 kg
- process-specific burdens, slag landfill: 1.1706 kg; lognormal variance with pedigree 0.0141403, pedigree (1,1,4,1,1)
  Mass-specific expenditures required for landfilling of bottom ash.;activityLink introduced to establish a direct link to the corresponding regional supply of this product
  Uncertainty: uncertainty is calculated from uncertainties in waste composition and transfer coefficients in incinerator
- metalliferous hydroxide sludge: -0.038894 kg; lognormal variance with pedigree 0.0113861, pedigree (1,1,4,1,1)
  (same comment as for metalliferous hydroxide sludge)
  production volume 5167 kg
  properties: price 0.0042 EUR2005, lead content 0.92831, wet mass 1 kg, water content 3, dry mass 0.25 kg, oxygen content 0.071688

## Inputs from nature
- Oxygen [natural resource, in air]: 0.077221 kg; lognormal variance with pedigree 0.00800504, pedigree (1,1,4,1,1)
  Oxygen from ambient air needed to combust and oxidise this waste. Net demand, i.e. without O2 leaving the plant in flue gas uncombusted.
  Uncertainty: uncertainty is calculated from uncertainties in waste composition and transfer coefficients to flue gas and soild residues in incinerator

## Emissions to nature
- Copper, ion [water, surface water]: 4.0004e-11 kg; lognormal variance with pedigree 1.0221, pedigree (1,1,4,1,1)
  Emissions to water from waste composition and transfer coefficients in incinerator and landfills.
  Uncertainty: uncertainty is calculated from uncertainties in waste composition and transfer coefficients in incinerator and landfills
- Water [air, urban air close to ground]: 0.000673744 m3; lognormal variance with pedigree 0.17216, pedigree (1,1,4,1,1)
  Water vapour from waste humidity, hydrogen oxidation and part of the process water.
  Uncertainty: Uncertainty calculated from uncertainty in waste composition, process water input and the uncertainty of fraction to air.
- Dioxins, measured as 2,3,7,8-tetrachlorodibenzo-p-dioxin [air, urban air close to ground]: 9.8106e-14 kg; lognormal variance with pedigree 0.44513, pedigree (1,1,4,1,1)
  Incomplete combustion product emitted to air.
  Uncertainty: uncertainty calculated from uncertainty in average operation emissions, and the uncertainty of the flue gas volume from this waste.
- Chromium VI [water, ground-, long-term]: 3.7078e-7 kg; lognormal variance with pedigree 0.0146401, pedigree (1,1,4,1,1)
  Long-term emissions from landfilling of incineration residues.
  Uncertainty: uncertainty is calculated from uncertainties in waste composition and transfer coefficients in incinerator and landfills.
- Chromium VI [water, surface water]: 1.1738e-7 kg; lognormal variance with pedigree 0.1757, pedigree (1,1,4,1,1)
  (same comment as for Copper, ion)
- Particulates, > 2.5 um, and < 10um [air, urban air close to ground]: 2.9432e-8 kg; lognormal variance with pedigree 0.21815, pedigree (1,1,4,1,1)
  (same comment as for Dioxins, measured as 2,3,7,8-tetrachlorodibenzo-p-dioxin)
- Cobalt [water, ground-, long-term]: 4.8383e-8 kg; lognormal variance with pedigree 0.78792, pedigree (1,1,4,1,1)
  (same comment as for Chromium VI)
- Cobalt [water, surface water]: 8.0773e-11 kg; lognormal variance with pedigree 0.82494, pedigree (1,1,4,1,1)
  (same comment as for Copper, ion)
- Particulates, < 2.5 um [air, urban air close to ground]: 5.8569e-6 kg; lognormal variance with pedigree 0.44513, pedigree (1,1,4,1,1)
  (same comment as for Dioxins, measured as 2,3,7,8-tetrachlorodibenzo-p-dioxin)
- Cadmium, ion [water, ground-, long-term]: 8.3013e-11 kg; lognormal variance with pedigree 6.2392, pedigree (1,1,4,1,1)
  (same comment as for Chromium VI)
- Cadmium, ion [water, surface water]: 1.3859e-13 kg; lognormal variance with pedigree 1.2514, pedigree (1,1,4,1,1)
  (same comment as for Copper, ion)
- NMVOC, non-methane volatile organic compounds, unspecified origin [air, urban air close to ground]: 2.2325e-6 kg; lognormal variance with pedigree 0.106962, pedigree (1,1,4,1,1)
  (same comment as for Dioxins, measured as 2,3,7,8-tetrachlorodibenzo-p-dioxin)
- Arsenic, ion [water, ground-, long-term]: 0 kg; pedigree (1,1,1,1,1)
  (same comment as for Chromium VI)
- Arsenic, ion [water, surface water]: 5.6408e-7 kg
  Emissions to water from waste composition and transfer coefficients in incinerator and landfills.
- Lead [air, urban air close to ground]: 4.1193e-5 kg; lognormal variance with pedigree 0.047542, pedigree (1,1,4,1,1)
  Emission to air from waste composition and transfer coefficients.
  Uncertainty: uncertainty is calculated from uncertainties in waste composition and transfer coefficients in incinerator
- Aluminium [water, ground-, long-term]: 0.00055346 kg; lognormal variance with pedigree 0.37671, pedigree (1,1,4,1,1)
  (same comment as for Chromium VI)
- Aluminium [water, surface water]: 9.2398e-7 kg; lognormal variance with pedigree 0.7524, pedigree (1,1,4,1,1)
  (same comment as for Copper, ion)
- Ammonia [air, urban air close to ground]: 2.9502e-8 kg; lognormal variance with pedigree 0.19604, pedigree (1,1,4,1,1)
  Nitrogen species emitted to air after DeNOx stage.
  Uncertainty: uncertainty calculated from uncertainty in average N-emissions and uncertainty in the share of thermal NOx and the uncertainty in nitrogen content in *this* waste.
- Calcium, ion [water, ground-, long-term]: 0.002565 kg; lognormal variance with pedigree 1.4527, pedigree (1,1,4,1,1)
  (same comment as for Chromium VI)
- Calcium, ion [water, surface water]: 4.2822e-6 kg; lognormal variance with pedigree 0.90914, pedigree (1,1,4,1,1)
  (same comment as for Copper, ion)
- Water [water, surface water]: 0.000351519 m3; lognormal variance with pedigree 0.161, pedigree (1,1,4,1,1)
  Process water released to surface water.
  Uncertainty: uncertainty calculated from uncertainty in process water input and the uncertainty of fraction to surface water.
- Nitrogen oxides [air, urban air close to ground]: 9.3424e-6 kg; lognormal variance with pedigree 0.19604, pedigree (1,1,4,1,1)
  Sum of fuel-Nox and thermal-NOx emitted to air after DeNOx stage.
  Uncertainty: uncertainty calculated from uncertainty in average N-emissions and uncertainty in the share of thermal NOx and the uncertainty in nitrogen content in *this* waste.
- Iron, ion [water, ground-, long-term]: 6.933e-6 kg; lognormal variance with pedigree 7.0197, pedigree (1,1,4,1,1)
  (same comment as for Chromium VI)
- Iron, ion [water, surface water]: 1.1574e-8 kg; lognormal variance with pedigree 1.2913, pedigree (1,1,4,1,1)
  (same comment as for Copper, ion)
- Methane, fossil [air, urban air close to ground]: 2.9132e-7 kg; lognormal variance with pedigree 0.106962, pedigree (1,1,4,1,1)
  (same comment as for Dioxins, measured as 2,3,7,8-tetrachlorodibenzo-p-dioxin)
- Silicon [water, ground-, long-term]: 0.0061808 kg; lognormal variance with pedigree 0.00800076, pedigree (1,1,4,1,1)
  (same comment as for Chromium VI)
- Silicon [water, surface water]: 1.3932e-5 kg; lognormal variance with pedigree 0.55671, pedigree (1,1,4,1,1)
  (same comment as for Copper, ion)
- Methane, non-fossil [air, urban air close to ground]: 4.4452e-7 kg; lognormal variance with pedigree 0.106962, pedigree (1,1,4,1,1)
  (same comment as for Dioxins, measured as 2,3,7,8-tetrachlorodibenzo-p-dioxin)
- Thallium [water, ground-, long-term]: 1.1239e-8 kg; lognormal variance with pedigree 0.26601, pedigree (1,1,4,1,1)
  (same comment as for Chromium VI)
- Thallium [water, surface water]: 1.8762e-11 kg; lognormal variance with pedigree 0.72642, pedigree (1,1,4,1,1)
  (same comment as for Copper, ion)
- Carbon monoxide, fossil [air, urban air close to ground]: 3.3014e-5 kg; lognormal variance with pedigree 0.8481, pedigree (1,1,4,1,1)
  (same comment as for Dioxins, measured as 2,3,7,8-tetrachlorodibenzo-p-dioxin)
- Zinc, ion [water, ground-, long-term]: 3.3642e-8 kg; lognormal variance with pedigree 4.8518, pedigree (1,1,4,1,1)
  (same comment as for Chromium VI)
- Zinc, ion [water, surface water]: 5.6163e-11 kg; lognormal variance with pedigree 1.1735, pedigree (1,1,4,1,1)
  (same comment as for Copper, ion)
- Carbon monoxide, non-fossil [air, urban air close to ground]: 5.0376e-5 kg; lognormal variance with pedigree 0.8481, pedigree (1,1,4,1,1)
  (same comment as for Dioxins, measured as 2,3,7,8-tetrachlorodibenzo-p-dioxin)
- Vanadium, ion [water, ground-, long-term]: 2.8663e-6 kg; lognormal variance with pedigree 0.02524, pedigree (1,1,4,1,1)
  (same comment as for Chromium VI)
- Vanadium, ion [water, surface water]: 9.152e-9 kg; lognormal variance with pedigree 0.54562, pedigree (1,1,4,1,1)
  (same comment as for Copper, ion)
- Heat, waste [water, surface water]: 0.020506 MJ; lognormal variance with pedigree 0.00898726, pedigree (1,1,4,1,1)
  Waste heat generated from heating value of this waste plus any electricity required to process it.
  Uncertainty: uncertainty is calculated from uncertainties in waste composition and uncertainties in energy efficiency and the uncertainty in internal energy demand
- Heat, waste [air, urban air close to ground]: 0.089688 MJ; lognormal variance with pedigree 0.00898726, pedigree (1,1,4,1,1)
  (same comment as for Heat, waste)
- Tin, ion [water, ground-, long-term]: 4.0607e-9 kg; lognormal variance with pedigree 3.9403, pedigree (1,1,4,1,1)
  (same comment as for Chromium VI)
- Tin, ion [water, surface water]: 6.7791e-12 kg; lognormal variance with pedigree 1.1159, pedigree (1,1,4,1,1)
  (same comment as for Copper, ion)
- Benzo(a)pyrene [air, urban air close to ground]: 1.0917e-12 kg; lognormal variance with pedigree 0.44513, pedigree (1,1,4,1,1)
  (same comment as for Dioxins, measured as 2,3,7,8-tetrachlorodibenzo-p-dioxin)
- Antimony [water, ground-, long-term]: 9.1939e-9 kg; lognormal variance with pedigree 0.013413, pedigree (1,1,4,1,1)
  (same comment as for Chromium VI)
- Antimony [water, surface water]: 5.0087e-9 kg; lognormal variance with pedigree 0.037563, pedigree (1,1,4,1,1)
  (same comment as for Copper, ion)
- Phenol, pentachloro- [air, urban air close to ground]: 2.1363e-11 kg; lognormal variance with pedigree 0.106962, pedigree (1,1,4,1,1)
  (same comment as for Dioxins, measured as 2,3,7,8-tetrachlorodibenzo-p-dioxin)
- Lead [water, ground-, long-term]: 0.85204 kg; lognormal variance with pedigree 0.54136, pedigree (1,1,4,1,1)
  (same comment as for Chromium VI)
- Lead [water, surface water]: 4.3174e-5 kg; lognormal variance with pedigree 0.44882, pedigree (1,1,4,1,1)
  (same comment as for Copper, ion)
- Benzene, hexachloro- [air, urban air close to ground]: 1.0257e-10 kg; lognormal variance with pedigree 0.106962, pedigree (1,1,4,1,1)
  (same comment as for Dioxins, measured as 2,3,7,8-tetrachlorodibenzo-p-dioxin)
- Nickel, ion [water, ground-, long-term]: 5.5269e-7 kg; lognormal variance with pedigree 0.26601, pedigree (1,1,4,1,1)
  (same comment as for Chromium VI)
- Nickel, ion [water, surface water]: 9.2269e-10 kg; lognormal variance with pedigree 0.72642, pedigree (1,1,4,1,1)
  (same comment as for Copper, ion)
- Benzene, pentachloro- [air, urban air close to ground]: 2.5918e-10 kg; lognormal variance with pedigree 0.106962, pedigree (1,1,4,1,1)
  (same comment as for Dioxins, measured as 2,3,7,8-tetrachlorodibenzo-p-dioxin)
- Manganese [water, ground-, long-term]: 8.0857e-8 kg; lognormal variance with pedigree 5.7591, pedigree (1,1,4,1,1)
  (same comment as for Chromium VI)
- Manganese [water, surface water]: 1.3499e-10 kg; lognormal variance with pedigree 1.2256, pedigree (1,1,4,1,1)
  (same comment as for Copper, ion)
- Toluene [air, urban air close to ground]: 9.8113e-8 kg; lognormal variance with pedigree 0.106962, pedigree (1,1,4,1,1)
  (same comment as for Dioxins, measured as 2,3,7,8-tetrachlorodibenzo-p-dioxin)
- Mercury [water, ground-, long-term]: 7.2582e-11 kg; lognormal variance with pedigree 2.3387, pedigree (1,1,4,1,1)
  (same comment as for Chromium VI)
- Mercury [water, surface water]: 1.2117e-13 kg; lognormal variance with pedigree 0.9951, pedigree (1,1,4,1,1)
  (same comment as for Copper, ion)
- Benzene [air, urban air close to ground]: 4.9056e-8 kg; lognormal variance with pedigree 0.106962, pedigree (1,1,4,1,1)
  (same comment as for Dioxins, measured as 2,3,7,8-tetrachlorodibenzo-p-dioxin)
- Copper, ion [water, ground-, long-term]: 2.3963e-8 kg; lognormal variance with pedigree 2.6604, pedigree (1,1,4,1,1)
  (same comment as for Chromium VI)

## Extrapolations
This dataset has been extrapolated from year 2012 to the year of the calculation (2021). The uncertainty has been adjusted accordingly.
