# dioxane production

Dataset: EcoSpold 2, unit process
Geography: RER
Time period: 2003-01-01 to 2021-12-31
Technology level: current
Classification: EcoSpold01Categories: chemicals/organics
Classification: ISIC rev.4 ecoinvent: 2011:Manufacture of basic chemicals
Synonyms: dioxyethylene ether; diethylene oxide; p-dioxane; diethylene dioxide; 1,4-dioxacyclohexane; diethylene ether
Tags: ConvertedDataset
Scenario: Business-as-Usual
System model: Allocation, cut-off by classification
Share of production covered: 100 %
Generated by: Jürgen Sutter
Published in: Sutter, J. 2007
Database: ecoinvent
isCopyrightProtected: true
accessRestrictedTo: 1

## General comment
This data represents the production of 1 kg of pure 1,4-dioxane from diethylene glycol. For this data, the production of 1,4-dioxane is via the dehydration and ring closure of diethylene glycol. The raw materials are modelled with a stoichiometric calculation. Energy consumption is modelled with literature data. The emissions are estimated. Infrastructure is included with a default value.
[This dataset was already contained in the ecoinvent database version 2. It was not individually updated during the transfer to ecoinvent version 3. Life Cycle Impact Assessment results may still have changed, as they are affected by changes in the supply chain, i.e. in other datasets. This dataset was generated following the ecoinvent quality guidelines for version 2. It may have been subject to central changes described in the ecoinvent version 3 change report (http://www.ecoinvent.org/database/ecoinvent-version-3/reports-of-changes/), and the results of the central updates were reviewed extensively. The changes added e.g. consistent water flows and other information throughout the database. The documentation of this dataset can be found in the ecoinvent reports of version 2, which are still available via the ecoinvent website. The change report linked above covers all central changes that were made during the conversion process.]

## Included activities start
From reception of diethylene glycol at the factory gate.

## Included activities end
This activity ends with 1 kg of 1,4-dioxane, 100% at the factory gate. The dataset includes the input materials, energy uses, infrastructure and emissions.

## Geography
The inventory is modelled for Europe.

## Technology
1,4-Dioxane is manufactured commercially by the dehydration and ring closure of diethylene glycol. Concentrated sulfuric acid (ca. 5 %) is used as a catalyst. Operating conditions vary; temperatures range from 130 to 200 °C and pressures range from a slight pressure to a partial vacuum (25 –110 kPa). A favorable temperature is reported to be 160 °C. The process is continuous, with 1,4-dioxane vaporized from the reaction vessel. The vapors are passed through an acid trap and two distillation columns to remove water and to purify the product. Yields of ca. 90 % are possible. 2-Methyl-1,3-dioxolane, acetaldehyde, crotonaldehyde, and polyglycol are unwanted byproducts.
References:
Surprenant, K.: Dioxane. In: Ullmann's Encyclopedia of Industrial Chemistry, Seventh Edition, 2004 Electronic Release (ed. Fiedler E., Grossmann G., Kersebohm D., Weiss G. and Witte C.). 7th Electronic Release Edition. Wiley InterScience, New York, Online-Version under: http://www.mrw.interscience.wiley.com/ueic/articles/a01_045/

## Time period
Time of publications

## Parameters
- fraction, cooling water, to air: 0.3875 dimensionless; name fraction_CW_to_air; = (0.5*fraction_CW_OT_to_air)+(0.5*fraction_CW_R_to_air); lognormal variance with pedigree 0.092025, pedigree (4,4,3,2,4)
  Calculated value based on literature value (see comments of the other parametres present in this dataset) and expert opinion. In the case when no industry/literature data are available about the type of cooling or directly fraction, cooling water, to air specific for the process a default assumption is applied. It is assumed that the once-through cooling system is used in 50% of all cases and recirculating system is used in another 50% of all cases.
- fraction, cooling water, once-through system, to air: 0.004 dimensionless; name fraction_CW_OT_to_air; lognormal variance with pedigree 0.0413, pedigree (2,3,1,3,1)
  Calculated based on literature value (Scown, C.D., 2011, Water Footprint of U.S. Transportation Fuels and supplying information of the article) (Vionnet, S., Quantis Water Database - Technical Report, 2012).
- fraction, cooling water, recirculating system, to air: 0.771 dimensionless; name fraction_CW_R_to_air; lognormal variance with pedigree 0.0413, pedigree (2,3,1,3,1)
  (same comment as for fraction, cooling water, once-through system, to air)
- fraction, cooling water, cooling pond system, to air: 0.032 dimensionless; name fraction_CW_CP_to_air; lognormal variance with pedigree 0.0413, pedigree (2,3,1,3,1)
  (same comment as for fraction, cooling water, once-through system, to air)

## Reference product
- dioxane: 1 kg; source Surprenant, K. 2004; CPC 34170: Ethers, alcohol peroxides, ether peroxides, epoxides, acetals and hemiacetals, and their halogenated, sulphona[…]; By-product classification allocatable product; CAS 123-91-1
  1,4-Dioxane is a strong solvent that is capable of dissolving most organic compounds, water in all proportions and many inorganic compounds. At ambient temperature, 1,4-dioxane is a clear liquid with an ether-like odor. Its relative stability is similar to other aliphatic ethers, and it forms peroxides if upon exposure to air.
  The largest single use of 1,4-dioxane is the stabilization of 1,1,1-trichloroethane against chemical attack by aluminum. The aluminum oxide film prevents the metal from reacting with 1,1,1- trichloroethane until the film is disturbed. When the bare metal contacts 1,1,1 trichloroethane, chlorine is extracted from the solvent to form AlCl3, which causes dehydrohalogenation of 1,1,1- trichloroethane to produce HCl and vinylidene chlorid (CH2 = CCl2). Dioxane is the foremost inhibitor of these reactions. An insoluble 1,4-dioxane-aluminum chloride complex is formed, which deactivates the catalyst and seals any openings in the Al2O3 film.
  Dioxane is used as a solvent in the formulation of inks, coatings, and adhesives, and as solvent for extracting animal and vegetable oils. As a chemical intermediate, 1,4 dioxane reaction products are useful as insecticides, herbicides, plasticizers, and monomers. The oxonium complexes of 1,4-dioxane with salts, mineral acids, halogens, and sulfur trioxide are used as catalysts and as reagents for anhydrous acid reactions, brominations, and sulfonations. In the laboratory, 1,4-dioxane is useful as a cryoscopic solvent for molecular mass determinations and as a stable reaction medium for diverse reactions. Historically, 1,4-dioxane is reported to be valuable in polymer manufacture and as a solvent for natural and synthetic resins, including cellulose derivatives, polyvinyl acetal resins, acrylonitrile - methyl vinyl pyridine copolymers, and others.
  EcoSpold01Location=RER
  production volume 1.32237 kg
    This is a placeholder value that does not reflect real-world production volumes. This dataset does not currently require a real-world production volume to work in the database framework, and no actual data were collected yet. This has no negative effect on the results of the ecoinvent database. The placeholder value of this activity was scaled according to the nominal GDP of 2005 (source: United Nations, http://data.un.org/Glossary.aspx?q=GDP+%28current+US%24%29, accessed 20130726) to reflect an appropriate share of the global production volume, which is also a placeholder value.
  property heating value, net 27.53 MJ
    LHV is calculated based on the elemental composition of the substance. Based on the CAS number of the substance (000123-91-1), the chemical formula of the substance is found to be: C4H8O2, (PubChem 2020).
    Reference: Kim, S., Chen, J., Cheng, T., Gindulyte, A., He, J., He, S., Li, Q., Shoemaker, B. A., Thiessen, P. A., Yu, B., Zaslavsky, L., Zhang, J., & Bolton, E. E. (2019). PubChem 2019 update: improved access to chemical data. Nucleic acids research, 47(D1), D1102–D1109. https://doi.org/10.1093/nar/gky1033
  property price 1.26062 EUR2005
    Calculated based on inputs: The price of the product has been calculated as a sum of the values of the material and energy inputs for this product. This value is therefore a rough estimation. It may underestimate the real price since there are additional expenses when producing any product. These expences can include for example labour costs, treatment of waste materials and profit for the producer. Please consider carefully whether this level of data quality is acceptable for your application.
  property carbon content 0.545455
    carbon content on a dry matter basis (reserved; not for manual entry)
  properties: water content 0, carbon content, non-fossil 0, water in wet mass 0 kg, carbon content, fossil 0.545455, wet mass 1 kg, dry mass 1 kg, carbon allocation 0.545455 kg

## Inputs from technosphere
- heat, district or industrial, other than natural gas: 6.41603 MJ; source Geisler, G. 2004; lognormal variance with pedigree 0.076, pedigree (4,5,5,1,1)
  Estimation.
  Uncertainty: Geisler 2004
  properties: heating value, net 1 MJ
- chemical factory, organics: 4e-10 unit; lognormal variance with pedigree 0.448, pedigree (4,5,5,5,5)
  Estimation. Infrastructure is estimated based on the dataset "chemical plant, organics". This dataset assumes a built area of about 4.2 ha, an average output of 50'000 t/a, and plant life of fifty years. The estimated value is 4.00 E-10 units per kg of produced chemical.
  EcoSpold01Location=RER
  Uncertainty: Estimation
- diethylene glycol: 1.3384 kg; source Surprenant, K. 2004; lognormal variance with pedigree 0.076, pedigree (4,5,5,1,1)
  EcoSpold01Location=RER
  Stoichiometric Calculation. Calculated assuming a yield of 90% for 1,4 dioxane.
  Uncertainty: Stoechiometric calculation
  properties: carbon content, fossil 0.45283, dry mass 1 kg, wet mass 1 kg, heating value, net 25.14 MJ
- nitrogen, liquid: 0.11125 kg; source Geisler, G. 2004; lognormal variance with pedigree 0.076, pedigree (4,5,5,1,1)
  EcoSpold01Location=RER
  Estimation.
  Uncertainty: Geisler 2004
  properties: dry mass 1 kg, wet mass 1 kg
- heat, district or industrial, natural gas: 11.495 MJ; source Geisler, G. 2004; lognormal variance with pedigree 0.076, pedigree (4,5,5,1,1)
  Estimation.
  Uncertainty: Geisler 2004
  properties: heating value, net 1 MJ
- electricity, medium voltage: 0.48321 kWh; source Geisler, G. 2004; lognormal variance with pedigree 0.076, pedigree (4,5,5,1,1)
  EcoSpold01Location=UCTE
  Estimation.
  Uncertainty: Geisler 2004

## Inputs from nature
- Water, cooling, unspecified natural origin [natural resource, in water]: 0.298 m3; name water_cooling_UNO_input; source Geisler, G. 2004; lognormal variance with pedigree 0.076, pedigree (4,5,5,1,1)
  Estimation.
  Uncertainty: Geisler 2004

## Emissions to nature
- DOC, Dissolved Organic Carbon [water, surface water]: 0.0055 kg; lognormal variance with pedigree 0.188, pedigree (4,5,5,5,5)
  Calculation. This data was calculated from the amount of diethylene glycol in the treated waste water assuming a carbon conversion of 96% for COD and the worst case scenario: TOC=DOC.
  It is assumed that the manufacturing plants are located in an urban/industrial area and consequently the emissions are categorized as emanating in a high population density area. The emissions into water are assumed to be emitted into rivers.
  Uncertainty: Calculated from the water emissions
- Water [air, unspecified]: 0.115475 m3; name water_to_air_unspecified; = (water_cooling_UNO_input*fraction_CW_to_air); lognormal variance with pedigree 0.0807, pedigree (2,2,5,1,1)
  Calculated value based on literature values and expert opinion. See comments in the parametres' comment field.
  property fraction, origin: salt water 0; name fraction_origin_salt_water
  property fraction, origin: unspecified 1; name fraction_origin_unspecified
  property fraction, origin: fresh water 0; name fraction_origin_fresh_water
- Diethylene glycol [air, urban air close to ground]: 0.013384 kg; lognormal variance with pedigree 0.218, pedigree (4,5,5,5,5)
  Estimation. The air emissions occurring from the purge vent, the distillation vent and fugitive emission sources were estimated to 1 % of the raw material input.
  It is assumed that the manufacturing plants are located in an urban/industrial area and consequently the emissions are categorized as emanating in a high population density area.
  Uncertainty: Estimation
- Carbon dioxide, fossil [air, urban air close to ground]: 0.18 kg; lognormal variance with pedigree 0.1786, pedigree (4,5,5,5,5)
  Estimation. The air emissions occurring from the purge vent, the distillation vent and fugitive emission sources were estimated to 1 % of the raw material input.
  The carbon contained in the removed diethylene glycol was accounted as CO2 emissions to air.
  It is assumed that the manufacturing plants are located in an urban/industrial area and consequently the emissions are categorized as emanating in a high population density area.
  Uncertainty: Calculated from the water treatment
- Diethylene glycol [water, surface water]: 0.012045 kg; lognormal variance with pedigree 0.218, pedigree (4,5,5,5,5)
  Estimation. The remaining amount of unreacted diethylene glycol (9% of the input) was assumed to leave the production process with the waste water.
  Further it was assumed that this waste water is treated in an internal waste water plant. The removal efficiency for diethylene glycol was assumed with 90%.
  It is assumed that the manufacturing plants are located in an urban/industrial area and consequently the emissions are categorized as emanating in a high population density area. The emissions into water are assumed to be emitted into rivers.
  Uncertainty: Estimation
- BOD5, Biological Oxygen Demand [water, surface water]: 0.017 kg; lognormal variance with pedigree 0.188, pedigree (4,5,5,5,5)
  Calculation. This data was calculated from the amount of diethylene glycol in the treated waste water assuming a carbon conversion of 96% for COD and the worst case scenario: BOD=COD.
  It is assumed that the manufacturing plants are located in an urban/industrial area and consequently the emissions are categorized as emanating in a high population density area. The emissions into water are assumed to be emitted into rivers.
  Uncertainty: Calculated from the water emissions
- COD, Chemical Oxygen Demand [water, surface water]: 0.017 kg; lognormal variance with pedigree 0.188, pedigree (4,5,5,5,5)
  (same comment as for BOD5, Biological Oxygen Demand)
- Water [water, unspecified]: 0.182525 m3; name water_to_water_unspecified; = water_cooling_UNO_input*(1-fraction_CW_to_air); lognormal variance with pedigree 0.0807, pedigree (2,2,5,1,1)
  (same comment as for Water)
  property fraction, origin: fresh water 0; name fraction_origin_fresh_water_Ww
  property fraction, origin: salt water 0; name fraction_origin_salt_water_Ww
  property fraction, origin: unspecified 1; name fraction_origin_unspecified_Ww
  property wet mass 1000 kg; name WM
  property carbon content, non-fossil 0; name C_content_non_fossil
  property dry mass 0 kg; name DM
  property carbon content, fossil 0; name C_content_fossil
  property water in wet mass 1000 kg; name WWM
- TOC, Total Organic Carbon [water, surface water]: 0.0055 kg; lognormal variance with pedigree 0.188, pedigree (4,5,5,5,5)
  (same comment as for DOC, Dissolved Organic Carbon)

## Sampling procedure
Literature data

## Extrapolations
This dataset has been extrapolated from year 2006 to the year of the calculation (2021). The uncertainty has been adjusted accordingly.

## Review by Roland Hischier 2007-09-01
passed.

## Review by Roland Hischier 2011-09-22
Transfer of documentation done.
