# tractor production, 4-wheel, agricultural

Dataset: EcoSpold 2, unit process
Geography: RoW
Time period: 1995-01-01 to 2021-12-31
Technology level: current
Classification: ISIC rev.4 ecoinvent: 2821:Manufacture of agricultural and forestry machinery
Classification: EcoSpold01Categories: agricultural means of production/machinery
Tags: ConvertedDataset
Scenario: Business-as-Usual
System model: Allocation, cut-off by classification
Generated by: Albert Zimmermann
Published in: Nemecek, T. 2007
Database: ecoinvent
isCopyrightProtected: true
accessRestrictedTo: 1

## General comment
Representatives of this class are for example: tractor, transporter or two-axle mower. Calculations were made based on a tractor of 3000 kg, with a useful life of 7000 hours and a repair factor of 0.74. For exact results, module should only be used if lifetime and repair factor of the balanced machinery are within a narrow range of the values the module is based on. The functional unit is 1kg tractor during its lifetime.
[This dataset was already contained in the ecoinvent database version 2. It was not individually updated during the transfer to ecoinvent version 3. Life Cycle Impact Assessment results may still have changed, as they are affected by changes in the supply chain, i.e. in other datasets. This dataset was generated following the ecoinvent quality guidelines for version 2. It may have been subject to central changes described in the ecoinvent version 3 change report (http://www.ecoinvent.org/database/ecoinvent-version-3/reports-of-changes/), and the results of the central updates were reviewed extensively. The changes added e.g. consistent water flows and other information throughout the database. The documentation of this dataset can be found in the ecoinvent reports of version 2, which are still available via the ecoinvent website. The change report linked above covers all central changes that were made during the conversion process.]

## Included activities end
The inventory takes into account the use of resources and the amount of emissions during the production, the maintenance and repair and the disposal of agricultural vehicles. Not taken into account were the impacts caused by fuel consumption during operation-time of the machinery, and the amount of emission from the tyre abrasion during this time. No data was available about buildings needed for manufacture and maintenance of the machinery. The routes needed for transport from manufacturer place to the farm and from here to disposal place of the waste, are balanced in the utilised transport modules.

## Geography
The inventories apply to the production in Western Europe and transportation to Switzerland.

## Technology
Values are based and adapted on a different technology (lorries-manufacture).

## Time period
Considered references range from start- to end-date

## Reference product
- tractor, 4-wheel, agricultural: 1 kg; CPC 4414: Agricultural tractors; By-product classification allocatable product
  EcoSpold01Location=CH
  production volume 6.632e9 kg
    Total amount of tractors 26.6 million (Source: World Development Indicators retrieved from World Bank Data Catalogue AG.AGR.TRAC.NO http://data.worldbank.org/data-catalog accessed 2011-04-05); 3000 kg/tractor; lifetime 12 year; note that the functional unit is kg new tractors but the reference flow is 1.74 kg due to inclusion of maintenance
  property price 5.38 EUR2005
    Calculated value based on data from United Nations Commodity Trade Statistics Database (comtrade.un.org) on imports to Switzerland. UN comtrade category: 8701 Tractors (other than works, warehouse equipment). Using exchange rate of 1EURO = 1.209 USD.

## Inputs from technosphere
- waste glass sheet: 0 kg; pedigree (1,1,1,1,1)
  EcoSpold01Location=CH
  production volume 0 kg
    Calculated from the production volume of tractor, 4-wheel, agricultural in proportion to the respective output amounts.
  properties: dry mass 1 kg, wet mass 1 kg
- steel, chromium steel 18/8, hot rolled: 0.036 kg; lognormal variance with pedigree 0.0601, pedigree (4,2,5,5,1)
  EcoSpold01Location=RER
  properties: carbon content, fossil 0.0008, wet mass 1 kg, dry mass 1 kg
  note on carbon content, fossil: Stainless steel model is the grade 304 steel (18/8 stainless, 18% chromium 8% nickel; max. 0.08% C)
- steel, low-alloyed, hot rolled: 0.084 kg; lognormal variance with pedigree 0.0601, pedigree (4,2,5,5,1)
  EcoSpold01Location=RER
  properties: carbon content, fossil 0.005, dry mass 1 kg, wet mass 1 kg
  note on carbon content, fossil: Low alloyed steel composition given in Tab. 3.2 ecoinvent v2.2 report 10_partII. Steel assumed to have a C content of 0.5%
- aluminium, cast alloy: 0.054 kg; lognormal variance with pedigree 0.0601, pedigree (4,2,5,5,1)
  EcoSpold01Location=RER
  properties: dry mass 1 kg, wet mass 1 kg
- flat glass, uncoated: 0.012 kg; lognormal variance with pedigree 0.0601, pedigree (4,2,5,5,1)
  EcoSpold01Location=RER
  properties: wet mass 1 kg, dry mass 1 kg
- lead: 0.04 kg; lognormal variance with pedigree 0.0601, pedigree (4,2,5,5,1)
  EcoSpold01Location=RER
  properties: dry mass 1 kg, wet mass 1 kg
- lubricating oil: 0.206 kg; lognormal variance with pedigree 0.0601, pedigree (4,2,5,5,1)
  EcoSpold01Location=RER
  properties: wet mass 1 kg, dry mass 1 kg, heating value, net 40.2 MJ, carbon content, fossil 0.75
  note on heating value, net: Literature value, Source: IPCC 2006, 2006 IPCC Guidelines for National Greenhouse Gas Inventories, Prepared by the National Greenhouse Gas Inventories Programme, Eggleston H.S., Buendia L., Miwa K., Ngara T. and Tanabe K. (eds). Published: IGES, Japan
  note on carbon content, fossil: Lubricating oil is produced from diesel. C-content/dry mass of fats and oils considered 75%, from: ecoinvent v2.2 report, n 15a, pg 40
- copper, cathode: 0.024 kg; lognormal variance with pedigree 0.0601, pedigree (4,2,5,5,1)
  EcoSpold01Location=RER
  properties: wet mass 1 kg, dry mass 1 kg
- synthetic rubber: 0.296 kg; lognormal variance with pedigree 0.0601, pedigree (4,2,5,5,1)
  EcoSpold01Location=RER
  properties: heating value, net 26.42 MJ, carbon content, fossil 0.871949, dry mass 1 kg, wet mass 1 kg
  note on carbon content, fossil: EPDM (Ethylene-propene-diene terpolymer) rubber is a terpolymer of ethylene, propene, and a diene with the residual unsaturated portion of the diene in the side chain (ecoinvent v2.2 report 7-part XX & Ullmann). Chemical formula (deduced from Evidences of Solvent-Induced Miscibility in Polychloroprene-co-Ethylene-Propene Diene Terpolymer Blends, Dubey et al., Journal of Applied Polymer Science, 2009, 111:1884–1891): C20H35
- electricity, medium voltage: 0 kWh; pedigree (1,1,1,1,1)
  EcoSpold01Location=CH
- waste mineral oil: 0 kg; pedigree (1,1,1,1,1)
  EcoSpold01Location=CH
  production volume 0 kg
    (same comment as for waste glass sheet)
  properties: dry mass 0.9 kg, heating value, net 34.7 MJ, water content 0.111111, carbon content, fossil 0.864444, wet mass 1 kg
  note on heating value, net: Value taken from the general comment of the treatment dataset.
  note on carbon content, fossil: Tab A.6, ecoinvent v2.2 report 13_I. C content has been calculated after data in the tables, and then referred to 1 kg DM
- polypropylene, granulate: 0.039 kg; lognormal variance with pedigree 0.0601, pedigree (4,2,5,5,1)
  EcoSpold01Location=RER
  properties: wet mass 1 kg, heating value, net 32.78 MJ, carbon content, fossil 0.857143, dry mass 1 kg
  note on heating value, net: Value extracted from "treatment of waste polypropylene, open burning"
  note on carbon content, fossil: Polypropylene is formed by the polymerisation of propylene, C3H6 (ecoinvent v2.2 report 11_II)
- heat, district or industrial, natural gas: 0 MJ; pedigree (1,1,1,1,1)
  EcoSpold01Location=RER
  properties: heating value, net 1 MJ
- alkyd paint, white, without solvent, in 60% solution state: 0.006 kg; lognormal variance with pedigree 0.0601, pedigree (4,2,5,5,1)
  EcoSpold01Location=RER
  properties: heating value, net 10.3 MJ, carbon content, fossil 0.140367, carbon content, non-fossil 0.199629, wet mass 1 kg, dry mass 1 kg
  note on carbon content, fossil: C content was calculated as an addition of C content in the raw materials.
- waste graphical paper: 0 kg; pedigree (1,1,1,1,1)
  EcoSpold01Location=CH
  production volume 0 kg
    (same comment as for waste glass sheet)
  properties: water content 0.126126, carbon content, non-fossil 0.454955, dry mass 0.888 kg, wet mass 1 kg, heating value, net 14.12 MJ
- heat, district or industrial, other than natural gas: 0 MJ; pedigree (1,1,1,1,1)
  EcoSpold01Location=RER
  properties: heating value, net 1 MJ
- heat, central or small-scale, other than natural gas: 0 MJ; pedigree (1,1,1,1,1)
  EcoSpold01Location=CH
  properties: heating value, net 1 MJ
- paper, woodfree, coated: 0.006 kg; lognormal variance with pedigree 0.0601, pedigree (4,2,5,5,1)
  EcoSpold01Location=RER
  properties: carbon content, fossil 0.0590617, carbon content, non-fossil 0.22775, water content 0.0582011, wet mass 1 kg, dry mass 0.945 kg, heating value, net 14.11 MJ
  note on carbon content, fossil: Fossil C content was calculated after fossil C contents of chemicals used in the production of the paper (in Tab 8.72 & 8.73 ecoinvent v2.2 report 11_III, part 8).
  note on carbon content, non-fossil: Biogenic C content was calculated after biogenic C contents of chemicals used in the production of the paper (in Tab 8.72 & 8.73 ecoinvent v2.2 report 11_III, part 8). The cellulose content in 1 kg of paper (on a wet mas basis) was estimated as (1-chemical content), C content of cellulose was considered 0.44 kgC/kg dry mass (ecoinvent v2.2 report, n 15a, pg 40)
- zinc: 0.012 kg; lognormal variance with pedigree 0.0601, pedigree (4,2,5,5,1)
  EcoSpold01Location=RER
  properties: dry mass 1 kg, wet mass 1 kg
- waste plastic, mixture: 0 kg; pedigree (1,1,1,1,1)
  EcoSpold01Location=CH
  production volume 0 kg
    (same comment as for waste glass sheet)
  properties: carbon content, fossil 0.747344, water content 0.180638, dry mass 0.847 kg, wet mass 1 kg, heating value, net 30.79 MJ
  note on carbon content, fossil: C content in 1 kg DM was calculated using data in Tab A.2, ecoinvent v2.2 report 13_I
- steel, unalloyed: 0.806 kg; lognormal variance with pedigree 0.0601, pedigree (4,2,5,5,1)
  EcoSpold01Location=RER
  properties: carbon content, fossil 0.0025, dry mass 1 kg, wet mass 1 kg
  note on carbon content, fossil: Unalloyed steels or carbon steels are those in which the level of an individual element in no case reaches or exceeds the limiting concentration given in Tab. 3.1 ecoinvent v2.2 report 10_partII. Assumed to have a C content of 0.25%
- waste glass sheet: -0.00247251, -0.00952749 kg (2 entries); lognormal variance with pedigree 0.07, pedigree (4,4,5,5,3)
  EcoSpold01Location=CH
  production volume 7.9584e7 kg
- electricity, medium voltage: 0.0270564, 0.00518825, 0.11913, 0.39442, 0.0871, 1.26679, 0.178555, 0.581759 kWh (8 entries); lognormal variance with pedigree 0.064, pedigree (3,4,5,5,3)
  EcoSpold01Location=CH
- waste mineral oil: -0.0569321, -0.149068 kg (2 entries); lognormal variance with pedigree 0.07, pedigree (4,4,5,5,3)
  EcoSpold01Location=CH
  production volume 1.36619e9 kg
- heat, district or industrial, natural gas: 0.0520223, 1.24656, 3.37542 MJ (3 entries); lognormal variance with pedigree 0.064, pedigree (3,4,5,5,3)
  EcoSpold01Location=RER
- waste graphical paper: -0.000262463, -4.00793e-5, -3.50457e-6, -0.000144823, -1.41215e-5, -2.61403e-5, -0.000633194, -0.00487567 kg (8 entries); lognormal variance with pedigree 0.07, pedigree (4,4,5,5,3)
  EcoSpold01Location=CH
  production volume 3.9792e7 kg
- heat, district or industrial, other than natural gas: 0.000265884, 0.0160553, 0.655679 MJ (3 entries); lognormal variance with pedigree 0.064, pedigree (3,4,5,5,3)
  EcoSpold01Location=RER
- heat, central or small-scale, other than natural gas: 0.177023, 12.889 MJ (2 entries); lognormal variance with pedigree 0.064, pedigree (3,4,5,5,3)
  EcoSpold01Location=CH
- waste plastic, mixture: -0.00533961, -0.000356772, -2.69821e-5, -0.00014736, -5.95316e-5, -0.000139932, -0.0045496, -0.0373802 kg (8 entries); lognormal variance with pedigree 0.07, pedigree (4,4,5,5,3)
  EcoSpold01Location=CH
  production volume 3.18336e8 kg

## Emissions to nature
- NMVOC, non-methane volatile organic compounds, unspecified origin [air, urban air close to ground]: 0.0115 kg; lognormal variance with pedigree 0.104, pedigree (3,4,5,5,3)
- Carbon dioxide, fossil [air, non-urban air or from high stacks]: 0.00654 kg; lognormal variance with pedigree 0.064, pedigree (3,4,5,5,3)

## Sampling procedure
Values given in the reference originate mainly from studies about lorry production in Europe as examined and adapted by Zimmermann (2002) and experts estimations.

## Extrapolations
Data are extrapolated, examined and adapted from lorry production in Europe. This dataset has been copied from an original dataset covering the geography CH. The uncertainty has been adjusted accordingly.

## Review by Roland Hischier 2003-08-06
Passed.
