# sorting and pressing of iron scrap

Dataset: EcoSpold 2, unit process
Geography: RER
Time period: 2002-01-01 to 2021-12-31
Technology level: current
Classification: ISIC rev.4 ecoinvent: 3830:Materials recovery
Classification: EcoSpold01Categories: metals/extraction
Tags: ConvertedDataset
Scenario: Business-as-Usual
System model: Allocation, cut-off by classification
Generated by: Hans-Jörg Althaus
Published in: Classen M. 2009
Database: ecoinvent
isCopyrightProtected: true
accessRestrictedTo: 1

## General comment
Data based on assumptions.
[This dataset was already contained in the ecoinvent database version 2. It was not individually updated during the transfer to ecoinvent version 3. Life Cycle Impact Assessment results may still have changed, as they are affected by changes in the supply chain, i.e. in other datasets. This dataset was generated following the ecoinvent quality guidelines for version 2. It may have been subject to central changes described in the ecoinvent version 3 change report (http://www.ecoinvent.org/database/ecoinvent-version-3/reports-of-changes/), and the results of the central updates were reviewed extensively. The changes added e.g. consistent water flows and other information throughout the database. The documentation of this dataset can be found in the ecoinvent reports of version 2, which are still available via the ecoinvent website. The change report linked above covers all central changes that were made during the conversion process.]

## Included activities end
Collecting of new and old iron scrap, transport to scrap-yard, sorting and pressing to blocks.

## Geography
Data relate to plants in the EU

## Technology
Assumed technology of medium sized plant.

## Reference product
- iron scrap, sorted, pressed: 1 kg; CPC 39310: Slag, dross, scalings and other waste from the manufacture of iron or steel; By-product classification Recyclable
  production volume 8.00794e10 kg; = (20.055+(406/600)*93.345-3.139)*1000*1000000
    The annual production volume is here approximated by the total amount of steel scrap recycled in EU-28 steelworks (corrected by the share of purchased scrap over total scrap use globally, i.e. 406/600MT=68%) and adding the net export of steel scrap from EU-28 to third countries in 2017 according to BIR (2018, p.16 & 23). The resulting amount might overestimate the true volume, as not all externally-sourced steel scrap used for steel production might require sorting and pressing.
    Source: BIR (2018) World Steel Recycling in Figures 2013-2017. Bureau of International Recycling (BIR), Ferrous Division. Brussels, Belgium. Available from: https://www.bdsv.org/fileadmin/user_upload/180222-Ferrous-report-2017-V07.pdf [assessed on 2020-07-15]
  property price 0.175 EUR2005
    Temporary price data. Calculated as 90% of purchasers price based on: 2005 import and export prices (total trades (USD) divided by total weight (kg) in biggest economies of the world: EU27, USA, Brasil, China, India, Japan and Russia) from UN Commodity Trade Statistics Database (http://data.un.org/Explorer.aspxDatabase [Accessed 2011.06.20]). Commodity: Waste or scrap, of cast iron
  property carbon content 0
    carbon content on a dry matter basis (reserved; not for manual entry)
  properties: carbon content, fossil 0, carbon content, non-fossil 0, wet mass 1 kg, water content 0, dry mass 1 kg, water in wet mass 0 kg, carbon allocation 0 kg

## Inputs from technosphere
- diesel, burned in building machine: 0.1 MJ; lognormal variance with pedigree 0.69, pedigree (1,1,5,1,1)
  EcoSpold01Location=GLO
  rough estimation
  properties: heating value, net 1 MJ
- electricity, medium voltage: 0.01 kWh; lognormal variance with pedigree 0.69, pedigree (1,1,5,1,1)
  rough estimation
  EcoSpold01Location=UCTE
- scrap preparation facility: 1e-9 unit; lognormal variance with pedigree 0.69, pedigree (1,1,5,1,1)
  rough estimation
  EcoSpold01Location=RER
- iron scrap, unsorted: 1 kg
  properties: wet mass 1 kg, dry mass 1 kg

## Sampling procedure
Internet search

## Extrapolations
This dataset has been extrapolated from year 2002 to the year of the calculation (2021). The uncertainty has been adjusted accordingly.

## Review by Roland Hischier 2007-08-13
passed
