# treatment of refinery sludge, sanitary landfill

Dataset: EcoSpold 2, unit process
Geography: Europe without Switzerland
Time period: 1994-01-01 to 2021-12-31
Technology level: current
Classification: EcoSpold01Categories: waste management/sanitary landfill
Classification: ISIC rev.4 ecoinvent: 3821:Treatment and disposal of non-hazardous waste
Tags: Treatment
Scenario: Business-as-Usual
System model: Allocation, cut-off by classification
Generated by: [System]
Database: ecoinvent
isCopyrightProtected: true
accessRestrictedTo: 1

## General comment
Inventoried waste contains 100% refinery sludge; .
waste composition (wet, in ppm): upper heating value 4.732 MJ/kg; lower heating value 2.453 MJ/kg; H2O 888000; O 1017.1; H 13731; C 86452; S 508.54; N 1017.1; P 478.03; B n.a.; Cl n.a.; Br n.a.; F n.a.; I n.a.; Ag n.a.; As n.a.; Ba n.a.; Cd 10.171; Co 20.342; Cr n.a.; Cu 101.71; Hg 2.0342; Mn n.a.; Mo n.a.; Ni 152.56; Pb 457.69; Sb n.a.; Se n.a.; Sn n.a.; V n.a.; Zn 1017.1; Be n.a.; Sc n.a.; Sr n.a.; Ti n.a.; Tl n.a.; W n.a.; Si n.a.; Fe n.a.; Ca 7000; Al n.a.; K n.a.; Mg n.a.; Na n.a.;
Share of carbon in waste that is biogenic 0%.
Overall degradability of waste during 100 years: 60%.

## Included activities end
Waste-specific short-term emissions to air via landfill gas incineration and landfill leachate. Burdens from treatment of short-term leachate (0-100a) in wastewater treatment plant (including WWTP sludge disposal in municipal incinerator). Long-term emissions from landfill to groundwater (after base lining failure).

## Geography
Technology encountered in Switzerland in 2000. Landfill includes base seal, leachate collection system, treatment of leachate in municipal wastewater treatment plant.
This technology is considered to be representable of European conditions as well.

## Technology
Swiss municipal sanitary landfill for biogenic or untreated municipal waste ('reactive organic landfill'). Landfill gas and leachate collection system. Recultivation and monitoring for 150 years after closure.

## Reference product
- refinery sludge: -1 kg; name RP; CPC 39920: Sewage sludge; By-product classification Waste
  production volume 1.287e8 kg; name RP_PV; = 11000000*117*0.1
    Calculated based on literature (European Comission, Join Research Centre, 2015, Best Available Techniques (BAT) Reference Document for the Refining of Mineral Oil and Gas).
    Based on a survey of 89 refineries the amount of sludge produced per one European refinery is 11'000 tonnes/year. There are 119 refinery plants operating in Europe (EU27, Norway, Switzerland, Turkey, Croatia) excluding Switzerland (2) there are 117 refineries in Europe without Switzerland.
    The resulting amount of refinery sludge produced in Europe without Switzerland is (11000*1000*117=) 1.29E+9 kg of refinery sludge/year.
    The share between the End-of-Life technologies are estimated as follows;
    80% hazardous waste incineration
    10% landfarming
    10% sanitary landfill
  property carbon content, fossil 0.767857
    Tab A.6, ecoinvent v2.2 report 13_I. C content has been calculated after data in the tables, and then referred to 1 kg DM
  property heating value, net 2.45 MJ
    Value taken from the general comment of the treatment dataset.
  property price 0 EUR2005; name RP_price_EUR2005
    Waste products are assigned a price of zero as they are assumed to require further treatment.
  property carbon content 0.767857
    carbon content on a dry matter basis (reserved; not for manual entry)
  properties: wet mass 1 kg, water content 8.52381, water in wet mass 0.895 kg, carbon content, non-fossil 0, dry mass 0.105 kg, carbon allocation 0.080625 kg

## Inputs from technosphere
- hydrochloric acid, without water, in 30% solution state: 8.8e-9 kg; lognormal variance with pedigree 0.692, pedigree (1,1,5,5,1)
  burden from incineration of sludge from wastewater treatment of the short-term leachate (0-100a). uncertainty is calculated from uncertainties in waste composition and transfer coefficients in incinerator and uncertainty of waste decomposition and short-term leaching in sanitary landfill
  properties: dry mass 1 kg, wet mass 1 kg, heating value, net 3.32 MJ
- slag landfill: 3.18e-13 unit; lognormal variance with pedigree 0.632, pedigree (1,1,5,5,1)
  (same comment as for hydrochloric acid, without water, in 30% solution state)
- residual material landfill: 1.08e-13 unit; lognormal variance with pedigree 0.462, pedigree (1,1,5,5,1)
  (same comment as for hydrochloric acid, without water, in 30% solution state)
- ammonia, anhydrous, liquid: 1.43e-6 kg; lognormal variance with pedigree 0.562, pedigree (1,1,5,5,1)
  (same comment as for hydrochloric acid, without water, in 30% solution state)
  properties: wet mass 1 kg, dry mass 1 kg
- chemical, inorganic: 1.47e-8 kg; lognormal variance with pedigree 0.692, pedigree (1,1,5,5,1)
  (same comment as for hydrochloric acid, without water, in 30% solution state)
  properties: dry mass 1 kg, carbon content, fossil 0.003, wet mass 1 kg
  note on carbon content, fossil: This dataset is an unweighted average of 20 inorganic substances (listed in Tab 88.1, ecoinvent v2.2 report 8, part II), being part of the top100 chemicals included in this database. The C-content has also been calculated as an unweighted average of the C content of the substances composing this dataset.
- process-specific burdens, slag landfill: 0.000179 kg; lognormal variance with pedigree 0.632, pedigree (1,1,5,5,1)
  burden from incineration of sludge from wastewater treatment of the short-term leachate (0-100a). uncertainty is calculated from uncertainties in waste composition and transfer coefficients in incinerator and uncertainty of waste decomposition and short-term leaching in sanitary landfill;activityLink introduced to establish a direct link to the corresponding regional supply of this product
- process-specific burdens, municipal waste incineration: 0.00136 kg; lognormal variance with pedigree 0.272, pedigree (1,1,5,5,1)
  Burden from incineration of sludge from wastewater treatment of the short-term leachate (0-100a).;activityLink introduced to establish a direct link to the corresponding regional supply of this product
- quicklime, milled, packed: 1.75e-8 kg; lognormal variance with pedigree 0.402, pedigree (1,1,5,5,1)
  (same comment as for hydrochloric acid, without water, in 30% solution state)
  properties: water content 0.010101, dry mass 0.99 kg, wet mass 1 kg
- iron (III) chloride, without water, in 40% solution state: 0.000106 kg; lognormal variance with pedigree 1.012, pedigree (1,1,5,5,1)
  (same comment as for hydrochloric acid, without water, in 30% solution state)
  properties: dry mass 1 kg, wet mass 1 kg
- aluminium sulfate, powder: 2.06e-5 kg; lognormal variance with pedigree 1.16, pedigree (5,5,5,5,5)
  burden from wastewater treatment of the short-term leachate (0-100a). Uncertainty calculated from unertainty of the waste composition of this waste, uncertainty in waste decomposition and short-term leaching in sanitary landfill
  properties: dry mass 1 kg, wet mass 1 kg
- process-specific burdens, sanitary landfill: 1 kg; lognormal variance with pedigree 0.042, pedigree (1,1,5,5,1)
  demands per kilogram waste. uncertainty is heeded in the module
- heat, district or industrial, other than natural gas: 0.00114 MJ; lognormal variance with pedigree 0.272, pedigree (1,1,5,5,1)
  (same comment as for hydrochloric acid, without water, in 30% solution state)
  properties: heating value, net 1 MJ
- process-specific burdens, residual material landfill: 5.16e-5 kg; lognormal variance with pedigree 0.462, pedigree (1,1,5,5,1)
  (same comment as for process-specific burdens, slag landfill)
- titanium dioxide: 4.1e-8 kg; lognormal variance with pedigree 0.812, pedigree (1,1,5,5,1)
  (same comment as for hydrochloric acid, without water, in 30% solution state)
  properties: wet mass 1 kg, dry mass 1 kg
- electricity, low voltage: 0.00581 kWh; lognormal variance with pedigree 0.47, pedigree (5,5,5,5,5)
  (same comment as for aluminium sulfate, powder)
- cement, unspecified: 2.07e-5 kg; lognormal variance with pedigree 0.462, pedigree (1,1,5,5,1)
  (same comment as for hydrochloric acid, without water, in 30% solution state)
  properties: dry mass 1 kg, wet mass 1 kg
- heat, central or small-scale, other than natural gas: 0.00022748 MJ; lognormal variance with pedigree 0.45, pedigree (5,5,5,5,5)
  (same comment as for aluminium sulfate, powder)
  properties: heating value, net 1 MJ
- waste plastic, mixture: -3.88e-5 kg; name ByP_03
  (same comment as for aluminium sulfate, powder)
  production volume 4993.56 kg; = ABS(ByP_03/ RP)* RP_PV
    Calculated from the production volume of refinery sludge, 89.5% water in proportion to the respective output amounts.
  property price 0 EUR2005; name ByP_03_price_EUR2005
  properties: water content 0.180638, carbon content, fossil 0.747344, wet mass 1 kg, dry mass 0.847 kg, heating value, net 30.79 MJ
  note on carbon content, fossil: C content in 1 kg DM was calculated using data in Tab A.2, ecoinvent v2.2 report 13_I
  note on heating value, net: Value taken from the general comment of the treatment dataset.
- waste graphical paper: -3.88e-5 kg; name ByP_02
  (same comment as for aluminium sulfate, powder)
  production volume 4993.56 kg; = ABS(ByP_02/ RP)* RP_PV
    (same comment as for waste plastic, mixture)
  property price 0 EUR2005; name ByP_02_price_EUR2005
  properties: heating value, net 14.12 MJ, dry mass 0.888 kg, carbon content, non-fossil 0.454955, wet mass 1 kg, water content 0.126126
- electricity, high voltage: 0.000195 kWh; lognormal variance with pedigree 0.512, pedigree (1,1,5,5,1)
  (same comment as for hydrochloric acid, without water, in 30% solution state)
- sodium hydroxide, without water, in 50% solution state: 9.66e-8 kg; lognormal variance with pedigree 0.402, pedigree (1,1,5,5,1)
  (same comment as for hydrochloric acid, without water, in 30% solution state)
  properties: wet mass 1 kg, dry mass 1 kg, heating value, net 3.03 MJ
- sanitary landfill facility: 5.56e-10 unit; lognormal variance with pedigree 0.042, pedigree (1,1,5,5,1)
  demands per kilogram waste. uncertainty is heeded in the module
- municipal waste incineration facility: 3.39e-13 unit; lognormal variance with pedigree 0.272, pedigree (1,1,5,5,1)
  Burden from incineration of sludge from wastewater treatment of the short-term leachate (0-100a).
- heat, district or industrial, natural gas: 0.00043896 MJ; lognormal variance with pedigree 0.45, pedigree (5,5,5,5,5)
  (same comment as for aluminium sulfate, powder)
  properties: heating value, net 1 MJ
- wastewater treatment facility, capacity 5E9l/year: 1.42e-11 unit; lognormal variance with pedigree 0.2106, pedigree (5,5,5,5,5)
  (same comment as for aluminium sulfate, powder)
- chemical, organic: 1.82e-6 kg; lognormal variance with pedigree 1.292, pedigree (1,1,5,5,1)
  (same comment as for hydrochloric acid, without water, in 30% solution state)
  properties: carbon content, fossil 0.628, dry mass 1 kg, wet mass 1 kg, heating value, net 19.03 MJ
  note on carbon content, fossil: This dataset is an unweighted average of 20 organic substances (listed in Tab 88.1, ecoinvent v2.2 report 8, part II), being part of the top100 chemicals included in this database. The C-content has also been calculated as an unweighted average of the C content of the substances composing this dataset.
- chromium oxide, flakes: 8.36e-10 kg; lognormal variance with pedigree 0.92, pedigree (5,5,5,5,5)
  burden from incineration of sludge from wastewater treatment of the short-term leachate (0-100a). Proxy for vanadium pentoxide V2O5 in SCR catalyst, uncertainty calculated from uncertainty in average DeNOx input, uncertainty in the share of thermal NOx, uncertainty of nitrogen content in average municipal waste and the unertainty in nitrogen content in *this* waste and uncertainty of waste decomposition and short-term leaching in sanitary landfill
  properties: wet mass 1 kg, dry mass 1 kg
- waste cement, hydrated: -5.16e-5 kg; name ByP_01
  (same comment as for hydrochloric acid, without water, in 30% solution state)
  production volume 6640.92 kg; = ABS(ByP_01/ RP)* RP_PV
    (same comment as for waste plastic, mixture)
  property price 0 EUR2005; name ByP_01_price_EUR2005
  properties: dry mass 1 kg, wet mass 1 kg
- sewer grid, 5E9l/year, 110 km: 5.45e-10 km; lognormal variance with pedigree 0.2106, pedigree (5,5,5,5,5)
  (same comment as for aluminium sulfate, powder)
- iron sulfate: 7.6e-5 kg; lognormal variance with pedigree 1.16, pedigree (5,5,5,5,5)
  (same comment as for aluminium sulfate, powder)
  properties: dry mass 1 kg, wet mass 1 kg

## Emissions to nature
- Cadmium, ion [water, ground-, long-term]: 9.1e-6 kg; lognormal variance with pedigree 1.392, pedigree (1,1,5,5,1)
  Emissions from long-term leachate (>100a) directly from MSW landfill and indirectly via incineration of treatement sludge from leachate treatement. Uncertainty calculated depending on waste input and uncertainty of long-term transfer coefficents in landfill.
- Nitrogen, organic bound [water, ground-, long-term]: 6.78e-13 kg; lognormal variance with pedigree 2.622, pedigree (1,1,5,5,1)
  (same comment as for Cadmium, ion)
- Mercury [air, urban air close to ground]: 1.42e-13 kg; lognormal variance with pedigree 1.782, pedigree (1,1,5,5,1)
  Emissions from short-term leachate treatment and incineration of resulting sludge. Uncertainty calculated depending on waste input and uncertainty of transfer coefficents in landfill, wastewater treatment and incineration model.
- Nitrogen [water, surface water]: 1.34e-5 kg; lognormal variance with pedigree 0.452, pedigree (1,1,5,5,1)
  (same comment as for Mercury)
- Aluminium [water, ground-, long-term]: 2.4e-6 kg; lognormal variance with pedigree 1.052, pedigree (1,1,5,5,1)
  (same comment as for Cadmium, ion)
- Nitrite [water, surface water]: 1.03e-5 kg; lognormal variance with pedigree 0.702, pedigree (1,1,5,5,1)
  (same comment as for Mercury)
- Methane, fossil [air, urban air close to ground]: 8.49e-6 kg; lognormal variance with pedigree 0.532, pedigree (1,1,5,5,1)
  (same comment as for Mercury)
- Sulfate [water, surface water]: 0.000413 kg; lognormal variance with pedigree 0.682, pedigree (1,1,5,5,1)
  Emissions from short-term leachate treatment. Uncertainty calculated depending on waste input and uncertainty of transfer coefficents in landfill and wastewater treatment.
- Zinc, ion [water, ground-, long-term]: 0.000817 kg; lognormal variance with pedigree 0.712, pedigree (1,1,5,5,1)
  (same comment as for Cadmium, ion)
- Iron, ion [water, surface water]: 2.18e-8 kg; lognormal variance with pedigree 1.072, pedigree (1,1,5,5,1)
  (same comment as for Mercury)
- Aluminium [air, urban air close to ground]: 5.07e-9 kg; lognormal variance with pedigree 1.062, pedigree (1,1,5,5,1)
  (same comment as for Mercury)
- Nitrite [water, ground-, long-term]: 2.26e-14 kg; lognormal variance with pedigree 2.622, pedigree (1,1,5,5,1)
  (same comment as for Cadmium, ion)
- Mercury [water, surface water]: 2.65e-8 kg; lognormal variance with pedigree 1.722, pedigree (1,1,5,5,1)
  (same comment as for Mercury)
- Chloride [water, surface water]: 6.82e-5 kg; lognormal variance with pedigree 1.042, pedigree (1,1,5,5,1)
  (same comment as for Sulfate)
- Carbon monoxide, fossil [air, non-urban air or from high stacks]: 7.36e-6 kg; lognormal variance with pedigree 0.832, pedigree (1,1,5,5,1)
  burden from direct release or incineration of landfill biogas. Uncertainty calculated from unertainty of the waste composition of this waste, uncertainty in waste decomposition and short-term leaching in sanitary landfill
- Carbon monoxide, fossil [air, urban air close to ground]: 2.89e-6 kg; lognormal variance with pedigree 0.502, pedigree (1,1,5,5,1)
  (same comment as for Mercury)
- Mercury [air, non-urban air or from high stacks]: 3.34e-8 kg; lognormal variance with pedigree 1.832, pedigree (1,1,5,5,1)
  (same comment as for Carbon monoxide, fossil)
- Nitrogen oxides [air, urban air close to ground]: 8.87e-6 kg; lognormal variance with pedigree 0.472, pedigree (1,1,5,5,1)
  (same comment as for Mercury)
- Cobalt [air, non-urban air or from high stacks]: 9.81e-10 kg; lognormal variance with pedigree 2.272, pedigree (1,1,5,5,1)
  (same comment as for Carbon monoxide, fossil)
- Carbon dioxide, fossil [air, urban air close to ground]: 0.00434 kg; lognormal variance with pedigree 0.482, pedigree (1,1,5,5,1)
  (same comment as for Mercury)
- DOC, Dissolved Organic Carbon [water, surface water]: 0.000231 kg; lognormal variance with pedigree 0.482, pedigree (1,1,5,5,1)
  (same comment as for Mercury)
- Dinitrogen monoxide [air, urban air close to ground]: 2.5e-6 kg; lognormal variance with pedigree 0.432, pedigree (1,1,5,5,1)
  (same comment as for Mercury)
- Lead [water, surface water]: 1.78e-7 kg; lognormal variance with pedigree 1.302, pedigree (1,1,5,5,1)
  (same comment as for Mercury)
- Copper, ion [water, surface water]: 7.75e-8 kg; lognormal variance with pedigree 1.522, pedigree (1,1,5,5,1)
  (same comment as for Mercury)
- Sulfate [water, ground-, long-term]: 0.00105 kg; lognormal variance with pedigree 0.792, pedigree (1,1,5,5,1)
  (same comment as for Cadmium, ion)
- COD, Chemical Oxygen Demand [water, surface water]: 0.000953 kg; lognormal variance with pedigree 0.482, pedigree (1,1,5,5,1)
  (same comment as for Mercury)
- Zinc [air, non-urban air or from high stacks]: 6.42e-9 kg; lognormal variance with pedigree 2.012, pedigree (1,1,5,5,1)
  (same comment as for Carbon monoxide, fossil)
- Nitrate [water, ground-, long-term]: 1.02e-6 kg; lognormal variance with pedigree 0.472, pedigree (1,1,5,5,1)
  (same comment as for Cadmium, ion)
- Lead [water, ground-, long-term]: 0.000456 kg; lognormal variance with pedigree 0.832, pedigree (1,1,5,5,1)
  (same comment as for Cadmium, ion)
- Iron [air, urban air close to ground]: 2.13e-9 kg; lognormal variance with pedigree 1.082, pedigree (1,1,5,5,1)
  (same comment as for Mercury)
- BOD5, Biological Oxygen Demand [water, ground-, long-term]: 0.0023 kg; lognormal variance with pedigree 0.822, pedigree (1,1,5,5,1)
  (same comment as for Cadmium, ion)
- COD, Chemical Oxygen Demand [water, ground-, long-term]: 0.0097 kg; lognormal variance with pedigree 0.822, pedigree (1,1,5,5,1)
  (same comment as for Cadmium, ion)
- Ammonium, ion [water, surface water]: 0.000492 kg; lognormal variance with pedigree 0.502, pedigree (1,1,5,5,1)
  (same comment as for Mercury)
- Lead [air, non-urban air or from high stacks]: 5.39e-10 kg; lognormal variance with pedigree 2.342, pedigree (1,1,5,5,1)
  (same comment as for Carbon monoxide, fossil)
- Carbon dioxide, fossil [air, non-urban air or from high stacks]: 0.13 kg; lognormal variance with pedigree 0.192, pedigree (1,1,5,5,1)
  (same comment as for Carbon monoxide, fossil)
- TOC, Total Organic Carbon [water, ground-, long-term]: 0.00887 kg; lognormal variance with pedigree 0.822, pedigree (1,1,5,5,1)
  (same comment as for Cadmium, ion)
- Zinc, ion [water, surface water]: 8.94e-6 kg; lognormal variance with pedigree 0.942, pedigree (1,1,5,5,1)
  (same comment as for Mercury)
- Calcium [air, non-urban air or from high stacks]: 1.37e-7 kg; lognormal variance with pedigree 1.622, pedigree (1,1,5,5,1)
  (same comment as for Carbon monoxide, fossil)
- Ammonium, ion [water, ground-, long-term]: 4.15e-13 kg; lognormal variance with pedigree 2.622, pedigree (1,1,5,5,1)
  (same comment as for Cadmium, ion)
- Copper [air, non-urban air or from high stacks]: 8.54e-11 kg; lognormal variance with pedigree 2.582, pedigree (1,1,5,5,1)
  (same comment as for Carbon monoxide, fossil)
- Phosphate [water, ground-, long-term]: 1.08e-5 kg; lognormal variance with pedigree 6.992, pedigree (1,1,5,5,1)
  (same comment as for Cadmium, ion)
- Cobalt [water, ground-, long-term]: 1.81e-5 kg; lognormal variance with pedigree 1.092, pedigree (1,1,5,5,1)
  (same comment as for Cadmium, ion)
- Copper [air, urban air close to ground]: 1.63e-12 kg; lognormal variance with pedigree 1.582, pedigree (1,1,5,5,1)
  (same comment as for Mercury)
- NMVOC, non-methane volatile organic compounds, unspecified origin [air, non-urban air or from high stacks]: 1.39e-7 kg; lognormal variance with pedigree 0.232, pedigree (1,1,5,5,1)
  (same comment as for Carbon monoxide, fossil)
- Cadmium, ion [water, surface water]: 5.45e-7 kg; lognormal variance with pedigree 1.422, pedigree (1,1,5,5,1)
  (same comment as for Mercury)
- Cadmium [air, urban air close to ground]: 2.94e-11 kg; lognormal variance with pedigree 1.482, pedigree (1,1,5,5,1)
  (same comment as for Mercury)
- Calcium [air, urban air close to ground]: 8.94e-8 kg; lognormal variance with pedigree 0.632, pedigree (1,1,5,5,1)
  (same comment as for Mercury)
- Particulates, < 2.5 um [air, non-urban air or from high stacks]: 2.47e-6 kg; lognormal variance with pedigree 0.492, pedigree (1,1,5,5,1)
  (same comment as for Carbon monoxide, fossil)
- Phosphate [water, surface water]: 1.73e-5 kg; lognormal variance with pedigree 1.022, pedigree (1,1,5,5,1)
  (same comment as for Mercury)
- BOD5, Biological Oxygen Demand [water, surface water]: 0.0003 kg; lognormal variance with pedigree 0.482, pedigree (1,1,5,5,1)
  (same comment as for Mercury)
- Nitrogen oxides [air, non-urban air or from high stacks]: 2.62e-7 kg; lognormal variance with pedigree 0.902, pedigree (1,1,5,5,1)
  (same comment as for Carbon monoxide, fossil)
- Copper, ion [water, ground-, long-term]: 0.000102 kg; lognormal variance with pedigree 1.002, pedigree (1,1,5,5,1)
  (same comment as for Cadmium, ion)
- Hydrogen sulfide [water, ground-, long-term]: 2.73e-5 kg; lognormal variance with pedigree 0.792, pedigree (1,1,5,5,1)
  (same comment as for Cadmium, ion)
- Cyanide [air, urban air close to ground]: 2.55e-8 kg; lognormal variance with pedigree 0.582, pedigree (1,1,5,5,1)
  (same comment as for Mercury)
- Aluminium [water, surface water]: 2.7e-10 kg; lognormal variance with pedigree 1.642, pedigree (1,1,5,5,1)
  (same comment as for Mercury)
- Nickel, ion [water, surface water]: 3.23e-6 kg; lognormal variance with pedigree 1.172, pedigree (1,1,5,5,1)
  (same comment as for Mercury)
- Sulfur dioxide [air, non-urban air or from high stacks]: 3.98e-5 kg; lognormal variance with pedigree 1.002, pedigree (1,1,5,5,1)
  (same comment as for Carbon monoxide, fossil)
- Nickel [air, urban air close to ground]: 9.04e-14 kg; lognormal variance with pedigree 1.292, pedigree (1,1,5,5,1)
  (same comment as for Mercury)
- Methane, fossil [air, non-urban air or from high stacks]: 0.0199 kg; lognormal variance with pedigree 0.232, pedigree (1,1,5,5,1)
  (same comment as for Carbon monoxide, fossil)
- Lead [air, urban air close to ground]: 5.35e-11 kg; lognormal variance with pedigree 1.352, pedigree (1,1,5,5,1)
  (same comment as for Mercury)
- Zinc [air, urban air close to ground]: 3.26e-10 kg; lognormal variance with pedigree 1.012, pedigree (1,1,5,5,1)
  (same comment as for Mercury)
- TOC, Total Organic Carbon [water, surface water]: 0.000241 kg; lognormal variance with pedigree 0.482, pedigree (1,1,5,5,1)
  (same comment as for Mercury)
- NMVOC, non-methane volatile organic compounds, unspecified origin [air, urban air close to ground]: 3.86e-8 kg; lognormal variance with pedigree 0.652, pedigree (1,1,5,5,1)
  (same comment as for Mercury)
- Nickel [air, non-urban air or from high stacks]: 1.33e-9 kg; lognormal variance with pedigree 2.222, pedigree (1,1,5,5,1)
  (same comment as for Carbon monoxide, fossil)
- Cobalt [air, urban air close to ground]: 6.13e-14 kg; lognormal variance with pedigree 1.402, pedigree (1,1,5,5,1)
  (same comment as for Mercury)
- Cobalt [water, surface water]: 1.99e-6 kg; lognormal variance with pedigree 1.282, pedigree (1,1,5,5,1)
  (same comment as for Mercury)
- Calcium, ion [water, ground-, long-term]: 0.0065 kg; lognormal variance with pedigree 0.452, pedigree (1,1,5,5,1)
  (same comment as for Cadmium, ion)
- Cadmium [air, non-urban air or from high stacks]: 7.16e-9 kg; lognormal variance with pedigree 2.002, pedigree (1,1,5,5,1)
  (same comment as for Carbon monoxide, fossil)
- Nitrate [water, surface water]: 0.0018 kg; lognormal variance with pedigree 0.442, pedigree (1,1,5,5,1)
  (same comment as for Mercury)
- Nickel, ion [water, ground-, long-term]: 0.000149 kg; lognormal variance with pedigree 0.932, pedigree (1,1,5,5,1)
  (same comment as for Cadmium, ion)
- Calcium, ion [water, surface water]: 0.000493 kg; lognormal variance with pedigree 0.592, pedigree (1,1,5,5,1)
  (same comment as for Mercury)
- Mercury [water, ground-, long-term]: 1.92e-6 kg; lognormal variance with pedigree 1.512, pedigree (1,1,5,5,1)
  (same comment as for Cadmium, ion)
- Iron, ion [water, ground-, long-term]: 2.99e-5 kg; lognormal variance with pedigree 1.872, pedigree (1,1,5,5,1)
  (same comment as for Cadmium, ion)
- DOC, Dissolved Organic Carbon [water, ground-, long-term]: 0.00887 kg; lognormal variance with pedigree 0.822, pedigree (1,1,5,5,1)
  (same comment as for Cadmium, ion)
- Ammonia [air, urban air close to ground]: 9.08e-7 kg; lognormal variance with pedigree 0.482, pedigree (1,1,5,5,1)
  (same comment as for Mercury)
- Phosphorus [air, urban air close to ground]: 1.02e-8 kg; lognormal variance with pedigree 1.062, pedigree (1,1,5,5,1)
  (same comment as for Mercury)

## Sampling procedure
Landfill model based on observed leachate concentrations in literature. Extrapolated to 60'000 years heeding chemical characteristics. Initial waste composition from various literature sources.

## Extrapolations
This dataset has been extrapolated from year 2000 to the year of the calculation (2021). The uncertainty has been adjusted accordingly.
