# inverter production, for electric passenger car

Dataset: EcoSpold 2, unit process
Geography: GLO
Time period: 2005-01-01 to 2021-12-31
Technology level: modern
Classification: ISIC rev.4 ecoinvent: 2790:Manufacture of other electrical equipment
Scenario: Business-as-Usual
System model: Allocation, cut-off by classification
Generated by: F. Habermacher
Published in: F. Habermacher 2011
Database: ecoinvent
isCopyrightProtected: true
accessRestrictedTo: 1

## General comment
This dataset describes an inverter used in the power electronics of the drivetrain for an electric passenger car. It is based on direct information from Swiss manufacturer Brusa. The entries are given as a function of kg device. The specific inverter which was used for this dataset weights 9.5 kg and is suitable for a 100kW electric drivetrain.

## Included activities start
The dataset starts with reception of the electronic components used in the inverter, the efforts needed for the production of the components as well as the assembly of the converter.

## Included activities end
The activity returns the fully assmebled inverter.

## Technology
This dataset is based on current, high-level standard.

## Reference product
- inverter, for electric passenger car: 1 kg; name RP_amount_1; source F. Habermacher 2011; By-product classification allocatable product; CPC 4613: Parts for the goods of classes 4611 and 4612
  This dataset is based on direct information from the Swiss manufacturer Brusa.
  production volume 85500 kg; name RP_PV_1
    Based on a rough estimate of a total production of about 9000 electric passenger cars.
  property price 187 EUR2005
    Calculated based on assumptions and data from the producer. The producer states, that the price of a power train is around 21000 euro (Bursa, http://www.brusa.biz/fileadmin/Diverses/Download/Flyer/Flyer_Drivetrain_Sets_inkl_Preis.pdf, accessed 20130725). It is estimated, that the market price=basic price + basic price*0.4. The total value (basic price) of the powertrain (21000/(1+0.4)=) 16150 euro is divided between the separate parts of the power train by their weight. The resulting price per kilogram is thus assumed to be the same for all the different parts of the power train (inverter, charger, motor, converter, etc.).

## By-products
- iron scrap, unsorted: 0 kg; source F. Habermacher 2011; CPC 39310: Slag, dross, scalings and other waste from the manufacture of iron or steel; By-product classification Recyclable; pedigree (1,1,1,1,1)
  Total steel scrap from production process.
  production volume 0 kg; = RP_PV_1 * (BP_amount_3 / RP_amount_1)
    Calculated from production volume of reference product using the relative outputs.
  property price 0.149 EUR2005
    Temporary price data. Calculated as 90% of purchasers price based on: estimated at 85% of sorted scrap
  property carbon content 0
    carbon content on a dry matter basis (reserved; not for manual entry)
  properties: water content 0, carbon content, non-fossil 0, dry mass 1 kg, wet mass 1 kg, water in wet mass 0 kg, carbon content, fossil 0, carbon allocation 0 kg
- aluminium scrap, new: 0 kg; source F. Habermacher 2011; By-product classification Recyclable; CPC 39363: Waste and scrap of aluminium; pedigree (1,1,1,1,1)
  Total aluminium scrap from production process.
  production volume 0 kg; = RP_PV_1 * (BP_amount_1 / RP_amount_1)
    Calculated from production volume of reference product using the relative outputs.
  property price 0.806 EUR2005
    Temporary price data. Calculated as 90% of purchasers price based on: 2005 import and export prices (total trades (USD) divided by total weight (kg) in biggest economies of the world: EU27, USA, Brasil, China, India, Japan and Russia) from UN Commodity Trade Statistics Database (http://data.un.org/Explorer.aspxDatabase [Accessed 2011.06.17]). Commodity: Waste or scrap, aluminium
  property carbon content 0
    carbon content on a dry matter basis (reserved; not for manual entry)
  properties: dry mass 1 kg, water in wet mass 0 kg, carbon content, non-fossil 0, water content 0, carbon content, fossil 0, wet mass 1 kg, carbon allocation 0 kg

## Inputs from technosphere
- selective coat, aluminium sheet, nickel pigmented aluminium oxide: 0.000296316 m2; source F. Habermacher 2011; lognormal variance with pedigree 0.0438, pedigree (1,4,5,4,2)
  This dataset is based on direct information from the Swiss manufacturer Brusa.
- aluminium, wrought alloy: 0.663747 kg; source F. Habermacher 2011; lognormal variance with pedigree 0.0438, pedigree (1,4,5,4,2)
  This dataset is based on direct information from the Swiss manufacturer Brusa.
  properties: wet mass 1 kg, dry mass 1 kg
- electricity, low voltage: 0.0124632 kWh; source F. Habermacher 2011; lognormal variance with pedigree 0.0438, pedigree (1,4,5,4,2)
  This dataset is based on direct information from the Swiss manufacturer Brusa.
- copper, cathode: 0.152632 kg; source F. Habermacher 2011; lognormal variance with pedigree 0.0438, pedigree (1,4,5,4,2)
  This dataset is based on direct information from the Swiss manufacturer Brusa.
  properties: dry mass 1 kg, wet mass 1 kg
- resistor, auxilliaries and energy use: 0.00294737 kg; source F. Habermacher 2011; lognormal variance with pedigree 0.0438, pedigree (1,4,5,4,2)
  This dataset is based on direct information from the Swiss manufacturer Brusa.
- sheet rolling, aluminium: 0.663789 kg; source F. Habermacher 2011; lognormal variance with pedigree 0.0438, pedigree (1,4,5,4,2)
  This dataset is based on direct information from the Swiss manufacturer Brusa.
- printed wiring board, for through-hole mounting, Pb containing surface: 0.00120158 m2; = 0.02283*0.5; lognormal variance with pedigree 0.0438, pedigree (1,4,5,4,2)
  This dataset is based on direct information from the Swiss manufacturer Brusa.
  properties: dry mass 3.08 kg, wet mass 3.08 kg, carbon content, fossil 0.203154
- printed wiring board, for through-hole mounting, Pb free surface: 0.00120158 m2; = 0.02283*0.5; lognormal variance with pedigree 0.0438, pedigree (1,4,5,4,2)
  This dataset is based on direct information from the Swiss manufacturer Brusa.
  properties: dry mass 3.08 kg, wet mass 3.08 kg, carbon content, fossil 0.210221
- sheet rolling, steel: 0.0426316 kg; source F. Habermacher 2011; lognormal variance with pedigree 0.0438, pedigree (1,4,5,4,2)
  This dataset is based on direct information from the Swiss manufacturer Brusa.
- wire drawing, copper: 0.152632 kg; source F. Habermacher 2011; lognormal variance with pedigree 0.0438, pedigree (1,4,5,4,2)
  This dataset is based on direct information from the Swiss manufacturer Brusa.
- polyethylene, low density, granulate: 0.00255158 kg; source F. Habermacher 2011; lognormal variance with pedigree 0.0438, pedigree (1,4,5,4,2)
  This dataset is based on direct information from the Swiss manufacturer Brusa.
  properties: heating value, net 42.47 MJ, carbon content, fossil 0.857143, wet mass 1 kg, dry mass 1 kg
- printed wiring board, surface mounted, unspecified, Pb free: 0.0716842 kg; source F. Habermacher 2011; lognormal variance with pedigree 0.0438, pedigree (1,4,5,4,2)
  This dataset is based on direct information from the Swiss manufacturer Brusa.
  properties: carbon content, fossil 0.132522, wet mass 1 kg, dry mass 1 kg
- capacitor, film type, for through-hole mounting: 0.0938947 kg; source F. Habermacher 2011; lognormal variance with pedigree 0.0438, pedigree (1,4,5,4,2)
  This dataset is based on direct information from the Swiss manufacturer Brusa.
  properties: dry mass 1 kg, carbon content, fossil 0.278876, wet mass 1 kg
- brass: 0 kg; source F. Habermacher 2011; pedigree (1,1,1,1,1)
  This dataset is based on direct information from the Swiss manufacturer Brusa.
  properties: dry mass 1 kg, wet mass 1 kg
- waste plastic, industrial electronics: 0 kg; name BP_amount_2; source F. Habermacher 2011; pedigree (1,1,1,1,1)
  Total steel scrap from production process.
  production volume 0 kg
    Calculated from production volume of reference product using the relative outputs.
  property price 0 EUR2005; name BP_amount_2_price_EUR2005
  properties: wet mass 1 kg, heating value, net 34.78 MJ, water content 0.180638, dry mass 0.847 kg, carbon content, fossil 0.81386
- steel, low-alloyed, hot rolled: 0.0426316 kg; source F. Habermacher 2011; lognormal variance with pedigree 0.0438, pedigree (1,4,5,4,2)
  This dataset is based on direct information from the Swiss manufacturer Brusa.
  properties: wet mass 1 kg, dry mass 1 kg, carbon content, fossil 0.005
- heat, central or small-scale, other than natural gas: 33.6421 MJ; source F. Habermacher 2011; lognormal variance with pedigree 0.0438, pedigree (1,4,5,4,2)
  This dataset is based on direct information from the Swiss manufacturer Brusa.
  properties: heating value, net 1 MJ
- aluminium oxide, non-metallurgical: 0 kg; source F. Habermacher 2011; pedigree (1,1,1,1,1)
  This dataset is based on direct information from the Swiss manufacturer Brusa.
  property dry mass 1 kg; name DM
  property carbon content, non-fossil 0; name C_content_non_fossil
  property carbon content, fossil 0; name C_content_fossil
  property wet mass 1 kg; name WM
  property water in wet mass 0 kg; name WWM
  property water content 0; name water_content
- silicone product: 0 kg; source F. Habermacher 2011; pedigree (1,1,1,1,1)
  This dataset is based on direct information from the Swiss manufacturer Brusa.
  properties: wet mass 1 kg, carbon content, fossil 0.324324, dry mass 1 kg, heating value, net 9.83 MJ
- polystyrene, high impact: 0.0210526 kg; source F. Habermacher 2011; lognormal variance with pedigree 0.0438, pedigree (1,4,5,4,2)
  This dataset is based on direct information from the Swiss manufacturer Brusa.
  properties: wet mass 1 kg, carbon content, fossil 0.923077, dry mass 1 kg, heating value, net 38.67 MJ
- polyester resin, unsaturated: 0 kg; source F. Habermacher 2011; pedigree (1,1,1,1,1)
  This dataset is based on direct information from the Swiss manufacturer Brusa.
  properties: heating value, net 17.75 MJ, dry mass 1 kg, carbon content, fossil 0.58584, wet mass 1 kg
- ferrite: 0.032 kg; source F. Habermacher 2011; lognormal variance with pedigree 0.0438, pedigree (1,4,5,4,2)
  This dataset is based on direct information from the Swiss manufacturer Brusa.
  properties: dry mass 1 kg, wet mass 1 kg
- iron scrap, unsorted: -0.00852632 kg; source F. Habermacher 2011; lognormal variance with pedigree 0.0444, pedigree (2,4,5,4,2)
  Total steel scrap from production process.
  production volume 729 kg
  properties: price 0.149 EUR2005, dry mass 1 kg, wet mass 1 kg
- aluminium scrap, new: -0.132168 kg; source F. Habermacher 2011; lognormal variance with pedigree 0.0444, pedigree (2,4,5,4,2)
  Total aluminium scrap from production process.
  production volume 11300.4 kg
  properties: price 0.806 EUR2005, dry mass 1 kg, wet mass 1 kg
- brass: 0.000171684, 0.0341652 kg (2 entries); source F. Habermacher 2011; lognormal variance with pedigree 0.0438, pedigree (1,4,5,4,2)
  This dataset is based on direct information from the Swiss manufacturer Brusa.
- waste plastic, industrial electronics: -3.46216e-5, -0.00229169 kg (2 entries); source F. Habermacher 2011; lognormal variance with pedigree 0.0444, pedigree (2,4,5,4,2)
  Total steel scrap from production process.
  production volume 198.9 kg
- aluminium oxide, non-metallurgical: 0.00254583, 0.000431008 kg (2 entries); source F. Habermacher 2011; lognormal variance with pedigree 0.0438, pedigree (1,4,5,4,2)
  This dataset is based on direct information from the Swiss manufacturer Brusa.
  properties: dry mass 1 kg, wet mass 1 kg
- silicone product: 0.000140109, 0.000285154 kg (2 entries); source F. Habermacher 2011; lognormal variance with pedigree 0.0438, pedigree (1,4,5,4,2)
  This dataset is based on direct information from the Swiss manufacturer Brusa.
- polyester resin, unsaturated: 0.00325559, 0.0222918 kg (2 entries); source F. Habermacher 2011; lognormal variance with pedigree 0.0438, pedigree (1,4,5,4,2)
  This dataset is based on direct information from the Swiss manufacturer Brusa.

## Sampling procedure
Data on materials and technology has been provided directly by the Swiss manufacturer Brusa.

## Extrapolations
This dataset has been extrapolated from year 2015 to the year of the calculation (2021). The uncertainty has been adjusted accordingly.
