# treatment of salt tailing from potash mine, residual material landfill

Dataset: EcoSpold 2, unit process
Geography: RoW
Time period: 1994-01-01 to 2021-12-31
Technology level: current
Classification: ISIC rev.4 ecoinvent: 3822:Treatment and disposal of hazardous waste
Classification: EcoSpold01Categories: waste management/residual material landfill
Synonyms: unusable salts co-mined in potash mining
Tags: Treatment; ConvertedDataset
Scenario: Business-as-Usual
System model: Allocation, cut-off by classification
Generated by: Gabor Doka (obsolete)
Published in: Doka G. 2009
Database: ecoinvent
isCopyrightProtected: true
accessRestrictedTo: 1

## General comment
Inventoried waste contains 100% salt tailings potash mining; .
waste composition (wet, in ppm): H2O n.a.; O 98835; H n.a.; C n.a.; S 49521; N n.a.; P n.a.; B n.a.; Cl 498570; Br n.a.; F n.a.; I n.a.; Ag n.a.; As n.a.; Ba n.a.; Cd n.a.; Co n.a.; Cr n.a.; Cu n.a.; Hg n.a.; Mn n.a.; Mo n.a.; Ni n.a.; Pb n.a.; Sb n.a.; Se n.a.; Sn n.a.; V n.a.; Zn n.a.; Be n.a.; Sc n.a.; Sr n.a.; Ti n.a.; Tl n.a.; W n.a.; Si n.a.; Fe n.a.; Ca 8241.3; Al n.a.; K 6363.9; Mg 47830; Na 290630;
Share of carbon in waste that is biogenic 60.4%.
[This dataset was already contained in the ecoinvent database version 2. It was not individually updated during the transfer to ecoinvent version 3. Life Cycle Impact Assessment results may still have changed, as they are affected by changes in the supply chain, i.e. in other datasets. This dataset was generated following the ecoinvent quality guidelines for version 2. It may have been subject to central changes described in the ecoinvent version 3 change report (http://www.ecoinvent.org/database/ecoinvent-version-3/reports-of-changes/), and the results of the central updates were reviewed extensively. The changes added e.g. consistent water flows and other information throughout the database. The documentation of this dataset can be found in the ecoinvent reports of version 2, which are still available via the ecoinvent website. The change report linked above covers all central changes that were made during the conversion process.]

## Included activities end
Waste-specific short-term emissions to water from leachate. Long-term emissions from landfill to ground water.

## Geography
Technology encountered in Switzerland in 2000. Landfill includes base seal and leachate collection system.

## Technology
Swiss residual material landfill for polluted, inorganic waste. With base seal and leachate collection system. Recultivation after closure.

## Time period
Waste composition as given in literature reference, theoretical data or other source. Transfer coefficients from prospective model.

## Reference product
- salt tailing from potash mine: -1 kg; By-product classification Waste; CPC 39: Wastes or scraps
  EcoSpold01Location=CH
  production volume 3.96633 kg
    This is a placeholder value that does not reflect real-world production volumes. This dataset does not currently require a real-world production volume to work in the database framework, and no actual data were collected yet. This has no negative effect on the results of the ecoinvent database.
  property price 0 EUR2005
    Waste products are assigned a price of zero as they are assumed to require further treatment.
  property carbon content 0
    carbon content on a dry matter basis (reserved; not for manual entry)
  properties: carbon content, non-fossil 0, water in wet mass 0 kg, dry mass 1 kg, water content 0, carbon content, fossil 0, wet mass 1 kg, carbon allocation 0 kg

## Inputs from technosphere
- process-specific burdens, residual material landfill: 0 kg; pedigree (1,1,1,1,1)
  demands per kilogram waste. uncertainty is heeded in the module
  EcoSpold01Location=CH
- residual material landfill: 2.0833e-9 unit; lognormal variance with pedigree 0.042, pedigree (1,1,5,5,1)
  demands per kilogram waste. uncertainty is heeded in the module
  EcoSpold01Location=CH
- process-specific burdens, residual material landfill: 0.282874, 0.717126 kg (2 entries); lognormal variance with pedigree 0.042, pedigree (1,1,5,5,1)
  demands per kilogram waste. uncertainty is heeded in the module
  EcoSpold01Location=CH

## Emissions to nature
- Sulfate [water, ground-, long-term]: 0.13263 kg; lognormal variance with pedigree 0.232, pedigree (1,1,5,5,1)
  uncertainty is calculated from uncertainties in waste composition and transfer coefficients in incinerator and landfills.
- Potassium, ion [water, ground-, long-term]: 0.00457 kg; lognormal variance with pedigree 0.472, pedigree (1,1,5,5,1)
  (same comment as for Sulfate)
- Calcium, ion [water, surface water]: 1.2432e-6 kg; lognormal variance with pedigree 1.332, pedigree (1,1,5,5,1)
  uncertainty is calculated from uncertainties in waste composition and transfer coefficients in residual landfill
- Magnesium [water, surface water]: 9.0728e-6 kg; lognormal variance with pedigree 1.102, pedigree (1,1,5,5,1)
  (same comment as for Calcium, ion)
- Chloride [water, ground-, long-term]: 0.35598 kg; lognormal variance with pedigree 0.062, pedigree (1,1,5,5,1)
  (same comment as for Sulfate)
- Sulfate [water, surface water]: 0.015939 kg; lognormal variance with pedigree 0.342, pedigree (1,1,5,5,1)
  (same comment as for Calcium, ion)
- Magnesium [water, ground-, long-term]: 0.0054346 kg; lognormal variance with pedigree 1.412, pedigree (1,1,5,5,1)
  (same comment as for Sulfate)
- Sodium, ion [water, surface water]: 0.10907 kg; lognormal variance with pedigree 0.112, pedigree (1,1,5,5,1)
  (same comment as for Calcium, ion)
- Chloride [water, surface water]: 0.1426 kg; lognormal variance with pedigree 0.102, pedigree (1,1,5,5,1)
  (same comment as for Calcium, ion)
- Sodium, ion [water, ground-, long-term]: 0.18157 kg; lognormal variance with pedigree 0.092, pedigree (1,1,5,5,1)
  (same comment as for Sulfate)
- Potassium, ion [water, surface water]: 0.0017939 kg; lognormal variance with pedigree 0.502, pedigree (1,1,5,5,1)
  (same comment as for Calcium, ion)
- Calcium, ion [water, ground-, long-term]: 0.00074467 kg; lognormal variance with pedigree 1.882, pedigree (1,1,5,5,1)
  (same comment as for Sulfate)

## Sampling procedure
Landfill model based on observed leachate concentrations in literature. Extrapolated to 60'000 years heeding chemical characteristics. Initial waste composition from various literature sources.

## Extrapolations
This dataset has been copied from an original dataset covering the geography CH. The uncertainty has been adjusted accordingly.

## Review by Niels Jungbluth 2009-02-15
passed.
