# battery production, NCA, Li-ion, rechargeable, prismatic

Dataset: EcoSpold 2, unit process
Geography: RoW
Time period: 2017-01-01 to 2021-12-31
Technology level: current
Classification: ISIC rev.4 ecoinvent: 2720:Manufacture of batteries and accumulators
Synonyms: nickel-cobalt-aluminium battery; nickel-cobalt-aluminium battery, Li-ion
Scenario: Business-as-Usual
System model: Allocation, cut-off by classification
Generated by: Eleonora Crenna
Published in: Dai, Q. 2018
Database: ecoinvent
isCopyrightProtected: true
accessRestrictedTo: 1

## General comment
This dataset represents the production of 1 kg of Li-ion battery pack used e.g. for mechanical drive of an electric vehicle. The inventory is modelled according to the publication of Dai et al. (2017; 2018), in which a battery pack of 143 kg, with gross pack energy of 22.74 kWh made of 140 3.6 V- 46Ah prismatic cells is presented. Cells are made of nickel-cobalt-aluminium (NCA) cathode and a silicon coated graphite-based anode, liquid electrolyte and a porous plastic separator. Infrastructure is included as well in this dataset as "electronic component factory".
Reference:
Dai, Q., Dunn, J., Kelly, J. C., & Elgowainy, A. (2017). Update of Life Cycle Analysis of Lithium-Ion Batteries in the GREET Model. 2017. Argonne National Laboratory.
Dai, Q., Kelly, J. C., Dunn, J., & Benavides, P. (2018). Update of Bill-of-Materials and Cathode Materials Production for Lithium-Ion Batteries in the GREET Model. 2018. Argonne National Laboratory.

## Included activities start
The activity starts with the battery cells, module packaging and the materials for additional components (esternal case, tabs, etc.) entering the factory gate.

## Included activities end
The activity ends with the production of Li-ion battery pack.

## Geography
This dataset is considered representative of the global situation. It is based on data from the geography China, which is the leader country of Li-ion battery production.

## Technology
The battery pack includes module packaging, cells with NCA cathode and silicon coated graphite-based anode and additional components (external case, tabs, electronic components).

## Time period
The time period is from 2017 (year of the collection of data) and 2020 (year of the dataset)

## Reference product
- battery, Li-ion, NCA, rechargeable, prismatic: 1 kg; By-product classification allocatable product; CPC 46410: Primary cells and primary batteries
  production volume 1.69212e8 kg
    The PV is expressed in kg. According to UN Comtrade (https://comtrade.un.org/data/, HS code: 850760) 1317479226 kg Li-ion batteries were traded worldwide in 2019. Approximately 15% are NCA (Benchmark Mineral Intelligence, 2019. The Current Position of Li-ion Raw Material Supply and the Role of Recycling)
  property price 17.816 EUR2005; = 135*0.159*0.83
    Price infromation from: https://www.statista.com/statistics/883118/global-lithium-ion-battery-pack-costs/
  property carbon content 0.224659
    carbon content on a dry matter basis (reserved; not for manual entry)
  properties: dry mass 0.976178 kg, carbon content, non-fossil 0.00153766, wet mass 1 kg, water content 0.0244033, carbon content, fossil 0.223122, copper content 0.0264099, water in wet mass 0.023822 kg, carbon allocation 0.219308 kg

## Inputs from technosphere
- battery cell, Li-ion, NCA: 0.70749 kg; lognormal variance with pedigree 0.0046, pedigree (2,3,2,5,2)
  Literature.
  properties: carbon content, non-fossil 0.00203306, wet mass 1 kg, copper content 0.034895, dry mass 1 kg, carbon content, fossil 0.272818
- sheet rolling, copper: 0.00061 kg; lognormal variance with pedigree 0.0046, pedigree (2,3,2,5,2)
  Proxy for the production of the negative terminals
- ethylene glycol: 0.02383 kg; source Dai, Q. 2018; lognormal variance with pedigree 0.0046, pedigree (2,3,2,5,2)
  Literature. The coolant system is made of ethylene glycol and water in ratio 50:50
  properties: heating value, net 23.44 MJ, carbon content, fossil 0.387097, dry mass 1 kg, wet mass 1 kg
- injection moulding: 0.00425 kg; lognormal variance with pedigree 0.0046, pedigree (2,3,2,5,2)
  Proxy for the production of the plastic component of the battery jacket
- tap water: 0 kg; source Dai, Q. 2018; pedigree (1,1,1,1,1)
  Literature. The coolant system is made of ethylene glycol and water in ratio 50:50
  properties: water content 2962.17, carbon content, fossil 0.00178991, wet mass 1 kg, dry mass 0.000337476 kg
  note on carbon content, fossil: Bicarbonate content is 2.93 mol/m3. CO2 content is 0.1 mol/m3 (ecoinvent v2.2 report 8, Tab 93.1).
- electronic component, passive, unspecified: 0.00463 kg; source Dai, Q. 2018; lognormal variance with pedigree 0.0046, pedigree (2,3,2,5,2)
  Literature. Representative for module interconnections
  properties: carbon content, non-fossil 0.0045566, carbon content, fossil 0.317311, wet mass 1 kg, dry mass 1 kg
- metal working factory: 1.6317e-9 unit; = 1/(40000*300/140*143*50); lognormal variance with pedigree 0.36, pedigree (4,4,5,5,3)
  Calculated value, based on 40000 cells average annual production; 300 operationg days per year; 140 cells per pack; 143 kg pack (Dai et al. 2017); assumption of 50 years lifetime factory
- battery module packaging, Li-ion: 0.05717 kg; source Dai, Q. 2018; lognormal variance with pedigree 0.0046, pedigree (2,3,2,5,2)
  Literature.
  properties: carbon content, fossil 0.061671, dry mass 1 kg, wet mass 1 kg, carbon content, non-fossil 0.0005633
- battery management system, for Li-ion battery: 0.02681 kg; source Dai, Q. 2018; lognormal variance with pedigree 0.0046, pedigree (2,3,2,5,2)
  Literature.
  properties: carbon content, fossil 0.257652, carbon content, non-fossil 0.000574587, dry mass 1 kg, wet mass 1 kg, copper content 0.081
- aluminium, wrought alloy: 0.14498 kg; name Al_input; source Dai, Q. 2018; lognormal variance with pedigree 0.0046, pedigree (2,3,2,5,2)
  Literature. Aluminium used to produce the metalic component of the battery jacket (99.09%) and the battery heating plate (0.91%)
  properties: dry mass 1 kg, wet mass 1 kg
- glass fibre reinforced plastic, polyamide, injection moulded: 0.0002 kg; source Dai, Q. 2018; lognormal variance with pedigree 0.0046, pedigree (2,3,2,5,2)
  Literature. Plastic insulation layer of the battery pack terminals
  properties: carbon content, fossil 0.446018, wet mass 1 kg, dry mass 1 kg
- impact extrusion of aluminium, 1 stroke: 0.143661 kg; = 0.9909* Al_input; lognormal variance with pedigree 0.0046, pedigree (2,3,2,5,2)
  Proxy for the production of the battery jacket, which represents 99.09% of the input aluminium material.
- sheet rolling, aluminium: 0.00131932 kg; = 0.0091*Al_input; lognormal variance with pedigree 0.0046, pedigree (2,3,2,5,2)
  Proxy for the production of the battery heating plate which represents 0.91% of the input aluminium material.
- sheet rolling, steel: 0.0062 kg; lognormal variance with pedigree 0.0046, pedigree (2,3,2,5,2)
  Proxy for the production of module compression plates and straps
- electricity, medium voltage: 0 kWh; source Siret, C, 2018; pedigree (1,1,1,1,1)
  Literature. Conversion factor: 1 MJ = 0.277778 kwh
- reinforcing steel: 0.0062 kg; source Dai, Q. 2018; lognormal variance with pedigree 0.0046, pedigree (2,3,2,5,2)
  Literature. Material for module compression plates and straps
  properties: dry mass 1 kg, wet mass 1 kg, carbon content, fossil 0.004
- polyethylene, high density, granulate: 0.00425 kg; source Dai, Q. 2018; lognormal variance with pedigree 0.0046, pedigree (2,3,2,5,2)
  Literature. Plastic component of the battery jacket
  properties: dry mass 1 kg, heating value, net 42.47 MJ, carbon content, fossil 0.857143, wet mass 1 kg
  note on carbon content, fossil: Polyethylene is formed out of a huge amount of ethylene monomers (C2H4) (ecoinvent v2.2 report 11_II). MW=28 g/mol
- copper, anode: 0.00061 kg; source Dai, Q. 2018; lognormal variance with pedigree 0.0046, pedigree (2,3,2,5,2)
  Literature. Material for the negative terminals
  properties: wet mass 1 kg, copper content 0.997, dry mass 1 kg
- tap water: 0.000479446, 5.77124e-5, 9.53793e-5, 0.00240509, 6.25678e-5, 0.000177973, 0.0205518 kg (7 entries); source Dai, Q. 2018; lognormal variance with pedigree 0.0046, pedigree (2,3,2,5,2)
  Literature. The coolant system is made of ethylene glycol and water in ratio 50:50
- electricity, medium voltage: 5.40996e-6, 1.0374e-6, 2.38203e-5, 1.74157e-5, 8.02911e-5, 3.57022e-5, 0.000116323 kWh (7 entries); source Siret, C, 2018; lognormal variance with pedigree 0.0046, pedigree (2,3,2,5,2)
  Literature. Conversion factor: 1 MJ = 0.277778 kwh

## Sampling procedure
From Literature. Data on battery materials have been entirely retrieved from Dai et al. 2018 (see published source field). The bill of materials has been modelled following the battery scheme presented in Dai et al. 2019 (Life cycle analysis of lithium-ion batteries for automotive applications. Batteries, 5(2), 48). The information on the energy consumption for battery assembly come from Siret et al. (2018), which is the report on Product Environmental Footprint Category Rules for High Specific Energy Rechargeable Batteries for Mobile Applications.

## Extrapolations
The dataset is extrapolated from CN data; the uncertainty has been adjusted accordingly.
