# diesel, burned in agricultural machinery

Dataset: EcoSpold 2, unit process
Geography: GLO
Time period: 1999-01-01 to 2021-12-31
Technology level: current
Classification: ISIC rev.4 ecoinvent: 0161:Support activities for crop production
Tags: WFLDB
Scenario: Business-as-Usual
System model: Allocation, cut-off by classification
Generated by: Silvio Blaser
Database: ecoinvent
isCopyrightProtected: true
accessRestrictedTo: 1

## General comment
This dataset represents an example of 1 MJ (0.0222 kg) diesel burned for running a tractor with a trailer. The inventory represents heavy road transport with tractor and 2 tyre-trailers of max. 8 t loading capacity each. Mean velocity when loaded = 15 km/h. Mean velocity when empty = 25 km/h. Empty return over the same distance included. Transported goods not included. 1 kg Diesel burned (corresponds to 45 MJ diesel) which equates to 1 t of good transported for 1 km. The operation time is 0.0071 h/kg diesel.

## Included activities start
From the load of material to be transported.

## Included activities end
The activity ends with the transportation of tractor and trailer when 1 MJ (0.0222 kg) of diesel is burned. The dataset includes the diesel fuel consumption and the amount of agricultural machinery and of the shed, which has to be attributed to the road transport of goods, with a tractor and two tyre trailers, (goods were not considered). Also taken into consideration is the amount of emissions to the air from combustion and the emission to the soil from tyre abrasion during the transport. The following activities where considered part of the work process: preliminary work at the plant, like attaching the trailer to the tractor; road transport for 0.0222 km and concluding work, like uncoupling the machine. The dataset doesn't include the dust other than from combustion and noise.

## Time period
Time period referring to the data source: 1999-2001. Based on expert opinion data is considered to be valid at least up to 2012.

## Parameters
- LUC_crop_specific: 1 dimensionless
  This parameter allows to switch between a 'crop specific' and a 'country specific' approach when calculating the LUC of a crop. By default, the chosen approach is 'crop specific', so the value of the parameter is 1. If you want to apply a 'country specific' approach, turn the parameter to 0.

## Reference product
- diesel, burned in agricultural machinery: 1 MJ; CPC 86119: Other support services to crop production; By-product classification allocatable product
  1.0 MJ (i.e. 0.0222 kg) diesel burned in tractor. Includes diesel production and combustion, tractor manufacturing and road abrasion. 1 kg diesel (45 MJ) corresponds to 1 t of good transported for 1 km. The operation time is 0.0071 h/kg diesel.
  production volume 4 MJ
    This is a placeholder value that does not reflect real-world production volumes. This dataset does not currently require a real-world production volume to work in the database framework, and no actual data were collected yet. This has no negative effect on the results of the ecoinvent database.
  property price 0.0309665 EUR2005
    Calculated based on inputs: The price of the product has been calculated as a sum of the values of the material and energy inputs for this product. This value is therefore a rough estimation. It may underestimate the real price since there are additional expenses when producing any product. These expences can include for example labour costs, treatment of waste materials and profit for the producer. Please consider carefully whether this level of data quality is acceptable for your application.

## Inputs from technosphere
- tractor, 4-wheel, agricultural: 0.00155 kg; lognormal variance with pedigree 0.020891, pedigree (1,4,4,1,1)
  The functional unit is 1kg machinery during its lifetime. Assumptions: machinery weight of 3000 kg, 7000 hours lifetime and 0.74 repair factor; representativeness of this class of machinery are for example: tractor. The value is calculated by multiplying the weight of the machinery with the operation time (1.63E-01 hours per kg of diesel) and dividing by the lifetime capacity (7000 h) and the calorific value of diesel (45 ML per kg of diesel).
- diesel: 0.0222222 kg; lognormal variance with pedigree 0.020891, pedigree (1,4,4,1,1)
  properties: heating value, net 42.8 MJ, wet mass 1 kg, carbon content, fossil 0.865, dry mass 1 kg
- agricultural trailer: 0.00362 kg; lognormal variance with pedigree 0.020891, pedigree (1,4,4,1,1)
  The functional unit is 1kg machinery during its lifetime. Calculations are made with a mean machinery weight of 1000 kg, 1000 hours lifetime and 0.54 repair factor. Representatives of this class of machinery are for example: seeder, hoe or self-loading trailer. The value is calculated by multiplying the weight of the machinery with the operation time (1.63E-01 hours per kg of diesel) and dividing by the lifetime capacity (1000 h) and the calorific value of diesel (45 ML per kg of diesel).
- shed: 3.46e-5 m2; lognormal variance with pedigree 1.22427, pedigree (1,4,4,1,1)
  For storage of divers materials

## Emissions to nature
- Lead [soil, agricultural]: 1.74822e-8 kg; lognormal variance with pedigree 0.185318, pedigree (1,4,4,1,1)
  Soil emissions from tyre abrasion. Calculated according to 'Life Cycle Inventories of Agricultural Systems. Data v2.0 (2007).' ecoinvent report No. 15.
- Particulates, < 2.5 um [air, non-urban air or from high stacks]: 0.000109072 kg; lognormal variance with pedigree 1.25964, pedigree (1,2,4,1,3)
  Emissions to air from combustion. Calculated according to 'Life Cycle Inventories of Agricultural Systems. Data v2.0 (2007).' ecoinvent report No. 15.
- Heat, waste [air, non-urban air or from high stacks]: 1.00917 MJ; lognormal variance with pedigree 0.020891, pedigree (1,4,4,1,1)
  Heat emissions from combustion. Calculated according to 'Life Cycle Inventories of Agricultural Systems. Data v2.0 (2007).' ecoinvent report No. 15.
- NMVOC, non-methane volatile organic compounds, unspecified origin [air, non-urban air or from high stacks]: 4.76555e-5 kg; lognormal variance with pedigree 0.185318, pedigree (1,4,4,1,1)
  (same comment as for Particulates, < 2.5 um)
- Methane, fossil [air, non-urban air or from high stacks]: 2.86952e-6 kg; lognormal variance with pedigree 0.213845, pedigree (1,2,4,1,3)
  (same comment as for Particulates, < 2.5 um)
- PAH, polycyclic aromatic hydrocarbons [air, non-urban air or from high stacks]: 7.28848e-8 kg; lognormal variance with pedigree 1.25964, pedigree (1,2,4,1,3)
  (same comment as for Particulates, < 2.5 um)
- Cadmium [soil, agricultural]: 3.97554e-9 kg; lognormal variance with pedigree 0.185318, pedigree (1,4,4,1,1)
  (same comment as for Lead)
- Sulfur dioxide [air, non-urban air or from high stacks]: 2.24261e-5 kg; lognormal variance with pedigree 0.0524361, pedigree (1,2,4,1,3)
  (same comment as for Particulates, < 2.5 um)
- Copper [air, non-urban air or from high stacks]: 3.77676e-8 kg; lognormal variance with pedigree 2.63852, pedigree (1,2,4,1,3)
  (same comment as for Particulates, < 2.5 um)
- Selenium [air, non-urban air or from high stacks]: 2.22222e-10 kg; lognormal variance with pedigree 0.213845, pedigree (1,2,4,1,3)
  (same comment as for Particulates, < 2.5 um)
- Benzene [air, non-urban air or from high stacks]: 1.6208e-7 kg; lognormal variance with pedigree 0.213845, pedigree (1,2,4,1,3)
  (same comment as for Particulates, < 2.5 um)
- Dinitrogen monoxide [air, non-urban air or from high stacks]: 2.66565e-6 kg; lognormal variance with pedigree 0.213845, pedigree (1,2,4,1,3)
  (same comment as for Particulates, < 2.5 um)
- Zinc [soil, agricultural]: 1.07034e-5 kg; lognormal variance with pedigree 0.185318, pedigree (1,4,4,1,1)
  (same comment as for Lead)
- Nitrogen oxides [air, non-urban air or from high stacks]: 0.000866463 kg; source EEA 2013; lognormal variance with pedigree 0.185318, pedigree (1,4,4,1,1)
  (same comment as for Particulates, < 2.5 um)
- Nickel [air, non-urban air or from high stacks]: 1.55454e-9 kg; lognormal variance with pedigree 2.63852, pedigree (1,2,4,1,3)
  (same comment as for Particulates, < 2.5 um)
- Ammonia [air, non-urban air or from high stacks]: 4.44444e-7 kg; source EEA 2013; lognormal variance with pedigree 0.214445, pedigree (1,2,4,4,3)
  (same comment as for Particulates, < 2.5 um)
- Carbon monoxide, fossil [air, non-urban air or from high stacks]: 0.000130479 kg; lognormal variance with pedigree 2.60673, pedigree (1,4,4,1,1)
  (same comment as for Particulates, < 2.5 um)
- Cadmium [air, non-urban air or from high stacks]: 2.22222e-10 kg; lognormal variance with pedigree 2.63852, pedigree (1,2,4,1,3)
  (same comment as for Particulates, < 2.5 um)
- Zinc [air, non-urban air or from high stacks]: 2.22222e-8 kg; lognormal variance with pedigree 2.63852, pedigree (1,2,4,1,3)
  (same comment as for Particulates, < 2.5 um)
- Carbon dioxide, fossil [air, non-urban air or from high stacks]: 0.069317 kg; lognormal variance with pedigree 0.0524361, pedigree (1,2,4,1,3)
  (same comment as for Particulates, < 2.5 um)
- Chromium [air, non-urban air or from high stacks]: 1.11111e-9 kg; lognormal variance with pedigree 2.63852, pedigree (1,2,4,1,3)
  (same comment as for Particulates, < 2.5 um)
- Benzo(a)pyrene [air, non-urban air or from high stacks]: 6.67686e-10 kg; lognormal variance with pedigree 2.63852, pedigree (1,2,4,1,3)
  (same comment as for Particulates, < 2.5 um)

## Sampling procedure
The inventory is based on the ecoinvent activity 'transport, tractor and trailer, agricultural, CH'. Adaptation: The function unit is replaced from 1 tkm to 1 MJ (i.e.0.0222 kg) diesel.
The inventoried HC, NOx, CO and fuel consumption values are measurements made following two test cycles (ISO 8178 C1 test and a specific 6-level-test created by Agroscope) and on measurements made during the field work. The other emissions were calculated basing on literature data and the measured fuel consumption.
The inventories are based on measurements made by the Institute for Sustainability Sciences of Agroscope. Fuel consumption and emissions were taken from recent literature of Agroscope, expert's estimations or unpublished data.

## Extrapolations
This dataset has been extrapolated from year 2012 to the year of the calculation (2021). The uncertainty has been adjusted accordingly.
