# natural gas, high pressure, import from RU

Dataset: EcoSpold 2, unit process
Geography: DK
Time period: 2012-01-01 to 2021-12-31
Technology level: current
Classification: ISIC rev.4 ecoinvent: 4930:Transport via pipeline
Scenario: Business-as-Usual
System model: Allocation, cut-off by classification
Generated by: Mireille Faist Emmenegger
Published in: Faist Emmenegger, Mireille 2015
Database: ecoinvent
isCopyrightProtected: true
accessRestrictedTo: 1

## General comment
This dataset describes the transport needed for the export of Russian natural gas to Denmark (expressed in tkm). Gas losses and emissions during seasonal storage are included. An average distance of 6100 km is estimated for the export.
.Characteristics are based on the ecoinvent report v2 'Erdgas' from 2007: HV; 40.14 MJ/m-3; density, 0.73 kg/m-3, 0.716 kg CH4/m-3, 0.001 kg CO2/m-3

## Included activities start
'Exit gate' of natural gas field

## Included activities end
'Entry gate' of national market.

## Geography
The average weighted export distance is based on the trade movements 2012.

## Technology
The distance to the different countries is based on rough estimates.

## Reference product
- natural gas, high pressure: 1 m3; CPC 12020: Natural gas, liquefied or in the gaseous state; By-product classification allocatable product; CAS 14493-06-2
  production volume 1.36e7 m3
    m3 imported 2012 from RU to DK. Total amount of natural gas imports to Denmark according to Central Intelligence Agency (n.d.), The World Factbook, split on countries of origin according to supply mix shares as reported by Schori et al. (2012). Reference(s): Central Intelligence Agency (n.d.) The World Factbook. FIELD LISTING : NATURAL GAS - IMPORTS. Retrieved online from https://www.cia.gov/library/publications/resources/the-world-factbook/fields/2252.html#da, August 31, 2017. Schori S., Frischknecht R., 2012, Life Cycle Inventory of Natural Gas Supply. ESU-services Ltd., Zürich, CH, commissioned by the Swiss Federal Office of Energy SFOE.
  properties: price 0.166 EUR2005, dry mass 0.84 kg, carbon content, fossil 0.602381, water in wet mass 0 kg, heating value, gross 0 MJ, wet mass 0.84 kg, carbon content, non-fossil 0, water content 0, heating value, net 39 MJ, carbon content 0.602381, carbon allocation 0.506 kg

## Inputs from technosphere
- transport, pipeline, long distance, natural gas: 1.095 metric ton*km; = (6100-4600)*0.73/1000
  Average distance from Russian border to importing country multiplied by density of the natural gas.
- natural gas, high pressure: 1.0001 m3; source Faist Emmenegger, M. 2007; lognormal variance with pedigree 0.026, pedigree (4,1,4,1,1)
  average losses
  Uncertainty: a
  properties: dry mass 0.84 kg, carbon content, fossil 0.602381, wet mass 0.84 kg, heating value, net 39 MJ
  note on carbon content, fossil: An average C content of 0.506 kg C/ m3 has been assumed (this average has been calculated using data in Tab 3.5, ecoinvent v2.2 report 6_V
  note on heating value, net: Literature value, Source: United Nations Statistics Division (2018) International Recommendations for Energy Statistics (IRES). Available at: http://unstats.un.org/unsd/statcom/doc11/BG-IRES.pdf.
- transport, pipeline, long distance, natural gas: 3.358 metric ton*km; = 4600*0.73/1000; lognormal variance with pedigree 0.1286, pedigree (2,1,4,1,1)
  Average distance from producer to Russian border multiplied by density of the natural gas.
  Uncertainty: A
- natural gas, burned in gas motor, for storage: 0.0546 MJ; source Faist Emmenegger, M. 2007; lognormal variance with pedigree 0.036, pedigree (4,1,4,5,3)
  Data from german industrial expert for 2001, standard technology
  Uncertainty: D
  properties: heating value, net 1 MJ

## Emissions to nature
All rows: source Faist Emmenegger, M. 2007
- Ethane [air, non-urban air or from high stacks]: 6e-7 kg; lognormal variance with pedigree 0.1286, pedigree (2,1,4,1,1)
  calculated based on average losses and russian gas composition
  Uncertainty: c
- Butane [air, non-urban air or from high stacks]: 1e-7 kg; lognormal variance with pedigree 0.1286, pedigree (2,1,4,1,1)
  calculated based on average losses and russian gas composition
  Uncertainty: c
- Propane [air, non-urban air or from high stacks]: 2e-7 kg; lognormal variance with pedigree 0.1286, pedigree (2,1,4,1,1)
  calculated based on average losses and russian gas composition
  Uncertainty: c
- Mercury [air, non-urban air or from high stacks]: 1e-12 kg; lognormal variance with pedigree 0.0486, pedigree (2,1,4,1,1)
  calculated based on average losses and russian gas composition
  Uncertainty: c
- Carbon dioxide, fossil [air, non-urban air or from high stacks]: 1e-7 kg; lognormal variance with pedigree 0.0086, pedigree (2,1,4,1,1)
  calculated based on average losses and russian gas composition
  Uncertainty: c
- Methane, fossil [air, non-urban air or from high stacks]: 7.16e-5 kg; lognormal variance with pedigree 0.1286, pedigree (2,1,4,1,1)
  calculated based on average losses and russian gas composition
  Uncertainty: c
- NMVOC, non-methane volatile organic compounds, unspecified origin [air, non-urban air or from high stacks]: 1e-7 kg; lognormal variance with pedigree 0.1286, pedigree (2,1,4,1,1)
  calculated based on average losses and russian gas composition
  Uncertainty: c

## Extrapolations
This dataset has been extrapolated from year 2012 to the year of the calculation (2021). The uncertainty has been adjusted accordingly.
