# lignite mine operation

Dataset: EcoSpold 2, unit process
Geography: IN
Time period: 2006-01-01 to 2021-01-01
Technology level: current
Classification: ISIC rev.4 ecoinvent: 0520:Mining of lignite
Classification: EcoSpold01Categories: lignite/production
Scenario: Business-as-Usual
System model: Allocation, cut-off by classification
Generated by: [Deleted]P V Kiran Ananth
Published in: P V Kiran Ananth 2017
Database: ecoinvent
isCopyrightProtected: true
accessRestrictedTo: 1

## General comment
The datasets represents the production if 1 Kg lignite for India. The data values like diesel consumption, spoil, electricity for the dataset is taken from annual reports and other environment statements which are mentioned in the particular exchange comments. Due to unavailability of india specific data, the data for water and various emissions to air and water have been taken from the global datasets - "Lignite mine operation"/GLO - 1994.
The activity starts from extraction of lignite present under the rock to final loading into vehicles to be sent for transportation. Lignite is one of the major fuels used in India. It a premature variety of coal is a dark brown to black combustible mineral formed over millions of years by the partial decomposition of plant material subject to increased pressure and temperature in an airless atmosphere. In simple terms, lignite is a brown coal. In its natural form, lignite is porous, light in weight and contains a high percentage of moisture and volatile matters as compared to Fixed Carbon. Because of this, its transportation, over long distances is uneconomical. Therefore, this fuel is ideally suitable for running lignite based power generation plant located close to pit head.
Estimated Lignite reserves in India as on 31st March 2016 were 44.59 Billion Metric Tonnes. The mining of Lignite in India is mostly concentrated in Rajasthan and Tamilnadu. Both of these contribute to almost 92.87 % of total lignite reserves in the country.
The major companies which are in to extraction of Lignite are Neyveli Lignite corporation (NLC - contributing to alomost 58 % of overall lignite production) , Gujarat Mineral Development Corporation (GMDCL contributes to almost 7 % of overall lignite production) , Barmer Lignite Mining Company Limited (BLMCL contrbutes to almost 6.6 % of overall Lignite Production)

## Included activities start
Mining process starting from brown coal, in ground.

## Included activities end
This activity ends with 1 kg lignite at the lignite mine. This covers various details like electricity , diesel consumption for lignite mining. Also details for spoil and land transformation and occupation details for operation and restoration of mine are taken into account.

## Geography
The lignite mining in India is mainly concentrated in the states of Rajasthan and Tamilnadu which contributes to almost 93 % of overall Lignite reserves
The dataset is representative of mining in the above area.

## Technology
At present open cast mining is being adopted for lignite mining throughout the world. Underground mining are not followed due to weak roof and floor condition, spontaneous combustion nature of lignite, existence of high pressure aquifer system below lignite.
About 80% of total lignite reserves in the country occur below the depth of 150 meter and mining of this lignite is not economical with the present day technologies viz. continuous mining using Specialised Mining Equipment and Conventional mining using Shovel and Dumper. Though 20% of resources fall within 150m depths, part of the resource fall in high stripping ratio, thin and multiple seams, surface, constraints, environmental issues, etc. To exploit the deep seated lignite, technologies like underground coal gasification are to be developed and adopted.
Owing to low heat value of the mineral and high moisture content, higher productivity has to be achieved in the opencast mines with a compulsory pit head linkage to make lignite mining economically viable.
Neyveli Lignite Corporation: German excavation technology in open cast mining, using Bucket Wheel Excavators, Conveyors and Spreaders were used for the first time in the country in Neyveli Mine-I.
Gujarat Mineral Development Corporation Limited: Tadkeshwar Lignite mines have opencast mining Using Hydraulic excavators and dumper combination along with ancillary equipments such as Dozer, Water Sprinkler, Motor Grader etc.
Barmer Lignite Mining company limited has adoopted conventional Shovel Dumper combination available for opencast mining for both Kapurdi and Jalpia Mines

## Time period
Data Collected are collected over the years 2006 - 2016 , They are estimated to be valid till 2020. The data collected has been taken from the annual reports from 2014-15 and statistics of mines in India Volume - 1 (Coal ) for the year 2014 and several other environmental statements available for various mines in india

## Parameters
- fraction, process water, to air: 0.15 dimensionless; name fraction_PW_to_air; lognormal variance with pedigree 0.092025, pedigree (4,4,3,2,4)
  Literature value. In case when no industry/process specific data are available, default evaporation fraction value is used. This value is 15% and is based on literature (Statistics Canada, 2007 & Shaffer, K.H., 2008, Consumptive water use in the Great Lakes Basin, USGS & Shiklomanov, 2003, World Water Resources at the Beginning of the 21st Century) and has been approved by an expert.

## Reference product
- lignite: 1 kg; CPC 11030: Brown coal; By-product classification allocatable product; CAS 129521-66-0
  1 Kg of brown coal is assumed to equate to 1 Kg of lignite product
  EcoSpold01Location=RER
  production volume 4.3843e10 kg
    Literature Data: The data for lignite production is for the year 2015 - 16 and has been taken up from Provisional Coal Statistics - 2015- 16, The data is published by Ministry of Coal.
  property carbon content, fossil 0.655
    C content of dry lignite is 58-73% (specified in Tab 1.1, report 6, part VI). A mean content of 0.655 kg C/kg dry lignite was considered.
  property heating value, net 8.8 MJ
    Based on literature, page 52, Dones R., Bauer C., Bolliger R., Burger B., Faist Emmenegger M., Frischknecht R., Heck T., Jungbluth N., Röder A., Tuchschmid M. (2007) Life Cycle Inventories of Energy Systems: Results for Current Systems in Switzerland and other UCTE Countries. ecoinvent report No. 5. Paul Scherrer Institut Villigen, Swiss Centre for Life Cycle Inventories, Dübendorf, CH.
  property price 0.042 EUR2005
    Calculated value based on data from United Nations Commodity Trade Statistics Database (comtrade.un.org). UN comtrade category: 270210 Lignite, not agglomerated. Year 2007. Using exchange rate of 1EURO = 1.209 USD. Average of price of import into 5 main markets (EU, US, JP, IN and CN).
  property carbon content 0.655
    carbon content on a dry matter basis (reserved; not for manual entry)
  properties: dry mass 0.42 kg, wet mass 1 kg, water in wet mass 0.58 kg, water content 1.38095, carbon content, non-fossil 0, carbon allocation 0.2751 kg

## Inputs from technosphere
- spoil from lignite mining: -9.89048 kg; lognormal variance with pedigree 0.0103, pedigree (1,2,2,1,1)
  EcoSpold01Location=GLO
  Literature Data: The data is taken from annual report of Neyvelli Lignite Corporation for the year 2015-16. The data corresponds to more than 50 % of the entire Lignite mining in India
  production volume 4.33628e11 kg
    Calculated from the production volume of lignite in proportion to the respective output amounts.
  properties: wet mass 1 kg, dry mass 1 kg, carbon content, fossil 0.007879
  note on carbon content, fossil: Lignite spoil composition from Tab 3.1, (Doka G. (2009) Life Cycle Inventory of the disposal of lignite spoil, coal spoil and coal tailings. Doka Life Cycle Assessments, Zurich. Commissioned by the Swiss Centre for Life Cycle Inventories ecoinvent Centre)
- mine infrastructure, open cast, lignite: 1e-11 unit; lognormal variance with pedigree 0.0493, pedigree (2,5,5,3,2)
  Value taken from "lignite mine operation"/GLO - 1994 accessed 27 Nov 2017. The below comment has been retained from the same. Estimation: The amounts of waste due to infrastructure are considered in the respective modules.
  EcoSpold01Location=RER
- blasting: 0.000211226 kg; lognormal variance with pedigree 0.0063, pedigree (1,2,2,1,1)
  Literature Data: Data Value is taken from Statistics of Mines in India - Volume -1 (Coal) - 2014
- diesel, burned in building machine: 0.0309 MJ; lognormal variance with pedigree 0.1209, pedigree (1,3,2,3,1)
  Estimation: The estimation is based on data collected from Final EIA report for Expansion of Mine 1A of Lignite Mines for Neyveli Lignite Corporation Limited. The diesel consumption predicted is 2269 KL/annum for 3.0 MPTA annual production.
  EcoSpold01Location=GLO
  properties: heating value, net 1 MJ
- electricity, high voltage: 0.02565 kWh; lognormal variance with pedigree 0.1208, pedigree (1,3,2,1,1)
  EcoSpold01Location=UCTE
  Literature Data: The Data is for Mine - 1 of Neyveli Lignite Corporation. The above data was presented by Neyveli Lignite Corporation at National Energy Energy Conservation Awards conducted by Bureau of Energy Efficiency and is published at the below link http://knowledgeplatform.in/wp-content/uploads/2016/03/22.-Mining-Page-162-169.pdf

## Inputs from nature
- Transformation, from unspecified [natural resource, land]: 0.000193 m2; lognormal variance with pedigree 0.3023, pedigree (1,4,2,3,1)
  Literature Data: The data is taken from Environment statement of VS Lignite Power Limited and GIPCL Mangrol Valia Lignite Mine. 50 % of land transformation is assumed for mineral extraction and 50 % of land transformation is assumed for dump site.
- Coal, brown, in ground [natural resource, in ground]: 1 kg; lognormal variance with pedigree 0.0002, pedigree (1,1,2,1,1)
  Own Estimation
- Transformation, to mineral extraction site [natural resource, land]: 9.64e-5 m2; lognormal variance with pedigree 0.3023, pedigree (1,4,2,3,1)
  (same comment as for Transformation, from unspecified)
- Occupation, dump site [natural resource, land]: 0.01157 m2*year; lognormal variance with pedigree 0.3023, pedigree (1,4,2,3,1)
  Literature Data: The data is taken from Environment statement of VS Lignite Power Limited and GIPCL Mangrol Valia Lignite Mine. 50 % of land transformation is assumed for mineral extraction and 50 % of land transformation is assumed for dump site.
  To calculate land occupation mine life was taken as 20 years as mentioned in the environment statment and additional 100 years were considered for revegetation of the mine.
- Transformation, to dump site [natural resource, land]: 9.64e-5 m2; lognormal variance with pedigree 0.3023, pedigree (1,4,2,3,1)
  (same comment as for Transformation, from unspecified)
- Occupation, mineral extraction site [natural resource, land]: 0.01157 m2*year; lognormal variance with pedigree 0.3023, pedigree (1,4,2,3,1)
  (same comment as for Occupation, dump site)
- Water, well, in ground [natural resource, in water]: 0.0035 m3; name water_well_in_ground_input; lognormal variance with pedigree 0.1693, pedigree (2,5,5,3,2)
  Value taken from "lignite mine operation"/GLO - 1994 accessed 27 Nov 2017. The below comment has been retained from the same. Estimation: Apart from spoil and lignite also huge amounts of water are mined. Figures for Germany amount to 6 m3/t. Water extraction has a large share of the total energy consumption of coal mining. Due to the fact that other opencast mines show smaller depths and lower delivery rates, it is assumed that the average value for water extraction may be lower.
  Estimation. Apart from spoil and lignite also huge amounts of water are mined. Figures for Germany amount to 6 m3/t. Water extraction has a large share of the total energy consumption of coal mining. Due to the fact that other opencast mines show smaller depths and lower delivery rates, it is assumed that the average value for water extraction may be lower.

## Emissions to nature
- Water [water, unspecified]: 0.002975 m3; name water_to_water_unspecified; = water_well_in_ground_input*(1-fraction_PW_to_air); lognormal variance with pedigree 0.0807, pedigree (2,2,5,1,1)
  Calculated value based on literature values and expert opinion. See comments in the parametres' comment field.
  property fraction, origin: unspecified 0; name fraction_origin_unspecified_Ww
  property dry mass 0 kg; name DM
  property carbon content, non-fossil 0; name C_content_non_fossil
  property carbon content, fossil 0; name C_content_fossil
  property wet mass 1000 kg; name WM
  property fraction, origin: fresh water 1; name fraction_origin_fresh_water_Ww
  property fraction, origin: salt water 0; name fraction_origin_salt_water_Ww
  property water in wet mass 1000 kg; name WWM
- Solids, inorganic [water, ground-]: 0.0035 kg; lognormal variance with pedigree 0.1693, pedigree (2,5,5,3,2)
  Value taken from "lignite mine operation"/GLO - 1994 accessed 27 Nov 2017. The below comment has been retained from the same. Estimation: Due to the lack of information a rough estimation of emissions to water is made. For mining regions outside Germany (6 m3/t) a water elevation of 1 m3/t is assumed. In general a salinity degree of 1 g/l is estimated. According to Euler this figure represents an assumption and is likely to be higher; no differentiation between different kinds of salt was made. Furthermore it was assumed that 40 kg pyrite (FeS2) per ton pit coal are worn in overburden and are released untreated with ground water as Fe2+ and SO42- into the discharge system. These are very rough estimations and are not based on literature sources but shall be included in the dataset. The potential effects of lowering the pH-value and leaching of micronutrients are not included in the dataset.
- Radon-222 [air, non-urban air or from high stacks]: 0.003 kBq; lognormal variance with pedigree 0.6993, pedigree (2,5,5,3,2)
  Value taken from "lignite mine operation"/GLO - 1994 accessed 27 Nov 2017. The below comment has been retained from the same. Estimation: Radon emissions arise out of the release of coal and overburden. If the overburden is loose (e.g. Rheinland) emissions during mining are low, because the gas release already happened. About 20 % of the radon concentration of coal plus twice the concentration are emitted via overburden, which corresponds to 12 Bq/kg coal. These figures are assumed to be valid for hard coal and could be lower for lignite. In the UCTE-area most of lignite is mined in seams with loose overburden. Thus, in this dataset it is assumed that one quarter of these emissions are emitted, which corresponds to 3 Bq/kg coal.
- Particulates, > 10 um [air, non-urban air or from high stacks]: 0.0004 kg; lognormal variance with pedigree 0.1693, pedigree (2,5,5,3,2)
  Value taken from "lignite mine operation"/GLO - 1994 accessed 27 Nov 2017. The below comment has been retained from the same. Estimation. Due to the high water content, lignite has low dust emissions, compared to the overburden where high dust emissions can be expected. Barriers, green areas and water sprinklers are installed to avoid high dust emissions. A large part of emissions remain in the opencast mine and is deposited within the mining region. However, fine particles are emitted and result in dust exposure in the near surroundings. To estimate dust emissions for the UCTE-region a mining region with a diameter of 4 km and an annual mining output of 15 Mio. t are assumed. At the edge of the area 0,2 g/(m2*d) emissions and at a distance of 3 km 0.1 g/(m2*d) are assumed to be measured. At a distance of 6 km emissions are assumed to be insignificant. According to these assumptions annual dust emissions of 0,4 kg/t lignite are estimated. In UBA for lignite treatment 0,2 kg/t lignite during distribution and transport are estimated. In this dataset the previous approach is used because it can be assumed that total emissions in Europe are two times higher than the figures given in UBA.
- Methane, fossil [air, non-urban air or from high stacks]: 0.0009044 kg; lognormal variance with pedigree 0.1622, pedigree (3,1,2,1,4)
  Estimation based on available emission factors for Coal mining in India.
  Following are the emission factors available for India. Methane Emission factor for opencast mining in India (cubic meter / ton of coal mined) is 1.18 for mining operation and 0.15 for post mining activities (handling).
  The above emission factors are taken from GHG platform India 2005-2013 National Estimates - 2017 Series. These can be referred in a excel file available at http://www.ghgplatformindia.org/electricityenergy-sector under the section Download: Phase 2 (2005- 2013) National Level Estimate.
  The density of methane is taken as 0.68 Kg/cubic meter, the same value is taken while converting from meter cube to kg. The same is also mentioned in the above source. Also since lignite mining is only done through open cast mining the emission factors are considered only for open cast mining.
- Sulfate [water, ground-]: 0.0033 kg; lognormal variance with pedigree 0.1693, pedigree (2,5,5,3,2)
  (same comment as for Solids, inorganic)
- Water [air, unspecified]: 0.000525 m3; name water_to_air_unspecified; = (water_well_in_ground_input*fraction_PW_to_air); lognormal variance with pedigree 0.0807, pedigree (2,2,5,1,1)
  (same comment as for Water)
  property fraction, origin: salt water 0; name fraction_origin_salt_water
  property fraction, origin: fresh water 1; name fraction_origin_fresh_water
  property fraction, origin: unspecified 0; name fraction_origin_unspecified
- Iron, ion [water, ground-]: 0.0016 kg; lognormal variance with pedigree 0.1698, pedigree (2,5,5,4,2)
  Value taken from "lignite mine operation"/GLO - 1994 accessed 27 Nov 2017. The below comment has been retained from the same. Estimation. Due to the lack of information a rough estimation of emissions to water is made. For mining regions outside Germany (6 m3/t) a water elevation of 1 m3/t is assumed. In general a salinity degree of 1 g/l is estimated. According to Euler this figure represents an assumption and is likely to be higher; no differentiation between different kinds of salt was made. Furthermore it was assumed that 40 kg pyrite (FeS2) per ton pit coal are worn in overburden and are released untreated with ground water as Fe2+ and SO42- into the discharge system. These are very rough estimations and are not based on literature sources but shall be included in the dataset. The potential effects of lowering the pH-value and leaching of micronutrients are not included in the dataset.

## Sampling procedure
literature data: Annual Report Neyveli Lignite Corporation 2015 - 16 , Final EIA report for Expansion of Mine 1A of Lignite Mines for Neyveli Lignite Corporation Limited, Statistics of Mines in India - Volume -1 (Coal) - 2014

## Extrapolations
This dataset has been extrapolated from year 2020 to the year of the calculation (2021). The uncertainty has been adjusted accordingly.
