# greenhouse construction, glass walls and roof, plastic tubes

Dataset: EcoSpold 2, unit process
Geography: RoW
Time period: 2005-01-01 to 2021-12-31
Technology level: current
Classification: ISIC rev.4 ecoinvent: 4100:Construction of buildings
Tags: WFLDB
Scenario: Business-as-Usual
System model: Allocation, cut-off by classification
Generated by: [System]
Database: ecoinvent
isCopyrightProtected: true
accessRestrictedTo: 1

## General comment
This global dataset is a copy of the regional FR dataset, except for the following modifications.
The production volume represents the global annual production.
The geographicalCorrelation score of every pedigree matrix of was changed to '5'.
The comments below were part of the FR regional dataset.
This dataset represents the production and dismantling of 1 m2 of greenhouse with glass walls and roof and plastic tubes.
This greenhouse is made of a structure of polyethylene tubes, covered with glass plates. Its lifetime is minimally 25 years. It comprises of a heating system and fume condenser. Such greenhouses represent recent technology (after 2002) and typically cover large surfaces (7 ha in average). A network of steel pipes is used to deliver heat (hot water at 50-80°C), on the ground (thermo-siphon) and at the height of the plants (growth pipes). A boiler is used to store hot water. CO2 from combustion is recovered and injected again into the greenhouse as to increase photosynthesis. The greenhouse also includes a fertigation system made of a network of polyethylene pipes. Other auxiliary facilities are also considered.

## Included activities start
This activity starts with the production of materials used to build the greenhouse and permanent technical infrastructure.

## Included activities end
This dataset includes the production of the greenhouse as well as the permanent technical infrastructure. For the greenhouse are included its bearing structure (steel and aluminum tubes) and covering materials (glass). Technical infrastrctucture includes heating and cooling systems, fertigation system, CO2 injection system, storage facilities and permanent working equipments such as trolley systems.
The activity ends with the disposal and recycling of all the materials.

## Time period
Time period referring to the data source: 2005-2009. Based on expert opinion data is considered to be valid at least up to 2012.

## Reference product
- greenhouse, glass walls and roof: 1 m2*year; name RP; CPC 3870: Prefabricated buildings; By-product classification allocatable product
  production volume 3.81304 m2*year; name RP_PV
    This is a placeholder value that does not reflect real-world production volumes. This dataset does not currently require a real-world production volume to work in the database framework, and no actual data were collected yet. This has no negative effect on the results of the ecoinvent database.
  property price 2.67873 EUR2005
    Calculated based on inputs: The price of the product has been calculated as a sum of the values of the material and energy inputs for this product. This value is therefore a rough estimation. It may underestimate the real price since there are additional expenses when producing any product. These expences can include for example labour costs, treatment of waste materials and profit for the producer. Please consider carefully whether this level of data quality is acceptable for your application.
  properties: lifetime 25 year

## By-products
- aluminium scrap, post-consumer: 0 kg; CPC 39363: Waste and scrap of aluminium; By-product classification Recyclable
  Aluminum components sent to treatment
  production volume 0 kg; = ABS( ByP_06/ RP* RP_PV)
    Calculated from reference product production volume, reference product amount and byproduct amount.
  property price 0.685 EUR2005
    Temporary price data. Calculated as 90% of purchasers price based on: estimated at 85% of new scrap
  property carbon content 0
    carbon content on a dry matter basis (reserved; not for manual entry)
  properties: carbon content, non-fossil 0, wet mass 1 kg, water in wet mass 0 kg, carbon content, fossil 0, water content 0, dry mass 1 kg, carbon allocation 0 kg
- iron scrap, unsorted: 0 kg; CPC 39310: Slag, dross, scalings and other waste from the manufacture of iron or steel; By-product classification Recyclable
  Steel and chromium steel components sent to treatment
  production volume 0 kg; = ABS( ByP_07/ RP* RP_PV)
    (same comment as for aluminium scrap, post-consumer)
  property price 0.149 EUR2005
    Temporary price data. Calculated as 90% of purchasers price based on: estimated at 85% of sorted scrap
  property carbon content 0
    carbon content on a dry matter basis (reserved; not for manual entry)
  properties: dry mass 1 kg, water content 0, carbon content, non-fossil 0, wet mass 1 kg, carbon content, fossil 0, water in wet mass 0 kg, carbon allocation 0 kg

## Inputs from technosphere
- polymer foaming: 0.0049 kg; lognormal variance with pedigree 0.374402, pedigree (5,5,5,5,5)
  Literature data and primary data from French manufacturers (Boulard et al, 2011). Plastic bags part of for the support system.
- extrusion, plastic pipes: 0.0432 kg; lognormal variance with pedigree 0.374402, pedigree (5,5,5,5,5)
  Literature data and primary data from French manufacturers (Boulard et al, 2011). Pipes for the fertigation system.
- heat and power co-generation unit, 200kW electrical, diesel SCR, components for electricity only: 6.2e-10 unit; lognormal variance with pedigree 0.374402, pedigree (5,5,5,5,5)
  Literature data and primary data from French manufacturers (Boulard et al, 2011). Generating set for the heating system.
- polyvinylfluoride: 0.0009792 kg; lognormal variance with pedigree 0.374402, pedigree (5,5,5,5,5)
  Literature data and primary data from French manufacturers (Boulard et al, 2011). Cables and wires for the greenhouse structure and the CO2 injection system.
  properties: carbon content, fossil 0.521739, heating value, net 23.7 MJ, dry mass 1 kg, wet mass 1 kg
- electricity, low voltage: 0 kWh; pedigree (1,1,1,1,1)
  Literature data and primary data from French manufacturers (Boulard et al, 2011). Electricity for manufacturing of the greenhouse structure.
- extrusion, plastic film: 0.0476 kg; lognormal variance with pedigree 0.374402, pedigree (5,5,5,5,5)
  Literature data and primary data from French manufacturers (Boulard et al, 2011). Mulch film.
- diesel, burned in building machine: 0.450005 MJ; lognormal variance with pedigree 0.374402, pedigree (5,5,5,5,5)
  Literature data and primary data from French manufacturers (Boulard et al, 2011). Energy for building the greenhouse and retention pond.
  properties: heating value, net 1 MJ
- steel, low-alloyed: 0.330987 kg; lognormal variance with pedigree 0.374402, pedigree (5,5,5,5,5)
  Literature data and primary data from French manufacturers (Boulard et al, 2011). Poles and trellis for the greenhouse structure.
  properties: dry mass 1 kg, carbon content, fossil 0.005, wet mass 1 kg
- tractor, 4-wheel, agricultural: 0.0152 kg; lognormal variance with pedigree 0.374402, pedigree (5,5,5,5,5)
  Literature data and primary data from French manufacturers (Boulard et al, 2011). Tractor.
- copper, cathode: 0.0001008 kg; lognormal variance with pedigree 0.374402, pedigree (5,5,5,5,5)
  Literature data and primary data from French manufacturers (Boulard et al, 2011). Cables and wires for the greenhouse structure.
  properties: dry mass 1 kg, wet mass 1 kg
- concrete block: 0 kg; pedigree (1,1,1,1,1)
  Literature data and primary data from French manufacturers (Boulard et al, 2011). Mechanical room part of for the storage system.
  properties: dry mass 1 kg, wet mass 1 kg
- oil boiler, 100kW: 1.8612e-6 unit; lognormal variance with pedigree 0.374402, pedigree (5,5,5,5,5)
  Literature data and primary data from French manufacturers (Boulard et al, 2011). Boiler for the heating system.
- synthetic rubber: 0.0003 kg; lognormal variance with pedigree 0.374402, pedigree (5,5,5,5,5)
  Literature data and primary data from French manufacturers (Boulard et al, 2011). Tubes for the soil preparation system.
  properties: heating value, net 26.42 MJ, carbon content, fossil 0.871949, wet mass 1 kg, dry mass 1 kg
- gas motor, 206kW: 6.2e-10 unit; lognormal variance with pedigree 0.374402, pedigree (5,5,5,5,5)
  (same comment as for heat and power co-generation unit, 200kW electrical, diesel SCR, compo)
- waste rubber, unspecified: 0 kg; name ByP_02
  Synthetic rubber sent to treatment
  production volume 0 kg
    Calculated from production volume of reference product using the relative outputs.
  property price 0 EUR2005; name ByP_02_price_EUR2005
  properties: wet mass 1 kg, carbon content, fossil 0.853, dry mass 1 kg, heating value, net 27.19 MJ
  note on heating value, net: Value taken from the general comment of the treatment dataset.
- agricultural machinery, unspecified: 0.0076 kg; lognormal variance with pedigree 0.374402, pedigree (5,5,5,5,5)
  Literature data and primary data from French manufacturers (Boulard et al, 2011). Ramp, cable drum and fork-lifts for the soil preparation system.
- waste plastic, mixture: 0 kg; name ByP_05
  Plastic components sent to treatment
  production volume 0 kg
    Calculated from production volume of reference product using the relative outputs.
  property price 0 EUR2005; name ByP_05_price_EUR2005
  properties: carbon content, fossil 0.747344, dry mass 0.847 kg, water content 0.180638, wet mass 1 kg, heating value, net 30.79 MJ
- concrete, normal: 0 m3; pedigree (1,1,1,1,1)
  Literature data and primary data from French manufacturers (Boulard et al, 2011). Walls and mechanical room.
  properties: wet mass 2380 kg, dry mass 2190 kg, water content 0.086758
- aluminium alloy, AlMg3: 0.228 kg; lognormal variance with pedigree 0.374402, pedigree (5,5,5,5,5)
  Literature data and primary data from French manufacturers (Boulard et al, 2011). Roof structure.
  properties: wet mass 1 kg, dry mass 1 kg
- waste glass: 0 kg; name ByP_03
  Flat glass sent to treatment
  production volume 0 kg
    Calculated from production volume of reference product using the relative outputs.
  property price 0 EUR2005; name ByP_03_price_EUR2005
  properties: dry mass 1 kg, wet mass 1 kg, heating value, net 0.05 MJ
  note on heating value, net: Value extracted from "treatment of waste glass, open dump, very wet infiltration class (1000mm)"
- polyethylene, linear low density, granulate: 0.0476 kg; lognormal variance with pedigree 0.374402, pedigree (5,5,5,5,5)
  (same comment as for extrusion, plastic film)
  properties: heating value, net 42.47 MJ, dry mass 1 kg, wet mass 1 kg, carbon content, fossil 0.857143
- zinc coat, coils: 0.0185194 m2; lognormal variance with pedigree 0.374402, pedigree (5,5,5,5,5)
  (same comment as for steel, low-alloyed)
- waste concrete: 0 kg; name ByP_01
  Concrete components sent to treatment
  production volume 0 kg
    Calculated from production volume of reference product using the relative outputs.
  property price 0 EUR2005; name ByP_01_price_EUR2005
  properties: wet mass 1 kg, water content 1, dry mass 0.5 kg
- drawing of pipe, steel: 0.1298 kg; lognormal variance with pedigree 0.374402, pedigree (5,5,5,5,5)
  Literature data and primary data from French manufacturers (Boulard et al, 2011). Tubes and siphons for the heating system.
- sheet rolling, steel: 0.03552 kg; lognormal variance with pedigree 0.374402, pedigree (5,5,5,5,5)
  Literature data and primary data from French manufacturers (Boulard et al, 2011). Roofing.
- polyethylene, high density, granulate: 0.0475 kg; lognormal variance with pedigree 0.374402, pedigree (5,5,5,5,5)
  Literature data and primary data from French manufacturers (Boulard et al, 2011). Tanks, pipes, gutters and taps for the fertigation system.
  properties: dry mass 1 kg, carbon content, fossil 0.857143, wet mass 1 kg, heating value, net 42.47 MJ
- steel, chromium steel 18/8: 0.0328 kg; lognormal variance with pedigree 0.374402, pedigree (5,5,5,5,5)
  Literature data and primary data from French manufacturers (Boulard et al, 2011). Bolting for the greenhouse structure.
  properties: dry mass 1 kg, carbon content, fossil 0.0008, wet mass 1 kg
- section bar rolling, steel: 0.17847 kg; lognormal variance with pedigree 0.374402, pedigree (5,5,5,5,5)
  (same comment as for steel, low-alloyed)
- flat glass, uncoated: 0.48 kg; lognormal variance with pedigree 0.374402, pedigree (5,5,5,5,5)
  Literature data and primary data from French manufacturers (Boulard et al, 2011). 4 mm simple glass for the greenhouse structure.
  properties: dry mass 1 kg, wet mass 1 kg
- blow moulding: 0.00316667 kg; lognormal variance with pedigree 0.374402, pedigree (5,5,5,5,5)
  Literature data and primary data from French manufacturers (Boulard et al, 2011). Tanks for the fertigation system.
- wire drawing, copper: 0.00028 kg; lognormal variance with pedigree 0.374402, pedigree (5,5,5,5,5)
  (same comment as for copper, cathode)
- section bar extrusion, aluminium: 0.228 kg; lognormal variance with pedigree 0.374402, pedigree (5,5,5,5,5)
  (same comment as for aluminium alloy, AlMg3)
- waste electric and electronic equipment: -0.003101 kg; name ByP_04
  Electric and electronic components sent to treatment
  production volume 0.0118242 kg; = ABS( ByP_04/ RP* RP_PV)
    Calculated from production volume of reference product using the relative outputs.
  property price 0 EUR2005; name ByP_04_price_EUR2005
  properties: wet mass 1 kg, dry mass 1 kg, carbon content, non-fossil 0.000485011, carbon content, fossil 0.0877555
- injection moulding: 0.00223333 kg; lognormal variance with pedigree 0.374402, pedigree (5,5,5,5,5)
  Literature data and primary data from French manufacturers (Boulard et al, 2011). Taps, gutters and stoppers for the fertigation system.
- polystyrene, expandable: 0.0049 kg; lognormal variance with pedigree 0.374402, pedigree (5,5,5,5,5)
  (same comment as for polymer foaming)
  properties: heating value, net 38.67 MJ, wet mass 1 kg, dry mass 1 kg, carbon content, fossil 0.923077
- electronics, for control units: 0.003 kg; lognormal variance with pedigree 0.374402, pedigree (5,5,5,5,5)
  Literature data and primary data from French manufacturers (Boulard et al, 2011). Control unit for the greenhouse structure.
  properties: carbon content, fossil 0.337146, dry mass 1 kg, carbon content, non-fossil 0.00013442, wet mass 1 kg
- aluminium scrap, post-consumer: -0.228 kg
  Aluminum components sent to treatment
  production volume 0.869374 kg
  properties: wet mass 1 kg, dry mass 1 kg, price 0.685 EUR2005
- iron scrap, unsorted: -0.3638 kg
  Steel and chromium steel components sent to treatment
  production volume 1.38718 kg
  properties: dry mass 1 kg, wet mass 1 kg, price 0.149 EUR2005
- electricity, low voltage: 2.1942e-5, 0.000198068, 0.000635378, 3.55593e-5, 0.000231715, 9.77233e-5, 8.72506e-5, 0.000162873, 0.000164464, 0.00144026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 kWh (46 entries); lognormal variance with pedigree 0.374402, pedigree (5,5,5,5,5)
  (same comment as for electricity, low voltage)
- concrete block: 0.0736368, 0.0333532 kg (2 entries); lognormal variance with pedigree 0.374402, pedigree (5,5,5,5,5)
  (same comment as for concrete block)
- waste rubber, unspecified: -1.20866e-5, -0.000287913 kg (2 entries)
  Synthetic rubber sent to treatment
  production volume 0.00114391 kg
- waste plastic, mixture: -5.19689e-5, -0.000129763, -7.09512e-5, -5.50436e-5, -0.000144888, -0.0113123, -0.00016557, -0.000755846, -5.71634e-5, -1.94183e-5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 kg (42 entries)
  Plastic components sent to treatment
  production volume 0.385117 kg
- concrete, normal: 9.47027e-5, 2.85313e-6, 9.86789e-6, 7.98875e-5, 4.49367e-5, 0.000190294, 6.41852e-6 m3 (7 entries); lognormal variance with pedigree 0.374402, pedigree (5,5,5,5,5)
  (same comment as for concrete, normal)
- waste glass: -0.000374877, -0.00118008, -0.000301038, -0.0004385, -0.000695902, -0.0392502, -0.000741594, -0.00361761, -8.20713e-5, -9.17389e-5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 kg (42 entries)
  Flat glass sent to treatment
  production volume 1.83026 kg
- waste concrete: -0.000273, -1.05258 kg (2 entries)
  Concrete components sent to treatment
  production volume 4.01456 kg

## Sampling procedure
Dataset is adapted from AGRIBALYSE 1.2 database, with land occupation and transformation flows removed (these are accounted for in the crop datasets). Data was collected from French manufacturers and reported in Boulard et al. (2011).
Translated name: Serre verre, BRM.

## Extrapolations
The amount of the exchanges are copy from a regional dataset.
