# petroleum and gas production, off-shore

Dataset: EcoSpold 2, unit process
Geography: NO
Time period: 2000-01-01 to 2021-12-31
Technology level: current
Classification: EcoSpold01Categories: natural gas/production
Classification: ISIC rev.4 ecoinvent: 0610:Extraction of crude petroleum
Tags: Combined Production; combined production
Scenario: Business-as-Usual
System model: Allocation, cut-off by classification
Share of production covered: 100 %
Generated by: Mireille Faist Emmenegger (obsolete)
Published in: Faist Emmenegger, M. 2007
Database: ecoinvent
isCopyrightProtected: true
accessRestrictedTo: 1

## General comment
The data are valid for the Norway offshore production. It can be assumed that they are valid for production in the North Sea in mature fields. The weighted parts of ethane, butane etc. in Kollsnes and Karsto gas has been used to break down NMVOC emissions in their different parts. The multioutput-process "combined offshore gas and oil production" delivers the co-products "natural gas" and "crude oil".

## Included activities end
exploration and production of oil and gas on the Norwegian Continental Shelf (offshore). Data doesn"t include combusted fuels for turbines, motors etc. It includes well testing (fuel requirements and emissions). Natural gas is partly dried on the platforms, the rest is dried in a special production plant.

## Geography
Can be extrapolated for North Sea offshore production

## Technology
Emissions and discharges from 49 producing fields and 178 exploration and production/injection wells are included. All fields with production facilities located on the NCS (Norwegian Continental Shelf) have been included. Produced water and oil discharges grew strongly in the last decade with the maturation of fields. Fuel consumption and emissions were stable. The processing of gas is performed in the plants of Kollsnes and Karsto, which are assessed separately.

## Time period
All data for year 2000. As production is changing, no average is built with other years.

## Parameters
- fraction, process water, to air: 0.15 dimensionless; name fraction_PW_to_air; lognormal variance with pedigree 0.092025, pedigree (4,4,3,2,4)
  Literature value. In case when no industry/process specific data are available, default evaporation fraction value is used. This value is 15% and is based on literature (Statistics Canada, 2007 & Shaffer, K.H., 2008, Consumptive water use in the Great Lakes Basin, USGS & Shiklomanov, 2003, World Water Resources at the Beginning of the 21st Century) and has been approved by an expert.

## Reference product
- petroleum: 1 kg; name petroleum_RP; CPC 12010: Petroleum oils and oils obtained from bituminous minerals, crude; By-product classification allocatable product; CAS 8002-05-9
  production volume 8.72e9 kg; name petroleum_RP_PV
    kg of petroleum produced in NO. All production happens off-shore. It is estimated that 9% are produced stand-alone the rest in co-production with natural gas.
  property carbon content, fossil 0.85
    C-content of crude oil is 83-87% (ecoinven report 6_IV, Tab 3.2). An average C-content of 0.85 kg C/kg crude oil was considered
  property amount in multioutput activity_kg 0 kg; name petroleum_RP_amount_MO_kg
  property price 0.192 EUR2005
    Temporary price data. Calculated as 90% of purchasers price based on: Crude oil prices from U.S. energy information administration_Independent statistics and analysis: Weekly All Countries Spot Price FOB Weighted by Estimated Export Volume (Dollars per Barrel) (http://tonto.eia.doe.gov/dnav/pet/pet_pri_wco_k_w.htm; accessed 06072010). Conversion factors - 0.159 m3/barrel with crude oil density of 853 kg/m3
  property carbon content 0.85
    carbon content on a dry matter basis (reserved; not for manual entry)
  properties: heating value, net 43.2 MJ, wet mass 1 kg, water content 0, carbon content, non-fossil 0, dry mass 1 kg, water in wet mass 0 kg, carbon allocation 0.85 kg
- natural gas, high pressure: 0 m3; name natural_gas; CPC 12020: Natural gas, liquefied or in the gaseous state; By-product classification allocatable product; CAS 14493-06-2
  production volume 0 m3; name natural_gas_PV
    m3 of natural gas produced in NO in 2012 (BP, 2014). All natural gas extracted in NO comes from offshore fields. Value converted from BP LHV (1 cubic meter natural gas in (BP, 2014) corresponds to 0.9 kg oil equivalent. 1 kg oil equivalent corresponds to 42 MJ) to ecoinvent standard LHV of 39MJ/m3. (The source does not specify if the cubic meters are standard or norm cubic meters. See 2015, Faist Emmenegger, Mireille, Del Duce, Andrea; Zah, Rainer, Update and extension of the inventory data for energy gases, 3 - SeparatePublication.) Refrence(s): BP (2014). Statistical Review of World Energy, June 2014. Retrieved online from http://www.bp.com/content/dam/bp/excel/energy-economics/statistical-review-2015/bp-statistical-review-of-world-energy-2015-workbook.xlsx, 30 August, 2017
  property heating value, net 39 MJ
    Literature value, Source: United Nations Statistics Division (2018) International Recommendations for Energy Statistics (IRES). Available at: http://unstats.un.org/unsd/statcom/doc11/BG-IRES.pdf.
  property price 0.166 EUR2005; name natural_gas_price_EUR2005
    Temporary price data. Calculated as 90% of purchasers price based on: 2005 price for Europe-27 Import (US$ and kg) in UN Commodity Trade Statistics Database - Natural gas in gaseous state (http://data.un.org/Data.aspx?q=natural+gas&d=ComTrade&f=_l1Code%3a28%3bcmdCode%3a271121; accessed 4 January 2011), using density of natural gas of 0.8 kg/m3 for unit conversion.
  property amount in multioutput activity_m3 0 m3; name natural_gas_amount_MO_m3
  property carbon content, fossil 0.602381
    An average C content of 0.506 kg C/ m3 has been assumed (this average has been calculated using data in Tab 3.5, ecoinvent v2.2 report 6_V
  property carbon content 0.602381
    carbon content on a dry matter basis (reserved; not for manual entry)
  properties: water content 0, heating value, gross 0 MJ, wet mass 0.84 kg, carbon content, non-fossil 0, dry mass 0.84 kg, water in wet mass 0 kg, carbon allocation 0.506 kg

## Inputs from technosphere
- waste emulsion paint: -4.52127e-7 kg; name waste_emul_paint; = ( waste_emul_paint_amount_MO_kg*(0.5* petroleum_RP +0.5* natural_gas *0.84)/(0.5* 159590000000 +0.5*49620000000 *0.84))*-1; lognormal variance with pedigree 0.0586, pedigree (2,1,5,1,3)
  environmental report for the total Norwegian production, standard module
  Uncertainty: e
  production volume 46173.7 kg; = waste_emul_paint_amount_MO_kg*(0.5* petroleum_RP_PV +0.5* natural_gas_PV *0.84)/(0.5* 159590000000 +0.5*49620000000 *0.84)
    Calculated from the production volume of reference products
  property amount in multioutput activity_kg 91000 kg; name waste_emul_paint_amount_MO_kg
  property price 0 EUR2005; name waste_emul_paint_price_EUR2005
  properties: dry mass 1 kg, carbon content, fossil 0.27, wet mass 1 kg, heating value, net 8.18 MJ
  note on carbon content, fossil: Tab A.4, ecoinvent v2.2 report 13_I. C content has been calculated after data in the tables, and then referred to 1 kg DM
- spent antifreezer liquid: -1.02504e-7 kg; name spent_antifreezer; = ( spent_antifreezer_amount_MO_kg*(0.5* petroleum_RP +0.5* natural_gas *0.84)/(0.5* 159590000000 +0.5*49620000000 *0.84))*-1; lognormal variance with pedigree 0.0586, pedigree (2,1,5,1,3)
  environmental report for the total Norwegian production, standard module
  Uncertainty: e
  production volume 10468.2 kg; = spent_antifreezer_amount_MO_kg*(0.5* petroleum_RP_PV +0.5* natural_gas_PV *0.84)/(0.5* 159590000000 +0.5*49620000000 *0.84)
    Calculated from the production volume of reference products
  property price 0 EUR2005; name spent_antifreezer_price_EUR2005
  property amount in multioutput activity_kg 20631 kg; name spent_antifreezer_amount_MO_kg
  properties: carbon content, fossil 0.431328, wet mass 1 kg, dry mass 0.482 kg, heating value, net 0.56 MJ, water content 1.07469
  note on carbon content, fossil: Tab A.7, ecoinvent v2.2 report 13_I. C content has been calculated after data in the tables, and then referred to 1 kg DM
  note on heating value, net: Value taken from the general comment of the treatment dataset.
- hazardous waste, for underground deposit: -4.52922e-5 kg; name hazardous_waste; = ( hazardous_waste_amount_MO_kg*(0.5* petroleum_RP +0.5* natural_gas *0.84)/(0.5* 159590000000 +0.5*49620000000 *0.84))*-1; lognormal variance with pedigree 0.0586, pedigree (2,1,5,1,3)
  environmental report for the total Norwegian production, standard module
  Uncertainty: e
  production volume 4.62549e6 kg; = hazardous_waste_amount_MO_kg*(0.5* petroleum_RP_PV +0.5* natural_gas_PV *0.84)/(0.5* 159590000000 +0.5*49620000000 *0.84)
    Calculated from the production volume of reference products.
  property price 0 EUR2005; name hazardous_waste_price_EUR2005
  property amount in multioutput activity_kg 9.116e6 kg; name hazardous_waste_amount_MO_kg
  properties: carbon content, fossil 0.554667, dry mass 1 kg, wet mass 1 kg
  note on carbon content, fossil: Tab A.6, ecoinvent v2.2 report 13_I, average hazardous waste composition was used, and referred to 0% water mass. No waste-specific emission are currently inventoried for underground deposits. Accordingly, no waste composition must be specified. For generic, average waste to underground deposit deposition in a 200 liter steel drum without cement solidification is assumed (ecoinvent v2.2 report 13_I).
- offshore platform, natural gas: 0 unit; name offshore_plattform_NG; = offshore_plattform_NG_amount_MO_unit*(0* petroleum_RP +1* natural_gas *0.84)/(0* 159590000000 +1*49620000000 *0.84); pedigree (1,1,1,1,1)
  environmental report for the total Norwegian production, standard module
  Uncertainty: e
  property amount in multioutput activity_unit 1.7913 unit; name offshore_plattform_NG_amount_MO_unit
- diesel, burned in diesel-electric generating set, 10MW: 0.0570674 MJ; name diesel_burned; = diesel_burned_amount_MO_MJ*(0.5* petroleum_RP +0.5* natural_gas *0.84)/(0.5* 159590000000 +0.5*49620000000 *0.84); lognormal variance with pedigree 0.058, pedigree (1,1,5,1,3)
  environmental report for the total Norwegian production, standard module
  Uncertainty: e
  property amount in multioutput activity_MJ 1.1486e10 MJ; name diesel_burned_amount_MO_MJ
  properties: heating value, net 1 MJ
- sweet gas, burned in gas turbine: 0.556265 MJ; name sweet_gas_burned; = sweet_gas_burned_amount_MO_MJ*(0.5* petroleum_RP +0.5* natural_gas *0.84)/(0.5* 159590000000 +0.5*49620000000 *0.84); lognormal variance with pedigree 0.04, pedigree (1,1,5,1,1)
  environmental report for the total Norwegian production, partly with standard factors.;activityLink introduced to establish a direct link to the corresponding regional supply of this product
  Uncertainty: e
  property amount in multioutput activity_MJ 1.1196e11 MJ; name sweet_gas_burned_amount_MO_MJ
  properties: heating value, net 1 MJ, heating value, gross 1 MJ, carbon content, fossil 0.589286, dry mass 0.0247059 kg, wet mass 0.0247059 kg
- waste mineral oil: -3.76061e-5 kg; name waste_mineral_oil; = ( waste_mineral_oil_amount_MO_kg*(0.5* petroleum_RP +0.5* natural_gas *0.84)/(0.5* 159590000000 +0.5*49620000000 *0.84))*-1; lognormal variance with pedigree 0.0586, pedigree (2,1,5,1,3)
  environmental report for the total Norwegian production, standard module
  Uncertainty: e
  production volume 3.84053e6 kg; = waste_mineral_oil_amount_MO_kg*(0.5* petroleum_RP_PV +0.5* natural_gas_PV *0.84)/(0.5* 159590000000 +0.5*49620000000 *0.84)
    Calculated from the production volume of reference products
  property price 0 EUR2005; name waste_mineral_oil_price_EUR2005
  property amount in multioutput activity_kg 7.569e6 kg; name waste_mineral_oil_amount_MO_kg
  properties: heating value, net 34.7 MJ, dry mass 0.9 kg, water content 0.111111, carbon content, fossil 0.864444, wet mass 1 kg
  note on carbon content, fossil: Tab A.6, ecoinvent v2.2 report 13_I. C content has been calculated after data in the tables, and then referred to 1 kg DM
- diesel: 0.000171023 kg; = diesel_amount_MO_kg*(0.5* petroleum_RP +0.5* natural_gas *0.84)/(0.5* 159590000000 +0.5*49620000000 *0.84); lognormal variance with pedigree 0.04, pedigree (1,1,5,1,1)
  environmental report for the total Norwegian production, partly with standard factors.
  Uncertainty: e
  property amount in multioutput activity_kg 3.4422e7 kg; name diesel_amount_MO_kg
  properties: dry mass 1 kg, wet mass 1 kg, carbon content, fossil 0.865, heating value, net 42.8 MJ
  note on carbon content, fossil: C-content of diesel is 86.5% (ecoinvent v2.2 report 6_IV, Tab 3.14)
- waste natural gas, sweet: -0.122879 MJ; name waste_NG_sweet; = ( waste_NG_sweet_amount_MO_MJ*(0.5* petroleum_RP +0.5* natural_gas *0.84)/(0.5* 159590000000 +0.5*49620000000 *0.84))*-1; lognormal variance with pedigree 0.04, pedigree (1,1,5,1,1)
  (same comment as for diesel)
  production volume 1.25491e10 MJ; = waste_NG_sweet_amount_MO_MJ*(0.5* petroleum_RP_PV +0.5* natural_gas_PV *0.84)/(0.5* 159590000000 +0.5*49620000000 *0.84)
    Calculated from the production volume of reference products
  property price 0 EUR2005; name waste_NG_sweet_price_EUR2005
  property amount in multioutput activity_MJ 2.4732e10 MJ; name waste_NG_sweet_amount_MO_MJ
  properties: dry mass 0.0247059 kg, heating value, net 1 MJ, wet mass 0.0247059 kg, carbon content, fossil 0.589286, heating value, gross 1 MJ
  note on heating value, net: Heating value 34 MJ/m3. Density is 0.84 kg/m3 (ecoinvent v2.2 report 6_V, Tab 3.4)
- offshore platform, petroleum: 5.10953e-11 unit; name offshore_plattform; = offshore_plattform_amount_MO_unit*(1* petroleum_RP +0* natural_gas *0.84)/ (1* 159590000000 +0*49620000000 *0.84); lognormal variance with pedigree 0.3701, pedigree (3,1,5,3,3)
  Data for GB
  Uncertainty: D
  property amount in multioutput activity_unit 8.1543 unit; name offshore_plattform_amount_MO_unit
- municipal solid waste: -3.34872e-5 kg; name MSW; = ( MSW_amount_MO_kg*(0.5* petroleum_RP +0.5* natural_gas *0.84)/(0.5* 159590000000 +0.5*49620000000 *0.84))*-1; lognormal variance with pedigree 0.0586, pedigree (2,1,5,1,3)
  environmental report for the total Norwegian production, standard module
  Uncertainty: e
  production volume 3.4199e6 kg; = MSW_amount_MO_kg*(0.5* petroleum_RP_PV +0.5* natural_gas_PV *0.84)/(0.5* 159590000000 +0.5*49620000000 *0.84)
    Calculated from the production volume of reference products
  property amount in multioutput activity_kg 6.74e6 kg; name MSW_amount_MO_kg
  properties: water content 0.297017, wet mass 1 kg, dry mass 0.771 kg, heating value, net 11.74 MJ, carbon content, non-fossil 0.261655, carbon content, fossil 0.171549
  note on carbon content, non-fossil: MSW composition in tab 4.1, ecoinvent v2.2 report 13_I. C content referred to 1 kg DM
- drying, natural gas: 0 m3; name drying_NG; = drying_NG_amount_MO_m3*(0* petroleum_RP +1* natural_gas *0.84)/(0* 159590000000 +1*49620000000 *0.84); pedigree (1,1,1,1,1)
  environmental report for the total Norwegian production.
  Uncertainty: e
  property amount in multioutput activity_m3 2.9545e10 m3; name drying_NG_amount_MO_m3
- waste wood, untreated: -7.29366e-6 kg; name waste_wood; = ( waste_wood_amount_MO_kg*(0.5* petroleum_RP +0.5* natural_gas *0.84)/(0.5* 159590000000 +0.5*49620000000 *0.84))*-1; lognormal variance with pedigree 0.0586, pedigree (2,1,5,1,3)
  environmental report for the total Norwegian production, standard module
  Uncertainty: e
  production volume 744868 kg; = waste_wood_amount_MO_kg*(0.5* petroleum_RP_PV +0.5* natural_gas_PV *0.84)/(0.5* 159590000000 +0.5*49620000000 *0.84)
    Calculated from the production volume of reference products
  property price 0 EUR2005; name waste_wood_price_EUR2005
  property amount in multioutput activity_kg 1.468e6 kg; name waste_wood_amount_MO_kg
  properties: wet mass 1 kg, carbon content, non-fossil 0.48632, water content 0.25, dry mass 0.8 kg, heating value, net 13.99 MJ
  note on carbon content, non-fossil: Tab A.4, ecoinvent v2.2 report 13_I. C content has been referred to 1 kg DM,
- chemical, organic: 0.000165012 kg; name chem_org; = chem_org_amount_MO_kg*(0.5* petroleum_RP +0.5* natural_gas *0.84)/(0.5* 159590000000 +0.5*49620000000 *0.84); lognormal variance with pedigree 0.06, pedigree (3,1,5,1,3)
  Quantity from environmental. report, part organic chemicals from standard data
  Uncertainty: q
  property amount in multioutput activity_kg 3.3212e7 kg; name chem_org_amount_MO_kg
  properties: wet mass 1 kg, carbon content, fossil 0.628, dry mass 1 kg, heating value, net 19.03 MJ
  note on carbon content, fossil: This dataset is an unweighted average of 20 organic substances (listed in Tab 88.1, ecoinvent v2.2 report 8, part II), being part of the top100 chemicals included in this database. The C-content has also been calculated as an unweighted average of the C content of the substances composing this dataset.
- chemical, inorganic: 0.000218735 kg; name chem_inorg; = chem_inorg_amount_MO_kg*(0.5* petroleum_RP +0.5* natural_gas *0.84)/(0.5* 159590000000 +0.5*49620000000 *0.84); lognormal variance with pedigree 0.06, pedigree (3,1,5,1,3)
  quantity from environmental. report, part organic chemicals from standard data
  Uncertainty: q
  property amount in multioutput activity_kg 4.4025e7 kg; name chem_inorg_amount_MO_kg
  properties: carbon content, fossil 0.003, wet mass 1 kg, dry mass 1 kg
  note on carbon content, fossil: This dataset is an unweighted average of 20 inorganic substances (listed in Tab 88.1, ecoinvent v2.2 report 8, part II), being part of the top100 chemicals included in this database. The C-content has also been calculated as an unweighted average of the C content of the substances composing this dataset.
- offshore well, oil/gas: 2.59615e-6 m; name offshore_well; = offshore_well_amount_MO_m*(0.5* petroleum_RP +0.5* natural_gas *0.84)/(0.5* 159590000000 +0.5*49620000000 *0.84); lognormal variance with pedigree 0.058, pedigree (1,1,5,1,3)
  environmental report for the total Norwegian production, standard module
  Uncertainty: e
  property amount in multioutput activity_m 522530 m; name offshore_well_amount_MO_m
- low level radioactive waste: -1.99561e-7 m3; name low_level_radwaste; = ( low_level_radwaste_amount_MO_m3*(1* petroleum_RP +0* natural_gas *0.84)/ (1* 159590000000 +0*49620000000 *0.84))*-1; lognormal variance with pedigree 0.0587, pedigree (2,1,5,3,3)
  data for GB
  Uncertainty: d
  production volume 1740.18 m3; = low_level_radwaste_amount_MO_m3*(1* petroleum_RP_PV +0* natural_gas_PV *0.84)/(1* 159590000000 +0*49620000000 *0.84)
    Calculated from the production volume of reference products.
  property price 0 EUR2005; name low_level_radwaste_price_EUR2005
  property amount in multioutput activity_m3 31848 m3; name low_level_radwaste_amount_MO_m3
  properties: wet mass 2500 kg, dry mass 2500 kg

## Inputs from nature
- Water, salt, sole [natural resource, in water]: 0.000694265 m3; name water_salt_sole_input; = water_salt_sole_input_amount_MO_m3*(0.99* petroleum_RP +0.01* natural_gas *0.84)/(0.99* 159590000000 +0.01*49620000000 *0.84); lognormal variance with pedigree 0.04, pedigree (1,1,5,1,1)
  (same comment as for diesel)
  property amount in multioutput activity_m3 1.1109e8 m3; name water_salt_sole_input_amount_MO_m3
- Gas, natural, in ground [natural resource, in ground]: 0.00013093 m3; name gas_ground; = gas_ground_amount_MO_m3*(0.00011* petroleum_RP +0.99989* natural_gas *0.84)/(0.00011* 159590000000 +0.99989*49620000000 *0.84); lognormal variance with pedigree 0.04, pedigree (1,1,5,1,1)
  (same comment as for diesel)
  property amount in multioutput activity_m3 4.9627e10 m3; name gas_ground_amount_MO_m3
- Oil, crude, in ground [natural resource, in ground]: 1.00006 kg; name oil_ground; = oil_ground_amount_MO_kg*(1* petroleum_RP +0* natural_gas *0.84)/ (1* 159590000000 +0*49620000000 *0.84); lognormal variance with pedigree 0.04, pedigree (1,1,5,1,1)
  (same comment as for diesel)
  property amount in multioutput activity_kg 1.596e11 kg; name oil_ground_amount_MO_kg
- Water, salt, ocean [natural resource, in water]: 0.00135678 m3; name water_salt_ocean_input; = water_salt_ocean_input_amount_MO_m3*(0.99* petroleum_RP +0.01* natural_gas *0.84)/(0.99* 159590000000 +0.01*49620000000 *0.84); lognormal variance with pedigree 0.04, pedigree (1,1,5,1,1)
  (same comment as for diesel)
  property amount in multioutput activity_m3 2.171e8 m3; name water_salt_ocean_input_amount_MO_m3

## Emissions to nature
- Water [water, unspecified]: 0.00174339 m3; name water_to_water_unspecified; = water_salt_ocean_input*(1-fraction_PW_to_air)+water_salt_sole_input*(1-fraction_PW_to_air); lognormal variance with pedigree 0.0807, pedigree (2,2,5,1,1)
  Calculated value based on literature values and expert opinion. See comments in the parametres" comment field.
  property fraction, origin: fresh water 0; name fraction_origin_fresh_water_Ww
  property wet mass 1000 kg; name WM
  property amount in multioutput activity_m3 2.7896e8 m3; name water_to_water_unspecifie_amount_MO_m3_0
  property carbon content, non-fossil 0; name C_content_non_fossil
  property fraction, origin: salt water 1; name fraction_origin_salt_water_Ww
  property carbon content, fossil 0; name C_content_fossil
  property fraction, origin: unspecified 0; name fraction_origin_unspecified_Ww
  property dry mass 0 kg; name DM
  property water in wet mass 1000 kg; name WWM
- Methane, bromochlorodifluoro-, Halon 1211 [air, non-urban air or from high stacks]: 7.30359e-10 kg; name halon; = halon_amount_MO_kg*(0.5* petroleum_RP +0.5* natural_gas *0.84)/(0.5* 159590000000 +0.5*49620000000 *0.84); lognormal variance with pedigree 0.0806, pedigree (2,1,5,1,1)
  environmental report for the total Norwegian production, assumption for type of halon
  Uncertainty: e
  property amount in multioutput activity_kg 147 kg; name halon_amount_MO_kg
- Butane [air, non-urban air or from high stacks]: 6.86886e-6 kg; name butane; = butane_amount_MO_kg*(0.5* petroleum_RP +0.5* natural_gas *0.84)/(0.5* 159590000000 +0.5*49620000000 *0.84); lognormal variance with pedigree 0.0806, pedigree (2,1,5,1,1)
  (same comment as for diesel)
  property amount in multioutput activity_kg 1.3825e6 kg; name butane_amount_MO_kg
- Mercury [air, non-urban air or from high stacks]: 1.54931e-11 kg; name Hg_air; = Hg_air_amount_MO_kg*(0.5* petroleum_RP +0.5* natural_gas *0.84)/(0.5* 159590000000 +0.5*49620000000 *0.84); lognormal variance with pedigree 0.1161, pedigree (4,1,5,3,3)
  data calculated on the basis of losses and gas composition
  Uncertainty: d
  property amount in multioutput activity_kg 3.1183 kg; name Hg_air_amount_MO_kg
- Carboxylic acids, unspecified [water, ocean]: 0.000175913 kg; name carboxylic_acid; = carboxylic_acid_amount_MO_kg*(0.99* petroleum_RP +0.01* natural_gas *0.84)/(0.99* 159590000000 +0.01*49620000000 *0.84); lognormal variance with pedigree 0.34, pedigree (1,1,5,1,1)
  (same comment as for diesel)
  property amount in multioutput activity_kg 2.8148e7 kg; name carboxylic_acid_amount_MO_kg
- Ethane [air, non-urban air or from high stacks]: 2.48749e-5 kg; name ethane; = ethane_amount_MO_kg*(0.5* petroleum_RP +0.5* natural_gas *0.84)/(0.5* 159590000000 +0.5*49620000000 *0.84); lognormal variance with pedigree 0.0806, pedigree (2,1,5,1,1)
  (same comment as for diesel)
  property amount in multioutput activity_kg 5.0066e6 kg; name ethane_amount_MO_kg
- Nitrogen oxides [air, non-urban air or from high stacks]: 1.24211e-6 kg; name NOx; = NOx_amount_MO_kg*(0.5* petroleum_RP +0.5* natural_gas *0.84)/(0.5* 159590000000 +0.5*49620000000 *0.84); lognormal variance with pedigree 0.08, pedigree (1,1,5,1,1)
  (same comment as for diesel)
  property amount in multioutput activity_kg 250000 kg; name NOx_amount_MO_kg
- Xylene [water, ocean]: 2.11417e-6 kg; name xylene; = xylene_amount_MO_kg*(0.99* petroleum_RP +0.01* natural_gas *0.84)/(0.99* 159590000000 +0.01*49620000000 *0.84); lognormal variance with pedigree 0.34, pedigree (1,1,5,1,1)
  (same comment as for diesel)
  property amount in multioutput activity_kg 338290 kg; name xylene_amount_MO_kg
- Arsenic, ion [water, ocean]: 7.14326e-9 kg; name As; = As_amount_MO_kg*(0.99* petroleum_RP +0.01* natural_gas *0.84)/(0.99* 159590000000 +0.01*49620000000 *0.84); lognormal variance with pedigree 0.08, pedigree (1,1,5,1,1)
  (same comment as for diesel)
  property amount in multioutput activity_kg 1143 kg; name As_amount_MO_kg
- Methane, fossil [air, non-urban air or from high stacks]: 0.000196904 kg; name CH4_fossil; = CH4_fossil_amount_MO_kg*(0.7157* petroleum_RP +0.2843* natural_gas *0.84)/(0.7157* 159590000000 +0.2843*49620000000 *0.84); lognormal variance with pedigree 0.08, pedigree (1,1,5,1,1)
  (same comment as for diesel)
  property amount in multioutput activity_kg 3.4684e7 kg; name CH4_fossil_amount_MO_kg
- NMVOC, non-methane volatile organic compounds, unspecified origin [air, non-urban air or from high stacks]: 0.0012965 kg; name NMVOC; = NMVOC_amount_MO_kg*(0.9617* petroleum_RP+0.0383* natural_gas *0.84)/(0.9617* 159590000000 +0.0383*49620000000 *0.84); lognormal variance with pedigree 0.16, pedigree (1,1,5,1,1)
  (same comment as for diesel)
  property amount in multioutput activity_kg 2.0906e8 kg; name NMVOC_amount_MO_kg
- PAH, polycyclic aromatic hydrocarbons [water, ocean]: 2.79818e-7 kg; name PAH; = PAH_amount_MO_kg*(0.99* petroleum_RP +0.01* natural_gas *0.84)/(0.99* 159590000000 +0.01*49620000000 *0.84); lognormal variance with pedigree 0.34, pedigree (1,1,5,1,1)
  environmental report for the total Norwegian production, assumption for the break down of BTX.
  Uncertainty: e
  property amount in multioutput activity_kg 44774 kg; name PAH_amount_MO_kg
- Lead [water, ocean]: 3.40602e-9 kg; name Pb; = Pb_amount_MO_kg*(0.99* petroleum_RP +0.01* natural_gas *0.84)/(0.99* 159590000000 +0.01*49620000000 *0.84); lognormal variance with pedigree 0.69, pedigree (1,1,5,1,1)
  (same comment as for diesel)
  property amount in multioutput activity_kg 545 kg; name Pb_amount_MO_kg
- Copper, ion [water, ocean]: 2.73106e-9 kg; name Cu; = Cu_amount_MO_kg*(0.99* petroleum_RP +0.01* natural_gas *0.84)/(0.99* 159590000000 +0.01*49620000000 *0.84); lognormal variance with pedigree 0.69, pedigree (1,1,5,1,1)
  (same comment as for diesel)
  property amount in multioutput activity_kg 437 kg; name Cu_amount_MO_kg
- TOC, Total Organic Carbon [water, surface water]: 9.67746e-5 kg; name TOC; = TOC_amount_MO_kg*(0.99* petroleum_RP +0.01* natural_gas *0.84)/(0.99* 159590000000 +0.01*49620000000 *0.84); lognormal variance with pedigree 0.0901, pedigree (3,5,5,3,1)
  Extrapolation for sum parameter
  Uncertainty: E
  property amount in multioutput activity_kg 1.5485e7 kg; name TOC_amount_MO_kg
- Nickel, ion [water, ocean]: 4.84967e-9 kg; name Ni; = Ni_amount_MO_kg*(0.99* petroleum_RP +0.01* natural_gas *0.84)/(0.99* 159590000000 +0.01*49620000000 *0.84); lognormal variance with pedigree 0.69, pedigree (1,1,5,1,1)
  (same comment as for diesel)
  property amount in multioutput activity_kg 776 kg; name Ni_amount_MO_kg
- COD, Chemical Oxygen Demand [water, surface water]: 0.000271919 kg; name COD; = COD_amount_MO_kg*(0.99* petroleum_RP +0.01* natural_gas *0.84)/(0.99* 159590000000 +0.01*49620000000 *0.84); lognormal variance with pedigree 0.0901, pedigree (3,5,5,3,1)
  Extrapolation for sum parameter
  Uncertainty: E
  property amount in multioutput activity_kg 4.351e7 kg; name COD_amount_MO_kg
- Zinc, ion [water, ocean]: 9.33623e-8 kg; name Zn; = Zn_amount_MO_kg*(0.99* petroleum_RP +0.01* natural_gas *0.84)/(0.99* 159590000000 +0.01*49620000000 *0.84); lognormal variance with pedigree 0.69, pedigree (1,1,5,1,1)
  (same comment as for diesel)
  property amount in multioutput activity_kg 14939 kg; name Zn_amount_MO_kg
- Sulfur [water, surface water]: 5.34901e-8 kg; name S2; = S2_amount_MO_kg*(0.99* petroleum_RP +0.01* natural_gas *0.84)/(0.99* 159590000000 +0.01*49620000000 *0.84); lognormal variance with pedigree 0.0901, pedigree (3,5,5,3,1)
  Extrapolation for sum parameter
  Uncertainty: E
  property amount in multioutput activity_kg 8559 kg; name S2_amount_MO_kg
- Water [air, unspecified]: 0.000307657 m3; name water_to_air_unspecified; = (water_salt_ocean_input*fraction_PW_to_air)+(water_salt_sole_input*fraction_PW_to_air); lognormal variance with pedigree 0.0807, pedigree (2,2,5,1,1)
  (same comment as for Water)
  property fraction, origin: unspecified 0; name fraction_origin_unspecified
  property fraction, origin: fresh water 0; name fraction_origin_fresh_water
  property amount in multioutput activity_m3 4.92282e7 m3; name water_to_air_unspecified_amount_MO_m3
  property fraction, origin: salt water 1; name fraction_origin_salt_water
- Nitrogen [water, surface water]: 1.54296e-8 kg; name N2; = N2_amount_MO_kg*(0.99* petroleum_RP +0.01* natural_gas *0.84)/(0.99* 159590000000 +0.01*49620000000 *0.84); lognormal variance with pedigree 0.0901, pedigree (3,5,5,3,1)
  Extrapolation for sum parameter
  Uncertainty: E
  property amount in multioutput activity_kg 2468.9 kg; name N2_amount_MO_kg
- BOD5, Biological Oxygen Demand [water, surface water]: 0.000271919 kg; name BOD5; = BOD5_amount_MO_kg*(0.99* petroleum_RP +0.01* natural_gas *0.84)/(0.99* 159590000000 +0.01*49620000000 *0.84); lognormal variance with pedigree 0.0901, pedigree (3,5,5,3,1)
  Extrapolation for sum parameter
  Uncertainty: E
  property amount in multioutput activity_kg 4.351e7 kg; name BOD5_amount_MO_kg
- AOX, Adsorbable Organic Halogen as Cl [water, surface water]: 2.0573e-10 kg; name AOX; = AOX_amount_MO_kg*(0.99* petroleum_RP +0.01* natural_gas *0.84)/(0.99* 159590000000 +0.01*49620000000 *0.84); lognormal variance with pedigree 0.0901, pedigree (3,5,5,3,1)
  Extrapolation for sum parameter
  Uncertainty: E
  property amount in multioutput activity_kg 32.919 kg; name AOX_amount_MO_kg
- DOC, Dissolved Organic Carbon [water, surface water]: 9.67746e-5 kg; name DOC; = DOC_amount_MO_kg*(0.99* petroleum_RP +0.01* natural_gas *0.84)/(0.99* 159590000000 +0.01*49620000000 *0.84); lognormal variance with pedigree 0.0901, pedigree (3,5,5,3,1)
  Extrapolation for sum parameter
  Uncertainty: E
  property amount in multioutput activity_kg 1.5485e7 kg; name DOC_amount_MO_kg
- Cadmium, ion [water, ocean]: 8.7494e-10 kg; name Cd; = Cd_amount_MO_kg*(0.99* petroleum_RP +0.01* natural_gas *0.84)/(0.99* 159590000000 +0.01*49620000000 *0.84); lognormal variance with pedigree 0.69, pedigree (1,1,5,1,1)
  (same comment as for diesel)
  property amount in multioutput activity_kg 140 kg; name Cd_amount_MO_kg
- Benzene [water, ocean]: 2.11417e-6 kg; name benzene; = benzene_amount_MO_kg*(0.99* petroleum_RP +0.01* natural_gas *0.84)/(0.99* 159590000000 +0.01*49620000000 *0.84); lognormal variance with pedigree 0.34, pedigree (1,1,5,1,1)
  (same comment as for PAH, polycyclic aromatic hydrocarbons)
  property amount in multioutput activity_kg 338290 kg; name benzene_amount_MO_kg
- Propane [air, non-urban air or from high stacks]: 1.31708e-5 kg; name propane; = propane_amount_MO_kg*(0.5* petroleum_RP +0.5* natural_gas *0.84)/(0.5* 159590000000 +0.5*49620000000 *0.84); lognormal variance with pedigree 0.0806, pedigree (2,1,5,1,1)
  (same comment as for diesel)
  property amount in multioutput activity_kg 2.6509e6 kg; name propane_amount_MO_kg
- Chromium, ion [water, ocean]: 3.23103e-9 kg; name Cr; = Cr_amount_MO_kg*(0.99* petroleum_RP +0.01* natural_gas *0.84)/(0.99* 159590000000 +0.01*49620000000 *0.84); lognormal variance with pedigree 0.08, pedigree (1,1,5,1,1)
  (same comment as for diesel)
  property amount in multioutput activity_kg 517 kg; name Cr_amount_MO_kg
- Mercury [water, ocean]: 3.12478e-11 kg; name Hg_water; = Hg_water_amount_MO_kg*(0.99* petroleum_RP +0.01* natural_gas *0.84)/(0.99* 159590000000 +0.01*49620000000 *0.84); lognormal variance with pedigree 0.69, pedigree (1,1,5,1,1)
  (same comment as for diesel)
  property amount in multioutput activity_kg 5 kg; name Hg_water_amount_MO_kg
- Oils, unspecified [water, ocean]: 1.99736e-5 kg; name oils; = oils_amount_MO_kg*(0.99* petroleum_RP +0.01* natural_gas *0.84)/(0.99* 159590000000 +0.01*49620000000 *0.84); lognormal variance with pedigree 0.34, pedigree (1,1,5,1,1)
  (same comment as for diesel)
  property amount in multioutput activity_kg 3.196e6 kg; name oils_amount_MO_kg
- Phenol [water, ocean]: 4.01072e-6 kg; name phenol; = phenol_amount_MO_kg*(0.99* petroleum_RP +0.01* natural_gas *0.84)/(0.99* 159590000000 +0.01*49620000000 *0.84); lognormal variance with pedigree 0.34, pedigree (1,1,5,1,1)
  (same comment as for PAH, polycyclic aromatic hydrocarbons)
  property amount in multioutput activity_kg 641760 kg; name phenol_amount_MO_kg
- Radon-222 [air, non-urban air or from high stacks]: 3.09861e-5 kBq; name Rd; = Rd_amount_MO_kBq*(0.5* petroleum_RP +0.5* natural_gas *0.84)/(0.5* 159590000000 +0.5*49620000000 *0.84); lognormal variance with pedigree 0.3761, pedigree (4,1,5,3,3)
  Data calculated on the basis of losses and gas composition
  Uncertainty: d
  property amount in multioutput activity_kBq 6.2366e6 kBq; name Rd_amount_MO_kBq
- Carbon dioxide, fossil [air, non-urban air or from high stacks]: 0.000935208 kg; name CO2_fossil; = CO2_fossil_amount_MO_kg*(0.5* petroleum_RP +0.5* natural_gas *0.84)/(0.5* 159590000000 +0.5*49620000000 *0.84); lognormal variance with pedigree 0.04, pedigree (1,1,5,1,1)
  (same comment as for diesel)
  property amount in multioutput activity_kg 1.8823e8 kg; name CO2_fossil_amount_MO_kg
- Toluene [water, ocean]: 2.11417e-6 kg; name toluene; = toluene_amount_MO_kg*(0.99* petroleum_RP +0.01* natural_gas *0.84)/(0.99* 159590000000 +0.01*49620000000 *0.84); lognormal variance with pedigree 0.34, pedigree (1,1,5,1,1)
  (same comment as for diesel)
  property amount in multioutput activity_kg 338290 kg; name toluene_amount_MO_kg

## Sampling procedure
Data is based on the annual reports on emissions and discharges submitted by each individual operator. The emissions and discharges are estimated
according to guidelines given by the Norwegian authorities and OLF (Norwegian Oil Industry Association)

## Extrapolations
no extrapolations

## Review by Michael Spielmann (obsolete) 2006-09-27
passed

## Review by Emilia Moreno Ruiz 2017-09-06
PV adjusted
