# wind power plant construction, 2MW, offshore, moving parts

Dataset: EcoSpold 2, unit process
Geography: GLO
Time period: 1991-01-01 to 2021-12-31
Technology level: current
Classification: ISIC rev.4 ecoinvent: 4220:Construction of utility projects
Classification: EcoSpold01Categories: wind power/production of components
Tags: infrastructure; ConvertedDataset; wind power
Scenario: Business-as-Usual
System model: Allocation, cut-off by classification
Generated by: Christian Bauer
Published in: Burger, B. 2007
Database: ecoinvent
isCopyrightProtected: true
accessRestrictedTo: 1

## General comment
This dataset represents the moving parts of a 2 MW offshore wind power plant, based on the dimensions of an offshore wind power plant of the type Bonus 2 MW.
[This dataset was already contained in the ecoinvent database version 2. It was not individually updated during the transfer to ecoinvent version 3. Life Cycle Impact Assessment results may still have changed, as they are affected by changes in the supply chain, i.e. in other datasets. This dataset was generated following the ecoinvent quality guidelines for version 2. It may have been subject to central changes described in the ecoinvent version 3 change report (http://www.ecoinvent.org/database/ecoinvent-version-3/reports-of-changes/), and the results of the central updates were reviewed extensively. The changes added e.g. consistent water flows and other information throughout the database. The documentation of this dataset can be found in the ecoinvent reports of version 2, which are still available via the ecoinvent website. The change report linked above covers all central changes that were made during the conversion process.]

## Included activities start
From pasture land forseen for the construction of a wind power plant.

## Included activities end
This activity ends with the moving parts of a constructed wind power plant, having a lifetime of 20 years. The dataset includes apart the materials for moving parts of a wind power plant also the construction efforts and the disposal of all these parts.

## Technology
Technical details of the modeled 2 MW offshore wind power plant
References:
Stiesdal H. (2001) Middelgrunden Offshore. A newsletter for customers and business associates, Bonus energy A/S. General technical description, Technical specification, Drawings and design, Bonus 2 MW offshore. Isager/Bogtryt/Offset, Svendborg, Denmark. www.bonus.dk

## Parameters
- Installed capacity: 350 MW; name capacity_installed_new; lognormal variance with pedigree 0.0038, pedigree (2,1,3,1,2)
  Literature value/statistics. New installed capacity of wind power in the world, offshore, 2008. [WWEA, 2009. World Wind Energy Report 2008. World Wind Energy Association, Bonn. Table p.12f and chapter "offshore wind energy", p.8]
  Uncertainty: Data from 2008

## Reference product
- wind power plant, 2MW, offshore, moving parts: 1 unit; By-product classification allocatable product; CPC 53262: Power plants
  The rotor consists of rotor blades, the rotor hub and extenders. The nacelle consists of the nacelle frame carrying the mechanics and the nacelle cover. Yaw control, rotor brake and nacelle brake are hydraulically actuated. The entire hydraulic system is combined in a compact module. The electronical system for monitoring, controlling and recording data of the plant is located in the electrical cabinet at the bottom of the tower. The transformer delivers current with a voltage of 30 kV. The rotor weighs 52'000 kg, the nacelle 82'500 kg and the electrical system with the network connection 13'309 kg.
  EcoSpold01Location=OCE
  production volume 175 unit; name apv_windpowerplant; = capacity_installed_new/2
    The offshore wind turbines are represented by 2MW wind turbines. There were 350MW new installed capacity worldwide in 2008.
  property price 862960 EUR2005
    Data from the report in Energie-spiegel, Facts for the energy decisions of tomorrow N0. 20 /June 2012 from the Paul Scherrer Institut (PSI), table 2. Capital costs for a wind turbine are 1.8-2.5 1000CHF/kWel for a turbine onshore and 2.7-4.0 1000CHF/kWel for a turbine offshore). The average of onshore values is used for onshore turbines and for offshore values to calculate the price of offshore turbines. The capacity of the turbine is used to calculate the price

## By-products
- aluminium scrap, new: 0 kg; By-product classification Recyclable; CPC 39363: Waste and scrap of aluminium
  Estimation. It is assumed that 100% of that material is recycled.
  production volume 0 kg; = apv_windpowerplant * scrap_aluminium
    Calculated from production volume of reference product using the relative outputs.
  property price 0.806 EUR2005; name scrap_aluminium_price_EUR2005
    Temporary price data. Calculated as 90% of purchasers price based on: 2005 import and export prices (total trades (USD) divided by total weight (kg) in biggest economies of the world: EU27, USA, Brasil, China, India, Japan and Russia) from UN Commodity Trade Statistics Database (http://data.un.org/Explorer.aspxDatabase [Accessed 2011.06.17]). Commodity: Waste or scrap, aluminium
  property carbon content 0
    carbon content on a dry matter basis (reserved; not for manual entry)
  properties: carbon content, non-fossil 0, water in wet mass 0 kg, carbon content, fossil 0, wet mass 1 kg, dry mass 1 kg, water content 0, carbon allocation 0 kg

## Inputs from technosphere
- waste plastic, mixture: 0 kg; name waste_plastic_mixture; pedigree (1,1,1,1,1)
  Calculated value. Rotor blades and nacelle cover are disposed in the municipial waste incinerator as it is not possible to seperate the components of glass fibre reinforced plastic. Per kg of glass fiber reinforced plastic 0.35 kg waste is estimated (41'000 kg * 0.35 kg = 14'350 kg). Additionally the synthetic rubber (100 kg) is disposed (recommended by Gabor Doka, 28.7.2003).
  EcoSpold01Location=CH
  production volume 0 kg
    Calculated from production volume of reference product using the relative outputs.
  property price 0 EUR2005; name waste_plastic_mixture_price_EUR2005
  properties: water content 0.180638, carbon content, fossil 0.747344, dry mass 0.847 kg, wet mass 1 kg, heating value, net 30.79 MJ
  note on carbon content, fossil: C content in 1 kg DM was calculated using data in Tab A.2, ecoinvent v2.2 report 13_I
  note on heating value, net: Value taken from the general comment of the treatment dataset.
- scrap copper: 0 kg; name scrap_copper
  Estimation. It is assumed that 100% of that material is recycled.
  production volume 0 kg
    Calculated from production volume of reference product using the relative outputs.
  property price 0 EUR2005; name scrap_copper_price_EUR2005
  property carbon content, non-fossil 0; name C_content_non_fossil
  property water in wet mass 0 kg; name WWM
  property carbon content, fossil 0; name C_content_fossil
  property water content 0; name water_content
  properties: wet mass 1 kg, dry mass 1 kg
- tin: 0.5 kg; source Scholzen F. 1991; lognormal variance with pedigree 0.04, pedigree (1,1,5,1,1)
  Estimation. Tin is used for electronics in the electrical cabinet. Waste treatment is neglected.
  EcoSpold01Location=RER
  properties: wet mass 1 kg, dry mass 1 kg
- wire drawing, copper: 1590 kg; = copper; source Stiesdal H. 2001; lognormal variance with pedigree 0.0406, pedigree (1,1,5,1,1)
  EcoSpold01Location=RER
  Estimation. Construction efforts for the whole amount of copper used.
- aluminium, wrought alloy: 845 kg; name alu_wrought; source Stiesdal H. 2001; lognormal variance with pedigree 0.05, pedigree (1,1,5,1,1)
  EcoSpold01Location=RER
  Estimation. Aluminium is used for the generator.
  properties: wet mass 1 kg, dry mass 1 kg
- lead: 0.5 kg; source Scholzen F. 1991; lognormal variance with pedigree 0.04, pedigree (1,1,5,1,1)
  EcoSpold01Location=RER
  Estimation. Lead is used for electronics in the electrical cabinet. Disposal is neglected.
  properties: wet mass 1 kg, dry mass 1 kg
- polyethylene, high density, granulate: 27 kg; name hdpe; source Scholzen F. 1991; lognormal variance with pedigree 0.36, pedigree (1,1,5,1,1)
  EcoSpold01Location=RER
  Estimation. PE is used in the electronical system.
  properties: heating value, net 42.47 MJ, wet mass 1 kg, carbon content, fossil 0.857143, dry mass 1 kg
  note on carbon content, fossil: Polyethylene is formed out of a huge amount of ethylene monomers (C2H4) (ecoinvent v2.2 report 11_II). MW=28 g/mol
- polyvinylchloride, bulk polymerised: 6 kg; name pvc; source Scholzen F. 1991; lognormal variance with pedigree 0.36, pedigree (1,1,5,1,1)
  EcoSpold01Location=RER
  Estimation. PVC is used in the electronical system.
  properties: wet mass 1 kg, dry mass 1 kg, carbon content, fossil 0.387097, heating value, net 21.5 MJ
  note on carbon content, fossil: Monomer is vynyl chloride, C2H3Cl (ecoinvent v2.2 report 11_II). MW=62 g/mol
- glass fibre reinforced plastic, polyamide, injection moulded: 41000 kg; name glass_fibre_plastic; source Stiesdal H. 2001; lognormal variance with pedigree 0.05, pedigree (1,1,5,1,1)
  EcoSpold01Location=RER
  Estimation. The rotor blades have a total weight of 29'714 kg and are made of glass fibre reinforced plastic. For the cover of the nacelle 11'294 kg of glass fibre reinforced plastic are estimated.
  properties: wet mass 1 kg, carbon content, fossil 0.446018, dry mass 1 kg
  note on carbon content, fossil: Polyamide resin assimilate to Nylon 66 (ecoinvent v2.2 report 7_XIII). Nylon 66 is derived from hexamethylene diamine and adipic acid and has the following structure: -(HN-(CH2)6-NH-CO-(CH2)4-CO)n- (ecoinvent v2.2 report 11_II), C12H22N2O2. MW=226 g/mol. Here Nylon 66 is – mainly for improved stiffness and stability – modified with glass fibres. The glass fibre content in the product is assumed of 30%. (ecoinvent v2.2 report 11_II)
- cast iron: 26400 kg; name cast_iron; source Stiesdal H. 2001; lognormal variance with pedigree 0.06, pedigree (1,1,5,1,1)
  EcoSpold01Location=RER
  Estimation. For the hub of the rotor 11'320 kg of cast iron is estimated. For the gear 9139 kg, the main bearing 1025 kg, for the generator 3382 kg and for the transformator 1500 kg of cast iron is used.
  Further references:
  Scholzen (1991): Oekobilanz von Windenergie am Beispiel einer 30 kW-Anlage auf dem Simplon. Semesterarbeit am Laboratorium für Energiesysteme, ETH Zürich.
  properties: dry mass 1 kg, wet mass 1 kg, carbon content, fossil 0.04
  note on carbon content, fossil: Cast iron is made by remelting pig iron in small furnaces (e.g. cupola furnaces or electric arc furnaces) and poured into moulds to make castings. It usually contains 2% to 6% carbon (ecoinvent v2.2 report 10_partII). An average content of 4% was considered
- synthetic rubber: 100 kg; name rubber; source Stiesdal H. 2001; lognormal variance with pedigree 0.1, pedigree (1,1,5,1,1)
  EcoSpold01Location=RER
  Estimation. For the mechanical system within the nacelle synthetic rubber is used.
  properties: dry mass 1 kg, carbon content, fossil 0.871949, wet mass 1 kg, heating value, net 26.42 MJ
  note on carbon content, fossil: EPDM (Ethylene-propene-diene terpolymer) rubber is a terpolymer of ethylene, propene, and a diene with the residual unsaturated portion of the diene in the side chain (ecoinvent v2.2 report 7-part XX & Ullmann). Chemical formula (deduced from Evidences of Solvent-Induced Miscibility in Polychloroprene-co-Ethylene-Propene Diene Terpolymer Blends, Dubey et al., Journal of Applied Polymer Science, 2009, 111:1884–1891): C20H35
- waste mineral oil: 0 kg; name waste_min_oil; pedigree (1,1,1,1,1)
  Estimation. 100% of the oil from hydraulics is disposed after use.
  EcoSpold01Location=CH
  production volume 0 kg
    Calculated from production volume of reference product using the relative outputs.
  property price 0 EUR2005; name waste_min_oil_price_EUR2005
  properties: heating value, net 34.7 MJ, wet mass 1 kg, carbon content, fossil 0.864444, water content 0.111111, dry mass 0.9 kg
  note on carbon content, fossil: Tab A.6, ecoinvent v2.2 report 13_I. C content has been calculated after data in the tables, and then referred to 1 kg DM
- steel, low-alloyed, hot rolled: 15900 kg; name steel_lowalloyed; source Stiesdal H. 2001; lognormal variance with pedigree 0.04, pedigree (1,1,5,1,1)
  Estimation. For the yaw control 2389 kg, for the axis in the nacelle 12'661 kg and for the transformator 800 kg of low-allowed steel are estimated. For the electrical cabinet 63 kg of low-allowed steel are estimated.
  Further references:
  Scholzen (1991): Oekobilanz von Windenergie am Beispiel einer 30 kW-Anlage auf dem Simplon. Semesterarbeit am Laboratorium für Energiesysteme, ETH Zürich.
  EcoSpold01Location=RER
  properties: wet mass 1 kg, dry mass 1 kg, carbon content, fossil 0.005
  note on carbon content, fossil: Low alloyed steel composition given in Tab. 3.2 ecoinvent v2.2 report 10_partII. Steel assumed to have a C content of 0.5%
- sheet rolling, aluminium: 845 kg; = alu_wrought; source Stiesdal H. 2001; lognormal variance with pedigree 0.0406, pedigree (1,1,5,1,1)
  Estimation. Construction efforts for the whole amount of aluminium used.
  EcoSpold01Location=RER
- electricity, medium voltage: 67500 kWh; source Baumann T. 1993; lognormal variance with pedigree 0.16, pedigree (1,1,5,1,1)
  EcoSpold01Location=UCTE
  Estimation. For assembling the individual parts an electricity consumption of 0.5 kWh/kg for a total mass of 135 t is assumed (135'000 kg * 0.5 kWh = 67'500 kWh).
- copper, cathode: 1590 kg; name copper; source Stiesdal H. 2001; lognormal variance with pedigree 0.08, pedigree (1,1,5,1,1)
  Estimation. For the generator 986 kg of copper and for the transformator 600 kg of copper are estimated. For the electrical cabinet 3 kg of are estimated.
  Further references:
  Scholzen (1991): Oekobilanz von Windenergie am Beispiel einer 30 kW-Anlage auf dem Simplon. Semesterarbeit am Laboratorium für Energiesysteme, ETH Zürich.
  EcoSpold01Location=RER
  properties: wet mass 1 kg, dry mass 1 kg
- waste polyvinylchloride: 0 kg; name waste_polyvinylchloride; pedigree (1,1,1,1,1)
  Estimation. PVC used for the electrical cabinet is disposed in the municipial waste incineration. After 20 years of service reuse is hardly possible. The assumption of a complete disposal in the municipial waste incineration reflects a conservative position.
  EcoSpold01Location=CH
  production volume 0 kg
    Calculated from production volume of reference product using the relative outputs.
  property price 0 EUR2005; name waste_polyvinylchloride_price_EUR2005
  properties: carbon content, fossil 0.440882, dry mass 0.998 kg, heating value, net 21.51 MJ, wet mass 1 kg, water content 0.00200401
  note on carbon content, fossil: C content in 1 kg DM was calculated using data in Tab A.1, ecoinvent v2.2 report 13_I
- sheet rolling, chromium steel: 51600 kg; = chromium_steel; source Stiesdal H. 2001; lognormal variance with pedigree 0.0406, pedigree (1,1,5,1,1)
  Estimation. Construction efforts for the whole amount of chromium steel used.
  EcoSpold01Location=RER
- waste polyethylene: 0 kg; name waste_polyethylene; pedigree (1,1,1,1,1)
  Estimation. PE out of the cable tube is disposed in the municipial waste incineration. After 20 years of service reuse is hardly possible. The assumption of a complete disposal in the municipial waste incineration reflects a conservative position.
  EcoSpold01Location=CH
  production volume 0 kg
    Calculated from production volume of reference product using the relative outputs.
  property price 0 EUR2005; name waste_polyethylene_price_EUR2005
  properties: heating value, net 42.47 MJ, water content 0.00401606, carbon content, fossil 0.825301, dry mass 0.996 kg, wet mass 1 kg
- lubricating oil: 0 kg; name lubricating_oil; source Stiesdal H. 2001; pedigree (1,1,1,1,1)
  EcoSpold01Location=RER
  Estimation. Hydraulic oil is used for the hydraulically operated pitch, rotor brake and nacelle brake (150 kg). For the transformator 1000 kg of oil is estimated.
  Further references:
  Scholzen (1991): Oekobilanz von Windenergie am Beispiel einer 30 kW-Anlage auf dem Simplon. Semesterarbeit am Laboratorium für Energiesysteme, ETH Zürich.
  properties: carbon content, fossil 0.75, dry mass 1 kg, wet mass 1 kg, heating value, net 40.2 MJ
  note on carbon content, fossil: Lubricating oil is produced from diesel. C-content/dry mass of fats and oils considered 75%, from: ecoinvent v2.2 report, n 15a, pg 40
  note on heating value, net: Literature value, Source: IPCC 2006, 2006 IPCC Guidelines for National Greenhouse Gas Inventories, Prepared by the National Greenhouse Gas Inventories Programme, Eggleston H.S., Buendia L., Miwa K., Ngara T. and Tanabe K. (eds). Published: IGES, Japan
- steel, chromium steel 18/8, hot rolled: 51600 kg; name chromium_steel; source Stiesdal H. 2001; lognormal variance with pedigree 0.06, pedigree (1,1,5,1,1)
  Estimation. Within the rotor 10'966 kg of chromium steel is estimated. For the nacelle 19'654 kg of chromium steel is assumed for the mechanical system, 16'940 kg for the nacelle cover, 2041 kg for the yaw control and 2042 kg of chromium steel for the hydraulics.
  EcoSpold01Location=RER
  properties: carbon content, fossil 0.0008, wet mass 1 kg, dry mass 1 kg
  note on carbon content, fossil: Stainless steel model is the grade 304 steel (18/8 stainless, 18% chromium 8% nickel; max. 0.08% C)
- scrap steel: 0 kg; name scrap_steel; pedigree (1,1,1,1,1)
  Estimation. It is assumed that 100% of that material is recycled.
  production volume 0 kg
    Calculated from production volume of reference product using the relative outputs.
  property price 0 EUR2005; name scrap_steel_price_EUR2005
  properties: dry mass 1 kg, wet mass 1 kg
- section bar rolling, steel: 42300 kg; = cast_iron+steel_lowalloyed; source Stiesdal H. 2001; lognormal variance with pedigree 0.06, pedigree (1,1,5,1,1)
  EcoSpold01Location=RER
  Estimation. Construction efforts for low-allowed steel.
- waste glass: 0 kg; name waste_glass; pedigree (1,1,1,1,1)
  EcoSpold01Location=CH
  Calculated value. Rotor blades and nacelle cover are disposed in the municipial waste incinerator as it is not possible to seperate the components of glass fibre reinforced plastic. Per kg of glass fiber reinforced plastic 0.65 kg waste is estimated (41'000 kg * 0.65 kg = 26'650 kg) (recommended by Gabor Doka, 28.7.2003).
  production volume 0 kg
    Calculated from production volume of reference product using the relative outputs.
  property price 0 EUR2005; name waste_glass_price_EUR2005
  properties: dry mass 1 kg, wet mass 1 kg, heating value, net 0.05 MJ
  note on heating value, net: Value extracted from "treatment of waste glass, open dump, very wet infiltration class (1000mm)"
- aluminium scrap, new: -845 kg
  Estimation. It is assumed that 100% of that material is recycled.
  production volume 147875 kg
  properties: wet mass 1 kg, dry mass 1 kg
- waste plastic, mixture: -1390.88, -107.229, -44.2893, -42.0568, -1604.83, -17.8924, -8.10953, -11234.7 kg (8 entries); lognormal variance with pedigree 0.06, pedigree (1,1,5,1,1)
  (same comment as for waste plastic, mixture)
  production volume 2.52875e6 kg
- scrap copper: -504.36, -23.6635, -1061.98 kg (3 entries)
  Estimation. It is assumed that 100% of that material is recycled.
  production volume 278250 kg
- waste mineral oil: -315.665, -7.81461, -826.52 kg (3 entries); lognormal variance with pedigree 0.0406, pedigree (1,1,5,1,1)
  Estimation. 100% of the oil from hydraulics is disposed after use.
  EcoSpold01Location=CH
  production volume 201250 kg
- waste polyvinylchloride: -0.577528, -0.044524, -0.01839, -0.017463, -0.666366, -0.00742936, -0.00336728, -4.66493 kg (8 entries); lognormal variance with pedigree 0.0406, pedigree (1,1,5,1,1)
  (same comment as for waste polyvinylchloride)
  production volume 1050 kg
- waste polyethylene: -2.59888, -0.200358, -0.0827551, -0.0785837, -2.99865, -0.0334321, -0.0151528, -20.9922 kg (8 entries); lognormal variance with pedigree 0.0406, pedigree (1,1,5,1,1)
  (same comment as for waste polyethylene)
  production volume 4725 kg
- lubricating oil: 200.1, 949.9 kg (2 entries); source Stiesdal H. 2001; lognormal variance with pedigree 0.08, pedigree (1,1,5,1,1)
  (same comment as for lubricating oil)
- scrap steel: -22864.2, -28.9681, -71006.8 kg (3 entries); lognormal variance with pedigree 0.0406, pedigree (1,1,5,1,1)
  Estimation. It is assumed that 100% of that material is recycled.
  production volume 1.64325e7 kg
- waste glass: -4056.91, -196.847, -18.3656, -82.1792, -2135.75, -27.8891, -4.4658, -20127.6 kg (8 entries); lognormal variance with pedigree 0.06, pedigree (1,1,5,1,1)
  (same comment as for waste glass)
  production volume 4.66375e6 kg

## Sampling procedure
Data are from a plant of the type Bonus 2 MW, installed at the wind farm Middelgrunden on the coast of Denmark.

## Extrapolations
This dataset has been extrapolated from year 2002 to the year of the calculation (2021). The uncertainty has been adjusted accordingly.

## Review by Thomas Nemecek 2005-07-19
Passed.

## Review by Roland Hischier 2011-09-23
Transfer of documentation done.
