# sugar beet production

Dataset: EcoSpold 2, unit process
Geography: US
Time period: 2009-01-01 to 2021-12-31
Technology level: current
Classification: ISIC rev.4 ecoinvent: 0113:Growing of vegetables and melons, roots and tubers
Tags: WFLDB
Scenario: Business-as-Usual
System model: Allocation, cut-off by classification
Generated by: Tuija Waldvogel
Published in: Nemecek T. 2015
Database: ecoinvent
isCopyrightProtected: true
accessRestrictedTo: 1

## General comment
This dataset represents the production of 1 kg of sugar beet. The average yield from 2009 - 2012 is 63.7 t/ha. The data are representative for sugar beet production in United States used for the export market. Mineral NPK fertiliser input is 190-33-210 kg/ha. Organic fertilisers applied amount to 6 m3/ha of liquid manure and 5 t/ha of solid manure. Total active ingredients (a.i.) applied as pesticides amount to 6.53 kg a.i./ha.
The dataset was modelled within the project 'World Food LCA database (WFLDB)'. The aim of this project was to provide inventories of a broad variety of agricultural products and processes and to cover for each product at least 50% of the global export market. The share of sugar beet produced in the United States amounts to 13% of the global production (tonnage produced in 2010). The production system regarded in this dataset aimed at representing sugar beet produced in the United States for the export market.
PEF-Quality: data quality rating (DQR) = 2.8 (i.e. good quality). This dataset refers to an average situation; for specific situations exchanges might differ substantially due to site specific parameters

## Included activities start
This activity starts with soil cultivation after the harvest of the previous crop.

## Included activities end
This activity ends with the harvest of sugar beet at farm gate. The dataset includes all machine operations, corresponding infrastructure, fuel use and sheds. Machine operations are: soil cultivation, sowing, fertilisation, pesticide application, harvesting, and on-farm transport. Further, direct field emissions and land use change are included. Heavy metal uptake by the crop is considered. The inputs of seeds, fertilisers and pesticides as well as packaging of fertilisers and pesticides are considered. The dataset doesn't include emissions from manure storage because these are within the system boundary of animal production.

## Technology
Conventional production

## Parameters
- heavyMetalUptakeSwitch: 1 dimensionless
- LUC_crop_specific: 1 dimensionless
  This parameter allows to switch between a 'crop specific' and a 'country specific' approach when calculating the LUC of a crop. By default, the chosen approach is 'crop specific', so the value of the parameter is 1. If you want to apply a 'country specific' approach, turn the parameter to 0.

## Reference product
- sugar beet: 1 kg; CPC 01801: Sugar beet; By-product classification allocatable product
  Reference flow: Yield = 63700 kg/ha
  production volume 2.8562e10 kg
    Source: FAOSTAT. Average, 2009-2012
  property price 0.0444 EUR2005
    Calculated based on literature data. The import quantity of sugar beet in 2005 is 803011 ton. The import value is 43094000 USD. The resulting price is (import value/import quantity*0.827=) 0.044 EUR/kg.
  property carbon content 0.433043
    carbon content on a dry matter basis (reserved; not for manual entry)
  properties: dry mass 0.23 kg, carbon content, non-fossil 0.433043, water in wet mass 0.77 kg, carbon content, fossil 0, water content 3.34783, wet mass 1 kg, carbon allocation 0.0996 kg

## Inputs from technosphere
- irrigation: 0.0903312 m3; lognormal variance with pedigree 0.124177, pedigree (2,1,4,1,1)
  Calculated value: The total amount of water used for irrigation (calculated from evapotranspiration, Pfister et al. 2011) multiplied by the country-share of irrigation technique (WFLDB-Guidelines.pdf, Appendix 6.1). See supporting documentation 'WFLDB-Documentation.pdf' chapter 'Water use for irrigation' for L2 data (https://ecoquery.ecoinvent.org/File/Reports).
  properties: dry mass 0.11 kg, wet mass 1000 kg, water content 9089.91
- inorganic nitrogen fertiliser, as N: 0, 0, 0.000149137, 0.000149137 kg (4 entries)
  Calculated based on literature values or expert estimation: The total amount of nutrient (Personal written communication, Bill Easterwood , Yara, 2015) multiplied by the share of fertiliser type (Personal written communication, Bill Easterwood , Yara, 2015). See supporting documentation 'WFLDB-Documentation.pdf' chapter 'Fertiliser application' for L3 and L4 data (https://ecoquery.ecoinvent.org/File/Reports).
  Corresponds to 9.5 kg/ha
  properties: dry mass 1 kg, wet mass 1 kg
- inorganic phosphorus fertiliser, as P2O5: 0, 0.00038854 kg (2 entries)
  Calculated based on literature values or expert estimation: The total amount of nutrient (Personal written communication, Bill Easterwood , Yara, 2015) multiplied by the share of fertiliser type (Personal written communication, Bill Easterwood , Yara, 2015). See supporting documentation 'WFLDB-Documentation.pdf' chapter 'Fertiliser application' for L3 and L4 data (https://ecoquery.ecoinvent.org/File/Reports).
  Corresponds to 8.25 kg/ha
  properties: wet mass 1 kg, dry mass 1 kg
- inorganic phosphorus fertiliser, as P2O5: 0, 0.000129513 kg (2 entries)
  (same comment as for inorganic phosphorus fertiliser, as P2O5)
  properties: dry mass 1 kg, wet mass 1 kg
- ammonium sulfate: 0.000596546 kg; source Bill Easterwood  2015; lognormal variance with pedigree 0.124177, pedigree (2,1,4,1,1)
  Calculated based on literature values or expert estimation: The total amount of nutrient (Personal written communication, Bill Easterwood , Yara, 2015) multiplied by the share of fertiliser type (Personal written communication, Bill Easterwood , Yara, 2015). See supporting documentation 'WFLDB-Documentation.pdf' chapter 'Fertiliser application' for L3 and L4 data (https://ecoquery.ecoinvent.org/File/Reports).
  Corresponds to 38.0 kg/ha
  properties: dry mass 1 kg, wet mass 1 kg
- packaging, for pesticides: 0.000205024 kg; lognormal variance with pedigree 0.0592, pedigree (4,3,4,5,4)
  Total amount of active substance/s of pesticides needed for the production of sugar beet is calculated to be circa 1.03E-04 kg. Pesticide/s used in this dataset is/are: '[thio]carbamate-compound', 'benzimidazole-compound', 'cyclic N-compound', 'glyphosate', 'phenoxy-compound', 'triazine-compound, unspecified'. The total amount of active substance/s is doubled in order to account for the packaging of the dilluted product of pesticide/s that is/are applied. Therefore, 2.05E-04 kg of packaging for pesticides is justified with this exchange.
  properties: wet mass 1 kg, dry mass 1 kg, price 0.0642 EUR2005, heating value, net 25.97 MJ, carbon content, fossil 0.85714
- urea: 0.00223803 kg; source Bill Easterwood  2015; lognormal variance with pedigree 0.124177, pedigree (2,1,4,1,1)
  The exchange has been updated from 'urea, as N' into 'urea' and therefore its amount has been scaled (multiplied) from 0.001 kg by 2.1438 kg of 'urea' per kg of 'urea, as N'. Original comment of the exchange is: Calculated based on literature values or expert estimation: The total amount of nutrient (Personal written communication, Bill Easterwood , Yara, 2015) multiplied by the share of fertiliser type (Personal written communication, Bill Easterwood , Yara, 2015). See supporting documentation 'WFLDB-Documentation.pdf' chapter 'Fertiliser application' for L3 and L4 data (https://ecoquery.ecoinvent.org/File/Reports).
  Corresponds to 66.5 kg/ha
  properties: dry mass 1 kg, carbon content, fossil 0.2, wet mass 1 kg
- packaging, for fertilisers: 0.013595 kg; lognormal variance with pedigree 0.0592, pedigree (4,3,4,5,4)
  Total amount of active substance/s of fertilisers needed for the production of 'sugar beet' is calculated to be circa 6.80E-03 kg. Fertiliser/s used in this dataset is/are: 'ammonium nitrate, as N', 'ammonium sulfate, as N', 'nitrogen fertiliser, as N', 'nitrogen fertiliser, as N', 'nitrogen fertiliser, as N', 'phosphate fertiliser, as P2O5', 'phosphate fertiliser, as P2O5', 'potassium chloride, as K2O', 'potassium sulfate, as K2O', 'urea, as N'. The total amount of active substance/s is doubled in order to account for the packaging of the dilluted product of fertiliser/s that is/are applied. Therefore, 1.36E-02 kg of packaging for fertilisers is justified with this exchange.
  properties: heating value, net 25.01 MJ, dry mass 1 kg, wet mass 1 kg, price 0.0642 EUR2005, carbon content, fossil 0.825301
  note on carbon content, fossil: Considering a chemical formula (C2H4)n for polyethylene, carbon content-fossil is calculated to be 0.856286 kg of Carbon per kg of dry mass.
- potassium chloride: 0.00313101 kg; source Bill Easterwood  2015; lognormal variance with pedigree 0.124177, pedigree (2,1,4,1,1)
  The exchange has been updated from 'potassium chloride, as K2O' into 'potassium chloride' and therefore its amount has been scaled (multiplied) from 0.002 kg by 1.5829 kg of 'potassium chloride' per kg of 'potassium chloride, as K2O'. Original comment of the exchange is: Calculated based on literature values or expert estimation: The total amount of nutrient (Personal written communication, Bill Easterwood , Yara, 2015) multiplied by the share of fertiliser type (Personal written communication, Bill Easterwood , Yara, 2015). See supporting documentation 'WFLDB-Documentation.pdf' chapter 'Fertiliser application' for L3 and L4 data (https://ecoquery.ecoinvent.org/File/Reports).
  Corresponds to 126.0 kg/ha
  properties: dry mass 1 kg, wet mass 1 kg
- potassium sulfate: 0.00243951 kg; source Bill Easterwood  2015; lognormal variance with pedigree 0.124177, pedigree (2,1,4,1,1)
  The exchange has been updated from 'potassium sulfate, as K2O' into 'potassium sulfate' and therefore its amount has been scaled (multiplied) from 0.0013 kg by 1.85 kg of 'potassium sulfate' per kg of 'potassium sulfate, as K2O'. Original comment of the exchange is: Calculated based on literature values or expert estimation: The total amount of nutrient (Personal written communication, Bill Easterwood , Yara, 2015) multiplied by the share of fertiliser type (Personal written communication, Bill Easterwood , Yara, 2015). See supporting documentation 'WFLDB-Documentation.pdf' chapter 'Fertiliser application' for L3 and L4 data (https://ecoquery.ecoinvent.org/File/Reports).
  Corresponds to 84.0 kg/ha
  properties: dry mass 1 kg, wet mass 1 kg
- urea ammonium nitrate mix: 0.00298273 kg
  The exchange has been updated from 'inorganic nitrogen fertiliser, as N' into 'urea ammonium nitrate' and therefore its amount has been scaled (multiplied) from 0.0009 kg by 3.3333 kg of 'urea ammonium nitrate' per kg of 'inorganic nitrogen fertiliser, as N'. Original comment of the exchange is: Calculated based on literature values or expert estimation: The total amount of nutrient (Personal written communication, Bill Easterwood , Yara, 2015) multiplied by the share of fertiliser type (Personal written communication, Bill Easterwood , Yara, 2015). See supporting documentation 'WFLDB-Documentation.pdf' chapter 'Fertiliser application' for L3 and L4 data (https://ecoquery.ecoinvent.org/File/Reports).
  Corresponds to 9.5 kg/ha
  properties: water content 0.333333, nitrogen content 0.401231, wet mass 1 kg, hydrogen content 0.095042, dry mass 0.75 kg, carbon content, fossil 0.0879977, oxygen content 0.749063
  note on nitrogen content: Nitrogen content (on a dry matter basis) of urea ammonium nitrate mix is calculated from the molecular formula of the substance (CH6N4O4).
  note on hydrogen content: Hydrogen content (on a dry matter basis) of urea ammonium nitrate mix is calculated from the molecular formula of the substance (CH6N4O4).
  note on carbon content, fossil: Carbon content, fossil is calculated based on the chemical formula of the substance.
  note on oxygen content: Oxygen content (on a dry matter basis) of urea ammonium nitrate mix is calculated from the molecular formula of the substance (CH6N4O4).
- manure, liquid, cattle: 0.0721902 kg; source Bill Easterwood  2015; lognormal variance with pedigree 0.124177, pedigree (2,1,4,1,1)
  Calculated based on literature values: The total amount of manure (Personal written communication, Bill Easterwood , Yara, 2015) multiplied by the country-share of manure per animal category (FAOSTAT 2015). See supporting documentation 'WFLDB-Documentation.pdf' chapter 'Fertiliser application' (https://ecoquery.ecoinvent.org/File/Reports).
  Corresponds to 4.6 m3/ha
  properties: wet mass 1 kg, water content 12.333, dry mass 0.075 kg, carbon content, non-fossil 0.68
- ammonium nitrate: 0.000426131 kg; source Bill Easterwood  2015; lognormal variance with pedigree 0.124177, pedigree (2,1,4,1,1)
  The exchange has been updated from 'ammonium nitrate, as N' into 'ammonium nitrate' and therefore its amount has been scaled (multiplied) from 0.0001 kg by 2.8573 kg of 'ammonium nitrate' per kg of 'ammonium nitrate, as N'. Original comment of the exchange is: Calculated based on literature values or expert estimation: The total amount of nutrient (Personal written communication, Bill Easterwood , Yara, 2015) multiplied by the share of fertiliser type (Personal written communication, Bill Easterwood , Yara, 2015). See supporting documentation 'WFLDB-Documentation.pdf' chapter 'Fertiliser application' for L3 and L4 data (https://ecoquery.ecoinvent.org/File/Reports).
  Corresponds to 9.5 kg/ha
  properties: wet mass 1 kg, dry mass 1 kg
- manure, liquid, swine: 0.0188407 kg; source Bill Easterwood  2015; lognormal variance with pedigree 0.124177, pedigree (2,1,4,1,1)
  Calculated based on literature values: The total amount of manure (Personal written communication, Bill Easterwood , Yara, 2015) multiplied by the country-share of manure per animal category (FAOSTAT 2015). See supporting documentation 'WFLDB-Documentation.pdf' chapter 'Fertiliser application' (https://ecoquery.ecoinvent.org/File/Reports).
  Corresponds to 1.2 m3/ha
  properties: dry mass 0.05 kg, wet mass 1 kg, carbon content, non-fossil 0.64, water content 19
- transport, freight train: 0.000471592 metric ton*km
  This represent the transport of fertilizers that are directly linked to their supplying activities, to better represent the fertilizer mix of the activity. Transport distance based on US BTS Commodity Flow Surveys 1993, 1997, 2002, 2007, US Dep. Of Transportation, Bureau of Transportation Statistics.
- transport, freight, lorry, unspecified: 0.000254105 metric ton*km
  This represent the transport of fertilizers that are directly linked to their supplying activities, to better represent the fertilizer mix of the activity. Transport distance based on US BTS Commodity Flow Surveys 1993, 1997, 2002, 2007, US Dep. Of Transportation, Bureau of Transportation Statistics. Of the total road transport, 6% is assumed to be by delivery van for goods with a large share of retail sale, and 3% for goods that are mainly sold via wholesale.
- poultry manure, fresh: 0.0015803 kg; source Bill Easterwood  2015; lognormal variance with pedigree 0.124177, pedigree (2,1,4,1,1)
  Calculated based on literature values: The total amount of manure (Personal written communication, Bill Easterwood , Yara, 2015) multiplied by the country-share of manure per animal category (FAOSTAT 2015). See supporting documentation 'WFLDB-Documentation.pdf' chapter 'Fertiliser application' (https://ecoquery.ecoinvent.org/File/Reports).
  Corresponds to 0.201 m3/ha
  properties: wet mass 1 kg, carbon content, non-fossil 0.33389, water content 1.63158, dry mass 0.38 kg
- transport, freight, sea, container ship: 0.0014389 metric ton*km
  This represent the transport of fertilizers that are directly linked to their supplying activities, to better represent the fertilizer mix of the activity. The total marine transport volume differentiated into major commodity groups based on data from FearnResearch (2001): Fearnley's Annual Review 2000. Oslo: Fearnley/AS, p. 1-78. The category 'Other cargo' accounts for 38% of total maritime transport volume and has been distributed on commodity groups based on the proportions of transport by rail and inland waterways.
  The total marine transport volume differentiated into major commodity groups based on data from FearnResearch (2001): Fearnley's Annual Review 2000. Oslo: Fearnley/AS, p. 1-78. The category 'Other cargo' accounts for 38% of total maritime transport volume and has been distributed on commodity groups based on the proportions in the marine import and export of the US in 2001-2010.
- transport, tractor and trailer, agricultural: 0.000381633 metric ton*km; lognormal variance with pedigree 0.162439, pedigree (4,1,4,1,1)
  On-farm transport: Yield (in tonnes) multiplied by the average distance from field to farm. The distance was obtained by extrapolation (modified MEXALCA approach). See supporting documentation 'WFLDB-Documentation.pdf' chapter 'Machinery processes' (https://ecoquery.ecoinvent.org/File/Reports). Corresponds to 24.3tkm/ha.
- manure, solid, cattle: 0.0461786 kg; source Bill Easterwood  2015; lognormal variance with pedigree 0.124177, pedigree (2,1,4,1,1)
  Calculated based on literature values: The total amount of manure (Personal written communication, Bill Easterwood , Yara, 2015) multiplied by the country-share of manure per animal category (FAOSTAT 2015). See supporting documentation 'WFLDB-Documentation.pdf' chapter 'Fertiliser application' (https://ecoquery.ecoinvent.org/File/Reports).
  Corresponds to 2940.0 kg/ha
  properties: water content 3.5454, wet mass 1 kg, dry mass 0.22 kg, carbon content, non-fossil 0.441
- [thio]carbamate-compound: 6.22827e-6 kg; lognormal variance with pedigree 0.0138498, pedigree (2,2,4,1,1)
  Proxy: Source for total amount of pesticides: extrapolated from MEXALCA. Active ingredient is calculated based on Ecoinvent dataset 'sugar beet, IP, plain region, at farm/kg/CH U'. For calculations see supporting documentation 'WFLDB-Documentation.pdf' (https://ecoquery.ecoinvent.org/File/Reports).
  properties: wet mass 1 kg, carbon content, fossil 0.626349, dry mass 1 kg
- poultry manure, dried: 0.0323143 kg; source Bill Easterwood  2015; lognormal variance with pedigree 0.124177, pedigree (2,1,4,1,1)
  Calculated based on literature values: The total amount of manure (Personal written communication, Bill Easterwood , Yara, 2015) multiplied by the country-share of manure per animal category (FAOSTAT 2015). See supporting documentation 'WFLDB-Documentation.pdf' chapter 'Fertiliser application' (https://ecoquery.ecoinvent.org/File/Reports).
  Corresponds to 2060.0 kg/ha
  properties: dry mass 0.865 kg, nitrogen content 0.532, potassium content 0.024, wet mass 1 kg, phosphorus content 0.0167, lead content 2.92e-6, mercury content 2e-7, cadmium content 2.92e-7, zinc content 0.000349, nickel content 4e-5, copper content 4.38e-5, water content 0.156069, carbon content, non-fossil 0.33389
- sowing: 1.56986e-5 ha; lognormal variance with pedigree 0.124177, pedigree (2,1,4,1,1)
  Estimation based on a modified MEXALCA-approach (Roches et al. 2010; Nemecek et al. 2012): See supporting documentation 'WFLDB-Documentation.pdf' chapter 'Machinery processes' for L2 data (https://ecoquery.ecoinvent.org/File/Reports).
- tillage, ploughing: 1.28443e-5 ha; lognormal variance with pedigree 0.124177, pedigree (2,1,4,1,1)
  Proxy: Extrapolated using a modified MEXALCA-approach (Roches et al. 2010; Nemecek et al. 2012). See supporting documentation 'WFLDB-Documentation.pdf' chapter 'Machinery processes' for L1 data (https://ecoquery.ecoinvent.org/File/Reports).
- benzimidazole-compound: 4.40679e-6 kg; lognormal variance with pedigree 0.0138498, pedigree (2,2,4,1,1)
  (same comment as for [thio]carbamate-compound)
  properties: carbon content, fossil 0.529668, wet mass 1 kg, dry mass 1 kg
- tillage, harrowing, by spring tine harrow: 2.56892e-5 ha; lognormal variance with pedigree 0.124177, pedigree (2,1,4,1,1)
  (same comment as for tillage, ploughing)
- cyclic N-compound: 1.33379e-5 kg; lognormal variance with pedigree 0.0138498, pedigree (2,2,4,1,1)
  (same comment as for [thio]carbamate-compound)
  properties: carbon content, fossil 0.641962, dry mass 1 kg, wet mass 1 kg
- liquid manure spreading, by vacuum tanker: 9.41915e-5 m3; source Bill Easterwood  2015; lognormal variance with pedigree 0.124177, pedigree (2,1,4,1,1)
  This amount corresponds to the input of liquid manure. Personal written communication, Bill Easterwood , Yara, 2015
- phenoxy-compound: 9.79287e-7 kg; lognormal variance with pedigree 0.0138498, pedigree (2,2,4,1,1)
  (same comment as for [thio]carbamate-compound)
  properties: wet mass 1 kg, carbon content, fossil 0.532559, dry mass 1 kg
- fertilising, by broadcaster: 2.11115e-5 ha; lognormal variance with pedigree 0.124177, pedigree (2,1,4,1,1)
  (same comment as for tillage, ploughing)
- transport, freight, inland waterways, barge: 7.97394e-5 metric ton*km
  (same comment as for transport, freight train)
- triazine-compound, unspecified: 4.93561e-5 kg; lognormal variance with pedigree 0.0138498, pedigree (2,2,4,1,1)
  (same comment as for [thio]carbamate-compound)
  properties: wet mass 1 kg, carbon content, fossil 0.475616, dry mass 1 kg
- solid manure loading and spreading, by hydraulic loader and spreader: 0.0784929 kg; source Bill Easterwood  2015; lognormal variance with pedigree 0.124177, pedigree (2,1,4,1,1)
  This amount corresponds the input of solid manure. Personal written communication, Bill Easterwood , Yara, 2015
- glyphosate: 2.82035e-5 kg; lognormal variance with pedigree 0.0138498, pedigree (2,2,4,1,1)
  (same comment as for [thio]carbamate-compound)
  properties: dry mass 1 kg, wet mass 1 kg, carbon content, fossil 0.214286
- harvesting, by complete harvester, beets: 1.56986e-5 ha; lognormal variance with pedigree 0.124177, pedigree (2,1,4,1,1)
  (same comment as for sowing)
- sugar beet seed, for sowing: 3.2967e-5 kg; lognormal variance with pedigree 0.124177, pedigree (2,1,4,1,1)
  Proxy: Similar crop and country used. Sowing density: 2.1kg/ha.
  properties: dry mass 0.9 kg, water content 0.111111, wet mass 1 kg, carbon content, non-fossil 0.38182
- application of plant protection product, by field sprayer: 2.32229e-5 ha; lognormal variance with pedigree 0.124664, pedigree (2,2,4,1,1)
  (same comment as for tillage, ploughing)

## Inputs from nature
- Transformation, from arable land, unspecified use [natural resource, land]: 0.156986 m2; lognormal variance with pedigree 0.0442144, pedigree (2,1,4,1,1)
  10000 m2 divided by the life time of the crop.
- Carbon dioxide, in air [natural resource, in air]: 0.321695 kg; lognormal variance with pedigree 0.0138498, pedigree (2,2,4,1,1)
  CO2 uptake by biomass
- Energy, gross calorific value, in biomass [natural resource, biotic]: 3.77975 MJ; lognormal variance with pedigree 0.0138498, pedigree (2,2,4,1,1)
  Gross energy content is related to MJ/kg dry matter of product. Source: ecoinvent data.
- Transformation, to arable land, unspecified use [natural resource, land]: 0.156986 m2; lognormal variance with pedigree 0.0442144, pedigree (2,1,4,1,1)
  10000 m2 divided by the life time of the crop.
- Occupation, annual crop [natural resource, land]: 0.092471 m2*year; lognormal variance with pedigree 0.0200616, pedigree (2,1,4,1,1)
  Related to the duration from harvest date of previous crop to harvest date of main crop: 215 days.

## Emissions to nature
- Zinc, ion [water, surface water]: 1.2763e-7 kg; source Freiermuth R.  2006; lognormal variance with pedigree 0.356938, pedigree (2,2,4,1,1)
  Calculated value - Freiermuth (2006). See 'WFLDB-Guidelines.pdf', available at https://ecoquery.ecoinvent.org/File/Reports.
- Ethofumesate [soil, agricultural]: 4.32417e-6 kg; source Freiermuth R.  2006; lognormal variance with pedigree 0.0447216, pedigree (2,2,4,1,1)
  (same comment as for Zinc, ion)
- Phosphate [water, surface water]: 5.7259e-6 kg; source Prasuhn V.  2006; lognormal variance with pedigree 0.175866, pedigree (2,2,4,1,1)
  Calculated value - Prasuhn (2006). See 'WFLDB-Guidelines.pdf', available at https://ecoquery.ecoinvent.org/File/Reports.
- Fenoxaprop-P ethyl ester [soil, agricultural]: 9.60928e-7 kg; source Freiermuth R.  2006; lognormal variance with pedigree 0.0447216, pedigree (2,2,4,1,1)
  (same comment as for Zinc, ion)
- Glyphosate [soil, agricultural]: 2.76747e-5 kg; source Freiermuth R.  2006; lognormal variance with pedigree 0.0447216, pedigree (2,2,4,1,1)
  (same comment as for Zinc, ion)
- Difenoconazole [soil, agricultural]: 1.53748e-6 kg; source Freiermuth R.  2006; lognormal variance with pedigree 0.0447216, pedigree (2,2,4,1,1)
  (same comment as for Zinc, ion)
- Ammonia [air, non-urban air or from high stacks]: 0.000874113 kg; source EEA 2013; lognormal variance with pedigree 0.0447216, pedigree (2,2,4,1,1)
  Calculated value - EMEP/EEA (2013). See 'WFLDB-Guidelines.pdf', available at https://ecoquery.ecoinvent.org/File/Reports.
- Lead [water, ground-]: 1.83061e-9 kg; source Freiermuth R.  2006; lognormal variance with pedigree 0.356938, pedigree (2,2,4,1,1)
  Calculated value - Freiermuth (2006). See 'WFLDB-Guidelines.pdf', available at https://ecoquery.ecoinvent.org/File/Reports. This emission might be overestimated in case of basic soils.
- Nickel, ion [water, surface water]: 5.8887e-8 kg; source Freiermuth R.  2006; lognormal variance with pedigree 0.356938, pedigree (2,2,4,1,1)
  (same comment as for Zinc, ion)
- Nitrogen oxides [air, non-urban air or from high stacks]: 0.000133049 kg; source EEA 2013; lognormal variance with pedigree 0.124664, pedigree (2,2,4,1,1)
  Calculated value - EEA/EMEP (2013). See 'WFLDB-Guidelines.pdf', available at https://ecoquery.ecoinvent.org/File/Reports.
- Metamitron [soil, agricultural]: 4.84308e-5 kg; source Freiermuth R.  2006; lognormal variance with pedigree 0.0447216, pedigree (2,2,4,1,1)
  (same comment as for Zinc, ion)
- Dinitrogen monoxide [air, non-urban air or from high stacks]: 0.000101505 kg; source IPCC 2006; lognormal variance with pedigree 0.124664, pedigree (2,2,4,1,1)
  Calculated value - IPCC (2006). See 'WFLDB-Guidelines.pdf', available at https://ecoquery.ecoinvent.org/File/Reports.
- Phenmedipham [soil, agricultural]: 3.45934e-6 kg; source Freiermuth R.  2006; lognormal variance with pedigree 0.0447216, pedigree (2,2,4,1,1)
  (same comment as for Zinc, ion)
- Lenacil [soil, agricultural]: 1.5567e-6 kg; source Freiermuth R.  2006; lognormal variance with pedigree 0.0447216, pedigree (2,2,4,1,1)
  (same comment as for Zinc, ion)
- Water [air, non-urban air or from high stacks]: 0.0559953 m3; lognormal variance with pedigree 0.124177, pedigree (2,1,4,1,1)
  Calculated value - Emission calculated from water balance. See 'WFLDB-Guidelines.pdf', available at https://ecoquery.ecoinvent.org/File/Reports.
- Carbon dioxide, fossil [air, non-urban air or from high stacks]: 0.00234144 kg; lognormal variance with pedigree 0.0138498, pedigree (2,2,4,1,1)
  Calculated value - CO2 emissions from urea and lime. See 'WFLDB-Guidelines.pdf', available at https://ecoquery.ecoinvent.org/File/Reports.
- Copper, ion [water, ground-]: 3.22496e-8 kg; source Freiermuth R.  2006; lognormal variance with pedigree 0.356938, pedigree (2,2,4,1,1)
  (same comment as for Lead)
- Mercury [water, surface water]: 2.06593e-10 kg; source Freiermuth R.  2006; lognormal variance with pedigree 0.356938, pedigree (2,2,4,1,1)
  (same comment as for Zinc, ion)
- Water [water, surface water]: 0.0274678 m3; lognormal variance with pedigree 0.124177, pedigree (2,1,4,1,1)
  (same comment as for Water)
- Phosphate [water, ground-]: 1.99843e-6 kg; source Prasuhn V.  2006; lognormal variance with pedigree 0.175866, pedigree (2,2,4,1,1)
  Calculated value - Prasuhn (2006). See 'WFLDB-Guidelines.pdf', available at https://ecoquery.ecoinvent.org/File/Reports. This emission might be overestimated in case of basic soils.
- Phosphorus [water, surface water]: 1.3905e-6 kg; source Prasuhn V.  2006; lognormal variance with pedigree 0.175866, pedigree (2,2,4,1,1)
  Calculated value - Prasuhn (2006) and SQCB-Erosion. See 'WFLDB-Guidelines.pdf', available at https://ecoquery.ecoinvent.org/File/Reports.
- Water [water, ground-]: 0.00686703 m3; lognormal variance with pedigree 0.124177, pedigree (2,1,4,1,1)
  (same comment as for Water)
- Nitrate [water, ground-]: 0.00275255 kg; source Faist Emmenegger M. 2009; lognormal variance with pedigree 0.175866, pedigree (2,2,4,1,1)
- Cadmium [soil, agricultural]: -4.53815e-8 kg; = 4.66185243328e-08 + ( - 9.2e-08)*heavyMetalUptakeSwitch; source Freiermuth R.  2006
  Comment on mathematicalRelation:
  4.66185243328e-08 from Calculated value - Freiermuth (2006). See 'WFLDB-Guidelines.pdf', available at https://ecoquery.ecoinvent.org/File/Reports.
  -9.2e-08 from Sugar beet, heavy metals uptake model
  Heavy metal uptake can be excluded by setting the parameter heavyMetalUptakeSwitch to zero.
- Chromium [soil, agricultural]: -5.54984e-9 kg; = 4.02700156986e-07 + ( - 4.0825e-07)*heavyMetalUptakeSwitch; source Freiermuth R.  2006
  Comment on mathematicalRelation:
  4.02700156986e-07 from Calculated value - Freiermuth (2006). See 'WFLDB-Guidelines.pdf', available at https://ecoquery.ecoinvent.org/File/Reports.
  -4.0825e-07 from Sugar beet, heavy metals uptake model
  Heavy metal uptake can be excluded by setting the parameter heavyMetalUptakeSwitch to zero.
- Zinc, ion [water, ground-]: 2.58776e-7 kg; source Freiermuth R.  2006; lognormal variance with pedigree 0.356938, pedigree (2,2,4,1,1)
  (same comment as for Lead)
- Copper [soil, agricultural]: -1.68622e-6 kg; = 1.0737833595e-06 + ( - 2.76e-06)*heavyMetalUptakeSwitch; source Freiermuth R.  2006
  Comment on mathematicalRelation:
  1.0737833595e-06 from Calculated value - Freiermuth (2006). See 'WFLDB-Guidelines.pdf', available at https://ecoquery.ecoinvent.org/File/Reports.
  -2.76e-06 from Sugar beet, heavy metals uptake model
  Heavy metal uptake can be excluded by setting the parameter heavyMetalUptakeSwitch to zero.
- Chromium, ion [water, ground-]: 1.80157e-7 kg; source Freiermuth R.  2006; lognormal variance with pedigree 0.356938, pedigree (2,2,4,1,1)
  (same comment as for Lead)
- Lead [soil, agricultural]: -1.43591e-7 kg; = 1.23208791209e-07 + ( - 2.668e-07)*heavyMetalUptakeSwitch; source Freiermuth R.  2006
  Comment on mathematicalRelation:
  1.23208791209e-07 from Calculated value - Freiermuth (2006). See 'WFLDB-Guidelines.pdf', available at https://ecoquery.ecoinvent.org/File/Reports.
  -2.668e-07 from Sugar beet, heavy metals uptake model
  Heavy metal uptake can be excluded by setting the parameter heavyMetalUptakeSwitch to zero.
- Lead [water, surface water]: 1.95212e-8 kg; source Freiermuth R.  2006; lognormal variance with pedigree 0.356938, pedigree (2,2,4,1,1)
  (same comment as for Zinc, ion)
- Mercury [soil, agricultural]: -1.11797e-8 kg; = 1.06703296703e-08 + ( - 2.185e-08)*heavyMetalUptakeSwitch; source Freiermuth R.  2006
  Comment on mathematicalRelation:
  1.06703296703e-08 from Calculated value - Freiermuth (2006). See 'WFLDB-Guidelines.pdf', available at https://ecoquery.ecoinvent.org/File/Reports.
  -2.185e-08 from Sugar beet, heavy metals uptake model
  Heavy metal uptake can be excluded by setting the parameter heavyMetalUptakeSwitch to zero.
- Cadmium, ion [water, surface water]: 5.91586e-10 kg; source Freiermuth R.  2006; lognormal variance with pedigree 0.356938, pedigree (2,2,4,1,1)
  (same comment as for Zinc, ion)
- Nickel [soil, agricultural]: 1.5711e-7 kg; = 4.05510204082e-07 + ( - 2.484e-07)*heavyMetalUptakeSwitch; source Freiermuth R.  2006
  Comment on mathematicalRelation:
  4.05510204082e-07 from Calculated value - Freiermuth (2006). See 'WFLDB-Guidelines.pdf', available at https://ecoquery.ecoinvent.org/File/Reports.
  -2.484e-07 from Sugar beet, heavy metals uptake model
  Heavy metal uptake can be excluded by setting the parameter heavyMetalUptakeSwitch to zero.
- Zinc [soil, agricultural]: -8.39818e-7 kg; = 7.53218210361e-06 + ( - 8.372e-06)*heavyMetalUptakeSwitch; source Freiermuth R.  2006
  Comment on mathematicalRelation:
  7.53218210361e-06 from Calculated value - Freiermuth (2006). See 'WFLDB-Guidelines.pdf', available at https://ecoquery.ecoinvent.org/File/Reports.
  -8.372e-06 from Sugar beet, heavy metals uptake model
  Heavy metal uptake can be excluded by setting the parameter heavyMetalUptakeSwitch to zero.
- Mercury [water, ground-]: 1.22505e-11 kg; source Freiermuth R.  2006; lognormal variance with pedigree 0.356938, pedigree (2,2,4,1,1)
  (same comment as for Lead)
- Chromium, ion [water, surface water]: 6.72041e-8 kg; source Freiermuth R.  2006; lognormal variance with pedigree 0.356938, pedigree (2,2,4,1,1)
  (same comment as for Zinc, ion)
- Epoxiconazole [soil, agricultural]: 1.92186e-6 kg; source Freiermuth R.  2006; lognormal variance with pedigree 0.0447216, pedigree (2,2,4,1,1)
  (same comment as for Zinc, ion)
- Nickel, ion [water, ground-]: 1.18782e-12 kg; source Freiermuth R.  2006; lognormal variance with pedigree 0.356938, pedigree (2,2,4,1,1)
  (same comment as for Lead)
- Cadmium, ion [water, ground-]: 3.75636e-10 kg; source Freiermuth R.  2006; lognormal variance with pedigree 0.356938, pedigree (2,2,4,1,1)
  (same comment as for Lead)
- Fenpropidin [soil, agricultural]: 5.76557e-6 kg; source Freiermuth R.  2006; lognormal variance with pedigree 0.0447216, pedigree (2,2,4,1,1)
  (same comment as for Zinc, ion)
- Copper, ion [water, surface water]: 5.90754e-8 kg; source Freiermuth R.  2006; lognormal variance with pedigree 0.356938, pedigree (2,2,4,1,1)
  (same comment as for Zinc, ion)
- Fenpropimorph [soil, agricultural]: 2.30623e-6 kg; source Freiermuth R.  2006; lognormal variance with pedigree 0.0447216, pedigree (2,2,4,1,1)
  (same comment as for Zinc, ion)
- Kresoxim-methyl [soil, agricultural]: 1.92186e-6 kg; source Freiermuth R.  2006; lognormal variance with pedigree 0.0447216, pedigree (2,2,4,1,1)
  (same comment as for Zinc, ion)
- Desmedipham [soil, agricultural]: 2.65216e-6 kg; source Freiermuth R.  2006; lognormal variance with pedigree 0.0447216, pedigree (2,2,4,1,1)
  (same comment as for Zinc, ion)

## Sampling procedure
WFLDB Methodological Guidelines for the Life Cycle Inventory of Agricultural Products in the latest version, available at: (Report section: https://v30.ecoquery.ecoinvent.org/File/Reports). Data sources: Data were categorised from level 0 (L0) to level (L4) as follows: L0 = estimate, proxy; L1 = statistical data (e.g. FAOSTAT); L2 = L1 adapted to crop and country;L3 = literature data or L1 resp. L2 data approved by experts; medium detailing (i.e. kg of total N-fertiliser); L4 = L3 data of high detailing (i.e. portion N-fertiliser types).In this dataset data were obtained for yield: L3; Fertilisers: L4; Pesticides: L1; Machinery: L1/L2; Irrigation: L2. For information regarding the calculation of individual exchanges see supporting documentation WFLDB-Documentation.pdf.

## Extrapolations
This dataset has been extrapolated from year 2012 to the year of the calculation (2021). The uncertainty has been adjusted accordingly.

## Review by Assumpció ANTON 2016-05-30
Be aware that the use of statistics in input calculations could provide some specific inputs not common for specific crops, this should be corrected if better information is available and better reflexed in DQR . Currently, I would dissent for some of good marks provided, being a revision of criteria applied advisable.

Pesticides will need to be amended periodically checking for update of pesticides' ban.
