# hydrogen cracking, APME

Dataset: EcoSpold 2, unit process
Geography: RoW
Time period: 1999-01-01 to 2021-12-31
Technology level: current
Classification: EcoSpold01Categories: chemicals/inorganics
Classification: ISIC rev.4 ecoinvent: 1920:Manufacture of refined petroleum products
Tags: ConvertedDataset
Scenario: Business-as-Usual
System model: Allocation, cut-off by classification
Generated by: Roland Hischier
Published in: Althaus H.-J. 2007
Database: ecoinvent
isCopyrightProtected: true
accessRestrictedTo: 1

## General comment
Data are derived from the Eco-profiles of the European plastics industry (PlasticsEurope). Not included are the values reported for: recyclable wastes, amount of air / N2 / O2 consumed, unspecified metal emission to air and to water, mercaptan emission to air, unspecified CFC/HCFC emission to air, dioxin to water. The amount of "sulphur (bonded)" is assumed to be included into the amount of raw oil.
[This dataset was already contained in the ecoinvent database version 2. It was not individually updated during the transfer to ecoinvent version 3. Life Cycle Impact Assessment results may still have changed, as they are affected by changes in the supply chain, i.e. in other datasets. This dataset was generated following the ecoinvent quality guidelines for version 2. It may have been subject to central changes described in the ecoinvent version 3 change report (http://www.ecoinvent.org/database/ecoinvent-version-3/reports-of-changes/), and the results of the central updates were reviewed extensively. The changes added e.g. consistent water flows and other information throughout the database. The documentation of this dataset can be found in the ecoinvent reports of version 2, which are still available via the ecoinvent website. The change report linked above covers all central changes that were made during the conversion process.]

## Included activities end
Aggregated data for all processes from raw material extraction until delivery at plant

## Geography
17 European plants

## Technology
production during cracking of naphtha

## Time period
time to which data refer

## Parameters
- fraction, cooling water, once-through system, to air: 0.004 dimensionless; name fraction_CW_OT_to_air; lognormal variance with pedigree 0.0413, pedigree (2,3,1,3,1)
  Calculated based on literature value (Scown, C.D., 2011, Water Footprint of U.S. Transportation Fuels and supplying information of the article) (Vionnet, S., Quantis Water Database - Technical Report, 2012).
- fraction, cooling water, cooling pond system, to air: 0.032 dimensionless; name fraction_CW_CP_to_air; lognormal variance with pedigree 0.0413, pedigree (2,3,1,3,1)
  (same comment as for fraction, cooling water, once-through system, to air)
- fraction, cooling water, to air: 0.3875 dimensionless; name fraction_CW_to_air; = (0.5*fraction_CW_OT_to_air)+(0.5*fraction_CW_R_to_air); lognormal variance with pedigree 0.092025, pedigree (4,4,3,2,4)
  Calculated value based on literature value (see comments of the other parametres present in this dataset) and expert opinion. In the case when no industry/literature data are available about the type of cooling or directly fraction, cooling water, to air specific for the process a default assumption is applied. It is assumed that the once-through cooling system is used in 50% of all cases and recirculating system is used in another 50% of all cases.
- fraction, process water, to air: 0.205 dimensionless; name fraction_PW_to_air; lognormal variance with pedigree 0.092025, pedigree (4,4,3,2,4)
- fraction, cooling water, recirculating system, to air: 0.771 dimensionless; name fraction_CW_R_to_air; lognormal variance with pedigree 0.0413, pedigree (2,3,1,3,1)
  (same comment as for fraction, cooling water, once-through system, to air)

## Reference product
- hydrogen, liquid: 1 kg; CPC 34210: Hydrogen, nitrogen, oxygen, carbon dioxide and rare gases; inorganic oxygen compounds of non-metals n.e.c.; By-product classification allocatable product; CAS 1333-74-0
  EcoSpold01Location=RER
  production volume 3.56453e10 kg
    Calculated as residual from other hydrogen production routes
  property price 2.68 EUR2005
    Calculated value based on data from United Nations Commodity Trade Statistics Database (comtrade.un.org). UN comtrade category: 280410 Hydrogen. Year 2005. Using exchange rate of 1EURO = 1.209 USD. Average of price of import into 5 main markets (EU, US, JP, IN and CN). Cross reference; Literature (http://www.ttcorp.com/pdf/marketReport.pdf). The price of hydrogen, liquid is 5-10 USD/kg.
  property heating value, net 120.21 MJ
    LHV is calculated based on the elemental composition of the substance. Based on the CAS number of the substance (001333-74-0), the chemical formula of the substance is found to be: H2, (PubChem 2020).
    Reference: Kim, S., Chen, J., Cheng, T., Gindulyte, A., He, J., He, S., Li, Q., Shoemaker, B. A., Thiessen, P. A., Yu, B., Zaslavsky, L., Zhang, J., & Bolton, E. E. (2019). PubChem 2019 update: improved access to chemical data. Nucleic acids research, 47(D1), D1102–D1109. https://doi.org/10.1093/nar/gky1033
  property carbon content 0
    carbon content on a dry matter basis (reserved; not for manual entry)
  properties: carbon content, fossil 0, carbon content, non-fossil 0, water content 0, water in wet mass 0 kg, dry mass 1 kg, wet mass 1 kg, carbon allocation 0 kg

## Inputs from technosphere
- spoil from hard coal mining: -0.0098962 kg
  EcoSpold01Location=GLO
  Uncertainty for LCI results cannot be determined
  production volume 3.52753e8 kg
    Calculated from the production volume of hydrogen, liquid in proportion to the respective output amounts.
  properties: wet mass 1 kg, dry mass 1 kg, carbon content, fossil 0.007879
  note on carbon content, fossil: Composition of coal spoil is adopted by proxy from lignite spoil (pg 19, Doka G. (2009) Life Cycle Inventory of the disposal of lignite spoil, coal spoil and coal tailings. Doka Life Cycle Assessments, Zurich. Commissioned by the Swiss Centre for Life Cycle Inventories ecoinvent Centre)
- hazardous waste, for incineration: -0.001567 kg
  Uncertainty for LCI results cannot be determined
  EcoSpold01Location=CH
  production volume 5.58562e7 kg
    (same comment as for spoil from hard coal mining)
  properties: dry mass 0.75 kg, heating value, net 17 MJ, carbon content, fossil 0.554667, water content 0.333333, wet mass 1 kg
  note on heating value, net: Value taken from the general comment of the treatment dataset.
  note on carbon content, fossil: Tab A.6, ecoinvent v2.2 report 13_I. C content has been calculated after data in the tables, and then referred to 1 kg DM
- municipal solid waste: 0 kg
  EcoSpold01Location=CH
  Uncertainty for LCI results cannot be determined
  production volume 0 kg
    (same comment as for spoil from hard coal mining)
  properties: carbon content, non-fossil 0.261655, dry mass 0.771 kg, wet mass 1 kg, heating value, net 11.74 MJ, carbon content, fossil 0.171549, water content 0.297017
  note on carbon content, non-fossil: MSW composition in tab 4.1, ecoinvent v2.2 report 13_I. C content referred to 1 kg DM
- decommissioned chemical production facilities: -1.5481e-9 kg
  Uncertainty for LCI results cannot be determined
  EcoSpold01Location=RER
  production volume 55.1825 kg
    (same comment as for spoil from hard coal mining)
  properties: carbon content, non-fossil 5.78006e-6, carbon content, fossil 0.0169382, wet mass 1 kg, dry mass 1 kg
  note on carbon content, non-fossil: Calculated from C content in input materials in the infrastructure
- waste wood, untreated: 0 kg
  EcoSpold01Location=CH
  Uncertainty for LCI results cannot be determined
  production volume 0 kg
    (same comment as for spoil from hard coal mining)
  properties: water content 0.25, wet mass 1 kg, carbon content, non-fossil 0.48632, dry mass 0.8 kg, heating value, net 13.99 MJ
  note on carbon content, non-fossil: Tab A.4, ecoinvent v2.2 report 13_I. C content has been referred to 1 kg DM,
- average incineration residue: -0.0045974 kg
  Uncertainty for LCI results cannot be determined
  EcoSpold01Location=CH
  production volume 1.63876e8 kg
    (same comment as for spoil from hard coal mining)
  properties: carbon content, fossil 0.0325466, carbon content, non-fossil 0.0511208, wet mass 1 kg, dry mass 1 kg
  note on carbon content, fossil: Tab A.1, ecoinvent v2.2 report 13_I. It is considered that 61.1% of the C has a biogenic origin
- coal slurry: -7.1074e-7 kg
  Uncertainty for LCI results cannot be determined
  EcoSpold01Location=GLO
  production volume 25334.6 kg
    (same comment as for spoil from hard coal mining)
  properties: wet mass 1 kg, carbon content, fossil 0.124, dry mass 1 kg
  note on carbon content, fossil: Coal tailings composition in Tab 3.4, (Doka G. (2009) Life Cycle Inventory of the disposal of lignite spoil, coal spoil and coal tailings. Doka Life Cycle Assessments, Zurich. Commissioned by the Swiss Centre for Life Cycle Inventories ecoinvent Centre)
- waste plastic, mixture: 0 kg
  Uncertainty for LCI results cannot be determined
  EcoSpold01Location=CH
  production volume 0 kg
    (same comment as for spoil from hard coal mining)
  properties: carbon content, fossil 0.747344, water content 0.180638, wet mass 1 kg, heating value, net 30.79 MJ, dry mass 0.847 kg
  note on carbon content, fossil: C content in 1 kg DM was calculated using data in Tab A.2, ecoinvent v2.2 report 13_I
- municipal solid waste: -1.84467e-6, -4.64812e-7, -6.64243e-7, -0.00130463 kg (4 entries)
  EcoSpold01Location=CH
  Uncertainty for LCI results cannot be determined
  production volume 4.66098e7 kg
- waste wood, untreated: -3.57295e-9, -4.43635e-10, -3.24347e-11, -1.24604e-9, -1.88246e-10, -2.97602e-10, -4.74021e-8 kg (7 entries)
  EcoSpold01Location=CH
  Uncertainty for LCI results cannot be determined
  production volume 1895.72 kg
- waste plastic, mixture: -5.91247e-8, -3.95049e-9, -2.98769e-10, -1.63169e-9, -6.59185e-10, -1.54944e-9, -4.13906e-7 kg (7 entries)
  Uncertainty for LCI results cannot be determined
  EcoSpold01Location=CH
  production volume 17149.7 kg

## Inputs from nature
- Iron, in ground [natural resource, in ground]: 0.00037772 kg
  46% Fe in siderite; 25% Fe in ore; Uncertainty for LCI results cannot be determined
- Titanium, in ground [natural resource, in ground]: 0 kg
  95% TiO2 in rutile; 0.4% TiO2 in ore; Uncertainty for LCI results cannot be determined
- Gravel, in ground [natural resource, in ground]: 1.3936e-6 kg
  Uncertainty for LCI results cannot be determined
- Coal, brown, in ground [natural resource, in ground]: 2.8046e-8 kg
  Uncertainty for LCI results cannot be determined
- Lead, in ground [natural resource, in ground]: 1.8266e-7 kg
  5.0% Pb in sulfide; 3.0% Pb in ore; Uncertainty for LCI results cannot be determined
- Clay, unspecified, in ground [natural resource, in ground]: 1.9007e-10 kg
  Uncertainty for LCI results cannot be determined
- Anhydrite, in ground [natural resource, in ground]: 1.0976e-5 kg
  Uncertainty for LCI results cannot be determined
- Sulfur, in ground [natural resource, in ground]: 9.0887e-5 kg
  Uncertainty for LCI results cannot be determined
- Gas, natural, in ground [natural resource, in ground]: 0.92089 m3
  Uncertainty for LCI results cannot be determined
- Copper, in ground [natural resource, in ground]: 9.9678e-12 kg
  0.99% Cu in sulfide; 0.36% Cu and 82 ppm Mo in ore; Uncertainty for LCI results cannot be determined
- Energy, gross calorific value, in biomass [natural resource, biotic]: 0.13165 MJ
- Energy, potential (in hydropower reservoir), converted [natural resource, in water]: 0.057328 MJ
- Barium, in ground [natural resource, in ground]: 3.0063e-8 kg
  15% BaSO4 in ore; Uncertainty for LCI results cannot be determined
- Calcite, in ground [natural resource, in ground]: 0.00037358 kg
  Uncertainty for LCI results cannot be determined
- Water, unspecified natural origin [natural resource, in water]: 0.00072324 m3; name water_UNO_input; source Boustead, I. 2005; lognormal variance with pedigree 1.21, pedigree (5,5,5,5,5)
  Literature value. Data represents an average value from seventeen European plants.
- Water, salt, ocean [natural resource, in water]: 0.0007846 m3; name water_salt_ocean_input; source Boustead, I. 2005; lognormal variance with pedigree 1.21, pedigree (5,5,5,5,5)
  Literature value. Data represents an average value from seventeen European plants.
- Wood, unspecified, standing [natural resource, biotic]: 4.0436e-9 m3
  Uncertainty for LCI results cannot be determined
- Chromium, in ground [natural resource, in ground]: 3.6976e-13 kg
  25.5% Cr in chromite; 11.6% in ore; Uncertainty for LCI results cannot be determined
- Fluorspar, in ground [natural resource, in ground]: 1.8819e-7 kg
  92% CaF2 in ore; Uncertainty for LCI results cannot be determined
- Zinc, in ground [natural resource, in ground]: 6.6734e-9 kg
  9.0% Zn in sulfide; 5.3% Zn in ore; Uncertainty for LCI results cannot be determined
- Uranium, in ground [natural resource, in ground]: 2.6217e-6 kg
  Uncertainty for LCI results cannot be determined
- Oil, crude, in ground [natural resource, in ground]: 0.75621 kg
  Uncertainty for LCI results cannot be determined
- Sylvite, in ground [natural resource, in ground]: 4.4486e-9 kg
  25% Sylvite in sylvinite; Uncertainty for LCI results cannot be determined
- Sodium nitrate, in ground [natural resource, in ground]: 0 kg
  Uncertainty for LCI results cannot be determined
- Feldspar, in ground [natural resource, in ground]: 0 kg
  Uncertainty for LCI results cannot be determined
- Phosphorus, in ground [natural resource, in ground]: 1.2431e-12 kg
  18% P in apatite; 12% in ore; Uncertainty for LCI results cannot be determined
- Mercury, in ground [natural resource, in ground]: 8.3977e-10 kg
  Uncertainty for LCI results cannot be determined
- Sand, unspecified, in ground [natural resource, in ground]: 7.1294e-5 kg
  Uncertainty for LCI results cannot be determined
- Granite, in ground [natural resource, in ground]: 1.6439e-15 kg
  Uncertainty for LCI results cannot be determined
- Sodium chloride, in ground [natural resource, in ground]: 0.00053646 kg
  Uncertainty for LCI results cannot be determined
- Nickel, in ground [natural resource, in ground]: 4.7435e-13 kg
  1.98% Ni in silicates; 1.04% Ni in ore; Uncertainty for LCI results cannot be determined
- Aluminium, in ground [natural resource, in ground]: 3.7038e-7 kg
  24% Al in bauxite; 11% Al in ore; Uncertainty for LCI results cannot be determined
- Coal, hard, unspecified, in ground [natural resource, in ground]: 0.048766 kg
  Uncertainty for LCI results cannot be determined
- Shale, in ground [natural resource, in ground]: 3.1072e-5 kg
  Uncertainty for LCI results cannot be determined
- Manganese, in ground [natural resource, in ground]: 4.8718e-7 kg
  35.7% Mn in sedimentary deposit; 14.2% Mn in ore; Uncertainty for LCI results cannot be determined
- Olivine, in ground [natural resource, in ground]: 3.5437e-6 kg
  Uncertainty for LCI results cannot be determined
- Peat, in ground [natural resource, biotic]: 0.00039488 kg
  Uncertainty for LCI results cannot be determined
- Clay, bentonite, in ground [natural resource, in ground]: 0.00011004 kg
  Uncertainty for LCI results cannot be determined
- Dolomite, in ground [natural resource, in ground]: 4.64e-6 kg
  Uncertainty for LCI results cannot be determined
- Magnesite, in ground [natural resource, in ground]: 0 kg
  60% Magnesite in ore; Uncertainty for LCI results cannot be determined
- Talc, in ground [natural resource, in ground]: 0 kg
  Uncertainty for LCI results cannot be determined
- Water, well, in ground [natural resource, in water]: 9.0105e-11 m3; name water_well_in_ground_input; source Boustead, I. 2005; lognormal variance with pedigree 1.21, pedigree (5,5,5,5,5)
  Literature value. Data represents an average value from seventeen European plants.
- Water, cooling, unspecified natural origin [natural resource, in water]: 0.073203 m3; name water_cooling_UNO_input; source Boustead, I. 2005; lognormal variance with pedigree 1.21, pedigree (5,5,5,5,5)
  Literature value. Data represents an average value from seventeen European plants.
- Water, river [natural resource, in water]: 0.000561 m3; name water_river_input; source Boustead, I. 2005; lognormal variance with pedigree 1.21, pedigree (5,5,5,5,5)
  Literature value. Data represents an average value from seventeen European plants.

## Emissions to nature
- Chlorate [water, surface water]: 1.1916e-7 kg
  Uncertainty for LCI results cannot be determined
- Ethene, chloro- [air, urban air close to ground]: 1.7827e-10 kg
  Uncertainty for LCI results cannot be determined
- Methane, dichloro-, HCC-30 [air, urban air close to ground]: 5.977e-14 kg
  Uncertainty for LCI results cannot be determined
- Chromium, ion [water, surface water]: 7.3754e-14 kg
  Uncertainty for LCI results cannot be determined
- Hydrocarbons, chlorinated [air, urban air close to ground]: 5.2208e-9 kg
  Uncertainty for LCI results cannot be determined
- Bromate [water, surface water]: 4.3433e-10 kg
  Uncertainty for LCI results cannot be determined
- Copper, ion [water, surface water]: 1.6495e-8 kg
  Uncertainty for LCI results cannot be determined
- Chloride [water, surface water]: 7.4027e-5 kg
  Uncertainty for LCI results cannot be determined
- Arsenic, ion [water, surface water]: 8.2973e-10 kg
  Uncertainty for LCI results cannot be determined
- Lead [air, urban air close to ground]: 1.0413e-9 kg
  Uncertainty for LCI results cannot be determined
- Chlorinated solvents, unspecified [water, surface water]: 7.0594e-9 kg
  Uncertainty for LCI results cannot be determined
- Water [air, unspecified]: 0.0287903 m3; name water_to_air_unspecified; lognormal variance with pedigree 0.0827, pedigree (2,2,5,5,1)
  Calculated value based on literature values and expert opinion. See comments in the parametres' comment field.
  property fraction, origin: salt water 0.00558671; name fraction_origin_salt_water
  property fraction, origin: unspecified 0.990419; name fraction_origin_unspecified
  property fraction, origin: fresh water 0.00399458; name fraction_origin_fresh_water
- Particulates, > 10 um [air, urban air close to ground]: 0.00013836 kg
  Uncertainty for LCI results cannot be determined
- Zinc, ion [water, surface water]: 8.2803e-8 kg
  Uncertainty for LCI results cannot be determined
- Nitrogen oxides [air, urban air close to ground]: 0.0021159 kg
  Uncertainty for LCI results cannot be determined
- Hydrocarbons, unspecified [water, surface water]: 2.2305e-5 kg
  Uncertainty for LCI results cannot be determined
- Carbon monoxide, fossil [air, urban air close to ground]: 0.0025127 kg
  Uncertainty for LCI results cannot be determined
- Suspended solids, unspecified [water, surface water]: 0.00012662 kg
  Uncertainty for LCI results cannot be determined
- Zinc [air, urban air close to ground]: 4.0799e-11 kg
  Uncertainty for LCI results cannot be determined
- Iron, ion [water, surface water]: 1.6115e-8 kg
  Uncertainty for LCI results cannot be determined
- Mercury [water, surface water]: 3.1969e-10 kg
  Uncertainty for LCI results cannot be determined
- Water [water, unspecified]: 0.0464816 m3; name water_to_water_unspecified; lognormal variance with pedigree 0.0827, pedigree (2,2,5,5,1)
  (same comment as for Water)
  property fraction, origin: salt water 0.0134194; name fraction_origin_salt_water_Ww
  property fraction, origin: unspecified 0.976985; name fraction_origin_unspecified_Ww
  property fraction, origin: fresh water 0.0095951; name fraction_origin_fresh_water_Ww
  property water in wet mass 1000 kg; name WWM
  property dry mass 0 kg; name DM
  property carbon content, non-fossil 0; name C_content_non_fossil
  property carbon content, fossil 0; name C_content_fossil
  property wet mass 1000 kg; name WM
- BOD5, Biological Oxygen Demand [water, surface water]: 3.6772e-5 kg
  Uncertainty for LCI results cannot be determined
- Methane, non-fossil [air, urban air close to ground]: 4.0908e-5 kg
  Uncertainty for LCI results cannot be determined
- Acidity, unspecified [water, surface water]: 9.948e-7 kg
  Uncertainty for LCI results cannot be determined
- Chromium [air, urban air close to ground]: 6.9602e-10 kg
  Uncertainty for LCI results cannot be determined
- Carbonate [water, surface water]: 0.00017286 kg
  Uncertainty for LCI results cannot be determined
- Chlorine [water, surface water]: 8.4122e-10 kg
  Uncertainty for LCI results cannot be determined
- Dissolved solids [water, surface water]: 1.5174e-5 kg
  Uncertainty for LCI results cannot be determined
- Ammonium, ion [water, surface water]: 1.7572e-6 kg
  Uncertainty for LCI results cannot be determined
- Particulates, > 2.5 um, and < 10um [air, urban air close to ground]: 0.00018593 kg
  Uncertainty for LCI results cannot be determined
- Nickel, ion [water, surface water]: 4.5658e-10 kg
  Uncertainty for LCI results cannot be determined
- Ethane, 1,2-dichloro- [water, surface water]: 1.807e-13 kg
  Uncertainty for LCI results cannot be determined
- Carbon dioxide, non-fossil [air, urban air close to ground]: 0.0027775 kg
  Uncertainty for LCI results cannot be determined
- DOC, Dissolved Organic Carbon [water, surface water]: 5.2479e-5 kg
  Calculated as equal to TOC.
- Hydrogen sulfide [air, urban air close to ground]: 1.2713e-8 kg
  Uncertainty for LCI results cannot be determined
- Sulfide [water, surface water]: 2.0444e-13 kg
  Uncertainty for LCI results cannot be determined
- Particulates, < 2.5 um [air, urban air close to ground]: 0.0001081 kg
  Uncertainty for LCI results cannot be determined
- Hydrocarbons, aromatic [air, urban air close to ground]: 7.6277e-6 kg
  Uncertainty for LCI results cannot be determined
- Cyanide [water, surface water]: 3.5791e-11 kg
  Uncertainty for LCI results cannot be determined
- Sodium, ion [water, surface water]: 0.000162 kg
  Uncertainty for LCI results cannot be determined
- Copper [air, urban air close to ground]: 2.7877e-14 kg
  Uncertainty for LCI results cannot be determined
- Methane, fossil [air, urban air close to ground]: 0.018182 kg
  Uncertainty for LCI results cannot be determined
- Carbon dioxide, fossil [air, urban air close to ground]: 1.2345 kg
  Uncertainty for LCI results cannot be determined
- Potassium, ion [water, surface water]: 1.2965e-10 kg
  Uncertainty for LCI results cannot be determined
- Arsenic [air, urban air close to ground]: 1.5272e-10 kg
  Uncertainty for LCI results cannot be determined
- Oils, unspecified [water, surface water]: 1.9968e-5 kg
  Uncertainty for LCI results cannot be determined
- Phosphorus [water, surface water]: 5.4578e-8 kg
  Uncertainty for LCI results cannot be determined
- Sulfate [water, surface water]: 0.00048342 kg
  Uncertainty for LCI results cannot be determined
- Dinitrogen monoxide [air, urban air close to ground]: 2.761e-13 kg
  Uncertainty for LCI results cannot be determined
- Carbon monoxide, non-fossil [air, urban air close to ground]: 5.6533e-6 kg
  Uncertainty for LCI results cannot be determined
- NMVOC, non-methane volatile organic compounds, unspecified origin [air, urban air close to ground]: 0.0020967 kg
  Uncertainty for LCI results cannot be determined
- Strontium [water, surface water]: 1.2941e-11 kg
  Uncertainty for LCI results cannot be determined
- COD, Chemical Oxygen Demand [water, surface water]: 0.00015312 kg
  Uncertainty for LCI results cannot be determined
- Ethane, 1,2-dichloro- [air, urban air close to ground]: 7.9571e-12 kg
  Uncertainty for LCI results cannot be determined
- Magnesium [water, surface water]: 4.953e-10 kg
  Uncertainty for LCI results cannot be determined
- Aluminium [water, surface water]: 1.4094e-6 kg
  Uncertainty for LCI results cannot be determined
- Ethene, chloro- [water, surface water]: 3.3009e-12 kg
  Uncertainty for LCI results cannot be determined
- Hydrogen chloride [air, urban air close to ground]: 2.1678e-5 kg
  Uncertainty for LCI results cannot be determined
- Lead [water, surface water]: 2.6713e-10 kg
  Uncertainty for LCI results cannot be determined
- Nickel [air, urban air close to ground]: 4.9889e-14 kg
  Uncertainty for LCI results cannot be determined
- Cadmium [air, urban air close to ground]: 2.4429e-11 kg
  Uncertainty for LCI results cannot be determined
- Fluoride [water, surface water]: 1.3536e-9 kg
  Uncertainty for LCI results cannot be determined
- Hydrogen [air, urban air close to ground]: 3.0429e-5 kg
  Uncertainty for LCI results cannot be determined
- Nitrogen [water, surface water]: 4.2352e-6 kg
  Uncertainty for LCI results cannot be determined
- Antimony [air, urban air close to ground]: 2.0753e-15 kg
  Uncertainty for LCI results cannot be determined
- Ethene [air, urban air close to ground]: 3.4117e-14 kg
  Uncertainty for LCI results cannot be determined
- Phenol [water, surface water]: 1.1513e-6 kg
  Uncertainty for LCI results cannot be determined
- Manganese [water, surface water]: 2.2386e-14 kg
  Uncertainty for LCI results cannot be determined
- Calcium, ion [water, surface water]: 3.525e-8 kg
  Uncertainty for LCI results cannot be determined
- Fluorine [air, urban air close to ground]: 2.4206e-11 kg
  Uncertainty for LCI results cannot be determined
- TOC, Total Organic Carbon [water, surface water]: 5.2479e-5 kg
  Uncertainty for LCI results cannot be determined
- Sulfur dioxide [air, urban air close to ground]: 0.0020278 kg
  Uncertainty for LCI results cannot be determined
- Nitrate [water, surface water]: 5.8407e-6 kg
  Uncertainty for LCI results cannot be determined
- Sulfate [air, urban air close to ground]: 6.0913e-15 kg
  Uncertainty for LCI results cannot be determined
- Hydrogen fluoride [air, urban air close to ground]: 8.142e-7 kg
  Uncertainty for LCI results cannot be determined
- Carbon disulfide [air, urban air close to ground]: 8.0805e-11 kg
  Uncertainty for LCI results cannot be determined
- Cadmium, ion [water, surface water]: 4.4407e-15 kg
  Uncertainty for LCI results cannot be determined
- Mercury [air, urban air close to ground]: 2.1487e-9 kg
  Uncertainty for LCI results cannot be determined
- Chlorine [air, urban air close to ground]: 3.6793e-11 kg
  Uncertainty for LCI results cannot be determined
- AOX, Adsorbable Organic Halogen as Cl [water, surface water]: 5.048e-13 kg
  Uncertainty for LCI results cannot be determined
- Ammonia [air, urban air close to ground]: 1.2642e-10 kg
  Uncertainty for LCI results cannot be determined
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
## Sampling procedure
literature values based on company survey

## Extrapolations
no extrapolation This dataset has been copied from an original dataset covering the geography RER. The uncertainty has been adjusted accordingly.

## Review by Jürgen Sutter 2010-04-06
passed.
