# treatment of used domestic refrigerator, uncontrolled dismantling

Dataset: EcoSpold 2, unit process
Geography: GH
Time period: 2018-01-01 to 2021-12-31
Technology level: current
Classification: ISIC rev.4 ecoinvent: 3830:Materials recovery
Scenario: Business-as-Usual
System model: Allocation, cut-off by classification
Generated by: Avraam Symeonidis
Database: ecoinvent
isCopyrightProtected: true
accessRestrictedTo: 1

## General comment
The activity models the unsafe treatment of a large used domestic refrigeration machine by physical dismantling in an unsafe and uncontrolled manner. The process takes place in an informal recycling site in the capital of Ghana, Accra. Metal recovery (steel, copper and aluminium) is a source of income for the informal recyclers and hence is the major motive behind this process. This dataset models air emissions from a) venting the refrigerant present in the refrigeration machine as well as from b) breaking the polyurethane insulation that releases the blowing agent of the foaming. Any geographical and temporal distinctions and climate situation are irrelevant for this UPR-LCI.
The UPR-LCI averages three types of refrigerations machines based on the refrigerant they contain. Calculations regarding the average fridge are found on the table attached.
Dataset Icon: Corpuses of refrigerators after manual extraction of steel, copper and aluminium (Source: Öko-
Institut 2010).
Reference: Siddharth Prakash & Andreas Manhart, 2010. Socio-economic assessment and
feasibility study on sustainable
e-waste management in Ghana. Retrieved online at: https://www.oeko.de/en/publications/p-details/socio-economic-assessment-and-feasibility-study-on-sustainable-e-waste-management-in-ghana/
References for refrigerant:
Sampson Atiemo, Lambert Faabeluon, Andreas Manhart, Letitia Nyaaba, Tobias Schleicher, 2016, Baseline Assessment on E-waste Management in Ghana, Sustainable Recycling Industries. Accra, June 2016. Retrieved online at http://www.sustainable-recycling.org/sampson_2016_sri-ghana/ on 31/01/2018.
Amoyaw-Osei, Y & Agyekum, O.O. & Pwamang, John & Thiébaud (-Müller, Esther & Fasko, R & Schluep, Mathias. (2011). Ghana e-waste country assessment. SBC e-waste Africa project.

## Included activities start
Activity starts with the reception of the used refrigeration machine by the informal recycler. Transportation is not include in this LCI.

## Included activities end
Activity ends when the recycler removes all valuable metals. Activity includes emissions to air.

## Technology
Physical dismantling performed in uncontrolled manner without the use of protection equipment, oftentimes performed with simple tools, if any. No use of anti-pollution equipment either.

## Time period
Physical and unsafe dismantling of used domestic refrigeration machine without any temporal distinction.

## Reference product
- used domestic refrigerator: -1 unit; By-product classification Waste; CPC 39990: Other wastes n.e.c.
  production volume 1.22429e6 unit; name pvrp
    Calculated value. Production volume represents the imports (52%) of used refrigeration machines in Ghana for the time period from 2003 till 2008 (2005 excluded as was marked "in doubt"). It is assumed that 10% of the used imported refrigerators are dismantled in a controlled manner. Hence, the production volume for uncontrolled dismantling is 1224288 units.
    Reference: Ghana e-waste assessment. Retrieved online on 05.02.2018 at http://www.basel.int/Portals/4/Basel%20Convention/docs/eWaste/E-wasteAssessmentGhana.pdf
  property price 0 EUR2005
    Waste products are assigned a price of zero as they are assumed to require further treatment.
  property carbon content, fossil 0.3327
    Value calculated from the respective exchange propertis of the process outputs.
  property carbon content, non-fossil 5.2632e-6
    Values were taken from a similar product "refrigeration machine, R134a as refrigerant"
  property carbon content 0.332705
    carbon content on a dry matter basis (reserved; not for manual entry)
  properties: dry mass 58.3 kg, water in wet mass 0 kg, wet mass 58.3 kg, water content 0, carbon allocation 19.3967 kg

## By-products
- copper scrap, sorted, pressed: 0 kg; source Rufeng Xiao 2015; CPC 39361: Waste and scrap of copper; By-product classification Recyclable; pedigree (1,1,1,1,1)
  According to literature a domestic refrigerator has circa
  -1.25 kg of copper in the refrigerating system (compressor)
  -0.05 kg of copper in the refrigerating system (accessory)
  production volume 0 kg; = pvrp*bp2
    Calculated from production volume of reference product using the relative outputs.
  property price 2.84 EUR2005; name bp2_price_EUR2005
    Temporary price data. Calculated as 90% of purchasers price based on: Source: USGS Mineral Yearbook 2007, Table 1 in <http://minerals.usgs.gov/minerals/pubs/commodity/recycle/myb1-2007-recyc.pdf>
  property carbon content 0
    carbon content on a dry matter basis (reserved; not for manual entry)
  properties: dry mass 1 kg, carbon content, fossil 0, wet mass 1 kg, carbon content, non-fossil 0, water in wet mass 0 kg, water content 0, carbon allocation 0 kg
- aluminium scrap, post-consumer: 0 kg; source Rufeng Xiao 2015; CPC 39363: Waste and scrap of aluminium; By-product classification Recyclable; pedigree (1,1,1,1,1)
  According to literature a domestic refrigerator has circa
  -1.58 kg of aluminum in the refrigerating system (compressor)
  -0.60 kg of aluminum in the refrigerating system (accessory)
  production volume 0 kg; = pvrp*bp3
    Calculated from production volume of reference product using the relative outputs.
  property price 0.685 EUR2005; name bp3_price_EUR2005
    Temporary price data. Calculated as 90% of purchasers price based on: estimated at 85% of new scrap
  property carbon content 0
    carbon content on a dry matter basis (reserved; not for manual entry)
  properties: water in wet mass 0 kg, wet mass 1 kg, carbon content, non-fossil 0, carbon content, fossil 0, dry mass 1 kg, water content 0, carbon allocation 0 kg

## Inputs from technosphere
All rows: source Rufeng Xiao 2015
- waste polyethylene: -11.76 kg; name bp5; lognormal variance with pedigree 0.008925, pedigree (1,2,2,2,3)
  According to literature a domestic refrigerator has circa
  -5.14 kg of Isocyanate for foaming (Cabinet)
  -1.33 kg of Isocyanate for foaming (Door)
  -0.38 kg of Cyclopentane for foaming (Cabinet)
  -0.10 kg of Cyclopentane for foaming (Door)
  -3.81 kg of Polyether polyol for foaming (Cabinet)
  -0.99 kg of Polyether polyol for foaming (Door)
  production volume 1.43976e7 kg; = pvrp*bp5
    Calculated from production volume of reference product using the relative outputs.
  property price 0 EUR2005; name bp5_price_EUR2005
  properties: carbon content, fossil 0.825301, dry mass 0.996 kg, wet mass 1 kg, water content 0.00401606, heating value, net 42.47 MJ
  note on carbon content, fossil: C content in 1 kg DM was calculated using data in Tab A.1, ecoinvent v2.2 report 13_I
  note on heating value, net: Value taken from the general comment of the treatment dataset.
- waste rubber, unspecified: -0.287403 kg; name bp6; lognormal variance with pedigree 0.008925, pedigree (1,2,2,2,3)
  According to literature a domestic refrigerator has circa
  -0.28 kg of rubber
  production volume 351864 kg; = pvrp*bp6
    Calculated from production volume of reference product using the relative outputs.
  property price 0 EUR2005; name bp6_price_EUR2005
  properties: carbon content, fossil 0.853, dry mass 1 kg, heating value, net 27.19 MJ, wet mass 1 kg
- scrap steel: -32.0927 kg; name bp1; lognormal variance with pedigree 0.010025, pedigree (2,3,2,2,3)
  According to literature a domestic refrigerator has circa
  -13 kg of steel in the cabinet (metal sheet)
  -1.9 kg of steel in the door (metal sheet)
  -15 kg of steel in the refrigerating system (compressor)
  -2.1 kg of steel in the refrigerating system (accessory)
  production volume 3.92907e7 kg; = pvrp*bp1
    Calculated from production volume of reference product using the relative outputs.
  property price 0 EUR2005; name bp1_price_EUR2005
  properties: dry mass 1 kg, wet mass 1 kg
- waste polystyrene: -10 kg; name bp7
  According to literature a domestic refrigerator has circa
  -7.27 kg of High impact polystyrene (HIPS) in cabinet
  -2.72 kg of High impact polystyrene (HIPS) in the door
  production volume 1.22429e7 kg; = pvrp*bp7
    Calculated from production volume of reference product using the relative outputs.
  property price 0 EUR2005; name bp7_price_EUR2005
  properties: water content 0.00200401, dry mass 0.998 kg, wet mass 1 kg, carbon content, fossil 0.922579, heating value, net 38.67 MJ
- waste polyvinylchloride: -0.466666 kg; name bp4; lognormal variance with pedigree 0.008925, pedigree (1,2,2,2,3)
  According to literature a domestic refrigerator has circa
  -0.46 kg of PVC (Shelves drawers)
  production volume 571334 kg; = pvrp*bp4
    Calculated from production volume of reference product using the relative outputs.
  property price 0 EUR2005; name bp4_price_EUR2005
  properties: heating value, net 21.51 MJ, wet mass 1 kg, water content 0.00200401, dry mass 0.998 kg, carbon content, fossil 0.440882
- copper scrap, sorted, pressed: -1.308 kg; lognormal variance with pedigree 0.008925, pedigree (1,2,2,2,3)
  (same comment as for copper scrap, sorted, pressed)
  production volume 1.60137e6 kg
  properties: dry mass 1 kg, wet mass 1 kg
- aluminium scrap, post-consumer: -2.18932 kg; lognormal variance with pedigree 0.008925, pedigree (1,2,2,2,3)
  (same comment as for aluminium scrap, post-consumer)
  production volume 2.68036e6 kg
  properties: wet mass 1 kg, dry mass 1 kg

## Emissions to nature
All rows: lognormal variance with pedigree 0.129425, pedigree (2,3,2,2,3)
- Methane, dichlorodifluoro-, CFC-12 [air, urban air close to ground]: 0.0113633 kg; = 0.2905*255/6519
  The amount represents emissions from uncontrolled venting of the refrigerant that is contained in the refrigeration circuit of an average machine. According to literature, there are on average 290.5 g of refrigerant R12 in the refrigerator machine. The latter amount is then multiplied with the normalised units (255 units) and thereafter divided by the total amount of refrigeration machines (6519 units).
  Reference: Rüdenauer, I.; Gensch, C.-O.: Environmental and economic evaluation of the accelerated replacement of domestic appliances. ÖkoInstitut e.V., Freiburg 2007. Retrieved online at: https://www.oeko.de/en/publications/p-details/environmental-and-economic-evaluation-of-the-accelerated-replacement-of-domestic-appliances/ on 31st of January 2018.
- Cyclopentane [air, urban air close to ground]: 0.232011 kg; = 0.460*3288/6519
  The amount represents emissions from the blowing agent trapped in polyurethane foaming that functions as insulation for the refrigerator. Emissions correspond to an average machine. According to literature, there are on average 460 g of Cyclopentane trapped in the insulation foam (from the refrigerator machines that use R600a as refrigerant). The latter amount is then multiplied with the normalised units (3288 units) and thereafter divided by the total amount of refrigeration machines (6519 units).
  Reference: Rüdenauer, I.; Gensch, C.-O.: Environmental and economic evaluation of the accelerated replacement of domestic appliances. ÖkoInstitut e.V., Freiburg 2007. Retrieved online at: https://www.oeko.de/en/publications/p-details/environmental-and-economic-evaluation-of-the-accelerated-replacement-of-domestic-appliances/ on 31st of January 2018.
- Methane, trichlorofluoro-, CFC-11 [air, urban air close to ground]: 0.0281247 kg; = 0.719*255/6519
  The amount represents emissions from the blowing agent trapped in polyurethane foaming that functions as insulation for the refrigerator. Emissions correspond to an average machine. According to literature, there are on average 719 g of refrigerant R11 trapped in the insulation foam (from the refrigerator machines that use R11 as refrigerant). The latter amount is then multiplied with the normalised units (255 units) and thereafter divided by the total amount of refrigeration machines (6519 units).
  Reference: Rüdenauer, I.; Gensch, C.-O.: Environmental and economic evaluation of the accelerated replacement of domestic appliances. ÖkoInstitut e.V., Freiburg 2007. Retrieved online at: https://www.oeko.de/en/publications/p-details/environmental-and-economic-evaluation-of-the-accelerated-replacement-of-domestic-appliances/ on 31st of January 2018.
- Isobutane [air, urban air close to ground]: 0.0428716 kg; = 0.085*3288/6519
  The amount represents emissions from uncontrolled venting of the refrigerant that is contained in the refrigeration circuit of an average machine. According to literature, there are 85 g of refrigerant R600a in the refrigerator machine. The latter amount is then multiplied with the normalised units (3288 units) and thereafter divided by the total amount of refrigeration machines (6519 units).
  Reference: Rüdenauer, I.; Gensch, C.-O.: Environmental and economic evaluation of the accelerated replacement of domestic appliances. ÖkoInstitut e.V., Freiburg 2007. Retrieved online at: https://www.oeko.de/en/publications/p-details/environmental-and-economic-evaluation-of-the-accelerated-replacement-of-domestic-appliances/ on 31st of January 2018.
- Ethane, 1,1,1,2-tetrafluoro-, HFC-134a [air, urban air close to ground]: 0.282124 kg; = 0.226*2976/6519+0.392*2976/6519
  The amount represents emissions from uncontrolled venting of the refrigerant that is contained in the refrigeration circuit of an average machine. According to literature, there are 226 g of refrigerant R134a in the refrigerator machine. The latter amount is then multiplied with the normalised units (2976 units) and thereafter divided by the total amount of refrigeration machines (6519 units). This accounts for circa 0.1032 kg of HFC-134a emissions to air. Additionally, emissions from the blowing agent trapped in polyurethane foaming that functions as insulation for the refrigerator. Emissions correspond to an average machine. According to literature, there are on average 392 g of refrigerant R134a trapped in the insulation foam (from the refrigerator machines that use R134a as refrigerant). The latter amount is then multiplied with the normalised units (2976 units) and thereafter divided by the total amount of refrigeration machines (6519 units).
  Reference: Rüdenauer, I.; Gensch, C.-O.: Environmental and economic evaluation of the accelerated replacement of domestic appliances. ÖkoInstitut e.V., Freiburg 2007. Retrieved online at: https://www.oeko.de/en/publications/p-details/environmental-and-economic-evaluation-of-the-accelerated-replacement-of-domestic-appliances/ on 31st of January 2018.

## Sampling procedure
Data collection took place using literature.

## Extrapolations
This dataset has been extrapolated from year 2018 to the year of the calculation (2021). The uncertainty has been adjusted accordingly.

## Review by Gabor Doka 2018-04-03
passed. emissions include release of foaming agents from broken insulation foam.
