# graphite production

Dataset: EcoSpold 2, unit process
Geography: RER
Time period: 2000-01-01 to 2021-12-31
Technology level: current
Classification: ISIC rev.4 ecoinvent: 0899:Other mining and quarrying n.e.c.
Classification: EcoSpold01Categories: chemicals/inorganics
Tags: ConvertedDataset
Scenario: Business-as-Usual
System model: Allocation, cut-off by classification
Generated by: Roland Hischier
Published in: Hischier R. 2007
Database: ecoinvent
isCopyrightProtected: true
accessRestrictedTo: 1

## General comment
This datset represents the production of 1 kg of graphite from metamorphous rock in ground containing graphite.
Raw material, energy and water consumption, infrastructure for the site and machineries, land use, and emissions to air are a first approximation based on limestone production.
[This dataset was already contained in the ecoinvent database version 2. It was not individually updated during the transfer to ecoinvent version 3. Life Cycle Impact Assessment results may still have changed, as they are affected by changes in the supply chain, i.e. in other datasets. This dataset was generated following the ecoinvent quality guidelines for version 2. It may have been subject to central changes described in the ecoinvent version 3 change report (http://www.ecoinvent.org/database/ecoinvent-version-3/reports-of-changes/), and the results of the central updates were reviewed extensively. The changes added e.g. consistent water flows and other information throughout the database. The documentation of this dataset can be found in the ecoinvent reports of version 2, which are still available via the ecoinvent website. The change report linked above covers all central changes that were made during the conversion process.]

## Included activities start
From metamorphous rock in the ground containing graphite.

## Included activities end
This activites ends with the production of 1 kg of graphite. The dataset includes raw materials, machineries, energy consumption, emissions to air, and infrastructure of the site. The dataset doesn't include emissions to water.

## Geography
Data are used here as European average.

## Technology
Technology for limestone mining, crusching and milling assumed as a first approximation. Overall yield of 95% is assumed.

## Parameters
- fraction, process water, to air: 0.5 dimensionless; name fraction_PW_to_air; lognormal variance with pedigree 0.092025, pedigree (4,4,3,2,4)
  Literature value (Statistics Canada, 2007 & Shaffer, K.H., 2008, Consumptive water use in the Great Lakes Basin, USGS) (Vionnet, S., Quantis Water Database - Technical Report, 2012).

## Reference product
- graphite: 1 kg; CPC 16390: Other minerals n.e.c.; By-product classification allocatable product; CAS 101239-80-9
  Graphite is besides diamonds and fullerenes the third crystalline form of carbon. It occurs naturally in metamorphic rocks or can be produced artificially from different types of carbon sources (often used are petroleum coke and charcoal). In nature, graphite occures in three different forms - as flakes, as lump and amorphous
  EcoSpold01Location=RER
  production volume 1.32237 kg
    This is a placeholder value that does not reflect real-world production volumes. This dataset does not currently require a real-world production volume to work in the database framework, and no actual data were collected yet. This has no negative effect on the results of the ecoinvent database. The placeholder value of this activity was scaled according to the nominal GDP of 2005 (source: United Nations, http://data.un.org/Glossary.aspx?q=GDP+%28current+US%24%29, accessed 20130726) to reflect an appropriate share of the global production volume, which is also a placeholder value.
  property heating value, net 30.3 MJ
    LHV is calculated based on the Carbon content of the product. More details can be found on the respective documentation.
  property price 0.43 EUR2005
    Calculated value based on data from United Nations Commodity Trade Statistics Database (comtrade.un.org). UN comtrade category: 250410 Natural graphite in powder or flakes. Year 2005. Using exchange rate of 1EURO = 1.209 USD. Average of price of import into 5 main markets (EU, US, JP, IN and CN).
  property carbon content 1
    carbon content on a dry matter basis (reserved; not for manual entry)
  properties: carbon content, fossil 1, water content 0, water in wet mass 0 kg, wet mass 1 kg, carbon content, non-fossil 0, dry mass 1 kg, carbon allocation 1 kg

## Inputs from technosphere
All rows: source Kellenberger D. 2007
- heat, central or small-scale, other than natural gas: 0.0033746 MJ; lognormal variance with pedigree 0.0767, pedigree (4,3,5,3,3)
  EcoSpold01Location=CH
  Proxy: apporximation with data for limestone production from literature source.
  Uncertainty: approximation with data from lime production
  properties: heating value, net 1 MJ
- recultivation, limestone mine: 6.52e-6 m2; lognormal variance with pedigree 0.0767, pedigree (4,3,5,3,3)
  Proxy: apporximation with data for limestone production from literature source.
  EcoSpold01Location=CH
  Uncertainty: approximation with data from lime production
- limestone quarry infrastructure: 5.25e-11 unit; lognormal variance with pedigree 0.3667, pedigree (4,3,5,3,3)
  (same comment as for heat, central or small-scale, other than natural gas)
- electricity, medium voltage: 0.0325 kWh; lognormal variance with pedigree 0.0767, pedigree (4,3,5,3,3)
  Proxy: apporximation with data for limestone production from literature source.
  EcoSpold01Location=UCTE
  Uncertainty: approximation with data from lime production
- conveyor belt: 2.78e-8 m; lognormal variance with pedigree 0.3667, pedigree (4,3,5,3,3)
  Proxy: apporximation with data for limestone production from literature source.
  EcoSpold01Location=RER
  Uncertainty: approximation with data from lime production
- diesel, burned in building machine: 0.018 MJ; lognormal variance with pedigree 0.0767, pedigree (4,3,5,3,3)
  Proxy: apporximation with data for limestone production from literature source.
  EcoSpold01Location=GLO
  Uncertainty: approximation with data from lime production
  properties: heating value, net 1 MJ
- blasting: 7.73e-5 kg; lognormal variance with pedigree 0.0767, pedigree (4,3,5,3,3)
  (same comment as for conveyor belt)
- heat, district or industrial, other than natural gas: 0.0898 MJ; lognormal variance with pedigree 0.0767, pedigree (4,3,5,3,3)
  (same comment as for conveyor belt)
  properties: heating value, net 1 MJ
- industrial machine, heavy, unspecified: 0.000231 kg; lognormal variance with pedigree 0.3667, pedigree (4,3,5,3,3)
  EcoSpold01Location=RER
  Proxy: apporximation with data for limestone production from literature source.
  Uncertainty: approximation with data from lime production

## Inputs from nature
- Water, well, in ground [natural resource, in water]: 2.93e-5 m3; name water_well_in_ground_input; source Kellenberger D. 2007; lognormal variance with pedigree 0.0767, pedigree (4,3,5,3,3)
  Proxy: apporximation with data for limestone production from literature source.
  Uncertainty: approximation with data from lime production
- Transformation, to mineral extraction site [natural resource, land]: 6.52e-6 m2; source Kellenberger D. 2007; lognormal variance with pedigree 0.0767, pedigree (4,3,5,3,3)
  (same comment as for Water, well, in ground)
- Occupation, mineral extraction site [natural resource, land]: 8.48e-5 m2*year; source Kellenberger D. 2007; lognormal variance with pedigree 0.1267, pedigree (4,3,5,3,3)
  (same comment as for Water, well, in ground)
- Transformation, from forest, unspecified [natural resource, land]: 6.52e-6 m2; source Kellenberger D. 2007; lognormal variance with pedigree 0.0767, pedigree (4,3,5,3,3)
  (same comment as for Water, well, in ground)
- Metamorphous rock, graphite containing, in ground [natural resource, in ground]: 1.0526 kg; lognormal variance with pedigree 0.0767, pedigree (4,3,5,3,3)
  Estimation: Overall yield of 95% is assumed.
  Uncertainty: approximation with data from lime production

## Emissions to nature
- Water [air, unspecified]: 1.465e-5 m3; name water_to_air_unspecified; = (water_well_in_ground_input*fraction_PW_to_air); lognormal variance with pedigree 0.0807, pedigree (2,2,5,1,1)
  Calculated value based on literature values and expert opinion. See comments in the parametres' comment field.
  property fraction, origin: fresh water 1; name fraction_origin_fresh_water
  property fraction, origin: salt water 0; name fraction_origin_salt_water
  property fraction, origin: unspecified 0; name fraction_origin_unspecified
- Particulates, > 2.5 um, and < 10um [air, non-urban air or from high stacks]: 4.78e-5 kg; source Kellenberger D. 2007; lognormal variance with pedigree 0.3987, pedigree (4,3,5,3,5)
  (same comment as for Water, well, in ground)
- Particulates, > 10 um [air, non-urban air or from high stacks]: 0.000121 kg; source Kellenberger D. 2007; lognormal variance with pedigree 0.3087, pedigree (4,3,5,3,5)
  (same comment as for Water, well, in ground)
- Water [water, unspecified]: 1.465e-5 m3; name water_to_water_unspecified; = water_well_in_ground_input*(1-fraction_PW_to_air); lognormal variance with pedigree 0.0807, pedigree (2,2,5,1,1)
  (same comment as for Water)
  property fraction, origin: salt water 0; name fraction_origin_salt_water_Ww
  property fraction, origin: fresh water 1; name fraction_origin_fresh_water_Ww
  property fraction, origin: unspecified 0; name fraction_origin_unspecified_Ww
  property water in wet mass 1000 kg; name WWM
  property wet mass 1000 kg; name WM
  property carbon content, non-fossil 0; name C_content_non_fossil
  property dry mass 0 kg; name DM
  property carbon content, fossil 0; name C_content_fossil
- Particulates, < 2.5 um [air, non-urban air or from high stacks]: 8.87e-6 kg; source Kellenberger D. 2007; lognormal variance with pedigree 0.5787, pedigree (4,3,5,3,5)
  (same comment as for Water, well, in ground)

## Sampling procedure
approximation with data from literature

## Extrapolations
This dataset has been extrapolated from year 2000 to the year of the calculation (2021). The uncertainty has been adjusted accordingly.

## Review by Roland Hischier 2011-11-29
Transfer of documentation done.

## Review by Daniel Kellenberger (obsolete) 2007-11-09
passed
