# anaerobic digestion plant construction, agriculture, with methane recovery

Dataset: EcoSpold 2, unit process
Geography: RoW
Time period: 2004-01-01 to 2021-12-31
Technology level: current
Classification: EcoSpold01Categories: biomass/fuels
Classification: ISIC rev.4 ecoinvent: 4290:Construction of other civil engineering projects
Synonyms: agricultural co-fermentation plant
Tags: ConvertedDataset
Scenario: Business-as-Usual
System model: Allocation, cut-off by classification
Share of production covered: 50 %
Generated by: Konrad Schleiss
Published in: Jungbluth N. 2007
Database: ecoinvent
isCopyrightProtected: true
accessRestrictedTo: 1

## General comment
The inventory refers to a typical agricultural biogas plant with a capacity of 500m3 and a life time of 20 years.
[This dataset was already contained in the ecoinvent database version 2. It was not individually updated during the transfer to ecoinvent version 3. Life Cycle Impact Assessment results may still have changed, as they are affected by changes in the supply chain, i.e. in other datasets. This dataset was generated following the ecoinvent quality guidelines for version 2. It may have been subject to central changes described in the ecoinvent version 3 change report (http://www.ecoinvent.org/database/ecoinvent-version-3/reports-of-changes/), and the results of the central updates were reviewed extensively. The changes added e.g. consistent water flows and other information throughout the database. The documentation of this dataset can be found in the ecoinvent reports of version 2, which are still available via the ecoinvent website. The change report linked above covers all central changes that were made during the conversion process.]

## Included activities end
The process includes the production, transport and disposal of the main materials for an agricultural biogas plant.

## Geography
This process refers to an agricultural biogas plant with a capacity of about 500m3. The data were sampled from 20 different plants in Switzerland.

## Technology
To avoid Methane emissions the new plants in Switzerland are covered.

## Reference product
- anaerobic digestion plant, agriculture, with methane recovery: 1 unit; CPC 53290: Other civil engineering works; By-product classification allocatable product
  EcoSpold01Location=CH
  production volume 3.96633 unit
    This is a placeholder value that does not reflect real-world production volumes. This dataset does not currently require a real-world production volume to work in the database framework, and no actual data were collected yet. This has no negative effect on the results of the ecoinvent database.
  property price 490790 EUR2005
    Convert from EU 27 price to the world by currency exchange rate.

## Inputs from technosphere
- concrete, normal: 0 m3; pedigree (1,1,1,1,1)
  EcoSpold01Location=CH
  A plant with 500m3 concrete fermenter, average for Swiss agricultural biogas plants in the year 2006 has been used. Only the plants without the stock has been taken into account, Because the stock is needed for the manure anyway.
  Uncertainty: A plant with 500m3 concrete fermenter, average for Swiss agricultural biogas plants in the year 2006 has been used. Only the plants without the stock has been taken into account, Because the stock is needed for the manure anyway.
  properties: water content 0.086758, wet mass 2380 kg, dry mass 2190 kg
- polyethylene, high density, granulate: 170 kg; lognormal variance with pedigree 0.0427, pedigree (2,2,5,5,1)
  EcoSpold01Location=RER
  A plant with 500m3 concrete fermenter, average for Swiss agricultural biogas plants in the year 2006 has been used. Only the plants without the stock has been taken into account, Because the stock is needed for the manure anyway.
  Uncertainty: A plant with 500m3 concrete fermenter, average for Swiss agricultural biogas plants in the year 2006 has been used. Only the plants without the stock has been taken into account, Because the stock is needed for the manure anyway.
  properties: carbon content, fossil 0.857143, wet mass 1 kg, dry mass 1 kg, heating value, net 42.47 MJ
  note on carbon content, fossil: Polyethylene is formed out of a huge amount of ethylene monomers (C2H4) (ecoinvent v2.2 report 11_II). MW=28 g/mol
- copper, cathode: 250 kg; lognormal variance with pedigree 0.0427, pedigree (2,2,5,5,1)
  A plant with 500m3 concrete fermenter, average for Swiss agricultural biogas plants in the year 2006 has been used. Only the plants without the stock has been taken into account, Because the stock is needed for the manure anyway.
  EcoSpold01Location=RER
  Uncertainty: A plant with 500m3 concrete fermenter, average for Swiss agricultural biogas plants in the year 2006 has been used. Only the plants without the stock has been taken into account, Because the stock is needed for the manure anyway.
  properties: wet mass 1 kg, dry mass 1 kg
- waste polyvinylchloride: 0 kg; pedigree (1,1,1,1,1)
  EcoSpold01Location=CH
  According to Swiss law organic material has to be burned in incineration plants if no material reuse is possible.
  Uncertainty: According to Swiss law organic material has to be burned in incineration plants if no material reuse is possible.
  production volume 0 kg
    Calculated from the production volume of anaerobic digestion plant, agriculture, with methane recovery in proportion to the respective output amounts.
  properties: heating value, net 21.51 MJ, carbon content, fossil 0.440882, water content 0.00200401, dry mass 0.998 kg, wet mass 1 kg
  note on heating value, net: Value taken from the general comment of the treatment dataset.
  note on carbon content, fossil: C content in 1 kg DM was calculated using data in Tab A.1, ecoinvent v2.2 report 13_I
- waste wood, untreated: 0 kg; pedigree (1,1,1,1,1)
  According to Swiss law organic material has to be burned in incineration plants if no material reuse is possible.
  EcoSpold01Location=CH
  Uncertainty: According to Swiss law organic material has to be burned in incineration plants if no material reuse is possible.
  production volume 0 kg
    (same comment as for waste polyvinylchloride)
  properties: water content 0.25, dry mass 0.8 kg, carbon content, non-fossil 0.48632, wet mass 1 kg, heating value, net 13.99 MJ
  note on carbon content, non-fossil: Tab A.4, ecoinvent v2.2 report 13_I. C content has been referred to 1 kg DM,
- waste plastic, mixture: 0 kg; pedigree (1,1,1,1,1)
  (same comment as for waste wood, untreated)
  production volume 0 kg
    (same comment as for waste polyvinylchloride)
  properties: carbon content, fossil 0.747344, heating value, net 30.79 MJ, water content 0.180638, dry mass 0.847 kg, wet mass 1 kg
  note on carbon content, fossil: C content in 1 kg DM was calculated using data in Tab A.2, ecoinvent v2.2 report 13_I
- glued laminated timber, average glue mix: 0 m3; pedigree (1,1,1,1,1)
  A plant with 500m3 concrete fermenter, average for Swiss agricultural biogas plants in the year 2006 has been used. Only the plants without the stock has been taken into account, because the stock is needed for the manure anyway.
  EcoSpold01Location=RER
  Uncertainty: A plant with 500m3 concrete fermenter, average for Swiss agricultural biogas plants in the year 2006 has been used. Only the plants without the stock has been taken into account, Because the stock is needed for the manure anyway.
  properties: carbon content, non-fossil 0.441932, price 298 EUR2005, carbon content, fossil 0.01791, dry mass 404.4 kg, water content 0.0979228, wet mass 444 kg, heating value, net 5537.41 MJ
- reinforcing steel: 10800 kg; lognormal variance with pedigree 0.0427, pedigree (2,2,5,5,1)
  (same comment as for copper, cathode)
  properties: wet mass 1 kg, carbon content, fossil 0.004, dry mass 1 kg
- waste reinforced concrete: 0 kg; pedigree (1,1,1,1,1)
  Assuming that the concrete will not be reused
  EcoSpold01Location=CH
  Uncertainty: Assuming that the concrete will not be reused
  production volume 0 kg
    (same comment as for waste polyvinylchloride)
  properties: water content 0.00585407, dry mass 0.99418 kg, wet mass 1 kg
- waste polystyrene: 0 kg; pedigree (1,1,1,1,1)
  (same comment as for waste polyvinylchloride)
  production volume 0 kg
    (same comment as for waste polyvinylchloride)
  properties: carbon content, fossil 0.922579, water content 0.00200401, dry mass 0.998 kg, wet mass 1 kg, heating value, net 38.67 MJ
- steel, chromium steel 18/8: 1300 kg; lognormal variance with pedigree 0.0427, pedigree (2,2,5,5,1)
  (same comment as for polyethylene, high density, granulate)
  properties: dry mass 1 kg, carbon content, fossil 0.0008, wet mass 1 kg
  note on carbon content, fossil: Stainless steel model is the grade 304 steel (18/8 stainless, 18% chromium 8% nickel; max. 0.08% C)
- polystyrene, high impact: 570 kg; lognormal variance with pedigree 0.0427, pedigree (2,2,5,5,1)
  (same comment as for polyethylene, high density, granulate)
  properties: wet mass 1 kg, dry mass 1 kg, heating value, net 38.67 MJ, carbon content, fossil 0.923077
  note on carbon content, fossil: Chemical formula of polystyrene is (C8H8)n (ecoinvent v2.2 report 11_II)
- synthetic rubber: 1200 kg; lognormal variance with pedigree 0.0427, pedigree (2,2,5,5,1)
  EcoSpold01Location=RER
  Used for coverage. A plant with 500m3 concrete fermenter, average for Swiss agricultural biogas plants in the year 2006 has been used. Only the plants without the stock has been taken into account, Because the stock is needed for the manure anyway.
  Uncertainty: Used for coverage. A plant with 500m3 concrete fermenter, average for Swiss agricultural biogas plants in the year 2006 has been used. Only the plants without the stock has been taken into account, Because the stock is needed for the manure anyway.
  properties: carbon content, fossil 0.871949, dry mass 1 kg, wet mass 1 kg, heating value, net 26.42 MJ
  note on carbon content, fossil: EPDM (Ethylene-propene-diene terpolymer) rubber is a terpolymer of ethylene, propene, and a diene with the residual unsaturated portion of the diene in the side chain (ecoinvent v2.2 report 7-part XX & Ullmann). Chemical formula (deduced from Evidences of Solvent-Induced Miscibility in Polychloroprene-co-Ethylene-Propene Diene Terpolymer Blends, Dubey et al., Journal of Applied Polymer Science, 2009, 111:1884–1891): C20H35
- polyvinylidenchloride, granulate: 330 kg; lognormal variance with pedigree 0.0427, pedigree (2,2,5,5,1)
  (same comment as for polyethylene, high density, granulate)
  properties: wet mass 1 kg, heating value, net 10.01 MJ, carbon content, fossil 0.387097, dry mass 1 kg
  note on carbon content, fossil: Monomer is vynyl chloride, C2H3Cl (ecoinvent v2.2 report 11_II). MW=62 g/mol
- concrete, normal: 2.71405, 0.2828, 2.28947, 1.28783, 5.45358, 0.183946, 107.788 m3 (7 entries); lognormal variance with pedigree 0.0427, pedigree (2,2,5,5,1)
  (same comment as for concrete, normal)
- waste polyvinylchloride: -36.7098, -2.45281, -0.185502, -1.0131, -0.40928, -0.962031, -31.2785, -256.989 kg (8 entries); lognormal variance with pedigree 0.0427, pedigree (2,2,5,5,1)
  (same comment as for waste polyvinylchloride)
  production volume 990 kg
- waste wood, untreated: -401.413, -49.8414, -3.64397, -139.99, -21.1491, -33.4349, -625.005, -5325.52 kg (8 entries); lognormal variance with pedigree 0.0427, pedigree (2,2,5,5,1)
  (same comment as for waste wood, untreated)
  production volume 19800 kg
- waste plastic, mixture: -152.401, -10.1829, -0.770114, -4.20589, -1.69913, -3.99389, -129.853, -1066.89 kg (8 entries); lognormal variance with pedigree 0.0427, pedigree (2,2,5,5,1)
  (same comment as for waste wood, untreated)
  production volume 4110 kg
- glued laminated timber, average glue mix: 25.2272, 54.7728 m3 (2 entries); lognormal variance with pedigree 0.0427, pedigree (2,2,5,5,1)
  (same comment as for glued laminated timber, average glue mix)
- waste reinforced concrete: -19565.5, -279234 kg (2 entries); lognormal variance with pedigree 0.0427, pedigree (2,2,5,5,1)
  (same comment as for waste reinforced concrete)
  production volume 896400 kg
- waste polystyrene: -63.4079, -4.23667, -0.320412, -1.7499, -0.706938, -1.66169, -54.0264, -443.89 kg (8 entries); lognormal variance with pedigree 0.0427, pedigree (2,2,5,5,1)
  (same comment as for waste polyvinylchloride)
  production volume 1710 kg

## Inputs from nature
- Occupation, industrial area [natural resource, land]: 3600 m2*year; lognormal variance with pedigree 0.0827, pedigree (2,2,5,5,1)
  Only the plants without the stock has been taken into account, Because the stock is needed for the manure anyway. The lifetime is estimated 20 years.
  Uncertainty: Only the plants without the stock has been taken into account, Because the stock is needed for the manure anyway. The lifetime is estimated 20 years.
- Transformation, to industrial area [natural resource, land]: 180 m2; lognormal variance with pedigree 0.0827, pedigree (2,2,5,5,1)
  Only the plants without the stock has been taken into account, Because the stock is needed for the manure anyway. The uncertainty has been estimated.
  Uncertainty: Only the plants without the stock has been taken into account, Because the stock is needed for the manure anyway. The uncertainty has been estimated.
- Transformation, from heterogeneous, agricultural [natural resource, land]: 180 m2; lognormal variance with pedigree 0.0827, pedigree (2,2,5,5,1)
  (same comment as for Transformation, to industrial area)

## Sampling procedure
The data are the average of 20 from 70 plants in Switzerland

## Extrapolations
no extrapolation was necessary because the typical plants for the region and time period were evaluated This dataset has been copied from an original dataset covering the geography CH. The uncertainty has been adjusted accordingly.

## Review by Niels Jungbluth 2009-01-22
passed
none
