# oat production

Dataset: EcoSpold 2, unit process
Geography: CA-QC
Time period: 2010-01-01 to 2021-12-31
Technology level: current
Classification: ISIC rev.4 ecoinvent: 0111:Growing of cereals (except rice), leguminous crops and oil seeds
Synonyms: Avena sativa L.
Scenario: Business-as-Usual
System model: Allocation, cut-off by classification
Share of production covered: 100 %
Generated by: Dominique Maxime
Database: ecoinvent
isCopyrightProtected: true
accessRestrictedTo: 1

## General comment
This dataset represents the production of 1 kg of oat grain (wet mass) in the region of Québec. The 2010-2012 average yield is 2433 kg/ha at a moisture content at storage (i.e. dried grain) of 13.5%.

## Included activities start
This activity starts with soil cultivation after the harvest of the previous crop.

## Included activities end
This activity ends after harvest and drying of grains at the farm gate.
The dataset includes the inputs of seeds, mineral and organic fertilisers, pesticides and all machine operations and corresponding machine infrastructure and sheds. Machine operations are: soil cultivation, transport of seeds, fertilisers and pesticides to the field (15 km), sowing, fertilisation, weed control, pest and pathogen control, combine-harvesting, transport from field to farm or local drying centre and drying of grains. Direct field emissions are also included.
No irrigation is involved for oat grain production in Québec. The use of car, van or pick-up for servicing people, e.g. from farm to field, is not included in the activities.

## Geography
The inventory is modelled for the region of Québec (Canada).

## Time period
Time of publications

## Parameters
- yield, agriculture: 2.433 metric ton/ha; name yield_agriculture; lognormal variance with pedigree 0.0081, pedigree (1,2,1,1,1)
  Amount (wet mass) of harvested and dried grains (14.5% water content) per hectare of cultivated land. See supporting documentation '01 crop production - Québec.pdf' available on ecoinvent reports web page (https://ecoquery.ecoinvent.org/File/Reports).
- fraction, process water, to air: 0.6165 dimensionless; name fraction_PW_to_air; lognormal variance with pedigree 0.0413, pedigree (2,2,1,4,1)
  For agricultural crop dataset, distinction is made between irrigation water and process water. Process water is the water that comes with manure or pesticide application. A fraction of the process water input evaporates to the air and the remaining is considered emitted to surface water and ground water.
  By default, the same value as for irrigation is assumed: this is a Canada-wide value taken from database (Vionnet, S., Quantis Water Database - Technical report, 2012). Note that it might be lower in Quebec due to the more humid climate in Western Canada than in Eastern Canada.
- MCPA-MCPB combined emissions to surface water: 7.753e-9 kg; name MCPAB_ground; lognormal variance with pedigree 0.0415, pedigree (2,2,2,1,2)
  Modelled with PestLCI 2.0 (Dijkman et al. 2012). See supporting documentation '01 crop production - Québec.pdf' available on ecoinvent reports web page (https://ecoquery.ecoinvent.org/File/Reports).
- MCPA-to-MCPB emission ratio: 1 dimensionless; name MCPA_to_MCPB; lognormal variance with pedigree 0.25, pedigree (5,5,5,5,5)
  MCPA and MCPB are aggregated together in the PestLCI 2.0 model (Dijkman et al. 2012). A 50/50 split as been considered as default situation. See supporting documentation '01 crop production - Québec.pdf' available on ecoinvent reports web page (https://ecoquery.ecoinvent.org/File/Reports).
- fraction, process water to water, to surface water: 0.2 dimensionless; name fraction_PWtoW_to_surface_water; lognormal variance with pedigree 0.0892, pedigree (4,3,1,4,4)
  For agricultural crop dataset, distinction is made between irrigation water and process water. Process water is the water that comes with manure or pesticide application. A fraction of the process water input evaporates to the air and the remaining is considered emitted to surface water and ground water.
  This value is a proxy, taken from ecoinvent v3.0 dataset 'potato production, US 2006'. 'Literature value (Döll, 2011) cross referenced with expert opinion.' as cited in original dataset.
- MCPA-MCPB combined emissions to agricultural soil: 6.087e-5 kg; name MCPAB_soil; lognormal variance with pedigree 0.0345, pedigree (2,2,2,1,2)
  (same comment as for MCPA-MCPB combined emissions to surface water)
- MCPA-MCPB combined emissions to groundwater: 1.677e-6 kg; name MCPAB_surface; lognormal variance with pedigree 0.0415, pedigree (2,2,2,1,2)
  (same comment as for MCPA-MCPB combined emissions to surface water)
- water content at harvest: 0.18 kg/kg; name harvest_wc; lognormal variance with pedigree 0.01, pedigree (1,1,1,1,1)
  Grain water content at harvest (wet mass basis). See supporting documentation '01 crop production - Québec.pdf' available on ecoinvent reports web page (https://ecoquery.ecoinvent.org/File/Reports).
- MCPA-MCPB combined emissions to air: 7.278e-7 kg; name MCPAB_air; lognormal variance with pedigree 0.0415, pedigree (2,2,2,1,2)
  (same comment as for MCPA-MCPB combined emissions to surface water)

## Reference product
- oat grain: 1 kg; name REF_PRODUCT; CPC 01172: Oats, other; By-product classification allocatable product
  production volume 2.35333e8 kg
    Oat grain production, 2010-2012 yearly average.
  property wet mass 1 kg; name REF_PRODUCT_WM
  property water in wet mass 0.135 kg; name REF_PRODUCT_WWM
  property dry mass 0.865 kg; name REF_PRODUCT_DM; = REF_PRODUCT_WM- REF_PRODUCT_WWM
  property carbon content, non-fossil 0.4916; name REF_PRODUCT_C_content_non_fossil
    biogene carbon content on a dry matter basis. Composition data obtained from http://ndb.nal.usda.gov/ndb/search/list (DB number: 20038, Oats). First, composition data were refered to 1 kg dry mass. Then, C-contents were calculated considering a C-content/dry mass of 46% in carbohydrates (including fibres), 53% in proteins and 75% in fats. All data from 'Evolutionary and Biochemical Aspects', A.D. Kay and T. Vrede (in Global Ecology, 2010, Elsevier B.V., S.E. Jørgensen Ed.).
  property water content 0.156069; name REF_PRODUCT_water_content; = REF_PRODUCT_WWM/ REF_PRODUCT_DM
  property price 0.1169 EUR2005; name REF_PRODUCT_price_EUR2005
    Calculated value based on data from United Nations Commodity Trade Statistics Database (comtrade.un.org). UN comtrade category: 1004 Oats. Using exchange rate of 1EURO = 1.209 USD. Average of price of import into 5 main markets (EU, US, JP, IN and CN).
  property carbon content 0.4916
    carbon content on a dry matter basis (reserved; not for manual entry)
  properties: carbon content, fossil 0, carbon allocation 0.425234 kg

## Inputs from technosphere
- potassium sulfate: 0.00112215 kg; lognormal variance with pedigree 0.0099, pedigree (2,2,4,1,2)
  The exchange has been updated from 'potassium sulfate, as K2O' into 'potassium sulfate' and therefore its amount has been scaled (multiplied) from 0.0006 kg by 1.85 kg of 'potassium sulfate' per kg of 'potassium sulfate, as K2O'. Original comment of the exchange is: Amount is determined from the mineral nutrient actually used for the crop (CECPA, 2011) and from the overall mineral fertilizers sales, by type of fertilizer, in Québec for agriculture (APNC, 2010). See details for disaggregation in supporting documentation '01 crop production - Québec.pdf' available on ecoinvent reports web page (https://ecoquery.ecoinvent.org/File/Reports).
  properties: dry mass 1 kg, wet mass 1 kg
- ammonium nitrate: 0.00534913 kg; lognormal variance with pedigree 0.0099, pedigree (2,2,4,1,2)
  The exchange has been updated from 'ammonium nitrate, as N' into 'ammonium nitrate' and therefore its amount has been scaled (multiplied) from 0.0019 kg by 2.8573 kg of 'ammonium nitrate' per kg of 'ammonium nitrate, as N'. Original comment of the exchange is: Amount is determined from the mineral nutrient actually used for the crop (CECPA, 2011) and from the overall mineral fertilizers sales, by type of fertilizer, in Québec for agriculture (APNC, 2010). See details for disaggregation in supporting documentation '01 crop production - Québec.pdf' available on ecoinvent reports web page (https://ecoquery.ecoinvent.org/File/Reports).
  properties: dry mass 1 kg, wet mass 1 kg
- liquid manure spreading, by vacuum tanker: 0.0011728 m3; lognormal variance with pedigree 0.0099, pedigree (2,2,4,1,2)
  Calculated from liquid manure input rate and crop yield.
- solid manure loading and spreading, by hydraulic loader and spreader: 0.462229 kg; lognormal variance with pedigree 0.0099, pedigree (2,2,4,1,2)
  Calculated from solid manure input rate and crop yield.
- packaging, for pesticides: 0.000599874 kg; lognormal variance with pedigree 0.0592, pedigree (4,3,4,5,4)
  Total amount of active substance/s of pesticides needed for the production of oat grain is calculated to be circa 3.00E-04 kg. Pesticide/s used in this dataset is/are: 'glyphosate', 'nitrile-compound', 'pesticide, unspecified', 'phenoxy-compound'. The total amount of active substance/s is doubled in order to account for the packaging of the dilluted product of pesticide/s that is/are applied. Therefore, 6.00E-04 kg of packaging for pesticides is justified with this exchange.
  properties: wet mass 1 kg, dry mass 1 kg, carbon content, fossil 0.85714, price 0.0642 EUR2005, heating value, net 25.97 MJ
- glyphosate: 0.0001245 kg; lognormal variance with pedigree 0.0414, pedigree (1,2,5,3,2)
  See supporting documentation '01 crop production - Québec.pdf' available on ecoinvent reports web page (https://ecoquery.ecoinvent.org/File/Reports).
  properties: wet mass 1 kg, carbon content, fossil 0.214286, dry mass 1 kg
- oat seed, for sowing: 0.0591781 kg; name SEED; lognormal variance with pedigree 0.0099, pedigree (2,2,4,1,2)
  CECPA 2011. See supporting documentation '01 crop production - Quebec.pdf' available on ecoinvent reports web page (https://ecoquery.ecoinvent.org/File/Reports).
  property carbon content, non-fossil 0.4916; name SEED_C_content_non_fossil
  properties: wet mass 1 kg, water content 0.156069, dry mass 0.865 kg
  note on carbon content, non-fossil: biogene carbon content on a dry matter basis. Composition data obtained from http://ndb.nal.usda.gov/ndb/search/list (DB number: 20038, Oats). First, composition data were refered to 1 kg dry mass. Then, C-contents were calculated considering a C-content/dry mass of 46% in carbohydrates (including fibres), 53% in proteins and 75% in fats. All data from 'Evolutionary and Biochemical Aspects', A.D. Kay and T. Vrede (in Global Ecology, 2010, Elsevier B.V., S.E. Jørgensen Ed.).
- sowing: 0.000477 ha; lognormal variance with pedigree 0.0099, pedigree (2,2,4,1,2)
  (same comment as for glyphosate)
- tillage, rotary cultivator: 0.0004899 ha; lognormal variance with pedigree 0.0099, pedigree (2,2,4,1,2)
  2 passes. See supporting documentation '01 crop production - Quebec.pdf' available on ecoinvent reports web page (https://ecoquery.ecoinvent.org/File/Reports).
- drying of feed grain: 0.054878 l; name EVAP_WATER; = REF_PRODUCT * (REF_PRODUCT_WWM - harvest_wc) / (harvest_wc - 1); lognormal variance with pedigree 0.008, pedigree (1,1,4,1,1)
  Calculated from average moisture content of grains at harvest (see Exchange Properties and Parameters).
- urea: 0.00881547 kg; name UREA_N; lognormal variance with pedigree 0.0099, pedigree (2,2,4,1,2)
  The exchange has been updated from 'urea, as N' into 'urea' and therefore its amount has been scaled (multiplied) from 0.0041 kg by 2.1438 kg of 'urea' per kg of 'urea, as N'. Original comment of the exchange is: Amount is determined from the mineral nutrient actually used for the crop (CECPA, 2011) and from the overall mineral fertilizers sales, by type of fertilizer, in Québec for agriculture (APNC, 2010). See details for disaggregation in supporting documentation '01 crop production - Québec.pdf' available on ecoinvent reports web page (https://ecoquery.ecoinvent.org/File/Reports).
  properties: wet mass 1 kg, carbon content, fossil 0.2, dry mass 1 kg
- pesticide, unspecified: 7.397e-6 kg; lognormal variance with pedigree 0.0414, pedigree (1,2,5,3,2)
  Herbicide, unspecified. See supporting documentation '01 crop production - Québec.pdf' available on ecoinvent reports web page (https://ecoquery.ecoinvent.org/File/Reports).
  properties: dry mass 1 kg, wet mass 1 kg, carbon content, fossil 0.486978
  note on carbon content, fossil: Mean of C content in all pesticides whose formula has been documented in Sutter 2010
- phenoxy-compound: 0.0001253 kg; lognormal variance with pedigree 0.0414, pedigree (1,2,5,3,2)
  6,329E-05 kg MCPA/MCPB; 3,822E-05 kg 2,4-DB amines, 1,233E-05 kg 2.4-D ester and 1,151E-05 kg dichlorprop. See supporting documentation '01 crop production - Quebec.pdf' available on ecoinvent reports web page (https://ecoquery.ecoinvent.org/File/Reports).
  properties: wet mass 1 kg, carbon content, fossil 0.532559, dry mass 1 kg
- fertilising, by broadcaster: 0.000410959 ha; lognormal variance with pedigree 0.0099, pedigree (2,2,4,1,2)
  (same comment as for glyphosate)
- nitrile-compound: 4.274e-5 kg; lognormal variance with pedigree 0.0414, pedigree (1,2,5,3,2)
  Bromoxynil. See supporting documentation '01 crop production - Québec.pdf' available on ecoinvent reports web page (https://ecoquery.ecoinvent.org/File/Reports).
  properties: wet mass 1 kg, carbon content, fossil 0.344995, dry mass 1 kg
- potassium chloride: 0.0100984 kg; lognormal variance with pedigree 0.0099, pedigree (2,2,4,1,2)
  The exchange has been updated from 'potassium chloride, as K2O' into 'potassium chloride' and therefore its amount has been scaled (multiplied) from 0.0064 kg by 1.5829 kg of 'potassium chloride' per kg of 'potassium chloride, as K2O'. Original comment of the exchange is: Amount is determined from the mineral nutrient used for the crop and from the overall mineral fertilizers sales, by type of fertilizer, in Québec for agriculture (APNC, 2010). See details for disaggregation in supporting documentation '01 crop production - Québec.pdf' available on ecoinvent reports web page (https://ecoquery.ecoinvent.org/File/Reports).
  The potash domestic market in Canada is supplied almost exclusively by domestic production and Quebec resellers of potassium chloride have a preferential trade agreement for supplying fertilizer from Canadian producers. Hence, potassium chloride used in quebec does not rely on the global market and a direct link to Canadian potassium chloride is used. Sources: 1) personnal communication with Gilles Lavoie from the Quebec Professional Association in Crop Nutrition and the Coop Fédérée Inc. (2013); 2) Temple Scott Associates inc. (2013). Fertilizer report for the Canadian Fertilizer Industry. April 5, 2013, 10 p. http://www.cfi.ca/_documents/Fertilizer%20Industry%20Report-%20FINAL.pdf
  properties: wet mass 1 kg, dry mass 1 kg
- lime: 0.0164548 kg; name LIME_CaCO3; lognormal variance with pedigree 0.0099, pedigree (2,2,4,1,2)
  as CaCO3. CECPA (2011). Étude sur les coûts de production des céréales, du maïs-grain et des oléagineux en 2009 au Québec. [Centre d’Études sur les Coûts de Production en Agriculture], Juillet 2011, 112 p. [in French]. Available at: http://www.cecpa.qc.ca/contenuFichiers/files/etudesAnalyses/etude-complete-cereales-mais-grain-oleagineux-en-2009-quebec_20130501133424.pdf
  properties: carbon content, fossil 0.120005, wet mass 1 kg, dry mass 1 kg
- transport, tractor and trailer, agricultural: 0.0415677 metric ton*km; lognormal variance with pedigree 0.1293, pedigree (2,2,4,1,2)
  Transport of harvested material from field to road and from road to farm or local drying centre, and transport of inputs from farm to field (assuming 15 km). See supporting documentation '01 crop production - Québec.pdf' available on ecoinvent reports web page (https://ecoquery.ecoinvent.org/File/Reports).
- inorganic nitrogen fertiliser, as N: 0.00454259 kg; lognormal variance with pedigree 0.0099, pedigree (2,2,4,1,2)
  Amount is determined from the mineral nutrient actually used for the crop (CECPA, 2011) and from the overall mineral fertilizers sales, by type of fertilizer, in Québec for agriculture (APNC, 2010). See details for disaggregation in supporting documentation '01 crop production - Québec.pdf' available on ecoinvent reports web page (https://ecoquery.ecoinvent.org/File/Reports).
  properties: dry mass 1 kg, wet mass 1 kg
- inorganic phosphorus fertiliser, as P2O5: 0.00821918 kg; lognormal variance with pedigree 0.0099, pedigree (2,2,4,1,2)
  Amount is determined from the mineral nutrient actually used for the crop (CECPA, 2011) and from the overall mineral fertilizers sales, by type of fertilizer, in Québec for agriculture (APNC, 2010). See details for disaggregation in supporting documentation '01 crop production - Québec.pdf' available on ecoinvent reports web page (https://ecoquery.ecoinvent.org/File/Reports).
  Mono- and di-ammonium phosphate (MAP and DAP), as P2O5. The concommitant supply of nitrogen by DAP is accounted for in total N requirements. See supporting documentation '01 crop production - Québec.pdf' available on ecoinvent reports web page (https://ecoquery.ecoinvent.org/File/Reports).
  properties: wet mass 1 kg, dry mass 1 kg
- ammonia, anhydrous, liquid: 0.000375284 kg; lognormal variance with pedigree 0.0099, pedigree (2,2,4,1,2)
  (same comment as for inorganic nitrogen fertiliser, as N)
  properties: dry mass 1 kg, wet mass 1 kg
- combine harvesting: 3.3262e-7 ha; lognormal variance with pedigree 0.088725, pedigree (5,2,4,2,2)
  (same comment as for glyphosate)
- manure, liquid, cattle: 1.0036 kg; name MANURE_LIQUID_CATTLE; lognormal variance with pedigree 0.0099, pedigree (2,2,4,1,2)
  Amount of 1.0036 kg of manure, liquid, cattle is needed when producing 1kg of oat.
  Amount is determined from the organic nutrient actually used for the crop (CECPA, 2011) and from data about organic fertilizer production, by type, in Québec (MAPAQ, 2013). See details for disaggregation in supporting documentation '01 crop production - Québec.pdf' available on ecoinvent reports web page (https://ecoquery.ecoinvent.org/File/Reports).
  property water in wet mass 0.925 kg; name MANURE_LIQUID_CATTLE_WWM
  properties: dry mass 0.075 kg, carbon content, non-fossil 0.68, water content 12.333, wet mass 1 kg, nitrogen content 0.03681
  note on nitrogen content: Total N content on a dry matter basis. Weighted average of beef cattle liquid manure (0.0425 kg N/kg dm) and dairy cattle liquid manure (0.03611 kg N/kg dm) considering that N supply in central and peripherical agricultural regions is for 89% from dairy and 11% from beef cattle (MAPAQ, 2013). N content from Parent and Gagné (2013).
- tillage, ploughing: 0.0003407 ha; lognormal variance with pedigree 0.0099, pedigree (2,2,4,1,2)
  (same comment as for glyphosate)
- manure, solid, cattle: 0.45578 kg; name MANURE_SOLID_CATTLE; lognormal variance with pedigree 0.0099, pedigree (2,2,4,1,2)
  Amount of 0.45578 kg of manure, solid, cattle is needed when producing 1kg of oat.
  Amount is determined from the organic nutrient actually used for the crop (CECPA, 2011) and from data about organic fertilizer production, by type, in Québec (MAPAQ, 2013). See details for disaggregation in supporting documentation '01 crop production - Québec.pdf' available on ecoinvent reports web page (https://ecoquery.ecoinvent.org/File/Reports).
  property water in wet mass 0.78 kg; name MANURE_SOLID_CATTLE_WWM
  properties: water content 3.5454, wet mass 1 kg, carbon content, non-fossil 0.441, dry mass 0.22 kg, nitrogen content 0.02734
  note on nitrogen content: Total N content on a dry matter basis. Weighted average of beef cattle solid manure (0.02639 kg N/kg dm) and dairy cattle solid manure (0.02789 kg N/kg dm) considering that N supply in central and peripherical agricultural regions is about 63% from dairy and 37% from beef cattle (MAPAQ, 2013). N content from Parent and Gagné (2013).
- application of plant protection product, by field sprayer: 0.00037 ha; lognormal variance with pedigree 0.0099, pedigree (2,2,4,1,2)
  89% of cropand area receives plant protection products in average. See supporting documentation '01 crop production - Québec.pdf' available on ecoinvent reports web page (https://ecoquery.ecoinvent.org/File/Reports).
- manure, liquid, swine: 0.16924 kg; name MANURE_LIQUID_SWINE; lognormal variance with pedigree 0.0099, pedigree (2,2,4,1,2)
  Amount of 0.16924 kg of manure, liquid, swine is needed when producing 1kg of oat.
  Amount is determined from the organic nutrient actually used for the crop (CECPA, 2011) and from data about organic fertilizer production, by type, in Québec (MAPAQ, 2013). See details for disaggregation in supporting documentation '01 crop production - Québec.pdf' available on ecoinvent reports web page (https://ecoquery.ecoinvent.org/File/Reports).
  property water in wet mass 0.95 kg; name MANURE_LIQUID_SWINE_WWM
  properties: wet mass 1 kg, dry mass 0.05 kg, nitrogen content 0.1, carbon content, non-fossil 0.64, water content 19
- packaging, for fertilisers: 0.0856474 kg; lognormal variance with pedigree 0.0592, pedigree (4,3,4,5,4)
  Total amount of active substance/s of fertilisers needed for the production of 'oat grain' is calculated to be circa 4.28E-02 kg. Fertiliser/s used in this dataset is/are: 'ammonia, liquid', 'ammonium nitrate, as N', 'ammonium sulfate, as N', 'lime', 'nitrogen fertiliser, as N', 'phosphate fertiliser, as P2O5', 'potassium chloride, as K2O', 'potassium sulfate, as K2O', 'urea, as N'. The total amount of active substance/s is doubled in order to account for the packaging of the dilluted product of fertiliser/s that is/are applied. Therefore, 8.56E-02 kg of packaging for fertilisers is justified with this exchange.
  properties: wet mass 1 kg, price 0.0642 EUR2005, carbon content, fossil 0.825301, heating value, net 25.01 MJ, dry mass 1 kg
  note on carbon content, fossil: Considering a chemical formula (C2H4)n for polyethylene, carbon content-fossil is calculated to be 0.856286 kg of Carbon per kg of dry mass.
- poultry manure, fresh: 0.0064522 kg; lognormal variance with pedigree 0.0099, pedigree (2,2,4,1,2)
  Amount of 0.0064522 kg of poultry manure, fresh is needed when producing 1kg of oat.
  Amount is determined from the organic nutrient actually used for the crop (CECPA, 2011) and from data about organic fertilizer production, by type, in Québec (MAPAQ, 2013). See details for disaggregation in supporting documentation '01 crop production - Québec.pdf' available on ecoinvent reports web page (https://ecoquery.ecoinvent.org/File/Reports).
  properties: dry mass 0.38 kg, carbon content, non-fossil 0.33389, nitrogen content 0.04044, water content 1.63158, wet mass 1 kg
- ammonium sulfate: 0.000261405 kg; lognormal variance with pedigree 0.0099, pedigree (2,2,4,1,2)
  (same comment as for inorganic nitrogen fertiliser, as N)
  properties: wet mass 1 kg, dry mass 1 kg

## Inputs from nature
- Transformation, to annual crop, non-irrigated, intensive [natural resource, land]: 4.11015 m2; = (1 / (yield_agriculture * UnitConversion(1, 'metric ton', 'kg')))*UnitConversion(1, 'ha', 'm2'); lognormal variance with pedigree 0.008, pedigree (1,1,4,1,1)
  Calculated value. See Parameters.
- Occupation, annual crop, non-irrigated, intensive [natural resource, land]: 3.10563 m2*year; = OCCUP_period * (1 / (yield_agriculture * UnitConversion(1, 'metric ton', 'kg'))) * UnitConversion(1, 'ha', 'm2'); lognormal variance with pedigree 0.008, pedigree (1,1,4,1,1)
  Calculated value. See Exchange Properties and Parameters.
  property occupation period 0.7556 year; name OCCUP_period
- Energy, gross calorific value, in biomass [natural resource, biotic]: 15.094 MJ; lognormal variance with pedigree 0.0099, pedigree (2,3,4,3,1)
  Calculated value based on literature. The gross energy is calculated using following formula; gross energy (MJ) = crude protein (kg)*23.04 (MJ/kg)+crude fat (kg)*38.96 (MJ/kg)+crude fibre (kg)*17.95 (MJ/kg)+carbohydrates (kg)*17.17 (MJ/kg) (formula based on expert opinion, cross referenced; Diepenbrock, 2012, Energy Balance in Crop Production). The product composition is extracted from Agroscope Food database (http://www.agroscope.admin.ch/index.html?lang=en, accessed 20151028)
- Carbon dioxide, in air [natural resource, in air]: 1.46692 kg; = 44/12 * (REF_PRODUCT_C_content_non_fossil * REF_PRODUCT * REF_PRODUCT_DM - SEED_C_content_non_fossil * SEED * REF_PRODUCT_DM); lognormal variance with pedigree 0.008, pedigree (1,1,4,1,1)
  Calculated value, see chapter 'CO2 binding' in '01 crop production-direct field emissions natural resources v1.2.pdf' available on ecoinvent reports web page (https://ecoquery.ecoinvent.org/File/Reports). The 44/12 ratio is the stoichiometric mass ratio of carbon dioxide to carbon.
- Transformation, from annual crop, non-irrigated, intensive [natural resource, land]: 4.11015 m2; = (1 / (yield_agriculture * UnitConversion(1, 'metric ton', 'kg'))) * UnitConversion(1, 'ha', 'm2'); lognormal variance with pedigree 0.008, pedigree (1,1,4,1,1)
  Calculated value. See Parameters.

## Emissions to nature
- MCPA [water, ground-]: 3.8765e-9 kg; = MCPAB_ground-MCPB_ground; lognormal variance with pedigree 0.008, pedigree (1,1,4,1,1)
  Calculated value. See Parameters.
- 2,4-D amines [soil, agricultural]: 3.69e-5 kg; lognormal variance with pedigree 0.0813, pedigree (2,2,5,1,2)
  (same comment as for MCPA-MCPB combined emissions to surface water)
- MCPA [air, non-urban air or from high stacks]: 3.639e-7 kg; = MCPAB_air-MCPB_air; lognormal variance with pedigree 0.008, pedigree (1,1,4,1,1)
  Calculated value. See Parameters.
- 2,4-D amines [water, ground-]: 1.15e-6 kg; source Dijkman, T.J. 2012; lognormal variance with pedigree 0.0813, pedigree (2,2,5,1,2)
  (same comment as for MCPA-MCPB combined emissions to surface water)
- Bromoxynil [soil, agricultural]: 4.125e-5 kg; lognormal variance with pedigree 0.0743, pedigree (2,2,5,1,2)
  (same comment as for MCPA-MCPB combined emissions to surface water)
- 2,4-D amines [water, surface water]: 4.7e-9 kg; source Dijkman, T.J. 2012; lognormal variance with pedigree 0.0813, pedigree (2,2,5,1,2)
  (same comment as for MCPA-MCPB combined emissions to surface water)
- Bromoxynil [air, non-urban air or from high stacks]: 2.009e-7 kg; source Dijkman, T.J. 2012; lognormal variance with pedigree 0.0813, pedigree (2,2,5,1,2)
  (same comment as for MCPA-MCPB combined emissions to surface water)
- Dichlorprop [air, non-urban air or from high stacks]: 2.65e-7 kg; source Dijkman, T.J. 2012; lognormal variance with pedigree 0.0813, pedigree (2,2,5,1,2)
  (same comment as for MCPA-MCPB combined emissions to surface water)
- Nitrogen oxides [air, non-urban air or from high stacks]: 0.000582351 kg; lognormal variance with pedigree 0.0173, pedigree (2,2,4,1,2)
  Calculated with an emission factor (EF=0.012 kg NO-N/kg N ) from total N application less NH3-N lost through volatilization. Conversion from NO-N to NO2 with factor=46/14. See supporting documentation '01 crop production - Quebec.pdf' available on ecoinvent reports web page (https://ecoquery.ecoinvent.org/File/Reports).
  property emission ratio 0.21 kg/kg; name NOx_to_N2O
- Nickel [soil, agricultural]: -3.3543e-5 kg
  Calculated value. See supporting documentation '01 crop production - Québec.pdf' available on ecoinvent reports web page (https://ecoquery.ecoinvent.org/File/Reports).
- Bromoxynil [water, ground-]: 1.282e-6 kg; source Dijkman, T.J. 2012; lognormal variance with pedigree 0.0813, pedigree (2,2,5,1,2)
  (same comment as for MCPA-MCPB combined emissions to surface water)
- Dichlorprop [soil, agricultural]: 1.1e-5 kg; lognormal variance with pedigree 0.0813, pedigree (2,2,5,1,2)
  (same comment as for MCPA-MCPB combined emissions to surface water)
- Zinc [soil, agricultural]: -0.00010052 kg
  (same comment as for Nickel)
- Copper [soil, agricultural]: -1.1396e-5 kg
  (same comment as for Nickel)
- Bromoxynil [water, surface water]: 5.257e-9 kg; source Dijkman, T.J. 2012; lognormal variance with pedigree 0.0813, pedigree (2,2,5,1,2)
  (same comment as for MCPA-MCPB combined emissions to surface water)
- Dichlorprop [water, ground-]: 2.76e-7 kg; source Dijkman, T.J. 2012; lognormal variance with pedigree 0.0813, pedigree (2,2,5,1,2)
  (same comment as for MCPA-MCPB combined emissions to surface water)
- Ammonia [air, non-urban air or from high stacks]: 0.00302418 kg; lognormal variance with pedigree 0.0173, pedigree (2,2,4,1,2)
  NH3 from mineral fertilisers are calculated with the emission factors published in the EMEP guidelines from the European Environment Agency (EEA, 2013). NH3 from manure are calculated according to the caracteristics of every manure, and to Quebec figures for period and method of maqnure application, and delay before incorporation of manure into the soil (Parent et Gagné, 2010; 2013). See supporting documentation '01 crop production - Québec.pdf' available on ecoinvent reports web page (https://ecoquery.ecoinvent.org/File/Reports).
- MCPB [soil, agricultural]: 3.0435e-5 kg; name MCPB_soil; = MCPAB_soil/(MCPA_to_MCPB+1); lognormal variance with pedigree 0.008, pedigree (1,1,4,1,1)
  Calculated value. See Parameters.
- Dichlorprop [water, surface water]: 1.16e-9 kg; source Dijkman, T.J. 2012; lognormal variance with pedigree 0.0813, pedigree (2,2,5,1,2)
  (same comment as for MCPA-MCPB combined emissions to surface water)
- Water [air, non-urban air or from high stacks]: 0.000890606 m3; = ((MANURE_LIQUID_CATTLE* MANURE_LIQUID_CATTLE_WWM) + (MANURE_LIQUID_SWINE* MANURE_LIQUID_SWINE_WWM) + (MANURE_SOLID_CATTLE* MANURE_SOLID_CATTLE_WWM))* fraction_PW_to_air* UnitConversion(1, 'l', 'm3')
  Calculated value; See Parameters. Water emitted from: irrigated water (if any), process water.
- MCPB [air, non-urban air or from high stacks]: 3.639e-7 kg; name MCPB_air; = MCPAB_air/(MCPA_to_MCPB+1); lognormal variance with pedigree 0.008, pedigree (1,1,4,1,1)
  Calculated value. See Parameters.
- 2,4-D ester [soil, agricultural]: 9.92e-6 kg; lognormal variance with pedigree 0.0813, pedigree (2,2,5,1,2)
  (same comment as for MCPA-MCPB combined emissions to surface water)
- MCPB [water, ground-]: 3.8765e-9 kg; name MCPB_ground; = MCPAB_ground/(MCPA_to_MCPB+1); lognormal variance with pedigree 0.008, pedigree (1,1,4,1,1)
  Calculated value. See Parameters.
- 2,4-D ester [air, non-urban air or from high stacks]: 2.16e-6 kg; source Dijkman, T.J. 2012; lognormal variance with pedigree 0.0813, pedigree (2,2,5,1,2)
  (same comment as for MCPA-MCPB combined emissions to surface water)
- Cadmium [soil, agricultural]: -4.4242e-7 kg
  (same comment as for Nickel)
- MCPB [water, surface water]: 8.385e-7 kg; name MCPB_surface; = MCPAB_surface/(MCPA_to_MCPB+1); lognormal variance with pedigree 0.008, pedigree (1,1,4,1,1)
  Calculated value. See Parameters.
- 2,4-D ester [water, ground-]: 2.53e-7 kg; source Dijkman, T.J. 2012; lognormal variance with pedigree 0.0813, pedigree (2,2,5,1,2)
  (same comment as for MCPA-MCPB combined emissions to surface water)
- Chromium [soil, agricultural]: -2.1e-5 kg
  (same comment as for Nickel)
- Phosphate [water, surface water]: 0.0003976 kg; source Michaud, A.R. 2008; lognormal variance with pedigree 0.0493, pedigree (2,2,4,1,2)
  Modelled with Québec conditions with the 'ODEP model' (Michaud et al., 2008). See supporting documentation '01 crop production - Quebec.pdf' available on ecoinvent reports web page (https://ecoquery.ecoinvent.org/File/Reports).
  property wet mass 1 kg; name WM
  property carbon content, non-fossil 0; name C_content_non_fossil
  property dry mass 1 kg; name DM
  property water in wet mass 0 kg; name WWM
  property water content 0; name water_content
  property carbon content, fossil 0; name C_content_fossil
- Herbicides, unspecified [soil, agricultural]: 7.397e-6 kg; lognormal variance with pedigree 0.1138, pedigree (5,2,5,3,2)
  No possible elementary flow. Because of lack of information on the active ingredient, assumed entirely emitted to soil.
- 2,4-D ester [water, surface water]: 9.68e-10 kg; source Dijkman, T.J. 2012; lognormal variance with pedigree 0.0813, pedigree (2,2,5,1,2)
  (same comment as for MCPA-MCPB combined emissions to surface water)
- Phosphorus [water, surface water]: 0.0004241 kg; source Michaud, A.R. 2008; lognormal variance with pedigree 0.0493, pedigree (2,2,4,1,2)
  (same comment as for Phosphate)
- Copper, ion [water, surface water]: 1.9131e-5 kg; lognormal variance with pedigree 0.088725, pedigree (5,2,4,2,2)
  (same comment as for Nickel)
- Water [water, surface water]: 0.000110802 m3; = ((MANURE_LIQUID_CATTLE* MANURE_LIQUID_CATTLE_WWM) + (MANURE_LIQUID_SWINE* MANURE_LIQUID_SWINE_WWM) + (MANURE_SOLID_CATTLE* MANURE_SOLID_CATTLE_WWM))* (1-fraction_PW_to_air)*fraction_PWtoW_to_surface_water* UnitConversion(1, 'l', 'm3')
  (same comment as for Water)
- Carbon dioxide, fossil [air, non-urban air or from high stacks]: 0.0137002 kg; = UREA_N*0.466461632733939*1.571 +LIME_CaCO3*0.44; lognormal variance with pedigree 0.008, pedigree (1,1,4,1,1)
  Carbon dioxide emissions from limestone and urea application calculated from C content (IPCC, 2006). Emission factors are EF=1.57 kg CO2/kg N for urea, and EF=0.44 kg CO2/kg CaCO3 for limestone. See supporting documentation '01 crop production - Quebec.pdf' available on ecoinvent reports web page (https://ecoquery.ecoinvent.org/File/Reports).
- Zinc, ion [water, surface water]: 0.00011023 kg; lognormal variance with pedigree 0.088725, pedigree (5,2,4,2,2)
  (same comment as for Nickel)
- Glyphosate [soil, agricultural]: 0.0001204 kg; lognormal variance with pedigree 0.0743, pedigree (2,2,5,1,2)
  (same comment as for MCPA-MCPB combined emissions to surface water)
- Glyphosate [air, non-urban air or from high stacks]: 4.483e-7 kg; source Dijkman, T.J. 2012; lognormal variance with pedigree 0.0813, pedigree (2,2,5,1,2)
  (same comment as for MCPA-MCPB combined emissions to surface water)
- Chromium, ion [water, surface water]: 2.7494e-5 kg; lognormal variance with pedigree 0.088725, pedigree (5,2,4,2,2)
  (same comment as for Nickel)
- Water [water, ground-]: 0.000443208 m3; = ((MANURE_LIQUID_CATTLE* MANURE_LIQUID_CATTLE_WWM) + (MANURE_LIQUID_SWINE* MANURE_LIQUID_SWINE_WWM) + (MANURE_SOLID_CATTLE* MANURE_SOLID_CATTLE_WWM))* (1-fraction_PW_to_air)*(1- fraction_PWtoW_to_surface_water)* UnitConversion(1, 'l', 'm3')
  (same comment as for Water)
- Glyphosate [water, surface water]: 1.613e-8 kg; source Dijkman, T.J. 2012; lognormal variance with pedigree 0.0813, pedigree (2,2,5,1,2)
  (same comment as for MCPA-MCPB combined emissions to surface water)
- Cadmium, ion [water, surface water]: 5.7999e-7 kg; lognormal variance with pedigree 0.088725, pedigree (5,2,4,2,2)
  (same comment as for Nickel)
- Lead [soil, agricultural]: -7.4269e-6 kg
  (same comment as for Nickel)
- Glyphosate [water, ground-]: 3.611e-6 kg; source Dijkman, T.J. 2012; lognormal variance with pedigree 0.0813, pedigree (2,2,5,1,2)
  (same comment as for MCPA-MCPB combined emissions to surface water)
- Lead [water, surface water]: 7.4823e-6 kg; lognormal variance with pedigree 0.0887, pedigree (5,2,4,1,2)
  (same comment as for Nickel)
- Water [air, unspecified]: 5.4878e-5 m3; = EVAP_WATER * UnitConversion(1, 'l', 'm3'); lognormal variance with pedigree 0.008, pedigree (1,1,4,1,1)
  Calculated value. Evaporated water from the drying of the grains.
- Dinitrogen monoxide [air, non-urban air or from high stacks]: 0.00125202 kg; name N2O; source Rochette, P. 2008; lognormal variance with pedigree 0.0393, pedigree (2,2,4,1,2)
  Direct and indirect N2O emissions from all sources of N input (fertilizers, above- and below-ground crop residues). Modelled with Québec conditions using the Tier 2 approach (IPCC 2006; Rochette et al. 2008; Little et al. 2008, 2013). See supporting documentation '01 crop production - Quebec.pdf' available on ecoinvent reports web page (https://ecoquery.ecoinvent.org/File/Reports).
- MCPA [soil, agricultural]: 3.0435e-5 kg; = MCPAB_soil-MCPB_soil; lognormal variance with pedigree 0.008, pedigree (1,1,4,1,1)
  Calculated value. See Parameters.
- Nickel, ion [water, surface water]: 3.3514e-5 kg; lognormal variance with pedigree 0.088725, pedigree (5,2,4,2,2)
  (same comment as for Nickel)
- MCPA [water, surface water]: 8.385e-7 kg; = MCPAB_surface-MCPB_surface; lognormal variance with pedigree 0.008, pedigree (1,1,4,1,1)
  Calculated value. See Parameters.
- 2,4-D amines [air, non-urban air or from high stacks]: 1.85e-7 kg; source Dijkman, T.J. 2012; lognormal variance with pedigree 0.0813, pedigree (2,2,5,1,2)
  (same comment as for MCPA-MCPB combined emissions to surface water)
- Nitrate [water, ground-]: 0.222416 kg; lognormal variance with pedigree 0.0493, pedigree (2,2,4,1,2)
  Modelled with the 'SQCB-NO3 model' described in '01 crop production-direct field emissions natural resources v1.2.pdf' available on ecoinvent reports web page (https://ecoquery.ecoinvent.org/File/Reports). Québec average conditions are considered for the SQCB-NO3 model input parameters (see supporting documentation '01 crop production - Québec.pdf' available on ecoinvent reports web page (https://ecoquery.ecoinvent.org/File/Reports)).

## Sampling procedure
Literature and statistics data, opinions of experts in the field of agricultural production and agroeconomists.

## Extrapolations
This dataset has been extrapolated from year 2012 to the year of the calculation (2021). The uncertainty has been adjusted accordingly.

## Review by Emilia Moreno Ruiz 2015-11-02
Energy flow added, to allow CED calculations

## Review by Emilia Moreno Ruiz 2015-10-13
activity links to CA-QC machinery added
