# fibre production, cotton, organic, ginning

Dataset: EcoSpold 2, unit process
Geography: IN
Time period: 2016-03-01 to 2021-12-31
Technology level: current
Classification: ISIC rev.4 ecoinvent: 0163:Post-harvest crop activities
Scenario: Business-as-Usual
System model: Allocation, cut-off by classification
Generated by: Avraam Symeonidis
Database: ecoinvent
isCopyrightProtected: true
accessRestrictedTo: 1

## General comment
The inventory is extrapolated from the respective ginning of conventional cotton-seed in Bangladesh. This inventory dataset covers the ginning activity of the seed-cotton, organic to produce 1 kg of cotton fibre, organic 2017.
Ginning process involves the separation of cotton lint from cotton seed. There are a number of techniques to do so. In general, seed cotton is first dried using dryers and it may then be passed through a suitable cleaning equipment for the removal of dirt. The cleaned and dried seed cotton is then passed through cotton ginning setup where the the lint is separated from seeds.
The lint is then removed and compressed into bales weighing 181.43 kg. The bales are the stored at warehouse for shipment or use. Depending on the ginning machineries , a ginning facility can process about 12 -60 bales per hour.
In Bangladesh, seed cottons are plucked by hand from the cotton plants in the field by using manual laborers. There is no automation due to the availability of cheap workforce. These are then carried from the field by the farmers by using local transportation to the nearest Ginning center of Bangladesh Cotton Development Board (CDB) which has 12 ginning centers spread in different cotton growing areas in Bangladesh. There are also 20 private ginning mills in Bangladesh who are using roller ginning technique.
Each year, CDB arranges two meetings to divide on the price of seed cotton based on the data on farming cost and the global price of cotton. Based on the most recent price, CDB's ginning centers purchase seed cotton from the cotton farmers. The seed cotton then enters the ginning process.
https://www.cotton.org/pubs/cottoncounts/fieldtofabric/gin.cfm
http://cdb.portal.gov.bd/site/page/e7884798-5ab3-48ab-9bc2-3ddc28ec976c
http://cdb.portal.gov.bd/sites/default/files/files/cdb.portal.gov.bd/page/ecb0938a_7f74_4357_91f7_e025df421c49/IMG_20150325_0001.pdf
http://cdb.portal.gov.bd/sites/default/files/files/cdb.portal.gov.bd/page/ecb0938a_7f74_4357_91f7_e025df421c49/IMG_20150325_0001.pdf
http://www.cdb.gov.bd/site/photogallery/1889068a-9305-4eed-95b5-bae6d76b6e7d/%E0%A6%A4%E0%A7%81%E0%A6%B2%E0%A6%BE-%E0%A7%A7
https://www.youtube.com/watch?v=Q2208yZsyOw

## Included activities start
Ginning process starts with the purchase of seed-cotton, organic from the farmers at the ginning centers. These are the input into the ginning machine where the lint is separated from the seeds and the lint is collected as a continuous loose sheet.

## Included activities end
The loose continuous sheet of lint is then put into a hydraulic press machine to press the lint into bales. The seed is collected separately and are stored for future use in farming or are sent to allied industries for further processing. The ginning process culminates with the output of bales of cotton and separated cotton seeds.

## Reference product
- fibre, cotton, organic: 1 kg; CPC 86111: Post-harvest crop services; By-product classification allocatable product
  production volume 1.01816e8 kg; name PV_RP; = 248328300/sco
    Calculated based on the production volume of cotton-seed organic in India.
  property heating value, net 14.06 MJ
    LHV is calculated based on the Carbon content of the product. More details can be found on the respective documentation.
  property price 0.884 EUR2005
    Temporary price data. Calculated as 90% of purchasers price based on: 2005 World trade: Cotton lint import+export in USD divided by import+export in kg. From FAOSTAT, TradeSTAT, accesed 2011.06.22 <http://faostat.fao.org/site/535/DesktopDefault.aspx?PageID=535#ancor>
  property carbon content, fossil 0
    Carbon content fossil is considered zero in all agricultural products and by-products.
  property carbon content, non-fossil 0.475
    Biogenic carbon content of vegetation on a dry mass basis (47.5% DM) derived from FAOSTAT.
    Reference: http://www.fao.org/forestry/17111/en
  property carbon content 0.475
    carbon content on a dry matter basis (reserved; not for manual entry)
  property true value 0.884
    allocation property applied in "true value" allocation // value calculated from revenue
  properties: wet mass 1 kg, water content 0.0204082, dry mass 0.98 kg, water in wet mass 0.02 kg, carbon allocation 0.4655 kg

## By-products
- cottonseed, organic: 0 kg; name seed; By-product classification allocatable product; CPC 01921: Cotton, whether or not ginned
  production volume 1.46513e8 kg; = PV_RP*seed
    Calculated from production volume of reference product using the relative outputs.
  property price 0.142 EUR2005; name seed_price_EUR2005
    Temporary price data. Calculated as 90% of purchasers price based on: 2005 World trade: Cottonseed import+export in USD divided by import+export in kg. From FAOSTAT, TradeSTAT, accesed 2011.06.22 <http://faostat.fao.org/site/535/DesktopDefault.aspx?PageID=535#ancor>
  property wet mass 1 kg; name seed_WM
  property carbon content, non-fossil 0.475; name seed_C_content_non_fossil
    (same comment as for fibre, cotton, organic)
  property carbon content, fossil 0; name seed_C_content_fossil
    fossil carbon content on a dry matter basis
  property dry mass 0.923 kg; name seed_DM
  property water content 0.083424; name seed_water_content
  property water in wet mass 0.077 kg; name seed_WWM
  property carbon content 0.475
    carbon content on a dry matter basis (reserved; not for manual entry)
  property true value 0.204338; name seed_true_value
    allocation property applied in "true value" allocation // value calculated from revenue
  properties: carbon allocation 0.438425 kg

## Inputs from technosphere
- electricity, medium voltage: 0.000812248 kWh; lognormal variance with pedigree 0.0106, pedigree (4,1,3,1,1)
  Data is from field survey.
- transport, freight, lorry, unspecified: 0.0297161 metric ton*km; = (2.439/1000)*15; lognormal variance with pedigree 0.0106, pedigree (4,1,3,1,1)
  Transport from nearby fields, estimated transport distance is 15 km.
- seed-cotton, organic: 1.98107 kg; name sco; lognormal variance with pedigree 0.0106, pedigree (4,1,3,1,1)
  Data is from the ginning industry survey.
  properties: carbon content, non-fossil 0.475, wet mass 1 kg, water content 0.0834236, dry mass 0.923 kg
  note on carbon content, non-fossil: Biogenic carbon content of vegetation on a dry mass basis (47.5% DM) derived from FAOSTAT. Reference: http://www.fao.org/forestry/17111/en

## Extrapolations
Dataset is extrapolated from the conventional cotton ginning.
