# railway track construction, for high-speed train

Dataset: EcoSpold 2, unit process
Geography: DE
Time period: 2000-01-01 to 2021-12-31
Technology level: current
Classification: EcoSpold01Categories: transport systems/train
Classification: ISIC rev.4 ecoinvent: 4210:Construction of roads and railways
Scenario: Business-as-Usual
System model: Allocation, cut-off by classification
Generated by: Michael Spielmann (obsolete)
Published in: Spielmann M. 2004
Database: ecoinvent
isCopyrightProtected: true
accessRestrictedTo: 1

## General comment
All data is referred to meter*year. Life time of the rail track infrastructure is assumed to be 100 yrs. Expenditures due to tunnel construction and bridge construction have been taken into account, according to the share of tunnels and bridges: trenched tunnels: 15%; mined tunnels: 23%; rail glen bridges: 8%; railroad bridges: 1% of the total track length. All data is referred to a two way track. Allocation between goods and passenger transport is not yet applied. Maintenance and land use and disposel is included. For the maintenance and land use data, the inventory is for a ballastless track bedding.

## Included activities start
Service starts with the material consumption due to the track bedding, substructure and catenary system.

## Included activities end
The inventory includes the construction of a ballastless rail track (track bedding, substructures, catenary system) as well as the construction of tunnels and bridges. Further components of rail track infrastructure, such as signalling infrastructure, train overtaking stations, sound insulation walls and buildings (stations, service garages) are not included in this study. Maintenance and land use is considered, as well as the end-of-life of railway track is included. For the maintenance and land use data, the inventory includes the energy consumption required for the operation of the rail track as well as the operation of tunnels. The use and emissions to soil of herbicides (weed control) and lubricates (point maintenance) are taken into account. Also land transformation and occupation are accounted for.

## Geography
Data refers to specific ICE railway track.

## Technology
Data represents new technologies

## Reference product
- railway track, for high-speed train: 1 m*year; name RP_amount_1; CPC 53212: Railways; By-product classification allocatable product
  production volume 0.242058 m*year; name RP_PV_1
    This is a placeholder value that does not reflect real-world production volumes. This dataset does not currently require a real-world production volume to work in the database framework, and no actual data were collected yet. This has no negative effect on the results of the ecoinvent database. The placeholder value of this activity was scaled according to the nominal GDP of 2005 (source: United Nations, http://data.un.org/Glossary.aspx?q=GDP+%28current+US%24%29, accessed 20130726) to reflect an appropriate share of the global production volume, which is also a placeholder value.
  property price 28.356 EUR2005
    Calculated based on inputs: The price of the product has been calculated as a sum of the values of the material and energy inputs for this product. This value is therefore a rough estimation. It may underestimate the real price since there are additional expenses when producing any product. These expences can include for example labour costs, treatment of waste materials and profit for the producer. Please consider carefully whether this level of data quality is acceptable for your application.

## Inputs from technosphere
- diesel, burned in building machine: 0.05 MJ; lognormal variance with pedigree 0.1807, pedigree (3,3,5,3,3)
  Literature studies
  properties: heating value, net 1 MJ
- pig iron: 0.74 kg; lognormal variance with pedigree 0.1807, pedigree (3,3,5,3,3)
  Literature studies
  properties: carbon content, fossil 0.045, wet mass 1 kg, dry mass 1 kg
  note on carbon content, fossil: Pig iron is the iron produced in the blast furnace. It is an alloy of 94% Fe and more than 2% C (world average 4.5%). (ecoinvent v2.2 report 10_partII)
- ceramic tile: 0.12 kg; lognormal variance with pedigree 0.1807, pedigree (3,3,5,3,3)
  Literature studies
  properties: wet mass 1 kg, dry mass 1 kg
- lubricating oil: 0.00753 kg; lognormal variance with pedigree 0.08, pedigree (1,1,5,1,1)
  extrapolation from Swiss conditions assuming 3.88 l per point a and 2.1 points per km. Maintenance and land use
  properties: carbon content, fossil 0.75, wet mass 1 kg, heating value, net 40.2 MJ, dry mass 1 kg
  note on carbon content, fossil: Lubricating oil is produced from diesel. C-content/dry mass of fats and oils considered 75%, from: ecoinvent v2.2 report, n 15a, pg 40
  note on heating value, net: Literature value, Source: IPCC 2006, 2006 IPCC Guidelines for National Greenhouse Gas Inventories, Prepared by the National Greenhouse Gas Inventories Programme, Eggleston H.S., Buendia L., Miwa K., Ngara T. and Tanabe K. (eds). Published: IGES, Japan
- inert waste, for final disposal: -2.86 kg; lognormal variance with pedigree 0.0526, pedigree (3,3,5,1,1)
  Own calculation based on the excavation figures
  production volume 2.86 kg
    Calculated from the production volume of railway track, for high-speed train in proportion to the respective output amounts.
  properties: wet mass 1 kg, dry mass 0.995 kg, water content 0.00502513
- electricity, medium voltage: 6.46 kWh; lognormal variance with pedigree 0.05, pedigree (1,1,5,1,1)
  literature studies. Maintenance and land use
- aluminium, wrought alloy: 0.125 kg; lognormal variance with pedigree 0.1807, pedigree (3,3,5,3,3)
  Literature studies
  property water content 0; name water_content
  property water in wet mass 0 kg; name WWM
  property dry mass 1 kg; name DM
  property wet mass 1 kg; name WM
  property carbon content, fossil 0; name C_content_fossil
  property carbon content, non-fossil 0; name C_content_non_fossil
- concrete, medium strength: 0.0419 m3; lognormal variance with pedigree 0.0607, pedigree (3,3,5,3,3)
  Literature studies
  properties: water content 0.086758, wet mass 2380 kg, dry mass 2190 kg
- excavation, skid-steer loader: 1.89 m3; lognormal variance with pedigree 0.1807, pedigree (3,3,5,3,3)
  Literature studies;activityLink introduced to establish a direct link to the corresponding regional supply of this product
- steel, low-alloyed, hot rolled: 1.88 kg; lognormal variance with pedigree 0.0607, pedigree (3,3,5,3,3)
  Literature studies
  properties: dry mass 1 kg, wet mass 1 kg, carbon content, fossil 0.005
  note on carbon content, fossil: Low alloyed steel composition given in Tab. 3.2 ecoinvent v2.2 report 10_partII. Steel assumed to have a C content of 0.5%
- copper, cathode: 0.424 kg; lognormal variance with pedigree 0.0607, pedigree (3,3,5,3,3)
  Literature studies
  properties: dry mass 1 kg, wet mass 1 kg
- tin: 0.005 kg; lognormal variance with pedigree 0.1807, pedigree (3,3,5,3,3)
  Literature studies
  properties: dry mass 1 kg, wet mass 1 kg
- glyphosate: 0.0007 kg; lognormal variance with pedigree 0.16, pedigree (1,1,5,1,1)
  value represents Swiss conditions and is used as an first estimate. Maintenance and land use
  properties: carbon content, fossil 0.214286, wet mass 1 kg, dry mass 1 kg
- used railway track: -1 m*year; name BP_amount_1; lognormal variance with pedigree 0.04, pedigree (1,1,5,1,1)
  production volume 0.242058 m*year; = RP_PV_1 * (BP_amount_1 / RP_amount_1)
    Calculated from production volume of reference product using the relative outputs.
  properties: carbon content, fossil 8.23188e-5, dry mass 690 kg, wet mass 690 kg
  note on carbon content, fossil: Calculated from C content in input materials in the infrastructure
- reinforcing steel: 10.6 kg; lognormal variance with pedigree 0.0607, pedigree (3,3,5,3,3)
  Literature studies
  properties: dry mass 1 kg, carbon content, fossil 0.004, wet mass 1 kg

## Inputs from nature
- Transformation, to traffic area, rail/road embankment [natural resource, land]: 0.104 m2; lognormal variance with pedigree 0.16, pedigree (1,1,5,1,1)
  (same comment as for glyphosate)
- Transformation, to traffic area, rail network [natural resource, land]: 0.133 m2; lognormal variance with pedigree 0.16, pedigree (1,1,5,1,1)
  (same comment as for glyphosate)
- Occupation, traffic area, rail/road embankment [natural resource, land]: 10.4 m2*year; lognormal variance with pedigree 0.16, pedigree (1,1,5,1,1)
  (same comment as for glyphosate)
- Occupation, traffic area, rail network [natural resource, land]: 13.3 m2*year; lognormal variance with pedigree 0.04, pedigree (1,1,5,1,1)
  ICE rail track specific data achieved from literature. Maintenance and land use
- Transformation, from unspecified [natural resource, land]: 0.237 m2; lognormal variance with pedigree 0.08, pedigree (1,1,5,1,1)
  ICE rail track specific data achieved from literature. Maintenance and land use

## Emissions to nature
- Glyphosate [soil, industrial]: 0.0007 kg; lognormal variance with pedigree 0.16, pedigree (1,1,5,1,1)
  extrapolation from Swiss conditions. Maintenance and land use
- Oils, non-fossil [soil, unspecified]: 0.00753 kg; lognormal variance with pedigree 0.05, pedigree (1,1,5,1,1)
  (same comment as for glyphosate)

## Sampling procedure
literature

## Extrapolations
This dataset has been extrapolated from year 2000 to the year of the calculation (2021). The uncertainty has been adjusted accordingly.

## Review by Niels Jungbluth 2004-04-16
passed

## Review by Carl Vadenbo 2012-06-29
In preparation for the release of ecoinvent v3.0, the datasets 'railway track, ICE, DE' and 'operation, maintenance, railway track, ICE, DE' in ecoinvent v2.2 were merged into the dataset 'railway track construction, for high-speed train, DE 2000'. The amounts of the exchanges were reviewed and were found to correspond to the disaggregated datasets. The amounts and the uncertainty information of the exchanges were reviewed and were found to correspond to the disaggregated datasets, and the dataset was accepted for inclusion into the ecoinvent database on 2012.07.04.
