# forwarder production

Dataset: EcoSpold 2, unit process
Geography: GLO
Time period: 2012-01-01 to 2021-12-31
Technology level: current
Classification: ISIC rev.4 ecoinvent: 2821:Manufacture of agricultural and forestry machinery
Scenario: Business-as-Usual
System model: Allocation, cut-off by classification
Generated by: Frank Werner
Published in: Spielmann, M. 2007
Database: ecoinvent
isCopyrightProtected: true
accessRestrictedTo: 1

## Included activities start
The activity starts with the semi-finished products and raw materials at the factory gate.

## Included activities end
The inventory accounts for the input and disposal of all materials, their (pre-) processing and the energy required for the production and maintenance of the forest machinery represented by this dataset. In addition, material for and emissions from disassembly are included.
Infrastructure for the production and maintenance of the machinery is inventoried as a rough guess from lorry production.
The dataset does not contain fuel consumption or related emissions. These issues are inventoried in the respective dataset on the operation of the machinery.

## Geography
The inventories apply to the production in Northern/Central Europe

## Parameters
- lifetime of machine, productive machine hours: 17600 hour; name total_PMH; lognormal variance with pedigree 0.1042, pedigree (3,4,2,1,1)
  Oral personal communication, P. Wiss, Präsident des Verbandes Forstunternehmer Schweiz
- weight of the vehicle: 11049 kg/unit; name vehicle_weight
- maintenance factor: 0.55 dimensionless; name maintenance_factor; lognormal variance with pedigree 0.1048, pedigree (3,4,2,1,2)
  Spielmann et al. 2007

## Reference product
- forwarder: 1 unit; CPC 441: Agricultural or forestry machinery and parts thereof; By-product classification allocatable product
  forwarder of use class II (10 - 12t) with a total weight of 11,000 kg as classified by Klvac, R., S. Ward, P. M. O. Owende and J. Lyons (2003): Energy audit of wood harvesting systems. Scandinavian Journal of Forest Research, 18(2): 176-183. Data on fuel consumption etc. can be found in the respective dataset on the operation of the machine.
  production volume 10000 unit; name p_machinery
    unqualified guess, no information available
  property lifetime capacity [h] 17600 hour; = total_PMH
    Total of operation hours expected; in case of forest machinery: total of productive machine hours.
  property lifetime 10 year; name lifetime; = total_PMH/8/220
    total productive machine hours divided by 8 hour/day divided by 220 working days/yera
  property price 18052.5 EUR2005
    Calculated based on inputs: The price of the product has been calculated as a sum of the values of the material and energy inputs for this product. This value is therefore a rough estimation. It may underestimate the real price since there are additional expenses when producing any product. These expences can include for example labour costs, treatment of waste materials and profit for the producer. Please consider carefully whether this level of data quality is acceptable for your application.

## By-products
- scrap lead acid battery: 0 kg; source Spielmann, M. 2007; By-product classification Recyclable; CPC 39364: Waste and scrap of lead; pedigree (1,1,1,1,1)
  production volume 0 kg; = p_machinery*w_lead
    Calculated from production volume of reference product using the relative outputs.
  property dry mass 1 kg; name w_lead_DM
  properties: price 0 EUR2005, wet mass 1 kg, water in wet mass 0 kg

## Inputs from technosphere
- waste aluminium: -80.6 kg; name w_aluminium; = (m_aluminium)*-1; source Spielmann, M. 2007; lognormal variance with pedigree 0.203, pedigree (4,5,5,5,5)
  production volume 806000 kg; = p_machinery*w_aluminium
    Calculated from production volume of reference product using the relative outputs.
  property dry mass 1 kg; name w_aluminium_DM
  properties: wet mass 1 kg
- synthetic rubber: 1392 kg; name m_rubber; = 45+1347; source Spielmann, M. 2007; lognormal variance with pedigree 0.235, pedigree (5,5,5,5,5)
  rubber sealings and tubes plus rubber tyres (production and mantenance)
  property carbon content, fossil 0.871949; name C_content_fossil_rubber
  properties: UVEK_relative_amount_1 1, heating value, net 26.42 MJ, UVEK_link_1 4277, dry mass 1 kg, wet mass 1 kg
  note on carbon content, fossil: EPDM (Ethylene-propene-diene terpolymer) rubber is a terpolymer of ethylene, propene, and a diene with the residual unsaturated portion of the diene in the side chain (ecoinvent v2.2 report 7-part XX & Ullmann). Chemical formula (deduced from Evidences of Solvent-Induced Miscibility in Polychloroprene-co-Ethylene-Propene Diene Terpolymer Blends, Dubey et al., Journal of Applied Polymer Science, 2009, 111:1884-1891): C20H35
  note on UVEK_relative_amount_1: to be used only in special submissions in coordination with ecoinvent and the Swiss FOEN.
- waste rubber, unspecified: 0 kg; name w_rubber; source Spielmann, M. 2007; pedigree (1,1,1,1,1)
  production volume 0 kg
    Calculated from production volume of reference product using the relative outputs.
  property dry mass 1 kg; name w_rubber_DM
  properties: UVEK_link_1 1079, heating value, net 27.19 MJ, UVEK_relative_amount_1 -1, carbon content, fossil 0.853, wet mass 1 kg
  note on heating value, net: Value taken from the general comment of the treatment dataset.
- copper, cathode: 11 kg; name m_copper; source Spielmann, M. 2007; lognormal variance with pedigree 0.235, pedigree (5,5,5,5,5)
  total material input for production (no maintenance according to reference); the amount of material used in production is extrapolated from reference via total weight of machine
  properties: UVEK_link_1 595, dry mass 1 kg, UVEK_relative_amount_1 1, wet mass 1 kg
- lead: 76.9 kg; name m_lead; source Spielmann, M. 2007; lognormal variance with pedigree 0.235, pedigree (5,5,5,5,5)
  for battery; the amount is extrapolated from reference via total weight of machine
  properties: dry mass 1 kg, UVEK_relative_amount_1 1, UVEK_link_1 2778, wet mass 1 kg
- aluminium, cast alloy: 80.6 kg; name m_aluminium; = (1+maintenance_factor)*52; source Spielmann, M. 2007; lognormal variance with pedigree 0.235, pedigree (5,5,5,5,5)
  total material input for production and maintenance (estimated via default factor); the amount of material used in production is extrapolated from reference via total weight of machine
  properties: wet mass 1 kg, UVEK_link_1 162, dry mass 1 kg, UVEK_relative_amount_1 1
- electronics, for control units: 55 kg; name m_electronics; source Spielmann, M. 2007; lognormal variance with pedigree 0.235, pedigree (5,5,5,5,5)
  (same comment as for copper, cathode)
  property carbon content, fossil 0.337146; name C_content_fossil_electronics
  property wet mass 1 kg; name m_electronics_WM
  property water in wet mass 0 kg; name WWM
  property water content 0; name water_content
  property dry mass 1 kg; name m_electronics_DM
  property carbon content, non-fossil 0.00013442; name C_content_non_fossil_electronics
  properties: UVEK_link_1 2021, UVEK_relative_amount_1 1
- tap water: 28574.2 kg; name m_tap_water; = (1+maintenance_factor)*18435; source Spielmann, M. 2007; lognormal variance with pedigree 0.235, pedigree (5,5,5,5,5)
  total water input for production and maintenance (estimated via default factor); the amount of water used in production is extrapolated from reference via total weight of machine
  property carbon content, non-fossil 0; name C_content_non_fossil
  property carbon content, fossil 0.00178991; name C_content_fossil
  properties: UVEK_relative_amount_1 1, wet mass 1 kg, UVEK_link_1 4285, water content 2962.17, dry mass 0.000337476 kg
- powder coat, steel: 51.119 m2; = (1+maintenance_factor)*32.98; source Spielmann, M. 2007; lognormal variance with pedigree 0.235, pedigree (5,5,5,5,5)
  total powder coating input for production and maintenance (estimated via default factor)
- oxygen, liquid: 0 kg; source Spielmann, M. 2007; pedigree (1,1,1,1,1)
  used during disassembly
  properties: UVEK_relative_amount_1 1, UVEK_link_1 3319, dry mass 1 kg, wet mass 1 kg
- acetylene: 0 kg; name m_acethylene; source Spielmann, M. 2007; pedigree (1,1,1,1,1)
  used during disassembly
  property carbon content, fossil 0.923077; name C_content_fossil_acetylene
  property wet mass 1 kg; name m_acethylene_WM
  property dry mass 1 kg; name m_acethylene_DM
  properties: UVEK_link_1 101, heating value, net 51.2 MJ, UVEK_relative_amount_1 1
  note on heating value, net: Based on literature, page 25 (Value may refer to HHV), Althaus H.-J., Chudacoff M., Hischier R., Jungbluth N., Osses M. and Primas A. (2007) Life Cycle Inventories of Chemicals. Final report ecoinvent data v2.0 No. 8. EMPA, Swiss Centre for Life Cycle Inventories, Dübendorf, CH, Online-Version under: www.ecoinvent.org.
- waste electric and electronic equipment: -55 kg; name w_electronics; = (m_electronics)*-1; source Spielmann, M. 2007; lognormal variance with pedigree 0.203, pedigree (4,5,5,5,5)
  production volume 550000 kg; = p_machinery*w_electronics
    Calculated from production volume of reference product using the relative outputs.
  property carbon content, fossil 0.337146; name w_electronics_C_content_fossil; = C_content_fossil_electronics
  property dry mass 1 kg; name w_electronics_DM
  property carbon content, non-fossil 0.00013442; name w_electronics_C_content_non_fossil; = C_content_non_fossil_electronics
  properties: wet mass 1 kg, UVEK_link_1 928, UVEK_relative_amount_1 -1
- steel, low-alloyed, hot rolled: 10718.2 kg; name m_steel_low_alloyed; = (1+maintenance_factor)*6915; source Spielmann, M. 2007; lognormal variance with pedigree 0.235, pedigree (5,5,5,5,5)
  (same comment as for aluminium, cast alloy)
  properties: UVEK_link_2 2662, UVEK_relative_amount_2 1, carbon content, fossil 0.005, UVEK_link_1 4222, UVEK_relative_amount_9 0.501682, UVEK_relative_amount_8 0.114019, UVEK_link_9 4433, UVEK_relative_amount_1 1, wet mass 1 kg, UVEK_link_8 4417, dry mass 1 kg
  note on carbon content, fossil: Low alloyed steel composition given in Tab. 3.2 ecoinvent v2.2 report 10_partII. Steel assumed to have a C content of 0.5%
  note on UVEK_relative_amount_9: scaling factor = amount of transport in corresponding KBOB dataset/amount of this input from technosphere. To be used only in special submissions in coordination with ecoinvent and the Swiss FOEN.
  note on UVEK_link_9: This link has been introduced to model transport specifically for the SAM model; to be used only in special submissions in coordination with ecoinvent and the Swiss FOEN.
- scrap copper: 0 kg; name w_copper; source Spielmann, M. 2007; pedigree (1,1,1,1,1)
  (same comment as for aluminium, cast alloy)
  production volume 0 kg
    Calculated from production volume of reference product using the relative outputs.
  property dry mass 1 kg; name w_copper_DM
  properties: wet mass 1 kg
- injection moulding: 260.4 kg; = m_PP; source Spielmann, M. 2007; lognormal variance with pedigree 0.23, pedigree (5,5,5,5,5)
  properties: UVEK_link_1 2701, UVEK_relative_amount_1 1
- polypropylene, granulate: 260.4 kg; name m_PP; = (1+maintenance_factor)*168; source Spielmann, M. 2007; lognormal variance with pedigree 0.235, pedigree (5,5,5,5,5)
  (same comment as for aluminium, cast alloy)
  property carbon content, fossil 0.857143; name C_content_fossil_PP
  properties: wet mass 1 kg, UVEK_link_1 3548, heating value, net 32.78 MJ, dry mass 1 kg, UVEK_relative_amount_1 1
  note on heating value, net: Value extracted from "treatment of waste polypropylene, open burning"
  note on carbon content, fossil: Polypropylene is formed by the polymerisation of propylene, C3H6 (ecoinvent v2.2 report 11_II)
- wastewater, average: 0 m3; name w_sewage; source Spielmann, M. 2007; pedigree (1,1,1,1,1)
  amounts of water inputs converted to m3
  production volume 0 m3
    Calculated from production volume of reference product using the relative outputs.
  properties: dry mass 0.346837 kg, water content 2882.2, carbon content, non-fossil 0.194039, wet mass 1000 kg
- electricity, medium voltage: 39036.8 kWh; = (1+maintenance_factor)*25185; source Spielmann, M. 2007; lognormal variance with pedigree 0.235, pedigree (5,5,5,5,5)
  total electricity input for production and maintenance (estimated via default factor); the amount of electricity used in production is extrapolated from reference via total weight of machine
  properties: UVEK_relative_amount_1 1, UVEK_link_1 1785
- waste polypropylene: 0 kg; name w_PP; source Spielmann, M. 2007; pedigree (1,1,1,1,1)
  Input of PP correct for water content of waste flow
  production volume 0 kg
    Calculated from production volume of reference product using the relative outputs.
  property dry mass 0.841 kg; name DM_waste_polypropylene
  property water content 0.189061; name WC_waste_PP
  properties: wet mass 1 kg, UVEK_relative_amount_1 -1.18906, carbon content, fossil 0.825208, heating value, net 32.78 MJ, UVEK_link_1 1042
  note on heating value, net: Value assumed for all polypropylene products. Source: Phyllis2, database for (treated) biomass, algae, feedstocks for biogas production and biochar, https://phyllis.nl/Biomass/View/1186, ECN.TNO
- heat, district or industrial, natural gas: 44506.7 MJ; = (1+maintenance_factor)*28714; source Spielmann, M. 2007; lognormal variance with pedigree 0.235, pedigree (5,5,5,5,5)
  total heat input for production and maintenance (estimated via default factor); the amount of heat used in production is extrapolated from reference via total weight of machine
  properties: heating value, net 1 MJ
- wastewater from lorry production: -3.1 m3; name w_WW; = ((1+maintenance_factor)*2)*-1; source Spielmann, M. 2007; lognormal variance with pedigree 0.203, pedigree (4,5,5,5,5)
  total production specific waste water from production and maintenance (estimated via default factor); the amount of waste water from production is extrapolated from reference via total weight of machine
  production volume 31000 m3; = p_machinery*w_WW
    Calculated from production volume of reference product using the relative outputs.
  properties: UVEK_link_1 4575, water content 2962.17, wet mass 1000 kg, UVEK_relative_amount_1 -1, dry mass 0.337476 kg
- water, completely softened: 0 kg; name m_water_softened; source Spielmann, M. 2007; pedigree (1,1,1,1,1)
  for battery; the amount is extrapolated from reference via total weight of machine
  property dry mass 0 kg; name m_water_softened_DM
  properties: UVEK_relative_amount_1 1, UVEK_link_1 4851, wet mass 1 kg
- scrap steel: 0 kg; name w_scrap_steel; source Spielmann, M. 2007; pedigree (1,1,1,1,1)
  used for chromium steel, for which no specific dataset is available (15.09.2012)
  production volume 0 kg
    Calculated from production volume of reference product using the relative outputs.
  property dry mass 1 kg; name w_chromium_steel_DM
  properties: wet mass 1 kg
- steel, chromium steel 18/8, hot rolled: 1630.6 kg; name m_chromium_steel; = (1+maintenance_factor)*1052; source Spielmann, M. 2007; lognormal variance with pedigree 0.235, pedigree (5,5,5,5,5)
  (same comment as for aluminium, cast alloy)
  properties: dry mass 1 kg, UVEK_link_2 2662, UVEK_relative_amount_2 1, UVEK_link_1 451, carbon content, fossil 0.0008, wet mass 1 kg, UVEK_relative_amount_1 1
  note on carbon content, fossil: Stainless steel model is the grade 304 steel (18/8 stainless, 18% chromium 8% nickel; max. 0.08% C)
- wire drawing, copper: 11 kg; = m_copper; source Spielmann, M. 2007; lognormal variance with pedigree 0.235, pedigree (5,5,5,5,5)
  properties: UVEK_relative_amount_1 1, UVEK_link_1 4895
- flat glass, uncoated: 0 kg; name m_glass; source Spielmann, M. 2007; pedigree (1,1,1,1,1)
  (same comment as for aluminium, cast alloy)
  properties: wet mass 1 kg, UVEK_link_1 2159, dry mass 1 kg, UVEK_relative_amount_1 1
- waste glass sheet: 0 kg; name w_glass; source Spielmann, M. 2007; pedigree (1,1,1,1,1)
  production volume 0 kg
    Calculated from the production volume of harvester in proportion to the respective output amounts.
  properties: dry mass 1 kg, wet mass 1 kg
- cast iron: 2667 kg; name m_cast_iron; source Spielmann, M. 2007; lognormal variance with pedigree 0.235, pedigree (5,5,5,5,5)
  (same comment as for copper, cathode)
  property wet mass 1 kg; name m_cast_iron_WM
  property dry mass 1 kg; name m_cast_iron_DM
  property carbon content, fossil 0.04; name C_content_fossil_cast_iron
  properties: UVEK_link_1 401, UVEK_relative_amount_1 1
- waste bulk iron, excluding reinforcement: 0 kg; name w_bulk_iron; source Spielmann, M. 2007; pedigree (1,1,1,1,1)
  production volume 0 kg
    Calculated from production volume of reference product using the relative outputs.
  property dry mass 1 kg; name w_bulk_iron_DM
  properties: wet mass 1 kg
- road vehicle factory: 8.73e-7 unit; source Spielmann M. 2007; lognormal variance with pedigree 0.76, pedigree (5,5,5,5,5)
  no specific information available; proxy as for production of lorry 16 t
  properties: UVEK_relative_amount_1 1, UVEK_link_1 3829
- scrap lead acid battery: -76.9 kg; source Spielmann, M. 2007; lognormal variance with pedigree 0.203, pedigree (4,5,5,5,5)
  production volume 769000 kg
  properties: wet mass 1 kg
- waste rubber, unspecified: -681.691, -28.6173, -681.691 kg (3 entries); source Spielmann, M. 2007; lognormal variance with pedigree 0.203, pedigree (4,5,5,5,5)
  production volume 1.392e7 kg
  properties: UVEK_link_1 1079, heating value, net 27.19 MJ, UVEK_relative_amount_1 -1, carbon content, fossil 0.853, wet mass 1 kg, dry mass 1 kg
- oxygen, liquid: 2.58372, 9.41628 kg (2 entries); source Spielmann, M. 2007; lognormal variance with pedigree 0.235, pedigree (5,5,5,5,5)
  used during disassembly
- acetylene: 0.87, 4.13 kg (2 entries); source Spielmann, M. 2007; lognormal variance with pedigree 0.235, pedigree (5,5,5,5,5)
  used during disassembly
  properties: carbon content, fossil 0.923077, UVEK_link_1 101, heating value, net 51.2 MJ, UVEK_relative_amount_1 1, wet mass 1 kg, dry mass 1 kg
- scrap copper: -3.48929, -0.16371, -7.347 kg (3 entries); source Spielmann, M. 2007; lognormal variance with pedigree 0.203, pedigree (4,5,5,5,5)
  (same comment as for aluminium, cast alloy)
  production volume 110000 kg
  properties: dry mass 1 kg, wet mass 1 kg
- wastewater, average: -8.93325, -0.966411, -18.6903 m3 (3 entries); source Spielmann, M. 2007; lognormal variance with pedigree 0.203, pedigree (4,5,5,5,5)
  amounts of water inputs converted to m3
  production volume 285900 m3
- waste polypropylene: -29.8035, -2.29767, -0.949021, -0.901184, -34.388, -0.383394, -0.173769, -240.735 kg (8 entries); source Spielmann, M. 2007; lognormal variance with pedigree 0.203, pedigree (4,5,5,5,5)
  Input of PP correct for water content of waste flow
  production volume 3.09631e6 kg
  properties: wet mass 1 kg, UVEK_relative_amount_1 -1.18906, dry mass 0.841 kg, carbon content, fossil 0.825208, heating value, net 32.78 MJ, UVEK_link_1 1042, water content 0.189061
- water, completely softened: 3.69419, 5.13967, 6.86614 kg (3 entries); source Spielmann, M. 2007; lognormal variance with pedigree 0.235, pedigree (5,5,5,5,5)
  for battery; the amount is extrapolated from reference via total weight of machine
- scrap steel: -3006.89, -3.80962, -9338.15 kg (3 entries); source Spielmann, M. 2007; lognormal variance with pedigree 0.203, pedigree (4,5,5,5,5)
  used for chromium steel, for which no specific dataset is available (15.09.2012)
  production volume 1.23488e8 kg
  properties: dry mass 1 kg, wet mass 1 kg
- flat glass, uncoated: 20.3804, 98.9696 kg (2 entries); source Spielmann, M. 2007; lognormal variance with pedigree 0.235, pedigree (5,5,5,5,5)
  (same comment as for aluminium, cast alloy)
- waste glass sheet: -24.4628, -0.622824, -94.2643 kg (3 entries); source Spielmann, M. 2007; lognormal variance with pedigree 0.203, pedigree (4,5,5,5,5)
  production volume 1.1935e6 kg
- waste bulk iron, excluding reinforcement: -858.774, -22.4478, -1785.78 kg (3 entries); source Spielmann, M. 2007; lognormal variance with pedigree 0.203, pedigree (4,5,5,5,5)
  production volume 2.667e7 kg
  properties: wet mass 1 kg, dry mass 1 kg

## Emissions to nature
- Carbon dioxide, fossil [air, non-urban air or from high stacks]: 16.9231 kg; = m_acethylene*C_content_fossil_acetylene/12*(12+2*16); source Spielmann, M. 2007; lognormal variance with pedigree 0.033, pedigree (1,1,4,1,1)
  acethylene converted to CO2

## Sampling procedure
Originally adapted from John Deere, environmental declaration for a Timberjack 1410 D as documented in Spielmann, M,, L. Barreto, V. Erni, F. Frutig and O.Thees (2007): Life cycle assessment of energy wood supply of forest wood chips in Switzerland, Paul Scherrer Institute and Swiss Federal Institute for Forest, Snow and Landscape Research (WSL), unpublished.

## Extrapolations
This dataset has been extrapolated from year 2012 to the year of the calculation (2021). The uncertainty has been adjusted accordingly.
