# nutrient supply from ash, from combustion of straw

Dataset: EcoSpold 2, unit process
Geography: GLO
Time period: 2000-01-01 to 2021-12-31
Technology level: current
Classification: ISIC rev.4 ecoinvent: 0161:Support activities for crop production
Scenario: Business-as-Usual
System model: Allocation, cut-off by classification
Generated by: Avraam Symeonidis
Database: ecoinvent
isCopyrightProtected: true
accessRestrictedTo: 1

## General comment
This inventory describes the application of ash, from combustion of straw. This application provides the nutrients of N and P2O5 contained in the ash. No emissions are considered.

## Included activities start
Activity starting with the application ash from combustion of straw.

## Included activities end
The activity ends with the provision of N-fertiliser and P-fertiliser.

## Geography
inventory based on composition of ash, from combustion of straw

## Reference product
- organic phosphorus fertiliser, as P2O5: 1 kg; name phosphorus_fertiliser_output; By-product classification allocatable product; CPC 34659: Fertilizers n.e.c.
  The slag produced during straw combustion contains 0,8-2.1% P2O5 and 0,05-0,08% N . (http://www.lcafood.dk/processes/energyconversion/heatandpowerfromstraw.htm)
  The average values are used for this inventory.
  production volume 643372 kg; name PV_RP_1_1; = 44370504*phosphorus_fertiliser_output
    Production volume calculated based on the production volume of fermentation filtrate that is produced in citric acid production.
  property price 0.241 EUR2005; name phosphorus_fertiliser_outp_price_EUR2005
    Set equal to the price of the corresponding inorganic fertiliser
  property oxygen content 0.563579
    Oxygen content (on a dry matter basis) of organic phosphorus fertiliser, as P2O5 is calculated from the molecular formula of the substance (Phosphorus).
  property phosphorus content 0.436421
    Phosphorus content (on a dry matter basis) of organic phosphorus fertiliser, as P2O5 is calculated from the molecular formula of the substance (Phosphorus).
  property carbon content, fossil 0
    Carbon content, fossil is calculated based on the chemical formula of the substance.
  property carbon content 0
    carbon content on a dry matter basis (reserved; not for manual entry)
  property true value 0.0034945; name phosphorus_fertiliser_outpu_true_value_0
    allocation property applied in "true value" allocation // value calculated from revenue
  properties: dry mass 1 kg, carbon content, non-fossil 0, wet mass 1 kg, water in wet mass 0 kg, water content 0, carbon allocation 0 kg

## By-products
- organic nitrogen fertiliser, as N: 0 kg; name nitrogen_fertiliser_output; CPC 34659: Fertilizers n.e.c.; By-product classification allocatable product
  (same comment as for organic phosphorus fertiliser, as P2O5)
  production volume 28840.8 kg; name PV_RP_2_1; = 44370504*nitrogen_fertiliser_output
    (same comment as for organic phosphorus fertiliser, as P2O5)
  property price 0.473 EUR2005; name nitrogen_fertiliser_output_price_EUR2005
    Set equal to the price of the corresponding inorganic fertiliser
  property nitrogen content 1
    Nitrogen content (on a dry matter basis) of organic nitrogen fertiliser, as N is calculated from the molecular formula of the substance (Nitrogen).
  property carbon content, fossil 0
    Carbon content, fossil is calculated based on the chemical formula of the substance.
  property carbon content 0
    carbon content on a dry matter basis (reserved; not for manual entry)
  property true value 0.00030745; name nitrogen_fertiliser_output_true_value
    allocation property applied in "true value" allocation // value calculated from revenue
  properties: wet mass 1 kg, carbon content, non-fossil 0, water in wet mass 0 kg, dry mass 1 kg, water content 0, carbon allocation 0 kg

## Inputs from technosphere
- ash, from combustion of straw: 63.3885 kg; name A
  combined production
  properties: dry mass 1 kg, wet mass 1 kg, phosphorus content 0.006322, oxygen content 0.008178, nitrogen content 0.00065
  note on phosphorus content: The slag produced during straw combustion contains 0,8-2.1% P2O5 and 0,05-0,08% N . (http://www.lcafood.dk/processes/energyconversion/heatandpowerfromstraw.htm) The average values are used for this inventory.

## Sampling procedure
Dataset based on nutrient content of ash, from combustion of bagasse from sugar cane for fertiliser use
