# phosphorus production, white, liquid

Dataset: EcoSpold 2, unit process
Geography: RoW
Time period: 2000-01-01 to 2021-12-31
Technology level: current
Classification: EcoSpold01Categories: chemicals/inorganics
Classification: ISIC rev.4 ecoinvent: 2011:Manufacture of basic chemicals
Tags: ConvertedDataset
Scenario: Business-as-Usual
System model: Allocation, cut-off by classification
Generated by: Roland Hischier
Published in: Hischier R. 2007
Database: ecoinvent
isCopyrightProtected: true
accessRestrictedTo: 1

## General comment
The functional unit is 1 kg of liquid ozone. Large uncertainty of the process data due to weak data on the production process (based only on literature values).
[This dataset was already contained in the ecoinvent database version 2. It was not individually updated during the transfer to ecoinvent version 3. Life Cycle Impact Assessment results may still have changed, as they are affected by changes in the supply chain, i.e. in other datasets. This dataset was generated following the ecoinvent quality guidelines for version 2. It may have been subject to central changes described in the ecoinvent version 3 change report (http://www.ecoinvent.org/database/ecoinvent-version-3/reports-of-changes/), and the results of the central updates were reviewed extensively. The changes added e.g. consistent water flows and other information throughout the database. The documentation of this dataset can be found in the ecoinvent reports of version 2, which are still available via the ecoinvent website. The change report linked above covers all central changes that were made during the conversion process.]

## Included activities end
Raw materials and chemicals used for production, by-products and waste produced, transport of materials to manufacturing plant, emissions to air, energy demand and an estimation of the infrastructure of the plant.

## Geography
Data used has no specific geographical origin - they represent typical values (Ullmann's). Average values are used for infrastructure and transports.

## Technology
Production from phosphate rock with the aid of the Wöhler process with a yield of 91%.

## Parameters
- fraction, cooling water, once-through system, to air: 0.004 dimensionless; name fraction_CW_OT_to_air; lognormal variance with pedigree 0.0413, pedigree (2,3,1,3,1)
  Calculated based on literature value (Scown, C.D., 2011, Water Footprint of U.S. Transportation Fuels and supplying information of the article) (Vionnet, S., Quantis Water Database - Technical Report, 2012).
- fraction, cooling water, to air: 0.3875 dimensionless; name fraction_CW_to_air; = (0.5*fraction_CW_OT_to_air)+(0.5*fraction_CW_R_to_air); lognormal variance with pedigree 0.092025, pedigree (4,4,3,2,4)
  Calculated value based on literature value (see comments of the other parametres present in this dataset) and expert opinion. In the case when no industry/literature data are available about the type of cooling or directly fraction, cooling water, to air specific for the process a default assumption is applied. It is assumed that the once-through cooling system is used in 50% of all cases and recirculating system is used in another 50% of all cases.
- fraction, process water, to air: 0.34 dimensionless; name fraction_PW_to_air; lognormal variance with pedigree 0.092025, pedigree (4,4,3,2,4)
- fraction, cooling water, cooling pond system, to air: 0.032 dimensionless; name fraction_CW_CP_to_air; lognormal variance with pedigree 0.0413, pedigree (2,3,1,3,1)
  (same comment as for fraction, cooling water, once-through system, to air)
- fraction, cooling water, recirculating system, to air: 0.771 dimensionless; name fraction_CW_R_to_air; lognormal variance with pedigree 0.0413, pedigree (2,3,1,3,1)
  (same comment as for fraction, cooling water, once-through system, to air)

## Reference product
- phosphorus, white, liquid: 1 kg; By-product classification allocatable product; CPC 34231: Chemical elements n.e.c.; inorganic acids except phosphoric, nitric and sulphonitric; inorganic oxygen compoun[…]; CAS 12185-10-3
  EcoSpold01Location=RER
  production volume 2.67763 kg
    This is a placeholder value that does not reflect real-world production volumes. This dataset does not currently require a real-world production volume to work in the database framework, and no actual data were collected yet. This has no negative effect on the results of the ecoinvent database.
  property price 2.85707 EUR2005
    Calculated based on inputs: The price of the product has been calculated as a sum of the values of the material and energy inputs for this product. This value is therefore a rough estimation. It may underestimate the real price since there are additional expenses when producing any product. These expences can include for example labour costs, treatment of waste materials and profit for the producer. Please consider carefully whether this level of data quality is acceptable for your application.
  property carbon content 0
    carbon content on a dry matter basis (reserved; not for manual entry)
  properties: carbon content, non-fossil 0, wet mass 1 kg, carbon content, fossil 0, water content 0, dry mass 1 kg, water in wet mass 0 kg, carbon allocation 0 kg

## Inputs from technosphere
- hard coal: 0 kg; pedigree (1,1,1,1,1)
  According to quantitative information in Ullmann's
  EcoSpold01Location=EEU
  Uncertainty: according to quantitative information in Ullmann's
  properties: water content 0.0638298, carbon content, fossil 0.845, dry mass 0.94 kg, wet mass 1 kg, heating value, net 27.91 MJ
  note on carbon content, fossil: C content 75-94% (specified in Tab 1.1, report 6, part VI). A mean content of 0.845 kg C/ kg dry hard coal was considered
  note on heating value, net: Based on the Characterization factor of Hard coal in the CED method
- electricity, medium voltage: 0 kWh; pedigree (1,1,1,1,1)
  EcoSpold01Location=UCTE
  According to quantitative information in Ullmann's
  Uncertainty: according to quantitative information in Ullmann's
- phosphate rock, beneficiated: 0 kg; pedigree (1,1,1,1,1)
  According to quantitative information in Ullmann's
  EcoSpold01Location=MA
  Uncertainty: according to quantitative information in Ullmann's
  properties: dry mass 1 kg, wet mass 1 kg
- gravel, crushed: 0 kg; pedigree (1,1,1,1,1)
  According to quantitative information in Ullmann's
  EcoSpold01Location=CH
  Uncertainty: according to quantitative information in Ullmann's
  properties: wet mass 1 kg, dry mass 1 kg
- chemical factory, organics: 4e-10 unit; lognormal variance with pedigree 0.5, pedigree (5,5,5,5,5)
  Estimation
  EcoSpold01Location=RER
  Uncertainty: estimation
- hard coal: 0.0843239, 0.584806, 0.0826319, 0.137341, 0.019608, 0.123195, 0.0358597, 0.182236 kg (8 entries); lognormal variance with pedigree 0.096, pedigree (4,5,5,5,3)
  (same comment as for hard coal)
- electricity, medium voltage: 0.163867, 0.0314227, 0.527522, 7.67234, 1.08142, 3.52343 kWh (6 entries); lognormal variance with pedigree 0.096, pedigree (4,5,5,5,3)
  (same comment as for electricity, medium voltage)
- phosphate rock, beneficiated: 0.340034, 0.340034, 25.613 kg (3 entries); lognormal variance with pedigree 0.096, pedigree (4,5,5,5,3)
  (same comment as for phosphate rock, beneficiated)
- gravel, crushed: 0.120474, 0.0110294, 0.551528, 2.11697 kg (4 entries); lognormal variance with pedigree 0.096, pedigree (4,5,5,5,3)
  (same comment as for gravel, crushed)

## Inputs from nature
- Water, unspecified natural origin [natural resource, in water]: 0.01 m3; name water_UNO_input; lognormal variance with pedigree 0.192, pedigree (3,5,5,5,5)
  Estimation
  Uncertainty: estimation
- Water, cooling, unspecified natural origin [natural resource, in water]: 0.024 m3; name water_cooling_UNO_input; lognormal variance with pedigree 0.21, pedigree (5,5,5,5,4)
  Estimated with data from a chemical plant
  Uncertainty: estimated with data from a chemical plant

## Emissions to nature
- Particulates, > 2.5 um, and < 10um [air, urban air close to ground]: 2.5e-6 kg; lognormal variance with pedigree 0.216, pedigree (4,5,5,5,3)
  According to quantitative information in Ullmann's
  Uncertainty: according to quantitative information in Ullmann's
- Chlorine [air, urban air close to ground]: 1.25e-6 kg; lognormal variance with pedigree 0.136, pedigree (4,5,5,5,3)
  (same comment as for Particulates, > 2.5 um, and < 10um)
- Carbon dioxide, fossil [air, urban air close to ground]: 0.003 kg; lognormal variance with pedigree 0.096, pedigree (4,5,5,5,3)
  (same comment as for Particulates, > 2.5 um, and < 10um)
- Water [water, unspecified]: 0.0213 m3; name water_to_water_unspecified; lognormal variance with pedigree 0.0827, pedigree (2,2,5,5,1)
  Calculated value based on literature values and expert opinion. See comments in the parametres' comment field.
  property fraction, origin: salt water 0; name fraction_origin_salt_water_Ww
  property fraction, origin: unspecified 1; name fraction_origin_unspecified_Ww
  property fraction, origin: fresh water 0; name fraction_origin_fresh_water_Ww
  property dry mass 0 kg; name DM
  property carbon content, non-fossil 0; name C_content_non_fossil
  property water in wet mass 1000 kg; name WWM
  property wet mass 1000 kg; name WM
  property carbon content, fossil 0; name C_content_fossil
- Phosphorus [air, urban air close to ground]: 1.09e-6 kg; lognormal variance with pedigree 0.136, pedigree (4,5,5,5,3)
  (same comment as for Particulates, > 2.5 um, and < 10um)
- Water [air, unspecified]: 0.0127 m3; name water_to_air_unspecified; lognormal variance with pedigree 0.0827, pedigree (2,2,5,5,1)
  (same comment as for Water)
  property fraction, origin: salt water 0; name fraction_origin_salt_water
  property fraction, origin: unspecified 1; name fraction_origin_unspecified
  property fraction, origin: fresh water 0; name fraction_origin_fresh_water
- Particulates, > 10 um [air, urban air close to ground]: 2.5e-6 kg; lognormal variance with pedigree 0.136, pedigree (4,5,5,5,3)
  (same comment as for Particulates, > 2.5 um, and < 10um)
- Fluorine [air, urban air close to ground]: 6.25e-7 kg; lognormal variance with pedigree 0.136, pedigree (4,5,5,5,3)
  (same comment as for Particulates, > 2.5 um, and < 10um)
- Methane, fossil [air, urban air close to ground]: 0.003 kg; lognormal variance with pedigree 0.216, pedigree (4,5,5,5,3)
  (same comment as for Particulates, > 2.5 um, and < 10um)
- Particulates, < 2.5 um [air, urban air close to ground]: 7.5e-6 kg; lognormal variance with pedigree 0.396, pedigree (4,5,5,5,3)
  (same comment as for Particulates, > 2.5 um, and < 10um)
- Carbon monoxide, fossil [air, urban air close to ground]: 0.263 kg; lognormal variance with pedigree 0.736, pedigree (4,5,5,5,3)
  (same comment as for Particulates, > 2.5 um, and < 10um)

## Sampling procedure
Process data based on indications in Ullmann's encyclopedia.

## Extrapolations
This dataset has been copied from an original dataset covering the geography RER. The uncertainty has been adjusted accordingly.

## Review by Hans-Jörg Althaus 2003-07-09
Passed
