# cobalt sulfate production

Dataset: EcoSpold 2, unit process
Geography: CN
Time period: 2018-01-01 to 2021-12-31
Technology level: current
Classification: ISIC rev.4 ecoinvent: 2011:Manufacture of basic chemicals
Scenario: Business-as-Usual
System model: Allocation, cut-off by classification
Generated by: Eleonora Crenna
Published in: Dai, Q. 2018
Database: ecoinvent
isCopyrightProtected: true
accessRestrictedTo: 1

## General comment
This dataset represents the production of 1 kg cobalt (II) sulfate (CoSO4), battery grade. Cobalt sulfate is used in storage batteries, especially in the production of the precursor of the cathode active material in NMC/NCA families Li-ion batteries. Values for materials and energy demand are estimated from the plant in Tongxiang, Zhejiang province (China) by Dai et al. (2018). The Tongxiang plant produces other cobalt products, such as Co3O4 and CoO, via further processing of refined CoSO4. These further processing steps involve the use of additional material and energy consumption, which were ascribed by the authors of the life cycle inventory (Dai et al., 2018) to battery-grade CoSO4 production because it was not possible to separate the material and energy requirements belonging to battery-grade CoSO4 production from those of the whole plant. Therefore, the data in this dataset represents a conservative estimate. Infrastructure has been included as well.
Reference:
Dai, Q., C., K., & Elgowainy, A. (2018). Cobalt life cycle analysis update for the greet model (Tech. Rep.). Argonne, IL (United States): Argonne National Lab.(ANL).

## Included activities start
The activity starts with cobalt hydroxide and other materials entering the factory.

## Included activities end
The activity ends with the production of cobalt sulfate (CoSO4), battery grade, at factory gate.

## Geography
Values are estimated from the production at the plant in Tongxiang, Zhejiang province (China) and assumed to be representative of the production process in China.

## Technology
The process involves the treatment of cobalt hydroxide (Co(OH)2) with sulfuric acid (H2SO4) and disodium disulphite (Na2S2O5). The leached solution undergoes various precipitation steps to remove impurities. Evaporation and crystallization followed by filtration and drying will produce battery-grade CoSO4 crystals.
Reference:
Dai, Q., C., K., & Elgowainy, A. (2018). Cobalt life cycle analysis update for the greet model (Tech. Rep.). Argonne, IL (United States): Argonne National Lab.(ANL).

## Time period
The time period is from 2018 (year of the publication of data) and 2020 (year of the dataset)

## Reference product
- cobalt sulfate: 1 kg; name RP; By-product classification allocatable product; CPC 34240: Phosphates of triammonium; salts and peroxysalts of inorganic acids and metals n.e.c.; CAS 10124-43-3
  production volume 1.18353e8 kg; name PV_RP; = 45000000/58.93*154.99
    Approximation, possible overestimation. The PV is expressed in kg. In 2016, the Chinese production of refined cobalt was 45000 tonnes in terms of cobalt content (USGS, 2016. Minerals Yearbook - Cobalt. Table1. Available at: https://prd-wret.s3-us-west-2.amazonaws.com/assets/palladium/production/atoms/files/myb1-2016-cobal.pdf). CoSO4 MW= 154.99 g/mol; Co=58.93 g/mol
  property price 14.4024 EUR2005
    Calculated based on inputs: The price of the product has been calculated as a sum of the values of the material and energy inputs for this product. This value is therefore a rough estimation. It may underestimate the real price since there are additional expenses when producing any product. These expences can include for example labour costs, treatment of waste materials and profit for the producer. Please consider carefully whether this level of data quality is acceptable for your application.
  property cobalt content 0.380316; name RefProd_Co_content
    cobalt content on a dry matter basis
  property carbon content 0
    carbon content on a dry matter basis (reserved; not for manual entry)
  properties: dry mass 1 kg, carbon content, non-fossil 0, carbon content, fossil 0, wet mass 1 kg, water in wet mass 0 kg, water content 0, carbon allocation 0 kg

## Inputs from technosphere
- hazardous waste, for incineration: -1.00351 kg; name BP_waste; = ((cobalt_hydroxide + limestone + sulfuric_acid + hydrocloric_acid + kerosene + disodium) - RP - water_out * WM_water)*-1; lognormal variance with pedigree 0.2106, pedigree (5,5,5,5,5)
  Calculated value to obtain mass balance.
  production volume 1.18769e8 kg; = abs((BP_waste/RP)*PV_RP)
    Calculated from production volume of reference product using the relative outputs.
  property price 0 EUR2005; name BP_waste_price_EUR2005
  properties: heating value, net 17 MJ, carbon content, fossil 0.0178187, wet mass 1 kg, dry mass 1 kg
  note on heating value, net: Value taken from the general comment of the treatment dataset.
  note on carbon content, fossil: Tab A.6, ecoinvent v2.2 report 13_I. C content has been calculated after data in the tables, and then referred to 1 kg DM
- wastewater, average: -0.0188413 m3; name BP_water; = (Water_in)*-1; lognormal variance with pedigree 0.2106, pedigree (5,5,5,5,5)
  Calculated value to obtain mass balance.
  production volume 2.22992e6 m3; = abs((BP_water/RP)*PV_RP)
    Calculated from production volume of reference product using the relative outputs.
  property price 0 EUR2005; name BP_water_price_EUR2005
  properties: water content 2882.2, dry mass 0.346837 kg, wet mass 1000 kg
- limestone, crushed, washed: 0.0228134 kg; name limestone; = 0.06*(58.933/154.996); source Dai, Q. 2018; lognormal variance with pedigree 0.0034, pedigree (2,4,2,1,1)
  Calculated value from Dai et al. (2018). Original value: 0.06 ton/ton Co eq. Co MW = 58.933 g/mol; CoSo4 MW = 154.996 g/mol.
  properties: carbon content, fossil 0.117257, dry mass 0.998 kg, wet mass 1 kg, water content 0.00200401
  note on carbon content, fossil: Table 3.1, ecoinvent v2.2 report 7, part VII, pg 3. MW CaCO3=100, MW MgCO3=84. C content of limestone is 0.117257 kg/kg DM
- hydrochloric acid, without water, in 30% solution state: 0.535734 kg; name hydrocloric_acid; = 1.409*(58.933/154.996); source Dai, Q. 2018; lognormal variance with pedigree 0.0034, pedigree (2,4,2,1,1)
  Calculated value from Dai et al. (2018). Original value: 1.409 ton/ton Co eq. Co MW = 58.933 g/mol; CoSo4 MW = 154.996 g/mol. Hydrochloric acid is used to remove impurities from cobalt sulfate.
  properties: dry mass 1 kg, wet mass 1 kg, heating value, net 3.32 MJ
- sulfuric acid: 0.977172 kg; name sulfuric_acid; = 2.57*(58.933/154.996); source Dai, Q. 2018; lognormal variance with pedigree 0.0034, pedigree (2,4,2,1,1)
  Calculated value from Dai et al. (2018). Original value: 2.57 ton/ton Co eq. Co MW = 58.933 g/mol; CoSo4 MW = 154.996 g/mol. Sulfuric acid is used in reaction with cobalt hydroxide to produce cobalt sulfate.
  properties: dry mass 1 kg, wet mass 1 kg
- electricity, medium voltage: 1.152 kWh; source Dai, Q. 2018; lognormal variance with pedigree 0.0034, pedigree (2,4,2,1,1)
  Calculated value from Dai et al. (2018). Original value: 10.34 mmBTU/ton Co eq. Co MW = 58.933 g/mol; CoSo4 MW = 154.996 g/mol. Conversion factor: 1 mmBTU = 293.071 kWh
- kerosene: 0.0178705 kg; = 0.047*(58.933/154.996); source Dai, Q. 2018; lognormal variance with pedigree 0.0034, pedigree (2,4,2,1,1)
  Calculated value from Dai et al. (2018). Original value: 0.047 ton/ton Co eq. Co MW = 58.933 g/mol; CoSo4 MW = 154.996 g/mol.
  properties: dry mass 1 kg, wet mass 1 kg, carbon content, fossil 0.85, heating value, net 43 MJ
- disodium disulphite: 0.0304178 kg; name disodium; = 0.08*(58.933/154.996); source Dai, Q. 2018; lognormal variance with pedigree 0.0034, pedigree (2,4,2,1,1)
  Calculated value from Dai et al. (2018). Original value: 0.08 ton/ton Co eq. Co MW = 58.933 g/mol; CoSo4 MW = 154.996 g/mol.
  property dry mass 1 kg; name RefProd_DM
  property carbon content, fossil 0; name RefProd_C_content_fossil
  property wet mass 1 kg; name RefProd_WM
  property water content 0; name RefProd_water_content
  property carbon content, non-fossil 0; name RefProd_C_content_non_fossil
  property water in wet mass 0 kg; name RefProd_WWM
- cobalt hydroxide: 0.65196 kg; name cobalt_hydroxide; = 2.86*(58.933/154.996)*(92.926/154.996); source Dai, Q. 2018; lognormal variance with pedigree 0.0034, pedigree (2,4,2,1,1)
  Calculated value from Dai et al. (2018). Original value: 2.86 ton/ton Co eq. Co MW = 58.933 g/mol; CoSo4 MW = 154.996 g/mol. Cobalt hydroxide is used in reaction with sulfuric acid to produce cobalt sulfate.
  properties: price 23.76 EUR2005, wet mass 1 kg, dry mass 1 kg
- chemical factory, organics: 4e-10 unit; source Dai, Q. 2018; lognormal variance with pedigree 0.472, pedigree (3,5,5,5,5)
  Calculated based on literature data published by the industry. For this activity, no information was readily available concerning infrastructure and land-use. Therefore, the infrastructure is estimated based on data from two chemical factories, the BASF site of Ludwigshafen and the chemical factory in Gendorf (which are both located in Germany), which produce a wide range of chemical substances. Based on this data, the following assumptions are made: the built area amounts to about 4.2 ha, the plant has an average output of 50'000 t/a and a lifespan of fifty years. The estimated infrastructure amount is therefore 4.00 E-10 units per kg of produced chemical.
  References:
  Althaus H.-J., Chudacoff M., Hischier R., Jungbluth N., Osses M. and Primas A. (2007) Life Cycle Inventories of Chemicals. ecoinvent report No. 8, v2.0. EMPA Dübendorf, Swiss Centre for Life Cycle Inventories, Dübendorf, CH.
  Gendorf (2000) Umwelterklärung 2000, Werk Gendorf. Werk Gendorf, Burgkirchen.om ecoinvent)
- heat, district or industrial, natural gas: 10.7689 MJ; source Dai, Q. 2018; lognormal variance with pedigree 0.0034, pedigree (2,4,2,1,1)
  Calculated value from Dai et al. (2018). Original value: 26.838 mmBTU/ton Co eq. Co MW = 58.933 g/mol; CoSo4 MW = 154.996 g/mol. Conversion factor: 1 mmBTU = 1,055.055853 MJ
  properties: heating value, net 1 MJ

## Inputs from nature
- Water, cooling, unspecified natural origin [natural resource, in water]: 0.0188413 m3; name Water_in; = 13092*(58.933/154.996)*3.785*10^(-6); source Dai, Q. 2018; lognormal variance with pedigree 0.0034, pedigree (2,4,2,1,1)
  Calculated value from Dai et al. (2018). Original value: 13092 gal/ton Co eq. Co MW = 58.933 g/mol; CoSo4 MW = 154.996 g/mol. Conversion factor: 1 gal = 3.785 kg

## Emissions to nature
- Water [water, unspecified]: 0.000232458 m3; name water_out; = ((18.015*2)/154.996)/1000; lognormal variance with pedigree 0.25, pedigree (5,5,5,5,5)
  Calculated value to get mass balance, based on stoichiometry. Water emissions from the reaction of Co(OH)2 + H2SO4 --> CoSO4 + 2H2O. The reaction involves a precipitation step, with separation between solid (cobalt sulfate) and liquid (water). CoSO4 MW = 154.996 g/mol; H2O MW = 18.015 g/mol.
  property wet mass 1000 kg; name WM_water

## Sampling procedure
From Literature.

## Extrapolations
This dataset has been extrapolated from year 2020 to the year of the calculation (2021). The uncertainty has been adjusted accordingly.
