# gold mine operation and gold production, unrefined

Dataset: EcoSpold 2, unit process
Geography: ZA
Time period: 2012-01-01 to 2021-12-31
Technology level: current
Classification: ISIC rev.4 ecoinvent: 0729:Mining of other non-ferrous metal ores
Synonyms: gold dore; crude gold
Scenario: Business-as-Usual
System model: Allocation, cut-off by classification
Share of production covered: 73 %
Generated by: Russo
Published in: Charikinya E. 2017
Database: ecoinvent
isCopyrightProtected: true
accessRestrictedTo: 1

## General comment
This dataset represents the activity of gold production in both underground and surface (open pits) mines in South Africa. The production volume reported , as well as all other inputs/outputs fro the activity itself represent an average gold mining site and don't refer to a specific one. Data was taken from 2015 operational and environmental reports of four different companies, namely: AngloGold Ashanti, Harmony, Sibanye and GoldFields. The annual production volume of the companies investigated accounts for the 73% of the total annual production for the same year (2015).

## Included activities start
The dataset refer to the following phases of the gold production value chain: mining and concentration. The activity starts with the mining of the raw material and the transport of the mined ore to the concentration plant.

## Included activities end
Gold extraction is also included in this activity since it is very much part of gold production and the output from mine sites is an unrefined gold product, hence the dataset covers from the mining of the ore to the production of this unrefined gold. In this way cyanidation extraction and metal recovery are really part of the concentration process which ends with the produciton of unrefined gold that is sent to the following phase (extraction) also included in this dataset. Gold refining to market products takes place at (mostlyy)Rand Refinery plant which is co-owned by the major mining companies and it is out of the scope of this dataset.

## Geography
Most of the mining operation and unrefined gold production activities are in an area called Witwatersrand basin. The are is approximately 350 km long and 200 km wide. the gold mines in this area are possiblu the deepest in the world (mining operation at 3600 m and explortion core-drilling up to 4600 m. Peak gold production occurred in 1970 when over 1000 metinc tonnes were mined.

## Technology
OPERATIONS:
Operations span over four different companies, namely AngloGoldAshanti Ltd., GoldFields, Harmony and Sibanye; they mostly lay in the Witwatersrand Basin Area.
AngloGoldAshanty – AngloGold Ashanti’s South Africa Region comprises four deep-level mines located at the Vaal River and West Wits operations. The Vaal River mining operations include two mine sites - Kopanang has a single shaft system to a depth of 2,334m; it exploits the Vaal Reef almost exclusively; Moab Khotsong has a single shaft system mining to a depth of 3,100m - and a share milling and treatment circuit. The West Wits operations are: Mponeng Mine is the world’s deepest gold mine, and extracts the Ventersdorp Contact Reef (VCR) via a twin-shaft system at depths of between 2 800m and 3 400m below surface. Ore is treated and smelted at the mine’s gold plant; and TauTona Mine makes use of a three-shaft system and predominantly extracts the Carbon Leader Reef (CLR), and the VCR on a smaller scale through the use of technology; TauTona mines at depths of between 2 700m and 3 300m below surface.
GoldFileds – Intermediate to deep-level gold mine (> 2,000m below surface) exploiting auriferous palaeoplacers (reefs), namely the conglomerates that comprise the Upper Elsburg Reefs of the Mondeor Formation and the Ventersdorp Contact Reef (VCR). South Deep Gold Mine. The workings are accessed from the surface through two shaft systems (main and ventilation shafts), of which the main shaft comprises a single-drop to a depth of 2,998m, the vent shaft to 2,947m and the South Shaft Complex, which is a subvertical system (four shafts) to 95 level at a depth of 2,786m. South Deep Gold Mine utilises one tailings storage facility (TSF) known as the Doornpoort TSF. The TSF footprint is designed to accommodate the LoM tonnage excluding backfill. South Deep Gold Mine operates one on-property gold plant. The comminution circuit comprises two stage milling with a free gold recovery circuit. Gold recovery is carried out using a conventional leach/carbon-in-pulp (CIP) circuit.
Harmony – It comprises Nine underground mines (Bambani, Doornkop, Joel, Kusasalethu, Masimong, Pakhisa, Target 1, Tshepong, Unisel and one open-pit Kalgold.
Bambanani, has two surface shafts: mining is conducted at a depth of 2 365 metres. Activities at the mine focus on the Basal Reef and are limited to shaft pillar extraction. The ore mined is sent to Harmony One Plant for processing.
Doornkop is a single-shaft operation and mining is conducted at a depth of 1 978 metres. The operation focuses on narrow-reef conventional mining of the South Reef. The ore from the operation is processed at the Doornkop plant.
Joel mine comprises two shafts, the North and South shafts. The primary economical reef horizon at Joel is a narrow tabular Beatrix Reef deposit which is accessed via conventional grid development. Mining is conducted at a depth of 1 452 metres. The ore is processed at the Joel plant.
Kusasalethu mines the Ventersdorp Contact Reef as its main ore body. The mine comprises twin vertical and twin sub-vertical shaft systems and uses conventional mining methods in a sequential grid layout. Mining is conducted at a depth of 3 388 metres, making it Harmony’s deepest mine. Ore mined is treated at the Kusasalethu plant.
Masimong complex comprises an operating shaft (5 shaft), and a second shaft (4 shaft), which, although closed for mining, is used for ventilation, pumping and as a second outlet. Masimong exploits the Basal Reef and the B Reef. Mining is conducted at a depth of 2 050 metres. Ore mined is processed at the Harmony One plant.
Phakisa mine has two shafts, the main Phakisa shaft and the Nyala shaft. Phakisa exploits the Basal Reef. Mining is conducted at a depth of 2 426 metres. Ore mined is processed at the Harmony One plant.
Target 1 mining operations comprise one primary underground mine, with a depth of approximately 2 945 metres. While most of the ore extracted comes from mechanised mining (massive mining techniques), conventional stoping is still employed primarily to de-stress areas ahead of mechanised mining. Ore mined is processed at the Target plant.
Tshepong mining is conducted at a depth of 2 349 metres. The mine uses conventional undercut mining in the Basal Reef while the B Reef is exploited as a high grade secondary reef. Ore mined is processed at the Harmony One plant.
Unisel mining is conducted at a depth of 2 153 metres below surface. Conventional scattered mining and pillar reclamation takes place to access the Basal, Leader and, to a lesser extent, the Middle reefs. Ore mined is processed at Harmony One plant.
Kalgold is an open-pit mine: mining takes place from the A Zone pit. Ore mined from the pit is processed at a carbon-in-leach plant located at Kalgold.
Sibanye – It comprises two main complexes: Beatrix and Kloof.
Beatrix complex consists principally of underground mine with nominal surface reserves represented by surface rock dumps (SRDs) accumulated during the operating history of the mine. Current mine infrastructure consists of three producing shaft complexes. Mining is focused on open ground and pillars of differing reef horizons with the deepest operating level some 2,055m below surface. Beatrix makes use of two gold processing plants, both treating underground and surface material.
Kloof operations is a complex of intermediate to ultra-deep-level mines, predominantly mining the Ventersdorp Contact Reef, at depths of between 1,300m and 3,350m below surface. Kloof's operations comprise five producing shaft systems and two metallurgical gold plants.
Kloof Plant 1 comprises three-stage crushing, open-circuit rod mills for primary grinding and closed-circuit pebble mills for secondary milling. This is followed by cyanide leaching, filtration, zinc precipitation and smelting. Kloof Plant 2 currently treats all of Kloof's underground ore. Reef is trucked and conveyed to a central stacker pad, which feeds two SAG mills equipped with variable-speed ring motor drives. Milling is followed by cyanide leaching, CIP and treatment at an independent elution and smelting facility. The elution facility was upgraded in June 2001 and again in October 2003 to process loaded carbon from KP1 and the former KP3 (Libanon) plant. The upgrade included the installation of continuous electro-winning sludge reactors.
REFERENCES:
AngloGlodAshanti Limited, Integrated Report, 2016
AngloGlodAshanti Limited, Sustainable Development Report, 2016
AngloGoldAshanti Limited, Vaal River Operational Report, 2016
AngloGoldAshanti Limited, West Wits Operational Report, 2016
GoldFields, Integrated Annual Report, 2016
GoldFields, GRI G4 Content Index, 2016
Harmony, Integrated Annual Report, 2016
Harmony, Operational Performance, 2016
SibanyeGold, Integrated Annual Report, 2016

## Time period
Companies environental and operational reports, years 2015 and 2016

## Parameters
- water used in primary activity: 1013.41 m3; name totWaterPA; = water_well_in_ground_input+(potable_water/1000)+water_surface; lognormal variance with pedigree 0.0001, pedigree (1,2,1,1,1)
  This is the sum of the all source of water (ground, surface and tap/municipal) used in the production of unrefined gold.
- fraction, process water, to air: 0.15 dimensionless; name fraction_PW_to_air; lognormal variance with pedigree 0.092025, pedigree (4,4,3,2,4)
  Literature value. In case when no industry/process specific data are available, default evaporation fraction value is used. This value is 15% and is based on literature (Statistics Canada, 2007 & Shaffer, K.H., 2008, Consumptive water use in the Great Lakes Basin, USGS & Shiklomanov, 2003, World Water Resources at the Beginning of the 21st Century) and has been approved by an expert.

## Reference product
- gold, unrefined: 1 kg; name RP; By-product classification allocatable product; CPC 4132: Gold (including gold plated with platinum), unwrought or in semi-manufactured forms, or in powder form; CAS 7440-57-5
  Unrefined gold (85% pure); synonims are gold dore, crude gold. Dore refers to an unrefined (therefore impure) alloy of gold with variable quantities of silver and smaller quantities of base metals, which is produced at a mine berfore passing on to a refinery for upgrading toLondon Good Delivery Standard.
  production volume 107000 kg; name RP_PV
    Total annual production for the year of reference; it has been calculated as the sum of the Annual Production Volumes of the four companies in the year of reference (2015) AngloGlodAshanti Limited, Integrated Report, 2016
    AngloGlodAshanti Limited, Sustainable Development Report, 2016
    AngloGoldAshanti Limited, Vaal River Operational Report, 2016
    AngloGoldAshanti Limited, West Wits Operational Report, 2016
    GoldFields, Integrated Annual Report, 2016
    GoldFields, GRI G4 Content Index, 2016
    Harmony, Integrated Annual Report, 2016
    Harmony, Operational Performance, 2016
    SibanyeGold, Integrated Annual Report, 2016
  property price 21359.1 EUR2005; name RP_price_EUR2005
    Assuming a gold content of 85%, price calculated as 5-year market average (2015-2019; USD/kg; USGS [2020]) of Au amount and converted to EUR2005 (USD2019/EUR2005 exchange rate: 0.62; Official Data Foundation [2020] and Macrotrends [2020]).
    References:
    Official Data Foundation (2020). Inflation Calculator [Online]. Available from: https://www.officialdata.org/us/inflation/2005?endYear=2019&amount=1 [Accessed 28/07/2020]
    USGS (2020). Mineral Commodity Summaries 2020 [Online]. Available from: https://pubs.usgs.gov/periodicals/mcs2020/mcs2020.pdf [Accessed 28/07/2020]
    Macrotrends (2020). Euro Dollar Exchange Rate (EUR USD) - Historical Chart [Online]. Available from: https://www.macrotrends.net/2548/euro-dollar-exchange-rate-historical-chart [Accessed 28/07/2020]
  property carbon content 0
    carbon content on a dry matter basis (reserved; not for manual entry)
  properties: wet mass 1 kg, water in wet mass 0 kg, gold content 0.85, carbon content, non-fossil 0, dry mass 1 kg, carbon content, fossil 0, water content 0, carbon allocation 0 kg

## By-products
- sulfidic tailing, off-site, high gold content: 0 kg; By-product classification Recyclable; CPC 39331: Waste and scrap of gold or of metal clad with gold; pedigree (1,1,1,1,1)
  Calculated value from companies annual reports and scaled down to refer to 1 kg of unrefined gold produced. It represent the 77% of the all sulfidc tailing which are sent to retreatment to produce unrefined gold. This represents the gold wastes whose gold content make it feasible to be further processed to recover gold from old mine dupms at a recovery rate that varies depending on the material being treated
  production volume 0 kg; = ByP_02/RP*RP_PV
    Calculated from production volume of reference product using the relative outputs.
  property dry mass 0.7 kg; name dry_mass_ST
  property price 0 EUR2005; name ByP_02_price_EUR2005
    Assumed without economic value
  property gold content 0.0406686; = 0.028468/dry_mass_ST
    grade of gold in the sulfidic tailing, off-site, high gold content is 0.028468 gr/tonne; the results has been adjusted on a dry mass basis
  property carbon content 0
    carbon content on a dry matter basis (reserved; not for manual entry)
  properties: water content 0.42857, carbon content, fossil 0, wet mass 1 kg, water in wet mass 0.3 kg, carbon content, non-fossil 0, carbon allocation 0 kg

## Inputs from technosphere
- charcoal: 3.8349 kg; lognormal variance with pedigree 0.042625, pedigree (3,3,5,2,1)
  Calculated value.
  Proxy: Carbon is approximated with 'charcoal'.
  Uncertainty: E
  properties: carbon content, non-fossil 0.8, dry mass 1 kg, wet mass 1 kg, heating value, net 28.4 MJ
  note on heating value, net: Indicative value. Reference: Fuels - Higher and Lower Calorific Values, available at: https://www.engineeringtoolbox.com/fuels-higher-calorific-values-d_169.html
- sodium cyanide: 213.28 kg; source Placer Dome Inc. 2002; triangular min 135.01, mostLikely 213.28, max 409.13, pedigree (2,2,3,1,1)
  Calculated value from companies annual reports and scaled down to refer 1 kg of unrefined gold produced
  Proxy: Cyanide is approximated with 'sodium cyanide'.
  properties: heating value, net 7.43 MJ, carbon content, fossil 0.244898, dry mass 1 kg, wet mass 1 kg
- lubricating oil: 46.7916 kg; name LubOil; triangular min 25.7965, mostLikely 46.7916, max 72.9018, pedigree (2,3,3,1,1)
  Calculated value from companies annual reports and scaled down to refer 1 kg of unrefined gold produced. It accounts for lubricating oils and grease used within the plant. A density of 0.9 kg/m3 was used to convert volumes into mass. Usual range for lubricating oil and grease is 0,85/0,95 kg/m3.
  properties: carbon content, fossil 0.75, heating value, net 40.2 MJ, wet mass 1 kg, dry mass 1 kg
  note on carbon content, fossil: Lubricating oil is produced from diesel. C-content/dry mass of fats and oils considered 75%, from: ecoinvent v2.2 report, n 15a, pg 40
  note on heating value, net: Literature value, Source: IPCC 2006, 2006 IPCC Guidelines for National Greenhouse Gas Inventories, Prepared by the National Greenhouse Gas Inventories Programme, Eggleston H.S., Buendia L., Miwa K., Ngara T. and Tanabe K. (eds). Published: IGES, Japan
- fatty alcohol: 4.6019 kg; source Placer Dome Inc. 2002; lognormal variance with pedigree 0.0427, pedigree (3,3,5,3,1)
  Proxy: Organic compounds such as flocculant / flotation / magnafloc 351 are approximated with 'fatty alcohol'.
  Uncertainty: E
  properties: carbon content, fossil 0.0408973, carbon content, non-fossil 0.743434, dry mass 1 kg, wet mass 1 kg, heating value, net 41.01 MJ
  note on carbon content, fossil: Fatty alcohols have chain lengths between C6 and C22, their chemical formula is CH3(CH2)nCH2OH (ecoinvent v2.2 report 12, pg 16). As an average, C14 was used. The dataset represents a mix of 27% produced from fatty acid splitting and 73% produced from methyl ester (ecoinvent v2.2 report 12, pg 21). In the methyl esterification, methanol (CH3OH) has a fossil origin
- blasting: 172.78 kg; triangular min 109.04, mostLikely 172.78, max 290.2, pedigree (2,2,3,1,1)
  Calculated value from companies annual reports and scaled down to refer 1 kg of unrefined gold produced.
- mine infrastructure, gold: 1.3945e-6 unit; lognormal variance with pedigree 0.3127, pedigree (1,2,3,1,2)
  Estimation from dataset author.
  Uncertainty: C
- hydrochloric acid, without water, in 30% solution state: 272.77 kg; source Placer Dome Inc. 2002; triangular min 92.39, mostLikely 272.77, max 3003.51, pedigree (2,2,3,1,1)
  Calculated value from companies annual reports and scaled down to refer 1 kg of unrefined gold produced
  properties: wet mass 1 kg, dry mass 1 kg, heating value, net 3.32 MJ
- electricity, medium voltage: 83442.8 kWh; source Placer Dome Inc. 2002; triangular min 75675.3, mostLikely 83442.8, max 113440, pedigree (1,2,3,1,1)
  Calculated value from companies reports (Energy Used) and scaled down to refer 1 kg of unrefined gold produced. Only one company reports that part of the total electricity used was generetad from liqiud fossil fuel< this is has been calculated to be the 2.89%
- lime, packed: 1240.95 kg; source Placer Dome Inc. 2002; lognormal variance with pedigree 0.0021, pedigree (1,2,3,1,1)
  Calculated value from companies annual reports and scaled down to refer 1 kg of unrefined gold produced
  Uncertainty: C
  properties: carbon content, fossil 0.117492, wet mass 1 kg, dry mass 0.998 kg, water content 0.00200401
  note on carbon content, fossil: Table 3.1, ecoinvent v2.2 report 7, part VII, pg 3. MW CaCO3=100, MW MgCO3=84
- sulfidic tailings, from gold mine operation: -138547 kg; name ByP_01; source Classen M. 2009; lognormal variance with pedigree 0.0032, pedigree (2,1,3,1,1)
  Calculated value from companies annual reports and scaled down to refer to 1 kg of unrefined gold produced. It represent the 23% of the all sulfidc tailing which are sent to disposal.
  Proxy: Disposal is approximated with 'sulfidic tailing, off-site'.
  Uncertainty: C
  production volume 1.48245e10 kg; = (ByP_01/RP)*RP_PV
    Calculated from production volume of reference product using the relative outputs.
  property price 0 EUR2005; name ByP_01_price_EUR2005
  properties: wet mass 1 kg, calcium content 0.0037589, potassium content 0.0031243, oxygen content 0.88758, silicon content 0.056714, iron content 0.014628, aluminium content 0.017079, fluorine content 0.0011041, dry mass 0.7 kg, water content 0.428571, sodium content 0.0014916, magnesium content 0.0020127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
- sodium hydroxide, without water, in 50% solution state: 208.57 kg; source Placer Dome Inc. 2002; triangular min 71.61, mostLikely 208.57, max 1923.38, pedigree (2,3,3,1,1)
  Calculated value.
  Proxy: Caustic is approximated with 'sodium hydroxide, without water, in 50% solution state'.
  properties: dry mass 1 kg, heating value, net 3.03 MJ, wet mass 1 kg
- tap water: 154207 kg; name potable_water; triangular min 30357.1, mostLikely 154207, max 269581, pedigree (2,1,3,1,1)
  Calculated value from companies annual reports and scaled down to refer 1 kg of unrefined gold produced. Tap water refers to both potable and non/potable water from external sources.
  properties: carbon content, fossil 0.00178991, water content 2962.17, dry mass 0.000337476 kg, wet mass 1 kg
  note on carbon content, fossil: Bicarbonate content is 2.93 mol/m3. CO2 content is 0.1 mol/m3 (ecoinvent v2.2 report 8, Tab 93.1).
- zinc: 2.8946 kg; source Placer Dome Inc. 2002; lognormal variance with pedigree 0.0432, pedigree (3,3,5,4,1)
  Calculated value: Data was obtained from Australian mining, scaled by processed gold.
  Further references:
  Stewart M. (1999) Environmental Life Cycle Considerations for Design-Related Decision Making in Minerals Processing. PhD Thesis. University of Cape Town, Cape Town.
  Uncertainty: C
  properties: wet mass 1 kg, dry mass 1 kg
- diesel, burned in building machine: 8155.83 MJ; source Placer Dome Inc. 2002; triangular min 1369, mostLikely 8155.83, max 26686.4, pedigree (2,2,3,1,1)
  Companies report fossil fuel il KL. It was assumed all liquid fossil fuel to be diesel. The value of LFF given in KL has been converted in in Kg using the density conversion factor (0.84 kg/l). This value in kg was then converted to MJ using the gross calorific conversion factor (45.4 MJ/kg). The total value has been scaled down to refer 1 kg of unrefined gold produced.
  properties: heating value, net 1 MJ
- sulfidic tailing, off-site, high gold content: -463830 kg; lognormal variance with pedigree 0.0032, pedigree (2,1,3,1,1)
  (same comment as for sulfidic tailing, off-site, high gold content)
  production volume 4.96298e10 kg
  properties: water content 0.42857, wet mass 1 kg, gold content 0.0406686
  note on gold content: grade of gold in the sulfidic tailing, off-site, high gold content is 0.028468 gr/tonne; the results has been adjusted on a dry mass basis

## Inputs from nature
- Gold, in ground [natural resource, in ground]: 1.1398 kg; triangular min 1.08108, mostLikely 1.1398, max 1.21013, pedigree (2,1,3,1,1)
  3.89 gr/tonne: data from enviromental and sustainable reports of the companies investigated in the year of reference (2015):
  AngloGlodAshanti Limited, Integrated Report, 2016
  AngloGlodAshanti Limited, Sustainable Development Report, 2016
  AngloGoldAshanti Limited, Vaal River Operational Report, 2016
  AngloGoldAshanti Limited, West Wits Operational Report, 2016
  GoldFields, Integrated Annual Report, 2016
  GoldFields, GRI G4 Content Index, 2016
  Harmony, Integrated Annual Report, 2016
  Harmony, Operational Performance, 2016
  SibanyeGold, Integrated Annual Report, 2016
- Gangue, in ground [natural resource, in ground]: 256753 kg; lognormal variance with pedigree 0.0041, pedigree (3,2,3,1,1)
  Milled ore containg gold with a grade of 4.35 gr/tonne.
  Uncertainty: M
- Water, river [natural resource, in water]: 183.78 m3; name water_surface; triangular min 135.55, mostLikely 183.78, max 269.87, pedigree (1,2,3,1,1)
  (same comment as for blasting)
- Water, well, in ground [natural resource, in water]: 675.42 m3; name water_well_in_ground_input; triangular min 247.05, mostLikely 675.42, max 1820.4, pedigree (2,1,3,1,1)
  (same comment as for blasting)

## Emissions to nature
- Mercury [water, surface water]: 0.00062039 kg; source Placer Dome Inc. 2002; lognormal variance with pedigree 0.7106, pedigree (3,3,5,1,3)
  Calculated value: Amount is based in data from older Environmental report, scaled by milled ore (see source).
  Uncertainty: E
- Zinc, ion [water, surface water]: 0.04611 kg; source Placer Dome Inc. 2002; lognormal variance with pedigree 0.7286, pedigree (5,3,5,1,3)
  (same comment as for Mercury)
- Carbon dioxide, fossil [air, non-urban air or from high stacks]: 33.23 kg; source Newmont 2005; triangular min 18.54, mostLikely 33.23, max 113.8, pedigree (2,1,3,1,1)
  Calculated value. This represents CO2 emissions only from explosives (blasting): they have been calculated with the factor of the mines of Newmont (0.17 kg CO2 per kg explosive). The CO2 emission from burning of fuels is accounted for in the supply chain of this dataset - diesel burned in building machine (MJ).
- Water [water, unspecified]: 861.396 m3; name water_to_water_unspecified; = totWaterPA*(1-fraction_PW_to_air); lognormal variance with pedigree 0.0427, pedigree (2,2,3,1,1)
  Calculated value based on literature values and expert opinion. See comments in the parametres' comment field.
  Uncertainty: C
  property water in wet mass 1000 kg; name WWM
  property fraction, origin: fresh water 1; name fraction_origin_fresh_water_Ww
  property carbon content, non-fossil 0; name C_content_non_fossil
  property dry mass 0 kg; name DM
  property fraction, origin: salt water 0; name fraction_origin_salt_water_Ww
  property fraction, origin: unspecified 0; name fraction_origin_unspecified_Ww
  property wet mass 1000 kg; name WM
  property carbon content, fossil 0; name C_content_fossil
- Cadmium [air, non-urban air or from high stacks]: 2.2978e-5 kg; source Placer Dome Inc. 2002; lognormal variance with pedigree 0.6552, pedigree (3,3,3,4,1)
  Calculated value: Data was obtained from Australian mining, scaled by milled ore.
  Further references:
  Stewart M. (1999) Environmental Life Cycle Considerations for Design-Related Decision Making in Minerals Processing. PhD Thesis. University of Cape Town, Cape Town.
  Uncertainty: C
- Copper, ion [water, surface water]: 0.030684 kg; source Placer Dome Inc. 2002; lognormal variance with pedigree 0.3606, pedigree (3,3,5,1,3)
  (same comment as for Mercury)
- Lead [water, surface water]: 0.0036888 kg; source Placer Dome Inc. 2002; lognormal variance with pedigree 0.7106, pedigree (3,3,5,1,3)
  (same comment as for Mercury)
- Oils, unspecified [soil, industrial]: 35.0937 kg; = LubOil*0.75; triangular min 19.3474, mostLikely 35.0937, max 54.6764, pedigree (2,3,3,1,1)
  Emission to soil from the use of Luricating and hydraulic oils. It has been estimated that approximaly 70-80 % of hydraulic oils leave the system due to leakage, spill, line and hose breakage and fitting failures. www.machinerylubrication.com
- Chromium [air, non-urban air or from high stacks]: 0.0037554 kg; source Placer Dome Inc. 2002; lognormal variance with pedigree 0.6932, pedigree (3,3,5,4,1)
  (same comment as for Cadmium)
- Selenium [air, non-urban air or from high stacks]: 0.011952 kg; source Placer Dome Inc. 2002; lognormal variance with pedigree 0.6938, pedigree (3,3,5,4,2)
  (same comment as for Cadmium)
- Antimony [air, non-urban air or from high stacks]: 0.00016114 kg; source Placer Dome Inc. 2002; lognormal variance with pedigree 0.694, pedigree (3,4,5,1,1)
  Calculated value: Data was obtained from Australian mining, scaled by milled ore.
  Further references:
  Stewart M. (1999) Environmental Life Cycle Considerations for Design-Related Decision Making in Minerals Processing. PhD Thesis. University of Cape Town, Cape Town.
  Uncertainty: E
- Arsenic, ion [water, surface water]: 0.0055332 kg; source Placer Dome Inc. 2002; lognormal variance with pedigree 0.7106, pedigree (3,3,5,1,3)
  (same comment as for Mercury)
- Cobalt [air, non-urban air or from high stacks]: 0.00065064 kg; source Placer Dome Inc. 2002; lognormal variance with pedigree 0.6946, pedigree (3,3,5,5,1)
  (same comment as for Cadmium)
- Nitrogen oxides [air, non-urban air or from high stacks]: 22.8222 kg; triangular min 12.9356, mostLikely 22.8222, max 270.731, pedigree (2,2,3,1,1)
  (same comment as for blasting)
- Nickel, ion [water, surface water]: 0.070088 kg; source Placer Dome Inc. 2002; lognormal variance with pedigree 0.7106, pedigree (3,3,5,1,3)
  (same comment as for Mercury)
- Cadmium, ion [water, surface water]: 0.00062039 kg; source Placer Dome Inc. 2002; lognormal variance with pedigree 0.3606, pedigree (3,3,5,1,3)
  (same comment as for Mercury)
- Lead [air, non-urban air or from high stacks]: 0.00018263 kg; source Placer Dome Inc. 2002; lognormal variance with pedigree 0.7098, pedigree (4,3,5,4,2)
  (same comment as for Antimony)
- Cyanide [water, surface water]: 0.30684 kg; source Placer Dome Inc. 2002; lognormal variance with pedigree 0.3606, pedigree (3,3,5,1,3)
  (same comment as for Mercury)
- Manganese [air, non-urban air or from high stacks]: 0.020341 kg; source Placer Dome Inc. 2002; lognormal variance with pedigree 0.6952, pedigree (3,3,5,5,2)
  (same comment as for Cadmium)
- Mercury [air, non-urban air or from high stacks]: 0.010467 kg; source Placer Dome Inc. 2002; lognormal variance with pedigree 0.7106, pedigree (4,3,5,5,1)
  (same comment as for Antimony)
- Arsenic [air, non-urban air or from high stacks]: 0.0073967 kg; source Placer Dome Inc. 2002; lognormal variance with pedigree 0.7106, pedigree (4,3,5,5,1)
  (same comment as for Antimony)
- Beryllium [air, non-urban air or from high stacks]: 0.00043372 kg; source Placer Dome Inc. 2002; lognormal variance with pedigree 0.6938, pedigree (3,3,5,4,2)
  (same comment as for Cadmium)
- Water [air, unspecified]: 152.011 m3; name water_to_air_unspecified; = (totWaterPA*fraction_PW_to_air); lognormal variance with pedigree 0.0427, pedigree (2,2,3,1,1)
  (same comment as for Water)
  property fraction, origin: unspecified 0; name fraction_origin_unspecified
  property fraction, origin: salt water 0; name fraction_origin_salt_water
  property fraction, origin: fresh water 1; name fraction_origin_fresh_water
- Sulfur oxides [air, unspecified]: 22.2291 kg; triangular min 10.4448, mostLikely 22.2291, max 91.3708, pedigree (2,2,3,1,1)
  (same comment as for blasting)

## Sampling procedure
Operational and environmental companies reports: AngloGlodAshanti Limited, Integrated Report, 2016
AngloGlodAshanti Limited, Sustainable Development Report, 2016
AngloGoldAshanti Limited, Vaal River Operational Report, 2016
AngloGoldAshanti Limited, West Wits Operational Report, 2016
GoldFields, Integrated Annual Report, 2016
GoldFields, GRI G4 Content Index, 2016
Harmony, Integrated Annual Report, 2016
Harmony, Operational Performance, 2016
SibanyeGold, Integrated Annual Report, 2016

## Extrapolations
This dataset has been extrapolated from year 2016 to the year of the calculation (2021). The uncertainty has been adjusted accordingly.
