# wind turbine network connection construction, 750kW, onshore

Dataset: EcoSpold 2, unit process
Geography: RoW
Time period: 2008-01-01 to 2021-12-31
Technology level: modern
Classification: ISIC rev.4 ecoinvent: 2811:Manufacture of engines and turbines, except aircraft, vehicle and cycle eng
Synonyms: grid connection
Tags: wind power; infrastructure
Scenario: Business-as-Usual
System model: Allocation, cut-off by classification
Generated by: Pablo Tirado
Published in: Elsam Engineering A/S,Fredericia,Denmark 2004
Database: ecoinvent
isCopyrightProtected: true
accessRestrictedTo: 1

## General comment
This dataset represents the construction of the network connection for an on-shore wind turbine with 750kW capacity. This dataset is an extrapolation from the 2MW connection dataset.
This connection connects one turbine to the electricity network.
The main components of a network connection of a wind turbine are the cables, the transformer and the sub-station with the circuit breaker and the electricity meter inside it. According to (European Communities 2001), electricity produced with wind turbines is connected to medium voltage or high voltage systems, depending on the size of the windfarm.

Sources:
European Communities. 2001. Wind Turbine Grid Connection and Interaction. Deutsches Windenergie-Institut /Tech-wise A/S /DM Energy, p. 7 Tab.2.1

## Included activities start
From the transformation of pasture land to industrial site, and from the reception and treatment of building materials.

## Included activities end
This activity ends with the decommissioning of the network connection and the treatment of the resulting materials at the end of the lifetime.

This dataset includes
- all main materials for the construcion of the network connection and their treatment
- excavation of the cable trench
- land transformation and use
- It is assumed that all parts will hold for the lifetime of 20 years and don't have to be replaced.

This dataset doesn't include
- neither the energy use for assembly of the different wind turbine parts nor their transportation from manufacture to the construction site
- auxiliary materials such as packaging materials or vacuum fleece.
- any losses of materials (waste) during the processing of the different wind turbine parts

## Technology
2MW connection technology used. Uncertainty has been adapted accordingly

## Parameters
- Installed capacity: 26911 MW; name capacity_installed_new; lognormal variance with pedigree 0.0018, pedigree (2,1,1,1,2)
  Literature value/statistics. New installed capacity of wind power in the world, onshore, 2008. Calculated from the total new installed capacity (27261 MW) minus new capacity offshore (350 MW). [WWEA, 2009. World Wind Energy Report 2008. World Wind Energy Association, Bonn. Table p.12f and chapter "offshore wind energy", p.8]
- Percentage of onshore wind power plant class capacity on total: 1 dimensionless; name percentage_onshore_class_1to3; lognormal variance with pedigree 0.009325, pedigree (2,2,1,2,2)
  Statistics

## Reference product
- wind turbine network connection, 750kW, onshore: 1 unit; name network_connection; CPC 462: Electricity distribution and control apparatus, and parts thereof; By-product classification allocatable product
  production volume 35748.3 unit; name apv_networkconn; = capacity_installed_new* percentage_onshore_class_1to3/ network_connection_capacity_MW
    Calculated value. See parameters for a closer look at the values used. This annual production volume corresponds to Quebec's one. This dataset, combined with the wind turbine, 750kW will replace the 800kW turbines (divided in moving and fixed parts)
  property capacity [MW] 0.75 MW; name network_connection_capacity_MW
    Literature value
  property price 10441.5 EUR2005; name network_connection_price_EUR2005
    Calculated based on inputs: The price of the product has been calculated as a sum of the values of the material and energy inputs for this product. This value is therefore a rough estimation. It may underestimate the real price since there are additional expenses when producing any product. These expences can include for example labour costs, treatment of waste materials and profit for the producer. Please consider carefully whether this level of data quality is acceptable for your application.

## By-products
- aluminium scrap, post-consumer: 0 kg; CPC 39363: Waste and scrap of aluminium; By-product classification Recyclable; pedigree (1,1,1,1,1)
  Calculated value
  production volume 0 kg; = apv_networkconn * ( scrap_alu / network_connection)
    Calculated from production volume of reference product using the relative outputs.
  property price 0.685 EUR2005; name scrap_alu_price_EUR2005
    Temporary price data. Calculated as 90% of purchasers price based on: estimated at 85% of new scrap
  property lifetime 20 year; name scrap_alu_lifetime
    Literature value
  property carbon content 0
    carbon content on a dry matter basis (reserved; not for manual entry)
  properties: carbon content, fossil 0, water content 0, dry mass 1 kg, wet mass 1 kg, water in wet mass 0 kg, carbon content, non-fossil 0, carbon allocation 0 kg

## Inputs from technosphere
- aluminium, wrought alloy: 48.96 kg; name alu_wrought; = 0.68*1000*0.072; source Elsam Engineering A/S,Fredericia,Denmark 2004, p. p. 25, Tab. 5.3; lognormal variance with pedigree 0.097025, pedigree (5,5,5,2,3)
  Literature value/calculated value and own assumptions. Elements of the 1000m cable (0.072 kg/m).
  The shares of cast alloy and wrought alloy aluminium in the cancelled ecoinvent v2 "aluminium production mix" dataset amounted to 32% (cast alloy) and 68% (wrought alloy) respectively. These shares have been overtaken to distribute the original amount of 72 kg aluminium.
  Uncertainty: estimated variance. slightly higher technological score because of the split of the aluminium use in the two aluminium types.
  properties: dry mass 1 kg, wet mass 1 kg
- waste wire plastic: -1377 kg; name waste_wirepla; = (hdpe)*-1; lognormal variance with pedigree 0.04, pedigree (1,1,5,1,1)
  Calculated value
  production volume 4.92255e7 kg; = apv_networkconn * waste_wirepla
    Calculated from production volume of reference product using the relative outputs.
  property price 0 EUR2005; name waste_wirepla_price_EUR2005
  property lifetime 20 year; name waste_wirepla_lifetime
  properties: carbon content, fossil 0.549508, wet mass 1 kg, dry mass 0.9645 kg, water content 0.0368066, heating value, net 25.95 MJ
  note on carbon content, fossil: C content in 1 kg DM was calculated using data in Tab A.6, ecoinvent v2.2 report 13_I
  note on heating value, net: Value taken from the general comment of the treatment dataset.
- aluminium, cast alloy: 23.04 kg; name alu_cast; = 0.32*1000*0.072; source Elsam Engineering A/S,Fredericia,Denmark 2004, p. p. 25, Tab. 5.3; lognormal variance with pedigree 0.097025, pedigree (5,5,5,2,3)
  (same comment as for aluminium, wrought alloy)
  properties: dry mass 1 kg, wet mass 1 kg
- wire drawing, copper: 254 kg; = copper; source Elsam Engineering A/S,Fredericia,Denmark 2004; lognormal variance with pedigree 0.04, pedigree (1,1,5,1,1)
  Calculated value
- scrap copper: 0 kg; name scrap_copper; pedigree (1,1,1,1,1)
  Calculated value
  production volume 0 kg
    Calculated from production volume of reference product using the relative outputs.
  property price 0 EUR2005; name scrap_copper_price_EUR2005
  property lifetime 20 year; name lifetime
  properties: dry mass 1 kg, wet mass 1 kg
- excavation, hydraulic digger: 1400 m3; = 1*1.4*1000; source Elsam Engineering A/S,Fredericia,Denmark 2004; lognormal variance with pedigree 0.097025, pedigree (5,5,5,2,3)
  Literature value and own assumptions. The excavated cable channel is assumed to have a width of 1 m and a depth of 1.4 m for a length of 1000 m
  Uncertainty: estimated variance
- waste polyethylene: 0 kg; name waste_polyethylene; pedigree (1,1,1,1,1)
  Calculated value
  production volume 0 kg
    Calculated from production volume of reference product using the relative outputs.
  property lifetime 20 year; name waste_polyethylene_lifetime
  property price 0 EUR2005; name waste_polyethylene_price_EUR2005
  properties: wet mass 1 kg, carbon content, fossil 0.825301, dry mass 0.996 kg, heating value, net 42.47 MJ, water content 0.00401606
  note on carbon content, fossil: C content in 1 kg DM was calculated using data in Tab A.1, ecoinvent v2.2 report 13_I
- polyethylene, high density, granulate: 1377 kg; name hdpe; = 11016/8; source Elsam Engineering A/S,Fredericia,Denmark 2004, p. p. 25, Tab. 5.3; lognormal variance with pedigree 0.097025, pedigree (5,5,5,2,3)
  Literature value. One element of the cable are unspecified plastics, assumed to be polyethylene (1.38 kg/m)
  The original value in the given source is valid for a whole wind power plant with 8 wind turbines and therefore has to be divided by 8.
  Uncertainty: estimated variance
  properties: dry mass 1 kg, carbon content, fossil 0.857143, wet mass 1 kg, heating value, net 42.47 MJ
  note on carbon content, fossil: Polyethylene is formed out of a huge amount of ethylene monomers (C2H4) (ecoinvent v2.2 report 11_II). MW=28 g/mol
- sheet rolling, aluminium: 72 kg; = alu_cast+alu_wrought; source Elsam Engineering A/S,Fredericia,Denmark 2004; lognormal variance with pedigree 0.04, pedigree (1,1,5,1,1)
  Proxy for wire drawing of aluminium.
- copper, cathode: 254 kg; name copper; = 2032/8; source Elsam Engineering A/S,Fredericia,Denmark 2004, p. p. 25, Tab. 5.3; lognormal variance with pedigree 0.097025, pedigree (5,5,5,2,3)
  Literature value and own assumptions. Used in the cables. The conductor of the cable is made of copper with a diameter of 6.4 mm, which gives a conductor cross-section of 32.2 mm2 and a weight of 0.25 kg/m.
  The original value in the given source is valid for a whole wind power plant with 8 wind turbines and therefore has to be divided by 8.
  Uncertainty: estimated variance
  properties: dry mass 1 kg, wet mass 1 kg
- aluminium scrap, post-consumer: -72 kg; lognormal variance with pedigree 0.04, pedigree (1,1,5,1,1)
  Calculated value
  production volume 2.57388e6 kg
  properties: dry mass 1 kg, wet mass 1 kg
- scrap copper: -11.3831, -242.617 kg (2 entries); lognormal variance with pedigree 0.04, pedigree (1,1,5,1,1)
  Calculated value
  production volume 9.08008e6 kg
  properties: dry mass 1 kg, wet mass 1 kg, lifetime 20 year
- waste polyethylene: -687.296, -45.9224, -3.47304, -18.9676, -7.6627, -18.0115, -595.667 kg (7 entries); lognormal variance with pedigree 0.04, pedigree (1,1,5,1,1)
  Calculated value
  production volume 4.92255e7 kg
  properties: wet mass 1 kg, carbon content, fossil 0.825301, dry mass 0.996 kg, lifetime 20 year, heating value, net 42.47 MJ, water content 0.00401606

## Inputs from nature
- Occupation, industrial area [natural resource, land]: 20000 m2*year; = land_from*lifetime; lognormal variance with pedigree 0.04, pedigree (1,1,5,1,1)
  Literature value
- Transformation, from pasture, man made [natural resource, land]: 1000 m2; name land_from; source Elsam Engineering A/S,Fredericia,Denmark 2004; lognormal variance with pedigree 0.097025, pedigree (5,5,5,2,3)
  Literature value. The excavated cable channel is assumed to have a width of 1 m and a depth of 1.4 m for a length of 1000m.
  Uncertainty: estimated variance
- Transformation, to industrial area [natural resource, land]: 1000 m2; = land_from; lognormal variance with pedigree 0.04, pedigree (1,1,5,1,1)
  Literature value

## Sampling procedure
Estimations

## Extrapolations
Extrapolated from 2MW onshore wind turbine network connection, that is based on one single type of a 2MW onshore wind turbine (Vestas 2MW wind turbine; where Vestas held a market share of ca.20% in the wind turbine market in 2001/02 (Chataignère et al. 2003)).

[Chataignere A. and Le Boulch D. (2003) Wind Turbine Systems. Final report ECLIPSE. EDF R&D, Clamart Cedex, France.]

## Review by Christian Bauer 2014-02-20
This dataset was thoroughfully reviewed and complies with the Data Quality Guidelines.
