# heat and power co-generation unit construction, organic Rankine cycle, 1400kW thermal, building

Dataset: EcoSpold 2, unit process
Geography: RoW
Time period: 2000-01-01 to 2021-12-31
Technology level: current
Classification: EcoSpold01Categories: wood energy/cogeneration
Classification: ISIC rev.4 ecoinvent: 4220:Construction of utility projects
Tags: ConvertedDataset
Scenario: Business-as-Usual
System model: Allocation, cut-off by classification
Generated by: Christian Bauer
Published in: Bauer, C. 2007
Database: ecoinvent
isCopyrightProtected: true
accessRestrictedTo: 1

## General comment
Assumed lifetime: 20 years. Operation time for heat production 6250 h/a, for electricity production 1110 h/a, calculated from reported annual production.
[This dataset was already contained in the ecoinvent database version 2. It was not individually updated during the transfer to ecoinvent version 3. Life Cycle Impact Assessment results may still have changed, as they are affected by changes in the supply chain, i.e. in other datasets. This dataset was generated following the ecoinvent quality guidelines for version 2. It may have been subject to central changes described in the ecoinvent version 3 change report (http://www.ecoinvent.org/database/ecoinvent-version-3/reports-of-changes/), and the results of the central updates were reviewed extensively. The changes added e.g. consistent water flows and other information throughout the database. The documentation of this dataset can be found in the ecoinvent reports of version 2, which are still available via the ecoinvent website. The change report linked above covers all central changes that were made during the conversion process.]

## Included activities end
This module includes the most important materials used for the construction of the building: concrete, steel, gravel, wood, rock wool, paint. Also includes the transport of these materials, the area occupied, and the disposal of the building.

## Geography
Could be used for central European conditions.

## Technology
Specific cogeneration unit installed in Switzerland.

## Reference product
- heat and power co-generation unit, organic Rankine cycle, 1400kW thermal, building: 1 unit; By-product classification allocatable product; CPC 53262: Power plants
  EcoSpold01Location=CH
  production volume 3.96633 unit
    This is a placeholder value that does not reflect real-world production volumes. This dataset does not currently require a real-world production volume to work in the database framework, and no actual data were collected yet. This has no negative effect on the results of the ecoinvent database.
  property price 1.09603e6 EUR2005
    Convert from EU 27 price to the world by currency exchange rate.

## Inputs from technosphere
- waste wood, untreated: 0 kg; pedigree (1,1,1,1,1)
  EcoSpold01Location=CH
  production volume 0 kg
    Calculated from the production volume of cogen unit, organic Rankine cycle 1400kWth, wood burning, building in proportion to the respective output amounts.
  properties: water content 0.25, carbon content, non-fossil 0.48632, wet mass 1 kg, dry mass 0.8 kg, heating value, net 13.99 MJ
  note on carbon content, non-fossil: Tab A.4, ecoinvent v2.2 report 13_I. C content has been referred to 1 kg DM,
  note on heating value, net: Value taken from the general comment of the treatment dataset.
- gravel, crushed: 0 kg; pedigree (1,1,1,1,1)
  Basic uncertainty:2
  EcoSpold01Location=CH
  properties: dry mass 1 kg, wet mass 1 kg
- excavation, hydraulic digger: 6400 m3; lognormal variance with pedigree 0.188, pedigree (4,5,5,5,1)
  Basic uncertainty:2
  EcoSpold01Location=RER
- steel, low-alloyed, hot rolled: 6080 kg; lognormal variance with pedigree 0.188, pedigree (4,5,5,5,1)
  Basic uncertainty:2
  EcoSpold01Location=RER
  properties: carbon content, fossil 0.005, dry mass 1 kg, wet mass 1 kg
  note on carbon content, fossil: Low alloyed steel composition given in Tab. 3.2 ecoinvent v2.2 report 10_partII. Steel assumed to have a C content of 0.5%
- glued laminated timber, average glue mix: 0 m3; pedigree (1,1,1,1,1)
  EcoSpold01Location=RER
  properties: wet mass 444 kg, price 298 EUR2005, carbon content, fossil 0.01791, water content 0.0979228, heating value, net 5537.41 MJ, carbon content, non-fossil 0.441932, dry mass 404.4 kg
- stone wool: 10.4 kg; lognormal variance with pedigree 0.188, pedigree (4,5,5,5,1)
  EcoSpold01Location=CH
  Basic uncertainty:2
  properties: dry mass 1 kg, wet mass 1 kg, carbon content, fossil 0.015401
  note on carbon content, fossil: The chemical composition of the glass fibres used in the rock wool production is similar to the composition of naturally cooled volcano basalt and has a composition listed in Tab. 3.1 and 3.2 in ecoinvent v2.2 report 16, part XIV. Rock wool contains: a minimum of 96% mineral fibres,between 0.5 and 3.0 weight percent of phenolic resin depending on the specific product characteristics, and about 0.2 percent mineral oil (ecoinvent v2.2 report 16, part XIV). An average composition of 1.8% phenolic resin, 0.2% mineral oil, and 98% mineral fibres has been assumed and used to calculate C content of the rock wool
- waste mineral wool: 0 kg; pedigree (1,1,1,1,1)
  EcoSpold01Location=CH
  production volume 0 kg
    (same comment as for waste wood, untreated)
  properties: dry mass 1 kg, wet mass 1 kg
- waste reinforced concrete: 0 kg; pedigree (1,1,1,1,1)
  EcoSpold01Location=CH
  production volume 0 kg
    (same comment as for waste wood, untreated)
  properties: water content 0.00585407, dry mass 0.99418 kg, wet mass 1 kg
- sawnwood, softwood, raw, dried (u=20%): 120 m3; lognormal variance with pedigree 0.188, pedigree (4,5,5,5,1)
  EcoSpold01Location=RER
  Basic uncertainty:2
  properties: heating value, net 6514.84 MJ, water content 0.2, carbon content, non-fossil 0.494, wet mass 540 kg, dry mass 450 kg
  note on carbon content, non-fossil: C content of dry mass is 0.494 kgC/kg dry wood (ecoinvent v2.2 report 9)
- concrete, normal: 0 m3; pedigree (1,1,1,1,1)
  EcoSpold01Location=CH
  Basic uncertainty:2
  properties: water content 0.086758, wet mass 2380 kg, dry mass 2190 kg
- waste paint on wood: -544 kg; lognormal variance with pedigree 0.1246, pedigree (3,3,5,5,4)
  EcoSpold01Location=CH
  production volume 1632 kg
    (same comment as for waste wood, untreated)
  properties: wet mass 1 kg, heating value, net 19.7 MJ, carbon content, fossil 0.65, dry mass 1 kg
- waste concrete gravel: -168000 kg; lognormal variance with pedigree 0.1246, pedigree (3,3,5,5,4)
  EcoSpold01Location=CH
  production volume 504000 kg
    (same comment as for waste wood, untreated)
  properties: wet mass 1 kg, dry mass 1 kg
- alkyd paint, white, without solvent, in 60% solution state: 544 kg; lognormal variance with pedigree 0.188, pedigree (4,5,5,5,1)
  EcoSpold01Location=RER
  Basic uncertainty:2
  properties: carbon content, non-fossil 0.199629, dry mass 1 kg, wet mass 1 kg, heating value, net 10.3 MJ, carbon content, fossil 0.140367
  note on carbon content, non-fossil: C content was calculated as an addition of C content in the raw materials.
- reinforcing steel: 25200 kg; lognormal variance with pedigree 0.188, pedigree (4,5,5,5,1)
  Basic uncertainty:2
  EcoSpold01Location=RER
  properties: dry mass 1 kg, carbon content, fossil 0.004, wet mass 1 kg
- waste wood, untreated: -638.611, -79.2932, -5.79723, -222.711, -33.6462, -53.1919, -994.325, -8472.42 kg (8 entries); lognormal variance with pedigree 0.1246, pedigree (3,3,5,5,4)
  EcoSpold01Location=CH
  production volume 31500 kg
- gravel, crushed: 7228.46, 661.765, 33091.7, 127018 kg (4 entries); lognormal variance with pedigree 0.188, pedigree (4,5,5,5,1)
  Basic uncertainty:2
  EcoSpold01Location=CH
- glued laminated timber, average glue mix: 4.60396, 9.99604 m3 (2 entries); lognormal variance with pedigree 0.188, pedigree (4,5,5,5,1)
  EcoSpold01Location=RER
- waste mineral wool: -3.0245, -7.3755 kg (2 entries); lognormal variance with pedigree 0.1246, pedigree (3,3,5,5,4)
  EcoSpold01Location=CH
  production volume 31.2 kg
- waste reinforced concrete: -85779.3, -1.22422e6 kg (2 entries); lognormal variance with pedigree 0.1246, pedigree (3,3,5,5,4)
  EcoSpold01Location=CH
  production volume 3.93e6 kg
- concrete, normal: 13.1631, 1.37158, 11.1039, 6.24596, 26.4499, 0.892138, 522.773 m3 (7 entries); lognormal variance with pedigree 0.188, pedigree (4,5,5,5,1)
  EcoSpold01Location=CH
  Basic uncertainty:2

## Inputs from nature
- Transformation, from unspecified [natural resource, land]: 1600 m2; lognormal variance with pedigree 0.188, pedigree (4,5,5,5,1)
  Basic uncertainty:2
- Occupation, industrial area [natural resource, land]: 128000 m2*year; lognormal variance with pedigree 0.188, pedigree (4,5,5,5,1)
  Basic uncertainty:2
- Transformation, to industrial area [natural resource, land]: 1600 m2; lognormal variance with pedigree 0.188, pedigree (4,5,5,5,1)
  Basic uncertainty:2

## Sampling procedure
literature

## Extrapolations
none This dataset has been copied from an original dataset covering the geography CH. The uncertainty has been adjusted accordingly.

## Review by Christian Bauer 2003-08-19
passed
