# construction work, heat and power co-generation unit, 160kW electrical

Dataset: EcoSpold 2, unit process
Geography: RoW
Time period: 1987-01-01 to 2021-12-31
Technology level: current
Classification: ISIC rev.4 ecoinvent: 2811:Manufacture of engines and turbines, except aircraft, vehicle and cycle eng
Classification: EcoSpold01Categories: natural gas/cogeneration
Tags: ConvertedDataset
Scenario: Business-as-Usual
System model: Allocation, cut-off by classification
Generated by: Thomas Heck
Published in: Heck, T. 2007
Database: ecoinvent
isCopyrightProtected: true
accessRestrictedTo: 1

## General comment
Inventory refers to infrastructure of an existing natural gas cogeneration plant (lambda=1 motor, 160kWe, operation start 1987) at Jakobsberg, Basel, Switzerland.
[This dataset was already contained in the ecoinvent database version 2. It was not individually updated during the transfer to ecoinvent version 3. Life Cycle Impact Assessment results may still have changed, as they are affected by changes in the supply chain, i.e. in other datasets. This dataset was generated following the ecoinvent quality guidelines for version 2. It may have been subject to central changes described in the ecoinvent version 3 change report (http://www.ecoinvent.org/database/ecoinvent-version-3/reports-of-changes/), and the results of the central updates were reviewed extensively. The changes added e.g. consistent water flows and other information throughout the database. The documentation of this dataset can be found in the ecoinvent reports of version 2, which are still available via the ecoinvent website. The change report linked above covers all central changes that were made during the conversion process.]

## Included activities end
The module includes the most important materials used for production. It includes also the transport of these materials and the energy and water needed for production.

## Geography
Data refers to a plant in Switzerland, assumed valid for Europe (RER)

## Technology
Component of a specific cogeneration unit installed in Switzerland. Technology at end of 1980s.

## Parameters
- fraction, process water, to air: 0.15 dimensionless; name fraction_PW_to_air; lognormal variance with pedigree 0.092025, pedigree (4,4,3,2,4)

## Reference product
- construction work, heat and power co-generation unit, 160kW electrical: 1 unit; CPC 53262: Power plants; By-product classification allocatable product
  production volume 2.67763 unit
    This is a placeholder value that does not reflect real-world production volumes. This dataset does not currently require a real-world production volume to work in the database framework, and no actual data were collected yet. This has no negative effect on the results of the ecoinvent database.
  property price 7576 EUR2005
    EU27 I/O database(in the 'EU & DK Input Output Database' (available in SimaPro)); -79 Building, non-residential EU 27 (calculated to be 38.169 EUR2003/kg). Based on consumption of (_53 Iron basic, virgin, EU27;7.25517782294095E-3 kg/EUR building; 0.45 EUR2003 per kg DS), (_61 Iron, after first processing, EU27;5.8766830719783E-3kg/EUR building; 0.62 EUR2003 per kg DS), (_65 Fabricated metal products, except machinery, EU27; 8.9167022775554E-3 kg/EUR building; 3.63 EUR2003 per kg DS) and (_66 Machinery and equipment n.e.c., EU27;4.15071881936446E-3 kg/EUR building; 5.71 EUR2003 per kg DS) -200 kg

## Inputs from technosphere
- wastewater from pig iron production: -0.24 m3; lognormal variance with pedigree 0.342, pedigree (1,1,5,5,1)
  rough estimate, uncertainty refers to amount of water only; not quantified here: composition of waste water unkown, therefore high uncertainty of applicability of modul.
  production volume 0.72 m3
    Calculated from the production volume of construction work, cogen unit 160kWe in proportion to the respective output amounts.
  properties: wet mass 1000 kg, dry mass 0.337476 kg, carbon content, fossil 1.2149e-5, water content 2962.17
  note on carbon content, fossil: TOC = 0.0000041 kg/m3 (Tab A.19, ecoinvent v2.2 report 13_I). TOC was considered as Total Carbon.
- electricity, low voltage: 0 kWh; pedigree (1,1,1,1,1)
- waste wood, untreated: 0 kg; pedigree (1,1,1,1,1)
  production volume 0 kg
    (same comment as for wastewater from pig iron production)
  properties: water content 0.25, heating value, net 13.99 MJ, wet mass 1 kg, dry mass 0.8 kg, carbon content, non-fossil 0.48632
  note on heating value, net: Value taken from the general comment of the treatment dataset.
  note on carbon content, non-fossil: Tab A.4, ecoinvent v2.2 report 13_I. C content has been referred to 1 kg DM,
- synthetic rubber: 10 kg; lognormal variance with pedigree 0.188, pedigree (4,5,5,5,1)
  Basic uncertainty:2
  properties: dry mass 1 kg, wet mass 1 kg, carbon content, fossil 0.871949, heating value, net 26.42 MJ
  note on carbon content, fossil: EPDM (Ethylene-propene-diene terpolymer) rubber is a terpolymer of ethylene, propene, and a diene with the residual unsaturated portion of the diene in the side chain (ecoinvent v2.2 report 7-part XX & Ullmann). Chemical formula (deduced from Evidences of Solvent-Induced Miscibility in Polychloroprene-co-Ethylene-Propene Diene Terpolymer Blends, Dubey et al., Journal of Applied Polymer Science, 2009, 111:1884–1891): C20H35
- concrete, normal: 0 m3; pedigree (1,1,1,1,1)
  Basic uncertainty:2
  properties: dry mass 2190 kg, water content 0.086758, wet mass 2380 kg
- waste concrete: -5500 kg; lognormal variance with pedigree 0.1246, pedigree (3,3,5,5,4)
  production volume 16500 kg
    (same comment as for wastewater from pig iron production)
  properties: wet mass 1 kg, dry mass 0.5 kg, water content 1
- transport, passenger car: 1500 km; lognormal variance with pedigree 0.252, pedigree (1,1,5,5,1)
  uncertainty of person kilometres
- plywood: 0.0084 m3; lognormal variance with pedigree 0.188, pedigree (4,5,5,5,1)
  properties: dry mass 768.6 kg, price 400 EUR2005, wet mass 823 kg, heating value, net 11688.9 MJ, carbon content, fossil 0.09783, water content 0.070778, carbon content, non-fossil 0.409818
- reinforcing steel: 200 kg; lognormal variance with pedigree 0.188, pedigree (4,5,5,5,1)
  Basic uncertainty:2
  properties: wet mass 1 kg, carbon content, fossil 0.004, dry mass 1 kg
- heat, district or industrial, other than natural gas: 0 MJ; pedigree (1,1,1,1,1)
  properties: heating value, net 1 MJ
- waste plastic, mixture: 0 kg; pedigree (1,1,1,1,1)
  production volume 0 kg
    (same comment as for wastewater from pig iron production)
  properties: dry mass 0.847 kg, wet mass 1 kg, carbon content, fossil 0.747344, heating value, net 30.79 MJ, water content 0.180638
  note on carbon content, fossil: C content in 1 kg DM was calculated using data in Tab A.2, ecoinvent v2.2 report 13_I
- scrap steel: -200 kg; lognormal variance with pedigree 0.1246, pedigree (3,3,5,5,4)
  production volume 600 kg
    (same comment as for wastewater from pig iron production)
  properties: dry mass 1 kg, wet mass 1 kg
- electricity, low voltage: 24.7033, 4.498, 72.4234, 1111.93, 179.891, 516.554 kWh (6 entries); lognormal variance with pedigree 0.1246, pedigree (3,3,5,5,4)
- waste wood, untreated: -0.255292, -0.0316984, -0.00231751, -0.0890311, -0.0134505, -0.0212641, -3.38695 kg (7 entries); lognormal variance with pedigree 0.1246, pedigree (3,3,5,5,4)
  production volume 11.4 kg
- concrete, normal: 0.0565427, 0.00589168, 0.0476973, 0.0268297, 0.113616, 0.00383221, 2.24559 m3 (7 entries); lognormal variance with pedigree 0.188, pedigree (4,5,5,5,1)
  Basic uncertainty:2
- heat, district or industrial, other than natural gas: 4.00481, 9876 MJ (2 entries); lognormal variance with pedigree 0.1246, pedigree (3,3,5,5,4)
- waste plastic, mixture: -1.2289, -0.0821102, -0.00620986, -0.0339144, -0.0137011, -0.0322049, -8.60296 kg (7 entries); lognormal variance with pedigree 0.1246, pedigree (3,3,5,5,4)
  production volume 30 kg

## Inputs from nature
- Water, unspecified natural origin [natural resource, in water]: 0.3 m3; name water_UNO_input; lognormal variance with pedigree 0.342, pedigree (1,1,5,5,1)
  rough estimate

## Emissions to nature
- Water [air, unspecified]: 0.045 m3; name water_to_air_unspecified; lognormal variance with pedigree 0.0827, pedigree (2,2,5,5,1)
  Calculated value based on literature values and expert opinion. See comments in the parametres' comment field.
  property fraction, origin: unspecified 1; name fraction_origin_unspecified
  property fraction, origin: fresh water 0; name fraction_origin_fresh_water
  property fraction, origin: salt water 0; name fraction_origin_salt_water
- Water [water, unspecified]: 0.015 m3; name water_to_water_unspecified; lognormal variance with pedigree 0.0827, pedigree (2,2,5,5,1)
  (same comment as for Water)
  property fraction, origin: salt water 0; name fraction_origin_salt_water_Ww
  property carbon content, non-fossil 0; name C_content_non_fossil
  property carbon content, fossil 0; name C_content_fossil
  property water in wet mass 1000 kg; name WWM
  property wet mass 1000 kg; name WM
  property fraction, origin: fresh water 0; name fraction_origin_fresh_water_Ww
  property dry mass 0 kg; name DM
  property fraction, origin: unspecified 1; name fraction_origin_unspecified_Ww

## Sampling procedure
Operator and manufacturer information

## Extrapolations
see Geography/Text This dataset has been copied from an original dataset covering the geography RER. The uncertainty has been adjusted accordingly.

## Review by Gerald Rebitzer (obsolete) 2003-08-27
had passed
