# treatment of used flexible duct, aluminium/PET, DN of 125

Dataset: EcoSpold 2, unit process
Geography: RoW
Time period: 2000-01-01 to 2021-12-31
Technology level: current
Classification: ISIC rev.4 ecoinvent: 3830:Materials recovery
Classification: EcoSpold01Categories: waste management/building demolition
Tags: ConvertedDataset; Treatment
Scenario: Business-as-Usual
System model: Allocation, cut-off by classification
Generated by: Alex Primas
Published in: Hässig, W. 2007
Database: ecoinvent
isCopyrightProtected: true
accessRestrictedTo: 1

## General comment
Disposal of a flexible tube made of PET, laminated with aluminium foil and strengthened with galvanised steel spiral wire. Weight 0.205 kg/m
[This dataset was already contained in the ecoinvent database version 2. It was not individually updated during the transfer to ecoinvent version 3. Life Cycle Impact Assessment results may still have changed, as they are affected by changes in the supply chain, i.e. in other datasets. This dataset was generated following the ecoinvent quality guidelines for version 2. It may have been subject to central changes described in the ecoinvent version 3 change report (http://www.ecoinvent.org/database/ecoinvent-version-3/reports-of-changes/), and the results of the central updates were reviewed extensively. The changes added e.g. consistent water flows and other information throughout the database. The documentation of this dataset can be found in the ecoinvent reports of version 2, which are still available via the ecoinvent website. The change report linked above covers all central changes that were made during the conversion process.]

## Included activities end
Transport to dismantling facilities, machines for handling in sorting plant, electricity demand for sorting plant, final disposal of waste material. Cut-off to recycling for metals.

## Geography
Specific to the technology mix encountered in sorting plants in Switzerland

## Technology
Disposal to a sorting plant assumed. Metal pieces and copper in cables and electronic devices are recycled, plastic parts are incinerated, inert wastes (e.g. rock wool) are landfilled.

## Time period
Amount of material investigated in 2003. Disposal technology mix as used in late 1990ies

## Reference product
- used flexible duct aluminium/PET, DN of 125: -1 m; By-product classification Waste; CPC 39363: Waste and scrap of aluminium
  EcoSpold01Location=CH
  production volume 3.96633 m
    This is a placeholder value that does not reflect real-world production volumes. This dataset does not currently require a real-world production volume to work in the database framework, and no actual data were collected yet. This has no negative effect on the results of the ecoinvent database.
  property price 0 EUR2005
    Waste products are assigned a price of zero as they are assumed to require further treatment.
  property carbon content 0.436512
    carbon content on a dry matter basis (reserved; not for manual entry)
  properties: water in wet mass 0 kg, carbon content, fossil 0.436512, carbon content, non-fossil 0, water content 0, dry mass 0.205 kg, wet mass 0.205 kg, carbon allocation 0.089485 kg

## Inputs from technosphere
- waste paperboard: 0 kg; pedigree (1,1,1,1,1)
  Estimation based on data of Questionnaire
  EcoSpold01Location=CH
  Uncertainty: Estimation based on data of Questionnaire
  production volume 0 kg
    Calculated from the production volume of used flexible duct aluminum/PET, DN of 125 in proportion to the respective output amounts.
  properties: water content 0.243781, carbon content, non-fossil 0.483259, wet mass 1 kg, dry mass 0.804 kg, heating value, net 15.92 MJ
  note on carbon content, non-fossil: C content was calculated for 1 kg DM, using data in Tab A.3, ecoinvent v2.2 report 13_I.
  note on heating value, net: Value taken from the general comment of the treatment dataset.
- scrap steel: 0 kg; pedigree (1,1,1,1,1)
  (same comment as for waste paperboard)
  production volume 0 kg
    (same comment as for waste paperboard)
  properties: dry mass 1 kg, wet mass 1 kg
- waste polyethylene terephthalate: 0 kg; pedigree (1,1,1,1,1)
  (same comment as for waste paperboard)
  production volume 0 kg
    (same comment as for waste paperboard)
  properties: wet mass 1 kg, heating value, net 22.95 MJ, water content 0.00200401, dry mass 0.998 kg, carbon content, fossil 0.554108
  note on carbon content, fossil: C content in 1 kg DM was calculated using data in Tab A.1, ecoinvent v2.2 report 13_I
- scrap aluminium: 0 kg; pedigree (1,1,1,1,1)
  EcoSpold01Location=CH
  Estimation based on data of Questionnaire
  Uncertainty: Estimation based on data of Questionnaire
  production volume 0 kg
    (same comment as for waste paperboard)
  properties: dry mass 1 kg, wet mass 1 kg
- waste paperboard: -0.000733573, -0.00011202, -9.79513e-6, -0.000404775, -3.9469e-5, -7.30611e-5, -0.0136273 kg (7 entries); lognormal variance with pedigree 0.074, pedigree (3,4,5,5,3)
  (same comment as for waste paperboard)
  production volume 0.06 kg
- scrap steel: -0.00487141, -0.0151286 kg (2 entries); lognormal variance with pedigree 0.074, pedigree (3,4,5,5,3)
  (same comment as for waste paperboard)
  production volume 0.08 kg
- waste polyethylene terephthalate: -0.0144614, -0.000966258, -7.30765e-5, -0.000399099, -0.000161231, -0.000378982, -0.0123218, -0.101238 kg (8 entries); lognormal variance with pedigree 0.074, pedigree (3,4,5,5,3)
  (same comment as for waste paperboard)
  production volume 0.515623 kg
- scrap aluminium: -0.01288, -0.02712 kg (2 entries); lognormal variance with pedigree 0.074, pedigree (3,4,5,5,3)
  (same comment as for scrap aluminium)
  production volume 0.158653 kg

## Sampling procedure
Questionnaire and assumptions.

## Extrapolations
none This dataset has been copied from an original dataset covering the geography CH. The uncertainty has been adjusted accordingly.

## Review by Rolf Frischknecht 2007-08-16
passed
none
