# heat and power co-generation unit construction, organic Rankine cycle, 1400kW thermal, common components, heat+el

Dataset: EcoSpold 2, unit process
Geography: CH
Time period: 2000-01-01 to 2021-12-31
Technology level: current
Classification: EcoSpold01Categories: wood energy/cogeneration
Classification: ISIC rev.4 ecoinvent: 4220:Construction of utility projects
Tags: ConvertedDataset
Scenario: Business-as-Usual
System model: Allocation, cut-off by classification
Generated by: Christian Bauer
Published in: Bauer, C. 2007
Database: ecoinvent
isCopyrightProtected: true
accessRestrictedTo: 1

## General comment
This dataset represents the construction of components of a 1400 kWth cogeneration plant. The dataset represents all components necessary only for electricity production.

## Included activities start
From unoccupied land forseen for the construction of a cogeneration plant.

## Included activities end
This activity ends with components of a cogeneration plant necessary for heat and electricity production, having a lifetime of 20 years. The dataset includes apart the materials for the components of the cogeneration plant also the construction efforts, as well as the disposal of all these parts.

## Geography
Data for a specific Swiss cogeneration plant. Dataset could be used for similarly dimensioned cogeneration plants in other regions.

## Technology
The 1400 kWth cogeneration plant is supplied with wood chips automatically. The electricity production takes place through an Organic Ranking Cycle using a steam turbine and a multi-cyclone filter.

## Reference product
- heat and power co-generation unit, organic Rankine cycle, 1400kW thermal, common components, heat+electricity: 1 unit; name RP_amount_1; By-product classification allocatable product; CPC 53262: Power plants
  EcoSpold01Location=CH
  production volume 0.0336675 unit; name RP_PV_1
    This is a placeholder value that does not reflect real-world production volumes. This dataset does not currently require a real-world production volume to work in the database framework, and no actual data were collected yet. This has no negative effect on the results of the ecoinvent database. The placeholder value of this activity was scaled according to the nominal GDP of 2005 (source: United Nations, http://data.un.org/Glossary.aspx?q=GDP+%28current+US%24%29, accessed 20130726) to reflect an appropriate share of the global production volume, which is also a placeholder value.
  property price 242886 EUR2005
    For RU, There is no engine/motor/electrical machinery specified in this process whereas generator and control cabinet cogen unit is included in components for electricity only. Therefore, it is assumed appyling the price of "machinery and equipment" (5.71 Euro/kg DS; 2003 data from EU27 I/O database) - 46336 kg. Convert from EU 27 price to the world by currency exchange rate.

## By-products
- iron scrap, unsorted: 0 kg; CPC 39310: Slag, dross, scalings and other waste from the manufacture of iron or steel; By-product classification Recyclable
  368 kg of steel, chromium steel 18/8, hot rolled
  12000 kg of steel, low-alloyed, hot rolled
  production volume 0 kg; = RP_PV_1 * (BP_amount_1 / RP_amount_1)
    Calculated from production volume of reference product using the relative outputs.
  property price 0.149 EUR2005
    Temporary price data. Calculated as 90% of purchasers price based on: estimated at 85% of sorted scrap
  property carbon content 0
    carbon content on a dry matter basis (reserved; not for manual entry)
  properties: wet mass 1 kg, dry mass 1 kg, carbon content, fossil 0, carbon content, non-fossil 0, water in wet mass 0 kg, water content 0, carbon allocation 0 kg

## Inputs from technosphere
- waste concrete: -27300 kg; name BP_amount_4; lognormal variance with pedigree 0.1227, pedigree (3,3,5,3,4)
  Estimation. 100% of that material goes into a sorting plant.
  EcoSpold01Location=CH
  production volume 919.124 kg; = RP_PV_1* BP_amount_4/ RP_amount_1
    Calculated from the production volume of cogen unit, organic Rankine cycle 1400kWth, wood burning, common components for heat+electricity in proportion to the respective output amounts.
  property price 0 EUR2005; name BP_amount_4_price_EUR2005
  properties: water content 1, dry mass 0.5 kg, wet mass 1 kg
- waste mineral wool, for final disposal: -72 kg; name BP_amount_2; lognormal variance with pedigree 0.1227, pedigree (3,3,5,3,4)
  EcoSpold01Location=CH
  Estimation. 100% of that material is disposed after use.
  production volume 2.42406 kg; = RP_PV_1* BP_amount_2/ RP_amount_1
    (same comment as for waste concrete)
  property price 0 EUR2005; name BP_amount_2_price_EUR2005
  properties: dry mass 1 kg, wet mass 1 kg
- steel, chromium steel 18/8, hot rolled: 368 kg; source Jungbluth N. 2002; lognormal variance with pedigree 0.186, pedigree (4,5,5,1,1)
  Estimation.
  EcoSpold01Location=RER
  properties: dry mass 1 kg, wet mass 1 kg, carbon content, fossil 0.0008
  note on carbon content, fossil: Stainless steel model is the grade 304 steel (18/8 stainless, 18% chromium 8% nickel; max. 0.08% C)
- aluminium, wrought alloy: 256 kg; source Jungbluth N. 2002; lognormal variance with pedigree 0.186, pedigree (4,5,5,1,1)
  Estimation.
  EcoSpold01Location=RER
  properties: wet mass 1 kg, dry mass 1 kg
- copper, cathode: 256 kg; source Jungbluth N. 2002; lognormal variance with pedigree 0.186, pedigree (4,5,5,1,1)
  EcoSpold01Location=RER
  Estimation.
  properties: wet mass 1 kg, dry mass 1 kg
- polyethylene, high density, granulate: 272 kg; source Jungbluth N. 2002; lognormal variance with pedigree 0.186, pedigree (4,5,5,1,1)
  Estimation.
  EcoSpold01Location=RER
  properties: dry mass 1 kg, carbon content, fossil 0.857143, heating value, net 42.47 MJ, wet mass 1 kg
  note on carbon content, fossil: Polyethylene is formed out of a huge amount of ethylene monomers (C2H4) (ecoinvent v2.2 report 11_II). MW=28 g/mol
- electricity, low voltage: 534 kWh; source Jungbluth N. 2002; lognormal variance with pedigree 0.1227, pedigree (3,3,5,3,4)
  EcoSpold01Location=CH
  Estimation.
- waste polyethylene: -272 kg; name BP_amount_3; lognormal variance with pedigree 0.1227, pedigree (3,3,5,3,4)
  Estimation. 100% of that material is disposed in a municipal waste incineration.
  EcoSpold01Location=CH
  production volume 9.15757 kg; = RP_PV_1* BP_amount_3/ RP_amount_1
    (same comment as for waste concrete)
  property price 0 EUR2005; name BP_amount_3_price_EUR2005
  properties: dry mass 0.996 kg, wet mass 1 kg, carbon content, fossil 0.825301, water content 0.00401606, heating value, net 42.47 MJ
  note on carbon content, fossil: C content in 1 kg DM was calculated using data in Tab A.1, ecoinvent v2.2 report 13_I
  note on heating value, net: Value taken from the general comment of the treatment dataset.
- concrete, normal: 12.4 m3; source Jungbluth N. 2002; lognormal variance with pedigree 0.186, pedigree (4,5,5,1,1)
  Estimation.
  EcoSpold01Location=CH
  properties: water content 0.086758, dry mass 2190 kg, wet mass 2380 kg
- chemical, organic: 3600 kg; source Jungbluth N. 2002; lognormal variance with pedigree 0.186, pedigree (4,5,5,1,1)
  Proxy. For the Organic Ranking Cycle 4500 l of thermal oil is used as operating material. For the amount of thermal oil 3600 kg of organic chemicals are assumed.
  EcoSpold01Location=GLO
  properties: carbon content, fossil 0.628, heating value, net 19.03 MJ, dry mass 1 kg, wet mass 1 kg
  note on carbon content, fossil: This dataset is an unweighted average of 20 organic substances (listed in Tab 88.1, ecoinvent v2.2 report 8, part II), being part of the top100 chemicals included in this database. The C-content has also been calculated as an unweighted average of the C content of the substances composing this dataset.
- steel, low-alloyed, hot rolled: 12000 kg; source Jungbluth N. 2002; lognormal variance with pedigree 0.186, pedigree (4,5,5,1,1)
  EcoSpold01Location=RER
  Estimation.
  properties: carbon content, fossil 0.005, dry mass 1 kg, wet mass 1 kg
  note on carbon content, fossil: Low alloyed steel composition given in Tab. 3.2 ecoinvent v2.2 report 10_partII. Steel assumed to have a C content of 0.5%
- heat, central or small-scale, other than natural gas: 240 MJ; source Jungbluth N. 2002; lognormal variance with pedigree 0.1227, pedigree (3,3,5,3,4)
  EcoSpold01Location=CH
  Estimation.
  properties: heating value, net 1 MJ
- stone wool: 72 kg; source Jungbluth N. 2002; lognormal variance with pedigree 0.186, pedigree (4,5,5,1,1)
  Estimation.
  EcoSpold01Location=CH
  properties: dry mass 1 kg, wet mass 1 kg, carbon content, fossil 0.015401
  note on carbon content, fossil: The chemical composition of the glass fibres used in the rock wool production is similar to the composition of naturally cooled volcano basalt and has a composition listed in Tab. 3.1 and 3.2 in ecoinvent v2.2 report 16, part XIV. Rock wool contains: a minimum of 96% mineral fibres,between 0.5 and 3.0 weight percent of phenolic resin depending on the specific product characteristics, and about 0.2 percent mineral oil (ecoinvent v2.2 report 16, part XIV). An average composition of 1.8% phenolic resin, 0.2% mineral oil, and 98% mineral fibres has been assumed and used to calculate C content of the rock wool
- iron scrap, unsorted: -12368 kg
  (same comment as for iron scrap, unsorted)
  production volume 416.4 kg
  properties: wet mass 1 kg, dry mass 1 kg, price 0.149 EUR2005

## Sampling procedure
Data from one specific 5 MW cogeneration plant, installed in Switzerland.

## Extrapolations
This dataset has been extrapolated from year 2001 to the year of the calculation (2021). The uncertainty has been adjusted accordingly.

## Review by Christian Bauer 2003-08-19
passed

## Review by Roland Hischier 2011-11-22
Transfer of documentation done.
