# polystyrene production, extruded, HFC-152a blown

Dataset: EcoSpold 2, unit process
Geography: RoW
Time period: 1994-01-01 to 2021-12-31
Technology level: current
Classification: EcoSpold01Categories: insulation materials/production
Classification: ISIC rev.4 ecoinvent: 2013:Manufacture of plastics and synthetic rubber in primary forms
Synonyms: XPS
Tags: ConvertedDataset
Scenario: Business-as-Usual
System model: Allocation, cut-off by classification
Generated by: Dominic Notter
Published in: Hischier, R. 2009
Database: ecoinvent
isCopyrightProtected: true
accessRestrictedTo: 1

## General comment
This dataset can be used in the construction building sector. The cutting of the extruded polystyrene blocks is not included in the process. Blowing agent is HFC-152a. Process emissions are 20% (w/w)
[This dataset was already contained in the ecoinvent database version 2. It was not individually updated during the transfer to ecoinvent version 3. Life Cycle Impact Assessment results may still have changed, as they are affected by changes in the supply chain, i.e. in other datasets. This dataset was generated following the ecoinvent quality guidelines for version 2. It may have been subject to central changes described in the ecoinvent version 3 change report (http://www.ecoinvent.org/database/ecoinvent-version-3/reports-of-changes/), and the results of the central updates were reviewed extensively. The changes added e.g. consistent water flows and other information throughout the database. The documentation of this dataset can be found in the ecoinvent reports of version 2, which are still available via the ecoinvent website. The change report linked above covers all central changes that were made during the conversion process.]

## Included activities end
The dataset describes the production of extruded polystyrene. Included processes are the melting of polystyrene pearls in the extruder, the discharge through a slot die, as well as the cooling with water.

## Geography
Data for leading polystyrene XPS producers in Germany and the USA. Applicable for Europe and North America.

## Technology
Extrusion process of expandable polystyrene including discharge via slot die. HFC-152a as blowing agents.

## Time period
Technology in 1994 was still using CFC or HCFC as blowing agent. In 2005, already more than 50% of companies in Europe are using CO2 as blowing agent. Though mainly in the USA, HFC-134a and HFC-152a as a blowing agent are still common.

## Parameters
- fraction, cooling water, once-through system, to air: 0.004 dimensionless; name fraction_CW_OT_to_air; lognormal variance with pedigree 0.0413, pedigree (2,3,1,3,1)
  Calculated based on literature value (Scown, C.D., 2011, Water Footprint of U.S. Transportation Fuels and supplying information of the article) (Vionnet, S., Quantis Water Database - Technical Report, 2012).
- fraction, cooling water, cooling pond system, to air: 0.032 dimensionless; name fraction_CW_CP_to_air; lognormal variance with pedigree 0.0413, pedigree (2,3,1,3,1)
  (same comment as for fraction, cooling water, once-through system, to air)
- fraction, cooling water, to air: 0.3875 dimensionless; name fraction_CW_to_air; = (0.5*fraction_CW_OT_to_air)+(0.5*fraction_CW_R_to_air); lognormal variance with pedigree 0.092025, pedigree (4,4,3,2,4)
  Calculated value based on literature value (see comments of the other parametres present in this dataset) and expert opinion. In the case when no industry/literature data are available about the type of cooling or directly fraction, cooling water, to air specific for the process a default assumption is applied. It is assumed that the once-through cooling system is used in 50% of all cases and recirculating system is used in another 50% of all cases.
- fraction, cooling water, recirculating system, to air: 0.771 dimensionless; name fraction_CW_R_to_air; lognormal variance with pedigree 0.0413, pedigree (2,3,1,3,1)
  (same comment as for fraction, cooling water, once-through system, to air)

## Reference product
- polystyrene, extruded: 1 kg; CPC 34720: Polymers of styrene, in primary forms; By-product classification allocatable product
  EcoSpold01Location=RER
  production volume 3.78e8 kg
    27E9 kg styrene capacity ; 90% capacity use; assumed 8% is used in XPS ; 25% assumed to be extruded with HFC-152a
  property price 1.29 EUR2005
    Estimated price to be the same as polystyrene, general purpose.
  property carbon content, fossil 0.859914
    XPS consists in 91% of polystyrene, 7% of blowing agent and the re-maining 2% are flame retardants (bromine compounds) and other additives (ecoinvent v2.2 report 16, part XIV). The chemical formula of polystyrene is (C8H8)n. Here, the blowing agent is HFC-152a (1,1-Difluoroethane: C2H4F2). HFC-152a emissions are 20% (Tab 4.23, ecoinvent v2.2 report 16, part XIV), that means that HFC-152a contributes 5.6% to the C content of the final product
  property carbon content 0.859914
    carbon content on a dry matter basis (reserved; not for manual entry)
  properties: carbon content, non-fossil 0, dry mass 1 kg, wet mass 1 kg, heating value, net 38.67 MJ, water content 0, water in wet mass 0 kg, carbon allocation 0.859914 kg

## Inputs from technosphere
- fluorspar, 97% purity: 0.005 kg; lognormal variance with pedigree 0.056, pedigree (3,4,5,5,1)
  EcoSpold01Location=GLO
  properties: dry mass 1 kg, wet mass 1 kg
- waste polystyrene: 0 kg; pedigree (1,1,1,1,1)
  EcoSpold01Location=CH
  production volume 0 kg
    Calculated from the production volume of polystyrene, extruded in proportion to the respective output amounts.
  properties: heating value, net 38.67 MJ, water content 0.00200401, carbon content, fossil 0.922579, dry mass 0.998 kg, wet mass 1 kg
  note on heating value, net: Value taken from the general comment of the treatment dataset.
  note on carbon content, fossil: XPS consists in 91% of polystyrene, 7% of blowing agent and the re-maining 2% are flame retardants (bromine compounds) and other additives (ecoinvent v2.2 report 16, part XIV). The chemical formula of polystyrene is (C8H8)n. Here, the blowing agent is HFC-152a (1,1-Difluoroethane: C2H4F2). HFC-152a emissions are 20% (Tab 4.23, ecoinvent v2.2 report 16, part XIV), that means that HFC-152a contributes 5.6% to the C content of the final product Chemical formula for polystyrene is (C8H8)n
- chemical, inorganic: 0.01 kg; lognormal variance with pedigree 0.0546, pedigree (2,4,5,5,1)
  EcoSpold01Location=GLO
  properties: carbon content, fossil 0.003, wet mass 1 kg, dry mass 1 kg
  note on carbon content, fossil: XPS consists in 91% of polystyrene, 7% of blowing agent and the re-maining 2% are flame retardants (bromine compounds) and other additives (ecoinvent v2.2 report 16, part XIV). The chemical formula of polystyrene is (C8H8)n. Here, the blowing agent is HFC-152a (1,1-Difluoroethane: C2H4F2). HFC-152a emissions are 20% (Tab 4.23, ecoinvent v2.2 report 16, part XIV), that means that HFC-152a contributes 5.6% to the C content of the final product This dataset is an unweighted average of 20 inorganic substances (listed in Tab 88.1, ecoinvent v2.2 report 8, part II), being part of the top100 chemicals included in this database. The C-content has also been calculated as an unweighted average of the C content of the substances composing this dataset.
- 1,1-difluoroethane, HFC-152a: 0.07 kg; lognormal variance with pedigree 0.0612, pedigree (2,3,5,5,3)
  EcoSpold01Location=US
  properties: heating value, net 18.36 MJ, wet mass 1 kg, carbon content, fossil 0.363636, dry mass 1 kg
  note on carbon content, fossil: XPS consists in 91% of polystyrene, 7% of blowing agent and the re-maining 2% are flame retardants (bromine compounds) and other additives (ecoinvent v2.2 report 16, part XIV). The chemical formula of polystyrene is (C8H8)n. Here, the blowing agent is HFC-152a (1,1-Difluoroethane: C2H4F2). HFC-152a emissions are 20% (Tab 4.23, ecoinvent v2.2 report 16, part XIV), that means that HFC-152a contributes 5.6% to the C content of the final product C2H4F2
- sodium chloride, powder: 0.005 kg; lognormal variance with pedigree 0.056, pedigree (3,4,5,5,1)
  EcoSpold01Location=RER
  properties: dry mass 1 kg, wet mass 1 kg
- explosives factory: 6.67e-9 unit; lognormal variance with pedigree 0.35, pedigree (5,5,5,5,5)
  EcoSpold01Location=CH
- electricity, medium voltage: 0 kWh; pedigree (1,1,1,1,1)
  EcoSpold01Location=UCTE
- polystyrene, expandable: 0.92409 kg; lognormal variance with pedigree 0.0546, pedigree (2,4,5,5,1)
  EcoSpold01Location=RER
  properties: carbon content, fossil 0.923077, dry mass 1 kg, wet mass 1 kg, heating value, net 38.67 MJ
  note on carbon content, fossil: XPS consists in 91% of polystyrene, 7% of blowing agent and the re-maining 2% are flame retardants (bromine compounds) and other additives (ecoinvent v2.2 report 16, part XIV). The chemical formula of polystyrene is (C8H8)n. Here, the blowing agent is HFC-152a (1,1-Difluoroethane: C2H4F2). HFC-152a emissions are 20% (Tab 4.23, ecoinvent v2.2 report 16, part XIV), that means that HFC-152a contributes 5.6% to the C content of the final product Chemical formula of polystyrene is (C8H8)n (ecoinvent v2.2 report 11_II)
- waste polystyrene: -1.2289e-5, -8.21102e-7, -6.20986e-8, -3.39144e-7, -1.37011e-7, -3.22049e-7, -8.60296e-5 kg (7 entries); lognormal variance with pedigree 0.0546, pedigree (2,4,5,5,1)
  EcoSpold01Location=CH
  production volume 37800 kg
- electricity, medium voltage: 0.0126052, 0.00241713, 0.0405786, 0.59018, 0.0831861, 0.271033 kWh (6 entries); lognormal variance with pedigree 0.0546, pedigree (2,4,5,5,1)
  EcoSpold01Location=UCTE

## Inputs from nature
- Water, cooling, unspecified natural origin [natural resource, in water]: 0.0197 m3; name water_cooling_UNO_input; lognormal variance with pedigree 0.056, pedigree (3,4,5,5,1)

## Emissions to nature
- Styrene [air, unspecified]: 9.2409e-5 kg; lognormal variance with pedigree 0.096, pedigree (3,4,5,5,1)
- Water [water, unspecified]: 0.0120663 m3; name water_to_water_unspecified; lognormal variance with pedigree 0.0827, pedigree (2,2,5,5,1)
  Calculated value based on literature values and expert opinion. See comments in the parametres' comment field.
  property wet mass 1000 kg; name WM
  property carbon content, non-fossil 0; name C_content_non_fossil
  property dry mass 0 kg; name DM
  property carbon content, fossil 0; name C_content_fossil
  property fraction, origin: salt water 0; name fraction_origin_salt_water_Ww
  property fraction, origin: fresh water 0; name fraction_origin_fresh_water_Ww
  property fraction, origin: unspecified 1; name fraction_origin_unspecified_Ww
  property water in wet mass 1000 kg; name WWM
- Ethane, 1,1-difluoro-, HFC-152a [air, non-urban air or from high stacks]: 0.014 kg; lognormal variance with pedigree 0.0432, pedigree (2,3,5,5,1)
- Water [air, unspecified]: 0.00763375 m3; name water_to_air_unspecified; lognormal variance with pedigree 0.0827, pedigree (2,2,5,5,1)
  (same comment as for Water)
  property fraction, origin: fresh water 0; name fraction_origin_fresh_water
  property fraction, origin: unspecified 1; name fraction_origin_unspecified
  property fraction, origin: salt water 0; name fraction_origin_salt_water

## Sampling procedure
Literature, database

## Extrapolations
see Geography This dataset has been copied from an original dataset covering the geography RER. The uncertainty has been adjusted accordingly.

## Review by Hans-Jörg Althaus 2009-02-05
passed
