# sawlog and veneer log, hardwood, measured as solid wood under bark, import from Europe without Switzerland

Dataset: EcoSpold 2, unit process
Geography: CH
Time period: 2019-01-01 to 2021-12-31
Technology level: current
Classification: ISIC rev.4 ecoinvent: 0220:Logging
Scenario: Business-as-Usual
System model: Allocation, cut-off by classification
Generated by: [System]
Database: ecoinvent
isCopyrightProtected: true
accessRestrictedTo: 1

## General comment
This dataset describes the transport (expressed in tkm) needed for an average export European sawlog and veneer log, hardwood to Switzerland. Transport distances are based on expert judgment and are in line with the ecoinvent default transport assumption for Europe.

## Included activities start
The activity starts with the product delivered at the forest road.

## Included activities end
This activity ends at the point of 'handing over' the sawlogs from one country to the other at the border.

## Reference product
- sawlog and veneer log, hardwood, measured as solid wood under bark: 1 m3; CPC 031: Wood in the rough; By-product classification allocatable product
  production volume 52588.2 m3; = 298000/0.85*0.15
    298’000 kg represents the Swiss production mix of 'sawlog and veneer log, hardwood, measured as solid wood under bark ', covering 85% of the Swiss market. The import from the rest of Europe covers the remaining 15 % of the market (FAOStat 2016).
  property price 85 EUR2005
    Expert judgement (Urs Luginbühl, Swiss Sawmilling industry, personal communication in June 2014). Cross-reference; Calculated as 90% of purchasers price based on: 2004 prices for World Import/Export data (USD/m3) from UN Commodity Trade Statistics Database (http://data.un.org/Data.aspx?d=ComTrade&f=_l1Code%3a45, [accessed 10th June 2010]) Commodity: 'Logs, poles, coniferous not treated or painted'.
  property wet mass 1031.24 kg; name WM
  property heating value, net 6071.3 MJ
    LHV is calculated based on the Carbon content of the product. More details can be found on the respective documentation.The property is based on a value of 7.79MJ/kg
  property carbon content 0.494
    carbon content on a dry matter basis (reserved; not for manual entry)
  properties: basic wood density 545.948, water in wet mass 424.626 kg, heating value, gross 0 MJ, dry mass 606.609 kg, apparent wood density 928.112 kg/m3, water content 0.7, carbon content, non-fossil 0.494, dry wood density 655.271 kg/m3, carbon content, fossil 0, carbon allocation 299.665 kg

## Inputs from technosphere
- transport, freight, lorry, unspecified: 206.247 metric ton*km; = 0.2*WM; lognormal variance with pedigree 0.1702, pedigree (3,5,2,1,4)
  import: lorry, 200 kg*km (expert guesses)
- sawlog and veneer log, hardwood, measured as solid wood under bark: 1 m3
  Part of the Swiss market comes from import. The shares of Swiss production and import are defined in the PV comment.
  property basic wood density 545.948; name saw_veneer_logs_basic_wood_d
  properties: water content 0.7, carbon content, non-fossil 0.494, dry wood density 655.271 kg/m3, dry mass 606.609 kg, heating value, net 6071.3 MJ, apparent wood density 928.112 kg/m3, wet mass 1031.24 kg

## Extrapolations
This dataset has been extrapolated from year 2019 to the year of the calculation (2021). The uncertainty has been adjusted accordingly.
