# alfalfa/grass silage production

Dataset: EcoSpold 2, unit process
Geography: CA-QC
Time period: 2010-01-01 to 2021-12-31
Technology level: current
Classification: ISIC rev.4 ecoinvent: 0119:Growing of other non-perennial crops
Synonyms: Thimothy/red clover haylage; Thimothy/alfalfa haylage
Scenario: Business-as-Usual
System model: Allocation, cut-off by classification
Share of production covered: 75 %
Generated by: Dominique Maxime
Database: ecoinvent
isCopyrightProtected: true
accessRestrictedTo: 1

## General comment
This dataset represents the production of 1 kg dry matter of alfalfa/grass silage (haylage) in the region of Québec. The 2010-2012 average yield is 12568 kg/ha (wet mass) at an average moisture content of 54%, i.e. 5780 kg dm/ha. The production considered is an average of intensive production of thimothy/alfalfa (30%) and thimothy/red clover (70%) haylage in silo and large round bales bales. The crop rotation is 5 years.

## Included activities start
This activity starts with soil cultivation after the harvest of the previous crop.

## Included activities end
This activity ends after harvest and storage at the farm gate.
The dataset includes the inputs of seeds, mineral and organic fertilisers, pesticides and all machine operations and corresponding machine infrastructure and sheds. Machine operations are: soil cultivation, transport of seeds, fertilisers and pesticides to the field (15 km), sowing, fertilisation, weed control, pest and pathogen control, haying, baling and loading, or bulk loading for hay ensiled into silo, then transport to farm and discharge. Direct field emissions are also included. No irrigation is involved for hay production in Québec. Use of car, van, or pick-up for servicing people (e.g. from farm to field) is excluded from the activities.

## Geography
The inventory is modelled for the region of Québec (Canada).

## Time period
Time of publications

## Parameters
- yield, agriculture: 12.568 metric ton/ha; name yield_agriculture; lognormal variance with pedigree 0.0081, pedigree (1,2,1,1,1)
  Amount (metric ton wet mass) of harvested and ensiled material per hectare of cultivated land. See supporting documentation '01 crop production - Québec.pdf' available on ecoinvent reports web page (https://ecoquery.ecoinvent.org/File/Reports).
- water content at harvest: 0.54 kg/kg; name harvest_wc; lognormal variance with pedigree 0.01, pedigree (1,1,1,1,1)
  Material water content at harvest (wet mass basis). See supporting documentation '01 crop production - Québec.pdf' available on ecoinvent reports web page (https://ecoquery.ecoinvent.org/File/Reports).
- fraction, process water to water, to surface water: 0.2 dimensionless; name fraction_PWtoW_to_surface_water; lognormal variance with pedigree 0.0892, pedigree (4,3,1,4,4)
  For agricultural crop dataset, distinction is made between irrigation water and process water. Process water is the water that comes with manure or pesticide application. A fraction of the process water input evaporates to the air and the remaining is considered emitted to surface water and ground water.
  This value is a proxy, taken from ecoinvent v3.0 dataset 'potato production, US 2006'. 'Literature value (Döll, 2011) cross referenced with expert opinion.' as cited in original dataset.
- fraction, process water, to air: 0.6165 dimensionless; name fraction_PW_to_air; lognormal variance with pedigree 0.0413, pedigree (2,2,1,4,1)
  For agricultural crop dataset, distinction is made between irrigation water and process water. Process water is the water that comes with manure or pesticide application. A fraction of the process water input evaporates to the air and the remaining is considered emitted to surface water and ground water.
  By default, the same value as for irrigation is assumed: this is a Canada-wide value taken from database (Vionnet, S., Quantis Water Database - Technical report, 2012). Note that it might be lower in Quebec due to the more humid climate in Western Canada than in Eastern Canada.

## Reference product
- alfalfa-grass silage: 1 kg; name REF_PRODUCT; CPC 01912: Alfalfa for forage and silage; By-product classification allocatable product
  mix of alfalfa/red clover and thimothy ensiled for animal feed
  production volume 1.8168e9 kg
    No disaggregated statistics are available allowing to get separate production volume for dry hay and hay silage in Quebec. Hence, it is assumed that 50% of the total forage area harvested in Quebec (757000 ha, 2010-2011 average) is dedicated to hay/grass silage, with a yield of 16000 kg/ha silage at 30% dry matter (MAPAQ 2012 (http://www.mapaq.gouv.qc.ca/SiteCollectionDocuments/Tables%20filieres/fourrageres/secteurplantesfourageres.pdf); Beauregard, 2013).
  property water content 1.17391; name REF_PRODUCT_water_content; = REF_PRODUCT_WWM / REF_PRODUCT_DM
  property carbon content, non-fossil 0.484; name REF_PRODUCT_C_content_non_fossil
    biogene carbon content on a dry matter basis. Composition data obtained from Feedipedia (http://www.feedipedia.org). First, composition data were refered to 1 kg dry mass. Then, C-contents were calculated considering a C-content/dry mass of 46% in carbohydrates (including fibres), 53% in proteins and 75% in fats. All data from 'Evolutionary and Biochemical Aspects', A.D. Kay and T. Vrede (in Global Ecology, 2010, Elsevier B.V., S.E. Jørgensen Ed.).
  property wet mass 2.17391 kg; name REF_PRODUCT_WM; = 1/0.46
  property carbon content, fossil 0; name REF_PRODUCT_C_content_fossil
    fossil carbon content on a dry matter basis
  property price 0.13 EUR2005; name REF_PRODUCT_price_EUR2005
    Price estimated to be the same as in case of grass silage.
  property dry mass 1 kg; name REF_PRODUCT_DM; = REF_PRODUCT_WM - REF_PRODUCT_WWM
  property energy content 18.55 MJ; name REF_PRODUCT_energy_content
    Gross energy content on a dry matter basis. Average of Alfalfa and red clover silage. Source: Feedipedia (http://www.feedipedia.org)
  property water in wet mass 1.17391 kg; name REF_PRODUCT_WWM; = REF_PRODUCT_WM*0.54
  property carbon content 0.484
    carbon content on a dry matter basis (reserved; not for manual entry)
  properties: carbon allocation 0.484 kg

## Inputs from technosphere
- haying, by rotary tedder: 0.00048962 ha; lognormal variance with pedigree 0.0099, pedigree (2,2,4,1,2)
  this includes two operations modelled with the same machinery: raking and tedding. However, specific diesel consumption of the two machinery is accounted for.
- glyphosate: 4.4973e-6 kg; lognormal variance with pedigree 0.0414, pedigree (1,2,5,3,2)
  See supporting documentation '01 crop production - Québec.pdf' available on ecoinvent reports web page (https://ecoquery.ecoinvent.org/File/Reports).
  properties: wet mass 1 kg, carbon content, fossil 0.214286, dry mass 1 kg
- ammonia, anhydrous, liquid: 0.000192725 kg; lognormal variance with pedigree 0.0099, pedigree (2,2,4,1,2)
  Amount is determined from the mineral nutrient used for the crop and from the overall mineral fertilizers sales, by type of fertilizer, in Québec for agriculture (APNC, 2010). See details for disaggregation in supporting documentation '01 crop production - Québec.pdf' available on ecoinvent reports web page (https://ecoquery.ecoinvent.org/File/Reports).
  properties: dry mass 1 kg, wet mass 1 kg
- sowing: 3.8896e-5 ha; lognormal variance with pedigree 0.0099, pedigree (2,2,4,1,2)
  (same comment as for glyphosate)
- borax, anhydrous, powder: 0.00019931 kg; lognormal variance with pedigree 0.0099, pedigree (2,2,4,1,2)
  For boron (B) micro-nutrient supply. 1,73 kg/ha of borate at 14.3% in boron ; borax anhydrous is at 21,47% boron
  properties: wet mass 1 kg, dry mass 1 kg
- baling: 0.0030851 unit; lognormal variance with pedigree 0.0099, pedigree (2,2,4,1,2)
  Large round bales
- clover seed, Swiss integrated production, for sowing: 0.00051561 kg; name SEED; lognormal variance with pedigree 0.0099, pedigree (2,2,4,1,2)
  Proxy for 1,0428E-04 kg alfalfa seeds, 2,4216E-04 kg thimothy seeds and 1,6916E-04 kg red clover seeds. See supporting documentation '01 crop production - Quebec.pdf' available on ecoinvent reports web page (https://ecoquery.ecoinvent.org/File/Reports).
  property carbon content, non-fossil 0.469421; name SEED_C_content_non_fossil
  properties: dry mass 0.9 kg, wet mass 1 kg, water content 0.111111
- packaging, for pesticides: 0.000410036 kg; lognormal variance with pedigree 0.0592, pedigree (4,3,4,5,4)
  Total amount of active substance/s of pesticides needed for the production of alfalfa-grass silage is calculated to be circa 2.05E-04 kg. Pesticide/s used in this dataset is/are: 'borax, anhydrous, powder', 'glyphosate', 'pesticide, unspecified', 'phenoxy-compound'. The total amount of active substance/s is doubled in order to account for the packaging of the dilluted product of pesticide/s that is/are applied. Therefore, 4.10E-04 kg of packaging for pesticides is justified with this exchange.
  properties: carbon content, fossil 0.85714, price 0.0642 EUR2005, heating value, net 25.97 MJ, dry mass 1 kg, wet mass 1 kg
- bale loading: 0.0039426 unit; lognormal variance with pedigree 0.0099, pedigree (2,2,4,1,2)
  round bales loading into plastic for the share of material ensiled into plastic. Note that the rest of materials is bulk ensiled in silo.
- packaging, for fertilisers: 0.119386 kg; lognormal variance with pedigree 0.0592, pedigree (4,3,4,5,4)
  Total amount of active substance/s of fertilisers needed for the production of 'alfalfa-grass silage' is calculated to be circa 5.97E-02 kg. Fertiliser/s used in this dataset is/are: 'ammonia, liquid', 'ammonium nitrate, as N', 'ammonium sulfate, as N', 'lime', 'nitrogen fertiliser, as N', 'phosphate fertiliser, as P2O5', 'potassium chloride, as K2O', 'potassium sulfate, as K2O', 'urea, as N'. The total amount of active substance/s is doubled in order to account for the packaging of the dilluted product of fertiliser/s that is/are applied. Therefore, 1.19E-01 kg of packaging for fertilisers is justified with this exchange.
  properties: dry mass 1 kg, carbon content, fossil 0.825301, heating value, net 25.01 MJ, wet mass 1 kg, price 0.0642 EUR2005
  note on carbon content, fossil: Considering a chemical formula (C2H4)n for polyethylene, carbon content-fossil is calculated to be 0.856286 kg of Carbon per kg of dry mass.
- lime: 0.0332971 kg; name LIME_CaCO3; source Beauregard, G. 2013; lognormal variance with pedigree 0.0099, pedigree (2,2,4,1,2)
  as CaCO3. Beauregard (2013).
  properties: wet mass 1 kg, dry mass 1 kg, carbon content, fossil 0.120005
- solid manure loading and spreading, by hydraulic loader and spreader: 0.0487038 kg; lognormal variance with pedigree 0.0099, pedigree (2,2,4,1,2)
  Calculated from solid manure input rate and crop yield.
- phenoxy-compound: 1.0378e-6 kg; lognormal variance with pedigree 0.0414, pedigree (1,2,5,3,2)
  3,4594E-07 kg 2,4-D ester and 6,9189E-07 kg 2,4-DB. See supporting documentation '01 crop production - Quebec.pdf' available on ecoinvent reports web page (https://ecoquery.ecoinvent.org/File/Reports).
  properties: carbon content, fossil 0.532559, dry mass 1 kg, wet mass 1 kg
- poultry manure, fresh: 0.011397 kg; lognormal variance with pedigree 0.009925, pedigree (2,2,4,2,2)
  Amount of 0.011397 kg of poultry manure, fresh is needed when producing 1kg of alfalfa silage.
  Amount is determined from the organic nutrient used for the crop (Beauregard, 2013) and from data about organic fertilizer production, by type, in Québec (MAPAQ, 2013). See details for disaggregation in supporting documentation '01 crop production - Québec.pdf' available on ecoinvent reports web page (https://ecoquery.ecoinvent.org/File/Reports).
  properties: carbon content, non-fossil 0.33389, nitrogen content 0.04044, water content 1.63158, wet mass 1 kg, dry mass 0.38 kg
- tillage, ploughing: 3.3921e-5 ha; lognormal variance with pedigree 0.0099, pedigree (2,2,4,1,2)
  (same comment as for glyphosate)
- potassium sulfate: 0.00274219 kg; lognormal variance with pedigree 0.0099, pedigree (2,2,4,1,2)
  The exchange has been updated from 'potassium sulfate, as K2O' into 'potassium sulfate' and therefore its amount has been scaled (multiplied) from 0.0015 kg by 1.85 kg of 'potassium sulfate' per kg of 'potassium sulfate, as K2O'.
  properties: dry mass 1 kg, wet mass 1 kg
- urea: 0.00452714 kg; name UREA_N; lognormal variance with pedigree 0.0099, pedigree (2,2,4,1,2)
  The exchange has been updated from 'urea, as N' into 'urea' and therefore its amount has been scaled (multiplied) from 0.0021 kg by 2.1438 kg of 'urea' per kg of 'urea, as N'. Original comment of the exchange is: Amount is determined from the mineral nutrient used for the crop and from the overall mineral fertilizers sales, by type of fertilizer, in Québec for agriculture (APNC, 2010). See details for disaggregation in supporting documentation '01 crop production - Québec.pdf' available on ecoinvent reports web page (https://ecoquery.ecoinvent.org/File/Reports).
  properties: carbon content, fossil 0.2, wet mass 1 kg, dry mass 1 kg
- inorganic nitrogen fertiliser, as N: 0.00216969 kg; lognormal variance with pedigree 0.0099, pedigree (2,2,4,1,2)
  Amount is determined from beaureagrd (2013) and from the overall mineral fertilizers sales, by type of fertilizer, in Québec for agriculture (APNC, 2010). See details for disaggregation in supporting documentation '01 crop production - Québec.pdf' available on ecoinvent reports web page (https://ecoquery.ecoinvent.org/File/Reports).
  properties: dry mass 1 kg, wet mass 1 kg
- tillage, rotary cultivator: 5.048e-5 ha; lognormal variance with pedigree 0.0099, pedigree (2,2,4,1,2)
  2 passes, once. See supporting documentation '01 crop production - Quebec.pdf' available on ecoinvent reports web page (https://ecoquery.ecoinvent.org/File/Reports).
- liquid manure spreading, by vacuum tanker: 0.000281884 m3; lognormal variance with pedigree 0.0099, pedigree (2,2,4,1,2)
  Calculated from liquid manure input rate and crop yield.
- transport, tractor and trailer, agricultural: 0.0217635 metric ton*km; lognormal variance with pedigree 0.1293, pedigree (2,2,4,1,2)
  transport of bales or bulk material from field to farm for storage, and transport of inputs from farm to field (assuming 15 km). See supporting documentation '01 crop production - Québec.pdf' available on ecoinvent reports web page (https://ecoquery.ecoinvent.org/File/Reports).
- manure, solid, cattle: 0.037307 kg; name MANURE_SOLID_CATTLE; lognormal variance with pedigree 0.0099, pedigree (2,2,4,1,2)
  Amount of 0.037307 kg of manure, solid, cattle is needed when producing 1kg of alfalfa silage.
  Amount is determined from the organic nutrient actually used for the crop (CECPA, 2011) and from data about organic fertilizer production, by type, in Québec (MAPAQ, 2013). See details for disaggregation in supporting documentation '01 crop production - Québec.pdf' available on ecoinvent reports web page (https://ecoquery.ecoinvent.org/File/Reports).
  property water in wet mass 0.78 kg; name MANURE_SOLID_CATTLE_WWM
  properties: nitrogen content 0.02734, water content 3.5454, wet mass 1 kg, carbon content, non-fossil 0.441, dry mass 0.22 kg
  note on nitrogen content: Total N content on a dry matter basis. Weighted average of beef cattle solid manure (0.02639 kg N/kg dm) and dairy cattle solid manure (0.02789 kg N/kg dm) considering that N supply in central and peripherical agricultural regions is about 63% from dairy and 37% from beef cattle (MAPAQ, 2013). N content from Parent and Gagné (2013).
- inorganic phosphorus fertiliser, as P2O5: 0.00375349 kg; lognormal variance with pedigree 0.0099, pedigree (2,2,4,1,2)
  Amount is determined from the mineral nutrient used for the crop (Beauregard, 2013) and from the overall mineral fertilizers sales, by type of fertilizer, in Québec for agriculture (APNC, 2010). See details for disaggregation in supporting documentation '01 crop production - Québec.pdf' available on ecoinvent reports web page (https://ecoquery.ecoinvent.org/File/Reports).
  Mono- and di-ammonium phosphate (MAP and DAP), as P2O5. The concommitant supply of nitrogen by DAP is accounted for in total N requirements. See supporting documentation '01 crop production - Québec.pdf' available on ecoinvent reports web page (https://ecoquery.ecoinvent.org/File/Reports).
  properties: wet mass 1 kg, dry mass 1 kg
- manure, liquid, swine: 0.15615 kg; name MANURE_LIQUID_SWINE; lognormal variance with pedigree 0.0099, pedigree (2,2,4,1,2)
  Amount of 0.15615 kg of manure, liquid, swine is needed when producing 1kg of alfalfa silage.
  Amount is determined from the organic nutrient actually used for the crop (CECPA, 2011) and from data about organic fertilizer production, by type, in Québec (MAPAQ, 2013). See details for disaggregation in supporting documentation '01 crop production - Québec.pdf' available on ecoinvent reports web page (https://ecoquery.ecoinvent.org/File/Reports).
  property water in wet mass 0.95 kg; name MANURE_LIQUID_SWINE_WWM
  properties: carbon content, non-fossil 0.64, nitrogen content 0.1, water content 19, wet mass 1 kg, dry mass 0.05 kg
- application of plant protection product, by field sprayer: 1.62594e-5 ha; lognormal variance with pedigree 0.0099, pedigree (2,2,4,1,2)
  Once, in the establishment year; 47% of cropand area receives plant protection products in average. See supporting documentation '01 crop production - Québec.pdf' available on ecoinvent reports web page (https://ecoquery.ecoinvent.org/File/Reports).
- manure, liquid, cattle: 0.12574 kg; name MANURE_LIQUID_CATTLE; lognormal variance with pedigree 0.0099, pedigree (2,2,4,1,2)
  Amount of 0.12574 kg of manure, liquid, cattle is needed when producing 1kg of alfalfa silage.
  Amount is determined from the organic nutrient actually used for the crop and from data about organic fertilizer production, by type, in Québec (MAPAQ, 2013). See details for disaggregation in supporting documentation '01 crop production - Québec.pdf' available on ecoinvent reports web page (https://ecoquery.ecoinvent.org/File/Reports).
  property water in wet mass 0.925 kg; name MANURE_LIQUID_CATTLE_WWM
  properties: wet mass 1 kg, carbon content, non-fossil 0.68, water content 12.333, dry mass 0.075 kg, nitrogen content 0.03681
  note on nitrogen content: Total N content on a dry matter basis. Weighted average of beef cattle liquid manure (0.0425 kg N/kg dm) and dairy cattle liquid manure (0.03611 kg N/kg dm) considering that N supply in central and peripherical agricultural regions is for 89% from dairy and 11% from beef cattle (MAPAQ, 2013). N content from Parent and Gagné (2013).
- potassium chloride: 0.0246775 kg; lognormal variance with pedigree 0.0099, pedigree (2,2,4,1,2)
  The exchange has been updated from 'potassium chloride, as K2O' into 'potassium chloride' and therefore its amount has been scaled (multiplied) from 0.0156 kg by 1.5829 kg of 'potassium chloride' per kg of 'potassium chloride, as K2O'. Original comment of the exchange is: Amount is determined from the mineral nutrient used for the crop and from the overall mineral fertilizers sales, by type of fertilizer, in Québec for agriculture (APNC, 2010). See details for disaggregation in supporting documentation '01 crop production - Québec.pdf' available on ecoinvent reports web page (https://ecoquery.ecoinvent.org/File/Reports).
  The potash domestic market in Canada is supplied almost exclusively by domestic production and Quebec resellers of potassium chloride have a preferential trade agreement for supplying fertilizer from Canadian producers. Hence, potassium chloride used in quebec does not rely on the global market and a direct link to Canadian potassium chloride is used. Sources: 1) personnal communication with Gilles Lavoie from the Quebec Professional Association in Crop Nutrition and the Coop Fédérée Inc. (2013); 2) Temple Scott Associates inc. (2013). Fertilizer report for the Canadian Fertilizer Industry. April 5, 2013, 10 p. http://www.cfi.ca/_documents/Fertilizer%20Industry%20Report-%20FINAL.pdf
  properties: dry mass 1 kg, wet mass 1 kg
- ammonium sulfate: 0.000134243 kg; lognormal variance with pedigree 0.0099, pedigree (2,2,4,1,2)
  (same comment as for ammonia, anhydrous, liquid)
  properties: wet mass 1 kg, dry mass 1 kg
- ammonium nitrate: 0.00274702 kg; lognormal variance with pedigree 0.0099, pedigree (2,2,4,1,2)
  The exchange has been updated from 'ammonium nitrate, as N' into 'ammonium nitrate' and therefore its amount has been scaled (multiplied) from 0.001 kg by 2.8573 kg of 'ammonium nitrate' per kg of 'ammonium nitrate, as N'. Original comment of the exchange is: Amount is determined from the mineral nutrient used for the crop and from the overall mineral fertilizers sales, by type of fertilizer, in Québec for agriculture (APNC, 2010). See details for disaggregation in supporting documentation '01 crop production - Québec.pdf' available on ecoinvent reports web page (https://ecoquery.ecoinvent.org/File/Reports).
  properties: dry mass 1 kg, wet mass 1 kg
- fodder loading, by self-loading trailer: 0.0041401 m3; lognormal variance with pedigree 0.0099, pedigree (2,2,4,1,2)
  as modelled in the QC machinery process, the machine includes cutting, loading, tranport to farm and discharge/compacting
- fertilising, by broadcaster: 0.000172972 ha; lognormal variance with pedigree 0.0099, pedigree (2,2,4,1,2)
  (same comment as for glyphosate)
- swath, by rotary windrower: 0.00039913 ha; lognormal variance with pedigree 0.0099, pedigree (2,2,4,1,2)
  2 or 3 cuts a year depending on the crop
- pesticide, unspecified: 1.7297e-7 kg; lognormal variance with pedigree 0.0414, pedigree (1,2,5,3,2)
  herbicide, unspecified (4% of total pesticides input). Emitted fractions of these pesticides are not accounted for, i.e. all input is modelled as emitted to soil. See supporting documentation '01 crop production - Québec.pdf' available on ecoinvent reports web page (https://ecoquery.ecoinvent.org/File/Reports).
  properties: dry mass 1 kg, carbon content, fossil 0.486978, wet mass 1 kg
  note on carbon content, fossil: Mean of C content in all pesticides whose formula has been documented in Sutter 2010

## Inputs from nature
- Energy, gross calorific value, in biomass [natural resource, biotic]: 17.897 MJ; lognormal variance with pedigree 0.1313, pedigree (3,3,4,3,5)
  Estimated to be the same as in case of 'alfalfa-grass mixture, Swiss integrated production'.
- Carbon dioxide, in air [natural resource, in air]: 1.77378 kg; = 44/12 * (REF_PRODUCT_C_content_non_fossil* REF_PRODUCT* REF_PRODUCT_DM-SEED_C_content_non_fossil * SEED* REF_PRODUCT_DM)
  Calculated value, see chapter 'CO2 binding' in '01 crop production-direct field emissions natural resources v1.2.pdf' available on ecoinvent reports web page (https://ecoquery.ecoinvent.org/File/Reports). The 44/12 ratio is the stoichiometric mass ratio of carbon dioxide to carbon.
- Transformation, to pasture, man made, intensive [natural resource, land]: 1.72972 m2; = (1 / (yield_agriculture / REF_PRODUCT_WM* UnitConversion(1, 'metric ton', 'kg')))*UnitConversion(1, 'ha', 'm2'); lognormal variance with pedigree 0.008, pedigree (1,1,4,1,1)
  Calculated value. See Parameters.
- Occupation, pasture, man made, intensive [natural resource, land]: 1.67207 m2*year; = OCCUP_period * (1 / (yield_agriculture / REF_PRODUCT_WM* UnitConversion(1, 'metric ton', 'kg'))) * UnitConversion(1, 'ha', 'm2'); lognormal variance with pedigree 0.008, pedigree (1,1,4,1,1)
  Calculated value. See Exchange Properties and Parameters.
  property occupation period 0.96667 year; name OCCUP_period
- Transformation, from pasture, man made, intensive [natural resource, land]: 1.72972 m2; = (1 / (yield_agriculture / REF_PRODUCT_WM* UnitConversion(1, 'metric ton', 'kg'))) * UnitConversion(1, 'ha', 'm2'); lognormal variance with pedigree 0.008, pedigree (1,1,4,1,1)
  Calculated value. See Parameters.

## Emissions to nature
- 2,4-DB [water, ground-]: 2.5254e-8 kg; lognormal variance with pedigree 0.0813, pedigree (2,2,5,1,2)
  Aggregate of 2,4-D ester and 2,4-DB fractions. Modelled with PestLCI 2.0 (Dijkman et al. 2012). See supporting documentation '01 crop production - Québec.pdf' available on ecoinvent reports web page (https://ecoquery.ecoinvent.org/File/Reports).
- Water [air, non-urban air or from high stacks]: 0.000181098 m3; = ((MANURE_LIQUID_CATTLE* MANURE_LIQUID_CATTLE_WWM) + (MANURE_LIQUID_SWINE* MANURE_LIQUID_SWINE_WWM) + (MANURE_SOLID_CATTLE* MANURE_SOLID_CATTLE_WWM))* fraction_PW_to_air* UnitConversion(1, 'l', 'm3')
  Calculated value; See Parameters. Water emitted from: irrigated water (if any), process water.
- Water [water, ground-]: 9.01229e-5 m3; = ((MANURE_LIQUID_CATTLE* MANURE_LIQUID_CATTLE_WWM) + (MANURE_LIQUID_SWINE* MANURE_LIQUID_SWINE_WWM) + (MANURE_SOLID_CATTLE* MANURE_SOLID_CATTLE_WWM))* (1-fraction_PW_to_air)*(1- fraction_PWtoW_to_surface_water)* UnitConversion(1, 'l', 'm3')
  (same comment as for Water)
- 2,4-DB [water, surface water]: 1.0413e-10 kg; lognormal variance with pedigree 0.0813, pedigree (2,2,5,1,2)
  (same comment as for 2,4-DB)
- 2,4-DB [soil, agricultural]: 9.5072e-7 kg; lognormal variance with pedigree 0.0743, pedigree (2,2,5,1,2)
  (same comment as for 2,4-DB)
- 2,4-DB [air, non-urban air or from high stacks]: 6.1751e-8 kg; lognormal variance with pedigree 0.0813, pedigree (2,2,5,1,2)
  (same comment as for 2,4-DB)
- Glyphosate [water, ground-]: 1.0344e-7 kg; source Dijkman, T.J. 2012; lognormal variance with pedigree 0.0813, pedigree (2,2,5,1,2)
  Modelled with PestLCI 2.0 (Dijkman et al. 2012). See supporting documentation '01 crop production - Québec.pdf' available on ecoinvent reports web page (https://ecoquery.ecoinvent.org/File/Reports).
- Glyphosate [water, surface water]: 4.5198e-10 kg; source Dijkman, T.J. 2012; lognormal variance with pedigree 0.0813, pedigree (2,2,5,1,2)
  (same comment as for Glyphosate)
- Glyphosate [air, non-urban air or from high stacks]: 1.8439e-8 kg; source Dijkman, T.J. 2012; lognormal variance with pedigree 0.0813, pedigree (2,2,5,1,2)
  (same comment as for Glyphosate)
- Copper, ion [water, surface water]: 1.05374e-6 kg; lognormal variance with pedigree 0.0887, pedigree (5,2,4,1,2)
  Calculated value. See supporting documentation '01 crop production - Québec.pdf' available on ecoinvent reports web page (https://ecoquery.ecoinvent.org/File/Reports).
- Carbon dioxide, fossil [air, non-urban air or from high stacks]: 0.0179683 kg; = UREA_N*0.466461632733939*1.571 +LIME_CaCO3*0.44; lognormal variance with pedigree 0.008, pedigree (1,1,4,1,1)
  Carbon dioxide emissions from limestone and urea application calculated from C content (IPCC, 2006). Emission factors are EF=1.57 kg CO2/kg N for urea, and EF=0.44 kg CO2/kg CaCO3 for limestone. See supporting documentation '01 crop production - Quebec.pdf' available on ecoinvent reports web page (https://ecoquery.ecoinvent.org/File/Reports).
- Zinc, ion [water, surface water]: 1.25285e-6 kg; lognormal variance with pedigree 0.0887, pedigree (5,2,4,1,2)
  (same comment as for Copper, ion)
- Phosphorus [water, surface water]: 2.506e-5 kg; source Michaud, A.R. 2008; lognormal variance with pedigree 0.0493, pedigree (2,2,4,1,2)
  Modelled with Québec conditions with the 'ODEP model' (Michaud et al., 2008). See supporting documentation '01 crop production - Quebec.pdf' available on ecoinvent reports web page (https://ecoquery.ecoinvent.org/File/Reports).
- Nickel, ion [water, surface water]: 2.96354e-7 kg; lognormal variance with pedigree 0.0887, pedigree (5,2,4,1,2)
  (same comment as for Copper, ion)
- Phosphate [water, surface water]: 0.00013823 kg; source Michaud, A.R. 2008; lognormal variance with pedigree 0.0493, pedigree (2,2,4,1,2)
  (same comment as for Phosphorus)
  property carbon content, fossil 0; name C_content_fossil
  property wet mass 1 kg; name WM
  property water content 0; name water_content
  property water in wet mass 0 kg; name WWM
  property carbon content, non-fossil 0; name C_content_non_fossil
  property dry mass 1 kg; name DM
- Lead [water, surface water]: 2.4281e-7 kg; lognormal variance with pedigree 0.0887, pedigree (5,2,4,1,2)
  (same comment as for Copper, ion)
- Chromium [soil, agricultural]: 7.12933e-6 kg; lognormal variance with pedigree 0.0887, pedigree (5,2,4,1,2)
  (same comment as for Copper, ion)
- Chromium, ion [water, surface water]: 1.29456e-7 kg; lognormal variance with pedigree 0.0887, pedigree (5,2,4,1,2)
  (same comment as for Copper, ion)
- Copper [soil, agricultural]: -6.13842e-6 kg
  (same comment as for Copper, ion)
- Cadmium [soil, agricultural]: -5.21361e-8 kg
  (same comment as for Copper, ion)
- Zinc [soil, agricultural]: -7.38047e-6 kg
  (same comment as for Copper, ion)
- Glyphosate [soil, agricultural]: 4.3749e-6 kg; lognormal variance with pedigree 0.0743, pedigree (2,2,5,1,2)
  (same comment as for Glyphosate)
- Nitrate [water, ground-]: 0.0581082 kg; lognormal variance with pedigree 0.0493, pedigree (2,2,4,1,2)
  Modelled with the 'SQCB-NO3 model' described in '01 crop production-direct field emissions natural resources v1.2.pdf' available on ecoinvent reports web page (https://ecoquery.ecoinvent.org/File/Reports). Québec average conditions are considered for the SQCB-NO3 model input parameters (see supporting documentation '01 crop production - Québec.pdf' available on ecoinvent reports web page (https://ecoquery.ecoinvent.org/File/Reports)).
- Dinitrogen monoxide [air, non-urban air or from high stacks]: 0.000728219 kg; name N2O; source Rochette, P. 2008; lognormal variance with pedigree 0.0393, pedigree (2,2,4,1,2)
  Direct and indirect N2O emissions from all sources of N input (fertilizers, above- and below-ground crop residues). Modelled with Québec conditions using the Tier 2 approach (IPCC 2006; Rochette et al. 2008; Little et al. 2008, 2013). See supporting documentation '01 crop production - Quebec.pdf' available on ecoinvent reports web page (https://ecoquery.ecoinvent.org/File/Reports).
- Cadmium, ion [water, surface water]: 5.47134e-8 kg; lognormal variance with pedigree 0.0887, pedigree (5,2,4,1,2)
  (same comment as for Copper, ion)
- Lead [soil, agricultural]: -1.65402e-7 kg
  (same comment as for Copper, ion)
- Nickel [soil, agricultural]: -5.42682e-7 kg
  (same comment as for Copper, ion)
- Nitrogen oxides [air, non-urban air or from high stacks]: 0.000235752 kg; lognormal variance with pedigree 0.0173, pedigree (2,2,4,1,2)
  Calculated with an emission factor (EF=0.012 kg NO-N/kg N ) from total N application less NH3-N lost through volatilization. Conversion from NO-N to NO2 with factor=46/14. See supporting documentation '01 crop production - Quebec.pdf' available on ecoinvent reports web page (https://ecoquery.ecoinvent.org/File/Reports).
  property emission ratio 0.21 kg/kg; name NOx_to_N2O
- Water [water, surface water]: 2.25307e-5 m3; = ((MANURE_LIQUID_CATTLE* MANURE_LIQUID_CATTLE_WWM) + (MANURE_LIQUID_SWINE* MANURE_LIQUID_SWINE_WWM) + (MANURE_SOLID_CATTLE* MANURE_SOLID_CATTLE_WWM))* (1-fraction_PW_to_air)*fraction_PWtoW_to_surface_water* UnitConversion(1, 'l', 'm3')
  (same comment as for Water)
- Pesticides, unspecified [soil, agricultural]: 1.7297e-7 kg; lognormal variance with pedigree 0.0743, pedigree (2,2,5,1,2)
  Because of lack of information on the active ingredient of the herbicide input, it is assumed entirely emitted to the soil
- Ammonia [air, non-urban air or from high stacks]: 0.00119025 kg; lognormal variance with pedigree 0.0173, pedigree (2,2,4,1,2)
  NH3 from mineral fertilisers are calculated with the emission factors published in the EMEP guidelines from the European Environment Agency (EEA, 2013). NH3 from manure are calculated according to the caracteristics of every manure, and to Quebec figures for period and method of maqnure application, and delay before incorporation of manure into the soil (Parent et Gagné, 2010; 2013). See supporting documentation '01 crop production - Québec.pdf' available on ecoinvent reports web page (https://ecoquery.ecoinvent.org/File/Reports).

## Sampling procedure
Literature and statistics data, opinions of experts in the field of agricultural production and agroeconomists.

## Extrapolations
This dataset has been extrapolated from year 2012 to the year of the calculation (2021). The uncertainty has been adjusted accordingly.

## Review by Emilia Moreno Ruiz 2015-10-13
activity links to CA-QC machinery added
