# multi-Si wafer production

Dataset: EcoSpold 2, unit process
Geography: RoW
Time period: 1992-01-01 to 2021-12-31
Technology level: current
Classification: EcoSpold01Categories: photovoltaic/production of components
Classification: ISIC rev.4 ecoinvent: 2610:Manufacture of electronic components and boards
Synonyms: silicon; polycrystalline; multi-crystalline
Tags: ConvertedDataset
Scenario: Business-as-Usual
System model: Allocation, cut-off by classification
Share of production covered: 20 %
Generated by: Mariska J. de Wild-Scholten
Published in: Jungbluth, N. 2007
Database: ecoinvent
isCopyrightProtected: true
accessRestrictedTo: 1

## General comment
The reference flow for the life cycle inventory is 1 square metre of wafer surface. The mc-Silicon columns are sawn into square wafers with a size 156x156 mm2 (0.0243 m2) and a thickness 240 um. The weight is 559 g/m2.
[This dataset was already contained in the ecoinvent database version 2. It was not individually updated during the transfer to ecoinvent version 3. Life Cycle Impact Assessment results may still have changed, as they are affected by changes in the supply chain, i.e. in other datasets. This dataset was generated following the ecoinvent quality guidelines for version 2. It may have been subject to central changes described in the ecoinvent version 3 change report (http://www.ecoinvent.org/database/ecoinvent-version-3/reports-of-changes/), and the results of the central updates were reviewed extensively. The changes added e.g. consistent water flows and other information throughout the database. The documentation of this dataset can be found in the ecoinvent reports of version 2, which are still available via the ecoinvent website. The change report linked above covers all central changes that were made during the conversion process.]

## Included activities end
Sawing and cleaning of wafers. The process data include electricity use, water and working material consumption (e.g. stainless steel for saw-blades, argon gas, hydrofluoric and hydrochloric acid). Production wastes to be treated and process-specific NOx- and waterborne pollutants are considered. No data on other process specific air emissions.

## Geography
Europe, Western + North America

## Technology
Use of multi wire saws.

## Time period
Collection of data in 2005. Use of data from an environmental report for a production plant (ca. 3 million wafers per year) and some data from older publications.

## Parameters
- fraction, tap water, to air: 0.15 dimensionless; name fraction_TW_to_air; lognormal variance with pedigree 0.092025, pedigree (4,4,3,2,4)
- fraction, process water, to air: 0.15 dimensionless; name fraction_PW_to_air; lognormal variance with pedigree 0.092025, pedigree (4,4,3,2,4)
- fraction, water, completely softened, to air: 0.15 dimensionless; name fraction_WCS_to_air; lognormal variance with pedigree 0.092025, pedigree (4,4,3,2,4)

## Reference product
- multi-Si wafer: 1 m2; CPC 47173: Parts for the goods of subclasses 47140 to 47160; By-product classification allocatable product
  EcoSpold01Location=RER
  production volume 3.77688e7 m2
    From Table 6.1, ecoinvent v2 report 6_XII, that lists the most important producers of wafers for photovoltaics in the world, in 2005. In the case of producers producing single and multi-Si wafers, or where the type of wafer has not been defined, the production volumes were distributed between single and multi-Si wafer for photovoltaics (distinguishing multi and ribbon), using information in Fig 2.2, and Tab 12.6 ecoinvent v2 report 6_XII).
  property price 42.5575 EUR2005
    Calculated based on inputs: The price of the product has been calculated as a sum of the values of the material and energy inputs for this product. This value is therefore a rough estimation. It may underestimate the real price since there are additional expenses when producing any product. These expences can include for example labour costs, treatment of waste materials and profit for the producer. Please consider carefully whether this level of data quality is acceptable for your application.
  property carbon content 0
    carbon content on a dry matter basis (reserved; not for manual entry)
  properties: water content 0, carbon content, fossil 0, carbon content, non-fossil 0, dry mass 0.559 kg, wet mass 0.559 kg, water in wet mass 0 kg, carbon allocation 0 kg

## Inputs from technosphere
- tap water: 0 kg; name tap_water_input; pedigree (1,1,1,1,1)
  EcoSpold01Location=RER
  De Wild 2007
  Uncertainty: de Wild 2007
  properties: water content 2962.17, dry mass 0.000337476 kg, carbon content, fossil 0.00178991, wet mass 1 kg
  note on carbon content, fossil: Bicarbonate content is 2.93 mol/m3. CO2 content is 0.1 mol/m3 (ecoinvent v2.2 report 8, Tab 93.1).
- silicon, multi-Si, casted: 0 kg; pedigree (1,1,1,1,1)
  Polycrystalline silicon of semiconductor or solar grade quality. This value is the total silicon needed minus internally recycled silicon from ingot cut-offs and broken wafers.
  EcoSpold01Location=RER
  Uncertainty: polycrystalline silicon of semiconductor or solar grade quality. This value is the total silicon needed minus internally recycled silicon from ingot cut-offs and broken wafers.
  properties: wet mass 1 kg, dry mass 1 kg
- alkylbenzene sulfonate, linear, petrochemical: 0.24 kg; lognormal variance with pedigree 0.0421, pedigree (1,2,5,5,1)
  EcoSpold01Location=RER
  De Wild 2007, for wafer cleaning
  Uncertainty: de Wild 2007, for wafer cleaning
  properties: dry mass 1 kg, carbon content, fossil 0.407018, wet mass 1 kg, heating value, net 28.88 MJ
  note on carbon content, fossil: European LAS is a mixture of differ-ent homologues (C10-C13 alkyl chains) including all positional isomers with the exception of 1-alkyl substituted ones. The typical homologue distribution is 15%, 30%, 30% and 25% for C10, C11, C12 and C13 with an average alkyl chain of C11.6 and an average molecular weight of 342 as the sodium salt (ecoinvent v2.2 report 12)
- wafer factory: 4e-6 unit; lognormal variance with pedigree 0.3421, pedigree (1,2,5,5,1)
  Literature
  EcoSpold01Location=DE
  Uncertainty: Literature
- silicon carbide: 2.63 kg; lognormal variance with pedigree 0.0421, pedigree (1,2,5,5,1)
  EcoSpold01Location=RER
  De Wild 2007, SiC use for sawing
  Uncertainty: de Wild 2007, SiC use for sawing
  properties: dry mass 1 kg, carbon content, fossil 0.3, wet mass 1 kg, heating value, net 9.08 MJ
- polystyrene, high impact: 0.2 kg; lognormal variance with pedigree 0.072, pedigree (4,4,5,5,1)
  EcoSpold01Location=RER
  Estimation packaging
  Uncertainty: estimation packaging
  properties: dry mass 1 kg, wet mass 1 kg, heating value, net 38.67 MJ, carbon content, fossil 0.923077
  note on carbon content, fossil: Chemical formula of polystyrene is (C8H8)n (ecoinvent v2.2 report 11_II)
- packaging film, low density polyethylene: 0.1 kg; lognormal variance with pedigree 0.072, pedigree (4,4,5,5,1)
  EcoSpold01Location=RER
  Estimation packaging
  Uncertainty: estimation packaging
  properties: heating value, net 42.47 MJ, carbon content, fossil 0.857143, wet mass 1 kg, dry mass 1 kg
  note on carbon content, fossil: Polyethylene is formed out of a huge amount of ethylene monomers (C2H4) (ecoinvent v2.2 report 11_II). MW=28 g/mol
- acetic acid, without water, in 98% solution state: 0.039 kg; lognormal variance with pedigree 0.0421, pedigree (1,2,5,5,1)
  (same comment as for alkylbenzene sulfonate, linear, petrochemical)
  properties: heating value, net 14.6 MJ, carbon content, fossil 0.400016, wet mass 1 kg, dry mass 1 kg
  note on heating value, net: Based on literature, page 10, Althaus H.-J., Chudacoff M., Hischier R., Jungbluth N., Osses M. and Primas A. (2007) Life Cycle Inventories of Chemicals. Final report ecoinvent data v2.0 No. 8. EMPA, Swiss Centre for Life Cycle Inventories, Dübendorf, CH, Online-Version under: www.ecoinvent.org.
- sodium hydroxide, without water, in 50% solution state: 0.015 kg; lognormal variance with pedigree 0.0421, pedigree (1,2,5,5,1)
  De Wild 2007, for wafer cleaning
  EcoSpold01Location=RER
  Uncertainty: de Wild 2007, for wafer cleaning
  properties: heating value, net 3.03 MJ, dry mass 1 kg, wet mass 1 kg
- waste, from silicon wafer production: -0.17 kg; lognormal variance with pedigree 0.0421, pedigree (1,2,5,5,1)
  EcoSpold01Location=DE
  De Wild 2007, estimate for unused parts of crystal
  Uncertainty: de Wild 2007, estimate for unused parts of crystal
  production volume 6.4207e6 kg
    Calculated from the production volume of multi-Si wafer in proportion to the respective output amounts.
  properties: carbon content, fossil 0.0347496, wet mass 1 kg, dry mass 1 kg
- electricity, medium voltage: 0 kWh; pedigree (1,1,1,1,1)
  EcoSpold01Location=UCTE
  Estimation based on literature data, high range of literature values
  Uncertainty: Estimation based on literature data, high range of literature values
- brass: 0.00745 kg; lognormal variance with pedigree 0.0421, pedigree (1,2,5,5,1)
  De Wild 2007, wire saws, high resistance brass-coated steel with carbon content in the range 0.7%-0.9%, 5g/kg brass
  EcoSpold01Location=CH
  Uncertainty: de Wild 2007, wire saws, high resistance brass-coated steel with carbon content in the range 0.7%-0.9%, 5g/kg brass
  properties: dry mass 1 kg, wet mass 1 kg
- steel, low-alloyed, hot rolled: 1.4826 kg; lognormal variance with pedigree 0.0421, pedigree (1,2,5,5,1)
  De Wild 2007, wire saws, high resistance brass-coated steel with carbon content in the range 0.7%-0.9%, 5g/kg brass
  EcoSpold01Location=RER
  Uncertainty: de Wild 2007, wire saws, high resistance brass-coated steel with carbon content in the range 0.7%-0.9%, 5g/kg brass
  properties: dry mass 1 kg, wet mass 1 kg, carbon content, fossil 0.005
  note on carbon content, fossil: Low alloyed steel composition given in Tab. 3.2 ecoinvent v2.2 report 10_partII. Steel assumed to have a C content of 0.5%
- glass wool mat: 0.01 kg; lognormal variance with pedigree 0.0427, pedigree (2,2,5,5,1)
  EcoSpold01Location=CH
  De Wild 2007, for temporarily attachment of bricks to wire sawing equipment
  Uncertainty: de Wild 2007, for temporarily attachment of bricks to wire sawing equipment
  properties: carbon content, fossil 0.0107327, wet mass 1 kg, dry mass 1 kg
  note on carbon content, fossil: A share of 16 w-% for the binders is taken into account. The binder used in this study is a mixture of phenol, formaldehyde and urea resins (ecoinvent v2.2 report 16_part XIV), and the C content was calculated as a weigthed average of phenol, formaldehyde and urea C content.
- dipropylene glycol monomethyl ether: 0.3 kg; lognormal variance with pedigree 0.0421, pedigree (1,2,5,5,1)
  (same comment as for sodium hydroxide, without water, in 50% solution state)
  properties: carbon content, fossil 0.567568, dry mass 1 kg, wet mass 1 kg, heating value, net 30.27 MJ
- triethylene glycol: 2.71 kg; lognormal variance with pedigree 0.0421, pedigree (1,2,5,5,1)
  For sawing slurry, de Wild 2007
  EcoSpold01Location=RER
  Uncertainty: For sawing slurry, de Wild 2007
  properties: carbon content, fossil 0.479881, wet mass 1 kg, dry mass 1 kg, heating value, net 25.84 MJ
- wire drawing, steel: 1.49 kg; lognormal variance with pedigree 0.0421, pedigree (1,2,5,5,1)
  EcoSpold01Location=RER
  De Wild 2007, wire saws
  Uncertainty: de Wild 2007, wire saws
- paper, woodfree, coated: 0.19 kg; lognormal variance with pedigree 0.056, pedigree (3,4,5,5,1)
  Hagedorn 1992
  EcoSpold01Location=RER
  Uncertainty: Hagedorn 1992
  properties: carbon content, fossil 0.0590617, water content 0.0582011, wet mass 1 kg, carbon content, non-fossil 0.22775, dry mass 0.945 kg, heating value, net 14.11 MJ
  note on carbon content, fossil: Fossil C content was calculated after fossil C contents of chemicals used in the production of the paper (in Tab 8.72 & 8.73 ecoinvent v2.2 report 11_III, part 8).
  note on carbon content, non-fossil: Biogenic C content was calculated after biogenic C contents of chemicals used in the production of the paper (in Tab 8.72 & 8.73 ecoinvent v2.2 report 11_III, part 8). The cellulose content in 1 kg of paper (on a wet mas basis) was estimated as (1-chemical content), C content of cellulose was considered 0.44 kgC/kg dry mass (ecoinvent v2.2 report, n 15a, pg 40)
- hydrochloric acid, without water, in 30% solution state: 0.0027 kg; lognormal variance with pedigree 0.0421, pedigree (1,2,5,5,1)
  (same comment as for sodium hydroxide, without water, in 50% solution state)
  properties: wet mass 1 kg, dry mass 1 kg, heating value, net 3.32 MJ
- acrylic binder, without water, in 34% solution state: 0.002 kg; lognormal variance with pedigree 0.0421, pedigree (1,2,5,5,1)
  EcoSpold01Location=RER
  De Wild 2007, adhesive for temporarily attachment of bricks to wire-sawing equipment
  Uncertainty: de Wild 2007, adhesive for temporarily attachment of bricks to wire-sawing equipment
  properties: carbon content, fossil 0.599846, dry mass 1 kg, wet mass 1 kg, heating value, net 18.18 MJ
  note on carbon content, fossil: The acrylic acid ethyl ester (ethyl acrylate) is used for both solvent- and water-based paints, and in textiles as a binder in nonwoven fabrics and flocking (Acrylic acid and derivatives: uses, Ullmann). It was used as a representative example of acrylic binders. Its formula is C5H8O2
- heat, district or industrial, natural gas: 0 MJ; pedigree (1,1,1,1,1)
  De Wild 2007, for removing adhesive after sawing
  EcoSpold01Location=RER
  Uncertainty: de Wild 2007, for removing adhesive after sawing
  properties: heating value, net 1 MJ
- water, completely softened: 0 kg; name water_softened_input; pedigree (1,1,1,1,1)
  (same comment as for sodium hydroxide, without water, in 50% solution state)
  properties: wet mass 1 kg
- tap water: 9.33961e-5, 1.12424e-5, 1.85799e-5, 0.000468511, 1.21882e-5, 3.46691e-5, 0.00536141 kg (7 entries); lognormal variance with pedigree 0.0421, pedigree (1,2,5,5,1)
  EcoSpold01Location=RER
  De Wild 2007
  Uncertainty: de Wild 2007
- silicon, multi-Si, casted: 0.0101315, 1.13007 kg (2 entries); lognormal variance with pedigree 0.0421, pedigree (1,2,5,5,1)
  (same comment as for silicon, multi-Si, casted)
- electricity, medium voltage: 0.100842, 0.0193371, 0.324629, 4.72144, 0.665489, 2.16826 kWh (6 entries); lognormal variance with pedigree 0.176, pedigree (3,4,5,5,1)
  (same comment as for electricity, medium voltage)
- heat, district or industrial, natural gas: 0.0546414, 3.54536 MJ (2 entries); lognormal variance with pedigree 0.0421, pedigree (1,2,5,5,1)
  (same comment as for heat, district or industrial, natural gas)
- water, completely softened: 27.8264, 37.1736 kg (2 entries); lognormal variance with pedigree 0.0421, pedigree (1,2,5,5,1)
  (same comment as for sodium hydroxide, without water, in 50% solution state)

## Emissions to nature
- Chromium, ion [water, surface water]: 3.0254e-5 kg; lognormal variance with pedigree 0.3546, pedigree (2,4,5,5,1)
  Environmental report Wacker 2000
  Uncertainty: Environmental report Wacker 2000
- AOX, Adsorbable Organic Halogen as Cl [water, surface water]: 0.00050129 kg; lognormal variance with pedigree 0.0946, pedigree (2,4,5,5,1)
  Environmental report Wacker 2006, formed by nitric acid use
  Uncertainty: Environmental report Wacker 2006, formed by nitric acid use
- Mercury [water, surface water]: 6.0508e-6 kg; lognormal variance with pedigree 0.7046, pedigree (2,4,5,5,1)
  Environmental report Wacker 2000
  Uncertainty: Environmental report Wacker 2000
- Cadmium, ion [water, surface water]: 6.0508e-6 kg; lognormal variance with pedigree 0.3546, pedigree (2,4,5,5,1)
  Environmental report Wacker 2000
  Uncertainty: Environmental report Wacker 2000
- DOC, Dissolved Organic Carbon [water, surface water]: 0.011083 kg; lognormal variance with pedigree 0.096, pedigree (3,4,5,5,1)
  Extrapolation for sum parameter
  Uncertainty: Extrapolation for sum parameter
- Nickel, ion [water, surface water]: 6.0508e-5 kg; lognormal variance with pedigree 0.7046, pedigree (2,4,5,5,1)
  Environmental report Wacker 2000
  Uncertainty: Environmental report Wacker 2000
- Phosphate [water, surface water]: 0.00050129 kg; lognormal variance with pedigree 0.0946, pedigree (2,4,5,5,1)
  Environmental report Wacker 2006
  Uncertainty: Environmental report Wacker 2006
- Nitrogen [water, surface water]: 0.0099449 kg; lognormal variance with pedigree 0.0946, pedigree (2,4,5,5,1)
  Environmental report Wacker 2006, 50% of total emissions
  Uncertainty: Environmental report Wacker 2006, 50% of total emissions
- Copper, ion [water, surface water]: 6.0508e-5 kg; lognormal variance with pedigree 0.3546, pedigree (2,4,5,5,1)
  Environmental report Wacker 2000
  Uncertainty: Environmental report Wacker 2000
- Water [water, unspecified]: 0.0552551 m3; name water_to_water_unspecified; lognormal variance with pedigree 0.0827, pedigree (2,2,5,5,1)
  Calculated value based on literature values and expert opinion. See comments in the parametres' comment field.
  property carbon content, non-fossil 0; name C_content_non_fossil
  property wet mass 1000 kg; name WM
  property dry mass 0 kg; name DM
  property fraction, origin: salt water 0; name fraction_origin_salt_water_Ww
  property fraction, origin: unspecified 0; name fraction_origin_unspecified_Ww
  property fraction, origin: fresh water 1; name fraction_origin_fresh_water_Ww
  property water in wet mass 1000 kg; name WWM
  property carbon content, fossil 0; name C_content_fossil
- TOC, Total Organic Carbon [water, surface water]: 0.011083 kg; lognormal variance with pedigree 0.096, pedigree (3,4,5,5,1)
  Extrapolation for sum parameter
  Uncertainty: Extrapolation for sum parameter
- Water [air, unspecified]: 0.0097509 m3; name water_to_air_unspecified; lognormal variance with pedigree 0.0827, pedigree (2,2,5,5,1)
  (same comment as for Water)
  property fraction, origin: unspecified 0; name fraction_origin_unspecified
  property fraction, origin: salt water 0; name fraction_origin_salt_water
  property fraction, origin: fresh water 1; name fraction_origin_fresh_water
- COD, Chemical Oxygen Demand [water, surface water]: 0.029555 kg; lognormal variance with pedigree 0.0946, pedigree (2,4,5,5,1)
  Environmental report Wacker 2000
  Uncertainty: Environmental report Wacker 2000
- BOD5, Biological Oxygen Demand [water, surface water]: 0.029555 kg; lognormal variance with pedigree 0.096, pedigree (3,4,5,5,1)
  Extrapolation for sum parameter
  Uncertainty: Extrapolation for sum parameter
- Lead [water, surface water]: 3.0254e-5 kg; lognormal variance with pedigree 0.7046, pedigree (2,4,5,5,1)
  Environmental report Wacker 2000
  Uncertainty: Environmental report Wacker 2000

## Sampling procedure
Data collection by factory representatives. Environmental report and LCA studies.

## Extrapolations
Rough assumption for electricity use. This dataset has been copied from an original dataset covering the geography RER. The uncertainty has been adjusted accordingly.

## Review by Roberto Dones 2007-08-23
Passed.
none
