# treatment of bilge oil, hazardous waste incineration, with energy recovery

Dataset: EcoSpold 2, unit process
Geography: Europe without Switzerland
Time period: 1997-01-01 to 2021-12-31
Technology level: current
Classification: ISIC rev.4 ecoinvent: 3822:Treatment and disposal of hazardous waste
Tags: Treatment
Scenario: Business-as-Usual
System model: Allocation, cut-off by classification
Generated by: [System]
Database: ecoinvent
isCopyrightProtected: true
accessRestrictedTo: 1

## General comment
Inventoried waste contains 100% bilge oil; . waste composition (wet, in ppm): upper heating value 4.098 MJ/kg; lower heating value 1.92 MJ/kg; H2O 900000; O 1300; H 10000; C 84000; S 3650; N 1000; P 0.0004; B n.a.; Cl n.a.; Br n.a.; F n.a.; I n.a.; Ag n.a.; As n.a.; Ba n.a.; Cd n.a.; Co n.a.; Cr n.a.; Cu n.a.; Hg n.a.; Mn n.a.; Mo n.a.; Ni 0.079; Pb 0.001; Sb n.a.; Se n.a.; Sn n.a.; V 33.1; Zn n.a.; Be n.a.; Sc n.a.; Sr n.a.; Ti n.a.; Tl n.a.; W n.a.; Si 0.6; Fe 2.8; Ca 0.6; Al n.a.; K n.a.; Mg n.a.; Na 3.5; Share of carbon in waste that is biogenic 0%. Net energy produced in HWI: 17.11MJ/kg thermal energy and 1.27MJ/kg electric energy. Allocation of energy production: no substitution or expansion. 100% of burden allocated to waste disposal function of HWI. One kg of this waste produces 0.001425 kg of residues, which are landfilled. Additional solidification with 0.0005702 kg of cement.

## Included activities end
waste-specific air and water emissions from incineration, auxiliary material consumption for flue gas cleaning. Short-term emissions to river water and long-term emissions to ground water from residual material landfill (from solidified fly ashes and scrubber slugde). Process energy demands for HWI.

## Geography
Specific to the technology encountered in Switzerland in 2000. Well applicable to modern incineration practices in Europe or North America or Japan.

## Technology
Swiss HWI plant in 2000 with wet flue gas scrubber and low-dust SCR DeNOx facility. Gross thermal efficiency 74.4% and gross electric efficiency 10%.

## Time period
Transfer coefficients for modern Swiss MSWI. Emission speciation based on early 90ies data.

## Parameters
- fraction, process water, to air: 1 dimensionless; name fraction_PW_to_air; lognormal variance with pedigree 0.092025, pedigree (4,4,3,2,4)

## Reference product
- bilge oil: -1 kg; name RP; CPC 39: Wastes or scraps; By-product classification Waste
  production volume 1.288 kg; name PV_RP; = 4*0.322
    This is a placeholder value that does not reflect real-world production volumes. This dataset does not currently require a real-world production volume to work in the database framework, and no actual data were collected yet. This has no negative effect on the results of the ecoinvent database. The placeholder value of this activity was scaled according to the nominal GDP of 2005 (source: United Nations, http://data.un.org/Glossary.aspx?q=GDP+%28current+US%24%29, accessed 20130726) to reflect an appropriate share of the global production volume, which is also a placeholder value. The GDP of Europe without Switzerland in 2005 was 32.2% of the global GDP.
  property price 0 EUR2005; name RP_price_EUR2005
    Waste products are assigned a price of zero as they are assumed to require further treatment.
  property carbon content, fossil 0.84
    Tab A.6, ecoinvent v2.2 report 13_I. C content has been calculated after data in the tables, and then referred to 1 kg DM
  property heating value, net 1.92 MJ
    Value taken from the general comment of the treatment dataset.
  property carbon content 0.84
    carbon content on a dry matter basis (reserved; not for manual entry)
  properties: water in wet mass 0.9 kg, dry mass 0.1 kg, water content 9, carbon content, non-fossil 0, wet mass 1 kg, carbon allocation 0.084 kg

## By-products
- electricity, for reuse in municipal waste incineration only: 0 kWh; name BP3; CPC 17100: Electrical energy; By-product classification allocatable product; pedigree (1,1,1,1,1)
  production volume 0.454378 kWh; = BP3*PV_RP/ABS(RP)
    Calculated based on the production volume of the reference product.
  property price 0.1 EUR2005; name BP3_price_EUR2005
    Estimated to be the same price as in case of electricity, medium voltage.
- heat, for reuse in municipal waste incineration only: 0 MJ; name BP2; By-product classification allocatable product; CPC 17300: Steam and hot water; pedigree (1,1,1,1,1)
  production volume 22.0377 MJ; = BP2*PV_RP/ABS(RP)
    Calculated based on the production volume of the reference product.
  property price 0.0106 EUR2005; name BP2_price_EUR2005
    Average European district heat price from Ecoheatcool and Euroheat 2005-2006, Ecoheat Work package 1: The European heat market. Final report. 10.6 EUR/GJ i s the price of district heat. http://www.solarthermalworld.org/files/Ecoheatcool%20WP1%20Web.pdf?download

## Inputs from technosphere
- ammonia, anhydrous, liquid: 3.6469e-5 kg; lognormal variance with pedigree 1.192, pedigree (1,1,5,5,1)
  uncertainty calculated from uncertainty in average DeNOx input, uncertainty in the share of thermal NOx, uncertainty of nitrogen content in average municipal waste and the unertainty in nitrogen content in *this* waste.
  properties: dry mass 1 kg, wet mass 1 kg
- chemical, inorganic: 1.5023e-5 kg; lognormal variance with pedigree 0.412, pedigree (1,1,5,5,1)
  Proxy for Polyelectrolyte. uncertainty calculated from uncertainty in average auxiliary material input, and the unertainty of the waste composition of this waste
  properties: dry mass 1 kg, wet mass 1 kg, carbon content, fossil 0.003
  note on carbon content, fossil: This dataset is an unweighted average of 20 inorganic substances (listed in Tab 88.1, ecoinvent v2.2 report 8, part II), being part of the top100 chemicals included in this database. The C-content has also been calculated as an unweighted average of the C content of the substances composing this dataset.
- hydrogen peroxide, without water, in 50% solution state: 1.6415e-5 kg; lognormal variance with pedigree 0.552, pedigree (1,1,5,5,1)
  uncertainty calculated from uncertainty in average auxiliary material input, and the unertainty of the waste composition of this waste
  properties: wet mass 1 kg, heating value, net 7.13 MJ, dry mass 1 kg
- cement, unspecified: 0.00057019 kg; lognormal variance with pedigree 0.162, pedigree (1,1,5,5,1)
  Cement for solidification of landfilled residual material. Uncertainty calculated from unertainty of the waste composition of this waste, of transfer coefficients in the incinerator and of the solidification recipe.
  properties: dry mass 1 kg, wet mass 1 kg
- calcium chloride: 1.387e-9 kg; lognormal variance with pedigree 1.992, pedigree (1,1,5,5,1)
  (same comment as for hydrogen peroxide, without water, in 50% solution state)
  properties: wet mass 1 kg, dry mass 1 kg
- hazardous waste incineration facility: 1.25e-9 unit; lognormal variance with pedigree 0.042, pedigree (1,1,5,5,1)
  demands per kilogram waste. uncertainty is heeded in the module
- iron (III) chloride, without water, in 40% solution state: 1.9233e-5 kg; lognormal variance with pedigree 1.202, pedigree (1,1,5,5,1)
  (same comment as for hydrogen peroxide, without water, in 50% solution state)
  properties: wet mass 1 kg, dry mass 1 kg
- process-specific burdens, hazardous waste incineration plant: 1 kg; lognormal variance with pedigree 0.042, pedigree (1,1,5,5,1)
  demands per kilogram waste. uncertainty is heeded in the module
- residual material landfill: 2.9698e-12 unit; lognormal variance with pedigree 0.152, pedigree (1,1,5,5,1)
  uncertainty is calculated from uncertainties in waste composition and transfer coefficients in incinerator
- heat, district or industrial, natural gas: 0.017802 MJ; lognormal variance with pedigree 1.282, pedigree (1,1,5,5,1)
  (same comment as for ammonia, anhydrous, liquid)
  properties: heating value, net 1 MJ
- heat, central or small-scale, other than natural gas: 19.8152 MJ; lognormal variance with pedigree 0.092, pedigree (1,1,5,5,1)
  Uncertainty dependent on total energy required and heating value present, using experimental GSd for substraction from uc=A*GSDa^2-B
  properties: heating value, net 1 MJ
- chromium: 2.9226e-8 kg; lognormal variance with pedigree 1.562, pedigree (1,1,5,5,1)
  Proxy for vanadium pentoxide V2O5 in SCR catalyst. uncertainty calculated from uncertainty in average DeNOx input, uncertainty in the share of thermal NOx, uncertainty of nitrogen content in average municipal waste and the unertainty in nitrogen content in *this* waste.
  properties: dry mass 1 kg, wet mass 1 kg
- sodium hydroxide, without water, in 50% solution state: 0.0091701 kg; lognormal variance with pedigree 0.552, pedigree (1,1,5,5,1)
  (same comment as for hydrogen peroxide, without water, in 50% solution state)
  properties: dry mass 1 kg, heating value, net 3.03 MJ, wet mass 1 kg
- hydrochloric acid, without water, in 30% solution state: 9.0136e-6 kg; lognormal variance with pedigree 0.412, pedigree (1,1,5,5,1)
  (same comment as for hydrogen peroxide, without water, in 50% solution state)
  properties: dry mass 1 kg, wet mass 1 kg, heating value, net 3.32 MJ
- quicklime, milled, packed: 0.0017439 kg; lognormal variance with pedigree 0.552, pedigree (1,1,5,5,1)
  (same comment as for hydrogen peroxide, without water, in 50% solution state)
  properties: dry mass 0.99 kg, water content 0.010101, wet mass 1 kg
- waste cement, hydrated: -0.0014255 kg; name BP1; lognormal variance with pedigree 0.162, pedigree (1,1,5,5,1)
  Hydrated cement for solidification of landfilled residual material. Uncertainty calculated from unertainty of the waste composition of this waste and transfer coefficients in the incinerator and of the solidification recipe.
  production volume 0.00183604 kg; = BP1*PV_RP/ABS(RP)
    Calculated from the production volume of bilge oil, 90% water in proportion to the respective output amounts.
  property price 0 EUR2005; name BP1_price_EUR2005
  properties: dry mass 1 kg, wet mass 1 kg
- titanium dioxide: 1.4321e-6 kg; lognormal variance with pedigree 1.562, pedigree (1,1,5,5,1)
  (same comment as for ammonia, anhydrous, liquid)
  properties: dry mass 1 kg, wet mass 1 kg
- process-specific burdens, residual material landfill: 0.0014255 kg; lognormal variance with pedigree 0.152, pedigree (1,1,5,5,1)
  uncertainty is calculated from uncertainties in waste composition and transfer coefficients in incinerator;activityLink introduced to establish a direct link to the corresponding regional supply of this product

## Emissions to nature
- Silicon [air, urban air close to ground]: 1.3968e-9 kg; lognormal variance with pedigree 1.692, pedigree (1,1,5,5,1)
  (same comment as for residual material landfill)
- COD, Chemical Oxygen Demand [water, surface water]: 4.2208e-6 kg; lognormal variance with pedigree 0.432, pedigree (1,1,5,5,1)
  uncertainty is calculated from uncertainties in waste composition and transfer coefficients in incinerator and landfills
- Sodium [air, urban air close to ground]: 3.293e-8 kg; lognormal variance with pedigree 1.462, pedigree (1,1,5,5,1)
  (same comment as for residual material landfill)
- Sulfur dioxide [air, urban air close to ground]: 4.38e-6 kg; lognormal variance with pedigree 0.552, pedigree (1,1,5,5,1)
  (same comment as for residual material landfill)
- Carbon dioxide, fossil [air, urban air close to ground]: 0.30458 kg; lognormal variance with pedigree 0.182, pedigree (1,1,5,5,1)
  calculated from uncertainty in carbon in waste and transfer coefficients
- DOC, Dissolved Organic Carbon [water, surface water]: 1.8466e-6 kg; lognormal variance with pedigree 0.432, pedigree (1,1,5,5,1)
  (same comment as for COD, Chemical Oxygen Demand)
- BOD5, Biological Oxygen Demand [water, surface water]: 4.2208e-6 kg; lognormal variance with pedigree 0.432, pedigree (1,1,5,5,1)
  (same comment as for COD, Chemical Oxygen Demand)
- Water [air, unspecified]: 0.0009 m3; name water_to_air_unspecified; lognormal variance with pedigree 0.0827, pedigree (2,2,5,5,1)
  Calculated value based on water balance.
  property wet mass 1000 kg; name WM
  property dry mass 0 kg; name DM
  property fraction, origin: fresh water 0; name fraction_origin_fresh_water
  property carbon content, fossil 0; name C_content_fossil
  property water in wet mass 1000 kg; name WWM
  property fraction, origin: salt water 0; name fraction_origin_salt_water
  property fraction, origin: unspecified 1; name fraction_origin_unspecified
  property carbon content, non-fossil 0; name C_content_non_fossil
- Silicon [water, surface water]: 1.3462e-9 kg; lognormal variance with pedigree 2.222, pedigree (1,1,5,5,1)
  (same comment as for COD, Chemical Oxygen Demand)
- Iron, ion [water, surface water]: 2.2492e-6 kg; lognormal variance with pedigree 1.482, pedigree (1,1,5,5,1)
  (same comment as for COD, Chemical Oxygen Demand)
- Lead [water, surface water]: 2.7219e-14 kg; lognormal variance with pedigree 2.102, pedigree (1,1,5,5,1)
  (same comment as for COD, Chemical Oxygen Demand)
- Phosphate [water, ground-, long-term]: 2.6962e-10 kg; lognormal variance with pedigree 2.522, pedigree (1,1,5,5,1)
  Long-term emissions from landfilling of incineration residues. uncertainty is calculated from uncertainties in waste composition and transfer coefficients in incinerator and landfills.
- Nitrate [water, ground-, long-term]: 3.5923e-5 kg; lognormal variance with pedigree 0.712, pedigree (1,1,5,5,1)
  (same comment as for Phosphate)
- Calcium [air, urban air close to ground]: 1.0002e-9 kg; lognormal variance with pedigree 1.692, pedigree (1,1,5,5,1)
  (same comment as for residual material landfill)
- Sulfate [water, ground-, long-term]: 0.00041838 kg; lognormal variance with pedigree 0.542, pedigree (1,1,5,5,1)
  (same comment as for Phosphate)
- Nickel, ion [water, ground-, long-term]: 2.2732e-8 kg; lognormal variance with pedigree 2.222, pedigree (1,1,5,5,1)
  (same comment as for Phosphate)
- Calcium, ion [water, surface water]: 9.0358e-11 kg; lognormal variance with pedigree 2.582, pedigree (1,1,5,5,1)
  (same comment as for COD, Chemical Oxygen Demand)
- Nitrate [water, surface water]: 1.2791e-5 kg; lognormal variance with pedigree 0.502, pedigree (1,1,5,5,1)
  (same comment as for COD, Chemical Oxygen Demand)
- Vanadium, ion [water, ground-, long-term]: 2.5438e-5 kg; lognormal variance with pedigree 1.172, pedigree (1,1,5,5,1)
  (same comment as for Phosphate)
- TOC, Total Organic Carbon [water, ground-, long-term]: 0.00059708 kg; lognormal variance with pedigree 0.232, pedigree (1,1,5,5,1)
  (same comment as for Phosphate)
- Sodium, ion [water, surface water]: 1.3011e-6 kg; lognormal variance with pedigree 1.472, pedigree (1,1,5,5,1)
  (same comment as for COD, Chemical Oxygen Demand)
- Lead [water, ground-, long-term]: 5.1868e-12 kg; lognormal variance with pedigree 8.882, pedigree (1,1,5,5,1)
  (same comment as for Phosphate)
- Cyanide [air, urban air close to ground]: 8.901e-7 kg; lognormal variance with pedigree 1.32, pedigree (5,5,5,5,5)
  uncertainty calculated from uncertainty for proxy (from MSWI), uncertainty in average N-emissions, uncertainty in the share of thermal NOx, uncertainty of nitrogen content in average municipal waste and the unertainty in nitrogen content in *this* waste.
- DOC, Dissolved Organic Carbon [water, ground-, long-term]: 0.00059708 kg; lognormal variance with pedigree 0.232, pedigree (1,1,5,5,1)
  (same comment as for Phosphate)
- COD, Chemical Oxygen Demand [water, ground-, long-term]: 0.0013647 kg; lognormal variance with pedigree 0.232, pedigree (1,1,5,5,1)
  (same comment as for Phosphate)
- Phosphorus [air, urban air close to ground]: 2.8e-13 kg; lognormal variance with pedigree 1.982, pedigree (1,1,5,5,1)
  (same comment as for residual material landfill)
- Ammonia [air, urban air close to ground]: 9.89e-7 kg; lognormal variance with pedigree 1.232, pedigree (1,1,5,5,1)
  uncertainty calculated from uncertainty in average N-emissions, uncertainty in the share of thermal NOx, uncertainty of nitrogen content in average municipal waste and the unertainty in nitrogen content in *this* waste.
- Iron [air, urban air close to ground]: 1.96e-9 kg; lognormal variance with pedigree 1.502, pedigree (1,1,5,5,1)
  (same comment as for residual material landfill)
- Sodium, ion [water, ground-, long-term]: 2.166e-6 kg; lognormal variance with pedigree 1.452, pedigree (1,1,5,5,1)
  (same comment as for Phosphate)
- Vanadium, ion [water, surface water]: 8.1556e-8 kg; lognormal variance with pedigree 1.682, pedigree (1,1,5,5,1)
  (same comment as for COD, Chemical Oxygen Demand)
- Silicon [water, ground-, long-term]: 5.9726e-7 kg; lognormal variance with pedigree 1.682, pedigree (1,1,5,5,1)
  (same comment as for Phosphate)
- Nickel [air, urban air close to ground]: 5.53e-11 kg; lognormal variance with pedigree 1.982, pedigree (1,1,5,5,1)
  (same comment as for residual material landfill)
- Dinitrogen monoxide [air, urban air close to ground]: 3.5604e-6 kg; lognormal variance with pedigree 1.32, pedigree (5,5,5,5,5)
  (same comment as for Cyanide)
- BOD5, Biological Oxygen Demand [water, ground-, long-term]: 0.0013647 kg; lognormal variance with pedigree 0.232, pedigree (1,1,5,5,1)
  (same comment as for Phosphate)
- Sulfate [water, surface water]: 0.010525 kg; lognormal variance with pedigree 0.532, pedigree (1,1,5,5,1)
  (same comment as for COD, Chemical Oxygen Demand)
- Phosphate [water, surface water]: 1.9205e-11 kg; lognormal variance with pedigree 1.912, pedigree (1,1,5,5,1)
  (same comment as for COD, Chemical Oxygen Demand)
- TOC, Total Organic Carbon [water, surface water]: 1.8466e-6 kg; lognormal variance with pedigree 0.432, pedigree (1,1,5,5,1)
  (same comment as for COD, Chemical Oxygen Demand)
- Calcium, ion [water, ground-, long-term]: 5.4125e-8 kg; lognormal variance with pedigree 3.122, pedigree (1,1,5,5,1)
  (same comment as for Phosphate)
- Nickel, ion [water, surface water]: 1.6193e-8 kg; lognormal variance with pedigree 1.962, pedigree (1,1,5,5,1)
  (same comment as for COD, Chemical Oxygen Demand)
- Nitrogen oxides [air, urban air close to ground]: 2.5714e-5 kg; lognormal variance with pedigree 1.232, pedigree (1,1,5,5,1)
  (same comment as for Ammonia)
- Iron, ion [water, ground-, long-term]: 2.7506e-9 kg; lognormal variance with pedigree 8.492, pedigree (1,1,5,5,1)
  (same comment as for Phosphate)
- Carbon monoxide, fossil [air, urban air close to ground]: 1.2076e-5 kg; lognormal variance with pedigree 0.712, pedigree (1,4,5,5,3)
  1 plant for waste solvent incineration in Switzerland
- Vanadium [air, urban air close to ground]: 3.31e-9 kg; lognormal variance with pedigree 1.182, pedigree (1,1,5,5,1)
  (same comment as for residual material landfill)
- Lead [air, urban air close to ground]: 3.7119e-14 kg; lognormal variance with pedigree 2.002, pedigree (1,1,5,5,1)
  (same comment as for residual material landfill)

## Sampling procedure
Extrapolated from the global dataset based on Swiss values. The 2 Swiss HWI plants, used as the inventory reference technology mix, have a total annual capacity of 53'000 tons of hazardous waste. This corresponds to 39% of the Swiss total installed capacity in 2000. Swiss average plants size is 20'000 t/a.

## Extrapolations
This dataset has been extrapolated from year 2000 to the year of the calculation (2021). The uncertainty has been adjusted accordingly.
