# sealing tape production, aluminium/PE, 50 mm wide

Dataset: EcoSpold 2, unit process
Geography: RER
Time period: 2003-01-01 to 2021-12-31
Technology level: current
Classification: EcoSpold01Categories: ventilation/production of components
Classification: ISIC rev.4 ecoinvent: 2220:Manufacture of plastics products
Tags: ConvertedDataset
Scenario: Business-as-Usual
System model: Allocation, cut-off by classification
Generated by: Alex Primas
Published in: Hässig, W. 2007
Database: ecoinvent
isCopyrightProtected: true
accessRestrictedTo: 1

## General comment
Production of a typical component used for a ventilation system in a multi family house. The house considered in the investigation includes 6 flats with 130 m2 floor area each and a ventilation rate of 120 m3/h.
[This dataset was already contained in the ecoinvent database version 2. It was not individually updated during the transfer to ecoinvent version 3. Life Cycle Impact Assessment results may still have changed, as they are affected by changes in the supply chain, i.e. in other datasets. This dataset was generated following the ecoinvent quality guidelines for version 2. It may have been subject to central changes described in the ecoinvent version 3 change report (http://www.ecoinvent.org/database/ecoinvent-version-3/reports-of-changes/), and the results of the central updates were reviewed extensively. The changes added e.g. consistent water flows and other information throughout the database. The documentation of this dataset can be found in the ecoinvent reports of version 2, which are still available via the ecoinvent website. The change report linked above covers all central changes that were made during the conversion process.]

## Included activities end
Materials used for the production. Estimation of electricity use for the different production steps. Energy use for heating of the production building. Transport of raw materials to the plant. Estimation for the Infrastructure of the Production site included.

## Geography
Data for production in Germany used.

## Technology
Tape made of Polyethylene, laminated with aluminium foil and acrylic glue as adherent layer. Weight 0.057 kg/m

## Time period
Materials investigated in 2003

## Reference product
- sealing tape, aluminium/PE, 50 mm wide: 1 m; By-product classification allocatable product; CPC 36920: Self-adhesive plates, sheets, film, foil, tape, strip and other flat shapes, of plastics
  EcoSpold01Location=RER
  production volume 1.32237 m
    This is a placeholder value that does not reflect real-world production volumes. This dataset does not currently require a real-world production volume to work in the database framework, and no actual data were collected yet. This has no negative effect on the results of the ecoinvent database. The placeholder value of this activity was scaled according to the nominal GDP of 2005 (source: United Nations, http://data.un.org/Glossary.aspx?q=GDP+%28current+US%24%29, accessed 20130726) to reflect an appropriate share of the global production volume, which is also a placeholder value.
  property price 0.226 EUR2005
    From UN trade-database. Import data. (USD/kg). Category: Rubberised textile adhesive tape < 20cm wide. Weight per meter 0.057 kg
  property carbon content, fossil 0.707644
    C content calculated as the addition of the C contents in the final product components (Tape made of Polyethylene, laminated with aluminium foil and acrylic glue as adherent layer)
  property carbon content 0.707644
    carbon content on a dry matter basis (reserved; not for manual entry)
  properties: carbon content, non-fossil 0, water content 0, dry mass 0.057 kg, water in wet mass 0 kg, wet mass 0.057 kg, carbon allocation 0.0403357 kg

## Inputs from technosphere
- sheet rolling, aluminium: 0.00567 kg; lognormal variance with pedigree 0.054, pedigree (3,4,5,1,1)
  Questionnaire, estimations
  EcoSpold01Location=RER
  Uncertainty: Questionnaire, estimations
- heat, district or industrial, natural gas: 0.11305 MJ; lognormal variance with pedigree 0.076, pedigree (4,5,5,1,1)
  Data estimated from related companies
  EcoSpold01Location=RER
  Uncertainty: Data estimated from related companies
  properties: heating value, net 1 MJ
- packaging film, low density polyethylene: 0.00157 kg; lognormal variance with pedigree 0.054, pedigree (3,4,5,1,1)
  Questionnaire, estimations
  EcoSpold01Location=RER
  Uncertainty: Questionnaire, estimations
  properties: wet mass 1 kg, dry mass 1 kg, heating value, net 42.47 MJ, carbon content, fossil 0.857143
  note on carbon content, fossil: Polyethylene is formed out of a huge amount of ethylene monomers (C2H4) (ecoinvent v2.2 report 11_II). MW=28 g/mol
- aluminium, wrought alloy: 0.00567 kg; lognormal variance with pedigree 0.0526, pedigree (2,4,5,1,1)
  EcoSpold01Location=RER
  Questionnaire
  Uncertainty: Questionnaire
  properties: wet mass 1 kg, dry mass 1 kg
- ventilation components factory: 2.28e-10 unit; lognormal variance with pedigree 0.394, pedigree (4,5,5,1,3)
  EcoSpold01Location=RER
  Calculated with data of a similar company
  Uncertainty: Calculated with data of a similar company
- electricity, medium voltage: 0.00683 kWh; lognormal variance with pedigree 0.108, pedigree (3,5,5,1,3)
  Data estimated from related processes
  EcoSpold01Location=UCTE
  Uncertainty: Data estimated from related processes
- waste polyethylene: -7.5e-5 kg; lognormal variance with pedigree 0.07, pedigree (4,4,5,1,1)
  EcoSpold01Location=CH
  Estimations on precentage material disposed
  Uncertainty: Estimations on precentage material disposed
  production volume 7.5e-5 kg
    Calculated from the production volume of sealing tape, aluminum/PE, 50 mm wide in proportion to the respective output amounts.
  properties: heating value, net 42.47 MJ, water content 0.00401606, carbon content, fossil 0.825301, wet mass 1 kg, dry mass 0.996 kg
  note on heating value, net: Value taken from the general comment of the treatment dataset.
  note on carbon content, fossil: C content in 1 kg DM was calculated using data in Tab A.1, ecoinvent v2.2 report 13_I
- acrylic binder, without water, in 34% solution state: 0.065 kg; lognormal variance with pedigree 0.072, pedigree (3,4,5,1,3)
  Questionnaire, estimations
  EcoSpold01Location=RER
  Uncertainty: Questionnaire, estimations
  properties: carbon content, fossil 0.599846, wet mass 1 kg, dry mass 1 kg, heating value, net 18.18 MJ
  note on carbon content, fossil: The acrylic acid ethyl ester (ethyl acrylate) is used for both solvent- and water-based paints, and in textiles as a binder in nonwoven fabrics and flocking (Acrylic acid and derivatives: uses, Ullmann). It was used as a representative example of acrylic binders. Its formula is C5H8O2
- waste paint: 0 kg; pedigree (1,1,1,1,1)
  (same comment as for waste polyethylene)
  production volume 0 kg
    (same comment as for waste polyethylene)
  properties: wet mass 1 kg, dry mass 1 kg, carbon content, fossil 0.65, heating value, net 19.7 MJ
  note on carbon content, fossil: Tab A.5, ecoinvent v2.2 report 13_I. C content has been calculated after data in the tables, and then referred to 1 kg DM
- laminating service, foil, with acrylic binder: 0.05 m2; lognormal variance with pedigree 0.072, pedigree (3,4,5,1,3)
  EcoSpold01Location=RER
  Questionnaire, approximation for technology
  Uncertainty: Questionnaire, approximation for technology
- heat, district or industrial, other than natural gas: 0.11305 MJ; lognormal variance with pedigree 0.07, pedigree (1,1,5,1,1)
  EcoSpold01Location=RER
  4,5,1,1,1,5; Data estimated from related companies
  properties: heating value, net 1 MJ
- waste paint: -0.0149551, -4.48777e-5 kg (2 entries); lognormal variance with pedigree 0.07, pedigree (4,4,5,1,1)
  (same comment as for waste polyethylene)
  production volume 0.015 kg

## Sampling procedure
Technical information of producer. Data of one common product used.

## Extrapolations
This dataset has been extrapolated from year 2003 to the year of the calculation (2021). The uncertainty has been adjusted accordingly.

## Review by Rolf Frischknecht 2007-08-16
passed
none
