# wind turbine construction, 2.3MW, precast concrete tower, onshore

Dataset: EcoSpold 2, unit process
Geography: RoW
Time period: 2008-01-01 to 2021-12-31
Technology level: modern
Classification: ISIC rev.4 ecoinvent: 2811:Manufacture of engines and turbines, except aircraft, vehicle and cycle eng
Tags: infrastructure; wind power
Scenario: Business-as-Usual
System model: Allocation, cut-off by classification
Generated by: Pablo Tirado
Published in: ENERCON GmbH 2010
Database: ecoinvent
isCopyrightProtected: true
accessRestrictedTo: 1

## General comment
This dataset represents the construction of a wind turbine with a capacity of 2.3MW for onshore use. The term "wind turbine" inludes moving parts such as nacelle, rotor, rotor blades, transition piece as well as fixed parts such as the tower and the foundation.This turbine is characterized by the precast concrete tower and the annular generator (no gearbox in the nacelle).
This global is a copy of the regional dataset for Quebec, as data were collecter for this region.

The LCI model is based on a LCA study of ENERCON E-82 E2 2.3MW with 107 meter precast concrete turbines. Some data (construction and dismantling operations) that were not included in the main source are adapted from the dataset "wind turbine construction, 2MW, onshore, GLO".Electronic parts are also adapted as the reference study does not differentiate between the electric parts of the turbine and the substation.
Parts of the wind turbine are the following:
Nacelle: casing, rotor hub, axle pins, blade adapter and the main carrier
Annular generator: rotor ansd stator
Blades
Tower (precast concrete).
Foundation (steel and concrete)

## Included activities start
From the transformation of pasture land to industrial site, and from the reception and treatment of building materials and turbine parts.

## Included activities end
This activity ends with the decommissioning of the wind turbine and the treatment of the resulting materials in the end of the lifetime.

This dataset includes
- all materials for the construction of the wind turbine and their treatment, but not the energy for their assembling
- land transformation and use
- energy needed for erection and dismantling of the wind turbine.

This dataset doesn't include
- the connection to the grid, which is modeled in a separate dataset.
- the operation and maintenance of the fully finished wind power plant. It is assumed that all parts will hold for the lifetime of 20 years and don't have to be replaced.
- auxiliary materials such as packaging materials or vacuum fleece.
- any losses of materials (waste) during the processing of the different wind turbine parts.
- neither the energy use for assembly of the different wind turbine parts nor their transportation from manufacture to the construction site.

## Technology
The Enercon E82-2.3 MW turbine is chosen as reference technology.
Characteristics:
- Capacity: 2300 kW
- Diameter of the rotor: 82 m
- Number of rotor blades: 3
- rotor blade weight: 7300 kg
- nacelle weight: 132000 kg

- tower type: modular concrete and steel towerr
- tower weight: 727000 kg
- material of the tower: Steel and concrete
- foundation weight: 746000
- Lifetime: 20 years

Source: data collection and Enercon (http://www.enercon.de/p/downloads/EN_Productoverview_0710.pdf)

Further characteristics:

Operational data
Rated power: 2,300 kW
Cut-in wind speed: 2 m/s
Rated wind speed: 16 m/s
Cut-out wind speed: 28 - 34 m/s
Wind class: IEC/NVN IIA

Rotor
Rotor diameter: 82 m
Swept area: 5,281 m2
Nominal revolutions: 16.7 rpm
Operational interval: 6-18 rpm
Generator: ENERCON direct-drive annular
generator
Main bearing: Double-row tapered / cylindrical roller bearingsBrake systems: (1)3 independent pitch control systems with emergency power supply; (2) Rotor brake; (3)Rotor lock

Source: Enercon, 2010, ENERCON Wind energy converters

## Time period
Turbines present in 2008 in Quebec wind power park. Lifespan of 20 years

## Parameters
- Installed capacity: 9695.04 MW; name capacity_installed_new; lognormal variance with pedigree 0.0014, pedigree (2,1,2,1,1)
  Calulated/estimated value. It is estimated that 8% of total installed capacity worldwide uses this technology. This estimation is based on the market shares of the main company manufacturing this technology (Enercon). Total installed capacity is taken from 1-3 MW GLO dataset
  Source:
  http://www.enercon.de/en-en/247.htm
- Percentage of onshore wind power plant class capacity on total: 1 dimensionless; name percentage_onshore; lognormal variance with pedigree 0.0006, pedigree (1,1,1,1,1)
  Percentage onshore 2012 in Quebec for this power.
  source: http://www.canwea.ca/farms/wind-farms_e.php

## Reference product
- wind turbine, 2.3MW, onshore: 1 unit; name wind_turbine; CPC 53262: Power plants; By-product classification allocatable product
  production volume 205.249 unit; name APV_turbine; = capacity_installed_new* percentage_onshore/ (wind_turbine_capacity* wind_turbine_lifetime)
    Calculated value based on installed capacity of this category in the 1999-2012 period and the lifetime of the turbines in Quebec. Quebec is the only region contributing to this global dataset
  property lifetime 20 year; name wind_turbine_lifetime
    Collected data
  property price 468746 EUR2005; name wind_turbine_price_EUR2005
    Calculated based on inputs: The price of the product has been calculated as a sum of the values of the material and energy inputs for this product. This value is therefore a rough estimation. It may underestimate the real price since there are additional expenses when producing any product. These expences can include for example labour costs, treatment of waste materials and profit for the producer. Please consider carefully whether this level of data quality is acceptable for your application.
  property capacity [MW] 2.3 MW; name wind_turbine_capacity

## By-products
- aluminium scrap, post-consumer: 0 kg; CPC 39363: Waste and scrap of aluminium; By-product classification Recyclable; pedigree (1,1,1,1,1)
  Calculated value. It can be assumed that 100% of the aluminium enter a recycling process.
  Uncertainty: Calculated variable. Uncertainty will be determined from propagation of uncertainty factors of underlying variables. Uncertainty of actual relation between variables not accounted at this time, although this could be included in a future update.
  production volume 0 kg; = APV_turbine * scrap_alu / wind_turbine
    Calculated from production volume of reference product using the relative outputs.
  property lifetime 20 year; name scrap_alu_lifetime
    Literature value
  property price 0.685 EUR2005; name scrap_alu_price_EUR2005
    Temporary price data. Calculated as 90% of purchasers price based on: estimated at 85% of new scrap
  property carbon content 0
    carbon content on a dry matter basis (reserved; not for manual entry)
  properties: carbon content, non-fossil 0, dry mass 1 kg, carbon content, fossil 0, water content 0, wet mass 1 kg, water in wet mass 0 kg, carbon allocation 0 kg
- iron scrap, unsorted: 0 kg; CPC 39310: Slag, dross, scalings and other waste from the manufacture of iron or steel; By-product classification Recyclable; pedigree (1,1,1,1,1)
  Calculated value. It can be assumed that 100% of the iron enter a recycling process.
  Uncertainty: Calculated variable. Uncertainty will be determined from propagation of uncertainty factors of underlying variables. Uncertainty of actual relation between variables not accounted at this time, although this could be included in a future update.
  production volume 0 kg; = APV_turbine * scrap_iron / wind_turbine
    Calculated from production volume of reference product using the relative outputs.
  property price 0.149 EUR2005; name scrap_iron_price_EUR2005
    Temporary price data. Calculated as 90% of purchasers price based on: estimated at 85% of sorted scrap
  property lifetime 20 year; name scrap_iron_lifetime
    Literature value
  property carbon content 0
    carbon content on a dry matter basis (reserved; not for manual entry)
  properties: water content 0, water in wet mass 0 kg, carbon content, fossil 0, dry mass 1 kg, carbon content, non-fossil 0, wet mass 1 kg, carbon allocation 0 kg

## Inputs from technosphere
- aluminium, wrought alloy: 883.32 kg; name alu_wrought; = 0.68*1299; source ENERCON GmbH 2010, p. p. 25, Tab. 5.3; lognormal variance with pedigree 0.041625, pedigree (2,1,5,2,1)
  Literature value/calculated value. Aluminium used in rotor blades and nacelle.
  The shares of cast alloy and wrought alloy aluminium in the cancelled ecoinvent v2 "aluminium production mix" dataset amounted to 32% (cast alloy) and 68% (wrought alloy) respectively. These shares have been overtaken to distribute the original amount of 1299 kg aluminium.
  properties: wet mass 1 kg, dry mass 1 kg
- road: 8000 m*year; = (10000/25)* lifetime; source Vestas 2011, p. p.81; lognormal variance with pedigree 0.0577, pedigree (2,5,5,3,3)
  Estimated value. Value taken from the 2MW wind turbine construction
  Literature value/estimation. Generally a combination of tarred roads and dirt roads need to be built to provide access to the power plant turbines, which are often located in remote locations. It has been estimated that 10 km of tarred road is needed for a power plant with 25 wind turbines.
  No maintenance is assumed.
  Uncertainty: estimated variance
- sheet rolling, aluminium: 1299 kg; = alu_cast+alu_wrought; lognormal variance with pedigree 0.04, pedigree (1,1,5,1,1)
  Proxy for wire drawing of aluminium.
  Uncertainty: Calculated variable. Uncertainty will be determined from propagation of uncertainty factors of underlying variables. Uncertainty of actual relation between variables not accounted at this time, although this could be included in a future update.
- waste polyethylene/polypropylene product: 0 kg; name waste_polyethypropy; pedigree (1,1,1,1,1)
  Calculated value. Proxy for the treatment of the epoxy resin (polyepoxide, formed from reaction of an epoxide resin with polyamine hardener). When using PrePreg in the manufacturing process, up to 10% of the PrePreg turns into waste due to cutoffs directly. The remaining amount will turn into waste/by-product after 20 years.
  Uncertainty: Calculated variable. Uncertainty will be determined from propagation of uncertainty factors of underlying variables. Uncertainty of actual relation between variables not accounted at this time, although this could be included in a future update.
  production volume 0 kg
    Calculated from production volume of reference product using the relative outputs.
  property price 0 EUR2005; name waste_polyethypropy_price_EUR2005
  property lifetime 20 year; name waste_polyethypropy_lifetime
  properties: heating value, net 42.47 MJ, water content 0.180638, carbon content, fossil 0.748045, wet mass 1 kg, dry mass 0.847 kg
  note on carbon content, fossil: Mixed various plastics was used to estimate the C content of this waste (Tab A.2, ecoinvent v2.2 report 13_I)
  note on lifetime: Literature value. 10% of this waste type incur during the construction of the wind turbine and therefore would only have a very short lifetime.
- electricity, medium voltage: 0 kWh; source Burger, B. 2007; pedigree (1,1,1,1,1)
  Extrapolated value from 2MW GLO dataset
  Literature value / calculation: Additional to energy requirements for material processing, a factor of 0.5 kWh/kg material (except of concrete for the foundation) after is included.Total wind turbine weight is about 2243554 kg (see Technology comment for details). This should also cover the energy required for mounting and removal of the turbine.
  Uncertainty: Calculated variable. Uncertainty will be determined from propagation of uncertainty factors of underlying variables. Uncertainty of actual relation between variables not accounted at this time, although this could be included in a future update.
- wire drawing, copper: 10610 kg; = copper; lognormal variance with pedigree 0.04, pedigree (1,1,5,1,1)
  Estimated value. Value taken from the 2MW wind turbine construction
  Uncertainty: Calculated variable. Uncertainty will be determined from propagation of uncertainty factors of underlying variables. Uncertainty of actual relation between variables not accounted at this time, although this could be included in a future update.
- epoxy resin, liquid: 12732.7 kg; name epoxy; = 28938*0.4*1.1; source ENERCON GmbH 2010; lognormal variance with pedigree 0.0467, pedigree (2,1,5,3,1)
  Literature value. Used for the rotor blades. The main materials used in the rotor blades are glass fibres and epoxy resin.
  Split between materials is based on prepeg used in the 2MW dataset.
  Prepreg is used as material for the blades in this dataset. It was not possible to get information on the exact composition of Prepreg. From the supplier’s PrePreg safety data sheets it is assumed that Prepreg consists of approx 40% epoxy and 60% glass fibre. Total Prepreg mass is 21507 kg. When using PrePreg in the manufacturing process, up to 10% of the PrePreg turns into waste due to cutoffs.
  Uncertainty: estimated variance
  properties: heating value, net 12.82 MJ, wet mass 1 kg, carbon content, fossil 0.42325, dry mass 1 kg
- steel, chromium steel 18/8: 1140 kg; name chromium_steel; source ENERCON GmbH 2010, p. p. 25, Tab. 5.3; lognormal variance with pedigree 0.0417, pedigree (2,1,5,3,1)
  Literature/assumed value. Steel used in rotor blades
  Uncertainty: estimated variance. higher uncertainty because of the fact discussed in the comment.
  properties: dry mass 1 kg, wet mass 1 kg, carbon content, fossil 0.0008
  note on carbon content, fossil: Stainless steel model is the grade 304 steel (18/8 stainless, 18% chromium 8% nickel; max. 0.08% C)
- polyethylene, high density, granulate: 3088 kg; name hdpe; source Elsam Engineering A/S,Fredericia,Denmark 2004, p. p. 25, Tab. 5.3; lognormal variance with pedigree 0.0577, pedigree (2,5,5,3,3)
  Extrapolated value from 2MW GLO dataset
  Uncertainty: estimated variance
  properties: carbon content, fossil 0.857143, wet mass 1 kg, dry mass 1 kg, heating value, net 42.47 MJ
  note on carbon content, fossil: Polyethylene is formed out of a huge amount of ethylene monomers (C2H4) (ecoinvent v2.2 report 11_II). MW=28 g/mol
- aluminium, cast alloy: 415.68 kg; name alu_cast; = 0.32*1299; source ENERCON GmbH 2010, p. p. 25, Tab. 5.3; lognormal variance with pedigree 0.0467, pedigree (2,1,5,3,1)
  Literature value/calculated value. Aluminium used in rotor blades and nacelle.
  The shares of cast alloy and wrought alloy aluminium in the cancelled ecoinvent v2 "aluminium production mix" dataset amounted to 32% (cast alloy) and 68% (wrought alloy) respectively. These shares have been overtaken to distribute the original amount of 1299 kg aluminium.
  Uncertainty: estimated variance
  properties: dry mass 1 kg, wet mass 1 kg
- electronics scrap from control units: -440 kg; name electronics_scrap; = (electronics)*-1; lognormal variance with pedigree 0.04, pedigree (1,1,5,1,1)
  Calculated value
  Uncertainty: Calculated variable. Uncertainty will be determined from propagation of uncertainty factors of underlying variables. Uncertainty of actual relation between variables not accounted at this time, although this could be included in a future update.
  production volume 90309.4 kg; = APV_turbine * electronics_scrap / wind_turbine
    Calculated from production volume of reference product using the relative outputs.
  property price 0 EUR2005; name electronics_scrap_price_EUR2005
  property lifetime 20 year; name lifetime
  properties: dry mass 1 kg, carbon content, non-fossil 0.00013442, wet mass 1 kg, carbon content, fossil 0.337146
- waste glass: 0 kg; name waste_glass; pedigree (1,1,1,1,1)
  Estimated value based on 2MW GLO dataset.
  The glass fibre reinforced plastic of the rotor is disposed of as 50% glass and 50% plastic. When using PrePreg in the manufacturing process, up to 10% of the PrePreg turns into waste due to cutoffs directly. The remaining amount will turn into waste/by-product after 20 years.
  Today, it is not possible to recycle the turbine blades. When the turbine’s lifetime expires, the blades will
  be dismantled into smaller pieces, which are deposited at controlled waste deposits.[Elsam. 2004b. Life Cycle Assessment of turbines PSO 1999. Elsam Engineering A/S, Fredericia, Denmark]
  Uncertainty: Calculated variable. Uncertainty will be determined from propagation of uncertainty factors of underlying variables. Uncertainty of actual relation between variables not accounted at this time, although this could be included in a future update.
  production volume 0 kg
    Calculated from production volume of reference product using the relative outputs.
  property lifetime 20 year; name waste_glass_lifetime
  property price 0 EUR2005; name waste_glass_price_EUR2005
  properties: heating value, net 0.05 MJ, wet mass 1 kg, dry mass 1 kg
  note on heating value, net: Value extracted from "treatment of waste glass, open dump, very wet infiltration class (1000mm)"
- waste plastic, mixture: 0 kg; name waste_plastic; pedigree (1,1,1,1,1)
  Estimation. The glass fibre reinforced plastic of the rotor is disposed of as 50% glass and 50% plastic. When using PrePreg in the manufacturing process, up to 10% of the PrePreg turns into waste due to cutoffs directly. A large percentage of this waste is sent to recycling as it is directly used in the production of e.g. high-strength construction panels. The remaining glass fibre reinforced plastic amount will turn into waste/by-product after 20 years.
  Today, it is not possible to recycle the turbine blades. When the turbine’s lifetime expires, the blades will
  be dismantled into smaller pieces, which are deposited at controlled waste deposits.[Elsam. 2004b. Life Cycle Assessment of turbines PSO 1999. Elsam Engineering A/S, Fredericia, Denmark]
  Uncertainty: Calculated variable. Uncertainty will be determined from propagation of uncertainty factors of underlying variables. Uncertainty of actual relation between variables not accounted at this time, although this could be included in a future update.
  production volume 0 kg
    Calculated from production volume of reference product using the relative outputs.
  property price 0 EUR2005; name waste_plastic_price_EUR2005
  property lifetime 20 year; name waste_plastic_lifetime
  properties: heating value, net 30.79 MJ, dry mass 0.847 kg, wet mass 1 kg, water content 0.180638, carbon content, fossil 0.747344
  note on heating value, net: Value taken from the general comment of the treatment dataset.
  note on carbon content, fossil: C content in 1 kg DM was calculated using data in Tab A.2, ecoinvent v2.2 report 13_I
- cast iron: 72643 kg; name cast_iron; source ENERCON GmbH 2010, p. p. 25, Tab. 5.3; lognormal variance with pedigree 0.0467, pedigree (2,1,5,3,1)
  Literature value. Cast iron used in nacelle.
  Uncertainty: estimated variance
  properties: carbon content, fossil 0.04, dry mass 1 kg, wet mass 1 kg
  note on carbon content, fossil: Cast iron is made by remelting pig iron in small furnaces (e.g. cupola furnaces or electric arc furnaces) and poured into moulds to make castings. It usually contains 2% to 6% carbon (ecoinvent v2.2 report 10_partII). An average content of 4% was considered
- excavation, hydraulic digger: 313.613 m3; = concrete_amount_2/ concrete_WM; lognormal variance with pedigree 0.04, pedigree (1,1,5,1,1)
  Estimated value. Same amount than the concrete in foundation
  Uncertainty: Calculated variable. Uncertainty will be determined from propagation of uncertainty factors of underlying variables. Uncertainty of actual relation between variables not accounted at this time, although this could be included in a future update.
- glass fibre reinforced plastic, polyamide, injection moulded: 14194.6 kg; name glass_plastic; = 21507*0.6*1.1; source ENERCON GmbH 2010, p. p. 25, Tab. 5.3; lognormal variance with pedigree 0.0467, pedigree (2,1,5,3,1)
  (same comment as for epoxy resin, liquid)
  properties: dry mass 1 kg, carbon content, fossil 0.446018, wet mass 1 kg
  note on carbon content, fossil: Polyamide resin assimilate to Nylon 66 (ecoinvent v2.2 report 7_XIII). Nylon 66 is derived from hexamethylene diamine and adipic acid and has the following structure: -(HN-(CH2)6-NH-CO-(CH2)4-CO)n- (ecoinvent v2.2 report 11_II), C12H22N2O2. MW=226 g/mol. Here Nylon 66 is – mainly for improved stiffness and stability – modified with glass fibres. The glass fibre content in the product is assumed of 30%. (ecoinvent v2.2 report 11_II)
- electronics, for control units: 440 kg; name electronics; source Vestas 2011, p. p.41; lognormal variance with pedigree 0.0577, pedigree (2,5,5,3,3)
  Estimated value. Value taken from the 2MW wind turbine construction
  Uncertainty: estimated variance
  properties: carbon content, fossil 0.337146, carbon content, non-fossil 0.00013442, dry mass 1 kg, wet mass 1 kg
  note on carbon content, fossil: The control unit has a composition of 46% steel (housing), 32% plastics, 14% printed wiring boards and 8% cables (various types).;
- concrete, normal: 0 m3; name concrete; source ENERCON GmbH 2010, p. p. 13, 21+25, Tab. 5.3; pedigree (1,1,1,1,1)
  Calculated value. Concrete used for foundation and in tower structure.
  Estimated values based on % of total weight per component and material of the turbine published by the Princeton Energy Resources International, LLC
  Uncertainty: Calculated variable. Uncertainty will be determined from propagation of uncertainty factors of underlying variables. Uncertainty of actual relation between variables not accounted at this time, although this could be included in a future update.
  property amount of flow 2 in kg 746400 kg; name concrete_amount_2
  property wet mass 2380 kg; name concrete_WM
  property amount of flow 1 in kg 727000 kg; name concrete_amount_1
  properties: water content 0.086758, dry mass 2190 kg
- copper, cathode: 10610 kg; name copper; source ENERCON GmbH 2010, p. p. 25, Tab. 5.3; lognormal variance with pedigree 0.0411, pedigree (1,1,5,3,1)
  Literature value. Copper in Nacelle.
  Uncertainty: estimated variance
  properties: wet mass 1 kg, dry mass 1 kg
- scrap copper: 0 kg; name scrap_copper; pedigree (1,1,1,1,1)
  Estimated value. It can be assumed that 100% of the copper enter a recycling process.
  Uncertainty: Calculated variable. Uncertainty will be determined from propagation of uncertainty factors of underlying variables. Uncertainty of actual relation between variables not accounted at this time, although this could be included in a future update.
  production volume 0 kg
    Calculated from production volume of reference product using the relative outputs.
  property price 0 EUR2005; name scrap_copper_price_EUR2005
  property lifetime 20 year; name scrap_copper_lifetime
  properties: wet mass 1 kg, dry mass 1 kg
- sheet rolling, chromium steel: 1140 kg; = chromium_steel; lognormal variance with pedigree 0.04, pedigree (1,1,5,1,1)
  (same comment as for electronics scrap from control units)
- waste polyethylene: 0 kg; name waste_polyethy; pedigree (1,1,1,1,1)
  (same comment as for electronics scrap from control units)
  production volume 0 kg
    Calculated from production volume of reference product using the relative outputs.
  property price 0 EUR2005; name waste_polyethy_price_EUR2005
  property lifetime 20 year; name waste_polyethy_lifetime
  properties: carbon content, fossil 0.825301, heating value, net 42.47 MJ, water content 0.00401606, wet mass 1 kg, dry mass 0.996 kg
  note on carbon content, fossil: C content in 1 kg DM was calculated using data in Tab A.1, ecoinvent v2.2 report 13_I
- steel, low-alloyed: 53468 kg; name steel_lowalloyed; source ENERCON GmbH 2010, p. p. 25, Tab. 5.3; lognormal variance with pedigree 0.0417, pedigree (2,1,5,3,1)
  Literature/assumed value. Steel used in nacelle
  Uncertainty: estimated variance
  properties: dry mass 1 kg, wet mass 1 kg, carbon content, fossil 0.005
  note on carbon content, fossil: Low alloyed steel composition given in Tab. 3.2 ecoinvent v2.2 report 10_partII. Steel assumed to have a C content of 0.5%
- scrap steel: 0 kg; name scrap_steel; pedigree (1,1,1,1,1)
  Calculated value. The zinc coating of the steel tower is included in the scrap steel, which is a simplification. It can be assumed that 100% of the steel enter a recycling process.
  Uncertainty: Calculated variable. Uncertainty will be determined from propagation of uncertainty factors of underlying variables. Uncertainty of actual relation between variables not accounted at this time, although this could be included in a future update.
  production volume 0 kg
    Calculated from production volume of reference product using the relative outputs.
  property price 0 EUR2005; name scrap_steel_price_EUR2005
  property lifetime 20 year; name scrap_steel_lifetime
  properties: wet mass 1 kg, dry mass 1 kg
- reinforcing steel: 154829 kg; name steel_reinforcing; = steel_reinforcing_amount_1+ steel_reinforcing_amount_2; source ENERCON GmbH 2010, p. p. 21; lognormal variance with pedigree 0.04, pedigree (1,1,5,1,1)
  Calculated value. Reinforcing steel used for foundation and in tower structure.
  Uncertainty: Calculated variable. Uncertainty will be determined from propagation of uncertainty factors of underlying variables. Uncertainty of actual relation between variables not accounted at this time, although this could be included in a future update.
  property amount of flow 2 in kg 102829 kg; name steel_reinforcing_amount_2
  property amount of flow 1 in kg 52000 kg; name steel_reinforcing_amount_1
  properties: dry mass 1 kg, wet mass 1 kg, carbon content, fossil 0.004
- waste reinforced concrete: 0 kg; name waste_concrete_reinforced; pedigree (1,1,1,1,1)
  Calculated value. A density of 2400kg/m3 is assumed for the reinforced concrete.
  Uncertainty: Calculated variable. Uncertainty will be determined from propagation of uncertainty factors of underlying variables. Uncertainty of actual relation between variables not accounted at this time, although this could be included in a future update.
  production volume 0 kg
    Calculated from production volume of reference product using the relative outputs.
  property price 0 EUR2005; name waste_concrete_reinforced_price_EUR2005
  property lifetime 20 year; name waste_concrete_reinforced_lifetime
  properties: dry mass 0.99418 kg, water content 0.00585407, wet mass 1 kg
- aluminium scrap, post-consumer: -1299 kg; lognormal variance with pedigree 0.04, pedigree (1,1,5,1,1)
  (same comment as for aluminium scrap, post-consumer)
  production volume 266618 kg
  properties: dry mass 1 kg, wet mass 1 kg
- iron scrap, unsorted: -72643 kg; lognormal variance with pedigree 0.04, pedigree (1,1,5,1,1)
  (same comment as for iron scrap, unsorted)
  production volume 1.49099e7 kg
  properties: dry mass 1 kg, wet mass 1 kg
- waste polyethylene/polypropylene product: -370.945, -12361.8 kg (2 entries); lognormal variance with pedigree 0.04, pedigree (1,1,5,1,1)
  (same comment as for waste polyethylene/polypropylene product)
  production volume 2.61337e6 kg
  properties: heating value, net 42.47 MJ, water content 0.180638, carbon content, fossil 0.748045, wet mass 1 kg, dry mass 0.847 kg, lifetime 20 year
- electricity, medium voltage: 1658.15, 317.961, 7300.89, 2591.93, 5337.91, 77635.1, 24609.2, 10942.7, 31608.4 kWh (9 entries); source Burger, B. 2007; lognormal variance with pedigree 0.04, pedigree (1,1,5,1,1)
  (same comment as for electricity, medium voltage)
- waste glass: -2324, -214.198, -4.85943, -19.9844, -30.3474, -89.4226, -4414.5 kg (7 entries); lognormal variance with pedigree 0.04, pedigree (1,1,5,1,1)
  (same comment as for waste glass)
  production volume 1.45671e6 kg
  properties: lifetime 20 year, heating value, net 0.05 MJ, wet mass 1 kg, dry mass 1 kg
- waste plastic, mixture: -3542.45, -236.693, -17.9007, -97.7625, -39.4949, -92.8347, -3070.18 kg (7 entries); lognormal variance with pedigree 0.04, pedigree (1,1,5,1,1)
  (same comment as for waste plastic, mixture)
  production volume 1.45671e6 kg
  properties: heating value, net 30.79 MJ, dry mass 0.847 kg, wet mass 1 kg, water content 0.180638, lifetime 20 year, carbon content, fossil 0.747344
- concrete, normal: 14.6579, 0.4416, 1.52733, 12.3648, 6.9552, 0.993443, 582.135 m3 (7 entries); source ENERCON GmbH 2010, p. p. 13, 21+25, Tab. 5.3; lognormal variance with pedigree 0.04, pedigree (1,1,5,1,1)
  (same comment as for concrete, normal)
  properties: amount of flow 2 in kg 746400 kg, water content 0.086758, wet mass 2380 kg, amount of flow 1 in kg 727000 kg, dry mass 2190 kg
- scrap copper: -475.489, -10134.5 kg (2 entries); lognormal variance with pedigree 0.04, pedigree (1,1,5,1,1)
  (same comment as for scrap copper)
  production volume 2.17769e6 kg
  properties: wet mass 1 kg, dry mass 1 kg, lifetime 20 year
- waste polyethylene: -1541.3, -102.984, -7.78849, -42.5359, -17.184, -40.3918, -1335.82 kg (7 entries); lognormal variance with pedigree 0.04, pedigree (1,1,5,1,1)
  (same comment as for electronics scrap from control units)
  production volume 633808 kg
  properties: carbon content, fossil 0.825301, heating value, net 42.47 MJ, water content 0.00401606, wet mass 1 kg, lifetime 20 year, dry mass 0.996 kg
- scrap steel: -69.0988, -54538.9 kg (2 entries); lognormal variance with pedigree 0.04, pedigree (1,1,5,1,1)
  (same comment as for scrap steel)
  production volume 1.12082e7 kg
  properties: wet mass 1 kg, dry mass 1 kg, lifetime 20 year
- waste reinforced concrete: -17071.4, -1.61116e6 kg (2 entries); lognormal variance with pedigree 0.04, pedigree (1,1,5,1,1)
  (same comment as for waste reinforced concrete)
  production volume 3.34192e8 kg
  properties: lifetime 20 year, dry mass 0.99418 kg, water content 0.00585407, wet mass 1 kg

## Inputs from nature
- Occupation, industrial area [natural resource, land]: 50000 m2*year; = land_from*lifetime; lognormal variance with pedigree 0.04, pedigree (1,1,5,1,1)
  (same comment as for electronics scrap from control units)
- Transformation, from pasture, man made [natural resource, land]: 2500 m2; name land_from; = 50*50; source ENERCON GmbH 2010; lognormal variance with pedigree 0.0801, pedigree (1,1,5,3,1)
  Literature value
  Uncertainty: Estimated variance.
- Transformation, to industrial area [natural resource, land]: 2500 m2; = land_from; lognormal variance with pedigree 0.04, pedigree (1,1,5,1,1)
  (same comment as for electronics scrap from control units)

## Sampling procedure
Literature and estimations.

## Extrapolations
Some of the data that were not detailed in the main document are extrapolated (construction, dismantling operations) from the dataset "wind turbine construction, 2MW, onshore, GLO". Uncertainty has been adjusted accordingly.

## Review by Christian Bauer 2014-02-20
This dataset was thoroughfully reviewed and complies with the Data Quality Guidelines.
