# electricity, high voltage, renewable energy products, production mix

Dataset: EcoSpold 2, unit process, production mix
Geography: CH
Time period: 2011-01-01 to 2021-12-31
Scenario: Business-as-Usual
System model: Allocation, cut-off by classification
Generated by: [System]
Database: ecoinvent
isCopyrightProtected: false
accessRestrictedTo: 1

## General comment
The shares of electricity technologies on this market are valid for the year 2019. They have been calculated by the data provider and don't necessarily correspond with the production volumes entered in the undefined datasets of the different electricity producers. The shares have been calculated based on statistics from 2019: Swiss Federal Office of Energy SFOE, Swiss Electricity Statistics 2020; (https://www.bfe.admin.ch/bfe/en/home.html).

## Technology
Electricity from certified sources.
Average technology used to transmit and distribute electricity. Includes underground and overhead lines. Electricity production according to related technology datasets.

Definition of the voltage levels:
- High voltage level above 24 kV (large scale industry)
- Medium voltage level between 1 kV and 24 kV (medium to small scale industry, service sector
and public buildings)
- Low voltage level below 1 kV (Households)

## Reference product
- electricity, high voltage, renewable energy products: 1 kWh; By-product classification allocatable product; CPC 17100: Electrical energy
  EcoSpold01Location=CH
  production volume 1.50008e10 kWh
  property price 0.101 EUR2005
    Temporary price data. Calculated as 90% of purchasers price based on: 94% of the average price (to account for a 6% loss in transformation and transmission) for electricity for industrial consumersin 2005 (excluded taxes). From IEA. In addition, regarding label-certified electricity, the Swiss government has a market instrument for renewable energy which is calculated as the difference between the market price and the production price. This was started in 2009 and is 0.45 Rp/kWh. Therefore, the production price of label certified energy is assumed to be the supplyer price plus the 0.45Rp/kWh (http://www.bfe.admin.ch/themen/00612/02073/index.html?lang=de).The unit conversion from CH to EUR is based on the ecoinvent unit conversion file (1 CHF2005 = 0.644 EUR2005). As an approximation, this is also used for global electricity production

## Inputs from technosphere
- electricity, high voltage, renewable energy products: 0 kWh; source IEA 2014; pedigree (1,1,1,1,1)
  EcoSpold01Location=CH
  Estimation. Compensation for the losses during transmission.
- electricity, high voltage, renewable energy products: 0, 0, 0, 0, 0, 0, 0 kWh (7 entries)
  properties: price 0.101 EUR2005
- electricity, high voltage, renewable energy products: 0.00354122 kWh
  production volume 5.15474e7 kWh
- electricity, high voltage, renewable energy products: 0 kWh
  properties: price 0.101 EUR2005, exergy 3.6 MJ
  note on exergy: allocation factor for electricity (=1) vs. heat, where heat is calculated as the termodynamic mean temperature Tm = (Tfeed-Treturn)/ln(Tfeed/Treturn), relative to the application temperature (Tu, typically = 293 K), i.e. (Tm-Tu)/Tm
- electricity, high voltage, renewable energy products: 0 kWh
  properties: exergy 3.6 MJ, price 0.101 EUR2005
- electricity, high voltage, renewable energy products: 0.519895 kWh
  production volume 7.56781e9 kWh
- electricity, high voltage, renewable energy products: 0.4552 kWh
  production volume 6.62608e9 kWh
- electricity, high voltage, renewable energy products: 0.00938081 kWh
  production volume 1.36551e8 kWh
- electricity, high voltage, renewable energy products: 0.00154099 kWh
  production volume 2.24313e7 kWh
- electricity, high voltage, renewable energy products: 0.00869072 kWh
  production volume 1.26506e8 kWh
- electricity, high voltage, renewable energy products: 0.00175176 kWh
  production volume 2.54993e7 kWh

## Extrapolations
This dataset has been extrapolated from year 2015 to the year of the calculation (2021). The uncertainty has been adjusted accordingly.
