# treatment of municipal solid waste, sanitary landfill

Dataset: EcoSpold 2, unit process
Geography: CA-QC
Time period: 1994-01-01 to 2021-12-31
Technology level: current
Classification: EcoSpold01Categories: waste management/sanitary landfill
Classification: ISIC rev.4 ecoinvent: 3821:Treatment and disposal of non-hazardous waste
Tags: Treatment; Recontextualization
Scenario: Business-as-Usual
System model: Allocation, cut-off by classification
Generated by: Geneviève Martineau
Published in: Doka G. 2007
Database: ecoinvent
isCopyrightProtected: true
accessRestrictedTo: 1

## General comment
This dataset represents the landfilling of municipal solid waste in Québec. It is a copy of the global dataset and does not take into account the specificity of Quebec landfills (biogas capture rate, leachate treatment, etc.) or the characterization of municipal solid waste of the territory. Created for maket purpose only. Data quality indicators adjusted accordingly.

Inventoried waste contains 21% paper; 8% Mixed cardbord; 15% plastics; 3% laminated materials; 2% laminated packaging, e.g. tetra bricks; 3% combined goods e.g. dipers; 3% glass; 2% textiles; 8% minerals; 9% natural products; 22% compostable material; 2.65% inert metals; 1% volatile metals; 0.0065% batteries; 0.34% electronic goods; .
waste composition (wet, in ppm): upper heating value 13.27 MJ/kg; lower heating value 11.74 MJ/kg; H2O 228830; O 257060; H 48250; C 334230; S 1119; N 3123.8; P 893.79; B 7.1933; Cl 6866.2; Br 13.552; F 56.358; I 0.0121; Ag 0.714; As 0.62521; Ba 149.04; Cd 11.748; Co 1.3453; Cr 315.21; Cu 1212.8; Hg 1.4424; Mn 259.36; Mo 1.9551; Ni 107.38; Pb 502.43; Sb 22.564; Se 0.31969; Sn 73.44; V 9.2147; Zn 1311.2; Be n.a.; Sc n.a.; Sr n.a.; Ti n.a.; Tl n.a.; W n.a.; Si 48510; Fe 29996; Ca 14062; Al 12420; K 2059.7; Mg 3377.7; Na 5143.9;
Share of carbon in waste that is biogenic 60.4%.
Overall degradability of waste during 100 years: 18.73%.

## Included activities end
Waste-specific short-term emissions to air via landfill gas incineration and landfill leachate. Burdens from treatment of short-term leachate (0-100a) in wastewater treatment plant (including WWTP sludge disposal in municipal incinerator). Long-term emissions from landfill to groundwater (after base lining failure).

## Geography
Technology encountered in Switzerland in 2000. Landfill includes base seal, leachate collection system, treatment of leachate in municipal wastewater treatment plant. Data quality indicators adjusted accordingly.

## Technology
Swiss municipal sanitary landfill for biogenic or untreated municipal waste ("reactive organic landfill"). Landfill gas and leachate collection system. Recultivation and monitoring for 150 years after closure.
Data quality indicators adjusted accordingly.

## Reference product
- municipal solid waste: -1 kg; name ref; CPC 39910: Municipal waste; By-product classification Waste
  production volume 2.34e9 kg; name ref_PV
    Literature value. Municipal solid waste eliminated by landfilling in Quebec in 2011, considering that 96% of MSW is sent to technical landfills.
  property price 0 EUR2005
    Waste products are assigned a price of zero as they are assumed to require further treatment.
  property carbon content, fossil 0.171549
    MSW composition in tab 4.1, ecoinvent v2.2 report 13_I. C content referred to 1 kg DM
  property carbon content, non-fossil 0.261655
    MSW composition in tab 4.1, ecoinvent v2.2 report 13_I. C content referred to 1 kg DM
  property heating value, net 11.74 MJ
    Value taken from the general comment of the treatment dataset.
  property carbon content 0.433204
    carbon content on a dry matter basis (reserved; not for manual entry)
  properties: water content 0.297017, wet mass 1 kg, water in wet mass 0.229 kg, dry mass 0.771 kg, carbon allocation 0.334 kg

## Inputs from technosphere
- process-specific burdens, residual material landfill: 9.15e-5 kg; lognormal variance with pedigree 0.382, pedigree (1,1,5,5,5)
  burden from incineration of sludge from wastewater treatment of the short-term leachate (0-100a). uncertainty is calculated from uncertainties in waste composition and transfer coefficients in incinerator and uncertainty of waste decomposition and short-term leaching in sanitary landfill
  Uncertainty: N
- iron (III) chloride, without water, in 40% solution state: 8.81e-5 kg; lognormal variance with pedigree 1.162, pedigree (1,1,5,5,5)
  (same comment as for process-specific burdens, residual material landfill)
  properties: wet mass 1 kg, dry mass 1 kg
- titanium dioxide: 6.35e-8 kg; lognormal variance with pedigree 0.832, pedigree (1,1,5,5,5)
  (same comment as for process-specific burdens, residual material landfill)
  properties: dry mass 1 kg, wet mass 1 kg
- sanitary landfill facility: 5.56e-10 unit; lognormal variance with pedigree 0.05, pedigree (1,1,5,5,3)
  demands per kilogram waste. uncertainty is heeded in the module
- cement, unspecified: 3.66e-5 kg; lognormal variance with pedigree 0.382, pedigree (1,1,5,5,5)
  (same comment as for process-specific burdens, residual material landfill)
  properties: wet mass 1 kg, dry mass 1 kg
- ammonia, anhydrous, liquid: 2.22e-6 kg; lognormal variance with pedigree 0.592, pedigree (1,1,5,5,5)
  (same comment as for process-specific burdens, residual material landfill)
  properties: wet mass 1 kg, dry mass 1 kg
- aluminium sulfate, powder: 1.74e-5 kg; lognormal variance with pedigree 1.16, pedigree (5,5,5,5,5)
  burden from wastewater treatment of the short-term leachate (0-100a). Uncertainty calculated from unertainty of the waste composition of this waste, uncertainty in waste decomposition and short-term leaching in sanitary landfill
  Uncertainty: .
  properties: wet mass 1 kg, dry mass 1 kg
- waste plastic, mixture: -3.88e-5 kg; name waste_plastic; lognormal variance with pedigree 0.2106, pedigree (5,5,5,5,5)
  (same comment as for aluminium sulfate, powder)
  production volume 90792 kg; = waste_plastic*ref_PV/abs(ref)
    Calculated from the production volume of municipal solid waste, in proportion to the respective output amounts.
  properties: wet mass 1 kg, dry mass 0.847 kg, carbon content, fossil 0.747344, water content 0.180638, heating value, net 30.79 MJ
  note on carbon content, fossil: C content in 1 kg DM was calculated using data in Tab A.2, ecoinvent v2.2 report 13_I
  note on heating value, net: Value taken from the general comment of the treatment dataset.
- heat, district or industrial, other than natural gas: 0.00194 MJ; lognormal variance with pedigree 0.322, pedigree (1,1,5,5,5)
  (same comment as for process-specific burdens, residual material landfill)
  properties: heating value, net 1 MJ
- process-specific burdens, slag landfill: 0.000753 kg; lognormal variance with pedigree 0.442, pedigree (1,1,5,5,5)
  (same comment as for process-specific burdens, residual material landfill)
- hydrochloric acid, without water, in 30% solution state: 4.03e-9 kg; lognormal variance with pedigree 0.872, pedigree (1,1,5,5,5)
  (same comment as for process-specific burdens, residual material landfill)
  properties: wet mass 1 kg, heating value, net 3.32 MJ, dry mass 1 kg
- chemical, organic: 2.2e-7 kg; lognormal variance with pedigree 1.712, pedigree (1,1,5,5,5)
  (same comment as for process-specific burdens, residual material landfill)
  properties: heating value, net 19.03 MJ, wet mass 1 kg, dry mass 1 kg, carbon content, fossil 0.628
  note on carbon content, fossil: This dataset is an unweighted average of 20 organic substances (listed in Tab 88.1, ecoinvent v2.2 report 8, part II), being part of the top100 chemicals included in this database. The C-content has also been calculated as an unweighted average of the C content of the substances composing this dataset.
- waste cement, hydrated: -9.15e-5 kg; name waste_cement; lognormal variance with pedigree 0.27, pedigree (1,1,5,5,3)
  burden from incineration of sludge from wastewater treatment of the short-term leachate (0-100a). uncertainty is calculated from uncertainties in waste composition and transfer coefficients in incinerator and uncertainty of waste decomposition and short-term leaching in sanitary landfill
  production volume 214110 kg; = waste_cement*ref_PV/abs(ref)
    (same comment as for waste plastic, mixture)
  properties: dry mass 1 kg, wet mass 1 kg
- chemical, inorganic: 6.71e-9 kg; lognormal variance with pedigree 0.872, pedigree (1,1,5,5,5)
  (same comment as for process-specific burdens, residual material landfill)
  properties: wet mass 1 kg, carbon content, fossil 0.003, dry mass 1 kg
  note on carbon content, fossil: This dataset is an unweighted average of 20 inorganic substances (listed in Tab 88.1, ecoinvent v2.2 report 8, part II), being part of the top100 chemicals included in this database. The C-content has also been calculated as an unweighted average of the C content of the substances composing this dataset.
- quicklime, milled, packed: 2.39e-8 kg; lognormal variance with pedigree 0.462, pedigree (1,1,5,5,5)
  (same comment as for process-specific burdens, residual material landfill)
  properties: dry mass 0.99 kg, wet mass 1 kg, water content 0.010101
- wastewater treatment facility, capacity 5E9l/year: 1.42e-11 unit; lognormal variance with pedigree 0.2106, pedigree (5,5,5,5,5)
  activityLink introduced to establish a direct link to the corresponding regional supply of this product
  Uncertainty: .
- sewer grid, 5E9l/year, 110 km: 5.45e-10 km; lognormal variance with pedigree 0.2106, pedigree (5,5,5,5,5)
  (same comment as for aluminium sulfate, powder)
- process-specific burdens, municipal waste incineration: 0.00232 kg; lognormal variance with pedigree 0.322, pedigree (1,1,5,5,5)
  Burden from incineration of sludge from wastewater treatment of the short-term leachate (0-100a).
  Uncertainty: N
- electricity, high voltage: 0.000333 kWh; lognormal variance with pedigree 0.492, pedigree (1,1,5,5,5)
  (same comment as for process-specific burdens, residual material landfill)
- municipal waste incineration facility: 5.8e-13 unit; lognormal variance with pedigree 0.322, pedigree (1,1,5,5,5)
  (same comment as for process-specific burdens, municipal waste incineration)
- waste graphical paper: -3.88e-5 kg; name waste_paper; lognormal variance with pedigree 0.2106, pedigree (5,5,5,5,5)
  (same comment as for aluminium sulfate, powder)
  production volume 90792 kg; = waste_paper*ref_PV/abs(ref)
    (same comment as for waste plastic, mixture)
  properties: dry mass 0.888 kg, water content 0.126126, carbon content, non-fossil 0.454955, wet mass 1 kg, heating value, net 14.12 MJ
- process-specific burdens, sanitary landfill: 1 kg; lognormal variance with pedigree 0.05, pedigree (1,1,5,5,3)
  demands per kilogram waste. uncertainty is heeded in the module
- slag landfill: 1.34e-12 unit; lognormal variance with pedigree 0.442, pedigree (1,1,5,5,5)
  (same comment as for process-specific burdens, residual material landfill)
- chromium oxide, flakes: 1.29e-9 kg; lognormal variance with pedigree 0.83, pedigree (5,5,5,5,5)
  burden from incineration of sludge from wastewater treatment of the short-term leachate (0-100a). Proxy for vanadium pentoxide V2O5 in SCR catalyst, uncertainty calculated from uncertainty in average DeNOx input, uncertainty in the share of thermal NOx, uncertainty of nitrogen content in average municipal waste and the unertainty in nitrogen content in *this* waste and uncertainty of waste decomposition and short-term leaching in sanitary landfill
  Uncertainty: .
  properties: wet mass 1 kg, dry mass 1 kg
- sodium hydroxide, without water, in 50% solution state: 1.32e-7 kg; lognormal variance with pedigree 0.462, pedigree (1,1,5,5,5)
  (same comment as for process-specific burdens, residual material landfill)
  properties: dry mass 1 kg, wet mass 1 kg, heating value, net 3.03 MJ
- heat, central or small-scale, other than natural gas: 0.00054238 MJ; lognormal variance with pedigree 0.35, pedigree (5,5,5,5,5)
  (same comment as for aluminium sulfate, powder)
  properties: heating value, net 1 MJ
- electricity, low voltage: 0.00864 kWh; lognormal variance with pedigree 0.41, pedigree (5,5,5,5,5)
  (same comment as for aluminium sulfate, powder)
- heat, district or industrial, natural gas: 0.00094224 MJ; lognormal variance with pedigree 0.592, pedigree (1,1,5,5,5)
  (same comment as for process-specific burdens, residual material landfill)
  properties: heating value, net 1 MJ
- iron sulfate: 6.43e-5 kg; lognormal variance with pedigree 1.16, pedigree (5,5,5,5,5)
  (same comment as for aluminium sulfate, powder)
  properties: wet mass 1 kg, dry mass 1 kg
- residual material landfill: 1.91e-13 unit; lognormal variance with pedigree 0.382, pedigree (1,1,5,5,5)
  (same comment as for process-specific burdens, residual material landfill)

## Emissions to nature
- Bromine [water, ground-, long-term]: 1.18e-5 kg; lognormal variance with pedigree 1.28, pedigree (1,1,5,5,3)
  Emissions from long-term leachate (>100a) directly from MSW landfill and indirectly via incineration of treatement sludge from leachate treatement. Uncertainty calculated depending on waste input and uncertainty of long-term transfer coefficents in landfill.
- Boron [air, urban air close to ground]: 4.25e-7 kg; lognormal variance with pedigree 1.39, pedigree (1,1,5,5,3)
  Emissions from short-term leachate treatment and incineration of resulting sludge. Uncertainty calculated depending on waste input and uncertainty of transfer coefficents in landfill, wastewater treatment and incineration model.
- Barium [air, non-urban air or from high stacks]: 2.74e-9 kg; lognormal variance with pedigree 2.14, pedigree (1,1,5,5,3)
  burden from direct release or incineration of landfill biogas. Uncertainty calculated from unertainty of the waste composition of this waste, uncertainty in waste decomposition and short-term leaching in sanitary landfill
- Vanadium [air, urban air close to ground]: 8.99e-12 kg; lognormal variance with pedigree 1.66, pedigree (1,1,5,5,3)
  (same comment as for Boron)
- Cyanide [air, urban air close to ground]: 3.95e-8 kg; lognormal variance with pedigree 0.5, pedigree (1,1,5,5,3)
  (same comment as for Boron)
- Antimony [air, non-urban air or from high stacks]: 3.23e-11 kg; lognormal variance with pedigree 2.72, pedigree (1,1,5,5,3)
  (same comment as for Barium)
- Arsenic [air, urban air close to ground]: 8.46e-12 kg; lognormal variance with pedigree 1.91, pedigree (1,1,5,5,3)
  (same comment as for Boron)
- Mercury [water, surface water]: 9.48e-10 kg; lognormal variance with pedigree 2.13, pedigree (1,1,5,5,3)
  (same comment as for Boron)
- Hydrogen fluoride [air, non-urban air or from high stacks]: 5.82e-6 kg; lognormal variance with pedigree 1.21, pedigree (1,1,5,5,3)
  (same comment as for Barium)
- Phosphate [water, ground-, long-term]: 1.93e-5 kg; lognormal variance with pedigree 6.95, pedigree (1,1,5,5,3)
  (same comment as for Bromine)
- Fluoride [water, surface water]: 1.07e-6 kg; lognormal variance with pedigree 1.38, pedigree (1,1,5,5,3)
  Emissions from short-term leachate treatment. Uncertainty calculated depending on waste input and uncertainty of transfer coefficents in landfill and wastewater treatment.
- Nitrogen oxides [air, urban air close to ground]: 1.37e-5 kg; lognormal variance with pedigree 0.39, pedigree (1,1,5,5,3)
  (same comment as for Boron)
- Zinc [air, non-urban air or from high stacks]: 5.09e-10 kg; lognormal variance with pedigree 2.35, pedigree (1,1,5,5,3)
  (same comment as for Barium)
- Nickel [air, non-urban air or from high stacks]: 9.6e-11 kg; lognormal variance with pedigree 2.58, pedigree (1,1,5,5,3)
  (same comment as for Barium)
- Manganese [air, non-urban air or from high stacks]: 1.49e-9 kg; lognormal variance with pedigree 2.22, pedigree (1,1,5,5,3)
  (same comment as for Barium)
- BOD5, Biological Oxygen Demand [water, surface water]: 0.000325 kg; lognormal variance with pedigree 0.54, pedigree (1,1,5,5,3)
  (same comment as for Boron)
- Mercury [air, urban air close to ground]: 5.07e-15 kg; lognormal variance with pedigree 2.19, pedigree (1,1,5,5,3)
  (same comment as for Boron)
- NMVOC, non-methane volatile organic compounds, unspecified origin [air, non-urban air or from high stacks]: 1.51e-7 kg; lognormal variance with pedigree 0.21, pedigree (1,1,5,5,3)
  (same comment as for Barium)
- Zinc, ion [water, ground-, long-term]: 0.00108 kg; lognormal variance with pedigree 0.68, pedigree (1,1,5,5,3)
  (same comment as for Bromine)
- Selenium [air, urban air close to ground]: 0 kg; pedigree (1,1,1,1,1)
  (same comment as for Boron)
- Silver, ion [water, ground-, long-term]: 7.14e-7 kg; lognormal variance with pedigree 1.66, pedigree (1,1,5,5,3)
  (same comment as for Bromine)
- Magnesium [air, urban air close to ground]: 5.52e-8 kg; lognormal variance with pedigree 0.69, pedigree (1,1,5,5,3)
  (same comment as for Boron)
- Selenium [air, non-urban air or from high stacks]: 1.52e-12 kg; lognormal variance with pedigree 3.12, pedigree (1,1,5,5,3)
  (same comment as for Barium)
- Iron [air, urban air close to ground]: 2.31e-9 kg; lognormal variance with pedigree 0.85, pedigree (1,1,5,5,3)
  (same comment as for Boron)
- Ammonium, ion [water, surface water]: 0.000763 kg; lognormal variance with pedigree 0.41, pedigree (1,1,5,5,3)
  (same comment as for Boron)
- Aluminium [air, urban air close to ground]: 1.45e-7 kg; lognormal variance with pedigree 0.79, pedigree (1,1,5,5,3)
  (same comment as for Boron)
- Lead [water, surface water]: 1.85e-8 kg; lognormal variance with pedigree 1.59, pedigree (1,1,5,5,3)
  (same comment as for Boron)
- COD, Chemical Oxygen Demand [water, ground-, long-term]: 0.0779 kg; lognormal variance with pedigree 0.61, pedigree (1,1,5,5,3)
  (same comment as for Bromine)
- Arsenic, ion [water, ground-, long-term]: 5.98e-7 kg; lognormal variance with pedigree 1.66, pedigree (1,1,5,5,3)
  (same comment as for Bromine)
- Manganese [water, ground-, long-term]: 0.00025 kg; lognormal variance with pedigree 0.87, pedigree (1,1,5,5,3)
  (same comment as for Bromine)
- Aluminium [water, ground-, long-term]: 0.0124 kg; lognormal variance with pedigree 0.39, pedigree (1,1,5,5,3)
  (same comment as for Bromine)
- COD, Chemical Oxygen Demand [water, surface water]: 0.00103 kg; lognormal variance with pedigree 0.54, pedigree (1,1,5,5,3)
  (same comment as for Boron)
- Silicon [air, urban air close to ground]: 4.54e-7 kg; lognormal variance with pedigree 0.75, pedigree (1,1,5,5,3)
  (same comment as for Boron)
- Ammonia [air, urban air close to ground]: 1.41e-6 kg; lognormal variance with pedigree 0.4, pedigree (1,1,5,5,3)
  (same comment as for Boron)
- Calcium [air, urban air close to ground]: 5.13e-8 kg; lognormal variance with pedigree 0.68, pedigree (1,1,5,5,3)
  (same comment as for Boron)
- Chromium VI [water, surface water]: 1.76e-7 kg; lognormal variance with pedigree 1.51, pedigree (1,1,5,5,3)
  (same comment as for Boron)
- Fluoride [water, ground-, long-term]: 4.98e-5 kg; lognormal variance with pedigree 1.09, pedigree (1,1,5,5,3)
  (same comment as for Bromine)
- Phosphorus [air, urban air close to ground]: 8.6e-9 kg; lognormal variance with pedigree 1.07, pedigree (1,1,5,5,3)
  (same comment as for Boron)
- Molybdenum [air, urban air close to ground]: 5.55e-11 kg; lognormal variance with pedigree 1.81, pedigree (1,1,5,5,3)
  (same comment as for Boron)
- Potassium, ion [water, ground-, long-term]: 0.00163 kg; lognormal variance with pedigree 0.62, pedigree (1,1,5,5,3)
  (same comment as for Bromine)
- BOD5, Biological Oxygen Demand [water, ground-, long-term]: 0.0185 kg; lognormal variance with pedigree 0.61, pedigree (1,1,5,5,3)
  (same comment as for Bromine)
- Iron, ion [water, ground-, long-term]: 0.00213 kg; lognormal variance with pedigree 2.03, pedigree (1,1,5,5,3)
  (same comment as for Bromine)
- Calcium, ion [water, ground-, long-term]: 0.0138 kg; lognormal variance with pedigree 0.38, pedigree (1,1,5,5,3)
  (same comment as for Bromine)
- Magnesium [water, ground-, long-term]: 0.00301 kg; lognormal variance with pedigree 0.54, pedigree (1,1,5,5,3)
  (same comment as for Bromine)
- Sulfate [water, ground-, long-term]: 0.00287 kg; lognormal variance with pedigree 0.69, pedigree (1,1,5,5,3)
  (same comment as for Bromine)
- Sulfate [water, surface water]: 0.000294 kg; lognormal variance with pedigree 0.66, pedigree (1,1,5,5,3)
  (same comment as for Fluoride)
- Cadmium, ion [water, surface water]: 7.08e-8 kg; lognormal variance with pedigree 1.64, pedigree (1,1,5,5,3)
  (same comment as for Boron)
- Antimony [water, surface water]: 8.76e-8 kg; lognormal variance with pedigree 1.64, pedigree (1,1,5,5,3)
  (same comment as for Boron)
- Manganese [water, surface water]: 3.02e-6 kg; lognormal variance with pedigree 1.15, pedigree (1,1,5,5,3)
  (same comment as for Boron)
- DOC, Dissolved Organic Carbon [water, ground-, long-term]: 0.0713 kg; lognormal variance with pedigree 0.61, pedigree (1,1,5,5,3)
  (same comment as for Bromine)
- Barium [water, surface water]: 6.6e-7 kg; lognormal variance with pedigree 1.13, pedigree (1,1,5,5,3)
  (same comment as for Boron)
- Cadmium [air, non-urban air or from high stacks]: 9.3e-10 kg; lognormal variance with pedigree 2.29, pedigree (1,1,5,5,3)
  (same comment as for Barium)
- Methane, fossil [air, urban air close to ground]: 4.03e-7 kg; lognormal variance with pedigree 0.59, pedigree (1,1,5,5,3)
  (same comment as for Boron)
- Iodide [water, surface water]: 8.23e-9 kg; lognormal variance with pedigree 1.98, pedigree (1,1,5,5,3)
  (same comment as for Fluoride)
- Silicon [air, non-urban air or from high stacks]: 5.19e-8 kg; lognormal variance with pedigree 1.79, pedigree (1,1,5,5,3)
  (same comment as for Barium)
- Copper, ion [water, surface water]: 7.55e-8 kg; lognormal variance with pedigree 1.52, pedigree (1,1,5,5,3)
  (same comment as for Boron)
- Carbon dioxide, fossil [air, urban air close to ground]: 0.000205 kg; lognormal variance with pedigree 0.54, pedigree (1,1,5,5,3)
  (same comment as for Boron)
- Cobalt [water, surface water]: 5.9e-8 kg; lognormal variance with pedigree 1.71, pedigree (1,1,5,5,3)
  (same comment as for Boron)
- Magnesium [air, non-urban air or from high stacks]: 1.02e-7 kg; lognormal variance with pedigree 1.66, pedigree (1,1,5,5,3)
  (same comment as for Barium)
- Nickel [air, urban air close to ground]: 6.52e-15 kg; lognormal variance with pedigree 1.61, pedigree (1,1,5,5,3)
  (same comment as for Boron)
- Copper, ion [water, ground-, long-term]: 0.00121 kg; lognormal variance with pedigree 0.68, pedigree (1,1,5,5,3)
  (same comment as for Bromine)
- Lead [water, ground-, long-term]: 0.000502 kg; lognormal variance with pedigree 0.8, pedigree (1,1,5,5,3)
  (same comment as for Bromine)
- Carbon monoxide, fossil [air, non-urban air or from high stacks]: 3.49e-7 kg; lognormal variance with pedigree 0.81, pedigree (1,1,5,5,3)
  (same comment as for Barium)
- Molybdenum [air, non-urban air or from high stacks]: 1.41e-11 kg; lognormal variance with pedigree 2.84, pedigree (1,1,5,5,3)
  (same comment as for Barium)
- Cadmium [air, urban air close to ground]: 3.81e-12 kg; lognormal variance with pedigree 1.69, pedigree (1,1,5,5,3)
  (same comment as for Boron)
- Boron [water, ground-, long-term]: 2.34e-6 kg; lognormal variance with pedigree 1.39, pedigree (1,1,5,5,3)
  (same comment as for Bromine)
- Particulates, < 2.5 um [air, non-urban air or from high stacks]: 2.68e-6 kg; lognormal variance with pedigree 0.47, pedigree (1,1,5,5,3)
  (same comment as for Barium)
- Cobalt [water, ground-, long-term]: 1.28e-6 kg; lognormal variance with pedigree 1.52, pedigree (1,1,5,5,3)
  (same comment as for Bromine)
- Barium [air, urban air close to ground]: 1.03e-8 kg; lognormal variance with pedigree 1.15, pedigree (1,1,5,5,3)
  (same comment as for Boron)
- Chloride [water, ground-, long-term]: 0.00561 kg; lognormal variance with pedigree 0.47, pedigree (1,1,5,5,3)
  (same comment as for Bromine)
- Nitrite [water, surface water]: 1.6e-5 kg; lognormal variance with pedigree 0.58, pedigree (1,1,5,5,3)
  (same comment as for Boron)
- Tin, ion [water, surface water]: 5.71e-9 kg; lognormal variance with pedigree 1.93, pedigree (1,1,5,5,3)
  (same comment as for Boron)
- Methane, non-fossil [air, non-urban air or from high stacks]: 0.0206 kg; lognormal variance with pedigree 0.21, pedigree (1,1,5,5,3)
  (same comment as for Barium)
- Chromium [air, non-urban air or from high stacks]: 8.43e-11 kg; lognormal variance with pedigree 2.59, pedigree (1,1,5,5,3)
  (same comment as for Barium)
- Potassium, ion [water, surface water]: 0.000428 kg; lognormal variance with pedigree 0.68, pedigree (1,1,5,5,3)
  (same comment as for Fluoride)
- Molybdenum [water, surface water]: 3.33e-8 kg; lognormal variance with pedigree 1.78, pedigree (1,1,5,5,3)
  (same comment as for Boron)
- Copper [air, urban air close to ground]: 1.59e-12 kg; lognormal variance with pedigree 1.59, pedigree (1,1,5,5,3)
  (same comment as for Boron)
- Sodium, ion [water, ground-, long-term]: 0.00409 kg; lognormal variance with pedigree 0.5, pedigree (1,1,5,5,3)
  (same comment as for Bromine)
- Vanadium, ion [water, surface water]: 9.27e-8 kg; lognormal variance with pedigree 1.61, pedigree (1,1,5,5,3)
  (same comment as for Boron)
- Aluminium [water, surface water]: 5.76e-6 kg; lognormal variance with pedigree 0.8, pedigree (1,1,5,5,3)
  (same comment as for Boron)
- Cobalt [air, non-urban air or from high stacks]: 2.9e-11 kg; lognormal variance with pedigree 2.74, pedigree (1,1,5,5,3)
  (same comment as for Barium)
- Arsenic [air, non-urban air or from high stacks]: 4.21e-10 kg; lognormal variance with pedigree 2.38, pedigree (1,1,5,5,3)
  (same comment as for Barium)
- Zinc [air, urban air close to ground]: 2.59e-11 kg; lognormal variance with pedigree 1.32, pedigree (1,1,5,5,3)
  (same comment as for Boron)
- Carbon monoxide, non-fossil [air, non-urban air or from high stacks]: 7.63e-6 kg; lognormal variance with pedigree 0.81, pedigree (1,1,5,5,3)
  (same comment as for Barium)
- Iron [air, non-urban air or from high stacks]: 7.77e-9 kg; lognormal variance with pedigree 2.02, pedigree (1,1,5,5,3)
  (same comment as for Barium)
- Bromine [water, surface water]: 1.69e-6 kg; lognormal variance with pedigree 1.38, pedigree (1,1,5,5,3)
  (same comment as for Fluoride)
- Tin, ion [water, ground-, long-term]: 7.34e-5 kg; lognormal variance with pedigree 1.05, pedigree (1,1,5,5,3)
  (same comment as for Bromine)
- Hydrogen chloride [air, non-urban air or from high stacks]: 1.79e-5 kg; lognormal variance with pedigree 1, pedigree (1,1,5,5,3)
  (same comment as for Barium)
- Magnesium [water, surface water]: 0.000369 kg; lognormal variance with pedigree 0.66, pedigree (1,1,5,5,3)
  (same comment as for Boron)
- Tin [air, non-urban air or from high stacks]: 3.41e-12 kg; lognormal variance with pedigree 3, pedigree (1,1,5,5,3)
  (same comment as for Barium)
- Nitrogen, organic bound [water, ground-, long-term]: 0.00103 kg; lognormal variance with pedigree 0.57, pedigree (1,1,5,5,3)
  (same comment as for Bromine)
- Nitrate [water, ground-, long-term]: 6.8e-5 kg; lognormal variance with pedigree 0.55, pedigree (1,1,5,5,3)
  (same comment as for Bromine)
- Aluminium [air, non-urban air or from high stacks]: 2.4e-8 kg; lognormal variance with pedigree 1.87, pedigree (1,1,5,5,3)
  (same comment as for Barium)
- Lead [air, urban air close to ground]: 5.58e-12 kg; lognormal variance with pedigree 1.65, pedigree (1,1,5,5,3)
  (same comment as for Boron)
- Nitrogen oxides [air, non-urban air or from high stacks]: 4.07e-7 kg; lognormal variance with pedigree 0.84, pedigree (1,1,5,5,3)
  (same comment as for Barium)
- Mercury [air, non-urban air or from high stacks]: 1.2e-9 kg; lognormal variance with pedigree 2.25, pedigree (1,1,5,5,3)
  (same comment as for Barium)
- Chromium, ion [water, surface water]: 5.29e-10 kg; lognormal variance with pedigree 1.54, pedigree (1,1,5,5,3)
  (same comment as for Boron)
- Sulfur dioxide [air, non-urban air or from high stacks]: 2.74e-5 kg; lognormal variance with pedigree 1.03, pedigree (1,1,5,5,3)
  (same comment as for Barium)
- Nickel, ion [water, surface water]: 2.33e-7 kg; lognormal variance with pedigree 1.5, pedigree (1,1,5,5,3)
  (same comment as for Boron)
- Chromium [air, urban air close to ground]: 1.23e-14 kg; lognormal variance with pedigree 1.61, pedigree (1,1,5,5,3)
  (same comment as for Boron)
- Antimony [air, urban air close to ground]: 6.36e-12 kg; lognormal variance with pedigree 2.29, pedigree (1,1,5,5,3)
  (same comment as for Boron)
- Carbon monoxide, fossil [air, urban air close to ground]: 1.45e-7 kg; lognormal variance with pedigree 0.5, pedigree (1,1,5,5,3)
  (same comment as for Boron)
- Molybdenum [water, ground-, long-term]: 7.73e-7 kg; lognormal variance with pedigree 1.7, pedigree (1,1,5,5,3)
  (same comment as for Bromine)
- Cadmium, ion [water, ground-, long-term]: 1.16e-5 kg; lognormal variance with pedigree 1.3, pedigree (1,1,5,5,3)
  (same comment as for Bromine)
- Ammonium, ion [water, ground-, long-term]: 0.000631 kg; lognormal variance with pedigree 0.57, pedigree (1,1,5,5,3)
  (same comment as for Bromine)
- Dinitrogen monoxide [air, urban air close to ground]: 3.88e-6 kg; lognormal variance with pedigree 0.35, pedigree (1,1,5,5,3)
  (same comment as for Boron)
- TOC, Total Organic Carbon [water, surface water]: 0.000261 kg; lognormal variance with pedigree 0.54, pedigree (1,1,5,5,3)
  (same comment as for Boron)
- Selenium [water, ground-, long-term]: 9.04e-8 kg; lognormal variance with pedigree 2.14, pedigree (1,1,5,5,3)
  (same comment as for Bromine)
- Manganese [air, urban air close to ground]: 1.59e-14 kg; lognormal variance with pedigree 1.3, pedigree (1,1,5,5,3)
  (same comment as for Boron)
- Calcium [air, non-urban air or from high stacks]: 7.84e-8 kg; lognormal variance with pedigree 1.71, pedigree (1,1,5,5,3)
  (same comment as for Barium)
- Methane, fossil [air, non-urban air or from high stacks]: 0.000944 kg; lognormal variance with pedigree 0.21, pedigree (1,1,5,5,3)
  (same comment as for Barium)
- Selenium [water, surface water]: 4.07e-9 kg; lognormal variance with pedigree 2.06, pedigree (1,1,5,5,3)
  (same comment as for Boron)
- Tin [air, urban air close to ground]: 1.05e-11 kg; lognormal variance with pedigree 1.96, pedigree (1,1,5,5,3)
  (same comment as for Boron)
- Iron, ion [water, surface water]: 1.58e-5 kg; lognormal variance with pedigree 0.94, pedigree (1,1,5,5,3)
  (same comment as for Boron)
- Zinc, ion [water, surface water]: 7.09e-7 kg; lognormal variance with pedigree 1.25, pedigree (1,1,5,5,3)
  (same comment as for Boron)
- Arsenic, ion [water, surface water]: 2.65e-8 kg; lognormal variance with pedigree 1.87, pedigree (1,1,5,5,3)
  (same comment as for Boron)
- NMVOC, non-methane volatile organic compounds, unspecified origin [air, urban air close to ground]: 4.18e-8 kg; lognormal variance with pedigree 0.7, pedigree (1,1,5,5,3)
  (same comment as for Boron)
- Bromine [air, non-urban air or from high stacks]: 2.37e-8 kg; lognormal variance with pedigree 1.86, pedigree (1,1,5,5,3)
  (same comment as for Barium)
- Mercury [water, ground-, long-term]: 1.44e-6 kg; lognormal variance with pedigree 1.57, pedigree (1,1,5,5,3)
  (same comment as for Bromine)
- Carbon monoxide, non-fossil [air, urban air close to ground]: 3.17e-6 kg; lognormal variance with pedigree 0.5, pedigree (1,1,5,5,3)
  (same comment as for Boron)
- Iodide [water, ground-, long-term]: 3.76e-9 kg; lognormal variance with pedigree 1.99, pedigree (1,1,5,5,3)
  (same comment as for Bromine)
- Carbon dioxide, fossil [air, non-urban air or from high stacks]: 0.00615 kg; lognormal variance with pedigree 0.17, pedigree (1,1,5,5,3)
  (same comment as for Barium)
- Chloride [water, surface water]: 0.0013 kg; lognormal variance with pedigree 0.5, pedigree (1,1,5,5,3)
  (same comment as for Fluoride)
- Silicon [water, ground-, long-term]: 0.000941 kg; lognormal variance with pedigree 4.1, pedigree (1,1,5,5,3)
  (same comment as for Bromine)
- Carbon dioxide, non-fossil [air, non-urban air or from high stacks]: 0.135 kg; lognormal variance with pedigree 0.17, pedigree (1,1,5,5,3)
  (same comment as for Barium)
- Antimony [water, ground-, long-term]: 2.29e-6 kg; lognormal variance with pedigree 2.51, pedigree (1,1,5,5,3)
  (same comment as for Bromine)
- Nitrite [water, ground-, long-term]: 3.44e-5 kg; lognormal variance with pedigree 0.57, pedigree (1,1,5,5,3)
  (same comment as for Bromine)
- Iodine [air, non-urban air or from high stacks]: 1.15e-10 kg; lognormal variance with pedigree 2.35, pedigree (1,1,5,5,3)
  (same comment as for Barium)
- Boron [water, surface water]: 4.2e-6 kg; lognormal variance with pedigree 1.36, pedigree (1,1,5,5,3)
  (same comment as for Boron)
- Barium [water, ground-, long-term]: 0.000147 kg; lognormal variance with pedigree 0.88, pedigree (1,1,5,5,3)
  (same comment as for Bromine)
- Lead [air, non-urban air or from high stacks]: 5.62e-11 kg; lognormal variance with pedigree 2.63, pedigree (1,1,5,5,3)
  (same comment as for Barium)
- Methane, non-fossil [air, urban air close to ground]: 8.81e-6 kg; lognormal variance with pedigree 0.59, pedigree (1,1,5,5,3)
  (same comment as for Boron)
- Sodium, ion [water, surface water]: 0.00105 kg; lognormal variance with pedigree 0.56, pedigree (1,1,5,5,3)
  (same comment as for Fluoride)
- Carbon dioxide, non-fossil [air, urban air close to ground]: 0.0045 kg; lognormal variance with pedigree 0.54, pedigree (1,1,5,5,3)
  (same comment as for Boron)
- Sodium [air, non-urban air or from high stacks]: 2.63e-7 kg; lognormal variance with pedigree 1.54, pedigree (1,1,5,5,3)
  (same comment as for Barium)
- Nickel, ion [water, ground-, long-term]: 0.000107 kg; lognormal variance with pedigree 1, pedigree (1,1,5,5,3)
  (same comment as for Bromine)
- Vanadium, ion [water, ground-, long-term]: 2.65e-6 kg; lognormal variance with pedigree 1.7, pedigree (1,1,5,5,3)
  (same comment as for Bromine)
- Phosphate [water, surface water]: 1.46e-5 kg; lognormal variance with pedigree 1.04, pedigree (1,1,5,5,3)
  (same comment as for Boron)
- DOC, Dissolved Organic Carbon [water, surface water]: 0.000251 kg; lognormal variance with pedigree 0.54, pedigree (1,1,5,5,3)
  (same comment as for Boron)
- Chromium VI [water, ground-, long-term]: 1.44e-6 kg; lognormal variance with pedigree 8.15, pedigree (1,1,5,5,3)
  (same comment as for Bromine)
- Nitrate [water, surface water]: 0.00278 kg; lognormal variance with pedigree 0.37, pedigree (1,1,5,5,3)
  (same comment as for Boron)
- Cobalt [air, urban air close to ground]: 1.82e-15 kg; lognormal variance with pedigree 1.84, pedigree (1,1,5,5,3)
  (same comment as for Boron)
- Hydrogen sulfide [water, ground-, long-term]: 7.48e-5 kg; lognormal variance with pedigree 0.69, pedigree (1,1,5,5,3)
  (same comment as for Bromine)
- Potassium [air, non-urban air or from high stacks]: 1.07e-7 kg; lognormal variance with pedigree 1.65, pedigree (1,1,5,5,3)
  (same comment as for Barium)
- TOC, Total Organic Carbon [water, ground-, long-term]: 0.0713 kg; lognormal variance with pedigree 0.61, pedigree (1,1,5,5,3)
  (same comment as for Bromine)
- Copper [air, non-urban air or from high stacks]: 8.32e-11 kg; lognormal variance with pedigree 2.58, pedigree (1,1,5,5,3)
  (same comment as for Barium)
- Vanadium [air, non-urban air or from high stacks]: 4.57e-11 kg; lognormal variance with pedigree 2.68, pedigree (1,1,5,5,3)
  (same comment as for Barium)
- Calcium, ion [water, surface water]: 0.000283 kg; lognormal variance with pedigree 0.65, pedigree (1,1,5,5,3)
  (same comment as for Boron)
- Silicon [water, surface water]: 1.25e-5 kg; lognormal variance with pedigree 0.73, pedigree (1,1,5,5,3)
  (same comment as for Boron)
- Nitrogen [water, surface water]: 2.07e-5 kg; lognormal variance with pedigree 0.38, pedigree (1,1,5,5,3)
  (same comment as for Boron)

## Sampling procedure
Landfill model based on observed leachate concentrations in literature. Extrapolated to 60"000 years heeding chemical characteristics. Initial waste composition from various literature sources.

## Extrapolations
This dataset has been extrapolated from year 2000 to the year of the calculation (2021). The uncertainty has been adjusted accordingly.
