# wind power plant construction, 800kW, moving parts

Dataset: EcoSpold 2, unit process
Geography: GLO
Time period: 1991-01-01 to 2021-12-31
Technology level: current
Classification: ISIC rev.4 ecoinvent: 4220:Construction of utility projects
Classification: EcoSpold01Categories: wind power/production of components
Tags: infrastructure; ConvertedDataset; wind power
Scenario: Business-as-Usual
System model: Allocation, cut-off by classification
Generated by: Christian Bauer
Published in: Burger, B. 2007
Database: ecoinvent
isCopyrightProtected: true
accessRestrictedTo: 1

## General comment
Lifetime is assumed to be 20 years. Annual electricity production is assumed to be about 1.4 GWh. Data are from a Nordex N50/800 plant.
[This dataset was already contained in the ecoinvent database version 2. It was not individually updated during the transfer to ecoinvent version 3. Life Cycle Impact Assessment results may still have changed, as they are affected by changes in the supply chain, i.e. in other datasets. This dataset was generated following the ecoinvent quality guidelines for version 2. It may have been subject to central changes described in the ecoinvent version 3 change report (http://www.ecoinvent.org/database/ecoinvent-version-3/reports-of-changes/), and the results of the central updates were reviewed extensively. The changes added e.g. consistent water flows and other information throughout the database. The documentation of this dataset can be found in the ecoinvent reports of version 2, which are still available via the ecoinvent website. The change report linked above covers all central changes that were made during the conversion process.]

## Included activities end
Includes materials used for moving parts: rotor, nacelle, electric parts, and their disposal. Also includes the prozessing, the energy requirements for assembling, the transports needed, and the connection to the grid.

## Geography
Data for a specific 800kW wind power plant. Represents European installation conditions.

## Technology
Average European technology for a 800 kW wind power plant.

## Parameters
- Installed capacity: 26911 MW; name capacity_installed_new; lognormal variance with pedigree 0.0038, pedigree (2,1,3,1,2)
  Literature value/statistics. New installed capacity of wind power in the world, onshore, 2008. Calculated from the total new installed capacity (27261 MW) minus new capacity offshore (350 MW). [WWEA, 2009. World Wind Energy Report 2008. World Wind Energy Association, Bonn. Table p.12f and chapter "offshore wind energy", p.8]
  Uncertainty: Data from 2008
- Percentage of onshore wind power plant class capacity on total: 0.197 dimensionless; name percentage_class_lt_1MW_onshore; lognormal variance with pedigree 0.009325, pedigree (2,2,1,2,2)
  Percentages onshore 2008 of the three wind power plant classes (average from 41 countries worldwide): <1MW 19.7%; 1-3MW 69.6%; >3MW 10.7% [compilation out of "The Wind Power Database, 2011"]. These percentages are taken to calculate the number of new wind power plants per class with the assumption of average capacity values (0.8MW, 2MW, 4.5MW) .
  Source:
  The Wind Power. 2011. Wind power and wind farms database. www.thewindpower.net

## Reference product
- wind power plant, 800kW, moving parts: 1 unit; By-product classification allocatable product; CPC 53262: Power plants
  EcoSpold01Location=RER
  production volume 3313.42 unit; name apv_windpowerplant; = capacity_installed_new* percentage_class_lt_1MW_onshore/0.8 /2
    Calculated value. See parameters for a closer look at the values used. It is assumed for the annual production volume calculations that the new installed capacity in the class of less than 1MW turbines is represented by half 800kW turbines and half 600kW turbines.
  property price 365564 EUR2005
    The production volume of this product is small compared to other products supplied by the activities within the same ISIC 3 category. Therefore, an average price of products supplied by the activities in the same ISIC 3 code has been applied.This price is obtained as '-66 Machinery and equipment, EU27' (5.71 EURO2003/kg dry soilds) in the 'EU & DK Input Output Database' (available in SimaPro); Weight: 64512 kg per unit. (Source: Existing ecoinvent documentation from ecoinvent v.2.2. From information in the dataset wind power plant 800kW, moving parts.). Extrapolated to relevant wind power plant by a factor 800/150.

## By-products
- aluminium scrap, new: 0 kg; By-product classification Recyclable; CPC 39363: Waste and scrap of aluminium
  Estimation. It is assumed that 100% of that material is recycled.
  production volume 0 kg; = apv_windpowerplant*scrap_aluminium
    Calculated from production volume of reference product using the relative outputs.
  property price 0.806 EUR2005; name scrap_aluminium_price_EUR2005
    Temporary price data. Calculated as 90% of purchasers price based on: 2005 import and export prices (total trades (USD) divided by total weight (kg) in biggest economies of the world: EU27, USA, Brasil, China, India, Japan and Russia) from UN Commodity Trade Statistics Database (http://data.un.org/Explorer.aspxDatabase [Accessed 2011.06.17]). Commodity: Waste or scrap, aluminium
  property carbon content 0
    carbon content on a dry matter basis (reserved; not for manual entry)
  properties: dry mass 1 kg, wet mass 1 kg, water content 0, water in wet mass 0 kg, carbon content, fossil 0, carbon content, non-fossil 0, carbon allocation 0 kg

## Inputs from technosphere
- waste polypropylene: 0 kg; name waste_polypropylene; pedigree (1,1,1,1,1)
  EcoSpold01Location=CH
  Estimation. PP used for the electrical cabinet is disposed in the municipial waste incineration. After 20 years of service reuse is hardly possible. The assumption of a complete disposal in the municipial waste incineration reflects a conservative position.
  production volume 0 kg
    Calculated from the production volume of wind power plant, 800kW, moving parts in proportion to the respective output amounts.
  property price 0 EUR2005; name waste_polypropylene_price_EUR2005
  properties: heating value, net 32.78 MJ, carbon content, fossil 0.825208, water content 0.189061, dry mass 0.841 kg, wet mass 1 kg
  note on heating value, net: Value assumed for all polypropylene products. Source: Phyllis2, database for (treated) biomass, algae, feedstocks for biogas production and biochar, https://phyllis.nl/Biomass/View/1186, ECN.TNO
  note on carbon content, fossil: C content in 1 kg DM was calculated using data in Tab A.1, ecoinvent v2.2 report 13_I
- aluminium, wrought alloy: 207 kg; name alu_wrought; source Nordex 2001; lognormal variance with pedigree 0.042, pedigree (1,1,5,5,1)
  EcoSpold01Location=RER
  Estimation. Aluminium is used for the generator.
  properties: wet mass 1 kg, dry mass 1 kg
- lubricating oil: 0 kg; name lubricating_oil; source Nordex 2001; pedigree (1,1,1,1,1)
  EcoSpold01Location=RER
  Estimation. Hydraulic oil is used for the hydraulically operated pitch, rotor brake and nacelle brake.
  properties: dry mass 1 kg, carbon content, fossil 0.75, wet mass 1 kg, heating value, net 40.2 MJ
  note on carbon content, fossil: Lubricating oil is produced from diesel. C-content/dry mass of fats and oils considered 75%, from: ecoinvent v2.2 report, n 15a, pg 40
  note on heating value, net: Literature value, Source: IPCC 2006, 2006 IPCC Guidelines for National Greenhouse Gas Inventories, Prepared by the National Greenhouse Gas Inventories Programme, Eggleston H.S., Buendia L., Miwa K., Ngara T. and Tanabe K. (eds). Published: IGES, Japan
- steel, low-alloyed, hot rolled: 3750 kg; name steel_lowalloyed; source Nordex 2001; lognormal variance with pedigree 0.042, pedigree (1,1,5,5,1)
  EcoSpold01Location=RER
  Estimation. Used in the yaw control, for the axis in the nacelle and in the electrical cabinet.
  Further references:
  Scholzen (1991): Oekobilanz von Windenergie am Beispiel einer 30 kW-Anlage auf dem Simplon. Semesterarbeit am Laboratorium für Energiesysteme, ETH Zürich.
  properties: carbon content, fossil 0.005, dry mass 1 kg, wet mass 1 kg
  note on carbon content, fossil: Low alloyed steel composition given in Tab. 3.2 ecoinvent v2.2 report 10_partII. Steel assumed to have a C content of 0.5%
- polypropylene, granulate: 20 kg; name polypropylene; source Nordex 2001; lognormal variance with pedigree 0.342, pedigree (1,1,5,5,1)
  EcoSpold01Location=RER
  Estimation. PP is used for the electronical system.
  properties: wet mass 1 kg, carbon content, fossil 0.857143, dry mass 1 kg, heating value, net 32.78 MJ
  note on carbon content, fossil: Polypropylene is formed by the polymerisation of propylene, C3H6 (ecoinvent v2.2 report 11_II)
  note on heating value, net: Value extracted from "treatment of waste polypropylene, open burning"
- lead: 0.5 kg; source Scholzen F. 1991; lognormal variance with pedigree 0.042, pedigree (1,1,5,5,1)
  Estimation. Lead is used for electronics in the electrical cabinet. Waste treatment/recycling is neglected.
  EcoSpold01Location=RER
  properties: dry mass 1 kg, wet mass 1 kg
- scrap steel: 0 kg; name scrap_steel
  Estimation. It is assumed that 100% of that material is recycled.
  production volume 0 kg
    Calculated from production volume of reference product using the relative outputs.
  property price 0 EUR2005; name scrap_steel_price_EUR2005
  properties: wet mass 1 kg, dry mass 1 kg
- waste plastic, mixture: 0 kg; name waste_plastic_mixture; pedigree (1,1,1,1,1)
  EcoSpold01Location=CH
  Calculated value. Rotor blades and nacelle cover are disposed in the municipial waste incinerator as it is not possible to seperate the components of glass fibre reinforced plastic. Per kg of glass fiber reinforced plastic 0.35 kg waste is estimated. Additionally the synthetic rubber (100 kg) is disposed (recommended by Gabor Doka, 28.7.2003).
  production volume 0 kg
    (same comment as for waste polypropylene)
  property price 0 EUR2005; name waste_plastic_mixture_price_EUR2005
  properties: water content 0.180638, dry mass 0.847 kg, carbon content, fossil 0.747344, wet mass 1 kg, heating value, net 30.79 MJ
  note on carbon content, fossil: C content in 1 kg DM was calculated using data in Tab A.2, ecoinvent v2.2 report 13_I
  note on heating value, net: Value taken from the general comment of the treatment dataset.
- copper, cathode: 1460 kg; name copper; source Nordex 2001; lognormal variance with pedigree 0.342, pedigree (1,1,5,5,1)
  EcoSpold01Location=RER
  Estimation. For the generator 403 kg of copper is estimated. For the network connection 1057kg of copper are estimated.
  properties: dry mass 1 kg, wet mass 1 kg
- waste polyethylene: 0 kg; name waste_polyethylene; pedigree (1,1,1,1,1)
  EcoSpold01Location=CH
  Estimation. PE out of the cable tube is disposed in the municipial waste incineration. After 20 years of service reuse is hardly possible. The assumption of a complete disposal in the municipial waste incineration reflects a conservative position.
  production volume 0 kg
    (same comment as for waste polypropylene)
  property price 0 EUR2005; name waste_polyethylene_price_EUR2005
  properties: wet mass 1 kg, water content 0.00401606, dry mass 0.996 kg, carbon content, fossil 0.825301, heating value, net 42.47 MJ
- polyvinylchloride, bulk polymerised: 434 kg; name polyvinylchloride; source Nordex 2001; lognormal variance with pedigree 0.342, pedigree (1,1,5,5,1)
  Estimation. Used for the network connectionand for the electronical system.
  Further references:
  Scholzen (1991): Oekobilanz von Windenergie am Beispiel einer 30 kW-Anlage auf dem Simplon. Semesterarbeit am Laboratorium für Energiesysteme, ETH Zürich.
  EcoSpold01Location=RER
  properties: heating value, net 21.5 MJ, dry mass 1 kg, carbon content, fossil 0.387097, wet mass 1 kg
  note on carbon content, fossil: Monomer is vynyl chloride, C2H3Cl (ecoinvent v2.2 report 11_II). MW=62 g/mol
- waste polyvinylchloride: 0 kg; name waste_pvc; pedigree (1,1,1,1,1)
  Estimation. PVC used for the electrical cabinet is disposed in the municipial waste incineration. After 20 years of service reuse is hardly possible. The assumption of a complete disposal in the municipial waste incineration reflects a conservative position.
  EcoSpold01Location=CH
  production volume 0 kg
    (same comment as for waste polypropylene)
  property price 0 EUR2005; name waste_pvc_price_EUR2005
  properties: heating value, net 21.51 MJ, wet mass 1 kg, water content 0.00200401, carbon content, fossil 0.440882, dry mass 0.998 kg
- scrap copper: 0 kg; name scrap_copper; pedigree (1,1,1,1,1)
  Estimation. It is assumed that 100% of that material is recycled.
  production volume 0 kg
    Calculated from production volume of reference product using the relative outputs.
  property price 0 EUR2005; name scrap_copper_price_EUR2005
  property carbon content, fossil 0; name C_content_fossil
  property water content 0; name water_content
  property water in wet mass 0 kg; name WWM
  property carbon content, non-fossil 0; name C_content_non_fossil
  properties: dry mass 1 kg, wet mass 1 kg
- sheet rolling, chromium steel: 14500 kg; = chromium_steel; source Nordex 2001; lognormal variance with pedigree 0.052, pedigree (1,1,5,5,1)
  EcoSpold01Location=RER
  Estimation. Construction efforts for the whole amount of chromium steel used.
- sheet rolling, aluminium: 207 kg; = alu_wrought; source Nordex 2001; lognormal variance with pedigree 0.0406, pedigree (1,1,5,1,1)
  Estimation. Construction efforts for the whole amount of aluminium used.
  EcoSpold01Location=RER
- section bar rolling, steel: 10230 kg; = cast_iron+steel_lowalloyed; source Nordex 2001; lognormal variance with pedigree 0.052, pedigree (1,1,5,5,1)
  Estimation. Construction efforts for low-allowed steel.
  EcoSpold01Location=RER
- synthetic rubber: 100 kg; name rubber; source Nordex 2001; lognormal variance with pedigree 0.082, pedigree (1,1,5,5,1)
  EcoSpold01Location=RER
  Estimation. For the mechanical system within the nacelle synthetic rubber is used.
  properties: dry mass 1 kg, wet mass 1 kg, carbon content, fossil 0.871949, heating value, net 26.42 MJ
  note on carbon content, fossil: EPDM (Ethylene-propene-diene terpolymer) rubber is a terpolymer of ethylene, propene, and a diene with the residual unsaturated portion of the diene in the side chain (ecoinvent v2.2 report 7-part XX & Ullmann). Chemical formula (deduced from Evidences of Solvent-Induced Miscibility in Polychloroprene-co-Ethylene-Propene Diene Terpolymer Blends, Dubey et al., Journal of Applied Polymer Science, 2009, 111:1884–1891): C20H35
- polyethylene, high density, granulate: 621 kg; name hdpe; source Nordex 2001; lognormal variance with pedigree 0.342, pedigree (1,1,5,5,1)
  (same comment as for polyvinylchloride, bulk polymerised)
  properties: heating value, net 42.47 MJ, carbon content, fossil 0.857143, wet mass 1 kg, dry mass 1 kg
  note on carbon content, fossil: Polyethylene is formed out of a huge amount of ethylene monomers (C2H4) (ecoinvent v2.2 report 11_II). MW=28 g/mol
- electricity, medium voltage: 17510 kWh; source Jacquiéry 1994; lognormal variance with pedigree 0.162, pedigree (1,1,5,5,1)
  EcoSpold01Location=CH
  Estimation. For assembling the individual parts an electricity consumption of 0.5 kWh/kg for a total mass of 35 t is assumed (35'000 kg * 0.5 kWh = 17'500 kWh). The mass has to be lifted the entire height of the tower. The effort is estimated by means of potential energy (Epot = m*g*h = 35'000 kg*10 ms-2*45 m = 15.75 MJ = 4.375 kWh). The additional electrictiy consumption, including horizontal movements and losses can be estimated at about 10 kWh.
  Further references:
  Baumann T., Ménard M. (1993) Der kumulierte Energieaufwand - Methode und Resultate der Input-Output-Ana­lyse. Diplomarbeit am Laboratorium für Energiesysteme, ETH Zürich.
- cast iron: 6480 kg; name cast_iron; source Nordex 2001; lognormal variance with pedigree 0.052, pedigree (1,1,5,5,1)
  Estimation. Used for the hub of the rotor, the gear, the main bearing and for the generator.
  Further references:
  ABB (1991): Brunk F. Information from the company ABB.
  EcoSpold01Location=RER
  properties: wet mass 1 kg, dry mass 1 kg, carbon content, fossil 0.04
  note on carbon content, fossil: Cast iron is made by remelting pig iron in small furnaces (e.g. cupola furnaces or electric arc furnaces) and poured into moulds to make castings. It usually contains 2% to 6% carbon (ecoinvent v2.2 report 10_partII). An average content of 4% was considered
- glass fibre reinforced plastic, polyamide, injection moulded: 9660 kg; name glass_fibre_plastic; source Nordex 2001; lognormal variance with pedigree 0.042, pedigree (1,1,5,5,1)
  EcoSpold01Location=RER
  Estimation. Used in the rotor blades and for the cover of the nacelle.
  properties: dry mass 1 kg, wet mass 1 kg, carbon content, fossil 0.446018
  note on carbon content, fossil: Polyamide resin assimilate to Nylon 66 (ecoinvent v2.2 report 7_XIII). Nylon 66 is derived from hexamethylene diamine and adipic acid and has the following structure: -(HN-(CH2)6-NH-CO-(CH2)4-CO)n- (ecoinvent v2.2 report 11_II), C12H22N2O2. MW=226 g/mol. Here Nylon 66 is – mainly for improved stiffness and stability – modified with glass fibres. The glass fibre content in the product is assumed of 30%. (ecoinvent v2.2 report 11_II)
- tin: 0.5 kg; source Scholzen F. 1991; lognormal variance with pedigree 0.042, pedigree (1,1,5,5,1)
  Estimation. Tin is used for electronics in the electrical cabinet. Waste treatment/recycling is neglected.
  EcoSpold01Location=RER
  properties: dry mass 1 kg, wet mass 1 kg
- wire drawing, copper: 1460 kg; = copper; source Nordex 2001; lognormal variance with pedigree 0.0406, pedigree (1,1,5,1,1)
  EcoSpold01Location=RER
  own estimation
- steel, chromium steel 18/8, hot rolled: 14500 kg; name chromium_steel; source Nordex 2001; lognormal variance with pedigree 0.052, pedigree (1,1,5,5,1)
  Estimation. Used for the rotor, the nacelle (mechanical system), the nacelle cover, the yaw control and for hydraulics.
  EcoSpold01Location=RER
  properties: carbon content, fossil 0.0008, wet mass 1 kg, dry mass 1 kg
  note on carbon content, fossil: Stainless steel model is the grade 304 steel (18/8 stainless, 18% chromium 8% nickel; max. 0.08% C)
- waste glass: 0 kg; name waste_glass; pedigree (1,1,1,1,1)
  Calculated value. Rotor blades and nacelle cover are disposed in the municipial waste incinerator as it is not possible to seperate the components of glass fibre reinforced plastic. Per kg of glass fiber reinforced plastic 0.65 kg waste is estimated (recommended by Gabor Doka, 28.7.2003).
  EcoSpold01Location=CH
  production volume 0 kg
    (same comment as for waste polypropylene)
  property price 0 EUR2005; name waste_glass_price_EUR2005
  properties: heating value, net 0.05 MJ, wet mass 1 kg, dry mass 1 kg
  note on heating value, net: Value extracted from "treatment of waste glass, open dump, very wet infiltration class (1000mm)"
- waste mineral oil: 0 kg; name waste_min_oil; pedigree (1,1,1,1,1)
  Estimation. All the oil from hydraulics is disposed after use.
  EcoSpold01Location=CH
  production volume 0 kg
    (same comment as for waste polypropylene)
  property price 0 EUR2005; name waste_min_oil_price_EUR2005
  properties: dry mass 0.9 kg, carbon content, fossil 0.864444, wet mass 1 kg, heating value, net 34.7 MJ, water content 0.111111
  note on carbon content, fossil: Tab A.6, ecoinvent v2.2 report 13_I. C content has been calculated after data in the tables, and then referred to 1 kg DM
- aluminium scrap, new: -207 kg
  Estimation. It is assumed that 100% of that material is recycled.
  production volume 685877 kg
  properties: dry mass 1 kg, wet mass 1 kg
- waste polypropylene: -1.92509, -0.148413, -0.0613001, -0.0582101, -2.22122, -0.0247645, -0.0112243, -15.5498 kg (8 entries); lognormal variance with pedigree 0.0406, pedigree (1,1,5,1,1)
  (same comment as for waste polypropylene)
  production volume 2.05763e6 kg
- lubricating oil: 10.2312, 48.5688 kg (2 entries); source Nordex 2001; lognormal variance with pedigree 0.042, pedigree (1,1,5,5,1)
  (same comment as for lubricating oil)
- scrap steel: -6021.64, -7.6292, -18700.7 kg (3 entries)
  Estimation. It is assumed that 100% of that material is recycled.
  production volume 8.19408e7 kg
- waste plastic, mixture: -335.063, -25.8314, -10.6693, -10.1315, -386.603, -4.31026, -1.95358, -2706.44 kg (8 entries); lognormal variance with pedigree 0.052, pedigree (1,1,5,5,1)
  (same comment as for waste plastic, mixture)
  production volume 1.1534e7 kg
- waste polyethylene: -59.7742, -4.60824, -1.90337, -1.80742, -68.9689, -0.768938, -0.348513, -482.82 kg (8 entries); lognormal variance with pedigree 0.0406, pedigree (1,1,5,1,1)
  (same comment as for waste polyethylene)
  production volume 2.05763e6 kg
- waste polyvinylchloride: -41.7745, -3.22057, -1.33021, -1.26316, -48.2005, -0.53739, -0.243567, -337.43 kg (8 entries); lognormal variance with pedigree 0.0406, pedigree (1,1,5,1,1)
  (same comment as for waste polyvinylchloride)
  production volume 1.43802e6 kg
- scrap copper: -463.123, -21.7287, -975.148 kg (3 entries); lognormal variance with pedigree 0.0406, pedigree (1,1,5,1,1)
  Estimation. It is assumed that 100% of that material is recycled.
  production volume 4.83759e6 kg
- waste glass: -955.848, -46.3791, -4.32711, -19.3622, -503.203, -6.57095, -1.05219, -4742.26 kg (8 entries); lognormal variance with pedigree 0.052, pedigree (1,1,5,5,1)
  (same comment as for waste glass)
  production volume 2.08049e7 kg
- waste mineral oil: -16.1401, -0.399564, -42.2604 kg (3 entries); lognormal variance with pedigree 0.0406, pedigree (1,1,5,1,1)
  Estimation. All the oil from hydraulics is disposed after use.
  EcoSpold01Location=CH
  production volume 194829 kg

## Sampling procedure
Literature

## Extrapolations
This dataset has been extrapolated from year 2002 to the year of the calculation (2021). The uncertainty has been adjusted accordingly.

## Review by Thomas Nemecek 2005-07-19
Passed.
