# treatment of used railway track

Dataset: EcoSpold 2, unit process
Geography: CH
Time period: 1999-01-01 to 2021-12-31
Technology level: current
Classification: EcoSpold01Categories: transport systems/train
Classification: ISIC rev.4 ecoinvent: 3830:Materials recovery
Tags: Treatment; ConvertedDataset
Scenario: Business-as-Usual
System model: Allocation, cut-off by classification
Generated by: Michael Spielmann (obsolete)
Published in: Spielmann M. 2007
Database: ecoinvent
isCopyrightProtected: true
accessRestrictedTo: 1

## General comment
The dataset represents the disposal a railway track in Switzerland. Environmental interventions and inputs from the technosphere are referred to 1-meter and year [ma] rail track.
[This dataset was already contained in the ecoinvent database version 2. It was not individually updated during the transfer to ecoinvent version 3. Life Cycle Impact Assessment results may still have changed, as they are affected by changes in the supply chain, i.e. in other datasets. This dataset was generated following the ecoinvent quality guidelines for version 2. It may have been subject to central changes described in the ecoinvent version 3 change report (http://www.ecoinvent.org/database/ecoinvent-version-3/reports-of-changes/), and the results of the central updates were reviewed extensively. The changes added e.g. consistent water flows and other information throughout the database. The documentation of this dataset can be found in the ecoinvent reports of version 2, which are still available via the ecoinvent website. The change report linked above covers all central changes that were made during the conversion process.]

## Included activities start
Service starts with the transport of the material to be disposed.

## Included activities end
The dataset ends with the disposal of 1-meter and year (ma) rail track. The dataset includes the transport of the material and the disposal of pollutants and inert waste.

## Geography
Data refers to average conditions in Switzerland and a specific conditions in Germany

## Technology
The disposal of rail infrastructure reflects the SBB situation in 2000. Environmentally relevant components are contaminated gravel of the track bedding and contaminated gravel-sand of the substructures. Also, the disposal of creosoted timber railroad sleepers requires a special treatment. In contrast, for rails and concrete railroad sleepers a cut off allocation has been made, since the arising amount is completely recycled SBB (2002). Currently, the SBB rebuild approximately 140-160 km/year of its rail network track bedding. In addition, for approximately 30 km of these tracks a complete renewal is performed including both, track bedding and substructure. The excavation waste is reported with 412’800 t/a, including both gravel and gravel-sand. Also it is claimed that approximately 80% of the used gravel are transported to specific washing facilities. The cleaned gravel then usually is used for other purposes. Thus, a cut off allocation is applied here. However, 20% of the total amount (82500 t/a) is deposited at specific landfills. Approximately 90% of wooden wastes are timber railroad sleepers. Since autumn 2000, in Switzerland the sale of used wooden sleepers is prohibited. In 2001, the wooden sleepers are incinerated in thermal power plants. Thus, we merely include the transport of the wooden sleepers to thermal power plants. We assume an average distance of 200 km for the transport.
References:
SBB (2002) Umweltbericht 2000/2001. SBB, Bahnumweltzentrum, Bern, Online-Version under: www.sbb.ch/umwelt.

## Time period
Rail length is based on current statistical data (2000). The expenditures for the track disposal represent a recent high speed track in Germany

## Reference product
- used railway track: -1 m*year; By-product classification Waste; CPC 39990: Other wastes n.e.c.
  EcoSpold01Location=CH
  production volume 0.0336675 m*year
    This is a placeholder value that does not reflect real-world production volumes. This dataset does not currently require a real-world production volume to work in the database framework, and no actual data were collected yet. This has no negative effect on the results of the ecoinvent database. The placeholder value of this activity was scaled according to the nominal GDP of 2005 (source: United Nations, http://data.un.org/Glossary.aspx?q=GDP+%28current+US%24%29, accessed 20130726) to reflect an appropriate share of the global production volume, which is also a placeholder value.
  property price 0 EUR2005
    Waste products are assigned a price of zero as they are assumed to require further treatment.
  property carbon content, non-fossil 0
    Calculated from C content in input materials in the infrastructure
  property carbon content, fossil 8.23188e-5
    Calculated from C content in input materials in the infrastructure
  property carbon content 8.23188e-5
    carbon content on a dry matter basis (reserved; not for manual entry)
  properties: water in wet mass 0 kg, dry mass 690 kg, water content 0, wet mass 690 kg, carbon allocation 0.0568 kg

## Inputs from technosphere
- inert waste, for final disposal: -38.65 kg; source SBB 2002; lognormal variance with pedigree 0.0593, pedigree (2,3,5,3,3)
  EcoSpold01Location=CH
  Calculated value from SBB (2002). In v2.2 this flow was called "disposal, inert waste, 5% water, to inert material landfill".
  Uncertainty: Swiss Rail study
  production volume 38.65 kg
    Calculated from the production volume of used railway track in proportion to the respective output amounts.
  properties: dry mass 0.995 kg, water content 0.00502513, wet mass 1 kg
- pollutant from rail ballast: -0.14 kg; source SBB 2002; lognormal variance with pedigree 0.0593, pedigree (2,3,5,3,3)
  EcoSpold01Location=CH
  Calculated value from SBB (2002). In v2.2 this flow was called "disposal, pollutants from rail ballast, 0% water, to residual material landfill".
  Uncertainty: Swiss Rail study
  production volume 0.14 kg
    (same comment as for inert waste, for final disposal)
  properties: wet mass 1 kg, dry mass 1 kg

## Sampling procedure
national statistics and literature studies

## Extrapolations
This dataset has been extrapolated from year 2000 to the year of the calculation (2021). The uncertainty has been adjusted accordingly.

## Review by Roland Hischier 2011-09-23
Transfer of documentation done.

## Review by Niels Jungbluth 2005-07-19
passed.
