# paper production, woodcontaining, supercalendered

Dataset: EcoSpold 2, unit process
Geography: RER
Time period: 2000-01-01 to 2021-12-31
Technology level: current
Classification: ISIC rev.4 ecoinvent: 1701:Manufacture of pulp, paper and paperboard
Classification: EcoSpold01Categories: paper & cardboard/graphic paper
Synonyms: SC Paper
Tags: ConvertedDataset
Scenario: Business-as-Usual
System model: Allocation, cut-off by classification
Generated by: Roland Hischier
Published in: Hischier R. 2007
Database: ecoinvent
isCopyrightProtected: true
accessRestrictedTo: 1

## General comment
Supercalendered Paper (SC Paper) is a non-coated (i.e. no coating with a coating material like kaolin or calcium carbonate) type of mechanical paper which means that less than 90% of the fibres are in form of chemical pulp. Like lightweight coated (LWC) paper, it is mainly used for print materials such as magazines and journals that require a higher paper quality than newsprint paper. Usually, this kind of paper mill contains an integrated mechanical pulp production and sometimes also an integrated deinking equipment for recovered paper. Used sulfate pulp is usually produced outside of the paper mill.

The main sources for this dataset are several environmental reports from European paper mills (Anjalankoski (2001); Jämsä River Mill (2000); Kotka (2001); Laakirchen (2001); Rauma Mill (2001); Reisholz (2002); Summa Mill (2001)). Further sources are the Finnish EcoData database from KCL (KCL (2002)), the German inventory study about graphical paper (Tiedemann et al. (2000)) and the European IPPC documentation for the paper and pulp industry (European Commission (2000)).

References:

Anjalankoski (2001) Environmental Statement Anjalankoski Mill 2000. Stora Enso Oyj, Anjalankoski (Finland) as pdf-File under: http://www.storaenso.com/CDAvgn/main/0,,1_-2393-2097-,00.html

Jämsä River Mill (2000) Environmental statement 1999. UPM-Kymmene, Jämsänkoski (Finland) as pdf-File under: http://www.paper.upm-kymmene.com

Kotka (2001) Environmental Statement 2000. Stora Enso
Kotka Mill, Kotka (Finland) as pdf-File under: http://www.storaenso.com/CDAvgn/main/0,,1_-2393-2097-,00.html

Laakirchen (2001) Umwelterklärung 2000. SCA Graphic Laakirchen AG, Laa-kirchen (Austria) as pdf-File under: http://www.forestproducts.sca.com/gem/gb/subscribe/publication/environm/pdf/Environ%20laak%20de%2000.pdf

Rauma Mill (2001)
Environmental report 2000. UPM-Kymmene, Rauma (Fin-land) as pdf-File under: http://www.paper.upm-kymmene.com

Reisholz (2002)
Umwelterklärung 2001Werk Reisholz. StoraEnso Reisholz GmbH, Düsseldorf (Germany) as pdf-File under: http://www.storaenso.com/CDAvgn/main/0,,1_-2394-2102-,00.html

Summa Mill (2001) Environmental Statement Summa Mill 2000. Stora
Enso Newsprint, Hamina (Finland) as pdf-File under: http://www.storaenso.com/CDAvgn/main/0,,1_-2393-2097-,00.html

Further References

European Commission (2000) Integrated Pollution Prevention and Control (IPPC) - Reference Document on Best Available Techniques in the Pulp and Paper Industry. Institute for Prospective Technological Studies,
Sevilla

KCL (2002) KCL EcoData - life cycle inventory database. The Finnish Pulp and Paper Research Institute (KCL), Espoo (Finnland)

Tiedemann A., Böttcher Tiedemann C., Buschardt A., Georgi B.,
Giersberg G., Goosmann G., Gregor H.-D., Mehlhorn B., Modi A., Neitzel
H., Oels H.-J., Schmitz S. and Suhr M. (2000) Ökobilanzen für graphische Papiere. Texte 22/00. Umweltbundesamt, Berlin

## Included activities start
This activity starts with the reception of the raw materials, such as pulpwood and sulfate market pulp.

## Included activities end
This dataset represents the European production of SC paper - including wood handling, mechanical pulping and bleaching, deinking of waste paper, paper production, energy production on-site and internal wastewater treatment. A small amount of waste paper input (6.1% of output paper weight) has been included in the amount of pulp. The sorting of this paper and the related by-products have been excluded, since the sorting of unsorted paper takes place in a separate activity.

## Geography
Data from several European SC paper producers used as European average data.

## Technology
Average of present used technology

## Time period
Data represent the average technology in the late 1990ies and early 2000s. The production volume is valid for 2018

## Parameters
- fraction, cooling water, cooling pond system, to air: 0.032 dimensionless; name fraction_CW_CP_to_air; lognormal variance with pedigree 0.0413, pedigree (2,3,1,3,1)
  Calculated based on literature value (Scown, C.D., 2011, Water Footprint of U.S. Transportation Fuels and supplying information of the article) (Vionnet, S., Quantis Water Database - Technical Report, 2012).
- fraction, process water, to air: 0.15 dimensionless; name fraction_PW_to_air; lognormal variance with pedigree 0.092025, pedigree (4,4,3,2,4)
  Literature value. In case when no industry/process specific data are available, default evaporation fraction value is used. This value is 15% and is based on literature (Statistics Canada, 2007 & Shaffer, K.H., 2008, Consumptive water use in the Great Lakes Basin, USGS & Shiklomanov, 2003, World Water Resources at the Beginning of the 21st Century) and has been approved by an expert.
- fraction, cooling water, recirculating system, to air: 0.771 dimensionless; name fraction_CW_R_to_air; lognormal variance with pedigree 0.0413, pedigree (2,3,1,3,1)
  (same comment as for fraction, cooling water, cooling pond system, to air)
- fraction, cooling water, once-through system, to air: 0.004 dimensionless; name fraction_CW_OT_to_air; lognormal variance with pedigree 0.0413, pedigree (2,3,1,3,1)
  (same comment as for fraction, cooling water, cooling pond system, to air)
- fraction, cooling water, to air: 0.3875 dimensionless; name fraction_CW_to_air; = (0.5*fraction_CW_OT_to_air)+(0.5*fraction_CW_R_to_air); lognormal variance with pedigree 0.092025, pedigree (4,4,3,2,4)
  Calculated value based on literature value (see comments of the other parametres present in this dataset) and expert opinion. In the case when no industry/literature data are available about the type of cooling or directly fraction, cooling water, to air specific for the process a default assumption is applied. It is assumed that the once-through cooling system is used in 50% of all cases and recirculating system is used in another 50% of all cases.

## Reference product
- paper, woodcontaining, supercalendered: 1 kg; name ref; By-product classification allocatable product; CPC 321: Pulp, paper and paperboard
  EcoSpold01Location=RER
  production volume 6.1191e9 kg; name ref_PV
    Kg/year, valid for 2018,
    retrieved from FAOSTAT, Forestry Production and Trade Statistics, filtered for Regions “World”, Elements “production”, Items “Printing and writing papers, uncoated, mechanical”, Years “2018”, at http://www.fao.org/faostat/en/#data/FO <http://www.fao.org/faostat/en/>, last accessed April 2020.
  property carbon content, non-fossil 0.357
    Calculated Value. Based in carbon content, non-fossil of inputs.
  property price 0.572 EUR2005
    Export prices for the World+ according to: http://faostat.fao.org/site/626/DesktopDefault.aspx?PageID=626#ancor downloaded 6 May 2009; calculated as export value divided by export volume.
  property carbon content, fossil 0.0109646
    Fossil C content was calculated after fossil C contents of chemicals used in the production of the paper (in Tab 8.24 ecoinvent v2.2 report 11_III, part 8).
  property carbon content 0.367965
    carbon content on a dry matter basis (reserved; not for manual entry)
  properties: water in wet mass 0.055 kg, wet mass 1 kg, dry mass 0.945 kg, water content 0.0582011, heating value, net 14.11 MJ, carbon allocation 0.347727 kg

## Inputs from technosphere
- sodium dithionite, anhydrous: 0.00127 kg; lognormal variance with pedigree 0.0407, pedigree (1,3,5,3,1)
  EcoSpold01Location=RER
  Average from several SC paper producers
  Uncertainty: average from several SC paper producers
  properties: wet mass 1 kg, dry mass 1 kg
- kaolin: 0.221364 kg; lognormal variance with pedigree 0.0407, pedigree (1,3,5,3,1)
  Average from several SC paper producers
  EcoSpold01Location=RER
  Uncertainty: average from several SC paper producers
  properties: wet mass 1 kg, dry mass 1 kg
- malusil: 0.023586 kg; lognormal variance with pedigree 0.0407, pedigree (1,3,5,3,1)
  (same comment as for sodium dithionite, anhydrous)
  properties: wet mass 1 kg, dry mass 1 kg
- heat, district or industrial, other than natural gas: 2.63 MJ; lognormal variance with pedigree 0.0487, pedigree (1,2,5,1,3)
  EcoSpold01Location=RER
  Heat input as reported by Hischier 2007. Activity Link set to the respective heat supplying activity.
  Uncertainty: value according to CEPI energy report
  properties: heating value, net 1 MJ
- heat, central or small-scale, other than natural gas: 0.302 MJ; lognormal variance with pedigree 0.0487, pedigree (1,2,5,1,3)
  Heat input as reported by Hischier 2007. Activity Link set to the respective heat supplying activity.
  EcoSpold01Location=RER
  Uncertainty: value according to CEPI energy report
  properties: heating value, net 1 MJ
- hydrogen peroxide, without water, in 50% solution state: 0.00678 kg; lognormal variance with pedigree 0.0407, pedigree (1,3,5,3,1)
  (same comment as for kaolin)
  properties: dry mass 1 kg, wet mass 1 kg, heating value, net 7.13 MJ
- chemical, inorganic: 0.00802 kg; lognormal variance with pedigree 0.0407, pedigree (1,3,5,3,1)
  EcoSpold01Location=GLO
  Average from several SC paper producers
  Uncertainty: average from several SC paper producers
  properties: carbon content, fossil 0.003, dry mass 1 kg, wet mass 1 kg
  note on carbon content, fossil: This dataset is an unweighted average of 20 inorganic substances (listed in Tab 88.1, ecoinvent v2.2 report 8, part II), being part of the top100 chemicals included in this database. The C-content has also been calculated as an unweighted average of the C content of the substances composing this dataset.
- heat, district or industrial, other than natural gas: 0.354 MJ; lognormal variance with pedigree 0.0487, pedigree (1,2,5,1,3)
  Heat input as reported by Hischier 2007. Activity Link set to the respective heat supplying activity.
  properties: corresponding fuel use, propane, furnace >100kW 1.05263 MJ, heating value, net 1 MJ
  note on corresponding fuel use, propane, furnace >100kW: Lower heating value of the fuel input related to the heat/electricity output, taken directly from ecoinvent v3.0 dataset "heat production, natural gas, at industrial furnace >100kW, GLO 2000".
- chemical, organic: 0.00802 kg; lognormal variance with pedigree 0.0407, pedigree (1,3,5,3,1)
  Average from several SC paper producers
  EcoSpold01Location=GLO
  Uncertainty: average from several SC paper producers
  properties: heating value, net 19.03 MJ, carbon content, fossil 0.628, wet mass 1 kg, dry mass 1 kg
  note on carbon content, fossil: This dataset is an unweighted average of 20 organic substances (listed in Tab 88.1, ecoinvent v2.2 report 8, part II), being part of the top100 chemicals included in this database. The C-content has also been calculated as an unweighted average of the C content of the substances composing this dataset.
- lime: 0.04995 kg; lognormal variance with pedigree 0.0407, pedigree (1,3,5,3,1)
  Average from several SC paper producers
  EcoSpold01Location=CH
  Uncertainty: average from several SC paper producers
  properties: carbon content, fossil 0.120005, dry mass 1 kg, wet mass 1 kg
- municipal solid waste: -0.0003 kg; name msw; lognormal variance with pedigree 0.0407, pedigree (1,3,5,3,1)
  EcoSpold01Location=CH
  Average from several SC paper producers
  Uncertainty: average from several SC paper producers
  production volume 1.83573e6 kg; = ref_PV*msw/ref
    Calculated from the production volume of paper, woodcontaining, supercalendred in proportion to the respective output amounts.
  properties: carbon content, fossil 0.171549, dry mass 0.771 kg, heating value, net 11.74 MJ, wet mass 1 kg, carbon content, non-fossil 0.261655, water content 0.297017
  note on carbon content, fossil: MSW composition in tab 4.1, ecoinvent v2.2 report 13_I. C content referred to 1 kg DM
  note on heating value, net: Value taken from the general comment of the treatment dataset.
- ash from deinking sludge: -0.00117 kg; name ash_deink_sludge; lognormal variance with pedigree 0.0407, pedigree (1,3,5,3,1)
  (same comment as for lime)
  production volume 7.15934e6 kg; = ref_PV*ash_deink_sludge/ref
    (same comment as for municipal solid waste)
  property price 0 EUR2005; name ash_deink_sludge_price_EUR2005
  properties: wet mass 1 kg, dry mass 1 kg
- paper mill, integrated: 5.44e-11 unit; lognormal variance with pedigree 0.448, pedigree (4,5,5,5,5)
  EcoSpold01Location=RER
  Own assumption
  Uncertainty: own assumption
- heat, district or industrial, natural gas: 1.62986 MJ; lognormal variance with pedigree 0.0487, pedigree (1,2,5,1,3)
  (same comment as for heat, district or industrial, other than natural gas)
  properties: heating value, net 1 MJ
- electricity, medium voltage: 1.51 kWh; lognormal variance with pedigree 0.0407, pedigree (1,3,5,3,1)
  Average from several SC paper producers
  EcoSpold01Location=NORDEL
  Uncertainty: average from several SC paper producers
- sulfate pulp, bleached: 0.24605 kg; = (0.198+0.061)*0.95; lognormal variance with pedigree 0.0407, pedigree (1,3,5,3,1)
  average from several SC paper producers; includes a small amount of waste paper. pulp input is 5% unbleached pulp and 95% bleached pulp
  Uncertainty: average from several SC paper producers
  properties: heating value, net 13.23 MJ, water content 0.111111, wet mass 1 kg, carbon content, non-fossil 0.494, dry mass 0.9 kg
  note on carbon content, non-fossil: C content of dry mass of sulfate pulp is 0.494 kgC/kg dry wood (ecoinvent v2.2 report 6_IX & ecoinvent v2.2 report 9). No other C containing products in the formulation of the pulp.
- sodium chloride, powder: 0.00015 kg; lognormal variance with pedigree 0.0407, pedigree (1,3,5,3,1)
  (same comment as for sodium dithionite, anhydrous)
  properties: wet mass 1 kg, dry mass 1 kg
- wood ash mixture, pure: 0 kg; name ash_mix; pedigree (1,1,1,1,1)
  (same comment as for municipal solid waste)
  production volume 0 kg
    (same comment as for municipal solid waste)
  property price 0 EUR2005; name ash_mix_price_EUR2005
  properties: wet mass 1 kg, dry mass 1 kg, carbon content, non-fossil 0.012
- sulfuric acid: 0.0004 kg; lognormal variance with pedigree 0.0407, pedigree (1,3,5,3,1)
  (same comment as for sodium dithionite, anhydrous)
  properties: wet mass 1 kg, dry mass 1 kg
- activated bentonite: 0.0002 kg; lognormal variance with pedigree 0.0407, pedigree (1,3,5,3,1)
  Average from several SC paper producers
  EcoSpold01Location=DE
  Uncertainty: average from several SC paper producers
  properties: wet mass 1 kg, dry mass 1 kg
- aluminium sulfate, powder: 0.0033 kg; lognormal variance with pedigree 0.0407, pedigree (1,3,5,3,1)
  (same comment as for kaolin)
  properties: dry mass 1 kg, wet mass 1 kg
- urea: 0.000503793 kg; lognormal variance with pedigree 0.0407, pedigree (1,3,5,3,1)
  The exchange has been updated from 'urea, as N' into 'urea' and therefore its amount has been scaled (multiplied) from 0.0002 kg by 2.1438 kg of 'urea' per kg of 'urea, as N'. Original comment of the exchange is: Average from several SC paper producers
  EcoSpold01Location=RER
  Uncertainty: average from several SC paper producers
  properties: dry mass 1 kg, wet mass 1 kg, carbon content, fossil 0.2
- ash from paper production sludge: 0 kg; name ash_prod_sludge; pedigree (1,1,1,1,1)
  (same comment as for lime)
  production volume 0 kg
    (same comment as for municipal solid waste)
  property price 0 EUR2005; name ash_prod_sludge_price_EUR2005
  properties: dry mass 1 kg, wet mass 1 kg, carbon content, non-fossil 0.0092
- pulpwood, softwood, measured as solid wood under bark: 0 m3; pedigree (1,1,1,1,1)
  EcoSpold01Location=RER
  The amount of wood used as internal fuel is covered in the corresponding heat module and therefore subtracted (based on carbon content) from the original amount of pulpwood. The original value is an average from several SC paper producers and includes a small amount of residual wood from ordinary softwood forestry.
  Uncertainty: average from several SC paper producers
  properties: water content 1.4, dry mass 387.2 kg, carbon content, non-fossil 0.494, wet mass 929.28 kg, heating value, net 4483.78 MJ
  note on carbon content, non-fossil: C content of dry mass is 0.494 kgC/kg dry wood (ecoinvent v2.2 report 9)
  note on heating value, net: Value based on "softwood forestry, mixed species, sustainable forest management"The property is based on a value of 11.58MJ/kg
- hazardous waste, for underground deposit: -0.0002 kg; name haz_waste; lognormal variance with pedigree 0.0407, pedigree (1,3,5,3,1)
  EcoSpold01Location=DE
  Average from several SC paper producers
  Uncertainty: average from several SC paper producers
  production volume 1.22382e6 kg; = ref_PV*haz_waste/ref
    (same comment as for municipal solid waste)
  property price 0 EUR2005; name haz_waste_price_EUR2005
  properties: carbon content, fossil 0.554667, wet mass 1 kg, dry mass 1 kg
  note on carbon content, fossil: Tab A.6, ecoinvent v2.2 report 13_I, average hazardous waste composition was used, and referred to 0% water mass. No waste-specific emission are currently inventoried for underground deposits. Accordingly, no waste composition must be specified. For generic, average waste to underground deposit deposition in a 200 liter steel drum without cement solidification is assumed (ecoinvent v2.2 report 13_I).
- sodium hydroxide, without water, in 50% solution state: 0.0135 kg; lognormal variance with pedigree 0.0407, pedigree (1,3,5,3,1)
  (same comment as for kaolin)
  properties: heating value, net 3.03 MJ, dry mass 1 kg, wet mass 1 kg
- sulfur dioxide, liquid: 0.00425 kg; lognormal variance with pedigree 0.0407, pedigree (1,3,5,3,1)
  (same comment as for sodium dithionite, anhydrous)
  properties: wet mass 1 kg, dry mass 1 kg
- phosphoric acid, industrial grade, without water, in 85% solution state: 0.0001 kg; lognormal variance with pedigree 0.0407, pedigree (1,3,5,3,1)
  (same comment as for sodium dithionite, anhydrous)
  properties: wet mass 1 kg, dry mass 1 kg
- sulfate pulp, unbleached: 0.01295 kg; = (0.198+0.061)*0.05; lognormal variance with pedigree 0.0407, pedigree (1,3,5,3,1)
  (same comment as for sulfate pulp, bleached)
  properties: dry mass 0.9 kg, carbon content, non-fossil 0.494, heating value, net 13.23 MJ, wet mass 1 kg, water content 0.111111, price 0.355 EUR2005
- heat, district or industrial, other than natural gas: 0.118 MJ; lognormal variance with pedigree 0.0487, pedigree (1,2,5,1,3)
  (same comment as for heat, district or industrial, other than natural gas)
  properties: heating value, net 1 MJ, corresponding fuel use, propane, furnace >100kW 1.05263 MJ
- chlorine, liquid: 5e-5 kg; lognormal variance with pedigree 0.0407, pedigree (1,3,5,3,1)
  (same comment as for kaolin)
  properties: dry mass 1 kg, wet mass 1 kg
- potato starch: 0.00921 kg; lognormal variance with pedigree 0.0407, pedigree (1,3,5,3,1)
  (same comment as for activated bentonite)
  properties: dry mass 0.8 kg, water content 0.25, wet mass 1 kg, carbon content, non-fossil 0.46, heating value, net 10.66 MJ
  note on carbon content, non-fossil: C-content of starch is considered 46% on dry mass basis (from "Evolutionary and Biochemical Aspects", A.D. Kay and T. Vrede (in Global Ecology, 2010, Elsevier B.V., S.E. Jørgensen Ed.)).
- wood ash mixture, pure: -0.0151878, -0.000312207 kg (2 entries); lognormal variance with pedigree 0.0407, pedigree (1,3,5,3,1)
  (same comment as for municipal solid waste)
  production volume 9.4846e7 kg
- ash from paper production sludge: -0.00403454, -0.00010546 kg (2 entries); lognormal variance with pedigree 0.0407, pedigree (1,3,5,3,1)
  (same comment as for lime)
  production volume 2.53331e7 kg
- pulpwood, softwood, measured as solid wood under bark: 0.00118028, 1.44219e-5 m3 (2 entries); lognormal variance with pedigree 0.0407, pedigree (1,3,5,3,1)
  (same comment as for pulpwood, softwood, measured as solid wood under bark)

## Inputs from nature
- Water, unspecified natural origin [natural resource, in water]: 0.0192 m3; name water_UNO_input; lognormal variance with pedigree 0.0407, pedigree (1,3,5,3,1)
  Average from several SC paper producers
  Uncertainty: average from several SC paper producers
- Water, cooling, unspecified natural origin [natural resource, in water]: 0.024 m3; name water_cooling_UNO_input; lognormal variance with pedigree 0.1107, pedigree (1,3,5,3,4)
  Estimated value based on CER from LWC production
  Uncertainty: estimated value based on CER from LWC production

## Emissions to nature
- COD, Chemical Oxygen Demand [water, surface water]: 0.00338 kg; lognormal variance with pedigree 0.0807, pedigree (1,3,5,3,1)
  (same comment as for Water, unspecified natural origin)
- DOC, Dissolved Organic Carbon [water, surface water]: 0.00125185 kg; lognormal variance with pedigree 0.0807, pedigree (1,3,5,3,1)
  Calculated as equal to TOC.
  Uncertainty: average from several SC paper producers
- TOC, Total Organic Carbon [water, surface water]: 0.00125185 kg; lognormal variance with pedigree 0.0807, pedigree (1,3,5,3,1)
  Calculated by default as TOC (gC) = COD/2.7 (COD measured in g O2). Should more correctly be calculated from the carbon content of the specified emissions to water.
  Uncertainty: average from several SC paper producers
- Water [water, unspecified]: 0.03102 m3; name water_to_water_unspecified; = water_cooling_UNO_input*(1-fraction_CW_to_air)+water_UNO_input*(1-fraction_PW_to_air); lognormal variance with pedigree 0.0807, pedigree (2,2,5,1,1)
  Calculated value based on literature values and expert opinion. See comments in the parametres' comment field.
  property carbon content, non-fossil 0; name C_content_non_fossil
  property carbon content, fossil 0; name C_content_fossil
  property water in wet mass 1000 kg; name WWM
  property fraction, origin: fresh water 0; name fraction_origin_fresh_water_Ww
  property wet mass 1000 kg; name WM
  property fraction, origin: unspecified 1; name fraction_origin_unspecified_Ww
  property fraction, origin: salt water 0; name fraction_origin_salt_water_Ww
  property dry mass 0 kg; name DM
- Suspended solids, unspecified [water, surface water]: 0.00018 kg; lognormal variance with pedigree 0.0807, pedigree (1,3,5,3,1)
  (same comment as for Water, unspecified natural origin)
- Phosphorus [water, surface water]: 6.3e-6 kg; lognormal variance with pedigree 0.0807, pedigree (1,3,5,3,1)
  (same comment as for Water, unspecified natural origin)
- AOX, Adsorbable Organic Halogen as Cl [water, surface water]: 6.9e-8 kg; lognormal variance with pedigree 0.0807, pedigree (1,3,5,3,1)
  (same comment as for Water, unspecified natural origin)
- BOD5, Biological Oxygen Demand [water, surface water]: 0.00065 kg; lognormal variance with pedigree 0.0807, pedigree (1,3,5,3,1)
  (same comment as for Water, unspecified natural origin)
- Water [air, unspecified]: 0.01218 m3; name water_to_air_unspecified; = (water_cooling_UNO_input*fraction_CW_to_air)+(water_UNO_input*fraction_PW_to_air); lognormal variance with pedigree 0.0807, pedigree (2,2,5,1,1)
  (same comment as for Water)
  property fraction, origin: unspecified 1; name fraction_origin_unspecified
  property fraction, origin: salt water 0; name fraction_origin_salt_water
  property fraction, origin: fresh water 0; name fraction_origin_fresh_water
- Nitrogen [water, surface water]: 4e-5 kg; lognormal variance with pedigree 0.0807, pedigree (1,3,5,3,1)
  (same comment as for Water, unspecified natural origin)

## Sampling procedure
Based on literature and statistics (see dataset field “Published Source”)

## Extrapolations
This dataset has been extrapolated from year 2000 to the year of the calculation (2021). The uncertainty has been adjusted accordingly.

## Review by Hans-Jörg Althaus 2003-08-06
Passed
