# coconut production, dehusked

Dataset: EcoSpold 2, unit process
Geography: IN
Time period: 2010-01-01 to 2021-12-31
Technology level: current
Classification: ISIC rev.4 ecoinvent: 0126:Growing of oleaginous fruits
Tags: WFLDB
Scenario: Business-as-Usual
System model: Allocation, cut-off by classification
Generated by: Cecile Guignard
Published in: Nemecek T. 2015
Database: ecoinvent
isCopyrightProtected: true
accessRestrictedTo: 1

## General comment
This dataset represents the production of 1 kg of coconut after manual dehusking at the farm. The co-product 'coconut husk' in included in the inventory. The reference flow is the average yield per ha and year, from 2010 - 2012: yield (10.9 t/ha) obtained under irrigated conditions (total amount of water 123 m3/ha). The data are representative for coconut production in India used for the export market. Mineral NPK fertiliser input is 179-65-211 kg/ha. Organic fertilisers applied amount to 1.61 m3/ha of liquid manure and 2.17 t/ha of solid manure. Total active ingredients (a.i.) applied as pesticides amount to 5.7 kg a.i./ha.
Coconut husk, is considered as a co-product of coconut production. Total coconut husk = 6.99 t/ha
The dataset was modelled within the project 'World Food LCA database (WFLDB)'. The aim of this project was to provide inventories of a broad variety of agricultural products and processes and to cover for each product at least 50% of the global export market. The export share of coconut produced in India amounts to 0.2% of the global export (tonnage exported in 2010). The production system regarded in this dataset aimed at representing coconut produced India for the export market.
PEF-Quality: data quality rating (DQR) = 2.2 (i.e. good quality). This dataset refers to an average situation; for specific situations exchanges might differ substantially due to site specific parameters

## Included activities start
This activity starts with the nursery producing fruit tree seedlings, i.e.grafted young trees to be planted.

## Included activities end
This activity ends with the waste treatment after the clearing of the orchard (rooting up the trees). The dataset includes all activities during a year in the productive phase of the orchard including the establishment phase per year of lifetime (60 years), the clearing of the orchard including waste treatment.
The establishment phase of the orchard includes tree nursery, soil cultivation, planting trees, sowing grass, installation of trellis system (posts and wires) and irrigation. Fertiliser and pesticide use in a year of the establishment phase is assumed to be half of the amount of a year in the productive phase.
The productive phase of the orchard includes limited machine operations such as fertiliser and pesticide application and irrigation. Most machine use and infrastructure are excluded as many activities (such as harvesting) are assumed to be manual work. Further, direct field emissions and land use change are included. At the end of the productive phase the orchard is cleared by rooting up the trees.
The inputs of seedlings, fertilisers and pesticides as well as packaging of fertilisers and pesticides are considered. The dataset doesn't include emissions from manure storage because these are within the system boundary of animal production. Heavy metal uptake by the crop is considered.

## Technology
Conventional production

## Parameters
- heavyMetalUptakeSwitch: 1 dimensionless
- LUC_crop_specific: 1 dimensionless
  This parameter allows to switch between a 'crop specific' and a 'country specific' approach when calculating the LUC of a crop. By default, the chosen approach is 'crop specific', so the value of the parameter is 1. If you want to apply a 'country specific' approach, turn the parameter to 0.

## Reference product
- coconut, dehusked: 1 kg; CPC 21429: Other shelled nuts; By-product classification allocatable product
  Yield = 10938.0 kg/ha
  production volume 6.48191e9 kg
    Source: FAOSTAT. Average, 2009-2012. Husked (100%) = dehusked (61%) + husk (39%)
  property price 0.26 EUR2005
    Estimated. The price is estimate to be 30% more than of the coconut, husked.
  property carbon content, non-fossil 0.708236
    calculation: C-content of components according to ecoinvent report No. 15a. Source of composition: Souci, S.W., Fachmann, W., Kraut, H. (Hg.: Bundesminsiterium fur Ernahrung, Landwirtschaft und Forsten, Bonn) 'Die Zusammensetzung der Lebensmittel - Nahrwerttabellen', medpharm Scientific Publishers Stuttgart, CRC Press; 2000.
  property carbon content 0.708236
    carbon content on a dry matter basis (reserved; not for manual entry)
  properties: water content 0.446, carbon content, fossil 0, dry mass 0.691563 kg, wet mass 1 kg, water in wet mass 0.308437 kg, carbon allocation 0.48979 kg

## By-products
- coconut husk: 0 kg; CPC 01913: Cereal straw, husks, unprepared, ground, pressed, or in the form of pellets; By-product classification Recyclable
  Yield = 6993.1 kg/ha
  production volume 0 kg
    Calculated from reference product production volume, reference product amount and byproduct amount.
  property price 0.198 EUR2005
    Calculated value based on data from United Nations Commodity Trade Statistics Database (comtrade.un.org). UN comtrade category: 530511 Coconut (coir) fibre, raw. Year: 2005. Using exchange rate of 1EURO = 1.209 USD. Average of price of import into 5 main markets (EU, US, JP, IN and CN).
  property carbon content, non-fossil 0.52
    calculation: C-content of components according to ecoinvent report No. 15a. Source of composition: Jasper Guy Woodroof (1979). 'Coconuts: Production, Processing, Products'. 2nd ed. AVI Publishing Co. Inc.
  property carbon content 0.52
    carbon content on a dry matter basis (reserved; not for manual entry)
  properties: dry mass 0.53 kg, water content 0.886792, carbon content, fossil 0, wet mass 1 kg, water in wet mass 0.47 kg, carbon allocation 0.2756 kg

## Inputs from technosphere
- manure, liquid, cattle: 0.140837 kg; lognormal variance with pedigree 0.124177, pedigree (2,1,4,1,1)
  Calculated based on literature values: The total amount of manure multiplied by the country-share of manure per animal category (FAOSTAT 2015). See supporting documentation 'WFLDB-Documentation.pdf' chapter 'Fertiliser application' (https://ecoquery.ecoinvent.org/File/Reports).
  Corresponds to 1.54 m3/ha
  properties: dry mass 0.075 kg, carbon content, non-fossil 0.68, wet mass 1 kg, water content 12.333
- land use change, perennial crop: 2.16127e-5 ha; = 2.16127262754e-05*LUC_crop_specific+7.03967818614e-06*(1-LUC_crop_specific)
  Calculated value. Land use change (LUC) combines land transformation areas calculated with the adapted 'Direct Land Use Change Assessment Tool' version 2014 developed by Blonk Consultants and the carbon losses from soil organic carbon (SOC) and vegetation (VEG) as calculated in ecoinvent v3. See 'WFLDB-Guidelines.pdf', available at https://ecoquery.ecoinvent.org/File/Reports.
- pyrethroid-compound: 6.01291e-5 kg; lognormal variance with pedigree 0.0138498, pedigree (2,2,4,1,1)
  Proxy: Source for total amount of pesticides: extrapolated with MEXALCA from similar crop. Active ingredient is calculated based on Ecoinvent dataset Palm fruit bunch ID. For calculations see supporting documentation 'WFLDB-Documentation.pdf' (https://ecoquery.ecoinvent.org/File/Reports).
  properties: carbon content, fossil 0.623, dry mass 1 kg, wet mass 1 kg
- liquid manure spreading, by vacuum tanker: 0.000147303 m3; lognormal variance with pedigree 0.124177, pedigree (2,1,4,1,1)
  This amount corresponds to the input of liquid manure.
- manure, liquid, swine: 0.00343494 kg; lognormal variance with pedigree 0.124177, pedigree (2,1,4,1,1)
  Calculated based on literature values: The total amount of manure multiplied by the country-share of manure per animal category (FAOSTAT 2015). See supporting documentation 'WFLDB-Documentation.pdf' chapter 'Fertiliser application' (https://ecoquery.ecoinvent.org/File/Reports).
  Corresponds to 0.0376 m3/ha
  properties: wet mass 1 kg, carbon content, non-fossil 0.64, water content 19, dry mass 0.05 kg
- fruit tree seedling, for planting: 0.000799963 unit; source Sreejith, C.C. 2013; lognormal variance with pedigree 0.124177, pedigree (2,1,4,1,1)
  Literature value or expert estimation (Sreejith et al. 2013). This is the number of trees per ha divided by the lifetime years of the orchard.
  properties: carbon content, non-fossil 0.439481, water content 0.73, wet mass 1 kg, dry mass 0.578035 kg
  note on carbon content, non-fossil: calculation: C-content of components according to ecoinvent report No. 15a. Source of composition: https://ndb.nal.usda.gov/ndb/search/. Unspecific seedling used as proxy.
- manure, solid, cattle: 0.194252 kg; lognormal variance with pedigree 0.124177, pedigree (2,1,4,1,1)
  Calculated based on literature values: The total amount of manure multiplied by the country-share of manure per animal category (FAOSTAT 2015). See supporting documentation 'WFLDB-Documentation.pdf' chapter 'Fertiliser application' (https://ecoquery.ecoinvent.org/File/Reports).
  Corresponds to 2120.0 kg/ha
  properties: water content 3.5454, wet mass 1 kg, dry mass 0.22 kg, carbon content, non-fossil 0.441
- glyphosate: 0.00046099 kg; lognormal variance with pedigree 0.0138498, pedigree (2,2,4,1,1)
  (same comment as for pyrethroid-compound)
  properties: wet mass 1 kg, carbon content, fossil 0.214286, dry mass 1 kg
- poultry manure, fresh: 0.00151574 kg; lognormal variance with pedigree 0.124177, pedigree (2,1,4,1,1)
  Calculated based on literature values: The total amount of manure multiplied by the country-share of manure per animal category (FAOSTAT 2015). See supporting documentation 'WFLDB-Documentation.pdf' chapter 'Fertiliser application' (https://ecoquery.ecoinvent.org/File/Reports).
  Corresponds to 0.0332 m3/ha
  properties: wet mass 1 kg, dry mass 0.38 kg, water content 1.63158, carbon content, non-fossil 0.33389
- establishing orchard: 0.000799963 unit; source Sreejith, C.C. 2013; lognormal variance with pedigree 0.124177, pedigree (2,1,4,1,1)
  (same comment as for fruit tree seedling, for planting)
- ammonium sulfate: 0.00833754 kg; source Sreejith, C.C. 2013; lognormal variance with pedigree 0.124177, pedigree (2,1,4,1,1)
  Calculated based on literature values or expert estimation: The total amount of nutrient (Sreejith et al. 2013) multiplied by the share of fertiliser type (Sreejith et al. 2013). See supporting documentation 'WFLDB-Documentation.pdf' chapter 'Fertiliser application' for L3 and L4 data (https://ecoquery.ecoinvent.org/File/Reports).
  Corresponds to 91.2 kg/ha
  properties: wet mass 1 kg, dry mass 1 kg
- solid manure loading and spreading, by hydraulic loader and spreader: 0.198546 kg; lognormal variance with pedigree 0.124177, pedigree (2,1,4,1,1)
  This amount corresponds the input of solid manure.
- urea: 0.0171729 kg; source Sreejith, C.C. 2013; lognormal variance with pedigree 0.124177, pedigree (2,1,4,1,1)
  The exchange has been updated from 'urea, as N' into 'urea' and therefore its amount has been scaled (multiplied) from 0.008 kg by 2.1438 kg of 'urea' per kg of 'urea, as N'. Original comment of the exchange is: Calculated based on literature values or expert estimation: The total amount of nutrient (Sreejith et al. 2013) multiplied by the share of fertiliser type (Sreejith et al. 2013). See supporting documentation 'WFLDB-Documentation.pdf' chapter 'Fertiliser application' for L3 and L4 data (https://ecoquery.ecoinvent.org/File/Reports).
  Corresponds to 87.6 kg/ha
  properties: carbon content, fossil 0.2, wet mass 1 kg, dry mass 1 kg
- planting tree: 0.000266654 unit; source Sreejith, C.C. 2013; lognormal variance with pedigree 0.124177, pedigree (2,1,4,1,1)
  Literature value or expert estimation (Sreejith et al. 2013). This is the number of trees per ha (i.e. 175 trees/ha)) divided by the lifetime years of the orchard (i.e. 60 years).
- packaging, for fertilisers: 0.0832474 kg; lognormal variance with pedigree 0.0592, pedigree (4,3,4,5,4)
  Total amount of active substance/s of fertilisers needed for the production of 'coconut, dehusked' is calculated to be circa 4.16E-02 kg. Fertiliser/s used in this dataset is/are: 'ammonium sulfate, as N', 'phosphate fertiliser, as P2O5', 'potassium chloride, as K2O', 'urea, as N'. The total amount of active substance/s is doubled in order to account for the packaging of the dilluted product of fertiliser/s that is/are applied. Therefore, 8.32E-02 kg of packaging for fertilisers is justified with this exchange.
  properties: carbon content, fossil 0.825301, wet mass 1 kg, heating value, net 25.01 MJ, price 0.0642 EUR2005, dry mass 1 kg
  note on carbon content, fossil: Considering a chemical formula (C2H4)n for polyethylene, carbon content-fossil is calculated to be 0.856286 kg of Carbon per kg of dry mass.
- poultry manure, dried: 0.00429444 kg; lognormal variance with pedigree 0.124177, pedigree (2,1,4,1,1)
  Calculated based on literature values: The total amount of manure multiplied by the country-share of manure per animal category (FAOSTAT 2015). See supporting documentation 'WFLDB-Documentation.pdf' chapter 'Fertiliser application' (https://ecoquery.ecoinvent.org/File/Reports).
  Corresponds to 47.0 kg/ha
  properties: dry mass 0.865 kg, lead content 2.92e-6, potassium content 0.024, nitrogen content 0.532, nickel content 4e-5, wet mass 1 kg, phosphorus content 0.0167, zinc content 0.000349, water content 0.156069, copper content 4.38e-5, carbon content, non-fossil 0.33389, mercury content 2e-7, cadmium content 2.92e-7
- inorganic phosphorus fertiliser, as P2O5: 0.00598053 kg; source Sreejith, C.C. 2013; lognormal variance with pedigree 0.124177, pedigree (2,1,4,1,1)
  Calculated based on literature values or expert estimation: The total amount of nutrient (Sreejith et al. 2013) multiplied by the share of fertiliser type (Sreejith et al. 2013). See supporting documentation 'WFLDB-Documentation.pdf' chapter 'Fertiliser application' for L3 and L4 data (https://ecoquery.ecoinvent.org/File/Reports).
  Corresponds to 65.4 kg/ha
  properties: dry mass 1 kg, wet mass 1 kg
- irrigation: 0.0111996 m3; source Sreejith, C.C. 2013; lognormal variance with pedigree 0.124177, pedigree (2,1,4,1,1)
  Calculated value: The total amount of water used for irrigation (Sreejith et al. 2013) multiplied by the country-share of irrigation technique (Sreejith et al. 2013). See supporting documentation 'WFLDB-Documentation.pdf' chapter 'Water use for irrigation' (https://ecoquery.ecoinvent.org/File/Reports).
  properties: wet mass 1000 kg, water content 9089.91, dry mass 0.11 kg
- transport, tractor and trailer, agricultural: 0.00199991 metric ton*km; lognormal variance with pedigree 0.162439, pedigree (4,1,4,1,1)
  On-farm transport: Yield (in tonnes) multiplied by the average distance from field to farm. The distance was assumed to be 2 km (proxy).
- packaging, for pesticides: 0.00104224 kg; lognormal variance with pedigree 0.0592, pedigree (4,3,4,5,4)
  Total amount of active substance/s of pesticides needed for the production of coconut, dehusked is calculated to be circa 5.21E-04 kg. Pesticide/s used in this dataset is/are: 'glyphosate', 'pyrethroid-compound'. The total amount of active substance/s is doubled in order to account for the packaging of the dilluted product of pesticide/s that is/are applied. Therefore, 1.04E-03 kg of packaging for pesticides is justified with this exchange.
  properties: wet mass 1 kg, heating value, net 25.97 MJ, dry mass 1 kg, price 0.0642 EUR2005, carbon content, fossil 0.85714
- potassium chloride: 0.0305422 kg; source Sreejith, C.C. 2013; lognormal variance with pedigree 0.124177, pedigree (2,1,4,1,1)
  The exchange has been updated from 'potassium chloride, as K2O' into 'potassium chloride' and therefore its amount has been scaled (multiplied) from 0.0193 kg by 1.5829 kg of 'potassium chloride' per kg of 'potassium chloride, as K2O'. Original comment of the exchange is: Calculated based on literature values or expert estimation: The total amount of nutrient (Sreejith et al. 2013) multiplied by the share of fertiliser type (Sreejith et al. 2013). See supporting documentation 'WFLDB-Documentation.pdf' chapter 'Fertiliser application' for L3 and L4 data (https://ecoquery.ecoinvent.org/File/Reports).
  Corresponds to 211.0 kg/ha
  properties: dry mass 1 kg, wet mass 1 kg
- trellis system, wooden poles, soft wood, tar impregnated: 9.14244e-5 ha
- waste wood, untreated: -0.0304672 kg; lognormal variance with pedigree 0.124177, pedigree (2,1,4,1,1)
  Wood from trees after 1-2 years of sorrage at the field (20% water) per lifetime year (estimated 60 years in this dataset) of the orchard
  production volume 1.97485e8 kg
    Calculated from the reference product amount and production volume
  properties: wet mass 1 kg, dry mass 0.8 kg, carbon content, non-fossil 0.48632, water content 0.25, heating value, net 13.99 MJ
  note on heating value, net: Value taken from the general comment of the treatment dataset.
- coconut husk: -0.63934 kg
  Yield = 6993.1 kg/ha
  production volume 4.14414e9 kg
  properties: price 0.198 EUR2005, dry mass 0.53 kg, water content 0.886792, wet mass 1 kg, carbon content, non-fossil 0.52
  note on carbon content, non-fossil: calculation: C-content of components according to ecoinvent report No. 15a. Source of composition: Jasper Guy Woodroof (1979). 'Coconuts: Production, Processing, Products'. 2nd ed. AVI Publishing Co. Inc.

## Inputs from nature
- Energy, gross calorific value, in biomass [natural resource, biotic]: 16.9419 MJ; lognormal variance with pedigree 0.0138498, pedigree (2,2,4,1,1)
- Occupation, permanent crop, irrigated [natural resource, land]: 0.916712 m2*year; lognormal variance with pedigree 0.0200616, pedigree (2,1,4,1,1)
  Related to the duration from harvest date of previous crop to harvest date of main crop.
- Transformation, from permanent crop, irrigated [natural resource, land]: 0.0152374 m2; = 10000/10938/60
  Calculated value: 10000 m2 divided by the yield and the life time of the perennial crop (60 years).
- Transformation, to permanent crop, irrigated [natural resource, land]: 0.0152374 m2; = 10000/10938/60
  (same comment as for Transformation, from permanent crop, irrigated)
- Carbon dioxide, in air [natural resource, in air]: 1.3102 kg; lognormal variance with pedigree 0.0138498, pedigree (2,2,4,1,1)
  CO2 uptake by biomass

## Emissions to nature
- Mercury [water, surface water]: 8.78607e-10 kg; source Freiermuth R.  2006; lognormal variance with pedigree 0.356938, pedigree (2,2,4,1,1)
  Calculated value - Freiermuth (2006). See 'WFLDB-Guidelines.pdf', available at https://ecoquery.ecoinvent.org/File/Reports.
- Phosphate [water, ground-]: 1.69035e-5 kg; source Prasuhn V.  2006; lognormal variance with pedigree 0.175866, pedigree (2,2,4,1,1)
  Calculated value - Prasuhn (2006). See 'WFLDB-Guidelines.pdf', available at https://ecoquery.ecoinvent.org/File/Reports.
- Water [water, ground-]: 0.00116932 m3; lognormal variance with pedigree 0.124177, pedigree (2,1,4,1,1)
  Calculated value - Emission calculated from water balance. See 'WFLDB-Guidelines.pdf', available at https://ecoquery.ecoinvent.org/File/Reports.
- Cadmium, ion [water, surface water]: 3.35454e-9 kg; source Freiermuth R.  2006; lognormal variance with pedigree 0.356938, pedigree (2,2,4,1,1)
  (same comment as for Mercury)
- Chromium, ion [water, surface water]: 3.11337e-7 kg; source Freiermuth R.  2006; lognormal variance with pedigree 0.356938, pedigree (2,2,4,1,1)
  (same comment as for Mercury)
- Copper, ion [water, surface water]: 4.81148e-7 kg; source Freiermuth R.  2006; lognormal variance with pedigree 0.356938, pedigree (2,2,4,1,1)
  (same comment as for Mercury)
- Lead [water, surface water]: 2.25187e-7 kg; source Freiermuth R.  2006; lognormal variance with pedigree 0.356938, pedigree (2,2,4,1,1)
  (same comment as for Mercury)
- Water [water, surface water]: 0.00467819 m3; lognormal variance with pedigree 0.124177, pedigree (2,1,4,1,1)
  (same comment as for Water)
- Copper, ion [water, ground-]: 3.10843e-7 kg; source Freiermuth R.  2006; lognormal variance with pedigree 0.356938, pedigree (2,2,4,1,1)
  (same comment as for Mercury)
- Cadmium [soil, agricultural]: 2.68169e-7 kg; = 3.24419455111e-07 + ( - 5.62508206253e-08)*heavyMetalUptakeSwitch; source Freiermuth R.  2006
  Comment on mathematicalRelation:
  -5.62508206253e-08 from Crop, default, heavy metals uptake model
  Heavy metal uptake can be excluded by setting the parameter heavyMetalUptakeSwitch to zero.
- Chromium [soil, agricultural]: 2.21441e-7 kg; = 5.23358932163e-07 + ( - 3.01917443774e-07)*heavyMetalUptakeSwitch; source Freiermuth R.  2006
  Comment on mathematicalRelation:
  5.23358932163e-07 from Calculated value - Freiermuth (2006). See 'WFLDB-Guidelines.pdf', available at https://ecoquery.ecoinvent.org/File/Reports.
  Heavy metal uptake can be excluded by setting the parameter heavyMetalUptakeSwitch to zero.
- Copper [soil, agricultural]: -9.18727e-7 kg; = 2.75242274639e-06 + ( - 3.6711499232e-06)*heavyMetalUptakeSwitch; source Freiermuth R.  2006
  Comment on mathematicalRelation:
  2.75242274639e-06 from Calculated value - Freiermuth (2006). See 'WFLDB-Guidelines.pdf', available at https://ecoquery.ecoinvent.org/File/Reports.
  Heavy metal uptake can be excluded by setting the parameter heavyMetalUptakeSwitch to zero.
- Nickel, ion [water, surface water]: 2.43436e-7 kg; source Freiermuth R.  2006; lognormal variance with pedigree 0.356938, pedigree (2,2,4,1,1)
  (same comment as for Mercury)
- Lead [soil, agricultural]: 3.31078e-6 kg; = 3.61034924118e-06 + ( - 2.99574121229e-07)*heavyMetalUptakeSwitch; source Freiermuth R.  2006
  Comment on mathematicalRelation:
  -2.99574121229e-07 from Crop, default, heavy metals uptake model
  Heavy metal uptake can be excluded by setting the parameter heavyMetalUptakeSwitch to zero.
- Mercury [soil, agricultural]: 8.70314e-9 kg; = 3.1170232218e-08 + ( - 2.24670896325e-08)*heavyMetalUptakeSwitch; source Freiermuth R.  2006
  Comment on mathematicalRelation:
  -2.24670896325e-08 from Crop, default, heavy metals uptake model
  Heavy metal uptake can be excluded by setting the parameter heavyMetalUptakeSwitch to zero.
- Nickel [soil, agricultural]: 7.0464e-7 kg; = 1.28332419089e-06 + ( - 5.78684333516e-07)*heavyMetalUptakeSwitch; source Freiermuth R.  2006
  Comment on mathematicalRelation:
  1.28332419089e-06 from Calculated value - Freiermuth (2006). See 'WFLDB-Guidelines.pdf', available at https://ecoquery.ecoinvent.org/File/Reports.
  -5.78684333516e-07 from Crop, default, heavy metals uptake model
  Heavy metal uptake can be excluded by setting the parameter heavyMetalUptakeSwitch to zero.
- Zinc [soil, agricultural]: 3.89924e-6 kg; = 2.16392393491e-05 + ( - 1.77400042238e-05)*heavyMetalUptakeSwitch; source Freiermuth R.  2006
  Comment on mathematicalRelation:
  2.16392393491e-05 from Calculated value - Freiermuth (2006). See 'WFLDB-Guidelines.pdf', available at https://ecoquery.ecoinvent.org/File/Reports.
  -1.77400042238e-05 from Crop, default, heavy metals uptake model
  Heavy metal uptake can be excluded by setting the parameter heavyMetalUptakeSwitch to zero.
- Glyphosate [soil, agricultural]: 0.00046099 kg; lognormal variance with pedigree 0.0447216, pedigree (2,2,4,1,1)
  Calculated value - 100% emission in soilAmount of pesticides applied: Ntiamoah and Afrane (2008), type of pesticides applied: Afrane and Ntiamoah (2011). See 'WFLDB-Guidelines.pdf', available at https://ecoquery.ecoinvent.org/File/Reports.
- Cadmium, ion [water, ground-]: 3.8422e-9 kg; source Freiermuth R.  2006; lognormal variance with pedigree 0.356938, pedigree (2,2,4,1,1)
  (same comment as for Mercury)
- Chromium, ion [water, ground-]: 1.71887e-6 kg; source Freiermuth R.  2006; lognormal variance with pedigree 0.356938, pedigree (2,2,4,1,1)
  (same comment as for Mercury)
- Cypermethrin [soil, agricultural]: 6.01291e-5 kg; lognormal variance with pedigree 0.0447216, pedigree (2,2,4,1,1)
  (same comment as for Glyphosate)
- Lead [water, ground-]: 3.81615e-8 kg; source Freiermuth R.  2006; lognormal variance with pedigree 0.356938, pedigree (2,2,4,1,1)
  (same comment as for Mercury)
- Carbon dioxide, fossil [air, non-urban air or from high stacks]: 0.0125763 kg; lognormal variance with pedigree 0.0138498, pedigree (2,2,4,1,1)
  Calculated value - CO2 emissions from urea and lime. See 'WFLDB-Guidelines.pdf', available at https://ecoquery.ecoinvent.org/File/Reports.
- Zinc, ion [water, surface water]: 6.84275e-7 kg; source Freiermuth R.  2006; lognormal variance with pedigree 0.356938, pedigree (2,2,4,1,1)
  (same comment as for Mercury)
- Ammonia [air, non-urban air or from high stacks]: 0.00363156 kg; source EEA 2013; lognormal variance with pedigree 0.0447216, pedigree (2,2,4,1,1)
  Calculated value - EMEP/EEA (2013). See 'WFLDB-Guidelines.pdf', available at https://ecoquery.ecoinvent.org/File/Reports.
- Nickel, ion [water, ground-]: 5.53282e-12 kg; source Freiermuth R.  2006; lognormal variance with pedigree 0.356938, pedigree (2,2,4,1,1)
  (same comment as for Mercury)
- Nitrogen oxides [air, non-urban air or from high stacks]: 0.000701801 kg; source EEA 2013; lognormal variance with pedigree 0.124664, pedigree (2,2,4,1,1)
  Calculated value - EEA/EMEP (2013). See 'WFLDB-Guidelines.pdf', available at https://ecoquery.ecoinvent.org/File/Reports.
- Dinitrogen monoxide [air, non-urban air or from high stacks]: 0.000388513 kg; source IPCC 2006; lognormal variance with pedigree 0.124664, pedigree (2,2,4,1,1)
  Calculated value - IPCC (2006). See 'WFLDB-Guidelines.pdf', available at https://ecoquery.ecoinvent.org/File/Reports.
- Zinc, ion [water, ground-]: 2.26385e-6 kg; source Freiermuth R.  2006; lognormal variance with pedigree 0.356938, pedigree (2,2,4,1,1)
  (same comment as for Mercury)
- Water [air, non-urban air or from high stacks]: 0.00539404 m3; lognormal variance with pedigree 0.124177, pedigree (2,1,4,1,1)
  (same comment as for Water)
- Phosphate [water, surface water]: 8.53026e-5 kg; source Prasuhn V.  2006; lognormal variance with pedigree 0.175866, pedigree (2,2,4,1,1)
  (same comment as for Phosphate)
- Mercury [water, ground-]: 1.33635e-10 kg; source Freiermuth R.  2006; lognormal variance with pedigree 0.356938, pedigree (2,2,4,1,1)
  (same comment as for Mercury)
- Phosphorus [water, surface water]: 8.70552e-6 kg; source Prasuhn V.  2006; lognormal variance with pedigree 0.175866, pedigree (2,2,4,1,1)
  Calculated value - Prasuhn (2006) and SQCB-Erosion. See 'WFLDB-Guidelines.pdf', available at https://ecoquery.ecoinvent.org/File/Reports.
- Nitrate [water, ground-]: 0.0124137 kg; source Faist Emmenegger M. 2009; lognormal variance with pedigree 0.175866, pedigree (2,2,4,1,1)

## Sampling procedure
WFLDB Methodological Guidelines for the Life Cycle Inventory of Agricultural Products in the latest version, available at: https://ecoquery.ecoinvent.org/File/Reports. Data sources: Data were categorised from level 0 (L0) to level (L4) as follows: L0 = estimate, proxy; L1 = statistical data (e.g. FAOSTAT); L2 = L1 adapted to crop and country; L3 = literature data or L1 resp. L2 data approved by experts; medium detailing (i.e. kg of total N-fertiliser); L4 = L3 data of high detailing (i.e. portion N-fertiliser types).In this dataset data were obtained for yield: L3; Fertilisers: L4; Pesticides: L1; Machinery: L0; Irrigation: L2. For information regarding the calculation of individual exchanges see supporting documentation WFLDB-Documentation.pdf

## Extrapolations
This dataset has been extrapolated from year 2012 to the year of the calculation (2021). The uncertainty has been adjusted accordingly.

## Review by Assumpció ANTON 2016-05-30
Be aware that the use of statistics in input calculations could provide some specific inputs not common for specific crops, this should be corrected if better information is available and better reflexed in DQR . Currently, I would dissent for some of good marks provided, being a revision of criteria applied advisable.

Pesticides will need to be amended periodically checking for update of pesticides' ban.
