# chimney production

Dataset: EcoSpold 2, unit process
Geography: RoW
Time period: 1993-01-01 to 2021-12-31
Technology level: current
Classification: ISIC rev.4 ecoinvent: 4390:Other specialized construction activities
Classification: EcoSpold01Categories: oil/heating systems
Tags: ConvertedDataset
Scenario: Business-as-Usual
System model: Allocation, cut-off by classification
Generated by: Niels Jungbluth
Published in: Jungbluth, N. 2007
Database: ecoinvent
isCopyrightProtected: true
accessRestrictedTo: 1

## General comment
Inventory for a chimney with a life time of 80 years.
[This dataset was already contained in the ecoinvent database version 2. It was not individually updated during the transfer to ecoinvent version 3. Life Cycle Impact Assessment results may still have changed, as they are affected by changes in the supply chain, i.e. in other datasets. This dataset was generated following the ecoinvent quality guidelines for version 2. It may have been subject to central changes described in the ecoinvent version 3 change report (http://www.ecoinvent.org/database/ecoinvent-version-3/reports-of-changes/), and the results of the central updates were reviewed extensively. The changes added e.g. consistent water flows and other information throughout the database. The documentation of this dataset can be found in the ecoinvent reports of version 2, which are still available via the ecoinvent website. The change report linked above covers all central changes that were made during the conversion process.]

## Included activities end
Materials for a chimney used for small heating. Disposal of the facilities. Not including energy use for construction.

## Geography
Data for Swiss producers.

## Technology
Chimney used for oil heating in small houses.

## Time period
Materials investigated in 1993.

## Reference product
- chimney: 1 m; CPC 54590: Other special trade construction services; By-product classification allocatable product
  production volume 3.96633 m
    This is a placeholder value that does not reflect real-world production volumes. This dataset does not currently require a real-world production volume to work in the database framework, and no actual data were collected yet. This has no negative effect on the results of the ecoinvent database.
  property price 8.67518 EUR2005
    Calculated based on inputs: The price of the product has been calculated as a sum of the values of the material and energy inputs for this product. This value is therefore a rough estimation. It may underestimate the real price since there are additional expenses when producing any product. These expences can include for example labour costs, treatment of waste materials and profit for the producer. Please consider carefully whether this level of data quality is acceptable for your application.

## Inputs from technosphere
- stone wool, packed: 0.5 kg; lognormal variance with pedigree 0.056, pedigree (3,4,5,5,1)
  Literature
  Uncertainty: L
  properties: wet mass 1 kg, carbon content, fossil 0.015401, dry mass 1 kg
  note on carbon content, fossil: The chemical composition of the glass fibres used in the rock wool production is similar to the composition of naturally cooled volcano basalt and has a composition listed in Tab. 3.1 and 3.2 in ecoinvent v2.2 report 16, part XIV. Rock wool contains: a minimum of 96% mineral fibres,between 0.5 and 3.0 weight percent of phenolic resin depending on the specific product characteristics, and about 0.2 percent mineral oil (ecoinvent v2.2 report 16, part XIV). An average composition of 1.8% phenolic resin, 0.2% mineral oil, and 98% mineral fibres has been assumed and used to calculate C content of the rock wool
- concrete, medium strength: 0 m3; pedigree (1,1,1,1,1)
  Literature
  Uncertainty: L
  properties: dry mass 2190 kg, water content 0.086758, wet mass 2380 kg
- waste mineral wool, for final disposal: 0 kg; pedigree (1,1,1,1,1)
  Literature
  Uncertainty: L
  production volume 0 kg
    Calculated from the production volume of chimney in proportion to the respective output amounts.
  properties: dry mass 1 kg, wet mass 1 kg
- waste concrete: 0 kg; pedigree (1,1,1,1,1)
  Literature
  Uncertainty: L
  production volume 0 kg
    (same comment as for waste mineral wool, for final disposal)
  properties: dry mass 0.5 kg, water content 1, wet mass 1 kg
- concrete, medium strength: 0.00150262, 0.00054986, 0.00213135, 0.00156644, 0.000429621, 0.0370201 m3 (6 entries); lognormal variance with pedigree 0.056, pedigree (3,4,5,5,1)
  Literature
  Uncertainty: L
- waste mineral wool, for final disposal: -0.215372, -0.284628 kg (2 entries); lognormal variance with pedigree 0.056, pedigree (3,4,5,5,1)
  Literature
  Uncertainty: L
  production volume 1.5 kg
- waste concrete: -6.49268, -88.5073 kg (2 entries); lognormal variance with pedigree 0.056, pedigree (3,4,5,5,1)
  Literature
  Uncertainty: L
  production volume 285 kg

## Sampling procedure
Data provided by manufacturers.

## Extrapolations
none This dataset has been copied from an original dataset covering the geography CH. The uncertainty has been adjusted accordingly.

## Review by Michael Spielmann (obsolete) 2003-07-15
Passed.
