# extrusion, plastic pipes

Dataset: EcoSpold 2, unit process
Geography: RoW
Time period: 1993-01-01 to 2021-12-31
Technology level: current
Classification: ISIC rev.4 ecoinvent: 2220:Manufacture of plastics products
Classification: EcoSpold01Categories: plastics/processing
Tags: ConvertedDataset
Scenario: Business-as-Usual
System model: Allocation, cut-off by classification
Generated by: Roland Hischier
Published in: Hischier R. 2007
Database: ecoinvent
isCopyrightProtected: true
accessRestrictedTo: 1

## General comment
1 kg of this process equals 0.996 kg of extruded plastic pipes.
[This dataset was already contained in the ecoinvent database version 2. It was not individually updated during the transfer to ecoinvent version 3. Life Cycle Impact Assessment results may still have changed, as they are affected by changes in the supply chain, i.e. in other datasets. This dataset was generated following the ecoinvent quality guidelines for version 2. It may have been subject to central changes described in the ecoinvent version 3 change report (http://www.ecoinvent.org/database/ecoinvent-version-3/reports-of-changes/), and the results of the central updates were reviewed extensively. The changes added e.g. consistent water flows and other information throughout the database. The documentation of this dataset can be found in the ecoinvent reports of version 2, which are still available via the ecoinvent website. The change report linked above covers all central changes that were made during the conversion process.]

## Included activities end
This process contains the auxillaries and energy demand for the mentioned convertion process of plastics. The converted amount of plastics is NOT included into the dataset.

## Geography
information from different European and Swiss converting companies

## Technology
present technologies

## Time period
time to which data refer

## Parameters
- fraction, cooling water, cooling pond system, to air: 0.032 dimensionless; lognormal variance with pedigree 0.0413, pedigree (2,3,1,3,1)
- fraction, cooling water, once-through system, to air: 0.004 dimensionless; lognormal variance with pedigree 0.0413, pedigree (2,3,1,3,1)
- fraction, cooling water, recirculating system, to air: 0.771 dimensionless; lognormal variance with pedigree 0.0413, pedigree (2,3,1,3,1)
- fraction, cooling water, to air: 0.3875 dimensionless; lognormal variance with pedigree 0.092025, pedigree (4,4,3,2,4)

## Reference product
- extrusion, plastic pipes: 1 kg; By-product classification allocatable product; CPC 89200: Moulding, pressing, stamping, extruding and similar plastic manufacturing services
  EcoSpold01Location=RER
  production volume 2.65986 kg
    This is a placeholder value that does not reflect real-world production volumes. This dataset does not currently require a real-world production volume to work in the database framework, and no actual data were collected yet. This has no negative effect on the results of the ecoinvent database.
  property price 0.12601 EUR2005
    Calculated based on inputs: The price of the product has been calculated as a sum of the values of the material and energy inputs for this product. This value is therefore a rough estimation. It may underestimate the real price since there are additional expenses when producing any product. These expences can include for example labour costs, treatment of waste materials and profit for the producer. Please consider carefully whether this level of data quality is acceptable for your application.

## Inputs from technosphere
- heat, district or industrial, other than natural gas: 0.683 MJ; lognormal variance with pedigree 0.0612, pedigree (2,3,5,5,3)
  EcoSpold01Location=RER
  Typical values, based on a European and a Swiss study
  Uncertainty: typical values, based on a European and a Swiss study
  properties: heating value, net 1 MJ
- packaging box factory: 1.43e-9 unit; lognormal variance with pedigree 0.448, pedigree (4,5,5,5,5)
  Estimation
  EcoSpold01Location=RER
  Uncertainty: estimation
- polyethylene, low density, granulate: 0.00139 kg; lognormal variance with pedigree 0.0612, pedigree (2,3,5,5,3)
  Typical values, based on a European and a Swiss study
  EcoSpold01Location=RER
  Uncertainty: typical values, based on a European and a Swiss study
  properties: dry mass 1 kg, wet mass 1 kg, heating value, net 42.47 MJ, carbon content, fossil 0.857143
  note on carbon content, fossil: Polyethylene is formed out of a huge amount of ethylene monomers (C2H4) (ecoinvent v2.2 report 11_II). MW=28 g/mol
- electricity, medium voltage: 0 kWh; pedigree (1,1,1,1,1)
  Typical values, based on a European and a Swiss study
  EcoSpold01Location=UCTE
  Uncertainty: typical values, based on a European and a Swiss study
- steel, low-alloyed, hot rolled: 0.0012 kg; lognormal variance with pedigree 0.0612, pedigree (2,3,5,5,3)
  (same comment as for heat, district or industrial, other than natural gas)
  properties: wet mass 1 kg, carbon content, fossil 0.005, dry mass 1 kg
  note on carbon content, fossil: Low alloyed steel composition given in Tab. 3.2 ecoinvent v2.2 report 10_partII. Steel assumed to have a C content of 0.5%
- particleboard, uncoated: 1.32e-6 m3; lognormal variance with pedigree 0.0612, pedigree (2,3,5,5,3)
  Typical values, based on a European and a Swiss study
  Uncertainty: typical values, based on a European and a Swiss study
  properties: water content 0.0629067, carbon content, non-fossil 0.4416, wet mass 637 kg, carbon content, fossil 0.045339, dry mass 599.3 kg, heating value, net 8749.71 MJ
- polyethylene terephthalate, granulate, amorphous: 0.000199 kg; lognormal variance with pedigree 0.0612, pedigree (2,3,5,5,3)
  (same comment as for heat, district or industrial, other than natural gas)
  properties: heating value, net 22.95 MJ, dry mass 1 kg, wet mass 1 kg, carbon content, fossil 0.625
  note on carbon content, fossil: Polymer of the ethylen terephtalate monomer (C10H8O4)n (ecoinvent v2.2 report 11_II), MW=192 g/mol
- EUR-flat pallet: 0.00113 unit; lognormal variance with pedigree 0.0612, pedigree (2,3,5,5,3)
  (same comment as for heat, district or industrial, other than natural gas)
  properties: wet mass 22 kg, carbon content, fossil 0.0311351, water content 0.2, dry mass 18.3333 kg, carbon content, non-fossil 0.58833, heating value, net 335.11 MJ
  note on carbon content, fossil: C content in components of the pallet (ecoinvent v2.2 report 7_part XVIII)
- polypropylene, granulate: 0.000498 kg; lognormal variance with pedigree 0.0612, pedigree (2,3,5,5,3)
  (same comment as for polyethylene, low density, granulate)
  properties: heating value, net 32.78 MJ, carbon content, fossil 0.857143, dry mass 1 kg, wet mass 1 kg
  note on heating value, net: Value extracted from "treatment of waste polypropylene, open burning"
  note on carbon content, fossil: Polypropylene is formed by the polymerisation of propylene, C3H6 (ecoinvent v2.2 report 11_II)
- heat, district or industrial, natural gas: 0.121 MJ; lognormal variance with pedigree 0.0612, pedigree (2,3,5,5,3)
  (same comment as for heat, district or industrial, other than natural gas)
  properties: heating value, net 1 MJ
- waste plastic, mixture: 0 kg; pedigree (1,1,1,1,1)
  Typical values, based on a European and a Swiss study
  EcoSpold01Location=CH
  Uncertainty: typical values, based on a European and a Swiss study
  production volume 0 kg
    Calculated from the production volume of extrusion, plastic pipes in proportion to the respective output amounts.
  properties: dry mass 0.847 kg, wet mass 1 kg, water content 0.180638, carbon content, fossil 0.747344, heating value, net 30.79 MJ
  note on carbon content, fossil: C content in 1 kg DM was calculated using data in Tab A.2, ecoinvent v2.2 report 13_I
  note on heating value, net: Value taken from the general comment of the treatment dataset.
- lubricating oil: 0.000143 kg; lognormal variance with pedigree 0.0612, pedigree (2,3,5,5,3)
  (same comment as for heat, district or industrial, other than natural gas)
  properties: carbon content, fossil 0.75, wet mass 1 kg, dry mass 1 kg, heating value, net 40.2 MJ
  note on carbon content, fossil: Lubricating oil is produced from diesel. C-content/dry mass of fats and oils considered 75%, from: ecoinvent v2.2 report, n 15a, pg 40
  note on heating value, net: Literature value, Source: IPCC 2006, 2006 IPCC Guidelines for National Greenhouse Gas Inventories, Prepared by the National Greenhouse Gas Inventories Programme, Eggleston H.S., Buendia L., Miwa K., Ngara T. and Tanabe K. (eds). Published: IGES, Japan
- electricity, medium voltage: 0.00647494, 0.00124161, 0.0101213, 0.0208441, 0.303159, 0.0427304, 0.123428 kWh (7 entries); lognormal variance with pedigree 0.0612, pedigree (2,3,5,5,3)
  (same comment as for electricity, medium voltage)
- waste plastic, mixture: -0.00324589, -0.000216878, -1.64021e-5, -8.95783e-5, -3.61886e-5, -8.5063e-5 kg (6 entries); lognormal variance with pedigree 0.0612, pedigree (2,3,5,5,3)
  (same comment as for waste plastic, mixture)
  production volume 0.0110044 kg

## Inputs from nature
- Water, cooling, unspecified natural origin [natural resource, in water]: 0.0197 m3; lognormal variance with pedigree 0.0612, pedigree (2,3,5,5,3)
  (same comment as for particleboard, uncoated)

## Emissions to nature
- Water [air, unspecified]: 0.00763375 m3; lognormal variance with pedigree 0.0827, pedigree (2,2,5,5,1)
  Calculated value based on literature values and expert opinion. See comments in the parametres' comment field.
- Water [water, unspecified]: 0.0120663 m3; lognormal variance with pedigree 0.0827, pedigree (2,2,5,5,1)
  (same comment as for Water)
  property dry mass 0 kg; name DM
  property water in wet mass 1000 kg; name WWM
  property carbon content, non-fossil 0; name C_content_non_fossil
  property carbon content, fossil 0; name C_content_fossil
  property wet mass 1000 kg; name WM

## Sampling procedure
company data

## Extrapolations
no extrapolation This dataset has been copied from an original dataset covering the geography RER. The uncertainty has been adjusted accordingly.

## Review by Hans-Jörg Althaus 2005-07-19
passed
