# calendering, rigid sheets

Dataset: EcoSpold 2, unit process
Geography: RoW
Time period: 1993-01-01 to 2021-12-31
Technology level: current
Classification: ISIC rev.4 ecoinvent: 2220:Manufacture of plastics products
Classification: EcoSpold01Categories: plastics/processing
Tags: ConvertedDataset
Scenario: Business-as-Usual
System model: Allocation, cut-off by classification
Generated by: Roland Hischier
Published in: Hischier R. 2007
Database: ecoinvent
isCopyrightProtected: true
accessRestrictedTo: 1

## General comment
1 kg of this process equals 0.997 kg of calendered rigid plastic sheets.
[This dataset was already contained in the ecoinvent database version 2. It was not individually updated during the transfer to ecoinvent version 3. Life Cycle Impact Assessment results may still have changed, as they are affected by changes in the supply chain, i.e. in other datasets. This dataset was generated following the ecoinvent quality guidelines for version 2. It may have been subject to central changes described in the ecoinvent version 3 change report (http://www.ecoinvent.org/database/ecoinvent-version-3/reports-of-changes/), and the results of the central updates were reviewed extensively. The changes added e.g. consistent water flows and other information throughout the database. The documentation of this dataset can be found in the ecoinvent reports of version 2, which are still available via the ecoinvent website. The change report linked above covers all central changes that were made during the conversion process.]

## Included activities end
This process contains the auxillaries and energy demand for the mentioned convertion process of plastics. The converted amount of plastics is NOT included into the dataset.

## Geography
information from different European and Swiss converting companies

## Technology
present technologies

## Time period
time to which data refer

## Parameters
- fraction, cooling water, cooling pond system, to air: 0.032 dimensionless; name fraction_CW_CP_to_air; lognormal variance with pedigree 0.0413, pedigree (2,3,1,3,1)
  Calculated based on literature value (Scown, C.D., 2011, Water Footprint of U.S. Transportation Fuels and supplying information of the article) (Vionnet, S., Quantis Water Database - Technical Report, 2012).
- fraction, cooling water, to air: 0.3875 dimensionless; name fraction_CW_to_air; = (0.5*fraction_CW_OT_to_air)+(0.5*fraction_CW_R_to_air); lognormal variance with pedigree 0.092025, pedigree (4,4,3,2,4)
  Calculated value based on literature value (see comments of the other parametres present in this dataset) and expert opinion. In the case when no industry/literature data are available about the type of cooling or directly fraction, cooling water, to air specific for the process a default assumption is applied. It is assumed that the once-through cooling system is used in 50% of all cases and recirculating system is used in another 50% of all cases.
- fraction, cooling water, once-through system, to air: 0.004 dimensionless; name fraction_CW_OT_to_air; lognormal variance with pedigree 0.0413, pedigree (2,3,1,3,1)
  (same comment as for fraction, cooling water, cooling pond system, to air)
- fraction, cooling water, recirculating system, to air: 0.771 dimensionless; name fraction_CW_R_to_air; lognormal variance with pedigree 0.0413, pedigree (2,3,1,3,1)
  (same comment as for fraction, cooling water, cooling pond system, to air)

## Reference product
- calendering, rigid sheets: 1 kg; CPC 89200: Moulding, pressing, stamping, extruding and similar plastic manufacturing services; By-product classification allocatable product
  EcoSpold01Location=RER
  production volume 2.67763 kg
    This is a placeholder value that does not reflect real-world production volumes. This dataset does not currently require a real-world production volume to work in the database framework, and no actual data were collected yet. This has no negative effect on the results of the ecoinvent database.
  property price 0.124867 EUR2005
    Calculated based on inputs: The price of the product has been calculated as a sum of the values of the material and energy inputs for this product. This value is therefore a rough estimation. It may underestimate the real price since there are additional expenses when producing any product. These expences can include for example labour costs, treatment of waste materials and profit for the producer. Please consider carefully whether this level of data quality is acceptable for your application.

## Inputs from technosphere
- electricity, medium voltage: 0 kWh; pedigree (1,1,1,1,1)
  Typical values, based on a European and a Swiss study
  EcoSpold01Location=UCTE
  Uncertainty: typical values, based on a European and a Swiss study
- lubricating oil: 0.000619 kg; lognormal variance with pedigree 0.0612, pedigree (2,3,5,5,3)
  Typical values, based on a European and a Swiss study
  EcoSpold01Location=RER
  Uncertainty: typical values, based on a European and a Swiss study
  properties: heating value, net 40.2 MJ, wet mass 1 kg, carbon content, fossil 0.75, dry mass 1 kg
  note on heating value, net: Literature value, Source: IPCC 2006, 2006 IPCC Guidelines for National Greenhouse Gas Inventories, Prepared by the National Greenhouse Gas Inventories Programme, Eggleston H.S., Buendia L., Miwa K., Ngara T. and Tanabe K. (eds). Published: IGES, Japan
  note on carbon content, fossil: Lubricating oil is produced from diesel. C-content/dry mass of fats and oils considered 75%, from: ecoinvent v2.2 report, n 15a, pg 40
- waste polyvinylchloride: 0 kg; pedigree (1,1,1,1,1)
  EcoSpold01Location=CH
  Typical values, based on a European and a Swiss study
  Uncertainty: typical values, based on a European and a Swiss study
  production volume 0 kg
    Calculated from the production volume of calendering, rigid sheets in proportion to the respective output amounts.
  properties: heating value, net 21.51 MJ, dry mass 0.998 kg, carbon content, fossil 0.440882, water content 0.00200401, wet mass 1 kg
  note on heating value, net: Value taken from the general comment of the treatment dataset.
  note on carbon content, fossil: C content in 1 kg DM was calculated using data in Tab A.1, ecoinvent v2.2 report 13_I
- steam, in chemical industry: 0.234 kg; lognormal variance with pedigree 0.0612, pedigree (2,3,5,5,3)
  EcoSpold01Location=RER
  Typical values, based on a European and a Swiss study
  Uncertainty: typical values, based on a European and a Swiss study
  properties: wet mass 1 kg
- heat, district or industrial, natural gas: 0 MJ; pedigree (1,1,1,1,1)
  (same comment as for steam, in chemical industry)
  properties: heating value, net 1 MJ
- polyethylene, low density, granulate: 0.00179 kg; lognormal variance with pedigree 0.0612, pedigree (2,3,5,5,3)
  (same comment as for steam, in chemical industry)
  properties: carbon content, fossil 0.857143, dry mass 1 kg, wet mass 1 kg, heating value, net 42.47 MJ
  note on carbon content, fossil: Polyethylene is formed out of a huge amount of ethylene monomers (C2H4) (ecoinvent v2.2 report 11_II). MW=28 g/mol
- solid bleached and unbleached board carton: 0.00299 kg; lognormal variance with pedigree 0.0612, pedigree (2,3,5,5,3)
  (same comment as for lubricating oil)
  properties: carbon content, fossil 0.0190874, dry mass 0.945 kg, heating value, net 9.8 MJ, water content 0.0582011, carbon content, non-fossil 0.327779, wet mass 1 kg
- core board: 0.00797 kg; lognormal variance with pedigree 0.0612, pedigree (2,3,5,5,3)
  (same comment as for steam, in chemical industry)
  properties: heating value, net 12.19 MJ, water content 0.0582011, wet mass 1 kg, dry mass 0.945 kg, carbon content, non-fossil 0.430314
  note on carbon content, non-fossil: Biogenic C content was calculated after biogenic C contents of chemicals used in the production of board (ecoinvent v2.2 report 11_III, part 13). The cellulose content in 1 kg of paper (on a wet mas basis) was estimated as (1-chemical content), C content of cellulose was considered 0.44 kgC/kg dry mass (ecoinvent v2.2 report, n 15a, pg 40)
- EUR-flat pallet: 0.000453 unit; lognormal variance with pedigree 0.0612, pedigree (2,3,5,5,3)
  (same comment as for lubricating oil)
  properties: heating value, net 335.11 MJ, water content 0.2, carbon content, fossil 0.0311351, dry mass 18.3333 kg, wet mass 22 kg, carbon content, non-fossil 0.58833
  note on carbon content, fossil: C content in components of the pallet (ecoinvent v2.2 report 7_part XVIII)
- packaging box factory: 1.43e-9 unit; lognormal variance with pedigree 0.448, pedigree (4,5,5,5,5)
  Estimation
  EcoSpold01Location=RER
  Uncertainty: estimation
- electricity, medium voltage: 0.00636562, 0.00122065, 0.0204922, 0.298041, 0.042009, 0.136872 kWh (6 entries); lognormal variance with pedigree 0.0612, pedigree (2,3,5,5,3)
  (same comment as for electricity, medium voltage)
- waste polyvinylchloride: -0.000416596, -2.78354e-5, -2.10514e-6, -1.1497e-5, -4.64466e-6, -1.09175e-5, -0.0029164 kg (7 entries); lognormal variance with pedigree 0.0612, pedigree (2,3,5,5,3)
  (same comment as for waste polyvinylchloride)
  production volume 0.01017 kg
- heat, district or industrial, natural gas: 0.00256511, 0.166435 MJ (2 entries); lognormal variance with pedigree 0.0612, pedigree (2,3,5,5,3)
  (same comment as for steam, in chemical industry)

## Inputs from nature
- Water, cooling, unspecified natural origin [natural resource, in water]: 0.019 m3; name water_cooling_UNO_input; lognormal variance with pedigree 0.0612, pedigree (2,3,5,5,3)
  Typical values, based on a European and a Swiss study
  Uncertainty: typical values, based on a European and a Swiss study

## Emissions to nature
- Water [air, unspecified]: 0.0073625 m3; name water_to_air_unspecified; lognormal variance with pedigree 0.0827, pedigree (2,2,5,5,1)
  Calculated value based on literature values and expert opinion. See comments in the parametres' comment field.
  property fraction, origin: fresh water 0; name fraction_origin_fresh_water
  property fraction, origin: unspecified 1; name fraction_origin_unspecified
  property fraction, origin: salt water 0; name fraction_origin_salt_water
- Particulates, > 2.5 um, and < 10um [air, urban air close to ground]: 3.85e-6 kg; lognormal variance with pedigree 0.1812, pedigree (2,3,5,5,3)
  (same comment as for Water, cooling, unspecified natural origin)
- Water [water, unspecified]: 0.0116375 m3; name water_to_water_unspecified; lognormal variance with pedigree 0.0827, pedigree (2,2,5,5,1)
  (same comment as for Water)
  property fraction, origin: fresh water 0; name fraction_origin_fresh_water_Ww
  property fraction, origin: salt water 0; name fraction_origin_salt_water_Ww
  property fraction, origin: unspecified 1; name fraction_origin_unspecified_Ww
  property dry mass 0 kg; name DM
  property carbon content, fossil 0; name C_content_fossil
  property carbon content, non-fossil 0; name C_content_non_fossil
  property wet mass 1000 kg; name WM
  property water in wet mass 1000 kg; name WWM
- NMVOC, non-methane volatile organic compounds, unspecified origin [air, urban air close to ground]: 1.72e-6 kg; lognormal variance with pedigree 0.1812, pedigree (2,3,5,5,3)
  (same comment as for Water, cooling, unspecified natural origin)

## Sampling procedure
company data

## Extrapolations
no extrapolation This dataset has been copied from an original dataset covering the geography RER. The uncertainty has been adjusted accordingly.

## Review by Mischa Classen 2003-06-10
Eintrag "none" bei uncertainty adjustment fehlt -> korrigiert.
