# transport, passenger car, small size, diesel, EURO 3

Dataset: EcoSpold 2, unit process
Geography: RoW
Time period: 2012-01-01 to 2021-12-31
Technology level: current
Classification: ISIC rev.4 ecoinvent: 4922:Other passenger land transport
Tags: internal combustion engine
Scenario: Business-as-Usual
System model: Allocation, cut-off by classification
Generated by: Andrew Simons
Database: ecoinvent
isCopyrightProtected: true
accessRestrictedTo: 1

## General comment
This dataset represents the service of transport in a passenger car for a journey length of 1vkm. The data used for the creation of the global datasets are initially based on European data. Fuel consumption and emissions are for average vehicle use and not representative of a specific driving cycle. The dataset is parametrized with respect to vehicle size, fuel consumption and vehicle lifetime.
Datasets for three different passenger car categories are available in ecoinvent in view of size: small, medium and large.
The category “small” includes passenger cars with engine size up to 1.4 liters. The average weight of this category is estimated to be 1200 kg.
The category “medium” includes passenger cars with engine size between 1.4 and 2.0 liters. The average weight of this category is estimated to be 1600 kg.
The category “large” includes passenger cars with engine size larger than 2.0 liters. The average weight of this category is estimated to be 2000 kg.
The passenger car size influences the amount of both exhaust and non-exhaust emissions. The exhaust emissions caused by the burning of fuel are divided into two groups: fuel dependent emissions (dependent on fuel type and quantity) and Euro class dependent emissions which reflect the emission standards which the vehicle complies with. Three classes of Euro engine type are considered: Euro 3, Euro 4 and Euro 5. The higher the class (e.g. Euro 5), the lower the emissions and viceversa. The Euro engine regulation is set by the European Commission “in order to limit as much as possible the negative impact of road vehicles on the environment and health” (European Commission 2012). This dataset considers a small petrol passenger car of Euro 5 class. Also included within the direct exchanges to the environment are the fuel evaporation emissions from the fuel tank, relevant to petrol vehicles only.
Non-exhaust emissions are those resulting from tyre, brake and road wear. These emissions are considered as by-products.

## Included activities start
The construction of the datasets allows changing key parameters (vehicle size, fuel type and fuel consumption). However, it is important to consider that changing one parameter of a vehicle, e.g. its mass, may lead to changes in other parameters, e.g. the consumption. When modifying the default parameters given, attention should be paid to the possible influence which one parameter may have over the other.

## Included activities end
The activity ends with the transport over 1vkm and the emissions of exhaust and non-exhaust emissions into air, water and soil.

The dataset includes the construction, operation, maintenance and disposal of the vehicle and road infrastructure. Operation of the vehicle includes all the direct emissions produced by fuel combustion and evaporation as well as from tyre, brake and road wear.

## Technology
Transport in a passenger car with internal combustion engine, fueled by petrol. The size is small, with engine size up to 1.4 litres and average weight of 1200 kg.
Technology classifications are based on those used widely within the works of the European Environment Agency, particularly in the Emissions Inventory Guidebook. The Tremove model - which is also used to generate fuel consumption and emission factors for the datasets presented here - follows this classification system.

## Parameters
- fuel consumption of basis vehicle: 0.0421 dimensionless; name fc_basis_vehicle; lognormal variance with pedigree 0.0021, pedigree (2,2,2,4,1)
  Fuel consumption as derived from the source data for each vehicle type, size and emissions standard
- emissions from tyre abrasion: 5.725e-8 kg/kg vehicle; name tyre_wear_emissions; lognormal variance with pedigree 0.0015, pedigree (2,2,2,1,1)
  average (small, medium and large weight class) emissions produced per kg vehicle. example:
  small medium large average
  kg/vkm kg/vkm kg/vkm kg/vkm
  6.611E-08 6.343E-08 6.258E-08 6.404E-08
  Calculation of non-exhaust emissions (tyre, brake and road wear emissions as well as petrol evaporation emissions) are based on: Ntziachristos, L., Boulter, P. (2009b). EMEP/EEA air pollutant emissions inventory guidebook 2009: Road vehicle tyre and brake wear; Road surface wear. Copenhagen, European Environment Agency.
  Uncertainty: B
- scaling factor: 0.967742 dimensionless; name scaling_factor; = (vehicle_weight/1240); lognormal variance with pedigree 0.0012, pedigree (2,1,1,1,1)
  The weight of a vehicle determines the non-exhaust emissions of tyre, brake and road wear, reported in kg/kg vehicle.
  The non-exhaust emissions (kg) are calculated multiplying vehicle’s non-exhaust emissions (kg/kg vehicle) by the scaled vehicle weight (kg vehicle).
  The input passenger car weighs 1240 kg. The scaling factor is given by vehicle weight/input passenger car weight. Therefore: the scaling factor is 1200/1240 for small passenger cars.
- emissions from road abrasion: 9.79e-9 kg/kg vehicle; name road_wear_emissions; lognormal variance with pedigree 0.0015, pedigree (2,2,2,1,1)
  average (small, medium and large weight class) emissions produced per kg vehicle. example:
  small medium large average
  kg/km kg/km kg/km kg/km
  1.25E-08 9.38E-09 7.500E-09 9.79E-09
  Calculation of non-exhaust emissions (tyre, brake and road wear emissions as well as petrol evaporation emissions) are based on: Ntziachristos, L., Boulter, P. (2009b). EMEP/EEA air pollutant emissions inventory guidebook 2009: Road vehicle tyre and brake wear; Road surface wear. Copenhagen, European Environment Agency
  Uncertainty: B
- lifetime of the vehicle: 150000 km; name vehicle_lifetime_km; lognormal variance with pedigree 0.0021, pedigree (2,2,2,4,1)
  distance capacity in the assumed vehicle lifetime.
  Reference: Althaus & gauch, Vergleichende Oekobilanz individueller Mobilität: Elektromobilität versus konventionelle Mobilität mit Bio- und fossilen Treibstoffen, EMPA, Dübendorf, 2010
- fuel consumption constant: 2.93e-5 dimensionless; name fc_constant; = 2.930000E-05; lognormal variance with pedigree 0.0021, pedigree (2,2,2,4,1)
  Determined from analysing the fuel consumption for vehicles in the Tremove model (2009)
- gross vehicle weight: 1297.2 kg; name gross_vehicle_weight; = vehicle_weight+(1.62*60); lognormal variance with pedigree 0.0021, pedigree (2,2,2,4,1)
  It corresponds to the following formula:
  weight of the vehicle + ((average load * 60 kg / 1000).
  The estimated average load is 1620 kg and the estimated weight of a passengeris 60 kg.
- so2 per kg diesel: 2e-5 kg; name so2_kg_diesel; = 2.0e-5; lognormal variance with pedigree 0.0021, pedigree (2,2,2,4,1)
  Constant for all diesel vehicles
- weight of the basis vehicle: 1240 kg/unit; name basis_vehicle_weight; lognormal variance with pedigree 0.0021, pedigree (2,2,2,4,1)
  The basis vehicle is the one on which the original life cycle inventory was conducted. It is representative of a VW Golf.
- emissions from brake friction: 4.45e-9 kg/kg vehicle; name brake_wear_emissions; lognormal variance with pedigree 0.0015, pedigree (2,2,2,1,1)
  average (small, medium and large weight class) emissions produced per kg vehicle.
  Calculation of non-exhaust emissions (tyre, brake and road wear emissions as well as petrol evaporation emissions) are based on: Ntziachristos, L., Boulter, P. (2009b). EMEP/EEA air pollutant emissions inventory guidebook 2009: Road vehicle tyre and brake wear; Road surface wear. Copenhagen, European Environment Agency
  Uncertainty: B
- annual total vkm: 2.1e10 km; name annual_vkm; = 2.10E+10; lognormal variance with pedigree 0.0021, pedigree (2,2,2,4,1)
  Based on Tremove (2009)
- european to global total vkm scaling factor: 5.7 dimensionless; name global_scaling_factor; lognormal variance with pedigree 0.0118, pedigree (3,3,4,4,1)
  Estimation
  Uncertainty: B
- passengers: 1.62 unit; lognormal variance with pedigree 0.0021, pedigree (2,2,2,4,1)
  Average number of passengers in passenger car 1.62
- passenger load factor: 97.2 kg; name LF_passengers; = passengers*60; lognormal variance with pedigree 0.0021, pedigree (2,2,2,4,1)
  Number of passengers multiplied by 60 kg per passenger
- weight of the vehicle: 1200 kg/unit; name vehicle_weight; lognormal variance with pedigree 0.0015, pedigree (2,2,2,1,1)
  A scaling factor is used to adjust to the vehicle weight chosen in this dataset.
  The weight of a vehicle determines the non-exhaust emissions of tyre, brake and road wear, reported in kg/kg vehicle. The non-exhaust emissions (kg) are calculated multiplying vehicle’s non-exhaust emissions (kg/kg vehicle) by the scaled vehicle weight (kg vehicle).
  Passenger cars are divided into three classes of weight, whereas this dataset has implemented the value valid for a small car: 1200 kg.
  Uncertainty: B
- co2 per kg diesel: 3.14 kg; name co2_kg_diesel; lognormal variance with pedigree 0.0021, pedigree (2,2,2,4,1)
  Constant for all diesel vehicles

## Reference product
- transport, passenger car, small size, diesel, EURO 3: 1 km; CPC 64119: Other land transportation services of passengers, n.e.c.; By-product classification allocatable product
  production volume 9.87e10 km; name transport_RP_PV; = annual_vkm*global_scaling_factor
    Based on Tremove model (2009) and scaling factor calculated from Schafer, A. (1998) The global demand for motorized mobility. Trtansportation Research Part A: Policy and Practice 32 (6) 445-477
  property price 0.113385 EUR2005
    Calculated based on inputs: The price of the product has been calculated as a sum of the values of the material and energy inputs for this product. This value is therefore a rough estimation. It may underestimate the real price since there are additional expenses when producing any product. These expences can include for example labour costs, treatment of waste materials and profit for the producer. Please consider carefully whether this level of data quality is acceptable for your application.

## Inputs from technosphere
- passenger car maintenance: 6.45161e-6 unit; = (1/vehicle_lifetime_km)*scaling_factor; source Spielmann M. 2007; lognormal variance with pedigree 0.0419, pedigree (2,2,5,4,1)
  The dataset is for a medium size passenger car. In order to make the demand appropriate to the particular vehicle in question a scaling factor is applied which is the product of the vehicle weight devided by the weight of the medium size vehicle.
- brake wear emissions, passenger car: -5.34e-6 kg; name brake_emissions; = (brake_wear_emissions* vehicle_weight)*-1; source EMEP/EEA 2009; lognormal variance with pedigree 0.0419, pedigree (2,2,5,4,1)
  Annual production volume of non-exhaust brake wear emissions = total vkm/yr * total kg emissions
  Total vkm represent the total amount of kilometer driven by the vehicle yearly.
  Total kg emissions represents the amount of non-exhaust brake wear emissions per vehicle. Total kg non-exhaust brake wear emissions= 7.41E-06 kg/vkm. This is the value for a medium sized passenger car. Source: Ntziachristos, L., Boulter, P. (2009b). EMEP/EEA air pollutant emissions inventory guidebook 2009: Road vehicle tyre and brake wear; Road surface wear. Copenhagen, European Environment Agency.
  production volume 517975 kg; = brake_emissions*transport_RP_PV
    Calculated from production volume of reference product using the relative outputs.
  property price 0 EUR2005; name brake_emissions_price_EUR2005
- tyre wear emissions, passenger car: -6.87e-5 kg; name tyre_emissions; = (tyre_wear_emissions*vehicle_weight)*-1; source EMEP/EEA 2009; lognormal variance with pedigree 0.0419, pedigree (2,2,5,4,1)
  Annual production volume of non-exhaust tyre wear emissions = total vkm/yr * total kg emissions.
  Total vkm represent the total amount of kilometer driven by the vehicle yearly.
  Total kg emissions represents the amount of non-exhaust tyre wear emissions per vehicle.
  Source: Ntziachristos, L., Boulter, P. (2009b). EMEP/EEA air pollutant emissions inventory guidebook 2009: Road vehicle tyre and brake wear; Road surface wear. Copenhagen, European Environment Agency.
  production volume 6.66383e6 kg; = tyre_emissions*transport_RP_PV
    Calculated from production volume of reference product using the relative outputs.
  property price 0 EUR2005; name tyre_emissions_price_EUR2005
- road wear emissions, passenger car: -1.1748e-5 kg; name road_emissions; = (road_wear_emissions* vehicle_weight)*-1; source EMEP/EEA 2009; lognormal variance with pedigree 0.0419, pedigree (2,2,5,4,1)
  Annual production volume of non-exhaust road wear emissions = total vkm/yr * total kg emissions
  Total vkm represent the total amount of kilometer driven by the vehicle yearly.
  Total kg emissions represents the amount of non-exhaust road wear emissions per vehicle. Total kg non-exhaust road wear emissions= 1.50E-05 kg/vkm. This is the value for a medium sized passenger car. Source: Ntziachristos, L., Boulter, P. (2009b). EMEP/EEA air pollutant emissions inventory guidebook 2009: Road vehicle tyre and brake wear; Road surface wear. Copenhagen, European Environment Agency.
  production volume 1.13954e6 kg; = road_emissions*transport_RP_PV
    Calculated from production volume of reference product using the relative outputs.
  property price 0 EUR2005; name road_emissions_price_EUR2005
- road: 0.000696596 m*year; name road_use; = 5.37E-07*gross_vehicle_weight; source Spielmann M. 2007; lognormal variance with pedigree 0.0419, pedigree (2,2,5,4,1)
  This input indicates the unit of road per vkm used during the transport activity.
  The road input is composed by two demand factors:
  - Road infrastructure and disposal (RI&D), which varies according to the gross vehicle weight.
  - Road operations & maintenance (RO&M), which does not vary according to the gross vehicle weight.
- diesel, low-sulfur: 0 kg; name diesel_use; source TREMOVE 2007; pedigree (1,1,1,1,1)
  Estimation. Calculations are based on data from TREMOVE (2007)
  Fuel consumption is influenced by vehicle weight. Fuel input exchanges (petrol low-sulphur, diesel low-sulphur and natural gas) are scaled on the specific vehicle weight inserted by the ecoinvent user. The scaling factor is estimated to be 2.93E-05.
  The scaling factor corresponds to the difference in terms of fuel consumption of the two extremes that compose each class of passenger car emerging from the match between the three sizes and the three Euro categories. The result is then divided by the difference of the two extremes weight of each emerged class, which is 300 kg for all size categories.
  The size “small” has extremes of 1200 kg and 1500 kg. The scaling factor of a small passenger car diesel Euro 3 is therefore calculated as:
  ((specific vehicle weight - weight of minor extreme) * 2.93E-05 + fuel consumption of minor extreme).
  This corresponds to:
  ((specific vehicle weight - 1200 kg) * 2.93E-05 + 4.21E-02
  property water content 0; name water_content
  property carbon content, fossil 0.865; name C_content_fossil
  property carbon content, non-fossil 0; name C_content_non_fossil
  property wet mass 1 kg; name WM
  property dry mass 1 kg; name DM
  property water in wet mass 0 kg; name WWM
  properties: heating value, net 42.8 MJ
- passenger car, diesel: 0.008 kg; name passenger_car; = (1/vehicle_lifetime_km)*vehicle_weight; lognormal variance with pedigree 0.0419, pedigree (2,2,5,4,1)
  The dataset is calculated from the LCI of VW Golf. The infrastructure demand is scaled according to the weight of the specific vehicle in question.
- road maintenance: 0.000265427 m*year; lognormal variance with pedigree 0.0419, pedigree (2,2,5,4,1)
  This input indicates the unit of road per vkm used during the transport activity. The road input is composed by two demand factors: - Road infrastructure and disposal (RI&D), which varies according to the gross vehicle weight. - Road operations & maintenance (RO&M), which does not vary according to the gross vehicle weight.
- diesel, low-sulfur: 0.00156896, 0.0015839, 0.00316675, 0.000105049, 0.000710571, 0.0378127 kg (6 entries); source TREMOVE 2007; lognormal variance with pedigree 0.0419, pedigree (2,2,5,4,1)
  (same comment as for diesel, low-sulfur)
  properties: carbon content, fossil 0.865, wet mass 1 kg, dry mass 1 kg, heating value, net 42.8 MJ

## Emissions to nature
- o-Xylene [air, urban air close to ground]: 5.151e-8 kg; source TREMOVE 2007; lognormal variance with pedigree 0.0419, pedigree (2,2,5,4,1)
  Emissions dependent on engine Euro class (Euro 3, Euro 4 and Euro 5).
- Copper [air, urban air close to ground]: 7.64115e-8 kg; = 1.70000E-06*diesel_use; source TREMOVE 2007; lognormal variance with pedigree 0.0419, pedigree (2,2,5,4,1)
  1.70000E-06 is the emission value of copper per kg of diesel used
- PAH, polycyclic aromatic hydrocarbons [air, urban air close to ground]: 8.2884e-9 kg; = 1.84400E-07*diesel_use; source TREMOVE 2007; lognormal variance with pedigree 0.0419, pedigree (2,2,5,4,1)
  1.84400E-07 is the emission value of PAH per kg of diesel used
- Toluene [air, urban air close to ground]: 1.316e-7 kg; source TREMOVE 2007; lognormal variance with pedigree 0.0419, pedigree (2,2,5,4,1)
  Emissions dependent on engine Euro class (Euro 3, Euro 4 and Euro 5).
- Cyclohexane (for all cycloalkanes) [air, urban air close to ground]: 1.24e-7 kg; source TREMOVE 2007; lognormal variance with pedigree 0.0419, pedigree (2,2,5,4,1)
  Emissions dependent on engine Euro class (Euro 3, Euro 4 and Euro 5).
- Formaldehyde [air, urban air close to ground]: 2.289e-6 kg; source TREMOVE 2007; lognormal variance with pedigree 0.0419, pedigree (2,2,5,4,1)
  Emissions dependent on engine Euro class (Euro 3, Euro 4 and Euro 5).
- Nickel [air, urban air close to ground]: 3.14636e-9 kg; = 7.00000E-08*diesel_use; source TREMOVE 2007; lognormal variance with pedigree 0.0419, pedigree (2,2,5,4,1)
  7.00000E-08 is the emission value of nickel per kg of diesel used
- Ethylene oxide [air, urban air close to ground]: 2.093e-6 kg; source TREMOVE 2007; lognormal variance with pedigree 0.0419, pedigree (2,2,5,4,1)
  Emissions dependent on engine Euro class (Euro 3, Euro 4 and Euro 5).
- Heptane [air, urban air close to ground]: 3.815e-8 kg; source TREMOVE 2007; lognormal variance with pedigree 0.0419, pedigree (2,2,5,4,1)
  Emissions dependent on engine Euro class (Euro 3, Euro 4 and Euro 5).
- Selenium [air, urban air close to ground]: 4.4948e-10 kg; = 1.00000E-08*diesel_use; source TREMOVE 2007; lognormal variance with pedigree 0.0419, pedigree (2,2,5,4,1)
  1.00000E-08 is the emission value of selenium per kg of diesel used
- Acrolein [air, urban air close to ground]: 6.83e-7 kg; source TREMOVE 2007; lognormal variance with pedigree 0.0419, pedigree (2,2,5,4,1)
  Emissions dependent on engine Euro class (Euro 3, Euro 4 and Euro 5).
- Propylene oxide [air, urban air close to ground]: 6.868e-7 kg; source TREMOVE 2007; lognormal variance with pedigree 0.0419, pedigree (2,2,5,4,1)
  Emissions dependent on engine Euro class (Euro 3, Euro 4 and Euro 5).
- Ethane [air, urban air close to ground]: 6.295e-8 kg; source TREMOVE 2007; lognormal variance with pedigree 0.0419, pedigree (2,2,5,4,1)
  Emissions dependent on engine Euro class (Euro 3, Euro 4 and Euro 5).
- Chromium IV [air, urban air close to ground]: 4.4948e-12 kg; = 1.00000E-10*diesel_use; source TREMOVE 2007; lognormal variance with pedigree 0.0419, pedigree (2,2,5,4,1)
  1.00000E-10 is the emission value of chromium IV per kg of diesel used
- Propane [air, urban air close to ground]: 2.098e-8 kg; source TREMOVE 2007; lognormal variance with pedigree 0.0419, pedigree (2,2,5,4,1)
  Emissions dependent on engine Euro class (Euro 3, Euro 4 and Euro 5).
- Mercury [air, urban air close to ground]: 8.98959e-13 kg; = 2.00000E-11*diesel_use; source TREMOVE 2007; lognormal variance with pedigree 0.0419, pedigree (2,2,5,4,1)
  2.00000E-11 is the emission value of mercury per kg of diesel used
- Benzaldehyde [air, urban air close to ground]: 1.641e-7 kg; source TREMOVE 2007; lognormal variance with pedigree 0.0419, pedigree (2,2,5,4,1)
  Emissions dependent on engine Euro class (Euro 3, Euro 4 and Euro 5).
- Pentane [air, urban air close to ground]: 7.631e-9 kg; source TREMOVE 2007; lognormal variance with pedigree 0.0419, pedigree (2,2,5,4,1)
  Emissions dependent on engine Euro class (Euro 3, Euro 4 and Euro 5).
- Sulfur dioxide [air, urban air close to ground]: 8.98959e-7 kg; = so2_kg_diesel*diesel_use; source TREMOVE 2007; lognormal variance with pedigree 0.0419, pedigree (2,2,5,4,1)
  2.00055E-05 is the emission value of sulphur dioxide per kg of diesel used
- Nitrogen oxides [air, urban air close to ground]: 0.00078708 kg; lognormal variance with pedigree 0.0099, pedigree (2,2,4,4,1)
  Literature data. Emission values for NOx and PM were updated in ecoinvent version 3.2. Source:The Handbook of Emission Factors for Road Transport version 3.2 (HEBFA, 2014) (http://www.hbefa.net/e/index.html). Additionally data has been reviewed from experts from the Paul Scherrer Institut (PSI) (<https://www.psi.ch/>) and from the International Institute for Applied Systems Analysis (IIASA) (<http://www.iiasa.ac.at/>). For 'transport, passenger car, diesel, EURO3' the values reported according to size are:
  EURO 3 Size
  Emissions(kg/km) <1,4L 1,4-<2L >=2L
  PM 3.7804E-05 3.9000E-05 3.8836E+00
  NOx 7.8708E-04 8.0300E-04 8.04E-04
- Lead [air, urban air close to ground]: 3.70821e-15 kg; = 8.25000E-14*diesel_use; source TREMOVE 2007; lognormal variance with pedigree 0.0419, pedigree (2,2,5,4,1)
  8.25000E-14 is the emission value of lead per kg of diesel used
- Methane [air, urban air close to ground]: 1.99e-6 kg; source TREMOVE 2007; lognormal variance with pedigree 0.0419, pedigree (2,2,5,4,1)
  Emissions dependent on engine Euro class (Euro 3, Euro 4 and Euro 5).
- Acetaldehyde [air, urban air close to ground]: 1.234e-6 kg; source TREMOVE 2007; lognormal variance with pedigree 0.0419, pedigree (2,2,5,4,1)
  Emissions dependent on engine Euro class (Euro 3, Euro 4 and Euro 5).
- Particulates, < 2.5 um [air, urban air close to ground]: 3.7804e-5 kg; lognormal variance with pedigree 0.0099, pedigree (2,2,4,4,1)
  (same comment as for Nitrogen oxides)
- m-Xylene [air, urban air close to ground]: 1.164e-7 kg; source TREMOVE 2007; lognormal variance with pedigree 0.0419, pedigree (2,2,5,4,1)
  Emissions dependent on engine Euro class (Euro 3, Euro 4 and Euro 5).
- Zinc [air, urban air close to ground]: 4.4948e-8 kg; = 1.00000E-06*diesel_use; source TREMOVE 2007; lognormal variance with pedigree 0.0419, pedigree (2,2,5,4,1)
  1.00000E-06 is the emission value of zinc per kg of diesel used
- Methyl ethyl ketone [air, urban air close to ground]: 2.289e-7 kg; source TREMOVE 2007; lognormal variance with pedigree 0.0419, pedigree (2,2,5,4,1)
  Emissions dependent on engine Euro class (Euro 3, Euro 4 and Euro 5).
- Dinitrogen monoxide [air, urban air close to ground]: 2.2474e-6 kg; = 5.00000E-05*diesel_use; source TREMOVE 2007; lognormal variance with pedigree 0.0419, pedigree (2,2,5,4,1)
  5.00000E-05 is the emission value of dinitrogen monoxide per kg of diesel used
- Carbon monoxide, fossil [air, urban air close to ground]: 7.2e-5 kg; source TREMOVE 2007; lognormal variance with pedigree 0.0419, pedigree (2,2,5,4,1)
  Emissions dependent on engine Euro class (Euro 3, Euro 4 and Euro 5).
- Styrene [air, urban air close to ground]: 7.058e-8 kg; source TREMOVE 2007; lognormal variance with pedigree 0.0419, pedigree (2,2,5,4,1)
  Emissions dependent on engine Euro class (Euro 3, Euro 4 and Euro 5).
- Butane [air, urban air close to ground]: 2.098e-8 kg; source TREMOVE 2007; lognormal variance with pedigree 0.0419, pedigree (2,2,5,4,1)
  Emissions dependent on engine Euro class (Euro 3, Euro 4 and Euro 5).
- Cadmium [air, urban air close to ground]: 4.4948e-10 kg; = 1.00000E-08*diesel_use; source TREMOVE 2007; lognormal variance with pedigree 0.0419, pedigree (2,2,5,4,1)
  1.00000E-08 is the emission value of cadmium per kg of diesel used
- Chromium [air, urban air close to ground]: 2.2474e-9 kg; = 5.00000E-08*diesel_use; source TREMOVE 2007; lognormal variance with pedigree 0.0419, pedigree (2,2,5,4,1)
  5.00000E-09 is the emission value of chromium per kg of diesel used
- Acetone [air, urban air close to ground]: 5.609e-7 kg; source TREMOVE 2007; lognormal variance with pedigree 0.0419, pedigree (2,2,5,4,1)
  Emissions dependent on engine Euro class (Euro 3, Euro 4 and Euro 5).
- Carbon dioxide, fossil [air, urban air close to ground]: 0.141137 kg; = co2_kg_diesel*diesel_use; source TREMOVE 2007; lognormal variance with pedigree 0.0419, pedigree (2,2,5,4,1)
  Calculated based on the amount of diesel used and the emission of CO2 per kg of diesel.
- Benzene [air, urban air close to ground]: 3.777e-7 kg; source TREMOVE 2007; lognormal variance with pedigree 0.0419, pedigree (2,2,5,4,1)
  Emissions dependent on engine Euro class (Euro 3, Euro 4 and Euro 5).
- Ammonia [air, urban air close to ground]: 7.19167e-7 kg; = 1.60000E-05*diesel_use; source TREMOVE 2007; lognormal variance with pedigree 0.0419, pedigree (2,2,5,4,1)
  1.60000E-05 is the emission value of ammonia per kg of diesel used
- NMVOC, non-methane volatile organic compounds, unspecified origin [air, urban air close to ground]: 1.011e-5 kg; source TREMOVE 2007; lognormal variance with pedigree 0.0419, pedigree (2,2,5,4,1)
  Emissions dependent on engine Euro class (Euro 3, Euro 4 and Euro 5).

## Sampling procedure
Literature
