# ilmenite - magnetite mine operation

Dataset: EcoSpold 2, unit process
Geography: GLO
Time period: 2000-01-01 to 2021-12-31
Technology level: current
Classification: ISIC rev.4 ecoinvent: 0729:Mining of other non-ferrous metal ores
Classification: EcoSpold01Categories: chemicals/inorganics
Synonyms: FeTiO3; FeO.TiO2
Scenario: Business-as-Usual
System model: Allocation, cut-off by classification
Generated by: Tereza Levova
Published in: Korneliussen, A. 2000
Database: ecoinvent
isCopyrightProtected: true
accessRestrictedTo: 1

## General comment
Ilmenite and magnetite mining from hard-rock ore. Based on Tellnes mine (Norway) and Lac Allard mine (Canada).
Comments on modelling. All the flows related to energy consumption are based on U.S. Department of Energy survay from 2007 on Mining Industry (http://www1.eere.energy.gov/manufacturing/industries_technologies/mining/pdfs/mining_bandwidth.pdf). The emissions are based on limestone quarry operation and production datasets. The land use and occupation is based on rough measurements from map.

## Included activities end
This activities includes both mining operation and beneficiation. This activity includes blasting, all transports within the mine (for mining and recultivation) and the infrastructure. The primary processing is part of the activity as well; crushing, washing, grinding, separation and transportation by conveyor belt.

## Geography
Data on energy consumption are based on survey of mining operation sites in the U.S. This data are considered to be representative for the global activity.

## Parameters
- fraction_03: 0.32 dimensionless; name fraction_03_electricity; lognormal variance with pedigree 0.1221, pedigree (2,2,2,4,5)
  Calculated based on literature value. Based on data from U.S. Department of Energy - DOE - research on energy consumption during minerals' mining (http://www1.eere.energy.gov/manufacturing/industries_technologies/mining/pdfs/mining_bandwidth.pdf).
- allard_mine_annual_production_volume_ilmenite: 1e8 kg; name allard_mine_annual_PV_ilmenite; lognormal variance with pedigree 0.0086, pedigree (4,1,1,1,1)
  Literature value. The annual production volume (PV) of ilmenite of Allard Lake mine (http://apps1.gdr.nrcan.gc.ca/gsc_minerals/gquerycache/vticanada/DP/dp51.html).
- fraction_01: 0.1 dimensionless; name fraction_01_coal; lognormal variance with pedigree 0.1221, pedigree (2,2,2,4,5)
  (same comment as for fraction_03)
- tellnes_mine_annual_production_volume_ilmenite: 5.5e8 kg; name tellnes_mine_annual_PV_ilmenite; lognormal variance with pedigree 0.0086, pedigree (4,1,1,1,1)
  Literature value. The annual production volume (PV) of ilmenite of Tellnes mine (http://www.ngu.no/filearchive/102/bulletin436_3.pdf).
- allard_mine_area_yearly_growth: 33898.3 m2/year; = allard_mine_area/(2005-1946); lognormal variance with pedigree 0.0086, pedigree (4,1,1,1,1)
  Calculated based on literature data (Natural Resources Canada, 2007, http://apps1.gdr.nrcan.gc.ca/gsc_minerals/gquerycache/vticanada/DP/dp51.html). The Allard mine is in operation since 1946. The data about its are are from year 2005.
- tellnes_mine_area: 800000 m2; lognormal variance with pedigree 0.0086, pedigree (4,1,1,1,1)
  Literature data (Korneliussen, 2000, http://www.ngu.no/filearchive/102/bulletin436_3.pdf). The area of Tellnes mine in Norway.
- total_energy_consumption: 33.174 BTU/kg; lognormal variance with pedigree 0.0514, pedigree (4,4,2,4,4)
  Literature value. Based on data from U.S. Department of Energy - DOE - research on energy consumption during minerals' mining (http://www1.eere.energy.gov/manufacturing/industries_technologies/mining/pdfs/mining_bandwidth.pdf).
- number of hard-rock ilmenite mines in the world: 2 dimensionless; name no_of_hardrock_ilmenite_mines; lognormal variance with pedigree 0.0006, pedigree (1,1,1,1,1)
  Literature value. States the number of hard-rock ilmenite mines in the world.
- tellnes_mine_area_yearly_growth: 20000 m2/year; = tellnes_mine_area/(2000-1960); lognormal variance with pedigree 0.0086, pedigree (4,1,1,1,1)
  Calculated based on literature data (Korneliussen, 2000, http://www.ngu.no/filearchive/102/bulletin436_3.pdf). The Tellnes mine is in operation since 1960. The data about its are are from year 2000.
- no_of_m2_transformed_per_1year: 22138.2 m2; = ((tellnes_mine_area_yearly_growth*tellnes_mine_annual_PV_ilmenite)+(allard_mine_area_yearly_growth*allard_mine_annual_PV_ilmenite))/(tellnes_mine_annual_PV_ilmenite+allard_mine_annual_PV_ilmenite); lognormal variance with pedigree 0.0106, pedigree (4,1,3,1,1)
  Calculated value.
- fraction_05: 0.22 dimensionless; name fraction_05_natural_gas; lognormal variance with pedigree 0.1221, pedigree (2,2,2,4,5)
  (same comment as for fraction_03)
- btu to kWh: 0.000293071 kWh; name BTU_to_kWh; lognormal variance with pedigree 0.0026, pedigree (3,1,1,1,1)
  Conversion of British Thermal Unit (BTU) to kWh.
- btu_to_gasoline: 0.032799 l; name BTU_to_gasoline; lognormal variance with pedigree 0.0026, pedigree (3,1,1,1,1)
  Conversion of British Thermal Unit (BTU) to gasoline (LHV - lower - net - heating value).
- efficiency: 0.95 dimensionless; name efficiency_of_extraction; lognormal variance with pedigree 0.0086, pedigree (4,1,1,1,1)
  Estimated values. Output relative to input (requires additional specification). The fraction of pure substance (such as TiO2) which can be really extracted from the mineral.
- no_of_m2_transformed_per_1kg_mined: 8.29205e-5 m2; = (((tellnes_mine_area_yearly_growth/tellnes_mine_annual_PV_ilmenite)*tellnes_mine_annual_PV_ilmenite)+((allard_mine_area_yearly_growth/ allard_mine_annual_PV_ilmenite)*allard_mine_annual_PV_ilmenite))/(tellnes_mine_annual_PV_ilmenite+allard_mine_annual_PV_ilmenite); lognormal variance with pedigree 0.0106, pedigree (4,1,3,1,1)
  Calculated value. Weighted average (by production volumes) of Tellnes and Allard mine land transformation.
- allard_mine_area: 2e6 m2; lognormal variance with pedigree 0.0086, pedigree (4,1,1,1,1)
  Literature value. The area of Allard mine (Lac Allard) in Canada.
- btu_to_mj: 0.00105506 MJ; name BTU_to_MJ; lognormal variance with pedigree 0.0026, pedigree (3,1,1,1,1)
  Conversion of British Thermal Unit (BTU) to MJ.
- fraction_02: 0.34 dimensionless; name fraction_02_diesel; lognormal variance with pedigree 0.1221, pedigree (2,2,2,4,5)
  (same comment as for fraction_03)
- fraction, process water, to air: 0.15 dimensionless; name fraction_PW_to_air; lognormal variance with pedigree 0.092025, pedigree (4,4,3,2,4)
  Literature value. In case when no industry/process specific data are available, default evaporation fraction value is used. This value is 15% and is based on literature (Statistics Canada, 2007 & Shaffer, K.H., 2008, Consumptive water use in the Great Lakes Basin, USGS & Shiklomanov, 2003, World Water Resources at the Beginning of the 21st Century) and has been approved by an expert.
- fraction_04: 0.02 dimensionless; name fraction_04_gasoline; lognormal variance with pedigree 0.1221, pedigree (2,2,2,4,5)
  (same comment as for fraction_03)

## Reference product
- ilmenite, 54% titanium dioxide: 0 kg; name ilmenite_output; CPC 4160: Other non-ferrous metals and articles thereof (including waste and scrap of some metals); cermets and articles […]; By-product classification allocatable product; CAS 12168-52-4
  production volume 8.98286e9 kg; name ilmenite_PV; = 10500000*1000 - 1517137800
    According to USGS (2021), 10'500'000 metric tons of ilmenite and leucoxene were produced globally in 2018. This value is used as best estimate of the production volume of "ilmenite, 54% titanium dioxide", as no information regarding the split between ilmenite and leucoxene is available. It is assumed that, globally, ilmenite has an average titanium dioxide content of 54%.
    Since ilmenite is produced in a significant quantity as byproduct of the activity "heavy mineral sand quarry operation", the production volume of ilmenite in that activity is subtracted from the total global production volume of ilmenite and leucoxene reported in USGS (2021).
    References:
    USGS (2021). Titanium Statistics and Information, Advance Data Release of the 2018 Annual Tables. https://prd-wret.s3.us-west-2.amazonaws.com/assets/palladium/production/atoms/files/myb1-2018-titan-adv.xlsx
  property dry mass 1 kg; name ilmenite_output_DM
  property wet mass 1 kg; name ilmenite_output_WM
  property carbon content, non-fossil 0; name ilmenite_output_C_content_non_fossil
    biogene carbon content on a dry matter basis
  property water in wet mass 0 kg; name ilmenite_output_WWM
  property price 0.109695 EUR2005; name ilmenite_output_price_EUR2005
    Price approximated with the price of "Ilmenite, bulk, minimum 54% TiO2, f.o.b. Australia" reported in the USGS Mineral Commodity Summaries for Titanium Mineral Concentrates from 2009 to 2017 (https://www.usgs.gov/centers/nmic/titanium-statistics-and-information). The prices given in USD were converted to EUR based on the annual exchange rates published by the European Central Bank (https://sdw.ecb.europa.eu/quickview.do?SERIES_KEY=120.EXR.A.USD.EUR.SP00.A), and then adjusted for inflation relative to 2005 by using the Harmonised Index of Consumer Prices (HICP) of the euro area, published by eurostat (https://ec.europa.eu/eurostat/databrowser/view/PRC_HICP_AIND/default/table).
  property carbon content, fossil 0; name ilmenite_output_C_content_fossil
    fossil carbon content on a dry matter basis
  property water content 0; name ilmenite_output_water_content
  property carbon content 0
    carbon content on a dry matter basis (reserved; not for manual entry)
  property true value 0.109695; name ilmenite_output_true_value
    allocation property applied in "true value" allocation // value calculated from revenue
  properties: carbon allocation 0 kg
- magnetite: 1 kg; name magnetite_output; = ilmenite_output; By-product classification allocatable product; CPC 35130: Printing ink; CAS 1309-38-2; pedigree (1,1,1,1,1)
  Based on data from Geological survay of Norway (http://www.ngu.no/filearchive/102/bulletin436_3.pdf) and Geological survay of Canada (http://apps1.gdr.nrcan.gc.ca/gsc_minerals/gquerycache/vticanada/DP/dp51.html) the amount of magnetite produced is approximatelly the same as the amount of ilmenite produced.
  production volume 8.98286e9 kg; = ABS(magnetite_output/ilmenite_output)*ilmenite_PV
    Calculated from production volume of reference product using the relative outputs.
  property price 0.0318 EUR2005; name magnetite_output_price_EUR2005
    Same price assumed as 'Iron ore'. According to http://minerals.usgs.gov/ds/2005/140/ironore.xls downloaded 3 February 2009. The Iron content is not specified.
  property carbon content 0
    carbon content on a dry matter basis (reserved; not for manual entry)
  property true value 0.0318; name magnetite_output_true_value
    allocation property applied in "true value" allocation // value calculated from revenue
  properties: dry mass 1 kg, carbon content, non-fossil 0, water content 0, carbon content, fossil 0, water in wet mass 0 kg, wet mass 1 kg, carbon allocation 0 kg

## Inputs from technosphere
- diesel, burned in diesel-electric generating set, 10MW: 0.00534896 MJ; = total_energy_consumption*fraction_02_diesel*BTU_to_MJ*(ilmenite_output+ magnetite_output); lognormal variance with pedigree 0.0518, pedigree (4,3,3,4,4)
  Estimate based on U.S. Department of Energy (http://www1.eere.energy.gov/manufacturing/industries_technologies/mining/pdfs/mining_bandwidth.pdf) report describing energy consumption during mining of unspecified minerals.
  properties: heating value, net 1 MJ
- recultivation, ilmenite mine: 1.86358e-5 m2; = transformation_to; lognormal variance with pedigree 0.088, pedigree (4,1,5,1,1)
  Calculated value.
- mine infrastructure, open cast, ilmenite from hard-rock ore: 6.91518e-12 unit; = (ilmenite_output+magnetite_output)*(no_of_hardrock_ilmenite_mines/( lifetime*2*(allard_mine_annual_PV_ilmenite+tellnes_mine_annual_PV_ilmenite))); lognormal variance with pedigree 0.468, pedigree (1,5,5,1,5)
  There are two mines, where hard-ore ilmenite is being mined (Cardarelli, 2008, Materials Handbook); Tellnes mine in Norway (http://www.ngu.no/filearchive/102/bulletin436_3.pdf) and Allard Lake mine in Canada (http://apps1.gdr.nrcan.gc.ca/gsc_minerals/gquerycache/vticanada/DP/dp51.html). The annual production of these mines is 550,000 ton of ilmenite/year, respectivelly 100,000 ton of ilmenite/year. Since magnetite is produced in the same amounts the production volume is estimated to be the same as in case of ilmenite. The lifetime of hard-rock ilmenite mine is estimated to be 100 years. Both of these mines are in operation for more than 50 years and there are no signs of possible closing of the mines.
  property lifetime 100 year; name lifetime
  property lifetime capacity [kg] 1.33656e11 kg; name lifetime_capacity; = ((1/0.54)*57E9)+2.81E10
  note on lifetime: There are in total two ilmenite hard-rock mines; Tellnes in Norway which is in operation since approximatelly 1920 (Norwegian Society for Geology, http://www.ngu.no/prosjekter/GEODE/Tellnes/Images/production%201916-1999.jpg) and Lac Allard which is in operation since 1946 (http://apps1.gdr.nrcan.gc.ca/gsc_minerals/gquerycache/vticanada/DP/dp51.html). Since boths mines are in operation for more than 50 years and there are no signs that they are planned to be closed it is assumed that the lifetime of such a mine is 100 years.
  note on lifetime capacity [kg]: According to literature (Korneliussen, 2000) the ore reserves of Tellnes mine (Norway) are 57 Mt of TiO2, respective 105 Mt if recalculated for ilmenite. According to Norwegian society for geology (http://www.ngu.no/prosjekter/GEODE/Tellnes/Images/production%201916-1999.jpg) since 1916 till 2000 in total approximately 28 Mt of ilmenite had been mined.
- industrial machine, heavy, unspecified: 0 kg; pedigree (1,1,1,1,1)
  Estimate, based on "limestone production, crushed, for mill" dataset.
- heat, central or small-scale, natural gas: 0.00346109 MJ; = total_energy_consumption*fraction_05_natural_gas*BTU_to_MJ*(ilmenite_output+ magnetite_output); lognormal variance with pedigree 0.0518, pedigree (4,3,3,4,4)
  (same comment as for diesel, burned in diesel-electric generating set, 10MW)
  properties: heating value, net 1 MJ
- electricity, medium voltage: 0.00323385 kWh; = (((ilmenite_output+ magnetite_output)*total_energy_consumption*fraction_03_electricity* BTU_to_kWh)*(ilmenite_output+ magnetite_output))+(total_energy_consumption*fraction_01_coal* BTU_to_kWh*(ilmenite_output+ magnetite_output)); lognormal variance with pedigree 0.0518, pedigree (4,3,3,4,4)
  (same comment as for diesel, burned in diesel-electric generating set, 10MW)
- petrol, unleaded: 0 kg; pedigree (1,1,1,1,1)
  (same comment as for diesel, burned in diesel-electric generating set, 10MW)
  property density 0.7197 kg/l; name density_petrol; = 719.7/1000
  properties: carbon content, fossil 0.865, wet mass 1 kg, heating value, net 43.2 MJ, dry mass 1 kg
  note on heating value, net: Assumed equal to "petroleum". LHV for petroleum: Based on literature, page 7, Report6, part 4
- conveyor belt: 1.24957e-8 m; = 2.78E-08*(ilmenite_output+ magnetite_output); lognormal variance with pedigree 0.468, pedigree (1,5,5,1,5)
  Estimate, based on "limestone production, crushed, for mill" dataset.
- blasting: 3.47453e-5 kg; = 7.73E-05*(ilmenite_output+ magnetite_output); lognormal variance with pedigree 0.468, pedigree (1,5,5,1,5)
  Estimate, based on "limestone production, crushed, for mill" dataset.
- industrial machine, heavy, unspecified: 9.09413e-7, 1.84145e-6 kg (2 entries); lognormal variance with pedigree 0.468, pedigree (1,5,5,1,5)
  Estimate, based on "limestone production, crushed, for mill" dataset.
- petrol, unleaded: 0.00215237, 9.55428e-5, 0.000394857, 9.52324e-5, 0.000356264, 1.96171e-5, 0.0109656 kg (7 entries); lognormal variance with pedigree 0.0518, pedigree (4,3,3,4,4)
  (same comment as for diesel, burned in diesel-electric generating set, 10MW)
  properties: density 0.7197 kg/l, carbon content, fossil 0.865, wet mass 1 kg, heating value, net 43.2 MJ, dry mass 1 kg

## Inputs from nature
- Transformation, to mineral extraction site [natural resource, land]: 1.86358e-5 m2; name transformation_to; = no_of_m2_transformed_per_1kg_mined; lognormal variance with pedigree 0.044, pedigree (3,1,3,1,1)
  Area of Tellnes mine (Norway) and Allard mine (Canada).
- Occupation, mineral extraction site [natural resource, land]: 0.000559075 m2*year; = transformation_to*30; lognormal variance with pedigree 0.044, pedigree (3,1,3,1,1)
  Calculated based on literature values and assumtion. So far there is no mention in the literature thet either allard mine or tellnes mine are being recultivated. It is assumed that the used land is recultivated after 30 years.
- Transformation, from forest, unspecified [natural resource, land]: 1.86358e-5 m2; name transformation_from; = transformation_to; lognormal variance with pedigree 0.044, pedigree (3,1,3,1,1)
  Area of Tellnes mine (Norway) and Allard mine (Canada).
- Water, well, in ground [natural resource, in water]: 1.317e-5 m3; name water_well_in_ground_input; = 2.93E-05*(ilmenite_output+magnetite_output); lognormal variance with pedigree 0.208, pedigree (1,5,5,1,5)
  Estimate, based on "limestone production, crushed, for mill" dataset.
- Iron, in ground [natural resource, in ground]: 0.170332 kg; = (magnetite_output*0.72)*(1/efficiency_of_extraction); lognormal variance with pedigree 0.0427, pedigree (3,2,5,1,1)
  72% Fe in magnetite; 14% Fe in ore; Based on Tellnes mine (58°20', 6°25') in Norway. The iron content of hard-rock ore from this mine is 18% (expressed as FeO) (Korneliussen, 2000, An overview of titanium deposits in Norway). Which means, that the pure iron content is (0.18*0.77=) 14% (based on molecular mass).
- Titanium, in ground [natural resource, in ground]: 0.127749 kg; = (ilmenite_output*0.54)*(1/efficiency_of_extraction); lognormal variance with pedigree 0.0427, pedigree (3,2,5,1,1)
  54% TiO2 in ilmenite; 18% TiO2 in ore; Based on Tellnes mine in Norway (58°20', 6°25'), where ilmenite and magnetite is mined from hard-rock ore (Korneliussen, A., 2000, An overview of titanium deposits in Norway).

## Emissions to nature
- Particulates, > 10 um [air, non-urban air or from high stacks]: 5.42576e-5 kg; = (8.71E-06+0.000112)*(ilmenite_output+magnetite_output); lognormal variance with pedigree 0.208, pedigree (1,5,5,1,5)
  Estimate, based on "limestone quarry operation" and "limestone production, crushed, for mill" datasets.
- Particulates, < 2.5 um [air, non-urban air or from high stacks]: 3.9874e-6 kg; = (8E-06+8.71E-07)*(ilmenite_output+magnetite_output); lognormal variance with pedigree 0.208, pedigree (1,5,5,1,5)
  (same comment as for Particulates, > 10 um)
- Particulates, > 2.5 um, and < 10um [air, non-urban air or from high stacks]: 2.15035e-5 kg; = (7.84E-06+4E-05)*(ilmenite_output+ magnetite_output); lognormal variance with pedigree 0.208, pedigree (1,5,5,1,5)
  (same comment as for Particulates, > 10 um)
- Water [air, unspecified]: 1.97549e-6 m3; name water_to_air_unspecified; = water_well_in_ground_input*fraction_PW_to_air; lognormal variance with pedigree 0.130025, pedigree (4,4,5,2,4)
  Calculated value based on literature values and expert opinion. See comments in the parametres' comment field.
  property fraction, origin: salt water 0; name fraction_origin_salt_water
  property fraction, origin: fresh water 1; name fraction_origin_fresh_water
  property fraction, origin: unspecified 0; name fraction_origin_unspecified
- Water [water, unspecified]: 1.11945e-5 m3; name water_to_water_unspecified; = water_well_in_ground_input*(1-fraction_PW_to_air); lognormal variance with pedigree 0.130025, pedigree (4,4,5,2,4)
  (same comment as for Water)
  property fraction, origin: unspecified 0; name fraction_origin_unspecified_Ww
  property fraction, origin: fresh water 1; name fraction_origin_fresh_water_Ww
  property fraction, origin: salt water 0; name fraction_origin_salt_water_Ww

## Sampling procedure
literature data
