# window frame production, wood, U=1.5 W/m2K

Dataset: EcoSpold 2, unit process
Geography: CA-QC
Time period: 1996-01-01 to 2021-12-31
Technology level: current
Classification: EcoSpold01Categories: building components/windows
Classification: ISIC rev.4 ecoinvent: 1622:Manufacture of builders' carpentry and joinery
Tags: recontextualization
Scenario: Business-as-Usual
System model: Allocation, cut-off by classification
Generated by: Pascal Lesage
Published in: Kellenberger D. 2007
Database: ecoinvent
isCopyrightProtected: true
accessRestrictedTo: 1

## General comment
This dataset describes all the processes and material inputs needed to produce a wooden window frame with 1 m2 visible area. 1 m2 of visible wooden window frame weighs 80.2 kg.
[This dataset was already contained in the ecoinvent database version 2. It was not individually updated during the transfer to ecoinvent version 3. Life Cycle Impact Assessment results may still have changed, as they are affected by changes in the supply chain, i.e. in other datasets. This dataset was generated following the ecoinvent quality guidelines for version 2. It may have been subject to central changes described in the ecoinvent version 3 change report (http://www.ecoinvent.org/database/ecoinvent-version-3/reports-of-changes/), and the results of the central updates were reviewed extensively. The changes added e.g. consistent water flows and other information throughout the database. The documentation of this dataset can be found in the ecoinvent reports of version 2, which are still available via the ecoinvent website. The change report linked above covers all central changes that were made during the conversion process.]

## Included activities end
Included processes are timber sawing, varnishing (primer, solvents, paint), section bar rolling for steel fittings, joining, fitting, all the road transport at different production phases and the disposal of paint remains.

## Geography
Window frames produced and sold in Switzerland and Germany.

Child dataset exchanges identical to GLO dataset. Created to enable linking to regional markets (e.g. for electricity). Data quality indicators adjusted accordingly.

## Technology
The dataset describes highly automated technology processes in window frame manufacturing.

## Parameters
- fraction, water, completely softened, to air: 0.24 dimensionless; lognormal variance with pedigree 0.092025, pedigree (4,4,3,2,4)
- Quebec gross domestic product 2011: 3.11e11 USD(2011); name quebecGDP2011; lognormal variance with pedigree 0.0006, pedigree (1,1,1,1,1)
  Quebec Gross domestic product for 2011, expressed in 2011 USD. Source: Institut de la statistique du Québec. Converted from CAD to USD using a yearly average exchange rate of 0.989 CAD/USD (Source: bank of Canada).
- world gross domestic product 2011: 7e13 USD(2011); name worldGDP2011; lognormal variance with pedigree 0.0006, pedigree (1,1,1,1,1)
  World Gross domestic product for 2011, expressed in 2011 USD. Source: World Bank.
- fraction, process water, to air: 0.24 dimensionless; lognormal variance with pedigree 0.092025, pedigree (4,4,3,2,4)

## Reference product
- window frame, wood, U=1.5 W/m2K: 0 m2; name window_frame; By-product classification allocatable product; CPC 31600: Builders' joinery and carpentry of wood (including cellular wood panels, assembled parquet panels, shingles an[…]
  production volume 0.0177714 m2; name window_frame_PV
    Gross approximation of Quebec production volume using relative value of Quebec GDP to world GDP
  property price 236 EUR2005
    Calculated based on literature values. The price of 1 kg of wooden window frame is calculated to be 2.93 euro/kg. This price is calculated as a weighted average of prices calculated based on import (net trade) of this material from the world into 5 big economies; EU, Japan, China, India, USA. The net weight and the trade value is obtained from the UN Comtrade database (commodity no. 441810 Windows, French-windows, frames, of wood), year 2005. The weight of the window is 80.2kg/m2 based on the description of the dataset.
  property carbon content, fossil 0.0315533
    Calculated as an addition of C content in the product, then referred to 1 kg DM.
  property heating value, net 1073.43 MJ
    Assumed equal to a regular wood product i.e. "sawnwood, softwood, dried (u=10%), planed".
  property carbon content 0.647464
    carbon content on a dry matter basis (reserved; not for manual entry)
  property true value 236; name window_frame_true_value
    allocation property applied in "true value" allocation // value calculated from revenue
  properties: carbon content, non-fossil 0.615911, water in wet mass 4.01 kg, dry mass 76.19 kg, water content 0.0526316, wet mass 80.2 kg, carbon allocation 49.3303 kg
- wood pellet, measured as dry mass: 1 kg; name wood_pellet; CPC 39281: Wood pellets; By-product classification allocatable product; pedigree (1,1,1,1,1)
  Calculated Value. Since the fuel for the furnace is included in the input, the corresponding amount inventoried with the energy module is subtracted.
  production volume 0.0512883 kg; = window_frame_PV*(wood_pellet/window_frame)
    Calculated from production volume of reference product using the relative outputs.
  property price 0.0901 EUR2005
    Calculated value. The price of wood chips which are used for wood pellet production is 48.76 Euro/m3 (FAOSTAT database; http://faostat.fao.org/site/626/DesktopDefault.aspx?PageID=626#ancor). The density of the wood pellet is 650 kg/m3. It is estimated that processing the wood chips into a pellets will add 20% to the value of the pellets.
  property heating value, net 13.38 MJ
    LHV is calculated based on the Carbon content of the product. More details can be found on the respective documentation.
  property carbon content 0.494
    carbon content on a dry matter basis (reserved; not for manual entry)
  property true value 0.260029; name wood_pellet_true_value
    allocation property applied in "true value" allocation // value calculated from revenue
  properties: carbon content, fossil 0, dry mass 1 kg, water content 0.1, wet mass 1.1 kg, water in wet mass 0.1 kg, carbon content, non-fossil 0.494, carbon allocation 0.494 kg

## Inputs from technosphere
- aluminium, wrought alloy: 0.00116696 kg; lognormal variance with pedigree 0.0526, pedigree (1,3,5,5,1)
  properties: dry mass 1 kg, wet mass 1 kg
- steel, low-alloyed, hot rolled: 0.00197544 kg; lognormal variance with pedigree 0.052, pedigree (1,1,5,5,1)
  composite
  properties: wet mass 1 kg, carbon content, fossil 0.005, dry mass 1 kg
  note on carbon content, fossil: Low alloyed steel composition given in Tab. 3.2 ecoinvent v2.2 report 10_partII. Steel assumed to have a C content of 0.5%
- toluene, liquid: 1.18603e-5 kg; lognormal variance with pedigree 0.052, pedigree (1,1,5,5,1)
  composite
  properties: heating value, net 38.17 MJ, carbon content, fossil 0.913043, wet mass 1 kg, dry mass 1 kg
- alkyd resin, long oil, without solvent, in 70% white spirit solution state: 9.30517e-6 kg; lognormal variance with pedigree 0.0526, pedigree (1,3,5,5,1)
  properties: dry mass 1 kg, heating value, net 20.65 MJ, carbon content, non-fossil 0.412906, carbon content, fossil 0.268755, wet mass 1 kg
  note on carbon content, non-fossil: C content was calculated as an addition of C content in the raw materials.
- polyethylene, low density, granulate: 8.88568e-6 kg; lognormal variance with pedigree 0.0526, pedigree (1,3,5,5,1)
  properties: heating value, net 42.47 MJ, carbon content, fossil 0.857143, wet mass 1 kg, dry mass 1 kg
  note on carbon content, fossil: Polyethylene is formed out of a huge amount of ethylene monomers (C2H4) (ecoinvent v2.2 report 11_II). MW=28 g/mol
- nylon 6-6, glass-filled: 0.000133094 kg; lognormal variance with pedigree 0.0526, pedigree (1,3,5,5,1)
  properties: heating value, net 30.9 MJ, carbon content, fossil 0.446018, wet mass 1 kg, dry mass 1 kg
  note on heating value, net: Assumed equal to Nylon-66. Reference: Walters, R. N., Hackett, S. M. and Lyon, R. E. (2000) ‘Heats of combustion of high temperature polymers’, Fire and Materials, 24(5), pp. 245–252. doi: 10.1002/1099-1018(200009/10)24:5<245::AID-FAM744>3.0.CO;2-7.
  note on carbon content, fossil: Nylon 66 is derived from hexamethylene diamine and adipic acid and has the following structure: -(HN-(CH2)6-NH-CO-(CH2)4-CO)n- (ecoinvent v2.2 report 11_II), C12H22N2O2. MW=226 g/mol. Here Nylon 66 is - mainly for improved stiffness and stability - modified with glass fibres. The glass fibre content in the product is assumed of 30%. (ecoinvent v2.2 report 11_II)
- benzimidazole-compound: 1.51018e-6 kg; lognormal variance with pedigree 0.0526, pedigree (1,3,5,5,1)
  properties: wet mass 1 kg, dry mass 1 kg, carbon content, fossil 0.529668
  note on carbon content, fossil: C content estimated as an average of that of the pesticides Carbendazim, prochloraz and ethofumesate (Sutter 2010)
- zinc coat, pieces: 0.00018801 m2; lognormal variance with pedigree 0.052, pedigree (1,1,5,5,1)
  composite
- waste paint: -0.000109069 kg; name waste_paint; lognormal variance with pedigree 0.052, pedigree (1,1,5,5,1)
  composite
  production volume 0.00508263 kg; = window_frame_PV*(waste_paint/window_frame)
    Calculated from the production volume of window frame, wood, U=1.5 W/m2K in proportion to the respective output amounts.
  properties: dry mass 1 kg, carbon content, fossil 0.65, wet mass 1 kg, heating value, net 19.7 MJ
  note on carbon content, fossil: Tab A.5, ecoinvent v2.2 report 13_I. C content has been calculated after data in the tables, and then referred to 1 kg DM
- sawnwood, softwood, dried (u=10%), planed: 8.04668e-5 m3; lognormal variance with pedigree 0.0526, pedigree (1,3,5,5,1)
  properties: carbon content, non-fossil 0.494, water content 0.1, dry mass 450 kg, wet mass 495 kg, heating value, net 6625.26 MJ
  note on carbon content, non-fossil: C content of dry mass is 0.494 kgC/kg dry wood (ecoinvent v2.2 report 9)
- zinc: 0.000110594 kg; lognormal variance with pedigree 0.0526, pedigree (1,3,5,5,1)
  properties: wet mass 1 kg, dry mass 1 kg
- acetone, liquid: 6.59752e-6 kg; lognormal variance with pedigree 0.052, pedigree (1,1,5,5,1)
  composite
  properties: dry mass 1 kg, wet mass 1 kg, heating value, net 31.32 MJ, carbon content, fossil 0.62069
- propylene glycol, liquid: 9.07636e-8 kg; lognormal variance with pedigree 0.0526, pedigree (1,3,5,5,1)
  properties: carbon content, fossil 0.473684, wet mass 1 kg, dry mass 1 kg, heating value, net 27.09 MJ
- heat, central or small-scale, other than natural gas: 0.0175044 MJ; lognormal variance with pedigree 0.0526, pedigree (1,3,5,5,1)
  properties: heating value, net 1 MJ
- section bar rolling, steel: 0.00197544 kg; lognormal variance with pedigree 0.052, pedigree (1,1,5,5,1)
  composite
- synthetic rubber: 0.00043475 kg; lognormal variance with pedigree 0.0526, pedigree (1,3,5,5,1)
  properties: dry mass 1 kg, carbon content, fossil 0.871949, wet mass 1 kg, heating value, net 26.42 MJ
  note on carbon content, fossil: EPDM (Ethylene-propene-diene terpolymer) rubber is a terpolymer of ethylene, propene, and a diene with the residual unsaturated portion of the diene in the side chain (ecoinvent v2.2 report 7-part XX & Ullmann). Chemical formula (deduced from Evidences of Solvent-Induced Miscibility in Polychloroprene-co-Ethylene-Propene Diene Terpolymer Blends, Dubey et al., Journal of Applied Polymer Science, 2009, 111:1884-1891): C20H35
- white spirit: 2.66952e-6 kg; lognormal variance with pedigree 0.0526, pedigree (1,3,5,5,1)
  properties: wet mass 1 kg, dry mass 1 kg, carbon content, fossil 0.863404, heating value, net 45 MJ
  note on carbon content, fossil: The most common variety of white spirit is a mixture of saturated aliphatic and alicyclic C7-C12 hydrocarbons with a content of 15-20% (by weight) of aromatic C7-C12 hydrocarbons (ecoinvent v2.2 report 8-part 94). The average composition was assumed as being 82.5% C9.5 saturated aliphatic and alicyclic hydrocarbons (average formula C9.5H20), and 17.5% C9.5 aromatic hydrocarbons (average formula C9.5H9.5).
- melamine formaldehyde resin: 2.79536e-5 kg; lognormal variance with pedigree 0.0526, pedigree (1,3,5,5,1)
  properties: wet mass 1 kg, dry mass 1 kg, carbon content, fossil 0.311708, heating value, net 9.44 MJ
  note on carbon content, fossil: Chemical formula of the melamine formaldehide monomer was assumed to be C4H6N6O
- electricity, medium voltage: 0.0220044 kWh; lognormal variance with pedigree 0.052, pedigree (1,1,5,5,1)
  composite
- polyvinylchloride, emulsion polymerised: 6.62107e-6 kg; lognormal variance with pedigree 0.0526, pedigree (1,3,5,5,1)
  properties: carbon content, fossil 0.387097, dry mass 1 kg, wet mass 1 kg, heating value, net 21.5 MJ
  note on carbon content, fossil: Monomer is vynyl chloride, C2H3Cl (ecoinvent v2.2 report 11_II). MW=62 g/mol
- alkyd paint, white, without water, in 60% solution state: 0.00209366 kg; lognormal variance with pedigree 0.0526, pedigree (1,3,5,5,1)
  properties: wet mass 1 kg, heating value, net 17.46 MJ, dry mass 1 kg, carbon content, non-fossil 0.161654, carbon content, fossil 0.414587
- aluminium, cast alloy: 5.94921e-6 kg; lognormal variance with pedigree 0.0526, pedigree (1,3,5,5,1)
  properties: wet mass 1 kg, dry mass 1 kg
- water, completely softened: 0.000143773 kg; lognormal variance with pedigree 0.0526, pedigree (1,3,5,5,1)
  properties: wet mass 1 kg
- anodising, aluminium sheet: 0.000308901 m2; lognormal variance with pedigree 0.0526, pedigree (1,3,5,5,1)
  activityLink introduced to establish a direct link to the corresponding regional supply of this product
- metal working factory: 1.39959e-11 unit; lognormal variance with pedigree 0.3546, pedigree (2,4,5,5,1)
- titanium dioxide: 2.26909e-7 kg; lognormal variance with pedigree 0.0526, pedigree (1,3,5,5,1)
  properties: dry mass 1 kg, wet mass 1 kg
- sawnwood, hardwood, dried (u=10%), planed: 6.52125e-7 m3; lognormal variance with pedigree 0.0526, pedigree (1,3,5,5,1)
  properties: water content 0.1, dry mass 650 kg, heating value, net 9569.82 MJ, wet mass 715 kg, carbon content, non-fossil 0.494
- polypropylene, granulate: 8.88568e-6 kg; lognormal variance with pedigree 0.0526, pedigree (1,3,5,5,1)
  properties: carbon content, fossil 0.857143, wet mass 1 kg, dry mass 1 kg, heating value, net 32.78 MJ
  note on carbon content, fossil: Polypropylene is formed by the polymerisation of propylene, C3H6 (ecoinvent v2.2 report 11_II)
  note on heating value, net: Value extracted from "treatment of waste polypropylene, open burning"
- copper, cathode: 2.37587e-6 kg; lognormal variance with pedigree 0.0526, pedigree (1,3,5,5,1)
  properties: wet mass 1 kg, dry mass 1 kg
- polyvinylchloride, suspension polymerised: 4.52438e-5 kg; lognormal variance with pedigree 0.0526, pedigree (1,3,5,5,1)
  properties: dry mass 1 kg, carbon content, fossil 0.387097, wet mass 1 kg, heating value, net 21.5 MJ
- methyl ethyl ketone: 9.07636e-8 kg; lognormal variance with pedigree 0.0526, pedigree (1,3,5,5,1)
  properties: carbon content, fossil 0.666667, dry mass 1 kg, wet mass 1 kg, heating value, net 33.63 MJ
- 1-butanol: 7.51278e-6 kg; lognormal variance with pedigree 0.052, pedigree (1,1,5,5,1)
  composite
  properties: carbon content, fossil 0.648649, wet mass 1 kg, dry mass 1 kg, heating value, net 35.99 MJ
- isopropanol: 1.81527e-7 kg; lognormal variance with pedigree 0.0526, pedigree (1,3,5,5,1)
  properties: wet mass 1 kg, heating value, net 34.3 MJ, carbon content, fossil 0.6, dry mass 1 kg
- section bar extrusion, aluminium: 0.00116696 kg; lognormal variance with pedigree 0.0526, pedigree (1,3,5,5,1)

## Inputs from nature
- Carbon dioxide, non-fossil, resource correction [natural resource, in air]: 1.74372 kg; pedigree (1,1,1,1,1)
  This exchange has been added after economic allocation in order to re-balance the non-fossil carbon dioxide resource extraction.

## Emissions to nature
- Water [water, unspecified]: 1.09267e-7 m3; lognormal variance with pedigree 0.0827, pedigree (2,2,5,5,1)
  Calculated value based on literature values and expert opinion. See comments in the parametres" comment field.
  property carbon content, non-fossil 0; name C_content_non_fossil
  property dry mass 0 kg; name DM
  property carbon content, fossil 0; name C_content_fossil
  property water in wet mass 1000 kg; name WWM
  property wet mass 1000 kg; name WM
- Water [air, unspecified]: 3.45054e-8 m3; lognormal variance with pedigree 0.0827, pedigree (2,2,5,5,1)
  (same comment as for Water)

## Sampling procedure
Company documentation, measurements
