# polyvinylfluoride production

Dataset: EcoSpold 2, unit process
Geography: US
Time period: 2005-01-01 to 2021-12-31
Technology level: current
Classification: EcoSpold01Categories: chemicals/organics
Classification: ISIC rev.4 ecoinvent: 2013:Manufacture of plastics and synthetic rubber in primary forms
Tags: ConvertedDataset
Scenario: Business-as-Usual
System model: Allocation, cut-off by classification
Share of production covered: 50 %
Generated by: Niels Jungbluth
Published in: Jungbluth, N. 2007
Database: ecoinvent
isCopyrightProtected: true
accessRestrictedTo: 1

## General comment
Basic inventory based on cumulative data.
[This dataset was already contained in the ecoinvent database version 2. It was not individually updated during the transfer to ecoinvent version 3. Life Cycle Impact Assessment results may still have changed, as they are affected by changes in the supply chain, i.e. in other datasets. This dataset was generated following the ecoinvent quality guidelines for version 2. It may have been subject to central changes described in the ecoinvent version 3 change report (http://www.ecoinvent.org/database/ecoinvent-version-3/reports-of-changes/), and the results of the central updates were reviewed extensively. The changes added e.g. consistent water flows and other information throughout the database. The documentation of this dataset can be found in the ecoinvent reports of version 2, which are still available via the ecoinvent website. The change report linked above covers all central changes that were made during the conversion process.]

## Included activities end
Pre-products, energy use, infrastructure, some air emissions and transports. No full information on all air and water emissions available.

## Geography
Production plant of DuPont in the United States.

## Technology
Fluoropolymer chemistry.

## Time period
Time of publications.

## Reference product
- polyvinylfluoride: 1 kg; By-product classification allocatable product; CPC 34730: Polymers of vinyl chloride or other halogenated olefins, in primary forms; CAS 24981-14-4
  EcoSpold01Location=US
  production volume 675000 kg
    Not known
    It can be inferred from the SRI report Fluoropolymers (http://www.sriconsulting.com/CEH/Public/Reports/580.0700/. Accessed 2011.05.05) that polyvinylfluorides account for approx 0.9% of total fluoropolymers. Total U.S. production of fluoropolymers in 2005 was assumed to be equal to the demand: 75'000'000 kg (inferred from Long-Chain Perfluorinated Chemicals (PFCs), Action Plan, U.S. Environmental Protection Agency, 2009. Accessed in http://www.epa.gov/oppt/existingchemicals/pubs/pfcs_action_plan1230_09.pdf the 2011.05.06).
  property price 3.73189 EUR2005
    Calculated based on inputs: The price of the product has been calculated as a sum of the values of the material and energy inputs for this product. This value is therefore a rough estimation. It may underestimate the real price since there are additional expenses when producing any product. These expences can include for example labour costs, treatment of waste materials and profit for the producer. Please consider carefully whether this level of data quality is acceptable for your application.
  property heating value, net 23.7 MJ
    LHV is calculated based on the elemental composition of the substance. Based on the name of the substance, the chemical formula of the substance is assumed to be: C2H3F
  property carbon content 0.521739
    carbon content on a dry matter basis (reserved; not for manual entry)
  properties: wet mass 1 kg, carbon content, fossil 0.521739, water in wet mass 0 kg, dry mass 1 kg, water content 0, carbon content, non-fossil 0, carbon allocation 0.521739 kg

## Inputs from technosphere
- chemical factory, organics: 4e-10 unit; lognormal variance with pedigree 0.4206, pedigree (5,3,5,1,1)
  Rough estimation based on cumulative data, Krieger et al. 2006
  EcoSpold01Location=RER
  Uncertainty: Rough estimation based on cumulative data, Krieger et al. 2006
- vinyl fluoride: 1.0526 kg; lognormal variance with pedigree 0.1206, pedigree (5,3,5,1,1)
  Rough estimation based on cumulative data (Krieger et al., 2006). Based on the production process description (page 140 in Jungbluth et al., 2009), the vinyl fluoride is assumed to be produced on the same site.
  References:
  Krieger T. and Roekens-Guibert H. (2006) Environmental impacts of Tedlar(R) PVF film for use in photovoltaic modules. In proceedings from: 21th European Photovoltaic Solar Energy Conference, Dresden, DE, 4-8.9.2006, retrieved from:
  http://www2.dupont.com/Photovoltaics/en_US/news_events/event20060904.html.
  Jungbluth N., Stucki M, and Frischknecht R. (2009) Photovoltaics. In Dones, R. (Ed.) et al., Sachbilanzen von Energiesystemen: Grundlagen für den ökologischen Vergleich von Energiesystemen und den Einbezug von Energiesystemen in Ökobilanzen für die Schweiz. ecoinvent report No. 6-XII, Swiss Centre for Life Cycle Inventories, Dübendorf, CH, 2009.
  EcoSpold01Location=US
  Uncertainty: Rough estimation based on cumulative data, Krieger et al. 2006
  properties: heating value, net 23.7 MJ, carbon content, fossil 0.521739, dry mass 1 kg, wet mass 1 kg
- heat, district or industrial, natural gas: 48.8747 MJ; lognormal variance with pedigree 0.1206, pedigree (5,3,5,1,1)
  EcoSpold01Location=RER
  Rough estimation based on cumulative data, Krieger et al. 2006
  Uncertainty: Rough estimation based on cumulative data, Krieger et al. 2006
  properties: heating value, net 1 MJ
- electricity, medium voltage: 4.7636 kWh; lognormal variance with pedigree 0.1206, pedigree (5,3,5,1,1)
  EcoSpold01Location=US
  Rough estimation based on cumulative data, Krieger et al. 2006
  Uncertainty: Rough estimation based on cumulative data, Krieger et al. 2006

## Sampling procedure
Publication of cumulative data.

## Extrapolations
This dataset has been extrapolated from year 2006 to the year of the calculation (2021). The uncertainty has been adjusted accordingly.

## Review by Roberto Dones 2007-09-13
Passed.
none
