# treatment of leach residue from copper production, neutralisation

Dataset: EcoSpold 2, unit process
Geography: GLO
Time period: 2009-01-01 to 2021-12-31
Technology level: current
Classification: ISIC rev.4 ecoinvent: 2420:Manufacture of basic precious and other non-ferrous metals
Synonyms: leaching; agitation; neutralization
Scenario: Business-as-Usual
System model: Allocation, cut-off by classification
Generated by: Avraam Symeonidis
Database: ecoinvent
isCopyrightProtected: true
accessRestrictedTo: 1

## General comment
The dataset represents the neutralisation of residues from the leaching and solvent extraction of milled copper-cobalt ores (Nisbett et al. 2009).
References:
Nisbett, A., Baxter, K., Marte, K., & Urbani, M. (2009). Flowsheet considerations for copper cobalt projects. Journal of the Southern African Institute of Mining and Metallurgy, 109(11), 641–646.

## Included activities start
Activity starts with the reception of the waste.

## Included activities end
Activity ends with neutralised wastes ready for disposal or further treatment.

## Geography
Data are representative of conditions in Zambia and the Democratic Republic of Congo, which are used to represent typical global conditions.

## Technology
Activity based on the metallurgical flowsheet from the Tailings Leach Plant at Nchanga, Zambia. The plant accepts milled copper-cobalt ore solids, which are leached on site. Raffinate is treated through a two-stage solvent exchange process. Residues from the leaching and solvent exchange processes are treated through neutralisation, which is the step represented in this dataset.
Activity based on the metallurgical flowsheet from the Tailings Leach Plant at Nchanga, Zambia. The plant accepts milled copper-cobalt ore solids, which are leached on site. Raffinate is treated through a two-stage solvent exchange process. Residues from the leaching and solvent exchange processes are treated through neutralisation, which is the step represented in this dataset.

## Time period
Time period estimated based on year of publication.

## Reference product
- leach residue from copper production: -1 kg; name RP; By-product classification Waste; CPC 39361: Waste and scrap of copper
  production volume 5.24975e8 kg; name PV_RP; = 113000000*4.64579588
    4.64579588 of leach residue are produced per kg of cobalt concentrate. This value is calculated based on the PV of the cobalt production dataset.
  property price 0 EUR2005; name RP_price_EUR2005
    Waste products are assigned a price of zero as they are assumed to require further treatment.
  property concentration, copper 0.00067 kg/kg
    Nisbett, A., Baxter, K., Marte, K., & Urbani, M. (2009). Flowsheet considerations for copper cobalt projects. Journal of the Southern African Institute of Mining and Metallurgy, 109(11), 641-646.
  property carbon content 0
    carbon content on a dry matter basis (reserved; not for manual entry)
  properties: water in wet mass 0.37 kg, wet mass 1 kg, carbon content, fossil 0, water content 0.587302, carbon content, non-fossil 0, dry mass 0.63 kg, carbon allocation 0 kg

## Inputs from technosphere
- limestone, crushed, washed: 0 kg; pedigree (1,1,1,1,1)
  The amount of limestone added for neutralisation was calculated from data reported in Nisbett et al. (2009), who present a flowsheet for a conventional copper and cobalt hydrometallurgical process.
  properties: carbon content, fossil 0.117257, wet mass 1 kg, water content 0.00200401, dry mass 0.998 kg
  note on carbon content, fossil: Table 3.1, ecoinvent v2.2 report 7, part VII, pg 3. MW CaCO3=100, MW MgCO3=84. C content of limestone is 0.117257 kg/kg DM
- sulfidic tailings, from copper mine operation: 0 kg; name BP; pedigree (1,1,1,1,1)
  After neutralisation, wastes are generally considered as hazardous and are disposed of in impoundments or in underground deposits. Here, neutralisation wastes are approximated with sulfidic tailings, from copper mine operation. The amount was calculated through mass balance.
  production volume 0 kg
    Calculated from production volume of reference product using the relative outputs.
  property price 0 EUR2005; name BP_price_EUR2005
  properties: magnesium content 0.0022944, iron content 0.014771, sodium content 0.0015148, wet mass 1 kg, water content 0.42857, oxygen content 0.88899, potassium content 0.0026178, dry mass 0.7 kg, silicon content 0.055278, aluminium content 0.015758, carbon content, fossil 0.0087785, calcium content 0.0045119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
- limestone, crushed, washed: 0.000380452, 0.0446195 kg (2 entries); lognormal variance with pedigree 0.0512, pedigree (3,4,5,4,2)
  (same comment as for limestone, crushed, washed)
- sulfidic tailings, from copper mine operation: -0.115727, -0.112705, -0.0322568, -0.0643409, -0.0483636, -0.275932, -0.0396841, -0.0548409, -0.0380864, -0.0505227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 kg (11 entries); lognormal variance with pedigree 0.0512, pedigree (3,4,5,4,2)
  (same comment as for sulfidic tailings, from copper mine operation)
  production volume 5.48599e8 kg

## Sampling procedure
Measured data.

## Extrapolations
This dataset has been extrapolated from year 2009 to the year of the calculation (2021). The uncertainty has been adjusted accordingly.
