# MOX fuel element production, for light water reactor

Dataset: EcoSpold 2, unit process
Geography: UCTE
Time period: 1980-01-01 to 2021-12-31
Technology level: current
Classification: EcoSpold01Categories: nuclear power/production
Classification: ISIC rev.4 ecoinvent: 2011:Manufacture of basic chemicals
Tags: ConvertedDataset
Scenario: Business-as-Usual
System model: Allocation, cut-off by classification
Generated by: Roberto Dones
Published in: Dones, R. 2007
Database: ecoinvent
isCopyrightProtected: true
accessRestrictedTo: 1

## General comment
The data should be considered as an approximation, because they describe the operation of a UO2 fuel fabrication plant, for lack of specific information. Only radioactive emissions to air and water have been taken from the few data avalable on the Hanau plant (closed). The MOX fuel is made of plutonium from reprocessed spent fuel and depleted uranium from enrichment of fresh uranium. The environmental burdens from reprocessing are in this study entirely allocated to the spent fuel, the burdens from enrichment entirely allocated to the enriched uranium. Hence, the MOX fuel is neither directly charged of reprocessing nor of enrichment, but the fuel chain consistently takes into account the total emissions form these two steps.
[This dataset was already contained in the ecoinvent database version 2. It was not individually updated during the transfer to ecoinvent version 3. Life Cycle Impact Assessment results may still have changed, as they are affected by changes in the supply chain, i.e. in other datasets. This dataset was generated following the ecoinvent quality guidelines for version 2. It may have been subject to central changes described in the ecoinvent version 3 change report (http://www.ecoinvent.org/database/ecoinvent-version-3/reports-of-changes/), and the results of the central updates were reviewed extensively. The changes added e.g. consistent water flows and other information throughout the database. The documentation of this dataset can be found in the ecoinvent reports of version 2, which are still available via the ecoinvent website. The change report linked above covers all central changes that were made during the conversion process.]

## Included activities end
The module uses the same data set of a UO2 fuel fabrication plant.

## Geography
North American and European conditions

## Technology
No explicit information on operation of current MOX facilities; data reflect UO2 fuel fabrication plants operating in the 1980s.

## Parameters
- fraction, water, decarbonised, to air: 0.3875 dimensionless; name fraction_WDC_to_air; = fraction_CW_to_air; lognormal variance with pedigree 0.092025, pedigree (4,4,3,2,4)
  Calculated value. See comments in the other parametres present in this dataset. Decarbonised water is considered to be always used as cooling water, thus cooling water fractions to air are applied to all carbonised water input flows to calculate the amount of water consumed in the processes.
- fraction, cooling water, once-through system, to air: 0.004 dimensionless; name fraction_CW_OT_to_air; lognormal variance with pedigree 0.0413, pedigree (2,3,1,3,1)
  Calculated based on literature value (Scown, C.D., 2011, Water Footprint of U.S. Transportation Fuels and supplying information of the article) (Vionnet, S., Quantis Water Database - Technical Report, 2012).
- fraction, cooling water, to air: 0.3875 dimensionless; name fraction_CW_to_air; = (0.5*fraction_CW_OT_to_air)+(0.5*fraction_CW_R_to_air); lognormal variance with pedigree 0.092025, pedigree (4,4,3,2,4)
  Calculated value based on literature value (see comments of the other parametres present in this dataset) and expert opinion. In the case when no industry/literature data are available about the type of cooling or directly fraction, cooling water, to air specific for the process a default assumption is applied. It is assumed that the once-through cooling system is used in 50% of all cases and recirculating system is used in another 50% of all cases.
- fraction, cooling water, cooling pond system, to air: 0.032 dimensionless; name fraction_CW_CP_to_air; lognormal variance with pedigree 0.0413, pedigree (2,3,1,3,1)
  (same comment as for fraction, cooling water, once-through system, to air)
- fraction, cooling water, recirculating system, to air: 0.771 dimensionless; name fraction_CW_R_to_air; lognormal variance with pedigree 0.0413, pedigree (2,3,1,3,1)
  (same comment as for fraction, cooling water, once-through system, to air)

## Reference product
- MOX fuel element, for light water reactor: 1 kg; CPC 33710: Fuel elements (cartridges), non-irradiated, for nuclear reactors; By-product classification allocatable product
  EcoSpold01Location=UCTE
  production volume 1.00616 kg
    This is a placeholder value that does not reflect real-world production volumes. This dataset does not currently require a real-world production volume to work in the database framework, and no actual data were collected yet. This has no negative effect on the results of the ecoinvent database. The placeholder value of this activity was scaled according to the nominal GDP of 2005 (source: United Nations, http://data.un.org/Glossary.aspx?q=GDP+%28current+US%24%29, accessed 20130726) to reflect an appropriate share of the global production volume, which is also a placeholder value.
  property price 37.3 EUR2005
    UNdata (Average data for EU27) Source:http://data.un.org/Data.aspx?q=Natural+uranium%2c+its+compounds%2c+mixtures&d=ComTrade&f=_l1Code%3a29%3bcmdCode%3a284410
  property carbon content 0
    carbon content on a dry matter basis (reserved; not for manual entry)
  properties: dry mass 1 kg, water in wet mass 0 kg, carbon content, fossil 0, wet mass 1 kg, water content 0, carbon content, non-fossil 0, carbon allocation 0 kg

## Inputs from technosphere
- cement, unspecified: 0.0065 kg; lognormal variance with pedigree 0.16, pedigree (1,1,5,1,1)
  own assumption
  EcoSpold01Location=CH
  properties: dry mass 1 kg, wet mass 1 kg
- nuclear fuel factory: 3.7e-8 unit; lognormal variance with pedigree 0.08, pedigree (1,1,5,1,1)
  own estimation
  EcoSpold01Location=GLO
- water, decarbonised: 0 kg; name water_decarbonised_input; pedigree (1,1,1,1,1)
  old reference
  EcoSpold01Location=RER
  properties: wet mass 1 kg
- wastewater, unpolluted: -0.135 m3; lognormal variance with pedigree 0.16, pedigree (1,1,5,1,1)
  old reference
  EcoSpold01Location=CH
  production volume 0.135 m3
    Calculated from the production volume of MOX fuel element, for light water reactor in proportion to the respective output amounts.
  properties: carbon content, fossil 0.00178991, carbon content, non-fossil 0.00178991, wet mass 1000 kg, water content 2962.17, dry mass 0.337476 kg
  note on carbon content, fossil: Assumed to be like in tap water. Bicarbonate content is 2.93 mol/m3. CO2 content is 0.1 mol/m3 (ecoinvent v2.2 report 8, Tab 93.1).
- electricity, medium voltage: 36 kWh; lognormal variance with pedigree 0.16, pedigree (1,1,5,1,1)
  old reference & own assumption
  EcoSpold01Location=UCTE
- low level radioactive waste: -0.000333 m3; lognormal variance with pedigree 0.34, pedigree (1,1,5,1,1)
  EcoSpold01Location=CH
  own assumption
  production volume 0.000333 m3
    (same comment as for wastewater, unpolluted)
  properties: dry mass 2500 kg, wet mass 2500 kg
- chromium: 0.6 kg; lognormal variance with pedigree 0.04, pedigree (1,1,5,1,1)
  estimation on number, not on module substituting Zr
  EcoSpold01Location=RER
  properties: wet mass 1 kg, dry mass 1 kg
- heat, district or industrial, other than natural gas: 30.4 MJ; lognormal variance with pedigree 0.16, pedigree (1,1,5,1,1)
  old reference & own assumption
  EcoSpold01Location=CH
  properties: heating value, net 1 MJ
- inert waste, for final disposal: -0.8 kg; lognormal variance with pedigree 0.04, pedigree (1,1,5,1,1)
  own assumption
  EcoSpold01Location=CH
  production volume 0.8 kg
    (same comment as for wastewater, unpolluted)
  properties: water content 0.00502513, wet mass 1 kg, dry mass 0.995 kg
- water, decarbonised: 160.848, 32.4262, 106.624, 0.102134 kg (4 entries); lognormal variance with pedigree 0.16, pedigree (1,1,5,1,1)
  old reference
  EcoSpold01Location=RER

## Emissions to nature
- Water [water, unspecified]: 0.04875 m3; name water_to_water_unspecified; = (water_decarbonised_input/1000)*(1-fraction_WDC_to_air)-0.135; lognormal variance with pedigree 0.0807, pedigree (2,2,5,1,1)
  Calculated value based on literature values and expert opinion. See comments in the parametres' comment field.
  property fraction, origin: fresh water 1; name fraction_origin_fresh_water_Ww
  property fraction, origin: salt water 0; name fraction_origin_salt_water_Ww
  property fraction, origin: unspecified 0; name fraction_origin_unspecified_Ww
  property carbon content, non-fossil 0; name C_content_non_fossil
  property carbon content, fossil 0; name C_content_fossil
  property wet mass 1000 kg; name WM
  property water in wet mass 1000 kg; name WWM
  property dry mass 0 kg; name DM
- Phosphorus [water, surface water]: 0.000217 kg; lognormal variance with pedigree 0.16, pedigree (1,1,5,1,1)
  old reference
- Water [air, unspecified]: 0.11625 m3; name water_to_air_unspecified; = (water_decarbonised_input/1000*fraction_WDC_to_air); lognormal variance with pedigree 0.0807, pedigree (2,2,5,1,1)
  (same comment as for Water)
  property fraction, origin: fresh water 1; name fraction_origin_fresh_water
  property fraction, origin: salt water 0; name fraction_origin_salt_water
  property fraction, origin: unspecified 0; name fraction_origin_unspecified
- Silver, ion [water, surface water]: 2.17e-5 kg; lognormal variance with pedigree 0.16, pedigree (1,1,5,1,1)
  old reference
- Chloride [water, surface water]: 0.00703 kg; lognormal variance with pedigree 0.16, pedigree (1,1,5,1,1)
  old reference
- Magnesium [water, surface water]: 0.000402 kg; lognormal variance with pedigree 0.16, pedigree (1,1,5,1,1)
  old reference
- Boron [water, surface water]: 6.39e-5 kg; lognormal variance with pedigree 0.16, pedigree (1,1,5,1,1)
  old reference
- Molybdenum [water, surface water]: 2.75e-5 kg; lognormal variance with pedigree 0.16, pedigree (1,1,5,1,1)
  old reference
- Sulfate [water, surface water]: 0.0121 kg; lognormal variance with pedigree 0.16, pedigree (1,1,5,1,1)
  old reference
- Sodium, ion [water, surface water]: 0.00894 kg; lognormal variance with pedigree 0.16, pedigree (1,1,5,1,1)
  old reference
- Nickel, ion [water, surface water]: 0.000147 kg; lognormal variance with pedigree 0.16, pedigree (1,1,5,1,1)
  old reference
- Sulfite [water, surface water]: 0.000185 kg; lognormal variance with pedigree 0.16, pedigree (1,1,5,1,1)
  old reference
- Actinides, radioactive, unspecified [air, non-urban air or from high stacks]: 0.0016 kBq; lognormal variance with pedigree 0.34, pedigree (1,1,5,1,1)
  very few recent data
- BOD5, Biological Oxygen Demand [water, surface water]: 0.00313 kg; lognormal variance with pedigree 0.16, pedigree (1,1,5,1,1)
  old reference
- COD, Chemical Oxygen Demand [water, surface water]: 0.0166 kg; lognormal variance with pedigree 0.16, pedigree (1,1,5,1,1)
  old reference
- Oils, unspecified [water, surface water]: 0.00128 kg; lognormal variance with pedigree 0.16, pedigree (1,1,5,1,1)
  old reference
- Suspended solids, unspecified [water, surface water]: 0.0023 kg; lognormal variance with pedigree 0.16, pedigree (1,1,5,1,1)
  old reference
- Calcium, ion [water, surface water]: 0.083 kg; lognormal variance with pedigree 0.16, pedigree (1,1,5,1,1)
  old reference
- TOC, Total Organic Carbon [water, surface water]: 0.00614815 kg; lognormal variance with pedigree 0.16, pedigree (1,1,5,1,1)
  Calculated by default as TOC (gC) = COD/2.7 (COD measured in g O2). Should more correctly be calculated from the carbon content of the specified emissions to water.
- NMVOC, non-methane volatile organic compounds, unspecified origin [air, non-urban air or from high stacks]: 0.0033 kg; lognormal variance with pedigree 0.16, pedigree (1,1,5,1,1)
  old reference
- Fluoride [water, surface water]: 0.0358 kg; lognormal variance with pedigree 0.16, pedigree (1,1,5,1,1)
  old reference
- Manganese [water, surface water]: 1.02e-5 kg; lognormal variance with pedigree 0.16, pedigree (1,1,5,1,1)
  old reference
- Ammonium, ion [water, surface water]: 0.0581 kg; lognormal variance with pedigree 0.16, pedigree (1,1,5,1,1)
  old reference
- Radioactive species, alpha emitters [water, surface water]: 0.006 kBq; lognormal variance with pedigree 0.34, pedigree (1,1,5,1,1)
  very few recent data
- Nitrogen [water, surface water]: 0.0703 kg; lognormal variance with pedigree 0.16, pedigree (1,1,5,1,1)
  old reference
- Iron, ion [water, surface water]: 0.000153 kg; lognormal variance with pedigree 0.16, pedigree (1,1,5,1,1)
  old reference
- Nitrogen oxides [air, non-urban air or from high stacks]: 0.03 kg; lognormal variance with pedigree 0.16, pedigree (1,1,5,1,1)
  old reference
- DOC, Dissolved Organic Carbon [water, surface water]: 0.00614815 kg; lognormal variance with pedigree 0.16, pedigree (1,1,5,1,1)
  Calculated as equal to TOC.
- VOC, volatile organic compounds, unspecified origin [water, surface water]: 0.0894 kg; lognormal variance with pedigree 0.16, pedigree (1,1,5,1,1)
  old reference

## Sampling procedure
Literature

## Extrapolations
This dataset has been extrapolated from year 2000 to the year of the calculation (2021). The uncertainty has been adjusted accordingly.

## Review by Hans-Jörg Althaus 2007-10-26
Passed
