# treatment of blast furnace dust, residual material landfill

Dataset: EcoSpold 2, unit process
Geography: GLO
Time period: 1987-01-01 to 2021-12-31
Technology level: current
Classification: ISIC rev.4 ecoinvent: 3821:Treatment and disposal of non-hazardous waste
Scenario: Business-as-Usual
System model: Allocation, cut-off by classification
Generated by: Avraam Symeonidis
Database: ecoinvent
isCopyrightProtected: true
accessRestrictedTo: 1

## General comment
Steelmaking produces large quantities of by-products, with around 450-500 kg of by-products produced per tonne of steel. The main components of these are slags (approximately 80%), along with dusts and sludges from air pollution abatement equipment (flue gas scrubbing) and mill scale. The physical or chemical natures of these by-products means that it can be difficult to find possible uses. Hence, most of these by-products have historically been disposed of in landfills. However, new legislation and financial instruments, such as landfill taxes, mean that landfilling is now a costly and undesirable management solution. Instead, considerable efforts have been made to recover by-products for internal reuse or to sell them to other industries to recover value. The fraction of steelmaking by-products that is sent to landfill has drastically reduced. This activity represents the disposal of 'blast furnace dust' in a residual material landfill. This type of landfill is designed to receive mostly inorganic (low carbon, <5 w-%) wastes in a physically stable form. Further information is provided in ecoinvent report no. 13, Part II: Landfills – Underground Deposits – Landfarming (Doka, 2009).
References
Doka, G. (2009). Life cycle inventories of waste treatment services. Ecoinvent report no. 13. Swiss Centre for Life Cycle Inventories, Dubendorf, Switzerland.
Inventoried waste contains 100% blast furnace dust; .
waste composition (wet, in ppm): H2O 1000; O 257630; H n.a.; C 344000; S 4520; N n.a.; P 445; B n.a.; Cl n.a.; Br n.a.; F n.a.; I n.a.; Ag n.a.; As n.a.; Ba n.a.; Cd n.a.; Co n.a.; Cr n.a.; Cu 1200; Hg n.a.; Mn 2130; Mo n.a.; Ni n.a.; Pb 408; Sb n.a.; Se n.a.; Sn n.a.; V 1000; Zn 707; Be n.a.; Sc n.a.; Sr n.a.; Ti 824; Tl n.a.; W n.a.; Si 29100; Fe 309000; Ca 23300; Al 11300; K 3710; Mg 8200; Na 1530;
Share of carbon in waste that is biogenic 0%.
Additional solidification with 0.4 kg of cement. Note that value for oxygen content was calculated by assuming that other elements in the material are present as oxides and that any missing mass (either not reported or not detected) was assumed to be oxygen.

## Included activities start
Activity starts with the reception of the waste.

## Included activities end
Waste-specific short-term emissions to water from leachate. Long-term emissions from landfill to ground water. Expenditures for solidification with cement.

## Technology
Time period based on the range of years of publication from which composition data were taken. Note that the Residual Material Landfill modelling tool was published in 2009.

## Reference product
- blast furnace dust: -1 kg; name RP; CPC 39310: Slag, dross, scalings and other waste from the manufacture of iron or steel; By-product classification Waste
  production volume 1.27969e9 kg; name PVRP
    Assuming that 10.8% of blast furnace dust is sent for disposal in landfill (worldsteel, 2010).
    References:
    Worldsteel (2010). Steel industry by-products. World Steel Association: Brussels, Belgium.
  property price 0 EUR2005; name RP_price_EUR2005
    Waste products are assigned a price of zero as they are assumed to require further treatment.
  property oxygen content 0.257884
    The value of 'oxygen content' is documented in Turner & Symeonidis, 2020.
    Reference: Turner David & Symeonidis Avraam, 2020, Life cycle inventories of the treatment of iron and steelmaking by-products, ecoinvent association, Zürich, Switzerland
  property carbon content, fossil 0.344344
    The value of 'carbon content, fossil' is documented in Turner & Symeonidis, 2020.
    Reference: Turner David & Symeonidis Avraam, 2020, Life cycle inventories of the treatment of iron and steelmaking by-products, ecoinvent association, Zürich, Switzerland
  property manganese content 0.00213213
    The value of 'manganese content' is documented in Turner & Symeonidis, 2020.
    Reference: Turner David & Symeonidis Avraam, 2020, Life cycle inventories of the treatment of iron and steelmaking by-products, ecoinvent association, Zürich, Switzerland
  property zinc content 0.000707708
    The value of 'zinc content' is documented in Turner & Symeonidis, 2020.
    Reference: Turner David & Symeonidis Avraam, 2020, Life cycle inventories of the treatment of iron and steelmaking by-products, ecoinvent association, Zürich, Switzerland
  property sulfur content 0.00452452
    The value of 'sulfur content' is documented in Turner & Symeonidis, 2020.
    Reference: Turner David & Symeonidis Avraam, 2020, Life cycle inventories of the treatment of iron and steelmaking by-products, ecoinvent association, Zürich, Switzerland
  property titanium content 0.000824825
    The value of 'titanium content' is documented in Turner & Symeonidis, 2020.
    Reference: Turner David & Symeonidis Avraam, 2020, Life cycle inventories of the treatment of iron and steelmaking by-products, ecoinvent association, Zürich, Switzerland
  property magnesium content 0.00820821
    The value of 'magnesium content' is documented in Turner & Symeonidis, 2020.
    Reference: Turner David & Symeonidis Avraam, 2020, Life cycle inventories of the treatment of iron and steelmaking by-products, ecoinvent association, Zürich, Switzerland
  property carbon content, non-fossil 0
    The value of 'carbon content, non-fossil' is documented in Turner & Symeonidis, 2020.
    Reference: Turner David & Symeonidis Avraam, 2020, Life cycle inventories of the treatment of iron and steelmaking by-products, ecoinvent association, Zürich, Switzerland
  property sodium content 0.00153153
    The value of 'sodium content' is documented in Turner & Symeonidis, 2020.
    Reference: Turner David & Symeonidis Avraam, 2020, Life cycle inventories of the treatment of iron and steelmaking by-products, ecoinvent association, Zürich, Switzerland
  property copper content 0.0012012
    The value of 'copper content' is documented in Turner & Symeonidis, 2020.
    Reference: Turner David & Symeonidis Avraam, 2020, Life cycle inventories of the treatment of iron and steelmaking by-products, ecoinvent association, Zürich, Switzerland
  property silicon content 0.0291291
    The value of 'silicon content' is documented in Turner & Symeonidis, 2020.
    Reference: Turner David & Symeonidis Avraam, 2020, Life cycle inventories of the treatment of iron and steelmaking by-products, ecoinvent association, Zürich, Switzerland
  property potassium content 0.00371371
    The value of 'potassium content' is documented in Turner & Symeonidis, 2020.
    Reference: Turner David & Symeonidis Avraam, 2020, Life cycle inventories of the treatment of iron and steelmaking by-products, ecoinvent association, Zürich, Switzerland
  property calcium content 0.0233233
    The value of 'calcium content' is documented in Turner & Symeonidis, 2020.
    Reference: Turner David & Symeonidis Avraam, 2020, Life cycle inventories of the treatment of iron and steelmaking by-products, ecoinvent association, Zürich, Switzerland
  property lead content 0.000408408
    The value of 'lead content' is documented in Turner & Symeonidis, 2020.
    Reference: Turner David & Symeonidis Avraam, 2020, Life cycle inventories of the treatment of iron and steelmaking by-products, ecoinvent association, Zürich, Switzerland
  property aluminium content 0.0113113
    The value of 'aluminium content' is documented in Turner & Symeonidis, 2020.
    Reference: Turner David & Symeonidis Avraam, 2020, Life cycle inventories of the treatment of iron and steelmaking by-products, ecoinvent association, Zürich, Switzerland
  property phosphorus content 0.000445445
    The value of 'phosphorus content' is documented in Turner & Symeonidis, 2020.
    Reference: Turner David & Symeonidis Avraam, 2020, Life cycle inventories of the treatment of iron and steelmaking by-products, ecoinvent association, Zürich, Switzerland
  property vanadium content 0.001001
    The value of 'vanadium content' is documented in Turner & Symeonidis, 2020.
    Reference: Turner David & Symeonidis Avraam, 2020, Life cycle inventories of the treatment of iron and steelmaking by-products, ecoinvent association, Zürich, Switzerland
  property iron content 0.309309
    The value of 'iron content' is documented in Turner & Symeonidis, 2020.
    Reference: Turner David & Symeonidis Avraam, 2020, Life cycle inventories of the treatment of iron and steelmaking by-products, ecoinvent association, Zürich, Switzerland
  property carbon content 0.344344
    carbon content on a dry matter basis (reserved; not for manual entry)
  properties: water content 0.001001, water in wet mass 0.001 kg, dry mass 0.999 kg, wet mass 1 kg, heating value, net 0 MJ, carbon allocation 0.344 kg

## Inputs from technosphere
- cement, unspecified: 0.4 kg; lognormal variance with pedigree 0.091084, pedigree (1,1,5,5,4)
  Cement for solidification of residual material waste. Uncertainty in mass from solidification recipe.
  properties: dry mass 1 kg, wet mass 1 kg
- process-specific burdens, residual material landfill: 0 kg; pedigree (1,1,1,1,1)
  demands per kilogram waste. uncertainty is heeded in the module
- waste cement, hydrated: 0 kg; name BP; pedigree (1,1,1,1,1)
  Hydrated cement for solidification of residual material waste. Uncertainty in mass from solidification recipe.
  production volume 0 kg
    Calculated based on the production volume of the reference product.
  property price 0 EUR2005; name BP_price_EUR2005
  properties: dry mass 1 kg, wet mass 1 kg
- residual material landfill: 2.08333e-9 unit; lognormal variance with pedigree 0.082, pedigree (1,1,5,5,4)
  demands per kilogram waste. uncertainty is heeded in the module
- process-specific burdens, residual material landfill: 0.280494, 0.00841689, 0.71109 kg (3 entries); lognormal variance with pedigree 0.082, pedigree (1,1,5,5,4)
  demands per kilogram waste. uncertainty is heeded in the module
- waste cement, hydrated: -0.280494, -0.00841689, -0.71109 kg (3 entries); lognormal variance with pedigree 0.091084, pedigree (1,1,5,5,4)
  (same comment as for waste cement, hydrated)
  production volume 1.27969e9 kg

## Emissions to nature
- Copper, ion [water, ground-, long-term]: 4.61934e-5 kg; lognormal variance with pedigree 3.36826, pedigree (1,1,5,5,4)
  uncertainty is calculated from uncertainties in waste composition and transfer coefficients in incinerator and landfills.
- Magnesium [water, surface water]: 1.55544e-6 kg; lognormal variance with pedigree 1.34415, pedigree (1,1,5,5,4)
  uncertainty is calculated from uncertainties in waste composition and transfer coefficients in residual landfill
- Calcium, ion [water, ground-, long-term]: 0.00210535 kg; lognormal variance with pedigree 1.79606, pedigree (1,1,5,5,4)
  (same comment as for Copper, ion)
- Iron, ion [water, ground-, long-term]: 0.0015487 kg; lognormal variance with pedigree 7.13084, pedigree (1,1,5,5,4)
  (same comment as for Copper, ion)
- BOD5, Biological Oxygen Demand [water, surface water]: 0.000306791 kg; lognormal variance with pedigree 0.756183, pedigree (1,1,5,5,4)
  (same comment as for Magnesium)
- Sulfate [water, ground-, long-term]: 0.0121052 kg; lognormal variance with pedigree 0.547392, pedigree (1,1,5,5,4)
  (same comment as for Copper, ion)
- Sodium, ion [water, ground-, long-term]: 0.000955823 kg; lognormal variance with pedigree 0.690317, pedigree (1,1,5,5,4)
  (same comment as for Copper, ion)
- Aluminium [water, surface water]: 5.60005e-6 kg; lognormal variance with pedigree 1.17924, pedigree (1,1,5,5,4)
  (same comment as for Magnesium)
- TOC, Total Organic Carbon [water, ground-, long-term]: 0.222311 kg; lognormal variance with pedigree 0.160772, pedigree (1,1,5,5,4)
  (same comment as for Copper, ion)
- Phosphate [water, ground-, long-term]: 0.000304831 kg; lognormal variance with pedigree 1.40701, pedigree (1,1,5,5,4)
  (same comment as for Copper, ion)
- Copper, ion [water, surface water]: 7.71176e-8 kg; lognormal variance with pedigree 1.72997, pedigree (1,1,5,5,4)
  (same comment as for Magnesium)
- Potassium, ion [water, ground-, long-term]: 0.00266421 kg; lognormal variance with pedigree 0.575165, pedigree (1,1,5,5,4)
  (same comment as for Copper, ion)
- DOC, Dissolved Organic Carbon [water, surface water]: 0.000371137 kg; lognormal variance with pedigree 0.756183, pedigree (1,1,5,5,4)
  (same comment as for Magnesium)
- Zinc, ion [water, surface water]: 1.44658e-8 kg; lognormal variance with pedigree 1.95048, pedigree (1,1,5,5,4)
  (same comment as for Magnesium)
- Magnesium [water, ground-, long-term]: 0.000931707 kg; lognormal variance with pedigree 1.65578, pedigree (1,1,5,5,4)
  (same comment as for Copper, ion)
- Lead [water, ground-, long-term]: 2.11634e-6 kg; lognormal variance with pedigree 7.77842, pedigree (1,1,5,5,4)
  (same comment as for Copper, ion)
- Iron, ion [water, surface water]: 2.58547e-6 kg; lognormal variance with pedigree 1.40243, pedigree (1,1,5,5,4)
  (same comment as for Magnesium)
- Zinc, ion [water, ground-, long-term]: 8.66499e-6 kg; lognormal variance with pedigree 5.62879, pedigree (1,1,5,5,4)
  (same comment as for Copper, ion)
- Silicon [water, ground-, long-term]: 0.0290346 kg; lognormal variance with pedigree 0.326752, pedigree (1,1,5,5,4)
  (same comment as for Copper, ion)
- DOC, Dissolved Organic Carbon [water, ground-, long-term]: 0.222311 kg; lognormal variance with pedigree 0.160772, pedigree (1,1,5,5,4)
  (same comment as for Copper, ion)
- Manganese [water, ground-, long-term]: 1.75944e-5 kg; lognormal variance with pedigree 6.3929, pedigree (1,1,5,5,4)
  (same comment as for Copper, ion)
- Vanadium, ion [water, surface water]: 2.4542e-6 kg; lognormal variance with pedigree 1.27723, pedigree (1,1,5,5,4)
  (same comment as for Magnesium)
- Titanium, ion [water, surface water]: 4.08358e-7 kg; lognormal variance with pedigree 1.50931, pedigree (1,1,5,5,4)
  (same comment as for Magnesium)
- Titanium, ion [water, ground-, long-term]: 0.000244606 kg; lognormal variance with pedigree 1.13361, pedigree (1,1,5,5,4)
  (same comment as for Copper, ion)
- TOC, Total Organic Carbon [water, surface water]: 0.000371137 kg; lognormal variance with pedigree 0.756183, pedigree (1,1,5,5,4)
  (same comment as for Magnesium)
- Manganese [water, surface water]: 2.9373e-8 kg; lognormal variance with pedigree 1.85934, pedigree (1,1,5,5,4)
  (same comment as for Magnesium)
- Vanadium, ion [water, ground-, long-term]: 0.000768614 kg; lognormal variance with pedigree 0.756848, pedigree (1,1,5,5,4)
  (same comment as for Copper, ion)
- Lead [water, surface water]: 3.53312e-9 kg; lognormal variance with pedigree 2.13615, pedigree (1,1,5,5,4)
  (same comment as for Magnesium)
- COD, Chemical Oxygen Demand [water, ground-, long-term]: 0.561813 kg; lognormal variance with pedigree 0.160772, pedigree (1,1,5,5,4)
  (same comment as for Copper, ion)
- Sodium, ion [water, surface water]: 0.000574177 kg; lognormal variance with pedigree 0.710774, pedigree (1,1,5,5,4)
  (same comment as for Magnesium)
- BOD5, Biological Oxygen Demand [water, ground-, long-term]: 0.183768 kg; lognormal variance with pedigree 0.160772, pedigree (1,1,5,5,4)
  (same comment as for Copper, ion)
- Potassium, ion [water, surface water]: 0.00104579 kg; lognormal variance with pedigree 0.61347, pedigree (1,1,5,5,4)
  (same comment as for Magnesium)
- COD, Chemical Oxygen Demand [water, surface water]: 0.000937919 kg; lognormal variance with pedigree 0.756183, pedigree (1,1,5,5,4)
  (same comment as for Magnesium)
- Phosphate [water, surface water]: 5.08901e-7 kg; lognormal variance with pedigree 1.62755, pedigree (1,1,5,5,4)
  (same comment as for Magnesium)
- Aluminium [water, ground-, long-term]: 0.00335443 kg; lognormal variance with pedigree 0.803546, pedigree (1,1,5,5,4)
  (same comment as for Copper, ion)
- Sulfate [water, surface water]: 0.00145483 kg; lognormal variance with pedigree 0.660651, pedigree (1,1,5,5,4)
  (same comment as for Magnesium)
- Calcium, ion [water, surface water]: 3.51477e-6 kg; lognormal variance with pedigree 1.25246, pedigree (1,1,5,5,4)
  (same comment as for Magnesium)
- Silicon [water, surface water]: 6.54444e-5 kg; lognormal variance with pedigree 0.875465, pedigree (1,1,5,5,4)
  (same comment as for Magnesium)

## Sampling procedure
For more details about sampling procedures, refer to: Turner, D. & Symeonidis, A. (2020). Life cycle inventories of the treatment of iron and steelmaking by-products, ecoinvent association, Zürich, Switzerland.

## Extrapolations
This dataset has been extrapolated from year 2017 to the year of the calculation (2021). The uncertainty has been adjusted accordingly.
