# deinking emulsion production, in paper production

Dataset: EcoSpold 2, unit process
Geography: RER
Time period: 2000-01-01 to 2021-12-31
Technology level: current
Classification: EcoSpold01Categories: chemicals/inorganics
Classification: ISIC rev.4 ecoinvent: 2011:Manufacture of basic chemicals
Tags: ConvertedDataset
Scenario: Business-as-Usual
System model: Allocation, cut-off by classification
Generated by: Roland Hischier
Published in: Hischier R. 2007
Database: ecoinvent
isCopyrightProtected: true
accessRestrictedTo: 1

## General comment
The functional unit represent 1 kg of deinking emulsion. Very large uncertainty of the process data, as only a mixture of different materials is included.
[This dataset was already contained in the ecoinvent database version 2. It was not individually updated during the transfer to ecoinvent version 3. Life Cycle Impact Assessment results may still have changed, as they are affected by changes in the supply chain, i.e. in other datasets. This dataset was generated following the ecoinvent quality guidelines for version 2. It may have been subject to central changes described in the ecoinvent version 3 change report (http://www.ecoinvent.org/database/ecoinvent-version-3/reports-of-changes/), and the results of the central updates were reviewed extensively. The changes added e.g. consistent water flows and other information throughout the database. The documentation of this dataset can be found in the ecoinvent reports of version 2, which are still available via the ecoinvent website. The change report linked above covers all central changes that were made during the conversion process.]

## Included activities end
Mixture of hydrogen peroxide, sodium hydroxide, silica and fatty acid. Only input of mentioned substances is taken into account.

## Geography
Data used has no specific geographical origin (average from different indications in literature). Data are used as European average data.

## Technology
mixture of different substances without any further inputs/outputs

## Reference product
- deinking emulsion, in paper production: 1 kg; CPC 34: Basic chemicals; By-product classification allocatable product
  EcoSpold01Location=RER
  production volume 1.32237 kg
    This is a placeholder value that does not reflect real-world production volumes. This dataset does not currently require a real-world production volume to work in the database framework, and no actual data were collected yet. This has no negative effect on the results of the ecoinvent database. The placeholder value of this activity was scaled according to the nominal GDP of 2005 (source: United Nations, http://data.un.org/Glossary.aspx?q=GDP+%28current+US%24%29, accessed 20130726) to reflect an appropriate share of the global production volume, which is also a placeholder value.
  property heating value, net 2.48 MJ
    LHV is calculated based on the Carbon content of the product. More details can be found on the respective documentation.
  property price 1.9 EUR2005
    Calculated after China prices: http://www.xgkj.com/sdp/69272/4/pd-54972/9963164-2424296/Deinking_Agent_for_Waste_Paper_TD-10.html
  property carbon content, fossil 0.00369863
    Mixture of hydrogen peroxide (0.217), sodium hydroxide (0.258), silica (0.412) and fatty acid (0.104), and EDTA (0.009)
  property carbon content, non-fossil 0.078
    (same comment as for deinking emulsion, in paper production)
  property carbon content 0.0816986
    carbon content on a dry matter basis (reserved; not for manual entry)
  properties: wet mass 1 kg, water content 0, dry mass 1 kg, water in wet mass 0 kg, carbon allocation 0.0816986 kg

## Inputs from technosphere
All rows: lognormal variance with pedigree 0.1561, pedigree (5,5,5,3,3)
- hydrogen peroxide, without water, in 50% solution state: 0.217 kg
  EcoSpold01Location=RER
  Estimated, based on information in one literature source
  Uncertainty: estimated, based on information in one literature source
  properties: dry mass 1 kg, wet mass 1 kg, heating value, net 7.13 MJ
- EDTA, ethylenediaminetetraacetic acid: 0.009 kg
  Estimated, based on information in one literature source
  EcoSpold01Location=RER
  Uncertainty: estimated, based on information in one literature source
  properties: carbon content, fossil 0.410959, dry mass 1 kg, wet mass 1 kg, heating value, net 19.09 MJ
- sodium hydroxide, without water, in 50% solution state: 0.258 kg
  (same comment as for EDTA, ethylenediaminetetraacetic acid)
  properties: dry mass 1 kg, wet mass 1 kg, heating value, net 3.03 MJ
- silica sand: 0.412 kg
  Estimated, based on information in one literature source
  EcoSpold01Location=DE
  Uncertainty: estimated, based on information in one literature source
  properties: water content 0.010101, dry mass 0.99 kg, wet mass 1 kg
- fatty acid: 0.104 kg
  (same comment as for hydrogen peroxide, without water, in 50% solution state)
  properties: carbon content, non-fossil 0.75, dry mass 1 kg, wet mass 1 kg, heating value, net 22.73 MJ
  note on carbon content, non-fossil: C-content/dry mass of fats and oils considered 75%, from: ecoinvent v2.2 report, n 15a, pg 40

## Sampling procedure
see technology

## Extrapolations
This dataset has been extrapolated from year 2000 to the year of the calculation (2021). The uncertainty has been adjusted accordingly.

## Review by Hans-Jörg Althaus 2003-07-02
passed
