# sour gas, burned in gas turbine

Dataset: EcoSpold 2, unit process
Geography: RoW
Time period: 1991-01-01 to 2021-12-31
Technology level: current
Classification: ISIC rev.4 ecoinvent: 3510:Electric power generation, transmission and distribution
Classification: EcoSpold01Categories: natural gas/power plants
Scenario: Business-as-Usual
System model: Allocation, cut-off by classification
Share of production covered: 100 %
Generated by: Tereza Levova
Published in: Faist Emmenegger, M. 2007
Database: ecoinvent
isCopyrightProtected: true
accessRestrictedTo: 1

## General comment
Burning of sour gas in a turbine for on-site electricity production.

## Included activities end
Providing of compression energy by the exploitation of (sour) gas fields.

## Geography
Data for CH4, CO2, NMVOC, NO2 is based on Norwegian data, data for the rest is not geographically defined.

## Technology
Data is based on the Norwegian data (offshore combined production). No information about technology. As the data is an average over all gas turbines, motors and boilers in the Norwegian gas and oil production it can be assumed that different technologies are represented.

## Time period
Average of 1999-2000 is used for CH4, CO2, NMVOC, NO2 (data from the Norwegian offshore combined production). Data for CO, N2O, SO2, Hg, Radon-222 and waste heat are based on data from 1991 in Frischknecht et al. 1996, Tab. V.6.7.

## Reference product
- sour gas, burned in gas turbine: 1 MJ; CPC 17100: Electrical energy; By-product classification allocatable product
  EcoSpold01Location=NO
  production volume 2.75419e11 MJ
    2.98 E9 Sm3 burnt natural gas
    Estimated natural gas consumption in power plants in IEA key world energy statistics 2004-2006. It is assumed that shares of gas power plant, 100MWe is 45%, gas power plant, 300 MWe is 45%, gas motor 205 kW is 4.5%, gas turbine is 4.5%, gas combined cycle power plant is 1%. In Western Europe, shares of sweet natural gas is 91% and sour natural gas is 9%. For the world, sour gas is 30% and sweet gas is 70%.
  property price 3.08238e-5 EUR2005
    Calculated based on inputs: The price of the product has been calculated as a sum of the values of the material and energy inputs for this product. This value is therefore a rough estimation. It may underestimate the real price since there are additional expenses when producing any product. These expences can include for example labour costs, treatment of waste materials and profit for the producer. Please consider carefully whether this level of data quality is acceptable for your application.
  property carbon content 0.571
    carbon content on a dry matter basis (reserved; not for manual entry)
  properties: heating value, net 1 MJ, water in wet mass 0 kg, wet mass 0.027027 kg, carbon content, fossil 0.571, water content 0, carbon content, non-fossil 0, dry mass 0.027027 kg, carbon allocation 0.0154324 kg

## Inputs from technosphere
- gas turbine, 10MW electrical: 3.37e-10 unit; lognormal variance with pedigree 0.06, pedigree (1,1,5,5,3)
  EcoSpold01Location=RER
  Literature value (environmental report for Norway).
  Uncertainty: environmental report for Norway

## Inputs from nature
- Gas, natural, in ground [natural resource, in ground]: 0.0278 m3; lognormal variance with pedigree 0.042, pedigree (1,1,5,5,1)
  Literature value (environmental report for Norway).
  Uncertainty: environmental report for Norway

## Emissions to nature
- Carbon dioxide, fossil [air, non-urban air or from high stacks]: 0.0669 kg; lognormal variance with pedigree 0.042, pedigree (1,1,5,5,1)
  (same comment as for Gas, natural, in ground)
- Methane, fossil [air, non-urban air or from high stacks]: 2.43e-5 kg; lognormal variance with pedigree 0.082, pedigree (1,1,5,5,1)
  (same comment as for Gas, natural, in ground)
- Sulfur dioxide [air, non-urban air or from high stacks]: 0.00486 kg; lognormal variance with pedigree 0.044, pedigree (3,1,5,5,1)
  Calculated value.
  Uncertainty: calculated
- Nitrogen oxides [air, non-urban air or from high stacks]: 0.000199 kg; lognormal variance with pedigree 0.082, pedigree (1,1,5,5,1)
  (same comment as for Gas, natural, in ground)
- NMVOC, non-methane volatile organic compounds, unspecified origin [air, non-urban air or from high stacks]: 3.07e-6 kg; lognormal variance with pedigree 0.162, pedigree (1,1,5,5,1)
  (same comment as for Gas, natural, in ground)
- Dinitrogen monoxide [air, non-urban air or from high stacks]: 2.5e-7 kg; lognormal variance with pedigree 0.084, pedigree (3,1,5,5,1)
  Estimated value.
  Uncertainty: based on assumptions
- Carbon monoxide, fossil [air, non-urban air or from high stacks]: 0.000139 kg; lognormal variance with pedigree 0.692, pedigree (1,1,5,5,1)
  (same comment as for Gas, natural, in ground)
- Mercury [air, non-urban air or from high stacks]: 2.78e-9 kg; lognormal variance with pedigree 0.084, pedigree (3,1,5,5,1)
  Estimated value.
  Uncertainty: based on assumptions
- Radon-222 [air, non-urban air or from high stacks]: 0.00556 kBq; lognormal variance with pedigree 0.354, pedigree (3,1,5,5,1)
  Estimated value.
  Uncertainty: based on assumptions

## Sampling procedure
Data is based on the annual reports on emissions and discharges submitted by each individual operator. The emissions and discharges are estimated
according to guidelines given by the Norwegian authorities and OLF (Norwegian Oil Industry Association)

## Extrapolations
Extrapolated from norwegian dataset. Uncertainty is adjusted accordingly.
