# treatment of sulfidic tailings, from copper mine operation, tailings impoundment

Dataset: EcoSpold 2, unit process
Geography: RoW
Time period: 2015-01-01 to 2021-12-31
Technology level: current
Classification: ISIC rev.4 ecoinvent: 3822:Treatment and disposal of hazardous waste
Synonyms: pond; tailing; tails; sulphidic
Scenario: Business-as-Usual
System model: Allocation, cut-off by classification
Share of production covered: 80 %
Generated by: David Turner
Database: ecoinvent
isCopyrightProtected: true
accessRestrictedTo: 1

## General comment
This dataset represents the activity of waste disposal of sulfidic tailings, from copper mine operation in a tailings impoundment.
Background: Tailings, a waste material produced during mineral concentration (beneficiation), often contain significant quantities of mobile toxic metals and are typically produced in large quantities. To manage these wastes, tailings are commonly stored behind dammed impoundments, known as tailings ponds. These ponds pose a significant long-term pollution risk as metals may leach out into the surrounding environment, potentially over very long timeframes.
Modelling approach: This dataset was produced using a model developed specifically for assessing the long-term emissions of tailings disposal (see Doka, 2017). The tailings disposal model is based on the modelling framework applied in existing landfill process models used in ecoinvent and is based on a top-down approach. Literature data on measurements of deposited tailings compositions (solids) and measured current concentrations in leachate (liquid) form the basis of the model and are used to characterise pollutant mobility and calculate the currently occurring rate of emissions of the landfill. Heeding chief parameters, such as hydrology, pH development and elemental chemistry, these emissions are then projected into the future. Tailings composition is based on the typical composition of tailings at copper mine sites worldwide; i.e. composition is not region-specific. Land use was calculated following the approach described by Doka (2008). Based on an assumed generic final height of a tailings impoundment of 60 m and an assumed tailings density of 2200 kg/m3, a land area of 7.58E-06 m2 is required per kilogram of sulfidic tailings. The land is assumed to be converted from unknown origin to a disposal site. After an operational phase of 30 years, spontaneous restoration of a consolidated state is assumed to be reached after one hundred years. The total occupation time is therefore 130 years and the land occupation per kilogram tailings is 9.85E-04 m2.
Waste composition (wet, in ppm): H2O 300000; O 622290; H na; C 6145; S 289.86; N 5.0454; P 212.27; B 54.583; Cl 102.61; Br 0.22894; F 772.88; I na; Ag 8.304; As 46.473; Ba 335.12; Cd 3.6523; Co 13.907; Cr 60.142; Cu 876.83; Hg 0.24258; Mn 158.19; Mo 12.151; Ni 19.339; Pb 133.55; Sb 28.698; Se 3.3486; Sn 28.153; V 136.61; Zn 182.34; Be 1.6625; Sc 13.352; Sr 90.588; Ti 229.49; Tl 8.6074; W 9.7967; Si 38694; Fe 10340; Ca 3158.3; Al 11031; K 1832.5; Mg 1606.1; Na 1060.3. // Share of carbon in waste that is biogenic 0%.
Activity extent: The dataset includes all potential emissions to the environment and land use changes. Input exchanges of infrastructure, materials, energy, and water are not included here but are accounted for in the activity, copper mine operation.
References
Doka, G. (2008). Life Cycle Inventory data of mining waste: Emissions from sulfidic tailings disposal. Zürich, Switzerland: Doka Life Cycle Assessments.
Doka, G. (2017). A model for waste-specific and climate-specific life cycle inventories of tailings impoundments. Zürich, Switzerland: Doka Life Cycle Assessments.

## Included activities start
The activity starts at the point of waste deposition in the impoundment. All upstream activities, including the pumping of tailings to the site, any dewatering or treatment, or other transport-related activities are excluded.

## Included activities end
Waste-specific short- and long-term emissions to the environment via impoundment leachate; land transformation and occupation. Note that the structural integrity of the site is assumed to be unwavering during the entie modelled time horizon; i.e. accidental releases of leachate (due to impoundment failure) are not considered.

## Geography
Given name of site is 'Copper deposits; Global'. Impoundment site with mean annual temperature (MAT) of 7.40975177345093 degC, mean annual precipitation (MAP) of 572.255370191593 mm/year, mean annual actual evaporation (EAT) of 305.75372488909 mm/year, and net infiltration of 419.378507747048 mm/year (using half of natural surface evapotranspiration).
Temperature at site can result in permafrost conditions, which slows down water flow by a factor of 0.999.

## Technology
This is an inventory for an impoundment of copper ore beneficiation tailings waste. The following assumptions were made concerning technology: final impoundment height is 60 meters; operation phase duration is 30 years; and impoundment leachates are released into the environment untreated.

## Time period
'Data on average composition of tailings and tailings-derived leachates from literature sources published between 1994 and 2017 (mean publication date: 2009±6). Mean annual temperature and precipitation data for 1970-2000 (source: Fick and Hijmans, 2017); mean annual evapotranspiration for 1950-2000 (source: Fekete et al., 2002). Production volume based on world mine production data from the USGS Minerals Yearbook 2015. Transfer coefficients from prospective, tailings-specific model.
References:
Fekete, B. M., Vorosmarty, C. J. & Grabs, W. (2002). High-resolution fields of global runoff combining observed river discharge and simulated water balances. Global Biogeochemical Cycles, 16, 15-1 - 15-10.
Fick, S. E. & Hijmans, R. J. (2017). Worldclim 2: New 1-km spatial resolution climate surfaces for global land areas. International Journal of Climatology, 37, 4302-4315.'

## Reference product
- sulfidic tailings, from copper mine operation: -1 kg; By-product classification Waste
  main reference product of this activity (supply of disposal service).
  production volume 4.922e11 kg
    Estimate of the national tailings production volume from the mining and concentration of sulfidic copper ores, based on world mine production of copper from sulfide mineral deposits (kg) multiplied by an estimated tailings generation rate per kg of mined copper (160 kg per kg copper in concentrate).
  property price 0 EUR2005
    Waste products are assigned a price of zero as they are assumed to require further treatment.
  property carbon content 0.0087785
    carbon content on a dry matter basis (reserved; not for manual entry)
  properties: antimony content 4.0998e-5, dry mass 0.7 kg, strontium content 0.00012941, wet mass 1 kg, thallium content 1.2296e-5, calcium content 0.0045119, iron content 0.014771, lead content 0.00019078, sodium content 0.0015148, water in wet mass 0.3 kg, chromium content 8.5917e-5, beryllium content 2.375e-6, zinc content 0.00026049, selenium content 4.7837e-6, carbon content, non-fossil 0, cadmium content 5.2176e-6, fluorine content 0.0011041, oxygen content 0.88899, bromine content 3.2706e-7, chlorine content 0.00014659, arsenic content 6.639e-5, silver content 1.1863e-5, barium content 0.00047874, vanadium content 0.00019515, cobalt content 1.9866e-5, silicon content 0.055278, phosphorus content 0.00030324, scandium content 1.9074e-5, nitrogen content 7.2076e-6, sulfur content 0.00041409, boron content 7.7976e-5, carbon content, fossil 0.0087785, titanium content 0.00032784, copper content 0.0012526, water content 0.42857, tungsten content 1.3995e-5, nickel content 2.7626e-5, magnesium content 0.0022944, aluminium content 0.015758, molybdenum content 1.7358e-5, tin content 4.0219e-5, potassium content 0.0026178, mercury content 3.4654e-7, manganese content 0.00022598, carbon allocation 0.00614495 kg

## Inputs from nature
- Occupation, dump site [natural resource, land]: 0.00098485 m2*year; lognormal variance with pedigree 0.14986, pedigree (1,1,2,1,1)
  for impoundment operation phase and 100 year renaturation phase.
  Uncertainty: U
- Transformation, from unspecified [natural resource, land]: 7.5758e-6 m2; lognormal variance with pedigree 0.030796, pedigree (1,1,2,1,1)
  conversion of impoundment area.
  Uncertainty: U
- Transformation, to dump site [natural resource, land]: 7.5758e-6 m2; lognormal variance with pedigree 0.030796, pedigree (1,1,2,1,1)
  conversion to impoundment area.
  Uncertainty: U

## Emissions to nature
- Silver, ion [water, ground-]: 9.1123e-10 kg; lognormal variance with pedigree 0.55913, pedigree (1,1,2,1,1)
  burden from short-term leachate to groundwater in uncontrolled impoundment in moist cimate.
  Uncertainty: U
- Chromium VI [water, ground-, long-term]: 5.3779e-7 kg; lognormal variance with pedigree 1.6482, pedigree (1,1,2,1,1)
  Emissions from long-term leachate (>100a) directly from tailings impoundment.
  Uncertainty: U
- Sodium, ion [water, ground-]: 9.521e-6 kg; lognormal variance with pedigree 0.25703, pedigree (1,1,2,1,1)
  (same comment as for Silver, ion)
- Chloride [water, ground-, long-term]: 8.5667e-5 kg; lognormal variance with pedigree 0.24026, pedigree (1,1,2,1,1)
  (same comment as for Chromium VI)
- Selenium [water, ground-, long-term]: 1.5832e-7 kg; lognormal variance with pedigree 0.93517, pedigree (1,1,2,1,1)
  (same comment as for Chromium VI)
- Chloride [water, ground-]: 1.6944e-5 kg; lognormal variance with pedigree 0.25956, pedigree (1,1,2,1,1)
  (same comment as for Silver, ion)
- Silicon [water, ground-]: 3.5478e-6 kg; lognormal variance with pedigree 0.2955, pedigree (1,1,2,1,1)
  (same comment as for Silver, ion)
- Cadmium, ion [water, ground-, long-term]: 3.6404e-6 kg; lognormal variance with pedigree 0.35033, pedigree (1,1,2,1,1)
  (same comment as for Chromium VI)
- Silicon [water, ground-, long-term]: 0.00023104 kg; lognormal variance with pedigree 1.6927, pedigree (1,1,2,1,1)
  (same comment as for Chromium VI)
- Calcium, ion [water, ground-]: 5.1041e-5 kg; lognormal variance with pedigree 0.20471, pedigree (1,1,2,1,1)
  (same comment as for Silver, ion)
- Selenium [water, ground-]: 2.4915e-9 kg; lognormal variance with pedigree 0.526, pedigree (1,1,2,1,1)
  (same comment as for Silver, ion)
- Calcium, ion [water, ground-, long-term]: 0.0031073 kg; lognormal variance with pedigree 0.12761, pedigree (1,1,2,1,1)
  (same comment as for Chromium VI)
- Scandium [water, ground-]: 3.8048e-8 kg; lognormal variance with pedigree 0.4373, pedigree (1,1,2,1,1)
  (same comment as for Silver, ion)
- Bromine [water, ground-, long-term]: 1.0516e-7 kg; lognormal variance with pedigree 0.47772, pedigree (1,1,2,1,1)
  (same comment as for Chromium VI)
- Scandium [water, ground-, long-term]: 1.3314e-5 kg; lognormal variance with pedigree 0.30762, pedigree (1,1,2,1,1)
  (same comment as for Chromium VI)
- Boron [water, ground-, long-term]: 1.1603e-6 kg; lognormal variance with pedigree 1.1877, pedigree (1,1,2,1,1)
  (same comment as for Chromium VI)
- Potassium, ion [water, ground-, long-term]: 0.00031752 kg; lognormal variance with pedigree 0.33701, pedigree (1,1,2,1,1)
  (same comment as for Chromium VI)
- Bromine [water, ground-]: 2.3526e-10 kg; lognormal variance with pedigree 0.60225, pedigree (1,1,2,1,1)
  (same comment as for Silver, ion)
- Phosphate [water, ground-, long-term]: 0.00061612 kg; lognormal variance with pedigree 0.21574, pedigree (1,1,2,1,1)
  (same comment as for Chromium VI)
- Cadmium, ion [water, ground-]: 1.187e-8 kg; lognormal variance with pedigree 0.47588, pedigree (1,1,2,1,1)
  (same comment as for Silver, ion)
- Potassium, ion [water, ground-]: 5.8222e-7 kg; lognormal variance with pedigree 0.34568, pedigree (1,1,2,1,1)
  (same comment as for Silver, ion)
- Boron [water, ground-]: 1.8013e-8 kg; lognormal variance with pedigree 0.46031, pedigree (1,1,2,1,1)
  (same comment as for Silver, ion)
- Phosphate [water, ground-]: 3.4379e-5 kg; lognormal variance with pedigree 0.26079, pedigree (1,1,2,1,1)
  (same comment as for Silver, ion)
- BOD5, Biological Oxygen Demand [water, ground-, long-term]: 1.0457e-6 kg; lognormal variance with pedigree 0.45809, pedigree (1,1,2,1,1)
  (same comment as for Chromium VI)
- BOD5, Biological Oxygen Demand [water, ground-]: 1.7458e-9 kg; lognormal variance with pedigree 0.33101, pedigree (1,1,2,1,1)
  (same comment as for Silver, ion)
- Nickel, ion [water, ground-, long-term]: 1.9283e-5 kg; lognormal variance with pedigree 0.29534, pedigree (1,1,2,1,1)
  (same comment as for Chromium VI)
- Barium [water, ground-, long-term]: 0.0001676 kg; lognormal variance with pedigree 0.23055, pedigree (1,1,2,1,1)
  (same comment as for Chromium VI)
- Nickel, ion [water, ground-]: 5.5873e-8 kg; lognormal variance with pedigree 0.42459, pedigree (1,1,2,1,1)
  (same comment as for Silver, ion)
- Beryllium [water, ground-]: 4.0315e-9 kg; lognormal variance with pedigree 0.51084, pedigree (1,1,2,1,1)
  (same comment as for Silver, ion)
- Molybdenum [water, ground-, long-term]: 5.8272e-6 kg; lognormal variance with pedigree 0.34421, pedigree (1,1,2,1,1)
  (same comment as for Chromium VI)
- Beryllium [water, ground-, long-term]: 1.6585e-6 kg; lognormal variance with pedigree 0.37605, pedigree (1,1,2,1,1)
  (same comment as for Chromium VI)
- Mercury [water, ground-, long-term]: 2.4236e-7 kg; lognormal variance with pedigree 0.43807, pedigree (1,1,2,1,1)
  (same comment as for Chromium VI)
- Barium [water, ground-]: 1.8593e-9 kg; lognormal variance with pedigree 0.53484, pedigree (1,1,2,1,1)
  (same comment as for Silver, ion)
- Mercury [water, ground-]: 2.1157e-10 kg; lognormal variance with pedigree 0.60572, pedigree (1,1,2,1,1)
  (same comment as for Silver, ion)
- Zinc, ion [water, ground-]: 7.4444e-7 kg; lognormal variance with pedigree 0.33914, pedigree (1,1,2,1,1)
  (same comment as for Silver, ion)
- Antimony [water, ground-]: 1.1005e-8 kg; lognormal variance with pedigree 0.47675, pedigree (1,1,2,1,1)
  (same comment as for Silver, ion)
- Molybdenum [water, ground-]: 1.23e-7 kg; lognormal variance with pedigree 0.40149, pedigree (1,1,2,1,1)
  (same comment as for Silver, ion)
- Zinc, ion [water, ground-, long-term]: 0.0001816 kg; lognormal variance with pedigree 0.22073, pedigree (1,1,2,1,1)
  (same comment as for Chromium VI)
- Aluminium [water, ground-, long-term]: 0.011024 kg; lognormal variance with pedigree 0.089125, pedigree (1,1,2,1,1)
  (same comment as for Chromium VI)
- Manganese [water, ground-, long-term]: 0.00015718 kg; lognormal variance with pedigree 0.22545, pedigree (1,1,2,1,1)
  (same comment as for Chromium VI)
- Tungsten [water, ground-]: 1.909e-8 kg; lognormal variance with pedigree 0.4596, pedigree (1,1,2,1,1)
  (same comment as for Silver, ion)
- Antimony [water, ground-, long-term]: 7.0765e-7 kg; lognormal variance with pedigree 1.1391, pedigree (1,1,2,1,1)
  (same comment as for Chromium VI)
- Magnesium [water, ground-]: 2.6413e-5 kg; lognormal variance with pedigree 0.22583, pedigree (1,1,2,1,1)
  (same comment as for Silver, ion)
- Vanadium, ion [water, ground-]: 3.013e-9 kg; lognormal variance with pedigree 0.51923, pedigree (1,1,2,1,1)
  (same comment as for Silver, ion)
- Aluminium [water, ground-]: 6.8419e-6 kg; lognormal variance with pedigree 0.26788, pedigree (1,1,2,1,1)
  (same comment as for Silver, ion)
- Manganese [water, ground-]: 1.0082e-6 kg; lognormal variance with pedigree 0.33014, pedigree (1,1,2,1,1)
  (same comment as for Silver, ion)
- Tungsten [water, ground-, long-term]: 1.1663e-6 kg; lognormal variance with pedigree 0.60082, pedigree (1,1,2,1,1)
  (same comment as for Chromium VI)
- Nitrate [water, ground-, long-term]: 1.2134e-5 kg; lognormal variance with pedigree 0.341, pedigree (1,1,2,1,1)
  (same comment as for Chromium VI)
- Magnesium [water, ground-, long-term]: 0.0015796 kg; lognormal variance with pedigree 0.14924, pedigree (1,1,2,1,1)
  (same comment as for Chromium VI)
- Vanadium, ion [water, ground-, long-term]: 1.9607e-7 kg; lognormal variance with pedigree 2.9088, pedigree (1,1,2,1,1)
  (same comment as for Chromium VI)
- Arsenic, ion [water, ground-]: 1.1185e-8 kg; lognormal variance with pedigree 0.47606, pedigree (1,1,2,1,1)
  (same comment as for Silver, ion)
- Lead [water, ground-]: 1.3781e-8 kg; lognormal variance with pedigree 0.46893, pedigree (1,1,2,1,1)
  (same comment as for Silver, ion)
- Nitrate [water, ground-]: 6.2074e-6 kg; lognormal variance with pedigree 0.34766, pedigree (1,1,2,1,1)
  (same comment as for Silver, ion)
- Lead [water, ground-, long-term]: 0.00013353 kg; lognormal variance with pedigree 0.23108, pedigree (1,1,2,1,1)
  (same comment as for Chromium VI)
- TOC, Total Organic Carbon [water, ground-, long-term]: 0.00057403 kg; lognormal variance with pedigree 0.45809, pedigree (1,1,2,1,1)
  (same comment as for Chromium VI)
- Arsenic, ion [water, ground-, long-term]: 7.2261e-7 kg; lognormal variance with pedigree 1.3497, pedigree (1,1,2,1,1)
  (same comment as for Chromium VI)
- Iron, ion [water, ground-, long-term]: 0.010335 kg; lognormal variance with pedigree 0.091051, pedigree (1,1,2,1,1)
  (same comment as for Chromium VI)
- Ammonium, ion [water, ground-, long-term]: 7.6873e-7 kg; lognormal variance with pedigree 0.341, pedigree (1,1,2,1,1)
  (same comment as for Chromium VI)
- Hydrogen sulfide [water, ground-, long-term]: 4.2118e-5 kg; lognormal variance with pedigree 0.20706, pedigree (1,1,2,1,1)
  (same comment as for Chromium VI)
- Titanium, ion [water, ground-, long-term]: 0.00022948 kg; lognormal variance with pedigree 0.21309, pedigree (1,1,2,1,1)
  (same comment as for Chromium VI)
- Ammonium, ion [water, ground-]: 3.9326e-7 kg; lognormal variance with pedigree 0.34766, pedigree (1,1,2,1,1)
  (same comment as for Silver, ion)
- Hydrogen sulfide [water, ground-]: 2.9652e-5 kg; lognormal variance with pedigree 0.2108, pedigree (1,1,2,1,1)
  (same comment as for Silver, ion)
- TOC, Total Organic Carbon [water, ground-]: 9.5831e-7 kg; lognormal variance with pedigree 0.33101, pedigree (1,1,2,1,1)
  (same comment as for Silver, ion)
- Iron, ion [water, ground-]: 4.6148e-6 kg; lognormal variance with pedigree 0.28059, pedigree (1,1,2,1,1)
  (same comment as for Silver, ion)
- Titanium, ion [water, ground-]: 8.1112e-9 kg; lognormal variance with pedigree 0.48641, pedigree (1,1,2,1,1)
  (same comment as for Silver, ion)
- Fluoride [water, ground-, long-term]: 0.00035502 kg; lognormal variance with pedigree 0.21083, pedigree (1,1,2,1,1)
  (same comment as for Chromium VI)
- Thallium [water, ground-, long-term]: 8.6059e-6 kg; lognormal variance with pedigree 0.32213, pedigree (1,1,2,1,1)
  (same comment as for Chromium VI)
- Fluoride [water, ground-]: 7.942e-7 kg; lognormal variance with pedigree 0.33535, pedigree (1,1,2,1,1)
  (same comment as for Silver, ion)
- Thallium [water, ground-]: 1.4923e-9 kg; lognormal variance with pedigree 0.54281, pedigree (1,1,2,1,1)
  (same comment as for Silver, ion)
- Copper, ion [water, ground-, long-term]: 0.00087644 kg; lognormal variance with pedigree 0.16889, pedigree (1,1,2,1,1)
  (same comment as for Chromium VI)
- Tin, ion [water, ground-, long-term]: 2.8126e-5 kg; lognormal variance with pedigree 0.28287, pedigree (1,1,2,1,1)
  (same comment as for Chromium VI)
- DOC, Dissolved Organic Carbon [water, ground-, long-term]: 0.00057403 kg; lognormal variance with pedigree 0.45809, pedigree (1,1,2,1,1)
  (same comment as for Chromium VI)
- Tin, ion [water, ground-]: 2.7337e-8 kg; lognormal variance with pedigree 0.44704, pedigree (1,1,2,1,1)
  (same comment as for Silver, ion)
- DOC, Dissolved Organic Carbon [water, ground-]: 9.5831e-7 kg; lognormal variance with pedigree 0.33101, pedigree (1,1,2,1,1)
  (same comment as for Silver, ion)
- Sulfate [water, ground-]: 0.00027555 kg; lognormal variance with pedigree 0.2108, pedigree (1,1,2,1,1)
  (same comment as for Silver, ion)
- COD, Chemical Oxygen Demand [water, ground-]: 8.7289e-8 kg; lognormal variance with pedigree 0.33101, pedigree (1,1,2,1,1)
  (same comment as for Silver, ion)
- Sulfate [water, ground-, long-term]: 0.00039139 kg; lognormal variance with pedigree 0.20706, pedigree (1,1,2,1,1)
  (same comment as for Chromium VI)
- Cobalt [water, ground-]: 1.2196e-7 kg; lognormal variance with pedigree 0.40131, pedigree (1,1,2,1,1)
  (same comment as for Silver, ion)
- Sodium, ion [water, ground-, long-term]: 0.0010461 kg; lognormal variance with pedigree 0.1627, pedigree (1,1,2,1,1)
  (same comment as for Chromium VI)
- Cobalt [water, ground-, long-term]: 1.3785e-5 kg; lognormal variance with pedigree 0.30627, pedigree (1,1,2,1,1)
  (same comment as for Chromium VI)
- Strontium [water, ground-]: 1.1839e-7 kg; lognormal variance with pedigree 0.39856, pedigree (1,1,2,1,1)
  (same comment as for Silver, ion)
- Copper, ion [water, ground-]: 3.9446e-7 kg; lognormal variance with pedigree 0.35817, pedigree (1,1,2,1,1)
  (same comment as for Silver, ion)
- Strontium [water, ground-, long-term]: 9.047e-5 kg; lognormal variance with pedigree 0.244, pedigree (1,1,2,1,1)
  (same comment as for Chromium VI)
- COD, Chemical Oxygen Demand [water, ground-, long-term]: 5.2286e-5 kg; lognormal variance with pedigree 0.45809, pedigree (1,1,2,1,1)
  (same comment as for Chromium VI)
- Silver, ion [water, ground-, long-term]: 8.3031e-6 kg; lognormal variance with pedigree 0.32331, pedigree (1,1,2,1,1)
  (same comment as for Chromium VI)
- Chromium VI [water, ground-]: 8.296e-9 kg; lognormal variance with pedigree 0.48587, pedigree (1,1,2,1,1)
  (same comment as for Silver, ion)

## Sampling procedure
Tailings model based on observed leachate concentrations in literature. Extrapolated to 60'000 years heeding chemical characteristics. Initial waste composition from various literature sources. Climate information for national copper deposits (identified from the USGS Major Mineral Deposits database) from literature as follows: global mean annual temperature and precipitation data from Fick and Hijmans (2017); global mean annual evapotranspiration data from Fekete et al. (2002).

References:
Fekete, B. M., Vorosmarty, C. J. & Grabs, W. (2002). High-resolution fields of global runoff combining observed river discharge and simulated water balances. Global Biogeochemical Cycles, 16, 15-1 - 15-10.
Fick, S. E. & Hijmans, R. J. (2017). Worldclim 2: New 1-km spatial resolution climate surfaces for global land areas. International Journal of Climatology, 37, 4302-4315.

## Extrapolations
Climate data collected for copper deposits globally and aggregated to reflect average climatic conditions of copper deposits worldwide. Initial tailings composition based on global average copper tailings composition, derived from literature data. Initial leachate concentration based on generic global average data also obtained from the literature.
