# packing, lime product

Dataset: EcoSpold 2, unit process
Geography: RoW
Time period: 2000-01-01 to 2021-12-31
Technology level: current
Classification: EcoSpold01Categories: construction materials/others
Classification: ISIC rev.4 ecoinvent: 8292:Packaging activities
Tags: ConvertedDataset
Scenario: Business-as-Usual
System model: Allocation, cut-off by classification
Generated by: [System]
Published in: Kellenberger D. 2007
Database: ecoinvent
isCopyrightProtected: true
accessRestrictedTo: 1

## General comment
The value of the packing and loading modules are normalized with a annual production capacity of about 50'000 tons/year. The estimated lifespan of the machines is 25 years.
[This dataset was already contained in the ecoinvent database version 2. It was not individually updated during the transfer to ecoinvent version 3. Life Cycle Impact Assessment results may still have changed, as they are affected by changes in the supply chain, i.e. in other datasets. This dataset was generated following the ecoinvent quality guidelines for version 2. It may have been subject to central changes described in the ecoinvent version 3 change report (http://www.ecoinvent.org/database/ecoinvent-version-3/reports-of-changes/), and the results of the central updates were reviewed extensively. The changes added e.g. consistent water flows and other information throughout the database. The documentation of this dataset can be found in the ecoinvent reports of version 2, which are still available via the ecoinvent website. The change report linked above covers all central changes that were made during the conversion process.]

## Included activities end
Includes the process of packing, transportation, and loading of the bags on paletts. The machines, the waste treatment after use by the end-user of the lime products and the transports of the packing materials are included.

## Geography
data are only from one company in Switzerland (KFN), for some exchanges RER-modules have been used as proxy

## Technology
The company KFN works on a technically high level. The packing and loading process is fully automated.

## Reference product
- packing, lime product: 1 kg; CPC 85400: Packaging services; By-product classification allocatable product
  EcoSpold01Location=CH
  production volume 3.96633 kg
    This is a placeholder value that does not reflect real-world production volumes. This dataset does not currently require a real-world production volume to work in the database framework, and no actual data were collected yet. This has no negative effect on the results of the ecoinvent database.
  property price 0.0042268 EUR2005
    Calculated based on inputs: The price of the product has been calculated as a sum of the values of the material and energy inputs for this product. This value is therefore a rough estimation. It may underestimate the real price since there are additional expenses when producing any product. These expences can include for example labour costs, treatment of waste materials and profit for the producer. Please consider carefully whether this level of data quality is acceptable for your application.

## Inputs from technosphere
- waste graphical paper: 0 kg; pedigree (1,1,1,1,1)
  EcoSpold01Location=CH
  production volume 0 kg
    Calculated from the production volume of packing, lime product in proportion to the respective output amounts.
  properties: heating value, net 14.12 MJ, wet mass 1 kg, dry mass 0.888 kg, water content 0.126126, carbon content, non-fossil 0.454955
  note on heating value, net: Value taken from the general comment of the treatment dataset.
- waste polyethylene: 0 kg; pedigree (1,1,1,1,1)
  EcoSpold01Location=CH
  production volume 0 kg
    (same comment as for waste graphical paper)
  properties: heating value, net 42.47 MJ, dry mass 0.996 kg, water content 0.00401606, wet mass 1 kg, carbon content, fossil 0.825301
  note on carbon content, fossil: C content in 1 kg DM was calculated using data in Tab A.1, ecoinvent v2.2 report 13_I
- electricity, high voltage: 0.00155 kWh; lognormal variance with pedigree 0.0421, pedigree (1,2,5,5,1)
  activityLink added to better reflect the reality of the supply chain
- kraft paper: 0.00425 kg; lognormal variance with pedigree 0.054, pedigree (1,4,5,5,1)
  EcoSpold01Location=RER
  properties: wet mass 1 kg, heating value, net 14.11 MJ, dry mass 0.945 kg, water content 0.0582011, carbon content, fossil 0.0020219, carbon content, non-fossil 0.41662
  note on carbon content, fossil: Fossil C content was calculated after fossil C contents of chemicals used in the production of the paper (in Tab 9.4 ecoinvent v2.2 report 11_III, part 9).
  note on carbon content, non-fossil: Biogenic C content was calculated after biogenic C contents of chemicals used in the production of the paper (in Tab 9.4 ecoinvent v2.2 report 11_III, part 9). The cellulose content in 1 kg of paper (on a wet mas basis) was estimated as (1-chemical content), C content of cellulose was considered 0.44 kgC/kg dry mass (ecoinvent v2.2 report, n 15a, pg 40)
- packaging film, low density polyethylene: 0.000123 kg; lognormal variance with pedigree 0.0786, pedigree (4,3,5,5,3)
  EcoSpold01Location=RER
  properties: wet mass 1 kg, dry mass 1 kg, carbon content, fossil 0.857143, heating value, net 42.47 MJ
  note on carbon content, fossil: Polyethylene is formed out of a huge amount of ethylene monomers (C2H4) (ecoinvent v2.2 report 11_II). MW=28 g/mol
- waste wood, untreated: 0 kg; pedigree (1,1,1,1,1)
  EcoSpold01Location=CH
  production volume 0 kg
    (same comment as for waste graphical paper)
  properties: heating value, net 13.99 MJ, wet mass 1 kg, dry mass 0.8 kg, carbon content, non-fossil 0.48632, water content 0.25
  note on carbon content, non-fossil: Tab A.4, ecoinvent v2.2 report 13_I. C content has been referred to 1 kg DM,
- EUR-flat pallet: 0.000125 unit; lognormal variance with pedigree 0.096, pedigree (4,5,5,5,3)
  EcoSpold01Location=RER
  properties: water content 0.2, dry mass 18.3333 kg, heating value, net 335.11 MJ, wet mass 22 kg, carbon content, fossil 0.0311351, carbon content, non-fossil 0.58833
  note on carbon content, fossil: C content in components of the pallet (ecoinvent v2.2 report 7_part XVIII)
- conveyor belt: 8.5e-9 m; lognormal variance with pedigree 0.3706, pedigree (4,3,5,5,1)
  EcoSpold01Location=RER
- industrial machine, heavy, unspecified: 2.55e-5 kg; lognormal variance with pedigree 0.3706, pedigree (4,3,5,5,1)
  EcoSpold01Location=RER
- electricity, medium voltage: 0 kWh; pedigree (1,1,1,1,1)
  EcoSpold01Location=CH
- waste graphical paper: -0.000344264, -5.25707e-5, -4.59683e-6, -0.00018996, -1.85227e-5, -3.42874e-5, -0.000830539, -0.00639526 kg (8 entries); lognormal variance with pedigree 0.054, pedigree (1,4,5,5,1)
  EcoSpold01Location=CH
  production volume 0.02361 kg
- waste polyethylene: -1.36827e-5, -9.14229e-7, -6.91416e-8, -3.77609e-7, -1.5255e-7, -3.58575e-7, -1.16583e-5, -9.57868e-5 kg (8 entries); lognormal variance with pedigree 0.0786, pedigree (4,3,5,5,3)
  EcoSpold01Location=CH
  production volume 0.000369 kg
- waste wood, untreated: -0.000222407, -2.76152e-5, -2.01898e-6, -7.75627e-5, -1.17179e-5, -1.8525e-5, -0.00034629, -0.00295066 kg (8 entries); lognormal variance with pedigree 0.096, pedigree (4,5,5,5,3)
  EcoSpold01Location=CH
  production volume 0.0109704 kg
- electricity, medium voltage: 1.57659e-5, 3.02323e-6, 6.94181e-5, 0.000229831, 5.07538e-5, 0.000738168, 0.000104045, 0.000338995 kWh (8 entries); lognormal variance with pedigree 0.0421, pedigree (1,2,5,5,1)
  EcoSpold01Location=CH

## Sampling procedure
survey

## Extrapolations
data which are only available for RER have been used as proxy for CH This dataset has been copied from an original dataset covering the geography CH. The uncertainty has been adjusted accordingly.

## Review by Roberto Dones 2005-07-19
passed

## Review by Bo Weidema 2012-09-28
replaced "electricity, high voltage, hydro, run-of-river" with "electricity, high voltage" + activity link to "electricity production, hydro, run-of-river"
