# packing, lime product

Dataset: EcoSpold 2, unit process
Geography: CH
Time period: 2000-01-01 to 2021-12-31
Technology level: current
Classification: EcoSpold01Categories: construction materials/others
Classification: ISIC rev.4 ecoinvent: 8292:Packaging activities
Tags: ConvertedDataset
Scenario: Business-as-Usual
System model: Allocation, cut-off by classification
Generated by: [System]
Published in: Kellenberger D. 2007
Database: ecoinvent
isCopyrightProtected: true
accessRestrictedTo: 1

## General comment
This dataset represents the production of 1 kg of packing for lime products. Data is normalized with a annual production capacity of about 50'000 tons/year and an estimated lifespan of the machines of 25 years.
[This dataset was already contained in the ecoinvent database version 2. It was not individually updated during the transfer to ecoinvent version 3. Life Cycle Impact Assessment results may still have changed, as they are affected by changes in the supply chain, i.e. in other datasets. This dataset was generated following the ecoinvent quality guidelines for version 2. It may have been subject to central changes described in the ecoinvent version 3 change report (http://www.ecoinvent.org/database/ecoinvent-version-3/reports-of-changes/), and the results of the central updates were reviewed extensively. The changes added e.g. consistent water flows and other information throughout the database. The documentation of this dataset can be found in the ecoinvent reports of version 2, which are still available via the ecoinvent website. The change report linked above covers all central changes that were made during the conversion process.]

## Included activities start
Packing process starting from lime products, unpacked.

## Included activities end
The activity ends with the packed products. The dataset includes the process of packing, transportation, and loading of the bags on paletts. The dataset also includes the machines, the waste treatment after use by the end-user of the lime products and the transports of the packing materials.

## Geography
Data is based on Swiss companies.

## Technology
Data corresponds to the current Swiss technology.
The process of packing the product into paper bags is fully automatic. Once filled, the bags are transported to a robot by conveyor belt. The robot piles them up on Euro-flat pallets. To ensure moisture protection, and for a better transportation the pallets are wrapped in a plastic foil.

## Reference product
- packing, lime product: 1 kg; CPC 85400: Packaging services; By-product classification allocatable product
  EcoSpold01Location=CH
  Lime products are packed in paper bags and in paletts.
  production volume 0.0336675 kg
    This is a placeholder value that does not reflect real-world production volumes. This dataset does not currently require a real-world production volume to work in the database framework, and no actual data were collected yet. This has no negative effect on the results of the ecoinvent database. The placeholder value of this activity was scaled according to the nominal GDP of 2005 (source: United Nations, http://data.un.org/Glossary.aspx?q=GDP+%28current+US%24%29, accessed 20130726) to reflect an appropriate share of the global production volume, which is also a placeholder value.
  property price 0.0042268 EUR2005
    Calculated based on inputs: The price of the product has been calculated as a sum of the values of the material and energy inputs for this product. This value is therefore a rough estimation. It may underestimate the real price since there are additional expenses when producing any product. These expences can include for example labour costs, treatment of waste materials and profit for the producer. Please consider carefully whether this level of data quality is acceptable for your application.

## Inputs from technosphere
- electricity, high voltage: 0.00155 kWh; lognormal variance with pedigree 0.0401, pedigree (1,2,5,1,1)
  Estimation, based on company information. Data is from the company KFN for the year 2001.
- EUR-flat pallet: 0.000125 unit; lognormal variance with pedigree 0.094, pedigree (4,5,5,1,3)
  Estimation, based on company information. An average density of 800 kg/m3 is assumed. The pallet is assumed to be used 10 times before being disposed. A loaded pallet has an area of 1m2 and a height of 1 m, having a loading weight of 800 kg. The weight of the pallet is 22 kg.
  Information is from the company "Frantschach" by email at 05.06.02.
  EcoSpold01Location=RER
  properties: carbon content, fossil 0.0311351, dry mass 18.3333 kg, carbon content, non-fossil 0.58833, wet mass 22 kg, water content 0.2, heating value, net 335.11 MJ
  note on carbon content, fossil: C content in components of the pallet (ecoinvent v2.2 report 7_part XVIII)
- waste wood, untreated: -0.0036568 kg; lognormal variance with pedigree 0.094, pedigree (4,5,5,1,3)
  EcoSpold01Location=CH
  Estimation.
  production volume 0.0036568 kg
    Calculated from the production volume of packing, lime product in proportion to the respective output amounts.
  properties: water content 0.25, wet mass 1 kg, carbon content, non-fossil 0.48632, dry mass 0.8 kg, heating value, net 13.99 MJ
  note on carbon content, non-fossil: Tab A.4, ecoinvent v2.2 report 13_I. C content has been referred to 1 kg DM,
  note on heating value, net: Value taken from the general comment of the treatment dataset.
- waste graphical paper: -0.00787 kg; lognormal variance with pedigree 0.052025, pedigree (1,4,5,2,1)
  Estimation, based on company information. Data is from the company KFN for the year 2001.
  EcoSpold01Location=CH
  production volume 0.00787 kg
    (same comment as for waste wood, untreated)
  properties: heating value, net 14.12 MJ, carbon content, non-fossil 0.454955, water content 0.126126, wet mass 1 kg, dry mass 0.888 kg
- conveyor belt: 8.5e-9 m; lognormal variance with pedigree 0.3686, pedigree (4,3,5,1,1)
  EcoSpold01Location=RER
  Estimation, based on a visiting tour. A length of conveyor belt of 10 m and a lifetime of 25 years are assumed.
- packaging film, low density polyethylene: 0.000123 kg; lognormal variance with pedigree 0.0766, pedigree (4,3,5,1,3)
  Estimation. An average density of 800 kg/m3 is assumed. The pallet is assumed to be used 10 times before being disposed. A loaded pallet has an area of 1m2 and a height of 1 m, having a loading weight of 800 kg. The weight of the pallet is 22 kg. If two layers of plastic foil (including an overlay of 2 m) with a weight of 0.0123 kg/m2 are wrapped around, the amount of plastic per kg product is 0.000123 kg.
  Data is based on the information from the following website (accessed October 2003):
  http://www.dm-folien.de/hpage.htm
  EcoSpold01Location=RER
  properties: dry mass 1 kg, carbon content, fossil 0.857143, wet mass 1 kg, heating value, net 42.47 MJ
  note on carbon content, fossil: Polyethylene is formed out of a huge amount of ethylene monomers (C2H4) (ecoinvent v2.2 report 11_II). MW=28 g/mol
- industrial machine, heavy, unspecified: 2.55e-5 kg; lognormal variance with pedigree 0.3686, pedigree (4,3,5,1,1)
  EcoSpold01Location=RER
  Estimation, based on a visiting tour. A total weight of the machines of 30 t is assumed. The lifespan considered is 25 years. A total amount of 47.067 t of packed material (for the year 2001) is assumed.
- kraft paper: 0.00425 kg; lognormal variance with pedigree 0.052025, pedigree (1,4,5,2,1)
  Estimation, based on company information. An average density of 800 kg/m3 is assumed.
  Information is from the company "Frantschach" by email at 05.06.02.
  EcoSpold01Location=RER
  properties: wet mass 1 kg, dry mass 0.945 kg, heating value, net 14.11 MJ, carbon content, non-fossil 0.41662, water content 0.0582011, carbon content, fossil 0.0020219
  note on carbon content, non-fossil: Biogenic C content was calculated after biogenic C contents of chemicals used in the production of the paper (in Tab 9.4 ecoinvent v2.2 report 11_III, part 9). The cellulose content in 1 kg of paper (on a wet mas basis) was estimated as (1-chemical content), C content of cellulose was considered 0.44 kgC/kg dry mass (ecoinvent v2.2 report, n 15a, pg 40)
  note on carbon content, fossil: Fossil C content was calculated after fossil C contents of chemicals used in the production of the paper (in Tab 9.4 ecoinvent v2.2 report 11_III, part 9).
- waste polyethylene: -0.000123 kg; lognormal variance with pedigree 0.0766, pedigree (4,3,5,1,3)
  (same comment as for waste graphical paper)
  production volume 0.000123 kg
    (same comment as for waste wood, untreated)
  properties: carbon content, fossil 0.825301, wet mass 1 kg, water content 0.00401606, dry mass 0.996 kg, heating value, net 42.47 MJ
  note on carbon content, fossil: C content in 1 kg DM was calculated using data in Tab A.1, ecoinvent v2.2 report 13_I
- electricity, medium voltage: 0.00155 kWh; lognormal variance with pedigree 0.0401, pedigree (1,2,5,1,1)
  (same comment as for waste graphical paper)

## Sampling procedure
Data is based on one Swiss company (KFN), with a annual production capacity of about 50'000 tons/year and estimated lifespan of the machines of 25 years.

## Extrapolations
This dataset has been extrapolated from year 2002 to the year of the calculation (2021). The uncertainty has been adjusted accordingly.

## Review by Roberto Dones 2005-07-19
passed

## Review by Roland Hischier 2011-09-22
Transfer of documentation done.

## Review by Bo Weidema 2012-09-28
replaced "electricity, high voltage, hydro, run-of-river" with "electricity, high voltage" + activity link to "electricity production, hydro, run-of-river"
