# treatment of waste emulsion paint, sanitary landfill

Dataset: EcoSpold 2, unit process
Geography: Europe without Switzerland
Time period: 1994-01-01 to 2021-12-31
Technology level: current
Classification: EcoSpold01Categories: waste management/sanitary landfill
Classification: ISIC rev.4 ecoinvent: 3821:Treatment and disposal of non-hazardous waste
Tags: Treatment
Scenario: Business-as-Usual
System model: Allocation, cut-off by classification
Generated by: [System]
Database: ecoinvent
isCopyrightProtected: true
accessRestrictedTo: 1

## General comment
Inventoried waste contains 100% Emulsion paint (remains); .
waste composition (wet, in ppm): upper heating value 11.14 MJ/kg; lower heating value 10.51 MJ/kg; H2O n.a.; O 214760; H 31708; C 268330; S n.a.; N n.a.; P n.a.; B n.a.; Cl 86465; Br n.a.; F n.a.; I n.a.; Ag n.a.; As 0.44122; Ba n.a.; Cd 0.016849; Co n.a.; Cr 1.248; Cu n.a.; Hg 0.0085442; Mn n.a.; Mo n.a.; Ni 0.95527; Pb 0.64946; Sb n.a.; Se n.a.; Sn n.a.; V n.a.; Zn 6.5444; Be n.a.; Sc n.a.; Sr n.a.; Ti 135000; Tl n.a.; W n.a.; Si 149810; Fe n.a.; Ca 113920; Al n.a.; K n.a.; Mg n.a.; Na n.a.;
Share of carbon in waste that is biogenic 0%.
Overall degradability of waste during 100 years: 1%.

## Included activities end
Waste-specific short-term emissions to air via landfill gas incineration and landfill leachate. Burdens from treatment of short-term leachate (0-100a) in wastewater treatment plant (including WWTP sludge disposal in municipal incinerator). Long-term emissions from landfill to groundwater (after base lining failure).

## Technology
Swiss municipal sanitary landfill for biogenic or untreated municipal waste ('reactive organic landfill'). Landfill gas and leachate collection system. Recultivation and monitoring for 150 years after closure.

## Reference product
- waste emulsion paint: -1 kg; name WP; By-product classification Waste; CPC 39: Wastes or scraps
  production volume 4.10483e8 kg; name WP_PV; = 5370000000*0.35*0.78*0.28
    Estimated value. Eu paint market is of 5.37E+09kg (EUROPEAN COMMISSION 2002)
    of which 55% is paint and 35% is emulsion paint (http://www.psgdover.com/en/mouvex-paint-coatings-market-overview/what-are-paint-a-coatings/defining-paintaccessed, accessed 20151009). 22% is considered hazardous waste and 78% non hazardous waste (http://archive.epa.gov/sectors/web/pdf/paint_quantity_report.pdf, accessed 20151009).
    In the EU (Eurostat municipal waste treatment), of hazardous waste 23% is sent to hazardous incineration. Of non hazardous waste 23% is sent to incineration. 37% is considered to be sent to landfilling and it is split between sanitary and inert landfill using the same shares assumed for the US (see relevant dataset: “23% is sent to inert material landfill (http://archive.epa.gov/sectors/web/pdf/paint_quantity_report.pdf, accessed 20151009). The rest (65%) is considered to go to sanitary landfill.”)
    EUROPEAN COMMISSION (2002) STUDY ON HAZARDOUS HOUSEHOLD WASTE (HHW) WITH A MAIN EMPHASIS ON HAZARDOUS HOUSEHOLD CHEMICALS (HHC). Retrieved from: <http://ec.europa.eu/environment/waste/studies/pdf/household_report.pdf>, accessed 11th July 2016
    Eurostat. Sustainable Development Indicator (SDI) on municipal waste
    Retrieved from: <http://ec.europa.eu/eurostat/web/waste/transboundary-waste-shipments/key-waste-streams/municipal-waste>, accessed 11th July 2016
  property carbon content, fossil 0.27
    Tab A.4, ecoinvent v2.2 report 13_I. C content has been calculated after data in the tables, and then referred to 1 kg DM
  property heating value, net 8.18 MJ
    LHV is calculated based on the Carbon content of the product. More details can be found on the respective documentation.
  property price 0 EUR2005; name WP_price_EUR2005
    Waste products are assigned a price of zero as they are assumed to require further treatment.
  property carbon content 0.27
    carbon content on a dry matter basis (reserved; not for manual entry)
  properties: water content 0, carbon content, non-fossil 0, water in wet mass 0 kg, dry mass 1 kg, wet mass 1 kg, carbon allocation 0.27 kg

## Inputs from technosphere
- waste cement, hydrated: -1.48e-5 kg; name BP_WS
  burden from incineration of sludge from wastewater treatment of the short-term leachate (0-100a). uncertainty is calculated from uncertainties in waste composition and transfer coefficients in incinerator and uncertainty of waste decomposition and short-term leaching in sanitary landfill
  production volume 6075.15 kg; = BP_WS*WP_PV/ABS(WP)
    Calculated from the production volume of waste emulsion paint, 0% water in proportion to the respective output amounts.
  property price 0 EUR2005; name BP_WS_price_EUR2005
  properties: dry mass 1 kg, wet mass 1 kg
- heat, district or industrial, other than natural gas: 0.000317 MJ; lognormal variance with pedigree 0.432, pedigree (1,1,5,5,1)
  (same comment as for waste cement, hydrated)
  properties: heating value, net 1 MJ
- chemical, organic: 5.78e-11 kg; lognormal variance with pedigree 2.182, pedigree (1,1,5,5,1)
  (same comment as for waste cement, hydrated)
  properties: carbon content, fossil 0.628, dry mass 1 kg, wet mass 1 kg, heating value, net 19.03 MJ
  note on carbon content, fossil: This dataset is an unweighted average of 20 organic substances (listed in Tab 88.1, ecoinvent v2.2 report 8, part II), being part of the top100 chemicals included in this database. The C-content has also been calculated as an unweighted average of the C content of the substances composing this dataset.
- chemical, inorganic: 2.28e-12 kg; lognormal variance with pedigree 1.492, pedigree (1,1,5,5,1)
  (same comment as for waste cement, hydrated)
  properties: wet mass 1 kg, dry mass 1 kg, carbon content, fossil 0.003
  note on carbon content, fossil: This dataset is an unweighted average of 20 inorganic substances (listed in Tab 88.1, ecoinvent v2.2 report 8, part II), being part of the top100 chemicals included in this database. The C-content has also been calculated as an unweighted average of the C content of the substances composing this dataset.
- residual material landfill: 3.07e-14 unit; lognormal variance with pedigree 0.712, pedigree (1,1,5,5,1)
  (same comment as for waste cement, hydrated)
- iron (III) chloride, without water, in 40% solution state: 2.38e-10 kg; lognormal variance with pedigree 2.012, pedigree (1,1,5,5,1)
  (same comment as for waste cement, hydrated)
  properties: dry mass 1 kg, wet mass 1 kg
- municipal waste incineration facility: 9.46e-14 unit; lognormal variance with pedigree 0.432, pedigree (1,1,5,5,1)
  Burden from incineration of sludge from wastewater treatment of the short-term leachate (0-100a).
- slag landfill: 3.72e-13 unit; lognormal variance with pedigree 0.572, pedigree (1,1,5,5,1)
  (same comment as for waste cement, hydrated)
- process-specific burdens, municipal waste incineration: 0.000378 kg; lognormal variance with pedigree 0.432, pedigree (1,1,5,5,1)
  Burden from incineration of sludge from wastewater treatment of the short-term leachate (0-100a).;activityLink introduced to establish a direct link to the corresponding regional supply of this product
- sewer grid, 5E9l/year, 110 km: 5.45e-10 km; lognormal variance with pedigree 0.2106, pedigree (5,5,5,5,5)
  burden from wastewater treatment of the short-term leachate (0-100a). Uncertainty calculated from unertainty of the waste composition of this waste, uncertainty in waste decomposition and short-term leaching in sanitary landfill
- process-specific burdens, slag landfill: 0.000209 kg; lognormal variance with pedigree 0.572, pedigree (1,1,5,5,1)
  burden from incineration of sludge from wastewater treatment of the short-term leachate (0-100a). uncertainty is calculated from uncertainties in waste composition and transfer coefficients in incinerator and uncertainty of waste decomposition and short-term leaching in sanitary landfill;activityLink introduced to establish a direct link to the corresponding regional supply of this product
- cement, unspecified: 5.9e-6 kg; lognormal variance with pedigree 0.722, pedigree (1,1,5,5,1)
  (same comment as for waste cement, hydrated)
  properties: dry mass 1 kg, wet mass 1 kg
- electricity, low voltage: 0.000169 kWh; lognormal variance with pedigree 0.43, pedigree (5,5,5,5,5)
  (same comment as for sewer grid, 5E9l/year, 110 km)
- wastewater treatment facility, capacity 5E9l/year: 1.42e-11 unit; lognormal variance with pedigree 0.2106, pedigree (5,5,5,5,5)
  (same comment as for sewer grid, 5E9l/year, 110 km)
- electricity, high voltage: 5.44e-5 kWh; lognormal variance with pedigree 0.712, pedigree (1,1,5,5,1)
  (same comment as for waste cement, hydrated)
- heat, district or industrial, natural gas: 0.00019584 MJ; lognormal variance with pedigree 0.55, pedigree (5,5,5,5,5)
  (same comment as for sewer grid, 5E9l/year, 110 km)
  properties: heating value, net 1 MJ
- process-specific burdens, residual material landfill: 1.48e-5 kg; lognormal variance with pedigree 0.712, pedigree (1,1,5,5,1)
  (same comment as for process-specific burdens, slag landfill)
- sanitary landfill facility: 5.56e-10 unit; lognormal variance with pedigree 0.042, pedigree (1,1,5,5,1)
  demands per kilogram waste. uncertainty is heeded in the module
- hydrochloric acid, without water, in 30% solution state: 1.37e-12 kg; lognormal variance with pedigree 1.492, pedigree (1,1,5,5,1)
  (same comment as for waste cement, hydrated)
  properties: dry mass 1 kg, heating value, net 3.32 MJ, wet mass 1 kg
- heat, central or small-scale, other than natural gas: 0.00014194 MJ; lognormal variance with pedigree 0.55, pedigree (5,5,5,5,5)
  (same comment as for sewer grid, 5E9l/year, 110 km)
  properties: heating value, net 1 MJ
- process-specific burdens, sanitary landfill: 1 kg; lognormal variance with pedigree 0.042, pedigree (1,1,5,5,1)
  demands per kilogram waste. uncertainty is heeded in the module
- waste plastic, mixture: -3.88e-5 kg; name WP_BP
  (same comment as for sewer grid, 5E9l/year, 110 km)
  production volume 15926.7 kg; = WP_BP*WP_PV/ABS(WP)
    (same comment as for waste cement, hydrated)
  property price 0 EUR2005; name WP_BP_price_EUR2005
  properties: heating value, net 30.79 MJ, water content 0.180638, wet mass 1 kg, carbon content, fossil 0.747344, dry mass 0.847 kg
  note on heating value, net: Value taken from the general comment of the treatment dataset.
  note on carbon content, fossil: C content in 1 kg DM was calculated using data in Tab A.2, ecoinvent v2.2 report 13_I
- waste graphical paper: -3.88e-5 kg; name WGP_BP
  (same comment as for sewer grid, 5E9l/year, 110 km)
  production volume 15926.7 kg; = WGP_BP*WP_PV/ABS(WP)
    (same comment as for waste cement, hydrated)
  property price 0 EUR2005; name WGP_BP_price_EUR2005
  properties: carbon content, non-fossil 0.454955, wet mass 1 kg, water content 0.126126, dry mass 0.888 kg, heating value, net 14.12 MJ

## Emissions to nature
- Calcium [air, urban air close to ground]: 2.43e-8 kg; lognormal variance with pedigree 0.802, pedigree (1,1,5,5,1)
  Emissions from short-term leachate treatment and incineration of resulting sludge. Uncertainty calculated depending on waste input and uncertainty of transfer coefficents in landfill, wastewater treatment and incineration model.
- Titanium, ion [water, ground-, long-term]: 0.135 kg; lognormal variance with pedigree 0.142, pedigree (1,1,5,5,1)
  Emissions from long-term leachate (>100a) directly from MSW landfill and indirectly via incineration of treatement sludge from leachate treatement. Uncertainty calculated depending on waste input and uncertainty of long-term transfer coefficents in landfill.
- Nickel, ion [water, ground-, long-term]: 9.55e-7 kg; lognormal variance with pedigree 1.612, pedigree (1,1,5,5,1)
  (same comment as for Titanium, ion)
- NMVOC, non-methane volatile organic compounds, unspecified origin [air, non-urban air or from high stacks]: 7.2e-9 kg; lognormal variance with pedigree 0.502, pedigree (1,1,5,5,1)
  burden from direct release or incineration of landfill biogas. Uncertainty calculated from unertainty of the waste composition of this waste, uncertainty in waste decomposition and short-term leaching in sanitary landfill
- Arsenic, ion [water, surface water]: 6.98e-10 kg; lognormal variance with pedigree 2.292, pedigree (1,1,5,5,1)
  (same comment as for Calcium)
- Carbon dioxide, fossil [air, urban air close to ground]: 0.000224 kg; lognormal variance with pedigree 0.902, pedigree (1,1,5,5,1)
  (same comment as for Calcium)
- Titanium [air, urban air close to ground]: 3.32e-8 kg; lognormal variance with pedigree 0.922, pedigree (1,1,5,5,1)
  (same comment as for Calcium)
- DOC, Dissolved Organic Carbon [water, surface water]: 1.2e-5 kg; lognormal variance with pedigree 0.902, pedigree (1,1,5,5,1)
  (same comment as for Calcium)
- Lead [air, urban air close to ground]: 1.27e-15 kg; lognormal variance with pedigree 2.752, pedigree (1,1,5,5,1)
  (same comment as for Calcium)
- Lead [air, non-urban air or from high stacks]: 1.28e-14 kg; lognormal variance with pedigree 3.722, pedigree (1,1,5,5,1)
  (same comment as for NMVOC, non-methane volatile organic compounds, unspecified origin)
- Calcium, ion [water, ground-, long-term]: 0.114 kg; lognormal variance with pedigree 0.152, pedigree (1,1,5,5,1)
  (same comment as for Titanium, ion)
- Cadmium [air, non-urban air or from high stacks]: 1.98e-13 kg; lognormal variance with pedigree 3.202, pedigree (1,1,5,5,1)
  (same comment as for NMVOC, non-methane volatile organic compounds, unspecified origin)
- Arsenic, ion [water, ground-, long-term]: 4.41e-7 kg; lognormal variance with pedigree 1.712, pedigree (1,1,5,5,1)
  (same comment as for Titanium, ion)
- Zinc, ion [water, ground-, long-term]: 5.4e-6 kg; lognormal variance with pedigree 1.382, pedigree (1,1,5,5,1)
  (same comment as for Titanium, ion)
- BOD5, Biological Oxygen Demand [water, surface water]: 1.55e-5 kg; lognormal variance with pedigree 0.912, pedigree (1,1,5,5,1)
  (same comment as for Calcium)
- Silicon [air, non-urban air or from high stacks]: 1.87e-8 kg; lognormal variance with pedigree 1.952, pedigree (1,1,5,5,1)
  (same comment as for NMVOC, non-methane volatile organic compounds, unspecified origin)
- Mercury [water, surface water]: 1.85e-12 kg; lognormal variance with pedigree 2.662, pedigree (1,1,5,5,1)
  (same comment as for Calcium)
- BOD5, Biological Oxygen Demand [water, ground-, long-term]: 0.0176 kg; lognormal variance with pedigree 0.552, pedigree (1,1,5,5,1)
  (same comment as for Titanium, ion)
- COD, Chemical Oxygen Demand [water, ground-, long-term]: 0.0745 kg; lognormal variance with pedigree 0.552, pedigree (1,1,5,5,1)
  (same comment as for Titanium, ion)
- Titanium, ion [water, surface water]: 3.42e-5 kg; lognormal variance with pedigree 0.882, pedigree (1,1,5,5,1)
  (same comment as for Calcium)
- Calcium [air, non-urban air or from high stacks]: 3.71e-8 kg; lognormal variance with pedigree 1.862, pedigree (1,1,5,5,1)
  (same comment as for NMVOC, non-methane volatile organic compounds, unspecified origin)
- Mercury [air, non-urban air or from high stacks]: 2.34e-12 kg; lognormal variance with pedigree 2.792, pedigree (1,1,5,5,1)
  (same comment as for NMVOC, non-methane volatile organic compounds, unspecified origin)
- Nickel [air, urban air close to ground]: 0 kg; pedigree (1,1,1,1,1)
  (same comment as for Calcium)
- Chromium [air, urban air close to ground]: 0 kg; pedigree (1,1,1,1,1)
  (same comment as for Calcium)
- Cadmium [air, urban air close to ground]: 0 kg; pedigree (1,1,1,1,1)
  (same comment as for Calcium)
- Mercury [water, ground-, long-term]: 8.54e-9 kg; lognormal variance with pedigree 1.962, pedigree (1,1,5,5,1)
  (same comment as for Titanium, ion)
- Carbon dioxide, fossil [air, non-urban air or from high stacks]: 0.00672 kg; lognormal variance with pedigree 0.462, pedigree (1,1,5,5,1)
  (same comment as for NMVOC, non-methane volatile organic compounds, unspecified origin)
- Particulates, < 2.5 um [air, non-urban air or from high stacks]: 1.28e-7 kg; lognormal variance with pedigree 0.762, pedigree (1,1,5,5,1)
  (same comment as for NMVOC, non-methane volatile organic compounds, unspecified origin)
- Nickel, ion [water, surface water]: 3.37e-10 kg; lognormal variance with pedigree 2.342, pedigree (1,1,5,5,1)
  (same comment as for Calcium)
- Lead [water, ground-, long-term]: 6.49e-7 kg; lognormal variance with pedigree 1.662, pedigree (1,1,5,5,1)
  (same comment as for Titanium, ion)
- Chloride [water, surface water]: 0.00218 kg; lognormal variance with pedigree 0.432, pedigree (1,1,5,5,1)
  Emissions from short-term leachate treatment. Uncertainty calculated depending on waste input and uncertainty of transfer coefficents in landfill and wastewater treatment.
- Titanium [air, non-urban air or from high stacks]: 1.69e-8 kg; lognormal variance with pedigree 1.962, pedigree (1,1,5,5,1)
  (same comment as for NMVOC, non-methane volatile organic compounds, unspecified origin)
- TOC, Total Organic Carbon [water, surface water]: 1.25e-5 kg; lognormal variance with pedigree 0.902, pedigree (1,1,5,5,1)
  (same comment as for Calcium)
- Mercury [air, urban air close to ground]: 0 kg; pedigree (1,1,1,1,1)
  (same comment as for Calcium)
- Silicon [water, surface water]: 4.51e-6 kg; lognormal variance with pedigree 0.902, pedigree (1,1,5,5,1)
  (same comment as for Calcium)
- Zinc [air, urban air close to ground]: 3.5e-14 kg; lognormal variance with pedigree 2.182, pedigree (1,1,5,5,1)
  (same comment as for Calcium)
- Chromium, ion [water, surface water]: 2.23e-13 kg; lognormal variance with pedigree 2.552, pedigree (1,1,5,5,1)
  (same comment as for Calcium)
- Arsenic [air, non-urban air or from high stacks]: 1.11e-11 kg; lognormal variance with pedigree 2.852, pedigree (1,1,5,5,1)
  (same comment as for NMVOC, non-methane volatile organic compounds, unspecified origin)
- Chloride [water, ground-, long-term]: 0.0843 kg; lognormal variance with pedigree 0.172, pedigree (1,1,5,5,1)
  (same comment as for Titanium, ion)
- Silicon [water, ground-, long-term]: 0.00287 kg; lognormal variance with pedigree 4.032, pedigree (1,1,5,5,1)
  (same comment as for Titanium, ion)
- TOC, Total Organic Carbon [water, ground-, long-term]: 0.0681 kg; lognormal variance with pedigree 0.552, pedigree (1,1,5,5,1)
  (same comment as for Titanium, ion)
- Lead [water, surface water]: 4.21e-12 kg; lognormal variance with pedigree 2.692, pedigree (1,1,5,5,1)
  (same comment as for Calcium)
- Carbon monoxide, fossil [air, non-urban air or from high stacks]: 3.81e-7 kg; lognormal variance with pedigree 1.102, pedigree (1,1,5,5,1)
  (same comment as for NMVOC, non-methane volatile organic compounds, unspecified origin)
- NMVOC, non-methane volatile organic compounds, unspecified origin [air, urban air close to ground]: 2e-9 kg; lognormal variance with pedigree 1.072, pedigree (1,1,5,5,1)
  (same comment as for Calcium)
- Methane, fossil [air, non-urban air or from high stacks]: 0.00103 kg; lognormal variance with pedigree 0.502, pedigree (1,1,5,5,1)
  (same comment as for NMVOC, non-methane volatile organic compounds, unspecified origin)
- Cadmium, ion [water, surface water]: 1.51e-11 kg; lognormal variance with pedigree 2.552, pedigree (1,1,5,5,1)
  (same comment as for Calcium)
- Methane, fossil [air, urban air close to ground]: 4.41e-7 kg; lognormal variance with pedigree 0.952, pedigree (1,1,5,5,1)
  (same comment as for Calcium)
- Zinc [air, non-urban air or from high stacks]: 6.89e-13 kg; lognormal variance with pedigree 3.212, pedigree (1,1,5,5,1)
  (same comment as for NMVOC, non-methane volatile organic compounds, unspecified origin)
- Calcium, ion [water, surface water]: 0.000134 kg; lognormal variance with pedigree 0.772, pedigree (1,1,5,5,1)
  (same comment as for Calcium)
- Hydrogen chloride [air, non-urban air or from high stacks]: 3.14e-5 kg; lognormal variance with pedigree 0.962, pedigree (1,1,5,5,1)
  (same comment as for NMVOC, non-methane volatile organic compounds, unspecified origin)
- Chromium VI [water, surface water]: 7.45e-11 kg; lognormal variance with pedigree 2.522, pedigree (1,1,5,5,1)
  (same comment as for Calcium)
- COD, Chemical Oxygen Demand [water, surface water]: 4.93e-5 kg; lognormal variance with pedigree 0.902, pedigree (1,1,5,5,1)
  (same comment as for Calcium)
- Nickel [air, non-urban air or from high stacks]: 1.39e-13 kg; lognormal variance with pedigree 3.422, pedigree (1,1,5,5,1)
  (same comment as for NMVOC, non-methane volatile organic compounds, unspecified origin)
- Chromium VI [water, ground-, long-term]: 5.66e-9 kg; lognormal variance with pedigree 8.862, pedigree (1,1,5,5,1)
  (same comment as for Titanium, ion)
- Cadmium, ion [water, ground-, long-term]: 1.68e-8 kg; lognormal variance with pedigree 1.962, pedigree (1,1,5,5,1)
  (same comment as for Titanium, ion)
- Zinc, ion [water, surface water]: 9.59e-10 kg; lognormal variance with pedigree 2.112, pedigree (1,1,5,5,1)
  (same comment as for Calcium)
- DOC, Dissolved Organic Carbon [water, ground-, long-term]: 0.0681 kg; lognormal variance with pedigree 0.552, pedigree (1,1,5,5,1)
  (same comment as for Titanium, ion)
- Arsenic [air, urban air close to ground]: 2.23e-13 kg; lognormal variance with pedigree 2.342, pedigree (1,1,5,5,1)
  (same comment as for Calcium)
- Carbon monoxide, fossil [air, urban air close to ground]: 2.18e-7 kg; lognormal variance with pedigree 0.632, pedigree (1,1,5,5,1)
  (same comment as for Calcium)
- Silicon [air, urban air close to ground]: 1.64e-7 kg; lognormal variance with pedigree 0.912, pedigree (1,1,5,5,1)
  (same comment as for Calcium)
- Chromium [air, non-urban air or from high stacks]: 3.56e-14 kg; lognormal variance with pedigree 3.592, pedigree (1,1,5,5,1)
  (same comment as for NMVOC, non-methane volatile organic compounds, unspecified origin)

## Sampling procedure
Landfill model based on observed leachate concentrations in literature. Extrapolated to 60'000 years heeding chemical characteristics. Initial waste composition from various literature sources.

## Extrapolations
This dataset has been extrapolated from year 2000 to the year of the calculation (2021). The uncertainty has been adjusted accordingly.
