# allyl chloride production, reaction of propylene and chlorine

Dataset: EcoSpold 2, unit process
Geography: RoW
Time period: 1998-01-01 to 2021-12-31
Technology level: current
Classification: EcoSpold01Categories: chemicals/organics
Classification: ISIC rev.4 ecoinvent: 2011:Manufacture of basic chemicals
Tags: ConvertedDataset
Scenario: Business-as-Usual
System model: Allocation, cut-off by classification
Generated by: Mike Chudacoff
Published in: Jungbluth N. 2007
Database: ecoinvent
isCopyrightProtected: true
accessRestrictedTo: 1

## General comment
Liquid propene is reacted with gaseous chlorine
[This dataset was already contained in the ecoinvent database version 2. It was not individually updated during the transfer to ecoinvent version 3. Life Cycle Impact Assessment results may still have changed, as they are affected by changes in the supply chain, i.e. in other datasets. This dataset was generated following the ecoinvent quality guidelines for version 2. It may have been subject to central changes described in the ecoinvent version 3 change report (http://www.ecoinvent.org/database/ecoinvent-version-3/reports-of-changes/), and the results of the central updates were reviewed extensively. The changes added e.g. consistent water flows and other information throughout the database. The documentation of this dataset can be found in the ecoinvent reports of version 2, which are still available via the ecoinvent website. The change report linked above covers all central changes that were made during the conversion process.]

## Included activities end
Multi-output process that produces three outputs from the reaction of propylene with chlorine: allyl chloride, hydrochloric acid (36wt%) and 1,3-dichloropropene.

## Geography
RER

## Technology
based on industry data in the US and Europe

## Parameters
- fraction, water, completely softened, to air: 0.205 dimensionless; name fraction_WCS_to_air; lognormal variance with pedigree 0.092025, pedigree (4,4,3,2,4)
- fraction, process water, to air: 0.205 dimensionless; name fraction_PW_to_air; lognormal variance with pedigree 0.092025, pedigree (4,4,3,2,4)

## Reference product
- allyl chloride: 0 kg; name RP_amount_1; By-product classification allocatable product; CPC 341: Basic organic chemicals; CAS 107-05-1
  EcoSpold01Location=RER
  production volume 2.7e8 kg; name RP_PV_1
    Data retrived from "Acute exposure guideines level (AEGLs) FOR ALLYL CHLORIDE 107-05-1" (EPA, 2008) . Document refers to data from 1993(http://www.epa.gov/oppt/aegl/pubs/allyl_chloride.pdf, accessed 20150928)
  property price 0.448 EUR2005
    Temporary price data. Calculated as 90% of purchasers price based on: 2,3-dichloropropene is used as a chemical intermediate (Krijgsheld and van der Gen 1986). Based on the International Update Rule data, the production volume of 2,3-dichloropropene reported by U.S. manufacturers was <10,000 pounds (4.5 metric tons) in 2002 (IUR 2002). 2004 prices calculated from Import/Export data (total trades (USD) divided by total weight (kg) in EU27, USA, China, Japan and India) from UN Commodity Trade Statistics Database (http://data.un.org/Explorer.aspxDatabase [Accessed 2 July 2010]). Commodity: 'Chlorinated derivs unsaturated acyclic hydrocarbon nes'
  property heating value, net 22.19 MJ
    LHV is calculated based on the elemental composition of the substance. Based on the CAS number of the substance (000107-05-1), the chemical formula of the substance is found to be: C3H5Cl, (PubChem 2020).
    Reference: Kim, S., Chen, J., Cheng, T., Gindulyte, A., He, J., He, S., Li, Q., Shoemaker, B. A., Thiessen, P. A., Yu, B., Zaslavsky, L., Zhang, J., & Bolton, E. E. (2019). PubChem 2019 update: improved access to chemical data. Nucleic acids research, 47(D1), D1102–D1109. https://doi.org/10.1093/nar/gky1033
  property carbon content 0.473684
    carbon content on a dry matter basis (reserved; not for manual entry)
  property true value 0.448; name RP_amount_1_true_value
    allocation property applied in "true value" allocation // value calculated from revenue
  properties: carbon content, fossil 0.473684, wet mass 1 kg, water content 0, carbon content, non-fossil 0, dry mass 1 kg, water in wet mass 0 kg, carbon allocation 0.473684 kg
- hydrochloric acid, without water, in 30% solution state: 1 kg; name BP_amount_1; By-product classification allocatable product; CPC 34: Basic chemicals; CAS 7647-01-0; pedigree (1,1,1,1,1)
  The exact concentration of the solution state is not available. 30% solution state is assumed to be the most common state of hydrochloric acid.
  production volume 4.509e8 kg; = RP_PV_1 * (BP_amount_1 / RP_amount_1)
    Calculated from production volume of reference product using the relative outputs.
  property price 0.127 EUR2005
    Temporary price data. Calculated as 90% of purchasers price based on: 2004 Import/Export data (total trades (USD) divided by total weight (kg) in EU27, USA, China, Japan and India) from UN Commodity Trade Statistics Database (http://data.un.org/Explorer.aspxDatabase [Accessed 2 July 2010]). Commodity: Hydrogen chloride (hydrochloric acid).
  property heating value, net 3.32 MJ
    LHV is calculated based on the elemental composition of the substance. Based on the CAS number of the substance (007647-01-0), the chemical formula of the substance is found to be: HCl, (PubChem 2020).
    Reference: Kim, S., Chen, J., Cheng, T., Gindulyte, A., He, J., He, S., Li, Q., Shoemaker, B. A., Thiessen, P. A., Yu, B., Zaslavsky, L., Zhang, J., & Bolton, E. E. (2019). PubChem 2019 update: improved access to chemical data. Nucleic acids research, 47(D1), D1102–D1109. https://doi.org/10.1093/nar/gky1033
  property carbon content 0
    carbon content on a dry matter basis (reserved; not for manual entry)
  property true value 0.21209; name BP_amount_1_true_value
    allocation property applied in "true value" allocation // value calculated from revenue
  properties: wet mass 1 kg, water in wet mass 0 kg, carbon content, non-fossil 0, carbon content, fossil 0, dry mass 1 kg, water content 0, carbon allocation 0 kg

## By-products
- dichloropropene: 0 kg; name BP_amount_3; CPC 341: Basic organic chemicals; By-product classification allocatable product; CAS 542-75-6
  EcoSpold01Location=RER
  production volume 3.051e7 kg; = BP_amount_3* RP_PV_1
    Calculated from the production volume of allyl chloride in proportion to the respective output amounts.
  property price 1.24 EUR2005
    (same comment as for allyl chloride)
  property heating value, net 14.21 MJ
    LHV is calculated based on the elemental composition of the substance. Based on the CAS number of the substance (000542-75-6), the chemical formula of the substance is found to be: C3H4Cl2, (PubChem 2020).
    Reference: Kim, S., Chen, J., Cheng, T., Gindulyte, A., He, J., He, S., Li, Q., Shoemaker, B. A., Thiessen, P. A., Yu, B., Zaslavsky, L., Zhang, J., & Bolton, E. E. (2019). PubChem 2019 update: improved access to chemical data. Nucleic acids research, 47(D1), D1102–D1109. https://doi.org/10.1093/nar/gky1033
  property carbon content 0.327273
    carbon content on a dry matter basis (reserved; not for manual entry)
  property true value 0.14012; name BP_amount_3_true_value
    allocation property applied in "true value" allocation // value calculated from revenue
  properties: wet mass 1 kg, water in wet mass 0 kg, carbon content, non-fossil 0, water content 0, carbon content, fossil 0.327273, dry mass 1 kg, carbon allocation 0.327273 kg

## Inputs from technosphere
- heat, district or industrial, natural gas: 0 MJ; pedigree (1,1,1,1,1)
  Uncertainty: industry source
  properties: heating value, net 1 MJ
- spent solvent mixture: -0.00222192 kg; name BP_amount_4; lognormal variance with pedigree 0.0601, pedigree (4,2,5,5,1)
  Approximation
  EcoSpold01Location=CH
  Uncertainty: approximation
  production volume 3.78e6 kg; = BP_amount_4* RP_PV_1
    (same comment as for dichloropropene)
  property price 0 EUR2005; name BP_amount_4_price_EUR2005
  properties: wet mass 1 kg, dry mass 0.835 kg, water content 0.197605, heating value, net 21.7 MJ, carbon content, fossil 0.571257
  note on heating value, net: Value taken from the general comment of the treatment dataset.
  note on carbon content, fossil: Tab A.7, ecoinvent v2.2 report 13_I. C content has been calculated after data in the tables, and then referred to 1 kg DM
- chlorine, liquid: 0.188704 kg; lognormal variance with pedigree 0.0427, pedigree (2,2,5,5,1)
  EcoSpold01Location=RER
  Literature
  Uncertainty: literature
  properties: wet mass 1 kg, dry mass 1 kg
- electricity, medium voltage: 0 kWh; pedigree (1,1,1,1,1)
  EcoSpold01Location=UCTE
  Literature
  Uncertainty: literature
- propylene: 0 kg; pedigree (1,1,1,1,1)
  Literature
  EcoSpold01Location=RER
  Uncertainty: literature
  properties: wet mass 1 kg, carbon content, fossil 0.857143, dry mass 1 kg, heating value, net 43.22 MJ
- heat, district or industrial, other than natural gas: 0 MJ; pedigree (1,1,1,1,1)
  Uncertainty: industry source
  properties: heating value, net 1 MJ
- chemical factory, organics: 6.34833e-11 unit; lognormal variance with pedigree 0.1786, pedigree (4,5,5,5,5)
  EcoSpold01Location=RER
  Infrastructure of a typical plant
  Uncertainty: infrastructure of a typical plant
- wastewater, unpolluted: -5.55479e-7 m3; name BP_amount_2; lognormal variance with pedigree 0.0601, pedigree (4,2,5,5,1)
  Approximation
  EcoSpold01Location=CH
  Uncertainty: approximation
  production volume 945 m3; = BP_amount_2* RP_PV_1
    (same comment as for dichloropropene)
  property price 0 EUR2005; name BP_amount_2_price_EUR2005
  properties: carbon content, fossil 0.00178991, wet mass 1000 kg, water content 2962.17, dry mass 0.337476 kg, carbon content, non-fossil 0.00178991
  note on carbon content, fossil: Assumed to be like in tap water. Bicarbonate content is 2.93 mol/m3. CO2 content is 0.1 mol/m3 (ecoinvent v2.2 report 8, Tab 93.1).
- water, completely softened: 0 kg; name water_softened_input; pedigree (1,1,1,1,1)
  Literature
  EcoSpold01Location=RER
  Uncertainty: literature
  properties: wet mass 1 kg
- heat, district or industrial, natural gas: 0.00402769, 0.261333 MJ (2 entries); lognormal variance with pedigree 0.0427, pedigree (2,2,5,5,1)
  Uncertainty: industry source
- electricity, medium voltage: 0.000289631, 5.55388e-5, 0.000932382, 0.0135607, 0.00191138, 0.00622757 kWh (6 entries); lognormal variance with pedigree 0.0427, pedigree (2,2,5,5,1)
  EcoSpold01Location=UCTE
  Literature
  Uncertainty: literature
- propylene: 0.00202522, 0.105738 kg (2 entries); lognormal variance with pedigree 0.0427, pedigree (2,2,5,5,1)
  Literature
  EcoSpold01Location=RER
  Uncertainty: literature
- heat, district or industrial, other than natural gas: 6.00369e-5, 0.148053 MJ (2 entries); lognormal variance with pedigree 0.0427, pedigree (2,2,5,5,1)
  Uncertainty: industry source
- water, completely softened: 0.073718, 0.0984806 kg (2 entries); lognormal variance with pedigree 0.0427, pedigree (2,2,5,5,1)
  Literature
  EcoSpold01Location=RER
  Uncertainty: literature

## Emissions to nature
- TOC, Total Organic Carbon [water, surface water]: 0.000206321 kg; lognormal variance with pedigree 0.0601, pedigree (4,2,5,5,1)
  Calculation
  Uncertainty: calculation
- COD, Chemical Oxygen Demand [water, surface water]: 0.000555479 kg; lognormal variance with pedigree 0.0601, pedigree (4,2,5,5,1)
  Calculation
  Uncertainty: calculation
- Water [water, unspecified]: 0.000136342 m3; name water_to_water_unspecified; = (water_softened_input/1000)*(1-fraction_WCS_to_air)-0.0000035; lognormal variance with pedigree 0.0827, pedigree (2,2,5,5,1)
  Calculated value based on literature values and expert opinion. See comments in the parametres' comment field.
  property carbon content, fossil 0; name C_content_fossil
  property dry mass 0 kg; name DM
  property carbon content, non-fossil 0; name C_content_non_fossil
  property wet mass 1000 kg; name WM
  property water in wet mass 1000 kg; name WWM
  property fraction, origin: unspecified 0; name fraction_origin_unspecified_Ww
  property fraction, origin: salt water 0; name fraction_origin_salt_water_Ww
  property fraction, origin: fresh water 1; name fraction_origin_fresh_water_Ww
- DOC, Dissolved Organic Carbon [water, surface water]: 0.000206321 kg; lognormal variance with pedigree 0.0601, pedigree (4,2,5,5,1)
  Calculation
  Uncertainty: calculation
- AOX, Adsorbable Organic Halogen as Cl [water, surface water]: 2.38063e-5 kg; lognormal variance with pedigree 0.0601, pedigree (4,2,5,5,1)
  Calculation
  Uncertainty: calculation
- Water [air, unspecified]: 3.53007e-5 m3; name water_to_air_unspecified; lognormal variance with pedigree 0.0827, pedigree (2,2,5,5,1)
  (same comment as for Water)
  property fraction, origin: fresh water 1; name fraction_origin_fresh_water
  property fraction, origin: salt water 0; name fraction_origin_salt_water
  property fraction, origin: unspecified 0; name fraction_origin_unspecified
- BOD5, Biological Oxygen Demand [water, surface water]: 0.000555479 kg; lognormal variance with pedigree 0.0601, pedigree (4,2,5,5,1)
  Calculation
  Uncertainty: calculation

## Extrapolations
This dataset has been copied from an original dataset covering the geography RER. The uncertainty has been adjusted accordingly.

## Review by Bo Weidema 2012-02-17
name change of an intermediate exchange

## Review by Niels Jungbluth 2006-05-26
Passed.
