# foam glass production, electricity from renewable energy products

Dataset: EcoSpold 2, unit process
Geography: RER
Time period: 2005-01-01 to 2021-12-31
Technology level: current
Classification: ISIC rev.4 ecoinvent: 2399:Manufacture of other non-metallic mineral products n.e.c.
Classification: EcoSpold01Categories: insulation materials/production
Synonyms: T4 WDS
Scenario: Business-as-Usual
System model: Allocation, cut-off by classification
Share of production covered: 100 %
Generated by: Tereza Levova
Published in: Kellenberger D. 2007
Database: ecoinvent
isCopyrightProtected: true
accessRestrictedTo: 1

## General comment
Refers to foam glass of a density of 110 kg/m3 and a thermal conductivity of 0.040 W/mK produced by using label-certified electricity.

## Included activities end
Included processes: melting, forming to a pipe, cooling down, smashing, crushing, mixing with carbon powder. Foaming by heating in a mould, cooling, cutting to slabs and packing. Internal processes (workshop, administration etc.), transport of raw materials and energy carrier for furnace, packing and infrastructure are also included.

## Geography
Data are from one company in Belgium which covers nearly 100% of the European foam glass market.

## Technology
All data refer to the year 2005. Today foam glass is made of 68% recycled glass and only recycled glass is used instead of silica sand. Recycled glass is to some extent directly injected to the cellulating furnace without melting, resulting in less energy use. The energy for the melting process is electricity. Natural gas is used for the cellulating process. All emissions from processing raw materials and heating are taken into account.

## Parameters
- fraction, process water, to air: 0.15 dimensionless; name fraction_PW_to_air; lognormal variance with pedigree 0.092025, pedigree (4,4,3,2,4)
  Literature value. In case when no industry/process specific data are available, default evaporation fraction value is used. This value is 15% and is based on literature (Statistics Canada, 2007 & Shaffer, K.H., 2008, Consumptive water use in the Great Lakes Basin, USGS & Shiklomanov, 2003, World Water Resources at the Beginning of the 21st Century) and has been approved by an expert.
- fraction, tap water, to air: 0.15 dimensionless; name fraction_TW_to_air; = fraction_PW_to_air; lognormal variance with pedigree 0.092025, pedigree (4,4,3,2,4)
  Calculated value. See comment in the other parametres present in this dataset. Tap water is considered to be always used as process water, thus process water fractions to air are applied to all tap water input flows to calculate the amount of water consumed in the processes.

## Reference product
- foam glass, electricity from renewable energy products: 1 kg; name foam_glass_RP; By-product classification allocatable product; CPC 37117: Paving blocks, bricks, tiles and other articles of pressed or moulded glass, of a kind used for building or co[…]
  production volume 306252 kg; name RP_PV_1; = 973880/3.18
    Estimated. The global production volume of foam glass produced from glass cullets is extrapolated from European production volume with factor 3.18 (GDP). The production of foam glass, electricity, label-certified is estimated to be 1% of the total production volume.
  property price 1.77 EUR2005; name foam_glass_RP_price_EUR2005
    Estimated to be the same as foam glass.

## By-products
- waste paperboard, unsorted: 0 kg; By-product classification Recyclable; CPC 39240: Waste and scrap of paper or paperboard; pedigree (1,1,1,1,1)
  EcoSpold01Location=CH
  production volume 0 kg; = RP_PV_1 * (BP_amount_2 / foam_glass_RP)
    Calculated from production volume of reference product using the relative outputs.
  property price 0.03924 EUR2005; name BP_amount_2_price_EUR2005
    Temporary price data. Calculated as 90% of purchasers price based on: Assumed to be 10% less than for sorted waste paperboard
  property carbon content, non-fossil 0.483259
    C content was calculated for 1 kg DM, using data in Tab A.3, ecoinvent v2.2 report 13_I.
  property carbon content 0.483259
    carbon content on a dry matter basis (reserved; not for manual entry)
  properties: water in wet mass 0.196 kg, water content 0.243781, dry mass 0.804 kg, carbon content, fossil 0, wet mass 1 kg, heating value, net 15.92 MJ, carbon allocation 0.38854 kg

## Inputs from technosphere
- steel, chromium steel 18/8, hot rolled: 0.0012711 kg; lognormal variance with pedigree 0.040625, pedigree (1,3,5,2,1)
  EcoSpold01Location=RER
  properties: wet mass 1 kg, carbon content, fossil 0.0008, dry mass 1 kg
  note on carbon content, fossil: Stainless steel model is the grade 304 steel (18/8 stainless, 18% chromium 8% nickel; max. 0.08% C)
- soda ash, light, crystalline, heptahydrate: 0.046154 kg; lognormal variance with pedigree 0.040625, pedigree (1,3,5,2,1)
  EcoSpold01Location=RER
  properties: wet mass 1 kg, carbon content, fossil 0.0517241, heating value, net 3.43 MJ, dry mass 1 kg
- electricity, medium voltage, renewable energy products: 1.4969 kWh; lognormal variance with pedigree 0.0426, pedigree (1,3,5,5,1)
- EUR-flat pallet: 0.0015962 unit; lognormal variance with pedigree 0.040625, pedigree (1,3,5,2,1)
  26.4 kg per pallet
  EcoSpold01Location=RER
  properties: water content 0.2, wet mass 22 kg, carbon content, non-fossil 0.58833, dry mass 18.3333 kg, carbon content, fossil 0.0311351, heating value, net 335.11 MJ
  note on carbon content, non-fossil: C content in components of the pallet (ecoinvent v2.2 report 7_part XVIII)
- foam glass factory: 5.102e-10 unit; lognormal variance with pedigree 0.350125, pedigree (1,2,5,2,1)
  EcoSpold01Location=BE
- heat, central or small-scale, other than natural gas: 0.0397582 MJ; lognormal variance with pedigree 0.040625, pedigree (1,3,5,2,1)
  EcoSpold01Location=CH
  properties: heating value, net 1 MJ
- potassium nitrate: 0.0024628 kg; = 0.00034104*101.1/14; lognormal variance with pedigree 0.040625, pedigree (1,3,5,2,1)
  calculated from original value given as kg N
  properties: wet mass 1 kg, dry mass 1 kg
- iron sinter: 0.0004 kg; lognormal variance with pedigree 0.040625, pedigree (1,3,5,2,1)
  EcoSpold01Location=GLO
  properties: wet mass 1 kg, dry mass 1 kg
- clay: 0.00034923 kg; lognormal variance with pedigree 0.040625, pedigree (1,3,5,2,1)
  EcoSpold01Location=CH
  properties: dry mass 0.965 kg, water content 0.0362694, wet mass 1 kg
- packaging film, low density polyethylene: 0.0146 kg; lognormal variance with pedigree 0.040625, pedigree (1,3,5,2,1)
  EcoSpold01Location=RER
  properties: heating value, net 42.47 MJ, dry mass 1 kg, wet mass 1 kg, carbon content, fossil 0.857143
  note on carbon content, fossil: Polyethylene is formed out of a huge amount of ethylene monomers (C2H4) (ecoinvent v2.2 report 11_II). MW=28 g/mol
- manganese concentrate: 0.026154 kg; lognormal variance with pedigree 0.040625, pedigree (1,3,5,2,1)
  EcoSpold01Location=GLO
  properties: wet mass 1 kg, dry mass 1 kg
- glass cullet, sorted: 0.81385 kg; name glass_cullet_input
  properties: dry mass 1 kg, wet mass 1 kg
- carbon black: 0.0061538 kg; lognormal variance with pedigree 0.040625, pedigree (1,3,5,2,1)
  EcoSpold01Location=GLO
  properties: carbon content, fossil 0.85, wet mass 1 kg, dry mass 1 kg, heating value, net 25.76 MJ
- molybdenum: 7.6923e-5 kg; lognormal variance with pedigree 0.040625, pedigree (1,3,5,2,1)
  EcoSpold01Location=RER
  properties: dry mass 1 kg, wet mass 1 kg
- waste wood, untreated: -0.042138 kg; name BP_amount_3; lognormal variance with pedigree 0.040625, pedigree (1,3,5,2,1)
  EcoSpold01Location=CH
  26.4 kg per pallet
  production volume 12904.8 kg; = RP_PV_1 * (BP_amount_3 / foam_glass_RP)
    Calculated from production volume of reference product using the relative outputs.
  property price 0 EUR2005; name BP_amount_3_price_EUR2005
  properties: wet mass 1 kg, heating value, net 13.99 MJ, carbon content, non-fossil 0.48632, dry mass 0.8 kg, water content 0.25
  note on heating value, net: Value taken from the general comment of the treatment dataset.
  note on carbon content, non-fossil: Tab A.4, ecoinvent v2.2 report 13_I. C content has been referred to 1 kg DM,
- iron ore concentrate: 0.027692 kg; lognormal variance with pedigree 0.040625, pedigree (1,3,5,2,1)
  EcoSpold01Location=GLO
  properties: dry mass 1 kg, wet mass 1 kg
- sodium sulfate, anhydrite: 0.0053846 kg; lognormal variance with pedigree 0.040625, pedigree (1,3,5,2,1)
  EcoSpold01Location=RER
  properties: wet mass 1 kg, dry mass 1 kg
- wastewater, average: 0 m3; name BP_amount_4; pedigree (1,1,1,1,1)
  EcoSpold01Location=CH
  production volume 0 m3
    Calculated from production volume of reference product using the relative outputs.
  property price 0 EUR2005; name BP_amount_4_price_EUR2005
  properties: wet mass 1000 kg, carbon content, non-fossil 0.194039, dry mass 0.346837 kg, water content 2882.2
  note on carbon content, non-fossil: 0.0673 kg TOC/m3 (Tab A.17, ecoinvent v2.2 report 13_I). TOC was considered as Total Carbon.
- heat, district or industrial, natural gas: 11.0352 MJ; lognormal variance with pedigree 0.040625, pedigree (1,3,5,2,1)
  EcoSpold01Location=RER
  properties: heating value, net 1 MJ
- feldspar: 0.25846 kg; lognormal variance with pedigree 0.040625, pedigree (1,3,5,2,1)
  EcoSpold01Location=RER
  properties: wet mass 1 kg, dry mass 1 kg
- corrugated board box: 0.0073077 kg; lognormal variance with pedigree 0.040625, pedigree (1,3,5,2,1)
  EcoSpold01Location=RER
  properties: water content 0.0582011, dry mass 0.945 kg, wet mass 1 kg, heating value, net 12.86 MJ, carbon content, fossil 0.000486772, carbon content, non-fossil 0.433862
  note on carbon content, fossil: Fossil C content was calculated after fossil C contents of chemicals used in the production of board (Tab 10-15 & 10.16 ecoinvent v2.2 report 11_III, part 10)
  note on carbon content, non-fossil: Biogenic C content was calculated after biogenic C contents of chemicals used in the production of board (Tab 10.15 & 10.16, ecoinvent v2.2 report 11_III, part 10).
- aluminium hydroxide: 0.0064 kg; lognormal variance with pedigree 0.040625, pedigree (1,3,5,2,1)
  EcoSpold01Location=RER
  properties: wet mass 1 kg, dry mass 1 kg
- diesel, burned in building machine: 0.096241 MJ; lognormal variance with pedigree 0.040625, pedigree (1,3,5,2,1)
  EcoSpold01Location=GLO
  properties: heating value, net 1 MJ
- tap water: 0.036923 kg; name tap_water_input; lognormal variance with pedigree 0.040625, pedigree (1,3,5,2,1)
  EcoSpold01Location=RER
  properties: carbon content, fossil 0.00178991, wet mass 1 kg, dry mass 0.000337476 kg, water content 2962.17
  note on carbon content, fossil: Bicarbonate content is 2.93 mol/m3. CO2 content is 0.1 mol/m3 (ecoinvent v2.2 report 8, Tab 93.1).
- waste sealing sheet, polyethylene: -0.0146 kg; name BP_amount_1; lognormal variance with pedigree 0.040625, pedigree (1,3,5,2,1)
  EcoSpold01Location=CH
  production volume 4471.27 kg; = RP_PV_1 * (BP_amount_1 / foam_glass_RP)
    Calculated from production volume of reference product using the relative outputs.
  property price 0 EUR2005; name BP_amount_1_price_EUR2005
  properties: carbon content, fossil 0.851042, wet mass 1 kg, dry mass 0.96 kg, water content 0.0416667, heating value, net 42.47 MJ
  note on carbon content, fossil: C content in 1 kg DM was calculated using data in Tab A.5, ecoinvent v2.2 report 13_I
- waste paperboard, unsorted: -0.0073077 kg; lognormal variance with pedigree 0.040625, pedigree (1,3,5,2,1)
  EcoSpold01Location=CH
  production volume 2237.99 kg
  properties: carbon content, non-fossil 0.483259, water content 0.243781, dry mass 0.804 kg, wet mass 1 kg, heating value, net 15.92 MJ
  note on carbon content, non-fossil: C content was calculated for 1 kg DM, using data in Tab A.3, ecoinvent v2.2 report 13_I.
- wastewater, average: -0.000187415, -2.02748e-5 m3 (2 entries); lognormal variance with pedigree 0.040125, pedigree (1,2,5,2,1)
  EcoSpold01Location=CH
  production volume 63.6054 m3

## Inputs from nature
- Water, well, in ground [natural resource, in water]: 0.00023692 m3; name water_well_in_ground_input; lognormal variance with pedigree 0.040625, pedigree (1,3,5,2,1)

## Emissions to nature
- Carbon dioxide, fossil [air, non-urban air or from high stacks]: 0.029385 kg; lognormal variance with pedigree 0.042625, pedigree (3,3,5,2,1)
- Water [air, unspecified]: 4.10765e-5 m3; name water_to_air_unspecified; = (tap_water_input/1000)*fraction_TW_to_air+water_well_in_ground_input*fraction_PW_to_air; lognormal variance with pedigree 0.130025, pedigree (4,4,5,2,4)
  Calculated value based on literature values and expert opinion. See comments in the parametres' comment field.
  property fraction, origin: salt water 0; name fraction_origin_salt_water
  property fraction, origin: fresh water 1; name fraction_origin_fresh_water
  property fraction, origin: unspecified 0; name fraction_origin_unspecified
- Nitrogen oxides [air, non-urban air or from high stacks]: 0.001 kg; lognormal variance with pedigree 0.082625, pedigree (3,3,5,2,1)
- Sulfur dioxide [air, non-urban air or from high stacks]: 0.00023077 kg; lognormal variance with pedigree 0.042625, pedigree (3,3,5,2,1)
- Particulates, < 2.5 um [air, non-urban air or from high stacks]: 4.57e-5 kg; lognormal variance with pedigree 0.350125, pedigree (1,2,5,2,1)
- Water [water, unspecified]: 2.50765e-5 m3; name water_to_water_unspecified; = (tap_water_input/1000)*(1-fraction_TW_to_air)+water_well_in_ground_input*(1-fraction_PW_to_air)-0.00020769; lognormal variance with pedigree 0.130025, pedigree (4,4,5,2,4)
  (same comment as for Water)
  property fraction, origin: unspecified 0; name fraction_origin_unspecified_Ww
  property fraction, origin: salt water 0; name fraction_origin_salt_water_Ww
  property fraction, origin: fresh water 1; name fraction_origin_fresh_water_Ww

## Sampling procedure
survey

## Extrapolations
This dataset has been extrapolated from year 2005 to the year of the calculation (2021). The uncertainty has been adjusted accordingly.

## Review by Emilia Moreno Ruiz 2013-01-18
to model foam glass that uses label-certified electricity
