# 1,1-difluoroethane production, HFC-152a

Dataset: EcoSpold 2, unit process
Geography: US
Time period: 2005-01-01 to 2021-12-31
Technology level: current
Classification: ISIC rev.4 ecoinvent: 2011:Manufacture of basic chemicals
Classification: EcoSpold01Categories: chemicals/organics
Synonyms: R152a; 1,1-Difluoroethylene
Tags: ConvertedDataset
Scenario: Business-as-Usual
System model: Allocation, cut-off by classification
Share of production covered: 50 %
Generated by: Niels Jungbluth
Published in: Jungbluth, N. 2007
Database: ecoinvent
isCopyrightProtected: true
accessRestrictedTo: 1

## General comment
Basic inventory based on cumulative data.
[This dataset was already contained in the ecoinvent database version 2. It was not individually updated during the transfer to ecoinvent version 3. Life Cycle Impact Assessment results may still have changed, as they are affected by changes in the supply chain, i.e. in other datasets. This dataset was generated following the ecoinvent quality guidelines for version 2. It may have been subject to central changes described in the ecoinvent version 3 change report (http://www.ecoinvent.org/database/ecoinvent-version-3/reports-of-changes/), and the results of the central updates were reviewed extensively. The changes added e.g. consistent water flows and other information throughout the database. The documentation of this dataset can be found in the ecoinvent reports of version 2, which are still available via the ecoinvent website. The change report linked above covers all central changes that were made during the conversion process.]

## Included activities end
Pre-products, energy use, infrastructure, some air emissions and transports. No full information on all air and water emissions available.

## Geography
Production plant of DuPont in the United States.

## Technology
Fluoropolymer chemistry.

## Time period
Time of publications.

## Reference product
- 1,1-difluoroethane, HFC-152a: 1 kg; By-product classification allocatable product; CPC 341: Basic organic chemicals; CAS 75-37-6
  EcoSpold01Location=US
  production volume 2.5e6 kg
    Not known
    Assumed to be 1/3 of global production volume
  property heating value, net 18.36 MJ
    LHV is calculated based on the elemental composition of the substance. Based on the CAS number of the substance (000075-37-6), the chemical formula of the substance is found to be: C2H4F2, (PubChem 2020).
    Reference: Kim, S., Chen, J., Cheng, T., Gindulyte, A., He, J., He, S., Li, Q., Shoemaker, B. A., Thiessen, P. A., Yu, B., Zaslavsky, L., Zhang, J., & Bolton, E. E. (2019). PubChem 2019 update: improved access to chemical data. Nucleic acids research, 47(D1), D1102–D1109. https://doi.org/10.1093/nar/gky1033
  property price 1.9 EUR2005
    Calculated value based on data from United Nations Commodity Trade Statistics Database (comtrade.un.org). UN comtrade category: 2826 Fluorides and complex fluorines salts. Year 2005. Using exchange rate of 1EURO = 1.209 USD. Average of price of import into 5 main markets (EU, US, JP, IN and CN).
  property carbon content 0.363636
    carbon content on a dry matter basis (reserved; not for manual entry)
  properties: dry mass 1 kg, water content 0, carbon content, non-fossil 0, carbon content, fossil 0.363636, water in wet mass 0 kg, wet mass 1 kg, carbon allocation 0.363636 kg

## Inputs from technosphere
- electricity, medium voltage: 1.0889 kWh; lognormal variance with pedigree 0.1206, pedigree (5,3,5,1,1)
  Rough estimation based on cumulative data, Krieger et al. 2006
  EcoSpold01Location=US
  Uncertainty: Rough estimation based on cumulative data, Krieger et al. 2006
- acetylene: 0.42733 kg; lognormal variance with pedigree 0.1206, pedigree (5,3,5,1,1)
  Acetylen yield is 92.4%
  EcoSpold01Location=CH
  Uncertainty: Acetylen yield is 92.4%
  properties: carbon content, fossil 0.923077, wet mass 1 kg, dry mass 1 kg, heating value, net 51.2 MJ
  note on carbon content, fossil: C2H2. ecoinvent v2.2 report n 8. Produced from partial oxidation of natural gas
  note on heating value, net: Based on literature, page 25 (Value may refer to HHV), Althaus H.-J., Chudacoff M., Hischier R., Jungbluth N., Osses M. and Primas A. (2007) Life Cycle Inventories of Chemicals. Final report ecoinvent data v2.0 No. 8. EMPA, Swiss Centre for Life Cycle Inventories, Dübendorf, CH, Online-Version under: www.ecoinvent.org.
- hydrogen fluoride: 0.63699 kg; lognormal variance with pedigree 0.1206, pedigree (5,3,5,1,1)
  EcoSpold01Location=GLO
  Rough estimation based on cumulative data, Krieger et al. 2006
  Uncertainty: Rough estimation based on cumulative data, Krieger et al. 2006
  properties: wet mass 1 kg, dry mass 1 kg, heating value, net 6.06 MJ
- lime, hydrated, packed: 0.021387 kg; lognormal variance with pedigree 0.1206, pedigree (5,3,5,1,1)
  Rough estimation based on cumulative data, Krieger et al. 2006
  EcoSpold01Location=CH
  Uncertainty: Rough estimation based on cumulative data, Krieger et al. 2006
  properties: wet mass 1 kg, dry mass 0.997 kg, water content 0.00300903
- chemical factory, organics: 4e-10 unit; lognormal variance with pedigree 0.4206, pedigree (5,3,5,1,1)
  Rough estimation based on cumulative data, Krieger et al. 2006
  EcoSpold01Location=RER
  Uncertainty: Rough estimation based on cumulative data, Krieger et al. 2006
- heat, district or industrial, natural gas: 0.931 MJ; lognormal variance with pedigree 0.1206, pedigree (5,3,5,1,1)
  EcoSpold01Location=RER
  Rough estimation based on cumulative data, Krieger et al. 2006
  Uncertainty: Rough estimation based on cumulative data, Krieger et al. 2006
  properties: heating value, net 1 MJ
- zinc: 0.0019676 kg; lognormal variance with pedigree 0.1206, pedigree (5,3,5,1,1)
  (same comment as for heat, district or industrial, natural gas)
  properties: dry mass 1 kg, wet mass 1 kg

## Emissions to nature
- Ethane, 1,1-difluoro-, HFC-152a [air, urban air close to ground]: 0.013583 kg; lognormal variance with pedigree 0.1606, pedigree (5,3,5,1,1)
  Rough estimation based on cumulative data, Krieger et al. 2006
  Uncertainty: Rough estimation based on cumulative data, Krieger et al. 2006

## Sampling procedure
Publication of cumulative data.

## Extrapolations
This dataset has been extrapolated from year 2006 to the year of the calculation (2021). The uncertainty has been adjusted accordingly.

## Review by Roberto Dones 2007-09-13
Passed.
none
