# building construction, multi-storey

Dataset: EcoSpold 2, unit process
Geography: RoW
Time period: 1995-01-01 to 2021-12-31
Technology level: current
Classification: ISIC rev.4 ecoinvent: 4100:Construction of buildings
Classification: EcoSpold01Categories: construction processes/buildings
Synonyms: house; multi-story; Haus
Tags: ConvertedDataset
Scenario: Business-as-Usual
System model: Allocation, cut-off by classification
Generated by: Daniel Kellenberger (obsolete)
Published in: Kellenberger D. 2007
Database: ecoinvent
isCopyrightProtected: true
accessRestrictedTo: 1

## General comment
The combination of two concrete buildings, one built in 1927 and the other in 1972, makes this module a sort of average of existing multi-storey buildings. The life of the building is assumed to be 80 years. This module should not be used if its relative importance would be high in a certain environmental inventory.
[This dataset was already contained in the ecoinvent database version 2. It was not individually updated during the transfer to ecoinvent version 3. Life Cycle Impact Assessment results may still have changed, as they are affected by changes in the supply chain, i.e. in other datasets. This dataset was generated following the ecoinvent quality guidelines for version 2. It may have been subject to central changes described in the ecoinvent version 3 change report (http://www.ecoinvent.org/database/ecoinvent-version-3/reports-of-changes/), and the results of the central updates were reviewed extensively. The changes added e.g. consistent water flows and other information throughout the database. The documentation of this dataset can be found in the ecoinvent reports of version 2, which are still available via the ecoinvent website. The change report linked above covers all central changes that were made during the conversion process.]

## Included activities end
Includes the most important materials used and their disposal, the transportation of the parts to the building site and to the final disposal at the end of life. Also included is the requirement of electricity for construction, maintenance and demolition. Operation is not included.

## Geography
Certain elementary flows or intermediate product flows are RER, UCPTE or GLO modules

## Technology
The two concrete multi-storey buildings used to make this module were built in 1927 and 1972, but they can be assumed to reflect a sort of average of existing buildings as they are weighted.

## Reference product
- building, multi-storey: 1 m3; CPC 531: Buildings; By-product classification allocatable product
  EcoSpold01Location=RER
  production volume 2.67763 m3
    This is a placeholder value that does not reflect real-world production volumes. This dataset does not currently require a real-world production volume to work in the database framework, and no actual data were collected yet. This has no negative effect on the results of the ecoinvent database.
  property price 108.613 EUR2005
    Calculated based on inputs: The price of the product has been calculated as a sum of the values of the material and energy inputs for this product. This value is therefore a rough estimation. It may underestimate the real price since there are additional expenses when producing any product. These expences can include for example labour costs, treatment of waste materials and profit for the producer. Please consider carefully whether this level of data quality is acceptable for your application.

## Inputs from technosphere
- flat glass, coated: 3.08 kg; lognormal variance with pedigree 0.1406, pedigree (2,5,5,5,4)
  EcoSpold01Location=RER
  Uncertainty: ;
  properties: dry mass 1 kg, wet mass 1 kg
- electricity, medium voltage: 0 kWh; pedigree (1,1,1,1,1)
  EcoSpold01Location=UCTE
  Uncertainty: ;
- stone wool, packed: 1.3 kg; lognormal variance with pedigree 0.1406, pedigree (2,5,5,5,4)
  EcoSpold01Location=CH
  Uncertainty: ;
  properties: carbon content, fossil 0.015401, dry mass 1 kg, wet mass 1 kg
  note on carbon content, fossil: The chemical composition of the glass fibres used in the rock wool production is similar to the composition of naturally cooled volcano basalt and has a composition listed in Tab. 3.1 and 3.2 in ecoinvent v2.2 report 16, part XIV. Rock wool contains: a minimum of 96% mineral fibres,between 0.5 and 3.0 weight percent of phenolic resin depending on the specific product characteristics, and about 0.2 percent mineral oil (ecoinvent v2.2 report 16, part XIV). An average composition of 1.8% phenolic resin, 0.2% mineral oil, and 98% mineral fibres has been assumed and used to calculate C content of the rock wool
- waste brick: -178 kg; lognormal variance with pedigree 0.1406, pedigree (2,5,5,5,4)
  EcoSpold01Location=CH
  Uncertainty: ;
  production volume 534 kg
    Calculated from the production volume of building, multi-storey in proportion to the respective output amounts.
  properties: dry mass 1 kg, wet mass 1 kg
- copper, cathode: 8.48 kg; lognormal variance with pedigree 0.1406, pedigree (2,5,5,5,4)
  EcoSpold01Location=RER
  Uncertainty: ;
  properties: dry mass 1 kg, wet mass 1 kg
- reinforcing steel: 7.17 kg; lognormal variance with pedigree 0.1406, pedigree (2,5,5,5,4)
  EcoSpold01Location=RER
  Uncertainty: ;
  properties: wet mass 1 kg, carbon content, fossil 0.004, dry mass 1 kg
- waste glass sheet: -3.08 kg; lognormal variance with pedigree 0.1406, pedigree (2,5,5,5,4)
  EcoSpold01Location=CH
  Uncertainty: ;
  production volume 9.24 kg
    (same comment as for waste brick)
  properties: dry mass 1 kg, wet mass 1 kg
- waste mineral wool: -1.3 kg; lognormal variance with pedigree 0.1406, pedigree (2,5,5,5,4)
  EcoSpold01Location=CH
  Uncertainty: ;
  production volume 3.9 kg
    (same comment as for waste brick)
  properties: dry mass 1 kg, wet mass 1 kg
- packaging film, low density polyethylene: 0.925 kg; lognormal variance with pedigree 0.1406, pedigree (2,5,5,5,4)
  EcoSpold01Location=RER
  Uncertainty: ;
  properties: dry mass 1 kg, wet mass 1 kg, heating value, net 42.47 MJ, carbon content, fossil 0.857143
  note on carbon content, fossil: Polyethylene is formed out of a huge amount of ethylene monomers (C2H4) (ecoinvent v2.2 report 11_II). MW=28 g/mol
- waste reinforced concrete: -239 kg; lognormal variance with pedigree 0.1406, pedigree (2,5,5,5,4)
  EcoSpold01Location=CH
  Uncertainty: ;
  production volume 717 kg
    (same comment as for waste brick)
  properties: water content 0.00585407, dry mass 0.99418 kg, wet mass 1 kg
- extrusion, plastic film: 0.925 kg; lognormal variance with pedigree 0.1406, pedigree (2,5,5,5,4)
  EcoSpold01Location=RER
  Uncertainty: ;
- aluminium, wrought alloy: 8.48 kg; lognormal variance with pedigree 0.1406, pedigree (2,5,5,5,4)
  EcoSpold01Location=RER
  Uncertainty: ;
  properties: dry mass 1 kg, wet mass 1 kg
- clay brick: 178 kg; lognormal variance with pedigree 0.1406, pedigree (2,5,5,5,4)
  EcoSpold01Location=RER
  Uncertainty: ;
  properties: wet mass 1 kg, dry mass 1 kg
- waste wood, untreated: 0 kg; pedigree (1,1,1,1,1)
  EcoSpold01Location=CH
  Uncertainty: ;
  production volume 0 kg
    (same comment as for waste brick)
  properties: carbon content, non-fossil 0.48632, water content 0.25, heating value, net 13.99 MJ, wet mass 1 kg, dry mass 0.8 kg
  note on carbon content, non-fossil: Tab A.4, ecoinvent v2.2 report 13_I. C content has been referred to 1 kg DM,
  note on heating value, net: Value taken from the general comment of the treatment dataset.
- waste sealing sheet, polyethylene: -0.925 kg; lognormal variance with pedigree 0.1406, pedigree (2,5,5,5,4)
  EcoSpold01Location=CH
  Uncertainty: ;
  production volume 2.775 kg
    (same comment as for waste brick)
  properties: carbon content, fossil 0.851042, dry mass 0.96 kg, wet mass 1 kg, heating value, net 42.47 MJ, water content 0.0416667
  note on carbon content, fossil: C content in 1 kg DM was calculated using data in Tab A.5, ecoinvent v2.2 report 13_I
- polyvinylchloride, emulsion polymerised: 0.118085 kg; lognormal variance with pedigree 0.1406, pedigree (2,5,5,5,4)
  EcoSpold01Location=RER
  Uncertainty: ;
  properties: carbon content, fossil 0.387097, heating value, net 21.5 MJ, dry mass 1 kg, wet mass 1 kg
  note on carbon content, fossil: Monomer is vynyl chloride, C2H3Cl (ecoinvent v2.2 report 11_II). MW=62 g/mol
- concrete, normal: 0 m3; pedigree (1,1,1,1,1)
  EcoSpold01Location=CH
  Uncertainty: ;
  properties: water content 0.086758, dry mass 2190 kg, wet mass 2380 kg
- waste polyvinylchloride product: -0.925 kg; lognormal variance with pedigree 0.1406, pedigree (2,5,5,5,4)
  EcoSpold01Location=CH
  Uncertainty: ;
  production volume 2.775 kg
    (same comment as for waste brick)
  properties: dry mass 0.998 kg, wet mass 1 kg, carbon content, fossil 0.440882, water content 0.00200401, heating value, net 21.51 MJ
- cement mortar: 0 kg; pedigree (1,1,1,1,1)
  EcoSpold01Location=CH
  Uncertainty: ;
  properties: dry mass 1 kg, wet mass 1 kg
- waste cement in concrete and mortar: -61.7 kg; lognormal variance with pedigree 0.1406, pedigree (2,5,5,5,4)
  EcoSpold01Location=CH
  Uncertainty: ;
  production volume 185.1 kg
    (same comment as for waste brick)
  properties: wet mass 1 kg, dry mass 0.995 kg, water content 0.00502513
- waste bulk iron, excluding reinforcement: -17 kg; lognormal variance with pedigree 0.1406, pedigree (2,5,5,5,4)
  EcoSpold01Location=CH
  Uncertainty: ;
  production volume 51 kg
    (same comment as for waste brick)
  properties: dry mass 1 kg, wet mass 1 kg
- polyvinylchloride, suspension polymerised: 0.806914 kg; lognormal variance with pedigree 0.1406, pedigree (2,5,5,5,4)
  EcoSpold01Location=RER
  Uncertainty: ;
  properties: carbon content, fossil 0.387097, dry mass 1 kg, wet mass 1 kg, heating value, net 21.5 MJ
- diesel, burned in building machine: 15 MJ; lognormal variance with pedigree 0.1406, pedigree (2,5,5,5,4)
  EcoSpold01Location=GLO
  Uncertainty: ;
  properties: heating value, net 1 MJ
- sawnwood, softwood, dried (u=10%), planed: 0.0617 m3; lognormal variance with pedigree 0.1406, pedigree (2,5,5,5,4)
  EcoSpold01Location=RER
  Uncertainty: ;
  properties: water content 0.1, wet mass 495 kg, carbon content, non-fossil 0.494, dry mass 450 kg, heating value, net 6625.26 MJ
  note on carbon content, non-fossil: C content of dry mass is 0.494 kgC/kg dry wood (ecoinvent v2.2 report 9)
- electricity, medium voltage: 0.00378156, 0.00072514, 0.0121736, 0.177054, 0.0249558, 0.0813099 kWh (6 entries); lognormal variance with pedigree 0.1406, pedigree (2,5,5,5,4)
  EcoSpold01Location=UCTE
  Uncertainty: ;
- waste wood, untreated: -2.06921, -0.256923, -0.018784, -0.72162, -0.10902, -0.172351, -27.4521 kg (7 entries); lognormal variance with pedigree 0.1406, pedigree (2,5,5,5,4)
  EcoSpold01Location=CH
  Uncertainty: ;
  production volume 92.4 kg
- concrete, normal: 0.0020966, 0.000218463, 0.00176861, 0.000994846, 0.00421289, 0.000142098, 0.0832665 m3 (7 entries); lognormal variance with pedigree 0.1406, pedigree (2,5,5,5,4)
  EcoSpold01Location=CH
  Uncertainty: ;
- cement mortar: 0.308885, 61.3911 kg (2 entries); lognormal variance with pedigree 0.1406, pedigree (2,5,5,5,4)
  EcoSpold01Location=CH
  Uncertainty: ;

## Sampling procedure
most data obtained by personal communication

## Extrapolations
See geography This dataset has been copied from an original dataset covering the geography RER. The uncertainty has been adjusted accordingly.

## Review by Roberto Dones 2009-01-22
passed
