# esterification of vegetable oils and animal fats, average mix

Dataset: EcoSpold 2, unit process
Geography: BR
Time period: 2018-01-01 to 2021-12-31
Technology level: current
Classification: ISIC rev.4 ecoinvent: 1920:Manufacture of refined petroleum products
Classification: EcoSpold01Categories: biomass/fuels
Synonyms: biodiesel production; fatty acids methyl ester production
Scenario: Business-as-Usual
System model: Allocation, cut-off by classification
Share of production covered: 60.2 %
Generated by: F. Valebona; T. B. Rocha; F. L. Motta
Published in: Valebona, F. 2021
Database: ecoinvent
isCopyrightProtected: true
accessRestrictedTo: 1

## General comment
This dataset represents the production of the Brazilian average mix of vegetable oils and animal fats methyl ester, and the respective glycerine. The fatty acid methyl esther is produced by the reaction of oils and fats with an alcohol and catalysers.
Data was obtained under the scope of the National Biofuel Policy (RenovaBio), implemented in 2017 by the Brazilian Federal Government seeking to expand the share of biofuels in the energy mix. On its framework, biofuels producers are subjected to a certification process, which requires Life Cycle Inventory data collection used to calculate the environmental efficiency (climate change category) of its product. Until the present study, 19 biodiesel producers have been certified and their LCI data are used in this dataset for describing the esterification process. All producers report using the methylic production route (i.e. methanol) and base catalysers (i.e. sodium hydroxide and sodium methoxide).
For the certification, all information regarding the esterification process does not differentiate raw material sources (soybean, animal fat or other oils) because it represents better the producer’s practice. Therefore, the created dataset has different raw material inputs in the same process. The raw material share is set to represent the national average.
Fatty acids methyl ester production in Brazil has two major sources: Crude soybean oil and animal fat. In 2018, soybean oil represented 69.8 % and animal fat 16.2 % of the raw material market, while cottonseed oil was responsible for 0.9 % (ANP, 2019). Minor sources (13.0 %) include palm oil, peanut oil, sunflower oil, castor oil, canola oil, corn oil, used frying oil and other materials. In this dataset, the shares of soybean oil, animal fat and cottonseed oil are scaled up to represent 100% of the raw material mix (80.28% soybean oil; 18.65% animal fat; and, 1.07% cottonseed oil). Density of methyl ester = 0.88 kg/l.
This dataset was developed under the Cornerstone project, an initiative from the Brazilian Business Network on Life cycle Assessment (Rede ACV) in collaboration with ecoinvent to increase the quantity and quality of inventories that represent Brazil, through a thorough adaptation of the datasets. More information about this project is available in: redeacv.org.br/en/wg-database/.
References:
ANP (2019). Petroleum, Gas and Biofuels National Agency Statistical Yeakbook 2019. Available at: www.anp.gov.br/publicacoes/anuario-estatistico/5237-anuario-estatistico-2019.
ANP (2020). Eletronic System of Informations – SEI.

## Included activities start
From reception of raw materials at the factory gate through esterification of vegetable oils and animal fat.

## Included activities end
System boundary is at the esterification plant. The product is ready for regional transportation to fuel distribution points, where biodiesel may be blended with fossil diesel.

## Geography
Brazil.

## Technology
Typical vegetable oil esterification plant designed for the production of methyl ester (for use in the vehicle fuels market). All producers report using the methylic production route with base catalysers (i.e. sodium hydroxide and sodium methoxide).

## Time period
Data representing the 2018 average. Water consumption estimated according to value reported in the ‘esterification of soybean oil’ dataset representing the global region for the year of 2009.

## Reference product
- fatty acid methyl ester: 1 kg; name ME; source ANP 2020; By-product classification allocatable product; CPC 35491: Biodiesel; pedigree (1,1,1,1,1)
  Biodiesel; produced from esterification of crude vegetable oils and animal fat. Weighted average of 19 biodiesel producers.
  production volume 4.70803e9 kg; name ME_PV
    Produced biodiesel in Brasil during 2018.
  property price 0.817 EUR2005; name ME_price_EUR2005
    Temporary price data. Calculated as 90% of purchasers price based on: 2004 import and export prices (total trades (USD) divided by total weight (kg) in EU27, USA, China, Japan and India) from UN Commodity Trade Statistics Database (http://data.un.org/Explorer.aspxDatabase [Accessed 2 July 2010]). Commodity: 'Veg fats, oils or fractions hydrogenated, esterified'.
  property carbon content 0.773
    carbon content on a dry matter basis (reserved; not for manual entry)
  property true value 0.817; name ME_true_value
    allocation property applied in "true value" allocation // value calculated from revenue
  properties: water content 0, carbon content, fossil 0.041, water in wet mass 0 kg, wet mass 1 kg, dry mass 1 kg, carbon content, non-fossil 0.732, carbon allocation 0.773 kg

## By-products
- glycerine: 0 kg; source ANP 2020; CPC 34570: Glycerol; By-product classification allocatable product; CAS 56-81-5; pedigree (1,1,1,1,1)
  Measured value. Weighted average of 19 biodiesel producers.
  EcoSpold01Location=US
  production volume 6.3264e8 kg; = ME_PV*glycerine/ME
    Calculated relative to output of methyl ester
  property price 0.792 EUR2005; name glycerine_price_EUR2005
    Temporary price data. Calculated as 90% of purchasers price based on: 2004 import and export prices (total trades (USD) divided by total weight (kg) in EU27, USA, China, Japan and India) from UN data - Glycerol (glycerine), nes including synthetic glycerol (http://data.un.org/Data.aspx?q=glycerine&d=ComTrade&f=_l1Code%3a16%3bcmdCode%3a152090; accessed 1 July 10)
  property heating value, net 22.38 MJ
    LHV is calculated based on the elemental composition of the substance. Based on the CAS number of the substance (000056-81-5), the chemical formula of the substance is found to be: C3H8O3, (PubChem 2020).
    Reference: Kim, S., Chen, J., Cheng, T., Gindulyte, A., He, J., He, S., Li, Q., Shoemaker, B. A., Thiessen, P. A., Yu, B., Zaslavsky, L., Zhang, J., & Bolton, E. E. (2019). PubChem 2019 update: improved access to chemical data. Nucleic acids research, 47(D1), D1102–D1109. https://doi.org/10.1093/nar/gky1033
  property carbon content 0.391304
    carbon content on a dry matter basis (reserved; not for manual entry)
  property true value 0.106425; name glycerine_true_value
    allocation property applied in "true value" allocation // value calculated from revenue
  properties: dry mass 1 kg, carbon content, non-fossil 0.391304, water in wet mass 0 kg, wet mass 1 kg, carbon content, fossil 0, water content 0, carbon allocation 0.391304 kg

## Inputs from technosphere
- tap water: 0.0126588 kg; name tap_water_input; = 0.0480312779267202/3.357; source Omni Tech International  2010; lognormal variance with pedigree 0.0207, pedigree (1,2,4,5,2)
  Water consumption estimated according to soybean esterification plants from US. Value reported in the original GLO dataset (0.048 kg) scaled to the the production of 1 kg of fatty acid methyl esther.
  properties: water content 2962.17, carbon content, fossil 0.00178991, dry mass 0.000337476 kg, wet mass 1 kg
- wastewater, average: -4.24957e-5 m3; name sewage; = (0.0426*3.785/(1000*3.357))*-1; source Omni Tech International  2010; lognormal variance with pedigree 0.0119, pedigree (3,2,4,4,2)
  Wastewater from process. Estimated according to soybean esterification plants from US. Value reported in the ‘esterification of soybean oil’ dataset representing the global region, converted from gallons to m³ and scaled to the the production of 1 kg of fatty acid methyl esther.
  production volume 226133 m3; = ME_PV*sewage/ME
    Calculated from production volume of reference product using the relative outputs.
  property carbon content, fossil 0; name C_content_fossil
  property price 0 EUR2005; name sewage_price_EUR2005
  property water in wet mass 999.653 kg; name WWM
  property wet mass 1000 kg; name WM
  property carbon content, non-fossil 0.194039; name C_content_non_fossil
  property dry mass 0.346837 kg; name DM
  property water content 2882.2; name water_content
- heat, district or industrial, other than natural gas: 3.13344e-5 MJ; source ANP 2020; lognormal variance with pedigree 0.0008, pedigree (1,1,2,1,1)
  Calculated from the reported amount of diesel consumption in m³. The average biodiesel blend is 9%, however fossil diesel is used as a proxy for the whole mixture. Weighted average of 19 biodiesel producers.
  Conversion factors from the Petroleum, Natural gas and Biofuels Brazilian National Agency (ANP):
  Diesel density is 0.88 t/m³
  Biodiesel density is 0.88 t/m³
  Diesel lower heating value is 10100 kcal/kg
  Biodiesel lower heating value is 9000 kcal/kg
  properties: corresponding fuel use, propane, furnace >100kW 1.05263 MJ, heating value, net 1 MJ
  note on corresponding fuel use, propane, furnace >100kW: Lower heating value of the fuel input related to the heat/electricity output, taken directly from ecoinvent v3.0 dataset "heat production, natural gas, at industrial furnace >100kW, GLO 2000".
- methanol: 0.0935984 kg; source ANP 2020; lognormal variance with pedigree 0.0008, pedigree (1,1,2,1,1)
  Measured value. Weighted average of 19 biodiesel producers.
  properties: dry mass 1 kg, wet mass 1 kg, carbon content, fossil 0.375, heating value, net 26.49 MJ
- electricity, high voltage: 0.00297394 kWh; source ANP 2020; lognormal variance with pedigree 0.0008, pedigree (1,1,2,1,1)
  Measured value. Electricity produced from biomass. Weighted average of 19 biodiesel producers.
- cottonseed oil, crude: 0.00977522 kg; source ANP 2019; lognormal variance with pedigree 0.0008, pedigree (1,1,2,1,1)
  Input of crude cottonseed oil according to measured value for raw-material inputs in 19 esterification plants and the national average raw material mix.
  properties: wet mass 1 kg, dry mass 1 kg, carbon content, non-fossil 0.612118, heating value, net 38.4 MJ
  note on heating value, net: Values is approximated from HHV from "vegetable oil, crude". Source: Radovanovic,M.; Zivanovic,T.; Stojiljkovic,D.; Jovanovic,V.; Jerinic,N.; Knezevic,S. et.al. Utilization of sunflower husk as a fuel for industrial boilers - 20 years experience. Proc. 5th Eur. Conf. on Industrial Furnaces&Boilers 2000,vol.2,p.221-233. Available at: https://phyllis.nl/Biomass/View/2152
- heat, district or industrial, natural gas: 6.18894e-5 MJ; source ANP 2020; lognormal variance with pedigree 0.0008, pedigree (1,1,2,1,1)
  Calculated from the reported amount of natural gas consumption in Nm³. Conversion factors from the Petroleum, Natural gas and Biofuels Brazilian National Agency (ANP):
  Natural gas density is 0.74 kg/m³
  Natural gas lower heating value is 8.8 kcal/kg
  properties: heating value, net 1 MJ
- heat, district or industrial, other than natural gas: 0.863206 MJ; source ANP 2020; lognormal variance with pedigree 0.0008, pedigree (1,1,2,1,1)
  Calculated from the reported amount of wood consumption in kg (dry mass). Weighted average of 19 biodiesel producers.
  Conversion factors from ecoinvent:
  Wood chips measured as dry mass 0.073 kg/MJ
- soybean oil, crude: 0.736113 kg; source ANP 2019; lognormal variance with pedigree 0.0002, pedigree (1,1,2,1,1)
  Input of crude soybean oil according to measured value for raw-material inputs in 19 esterification plants and the national average raw material mix. [An activity link is set to ensure supply from the corresponding transforming activity in Brazil]
  properties: dry mass 1 kg, carbon content, non-fossil 0.768, wet mass 1 kg, heating value, net 38.4 MJ
- electricity, medium voltage: 0.0422376 kWh; source ANP 2020; lognormal variance with pedigree 0.0008, pedigree (1,1,2,1,1)
  Measured value. Weighted average of 19 biodiesel producers.
- sodium hydroxide, without water, in 50% solution state: 0.0040191 kg; source ANP 2020; lognormal variance with pedigree 0.0008, pedigree (1,1,2,1,1)
  Measured value. Weighted average of 19 biodiesel producers.
  properties: wet mass 1 kg, dry mass 1 kg, heating value, net 3.03 MJ
- sodium methoxide: 0.0128975 kg; source ANP 2020; lognormal variance with pedigree 0.0008, pedigree (1,1,2,1,1)
  Measured value. Weighted average of 19 biodiesel producers.
  properties: heating value, net 13.47 MJ, dry mass 1 kg, carbon content, fossil 0.222222, wet mass 1 kg
- tallow, unrefined: 0.170993 kg; source ANP 2019; lognormal variance with pedigree 0.0008, pedigree (1,1,2,1,1)
  Input of animal fats according to measured value for raw-material inputs in 19 esterification plants and the national average raw material mix.
  properties: water content 0.025641, heating value, net 22.1 MJ, dry mass 0.975 kg, carbon content, non-fossil 0.75, wet mass 1 kg
- vegetable oil esterification facility: 2.46159e-10 unit; = 9.34E-10/3.357; lognormal variance with pedigree 0.3226, pedigree (1,4,4,5,2)
  Estimated according to soybean esterification plants from US. Value reported in the original GLO dataset (9.34E-10 units) scaled to the the production of 1 kg of fatty acid methyl esther.
- electricity, high voltage: 0.000372773 kWh; source ANP 2020; lognormal variance with pedigree 0.0008, pedigree (1,1,2,1,1)
  Measured value. Electricity provided directly from small hydropower stations. Weighted average of 19 biodiesel producers.
- heat, district or industrial, other than natural gas: 6.26752e-5 MJ; source ANP 2020; lognormal variance with pedigree 0.0008, pedigree (1,1,2,1,1)
  Calculated from the reported amount of fuel oil consumption in m³. Weighted average of 19 biodiesel producers.
  Conversion factors from the Petroleum, Natural gas and Biofuels Brazilian National Agency (ANP):
  Fuel oil density is 1.013 t/m³
  Fuel oil lower heating value is 9590 kcal/kg
  properties: heating value, net 1 MJ, corresponding fuel use, propane, furnace >100kW 1.05263 MJ
- heat, district or industrial, other than natural gas: 0.00608708 MJ; source ANP 2020; lognormal variance with pedigree 0.0008, pedigree (1,1,2,1,1)
  Calculated from the reported amount of sugar-cane bagasse consumption in kg (dry mass). Weighted average of 19 biodiesel producers.
  Conversion factors from sugar cane producer:
  Bagasse measured as dry mass 0.69 kg/MJ

## Inputs from nature
- Water, unspecified natural origin [natural resource, in water]: 2.98368e-5 m3; = (sewage*-1)-(tap_water_input/1000); lognormal variance with pedigree 0.0119, pedigree (3,2,4,4,2)
  Calculated based on process water into the system and water leaving as wastewater, according to the ‘esterification of soybean oil’ dataset representing the global region. Flow used to close the water balance.

## Sampling procedure
Primary data collected by 19 biodiesel producers in the framework of the RenovaBio policy. The data was retrieved from the RenovaCalc file of each producer, accessed through Electronic Information System (SEI) of the Petroleum, Gas and Biofuels National Agency (ANP, 2020). This dataset represents the average information weighted according to the production volume of each producer. For the RenovaBio certification, information regarding the esterification process does not differentiate raw material sources (soybean, animal fat or other oils) because it represents better the producer’s practice. Therefore, this dataset has different raw material inputs in the same process. The raw material share is set to represent the national average according to ANP (2019). All producers report using the methylic production route. Data collected for the 2018 production year.

Reference:

ANP (2020). Electronic Information System (SEI). Available at: anp.gov.br/processo-eletronico-sei. Accessed in: 04/06/2020.

ANP (2019). Petroleum, Gas and Biofuels National Agency Statistical Yeakbook 2019. Available at: www.anp.gov.br/publicacoes/anuario-estatistico/5237-anuario-estatistico-2019.

## Extrapolations
Water consumption estimated according to value reported in the ‘esterification of soybean oil’ dataset representing the global region for the year of 2009, which is referred to soybean esterification plants from US. The uncertainty information was adjusted accordingly
