# treatment of electric arc furnace slag, residual material landfill

Dataset: EcoSpold 2, unit process
Geography: CH
Time period: 1987-01-01 to 2021-12-31
Technology level: current
Classification: ISIC rev.4 ecoinvent: 3821:Treatment and disposal of non-hazardous waste
Scenario: Business-as-Usual
System model: Allocation, cut-off by classification
Generated by: Avraam Symeonidis
Database: ecoinvent
isCopyrightProtected: true
accessRestrictedTo: 1

## General comment
Steelmaking produces large quantities of by-products, with around 450-500 kg of by-products produced per tonne of steel. The main components of these are slags (approximately 80%), along with dusts and sludges from air pollution abatement equipment (flue gas scrubbing) and mill scale. The physical or chemical natures of these by-products means that it can be difficult to find possible uses. Hence, most of these by-products have historically been disposed of in landfills. However, new legislation and financial instruments, such as landfill taxes, mean that landfilling is now a costly and undesirable management solution. Instead, considerable efforts have been made to recover by-products for internal reuse or to sell them to other industries to recover value. The fraction of steelmaking by-products that is sent to landfill has drastically reduced. This activity represents the disposal of 'electric arc furnace slag' in a residual material landfill. This type of landfill is designed to receive mostly inorganic (low carbon, <5 w-%) wastes in a physically stable form. Further information is provided in ecoinvent report no. 13, Part II: Landfills – Underground Deposits – Landfarming (Doka, 2009).
References
Doka, G. (2009). Life cycle inventories of waste treatment services. Ecoinvent report no. 13. Swiss Centre for Life Cycle Inventories, Dubendorf, Switzerland.
Inventoried waste contains 100% electric arc furnace slag; .
waste composition (wet, in ppm): H2O 5000; O 317810; H n.a.; C 2670; S 1550; N n.a.; P 861; B n.a.; Cl n.a.; Br n.a.; F 20000; I n.a.; Ag 8.4; As 0.851; Ba 417; Cd 7.6; Co 4.8; Cr 28200; Cu 637; Hg 0.04; Mn 35100; Mo 180; Ni 192; Pb 243; Sb 4; Se 18; Sn 10; V 890; Zn 444; Be 1.1; Sc n.a.; Sr n.a.; Ti 3120; Tl 11; W n.a.; Si 83600; Fe 159000; Ca 251000; Al 37100; K 1110; Mg 50200; Na 614;
Share of carbon in waste that is biogenic 0%.
Additional solidification with 0.4 kg of cement. Note that value for oxygen content was calculated by assuming that other elements in the material are present as oxides and that any missing mass (either not reported or not detected) was assumed to be oxygen.

## Included activities start
Activity starts with the reception of the waste.

## Included activities end
Waste-specific short-term emissions to water from leachate. Long-term emissions from landfill to ground water. Expenditures for solidification with cement.

## Technology
Time period based on the range of years of publication from which composition data were taken. Note that the Residual Material Landfill modelling tool was published in 2009.

## Reference product
- electric arc furnace slag: -1 kg; name RP; By-product classification Waste; CPC 39310: Slag, dross, scalings and other waste from the manufacture of iron or steel
  production volume 1.1433e8 kg; name PVRP
    Assuming that 96.1% of electric arc furnace slag is sent for disposal in landfill (worldsteel, 2010).
    References:
    Worldsteel (2010). Steel industry by-products. World Steel Association: Brussels, Belgium.
  property heating value, net 0 MJ
    Non combustible products are assumed to have an LHV equal to zero (0).
  property price 0 EUR2005; name RP_price_EUR2005
    Waste products are assigned a price of zero as they are assumed to require further treatment.
  property copper content 0.000640201
    The value of 'copper content' is documented in Turner & Symeonidis, 2020.
    Reference: Turner David & Symeonidis Avraam, 2020, Life cycle inventories of the treatment of iron and steelmaking by-products, ecoinvent association, Zürich, Switzerland
  property carbon content, fossil 0.00268342
    The value of 'carbon content, fossil' is documented in Turner & Symeonidis, 2020.
    Reference: Turner David & Symeonidis Avraam, 2020, Life cycle inventories of the treatment of iron and steelmaking by-products, ecoinvent association, Zürich, Switzerland
  property lead content 0.000244221
    The value of 'lead content' is documented in Turner & Symeonidis, 2020.
    Reference: Turner David & Symeonidis Avraam, 2020, Life cycle inventories of the treatment of iron and steelmaking by-products, ecoinvent association, Zürich, Switzerland
  property molybdenum content 0.000180905
    The value of 'molybdenum content' is documented in Turner & Symeonidis, 2020.
    Reference: Turner David & Symeonidis Avraam, 2020, Life cycle inventories of the treatment of iron and steelmaking by-products, ecoinvent association, Zürich, Switzerland
  property phosphorus content 0.000865327
    The value of 'phosphorus content' is documented in Turner & Symeonidis, 2020.
    Reference: Turner David & Symeonidis Avraam, 2020, Life cycle inventories of the treatment of iron and steelmaking by-products, ecoinvent association, Zürich, Switzerland
  property chromium content 0.0283417
    The value of 'chromium content' is documented in Turner & Symeonidis, 2020.
    Reference: Turner David & Symeonidis Avraam, 2020, Life cycle inventories of the treatment of iron and steelmaking by-products, ecoinvent association, Zürich, Switzerland
  property selenium content 1.80905e-5
    The value of 'selenium content' is documented in Turner & Symeonidis, 2020.
    Reference: Turner David & Symeonidis Avraam, 2020, Life cycle inventories of the treatment of iron and steelmaking by-products, ecoinvent association, Zürich, Switzerland
  property potassium content 0.00111558
    The value of 'potassium content' is documented in Turner & Symeonidis, 2020.
    Reference: Turner David & Symeonidis Avraam, 2020, Life cycle inventories of the treatment of iron and steelmaking by-products, ecoinvent association, Zürich, Switzerland
  property calcium content 0.252261
    The value of 'calcium content' is documented in Turner & Symeonidis, 2020.
    Reference: Turner David & Symeonidis Avraam, 2020, Life cycle inventories of the treatment of iron and steelmaking by-products, ecoinvent association, Zürich, Switzerland
  property mercury content 4.0201e-8
    The value of 'mercury content' is documented in Turner & Symeonidis, 2020.
    Reference: Turner David & Symeonidis Avraam, 2020, Life cycle inventories of the treatment of iron and steelmaking by-products, ecoinvent association, Zürich, Switzerland
  property antimony content 4.0201e-6
    The value of 'antimony content' is documented in Turner & Symeonidis, 2020.
    Reference: Turner David & Symeonidis Avraam, 2020, Life cycle inventories of the treatment of iron and steelmaking by-products, ecoinvent association, Zürich, Switzerland
  property iron content 0.159799
    The value of 'iron content' is documented in Turner & Symeonidis, 2020.
    Reference: Turner David & Symeonidis Avraam, 2020, Life cycle inventories of the treatment of iron and steelmaking by-products, ecoinvent association, Zürich, Switzerland
  property nickel content 0.000192965
    The value of 'nickel content' is documented in Turner & Symeonidis, 2020.
    Reference: Turner David & Symeonidis Avraam, 2020, Life cycle inventories of the treatment of iron and steelmaking by-products, ecoinvent association, Zürich, Switzerland
  property zinc content 0.000446231
    The value of 'zinc content' is documented in Turner & Symeonidis, 2020.
    Reference: Turner David & Symeonidis Avraam, 2020, Life cycle inventories of the treatment of iron and steelmaking by-products, ecoinvent association, Zürich, Switzerland
  property fluorine content 0.0201005
    The value of 'fluorine content' is documented in Turner & Symeonidis, 2020.
    Reference: Turner David & Symeonidis Avraam, 2020, Life cycle inventories of the treatment of iron and steelmaking by-products, ecoinvent association, Zürich, Switzerland
  property manganese content 0.0352764
    The value of 'manganese content' is documented in Turner & Symeonidis, 2020.
    Reference: Turner David & Symeonidis Avraam, 2020, Life cycle inventories of the treatment of iron and steelmaking by-products, ecoinvent association, Zürich, Switzerland
  property silicon content 0.0840201
    The value of 'silicon content' is documented in Turner & Symeonidis, 2020.
    Reference: Turner David & Symeonidis Avraam, 2020, Life cycle inventories of the treatment of iron and steelmaking by-products, ecoinvent association, Zürich, Switzerland
  property sodium content 0.000617085
    The value of 'sodium content' is documented in Turner & Symeonidis, 2020.
    Reference: Turner David & Symeonidis Avraam, 2020, Life cycle inventories of the treatment of iron and steelmaking by-products, ecoinvent association, Zürich, Switzerland
  property titanium content 0.00313568
    The value of 'titanium content' is documented in Turner & Symeonidis, 2020.
    Reference: Turner David & Symeonidis Avraam, 2020, Life cycle inventories of the treatment of iron and steelmaking by-products, ecoinvent association, Zürich, Switzerland
  property tin content 1.00503e-5
    The value of 'tin content' is documented in Turner & Symeonidis, 2020.
    Reference: Turner David & Symeonidis Avraam, 2020, Life cycle inventories of the treatment of iron and steelmaking by-products, ecoinvent association, Zürich, Switzerland
  property aluminium content 0.0372864
    The value of 'aluminium content' is documented in Turner & Symeonidis, 2020.
    Reference: Turner David & Symeonidis Avraam, 2020, Life cycle inventories of the treatment of iron and steelmaking by-products, ecoinvent association, Zürich, Switzerland
  property barium content 0.000419095
    The value of 'barium content' is documented in Turner & Symeonidis, 2020.
    Reference: Turner David & Symeonidis Avraam, 2020, Life cycle inventories of the treatment of iron and steelmaking by-products, ecoinvent association, Zürich, Switzerland
  property beryllium content 1.10553e-6
    The value of 'beryllium content' is documented in Turner & Symeonidis, 2020.
    Reference: Turner David & Symeonidis Avraam, 2020, Life cycle inventories of the treatment of iron and steelmaking by-products, ecoinvent association, Zürich, Switzerland
  property carbon content, non-fossil 0
    The value of 'carbon content, non-fossil' is documented in Turner & Symeonidis, 2020.
    Reference: Turner David & Symeonidis Avraam, 2020, Life cycle inventories of the treatment of iron and steelmaking by-products, ecoinvent association, Zürich, Switzerland
  property silver content 8.44221e-6
    The value of 'silver content' is documented in Turner & Symeonidis, 2020.
    Reference: Turner David & Symeonidis Avraam, 2020, Life cycle inventories of the treatment of iron and steelmaking by-products, ecoinvent association, Zürich, Switzerland
  property thallium content 1.10553e-5
    The value of 'thallium content' is documented in Turner & Symeonidis, 2020.
    Reference: Turner David & Symeonidis Avraam, 2020, Life cycle inventories of the treatment of iron and steelmaking by-products, ecoinvent association, Zürich, Switzerland
  property oxygen content 0.319403
    The value of 'oxygen content' is documented in Turner & Symeonidis, 2020.
    Reference: Turner David & Symeonidis Avraam, 2020, Life cycle inventories of the treatment of iron and steelmaking by-products, ecoinvent association, Zürich, Switzerland
  property cadmium content 7.63819e-6
    The value of 'cadmium content' is documented in Turner & Symeonidis, 2020.
    Reference: Turner David & Symeonidis Avraam, 2020, Life cycle inventories of the treatment of iron and steelmaking by-products, ecoinvent association, Zürich, Switzerland
  property sulfur content 0.00155779
    The value of 'sulfur content' is documented in Turner & Symeonidis, 2020.
    Reference: Turner David & Symeonidis Avraam, 2020, Life cycle inventories of the treatment of iron and steelmaking by-products, ecoinvent association, Zürich, Switzerland
  property vanadium content 0.000894472
    The value of 'vanadium content' is documented in Turner & Symeonidis, 2020.
    Reference: Turner David & Symeonidis Avraam, 2020, Life cycle inventories of the treatment of iron and steelmaking by-products, ecoinvent association, Zürich, Switzerland
  property arsenic content 8.55276e-7
    The value of 'arsenic content' is documented in Turner & Symeonidis, 2020.
    Reference: Turner David & Symeonidis Avraam, 2020, Life cycle inventories of the treatment of iron and steelmaking by-products, ecoinvent association, Zürich, Switzerland
  property magnesium content 0.0504523
    The value of 'magnesium content' is documented in Turner & Symeonidis, 2020.
    Reference: Turner David & Symeonidis Avraam, 2020, Life cycle inventories of the treatment of iron and steelmaking by-products, ecoinvent association, Zürich, Switzerland
  property cobalt content 4.82412e-6
    The value of 'cobalt content' is documented in Turner & Symeonidis, 2020.
    Reference: Turner David & Symeonidis Avraam, 2020, Life cycle inventories of the treatment of iron and steelmaking by-products, ecoinvent association, Zürich, Switzerland
  property carbon content 0.00268342
    carbon content on a dry matter basis (reserved; not for manual entry)
  properties: dry mass 0.995 kg, water content 0.00502513, wet mass 1 kg, water in wet mass 0.005 kg, carbon allocation 0.00267 kg

## Inputs from technosphere
- cement, unspecified: 0.4 kg; lognormal variance with pedigree 0.091084, pedigree (1,1,5,5,4)
  Cement for solidification of residual material waste. Uncertainty in mass from solidification recipe.
  properties: dry mass 1 kg, wet mass 1 kg
- process-specific burdens, residual material landfill: 1 kg; lognormal variance with pedigree 0.082, pedigree (1,1,5,5,4)
  demands per kilogram waste. uncertainty is heeded in the module
- waste cement, hydrated: -1 kg; name BP; lognormal variance with pedigree 0.091084, pedigree (1,1,5,5,4)
  Hydrated cement for solidification of residual material waste. Uncertainty in mass from solidification recipe.
  production volume 1.1433e8 kg; = PVRP*BP/ABS(RP)
    Calculated based on the production volume of the reference product.
  property price 0 EUR2005; name BP_price_EUR2005
  properties: wet mass 1 kg, dry mass 1 kg
- residual material landfill: 2.08333e-9 unit; lognormal variance with pedigree 0.082, pedigree (1,1,5,5,4)
  demands per kilogram waste. uncertainty is heeded in the module

## Emissions to nature
- Beryllium [water, surface water]: 6.64843e-10 kg; lognormal variance with pedigree 2.35748, pedigree (1,1,5,5,4)
  uncertainty is calculated from uncertainties in waste composition and transfer coefficients in residual landfill
- Sodium, ion [water, ground-, long-term]: 0.000383579 kg; lognormal variance with pedigree 0.809435, pedigree (1,1,5,5,4)
  uncertainty is calculated from uncertainties in waste composition and transfer coefficients in incinerator and landfills.
- Beryllium [water, ground-, long-term]: 3.98241e-7 kg; lognormal variance with pedigree 1.89707, pedigree (1,1,5,5,4)
  (same comment as for Sodium, ion)
- Tin, ion [water, surface water]: 3.16349e-10 kg; lognormal variance with pedigree 2.45782, pedigree (1,1,5,5,4)
  (same comment as for Beryllium)
- Aluminium [water, surface water]: 1.8386e-5 kg; lognormal variance with pedigree 1.04502, pedigree (1,1,5,5,4)
  (same comment as for Beryllium)
- Titanium, ion [water, ground-, long-term]: 0.000926179 kg; lognormal variance with pedigree 0.961877, pedigree (1,1,5,5,4)
  (same comment as for Sodium, ion)
- Chromium VI [water, surface water]: 0.00169517 kg; lognormal variance with pedigree 0.497884, pedigree (1,1,5,5,4)
  (same comment as for Beryllium)
- TOC, Total Organic Carbon [water, surface water]: 2.88063e-6 kg; lognormal variance with pedigree 1.25595, pedigree (1,1,5,5,4)
  (same comment as for Beryllium)
- Lead [water, ground-, long-term]: 1.26047e-6 kg; lognormal variance with pedigree 7.84704, pedigree (1,1,5,5,4)
  (same comment as for Sodium, ion)
- Tin, ion [water, ground-, long-term]: 1.89493e-7 kg; lognormal variance with pedigree 5.28216, pedigree (1,1,5,5,4)
  (same comment as for Sodium, ion)
- Antimony [water, ground-, long-term]: 2.58937e-6 kg; lognormal variance with pedigree 1.47602, pedigree (1,1,5,5,4)
  (same comment as for Sodium, ion)
- Silver, ion [water, ground-, long-term]: 3.23354e-7 kg; lognormal variance with pedigree 4.02532, pedigree (1,1,5,5,4)
  (same comment as for Sodium, ion)
- Manganese [water, surface water]: 4.84034e-7 kg; lognormal variance with pedigree 1.52406, pedigree (1,1,5,5,4)
  (same comment as for Beryllium)
- Silver, ion [water, surface water]: 5.39823e-10 kg; lognormal variance with pedigree 2.38703, pedigree (1,1,5,5,4)
  (same comment as for Beryllium)
- Aluminium [water, ground-, long-term]: 0.0110132 kg; lognormal variance with pedigree 0.669323, pedigree (1,1,5,5,4)
  (same comment as for Sodium, ion)
- Vanadium, ion [water, ground-, long-term]: 0.000684066 kg; lognormal variance with pedigree 0.772064, pedigree (1,1,5,5,4)
  (same comment as for Sodium, ion)
- Arsenic, ion [water, ground-, long-term]: 0 kg; pedigree (1,1,1,1,1)
  (same comment as for Sodium, ion)
- Zinc, ion [water, ground-, long-term]: 5.44166e-6 kg; lognormal variance with pedigree 5.69002, pedigree (1,1,5,5,4)
  (same comment as for Sodium, ion)
- Mercury [water, surface water]: 3.15204e-12 kg; lognormal variance with pedigree 2.99091, pedigree (1,1,5,5,4)
  (same comment as for Beryllium)
- Iron, ion [water, surface water]: 1.33039e-6 kg; lognormal variance with pedigree 1.4478, pedigree (1,1,5,5,4)
  (same comment as for Beryllium)
- Selenium [water, ground-, long-term]: 1.16521e-5 kg; lognormal variance with pedigree 1.27749, pedigree (1,1,5,5,4)
  (same comment as for Sodium, ion)
- Chromium VI [water, ground-, long-term]: 0.00535483 kg; lognormal variance with pedigree 0.336827, pedigree (1,1,5,5,4)
  (same comment as for Sodium, ion)
- Calcium, ion [water, surface water]: 3.78629e-5 kg; lognormal variance with pedigree 1.03298, pedigree (1,1,5,5,4)
  (same comment as for Beryllium)
- Nickel, ion [water, ground-, long-term]: 6.95112e-5 kg; lognormal variance with pedigree 1.21527, pedigree (1,1,5,5,4)
  (same comment as for Sodium, ion)
- Magnesium [water, ground-, long-term]: 0.00570387 kg; lognormal variance with pedigree 1.45169, pedigree (1,1,5,5,4)
  (same comment as for Sodium, ion)
- Copper, ion [water, ground-, long-term]: 2.4521e-5 kg; lognormal variance with pedigree 3.45105, pedigree (1,1,5,5,4)
  (same comment as for Sodium, ion)
- Cadmium, ion [water, ground-, long-term]: 5.15955e-8 kg; lognormal variance with pedigree 7.61732, pedigree (1,1,5,5,4)
  (same comment as for Sodium, ion)
- Potassium, ion [water, surface water]: 0.000312892 kg; lognormal variance with pedigree 0.768168, pedigree (1,1,5,5,4)
  (same comment as for Beryllium)
- Cobalt [water, surface water]: 1.36999e-9 kg; lognormal variance with pedigree 2.26359, pedigree (1,1,5,5,4)
  (same comment as for Beryllium)
- Lead [water, surface water]: 2.10429e-9 kg; lognormal variance with pedigree 2.20477, pedigree (1,1,5,5,4)
  (same comment as for Beryllium)
- Cobalt [water, ground-, long-term]: 8.20624e-7 kg; lognormal variance with pedigree 2.22657, pedigree (1,1,5,5,4)
  (same comment as for Sodium, ion)
- Magnesium [water, surface water]: 9.52231e-6 kg; lognormal variance with pedigree 1.14006, pedigree (1,1,5,5,4)
  (same comment as for Beryllium)
- Nickel, ion [water, surface water]: 1.16045e-7 kg; lognormal variance with pedigree 1.67568, pedigree (1,1,5,5,4)
  (same comment as for Beryllium)
- Antimony [water, surface water]: 1.41063e-6 kg; lognormal variance with pedigree 1.50017, pedigree (1,1,5,5,4)
  (same comment as for Beryllium)
- Potassium, ion [water, ground-, long-term]: 0.000797108 kg; lognormal variance with pedigree 0.729863, pedigree (1,1,5,5,4)
  (same comment as for Sodium, ion)
- Mercury [water, ground-, long-term]: 1.88807e-9 kg; lognormal variance with pedigree 4.33449, pedigree (1,1,5,5,4)
  (same comment as for Sodium, ion)
- Molybdenum [water, ground-, long-term]: 8.26388e-7 kg; lognormal variance with pedigree 0.989329, pedigree (1,1,5,5,4)
  (same comment as for Sodium, ion)
- Manganese [water, ground-, long-term]: 0.000289936 kg; lognormal variance with pedigree 6.05762, pedigree (1,1,5,5,4)
  (same comment as for Sodium, ion)
- COD, Chemical Oxygen Demand [water, surface water]: 7.27978e-6 kg; lognormal variance with pedigree 1.25595, pedigree (1,1,5,5,4)
  (same comment as for Beryllium)
- Phosphate [water, ground-, long-term]: 0.000589798 kg; lognormal variance with pedigree 1.32026, pedigree (1,1,5,5,4)
  (same comment as for Sodium, ion)
- Silicon [water, ground-, long-term]: 0.083412 kg; lognormal variance with pedigree 0.219589, pedigree (1,1,5,5,4)
  (same comment as for Sodium, ion)
- Cadmium, ion [water, surface water]: 8.61361e-11 kg; lognormal variance with pedigree 2.62953, pedigree (1,1,5,5,4)
  (same comment as for Beryllium)
- Iron, ion [water, ground-, long-term]: 0.000796903 kg; lognormal variance with pedigree 7.17622, pedigree (1,1,5,5,4)
  (same comment as for Sodium, ion)
- DOC, Dissolved Organic Carbon [water, surface water]: 2.88063e-6 kg; lognormal variance with pedigree 1.25595, pedigree (1,1,5,5,4)
  (same comment as for Beryllium)
- Copper, ion [water, surface water]: 4.09366e-8 kg; lognormal variance with pedigree 1.81276, pedigree (1,1,5,5,4)
  (same comment as for Beryllium)
- Molybdenum [water, surface water]: 0.000179174 kg; lognormal variance with pedigree 0.965837, pedigree (1,1,5,5,4)
  (same comment as for Beryllium)
- Fluoride [water, surface water]: 0.00108384 kg; lognormal variance with pedigree 0.546447, pedigree (1,1,5,5,4)
  (same comment as for Beryllium)
- Selenium [water, surface water]: 6.34785e-6 kg; lognormal variance with pedigree 1.30164, pedigree (1,1,5,5,4)
  (same comment as for Beryllium)
- BOD5, Biological Oxygen Demand [water, ground-, long-term]: 0.00142634 kg; lognormal variance with pedigree 0.660535, pedigree (1,1,5,5,4)
  (same comment as for Sodium, ion)
- Thallium [water, ground-, long-term]: 3.98241e-6 kg; lognormal variance with pedigree 1.59531, pedigree (1,1,5,5,4)
  (same comment as for Sodium, ion)
- Calcium, ion [water, ground-, long-term]: 0.0226799 kg; lognormal variance with pedigree 1.57659, pedigree (1,1,5,5,4)
  (same comment as for Sodium, ion)
- Titanium, ion [water, surface water]: 1.54621e-6 kg; lognormal variance with pedigree 1.33757, pedigree (1,1,5,5,4)
  (same comment as for Beryllium)
- BOD5, Biological Oxygen Demand [water, surface water]: 2.3812e-6 kg; lognormal variance with pedigree 1.25595, pedigree (1,1,5,5,4)
  (same comment as for Beryllium)
- Vanadium, ion [water, surface water]: 2.18424e-6 kg; lognormal variance with pedigree 1.29245, pedigree (1,1,5,5,4)
  (same comment as for Beryllium)
- Arsenic, ion [water, surface water]: 8.51e-7 kg; lognormal variance with pedigree 1.6723, pedigree (1,1,5,5,4)
  (same comment as for Beryllium)
- Sulfate [water, ground-, long-term]: 0.00415111 kg; lognormal variance with pedigree 0.683521, pedigree (1,1,5,5,4)
  (same comment as for Sodium, ion)
- DOC, Dissolved Organic Carbon [water, ground-, long-term]: 0.00172549 kg; lognormal variance with pedigree 0.660535, pedigree (1,1,5,5,4)
  (same comment as for Sodium, ion)
- TOC, Total Organic Carbon [water, ground-, long-term]: 0.00172549 kg; lognormal variance with pedigree 0.660535, pedigree (1,1,5,5,4)
  (same comment as for Sodium, ion)
- Fluoride [water, ground-, long-term]: 0.0189162 kg; lognormal variance with pedigree 0.368769, pedigree (1,1,5,5,4)
  (same comment as for Sodium, ion)
- Zinc, ion [water, surface water]: 9.08458e-9 kg; lognormal variance with pedigree 2.01171, pedigree (1,1,5,5,4)
  (same comment as for Beryllium)
- Phosphate [water, surface water]: 9.84637e-7 kg; lognormal variance with pedigree 1.5408, pedigree (1,1,5,5,4)
  (same comment as for Beryllium)
- Sulfate [water, surface water]: 0.000498892 kg; lognormal variance with pedigree 0.796779, pedigree (1,1,5,5,4)
  (same comment as for Beryllium)
- COD, Chemical Oxygen Demand [water, ground-, long-term]: 0.00436059 kg; lognormal variance with pedigree 0.660535, pedigree (1,1,5,5,4)
  (same comment as for Sodium, ion)
- Sodium, ion [water, surface water]: 0.000230421 kg; lognormal variance with pedigree 0.829892, pedigree (1,1,5,5,4)
  (same comment as for Beryllium)
- Barium [water, ground-, long-term]: 3.44454e-6 kg; lognormal variance with pedigree 6.60559, pedigree (1,1,5,5,4)
  (same comment as for Sodium, ion)
- Thallium [water, surface water]: 6.64843e-9 kg; lognormal variance with pedigree 2.05572, pedigree (1,1,5,5,4)
  (same comment as for Beryllium)
- Barium [water, surface water]: 5.75049e-9 kg; lognormal variance with pedigree 2.07204, pedigree (1,1,5,5,4)
  (same comment as for Beryllium)
- Silicon [water, surface water]: 0.000188012 kg; lognormal variance with pedigree 0.768302, pedigree (1,1,5,5,4)
  (same comment as for Beryllium)

## Sampling procedure
For more details about sampling procedures, refer to: Turner, D. & Symeonidis, A. (2020). Life cycle inventories of the treatment of iron and steelmaking by-products, ecoinvent association, Zürich, Switzerland.

## Extrapolations
This dataset has been extrapolated from year 2017 to the year of the calculation (2021). The uncertainty has been adjusted accordingly.
