# treatment of waste aluminium, sanitary landfill

Dataset: EcoSpold 2, unit process
Geography: CH
Time period: 1994-01-01 to 2021-12-31
Technology level: current
Classification: EcoSpold01Categories: waste management/sanitary landfill
Classification: ISIC rev.4 ecoinvent: 3821:Treatment and disposal of non-hazardous waste
Tags: ConvertedDataset; Treatment
Scenario: Business-as-Usual
System model: Allocation, cut-off by classification
Generated by: Gabor Doka (obsolete)
Published in: Doka G. 2007
Database: ecoinvent
isCopyrightProtected: true
accessRestrictedTo: 1

## General comment
Inventoried waste contains 100% Alu in MSW; .
waste composition (wet, in ppm): H2O n.a.; O n.a.; H n.a.; C n.a.; S n.a.; N n.a.; P n.a.; B n.a.; Cl 4825; Br n.a.; F n.a.; I n.a.; Ag n.a.; As n.a.; Ba n.a.; Cd 3; Co n.a.; Cr n.a.; Cu 8.5; Hg n.a.; Mn n.a.; Mo n.a.; Ni n.a.; Pb 25.5; Sb n.a.; Se n.a.; Sn n.a.; V n.a.; Zn 29; Be n.a.; Sc n.a.; Sr n.a.; Ti n.a.; Tl n.a.; W n.a.; Si n.a.; Fe n.a.; Ca n.a.; Al 995110; K n.a.; Mg n.a.; Na n.a.;
Share of carbon in waste that is biogenic 60.4%.
Overall degradability of waste during 100 years: 50%.
[This dataset was already contained in the ecoinvent database version 2. It was not individually updated during the transfer to ecoinvent version 3. Life Cycle Impact Assessment results may still have changed, as they are affected by changes in the supply chain, i.e. in other datasets. This dataset was generated following the ecoinvent quality guidelines for version 2. It may have been subject to central changes described in the ecoinvent version 3 change report (http://www.ecoinvent.org/database/ecoinvent-version-3/reports-of-changes/), and the results of the central updates were reviewed extensively. The changes added e.g. consistent water flows and other information throughout the database. The documentation of this dataset can be found in the ecoinvent reports of version 2, which are still available via the ecoinvent website. The change report linked above covers all central changes that were made during the conversion process.]

## Included activities end
Waste-specific short-term emissions to air via landfill gas incineration and landfill leachate. Burdens from treatment of short-term leachate (0-100a) in wastewater treatment plant (including WWTP sludge disposal in municipal incinerator). Long-term emissions from landfill to groundwater (after base lining failure).

## Geography
Technology encountered in Switzerland in 2000. Landfill includes base seal, leachate collection system, treatment of leachate in municipal wastewater treatment plant.

## Technology
Swiss municipal sanitary landfill for biogenic or untreated municipal waste ('reactive organic landfill'). Landfill gas and leachate collection system. Recultivation and monitoring for 150 years after closure.

## Reference product
- waste aluminium: -1 kg; By-product classification Waste; CPC 39363: Waste and scrap of aluminium; CAS 7429-90-5
  production volume 0.0336675 kg
    This is a placeholder value that does not reflect real-world production volumes. This dataset does not currently require a real-world production volume to work in the database framework, and no actual data were collected yet. This has no negative effect on the results of the ecoinvent database. The placeholder value of this activity was scaled according to the nominal GDP of 2005 (source: United Nations, http://data.un.org/Glossary.aspx?q=GDP+%28current+US%24%29, accessed 20130726) to reflect an appropriate share of the global production volume, which is also a placeholder value.
  property price 0 EUR2005
    Waste products are assigned a price of zero as they are assumed to require further treatment.
  property carbon content 0
    carbon content on a dry matter basis (reserved; not for manual entry)
  properties: wet mass 1 kg, carbon content, non-fossil 0, dry mass 1 kg, water in wet mass 0 kg, carbon content, fossil 0, water content 0, carbon allocation 0 kg

## Inputs from technosphere
- slag landfill: 6.63e-11 unit; lognormal variance with pedigree 0.33, pedigree (1,1,5,1,1)
  burden from incineration of sludge from wastewater treatment of the short-term leachate (0-100a). uncertainty is calculated from uncertainties in waste composition and transfer coefficients in incinerator and uncertainty of waste decomposition and short-term leaching in sanitary landfill
- process-specific burdens, residual material landfill: 0.00642 kg; lognormal variance with pedigree 0.33, pedigree (1,1,5,1,1)
  burden from incineration of sludge from wastewater treatment of the short-term leachate (0-100a). uncertainty is calculated from uncertainties in waste composition and transfer coefficients in incinerator and uncertainty of waste decomposition and short-term leaching in sanitary landfill;activityLink introduced to establish a direct link to the corresponding regional supply of this product
- hydrochloric acid, without water, in 30% solution state: 3.29e-10 kg; lognormal variance with pedigree 1.01, pedigree (1,1,5,1,1)
  (same comment as for slag landfill)
  properties: dry mass 1 kg, wet mass 1 kg, heating value, net 3.32 MJ
- heat, district or industrial, natural gas: 0.03024 MJ; lognormal variance with pedigree 0.5, pedigree (5,5,5,5,5)
  burden from wastewater treatment of the short-term leachate (0-100a). Uncertainty calculated from unertainty of the waste composition of this waste, uncertainty in waste decomposition and short-term leaching in sanitary landfill
  properties: heating value, net 1 MJ
- heat, central or small-scale, other than natural gas: 0.021996 MJ; lognormal variance with pedigree 0.5, pedigree (5,5,5,5,5)
  (same comment as for heat, district or industrial, natural gas)
  properties: heating value, net 1 MJ
- electricity, for reuse in municipal waste incineration only: 0.00954 kWh; name E_el_prod_MSWI; lognormal variance with pedigree 0.74, pedigree (1,1,5,1,1)
  (same comment as for slag landfill)
- chemical, organic: 4.04e-7 kg; lognormal variance with pedigree 1.62, pedigree (1,1,5,1,1)
  (same comment as for slag landfill)
  properties: heating value, net 19.03 MJ, wet mass 1 kg, carbon content, fossil 0.628, dry mass 1 kg
  note on carbon content, fossil: This dataset is an unweighted average of 20 organic substances (listed in Tab 88.1, ecoinvent v2.2 report 8, part II), being part of the top100 chemicals included in this database. The C-content has also been calculated as an unweighted average of the C content of the substances composing this dataset.
- sanitary landfill facility: 5.56e-10 unit; lognormal variance with pedigree 0.04, pedigree (1,1,5,1,1)
  demands per kilogram waste. uncertainty is heeded in the module
  This exchange has an activity link directly to the producing activity because the product is primarily consumed in the same geographical area where it is produced.
- heat, for reuse in municipal waste incineration only: 0.0556 MJ; name E_th_prod_MSWI; lognormal variance with pedigree 0.3, pedigree (1,1,5,1,1)
  (same comment as for slag landfill)
- residual material landfill: 1.34e-11 unit; lognormal variance with pedigree 0.33, pedigree (1,1,5,1,1)
  (same comment as for slag landfill)
- process-specific burdens, slag landfill: 0.0373 kg; lognormal variance with pedigree 0.33, pedigree (1,1,5,1,1)
  (same comment as for process-specific burdens, residual material landfill)
- waste graphical paper: -3.88e-5 kg; lognormal variance with pedigree 0.2106, pedigree (5,5,5,5,5)
  (same comment as for heat, district or industrial, natural gas)
  production volume 3.88e-5 kg
    Calculated from the production volume of waste aluminium, 0% water in proportion to the respective output amounts.
  properties: wet mass 1 kg, water content 0.126126, carbon content, non-fossil 0.454955, heating value, net 14.12 MJ, dry mass 0.888 kg
  note on heating value, net: Value taken from the general comment of the treatment dataset.
- municipal waste incineration facility: 1.66e-11 unit; lognormal variance with pedigree 0.3, pedigree (1,1,5,1,1)
  Burden from incineration of sludge from wastewater treatment of the short-term leachate (0-100a).
  Burden from incineration of sludge from wastewater treatment of the short-term leachate (0-100a).
- process-specific burdens, sanitary landfill: 1 kg; lognormal variance with pedigree 0.04, pedigree (1,1,5,1,1)
  demands per kilogram waste. uncertainty is heeded in the module;activityLink introduced to establish a direct link to the corresponding regional supply of this product
- waste plastic, mixture: -3.88e-5 kg; lognormal variance with pedigree 0.2106, pedigree (5,5,5,5,5)
  (same comment as for heat, district or industrial, natural gas)
  production volume 3.88e-5 kg
    (same comment as for waste graphical paper)
  properties: heating value, net 30.79 MJ, dry mass 0.847 kg, carbon content, fossil 0.747344, wet mass 1 kg, water content 0.180638
  note on carbon content, fossil: C content in 1 kg DM was calculated using data in Tab A.2, ecoinvent v2.2 report 13_I
- sewer grid, 5E9l/year, 110 km: 5.45e-10 km; lognormal variance with pedigree 0.2106, pedigree (5,5,5,5,5)
  (same comment as for heat, district or industrial, natural gas)
- process-specific burdens, municipal waste incineration: 0.0663 kg; lognormal variance with pedigree 0.3, pedigree (1,1,5,1,1)
  Burden from incineration of sludge from wastewater treatment of the short-term leachate (0-100a).
  Burden from incineration of sludge from wastewater treatment of the short-term leachate (0-100a).;activityLink introduced to establish a direct link to the corresponding regional supply of this product
- electricity, low voltage: 0.0105 kWh; lognormal variance with pedigree 0.5, pedigree (5,5,5,5,5)
  (same comment as for heat, district or industrial, natural gas)
- iron (III) chloride, without water, in 40% solution state: 1e-7 kg; lognormal variance with pedigree 1.01, pedigree (1,1,5,1,1)
  (same comment as for slag landfill)
  properties: wet mass 1 kg, dry mass 1 kg
- wastewater treatment facility, capacity 5E9l/year: 1.42e-11 unit; lognormal variance with pedigree 0.2106, pedigree (5,5,5,5,5)
  (same comment as for heat, district or industrial, natural gas)
- waste cement, hydrated: -0.00642 kg; lognormal variance with pedigree 0.34, pedigree (1,1,5,1,1)
  (same comment as for slag landfill)
  production volume 0.00642 kg
    (same comment as for waste graphical paper)
  properties: dry mass 1 kg, wet mass 1 kg
- cement, unspecified: 0.00257 kg; lognormal variance with pedigree 0.34, pedigree (1,1,5,1,1)
  (same comment as for slag landfill)
  properties: wet mass 1 kg, dry mass 1 kg
- chemical, inorganic: 5.49e-10 kg; lognormal variance with pedigree 1.01, pedigree (1,1,5,1,1)
  (same comment as for slag landfill)
  properties: carbon content, fossil 0.003, dry mass 1 kg, wet mass 1 kg
  note on carbon content, fossil: This dataset is an unweighted average of 20 inorganic substances (listed in Tab 88.1, ecoinvent v2.2 report 8, part II), being part of the top100 chemicals included in this database. The C-content has also been calculated as an unweighted average of the C content of the substances composing this dataset.

## Emissions to nature
- Copper, ion [water, surface water]: 5.4e-9 kg; lognormal variance with pedigree 1.87, pedigree (1,1,5,1,1)
  Emissions from short-term leachate treatment and incineration of resulting sludge. Uncertainty calculated depending on waste input and uncertainty of transfer coefficents in landfill, wastewater treatment and incineration model.
- Methane, fossil [air, urban air close to ground]: 4.23e-7 kg; lognormal variance with pedigree 0.35, pedigree (1,1,5,1,1)
  (same comment as for Copper, ion)
- Zinc, ion [water, surface water]: 2.12e-7 kg; lognormal variance with pedigree 1.43, pedigree (1,1,5,1,1)
  (same comment as for Copper, ion)
- Copper, ion [water, ground-, long-term]: 8.49e-6 kg; lognormal variance with pedigree 1.33, pedigree (1,1,5,1,1)
  Emissions from long-term leachate (>100a) directly from MSW landfill and indirectly via incineration of treatement sludge from leachate treatement. Uncertainty calculated depending on waste input and uncertainty of long-term transfer coefficents in landfill.
- Carbon monoxide, fossil [air, urban air close to ground]: 1.48e-5 kg; lognormal variance with pedigree 0.95, pedigree (1,1,5,1,1)
  (same comment as for Copper, ion)
- Cadmium [air, non-urban air or from high stacks]: 1.76e-9 kg; lognormal variance with pedigree 2.19, pedigree (1,1,5,1,1)
  burden from direct release or incineration of landfill biogas. Uncertainty calculated from unertainty of the waste composition of this waste, uncertainty in waste decomposition and short-term leaching in sanitary landfill
- Chloride [water, ground-, long-term]: 4.83e-12 kg; lognormal variance with pedigree 2.42, pedigree (1,1,5,1,1)
  (same comment as for Copper, ion)
- Zinc, ion [water, ground-, long-term]: 2.34e-5 kg; lognormal variance with pedigree 1.17, pedigree (1,1,5,1,1)
  (same comment as for Copper, ion)
- Cadmium, ion [water, ground-, long-term]: 2.74e-6 kg; lognormal variance with pedigree 1.52, pedigree (1,1,5,1,1)
  (same comment as for Copper, ion)
- Aluminium [air, non-urban air or from high stacks]: 6.22e-6 kg; lognormal variance with pedigree 1.36, pedigree (1,1,5,1,1)
  (same comment as for Cadmium)
- Chloride [water, surface water]: 0.00476 kg; lognormal variance with pedigree 0.5, pedigree (1,1,5,1,1)
  Emissions from short-term leachate treatment. Uncertainty calculated depending on waste input and uncertainty of transfer coefficents in landfill and wastewater treatment.
- Cadmium, ion [water, surface water]: 1.34e-7 kg; lognormal variance with pedigree 1.59, pedigree (1,1,5,1,1)
  (same comment as for Copper, ion)
- Zinc [air, urban air close to ground]: 7.75e-12 kg; lognormal variance with pedigree 1.5, pedigree (1,1,5,1,1)
  (same comment as for Copper, ion)
- Lead [water, ground-, long-term]: 2.54e-5 kg; lognormal variance with pedigree 1.2, pedigree (1,1,5,1,1)
  (same comment as for Copper, ion)
- Copper [air, urban air close to ground]: 1.14e-13 kg; lognormal variance with pedigree 1.94, pedigree (1,1,5,1,1)
  (same comment as for Copper, ion)
- Lead [air, urban air close to ground]: 2.48e-12 kg; lognormal variance with pedigree 1.76, pedigree (1,1,5,1,1)
  (same comment as for Copper, ion)
- Zinc [air, non-urban air or from high stacks]: 1.53e-10 kg; lognormal variance with pedigree 2.51, pedigree (1,1,5,1,1)
  (same comment as for Cadmium)
- Aluminium [water, surface water]: 0.00149 kg; lognormal variance with pedigree 0.31, pedigree (1,1,5,1,1)
  (same comment as for Copper, ion)
- Lead [water, surface water]: 8.26e-9 kg; lognormal variance with pedigree 1.7, pedigree (1,1,5,1,1)
  (same comment as for Copper, ion)
- Hydrogen chloride [air, non-urban air or from high stacks]: 6.86e-5 kg; lognormal variance with pedigree 0.82, pedigree (1,1,5,1,1)
  (same comment as for Cadmium)
- Copper [air, non-urban air or from high stacks]: 5.95e-12 kg; lognormal variance with pedigree 2.94, pedigree (1,1,5,1,1)
  (same comment as for Cadmium)
- Cadmium [air, urban air close to ground]: 7.22e-12 kg; lognormal variance with pedigree 1.65, pedigree (1,1,5,1,1)
  (same comment as for Copper, ion)
- Aluminium [water, ground-, long-term]: 0.988 kg; lognormal variance with pedigree 0.04, pedigree (1,1,5,1,1)
  (same comment as for Copper, ion)
- Lead [air, non-urban air or from high stacks]: 2.5e-11 kg; lognormal variance with pedigree 2.74, pedigree (1,1,5,1,1)
  (same comment as for Cadmium)
- Aluminium [air, urban air close to ground]: 3.65e-5 kg; lognormal variance with pedigree 0.34, pedigree (1,1,5,1,1)
  (same comment as for Copper, ion)

## Sampling procedure
Landfill model based on observed leachate concentrations in literature. Extrapolated to 60'000 years heeding chemical characteristics. Initial waste composition from various literature sources.

## Extrapolations
This dataset has been extrapolated from year 2000 to the year of the calculation (2021). The uncertainty has been adjusted accordingly.

## Review by Niels Jungbluth 2003-08-30
Passed. Calculation for standard deviation 95 of, i.e., infrastructure,
land occupation, transport services or other services can differ from
standard Pedigree approach used in this project and figures obtained by
this procedure.
