# bleaching, textile

Dataset: EcoSpold 2, unit process
Geography: BD
Time period: 2017-01-01 to 2021-12-31
Technology level: current
Classification: ISIC rev.4 ecoinvent: 1313:Finishing of textiles
Scenario: Business-as-Usual
System model: Allocation, cut-off by classification
Generated by: Mireille Faist Emmenegger
Published in: Faist Emmenegger, M. 2018
Database: ecoinvent
isCopyrightProtected: true
accessRestrictedTo: 1

## General comment
This inventory refers to 1 kg bleached textile. The batch dyeing process includes loading, neutralisation, bleaching, bio-polish, reactive dying, neutralisation, soaping, and softening. The entire dyeing process is covered in a separate dataset. This dataset only covers all relevant input and output flows for bleaching of 1 kg fabric as a service to the batch dyeing activity.
This activity bleaches greige textile. Bleaching improves whiteness by removing natural coloration and remaining trace impurities from the cotton; the degree of bleaching necessary is determined by the required whiteness and absorbency. Cotton being a vegetable fibre will be bleached using an oxidizing agent, such as dilute sodium hypochlorite or dilute hydrogen peroxide.
This activity is modeled as a service, so no input of textile is considered. Electricity consumption and chemicals used (hydrogen per oxide, sodium hydroxide, and inorganic chemicals) are considered as inputs. Wastewater discharges as output. A separate dataset is taking care of wasterwater treatment.
Cody, Roxanna (2012). Textile Engineering. First Edition. Delhi.

## Included activities start
This activity applies to scoured fabric. As it is a service, no inputs of fabric are included; this activity should be used with 1 kg fabric.

## Included activities end
This process delivers the service of dyeing 1 kg fabric. Drying is not included because the entire process (both bleaching dyeing) happens in the same machine simultaneously. However, drying is done after the dyeing as part of the finshing.

## Geography
Bangladesh

## Reference product
- bleaching, textile: 1 kg; By-product classification allocatable product; CPC 88213: Textile finishing services
  Literature Value. The annual woven and knit fabric dyeing capacity data from Bangladesh Textile Mills Association (BTMA).
  production volume 1.47344e9 kg; name PV_RP
    The production volume amount is extrapolated from the annual production volume of batch dyed textile.
  property price 0.301769 EUR2005
    Calculated based on inputs: The price of the product has been calculated as a sum of the values of the material and energy inputs for this product. This value is therefore a rough estimation. It may underestimate the real price since there are additional expenses when producing any product. These expences can include for example labour costs, treatment of waste materials and profit for the producer. Please consider carefully whether this level of data quality is acceptable for your application.

## Inputs from technosphere
- hydrogen peroxide, without water, in 50% solution state: 0.03 kg; lognormal variance with pedigree 0.0106, pedigree (4,1,3,1,1)
  Industry data.
  properties: dry mass 1 kg, wet mass 1 kg, heating value, net 7.13 MJ
- sodium hydroxide, without water, in 50% solution state: 0.00899993 kg; lognormal variance with pedigree 0.0106, pedigree (4,1,3,1,1)
  Industry data.
  properties: heating value, net 3.03 MJ, dry mass 1 kg, wet mass 1 kg
- wastewater from textile production: -0.0056 m3; name wastewater
  Industry data.
  production volume 8.25125e6 m3; = PV_RP*wastewater
    Calculated from production volume of reference product using the relative outputs.
  property price 0 EUR2005; name wastewater_price_EUR2005
- electricity, medium voltage: 0.1287 kWh
  Industry data.
- chemical, inorganic: 0.0100994 kg; lognormal variance with pedigree 0.0106, pedigree (4,1,3,1,1)
  Industry data.
  properties: dry mass 1 kg, wet mass 1 kg, carbon content, fossil 0.003
  note on carbon content, fossil: This dataset is an unweighted average of 20 inorganic substances (listed in Tab 88.1, ecoinvent v2.2 report 8, part II), being part of the top100 chemicals included in this database. The C-content has also been calculated as an unweighted average of the C content of the substances composing this dataset.

## Inputs from nature
- Water, well, in ground [natural resource, in water]: 0.0056 m3; lognormal variance with pedigree 0.0106, pedigree (4,1,3,1,1)
  Industry data.

## Sampling procedure
Industry data. Representative mills in Bangladesh. The mills were chosen to provide data based on their technical representation of the current state of business and their willingness to participate.

## Extrapolations
This dataset has been extrapolated from year 2017 to the year of the calculation (2021). The uncertainty has been adjusted accordingly.
