# steel production, converter, low-alloyed

Dataset: EcoSpold 2, unit process
Geography: IN
Time period: 2010-01-01 to 2021-12-31
Technology level: modern
Classification: ISIC rev.4 ecoinvent: 2410:Manufacture of basic iron and steel
Classification: EcoSpold01Categories: metals/extraction
Scenario: Business-as-Usual
System model: Allocation, cut-off by classification
Share of production covered: 10 %
Generated by: Harshita Soni
Published in: Soni H. 2017
Database: ecoinvent
isCopyrightProtected: true
accessRestrictedTo: 1

## General comment
This process produces primary steel via Basic Oxygen Furnace (BOF) route. Basic oxygen steelmaking is a method of primary steelmaking in which carbon-rich molten pig iron is made into steel. Blowing oxygen through molten pig iron lowers the carbon content of the alloy and changes it into low-carbon steel. The process is known as basic because fluxes of burnt lime or dolomite, which are chemical bases, are added to promote the removal of impurities and protect the lining of the converter.

## Included activities start
This activity starts when raw materials like pig iron are sent to Basic Oxygen Furnace.

## Included activities end
This activity ends at the exit of BOF

## Geography
Data collected from one integrated steel plant in India that manufacturers 38,33,379 tonnes of low alloyed steel via BOF route.

## Technology
Basic oxygen steelmaking (BOS, BOP, BOF, and OSM), also known as Linz–Donawitz-steelmaking or the oxygen converter process was developed in 1948 by Robert Durrer and commercialized in 1952–1953 by Austrian VOEST and ÖAMG. The LD converter, named after the Austrian towns Linz and Donawitz (a district of Leoben) is a refined version of the Bessemer converter where blowing of air is replaced with blowing oxygen. It reduced capital cost of the plants, time of smelting, and increased labor productivity. Between 1920 and 2000, labor requirements in the industry decreased by a factor of 1,000, from more than 3 man-hours per metric ton to just 0.003. The vast majority of steel manufactured in the world is produced using the basic oxygen furnace; in 2000, it accounted for 60% of global steel output. Modern furnaces will take a charge of iron of up to 400 tons and convert it into steel in less than 40 minutes, compared to 10–12 hours in an open hearth furnace. The basic oxygen steel-making process is as follows:

Molten pig iron (sometimes referred to as "hot metal") from a blast furnace is poured into a large refractory-lined container called a ladle;
The metal in the ladle is sent directly for basic oxygen steelmaking or to a pretreatment stage. High purity oxygen at a pressure of 700–1,000 kilopascals (100–150 psi) is introduced at supersonic speed onto the surface of the iron bath through a water-cooled lance, which is suspended in the vessel and kept a few feet above the bath. Pretreatment of the blast furnace hot metal is done externally to reduce sulphur, silicon, and phosphorus before charging the hot metal into the converter. In external desulphurising pretreatment, a lance is lowered into the molten iron in the ladle and several hundred kilograms of powdered magnesium are added and the sulphur impurities are reduced to magnesium sulphide in a violent exothermic reaction. The sulfide is then raked off. Similar pretreatments are possible for external desiliconisation and external dephosphorisation using mill scale (iron oxide) and lime as fluxes. The decision to pretreat depends on the quality of the hot metal and the required final quality of the steel.
Filling the furnace with the ingredients is called charging. The BOS process is autogenous, i.e. the required thermal energy is produced during the oxidation process. Maintaining the proper charge balance, the ratio of hot metal, from melt, to cold scrap, is therefore very important. The BOS vessel can be tilted up to 360° and is tilted towards the deslagging side for charging scrap and hot metal. The BOS vessel is charged with steel or iron scrap (25%-30%) if required. Molten iron from the ladle is added as required for the charge balance. A typical chemistry of hotmetal charged into the BOS vessel is: 4% C, 0.2–0.8% Si, 0.08%–0.18% P, and 0.01–0.04% S, all of which can be oxidised by the supplied oxygen except sulphur (which requires reducing conditions).
The vessel is then set upright and a water-cooled, copper tipped lance with 3-7 nozzles is lowered down into it and high purity oxygen is delivered at supersonic speeds. The lance "blows" 99% pure oxygen over the hot metal, igniting the carbon dissolved in the steel, to form carbon monoxide and carbon dioxide, and causing the temperature to rise to about 1700 °C. This melts the scrap, lowers the carbon content of the molten iron and helps remove unwanted chemical elements. It is this use of pure oxygen instead of air that improves upon the Bessemer process, as the nitrogen (a particularly undesirable element) and other gases in air do not react with the charge.[11]
Fluxes (burnt lime or dolomite) are fed into the vessel to form slag, to maintain basicity above 3 and absorb impurities during the steelmaking process. During "blowing", churning of metal and fluxes in the vessel forms an emulsion, that facilitates the refining process. Near the end of the blowing cycle, which takes about 20 minutes, the temperature is measured and samples are taken. A typical chemistry of the blown metal is 0.3–0.9% C, 0.05–0.1% Mn, 0.001–0.003% Si, 0.01–0.03% S and 0.005–0.03% P.
The BOF vessel is tilted towards the slagging side and the steel is poured through a tap hole into a steel ladle with basic refractory lining. This process is called tapping the steel. The steel is further refined in the ladle furnace, by adding alloying materials to give it special properties required by the customer. Sometimes argon or nitrogen is bubbled into the ladle to make the alloys mix correctly.
After the steel is poured off from the BOS vessel, the slag is poured into the slag pots through the BOS vessel mouth and dumped.
Reference: https://en.wikipedia.org/wiki/Basic_oxygen_steelmaking

## Time period
The data is valid for 2010-17.

## Parameters
- fraction, process water, to air: 0.2 dimensionless; name fraction_PW_to_air; lognormal variance with pedigree 0.092025, pedigree (4,4,3,2,4)

## Reference product
- steel, low-alloyed: 1 kg; name RP_amount; By-product classification allocatable product; CPC 41122: Alloy steel in ingots or other primary forms and semi-finished products of alloy steel
  Steel low-alloyed manufactured via BOF route
  production volume 4.11293e9 kg; name RP_PV
    Calculated based on the amount of crude steel produced in India through the BOF route in 2019 (worldsteel, 2020).
    89% of the steel produced is unalloyed and 11% is alloyed (Gerbens-Leenes et al. 2018). Based on the amount of stainless (chromium) steel produced globally (ISSF 2021), 8.2% of the steel produced is low-alloyed and 2.8% is stainless. Therefore, out of the steel that is not stainless steel, 91.6% is unalloyed and 8.4% is low-alloyed. These shares are assumed valid for India as well.
    References:
    P.W. Gerbens-Leenes, A.Y. Hoekstra, R. Bosman (2018). The blue and grey water footprint of construction materials: Steel, cement and glass. Water Resources and Industry, Volume 19. https://doi.org/10.1016/j.wri.2017.11.002.
    worldsteel (2020). Steel Statistical Yearbook 2020 [online]. Available from: https://www.worldsteel.org/en/dam/jcr:5001dac8-0083-46f3-aadd-35aa357acbcc/Steel%2520Statistical%2520Yearbook%25202020%2520%2528concise%2520version%2529.pdf (accessed 20.07.2021).
    International Stainless Steel Forum (ISSF) (2021). Stainless Steel in Figures 2021 [online]. Available from: https://www.worldstainless.org/files/issf/non-image-files/PDF/ISSF_Stainless_Steel_in_Figures_2021_English_public_version.pdf (accessed 21.07.2021).
  property price 0.468 EUR2005; name RP_amount_price_EUR2005
    Calculated from EU prices by use of exchange rates.
  property heating value, net 0 MJ
    Non combustible products are assumed to have an LHV equal to zero (0).
  property carbon content 0.005
    carbon content on a dry matter basis (reserved; not for manual entry)
  properties: water in wet mass 0 kg, water content 0, wet mass 1 kg, carbon content, non-fossil 0, dry mass 1 kg, carbon content, fossil 0.005, carbon allocation 0.005 kg

## By-products
- blast furnace gas: 0 MJ; CPC 17200: Coal gas, water gas, producer gas and similar gases, other than petroleum gases and other gaseous hydrocarbons; By-product classification Recyclable; pedigree (1,1,1,1,1)
  Based on data received from integrated steel plants in India
  production volume 0 MJ; = RP_PV * (BFgas / RP_amount)
    Calculated from production volume of reference product using the relative outputs.
  property price 0.004 EUR2005; name BFgas_price_EUR2005
    Temporary price data. Calculated as 90% of purchasers price based on: Same price as natural gas per MJ
  property carbon content 0.156611
    carbon content on a dry matter basis (reserved; not for manual entry)
  properties: wet mass 0.367647 kg, carbon content, fossil 0.156611, carbon content, non-fossil 0, water in wet mass 0 kg, dry mass 0.367647 kg, water content 0, carbon allocation 0.0575774 kg

## Inputs from technosphere
- electricity, medium voltage: 0.07015 kWh; lognormal variance with pedigree 0.0058, pedigree (3,3,3,1,2)
  EcoSpold01Location=UCTE
  Based on data received from integrated steel plants in India
- iron scrap, sorted, pressed: 0.15598 kg; lognormal variance with pedigree 0.0058, pedigree (3,3,3,1,2)
  Based on data received from integrated steel plants in India
  properties: dry mass 1 kg, wet mass 1 kg
- nickel, class 1: 1.608e-5 kg; lognormal variance with pedigree 0.0058, pedigree (3,3,3,1,2)
  Based on data received from integrated steel plants in India
  properties: dry mass 1 kg, wet mass 1 kg
- heat, district or industrial, other than natural gas: 0.153783 MJ; lognormal variance with pedigree 0.0058, pedigree (3,3,3,1,2)
  Based on data received from integrated steel plants in India
  properties: corresponding fuel use, propane, furnace >100kW 1.05263 MJ, heating value, net 1 MJ
  note on corresponding fuel use, propane, furnace >100kW: Lower heating value of the fuel input related to the heat/electricity output, taken directly from ecoinvent v3.0 dataset "heat production, natural gas, at industrial furnace >100kW, GLO 2000".
- propane: 0.000345 kg; lognormal variance with pedigree 0.0058, pedigree (3,3,3,1,2)
  Based on data received from integrated steel plants in India
  properties: wet mass 1 kg, carbon content, fossil 0.817139, heating value, net 46.4 MJ, dry mass 1 kg
  note on heating value, net: Indicative value. Reference: Fuels - Higher and Lower Calorific Values, available at: https://www.engineeringtoolbox.com/fuels-higher-calorific-values-d_169.html
- calcium carbide, technical grade: 0.005253 kg; lognormal variance with pedigree 0.0112, pedigree (3,3,3,1,2)
  Based on data received from integrated steel plants in India
  properties: dry mass 1 kg, heating value, net 11.36 MJ, carbon content, fossil 0.375, wet mass 1 kg
- manganese: 0.00056 kg; lognormal variance with pedigree 0.0058, pedigree (3,3,3,1,2)
  Based on data received from integrated steel plants in India
  properties: wet mass 1 kg, dry mass 1 kg
- ferrosilicon: 0.0002098 kg; lognormal variance with pedigree 0.0058, pedigree (3,3,3,1,2)
  Based on data received from integrated steel plants in India
  properties: wet mass 1 kg, dry mass 1 kg, carbon content, fossil 0.1, heating value, net 3.03 MJ
- copper, cathode: 2.2e-5 kg; lognormal variance with pedigree 0.0058, pedigree (3,3,3,1,2)
  Based on data received from integrated steel plants in India
  properties: dry mass 1 kg, wet mass 1 kg
- sponge iron: 0.0215 kg; lognormal variance with pedigree 0.0058, pedigree (3,3,3,1,2)
  Based on data received from integrated steel plants in India
  properties: phosphorus content 0.05, carbon content, fossil 0.1, dry mass 1 kg, heating value, net 3.03 MJ, sulfur content 0.03, iron content 0.82, wet mass 1 kg
- blast oxygen furnace converter: 1.3333e-11 unit; lognormal variance with pedigree 0.2952, pedigree (3,3,3,1,2)
  EcoSpold01Location=RER
  Based on ecoinvent dataset for steel production, converter, unalloyed, GLO
- diesel: 8e-5 kg; lognormal variance with pedigree 0.0058, pedigree (3,3,3,1,2)
  Based on data received from integrated steel plants in India
  properties: wet mass 1 kg, dry mass 1 kg, carbon content, fossil 0.865, heating value, net 42.8 MJ
  note on carbon content, fossil: C-content of diesel is 86.5% (ecoinvent v2.2 report 6_IV, Tab 3.14)
- pig iron: 1.011 kg; lognormal variance with pedigree 0.0052, pedigree (3,3,3,1,2)
  EcoSpold01Location=GLO
  Based on data received from integrated steel plants in India
  properties: dry mass 1 kg, wet mass 1 kg, carbon content, fossil 0.045
  note on carbon content, fossil: Pig iron is the iron produced in the blast furnace. It is an alloy of 94% Fe and more than 2% C (world average 4.5%). (ecoinvent v2.2 report 10_partII)
- basic oxygen furnace dust: -0.0010625 kg; name dust; lognormal variance with pedigree 0.0058, pedigree (3,3,3,1,2)
  Based on ecoinvent dataset for steel production, converter, lowalloyed, GLO
  production volume 4.36999e6 kg; = dust*RP_PV / RP_amount
    Calculated from production volume of reference product using the relative outputs.
  property price 0 EUR2005; name dust_price_EUR2005
  properties: carbon content, fossil 0.0181399, oxygen content 0.312189, manganese content 0.0049, antimony content 0.0031, silicon content 0.0100985, calcium content 0.0868734, magnesium content 0.00854209, iron content 0.528324, aluminium content 0.0128653, dry mass 0.999 kg, wet mass 1 kg, zinc content 0.00713417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
  note on carbon content, fossil: The value of 'carbon content, fossil' is documented in Turner & Symeonidis, 2020. Reference: Turner David & Symeonidis Avraam, 2020, Life cycle inventories of the treatment of iron and steelmaking by-products, ecoinvent association, Zürich, Switzerland
  note on oxygen content: The value of 'oxygen content' is documented in Turner & Symeonidis, 2020. Reference: Turner David & Symeonidis Avraam, 2020, Life cycle inventories of the treatment of iron and steelmaking by-products, ecoinvent association, Zürich, Switzerland
  note on manganese content: The value of 'manganese content' is documented in Turner & Symeonidis, 2020. Reference: Turner David & Symeonidis Avraam, 2020, Life cycle inventories of the treatment of iron and steelmaking by-products, ecoinvent association, Zürich, Switzerland
  note on antimony content: The value of 'antimony content' is documented in Turner & Symeonidis, 2020. Reference: Turner David & Symeonidis Avraam, 2020, Life cycle inventories of the treatment of iron and steelmaking by-products, ecoinvent association, Zürich, Switzerland
  note on silicon content: The value of 'silicon content' is documented in Turner & Symeonidis, 2020. Reference: Turner David & Symeonidis Avraam, 2020, Life cycle inventories of the treatment of iron and steelmaking by-products, ecoinvent association, Zürich, Switzerland
  note on calcium content: The value of 'calcium content' is documented in Turner & Symeonidis, 2020. Reference: Turner David & Symeonidis Avraam, 2020, Life cycle inventories of the treatment of iron and steelmaking by-products, ecoinvent association, Zürich, Switzerland
  note on magnesium content: The value of 'magnesium content' is documented in Turner & Symeonidis, 2020. Reference: Turner David & Symeonidis Avraam, 2020, Life cycle inventories of the treatment of iron and steelmaking by-products, ecoinvent association, Zürich, Switzerland
  note on iron content: The value of 'iron content' is documented in Turner & Symeonidis, 2020. Reference: Turner David & Symeonidis Avraam, 2020, Life cycle inventories of the treatment of iron and steelmaking by-products, ecoinvent association, Zürich, Switzerland
  note on aluminium content: The value of 'aluminium content' is documented in Turner & Symeonidis, 2020. Reference: Turner David & Symeonidis Avraam, 2020, Life cycle inventories of the treatment of iron and steelmaking by-products, ecoinvent association, Zürich, Switzerland
  note on zinc content: The value of 'zinc content' is documented in Turner & Symeonidis, 2020. Reference: Turner David & Symeonidis Avraam, 2020, Life cycle inventories of the treatment of iron and steelmaking by-products, ecoinvent association, Zürich, Switzerland
- oxygen, liquid: 0.09962 kg; lognormal variance with pedigree 0.0058, pedigree (3,3,3,1,2)
  EcoSpold01Location=RER
  Based on data received from integrated steel plants in India
  properties: wet mass 1 kg, dry mass 1 kg
- basic oxygen furnace waste: -0.0923 kg; name BOFwaste; lognormal variance with pedigree 0.043225, pedigree (3,3,5,2,2)
  Based on data received from integrated steel plants in India
  EcoSpold01Location=CH
  production volume 3.79623e8 kg; = BOFwaste*RP_PV / RP_amount
    Calculated from the production volume of steel, unalloyed in proportion to the respective output amounts.
  property price 0 EUR2005; name BOFwaste_price_EUR2005
  properties: wet mass 1 kg, dry mass 1 kg
- basic oxygen furnace slag: -0.2318 kg; name BOFslag; lognormal variance with pedigree 0.0058, pedigree (3,3,3,1,2)
  Based on data received from integrated steel plants in India
  production volume 9.53377e8 kg; = RP_PV * (BOFslag / RP_amount)
    Calculated from production volume of reference product using the relative outputs.
  property price 0 EUR2005; name BOFslag_price_EUR2005
  properties: water content 0.00502513, phosphorus content 0.0102096, aluminium content 0.0101034, manganese content 0.0250783, vanadium content 0.00554358, magnesium content 0.0350101, oxygen content 0.329259, silicon content 0.0600014, wet mass 1 kg, calcium content 0.324525, dry mass 0.995 kg, iron content 0.182475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
  note on phosphorus content: The value of 'phosphorus content' is documented in Turner & Symeonidis, 2020. Reference: Turner David & Symeonidis Avraam, 2020, Life cycle inventories of the treatment of iron and steelmaking by-products, ecoinvent association, Zürich, Switzerland
  note on vanadium content: The value of 'vanadium content' is documented in Turner & Symeonidis, 2020. Reference: Turner David & Symeonidis Avraam, 2020, Life cycle inventories of the treatment of iron and steelmaking by-products, ecoinvent association, Zürich, Switzerland
- wastewater, average: -0.000552 m3; name wastewater; = (water_UNO_input*(1 - fraction_PW_to_air))*-1; lognormal variance with pedigree 0.0452, pedigree (3,3,3,1,2)
  It is assumed that 80% of water consumed as input to the process is sent out as wastewater for treatment. The wastewater after treatment is recycled and reused again in the process.
  production volume 2.27034e6 m3; = wastewater * RP_PV / RP_amount
    Calculated from production volume of reference product using the relative outputs.
  property price 0 EUR2005; name wastewater_price_EUR2005
  properties: dry mass 0.346837 kg, wet mass 1000 kg, water content 2882.2, carbon content, non-fossil 0.194039
  note on carbon content, non-fossil: 0.0673 kg TOC/m3 (Tab A.17, ecoinvent v2.2 report 13_I). TOC was considered as Total Carbon.
- aluminium, wrought alloy: 0.00242 kg; lognormal variance with pedigree 0.0058, pedigree (3,3,3,1,2)
  Based on data received from integrated steel plants in India
  properties: wet mass 1 kg, dry mass 1 kg
- lime: 0.0634 kg; lognormal variance with pedigree 0.0058, pedigree (3,3,3,1,2)
  Based on data received from integrated steel plants in India
  properties: carbon content, fossil 0.120005, wet mass 1 kg, dry mass 1 kg
- steam, in chemical industry: 0.0101 kg; lognormal variance with pedigree 0.0058, pedigree (3,3,3,1,2)
  Based on data received from integrated steel plants in India
  properties: dry mass 1 kg, wet mass 1 kg
- nitrogen, liquid: 0.04479 kg; lognormal variance with pedigree 0.0058, pedigree (3,3,3,1,2)
  Based on data received from integrated steel plants in India
  properties: wet mass 1 kg, dry mass 1 kg
- coke: 0.00081 MJ; lognormal variance with pedigree 0.0058, pedigree (3,3,3,1,2)
  EcoSpold01Location=RER
  Based on data received from integrated steel plants in India
  properties: heating value, net 28.6 MJ, water content 0.0638298, dry mass 0.0328671 kg, carbon content, fossil 0.869149, wet mass 0.034965 kg
  note on carbon content, fossil: 81.7% C and 6% water in wet mass (ecoinvent v2.1 report 6_VI Table 7.1)
- argon, liquid: 0.003222 kg; lognormal variance with pedigree 0.0058, pedigree (3,3,3,1,2)
  Based on data received from integrated steel plants in India
  properties: wet mass 1 kg, dry mass 1 kg
- electrode, negative, Ni: 0.000143 kg; lognormal variance with pedigree 0.0058, pedigree (3,3,3,1,2)
  Based on data received from integrated steel plants in India
  properties: wet mass 1 kg, carbon content, fossil 0.00301397, dry mass 1 kg
- dolomite: 0.04186 kg; lognormal variance with pedigree 0.0112, pedigree (3,3,3,1,2)
  EcoSpold01Location=RER
  Based on data received from integrated steel plants in India
  properties: heating value, net 3.95 MJ, wet mass 1 kg, carbon content, fossil 0.130435, dry mass 1 kg
- ferromanganese, high-coal, 74.5% Mn: 0.005584 kg; lognormal variance with pedigree 0.0058, pedigree (3,3,3,1,2)
  Based on data received from integrated steel plants in India
  properties: dry mass 1 kg, wet mass 1 kg, carbon content, fossil 0.075, heating value, net 2.27 MJ
- liquefied petroleum gas: 0.0002921 kg; lognormal variance with pedigree 0.0058, pedigree (3,3,3,1,2)
  Based on data received from integrated steel plants in India
  properties: wet mass 1 kg, carbon content, fossil 0.821863, dry mass 1 kg, heating value, net 45.5 MJ
- blast furnace gas: -0.8375 MJ; lognormal variance with pedigree 0.0058, pedigree (3,3,3,1,2)
  Based on data received from integrated steel plants in India
  production volume 3.44458e9 MJ
  properties: wet mass 0.367647 kg, carbon content, fossil 0.156611, dry mass 0.367647 kg

## Inputs from nature
- Water, unspecified natural origin [natural resource, in water]: 0.00069 m3; name water_UNO_input; lognormal variance with pedigree 0.0152, pedigree (3,3,3,1,2)
  Based on data received from integrated steel plants in India

## Emissions to nature
- Carbon dioxide, fossil [air, unspecified]: 0.0756 kg; lognormal variance with pedigree 0.0052, pedigree (2,3,3,5,1)
  Based on GLO dataset for steel production, converter, low alloyed, 2017 accessed through ecoeditor on March 31, 2018
- PAH, polycyclic aromatic hydrocarbons [air, unspecified]: 1.2e-10 kg; lognormal variance with pedigree 0.3052, pedigree (3,3,3,1,2)
  Based on ecoinvent dataset for "steel production, converter, lowalloyed, GLO" accessed through ecoeditor on 20170815
- Manganese [air, unspecified]: 6.05e-7 kg; lognormal variance with pedigree 0.6552, pedigree (3,3,3,1,2)
  (same comment as for PAH, polycyclic aromatic hydrocarbons)
- Lead [air, unspecified]: 5.15e-7 kg; lognormal variance with pedigree 0.6552, pedigree (3,3,3,1,2)
  (same comment as for PAH, polycyclic aromatic hydrocarbons)
- Dioxins, measured as 2,3,7,8-tetrachlorodibenzo-p-dioxin [air, unspecified]: 3.05e-14 kg; lognormal variance with pedigree 0.3052, pedigree (3,3,3,1,2)
  (same comment as for PAH, polycyclic aromatic hydrocarbons)
- Particulates, < 2.5 um [air, unspecified]: 4.75e-5 kg; lognormal variance with pedigree 0.3052, pedigree (3,3,3,1,2)
  (same comment as for PAH, polycyclic aromatic hydrocarbons)
- Carbon monoxide, fossil [air, unspecified]: 0.00473 kg; lognormal variance with pedigree 0.6552, pedigree (3,3,3,1,2)
  (same comment as for PAH, polycyclic aromatic hydrocarbons)
- Chromium [air, unspecified]: 1.85e-7 kg; lognormal variance with pedigree 0.6552, pedigree (3,3,3,1,2)
  (same comment as for PAH, polycyclic aromatic hydrocarbons)
- Water [air, non-urban air or from high stacks]: 0.000138 m3; = (water_UNO_input*fraction_PW_to_air); lognormal variance with pedigree 0.0112, pedigree (3,3,3,1,2)
  Based on the formula given in ecoinvent dataset " pig iron production, GLO" accessed through ecoeditor on 20170815
- Copper [air, unspecified]: 2.5e-8 kg; lognormal variance with pedigree 0.6552, pedigree (3,3,3,1,2)
  (same comment as for PAH, polycyclic aromatic hydrocarbons)
- Nitrogen oxides [air, unspecified]: 1.25e-5 kg; lognormal variance with pedigree 0.0452, pedigree (3,3,3,1,2)
  (same comment as for PAH, polycyclic aromatic hydrocarbons)

## Sampling procedure
Based on data received from one integrated steel plant in India

## Extrapolations
This dataset has been extrapolated from year 2017 to the year of the calculation (2021). The uncertainty has been adjusted accordingly.
