# paris market carrot production

Dataset: EcoSpold 2, unit process
Geography: GLO
Time period: 2010-01-01 to 2021-12-31
Technology level: current
Classification: ISIC rev.4 ecoinvent: 0113:Growing of vegetables and melons, roots and tubers
Scenario: Business-as-Usual
System model: Allocation, cut-off by classification
Generated by: Franziska Stössel
Published in: Stoessel, Franziska; 2012
Database: ecoinvent
isCopyrightProtected: false
accessRestrictedTo: 1

## General comment
This dataset represents paris market carrot production according to the Integrated Production standard in CH.
Yield: 25 t / ha.
Duration of one cropping cycle: 4 months.
Field production.
The LCA study, from which this LCI has been derived, contains detailed descriptions of the system boundaries and the data sources used (Stoessel et al. 2012). The publication is published and freely available with comprehensive supporting information:
http://pubs.acs.org/doi/pdf/10.1021/es2030577
Franziska Stoessel, Ronnie Juraske, Stephan Pfister, Stefanie Hellweg. (2012) Life Cycle Inventory and Carbon and Water FoodPrint of Fruits and Vegetables: Application to a Swiss Retailer. Environmental Science & Technology 6(46) 3253-3262.
This activity was adapted to include the global average land use change (LUC) emissions according 2nd edition of the Quantis-modified tool developed by Blonk Consultants 'WFLDB-adapted-Blonk 2014 direct-land-use-change-assessment-tool_2015-05-18a.xlsx', tab. 'Country & land use unknown'. The size of the emission depends on (i) the relative crop expansion in all countries of the crop during the last 20 years and (ii) the corresponding, country specific land transformations. The current results are based on the average FAOSTAT data (harvested area) of 2009-2011 and 1989-1991. The weighted average is used which takes into account relative difference in crop expansion into primary forest, secondary forest, grassland, perennial and annual land.

## Included activities start
From sowing.

## Included activities end
This activity ends with harvest. The pesticide inputs are classified according to their chemical classes and the emmssions are assigned to the soil (100%). Mercury emissions are neglected due to a lack of data while other heavy metal emissions are included. The dataset doesn't include storage since they are proccessed directly in the industry. And no infrastructure for production is included in this dataset. No transports for agricultural means of production from the regional storage to the farm are included.

## Technology
Integrated Production

## Parameters
- fraction, process water, to air: 0.15 dimensionless; name fraction_PW_to_air; lognormal variance with pedigree 0.092025, pedigree (4,4,3,2,4)
  Literature value. In case when no industry/process specific data are available, default evaporation fraction value is used. This value is 15% and is based on literature (Statistics Canada, 2007 & Shaffer, K.H., 2008, Consumptive water use in the Great Lakes Basin, USGS & Shiklomanov, 2003, World Water Resources at the Beginning of the 21st Century) and has been approved by an expert.
- fraction, irrigation water, to ground water: 0.8 dimensionless; name fraction_IW_to_ground_water; lognormal variance with pedigree 0.0886, pedigree (4,3,1,1,4)
  Literature value (Doll, 2011) cross referenced with expert opinion.
- fraction, tap water, to air: 0.15 dimensionless; name fraction_TW_to_air; = fraction_PW_to_air; lognormal variance with pedigree 0.092025, pedigree (4,4,3,2,4)
  Calculated value. See comment in the other parametres present in this dataset. Tap water is considered to be always used as process water, thus process water fractions to air are applied to all tap water input flows to calculate the amount of water consumed in the processes.
- fraction, irrigation water to surface water: 0.2 dimensionless; name fraction_IW_to_surface_water; lognormal variance with pedigree 0.0886, pedigree (4,3,1,1,4)
  Literature value (Doll, 2011) cross referenced with expert opinion.
- fraction, irrigation water, to air: 0.586986 dimensionless; name fraction_IW_to_air; lognormal variance with pedigree 0.0409, pedigree (2,2,2,1,1)
  Literature value (Siebert, 2010) (Vionnet, S., Quantis Water Database - Technical Report, 2012).

## Reference product
- paris market carrot: 1 kg; source Stoessel, Franziska; 2012; CPC 01251: Carrots and turnips; By-product classification allocatable product
  production volume 1.68294e9 kg; = 33658877000*0.05
    In kg / year (2010) including carrots and turnips PV is of 33658877000 kg. Paris market carrots are part of a niche market for round carrots. Their production is assumed to be 5% of total carrot production.
  property price 0.302 EUR2005
    Calculated from the trade statistics for the year 2005 published by the UN (COMTRADE database, accessed 20151105) as an average of 5 biggest importers of carrot in the world; CA, DE, BE, UK and FR. Comtrade cathegory: 70610: Carrots and turnips, fresh or chilled.
  property carbon content 0.0510072
    carbon content on a dry matter basis (reserved; not for manual entry)
  properties: dry mass 0.12 kg, carbon content, fossil 0, water content 7.33333, water in wet mass 0.88 kg, wet mass 1 kg, carbon content, non-fossil 0.0510072, carbon allocation 0.00612086 kg

## Inputs from technosphere
- inorganic phosphorus fertiliser, as P2O5: 0 kg; source Stoessel, Franziska; 2012; pedigree (1,1,1,1,1)
  properties: dry mass 1 kg, wet mass 1 kg
- irrigation: 0.032 m3; name water_irrigation_input; source Stoessel, Franziska; 2012; lognormal variance with pedigree 0.0198, pedigree (2,4,4,4,3)
  Switzerland
  properties: wet mass 1000 kg, water content 9089.91, dry mass 0.11 kg
- potassium sulfate: 0 kg; source Stoessel, Franziska; 2012; pedigree (1,1,1,1,1)
  The exchange has been updated from 'potassium sulfate, as K2O' into 'potassium sulfate' and therefore its amount has been scaled (multiplied) from 0.004 kg by 1.85 kg of 'potassium sulfate' per kg of 'potassium sulfate, as K2O'.
  properties: dry mass 1 kg, wet mass 1 kg
- fertilising, by broadcaster: 0.000715 ha; source Stoessel, Franziska; 2012; lognormal variance with pedigree 0.0105, pedigree (2,3,4,3,2)
  Fertilizing by broadcaster is used as a proxy for all the machinery work done in horticultural processes.
- ammonium nitrate: 0 kg; source Stoessel, Franziska; 2012; pedigree (1,1,1,1,1)
  The exchange has been updated from 'ammonium nitrate, as N' into 'ammonium nitrate' and therefore its amount has been scaled (multiplied) from 0.0016 kg by 2.8573 kg of 'ammonium nitrate' per kg of 'ammonium nitrate, as N'.
  properties: wet mass 1 kg, dry mass 1 kg
- [sulfonyl]urea-compound: 7.6e-5 kg; = sulfo1; source Stoessel, Franziska; 2012
  sum of compounds in this family
  property carbon content, non-fossil 0; name C_content_non_fossil
  property carbon content, fossil 0.540853; name C_content_fossil
  property dry mass 1 kg; name DM
  property wet mass 1 kg; name WM
  property water in wet mass 0 kg; name WWM
  property water content 0; name water_content
- packaging, for pesticides: 0.000152 kg; lognormal variance with pedigree 0.0592, pedigree (4,3,4,5,4)
  Total amount of active substance/s of pesticides needed for the production of paris market carrot is calculated to be circa 7.60E-05 kg. Pesticide/s used in this dataset is/are: '[sulfonyl]urea-compound'. The total amount of active substance/s is doubled in order to account for the packaging of the dilluted product of pesticide/s that is/are applied. Therefore, 1.52E-04 kg of packaging for pesticides is justified with this exchange.
  properties: price 0.0642 EUR2005, dry mass 1 kg, wet mass 1 kg, carbon content, fossil 0.85714, heating value, net 25.97 MJ
- tap water: 0.4 kg; name tap_water_input; source Stoessel, Franziska; 2012; lognormal variance with pedigree 0.0105, pedigree (2,3,4,3,2)
  properties: dry mass 0.000337476 kg, water content 2962.17, carbon content, fossil 0.00178991, wet mass 1 kg
  note on carbon content, fossil: Bicarbonate content is 2.93 mol/m3. CO2 content is 0.1 mol/m3 (ecoinvent v2.2 report 8, Tab 93.1).
- packaging, for fertilisers: 0.0138 kg; lognormal variance with pedigree 0.0592, pedigree (4,3,4,5,4)
  Total amount of active substance/s of fertilisers needed for the production of 'paris market carrot' is calculated to be circa 6.90E-03 kg. Fertiliser/s used in this dataset is/are: 'ammonium nitrate, as N', 'phosphate fertiliser, as P2O5', 'potassium sulfate, as K2O'. The total amount of active substance/s is doubled in order to account for the packaging of the dilluted product of fertiliser/s that is/are applied. Therefore, 1.38E-02 kg of packaging for fertilisers is justified with this exchange.
  properties: price 0.0642 EUR2005, wet mass 1 kg, dry mass 1 kg, heating value, net 25.01 MJ, carbon content, fossil 0.825301
  note on carbon content, fossil: Considering a chemical formula (C2H4)n for polyethylene, carbon content-fossil is calculated to be 0.856286 kg of Carbon per kg of dry mass.
- inorganic phosphorus fertiliser, as P2O5: 4.92737e-5, 5.00673e-6, 0.000178815, 2.49745e-6, 3.51712e-7, 9.67357e-6, 3.57623e-7, 5.77074e-6, 3.22304e-6, 1.18356e-5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 kg (30 entries); source Stoessel, Franziska; 2012; lognormal variance with pedigree 0.0105, pedigree (2,3,4,3,2)
- potassium sulfate: 0.0012747, 0.00605116 kg (2 entries); source Stoessel, Franziska; 2012; lognormal variance with pedigree 0.0105, pedigree (2,3,4,3,2)
  (same comment as for potassium sulfate)
- ammonium nitrate: 0.00114684, 0.000795378, 0.000611333, 0.0020753 kg (4 entries); source Stoessel, Franziska; 2012; lognormal variance with pedigree 0.0105, pedigree (2,3,4,3,2)
  (same comment as for ammonium nitrate)

## Inputs from nature
- Transformation, to annual crop, non-irrigated, intensive [natural resource, land]: 0.399 m2; source Stoessel, Franziska; 2012; lognormal variance with pedigree 0.0119, pedigree (2,3,4,3,2)
- Transformation, from annual crop, non-irrigated, intensive [natural resource, land]: 0.399 m2; source Stoessel, Franziska; 2012; lognormal variance with pedigree 0.0119, pedigree (2,3,4,3,2)
- Energy, gross calorific value, in biomass [natural resource, biotic]: 1.99476 MJ; lognormal variance with pedigree 0.0099, pedigree (2,3,4,3,1)
  Literature value (Swiss Feed Database, http://www.feed-alp.admin.ch, accesseed 20131113).
- Occupation, annual crop, non-irrigated, intensive [natural resource, land]: 0.133 m2*year; source Stoessel, Franziska; 2012; lognormal variance with pedigree 0.0119, pedigree (2,3,4,3,2)

## Emissions to nature
- Linuron [soil, agricultural]: 7.6e-5 kg; name sulfo1; source Stoessel, Franziska; 2012; lognormal variance with pedigree 0.0777, pedigree (3,4,5,3,2)
- Water [air, unspecified]: 0.0188436 m3; name water_to_air_unspecified; = (tap_water_input/1000)*fraction_TW_to_air+water_irrigation_input*fraction_IW_to_air; lognormal variance with pedigree 0.0487, pedigree (2,2,4,1,1)
  Calculated value based on literature values and expert opinion. See comments in the parametres' comment field.
  property fraction, origin: fresh water 1; name fraction_origin_fresh_water
  property fraction, origin: unspecified 0; name fraction_origin_unspecified
  property fraction, origin: salt water 0; name fraction_origin_salt_water
- Carbon dioxide, from soil or biomass stock [air, non-urban air or from high stacks]: 0.0206668 kg; normal variance with pedigree 0.5452, pedigree (3,3,5,5,2)
  Global average LUC emissions according 2nd edition of the Quantis-modified tool developed by Blonk Consultants 'WFLDB-adapted-Blonk 2014 direct-land-use-change-assessment-tool_2015-05-18a.xlsx', tab. 'Country & land use unknown'. The emission are based on the relative change in production areas in all countries for a given crop. The weighted average is used which takes into acount relative difference in crop expansion into primary forest, secondary forest, grassland, perennial and annual land.
  Uncertainty: Uncertainty estimated based on IPCC 2006
- Water [water, surface water]: 0.00264329 m3; name water_to_water_surface; = water_irrigation_input*(1-fraction_IW_to_air)*fraction_IW_to_surface_water; lognormal variance with pedigree 0.0966, pedigree (4,3,4,1,4)
  Calculated value. See the parameters and their comments to understand the calculation.
  property fraction, origin: fresh water 1; name fraction_origin_fresh_water_Wsw
  property fraction, origin: salt water 0; name fraction_origin_salt_water_Wsw
- Phosphorus [water, surface water]: 3.27e-6 kg; source Stoessel, Franziska; 2012; lognormal variance with pedigree 0.0847, pedigree (3,4,5,3,2)
- Water [water, ground-]: 0.0105732 m3; name water_to_water_ground; = water_irrigation_input*(1-fraction_IW_to_air)*fraction_IW_to_ground_water; lognormal variance with pedigree 0.0966, pedigree (4,3,4,1,4)
  Calculated value. See the parameters and their comments to understand the calculation.
  property fraction, origin: unspecified 0; name fraction_origin_unspecified_Wgw
  property fraction, origin: fresh water 1; name fraction_origin_fresh_water_Wgw
  property fraction, origin: salt water 0; name fraction_origin_salt_water_Wgw
- Ammonia [air, non-urban air or from high stacks]: 3.93429e-5 kg; source Thomas Nemecek 2011; lognormal variance with pedigree 0.0527, pedigree (3,4,5,3,2)
- Chromium [soil, agricultural]: 2.31014e-8 kg; source Thomas Nemecek 2011; lognormal variance with pedigree 0.0847, pedigree (3,4,5,3,2)
- Nitrogen oxides [air, non-urban air or from high stacks]: 6.65577e-6 kg; source Thomas Nemecek 2011; lognormal variance with pedigree 0.0747, pedigree (3,4,5,3,2)
- Cadmium [soil, agricultural]: 5.81813e-8 kg; source Thomas Nemecek 2011; lognormal variance with pedigree 0.0847, pedigree (3,4,5,3,2)
- Dinitrogen monoxide [air, non-urban air or from high stacks]: 3.16941e-5 kg; source Thomas Nemecek 2011; lognormal variance with pedigree 0.0747, pedigree (3,4,5,3,2)
- Copper [soil, agricultural]: -6.81076e-7 kg; source Thomas Nemecek 2011
- Zinc [soil, agricultural]: -6.77696e-7 kg; source Thomas Nemecek 2011
- Phosphate [water, ground-]: 9.33e-7 kg; source Stoessel, Franziska; 2012; lognormal variance with pedigree 0.0847, pedigree (3,4,5,3,2)
- Nickel [soil, agricultural]: 2.39287e-8 kg; source Thomas Nemecek 2011; lognormal variance with pedigree 0.0847, pedigree (3,4,5,3,2)
- Lead [soil, agricultural]: 6.3542e-7 kg; source Thomas Nemecek 2011; lognormal variance with pedigree 0.0847, pedigree (3,4,5,3,2)
- Nitrate [water, ground-]: 0.00215229 kg; source Thomas Nemecek 2011; lognormal variance with pedigree 0.0847, pedigree (3,4,5,3,2)

## Sampling procedure
The LCI is based on paris market carrot production cost tables from Switzerland which is well representative for an Integrated Production in Switzerland. Most probably it is representative for productions in industrialized countries or farms which produces similarly.
Please refer to Stoessel et al. (2012) for more information: http://pubs.acs.org/doi/pdf/10.1021/es2030577
Franziska Stoessel, Ronnie Juraske, Stephan Pfister, Stefanie Hellweg. (2012) Life Cycle Inventory and Carbon and Water FoodPrint of Fruits and Vegetables: Application to a Swiss Retailer. Environmental Science & Technology 6(46) 3253-3262.

## Extrapolations
This dataset has been extrapolated from year 2010 to the year of the calculation (2021). The uncertainty has been adjusted accordingly.

## Review by Gregor Wernet 2011-12-31
The documentation on this dataset is quite poor. The dataset has been temporarily accepted since the data provider promised to provide more detailed information within the dataset and in a general document in the editorial section of the ecoinvent homepage.

## Review by Emilia Moreno Ruiz 2015-10-27
PV adjusted

## Review by Bo Weidema 2011-12-31
Infrastructure missing. Production volume too large ( includes all carrots).
