# soft solder production, Sn97Cu3

Dataset: EcoSpold 2, unit process
Geography: RoW
Time period: 1995-01-01 to 2021-12-31
Technology level: current
Classification: EcoSpold01Categories: metals/extraction
Classification: ISIC rev.4 ecoinvent: 2029:Manufacture of other chemical products n.e.c.
Tags: ConvertedDataset
Scenario: Business-as-Usual
System model: Allocation, cut-off by classification
Generated by: Niels Jungbluth
Published in: Althaus H.-J. 2000
Database: ecoinvent
isCopyrightProtected: true
accessRestrictedTo: 1

## General comment
The inventory is meant to be used as a background dataset for technical processes using soft solder. The lead-free product investigated is Sn97Cu3 that is made from tin (97%) and copper (3%). The investigation is based on data provided by a producer and information from literature.
[This dataset was already contained in the ecoinvent database version 2. It was not individually updated during the transfer to ecoinvent version 3. Life Cycle Impact Assessment results may still have changed, as they are affected by changes in the supply chain, i.e. in other datasets. This dataset was generated following the ecoinvent quality guidelines for version 2. It may have been subject to central changes described in the ecoinvent version 3 change report (http://www.ecoinvent.org/database/ecoinvent-version-3/reports-of-changes/), and the results of the central updates were reviewed extensively. The changes added e.g. consistent water flows and other information throughout the database. The documentation of this dataset can be found in the ecoinvent reports of version 2, which are still available via the ecoinvent website. The change report linked above covers all central changes that were made during the conversion process.]

## Included activities end
Gate to gate including solder mixing and casting, atomisation and paste mixing, including estimate for emissions and infrastructure.

## Geography
Producer in Germany and literature data for Europe

## Technology
Production of lead-free soft solder from metals tin and copper.

## Time period
Time of publications. Most data for 2000.

## Parameters
- fraction, tap water, to air: 0.15 dimensionless; name fraction_TW_to_air; lognormal variance with pedigree 0.092025, pedigree (4,4,3,2,4)
- fraction, process water, to air: 0.15 dimensionless; name fraction_PW_to_air; lognormal variance with pedigree 0.092025, pedigree (4,4,3,2,4)

## Reference product
- soft solder, Sn97Cu3: 1 kg; By-product classification allocatable product; CPC 35499: Other chemical products n.e.c.
  EcoSpold01Location=RER
  production volume 2.67763 kg
    This is a placeholder value that does not reflect real-world production volumes. This dataset does not currently require a real-world production volume to work in the database framework, and no actual data were collected yet. This has no negative effect on the results of the ecoinvent database.
  property price 9.26092 EUR2005
    Calculated based on inputs: The price of the product has been calculated as a sum of the values of the material and energy inputs for this product. This value is therefore a rough estimation. It may underestimate the real price since there are additional expenses when producing any product. These expences can include for example labour costs, treatment of waste materials and profit for the producer. Please consider carefully whether this level of data quality is acceptable for your application.
  property carbon content 0
    carbon content on a dry matter basis (reserved; not for manual entry)
  properties: carbon content, non-fossil 0, dry mass 1 kg, water in wet mass 0 kg, carbon content, fossil 0, water content 0, wet mass 1 kg, carbon allocation 0 kg

## Inputs from technosphere
- tin: 0.882 kg; lognormal variance with pedigree 0.0432, pedigree (2,3,5,5,1)
  1% losses
  EcoSpold01Location=RER
  Uncertainty: 1% losses
  properties: dry mass 1 kg, wet mass 1 kg
- fly ash and scrubber sludge: -0.0075 kg; lognormal variance with pedigree 0.0432, pedigree (2,3,5,5,1)
  Waste water from production
  EcoSpold01Location=CH
  Uncertainty: Waste water from production
  production volume 0.0225 kg
    Calculated from the production volume of soft solder, Sn97Cu3 in proportion to the respective output amounts.
  properties: dry mass 0.1 kg, carbon content, fossil 0.167, water content 9, wet mass 1 kg
  note on carbon content, fossil: Tab A.6, ecoinvent v2.2 report 13_I. C content has been calculated after data in the tables, and then referred to 1 kg DM
- chemical, organic: 0.111 kg; lognormal variance with pedigree 0.0446, pedigree (3,3,5,5,1)
  Assumption for additives based on literature
  EcoSpold01Location=GLO
  Uncertainty: Assumption for additives based on literature
  properties: wet mass 1 kg, carbon content, fossil 0.628, dry mass 1 kg, heating value, net 19.03 MJ
  note on carbon content, fossil: This dataset is an unweighted average of 20 organic substances (listed in Tab 88.1, ecoinvent v2.2 report 8, part II), being part of the top100 chemicals included in this database. The C-content has also been calculated as an unweighted average of the C content of the substances composing this dataset.
- solder factory: 2e-10 unit; lognormal variance with pedigree 0.3432, pedigree (2,3,5,5,1)
  EcoSpold01Location=RER
  Calculation for plant with 100'000t/a and a life time of 50a
  Uncertainty: Calculation for plant with 100'000t/a and a life time of 50a
- electricity, medium voltage: 0 kWh; pedigree (1,1,1,1,1)
  Questionnaire
  EcoSpold01Location=UCTE
  Uncertainty: Questionnaire
- nitrogen, liquid: 0.774 kg; lognormal variance with pedigree 0.0446, pedigree (3,3,5,5,1)
  Literature, Inert gas
  EcoSpold01Location=RER
  Uncertainty: Literature, Inert gas
  properties: wet mass 1 kg, dry mass 1 kg
- municipal solid waste: 0 kg; pedigree (1,1,1,1,1)
  Unspecified wastes
  EcoSpold01Location=CH
  Uncertainty: Unspecified wastes
  production volume 0 kg
    (same comment as for fly ash and scrubber sludge)
  properties: carbon content, fossil 0.171549, dry mass 0.771 kg, water content 0.297017, carbon content, non-fossil 0.261655, wet mass 1 kg, heating value, net 11.74 MJ
  note on carbon content, fossil: MSW composition in tab 4.1, ecoinvent v2.2 report 13_I. C content referred to 1 kg DM
  note on heating value, net: Value taken from the general comment of the treatment dataset.
- copper, cathode: 0.0273 kg; lognormal variance with pedigree 0.0432, pedigree (2,3,5,5,1)
  EcoSpold01Location=RER
  1% losses
  Uncertainty: 1% losses
  properties: wet mass 1 kg, dry mass 1 kg
- tap water: 0 kg; name tap_water_input; pedigree (1,1,1,1,1)
  EcoSpold01Location=RER
  Produced waste water
  Uncertainty: Produced waste water
  properties: water content 2962.17, carbon content, fossil 0.00178991, wet mass 1 kg, dry mass 0.000337476 kg
  note on carbon content, fossil: Bicarbonate content is 2.93 mol/m3. CO2 content is 0.1 mol/m3 (ecoinvent v2.2 report 8, Tab 93.1).
- heat, district or industrial, natural gas: 0 MJ; pedigree (1,1,1,1,1)
  Questionnaire
  EcoSpold01Location=RER
  Uncertainty: Questionnaire
  properties: heating value, net 1 MJ
- electricity, medium voltage: 0.0031513, 0.000604283, 0.0101447, 0.147545, 0.0207965, 0.0677582 kWh (6 entries); lognormal variance with pedigree 0.0432, pedigree (2,3,5,5,1)
  Questionnaire
  EcoSpold01Location=UCTE
  Uncertainty: Questionnaire
- municipal solid waste: -3.52683e-5, -8.88673e-6, -1.26997e-5, -0.0249431 kg (4 entries); lognormal variance with pedigree 0.0432, pedigree (2,3,5,5,1)
  Unspecified wastes
  EcoSpold01Location=CH
  Uncertainty: Unspecified wastes
  production volume 0.075 kg
- tap water: 0.000116745, 1.4053e-5, 2.32249e-5, 0.000585639, 1.52353e-5, 4.33364e-5, 0.00670177 kg (7 entries); lognormal variance with pedigree 0.0432, pedigree (2,3,5,5,1)
  EcoSpold01Location=RER
  Produced waste water
  Uncertainty: Produced waste water
- heat, district or industrial, natural gas: 0.0119392, 0.774661 MJ (2 entries); lognormal variance with pedigree 0.0432, pedigree (2,3,5,5,1)
  Questionnaire
  EcoSpold01Location=RER
  Uncertainty: Questionnaire

## Emissions to nature
- Ammonia [air, unspecified]: 9.25e-6 kg; lognormal variance with pedigree 0.3326, pedigree (5,3,5,5,5)
  Maximum estimation in inert gas flow
  Uncertainty: Maximum estimation in inert gas flow
- Tin [air, unspecified]: 3e-6 kg; lognormal variance with pedigree 0.9826, pedigree (5,3,5,5,5)
  Estimation (97% of 5mg/m3 in flow rate of inert gas)
  Uncertainty: Estimation (97% of 5mg/m3 in flow rate of inert gas)
- Water [water, unspecified]: 6.375e-6 m3; name water_to_water_unspecified; lognormal variance with pedigree 0.0827, pedigree (2,2,5,5,1)
  Calculated value based on literature values and expert opinion. See comments in the parametres' comment field.
  property dry mass 0 kg; name DM
  property carbon content, fossil 0; name C_content_fossil
  property carbon content, non-fossil 0; name C_content_non_fossil
  property water in wet mass 1000 kg; name WWM
  property fraction, origin: salt water 0; name fraction_origin_salt_water_Ww
  property fraction, origin: fresh water 1; name fraction_origin_fresh_water_Ww
  property fraction, origin: unspecified 0; name fraction_origin_unspecified_Ww
  property wet mass 1000 kg; name WM
- NMVOC, non-methane volatile organic compounds, unspecified origin [air, unspecified]: 3.08e-5 kg; lognormal variance with pedigree 0.3726, pedigree (5,3,5,5,5)
  Maximum estimation in inert gas flow
  Uncertainty: Maximum estimation in inert gas flow
- Particulates, > 10 um [air, unspecified]: 6.17e-6 kg; lognormal variance with pedigree 0.4426, pedigree (5,3,5,5,5)
  Maximum estimation in inert gas flow
  Uncertainty: Maximum estimation in inert gas flow
- Water [air, unspecified]: 1.125e-6 m3; name water_to_air_unspecified; lognormal variance with pedigree 0.0827, pedigree (2,2,5,5,1)
  (same comment as for Water)
  property fraction, origin: fresh water 1; name fraction_origin_fresh_water
  property fraction, origin: salt water 0; name fraction_origin_salt_water
  property fraction, origin: unspecified 0; name fraction_origin_unspecified
- Hydrogen chloride [air, unspecified]: 1.86e-5 kg; lognormal variance with pedigree 0.3726, pedigree (5,3,5,5,5)
  Maximum estimation in inert gas flow
  Uncertainty: Maximum estimation in inert gas flow
- Copper [air, unspecified]: 9.29e-8 kg; lognormal variance with pedigree 0.9826, pedigree (5,3,5,5,5)
  Estimation (3% of 5mg/m3 in flow rate of inert gas)
  Uncertainty: Estimation (3% of 5mg/m3 in flow rate of inert gas)

## Sampling procedure
Questionnaire and literature

## Extrapolations
From one producer to European average. This dataset has been copied from an original dataset covering the geography RER. The uncertainty has been adjusted accordingly.

## Review by Hans-Jörg Althaus 2003-06-16
passed
