# treatment of aluminium in car shredder residue, municipal incineration

Dataset: EcoSpold 2, unit process
Geography: RoW
Time period: 2006-01-01 to 2021-12-31
Technology level: current
Classification: ISIC rev.4 ecoinvent: 3821:Treatment and disposal of non-hazardous waste
Synonyms: Kehrichtverbrennung; municipal waste incineration; Siedlungsabfallverbrennung
Scenario: Business-as-Usual
System model: Allocation, cut-off by classification
Share of production covered: 1.8 %
Generated by: Gabor Doka
Published in: Doka G. 2013
Database: ecoinvent
isCopyrightProtected: true
accessRestrictedTo: 1

## General comment
This dataset represents the activity of waste disposal of aluminium in car shredder residue in a municipal solid waste incinerator (MSWI) // Recommended use of this dataset: For disposal of rather fine or dusty aluminium, which goes to incineration as part of Automotive Shredder Residue (ASR). Due to fine grain size of the particles, 50% burnability is assumed, therefore not suited for less fine aluminium parts in waste. Pure, isolated aluminium fractions will not be disposed in incinerators, but rather go to recycling. // Inventoried waste contains 50% Al in ASR burnable; 50% Al in ASR inert; . // Waste composition (wet, in ppm): H2O n.a.; O n.a.; H n.a.; C n.a.; S n.a.; N n.a.; P n.a.; B n.a.; Cl 4825; Br n.a.; F n.a.; I n.a.; Ag n.a.; As n.a.; Ba n.a.; Cd 3; Co n.a.; Cr n.a.; Cu 8.5; Hg n.a.; Mn n.a.; Mo n.a.; Ni n.a.; Pb 25.5; Sb n.a.; Se n.a.; Sn n.a.; V n.a.; Zn 29; Be n.a.; Sc n.a.; Sr n.a.; Ti n.a.; Tl n.a.; W n.a.; Si n.a.; Fe n.a.; Ca n.a.; Al 995110; K n.a.; Mg n.a.; Na n.a.; // Share of carbon in waste that is biogenic 60.4%. // Share of metals in waste not oxidised and bulk-recyclable (exclude very small or thin parts) Iron: 0%; Alu: 50%; Copper: 0%. // One kg of this waste produces 1.334 kg of slag and 0.1705 kg of residues, which are landfilled. Additional solidification with 0.06822 kg of cement. // Net energy production: 0MJ/kg electric energy and 0MJ/kg thermal energy. // Recovery of metal scrap to recycling: 0g iron scrap, 140.35g aluminium scrap, 0g copper scrap.

## Included activities start
waste incineration from waste reception gate and delivery into waste bunker at incinerator plant site (without transports to the incinerator)

## Included activities end
Waste-specific short-term emissions to water from leachate. Long-term emissions from landfill to ground water.

## Geography
Specific to the technology mix encountered in Switzerland in 2010. Well applicable to modern incineration practices in Europe, North America or Japan.

## Technology
average Swiss MSWI plants in 2010 (grate incinerators) with electrostatic precipitator for fly ash (ESP), wet flue gas scrubber and 25% SNCR , 42.77% SCR-high dust , 32.68% SCR-low dust -DeNOx facilities and 0% without Denox (weighted according to mass of burnt waste, representing Swiss average). Efficiency of iron scrap separation from slag : 58%. Efficiency of non-ferrous scrap separation from slag : 31%. Gross electric efficiency technology mix 15.84% and Gross thermal efficiency technology mix 28.51%

## Time period
Waste composition as given in literature reference, theoretical data or other source. Transfer coefficients for modern MSWI.

## Reference product
- aluminium in car shredder residue: -1 kg; CPC 39363: Waste and scrap of aluminium; By-product classification Waste; CAS 7429-90-5
  Main reference product of this activity (supply of disposal service).
  production volume 6.4261e6 kg
    based on estimate on MSW in WTE globally and share of aluminium metal from shredder residue composition in Swiss MSW
  property price 0 EUR2005
    Waste products are assigned a price of zero as they are assumed to require further treatment.
  property carbon content 0
    carbon content on a dry matter basis (reserved; not for manual entry)
  properties: dry mass 1 kg, wet mass 1 kg, water content 0, carbon content, fossil 0, water in wet mass 0 kg, carbon content, non-fossil 0, carbon allocation 0 kg

## By-products
- aluminium scrap, post-consumer, prepared for melting: 0 kg; By-product classification Recyclable; CPC 39363: Waste and scrap of aluminium; pedigree (1,1,1,1,1)
  Aluminium scrap recovered from this waste.
  Uncertainty: uncertainty calculated from uncertainty in waste composition, uncertainty of share of recyclable metal, uncertainty of transfer coefficient to bottom ash, uncertainty of the efficiency of scrap removal in MSWI plant.
  production volume 0 kg
    calculated in proportion to reference product waste input to incinerator
  property price 0.806 EUR2005
    Temporary price data. Calculated as 90% of purchasers price based on: 2005 import and export prices (total trades (USD) divided by total weight (kg) in biggest economies of the world: EU27, USA, Brasil, China, India, Japan and Russia) from UN Commodity Trade Statistics Database (http://data.un.org/Explorer.aspxDatabase [Accessed 2011.06.17]). Commodity: Waste or scrap, aluminium
  property carbon content 0
    carbon content on a dry matter basis (reserved; not for manual entry)
  properties: water content 0, wet mass 1 kg, dry mass 1 kg, water in wet mass 0 kg, carbon content, fossil 0, carbon content, non-fossil 0, carbon allocation 0 kg

## Inputs from technosphere
- residual material landfill: 3.5531e-10 unit; lognormal variance with pedigree 0.00864249, pedigree (1,1,4,1,1)
  Landfill infrastructure required for landfilling of incineration residues.
  Uncertainty: uncertainty is calculated from uncertainties in waste composition and transfer coefficients in incinerator
- municipal waste incineration facility: 2.5e-10 unit
  Demands per kilogram waste.
- electricity, for reuse in municipal waste incineration only: 0 kWh; name E_el_prod_MSWI; pedigree (1,1,1,1,1)
  Net electricity required to incinerate this waste (subsidiesed from high-calorific waste fractions).
  Uncertainty: uncertainty is calculated from uncertainties in waste composition and uncertainties in energy efficiency and the uncertainty in internal energy demand
- sodium hydroxide, without water, in 50% solution state: 0.00024534 kg; lognormal variance with pedigree 0.46553, pedigree (1,1,4,1,1)
  Auxilliary inputs for the flue gas treatment stage of the incinerator plant.
  Uncertainty: uncertainty calculated from uncertainty in average NaOH input, of transfer coefficients in the incinerator, and the uncertainty of the waste composition of this waste
  properties: dry mass 1 kg, wet mass 1 kg, heating value, net 3.03 MJ
- chemical, inorganic: 8.9401e-5 kg; lognormal variance with pedigree 0.34468, pedigree (1,1,4,1,1)
  Auxilliary inputs for the wastewater treatment stage of the incinerator plant. Proxy for Polyelectrolyte.
  Uncertainty: uncertainty calculated from uncertainty in average Polyelectrolyte input, of transfer coefficients in the incinerator, and the uncertainty of the waste composition of this waste
  properties: carbon content, fossil 0.003, dry mass 1 kg, wet mass 1 kg
- heat, district or industrial, natural gas: 0 MJ; pedigree (1,1,1,1,1)
  Input to DeNOx stage, to heat up flue gas in low-dust SCR.
  Uncertainty: uncertainty calculated from uncertainty in average DeNOx input, uncertainty in the share of thermal NOx, uncertainty of nitrogen content in average municipal waste and the uncertainty in nitrogen content in *this* waste.
  properties: heating value, net 1 MJ
- titanium dioxide: 8.581e-6 kg; lognormal variance with pedigree 0.52151, pedigree (1,1,4,1,1)
  Input to DeNOx stage (TiO2 catalyst carrier)
  Uncertainty: uncertainty calculated from uncertainty in average DeNOx input, uncertainty in the share of thermal NOx, uncertainty of nitrogen content in average municipal waste and the uncertainty in nitrogen content in *this* waste.
  properties: wet mass 1 kg, dry mass 1 kg
- chemical, organic: 3.9482e-7 kg; lognormal variance with pedigree 1.4354, pedigree (1,1,4,1,1)
  Auxilliary inputs for the wastewater treatment stage of the incinerator plant. Proxy for (pure) Trisodium-trimercapto-s-triazine (CAS 17766-26-6), used as 15% diluted solution, aka TMT15.
  Uncertainty: uncertainty calculated from uncertainty in average TMT15 input, of transfer coefficients in the incinerator, and the uncertainty of the waste composition of this waste
  properties: wet mass 1 kg, dry mass 1 kg, carbon content, fossil 0.628, heating value, net 19.03 MJ
- iron (III) chloride, without water, in 40% solution state: 4.7736e-7 kg; lognormal variance with pedigree 0.67039, pedigree (1,1,4,1,1)
  Auxilliary inputs for the wastewater treatment stage of the incinerator plant.
  Uncertainty: uncertainty calculated from uncertainty in average FeCl3 input, of transfer coefficients in the incinerator, and the uncertainty of the waste composition of this waste
  properties: dry mass 1 kg, wet mass 1 kg
- slag landfill: 2.3708e-9 unit; lognormal variance with pedigree 0.0117263, pedigree (1,1,4,1,1)
  Landfill infrastructure required for landfilling of bottom ash.
  Uncertainty: uncertainty is calculated from uncertainties in waste composition and transfer coefficients in incinerator
- water, decarbonised: 0 kg; pedigree (1,1,1,1,1)
  Incinerator process water used in flue gas scrubber stage.
  Uncertainty: uncertainty calculated from uncertainty in average water input, and the uncertainty of the waste composition of this waste
  properties: wet mass 1 kg
- heat, for reuse in municipal waste incineration only: 0 MJ; name E_th_prod_MSWI; pedigree (1,1,1,1,1)
  Net heat required to incinerate this waste (subsidiesed from high-calorific waste fractions).
  Uncertainty: uncertainty is calculated from uncertainties in waste composition and uncertainties in energy efficiency and the uncertainty in internal energy demand
- ammonia, anhydrous, liquid: 0 kg; pedigree (1,1,1,1,1)
  Input to DeNOx stage (100% NH3).
  Uncertainty: uncertainty calculated from uncertainty in average DeNOx input, uncertainty in the share of thermal NOx, uncertainty of nitrogen content in average municipal waste and the uncertainty in nitrogen content in *this* waste.
  properties: wet mass 1 kg, dry mass 1 kg
- hydrochloric acid, without water, in 30% solution state: 2.3499e-5 kg; lognormal variance with pedigree 0.34468, pedigree (1,1,4,1,1)
  Auxilliary inputs for the wastewater treatment stage of the incinerator plant.
  Uncertainty: uncertainty calculated from uncertainty in average HCl input, of transfer coefficients in the incinerator, and the uncertainty of the waste composition of this waste
  properties: wet mass 1 kg, dry mass 1 kg, heating value, net 3.32 MJ
- chromium oxide, flakes: 1.7512e-7 kg; lognormal variance with pedigree 0.52151, pedigree (1,1,4,1,1)
  Input to DeNOx stage.
  Uncertainty: uncertainty calculated from uncertainty in average DeNOx input, uncertainty in the share of thermal NOx, uncertainty of nitrogen content in average municipal waste and the uncertainty in nitrogen content in *this* waste.
  properties: wet mass 1 kg, dry mass 1 kg
- process-specific burdens, residual material landfill: 0 kg; pedigree (1,1,1,1,1)
  Mass-specific expenditures required for landfilling of incineration residues.
  Uncertainty: uncertainty is calculated from uncertainties in waste composition and transfer coefficients in incinerator
- transport, freight, lorry, unspecified: 0 metric ton*km; pedigree (1,1,1,1,1)
  Transport services to transport incineration residues to landfills.
  Uncertainty: uncertainty calculated from uncertainty of the waste composition of this waste, uncertainty of transfer coefficients and the uncertainty in generic transportation distances
- quicklime, milled, packed: 0.0012835 kg; lognormal variance with pedigree 0.46553, pedigree (1,1,4,1,1)
  Auxilliary inputs for the flue gas treatment stage of the incinerator plant.
  Uncertainty: uncertainty calculated from uncertainty in average CaO input, of transfer coefficients in the incinerator, and the uncertainty of the waste composition of this waste
  properties: dry mass 0.99 kg, water content 0.010101, wet mass 1 kg
- waste cement, hydrated: 0 kg; pedigree (1,1,1,1,1)
  Hydrated cement output for solidification of landfilled residual material.
  Uncertainty: Uncertainty calculated from uncertainty of the waste composition of this waste and transfer coefficients in the incinerator and of the solidification recipe.
  production volume 0 kg
    calculated in proportion to reference product waste input to incinerator
  properties: dry mass 1 kg, wet mass 1 kg
- cement, unspecified: 0 kg; pedigree (1,1,1,1,1)
  Cement required for solidification of landfilled residual material.
  Uncertainty: Uncertainty calculated from uncertainty of the waste composition of this waste, of transfer coefficients in the incinerator and of the solidification recipe.
  properties: dry mass 1 kg, wet mass 1 kg
- process-specific burdens, slag landfill: 0 kg; pedigree (1,1,1,1,1)
  Mass-specific expenditures required for landfilling of bottom ash.
  Uncertainty: uncertainty is calculated from uncertainties in waste composition and transfer coefficients in incinerator
- aluminium scrap, post-consumer, prepared for melting: -0.14035 kg; lognormal variance with pedigree 0.0179628, pedigree (1,1,4,1,1)
  (same comment as for aluminium scrap, post-consumer, prepared for melting)
  production volume 901870 kg
  properties: price 0.806 EUR2005, wet mass 1 kg, dry mass 1 kg
- electricity, for reuse in municipal waste incineration only: 0.000200386, 0.000396476, 4.29618e-6, 5.83054e-6, 0.00259766, 0.000539785, 0.000445269, 0.00013625, 0.00103691, 0.000811672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 kWh (25 entries); lognormal variance with pedigree 0.00859512, pedigree (1,1,4,1,1)
  (same comment as for electricity, for reuse in municipal waste incineration only)
- heat, district or industrial, natural gas: 0.000388743, 0.0252233 MJ (2 entries); lognormal variance with pedigree 0.16475, pedigree (1,1,4,1,1)
  (same comment as for heat, district or industrial, natural gas)
- water, decarbonised: 0.00955677, 0.0248667, 0.100293, 0.0244911, 0.00493728, 0.0162347, 0.000896252, 0.0127714, 0.0297499, 0.186613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 kg (12 entries); lognormal variance with pedigree 0.67039, pedigree (1,1,4,1,1)
  (same comment as for water, decarbonised)
- heat, for reuse in municipal waste incineration only: 0.000387923, 0.000767528, 0.0175391, 1.12872e-5, 0.00502874, 0.00104496, 0.000861984, 0.000263764, 0.00200734, 0.00157129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 MJ (25 entries); lognormal variance with pedigree 0.00859512, pedigree (1,1,4,1,1)
  (same comment as for heat, for reuse in municipal waste incineration only)
- ammonia, anhydrous, liquid: 2.87086e-5, 2.46785e-6, 3.83934e-6, 7.60709e-6, 7.45294e-6, 7.81148e-7, 3.49202e-6, 8.2611e-5 kg (8 entries); lognormal variance with pedigree 0.16475, pedigree (1,1,4,1,1)
  (same comment as for ammonia, anhydrous, liquid)
- process-specific burdens, residual material landfill: 0.0482442, 0.122306 kg (2 entries); lognormal variance with pedigree 0.00864249, pedigree (1,1,4,1,1)
  (same comment as for process-specific burdens, residual material landfill)
- transport, freight, lorry, unspecified: 0.00688545, 0.00107801, 0.0522025 metric ton*km (3 entries); lognormal variance with pedigree 0.0109396, pedigree (1,1,4,1,1)
  (same comment as for transport, freight, lorry, unspecified)
- waste cement, hydrated: -0.0482442, -0.122306 kg (2 entries); lognormal variance with pedigree 0.0177265, pedigree (1,1,4,1,1)
  (same comment as for waste cement, hydrated)
  production volume 1.096e6 kg
- cement, unspecified: 0.00985053, 0.0020496, 0.000150119, 0.000427889, 0.00967686, 0.000284818, 0.00312815, 0.000378471, 0.0422726 kg (9 entries); lognormal variance with pedigree 0.0177265, pedigree (1,1,4,1,1)
  (same comment as for cement, unspecified)
- process-specific burdens, slag landfill: 0.377241, 0.956359 kg (2 entries); lognormal variance with pedigree 0.0117263, pedigree (1,1,4,1,1)
  (same comment as for process-specific burdens, slag landfill)

## Inputs from nature
- Oxygen [natural resource, in air]: 0.42149 kg; lognormal variance with pedigree 0.00800046, pedigree (1,1,4,1,1)
  Oxygen from ambient air needed to combust and oxidise this waste. Net demand, i.e. without O2 leaving the plant in flue gas uncombusted.
  Uncertainty: uncertainty is calculated from uncertainties in waste composition and transfer coefficients to flue gas and soild residues in incinerator

## Emissions to nature
- Copper, ion [water, ground-, long-term]: 8.0461e-6 kg; lognormal variance with pedigree 1.2862, pedigree (1,1,4,1,1)
  Long-term emissions from landfilling of incineration residues.
  Uncertainty: uncertainty is calculated from uncertainties in waste composition and transfer coefficients in incinerator and landfills.
- Zinc [air, urban air close to ground]: 9.7189e-9 kg; lognormal variance with pedigree 1.1636, pedigree (1,1,4,1,1)
  Emission to air from waste composition and transfer coefficients.
  Uncertainty: uncertainty is calculated from uncertainties in waste composition and transfer coefficients in incinerator
- Toluene [air, urban air close to ground]: 8.9835e-8 kg; lognormal variance with pedigree 0.61882, pedigree (1,1,4,1,1)
  Incomplete combustion product emitted to air.
  Uncertainty: uncertainty calculated from uncertainty in average operation emissions, and the uncertainty of the flue gas volume from this waste.
- Copper [air, urban air close to ground]: 3.8926e-10 kg; lognormal variance with pedigree 1.3391, pedigree (1,1,4,1,1)
  (same comment as for Zinc)
- Benzo(a)pyrene [air, urban air close to ground]: 9.9956e-13 kg; lognormal variance with pedigree 1.2807, pedigree (1,1,4,1,1)
  (same comment as for Toluene)
- Copper, ion [water, surface water]: 6.9826e-10 kg; lognormal variance with pedigree 1.4399, pedigree (1,1,4,1,1)
  Emissions to water from waste composition and transfer coefficients in incinerator and landfills.
  Uncertainty: uncertainty is calculated from uncertainties in waste composition and transfer coefficients in incinerator and landfills
- Ammonia [air, urban air close to ground]: 1.6103e-7 kg; lognormal variance with pedigree 0.21245, pedigree (1,1,4,1,1)
  Nitrogen species emitted to air after DeNOx stage.
  Uncertainty: uncertainty calculated from uncertainty in average N-emissions and uncertainty in the share of thermal NOx and the uncertainty in nitrogen content in *this* waste.
- Hydrogen chloride [air, urban air close to ground]: 1.3767e-6 kg; lognormal variance with pedigree 0.49188, pedigree (1,1,4,1,1)
  (same comment as for Zinc)
- Zinc, ion [water, ground-, long-term]: 1.8909e-5 kg; lognormal variance with pedigree 1.5479, pedigree (1,1,4,1,1)
  (same comment as for Copper, ion)
- Benzene, hexachloro- [air, urban air close to ground]: 9.392e-11 kg; lognormal variance with pedigree 0.61882, pedigree (1,1,4,1,1)
  (same comment as for Toluene)
- Cadmium, ion [water, surface water]: 9.1551e-10 kg; lognormal variance with pedigree 2.0251, pedigree (1,1,4,1,1)
  (same comment as for Copper, ion)
- Methane, fossil [air, urban air close to ground]: 2.6674e-7 kg; lognormal variance with pedigree 0.61882, pedigree (1,1,4,1,1)
  (same comment as for Toluene)
- Carbon monoxide, fossil [air, urban air close to ground]: 3.0229e-5 kg; lognormal variance with pedigree 1.9222, pedigree (1,1,4,1,1)
  (same comment as for Toluene)
- Benzene [air, urban air close to ground]: 4.4917e-8 kg; lognormal variance with pedigree 0.61882, pedigree (1,1,4,1,1)
  (same comment as for Toluene)
- Particulates, < 2.5 um [air, urban air close to ground]: 5.3628e-6 kg; lognormal variance with pedigree 1.2807, pedigree (1,1,4,1,1)
  (same comment as for Toluene)
- Aluminium [air, urban air close to ground]: 4.0566e-7 kg; lognormal variance with pedigree 0.085079, pedigree (1,1,4,1,1)
  (same comment as for Zinc)
- Chloride [water, surface water]: 0.003936 kg; lognormal variance with pedigree 0.24245, pedigree (1,1,4,1,1)
  (same comment as for Copper, ion)
- Zinc, ion [water, surface water]: 1.7399e-9 kg; lognormal variance with pedigree 1.1349, pedigree (1,1,4,1,1)
  (same comment as for Copper, ion)
- Aluminium [water, ground-, long-term]: 0.6516 kg; lognormal variance with pedigree 0.018317, pedigree (1,1,4,1,1)
  (same comment as for Copper, ion)
- Lead [air, urban air close to ground]: 1.0504e-9 kg; lognormal variance with pedigree 1.193, pedigree (1,1,4,1,1)
  (same comment as for Zinc)
- Cadmium, ion [water, ground-, long-term]: 1.6087e-6 kg; lognormal variance with pedigree 3.4899, pedigree (1,1,4,1,1)
  (same comment as for Copper, ion)
- Methane, non-fossil [air, urban air close to ground]: 4.0702e-7 kg; lognormal variance with pedigree 0.61882, pedigree (1,1,4,1,1)
  (same comment as for Toluene)
- NMVOC, non-methane volatile organic compounds, unspecified origin [air, urban air close to ground]: 2.0442e-6 kg; lognormal variance with pedigree 0.61882, pedigree (1,1,4,1,1)
  (same comment as for Toluene)
- Lead [water, ground-, long-term]: 1.8914e-5 kg; lognormal variance with pedigree 2.4974, pedigree (1,1,4,1,1)
  (same comment as for Copper, ion)
- Heat, waste [air, urban air close to ground]: 0.20922 MJ; lognormal variance with pedigree 0.00898726, pedigree (1,1,4,1,1)
  Waste heat generated from heating value of this waste plus any electricity required to process it.
  Uncertainty: uncertainty is calculated from uncertainties in waste composition and uncertainties in energy efficiency and the uncertainty in internal energy demand
- Particulates, > 2.5 um, and < 10um [air, urban air close to ground]: 2.6949e-8 kg; lognormal variance with pedigree 0.86435, pedigree (1,1,4,1,1)
  (same comment as for Toluene)
- Carbon monoxide, non-fossil [air, urban air close to ground]: 4.6126e-5 kg; lognormal variance with pedigree 1.9222, pedigree (1,1,4,1,1)
  (same comment as for Toluene)
- Dioxins, measured as 2,3,7,8-tetrachlorodibenzo-p-dioxin [air, urban air close to ground]: 8.9829e-14 kg; lognormal variance with pedigree 1.2807, pedigree (1,1,4,1,1)
  (same comment as for Toluene)
- Cadmium [air, urban air close to ground]: 7.6456e-10 kg; lognormal variance with pedigree 1.4624, pedigree (1,1,4,1,1)
  (same comment as for Zinc)
- Nitrogen oxides [air, urban air close to ground]: 5.0993e-5 kg; lognormal variance with pedigree 0.21245, pedigree (1,1,4,1,1)
  Sum of fuel-Nox and thermal-NOx emitted to air after DeNOx stage.
  Uncertainty: uncertainty calculated from uncertainty in average N-emissions and uncertainty in the share of thermal NOx and the uncertainty in nitrogen content in *this* waste.
- Lead [water, surface water]: 1.4524e-9 kg; lognormal variance with pedigree 1.0857, pedigree (1,1,4,1,1)
  (same comment as for Copper, ion)
- Chloride [water, ground-, long-term]: 0.00088765 kg; lognormal variance with pedigree 0.28108, pedigree (1,1,4,1,1)
  (same comment as for Copper, ion)
- Water [air, urban air close to ground]: 0.00076583 m3; lognormal variance with pedigree 2.7661, pedigree (1,1,4,1,1)
  Water vapour from waste humidity, hydrogen oxidation and part of the process water.
  Uncertainty: Uncertainty calculated from uncertainty in waste composition, process water input and the uncertainty of fraction to air.
- Water [water, surface water]: 0.00039956 m3; lognormal variance with pedigree 2.7549, pedigree (1,1,4,1,1)
  Process water released to surface water.
  Uncertainty: uncertainty calculated from uncertainty in process water input and the uncertainty of fraction to surface water.
- Phenol, pentachloro- [air, urban air close to ground]: 1.9561e-11 kg; lognormal variance with pedigree 0.61882, pedigree (1,1,4,1,1)
  (same comment as for Toluene)
- Benzene, pentachloro- [air, urban air close to ground]: 2.3731e-10 kg; lognormal variance with pedigree 0.61882, pedigree (1,1,4,1,1)
  (same comment as for Toluene)
- Aluminium [water, surface water]: 5.8539e-5 kg; lognormal variance with pedigree 0.54786, pedigree (1,1,4,1,1)
  (same comment as for Copper, ion)
- Heat, waste [water, surface water]: 0.047835 MJ; lognormal variance with pedigree 0.00898726, pedigree (1,1,4,1,1)
  (same comment as for Heat, waste)
