# battery production, lead acid, rechargeable, stationary

Dataset: EcoSpold 2, unit process
Geography: US
Time period: 2009-01-01 to 2021-12-31
Technology level: current
Classification: ISIC rev.4 ecoinvent: 2720:Manufacture of batteries and accumulators
Synonyms: PbA battery
Scenario: Business-as-Usual
System model: Allocation, cut-off by classification
Generated by: Heidi Hottenroth
Published in: Spanos, Constantine 2015
Database: ecoinvent
isCopyrightProtected: true
accessRestrictedTo: 1

## General comment
This dataset represents the production of 1 kg of a valve regulated lead acid (VRLA) battery (absorbed glass matt - AGM) for stationary use. Material composition relates to a specific battery model. Specific parameters according to model Exide Absolyte (R) GX V-0 Energy density: 27 Wh/kg (at 8 h discharge), 32 Wh/kg (at 24 h discharge rate) DC/DC round trip efficiency: 0.8 cycles to failure: 1200 (at a 8 h discharge rate and DoD of 100 %); 800 (at a 2 h discharge rate and DoD of 71.9 %). Energy requirements of electricity, gas and oil comprise the manufacturing of grid, paste, and plate, plastic moulding and assembly/formation. No further direct emissions to air or water are taken into account. The inventory was modelled according to: Spanos, Constantine, Turney, Damon E., Fthenakis, Vasilis (2015): Life-cycle analysis of flow-assisted nickel zinc-, manganese dioxide-, and valve-regulated lead-acid batteries designed for demand-charge reduction. Renewable and Sustainable Energy Reviews 43: 478–494. doi:10.1016/j.rser.2014.10.072.
No emissions to air or water are taken into account.
Specific parameters according to model Exide Absolyte (R) GX V-0
Energy density: 27 Wh/kg (at 8 h discharge), 32 Wh/kg (at 24 h discharge rate)
DC/DC round trip efficiency: 0.8 cycles to failure: 1200 (at a 8 h discharge rate and DoD of 100 %); 800 (at a 2 h discharge rate and DoD of 71.9 %)
The inventory was modelled according to: Spanos, Constantine, Turney, Damon E., Fthenakis, Vasilis (2015): Life-cycle analysis of flow-assisted nickel zinc-, manganese dioxide-, and valve-regulated lead-acid batteries designed for demand-charge reduction. Renewable and Sustainable Energy Reviews 43: 478–494. doi:10.1016/j.rser.2014.10.072.

## Included activities start
The activity starts with the materials, components and energy to assemble the battery.

## Included activities end
The activity ends with the production of 1kg of battery, lead acid, rechargeable, stationary, at the factory gate.

## Geography
Literature source refers to US conditions concerning battery production and parameters.

## Technology
Includes manufacturing of grid, paste, and plate, plastic moulding, assembly/formation

## Time period
according to the sources Spanos et al. (2015) cited

## Reference product
- battery, lead acid, rechargeable, stationary: 1 kg; name RP; By-product classification allocatable product; CPC 46420: Electric accumulators
  production volume 7.80142e7 kg; name PV_RP; = 550000000/235/0,03
    Sales of stationary VRLA battery in North America in 2010: 550 Mio USD according to https://cdn.ymaws.com/batterycouncil.org/resource/collection/ACA808F8-02FC-4490-84F8-38D564031551/Bregman_Presentation_FINAL.pdf
    Price of stationaryVRLA battery in 2016: 260 USD/kWh (in prices of 2010: 235 USD/kWh) according to https://www.irena.org/-/media/Files/IRENA/Agency/Publication/2017/Oct/IRENA_Electricity_Storage_Costs_2017.pdf
    https://de.statista.com/statistik/daten/studie/165718/umfrage/inflationsrate-in-den-usa/
    Power density: 30 Wh/kg according to Spanos et al. 2015
  property carbon content, fossil 0.0713242; name RP_C_content_fossil
    Calculated as the addition of C contents in the product composition. Fossil carbon content on a dry matter basis.
  property carbon content, non-fossil 0.000247768; name RP_C_content_non_fossil
    Calculated as the addition of C contents in the product composition. Biogene carbon content on a dry matter basis.
  property price 12 EUR2005
    Price estimated according to model "GNB Absolyte GP 1-100G45 AGM 2V 2340Ah Battery", online available at: https://www.solaris-shop.com/gnb-absolyte-gp-1-100g45-agm-2v-2340ah-battery/ [Accessed 14 June 2021]. The battery model has a price of 2407 USD and a weight of 374.00 LBS.
  property carbon content 0.071572
    carbon content on a dry matter basis (reserved; not for manual entry)
  properties: water in wet mass 0 kg, weight 1 kg, wet mass 1 kg, dry mass 1 kg, water content 0, carbon allocation 0.071572 kg

## By-products
- scrap lead acid battery: 0 kg; By-product classification Recyclable; CPC 39364: Waste and scrap of lead; pedigree (1,1,1,1,1)
  Calculated value. Proxy
  ADJUST the uncertainty based on the values in this file.
  production volume 0 kg; = abs(BP/RP)*PV_RP
    Calculated from production volume of reference product using the relative outputs.
  property price 0 EUR2005; name BP_price_EUR2005
    Assumed without economic value
  property carbon content 0.08021
    carbon content on a dry matter basis (reserved; not for manual entry)
  properties: carbon content, non-fossil 0.000250076, wet mass 1 kg, water in wet mass 0.108 kg, dry mass 0.892 kg, water content 0.121076, carbon content, fossil 0.0799599, carbon allocation 0.0715473 kg

## Inputs from technosphere
- glass fibre: 0.025 kg; source Spanos, Constantine 2015; lognormal variance with pedigree 0.0126, pedigree (3,4,4,1,1)
  Literature Value. Fiberglass mat separator Source: Spanos et al. (2015, Tables 5 and 6)
  properties: wet mass 1 kg, dry mass 1 kg
- electricity, medium voltage: 1.275 kWh; = 4.59/3.6; source Spanos, Constantine 2015; lognormal variance with pedigree 0.058625, pedigree (3,5,5,2,3)
  Literature Value. Based on reference values in Sullivan, D.,et al., Life-cycle energy analysis of electric vehicle storage batteries. Department of Energy; 1980. H-1008/001-80-964. for lead-acid battery manufacturing. Source: Spanos et al. (2015, Table 13)
- carbon black: 0.0004 kg; source Spanos, Constantine 2015; lognormal variance with pedigree 0.0126, pedigree (3,4,4,1,1)
  Literature Value. Negative Electrode additive Source: Spanos et al. (2015, Tables 5 and 6)
  properties: wet mass 1 kg, heating value, net 25.76 MJ, carbon content, fossil 0.85, dry mass 1 kg
- calcium carbide, technical grade: 0.0003 kg; source Spanos, Constantine 2015; lognormal variance with pedigree 0.0126, pedigree (3,4,4,1,1)
  Literature Value. Grid alloying additive Source: Spanos et al. (2015, Tables 5 and 6)
  properties: heating value, net 11.36 MJ, dry mass 1 kg, carbon content, fossil 0.375, wet mass 1 kg
- sulfuric acid: 0.063 kg; source Spanos, Constantine 2015; lognormal variance with pedigree 0.0126, pedigree (3,4,4,1,1)
  Literature Value. Electrolyte (37 wt% H2SO4), Source: Spanos et al. (2015, Tables 5 and 6)
  properties: wet mass 1 kg, dry mass 1 kg
- tin: 0.004 kg; source Spanos, Constantine 2015; lognormal variance with pedigree 0.0126, pedigree (3,4,4,1,1)
  Literature Value. Grid alloying additive, Source: Spanos et al. (2015, Tables 5 and 6)
  properties: wet mass 1 kg, dry mass 1 kg
- copper, cathode: 0.005 kg; source Spanos, Constantine 2015; lognormal variance with pedigree 0.0126, pedigree (3,4,4,1,1)
  Literature Value. Copper terminals, Source: Spanos et al. (2015, Tables 5 and 6)
  properties: copper content 1, dry mass 1 kg, wet mass 1 kg
- water, deionised: 0.108 kg; source Spanos, Constantine 2015; lognormal variance with pedigree 0.0126, pedigree (3,4,4,1,1)
  Literature Value. Electrolyte (37 wt% H2SO4), Source: Spanos et al. (2015, Tables 5 and 6)
  properties: wet mass 1 kg
- integrated circuit, logic type: 2e-6 kg; source Spanos, Constantine 2015; lognormal variance with pedigree 0.0126, pedigree (3,4,4,1,1)
  Literature Value. Balancing and control electronics Source: Spanos et al. (2015, Tables 5 and 6)
  properties: carbon content, fossil 0.221701, wet mass 1 kg, dry mass 1 kg
- metal working factory: 4.58e-10 unit; lognormal variance with pedigree 0.0926, pedigree (3,5,5,5,4)
  Literature Value. Proxy for factory. Default amount for 1kg of product in metal working factory (Steiner, 2007).
  Steiner, R., Frischknecht R. (2007) Metals Processing and Compressed Air Supply. ecoinvent report No. 23. Swiss Centre for Life Cycle Inventories, Dübendorf, 2007
- sulfate pulp, unbleached: 0.0005 kg; source Spanos, Constantine 2015; lognormal variance with pedigree 0.0206, pedigree (3,4,4,1,3)
  Literature Value. Negative Electrode additive, Source: Spanos et al. (2015, Tables 5 and 6)
  properties: heating value, net 13.23 MJ, price 0.355 EUR2005, water content 0.111111, carbon content, non-fossil 0.494, dry mass 0.9 kg, wet mass 1 kg
  note on carbon content, non-fossil: C content of dry mass of sulfate pulp is 0.494 kgC/kg dry wood (ecoinvent v2.2 report 6_IX & ecoinvent v2.2 report 9). No other C containing products in the formulation of the pulp.
- lead: 0.71 kg; source Spanos, Constantine 2015; lognormal variance with pedigree 0.0126, pedigree (3,4,4,1,1)
  Literature Value. Lead, Source: Spanos et al. (2015, Tables 5 and 6)
  properties: wet mass 1 kg, dry mass 1 kg
- heat, district or industrial, other than natural gas: 0.62 MJ; source Spanos, Constantine 2015; lognormal variance with pedigree 0.058625, pedigree (3,5,5,2,3)
  (same comment as for electricity, medium voltage)
  properties: corresponding fuel use, propane, furnace >100kW 1.05263 MJ, heating value, net 1 MJ
  note on corresponding fuel use, propane, furnace >100kW: Lower heating value of the fuel input related to the heat/electricity output, taken directly from ecoinvent v3.0 dataset "heat production, natural gas, at industrial furnace >100kW, GLO 2000".
- barite: 0.0012 kg; source Spanos, Constantine 2015; lognormal variance with pedigree 0.0126, pedigree (3,4,4,1,1)
  Literature Value. Negative Electrode additive Source: Spanos et al. (2015, Tables 5 and 6)
  properties: dry mass 1 kg, wet mass 1 kg
- polypropylene, granulate: 0.075 kg; source Spanos, Constantine 2015; lognormal variance with pedigree 0.0126, pedigree (3,4,4,1,1)
  Literature Value. Casing. Source: Spanos et al. (2015, Tables 5 and 6)
  properties: heating value, net 32.78 MJ, carbon content, fossil 0.857143, wet mass 1 kg, dry mass 1 kg
  note on heating value, net: Value extracted from "treatment of waste polypropylene, open burning"
- silver: 0.0001 kg; source Spanos, Constantine 2015; lognormal variance with pedigree 0.0126, pedigree (3,4,4,1,1)
  Literature Value. Grid alloying additive, Source: Spanos et al. (2015, Tables 5 and 6)
  properties: wet mass 1 kg, dry mass 1 kg
- aluminium, wrought alloy: 0.0001 kg; source Spanos, Constantine 2015; lognormal variance with pedigree 0.0126, pedigree (3,4,4,1,1)
  Literature Value. Grid alloying additive; original material: Aluminium, production mix, at plant/RER Source: Spanos et al. (2015, Tables 5 and 6)
  properties: wet mass 1 kg, dry mass 1 kg
- acrylonitrile-butadiene-styrene copolymer: 0.0076 kg; source Spanos, Constantine 2015; lognormal variance with pedigree 0.0126, pedigree (3,4,4,1,1)
  Literature Value. Balancing and control electronics: ABS plastic casing for controller (95 wt% of controller) Source: Spanos et al. (2015, Tables 5 and 6)
  properties: heating value, net 35.58 MJ, carbon content, fossil 0.853081, wet mass 1 kg, dry mass 1 kg
- printed wiring board, through-hole mounted, unspecified, Pb free: 0.0004 kg; source Spanos, Constantine 2015; lognormal variance with pedigree 0.0126, pedigree (3,4,4,1,1)
  Literature Value. Balancing and control electronics, Source: Spanos et al. (2015, Tables 5 and 6)
  properties: dry mass 1 kg, carbon content, fossil 0.255344, wet mass 1 kg, carbon content, non-fossil 0.00192028
- heat, district or industrial, natural gas: 6 MJ; source Spanos, Constantine 2015; lognormal variance with pedigree 0.058625, pedigree (3,5,5,2,3)
  (same comment as for electricity, medium voltage)
  properties: heating value, net 1 MJ
- scrap lead acid battery: -1 kg; lognormal variance with pedigree 0.2106, pedigree (5,5,5,5,5)
  Calculated value. Proxy
  ADJUST the uncertainty based on the values in this file.
  production volume 7.80142e7 kg
  properties: carbon content, non-fossil 0.000250076, wet mass 1 kg, dry mass 0.892 kg, water content 0.121076, carbon content, fossil 0.0799599

## Sampling procedure
Material composition according to a material safety datasheet cited in Spanos, Constantine, Turney, Damon E., Fthenakis, Vasilis (2015): Life-cycle analysis of flow-assisted nickel zinc-, manganese dioxide-, and valve-regulated lead-acid batteries designed for demand-charge reduction. Renewable and Sustainable Energy Reviews 43: 478-494. doi:10.1016/j.rser.2014.10.072.

## Extrapolations
This dataset has been extrapolated from year 2010 to the year of the calculation (2021). The uncertainty has been adjusted accordingly.
