# perlite quarry operation

Dataset: EcoSpold 2, unit process
Geography: DE
Time period: 2000-01-01 to 2021-12-31
Technology level: current
Classification: ISIC rev.4 ecoinvent: 0810:Quarrying of stone, sand and clay
Classification: EcoSpold01Categories: construction materials/additives
Tags: ConvertedDataset
Scenario: Business-as-Usual
System model: Allocation, cut-off by classification
Generated by: Daniel Kellenberger (obsolete)
Published in: Kellenberger D. 2004
Database: ecoinvent
isCopyrightProtected: true
accessRestrictedTo: 1

## General comment
As no data are available, data from vermiculite mining are copied. Uncertainties are raised accordingly.
[This dataset was already contained in the ecoinvent database version 2. It was not individually updated during the transfer to ecoinvent version 3. Life Cycle Impact Assessment results may still have changed, as they are affected by changes in the supply chain, i.e. in other datasets. This dataset was generated following the ecoinvent quality guidelines for version 2. It may have been subject to central changes described in the ecoinvent version 3 change report (http://www.ecoinvent.org/database/ecoinvent-version-3/reports-of-changes/), and the results of the central updates were reviewed extensively. The changes added e.g. consistent water flows and other information throughout the database. The documentation of this dataset can be found in the ecoinvent reports of version 2, which are still available via the ecoinvent website. The change report linked above covers all central changes that were made during the conversion process.]

## Included activities end
includes excavation by digger, blasting, transportation within mine, the land-use of the mine, the recultivation and dust emissions

## Geography
For the exchanges, RER, GLO and CH modules have been used as proxy.

## Technology
Technology of vermiculite mining used.

## Reference product
- perlite: 1 kg; CPC 16390: Other minerals n.e.c.; By-product classification allocatable product; CAS 130885-09-5
  EcoSpold01Location=DE
  production volume 0.242058 kg
    This is a placeholder value that does not reflect real-world production volumes. This dataset does not currently require a real-world production volume to work in the database framework, and no actual data were collected yet. This has no negative effect on the results of the ecoinvent database. The placeholder value of this activity was scaled according to the nominal GDP of 2005 (source: United Nations, http://data.un.org/Glossary.aspx?q=GDP+%28current+US%24%29, accessed 20130726) to reflect an appropriate share of the global production volume, which is also a placeholder value.
  property price 0.08 EUR2005
    Calculated value based on data from United Nations Commodity Trade Statistics Database (comtrade.un.org). UN comtrade category: 253010 Vermeculite, perlite and chlorites, unexpanded. Year 2005. Using exchange rate of 1EURO = 1.209 USD. Average of price of import into 5 main markets (EU, US, JP, IN and CN).
  property carbon content 0
    carbon content on a dry matter basis (reserved; not for manual entry)
  properties: water in wet mass 0 kg, water content 0, carbon content, fossil 0, carbon content, non-fossil 0, dry mass 1 kg, wet mass 1 kg, carbon allocation 0 kg

## Inputs from technosphere
All rows: lognormal variance with pedigree 0.69, pedigree (1,1,5,1,1)
- blasting: 0.000166 kg
  activityLink introduced to establish a direct link to the corresponding regional supply of this product
  EcoSpold01Location=RER
- diesel, burned in building machine: 0.00697 MJ
  EcoSpold01Location=GLO
  properties: heating value, net 1 MJ
- lubricating oil: 8.06e-5 kg
  EcoSpold01Location=RER
  properties: wet mass 1 kg, dry mass 1 kg, carbon content, fossil 0.75, heating value, net 40.2 MJ
  note on carbon content, fossil: Lubricating oil is produced from diesel. C-content/dry mass of fats and oils considered 75%, from: ecoinvent v2.2 report, n 15a, pg 40
  note on heating value, net: Literature value, Source: IPCC 2006, 2006 IPCC Guidelines for National Greenhouse Gas Inventories, Prepared by the National Greenhouse Gas Inventories Programme, Eggleston H.S., Buendia L., Miwa K., Ngara T. and Tanabe K. (eds). Published: IGES, Japan
- mine infrastructure, vermiculite: 6.45e-12 unit
  EcoSpold01Location=ZA
- electricity, medium voltage: 0.000105 kWh
  EcoSpold01Location=DE
- heat, district or industrial, other than natural gas: 0.005054 MJ
  EcoSpold01Location=RER
  properties: heating value, net 1 MJ

## Inputs from nature
- Occupation, mineral extraction site [natural resource, land]: 0.0005 m2*year; lognormal variance with pedigree 0.69, pedigree (1,1,5,1,1)
- Perlite, in ground [natural resource, in ground]: 1 kg; lognormal variance with pedigree 0.69, pedigree (1,1,5,1,1)
- Transformation, to mineral extraction site [natural resource, land]: 1e-5 m2; lognormal variance with pedigree 0.69, pedigree (1,1,5,1,1)
- Transformation, from unspecified [natural resource, land]: 0.0005 m2; lognormal variance with pedigree 0.69, pedigree (1,1,5,1,1)

## Emissions to nature
- Particulates, > 10 um [air, non-urban air or from high stacks]: 0.000112 kg; lognormal variance with pedigree 0.69, pedigree (1,1,5,1,1)
- Particulates, < 2.5 um [air, non-urban air or from high stacks]: 8e-6 kg; lognormal variance with pedigree 0.69, pedigree (1,1,5,1,1)
- Particulates, > 2.5 um, and < 10um [air, non-urban air or from high stacks]: 4e-5 kg; lognormal variance with pedigree 0.69, pedigree (1,1,5,1,1)

## Sampling procedure
Data adapted from module "vermiculite, at mine" based on literature

## Extrapolations
This dataset has been extrapolated from year 2000 to the year of the calculation (2021). The uncertainty has been adjusted accordingly.

## Review by Roberto Dones 2005-07-19
passed
