# cable production, three-conductor cable

Dataset: EcoSpold 2, unit process
Geography: GLO
Time period: 2005-01-01 to 2021-12-31
Technology level: current
Classification: EcoSpold01Categories: electronics/component
Classification: ISIC rev.4 ecoinvent: 2732:Manufacture of other electronic and electric wires and cables
Tags: ConvertedDataset
Scenario: Business-as-Usual
System model: Allocation, cut-off by classification
Generated by: Roland Hischier
Published in: Hischier R. 2007
Database: ecoinvent
isCopyrightProtected: true
accessRestrictedTo: 1

## General comment
This dataset represents the production of 1 meter of a 1 kV low voltage cable with copper wire sheath, type GKN (Ceander / waveconal cable) with a meter-weight of 1.04 kg/m. It is a rough estimation of a low-voltage power cable, used for distribution networks and in industry. Material data are taken from datasheet of a producer of such a cable. Infrastructure and production efforts are based on own assumptions and have thus, accordingly higher uncertainties.
[This dataset was already contained in the ecoinvent database version 2. It was not individually updated during the transfer to ecoinvent version 3. Life Cycle Impact Assessment results may still have changed, as they are affected by changes in the supply chain, i.e. in other datasets. This dataset was generated following the ecoinvent quality guidelines for version 2. It may have been subject to central changes described in the ecoinvent version 3 change report (http://www.ecoinvent.org/database/ecoinvent-version-3/reports-of-changes/), and the results of the central updates were reviewed extensively. The changes added e.g. consistent water flows and other information throughout the database. The documentation of this dataset can be found in the ecoinvent reports of version 2, which are still available via the ecoinvent website. The change report linked above covers all central changes that were made during the conversion process.]

## Included activities start
From reception of metals and non-metal parts at the factory gate.

## Included activities end
This module includes material, an estimation of the production efforts (transportation, energy, process chemicals, …) and of the infrastructure for the production of a three-conductor cable used in the construction of new buildings. No information about emissions (air, water) and waste are included.

## Geography
Data from one Swiss producer, used as representative for the global situation.

## Technology
Data from one producer of such type of cable.

## Reference product
- cable, three-conductor cable: 1 m; source Brugg Cables 1996; CPC 463: Insulated wire and cable; optical fibre cables; By-product classification allocatable product
  EcoSpold01Location=GLO
  The three copper conductors have a diameter of 16 mm each and the complete cable (incl. all isolation layers) has an average weight of 1.04 kg/m.
  production volume 1 m
    Dummy value to be replaced by measured, estimated or calculated value
  property price 2.38372 EUR2005
    Calculated based on inputs: The price of the product has been calculated as a sum of the values of the material and energy inputs for this product. This value is therefore a rough estimation. It may underestimate the real price since there are additional expenses when producing any product. These expences can include for example labour costs, treatment of waste materials and profit for the producer. Please consider carefully whether this level of data quality is acceptable for your application.
  property carbon content, fossil 0.451335
    Calculated as the addition of C contents in the product composition. Then referred to 1 kg DM
  property carbon content 0.451335
    carbon content on a dry matter basis (reserved; not for manual entry)
  properties: water content 0, carbon content, non-fossil 0, wet mass 1.04 kg, water in wet mass 0 kg, dry mass 1.04 kg, carbon allocation 0.469389 kg

## Inputs from technosphere
- copper, cathode: 0.49238 kg; lognormal variance with pedigree 0.1207, pedigree (1,3,5,3,4)
  EcoSpold01Location=RER
  Calculated Value, from each conductor's profile (i.e. 16 mm2) and copper's density (8’920 kg/m3). The outer copper line is assumed to be about 15% of the total of the three conductors.
  Uncertainty: data from composition of one such cable
  properties: dry mass 1 kg, wet mass 1 kg
- rolling mill: 3.3766e-11 unit; lognormal variance with pedigree 0.5761, pedigree (4,5,5,3,5)
  Proxy. Due to a lack of more specific information, the infrastructure established for rolling of steel, was used.
  EcoSpold01Location=RER
  Uncertainty: rough estimation of infrastructure
- polyethylene, high density, granulate: 0.54762 kg; lognormal variance with pedigree 0.1207, pedigree (1,3,5,3,4)
  EcoSpold01Location=RER
  Proxy, for the non-metal parts 100% HDPE was used.
  Uncertainty: data from composition of one such cable
  properties: carbon content, fossil 0.857143, dry mass 1 kg, wet mass 1 kg, heating value, net 42.47 MJ
  note on carbon content, fossil: Polyethylene is formed out of a huge amount of ethylene monomers (C2H4) (ecoinvent v2.2 report 11_II). MW=28 g/mol
- extrusion, plastic pipes: 0.54762 kg; lognormal variance with pedigree 0.1207, pedigree (1,3,5,3,4)
  EcoSpold01Location=RER
  Proxy. Due to a lack of more specific information about energy consumption, for the HDPE amount this dataset was used.
  Uncertainty: data from composition of one such cable
- wire drawing, copper: 0.49238 kg; lognormal variance with pedigree 0.1207, pedigree (1,3,5,3,4)
  Proxy. Due to a lack of specific information about energy consumption, for the copper amount this dataset was used.
  EcoSpold01Location=RER
  Uncertainty: data from composition of one such cable

## Sampling procedure
Literature & own estimations

## Extrapolations
This dataset has been extrapolated from year 2005 to the year of the calculation (2021). The uncertainty has been adjusted accordingly.

## Review by Roland Hischier 2011-09-20
Transfer of documentation done.

## Review by Rolf Frischknecht 2007-09-14
passed.
