# natural stone plate production, grounded

Dataset: EcoSpold 2, unit process
Geography: CH
Time period: 2000-01-01 to 2021-12-31
Technology level: current
Classification: ISIC rev.4 ecoinvent: 2396:Cutting, shaping and finishing of stone
Classification: EcoSpold01Categories: construction materials/others
Tags: ConvertedDataset
Scenario: Business-as-Usual
System model: Allocation, cut-off by classification
Generated by: Daniel Kellenberger (obsolete)
Published in: Kellenberger D. 2007
Database: ecoinvent
isCopyrightProtected: true
accessRestrictedTo: 1

## General comment
The grinding is assumed to be accomplished with diamond studded grinding wheels. The diamond losses are not taken into account even though they might be significant as no data on diamond production is available. The dust emissions are estimated based on the losses (0.5 mm abrasion around the granite plate with geometry of 0.5 * 0.5 * 0.03 m and a weight of 2?750 kg/m3). It is assumed that 95% of the dust is bound in the cooling water.
[This dataset was already contained in the ecoinvent database version 2. It was not individually updated during the transfer to ecoinvent version 3. Life Cycle Impact Assessment results may still have changed, as they are affected by changes in the supply chain, i.e. in other datasets. This dataset was generated following the ecoinvent quality guidelines for version 2. It may have been subject to central changes described in the ecoinvent version 3 change report (http://www.ecoinvent.org/database/ecoinvent-version-3/reports-of-changes/), and the results of the central updates were reviewed extensively. The changes added e.g. consistent water flows and other information throughout the database. The documentation of this dataset can be found in the ecoinvent reports of version 2, which are still available via the ecoinvent website. The change report linked above covers all central changes that were made during the conversion process.]

## Included activities end
Basis is the cut natural granite plate in a storage which is ground and cooled. Beside infrastructure some internal transports are included. No administration and wear and spare parts are taken into account. Dust is accounted for.

## Geography
For some exchanges RER- and GLO-modules are used as proxy

## Technology
Typical technology for average Swiss production.

## Parameters
- fraction, process water, to air: 0.15 dimensionless; name fraction_PW_to_air; lognormal variance with pedigree 0.092025, pedigree (4,4,3,2,4)
  Literature value. In case when no industry/process specific data are available, default evaporation fraction value is used. This value is 15% and is based on literature (Statistics Canada, 2007 & Shaffer, K.H., 2008, Consumptive water use in the Great Lakes Basin, USGS & Shiklomanov, 2003, World Water Resources at the Beginning of the 21st Century) and has been approved by an expert.

## Reference product
- natural stone plate, grounded: 1 kg; By-product classification allocatable product; CPC 37690: Other worked monumental or building stone and articles thereof; other artificially coloured granules, chipping[…]
  EcoSpold01Location=CH
  production volume 0.0336675 kg
    This is a placeholder value that does not reflect real-world production volumes. This dataset does not currently require a real-world production volume to work in the database framework, and no actual data were collected yet. This has no negative effect on the results of the ecoinvent database. The placeholder value of this activity was scaled according to the nominal GDP of 2005 (source: United Nations, http://data.un.org/Glossary.aspx?q=GDP+%28current+US%24%29, accessed 20130726) to reflect an appropriate share of the global production volume, which is also a placeholder value.
  property price 0.296 EUR2005
    Estimated to be double the price of natural stone plate, cut.
  property carbon content, fossil 0
    granite (Potassium feldspar, plagioclase feldspar, and quartz)
  property carbon content, non-fossil 0
    granite (Potassium feldspar, plagioclase feldspar, and quartz)
  property carbon content 0
    carbon content on a dry matter basis (reserved; not for manual entry)
  properties: water content 0, wet mass 1 kg, water in wet mass 0 kg, dry mass 1 kg, carbon allocation 0 kg

## Inputs from technosphere
- electricity, medium voltage: 0.24 kWh; lognormal variance with pedigree 0.078, pedigree (3,5,5,1,3)
  EcoSpold01Location=CH
- industrial machine, heavy, unspecified: 5e-6 kg; lognormal variance with pedigree 0.446025, pedigree (5,5,5,2,3)
  activityLink introduced to establish a direct link to the corresponding regional supply of this product
  EcoSpold01Location=RER
- diesel, burned in building machine: 0.357 MJ; lognormal variance with pedigree 0.078, pedigree (3,5,5,1,3)
  EcoSpold01Location=GLO
  properties: heating value, net 1 MJ
- natural stone plate, cut: 1.08 kg; lognormal variance with pedigree 0.146, pedigree (5,5,5,1,3)
  EcoSpold01Location=CH
  properties: dry mass 1 kg, wet mass 1 kg

## Inputs from nature
- Water, river [natural resource, in water]: 0.00373 m3; name water_river_input; lognormal variance with pedigree 0.0767, pedigree (2,5,5,3,3)

## Emissions to nature
- Water [air, unspecified]: 0.0005595 m3; name water_to_air_unspecified; = (water_river_input*fraction_PW_to_air); lognormal variance with pedigree 0.0807, pedigree (2,2,5,1,1)
  Calculated value based on literature values and expert opinion. See comments in the parametres' comment field.
  property fraction, origin: unspecified 0; name fraction_origin_unspecified
  property fraction, origin: salt water 0; name fraction_origin_salt_water
  property fraction, origin: fresh water 1; name fraction_origin_fresh_water
- Particulates, > 10 um [air, unspecified]: 2.8e-5 kg; lognormal variance with pedigree 0.3206, pedigree (2,5,5,5,5)
- Water [water, unspecified]: 0.0031705 m3; name water_to_water_unspecified; = water_river_input*(1-fraction_PW_to_air); lognormal variance with pedigree 0.0807, pedigree (2,2,5,1,1)
  (same comment as for Water)
  property fraction, origin: fresh water 1; name fraction_origin_fresh_water_Ww
  property fraction, origin: salt water 0; name fraction_origin_salt_water_Ww
  property carbon content, fossil 0; name C_content_fossil
  property water in wet mass 1000 kg; name WWM
  property dry mass 0 kg; name DM
  property carbon content, non-fossil 0; name C_content_non_fossil
  property wet mass 1000 kg; name WM
  property fraction, origin: unspecified 0; name fraction_origin_unspecified_Ww
- Particulates, < 2.5 um [air, unspecified]: 5.6e-5 kg; lognormal variance with pedigree 0.5806, pedigree (2,5,5,5,5)
- Particulates, > 2.5 um, and < 10um [air, unspecified]: 0.000103 kg; lognormal variance with pedigree 0.4006, pedigree (2,5,5,5,5)

## Sampling procedure
Literature

## Extrapolations
This dataset has been extrapolated from year 2004 to the year of the calculation (2021). The uncertainty has been adjusted accordingly.

## Review by Rolf Frischknecht 2010-02-07
passed
