# heat and power co-generation unit construction, 1MWel

Dataset: EcoSpold 2, unit process
Geography: CH
Time period: 2015-01-01 to 2021-12-31
Technology level: current
Classification: ISIC rev.4 ecoinvent: 4220:Construction of utility projects
Tags: geothermal energy
Scenario: Business-as-Usual
System model: Allocation, cut-off by classification
Generated by: Karin Treyer
Published in: S Hirchberg, S Wiemer, P Burgherr 2015
Database: ecoinvent
isCopyrightProtected: true
accessRestrictedTo: 1

## General comment
This dataset comprises the reference flow 'heat and power cogeneration unit 1MW electric 6.4 MWt'. This data set is based on a data set comprised in the book 'Energy from the earth'. (see field 'published source' for more details). The inventory for the heat and power generating unit is basically taken from (Bauer, 2007).

## Included activities start
Material and energy for construction of the cogeneration unit.

## Included activities end
Cogeneration unit.

## Geography
Represents installation of a deep geothermal power plant in Switzerland.

## Technology
This infrastructure referes to the cogeneration unit existing in Switzerland.

## Reference product
- heat and power co-generation unit, organic Rankine cycle, 1MWe, 6.4 MWth: 1 unit; name RP_amount_1; source S Hirchberg, S Wiemer, P Burgherr 2015; CPC 4: Metal products, machinery and equipment; By-product classification allocatable product
  production volume 5.5 unit; name RP_PV_1
    corresponds to installation of one plant
  property price 159842 EUR2005
    Calculated based on inputs: The price of the product has been calculated as a sum of the values of the material and energy inputs for this product. This value is therefore a rough estimation. It may underestimate the real price since there are additional expenses when producing any product. These expences can include for example labour costs, treatment of waste materials and profit for the producer. Please consider carefully whether this level of data quality is acceptable for your application.

## Inputs from technosphere
- stone wool: 90 kg; name stone_wool_amount_1; source S Hirchberg, S Wiemer, P Burgherr 2015; lognormal variance with pedigree 0.141325, pedigree (2,2,5,2,2)
  Bauer (2007) is the source.
  properties: dry mass 1 kg, carbon content, fossil 0.015401, wet mass 1 kg
  note on carbon content, fossil: The chemical composition of the glass fibres used in the rock wool production is similar to the composition of naturally cooled volcano basalt and has a composition listed in Tab. 3.1 and 3.2 in ecoinvent v2.2 report 16, part XIV. Rock wool contains: a minimum of 96% mineral fibres,between 0.5 and 3.0 weight percent of phenolic resin depending on the specific product characteristics, and about 0.2 percent mineral oil (ecoinvent v2.2 report 16, part XIV). An average composition of 1.8% phenolic resin, 0.2% mineral oil, and 98% mineral fibres has been assumed and used to calculate C content of the rock wool
- sheet rolling, chromium steel: 460 kg; source S Hirchberg, S Wiemer, P Burgherr 2015; lognormal variance with pedigree 0.141325, pedigree (2,2,5,2,2)
  This item belongs to the conditioning category of the LCI.
- copper, cathode: 320 kg; name copper_amount_1; source S Hirchberg, S Wiemer, P Burgherr 2015; lognormal variance with pedigree 0.141325, pedigree (2,2,5,2,2)
  Source: Bauer (2007)
  This item belongs to the conditioning category of the LCI.
  properties: dry mass 1 kg, wet mass 1 kg
- wire drawing, steel: 320 kg; source S Hirchberg, S Wiemer, P Burgherr 2015; lognormal variance with pedigree 0.141325, pedigree (2,2,5,2,2)
  Bauer (2007) is the source.
- polyethylene, high density, granulate: 340 kg; name polyethylene_high_density_granulate_amou; source S Hirchberg, S Wiemer, P Burgherr 2015; lognormal variance with pedigree 0.141325, pedigree (2,2,5,2,2)
  Bauer (2007) is the source.
  properties: carbon content, fossil 0.857143, dry mass 1 kg, wet mass 1 kg, heating value, net 42.47 MJ
  note on carbon content, fossil: Polyethylene is formed out of a huge amount of ethylene monomers (C2H4) (ecoinvent v2.2 report 11_II). MW=28 g/mol
- heat and power co-generation unit, organic Rankine cycle, 1000kW electrical: 1 unit; source S Hirchberg, S Wiemer, P Burgherr 2015; lognormal variance with pedigree 0.141325, pedigree (2,2,5,2,2)
  Literature value/estimation. The amount of the steel mass is estimated based on a 1 MW plant in (Rogge, 2004).
  Weights of the different ORC components: Evaporator (11 t),
  boiler (4 t), turbine (3 t), generator (4 t), pump for working fluid
  (1 t), condenser of the organic circulating fluid (16 t)
  Rogge, S. (2004). Geothermische Stromerzeugung in Deutschland Ökonomie , Ökologie und Potenziale. Technical University Berlin, Germany.
- steel, chromium steel 18/8: 460 kg; name steel_chromium_steel_18_8_amount_1; source S Hirchberg, S Wiemer, P Burgherr 2015; lognormal variance with pedigree 0.141325, pedigree (2,2,5,2,2)
  Bauer (2007) is the source.
  properties: wet mass 1 kg, carbon content, fossil 0.0008, dry mass 1 kg
  note on carbon content, fossil: Stainless steel model is the grade 304 steel (18/8 stainless, 18% chromium 8% nickel; max. 0.08% C)
- building, hall: 250 m2; source S Hirchberg, S Wiemer, P Burgherr 2015; lognormal variance with pedigree 0.141325, pedigree (2,2,5,2,2)
  (Bauer, 2007) is the source
  It belongs to the category: Diverse in the LCI.
  This exchange has an activity link directly to the producing activity because the product is primarily consumed in the same geographical area where it is produced.
- spent solvent mixture: -436 kg; name BP_amount_1; source S Hirchberg, S Wiemer, P Burgherr 2015; lognormal variance with pedigree 0.141325, pedigree (2,2,5,2,2)
  mass of solvents to be disposed of
  production volume 2398 kg; = RP_PV_1 * (BP_amount_1 / RP_amount_1)
    Calculated from production volume of reference product using the relative outputs.
  property price 0 EUR2005; name BP_amount_1_price_EUR2005
  properties: water content 0.197605, wet mass 1 kg, carbon content, fossil 0.571257, heating value, net 21.7 MJ, dry mass 0.835 kg
  note on carbon content, fossil: Tab A.7, ecoinvent v2.2 report 13_I. C content has been calculated after data in the tables, and then referred to 1 kg DM
  note on heating value, net: Value taken from the general comment of the treatment dataset.
- sheet rolling, aluminium: 320 kg; source S Hirchberg, S Wiemer, P Burgherr 2015; lognormal variance with pedigree 0.141325, pedigree (2,2,5,2,2)
  This item belongs to the conditioning category of the LCI.
- concrete, sole plate and foundation: 14 m3; name concrete_sole_plate_and_amount_1; source S Hirchberg, S Wiemer, P Burgherr 2015; lognormal variance with pedigree 0.141325, pedigree (2,2,5,2,2)
  Literature value/calculated value.The original value of
  34’000 kg concrete for the foundation was divided by a density of 2380 kg/m3. Source; Bauer (2007)
  properties: wet mass 2385 kg, dry mass 2205 kg, water content 0.0816327
- inert waste, for final disposal: -40224 kg; name BP_amount_2; = (concrete_sole_plate_and_amount_1+ copper_amount_1+ polyethylene_high_density_granulate_amou+ stone_wool_amount_1+ steel_chromium_steel_18_8_amount_1+ steel_low_alloyed_amount_1)*-1; source S Hirchberg, S Wiemer, P Burgherr 2015; lognormal variance with pedigree 0.051325, pedigree (2,2,5,2,2)
  represents the sum of materials to be disposed of
  production volume 221232 kg; = RP_PV_1 * (BP_amount_2 / RP_amount_1)
    Calculated from production volume of reference product using the relative outputs.
  property price 0 EUR2005; name BP_amount_2_price_EUR2005
  properties: dry mass 0.995 kg, water content 0.00502513, wet mass 1 kg
- steel, low-alloyed: 39000 kg; name steel_low_alloyed_amount_1; source S Hirchberg, S Wiemer, P Burgherr 2015; lognormal variance with pedigree 0.141325, pedigree (2,2,5,2,2)
  Literature value/estimation. The amount of the steel mass is estimated based on a 1 MW plant in (Rogge, 2004). Weights of the different ORC components: Evaporator (11 t), boiler (4 t), turbine(3 t), generator (4 t),pump for working fluid (1 t), condenser of the organic circulating fluid (16 t)
  Low alloyed steel is an Organic rankine cycle component.
  properties: wet mass 1 kg, carbon content, fossil 0.005, dry mass 1 kg
- benzene: 436 kg; source S Hirchberg, S Wiemer, P Burgherr 2015; lognormal variance with pedigree 0.141325, pedigree (2,2,5,2,2)
  Calculated from an input of 300 kg Perfluoropentane (Density 1.664 g/ml) and a density of 0.874 g/ml for Benzene.
  This item belongs to the working fluid category of the LCI.
  Source Rogge, S. (2004). Geothermische Stromerzeugung in Deutschland Ökonomie , Ökologie und
  Potenziale. Technical University Berlin, Germany.
  properties: wet mass 1 kg, carbon content, fossil 0.923077, heating value, net 42.5 MJ, dry mass 1 kg
- waste concrete: -30800 kg; name BP_amount_3; = (concrete_sole_plate_and_amount_1*2200)*-1; lognormal variance with pedigree 0.1507, pedigree (3,3,5,3,3)
  disposal of concrete platform
  production volume 169400 kg; = RP_PV_1 * (BP_amount_3 / RP_amount_1)
    Calculated from production volume of reference product using the relative outputs.
  property price 0 EUR2005; name BP_amount_3_price_EUR2005
  properties: dry mass 0.5 kg, wet mass 1 kg, water content 1
- sheet rolling, steel: 39000 kg; source S Hirchberg, S Wiemer, P Burgherr 2015; lognormal variance with pedigree 0.141325, pedigree (2,2,5,2,2)
  This item belongs to the conditioning category of the LCI.
- electricity, medium voltage: 2400 kWh; source S Hirchberg, S Wiemer, P Burgherr 2015; lognormal variance with pedigree 0.141325, pedigree (2,2,5,2,2)
  Source; Bauer (2007)
  Electricity mix belongs to Energy Use category.
- heat, central or small-scale, other than natural gas: 300 MJ; source S Hirchberg, S Wiemer, P Burgherr 2015; lognormal variance with pedigree 0.141325, pedigree (2,2,5,2,2)
  Bauer (2007) is the source.
  properties: heating value, net 1 MJ

## Sampling procedure
Literature, Various authors

## Extrapolations
This dataset has been extrapolated from year 2015 to the year of the calculation (2021). The uncertainty has been adjusted accordingly.
