# cottonseed oil refinery operation

Dataset: EcoSpold 2, unit process
Geography: RoW
Time period: 2012-01-01 to 2021-12-31
Technology level: current
Classification: ISIC rev.4 ecoinvent: 1040:Manufacture of vegetable and animal oils and fats
Scenario: Business-as-Usual
System model: Allocation, cut-off by classification
Generated by: Tereza Levova
Published in: Omni Tech International 2010
Database: ecoinvent
isCopyrightProtected: true
accessRestrictedTo: 1

## General comment
This dataset models cottonseed oil refining based on data from soybean oil refining.

## Included activities start
From reception of crude cottonseed oil at the refinery gate through refining of crude cottonseed oil.

## Included activities end
System boundary is set by the boundaries of the refinery.

## Technology
Average technology for alkaline refining process, which refers to caustic soda being added to degummed crude oil, which reacts with the free fatty acids (FFA) to form soap stock. The oil/soap mixture is separated using a centrifuge, and filtration is performed to further clarify the oil from the soap.

## Parameters
- fraction, process water, to air: 0.15 dimensionless; name fraction_PW_to_air; lognormal variance with pedigree 0.092025, pedigree (4,4,3,2,4)
  Literature value. In case when no industry/process specific data are available, default evaporation fraction value is used. This value is 15% and is based on literature (Statistics Canada, 2007 & Shaffer, K.H., 2008, Consumptive water use in the Great Lakes Basin, USGS & Shiklomanov, 2003, World Water Resources at the Beginning of the 21st Century) and has been approved by an expert.
- utilisation rate: 0.9 dimensionless; name utilization_rate; lognormal variance with pedigree 0.0086, pedigree (4,1,1,1,1)
- fraction, tap water, to air: 0.15 dimensionless; name fraction_TW_to_air; = fraction_PW_to_air; lognormal variance with pedigree 0.092025, pedigree (4,4,3,2,4)
  Calculated value. See comment in the other parametres present in this dataset. Tap water is considered to be always used as process water, thus process water fractions to air are applied to all tap water input flows to calculate the amount of water consumed in the processes.
- fraction: 0.802 dimensionless; name fraction_of_crude_oil_PV_to_refinery; lognormal variance with pedigree 0.0086, pedigree (4,1,1,1,1)
  Estimated based on literature (USDA, http://usda.mannlib.cornell.edu/MannUsda/viewDocumentInfo.do?documentID=1290 and http://lipidlibrary.aocs.org/market/nonfood.htm) 19.8% of vegetable oil, crude produced is further processed to be used for non-food products. The remaining 80.2 % is refined into vegetable oil, refined and used during food production.

## Reference product
- cottonseed oil, refined: 1 kg; name cottonseed_oil_refined; CPC 21682: Cottonseed oil, refined; By-product classification allocatable product
  production volume 3.40699e9 kg; name cottonseed_oil_refined_PV; = ABS((4857538*1000*fraction_of_crude_oil_PV_to_refinery)/ cottonseed_oil_crude_input)
    According to literature (USDA, http://usda.mannlib.cornell.edu/MannUsda/viewDocumentInfo.do?documentID=1290 and http://lipidlibrary.aocs.org/market/nonfood.htm) 19.8% of vegetable oil, crude produced is further processed to be used for non-food products. The remaining 80.2 % is refined into vegetable oil, refined and used during food production. According to FAO (http://faostat.fao.org/) 4.86E+9 kg of cottonseed oil, crude was produced in 2005.
  property heating value, net 38.4 MJ
    Values is approximated from HHV from "vegetable oil, crude". Source: Radovanovic,M.; Zivanovic,T.; Stojiljkovic,D.; Jovanovic,V.; Jerinic,N.; Knezevic,S. et.al. Utilization of sunflower husk as a fuel for industrial boilers - 20 years experience. Proc. 5th Eur. Conf. on Industrial Furnaces&Boilers 2000,vol.2,p.221-233.
    Available at: https://phyllis.nl/Biomass/View/2152
  property price 0.755 EUR2005; name cottonseed_oil_refined_price_EUR2005
    Calculated value based on data from United Nations Commodity Trade Statistics Database (comtrade.un.org). UN comtrade category: 151229 Cotton-seed or fractions simply refined. Using exchange rate of 1EURO = 1.209 USD. Average of import into 5 big markets (EU, USA, IN, JP and CN).
  property carbon content 0.612118
    carbon content on a dry matter basis (reserved; not for manual entry)
  property true value 0.755; name cottonseed_oil_refined_true_value
    allocation property applied in "true value" allocation // value calculated from revenue
  properties: water in wet mass 0 kg, carbon content, non-fossil 0.612118, dry mass 1 kg, carbon content, fossil 0, wet mass 1 kg, water content 0, carbon allocation 0.612118 kg

## By-products
- soap: 0 kg; name soap_output; CPC 35321: Soap; organic surface-active products and preparations for use as soap; paper, wadding, felt and nonwovens, im[…]; By-product classification allocatable product; pedigree (1,1,1,1,1)
  Estimated value based on soybean oil, crude refining.
  production volume 2.52117e7 kg; = soap_output/ cottonseed_oil_refined* cottonseed_oil_refined_PV
    Calculated from production volume of reference product using the relative outputs.
  property heating value, net 17.93 MJ
    LHV is calculated based on the Carbon content of the product. More details can be found on the respective documentation.
  property price 1.73 EUR2005; name soap_output_price_EUR2005
    According to Industrial Commodity Statistics Yearbook 2005, volume 1. Physical Quantity Data. UN. New York 2008 (hard copy ). The price is for the highest producing country in EU27 where the data are present (Italy) and soap; paper, wadding, and similar, covered with soap or detergent. US$ converted to according to http://en.wikipedia.org/wiki/Table_of_historical_exchange_rates downloaded 30 June 2009.
  property carbon content, non-fossil 0.692237
    Soap (CnH2n+1 COO Na) is produced by a combined saponification and neutralisation process performed on a blend of oleochemical feedstocks comprised of short chain (C12-14, derived from coconut or palm kernel oil) and long chain (C16-18, from tallow or palm oil) esters.The ratio of short to long fatty acid chains is 20:80 (ecoinvent v2.2 report 12). Short fatty acid has been estimated as C12.5H(2*12.5+1); MW R=176 g/mol. Long fatty acid has been estimated as C16H(2*16+1); MW R=225 g/mol. MW of COONa=67 g/mol
  property carbon content, fossil 0
    Soap (CnH2n+1 COO Na) is produced by a combined saponification and neutralisation process performed on a blend of oleochemical feedstocks comprised of short chain (C12-14, derived from coconut or palm kernel oil) and long chain (C16-18, from tallow or palm oil) esters.The ratio of short to long fatty acid chains is 20:80 (ecoinvent v2.2 report 12). Short fatty acid has been estimated as C12.5H(2*12.5+1); MW R=176 g/mol. Long fatty acid has been estimatedas C16H(2*16+1); MW R=225 g/mol. MW of COONa=67 g/mol
  property carbon content 0.692237
    carbon content on a dry matter basis (reserved; not for manual entry)
  property true value 0.012802; name soap_output_true_value
    allocation property applied in "true value" allocation // value calculated from revenue
  properties: water content 0.149425, wet mass 1 kg, dry mass 0.87 kg, water in wet mass 0.13 kg, carbon allocation 0.602247 kg

## Inputs from technosphere
- heat, district or industrial, natural gas: 0 MJ; pedigree (1,1,1,1,1)
  Estimated value based on soybean oil, crude refining.
  properties: heating value, net 1 MJ
- sodium hydroxide, without water, in 50% solution state: 0.00226165 kg; lognormal variance with pedigree 0.0526, pedigree (3,5,5,5,1)
  Estimated value based on soybean oil, crude refining.
  properties: wet mass 1 kg, dry mass 1 kg, heating value, net 3.03 MJ
- tap water: 0 kg; name tap_water_input; pedigree (1,1,1,1,1)
  Estimated value based on literature.
  properties: wet mass 1 kg, dry mass 0.000337476 kg, water content 2962.17, carbon content, fossil 0.00178991
- cottonseed oil, crude: 1.02463 kg; name cottonseed_oil_crude_input; = (cottonseed_oil_refined+(cottonseed_oil_refined*0.042))
  Estimated based on soybean oil, crude refining the amount of crude oil entering the process is 4.2% higher than the amount of refined oil on the output.
  properties: carbon content, non-fossil 0.612118, heating value, net 38.4 MJ, wet mass 1 kg, dry mass 1 kg
  note on heating value, net: Values is approximated from HHV from "vegetable oil, crude". Source: Radovanovic,M.; Zivanovic,T.; Stojiljkovic,D.; Jovanovic,V.; Jerinic,N.; Knezevic,S. et.al. Utilization of sunflower husk as a fuel for industrial boilers - 20 years experience. Proc. 5th Eur. Conf. on Industrial Furnaces&Boilers 2000,vol.2,p.221-233. Available at: https://phyllis.nl/Biomass/View/2152
- electricity, medium voltage: 0 kWh; pedigree (1,1,1,1,1)
  Estimated value based on soybean oil, crude refining.
- wastewater from vegetable oil refinery: -0.0884994 m3; name wastewater_from_vegetable_oil_rafinery_o; lognormal variance with pedigree 0.212, pedigree (3,5,5,5,5)
  Estimated value based on soybean oil, crude refining.
  production volume 3.06629e8 m3; = wastewater_from_vegetable_oil_rafinery_o/ cottonseed_oil_refined* cottonseed_oil_refined_PV
    Calculated from production volume of reference product using the relative outputs.
  property price 0 EUR2005; name wastewater_from_vegetable__price_EUR2005
  property dry mass 3.85 kg; name wastewater_from_vegetable_oil_rafin_DM_0
  property water in wet mass 996.15 kg; name wastewater_from_vegetable_oil_rafi_WWM_0; = wastewater_from_vegetable_oil_rafin_WM_0- wastewater_from_vegetable_oil_rafin_DM_0
  property wet mass 1000 kg; name wastewater_from_vegetable_oil_rafin_WM_0
- vegetable oil refinery: 1.07762e-10 unit; = 1/(lifetime_capacity_kg* utilization_rate); lognormal variance with pedigree 0.3486, pedigree (4,3,5,1,1)
  The utilization rate of 90% means that out of the whole capacity of the vegetable oil refinery only 90% is actually used for the production.
  property lifetime 50 year; name lifetime
  property lifetime capacity [kg] 1.01389e10 kg; name lifetime_capacity_kg; = (1/0.9)*500*365*1000*lifetime
  note on lifetime capacity [kg]: Calculated according to literature (World Bank, 1999, The Indian Oilseed Complex, http://books.google.ch/books?id=cAmzHYm7kHoC&pg=PA151&dq=edible+oil+refinery+plant+infrastructure+area&hl=en&sa=X&ei=x65MT729L7HN4QSYmszJAg&redir_esc=y#v=onepage&q=edible%20oil%20refinery%20plant%20infrastructure%20area&f=false) the average size European vegetable oil refinery produce 500 tones/day of refined vegetable oil.
- heat, district or industrial, natural gas: 0.00235238, 0.0564148 MJ (2 entries); lognormal variance with pedigree 0.0126, pedigree (1,4,4,5,1)
  Estimated value based on soybean oil, crude refining.
- tap water: 3.0863, 0.371508, 0.613977, 15.4821, 0.402762, 1.14565, 132.297 kg (7 entries); lognormal variance with pedigree 0.212, pedigree (3,5,5,5,5)
  Estimated value based on literature.
- electricity, medium voltage: 5.69213e-5, 1.09151e-5, 0.000250627, 0.000183241, 0.00266508, 0.00084479, 0.000375644 kWh (7 entries); lognormal variance with pedigree 0.0126, pedigree (1,4,4,5,1)
  Estimated value based on soybean oil, crude refining.

## Emissions to nature
- Water [air, non-urban air or from high stacks]: 0.0648995 m3; = (tap_water_input-( (wastewater_from_vegetable_oil_rafinery_o*-1)*1000)) / 1000; source Omni Tech International  2010; lognormal variance with pedigree 0.212, pedigree (3,5,5,5,5)
  Based on mass balance of water in and out.
  property water in wet mass 1000 kg; name WWM
  property carbon content, fossil 0; name C_content_fossil
  property carbon content, non-fossil 0; name C_content_non_fossil
  property wet mass 1000 kg; name WM

## Sampling procedure
Based on soybean oil refinery operation.

## Review by Bo Weidema 2012-08-23
Changed to a treatment activity ("cottonseed oil, crude" as negative reference product).

## Review by Bo Weidema 2012-03-14
Production volumes are for 2005, even though the dataset is indicated to be valid for 2012.
