# electricity production, wind, 1-3MW turbine, offshore

Dataset: EcoSpold 2, unit process
Geography: CN-GD
Time period: 2000-01-01 to 2021-12-31
Technology level: modern
Classification: EcoSpold01Categories: wind power/power plants
Classification: ISIC rev.4 ecoinvent: 3510:Electric power generation, transmission and distribution
Tags: wind power; China
Scenario: Business-as-Usual
System model: Allocation, cut-off by classification
Generated by: Karin Treyer
Published in: Burger, B. 2007
Database: ecoinvent
isCopyrightProtected: true
accessRestrictedTo: 1

## General comment
This dataset represents the production of high voltage electricity at offshore grid-connected wind power plants in China - Guangdong in 2012. It includes operation and maintenance expenditures as well as infrastructure inputs. Wind load hours have been adapted to local conditions (see parameters).
At the moment, the offshore wind turbines are approximated with a 2MW wind turbine.
According to The Wind Power Database (2014), total installed wind capacity on-and offshore in China - Guangdong in the end of 2014 amounted to 9106.29 MW. Out of it, 1.9% were installed offshore, which are modelled with a 2 MW wind turbine. Percentages of the three onshore wind power plant classes modelled in ecoinvent referring to the total installed capacity (725 windfarms by 12/2014): <1MW 15.5%; 1-3MW 44.8%; >3MW 37.8% [Retreived from The Wind Power. 2014. Wind power and wind farms database. www.thewindpower.net, Status December 2014]. Values are valid for TOTAL China, not for this specific province. The offshore plants are located in the provinces Jiangsu, Liaoning, Shanghai, Guangdong and Shandong.
[This dataset is meant to replace the following datasets:
- electricity production, wind, 1-3MW turbine, offshore, CN, 2000 - 2002]

## Included activities start
From operation of the wind power plant to high voltage electricity at the plant. According to (European Communities 2001), electricity produced with wind turbines in a wind power plant is connected to medium voltage or high voltage systems, depending on the size of the windfarm. Normally, each wind turbine contains a transformer from low voltage to medium voltage. The network connection additionally transforms the electricity to high voltage electricity. It is assumed here, that there are no stand-alone grid-connected small wind turbines and that all electricity is connected to the network in form of high voltage electricity.

Source:
European Communities. 2001. Wind Turbine Grid Connection and Interaction. Deutsches Windenergie-Institut /Tech-wise A/S /DM Energy, p. 7 Tab.2.1

## Included activities end
This activitiy ends with 1 kWh of produced electricity at the power plant. The dataset includes lubricating oil from maintenance of the installation. The dataset doesn"t include the land use as shipping is assumed to be restricted to a small extent.

## Technology
Technical details of the modeled 2 MW offshore wind power plant

References:
Stiesdal H. (2001) Middelgrunden Offshore. A newsletter for customers and business associates, Bonus energy A/S. General technical description, Technical specification, Drawings and design, Bonus 2 MW offshore. Isager/Bogtryt/Offset, Svendborg, Denmark. www.bonus.dk

## Parameters
- losses from gross electricity production: 0.01 dimensionless; name losses_gross_net; lognormal variance with pedigree 0.0113, pedigree (3,3,1,3,3)
  Estimation. The factor for the loss of electricity from gross to net electricity production is an assumption based on experiences, statistics and expertise (1% losses for wind).
  nan
- gross electricity production: 2.4e9 kWh; name gross_electricity; lognormal variance with pedigree 0.0019, pedigree (2,2,1,1,2)
  Literature value. Data from the China Electric Power Yearbook 2013 (Chinese National Bureau of Statistics) for 2012, which provides data on gross electricity production in each CN Province with various energy sources. Data were given for the electricity production with total wind.
  China Electric Power Yearbook 2013. China Electric Power Yearbook Editorial Department and National Bureau of Statistics (in Chinese)
  nan
- Percentage of onshore wind power plant class capacity on total: 0.032023 dimensionless; name percentage_class_onshore; lognormal variance with pedigree 0.0037, pedigree (3,2,1,1,2)
  Literature value/calculated value. China holds an offshore wind capacity of 1.9% of total installed capacity and the following onshore shares: <1MW 15.5%; 1-3MW 44.8%; >3MW 37.8%. According to The Wind Power, the offshore capacity is installed in the provinces Shandong (13.3%), Liaoning (5.2%), Shanghai (25.1%), Jiangsu (52.4%) and Guangdong (3.9%). The resulting percentages in this province amount to <1MW 15.3%; 1-3MW 44.3%; >3MW 37.3%; 3.2% offshore.
  Source:
  The Wind Power. 2014. Windpower and wind farms database. www.thewindpower.net, Status December 2014
  Percentage of the wind power plant class energy production on total wind power production in a country. Classes: <1MW, 1-3MW, >3MW. Values for onshore wind power plants.

## Reference product
- electricity, high voltage: 1 kWh; By-product classification allocatable product; CPC 17100: Electrical energy
  production volume 7.60868e7 kWh; name apv_el; = gross_electricity* (1-losses_gross_net)* percentage_class_onshore
    Calculated value
  property price 0.0977 EUR2005
    Temporary price data. Calculated as 90% of purchasers price based on: 94% of the average price (to account for a 6% loss in transformation and transmission) for electricity for industrial consumersin 2005 (excluded taxes). From IEA.

## Inputs from technosphere
- wind power plant, 2MW, offshore, moving parts: 9.5e-9 unit; source Stiesdal H. 2001; lognormal variance with pedigree 0.012, pedigree (1,1,3,1,1)
  Calculated value. From a life period of 20 years for moving parts and the energy production the amount per kWh can be calculated as 1/(20x5"260"000) = 9.5x10-9 pieces of moving parts per kWh of electricity. For the energy production a capacity factor of 27.4% is calculated (corresponds to 2400 full load hours) based on electricity production in the year 2002 (104 GWh) and 2003 (90 GWh) (www.middelgrunden.com, June 2004). According to a capacity factor of 27.4% the 2 MW offshore power plant generates 5.26 GWh/a of electricity.
- waste mineral oil: -5.75e-5 kg; name waste_min_oil; = (lubricating_oil)*-1; lognormal variance with pedigree 0.062, pedigree (1,1,3,1,1)
  Estimation. It is assumed that 100% of the oil is disposed after use.
  production volume 4374.99 kg; = apv_el*waste_min_oil
    Calculated value from production volume of the reference product
  property price 0 EUR2005; name waste_min_oil_price_EUR2005
  properties: wet mass 1 kg, dry mass 0.9 kg, water content 0.111111, carbon content, fossil 0.864444, heating value, net 34.7 MJ
  note on carbon content, fossil: Tab A.6, ecoinvent v2.2 report 13_I. C content has been calculated after data in the tables, and then referred to 1 kg DM
  note on heating value, net: Value taken from the general comment of the treatment dataset.
- wind power plant, 2MW, offshore, fixed parts: 9.5e-9 unit; source Stiesdal H. 2001; lognormal variance with pedigree 0.012, pedigree (1,1,3,1,1)
  Calculated value. From a life period of 20 years for fixed parts and the energy production the amount per kWh can be calculated as 1/(20x5"260"000) = 9.5x10-9 pieces of moving parts per kWh of electricity. For the energy production a capacity factor of 27.4% is calculated (corresponds to 2400 full load hours) based on electricity production in the year 2002 (104 GWh) and 2003 (90 GWh) (www.middelgrunden.com, June 2004). According to a capacity factor of 27.4% the 2 MW offshore power plant generates 5.26 GWh/a of electricity.
- lubricating oil: 5.75e-5 kg; name lubricating_oil; source Stiesdal H. 2001; lognormal variance with pedigree 0.042, pedigree (1,1,3,1,1)
  Estimation. Maintenance is cost- and time-consuming, especially for offshore wind power plants. Only the lubricating oil is taken into account.
  properties: heating value, net 40.2 MJ, carbon content, fossil 0.75, dry mass 1 kg, wet mass 1 kg
  note on heating value, net: Literature value, Source: IPCC 2006, 2006 IPCC Guidelines for National Greenhouse Gas Inventories, Prepared by the National Greenhouse Gas Inventories Programme, Eggleston H.S., Buendia L., Miwa K., Ngara T. and Tanabe K. (eds). Published: IGES, Japan
  note on carbon content, fossil: Lubricating oil is produced from diesel. C-content/dry mass of fats and oils considered 75%, from: ecoinvent v2.2 report, n 15a, pg 40

## Inputs from nature
- Energy, kinetic (in wind), converted [natural resource, in air]: 3.87 MJ; undefined min 3.87, max 3.87, standardDeviation95 0, pedigree (1,1,3,1,1)

## Sampling procedure
Based on literature and on electricity production statistics.

## Extrapolations
This dataset has been extrapolated from year 2015 to the year of the calculation (2021). The uncertainty has been adjusted accordingly.
