# capacitor production, tantalum-, for through-hole mounting

Dataset: EcoSpold 2, unit process
Geography: GLO
Time period: 1994-01-01 to 2021-12-31
Technology level: current
Classification: EcoSpold01Categories: electronics/component
Classification: ISIC rev.4 ecoinvent: 2610:Manufacture of electronic components and boards
Synonyms: Condenser
Scenario: Business-as-Usual
System model: Allocation, cut-off by classification
Generated by: Roland Hischier
Published in: Hischier R. 2007
Database: ecoinvent
isCopyrightProtected: true
accessRestrictedTo: 1

## General comment
This dataset represents the production of 1 kg of tantalum capacitors for the through-hole mounting technology. It is based on the assumption that a typical tantalum ceramic capacitor has an average weight of 0.254 g.The data represent a typical tantalum-capacitor for the hole-through mounting technology, used in the information and communication technology. Material data are taken from datasheets of producers of such capacitors. Infrastructure and production efforts are based on own assumptions. The production efforts represent not a specific capacitor type and have thus, accordingly higher uncertainties.

## Included activities start
From reception of metals and plastics at the factory gate.

## Included activities end
This dataset includes raw material input and production efforts for the production of currently used tantalum-containing capacitors for hole-through mounting technology.

## Geography
Data represent a global valuable composition of tantalum-containing capacitors.

## Technology
average production composed of: formulation; build-up process; cutting; bisquing; Pre-Firing; Firing; Tumbling; Termination (SMT) resp. metallization; slitting; winding; metal spray; heat treatment; sawing; lead welding; epoxy filling (THT)

## Reference product
- capacitor, tantalum-, for through-hole mounting: 1 kg; By-product classification allocatable product; CPC 47110: Electrical capacitors
  EcoSpold01Location=GLO
  Tantalum capacitor offers a large capacitance to volume ratio, smaller size, good stability, a wide operating temperature range, and a long reliable operating life. (Wikipedia, 2007)
  production volume 1 kg
    Dummy value to be replaced by measured, estimated or calculated value
  property price 183.769 EUR2005
    Calculated based on inputs: The price of the product has been calculated as a sum of the values of the material and energy inputs for this product. This value is therefore a rough estimation. It may underestimate the real price since there are additional expenses when producing any product. These expences can include for example labour costs, treatment of waste materials and profit for the producer. Please consider carefully whether this level of data quality is acceptable for your application.
  property carbon content, fossil 0.181224
    Calculated as the addition of C contents in the product composition, and referred to 1 kg capacitors, and then to 1 kg DM
  property carbon content, non-fossil 0
    (same comment as for capacitor, tantalum-, for through-hole mounting)
  property carbon content 0.181224
    carbon content on a dry matter basis (reserved; not for manual entry)
  properties: water content 0, wet mass 1 kg, dry mass 1 kg, water in wet mass 0 kg, carbon allocation 0.181224 kg

## Inputs from technosphere
- manganese: 0.053147 kg; source ZVEI 2006; lognormal variance with pedigree 0.042, pedigree (1,4,5,1,1)
  EcoSpold01Location=RER
  Calculated Value. The production of 1 kg of capacitors lead to a waste amount of 0.48 kg unused raw materials. Hence, this dataset here has an input of 1.48 kg of raw materials per kg of capacitor. The split to the different raw materials (metals, plastics, etc.) is based on the reported material specifications.
  Uncertainty: company information
  properties: wet mass 1 kg, dry mass 1 kg
- tin: 0.03404 kg; source ZVEI 2006; lognormal variance with pedigree 0.042, pedigree (1,4,5,1,1)
  (same comment as for manganese)
  properties: wet mass 1 kg, dry mass 1 kg
- silver: 0.03848 kg; source ZVEI 2006; lognormal variance with pedigree 0.042, pedigree (1,4,5,1,1)
  (same comment as for manganese)
  properties: wet mass 1 kg, dry mass 1 kg
- pig iron: 0 kg; source ZVEI 2006; pedigree (1,1,1,1,1)
  Calculated Value. The production of 1 kg of capacitors lead to a waste amount of 0.48 kg unused raw materials. Hence, this dataset here has an input of 1.48 kg of raw materials per kg of capacitor. The split to the different raw materials (metals, plastics, etc.) is based on the reported material specifications.
  EcoSpold01Location=GLO
  Uncertainty: company information
  properties: carbon content, fossil 0.045, wet mass 1 kg, dry mass 1 kg
  note on carbon content, fossil: Pig iron is the iron produced in the blast furnace. It is an alloy of 94% Fe and more than 2% C (world average 4.5%). (ecoinvent v2.2 report 10_partII)
- epoxy resin, liquid: 0 kg; source ZVEI 2006; pedigree (1,1,1,1,1)
  (same comment as for manganese)
  properties: wet mass 1 kg, heating value, net 12.82 MJ, carbon content, fossil 0.42325, dry mass 1 kg
- nickel, class 1: 0.062752 kg; source ZVEI 2006; lognormal variance with pedigree 0.042, pedigree (1,4,5,1,1)
  EcoSpold01Location=GLO
  Calculated Value. The production of 1 kg of capacitors lead to a waste amount of 0.48 kg unused raw materials. Hence, this dataset here has an input of 1.48 kg of raw materials per kg of capacitor. The split to the different raw materials (metals, plastics, etc.) is based on the reported material specifications.
  Uncertainty: company information
  properties: wet mass 1 kg, dry mass 1 kg
- chemical, inorganic: 0.01628 kg; source ZVEI 2006; lognormal variance with pedigree 0.042, pedigree (1,4,5,1,1)
  (same comment as for pig iron)
  properties: dry mass 1 kg, carbon content, fossil 0.003, wet mass 1 kg
  note on carbon content, fossil: This dataset is an unweighted average of 20 inorganic substances (listed in Tab 88.1, ecoinvent v2.2 report 8, part II), being part of the top100 chemicals included in this database. The C-content has also been calculated as an unweighted average of the C content of the substances composing this dataset.
- tetrafluoroethylene: 0.0074 kg; source ZVEI 2006; lognormal variance with pedigree 0.042, pedigree (1,4,5,1,1)
  Calculated Value. The production of 1 kg of capacitors lead to a waste amount of 0.48 kg unused raw materials. Hence, this dataset here has an input of 1.48 kg of raw materials per kg of capacitor. The split to the different raw materials (metals, plastics, etc.) is based on the reported material specifications.
  EcoSpold01Location=RER
  Uncertainty: company information
  properties: wet mass 1 kg, dry mass 1 kg, carbon content, fossil 0.24, heating value, net 7.27 MJ
- capacitor, auxilliaries and energy use: 1 kg; lognormal variance with pedigree 0.134, pedigree (3,4,5,1,4)
  EcoSpold01Location=GLO
  Estimation - details see this other activity dataset
  Uncertainty: rough estimation
- tantalum powder, capacitor-grade: 0.54316 kg; source ZVEI 2006; lognormal variance with pedigree 0.042, pedigree (1,4,5,1,1)
  (same comment as for pig iron)
  properties: wet mass 1 kg, dry mass 1 kg
- pig iron: 0.007352, 0.079376 kg (2 entries); source ZVEI 2006; lognormal variance with pedigree 0.042, pedigree (1,4,5,1,1)
  (same comment as for pig iron)
- epoxy resin, liquid: 0.105583, 0.501217 kg (2 entries); source ZVEI 2006; lognormal variance with pedigree 0.042, pedigree (1,4,5,1,1)
  (same comment as for manganese)

## Sampling procedure
literature

## Extrapolations
This dataset has been extrapolated from year 2007 to the year of the calculation (2021). The uncertainty has been adjusted accordingly.

## Review by Rolf Frischknecht 2007-09-20
passed.
