# water storage construction

Dataset: EcoSpold 2, unit process
Geography: CH
Time period: 1993-01-01 to 2021-12-31
Technology level: current
Classification: EcoSpold01Categories: water supply/production
Classification: ISIC rev.4 ecoinvent: 4220:Construction of utility projects
Tags: ConvertedDataset
Scenario: Business-as-Usual
System model: Allocation, cut-off by classification
Share of production covered: 9 %
Generated by: Niels Jungbluth
Published in: Althaus H.-J. 2004
Database: ecoinvent
isCopyrightProtected: true
accessRestrictedTo: 1

## General comment
Estimation for a storage in Marin (NE) with a capacity of 2500 m3. Life time 70 years.
[This dataset was already contained in the ecoinvent database version 2. It was not individually updated during the transfer to ecoinvent version 3. Life Cycle Impact Assessment results may still have changed, as they are affected by changes in the supply chain, i.e. in other datasets. This dataset was generated following the ecoinvent quality guidelines for version 2. It may have been subject to central changes described in the ecoinvent version 3 change report (http://www.ecoinvent.org/database/ecoinvent-version-3/reports-of-changes/), and the results of the central updates were reviewed extensively. The changes added e.g. consistent water flows and other information throughout the database. The documentation of this dataset can be found in the ecoinvent reports of version 2, which are still available via the ecoinvent website. The change report linked above covers all central changes that were made during the conversion process.]

## Included activities end
Materials, transports, disposal for the infrastructure. Estimation for land use. No data for construction work.

## Geography
Data provided by a CH company in Marin (NE).

## Technology
water storage

## Time period
Time of publication.

## Reference product
- water storage: 1 unit; CPC 53231: Aqueducts and other water supply conduits, except pipelines; By-product classification allocatable product
  EcoSpold01Location=CH
  production volume 0.0336675 unit
    This is a placeholder value that does not reflect real-world production volumes. This dataset does not currently require a real-world production volume to work in the database framework, and no actual data were collected yet. This has no negative effect on the results of the ecoinvent database. The placeholder value of this activity was scaled according to the nominal GDP of 2005 (source: United Nations, http://data.un.org/Glossary.aspx?q=GDP+%28current+US%24%29, accessed 20130726) to reflect an appropriate share of the global production volume, which is also a placeholder value.
  property price 5.17473e6 EUR2005
    From UN data http://data.un.org/Data.aspx?q=reservoir&d=ComTrade&f=_l1Code%3a74%3bcmdCode%3a730900 "Reservoirs/tanks/vats/etc, iron/steel capacity >300l" based on existing ecoinvent documentation from ecoinvent v.2.2. (From information in the dataset water storage.), the water storage has capacity of 2500 m3 which is > 300l. Total weight from material inputs: 1811 tonnes.

## Inputs from technosphere
All rows: lognormal variance with pedigree 0.0512, pedigree (2,3,5,1,1)
- reinforcing steel: 62691 kg
  EcoSpold01Location=RER
  Literature
  Uncertainty: Literature
  properties: carbon content, fossil 0.004, wet mass 1 kg, dry mass 1 kg
- lean concrete: 29.324 m3
  Literature
  EcoSpold01Location=CH
  Uncertainty: Literature
  properties: dry mass 2080 kg, water content 0.0528846, wet mass 2190 kg
- waste reinforced concrete: -1.6111e6 kg
  EcoSpold01Location=CH
  Estimation for materials used
  Uncertainty: Estimation for materials used
  production volume 1.6111e6 kg
    Calculated from the production volume of water storage in proportion to the respective output amounts.
  properties: wet mass 1 kg, dry mass 0.99418 kg, water content 0.00585407
- concrete, normal: 703 m3
  Literature
  EcoSpold01Location=CH
  Uncertainty: Literature
  properties: water content 0.086758, wet mass 2380 kg, dry mass 2190 kg
- steel, low-alloyed, hot rolled: 4542 kg
  EcoSpold01Location=RER
  Literature
  Uncertainty: Literature
  properties: carbon content, fossil 0.005, wet mass 1 kg, dry mass 1 kg
  note on carbon content, fossil: Low alloyed steel composition given in Tab. 3.2 ecoinvent v2.2 report 10_partII. Steel assumed to have a C content of 0.5%

## Inputs from nature
- Transformation, to industrial area [natural resource, land]: 2500 m2; lognormal variance with pedigree 0.238, pedigree (5,5,5,1,1)
  Rough estimation
  Uncertainty: Rough estimation
- Transformation, from unspecified [natural resource, land]: 2500 m2; lognormal variance with pedigree 0.238, pedigree (5,5,5,1,1)
  Rough estimation
  Uncertainty: Rough estimation
- Occupation, industrial area [natural resource, land]: 175000 m2*year; lognormal variance with pedigree 0.158, pedigree (5,5,5,1,1)
  Rough estimation for 70a life time
  Uncertainty: Rough estimation for 70a life time

## Sampling procedure
Literature and own estimations

## Extrapolations
This dataset has been extrapolated from year 1998 to the year of the calculation (2021). The uncertainty has been adjusted accordingly.

## Review by Manuele Margni (obsolete) 2005-07-19
Passed
