# engineered wood joist production

Dataset: EcoSpold 2, unit process
Geography: RoW
Time period: 2011-01-01 to 2021-12-31
Technology level: current
Classification: EcoSpold01Categories: wooden materials/processing
Classification: ISIC rev.4 ecoinvent: 1622:Manufacture of builders' carpentry and joinery
Synonyms: I-joist
Scenario: Business-as-Usual
System model: Allocation, cut-off by classification
Generated by: James Salazar
Published in: Athena Sustainable Materials Institute 2013
Database: ecoinvent
isCopyrightProtected: true
accessRestrictedTo: 1

## General comment
This dataset represents the production of engineered wood joist, also called an I-joist because of its shape (see figure). It is a small beam composed of an upper and a lower chord, either made out of jointed lumber (2"x3", 2"x3.5" or 2"x4" of dimension) or laminated veneer lumber (LVL, 2"x3" or 2"x4" of dimension), glued perpendicularly to a central web of oriented strand board (OSB, 0.375" thick x 9.875" high for lumber or 11.875" high for LVL). This dataset is a weighted average of the different chord types combined with the OSB web. for 1 m of joist. This dataset has been copied from an original dataset covering the Quebec (Canada) geography. The uncertainty has been adjusted accordingly.

## Included activities start
From reception of lumber, LVL, OSB and glue (polyurethane or phenol resorcinol formaldehyde resin) at the factory gate.

## Included activities end
This activity ends with the assembled I-joists ready for delivery.
The dataset includes the sizing of wood materials, assembling and drying. Combustion emissions of heat production from hog fuel are parameterised with ecoinvent 3 emission factors and included directly in this dataset instead of using a heat exchange in order to avoid double counting the wood chip and electricity inputs. The infrastructure and wood ash byproduct of heat production from hog fuel are also directly included in this dataset.
The dataset doesn't include emissions from drying resin.

## Geography
Data from 3 mills located in the province of Quebec, Canada.

## Parameters
- i-joist production volume in 2011 in m³: 4e6 m3; name joistProdVol2011m3; lognormal variance with pedigree 0.0026, pedigree (3,1,1,1,1)
  World production volume in 1999 of I-beams was approximately 2 million m³ (http://www.unece.org/fileadmin/DAM/timber/docs/rev-00/11.pdf). The 2011 value was extrapolated with the world GDP growth, which has approximately doubled between 1999 and 2011.

## Reference product
- joist, engineered wood: 1 m; name joist; CPC 31600: Builders' joinery and carpentry of wood (including cellular wood panels, assembled parquet panels, shingles an[…]; By-product classification allocatable product
  production volume 1.31319e8 m; name joist_apv; = joistProdVol2011m3 / joist_vol
    World production volume converted to length of I-joist.
  property oriented strand board content 0.279428; name joist_osbContent
    fraction of oven dry mass
  property dry mass 3.5167 kg; name joist_DM
  property water content 0.100313; = joist_WWM / joist_DM
  property carbon content, fossil 0.0614164; = joist_lumberContent * lumber_Ccontent_fossil + joist_lvlContent * lvl_Ccontent_fossil + joist_osbContent * osb_Ccontent_fossil + joist_prfContent * prf_Ccontent_fossil + joist_puContent * pu_Ccontent_fossil
    fossil carbon content on a dry matter basis
  property volume 0.0303249 m3; name joist_vol; = (joist_lumberContent / lumber_DM + joist_lvlContent / lvl_DM + joist_osbContent / osb_DM + joist_prfContent / prf_DM + joist_puContent / pu_DM) * joist_DM
    volume
  property phenol resorcinol formaldehyde resin content 0.0021613; name joist_prfContent
    Phenol Resorcinol Formaldehyde Resin
  property wet mass 3.86947 kg; = joist_DM + joist_WWM
  property polyurethane content 0.004666; name joist_puContent
    fraction of oven dry mass
  property carbon content, non-fossil 0.446342; = joist_lumberContent * lumber_Ccontent_nonfossil + joist_lvlContent * lvl_Ccontent_nonfossil + joist_osbContent * osb_Ccontent_nonfossil + joist_prfContent * prf_Ccontent_nonfossil + joist_puContent * pu_Ccontent_nonfossil
    biogene carbon content on a dry matter basis
  property laminated veneer lumber content 0.37441; name joist_lvlContent
    fraction of oven dry mass
  property lumber content 0.339333; name joist_lumberContent
    fraction of oven dry mass
  property price 2.72579 EUR2005; name joist_price_EUR2005
    Calculated based on inputs: The price of the product has been calculated as a sum of the values of the material and energy inputs for this product. This value is therefore a rough estimation. It may underestimate the real price since there are additional expenses when producing any product. These expences can include for example labour costs, treatment of waste materials and profit for the producer. Please consider carefully whether this level of data quality is acceptable for your application.
  property water in wet mass 0.352771 kg; name joist_WWM; = (joist_lumberContent * lumber_water_content + joist_lvlContent * lvl_water_content + joist_osbContent * osb_water_content + joist_prfContent * prf_water_content + joist_puContent * pu_water_content) * joist_DM
  property carbon content 0.507759
    carbon content on a dry matter basis (reserved; not for manual entry)
  properties: carbon allocation 1.78564 kg

## Inputs from technosphere
- wood ash mixture, pure: 0 kg; name woodAsh; pedigree (1,1,1,1,1)
  Calculated value. Calculation based on values from ecoinvent v3 heat production unit process "heat production, wood chips from industry, at furnace 1000kW" and wood fuel input (0.06915 kg of wood residues generated on site per meter of joist).
  production volume 0 kg
    Calculated from production volume of reference product using the relative outputs.
  property price 0 EUR2005; name woodAsh_price_EUR2005
  properties: wet mass 1 kg, carbon content, non-fossil 0.012, dry mass 1 kg
- sawnwood, softwood, raw, dried (u=10%): 0 m3; name lumber; pedigree (1,1,1,1,1)
  Sum of different lumber sizes.
  Uncertainty: No uncertainty added - uncertainty based on propagation of the uncertainty of the underlying parameters.
  property carbon content, fossil 0; name lumber_Ccontent_fossil
  property water in wet mass 64.2799 kg; name lumber_WWM
  property carbon content, non-fossil 0.494; name lumber_Ccontent_nonfossil
  property amount of exchange in kg 2 0.02023 kg; name lumber_amountKg2
  property amount of exchange in kg 1 1.1399 kg; name lumber_amountKg1
  property dry mass 428.533 kg; name lumber_DM
  property water content 0.15; name lumber_water_content
  property amount of exchange in kg 3 0.08984 kg; name lumber_amountKg3
  properties: wet mass 492.813 kg, heating value, net 7227.56 MJ
  note on heating value, net: Assumed equal to "sawnwood, softwood, dried (u=10%), planed".The property is based on a value of 13.38MJ/kg
- polyurethane, flexible foam: 0.01668 kg; name pu; lognormal variance with pedigree 0.0112, pedigree (1,3,4,5,1)
  Measured value from the data provider.
  property water in wet mass 0 kg; name pu_WWM
  property dry mass 1 kg; name pu_DM
  property carbon content, fossil 0.633827; name pu_Ccontent_fossil
  property water content 0; name pu_water_content
  property carbon content, non-fossil 0; name pu_Ccontent_nonfossil
  properties: heating value, net 30.67 MJ, wet mass 1 kg
- furnace, wood chips, softwood storage area, 1000kW: 7.27714e-9 unit; name furnaceWoodSoft1000; source Bauer, C. 2007; lognormal variance with pedigree 0.0112, pedigree (1,3,4,5,1)
  (same comment as for wood ash mixture, pure)
- heat, district or industrial, other than natural gas: 0.309738 MJ; name lfo; = lfo_lFuel_Input * lfo_density * lfo_Net_Heat_Value*42.7 / lfo_fuel_use; lognormal variance with pedigree 0.008, pedigree (1,1,4,1,1)
  Calculated based on reported fuel input (in l), the Net Heating Value of the fuel and efficiency (1/Fuel_use)
  Uncertainty: No uncertainty added - uncertainty based on propagation of the uncertainty of the underlying parameters.
  property Corresponding fuel use 1.05263 MJ; name lfo_fuel_use; = 1/0.95
  property fuel input in physical units, L 0.00909 l; name lfo_lFuel_Input
  property density 0.84 kg/l; name lfo_density
  property heating value, net 1 MJ; name lfo_Net_Heat_Value
  note on Corresponding fuel use: Lower heating value of the fuel input related to the heat/electricity output
- heat, district or industrial, natural gas: 0 MJ; name naturalGas_1; pedigree (1,1,1,1,1)
  Calculated based on reported fuel input (in m3), the Net Heating Value of the fuel and efficiency (1/Fuel_use)
  Uncertainty: No uncertainty added - uncertainty based on propagation of the uncertainty of the underlying parameters.
  property heating value, net 1 MJ; name naturalGas_Net_Heat_Value
  property fuel input in physical units m3 0.00909 m3; name naturalGas_m3Fuel_Input
  property Corresponding fuel use 1.05263 MJ; name naturalGas_fuel_use; = 1/0.95
- phenolic resin: 0.00772 kg; name prf; lognormal variance with pedigree 0.0112, pedigree (1,3,4,5,1)
  Proxy for phenol resorcinol formaldehyde resin. Phenolic resin can also be called phenol formaldehyde resin.
  property dry mass 1 kg; name prf_DM
  property carbon content, non-fossil 0; name prf_Ccontent_nonfossil
  property water content 0; name prf_water_content
  property water in wet mass 0 kg; name prf_WWM
  property carbon content, fossil 0.772277; name prf_Ccontent_fossil
  properties: wet mass 1 kg, heating value, net 33.57 MJ
- oriented strand board: 0 m3; name osb; pedigree (1,1,1,1,1)
  Measured value from the data provider. Mass provided in oven-dry kg (0% moisture).
  Uncertainty: No uncertainty added - uncertainty based on propagation of the uncertainty of the underlying parameters.
  property carbon content, fossil 0.0721522; name osb_Ccontent_fossil
  property water content 0.082; name osb_water_content
  property amount of exchange in kg 1 1.3792 kg; name osb_amountKg1
  property carbon content, non-fossil 0.448316; name osb_Ccontent_nonfossil
  property dry mass 540.665 kg; name osb_DM
  property water in wet mass 44.3346 kg; name osb_WWM
  properties: wet mass 585 kg, heating value, net 8417.59 MJ
- plywood: 0.0017459 m3; name lvl; = ( lvl_amountKg1 + lvl_amountKg2) / lvl_DM; lognormal variance with pedigree 0.008, pedigree (1,1,4,1,1)
  Proxy for laminated veneer lumber (LVL).
  Uncertainty: No uncertainty added - uncertainty based on propagation of the uncertainty of the underlying parameters.
  property amount of exchange in kg 1 1.16231 kg; name lvl_amountKg1
  property dry mass 768.6 kg; name lvl_DM
  property carbon content, fossil 0.09783; name lvl_Ccontent_fossil
  property carbon content, non-fossil 0.409818; name lvl_Ccontent_nonfossil
  property amount of exchange in kg 2 0.179582 kg; name lvl_amountKg2
  property water content 0.070778; name lvl_water_content
  properties: price 400 EUR2005, wet mass 823 kg, heating value, net 11688.9 MJ
- electricity, medium voltage: 0 kWh; pedigree (1,1,1,1,1)
  Measured value from the data provider.
- waste wood, untreated: 0 kg; name wasteWood; pedigree (1,1,1,1,1)
  Measured value from the data provider. Mass provided in oven-dry kg (0% moisture).
  Uncertainty: Calculated variable. Uncertainty will be determined from propagation of uncertainty factors of underlying variables.
  production volume 0 kg
    Calculated from production volume of reference product using the relative outputs.
  property price 0 EUR2005; name wasteWood_price_EUR2005
  property dry mass 0.8 kg; name wasteWood_DM
  property amount of exchange in kg 1 0.03677 kg; name wasteWood_amountKg1
  properties: heating value, net 13.99 MJ, carbon content, non-fossil 0.48632, water content 0.25, wet mass 1 kg
  note on heating value, net: Value taken from the general comment of the treatment dataset.
- propane, burned in building machine: 0.0450132 MJ; = propane_lFuel_Input * propane_density * propane_Net_Heat_Value*46.46; lognormal variance with pedigree 0.008, pedigree (1,1,4,1,1)
  Calculated based on reported fuel input (in kg), the Net Heating Value of the fuel and efficiency (1/Fuel_use)
  Uncertainty: No uncertainty added - uncertainty based on propagation of the uncertainty of the underlying parameters.
  property fuel input in physical units, L 0.00193 l; name propane_lFuel_Input
  property heating value, net 1 MJ; name propane_Net_Heat_Value
  property density 0.502 kg/l; name propane_density
- lubricating oil: 0.0005456 kg; name lubricants; = (lubricants_amountLiters1+ lubricants_amountLiters2)* lubricants_density; lognormal variance with pedigree 0.008, pedigree (1,1,4,1,1)
  (same comment as for propane, burned in building machine)
  property amount of exchange in liters 1 0.00031 l; name lubricants_amountLiters1
  property density 0.88 kg/l; name lubricants_density
  property amount of exchange in liters 2 0.00031 l; name lubricants_amountLiters2
  properties: wet mass 1 kg, carbon content, fossil 0.75, dry mass 1 kg, heating value, net 40.2 MJ
  note on carbon content, fossil: Lubricating oil is produced from diesel. C-content/dry mass of fats and oils considered 75%, from: ecoinvent v2.2 report, n 15a, pg 40
  note on heating value, net: Literature value, Source: IPCC 2006, 2006 IPCC Guidelines for National Greenhouse Gas Inventories, Prepared by the National Greenhouse Gas Inventories Programme, Eggleston H.S., Buendia L., Miwa K., Ngara T. and Tanabe K. (eds). Published: IGES, Japan
- wood ash mixture, pure: -1.24148e-5, -0.000603935 kg (2 entries); lognormal variance with pedigree 0.0112, pedigree (1,3,4,5,1)
  (same comment as for wood ash mixture, pure)
  production volume 80938.3 kg
- sawnwood, softwood, raw, dried (u=10%): 0.000857169, 0.00205969 m3 (2 entries); lognormal variance with pedigree 0.008, pedigree (1,1,4,1,1)
  (same comment as for sawnwood, softwood, raw, dried (u=10%))
  properties: wet mass 492.813 kg, carbon content, non-fossil 0.494, amount of exchange in kg 2 0.02023 kg, amount of exchange in kg 1 1.1399 kg, dry mass 428.533 kg, water content 0.15, amount of exchange in kg 3 0.08984 kg, heating value, net 7227.56 MJ
- heat, district or industrial, natural gas: 0.0908869, 0.245898 MJ (2 entries); lognormal variance with pedigree 0.008, pedigree (1,1,4,1,1)
  (same comment as for heat, district or industrial, natural gas)
  properties: heating value, net 1 MJ, fuel input in physical units m3 0.00909 m3, Corresponding fuel use 1.05263 MJ
- oriented strand board: 0.000968333, 0.0015826 m3 (2 entries); lognormal variance with pedigree 0.008, pedigree (1,1,4,1,1)
  (same comment as for oriented strand board)
  properties: carbon content, fossil 0.0721522, water content 0.082, amount of exchange in kg 1 1.3792 kg, carbon content, non-fossil 0.448316, dry mass 540.665 kg, wet mass 585 kg, heating value, net 8417.59 MJ
- electricity, medium voltage: 0.0077375, 0.00148372, 0.0340686, 0.0120949, 0.0249086, 0.362273, 0.114835, 0.0510626, 0.147496 kWh (9 entries); lognormal variance with pedigree 0.0112, pedigree (1,3,4,5,1)
  Measured value from the data provider.
- waste wood, untreated: -0.0143806, -0.00178557, -0.000130545, -0.00501513, -0.000757666, -0.00119781, -0.0226952 kg (7 entries); lognormal variance with pedigree 0.008, pedigree (1,1,4,1,1)
  (same comment as for waste wood, untreated)
  production volume 6.03575e6 kg
  properties: heating value, net 13.99 MJ, carbon content, non-fossil 0.48632, dry mass 0.8 kg, amount of exchange in kg 1 0.03677 kg, water content 0.25, wet mass 1 kg

## Emissions to nature
All rows: source Bauer, C. 2007
- Carbon monoxide, non-fossil [air, urban air close to ground]: 5.30886e-5 kg; name CONonFossil; lognormal variance with pedigree 0.6606, pedigree (1,3,4,5,1)
  (same comment as for wood ash mixture, pure)
- Lead [air, urban air close to ground]: 3.23715e-8 kg; name lead; lognormal variance with pedigree 0.6606, pedigree (1,3,4,5,1)
  (same comment as for wood ash mixture, pure)
- m-Xylene [air, urban air close to ground]: 1.55386e-7 kg; name m_xylene; lognormal variance with pedigree 0.0506, pedigree (1,3,4,5,1)
  (same comment as for wood ash mixture, pure)
- Benzo(a)pyrene [air, urban air close to ground]: 6.47431e-10 kg; name benzopyrene; lognormal variance with pedigree 0.0506, pedigree (1,3,4,5,1)
  (same comment as for wood ash mixture, pure)
- Benzene, hexachloro- [air, urban air close to ground]: 9.32294e-15 kg; name hexachloroBenzene; lognormal variance with pedigree 0.0506, pedigree (1,3,4,5,1)
  (same comment as for wood ash mixture, pure)
- PAH, polycyclic aromatic hydrocarbons [air, urban air close to ground]: 1.4373e-8 kg; name PAH; lognormal variance with pedigree 0.3106, pedigree (1,3,4,5,1)
  (same comment as for wood ash mixture, pure)
- Carbon dioxide, non-fossil [air, urban air close to ground]: 0.125207 kg; name CO2NonFossil; lognormal variance with pedigree 0.0112, pedigree (1,3,4,5,1)
  (same comment as for wood ash mixture, pure)
- Dioxins, measured as 2,3,7,8-tetrachlorodibenzo-p-dioxin [air, urban air close to ground]: 4.01409e-14 kg; name dioxins; lognormal variance with pedigree 0.0506, pedigree (1,3,4,5,1)
  (same comment as for wood ash mixture, pure)
- Toluene [air, urban air close to ground]: 3.88454e-7 kg; name toluene; lognormal variance with pedigree 0.0506, pedigree (1,3,4,5,1)
  (same comment as for wood ash mixture, pure)
- Manganese [air, urban air close to ground]: 2.20125e-7 kg; name manganese; lognormal variance with pedigree 0.0506, pedigree (1,3,4,5,1)
  (same comment as for wood ash mixture, pure)
- Potassium [air, urban air close to ground]: 3.02991e-5 kg; name potassium; lognormal variance with pedigree 0.0506, pedigree (1,3,4,5,1)
  (same comment as for wood ash mixture, pure)
- Nitrogen oxides [air, urban air close to ground]: 0.000125603 kg; name NOX; lognormal variance with pedigree 0.0506, pedigree (1,3,4,5,1)
  (same comment as for wood ash mixture, pure)
- NMVOC, non-methane volatile organic compounds, unspecified origin [air, urban air close to ground]: 7.76907e-7 kg; name NMVOC; lognormal variance with pedigree 0.0506, pedigree (1,3,4,5,1)
  (same comment as for wood ash mixture, pure)
- Chlorine [air, urban air close to ground]: 2.33068e-7 kg; name chlorine; lognormal variance with pedigree 0.0506, pedigree (1,3,4,5,1)
  (same comment as for wood ash mixture, pure)
- Particulates, < 2.5 um [air, urban air close to ground]: 7.89862e-5 kg; name part25; lognormal variance with pedigree 0.3106, pedigree (1,3,4,5,1)
  (same comment as for wood ash mixture, pure)
- Chromium VI [air, urban air close to ground]: 5.17942e-11 kg; name chromiumVI; lognormal variance with pedigree 0.6606, pedigree (1,3,4,5,1)
  (same comment as for wood ash mixture, pure)
- Nickel [air, urban air close to ground]: 7.76907e-9 kg; name nickel; lognormal variance with pedigree 0.6606, pedigree (1,3,4,5,1)
  (same comment as for wood ash mixture, pure)
- Sodium [air, urban air close to ground]: 1.68329e-6 kg; name sodium; lognormal variance with pedigree 0.0506, pedigree (1,3,4,5,1)
  (same comment as for wood ash mixture, pure)
- Dinitrogen monoxide [air, urban air close to ground]: 2.97818e-6 kg; name N2O; lognormal variance with pedigree 0.0506, pedigree (1,3,4,5,1)
  (same comment as for wood ash mixture, pure)
- Arsenic [air, urban air close to ground]: 1.29488e-9 kg; name arsenic; lognormal variance with pedigree 0.0506, pedigree (1,3,4,5,1)
  (same comment as for wood ash mixture, pure)
- Cadmium [air, urban air close to ground]: 9.06397e-10 kg; name cadmium; lognormal variance with pedigree 0.6606, pedigree (1,3,4,5,1)
  (same comment as for wood ash mixture, pure)
- Benzene [air, urban air close to ground]: 1.17833e-6 kg; name benzene; lognormal variance with pedigree 0.0506, pedigree (1,3,4,5,1)
  (same comment as for wood ash mixture, pure)
- Magnesium [air, urban air close to ground]: 4.66147e-7 kg; name magnesium; lognormal variance with pedigree 0.0506, pedigree (1,3,4,5,1)
  (same comment as for wood ash mixture, pure)
- Ammonia [air, urban air close to ground]: 2.2401e-6 kg; name ammonia; lognormal variance with pedigree 0.0506, pedigree (1,3,4,5,1)
  (same comment as for wood ash mixture, pure)
- Hydrocarbons, aliphatic, alkanes, unspecified [air, urban air close to ground]: 1.17833e-6 kg; name hydrocarbAliphAlk; lognormal variance with pedigree 0.0506, pedigree (1,3,4,5,1)
  (same comment as for wood ash mixture, pure)
- Zinc [air, urban air close to ground]: 3.88454e-7 kg; name zinc; lognormal variance with pedigree 0.6606, pedigree (1,3,4,5,1)
  (same comment as for wood ash mixture, pure)
- Mercury [air, urban air close to ground]: 3.88454e-10 kg; name mercury; lognormal variance with pedigree 0.6606, pedigree (1,3,4,5,1)
  (same comment as for wood ash mixture, pure)
- Chromium [air, urban air close to ground]: 5.12759e-9 kg; name chromium; lognormal variance with pedigree 0.6606, pedigree (1,3,4,5,1)
  (same comment as for wood ash mixture, pure)
- Fluorine [air, urban air close to ground]: 6.47431e-8 kg; name fluorine; lognormal variance with pedigree 0.0506, pedigree (1,3,4,5,1)
  (same comment as for wood ash mixture, pure)
- Acetaldehyde [air, urban air close to ground]: 7.89866e-8 kg; name acetaldehyde; lognormal variance with pedigree 0.0506, pedigree (1,3,4,5,1)
  (same comment as for wood ash mixture, pure)
- Calcium [air, urban air close to ground]: 7.57497e-6 kg; name calcium; lognormal variance with pedigree 0.0506, pedigree (1,3,4,5,1)
  (same comment as for wood ash mixture, pure)
- Benzene, ethyl- [air, urban air close to ground]: 3.88454e-8 kg; name ethylBenzene; lognormal variance with pedigree 0.0506, pedigree (1,3,4,5,1)
  (same comment as for wood ash mixture, pure)
- Phosphorus [air, urban air close to ground]: 3.88454e-7 kg; name phosphorus; lognormal variance with pedigree 0.0506, pedigree (1,3,4,5,1)
  (same comment as for wood ash mixture, pure)
- Hydrocarbons, aliphatic, unsaturated [air, urban air close to ground]: 4.01409e-6 kg; name hydrocarbAliphUnsat; lognormal variance with pedigree 0.0506, pedigree (1,3,4,5,1)
  (same comment as for wood ash mixture, pure)
- Methane, non-fossil [air, urban air close to ground]: 5.17942e-7 kg; name CH4NonFossil; lognormal variance with pedigree 0.0506, pedigree (1,3,4,5,1)
  (same comment as for wood ash mixture, pure)
- Sulfur dioxide [air, urban air close to ground]: 3.23715e-6 kg; name SO2; lognormal variance with pedigree 0.0112, pedigree (1,3,4,5,1)
  (same comment as for wood ash mixture, pure)
- Copper [air, urban air close to ground]: 2.84863e-8 kg; name copper; lognormal variance with pedigree 0.6606, pedigree (1,3,4,5,1)
  (same comment as for wood ash mixture, pure)
- Phenol, pentachloro- [air, urban air close to ground]: 1.04883e-11 kg; name pentachloroPhenol; lognormal variance with pedigree 0.0506, pedigree (1,3,4,5,1)
  (same comment as for wood ash mixture, pure)
- Bromine [air, urban air close to ground]: 7.76907e-8 kg; name bromine; lognormal variance with pedigree 0.0506, pedigree (1,3,4,5,1)
  (same comment as for wood ash mixture, pure)
- Formaldehyde [air, urban air close to ground]: 1.68329e-7 kg; name formaldehyde; lognormal variance with pedigree 0.0506, pedigree (1,3,4,5,1)
  (same comment as for wood ash mixture, pure)

## Sampling procedure
Primary data collected from 3 Quebec mills.

## Extrapolations
Regional data extrapolated to the world. Uncertainty was adjusted accordingly.
