# iron(III) chloride production, without water, in 12% iron solution state

Dataset: EcoSpold 2, unit process
Geography: RoW
Time period: 2013-01-01 to 2021-12-31
Technology level: current
Classification: EcoSpold01Categories: chemicals/inorganics
Classification: ISIC rev.4 ecoinvent: 2011:Manufacture of basic chemicals
Synonyms: ferric chloride
Scenario: Business-as-Usual
System model: Allocation, cut-off by classification
Generated by: Jean-Francois Menard
Database: ecoinvent
isCopyrightProtected: true
accessRestrictedTo: 1

## General comment
This dataset represents the production of iron(III) chloride. The functional unit represent 1 kg of iron(III) chloride (FeCl3). The final product is however sold in a 12% iron solution state, which corresponds to 34.85% (FeCl3) or 58.08% solid iron(III) chloride (if the hydrated iron(III) chloride form is assumed to be FeCl3.6H2O).
The data providing manufacturing company makes two grades of product solution, 12% iron and 14% iron. The energy and material inputs per kg of iron(III) chloride differ between the two grades sufficiently to consider them as different products and justify the creation of two distinct datasets.
This dataset has been copied from an original dataset covering the geography Québec. The uncertainty has been adjusted accordingly.

## Included activities start
This activity starts with the raw material delivery at the manufacturing plant gate.

## Included activities end
This activity ends with the Iron(III) chloride solution at the manufacturing plant gate.
The dataset includes the raw materials and energy consumption for production, estimation of the infrastructure (approximation).
The process starts by pumping iron(II) chloride (spent pickling acids from the iron and steel manufacturing industry) in a reactor to react with pure liquid chlorine (Fe2+ converted into Fe3+). The solution in then transfered to a digester to react with steel scrap to increase the Fe concentration (Fe3+ ions convert back into Fe2+). The solution if then filtered to remove particles which would block the following heat exchanger, the resulting sludge is used internally as coagulant. After cooling, pure liquid chlorine is again added to convert Fe2+ back into Fe3+. After a final cooling stage, the iron(III) chloride solution is sent to storage tanks.

## Parameters
- Quebec gross domestic product 2011: 3.11e11 USD(2011); name quebecGDP2011; lognormal variance with pedigree 0.0006, pedigree (1,1,1,1,1)
  World Gross domestic product for 2011, expressed in 2011 USD. Source: World Bank
- quebec production volume: 5.344e6 kg; name PV_Quebec; lognormal variance with pedigree 0.0106, pedigree (4,4,1,1,1)
  Value taken from the ecoinvent v3.0 dataset "iron(III) chloride production, without water, 12% iron solution state, Québec 2013".
- world gross domestic product 2011: 7e13 USD(2011); name worldGDP2011; lognormal variance with pedigree 0.0006, pedigree (1,1,1,1,1)
  Quebec Gross domestic product for 2011, expressed in 2011 USD. Source: Institut de la statistique du Québec. Converted from CAD to USD using a yearly average exchange rate of 0.989 CAD/USD (Source: bank of Canada)

## Reference product
- iron(III) chloride, without water, in a 12% iron solution state: 1 kg; name RP1; By-product classification allocatable product; CPC 34240: Phosphates of triammonium; salts and peroxysalts of inorganic acids and metals n.e.c.; CAS 7705-08-0
  production volume 1.19749e9 kg; name PV_RP1; = PV_Quebec*worldGDP2011/quebecGDP2011
    Gross approximation of world production volume using relative value of world GDP to Québec GDP.
  property price 0.471 EUR2005
    From UN trade database. http://data.un.org/ Calculated as average price for all chemicals in the category 'Trade of goods , US$, HS 1992, 28 Inorganic chemicals, precious metal compound, isotope'. Import data from the largest economies of the world are used (Brazil, India, USA, China, Japan and EU-27).
  property carbon content 0
    carbon content on a dry matter basis (reserved; not for manual entry)
  properties: water content 0, carbon content, non-fossil 0, carbon content, fossil 0, dry mass 1 kg, wet mass 1 kg, water in wet mass 0 kg, carbon allocation 0 kg

## Inputs from technosphere
- iron(II) chloride: 0.741544 kg; lognormal variance with pedigree 0.0106, pedigree (1,4,4,1,1)
  Measured value. Reported as spent pickling acid solution obtained from the steel industry. The amount of iron(II) chloride, or FeCl2, was adjusted for the average iron concentration of the spent pickling acid solution used (11 to 14% iron or 25 to 32% FeCl2) given by data reporting manufacturing company.
  properties: dry mass 1 kg, wet mass 1 kg
- iron scrap, unsorted: 0.0143454 kg; lognormal variance with pedigree 0.0106, pedigree (1,4,4,1,1)
  Measured value. Reported as post-industry scrap.
  properties: dry mass 1 kg, wet mass 1 kg
- chlorine, liquid: 0.238133 kg; lognormal variance with pedigree 0.0106, pedigree (1,4,4,1,1)
  Measured value.
  properties: dry mass 1 kg, wet mass 1 kg
- electricity, medium voltage: 0 kWh; pedigree (1,1,1,1,1)
  Measured and calculated value. Represents the electricity used for the production process itself (agitator and pumps) and the electricity used for the heating of the exterior piping system during winter, building air conditioning during summer (exothermic reaction) and lighting.
  EcoSpold01Location=UCTE
- heat, district or industrial, natural gas: 0 MJ; pedigree (1,1,1,1,1)
  Reported as for building heating only. Calculated value (see Exchange Properties).
  Uncertainty: Calculated variable. Uncertainty will be determined from propagation of uncertainty factors of underlying variables. Uncertainty of actual relation between variables not accounted at this time, although this could be included in a future update.
  property fuel input in physical units, m3 0.000975485 m3; name NaturalGas
  property heating value, net 1 MJ; name NaturalGasNetHeatingValue
  property Corresponding fuel use 1.0417 MJ; name NaturalGasFuelUse
  note on fuel input in physical units, m3: Estimated value. Represents the natural gas used for the building heating.
  note on heating value, net: net (lower) heating (calorific) value. Value taken from Table 5.1 of report "Overview and methodology, Data quality guidelines for the ecoinvent database version 3" (ecoinvent report No. 1 (v3), 2011).
  note on Corresponding fuel use: Lower heating value of the fuel input related to the heat/electricity output. Assume a 96% energy efficiency based on Section 5.3.6 of report "Life cycle Inventories of Energy Systems, Results for Current Systems in Switzerland and other UCTE Countries" (ecoinvent report No. 5, 2007)
- tap water: 0 kg; name TapWater; pedigree (1,1,1,1,1)
  Measured value. Represents the extra amount of water (0.00017323 kg) added to the reaction tank to compensate for the evaporation losses during the mixing and reaction, and the make-up water (0.17214434 kg) for the cooling system (exothermic reaction).
  properties: water content 2962.17, carbon content, fossil 0.00178991, wet mass 1 kg, dry mass 0.000337476 kg
  note on carbon content, fossil: Bicarbonate content is 2.93 mol/m3. CO2 content is 0.1 mol/m3 (ecoinvent v2.2 report 8, Tab 93.1).
- chemical factory, organics: 4e-10 unit; lognormal variance with pedigree 0.48, pedigree (5,5,5,5,5)
  Default value using the generic chemical factory dataset created within the ecoinvent project, based on a 50'000 t annual production and a 50 year lifetime.
  Uncertainty: The uncertainty could not be determined, it has then been maximized.
- electricity, medium voltage: 0.000295399, 5.66448e-5, 0.00130065, 0.000461753, 0.000950949, 0.0138307, 0.00438412, 0.00194944, 0.00563104 kWh (9 entries); lognormal variance with pedigree 0.0112, pedigree (2,4,4,1,1)
  (same comment as for electricity, medium voltage)
- heat, district or industrial, natural gas: 0.00917348, 0.0248191 MJ (2 entries); lognormal variance with pedigree 0.008, pedigree (1,1,4,1,1)
  (same comment as for heat, district or industrial, natural gas)
  properties: fuel input in physical units, m3 0.000975485 m3, heating value, net 1 MJ, Corresponding fuel use 1.0417 MJ
- tap water: 0.00161063, 0.000320412, 0.00807953, 0.000210187, 0.000597873, 0.0690408, 0.0924582 kg (7 entries); lognormal variance with pedigree 0.0106, pedigree (1,4,4,1,1)
  (same comment as for tap water)

## Emissions to nature
- Water [air, non-urban air or from high stacks]: 0.000172318 m3; = TapWater/1000; lognormal variance with pedigree 0.008, pedigree (1,1,4,1,1)
  Calculated value. Based on amount of water input, all water is assumed to be evaporated.
  Uncertainty: Calculated variable. Uncertainty will be determined from propagation of uncertainty factors of underlying variables. Uncertainty of actual relation between variables not accounted at this time, although this could be included in a future update.

## Sampling procedure
Data based on questionnaire from one manufacturing company, except for the infrastructure which is based on standard assumptions on plant lifetime and annual production volume.
