# lignite briquettes factory construction

Dataset: EcoSpold 2, unit process
Geography: RER
Time period: 1990-01-01 to 2021-12-31
Technology level: current
Classification: EcoSpold01Categories: lignite/production
Classification: ISIC rev.4 ecoinvent: 4290:Construction of other civil engineering projects
Tags: ConvertedDataset
Scenario: Business-as-Usual
System model: Allocation, cut-off by classification
Generated by: Christian Bauer
Published in: Röder, A. 2007
Database: ecoinvent
isCopyrightProtected: true
accessRestrictedTo: 1

## General comment
The material and energy input has been roughly estimated, assuming 5 % of the coke plant masses.
[This dataset was already contained in the ecoinvent database version 2. It was not individually updated during the transfer to ecoinvent version 3. Life Cycle Impact Assessment results may still have changed, as they are affected by changes in the supply chain, i.e. in other datasets. This dataset was generated following the ecoinvent quality guidelines for version 2. It may have been subject to central changes described in the ecoinvent version 3 change report (http://www.ecoinvent.org/database/ecoinvent-version-3/reports-of-changes/), and the results of the central updates were reviewed extensively. The changes added e.g. consistent water flows and other information throughout the database. The documentation of this dataset can be found in the ecoinvent reports of version 2, which are still available via the ecoinvent website. The change report linked above covers all central changes that were made during the conversion process.]

## Included activities end
Includes the most important construction materials for the plant and their disposal. Also included is the landuse of the plant and the energy needed for the construction.

## Geography
Not specified.

## Technology
No specific information available.

## Reference product
- lignite briquettes factory: 1 unit; CPC 53269: Other constructions for manufacturing; By-product classification allocatable product
  EcoSpold01Location=RER
  production volume 1.32237 unit
    This is a placeholder value that does not reflect real-world production volumes. This dataset does not currently require a real-world production volume to work in the database framework, and no actual data were collected yet. This has no negative effect on the results of the ecoinvent database. The placeholder value of this activity was scaled according to the nominal GDP of 2005 (source: United Nations, http://data.un.org/Glossary.aspx?q=GDP+%28current+US%24%29, accessed 20130726) to reflect an appropriate share of the global production volume, which is also a placeholder value.
  property price 7.20494e6 EUR2005
    Calculated based on inputs: The price of the product has been calculated as a sum of the values of the material and energy inputs for this product. This value is therefore a rough estimation. It may underestimate the real price since there are additional expenses when producing any product. These expences can include for example labour costs, treatment of waste materials and profit for the producer. Please consider carefully whether this level of data quality is acceptable for your application.

## Inputs from technosphere
- reinforcing steel: 6.75e6 kg; lognormal variance with pedigree 0.34, pedigree (1,1,5,1,1)
  EcoSpold01Location=RER
  own assumption
  properties: carbon content, fossil 0.004, wet mass 1 kg, dry mass 1 kg
- stone wool: 375000 kg; lognormal variance with pedigree 0.34, pedigree (1,1,5,1,1)
  own assumption
  EcoSpold01Location=CH
  properties: carbon content, fossil 0.015401, wet mass 1 kg, dry mass 1 kg
  note on carbon content, fossil: The chemical composition of the glass fibres used in the rock wool production is similar to the composition of naturally cooled volcano basalt and has a composition listed in Tab. 3.1 and 3.2 in ecoinvent v2.2 report 16, part XIV. Rock wool contains: a minimum of 96% mineral fibres,between 0.5 and 3.0 weight percent of phenolic resin depending on the specific product characteristics, and about 0.2 percent mineral oil (ecoinvent v2.2 report 16, part XIV). An average composition of 1.8% phenolic resin, 0.2% mineral oil, and 98% mineral fibres has been assumed and used to calculate C content of the rock wool
- waste reinforced concrete: 0 kg; pedigree (1,1,1,1,1)
  own assumption
  EcoSpold01Location=CH
  production volume 0 kg
    Calculated from the production volume of lignite briquettes factory in proportion to the respective output amounts.
  properties: water content 0.00585407, wet mass 1 kg, dry mass 0.99418 kg
- heat, district or industrial, other than natural gas: 3.75e7 MJ; lognormal variance with pedigree 0.34, pedigree (1,1,5,1,1)
  own assumption
  EcoSpold01Location=RER
  properties: heating value, net 1 MJ
- electricity, medium voltage: 2.6e6 kWh; lognormal variance with pedigree 0.34, pedigree (1,1,5,1,1)
  own assumption
  EcoSpold01Location=UCTE
- waste mineral wool: 0 kg; pedigree (1,1,1,1,1)
  EcoSpold01Location=CH
  own assumption
  production volume 0 kg
    (same comment as for waste reinforced concrete)
  properties: wet mass 1 kg, dry mass 1 kg
- steel, low-alloyed, hot rolled: 675000 kg; lognormal variance with pedigree 0.34, pedigree (1,1,5,1,1)
  own assumption
  EcoSpold01Location=RER
  properties: dry mass 1 kg, wet mass 1 kg, carbon content, fossil 0.005
  note on carbon content, fossil: Low alloyed steel composition given in Tab. 3.2 ecoinvent v2.2 report 10_partII. Steel assumed to have a C content of 0.5%
- concrete, normal: 8700 m3; lognormal variance with pedigree 0.34, pedigree (1,1,5,1,1)
  EcoSpold01Location=CH
  own assumption
  properties: dry mass 2190 kg, wet mass 2380 kg, water content 0.086758
- polyethylene, high density, granulate: 75000 kg; lognormal variance with pedigree 0.34, pedigree (1,1,5,1,1)
  own assumption
  EcoSpold01Location=RER
  properties: dry mass 1 kg, wet mass 1 kg, heating value, net 42.47 MJ, carbon content, fossil 0.857143
  note on carbon content, fossil: Polyethylene is formed out of a huge amount of ethylene monomers (C2H4) (ecoinvent v2.2 report 11_II). MW=28 g/mol
- waste polyethylene/polypropylene product: 0 kg; pedigree (1,1,1,1,1)
  own assumption
  EcoSpold01Location=CH
  production volume 0 kg
    (same comment as for waste reinforced concrete)
  properties: heating value, net 42.47 MJ, water content 0.180638, carbon content, fossil 0.748045, dry mass 0.847 kg, wet mass 1 kg
  note on carbon content, fossil: Mixed various plastics was used to estimate the C content of this waste (Tab A.2, ecoinvent v2.2 report 13_I)
- steel, chromium steel 18/8, hot rolled: 67500 kg; lognormal variance with pedigree 0.34, pedigree (1,1,5,1,1)
  EcoSpold01Location=RER
  own assumption
  properties: carbon content, fossil 0.0008, dry mass 1 kg, wet mass 1 kg
  note on carbon content, fossil: Stainless steel model is the grade 304 steel (18/8 stainless, 18% chromium 8% nickel; max. 0.08% C)
- diesel, burned in building machine: 3.75e7 MJ; lognormal variance with pedigree 0.34, pedigree (1,1,5,1,1)
  EcoSpold01Location=GLO
  own assumption
  properties: heating value, net 1 MJ
- waste reinforced concrete: -1.97903e7, -209693 kg (2 entries); lognormal variance with pedigree 0.34, pedigree (1,1,5,1,1)
  own assumption
  EcoSpold01Location=CH
  production volume 2e7 kg
- waste mineral wool: -370769, -4230.76 kg (2 entries); lognormal variance with pedigree 0.34, pedigree (1,1,5,1,1)
  EcoSpold01Location=CH
  own assumption
  production volume 375000 kg
- waste polyethylene/polypropylene product: -72815, -2184.99 kg (2 entries); lognormal variance with pedigree 0.34, pedigree (1,1,5,1,1)
  own assumption
  EcoSpold01Location=CH
  production volume 75000 kg

## Inputs from nature
- Transformation, to industrial area [natural resource, land]: 10000 m2; lognormal variance with pedigree 0.34, pedigree (1,1,5,1,1)
  own assumption
- Occupation, industrial area [natural resource, land]: 300000 m2*year; lognormal variance with pedigree 0.34, pedigree (1,1,5,1,1)
  own assumption
- Transformation, from unspecified [natural resource, land]: 10000 m2; lognormal variance with pedigree 0.34, pedigree (1,1,5,1,1)
  own assumption

## Sampling procedure
literature

## Extrapolations
This dataset has been extrapolated from year 2000 to the year of the calculation (2021). The uncertainty has been adjusted accordingly.

## Review by Hans-Jörg Althaus 2003-07-04
passed
