# sugarcane production

Dataset: EcoSpold 2, unit process
Geography: BR-MG
Time period: 2012-01-01 to 2021-12-31
Technology level: current
Classification: ISIC rev.4 ecoinvent: 0114:Growing of sugar cane
Synonyms: cane; sugar cane
Scenario: Business-as-Usual
System model: Allocation, cut-off by classification
Share of production covered: 100 %
Generated by: Marília I. S. Folegatti Matsuura
Published in: Folegatti-Matsuura M. 2018
Database: ecoinvent
isCopyrightProtected: true
accessRestrictedTo: 1

## General comment
This dataset represents the production of 1 kg of sugarcane (fresh matter). It is comprised of 94% sugarcane stalks, 5% vegetal (straw) and 1% mineral (dirt) impurities.
This activity represents the weighted average sugarcane production areas: 1 harvesting of plant cane plus 4 harvests of ratoon cane (with declining yields from year to year). Therefore, yield, inputs and emissions in this dataset are related to the weighted averages of these sugarcane production phases.
The yield is 71.53 t/ha at a moisture content at storage of 74.5%.
The total amount of mineral fertilisers (N-P-K) and pesticides applied (active ingredients) are 70.9 kg N/ha; 22.5 kg P2O5/ha; 70.4 kg K2O/ha and 0.91 kg/ha, respectively.
[This dataset is meant to replace the following datasets:
- sugarcane production, BR, 1996 - 2006]
[This dataset is meant to replace the following datasets:
- sugarcane production, BR, 1996 - 2006]
[This dataset is meant to replace the following datasets:
- sugarcane production, BR, 1996 - 2006]
[This dataset is meant to replace the following datasets:
- sugarcane production, BR, 1996 - 2006]

## Included activities start
This activity starts after the harvesting and transportation of the previous crop.

## Included activities end
The dataset includes the inputs of mineral fertilisers, industrial residues as fertilisers and pesticides. The amount of sugarcane used as seedlings in the planting operation is considered by reducing sugarcane yield; therefore there is no input of seedlings in the dataset.
The dataset also includes all machine operations. Infrastructure for machinery shelter and maintenance is included in the dataset of those operations. Some agricultural operations are done either manually or mechanically, values in the inventory represent national averages.
Further, direct field emissions are included, with important regionalizations added.
The dataset also includes the transportation of products inside the farm: fertilisers, lime and gypsum from sheds to field.The dataset doesn't include the transport of sugarcane to the industry. Sugarcane straw recovery and transportation are considered in separeted datasets. Seedling treatment and biologic control of pests are also not considered.
The activity ends when sugarcane is loaded at the truck at the farm gate.

## Geography
The inventory is modelled for the state of Minas Gerais, Brazil.

## Technology
Cultivation of sugarcane with 94% mechanical harvest and 72% mechanized planting.The percentage of total area are: 18% plant cane (i.e. fist year cane); 70% for ratoon cane (second to fifth year cane) and 12% for reforming (fallow period).

## Time period
Time period of the most of the data collected for this dataset.

## Parameters
- LUC_crop_specific: 1 dimensionless
  This parameter allows to switch between a "crop specific" and a "country specific" approach when calculating the LUC of a crop. By default, the chosen approach is "crop specific", so the value of the parameter is 1. If you want to apply a "country specific" approach, turn the parameter to 0.
- land transformation to: 0.139806 m2/kg; name T_t; = UnitConversion(1, 'ha', 'm2')/(yield_agriculture*UnitConversion(1, 'metric ton', 'kg'))
  Amount for typical system based in Cavalett et al. (2016) and IDEA (2014).
- annual yield, agriculture: 71.5275 metric ton/(ha*year); name yield_agriculture
  Amount for typical system based in Cavalett et al. (2016) and IDEA (2014).
- precipitation, annual: 1016.8 mm/year; name precipitation
  This value represents the average annual precipitation in Ribeirão Preto-SP. Used in the SQCB-NO3 model for the calculation of leaching of NO3. From IDEA (2014).
- nitrogen uptake by plant: 79.3955 kg N/ha; name Nuptake_plant; = 1.11* yield_agriculture
  This value represents the N taken by plant during its growth (kg N/ha). Used in the SQCB-NO3 model for the calculation of leaching of NO3. From Demattê (2004).
- nitrogen in crop residues: 84.545 kg N/ha; name Ncrop_residues; = 5.14*8.41 + (4.77* straw*(1- fraction_straw_burned)* yield_agriculture)
  This value represents the nitrogen contained in the crop residues (root and straw) (kg N/ha). Used for the calculation of emissions of N2O to the air. Amount of crop residues and amount of N were based on CTBE (2012).
- fraction: 0.135 dimensionless; name fraction_straw_burned
  This value represents the percentage of straw burned in pre-harvesting. Based in Cavalett et al. (2016) and IDEA (2014).
- clay content into soil: 40.7 % (obsolete); name Clay_content
  This value represents the fraction of clay content into soil (%). Used in the SQCB-NO3 model for the calculation of leaching of NO3. From Folegatti et al. (2015).
- total nitrogen: 132.556 kg/ha; name N_total; = (N_fert*0.46646163273393926+0.375*1E-03*vinasse+0.014*cake)*yield_agriculture*1000
  This value represents the total nitrogen in mineral and recycling fertilisers - vinasse and filter cake. Based in Cavalett et al. (2016) and IDEA (2014).
- soil eroded: 770 kg/ha.yr; name soil_eroded
  This value represents the quantity of soil eroded (kg/(ha*yr)). Used for the calculation of P emissions through water erosion to surface water. From Martins Filho (2009).
- organic nitrogen into soil: 5962.36 kg N/ha; name Norg_soil
  Norg is the mass of organic nitrogen contained in the upper 50 cm of soil per ha (kg N/ha). Used in the SQCB-NO3 model for the calculation of leaching of NO3. From Folegatti et al. (2015).
- rooting depth: 0.6 m; name root_depth
  This value represents the rooting depth of the crop (m). From Macedo (2005).
- sugarcane straw: 0.14 kg/kg; name straw
  This value represents the amount of straw produced by 1 kg of sugarcane. Each tonne of sugarcane stalks produces also about 140 kg of straw (dry basis) as leaves and tops. From Macedo (2005).

## Reference product
- sugarcane: 1 kg; name REF_PRODUCT; CPC 01802: Sugar cane; By-product classification allocatable product
  1Kg of sugarcane used as reference.
  production volume 6.90178e10 kg
    Production Volume of sugarcane in the state of Minas Gerais in Brazil, 2015 harvest, according to the Municipal Agricultural Production Data of the Brazilian Institute of Geography and Statistics (SIDRA - IBGE). See more in: http://www.sidra.ibge.gov.br/.
  property price 0.0281 EUR2005; name REF_PRODUCT_price_EUR2005
    Average 2005 prices for main producers of sugarcane, namely Brasil, India, China, Thailand, Pakistan and Mexico. from Import/Export data (US$ and tonnes) in FAO Producer prices Statistics Database; Comodity: sugar cane (Producer Prices)
  property wet mass 1 kg; name REF_PRODUCT_WM
  property water content 2.92157; = REF_PRODUCT_WWM/( REF_PRODUCT_WM- REF_PRODUCT_WWM)
  property carbon content, non-fossil 0.533566; name REF_PRODUCT_C_content
  property water in wet mass 0.745 kg; name REF_PRODUCT_WWM
  property dry mass 0.255 kg; name REF_PRODUCT_DM; = REF_PRODUCT_WM- REF_PRODUCT_WWM
  property carbon content 0.533566
    carbon content on a dry matter basis (reserved; not for manual entry)
  properties: carbon content, fossil 0, carbon allocation 0.136059 kg

## Inputs from technosphere
- fertilising, by rig fertiliser, sugarcane: 9.8481e-6 ha; source Folegatti Matsuura, M. 2017; lognormal variance with pedigree 0.0033, pedigree (2,2,3,1,1)
  Agricultural operation. Amount for typical system based in Cavalett et al. (2016) and IDEA (2014).
- inorganic phosphorus fertiliser, as P2O5: 0.00028675 kg; source Folegatti Matsuura, M. 2017; lognormal variance with pedigree 0.0033, pedigree (2,2,3,1,1)
  Amount for typical system based in Cavalett et al. (2016) and IDEA (2014).
  properties: wet mass 1 kg, dry mass 1 kg
- lime: 0.001641 kg; source Folegatti Matsuura, M. 2017; lognormal variance with pedigree 0.0033, pedigree (2,2,3,1,1)
  Amount for typical system based in Cavalett et al. (2016) and IDEA (2014). It was considered that all lime was applied in the plant cane area (every 3 years).
  properties: carbon content, fossil 0.120005, dry mass 1 kg, wet mass 1 kg
- ash, from combustion of bagasse from sugarcane: 0.009 kg; source Folegatti Matsuura, M. 2017; lognormal variance with pedigree 0.0033, pedigree (2,2,3,1,1)
  Amount for typical system based in Cavalett et al. (2016) and IDEA (2014). The industrial residues production adopted was based on the standards of an Annexed Distilleries.
  It was considered that all ashes was applied in the plant cane area.
  properties: dry mass 1 kg, wet mass 1 kg
- urea: 0.0021247 kg; name N_fert; source Folegatti Matsuura, M. 2017; lognormal variance with pedigree 0.0033, pedigree (2,2,3,1,1)
  The exchange has been updated from 'urea, as N' into 'urea' and therefore its amount has been scaled (multiplied) from 0.001 kg by 2.1438 kg of 'urea' per kg of 'urea, as N'. Original comment of the exchange is: It was assumed that all nitrogen fertiliser comes from urea. Amount for typical system based in Cavalett et al. (2016) and IDEA (2014).
  properties: wet mass 1 kg, dry mass 1 kg, carbon content, fossil 0.2
- limestone and gypsum application, by spreader: 1.641e-6 ha; source Folegatti Matsuura, M. 2017; lognormal variance with pedigree 0.0033, pedigree (2,2,3,1,1)
  (same comment as for fertilising, by rig fertiliser, sugarcane)
- tillage, harrowing, by offset leveling disc harrow: 2.462e-6 ha; source Folegatti Matsuura, M. 2017; lognormal variance with pedigree 0.0033, pedigree (2,2,3,1,1)
  (same comment as for fertilising, by rig fertiliser, sugarcane)
- tap water: 0.0111845 kg; name water_dilution; = 200*4*T_t*1E-04; source Folegatti Matsuura, M. 2017; lognormal variance with pedigree 0.0033, pedigree (2,2,3,1,1)
  Water is used to dilute pesticides in a rate of 200 liters per application per ha. Amount for typical system from May (2015).
  properties: carbon content, fossil 0.00178991, dry mass 0.000337476 kg, wet mass 1 kg, water content 2962.17
  note on carbon content, fossil: Bicarbonate content is 2.93 mol/m3. CO2 content is 0.1 mol/m3 (ecoinvent v2.2 report 8, Tab 93.1).
- furrow covering, sugarcane: 6.8445e-7 ha; source Folegatti Matsuura, M. 2017; lognormal variance with pedigree 0.0033, pedigree (2,2,3,1,1)
  Agricultural operation related to the semi-mechanized planting of sugarcane. Amount for typical system based in Cavalett et al. (2016) and IDEA (2014).
- vinasse, from fermentation of sugarcane: 0.98487 kg; name vinasse; source Folegatti Matsuura, M. 2017; lognormal variance with pedigree 0.0033, pedigree (2,2,3,1,1)
  Amount for typical system based in Cavalett et al. (2016) and IDEA (2014). The industrial residues production adopted was based on the standards of an Annexed Distilleries.
  It was considered that all vinasse was applied in the ratoon cane area.
  property water in wet mass 0.944565 kg; name vinasse_WWM
  properties: carbon content, non-fossil 0.1288, water content 17.0392, dry mass 0.0554348 kg, wet mass 1 kg
- planting, sugarcane: 1.7776e-6 ha; source Folegatti Matsuura, M. 2017; lognormal variance with pedigree 0.0033, pedigree (2,2,3,1,1)
  Agricultural operation related to the mechanized planting of sugarcane. Amount for typical system based in Cavalett et al. (2016) and IDEA (2014).
- harvesting, sugarcane: 1.1608e-5 ha; source Folegatti Matsuura, M. 2017; lognormal variance with pedigree 0.0033, pedigree (2,2,3,1,1)
  Agricultural operation related to the mechanized harvesting of sugarcane. Amount for typical system based in Cavalett et al. (2016) and IDEA (2014).
- packaging, for fertilisers: 0.0094484 kg; lognormal variance with pedigree 0.0532, pedigree (4,3,3,5,4)
  Total amount of active substance/s of fertilisers needed for the production of 'sugarcane' is calculated to be circa 4.72E-03 kg. Fertiliser/s used in this dataset is/are: 'gypsum, mineral', 'lime', 'phosphate fertiliser, as P2O5', 'potassium chloride, as K2O', 'urea, as N'. The total amount of active substance/s is doubled in order to account for the packaging of the dilluted product of fertiliser/s that is/are applied. Therefore, 9.45E-03 kg of packaging for fertilisers is justified with this exchange.
  properties: dry mass 1 kg, carbon content, fossil 0.825301, wet mass 1 kg, heating value, net 25.01 MJ, price 0.0642 EUR2005
  note on carbon content, fossil: Considering a chemical formula (C2H4)n for polyethylene, carbon content-fossil is calculated to be 0.856286 kg of Carbon per kg of dry mass.
- application of plant protection product, by field sprayer: 1.72342e-5 ha; source Folegatti Matsuura, M. 2017; lognormal variance with pedigree 0.0033, pedigree (2,2,3,1,1)
  (same comment as for fertilising, by rig fertiliser, sugarcane)
- packaging, for pesticides: 2.54082e-5 kg; lognormal variance with pedigree 0.0532, pedigree (4,3,3,5,4)
  Total amount of active substance/s of pesticides needed for the production of sugarcane is calculated to be circa 1.27E-05 kg. Pesticide/s used in this dataset is/are: 'glyphosate', 'pesticide, unspecified'. The total amount of active substance/s is doubled in order to account for the packaging of the dilluted product of pesticide/s that is/are applied. Therefore, 2.54E-05 kg of packaging for pesticides is justified with this exchange.
  properties: dry mass 1 kg, wet mass 1 kg, carbon content, fossil 0.85714, heating value, net 25.97 MJ, price 0.0642 EUR2005
- gypsum, mineral: 0.0008207 kg; source Folegatti Matsuura, M. 2017; lognormal variance with pedigree 0.0033, pedigree (2,2,3,1,1)
  Amount for typical system based in Cavalett et al. (2016) and IDEA (2014).
  It was considered that all gypsum was applied in the plant cane area (every 3 years).
  properties: dry mass 1 kg, wet mass 1 kg
- furrowing, sugarcane: 6.8445e-7 ha; source Folegatti Matsuura, M. 2017; lognormal variance with pedigree 0.0033, pedigree (2,2,3,1,1)
  (same comment as for furrow covering, sugarcane)
- filter cake, from sugarcane juice filtration: 0.0352 kg; name cake; source Folegatti Matsuura, M. 2017; lognormal variance with pedigree 0.0033, pedigree (2,2,3,1,1)
  Amount for typical system based in Cavalett et al. (2016) and IDEA (2014). The industrial residues production adopted was based on the standards of an Annexed Distilleries. Value in wet basis (moisture content 65%).
  It was considered that all the filter cake was applied in plant cane area.
  property dry mass 0.35 kg; name cake_DM; = cake_WM- cake_WWM
  property carbon content, non-fossil 0.6514; name cake_C_content_non_fossil
  property water content 1.85714; name cake_water_content; = cake_WWM/( cake_WM- cake_WWM)
  property carbon content, fossil 0; name cake_C_content_fossil
  property wet mass 1 kg; name cake_WM
  property water in wet mass 0.65 kg; name cake_WWM
- pesticide, unspecified: 1.03406e-5 kg; source Folegatti Matsuura, M. 2017; lognormal variance with pedigree 0.0033, pedigree (2,2,3,1,1)
  Amount for typical system from May (2015). This exchange represents the input of sulfentrazone (71%), fipronil (5%) and tebuthiuron(24%).
  properties: dry mass 1 kg, wet mass 1 kg, carbon content, fossil 0.486978
- glyphosate: 2.36355e-6 kg; source Folegatti Matsuura, M. 2017; lognormal variance with pedigree 0.0033, pedigree (2,2,3,1,1)
  Amount for typical system from May (2015).
  properties: wet mass 1 kg, dry mass 1 kg, carbon content, fossil 0.214286
- tillage, subsoiling, by subsoiler plow: 2.462e-6 ha; source Folegatti Matsuura, M. 2017; lognormal variance with pedigree 0.0033, pedigree (2,2,3,1,1)
  (same comment as for fertilising, by rig fertiliser, sugarcane)
- field leveling, sugarcane: 2.462e-6 ha; source Folegatti Matsuura, M. 2017; lognormal variance with pedigree 0.0033, pedigree (2,2,3,1,1)
  (same comment as for fertilising, by rig fertiliser, sugarcane)
- sugarcane transfer, by dump cart: 1.1608e-5 ha; source Folegatti Matsuura, M. 2017; lognormal variance with pedigree 0.0033, pedigree (2,2,3,1,1)
  Agricultural operation operation related to the mechanized harvesting of sugarcane. Amount for typical system based in Cavalett et al. (2016) and IDEA (2014). The transfers of sugarcane from the harvester to the dump cart and from the dump cart to the truck are included in this operation.
- land use change, perennial crop: 9.92618e-6 ha; = 9.92618275360698E-06*LUC_crop_specific+(4.95650000577029E-07*(1-LUC_crop_specific))
  Calculated value. Land use change (LUC) from Novaes et al. (2017).
- sugarcane vinasse application, by wheel reel irrigation: 2.3444e-6 ha; source Folegatti Matsuura, M. 2017; lognormal variance with pedigree 0.0033, pedigree (2,2,3,1,1)
  Agricultural operation. This operation besides providing water and nutrients, is seen as a soil fertility recovery strategy. It is performed with a tractor plus an aspersion system of vinasse. Amount for typical system based in Cavalett et al. (2016) and IDEA (2014).
- tillage, harrowing, by offset disc harrow: 2.462e-6 ha; source Folegatti Matsuura, M. 2017; lognormal variance with pedigree 0.0033, pedigree (2,2,3,1,1)
  (same comment as for fertilising, by rig fertiliser, sugarcane)
- sugarcane loading, by loader: 7.0168e-7 ha; source Folegatti Matsuura, M. 2017; lognormal variance with pedigree 0.0033, pedigree (2,2,3,1,1)
  Agricultural operation related to the manual harvesting of sugarcane. Amount for typical system based in Cavalett et al. (2016) and IDEA (2014).
- transport, tractor and trailer, agricultural: 0.000186 metric ton*km; source Folegatti Matsuura, M. 2017; lognormal variance with pedigree 0.1227, pedigree (2,2,3,1,1)
  Average transport of fertilisers from shed to field.
  Uncertainty: Variance of log-transformed data as recommended by Ecoinvent for Transport Services" for agriculture.
- potassium chloride: 0.00155862 kg; source Folegatti Matsuura, M. 2017; lognormal variance with pedigree 0.0033, pedigree (2,2,3,1,1)
  The exchange has been updated from 'potassium chloride, as K2O' into 'potassium chloride' and therefore its amount has been scaled (multiplied) from 0.001 kg by 1.5829 kg of 'potassium chloride' per kg of 'potassium chloride, as K2O'. Original comment of the exchange is: Amount for typical system based in Cavalett et al. (2016) and IDEA (2014).
  properties: dry mass 1 kg, wet mass 1 kg
- fertilising, by stool splitter, sugarcane: 2.92e-6 ha; source Folegatti Matsuura, M. 2017; lognormal variance with pedigree 0.0033, pedigree (2,2,3,1,1)
  (same comment as for fertilising, by rig fertiliser, sugarcane)

## Inputs from nature
- Occupation, permanent crop, non-irrigated [natural resource, land]: 0.139806 m2*year; = T_t*1; source Folegatti Matsuura, M. 2017; lognormal variance with pedigree 0.0047, pedigree (2,2,3,1,1)
  Amount for typical system based in Cavalett et al. (2016) and IDEA (2014).
- Carbon dioxide, in air [natural resource, in air]: 0.498885 kg; = 44/12 * (REF_PRODUCT_C_content * REF_PRODUCT * REF_PRODUCT_DM); source Nemecek, T. 2011; lognormal variance with pedigree 0.0033, pedigree (2,2,3,1,1)
  CO2 absorbed during photosyntesis and present at the product. See "3.1 CO2 from the Atmosphere" in Nemececk & Schnetzer (2011).
- Energy, gross calorific value, in biomass [natural resource, biotic]: 4.9478 MJ; lognormal variance with pedigree 0.0026, pedigree (1,1,3,1,1)
  Calorific value present in sugarcane. Based on Ecoinvent database.
- Transformation, to permanent crop, non-irrigated [natural resource, land]: 0.00699032 m2; = T_t/20; lognormal variance with pedigree 0.0107, pedigree (2,2,3,1,1)
  Amount for typical system based in Cavalett et al. (2016) and IDEA (2014).
- Transformation, from permanent crop, non-irrigated [natural resource, land]: 0.00699032 m2; = T_t/20; lognormal variance with pedigree 0.0107, pedigree (2,2,3,1,1)
  Amount for typical system based in Cavalett et al. (2016) and IDEA (2014).

## Emissions to nature
- Cadmium, ion [water, surface water]: 6.211e-13 kg; source Milà i Canals L. 2003; lognormal variance with pedigree 0.1007, pedigree (4,3,3,3,1)
  Emissions of heavy metals to soil and surface water estimated from mineral fertilisers and liming as recommended by Canals (2003) and regionalized following Folegatti et al. (2015).
- NMVOC, non-methane volatile organic compounds, unspecified origin [air, non-urban air or from high stacks]: 0.0001323 kg; = straw*fraction_straw_burned*0.007; source GREET 2010; lognormal variance with pedigree 0.0507, pedigree (4,3,3,3,1)
  Emissions of straw burning in the field. The emissions factors are based on Greet (2010).
- Fipronil [soil, agricultural]: 4.9241e-7 kg; source Nemecek, T. 2011; lognormal variance with pedigree 0.0437, pedigree (4,3,3,3,1)
  "All pesticides applied for crop production were assumed to end up as emissions to the soil. The amounts of pesticides used as inputs were thus simultaneously calculated as outputs (emissions to agricultural soil)", as recomended by Nemecek and Schnetzer (2011), "2.9 EMISSIONS OF PESTICIDES TO AGRICULTURAL SOIL" (pg. 21).
- Zinc, ion [water, surface water]: 4.2197e-11 kg; source Milà i Canals L. 2003; lognormal variance with pedigree 0.1007, pedigree (4,3,3,3,1)
  (same comment as for Cadmium, ion)
- Zinc [soil, agricultural]: 4.2193e-7 kg; source Milà i Canals L. 2003; lognormal variance with pedigree 0.0507, pedigree (4,3,3,3,1)
  (same comment as for Cadmium, ion)
- Ammonia [air, non-urban air or from high stacks]: 0.000554754 kg; name NH3; = 17/14*(N_fert*0.466461632733939*0.20 + vinasse*0.375*1E-03*0.5*0.6 + cake*0.014*0.5*0.6); source Nemecek T. 2015; lognormal variance with pedigree 0.0187, pedigree (4,3,3,3,1)
  NH3 emissions from applied mineral fertilisers are calculated by constant emission factors for each group of fertiliser. For Urea, see Nemecek et al (2015). For Recycling Fertiliser (vinasse application), see Nemecek and Schnetzer (2011). Amount of N in vinasse:0.375 kg N/m3 (CGEE, 2012).
- Chromium, ion [water, surface water]: 7.9579e-12 kg; source Milà i Canals L. 2003; lognormal variance with pedigree 0.1007, pedigree (4,3,3,3,1)
  (same comment as for Cadmium, ion)
- Water [water, surface water]: 1.11845e-5 m3; = water_dilution*1E-03; lognormal variance with pedigree 0.0033, pedigree (2,2,3,1,1)
  Emissions of water related to pesticide dilution.
- Carbon monoxide, non-fossil [air, non-urban air or from high stacks]: 0.0017388 kg; = straw*fraction_straw_burned*0.092; source GREET 2010; lognormal variance with pedigree 0.6607, pedigree (4,3,3,3,1)
  Emissions of straw burning in the field. The emissions factors are based on Greet (2010).
- Sulfur dioxide [air, non-urban air or from high stacks]: 7.56e-6 kg; = straw*fraction_straw_burned*0.0004; source GREET 2010; lognormal variance with pedigree 0.0113, pedigree (4,3,3,3,1)
  Emissions of straw burning in the field. The emissions factors are based on Greet (2010).
- Copper, ion [water, surface water]: 7.6791e-12 kg; source Milà i Canals L. 2003; lognormal variance with pedigree 0.1007, pedigree (4,3,3,3,1)
  (same comment as for Cadmium, ion)
- Particulates, < 2.5 um [air, non-urban air or from high stacks]: 7.371e-5 kg; = straw*fraction_straw_burned*0.0039; source GREET 2010; lognormal variance with pedigree 0.1307, pedigree (4,3,3,3,1)
  Emissions of straw burning in the field. The emissions factors are based on Greet (2010).
- Copper [soil, agricultural]: 7.6783e-8 kg; source Milà i Canals L. 2003; lognormal variance with pedigree 0.0507, pedigree (4,3,3,3,1)
  (same comment as for Cadmium, ion)
- Lead [water, surface water]: 1.5697e-11 kg; source Milà i Canals L. 2003; lognormal variance with pedigree 0.1007, pedigree (4,3,3,3,1)
  (same comment as for Cadmium, ion)
- Pesticides, unspecified [soil, agricultural]: 2.462e-6 kg; source Nemecek, T. 2011; lognormal variance with pedigree 0.0437, pedigree (4,3,3,3,1)
  "All pesticides applied for crop production were assumed to end up as emissions to the soil. The amounts of pesticides used as inputs were thus simultaneously calculated as outputs (emissions to agricultural soil)", as recomended by Nemecek and Schnetzer (2011), "2.9 EMISSIONS OF PESTICIDES TO AGRICULTURAL SOIL" (pg. 21). This exchange represents the emissions of Tebuthiuron.
- Glyphosate [soil, agricultural]: 2.3636e-6 kg; source Nemecek, T. 2011; lognormal variance with pedigree 0.0437, pedigree (4,3,3,3,1)
  (same comment as for Fipronil)
- Nickel, ion [water, surface water]: 8.2532e-12 kg; source Milà i Canals L. 2003; lognormal variance with pedigree 0.1007, pedigree (4,3,3,3,1)
  (same comment as for Cadmium, ion)
- Cadmium [soil, agricultural]: 6.2104e-9 kg; source Milà i Canals L. 2003; lognormal variance with pedigree 0.0507, pedigree (4,3,3,3,1)
  (same comment as for Cadmium, ion)
- Chromium [soil, agricultural]: 7.9571e-8 kg; source Milà i Canals L. 2003; lognormal variance with pedigree 0.0507, pedigree (4,3,3,3,1)
  (same comment as for Cadmium, ion)
- Particulates, > 2.5 um, and < 10um [air, non-urban air or from high stacks]: 0.00014742 kg; = straw*fraction_straw_burned*0.0078; source GREET 2010; lognormal variance with pedigree 0.1307, pedigree (4,3,3,3,1)
  Emissions of straw burning in the field. The emissions factors are based on Greet (2010).
- Carbon dioxide, fossil [air, non-urban air or from high stacks]: 0.00233822 kg; = (N_fert*0.466461632733939*1.57)+ 44/12*0.13*lime; source IPCC 2006; lognormal variance with pedigree 0.0113, pedigree (4,3,3,3,1)
  Emissions of carbon dioxide to air from limestone and urea application based on IPCC (2006).
- Nickel [soil, agricultural]: 8.2524e-8 kg; source Milà i Canals L. 2003; lognormal variance with pedigree 0.0507, pedigree (4,3,3,3,1)
  (same comment as for Cadmium, ion)
- Phosphorus [water, surface water]: 3.80438e-6 kg; = soil_eroded * 0.00095 * 1.86 * 0.2 * T_t*1E-04; source Nemecek, T. 2011; lognormal variance with pedigree 0.0507, pedigree (4,3,3,3,1)
  Due to phosphorus low mobility in Brazilian soils, its emissions through leaching and run-off were disregarded (Novais & Smyth, 1999). Only P emission by water erosion through surface water was considered, as in "2.3.3 Phorsphorous Emissions Through Water Erosion to Surface Water" Nemecek and Schnetzer (2011).
- Methane, non-fossil [air, non-urban air or from high stacks]: 5.103e-5 kg; = straw*fraction_straw_burned*0.0027; source GREET 2010; lognormal variance with pedigree 0.0507, pedigree (4,3,3,3,1)
  Emissions of straw burning in the field. The emissions factors are based on Greet (2010).
- Nitrate [water, ground-]: 0.00277034 kg; name NO3; = 62/14*((21.37 + precipitation/(Clay_content*root_depth) * (0.0037*N_total + 0.0000601*Norg_soil - 0.00362*Nuptake_plant)) * T_t * 1E-04); source Nemecek, T. 2011; lognormal variance with pedigree 0.0507, pedigree (4,3,3,3,1)
  See "2.2.2 The SQCB-NO3 model" in Nemececk & Schnetzer (2011), as "SALCA-NO3 model" has "Geographic scope of application: Europe".
- Nitrogen oxides [air, non-urban air or from high stacks]: 6.03221e-5 kg; = 0.21*(44/28*(0.01*((N_total+ Ncrop_residues)*T_t*1E-04)+ 0.01*14/17*NH3 + 0.0075*14/62*NO3)) + (straw*fraction_straw_burned*0.0025); source Nemecek, T. 2011; lognormal variance with pedigree 0.0407, pedigree (4,3,3,3,1)
  Emissions of NOx to the air after nitrogen fertiliser application and straw burning in the field. Based on Nemecek and Schnetzer (2011) and Greet (2010).
- Sulfentrazone [soil, agricultural]: 7.3861e-6 kg; source Nemecek, T. 2011; lognormal variance with pedigree 0.0437, pedigree (4,3,3,3,1)
  (same comment as for Fipronil)
- Dinitrogen monoxide [air, non-urban air or from high stacks]: 6.3571e-5 kg; name N2O; = 44/28*(0.01*((N_total+ Ncrop_residues)*T_t*1E-04)+ 0.01*14/17*NH3 + 0.0075*14/62*NO3) + (straw*fraction_straw_burned*0.00007); source Nemecek, T. 2011; lognormal variance with pedigree 0.040625, pedigree (4,3,3,2,1)
  Emissions of N2O to the air after nitrogen fertiliser application and straw burning in the field. Based on Nemecek and Schnetzer (2011) and Greet (2010).
- Lead [soil, agricultural]: 1.5696e-7 kg; source Milà i Canals L. 2003; lognormal variance with pedigree 0.0507, pedigree (4,3,3,3,1)
  (same comment as for Cadmium, ion)

## Sampling procedure
The main source of data for agricultural inputs and operations is the Performance Indicators of Sugarcane Agroindustry Report (2014), as well as consultation with relevant experts. Information on agricultural inputs and operations modelling procedures is detailed in Cavalett et al. (2016). Emissions from the agricultural process are estimated according to Nemecek and Schnetzer (2011) and Canals (2003).

## Extrapolations
This dataset has been extrapolated from year 2014 to the year of the calculation (2021). The uncertainty has been adjusted accordingly.

## Review by Jens Lansche 2017-05-18
All review comments considered.
