# nutrient supply from glycerin distillate bottom

Dataset: EcoSpold 2, unit process
Geography: GLO
Time period: 2016-01-01 to 2021-12-31
Technology level: current
Classification: ISIC rev.4 ecoinvent: 0161:Support activities for crop production
Scenario: Business-as-Usual
System model: Allocation, cut-off by classification
Generated by: Avraam Symeonidis
Database: ecoinvent
isCopyrightProtected: true
accessRestrictedTo: 1

## General comment
This inventory describes the supply of nutrients from ''glycerin distillate bottom'' for fertiliser use.
No machinery expenditures or emissions to the environment are considered related to the actual application of this substance on soil during its agricultural use. The purpose of this activity is to connect the chemical production of ''glycerin distillate bottom'' with its generic use as fertilizer. The product ''glycerin distillate bottom'' is connected to the generic market for 'inorganic potassium fertiliser, as K2O' through this supplying activity. In the agricultural context, ''glycerin distillate bottom'' can be used directly as a fertilizer input to crop production, eventually with other chemicals; alternatively, a generic input of 'inorganic potassium fertiliser, as K2O' can be used instead, and this will represent the regional consumption mix for his type of nutrient. A way in between is allowed by using the generic input 'inorganic potassium fertiliser, as K2O' and link to the activity providing it from a specific chemical.
In all cases, emissions associated to the application of the fertilizer have to be calculated in the crop production activity.

## Technology
Inventory based on composition of ''glycerin distillate bottom''.

## Reference product
- organo-mineral potassium fertiliser, as K2O: 1 kg; name RP; By-product classification allocatable product; CPC 34659: Fertilizers n.e.c.
  production volume 4.25998e7 kg; = 78888478.05872*RP
    Calculated based on the production volume of glycerin distillate bottom in the database.
  property price 0.188 EUR2005; name RP_price_EUR2005
    Set equal to the price of the corresponding inorganic fertiliser
  property potassium content 0.830148
    Potassium content (on a dry matter basis) of organo-mineral potassium fertiliser, as K2O is calculated from the molecular formula of the substance (Potassium).
  property oxygen content 0.169852
    Oxygen content (on a dry matter basis) of organo-mineral potassium fertiliser, as K2O is calculated from the molecular formula of the substance (Potassium).
  property carbon content, fossil 0
    Carbon content, fossil is calculated based on the chemical formula of the substance.
  property carbon content 0
    carbon content on a dry matter basis (reserved; not for manual entry)
  properties: carbon content, non-fossil 0, dry mass 1 kg, water content 0, wet mass 1 kg, water in wet mass 0 kg, carbon allocation 0 kg

## Inputs from technosphere
- glycerin distillate bottom: 1.85185 kg
  properties: potassium content 0.448737, sulfur content 0.184008, dry mass 1 kg, wet mass 1 kg, oxygen content 0.367255
  note on potassium content: Potassium content (on a dry matter basis) of glycerin distillate bottom is calculated from the molecular formula of the substance (here considered K2S1O4).
  note on sulfur content: Sulfur content (on a dry matter basis) of glycerin distillate bottom is calculated from the molecular formula of the substance (here considered K2S1O4).
  note on oxygen content: Oxygen content (on a dry matter basis) of glycerin distillate bottom is calculated from the molecular formula of the substance (here considered K2S1O4).

## Extrapolations
This dataset has been extrapolated from year 2019 to the year of the calculation (2021). The uncertainty has been adjusted accordingly.
