# toner module production, laser printer, black/white

Dataset: EcoSpold 2, unit process
Geography: GLO
Time period: 2002-01-01 to 2021-12-31
Technology level: current
Classification: ISIC rev.4 ecoinvent: 2817:Manufacture of office machinery and equipment (except computers and periphe
Classification: EcoSpold01Categories: electronics/module
Synonyms: toner cartridge; OEM cartridge
Tags: ConvertedDataset
Scenario: Business-as-Usual
System model: Allocation, cut-off by classification
Generated by: Mischa Classen
Published in: Hischier R. 2007
Database: ecoinvent
isCopyrightProtected: true
accessRestrictedTo: 1

## General comment
This dataset represents the production of 1 unit of a standard black toner cartridge. It is based the original production (OEM) of an average toner cartridge with a capacity of 5'000 prints A4 and a coverage of 5%, specifically a HP C4096A for HP2100 printers, a weight of 880 g plus 260 toner contained. Main data are based on a study on a HP 96A cartridge vs. its remanufac-tured counterpart, a detailed EPD for a remanufactured cartridge and a more recent overview on remanufactured HP cartridges.
[This dataset was already contained in the ecoinvent database version 2. It was not individually updated during the transfer to ecoinvent version 3. Life Cycle Impact Assessment results may still have changed, as they are affected by changes in the supply chain, i.e. in other datasets. This dataset was generated following the ecoinvent quality guidelines for version 2. It may have been subject to central changes described in the ecoinvent version 3 change report (http://www.ecoinvent.org/database/ecoinvent-version-3/reports-of-changes/), and the results of the central updates were reviewed extensively. The changes added e.g. consistent water flows and other information throughout the database. The documentation of this dataset can be found in the ecoinvent reports of version 2, which are still available via the ecoinvent website. The change report linked above covers all central changes that were made during the conversion process.]

## Included activities end
Includes the manufacturing of the semifinished parts, toner powder, the material transport to the site, the assembly, the packaging, No direct emissions are considered.

## Geography
European Electricity mix and material processing data for supplier outside Europe.

## Technology
Assembly of the semifinished components by OEM to cartridges. The production process consists of forming the parts that are produced in-house and assembling the parts. After testing the cartridges they are packed and shipped.

## Reference product
- toner module, laser printer, black/white: 1 unit; By-product classification allocatable product; CPC 44922: Parts for the goods of subclasses 44914, 44917 and 45150
  EcoSpold01Location=GLO
  Although all produced toner cartridges work after a similar principle, there is a huge variety of different cartridge types, depending on application (high-end, low-end), producer (Fuji-Xerox, Hewlett Packard HP, Canon, Epson, etc.) and colour system (four colours, black).
  The most frequently used cartridge size has a capacity of 5000 pages A4 printed with 5% coverage. There are other sizes that cover from 3’000 to 10’000 and more pages.
  Colour lasers use the same fundamental electrophotographic steps like monochrome lasers. The primary difference between monochrome and colour is how to perform this process four times for a single sheet of paper, once for each of the four colours of cyan, magenta, yellow and black (CMYK). Hence the toner cartridge designs do not differ remarkably. The toner cartridge fulfils two functions: first it is a container for the developer, i.e. toner and carrier. Second it carries the elements needed in the marking process. These elements are responsible for the composition of the toner cartridge:
  1.The primary charge roller (PCR) places a uniform negative charge on the surface of the organic photo-conducting (OPC) drum.
  2.The laser passes through an aperture on top of the cartridge striking the OPC drum, which creates a temporary positive charge.
  3.The developer roller circles through the toner hopper. Since the developer roller is magnetic, toner adheres to the surface of the roller.
  4.The doctor blade smoothes the toner on the developer roller to a fine, consistent layer.
  5.The developer roller and the OPC roll together but do not touch. Toner on the developer roller is attracted to the positively charged spots on the OPC and ‘jumps’ across the narrow gap to fill in these spots. Unused toner on the developer roller rotates around again into the toner hopper.
  6.The OPC Drum rotates around to meet the paper, transferring the toner to the page. The paper then continues on to the fuser.
  7.The wiper blade removes any excess toner and media debris from the drum, cleaning it for the next cycle.
  production volume 5.81002e8 unit
    Calculated based on literature values and estimates. The amout of used printer produced in operation, printer, laser, black/white is 662341838 kg. 1 unit of toner = 1.14kg (including toner powder).
  property price 121 EUR2005
    Temporary price data. Calculated as 90% of purchasers price based on: Calculated for 5000 pages printed at 0.045 USD/page (source for ink-per-page-price is a study by QualityLogic: http://www.qualitylogic.com/tuneup/uploads/docfiles/QualityLogic-Cost-of-Ink-Per-Page-Analysis-United-States-Januar-2008.pdf)
  property carbon content, fossil 0.510352
    C content was calculated as the addition of C content in the components
  property carbon content, non-fossil 0
    C content was calculated as the addition of C content in the components
  property carbon content 0.510352
    carbon content on a dry matter basis (reserved; not for manual entry)
  properties: water content 0, dry mass 1.14 kg, water in wet mass 0 kg, wet mass 1.14 kg, carbon allocation 0.581801 kg

## Inputs from technosphere
All rows: source Perfect Print Sweden AB 2004
- polystyrene, general purpose: 0.21132 kg; lognormal variance with pedigree 0.060625, pedigree (2,4,5,2,3)
  Estiamtion, based on literature.
  Further references:
  Perfect Print Sweden AB (2002) Envionmental Product Declaration of SmartToner EP-E. Pre-certified environmental product declaration Reg.nr: S-EP-00009 as pdf-File under: <http://www.environdec.com/>
  EcoSpold01Location=RER
  properties: dry mass 1 kg, carbon content, fossil 0.923077, wet mass 1 kg, heating value, net 38.67 MJ
  note on carbon content, fossil: Chemical formula of polystyrene is (C8H8)n (ecoinvent v2.2 report 11_II)
- electricity, medium voltage: 7.931 kWh; lognormal variance with pedigree 0.130025, pedigree (4,4,5,2,4)
  Estiamtion, based on literature.
  Further references:
  Perfect Print Sweden AB (2002) Envionmental Product Declaration of SmartToner EP-E. Pre-certified environmental product declaration Reg.nr: S-EP-00009 as pdf-File under: <http://www.environdec.com/>
  EcoSpold01Location=UCTE
- section bar extrusion, aluminium: 0.1434 kg; lognormal variance with pedigree 0.068025, pedigree (4,4,5,2,3)
  EcoSpold01Location=RER
  Estiamtion, based on literature.
  Further references:
  Perfect Print Sweden AB (2002) Envionmental Product Declaration of SmartToner EP-E. Pre-certified environmental product declaration Reg.nr: S-EP-00009 as pdf-File under: <http://www.environdec.com/>
- injection moulding: 0.26943 kg; lognormal variance with pedigree 0.068025, pedigree (4,4,5,2,3)
  (same comment as for section bar extrusion, aluminium)
- glass fibre: 0.010566 kg; lognormal variance with pedigree 0.060625, pedigree (2,4,5,2,3)
  (same comment as for section bar extrusion, aluminium)
  properties: dry mass 1 kg, wet mass 1 kg
- toner, black, powder: 0.26 kg
  EcoSpold01Location=GLO
  Estiamtion, based on literature.
  Further references:
  Perfect Print Sweden AB (2002) Envionmental Product Declaration of SmartToner EP-E. Pre-certified environmental product declaration Reg.nr: S-EP-00009 as pdf-File under: <http://www.environdec.com/>
  properties: wet mass 1 kg, heating value, net 20.38 MJ, dry mass 1 kg, carbon content, fossil 0.672563
  note on carbon content, fossil: black toner powder with the composition 5% Carbon Black, 18% Magnetite, 70% Binder Resin, the rest being organic and inorganic additives (dataset)
- extrusion, plastic film: 0.086981 kg; lognormal variance with pedigree 0.060625, pedigree (2,4,5,2,3)
  (same comment as for polystyrene, general purpose)
- aluminium, wrought alloy: 0.1434 kg; lognormal variance with pedigree 0.060625, pedigree (2,4,5,2,3)
  (same comment as for polystyrene, general purpose)
  properties: wet mass 1 kg, dry mass 1 kg
- building, hall: 4.8611e-6 m2; lognormal variance with pedigree 0.378025, pedigree (4,4,5,2,3)
  EcoSpold01Location=CH
  Estiamtion, based on literature.
  Further references:
  Perfect Print Sweden AB (2002) Envionmental Product Declaration of SmartToner EP-E. Pre-certified environmental product declaration Reg.nr: S-EP-00009 as pdf-File under: <http://www.environdec.com/>
- polyethylene, low density, granulate: 0.05 kg; lognormal variance with pedigree 0.042025, pedigree (1,4,5,2,1)
  (same comment as for section bar extrusion, aluminium)
  properties: heating value, net 42.47 MJ, dry mass 1 kg, wet mass 1 kg, carbon content, fossil 0.857143
  note on carbon content, fossil: Polyethylene is formed out of a huge amount of ethylene monomers (C2H4) (ecoinvent v2.2 report 11_II). MW=28 g/mol
- polyurethane, rigid foam: 0 kg; pedigree (1,1,1,1,1)
  (same comment as for section bar extrusion, aluminium)
  properties: carbon content, fossil 0.69089, dry mass 1 kg, wet mass 1 kg, heating value, net 30.67 MJ
  note on carbon content, fossil: Polyurethanes (PUR) is the collective name for an extensive group of polymers with very different compositions and correspondingly varied property profiles, though their molecule chain contains all a urethane group (-NH-CO-O-). All PURs are built on a common principle : they are produced by the diisocyanate polyaddition process, that links polyols and (di)isocyanates. In this dataset, an example of typical polyurethane mixture is described (Ullmann, Polyurethanes, Dieterich et al. & ecoinvent v2 report 11_II). C content was calculated as an addition of C contents in its components.
- sheet rolling, steel: 0.25358 kg; lognormal variance with pedigree 0.068025, pedigree (4,4,5,2,3)
  (same comment as for section bar extrusion, aluminium)
- magnetite: 0.036981 kg
  Estiamtion, based on literature.
  Further references:
  Perfect Print Sweden AB (2002) Envionmental Product Declaration of SmartToner EP-E. Pre-certified environmental product declaration Reg.nr: S-EP-00009 as pdf-File under: <http://www.environdec.com/>
  EcoSpold01Location=GLO
  properties: wet mass 1 kg, dry mass 1 kg
- corrugated board box: 0 kg; pedigree (1,1,1,1,1)
  (same comment as for polystyrene, general purpose)
  properties: water content 0.0582011, carbon content, fossil 0.000486772, dry mass 0.945 kg, carbon content, non-fossil 0.433862, wet mass 1 kg, heating value, net 12.86 MJ
  note on carbon content, fossil: Fossil C content was calculated after fossil C contents of chemicals used in the production of board (Tab 10-15 & 10.16 ecoinvent v2.2 report 11_III, part 10)
  note on carbon content, non-fossil: Biogenic C content was calculated after biogenic C contents of chemicals used in the production of board (Tab 10.15 & 10.16, ecoinvent v2.2 report 11_III, part 10).
- steel, low-alloyed: 0.25358 kg; lognormal variance with pedigree 0.060625, pedigree (2,4,5,2,3)
  (same comment as for polystyrene, general purpose)
  properties: wet mass 1 kg, dry mass 1 kg, carbon content, fossil 0.005
  note on carbon content, fossil: Low alloyed steel composition given in Tab. 3.2 ecoinvent v2.2 report 10_partII. Steel assumed to have a C content of 0.5%
- polyurethane, rigid foam: 0.0314373, 0.0636567 kg (2 entries); lognormal variance with pedigree 0.060625, pedigree (2,4,5,2,3)
  (same comment as for section bar extrusion, aluminium)
- corrugated board box: 0.0834185, 0.00372971, 0.316852 kg (3 entries); lognormal variance with pedigree 0.042025, pedigree (1,4,5,2,1)
  (same comment as for polystyrene, general purpose)

## Sampling procedure
Literature

## Extrapolations
This dataset has been extrapolated from year 2005 to the year of the calculation (2021). The uncertainty has been adjusted accordingly.

## Review by Rolf Frischknecht 2007-10-04
passed

## Review by Roland Hischier 2011-09-28
Transfer of documentation done.
