# metalliferous hydroxide sludge to market for zinc concentrate

Dataset: EcoSpold 2, unit process
Geography: GLO
Time period: 2018-01-01 to 2021-12-31
Technology level: current
Classification: ISIC rev.4 ecoinvent: 3821:Treatment and disposal of non-hazardous waste
Scenario: Business-as-Usual
System model: Allocation, cut-off by classification
Generated by: Tereza Levova
Database: ecoinvent
isCopyrightProtected: true
accessRestrictedTo: 1

## General comment
This dataset is a proxy datasets which connects the "metaliferous hydroxide sludge to the market for zinc concentrate. This dataset should be replaced by the Waelz process which would be the appropriate method for zinc recovery from the metalliferous hydroxide sludge.
The metalliferous hydroxide sludge is produced as a by-product of incineration of different types of waste in incinerators which include the FLUWA process - filter and fly ash washing (https://www.bsh.ch/en/waste-to-energy-plants/fluwa-process/) which removes this zinc rich metalliferous hydroxide sludge.

This sludge with its high concentrations of zinc is then sent as a secondary feedstock to the zinc smelting industry.

## Included activities start
This activity starts by the metalliferous hydroxide sludge being produced in the FLUWA process.

## Included activities end
This datasets end by a zinc concentrate being produced.

## Reference product
- metalliferous hydroxide sludge: 0 kg; By-product classification Recyclable; CPC 1429: Other non-ferrous metal ores and concentrates (other than uranium or thorium ores and concentrates)
  production volume 0 kg; name RP_PV_1
    The production volume is equal to the amount of metalliferous hydroxide sludge produced as a by-product when burning different types of waste in incinerators which include the FLUWA process in Switzerland.
  property price 0.0042 EUR2005; name RP_price_EUR2005
    World market value of manure, deflated with barley world market price and consumer price index, based on [http://www.gov.pe.ca/photos/original/af_NM_manconv.pdf].
  property vanadium content 0.000574
    Calculated as a production volume weighted average of properties of all the metalliferous hydroxide sludge products produced in the database.
  property silver content 3.84e-7
    (same comment as for metalliferous hydroxide sludge)
  property tin content 5.35e-5
    (same comment as for metalliferous hydroxide sludge)
  property thallium content 2.91e-6
    (same comment as for metalliferous hydroxide sludge)
  property sulfur content 0.1053
    (same comment as for metalliferous hydroxide sludge)
  property strontium content 2.185e-7
    (same comment as for metalliferous hydroxide sludge)
  property sodium content 0.0163
    (same comment as for metalliferous hydroxide sludge)
  property titanium content 8.116e-5
    (same comment as for metalliferous hydroxide sludge)
  property zinc content 0.132; name zinc_C_sludge
    (same comment as for metalliferous hydroxide sludge)
  property selenium content 9.68e-6
    (same comment as for metalliferous hydroxide sludge)
  property copper content 0.00017
    (same comment as for metalliferous hydroxide sludge)
  property molybdenum content 7.774e-5
    (same comment as for metalliferous hydroxide sludge)
  property silicon content 0.00096
    (same comment as for metalliferous hydroxide sludge)
  property manganese content 4.46e-5
    (same comment as for metalliferous hydroxide sludge)
  property iodine content 3.57e-7
    (same comment as for metalliferous hydroxide sludge)
  property cobalt content 9.787e-5
    (same comment as for metalliferous hydroxide sludge)
  property magnesium content 0.0032735
    (same comment as for metalliferous hydroxide sludge)
  property fluorine content 0.005
    (same comment as for metalliferous hydroxide sludge)
  property nickel content 2.082e-5
    (same comment as for metalliferous hydroxide sludge)
  property oxygen content 0.394
    (same comment as for metalliferous hydroxide sludge)
  property chlorine content 0.176087
    (same comment as for metalliferous hydroxide sludge)
  property phosphorus content 0.01557
    (same comment as for metalliferous hydroxide sludge)
  property chromium content 0.000122
    (same comment as for metalliferous hydroxide sludge)
  property potassium content 0.0122
    (same comment as for metalliferous hydroxide sludge)
  property calcium content 0.1045
    (same comment as for metalliferous hydroxide sludge)
  property iron content 0.00059
    (same comment as for metalliferous hydroxide sludge)
  property mercury content 8.31e-7
    (same comment as for metalliferous hydroxide sludge)
  property lead content 0.003555
    (same comment as for metalliferous hydroxide sludge)
  property dry mass 0.25 kg; name DM_sludge
  property barium content 1.646e-5
    (same comment as for metalliferous hydroxide sludge)
  property beryllium content 0.0027
    (same comment as for metalliferous hydroxide sludge)
  property arsenic content 1.3087e-5
    (same comment as for metalliferous hydroxide sludge)
  property aluminium content 0.0005054
    (same comment as for metalliferous hydroxide sludge)
  property carbon content, non-fossil 0.0112
    Biogene carbon content on a dry matter basis. Calculated as a production volume weighted average of properties of all the metalliferous hydroxide sludge products produced in the database.
  property bromine content 0.0026
    (same comment as for metalliferous hydroxide sludge)
  property carbon content, fossil 0.0082
    Fossil carbon content on a dry matter basis. Calculated as a production volume weighted average of properties of all the metalliferous hydroxide sludge products produced in the database.
  property boron content 0.00013285
    (same comment as for metalliferous hydroxide sludge)
  property antimony content 0.000521
    (same comment as for metalliferous hydroxide sludge)
  property cadmium content 0.00377
    (same comment as for metalliferous hydroxide sludge)
  property heating value, net 0 MJ
    Non combustible products are assumed to have an LHV equal to zero (0).
  property carbon content 0.0194
    carbon content on a dry matter basis (reserved; not for manual entry)
  properties: water content 3, wet mass 1 kg, water in wet mass 0.75 kg, carbon allocation 0.00485 kg
- zinc concentrate: 1 kg; name ByP; = ABS( RP* DM_sludge* zinc_C_sludge)/( DM_zinc_concentrate* zinc_C_zinc_concentrate); By-product classification allocatable product; CPC 14290: Other non-ferrous metal ores and concentrates (other than uranium or thorium ores and concentrates)
  Calculated value from the knowledge of the properties of both products.
  production volume 1.45724e6 kg; = ABS( ByP/ RP* RP_PV_1)
  property price 0.38 EUR2005; name ByP_price_EUR2005
  property zinc content 0.53; name zinc_C_zinc_concentrate
  property dry mass 1 kg; name DM_zinc_concentrate
  properties: wet mass 1 kg, water content 0, carbon content, non-fossil 0, carbon content, fossil 0, water in wet mass 0 kg, carbon content 0, carbon allocation 0 kg

## By-products
- zinc concentrate: 0 kg; By-product classification allocatable product; CPC 14290: Other non-ferrous metal ores and concentrates (other than uranium or thorium ores and concentrates)
  Calculated value from the knowledge of the properties of both products.
  production volume 0 kg; = ABS( ByP/ RP* RP_PV_1)
    Calculated from production volume of reference product using the relative outputs.
  property carbon content 0
    carbon content on a dry matter basis (reserved; not for manual entry)
  properties: wet mass 1 kg, water content 0, carbon content, non-fossil 0, carbon content, fossil 0, water in wet mass 0 kg, carbon allocation 0 kg

## Inputs from technosphere
- metalliferous hydroxide sludge: 16.0606 kg
  production volume 2.34041e7 kg
  properties: sulfur content 0.1053, sodium content 0.0163, fluorine content 0.005, oxygen content 0.394, chlorine content 0.176087, phosphorus content 0.01557, potassium content 0.0122, calcium content 0.1045, carbon content, non-fossil 0.0112, carbon content, fossil 0.0082, water content 3, wet mass 1 kg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
  note on sulfur content: Calculated as a production volume weighted average of properties of all the metalliferous hydroxide sludge products produced in the database.
  note on carbon content, non-fossil: Biogene carbon content on a dry matter basis. Calculated as a production volume weighted average of properties of all the metalliferous hydroxide sludge products produced in the database.
  note on carbon content, fossil: Fossil carbon content on a dry matter basis. Calculated as a production volume weighted average of properties of all the metalliferous hydroxide sludge products produced in the database.

## Extrapolations
This dataset has been extrapolated from year 2018 to the year of the calculation (2021). The uncertainty has been adjusted accordingly.
