# flax production

Dataset: EcoSpold 2, unit process
Geography: RoW
Time period: 2016-03-09 to 2021-03-24
Technology level: current
Classification: ISIC rev.4 ecoinvent: 0116:Growing of fibre crops
Classification: EcoSpold01Categories: agricultural production/plant production
Scenario: Business-as-Usual
System model: Allocation, cut-off by classification
Generated by: Archana Datta
Published in: Faist Emmenegger, M. 2018
Database: ecoinvent
isCopyrightProtected: true
accessRestrictedTo: 1

## General comment
This inventory dataset covers the field activity for the production of 1 kg of Flax plant in 2016-17 through Flax cultivation. The transformation of Flax from the Flax plant (green matter) - the Flax retting and dressing process - is not included here.
The dataset incorporates all necessary inputs for the agricultural production of the reference product and is an extrapolation from the respective Indian dataset.
Machinery and fixed overhead are excluded from life cycle inventory for the activity, since the machineries and fixed overheads provide services over several years, and their impacts per kg of Flax plant is very low. The result of this activity is 1 kg Flax green matter.

## Included activities start
This activity begins from land preparation for sowing.

## Included activities end
This activity ends with harvesting of mature flax plant.

## Geography
This dataset is an extrapolation of Indian dataset

## Technology
Cultivation of flax from conventional production standards

## Reference product
- flax plant, harvested: 1 kg; name RP_amount_1; By-product classification allocatable product; CPC 0192: Fibre crops
  production volume 6.36758e8 kg; name RP_PV_1
    Global production volume for “Flax fibre and tow” is 809258000 kg as reported in FAOSTAT. Value refer to year 2016.
    Reference:
    FAOSTAT, accessed at: http://www.fao.org/faostat/en/#data/QC on 4/4/2018
  property price 5.285 EUR2005; name RP_amount_1_price_EUR2005
    Estimated value. Various souces report values corresponding to approximately 7 USD per kg of flax fibre (indiamart.com. Retrieved from: https://dir.indiamart.com/impcat/flax-yarn.html, accessed 1Feb2018; Alibaba.com, 2018. Retrieved from: https://www.alibaba.com/showroom/flax-fiber.html, accessed 1Feb2018).
  property carbon content 0.475
    carbon content on a dry matter basis (reserved; not for manual entry)
  properties: carbon content, non-fossil 0.475, dry mass 0.92 kg, water content 0.0869565, water in wet mass 0.08 kg, carbon content, fossil 0, wet mass 1 kg, carbon allocation 0.437 kg

## Inputs from technosphere
- ammonium sulfate: 3.17e-5 kg; lognormal variance with pedigree 0.0078, pedigree (3,3,3,5,2)
  The data was collected for a hectare area through interview.
  properties: dry mass 1 kg, wet mass 1 kg
- inorganic phosphorus fertiliser, as P2O5: 0 kg; pedigree (1,1,1,1,1)
  The data was collected for a hectare area through interview.
  properties: wet mass 1 kg, dry mass 1 kg
- waste wood, untreated: 0 kg; name BP_amount_1
  Used in burning as fuelwood. The data was collected for a hectare area through interview.
  production volume 0 kg
    Calculated from production volume of main product using relative values.
  property price 0 EUR2005; name BP_amount_1_price_EUR2005
  properties: heating value, net 13.99 MJ
  note on heating value, net: Value taken from the general comment of the treatment dataset.
- potassium sulfate: 2.88594e-5 kg; lognormal variance with pedigree 0.0078, pedigree (3,3,3,5,2)
  The exchange has been updated from 'potassium sulfate, as K2O' into 'potassium sulfate' and therefore its amount has been scaled (multiplied) from 0 kg by 1.85 kg of 'potassium sulfate' per kg of 'potassium sulfate, as K2O'. Original comment of the exchange is: The data was collected for a hectare area through interview.
  properties: wet mass 1 kg, dry mass 1 kg
- irrigation: 0 m3; pedigree (1,1,1,1,1)
  2 irrigations per crop. The data was collected for a hectare area through interview.
  properties: dry mass 0.11 kg, water content 9089.91, wet mass 1000 kg
- packaging, for pesticides: 0.00056 kg; lognormal variance with pedigree 0.0532, pedigree (4,3,3,5,4)
  Total amount of active substance/s of pesticides needed for the production of flax is calculated to be circa 2.80E-04 kg. Pesticide/s used in this dataset is/are: 'mancozeb', 'pendimethalin', 'pesticide, unspecified'. The total amount of active substance/s is doubled in order to account for the packaging of the dilluted product of pesticide/s that is/are applied. Therefore, 5.60E-04 kg of packaging for pesticides is justified with this exchange.
  properties: carbon content, fossil 0.85714, heating value, net 25.97 MJ, dry mass 1 kg, price 0.0642 EUR2005, wet mass 1 kg
- manure, solid, cattle: 0.4 kg; lognormal variance with pedigree 0.0078, pedigree (3,3,3,5,2)
  The data was collected for a hectare area through interview.
  properties: wet mass 1 kg, carbon content, non-fossil 0.441, dry mass 0.22 kg, water content 3.5454
- tillage, harrowing, by rotary harrow: 0.000122713 ha; lognormal variance with pedigree 0.0078, pedigree (3,3,3,5,2)
  The data was collected for a hectare area through interview. The tillage activity was scaled based on the diesel used for tillage in the ecoinvent dataset and the diesel consumption data collected in the project
- inorganic nitrogen fertiliser, as N: 0 kg; pedigree (1,1,1,1,1)
  This exchange is an aggregation of amounts:
  0.0019056058024469616. Comment:
  2.914733548943054E-4. Comment:
  2.914733548943054E-4. Comment:
  2.9556621698507567E-4. Comment:
  7.5554958595991515E-6. Comment:
  7.033565392979665E-5. Comment:
  properties: dry mass 1 kg, wet mass 1 kg
- pesticide, unspecified: 8e-5 kg; lognormal variance with pedigree 0.0078, pedigree (3,3,3,5,2)
  Bavistin used a insecticide. The data was collected for a hectare area through interview.
  properties: dry mass 1 kg, carbon content, fossil 0.486978, wet mass 1 kg
- ammonia, anhydrous, liquid: 0 kg; pedigree (1,1,1,1,1)
  The data was collected for a hectare area through interview.
  properties: dry mass 1 kg, wet mass 1 kg
- mancozeb: 0.00012 kg; lognormal variance with pedigree 0.0078, pedigree (3,3,3,5,2)
  The data was collected for a hectare area through interview.
  properties: wet mass 1 kg, dry mass 1 kg, carbon content, fossil 0.17759
- potassium chloride: 0.00356052 kg; lognormal variance with pedigree 0.0078, pedigree (3,3,3,5,2)
  The exchange has been updated from 'potassium chloride, as K2O' into 'potassium chloride' and therefore its amount has been scaled (multiplied) from 0.0022 kg by 1.5829 kg of 'potassium chloride' per kg of 'potassium chloride, as K2O'. Original comment of the exchange is: The data was collected for a hectare area through interview.
  properties: dry mass 1 kg, wet mass 1 kg
- linseed seed, at farm: 0.0048 kg; lognormal variance with pedigree 0.0078, pedigree (3,3,3,5,2)
  The data was collected for a hectare area through interview.
  properties: carbon content, non-fossil 1, wet mass 1 kg, dry mass 1 kg
- pendimethalin: 8e-5 kg; lognormal variance with pedigree 0.0078, pedigree (3,3,3,5,2)
  The data was collected for a hectare area through interview.
  properties: carbon content, fossil 0.55516, wet mass 1 kg, dry mass 1 kg
- urea: 0 kg; pedigree (1,1,1,1,1)
  The exchange has been updated from 'urea, as N' into 'urea' and therefore its amount has been scaled (multiplied) from 0.0019 kg by 2.1438 kg of 'urea' per kg of 'urea, as N'. Original comment of the exchange is: The data was collected for a hectare area through interview.
  properties: carbon content, fossil 0.2, dry mass 1 kg, wet mass 1 kg
- packaging, for fertilisers: 0.0224002 kg; lognormal variance with pedigree 0.0532, pedigree (4,3,3,5,4)
  Total amount of active substance/s of fertilisers needed for the production of 'flax' is calculated to be circa 1.12E-02 kg. Fertiliser/s used in this dataset is/are: 'ammonia, liquid', 'ammonium nitrate, as N', 'ammonium sulfate, as N', 'nitrogen fertiliser, as N', 'phosphate fertiliser, as P2O5', 'potassium chloride, as K2O', 'potassium fertiliser, as K2O', 'potassium sulfate, as K2O', 'urea, as N'. The total amount of active substance/s is doubled in order to account for the packaging of the dilluted product of fertiliser/s that is/are applied. Therefore, 2.24E-02 kg of packaging for fertilisers is justified with this exchange.
  properties: heating value, net 25.01 MJ, wet mass 1 kg, dry mass 1 kg, carbon content, fossil 0.825301, price 0.0642 EUR2005
  note on carbon content, fossil: Considering a chemical formula (C2H4)n for polyethylene, carbon content-fossil is calculated to be 0.856286 kg of Carbon per kg of dry mass.
- ammonium nitrate: 0 kg; pedigree (1,1,1,1,1)
  The exchange has been updated from 'ammonium nitrate, as N' into 'ammonium nitrate' and therefore its amount has been scaled (multiplied) from 0 kg by 2.8573 kg of 'ammonium nitrate' per kg of 'ammonium nitrate, as N'. Original comment of the exchange is: The data was collected for a hectare area through interview.
  properties: dry mass 1 kg, wet mass 1 kg
- inorganic potassium fertiliser, as K2O: 0 kg; pedigree (1,1,1,1,1)
  The data was collected for a hectare area through interview.
  properties: dry mass 1 kg, wet mass 1 kg
- inorganic phosphorus fertiliser, as P2O5: 2.44495e-5, 3.17212e-5, 2.54002e-5, 0.000198883, 4.19069e-5, 1.72672e-6, 4.55155e-6, 0.00046952, 8.46286e-6, 9.23503e-7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 kg (29 entries); lognormal variance with pedigree 0.0078, pedigree (3,3,3,5,2)
  The data was collected for a hectare area through interview.
- waste wood, untreated: -0.0085638, -0.00106332, -7.7741e-5, -0.000451197, -0.000713305, -0.0135152, -0.113615 kg (7 entries)
  Used in burning as fuelwood. The data was collected for a hectare area through interview.
  production volume 8.78726e7 kg
- irrigation: 0.0024216, 0.000102789, 4.11158e-6, 0.0216475, 0.000354744, 1.77387e-5, 0.00100725, 0.000163948, 0.000799641, 0.000273299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 m3 (16 entries); lognormal variance with pedigree 0.0078, pedigree (3,3,3,5,2)
  2 irrigations per crop. The data was collected for a hectare area through interview.
- inorganic nitrogen fertiliser, as N: 1.4984e-5, 2.15374e-5, 1.92494e-5, 6.76203e-5, 4.03837e-5, 5.00547e-7, 2.99711e-6, 0.00037975, 7.09727e-6, 1.06598e-6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 kg (29 entries); lognormal variance with pedigree 0.0078, pedigree (3,3,3,5,2)
  (same comment as for inorganic nitrogen fertiliser, as N)
- ammonia, anhydrous, liquid: 8.10126e-8, 6.964e-9, 4.6545e-8, 1.08342e-8, 2.14664e-8, 2.20432e-9, 9.8541e-9, 2.33119e-7 kg (8 entries); lognormal variance with pedigree 0.0078, pedigree (3,3,3,5,2)
  The data was collected for a hectare area through interview.
- urea: 0.00306767, 0.00056323, 0.000454339 kg (3 entries); lognormal variance with pedigree 0.0078, pedigree (3,3,3,5,2)
  (same comment as for urea)
- ammonium nitrate: 2.31895e-7, 4.35028e-7, 3.01708e-7 kg (3 entries); lognormal variance with pedigree 0.0078, pedigree (3,3,3,5,2)
  (same comment as for ammonium nitrate)
- inorganic potassium fertiliser, as K2O: 6.2756e-7, 3.10982e-6, 6.30758e-6, 7.79853e-5, 5.58275e-6, 8.07434e-7, 1.34439e-6, 0.000130623, 4.54348e-6, 1.11922e-6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 kg (29 entries); lognormal variance with pedigree 0.0078, pedigree (3,3,3,5,2)
  The data was collected for a hectare area through interview.

## Inputs from nature
- Carbon dioxide, in air [natural resource, in air]: 1.50012 kg; lognormal variance with pedigree 0.0078, pedigree (3,3,3,5,2)
  Calculated Value. This value has been calculated by using the Ecoinvent LCI calculation tool for crop production.
- Energy, gross calorific value, in biomass [natural resource, biotic]: 17.0791 MJ; lognormal variance with pedigree 0.0078, pedigree (3,3,3,5,2)
  (same comment as for Carbon dioxide, in air)
- Transformation, from annual crop, irrigated [natural resource, land]: 0.8 m2; lognormal variance with pedigree 0.0152, pedigree (3,3,3,5,2)
  (same comment as for Carbon dioxide, in air)
- Occupation, annual crop, irrigated [natural resource, land]: 0.0333333 m2*year; lognormal variance with pedigree 0.0092, pedigree (3,3,3,5,2)
  (same comment as for Carbon dioxide, in air)
- Transformation, to annual crop, irrigated [natural resource, land]: 0.8 m2; lognormal variance with pedigree 0.0152, pedigree (3,3,3,5,2)
  (same comment as for Carbon dioxide, in air)

## Emissions to nature
- Cadmium, ion [water, surface water]: 5.81e-10 kg; lognormal variance with pedigree 0.0212, pedigree (4,5,3,5,2)
  (same comment as for Carbon dioxide, in air)
- Copper [soil, agricultural]: -5.05707e-6 kg
  (same comment as for Carbon dioxide, in air)
- Cadmium [soil, agricultural]: -8.63889e-8 kg
  (same comment as for Carbon dioxide, in air)
- Copper, ion [water, ground-]: 1.19e-8 kg; lognormal variance with pedigree 0.0212, pedigree (4,5,3,5,2)
  (same comment as for Carbon dioxide, in air)
- Nickel [soil, agricultural]: -5.6719e-7 kg
  (same comment as for Carbon dioxide, in air)
- Zinc [soil, agricultural]: -1.30566e-5 kg
  (same comment as for Carbon dioxide, in air)
- Lead [water, surface water]: 5.28e-8 kg; lognormal variance with pedigree 0.0212, pedigree (4,5,3,5,2)
  (same comment as for Carbon dioxide, in air)
- Pendimethalin [soil, agricultural]: 8e-5 kg; lognormal variance with pedigree 0.0536, pedigree (4,5,3,5,2)
  (same comment as for Carbon dioxide, in air)
- Chromium, ion [water, ground-]: 7.06e-8 kg; lognormal variance with pedigree 0.0212, pedigree (4,5,3,5,2)
  (same comment as for Carbon dioxide, in air)
- Mercury [soil, agricultural]: -3.26344e-8 kg
  (same comment as for Carbon dioxide, in air)
- Mancozeb [soil, agricultural]: 0.00012 kg; lognormal variance with pedigree 0.0536, pedigree (4,5,3,5,2)
  (same comment as for Carbon dioxide, in air)
- Lead [soil, agricultural]: -3.01812e-7 kg
  (same comment as for Carbon dioxide, in air)
- Lead [water, ground-]: 1.64e-9 kg; lognormal variance with pedigree 0.0212, pedigree (4,5,3,5,2)
  (same comment as for Carbon dioxide, in air)
- Mercury [water, surface water]: 2.31e-10 kg; lognormal variance with pedigree 0.0212, pedigree (4,5,3,5,2)
  (same comment as for Carbon dioxide, in air)
- Mercury [water, ground-]: 4.15e-12 kg; lognormal variance with pedigree 0.0212, pedigree (4,5,3,5,2)
  (same comment as for Carbon dioxide, in air)
- Nickel, ion [water, surface water]: 7.3e-8 kg; lognormal variance with pedigree 0.0212, pedigree (4,5,3,5,2)
  (same comment as for Carbon dioxide, in air)
- Zinc, ion [water, ground-]: 1.08e-7 kg; lognormal variance with pedigree 0.0212, pedigree (4,5,3,5,2)
  (same comment as for Carbon dioxide, in air)
- Water [water, surface water]: 0.012 m3; lognormal variance with pedigree 0.0212, pedigree (4,5,3,5,2)
  (same comment as for Carbon dioxide, in air)
- Nitrate [water, ground-]: 0.00931402 kg; lognormal variance with pedigree 0.0246, pedigree (4,5,3,5,2)
  (same comment as for Carbon dioxide, in air)
- Nitrogen oxides [air, non-urban air or from high stacks]: 0.000419485 kg; lognormal variance with pedigree 0.0212, pedigree (4,5,3,5,2)
  (same comment as for Carbon dioxide, in air)
- Ammonia [air, non-urban air or from high stacks]: 0.00110913 kg; lognormal variance with pedigree 0.0212, pedigree (4,5,3,5,2)
  (same comment as for Carbon dioxide, in air)
- Phosphorus [water, surface water]: 6.79e-6 kg; lognormal variance with pedigree 0.0212, pedigree (4,5,3,5,2)
  (same comment as for Carbon dioxide, in air)
- Zinc, ion [water, surface water]: 1.61e-7 kg; lognormal variance with pedigree 0.0212, pedigree (4,5,3,5,2)
  (same comment as for Carbon dioxide, in air)
- Phosphate [water, surface water]: 2.09e-6 kg; lognormal variance with pedigree 0.0212, pedigree (4,5,3,5,2)
  (same comment as for Carbon dioxide, in air)
- Carbon dioxide, fossil [air, non-urban air or from high stacks]: 0.00449059 kg; lognormal variance with pedigree 0.0212, pedigree (4,5,3,5,2)
  (same comment as for Carbon dioxide, in air)
- Phosphate [water, ground-]: 7.15e-7 kg; lognormal variance with pedigree 0.0212, pedigree (4,5,3,5,2)
  (same comment as for Carbon dioxide, in air)
- Water [water, ground-]: 0.0468 m3; lognormal variance with pedigree 0.0212, pedigree (4,5,3,5,2)
  (same comment as for Carbon dioxide, in air)
- Chromium, ion [water, surface water]: 7.96e-8 kg; lognormal variance with pedigree 0.0212, pedigree (4,5,3,5,2)
  (same comment as for Carbon dioxide, in air)
- Dinitrogen monoxide [air, non-urban air or from high stacks]: 0.000148597 kg; lognormal variance with pedigree 0.0212, pedigree (4,5,3,5,2)
  (same comment as for Carbon dioxide, in air)
- Cadmium, ion [water, ground-]: 1.22e-10 kg; lognormal variance with pedigree 0.0212, pedigree (4,5,3,5,2)
  (same comment as for Carbon dioxide, in air)
- Water [air, non-urban air or from high stacks]: 0.0612 m3; lognormal variance with pedigree 0.0212, pedigree (4,5,3,5,2)
  (same comment as for Carbon dioxide, in air)
- Copper, ion [water, surface water]: 6.58e-8 kg; lognormal variance with pedigree 0.0212, pedigree (4,5,3,5,2)
  (same comment as for Carbon dioxide, in air)
- Chromium [soil, agricultural]: 3.855e-5 kg; lognormal variance with pedigree 0.0606, pedigree (4,5,3,5,2)
  (same comment as for Carbon dioxide, in air)

## Sampling procedure
Data has been collected through field visit and interview. Data has been obtained from a Sunnhemp Research Station in Uttar Pradesh (North India) as they have pioneered the introduction and promoted the cultivation of Flax in India as per optimised technology and expressed willingness to share the data.

## Extrapolations
The data on inputs to the field activites are collected directly from the farmers and farming experts. However, the emission data were not readily available for India. Hence, Ecoinvent LCI calculation tool for crop production was used to calculate field emissions from the cultivation process.
