# treatment of lignite ash, opencast refill

Dataset: EcoSpold 2, unit process
Geography: FR
Time period: 1996-01-01 to 2021-12-31
Technology level: current
Classification: ISIC rev.4 ecoinvent: 3822:Treatment and disposal of hazardous waste
Classification: EcoSpold01Categories: waste management/others
Synonyms: ashes form lignite incineration disposed as backfill in opencast lignite mines
Tags: Treatment; ConvertedDataset
Scenario: Business-as-Usual
System model: Allocation, cut-off by classification
Generated by: Gabor Doka (obsolete)
Published in: Doka G. 2008
Database: ecoinvent
isCopyrightProtected: true
accessRestrictedTo: 1

## General comment
backfilled waste composition is (in ppm): H2O n.a.; O n.a.; H n.a.; C n.a.; S 39492; N n.a.; P 140.95; B 740.95; Cl 17.63; Br 5.6417; F 17.63; I 0.70522; Ag n.a.; As 17.492; Ba 352.61; Cd 2.1427; Co 52.891; Cr 49.365; Cu 21.139; Hg 0.070567; Mn 70.522; Mo 7.0477; Ni 52.814; Pb 17.574; Sb 14.077; Se 5.9644; Sn 5.6417; V 123.33; Zn 98.352; Be 3.5261; Sc 1.763; Sr 246.75; Ti 352.61; Tl 0.070432; W 3.5261; Si 169250; Fe 19041; Ca 70522; Al 16573; K 2115.7; Mg 10578; Na 3173.5;
[This dataset was already contained in the ecoinvent database version 2. It was not individually updated during the transfer to ecoinvent version 3. Life Cycle Impact Assessment results may still have changed, as they are affected by changes in the supply chain, i.e. in other datasets. This dataset was generated following the ecoinvent quality guidelines for version 2. It may have been subject to central changes described in the ecoinvent version 3 change report (http://www.ecoinvent.org/database/ecoinvent-version-3/reports-of-changes/), and the results of the central updates were reviewed extensively. The changes added e.g. consistent water flows and other information throughout the database. The documentation of this dataset can be found in the ecoinvent reports of version 2, which are still available via the ecoinvent website. The change report linked above covers all central changes that were made during the conversion process.]

## Included activities end
This module contains only direct emissions from lignite ash used as backfill in opencast lignite mines: short-term emissions (0-100a) and long-term emissions (>100a) both to ground water. E.g. land-use and energy consumption is *not* included.

## Geography
Ash composition calculated from country-specific coal composition (FR) and technology-specific transfer coefficients in power plant.

## Technology
Lignite ash as backfill in lignite opencast mine (together with tailings)

## Reference product
- lignite ash: -1 kg; CPC 39: Wastes or scraps; By-product classification Waste
  EcoSpold01Location=FR
  production volume 39992.7 kg
    Estimated. Electricity and synthetic natural gas production are responsible for more than 90% of lignite use (https://www.lignite.com/about-lignite/lignite-uses/, accessed 20151008) . The production volume is calculated as the sum of lignite ashes resulting from electricity and heat and power co-generation production from lignite, in the respective country.
  property price 0 EUR2005
    Waste products are assigned a price of zero as they are assumed to require further treatment.
  property carbon content 0
    carbon content on a dry matter basis (reserved; not for manual entry)
  properties: dry mass 1 kg, carbon content, fossil 0, carbon content, non-fossil 0, wet mass 1 kg, water in wet mass 0 kg, water content 0, heating value, net 0 MJ, carbon allocation 0 kg

## Emissions to nature
- Sodium, ion [water, ground-]: 0.0021987 kg; lognormal variance with pedigree 0.55, pedigree (1,1,5,1,1)
  Short-term emission from lignite ash backfill. Uncertainty derived from uncertainty in ash composition and uncertainty in transfer coefficients.
- Vanadium, ion [water, ground-, long-term]: 6.6336e-5 kg; lognormal variance with pedigree 1.07, pedigree (1,1,5,1,1)
  Long-term emission from lignite ash backfill. Uncertainty derived from uncertainty in ash composition and uncertainty in transfer coefficients.
- Mercury [water, ground-]: 1.3952e-11 kg; lognormal variance with pedigree 2.81, pedigree (1,1,5,1,1)
  (same comment as for Sodium, ion)
- Zinc, ion [water, ground-, long-term]: 9.8347e-5 kg; lognormal variance with pedigree 1, pedigree (1,1,5,1,1)
  (same comment as for Vanadium, ion)
- Aluminium [water, ground-]: 2.0606e-5 kg; lognormal variance with pedigree 0.97, pedigree (1,1,5,1,1)
  (same comment as for Sodium, ion)
- Boron [water, ground-, long-term]: 0.00046309 kg; lognormal variance with pedigree 0.79, pedigree (1,1,5,1,1)
  (same comment as for Vanadium, ion)
- Thallium [water, ground-, long-term]: 7.0325e-8 kg; lognormal variance with pedigree 1.95, pedigree (1,1,5,1,1)
  (same comment as for Vanadium, ion)
- Iron, ion [water, ground-, long-term]: 0.012724 kg; lognormal variance with pedigree 0.37, pedigree (1,1,5,1,1)
  (same comment as for Vanadium, ion)
- Cadmium, ion [water, ground-]: 6.0929e-11 kg; lognormal variance with pedigree 2.63, pedigree (1,1,5,1,1)
  (same comment as for Sodium, ion)
- Phosphate [water, ground-, long-term]: 0.00024225 kg; lognormal variance with pedigree 1.04, pedigree (1,1,5,1,1)
  (same comment as for Vanadium, ion)
- Strontium [water, ground-, long-term]: 0.00024637 kg; lognormal variance with pedigree 0.88, pedigree (1,1,5,1,1)
  (same comment as for Vanadium, ion)
- Tin, ion [water, ground-, long-term]: 5.6413e-6 kg; lognormal variance with pedigree 1.38, pedigree (1,1,5,1,1)
  (same comment as for Vanadium, ion)
- Molybdenum [water, ground-]: 7.0477e-6 kg; lognormal variance with pedigree 1.35, pedigree (1,1,5,1,1)
  (same comment as for Sodium, ion)
- Cadmium, ion [water, ground-, long-term]: 2.1426e-6 kg; lognormal variance with pedigree 1.51, pedigree (1,1,5,1,1)
  (same comment as for Vanadium, ion)
- Iodide [water, ground-, long-term]: 7.0522e-14 kg; lognormal variance with pedigree 1.68, pedigree (1,1,5,1,1)
  (same comment as for Vanadium, ion)
- Chloride [water, ground-]: 1.0059e-5 kg; lognormal variance with pedigree 1.24, pedigree (1,1,5,1,1)
  (same comment as for Sodium, ion)
- Magnesium [water, ground-]: 5.0344e-6 kg; lognormal variance with pedigree 1.15, pedigree (1,1,5,1,1)
  (same comment as for Sodium, ion)
- Antimony [water, ground-]: 5.429e-6 kg; lognormal variance with pedigree 1.29, pedigree (1,1,5,1,1)
  (same comment as for Sodium, ion)
- Iodide [water, ground-]: 7.0522e-7 kg; lognormal variance with pedigree 1.65, pedigree (1,1,5,1,1)
  (same comment as for Sodium, ion)
- Cobalt [water, ground-, long-term]: 5.2854e-5 kg; lognormal variance with pedigree 1.09, pedigree (1,1,5,1,1)
  (same comment as for Vanadium, ion)
- Scandium [water, ground-, long-term]: 1.2648e-6 kg; lognormal variance with pedigree 1.54, pedigree (1,1,5,1,1)
  (same comment as for Vanadium, ion)
- Manganese [water, ground-, long-term]: 7.0519e-5 kg; lognormal variance with pedigree 1.05, pedigree (1,1,5,1,1)
  (same comment as for Vanadium, ion)
- Lead [water, ground-, long-term]: 1.7574e-5 kg; lognormal variance with pedigree 1.23, pedigree (1,1,5,1,1)
  (same comment as for Vanadium, ion)
- Silicon [water, ground-, long-term]: 0.12069 kg; lognormal variance with pedigree 0.15, pedigree (1,1,5,1,1)
  (same comment as for Vanadium, ion)
- Sulfate [water, ground-]: 0.031892 kg; lognormal variance with pedigree 0.3, pedigree (1,1,5,1,1)
  (same comment as for Sodium, ion)
- Tin, ion [water, ground-]: 4.4779e-10 kg; lognormal variance with pedigree 2.37, pedigree (1,1,5,1,1)
  (same comment as for Sodium, ion)
- Titanium, ion [water, ground-, long-term]: 0.00035217 kg; lognormal variance with pedigree 0.84, pedigree (1,1,5,1,1)
  (same comment as for Vanadium, ion)
- Beryllium [water, ground-]: 5.3471e-9 kg; lognormal variance with pedigree 2.04, pedigree (1,1,5,1,1)
  (same comment as for Sodium, ion)
- Boron [water, ground-]: 5.8054e-6 kg; lognormal variance with pedigree 1.13, pedigree (1,1,5,1,1)
  (same comment as for Sodium, ion)
- Barium [water, ground-]: 1.22e-8 kg; lognormal variance with pedigree 1.93, pedigree (1,1,5,1,1)
  (same comment as for Sodium, ion)
- Fluoride [water, ground-, long-term]: 1.533e-5 kg; lognormal variance with pedigree 1.23, pedigree (1,1,5,1,1)
  (same comment as for Vanadium, ion)
- Cobalt [water, ground-]: 3.7875e-8 kg; lognormal variance with pedigree 1.78, pedigree (1,1,5,1,1)
  (same comment as for Sodium, ion)
- Selenium [water, ground-, long-term]: 3.6642e-6 kg; lognormal variance with pedigree 1.38, pedigree (1,1,5,1,1)
  (same comment as for Vanadium, ion)
- Calcium, ion [water, ground-]: 2.6691e-5 kg; lognormal variance with pedigree 0.97, pedigree (1,1,5,1,1)
  (same comment as for Sodium, ion)
- Molybdenum [water, ground-, long-term]: 9.5903e-12 kg; lognormal variance with pedigree 1.38, pedigree (1,1,5,1,1)
  (same comment as for Vanadium, ion)
- Bromine [water, ground-, long-term]: 9.5406e-8 kg; lognormal variance with pedigree 1.41, pedigree (1,1,5,1,1)
  (same comment as for Vanadium, ion)
- Potassium, ion [water, ground-]: 0.0011939 kg; lognormal variance with pedigree 0.61, pedigree (1,1,5,1,1)
  (same comment as for Sodium, ion)
- Scandium [water, ground-]: 4.9826e-7 kg; lognormal variance with pedigree 1.58, pedigree (1,1,5,1,1)
  (same comment as for Sodium, ion)
- Manganese [water, ground-]: 2.44e-9 kg; lognormal variance with pedigree 2.14, pedigree (1,1,5,1,1)
  (same comment as for Sodium, ion)
- Tungsten [water, ground-]: 1.3599e-6 kg; lognormal variance with pedigree 1.47, pedigree (1,1,5,1,1)
  (same comment as for Sodium, ion)
- Potassium, ion [water, ground-, long-term]: 0.00092181 kg; lognormal variance with pedigree 0.61, pedigree (1,1,5,1,1)
  (same comment as for Vanadium, ion)
- Sulfate [water, ground-, long-term]: 0.086585 kg; lognormal variance with pedigree 0.26, pedigree (1,1,5,1,1)
  (same comment as for Vanadium, ion)
- Barium [water, ground-, long-term]: 0.0003526 kg; lognormal variance with pedigree 0.84, pedigree (1,1,5,1,1)
  (same comment as for Vanadium, ion)
- Vanadium, ion [water, ground-]: 7.5803e-7 kg; lognormal variance with pedigree 1.4, pedigree (1,1,5,1,1)
  (same comment as for Sodium, ion)
- Nickel, ion [water, ground-]: 8.0088e-8 kg; lognormal variance with pedigree 1.69, pedigree (1,1,5,1,1)
  (same comment as for Sodium, ion)
- Arsenic, ion [water, ground-, long-term]: 1.7492e-14 kg; lognormal variance with pedigree 1.26, pedigree (1,1,5,1,1)
  (same comment as for Vanadium, ion)
- Bromine [water, ground-]: 5.5463e-6 kg; lognormal variance with pedigree 1.38, pedigree (1,1,5,1,1)
  (same comment as for Sodium, ion)
- Iron, ion [water, ground-]: 1.5932e-7 kg; lognormal variance with pedigree 1.62, pedigree (1,1,5,1,1)
  (same comment as for Sodium, ion)
- Phosphate [water, ground-]: 4.0443e-7 kg; lognormal variance with pedigree 1.62, pedigree (1,1,5,1,1)
  (same comment as for Sodium, ion)
- Chromium VI [water, ground-]: 7.4453e-6 kg; lognormal variance with pedigree 1.18, pedigree (1,1,5,1,1)
  (same comment as for Sodium, ion)
- Zinc, ion [water, ground-]: 5.0489e-9 kg; lognormal variance with pedigree 2.05, pedigree (1,1,5,1,1)
  (same comment as for Sodium, ion)
- Aluminium [water, ground-, long-term]: 0.016552 kg; lognormal variance with pedigree 0.35, pedigree (1,1,5,1,1)
  (same comment as for Vanadium, ion)
- Copper, ion [water, ground-, long-term]: 2.1136e-5 kg; lognormal variance with pedigree 1.21, pedigree (1,1,5,1,1)
  (same comment as for Vanadium, ion)
- Titanium, ion [water, ground-]: 4.3843e-7 kg; lognormal variance with pedigree 1.46, pedigree (1,1,5,1,1)
  (same comment as for Sodium, ion)
- Selenium [water, ground-]: 2.3002e-6 kg; lognormal variance with pedigree 1.4, pedigree (1,1,5,1,1)
  (same comment as for Sodium, ion)
- Silicon [water, ground-]: 0.00095502 kg; lognormal variance with pedigree 0.55, pedigree (1,1,5,1,1)
  (same comment as for Sodium, ion)
- Arsenic, ion [water, ground-]: 1.7492e-5 kg; lognormal variance with pedigree 1.23, pedigree (1,1,5,1,1)
  (same comment as for Sodium, ion)
- Lead [water, ground-]: 3.8183e-10 kg; lognormal variance with pedigree 2.39, pedigree (1,1,5,1,1)
  (same comment as for Sodium, ion)
- Tungsten [water, ground-, long-term]: 2.1662e-6 kg; lognormal variance with pedigree 1.45, pedigree (1,1,5,1,1)
  (same comment as for Vanadium, ion)
- Nickel, ion [water, ground-, long-term]: 5.2734e-5 kg; lognormal variance with pedigree 1.09, pedigree (1,1,5,1,1)
  (same comment as for Vanadium, ion)
- Fluoride [water, ground-]: 2.3e-6 kg; lognormal variance with pedigree 1.33, pedigree (1,1,5,1,1)
  (same comment as for Sodium, ion)
- Mercury [water, ground-, long-term]: 7.0553e-8 kg; lognormal variance with pedigree 1.95, pedigree (1,1,5,1,1)
  (same comment as for Vanadium, ion)
- Antimony [water, ground-, long-term]: 8.6483e-6 kg; lognormal variance with pedigree 1.27, pedigree (1,1,5,1,1)
  (same comment as for Vanadium, ion)
- Sodium, ion [water, ground-, long-term]: 0.0009748 kg; lognormal variance with pedigree 0.56, pedigree (1,1,5,1,1)
  (same comment as for Vanadium, ion)
- Strontium [water, ground-]: 3.7418e-7 kg; lognormal variance with pedigree 1.48, pedigree (1,1,5,1,1)
  (same comment as for Sodium, ion)
- Chloride [water, ground-, long-term]: 7.5715e-6 kg; lognormal variance with pedigree 1.24, pedigree (1,1,5,1,1)
  (same comment as for Vanadium, ion)
- Magnesium [water, ground-, long-term]: 0.010573 kg; lognormal variance with pedigree 0.4, pedigree (1,1,5,1,1)
  (same comment as for Vanadium, ion)
- Beryllium [water, ground-, long-term]: 3.5207e-6 kg; lognormal variance with pedigree 1.45, pedigree (1,1,5,1,1)
  (same comment as for Vanadium, ion)
- Calcium, ion [water, ground-, long-term]: 0.070495 kg; lognormal variance with pedigree 0.19, pedigree (1,1,5,1,1)
  (same comment as for Vanadium, ion)
- Thallium [water, ground-]: 1.068e-10 kg; lognormal variance with pedigree 2.55, pedigree (1,1,5,1,1)
  (same comment as for Sodium, ion)
- Copper, ion [water, ground-]: 3.4084e-9 kg; lognormal variance with pedigree 2.1, pedigree (1,1,5,1,1)
  (same comment as for Sodium, ion)
- Chromium VI [water, ground-, long-term]: 4.896e-6 kg; lognormal variance with pedigree 1.16, pedigree (1,1,5,1,1)
  (same comment as for Vanadium, ion)

## Sampling procedure
country-specific calculation based on literature data

## Extrapolations
This dataset has been extrapolated from year 2000 to the year of the calculation (2021). The uncertainty has been adjusted accordingly.

## Review by Niels Jungbluth 2009-01-22
passed.
