# purse seiner maintenance, steel

Dataset: EcoSpold 2, unit process
Geography: RLA
Time period: 2010-01-01 to 2021-12-31
Technology level: current
Classification: ISIC rev.4 ecoinvent: 0311:Marine fishing
Scenario: Business-as-Usual
System model: Allocation, cut-off by classification
Generated by: Angel Avadí
Published in: Avadí, A. 2018
Database: ecoinvent
isCopyrightProtected: true
accessRestrictedTo: 1

## General comment
This dataset represents the maintenance of steel purse seiners, per 1000 kg of light ship weight, based on data from Peru and Ecuador, corresponding to 143+12 vessels for which data was avilable with different levels of detail. Specific data for specific inventory items may be based on sub-samples for which detailed data was available. Vessel dimensions, landings and fuel use were available for roughly 661 purse seiners.
System boundaries and relation between activities

## Included activities start
Maintenance of vessels, including provision of all materials and work

## Included activities end
End of life of replaced materials. Batteries are excluded, as they do not exist in the database

## Geography
Data from Peru, extrapolated to Latin America (RLA)

## Technology
Peru features various shipyards and relevant ship-building and ship-retrofitting expertise.

## Reference product
- purse seiner maintenance, steel: 1 kg; name LSW; = steel+copper+nylon+lead+engine*1000+paint; source Pierre Fréon 2014; By-product classification allocatable product; CPC 8729: Maintenance and repair services of other goods n.e.c.
  Maintenance of a steel purse seiner, per 1000 kg of light ship weight (LSW) over its lifetime. Regressions based on mainly primary data were created to relate the weight of each inventory item to a purse seiner's LSW. The list of inventory items (granularity) contribute >95% of environmental impacts, as described in the reference publication.
  production volume 0.0871654 kg; name prod_vol
    GDP for Latin America as a proportion of the world
  property price 1.32679 EUR2005; name LSW_price_EUR2005
    Calculated based on inputs: The price of the product has been calculated as a sum of the values of the material and energy inputs for this product. This value is therefore a rough estimation. It may underestimate the real price since there are additional expenses when producing any product. These expences can include for example labour costs, treatment of waste materials and profit for the producer. Please consider carefully whether this level of data quality is acceptable for your application.

## By-products
- copper scrap, sorted, pressed: 0 kg; source Pierre Fréon 2014; CPC 39361: Waste and scrap of copper; By-product classification Recyclable
  Waste copper wire
  production volume 0 kg; = prod_vol * (BP_amount_4 / LSW)
    Calculated from production volume of reference product using the relative outputs.
  property price 2.84 EUR2005; name BP_amount_4_price_EUR2005
    Temporary price data. Calculated as 90% of purchasers price based on: Source: USGS Mineral Yearbook 2007, Table 1 in <http://minerals.usgs.gov/minerals/pubs/commodity/recycle/myb1-2007-recyc.pdf>
  property carbon content 0
    carbon content on a dry matter basis (reserved; not for manual entry)
  properties: carbon content, fossil 0, water in wet mass 0 kg, carbon content, non-fossil 0, wet mass 1 kg, water content 0, dry mass 1 kg, carbon allocation 0 kg
- iron scrap, unsorted: 0 kg; source Pierre Fréon 2014; CPC 39310: Slag, dross, scalings and other waste from the manufacture of iron or steel; By-product classification Recyclable
  Waste steel
  production volume 0 kg; = prod_vol * (BP_amount_5 / LSW)
    Calculated from production volume of reference product using the relative outputs.
  property price 0.149 EUR2005; name BP_amount_5_price_EUR2005
    Temporary price data. Calculated as 90% of purchasers price based on: estimated at 85% of sorted scrap
  property carbon content 0
    carbon content on a dry matter basis (reserved; not for manual entry)
  properties: water content 0, dry mass 1 kg, carbon content, fossil 0, wet mass 1 kg, carbon content, non-fossil 0, water in wet mass 0 kg, carbon allocation 0 kg

## Inputs from technosphere
All rows: source Pierre Fréon 2014
- copper, cathode: 0.0203203 kg; = copper
  Copper wire for electric circuit construction, 50% recycled
  properties: wet mass 1 kg, dry mass 1 kg
- lead in car shredder residue: -0.145045 kg; name BP_amount_1; = (lead)*-1
  Waste lead
  production volume 0.0126429 kg; = prod_vol * (BP_amount_1 / LSW)
    Calculated from production volume of reference product using the relative outputs.
  property price 0 EUR2005; name BP_amount_1_price_EUR2005
  properties: wet mass 1 kg, dry mass 1 kg
- waste paint on metal: -0.0226894 kg; name BP_amount_2; = (paint*1/3)*-1
  Waste paint, 2/3 of solids emitted to ocean
  production volume 0.00197773 kg; = prod_vol * (BP_amount_2 / LSW)
    Calculated from production volume of reference product using the relative outputs.
  property price 0 EUR2005; name BP_amount_2_price_EUR2005
  properties: wet mass 1 kg, carbon content, fossil 0.140367, dry mass 1 kg, carbon content, non-fossil 0.199629, heating value, net 19.7 MJ
- waste plastic, mixture: 0 kg; name BP_amount_3
  Waste nylon
  production volume 0 kg
    Calculated from production volume of reference product using the relative outputs.
  property price 0 EUR2005; name BP_amount_3_price_EUR2005
  properties: heating value, net 30.79 MJ, wet mass 1 kg, dry mass 1 kg, carbon content, fossil 0.637168
  note on heating value, net: Value taken from the general comment of the treatment dataset.
- alkyd paint, white, without solvent, in 60% solution state: 0.0680681 kg; name paint; triangular min 0.0680681, mostLikely 0.0680681, max 0.0680681, pedigree (1,3,2,1,1)
  Hull and deck paint, including antifouling, maintenance
  Uncertainty: Data from 143 vessels
  property carbon content, fossil 0.140367; name paint_CCF
  property carbon content, non-fossil 0.199629; name paint_CCNF
  properties: heating value, net 10.3 MJ, wet mass 1 kg, dry mass 1 kg
  note on carbon content, fossil: C content was calculated as an addition of C content in the raw materials.
- marine engine: 3.17317e-5 unit; name engine; triangular min 3.17317e-5, mostLikely 3.17317e-5, max 3.17317e-5, pedigree (3,3,2,1,1)
  Marine diesel engine maintenance
  Uncertainty: Data from 143 vessels, assumptions on replacement/maintenance
  property lifetime capacity [h] 8000 hour; name engine_lifetime_capacity_PMH
  property lifetime 15 year; name engine_lifetime
- lead: 0.145045 kg; triangular min 0.145045, mostLikely 0.145045, max 0.145045, pedigree (2,3,2,1,1)
  Fishing net maintenance
  Uncertainty: Data from 27 vessels
  properties: dry mass 1 kg, wet mass 1 kg
- wire drawing, copper: 0.0203203 kg; name copper; triangular min 0.0203203, mostLikely 0.0203203, max 0.0203203, pedigree (3,3,2,1,1)
  Manufacture of copper wire, 1 replacement over lifetime
  Uncertainty: Assumptions on replacement rates
- nylon 6-6: 0.647648 kg; name nylon; triangular min 0.647648, mostLikely 0.647648, max 0.647648, pedigree (2,3,2,1,1)
  Fishing net maintenance
  Uncertainty: Data from 27 vessels
  property water content 0; name nylon_WC
  property carbon content, fossil 0.637168; name nylon_CCF
  property carbon content, non-fossil 0; name nylon_CCNF
  property dry mass 1 kg; name nylon_DM
  property water in wet mass 0 kg; name nylon_WWM
  properties: heating value, net 30.9 MJ, wet mass 1 kg
  note on heating value, net: Assumed equal to Nylon-66. Reference: Walters, R. N., Hackett, S. M. and Lyon, R. E. (2000) ‘Heats of combustion of high temperature polymers’, Fire and Materials, 24(5), pp. 245–252. doi: 10.1002/1099-1018(200009/10)24:5<245::AID-FAM744>3.0.CO;2-7.
- steel, low-alloyed, hot rolled: 0.0871872 kg; name steel; triangular min 0.0871872, mostLikely 0.0871872, max 0.0871872, pedigree (2,3,2,1,1)
  Steel hull + auxiliary skiff maintenance, sheets
  Uncertainty: Data from 143 vessels
  property carbon content, non-fossil 0; name steel_C_content_non_fossil
  properties: dry mass 1 kg, carbon content, fossil 0.005, wet mass 1 kg
  note on carbon content, non-fossil: Low alloyed steel composition given in Tab. 3.2 ecoinvent v2.2 report 10_partII.
  note on carbon content, fossil: Low alloyed steel composition given in Tab. 3.2 ecoinvent v2.2 report 10_partII. Steel assumed to have a C content of 0.5%
- copper scrap, sorted, pressed: -0.0203203 kg
  Waste copper wire
  production volume 0.00177123 kg
  properties: wet mass 1 kg, dry mass 1 kg
- iron scrap, unsorted: -0.0871872 kg
  Waste steel
  production volume 0.0075997 kg
  properties: dry mass 1 kg, wet mass 1 kg
- waste plastic, mixture: -0.0401435, -0.600806, -0.00669842 kg (3 entries)
  Waste nylon
  production volume 0.0564524 kg

## Emissions to nature
- Solids, inorganic [water, ocean]: 0.0453787 kg; = paint*2/3; source Avadí, A. 2018
  Waste paint, 2/3 of solids emitted to ocean

## Extrapolations
This dataset has been extrapolated from year 2020 to the year of the calculation (2021). The uncertainty has been adjusted accordingly.
