# operation, reefer, cooling, 40-foot, high-cube, carbon dioxide, liquid as refrigerant

Dataset: EcoSpold 2, unit process
Geography: GLO
Time period: 2010-01-01 to 2021-12-31
Technology level: modern
Classification: ISIC rev.4 ecoinvent: 5229:Other transportation support activities
Scenario: Business-as-Usual
System model: Allocation, cut-off by classification
Generated by: Tereza Levova
Database: ecoinvent
isCopyrightProtected: true
accessRestrictedTo: 1

## General comment
This dataset represents operation of a reefer, intermodal shipping container. This datasets represents 1kg of cargo being stored in a container with a certain controlled atmosphere (temperature, humidity, air flow, etc.) for 1 day. Reefer can operate in two basic modes; cooling (temperatures between 0°C and 20°C) and freezing (temperatures between -35°C and -18°C). This dataset represents cooling.
The emissions from a transport carying the container are reported in the transport dataset.
The operation of such reefer depends heavily on type of goods being transported. This is a parametrized dataset (all parametres determining the elementary and intermediate exchanges of the activity are entered as parametres). The default parametres are set to represent average refrigerated storage. If specific cargo is being transported the parametres need to be adjusted accordingly. In general fruits, vegetables and flowers are being cooled during its transport and meat and seafood is frozen during its transport.
The 40-foot container has a capacity of 2TEU.
This reefer is using carbon dioxide, liquid as refrigerant.

## Technology
The most used refrigerant in refrigeration machines is the R134a. Since this refrigerant has a high global warming potential the refrigeration technology producers started producing referigeration machines with alternative refrigerants (Carrier, 2014, http://dms.hvacpartners.com//docs/2000/Public/0D/62-11665.pdf, accessed 20141105). One of them is liquid carbon dioxide.

## Parameters
- utilization rate, maximum payload: 0.65 dimensionless; name UR_max_payload
  Literature value.
  Real measurements from the Port Otago suggest (Fitzgerald, W.B., et al., 2011, Energy use of integral refrigerated containers in maritime transportation), that 40-foot, high-cube reefer caries on average 19.4 tonnes of goods. Which represents (19.4/29.51=) 65.7% of the maximum payload.
  Cross reference;
  One box of bananas occupies a space of (0.4*0.5*0.25=) 0.05m3 and weights 18kg, resulting in 360kg/m3 density. The internal volume of 40-foot, high-cube reefer is 67.5 m3. The boxes with bananas cannot be placed from wall to wall. Some space must be left, so that air circulation is possible. It is estimated, that the boxes with bananas occupy 80% of the space and 20% is left empty for the air circulation. The resulting weight is (0.36*67.5*0.8=) 19.44 tonnes. Which is (19.44/29.51=) 65.9% of the maximum payload.
  In this activity it has been decided, that the utilization rate (from the maximum carying capacity) is 65%.
- average annual refrigerant leakage rate: 0.15 dimensionless; name refrigerant_leakage_rate; lognormal variance with pedigree 0.0166, pedigree (4,5,1,1,1)
  Estimated based on literature value.
  The literature suggest, that the annual leakage rate of the refrigerant is between 10% - 37% (Tassou, 2008, Food transport refrigeration - Approaches to reduce energy consumption and environmental impacts of road transport) and 20% (IPCC, 2005, Special Report: Safeguarding the Ozone Layer and the Global Climate System). The IPCC report also says, that the efficiency of the new systems is higher and the rate of the leakage is lower.
  Expressed as a percentage of the total refrigerant tank volume.
- diesel generator efficiency: 0.351 dimensionless; name diesel_generator_eff; = (1/42.735)/(240/1000/3.6)
  Calculated Value. Energy content of 42.735 MJ/kg diesel assumed.
  The diesel consumption of the diesel-electric generating set is usually reported in g/kWh.
  240g/kWh is the diesel consumption used in this dataset based on literature (http://www.thermoking.com/news-article.aspx?id=396, accessed 20141218).
  Cross reference;
  215k/kWh (http://univpower.en.made-in-china.com/product/AecEiQbUYdhI/China-30kVA-Carrier-Type-Reefer-Clip-on-Container-Diesel-Generator-Genset.html, accessed 20141218)
  205g/kWh (http://oripo.en.alibaba.com/product/1381890449-0/power_diesel_genset_for_reefer_container_with_wuxi_Stamford_generator.html, accessed 20141218)
- reefer, average power consumption: 2.7 kW/TEU; name reefer_power_consumption; lognormal variance with pedigree 0.0106, pedigree (3,5,1,1,1)
  Literature value.
  AVERAGE POWER CONSUMPTION
  2.7kW/TEU in Sorensen, K.K.; Energy Saving Control-Strategies for Reefer Containers, Lodam Electronics
  The actual power consumption of an integral refrigerated container will depend on its operating status. Here, a particularly important role is played by the internal temperature of the container which determines the required evaporation temperature of the refrigerant. Generally the higher the internal temperature, the higher the electrical power consumption and the higher the refrigeration capacity that is available.
  Cross-reference;
  2kW/TEU in Handbook of Sustainability for the Food Science (http://books.google.ch/books?id=gi0QzPIS4_AC&pg=PA325&dq=reefer+power+consumption+kW&hl=cs&sa=X&ei=kryFVNS6IsG7PYmwgLAF#v=onepage&q=reefer%20power%20consumption%20kW&f=false, accessed 20141208)
  3.6kW/TEU in Container Handbook (http://www.containerhandbuch.de/chb_e/wild/index.html, accessed 20141208)
  55kWh/day/container (http://www.maersklinereefer.com/help-contact/faq2, accessed 20150610), i.e. (55/24/2=) 1.4kW/TEU.
  COOLING VERSUS FREEZING
  There are several sources of information (Fitzgerland, 2011, Container Handbook, 2015, Morawicki, 2012) confirming, that cooling has actually higher energy consumption than freezing.
  Fitzgerald states, that in frozen mode, small fluctuations in temperature are insignificant and therefore the cooling compressor can be switched on and off to regulate the internal temperature. This process is known as a duty cycle and helps to save energy as well as control the temperature. Internal air circulation fans are also operated at half speed in frozen mode, which can reduce the power consumption of the fans. In chilled mode however, precise temperature regulation is needed to ensure the contained goods are not damaged or ripen too quickly. Circulating fans are consequently operated at full speed to improve the heat distribution within the container, and the cooling compressor runs continuously.
  The Container Handbook publishes a table (https://www.containerhandbuch.de/chb_e/wild/index.html, accessed 20150619) from a Thermo King manufacturer with specifications regarding the refrigeration capacity and the power consumption of a Thermo King Smart Reefer with different compressor types and refrigerants. All values given in the table are maximum values for full refrigeration capacity and an external temperature of 37.8°C. This occurs, for example, when cooling the cargo.
  indoor temperature of the container - power consumption
  21°C - 5.35 kW/TEU
  2°C - 4.5 kW/TEU
  -18°C - 3 kW/TEU
  -29°C - 2.65 kW/TEU
  Morawicki also confirms, that the energy consumption is actually lower for the freezing mode and suggests the value of 2 kW/TEU.
  The power consumption for both modes of operation have been also discussed with Inga Smith, co-author of Fitzgerald, 2011 article.
  Fitzgerald, W.B., Howitt, O.J.A., Smith, I.J., Hume, A., 2011, Energy use of integral refrigerated containers in maritime transportation, Energy Policy (http://www.physics.otago.ac.nz/eman/documents/fitzgerald_et_al_2011_refn_pers_rev_ver.pdf, accessed 20150618)
  Container Handbook, 2015, Chapter 8.1.2 Actual power consumption (https://www.containerhandbuch.de/chb_e/wild/index.html, accessed 20150618)
  Morawicki, R.O., 2012, Handbook of Sustainability for the Food Sciences (https://books.google.ch/books?id=gi0QzPIS4_AC&printsec=frontcover#v=onepage&q&f=false, accessed 20150618)
  Smith, I., Senior Research Fellow, Department of Physics at Otago University, New Zealand, (http://www.otago.ac.nz/physics/staff/IngaSmith.html, accessed 20150618), personal communication, 20150618
- initial refrigerant charge: 4.5 kg; name initial_refrigerant_charge; lognormal variance with pedigree 0.0166, pedigree (4,5,1,1,1)
  Literature value. Copied from the refrigerated machine production dataset.

## Reference product
- operation, reefer, cooling: 1 kg*day; CPC 65: Freight transport services; By-product classification allocatable product
  production volume 3.51594e10 kg*day; = ((65.11*1000000*1000)*0.1*0.54)*10
    Calculated value based on literature values and estimates (Dekker, 2014, Global reefer trades - 2014, Dewry, accessed 20141022).
    The unit of kg*days is rather abstract. The production volume than represents the total amount of kg of goods transported in the reefers multiplied by the total amount of days each kilogram is stored in the reefer. It is estimated, that each kg transported spend 10 days in the reefer.
    65.11 mil. tons is the amount of perishable goods transported in 2012 by reefers.
    10% of this amount is estimated to be transported by reefer which uses carbon dioxide, liquid as refrigerant.
    According to literature (Drawry, 2008, published in http://www.hamburg-sued.com/group/media/sharedmedia/dokumente/brochures/Reefer_guide.pdf, accessed 20141216) the type of food transported in reefers is following;
    31% fresh fruits and vegetables (excl. bananas)
    20% bananas
    24% meat and poultry
    19% fish and seafood
    6% various (medicine, flowers, etc.)
    The fruits and vegetables (54%) need to be cooled during its storage and transport and the meat and seafood (46%) need to be frozen. The various is divided half/half between cooling and freezing.
    It is estimated, that each kilogram stays on average in the reefer for 10 days.
  property price 0.00165113 EUR2005
    Calculated based on inputs: The price of the product has been calculated as a sum of the values of the material and energy inputs for this product. This value is therefore a rough estimation. It may underestimate the real price since there are additional expenses when producing any product. These expences can include for example labour costs, treatment of waste materials and profit for the producer. Please consider carefully whether this level of data quality is acceptable for your application.

## Inputs from technosphere
- reefer, intermodal shipping container, 40-foot, high-cube, carbon dioxide, liquid as refrigerant: 1.13865e-8 unit; name container_in; = 1/(reefer_RP_lifetime_capacity_kg_day*utilization_rate); lognormal variance with pedigree 0.0186, pedigree (4,5,3,1,1)
  Calculated value.
  property utilization rate 0.266; name utilization_rate; = 0.38*0.7
  property lifetime capacity [kg*day] 3.30164e8 kg*day; name reefer_RP_lifetime_capacity_kg_day; = container_in_capacity_cargo/(32.9E+6*0.0625)*6.51E+10*(1/0.7)*reefer_lifetime*365
  property maximum payload 29510 kg; name max_payload
  property capacity, cargo 2 TEU; name container_in_capacity_cargo
  property lifetime 10 year; name reefer_lifetime
  note on utilization rate: Calculated value based on assumptions and literature values. The utilization rate in case of intermodal shipping containers covers several aspects; 1) How many days is the container actually being used? Based on literature (http://people.hofstra.edu/geotrans/eng/ch3en/conc3en/containerlifespan.html) and average container is 56% of its lifetime empty (not being used) and 6% of its lifetime in in repair. Therefore it is being used only in 38% of its lifetime, i.e. 138.7 days per year. 2) How much of the maximum payload is actually being transported? 70% is the utilization rate - weight, the container carry 70% (in kg) of what they could be able to carry
  note on lifetime capacity [kg*day]: Calculated value. 65.11 mil. tons is the amount of perishable goods transported in 2012 by reefers (Dekker, 2014, Global reefer trades - 2014, Dewry, accessed 20141022). 32.9 million TEU (Twenty-foot Equivalent unit) is current global capacity of shipping containers in the world (World Shipping Council, http://www.worldshipping.org/about-the-industry/containers/global-container-fleet, accessed 20141014). Out of that 6.25% are reefers (refrigerated containers). One 40-food, high-cube container has a capacity of 2 TEU. 70% is the utilization rate - weight, the container carry 70% (in kg) of what they could be able to carry
  note on maximum payload: Industrial data. The maxiumum payload of a refrigerated container.
  note on capacity, cargo: Literature value. The 40-foot container has a cargo capacity of 2 TEU. It does not matter, that the container is high-cube and thus has actually bigger volume than the non high-cube container.
- diesel, burned in diesel-electric generating set, 18.5kW: 0.0692975 MJ; = UnitConversion(((reefer_power_consumption* container_in_capacity_cargo*24)/ (max_payload* UR_max_payload)), 'kWh', 'MJ')/ diesel_generator_eff; lognormal variance with pedigree 0.0186, pedigree (4,5,3,1,1)
  Calculated value.
  It is estimated, that the reefer is carying only 70% of its maximal payload.
  While the containers can carry around 29 ton (depends of the container size) it does not mean, that they are actually carrying this maximum payload.
  65.11 million tonnes have been transported in reefers in the year 2012 (Dekker, N., 2014, Global reefer trades - 2014, Drewry Maritime Research).
  2.056 million TEU is the global capacity of reefers currently on operation (http://www.worldshipping.org/about-the-industry/containers/global-container-fleet, accessed 20141208).
  The resulting utilization rate (related to maximum payload) is 0.15.
  An diesel generator efficiency of 35.1% is assumed (see paramter comment).
- carbon dioxide, liquid: 0 kg; name refrigerant_in; pedigree (1,1,1,1,1)
  Calculated value.
  property carbon content, fossil 0.272727; name DM_carbon_dioxide_in
  properties: heating value, net 8.27 MJ, dry mass 1 kg, wet mass 1 kg
- maintenance, reefer, intermodal shipping container, 40-foot, high-cube: 1.13865e-8 unit; = container_in
  Calculated value.
- carbon dioxide, liquid: 1.33655e-8, 6.34931e-8 kg (2 entries); lognormal variance with pedigree 0.0186, pedigree (4,5,3,1,1)
  Calculated value.
  properties: heating value, net 8.27 MJ, dry mass 1 kg, carbon content, fossil 0.272727, wet mass 1 kg

## Emissions to nature
- Carbon dioxide, fossil [air, unspecified]: 2.09614e-8 kg; = refrigerant_in* DM_carbon_dioxide_in; lognormal variance with pedigree 0.0186, pedigree (4,5,3,1,1)
  Calculated value.

## Extrapolations
This dataset has been extrapolated from year 2014 to the year of the calculation (2021). The uncertainty has been adjusted accordingly.
