# transport, passenger, electric bicycle, electricity from renewable energy products

Dataset: EcoSpold 2, unit process
Geography: RoW
Time period: 2005-01-01 to 2021-12-31
Technology level: current
Classification: EcoSpold01Categories: transport systems/road
Classification: ISIC rev.4 ecoinvent: 4922:Other passenger land transport
Synonyms: e-bike
Scenario: Business-as-Usual
System model: Allocation, cut-off by classification
Generated by: Lucia Valsasina
Published in: M. Leuenberger 2010
Database: ecoinvent
isCopyrightProtected: true
accessRestrictedTo: 1

## General comment
The data set reflects the transport of one person on one kilometer on an electric bicycle. Capacity utilisation: 1 person
[This dataset was already contained in the ecoinvent database version 2. It was not individually updated during the transfer to ecoinvent version 3. Life Cycle Impact Assessment results may still have changed, as they are affected by changes in the supply chain, i.e. in other datasets. This dataset was generated following the ecoinvent quality guidelines for version 2. It may have been subject to central changes described in the ecoinvent version 3 change report (http://www.ecoinvent.org/database/ecoinvent-version-3/reports-of-changes/), and the results of the central updates were reviewed extensively. The changes added e.g. consistent water flows and other information throughout the database. The documentation of this dataset can be found in the ecoinvent reports of version 2, which are still available via the ecoinvent website. The change report linked above covers all central changes that were made during the conversion process.]

## Included activities end
This data includes the operation, maintenance and disposal of an electric bicycle and the use of the road infrastructure. For e-bike operation Swiss certified electricity is used.

## Geography
Data for transport in Switzerland

## Technology
Transport using Swiss certified electricity mix. Life expectancy: 15000km

## Reference product
- transport, passenger, electric bicycle, electricity from renewable energy products: 1 person*km; CPC 64119: Other land transportation services of passengers, n.e.c.; By-product classification allocatable product
  EcoSpold01Location=CH
  production volume 3.96633 person*km; name RP_PV_1
    Estimated. The global production volume is extrapolated from the swiss production volume using the nominal GDP of 2005 (source: United Nations, http://data.un.org/Glossary.aspx?q=GDP+%28current+US%24%29, accessed 20130726 and 20130312).
    Gross domestic product (GDP) at current prices is GDP at prices of the current reporting period. Also known as nominal GDP.
  property price 0.160962 EUR2005
    Calculated based on inputs: The price of the product has been calculated as a sum of the values of the material and energy inputs for this product. This value is therefore a rough estimation. It may underestimate the real price since there are additional expenses when producing any product. These expences can include for example labour costs, treatment of waste materials and profit for the producer. Please consider carefully whether this level of data quality is acceptable for your application.

## Inputs from technosphere
- used electric bicycle: -6.6667e-5 unit; name BP_amount_2; lognormal variance with pedigree 0.3106, pedigree (2,1,4,5,1)
  EcoSpold01Location=CH
  Estimation: eBike 15'000km
  Uncertainty: Estimation: eBike 15'000km
  production volume 0.000264423 unit; = RP_PV_1* BP_amount_2
    Calculated from the production volume of transport, passenger, electric bicycle, label-certified electricity in proportion to the respective output amounts.
  property price 0 EUR2005; name BP_amount_2_price_EUR2005
  properties: carbon content, fossil 0.128436, dry mass 24 kg, wet mass 24 kg
  note on carbon content, fossil: Calculated from C content in input materials in the infrastructure
- energy use and operation emissions, electric bicycle, electricity from renewable energy products: 1 km; lognormal variance with pedigree 0.13, pedigree (1,1,4,5,1)
  EcoSpold01Location=CH
  Defined by laws and physics
  Uncertainty: defined by laws and physics
- maintenance, electric bicycle: 6.6667e-5 unit; lognormal variance with pedigree 0.3106, pedigree (2,1,4,5,1)
  EcoSpold01Location=CH
  Estimation: eBike 15'000km
  Uncertainty: Estimation: eBike 15'000km
- electric bicycle: 6.6667e-5 unit; lognormal variance with pedigree 0.3106, pedigree (2,1,4,5,1)
  EcoSpold01Location=RER
  Estimation: eBike 15'000km
  Uncertainty: Estimation: eBike 15'000km
- road: 5.2899e-5 m*year; lognormal variance with pedigree 0.43, pedigree (4,1,5,5,4)
  EcoSpold01Location=CH
  Allocation of road use according to gross ton kilometre performance
  Uncertainty: allocation of road use according to gross ton kilometre performance

## Sampling procedure
Literature

## Extrapolations
Etrapolated from swiss dataset

## Review by Emilia Moreno Ruiz 2015-10-16
PV adjusted/GLO created
