# uranium production, enriched 4.2%, centrifugal enrichment

Dataset: EcoSpold 2, unit process
Geography: CH
Time period: 1980-01-01 to 2021-12-31
Technology level: current
Classification: EcoSpold01Categories: nuclear power/production
Classification: ISIC rev.4 ecoinvent: 2011:Manufacture of basic chemicals
Tags: ConvertedDataset
Scenario: Business-as-Usual
System model: Allocation, cut-off by classification
Generated by: Roberto Dones
Published in: Dones, R. 2007
Database: ecoinvent
isCopyrightProtected: true
accessRestrictedTo: 1

## General comment
Modeled is the operation of a plant fabricating UO2 fuel for light water nuclear reactors (PWR and BWR), with no MOX (mixed oxides), no RepU (reprocessed fuel), and no HEU (highly enriched uranium from warheads) fuel elements. Hence the radioactive emissions (and spectrum) as well as the radioactive solid waste may have been somewhat underestimated. Data for the operation of a nuclear fuel fabrication facility are relatively old but emissions to water are complete for a US plant. Radioactive emissions to air and water have been taken or derived from two commercial German facilities: both (one operational, the other closed) exhibit emissions per unit of product fuel much lower than data published in the 1980s. An average value of the two plants is used. Zirconium for cladding is modelled as chromium, for lack of complete information on its metallurgical process; the uncertainty value reflects only the amount. This module is linked with one enrichment module with specific characteristics for the mix or enrichment processes and electricity supply mix; hence, before using the cumulated results of this module the conditions for enrichment should be verified.
[This dataset was already contained in the ecoinvent database version 2. It was not individually updated during the transfer to ecoinvent version 3. Life Cycle Impact Assessment results may still have changed, as they are affected by changes in the supply chain, i.e. in other datasets. This dataset was generated following the ecoinvent quality guidelines for version 2. It may have been subject to central changes described in the ecoinvent version 3 change report (http://www.ecoinvent.org/database/ecoinvent-version-3/reports-of-changes/), and the results of the central updates were reviewed extensively. The changes added e.g. consistent water flows and other information throughout the database. The documentation of this dataset can be found in the ecoinvent reports of version 2, which are still available via the ecoinvent website. The change report linked above covers all central changes that were made during the conversion process.]

## Included activities end
The module includes: input of enriched uranium given in terms of separative work units per kg enriched uranium; electricity and light fuel oil used for operation; zirconium requirements for the cladding; water use and wastewater treatment; cement assumed to be used for conditioning of contaminated scrap from decommissioning; transport requirements of operation materials, industrial wastes, and contaminated waste from decommissioning. Radioactive and non-radioactive emissions to air and to water from the operation are also included. The infrastructure requirements are accounted for, though construction and operation data partially refer to different plants rather than to one single unit.

## Geography
North American and European conditions

## Technology
Information regards facilities operating in the 1980s, with few more recent data.

## Parameters
- fraction, water, decarbonised, to air: 0.3875 dimensionless; name fraction_WDC_to_air; = fraction_CW_to_air; lognormal variance with pedigree 0.092025, pedigree (4,4,3,2,4)
  Calculated value. See comments in the other parametres present in this dataset. Decarbonised water is considered to be always used as cooling water, thus cooling water fractions to air are applied to all carbonised water input flows to calculate the amount of water consumed in the processes.
- fraction, cooling water, cooling pond system, to air: 0.032 dimensionless; name fraction_CW_CP_to_air; lognormal variance with pedigree 0.0413, pedigree (2,3,1,3,1)
  Calculated based on literature value (Scown, C.D., 2011, Water Footprint of U.S. Transportation Fuels and supplying information of the article) (Vionnet, S., Quantis Water Database - Technical Report, 2012).
- fraction, cooling water, once-through system, to air: 0.004 dimensionless; name fraction_CW_OT_to_air; lognormal variance with pedigree 0.0413, pedigree (2,3,1,3,1)
  (same comment as for fraction, cooling water, cooling pond system, to air)
- fraction, cooling water, recirculating system, to air: 0.771 dimensionless; name fraction_CW_R_to_air; lognormal variance with pedigree 0.0413, pedigree (2,3,1,3,1)
  (same comment as for fraction, cooling water, cooling pond system, to air)
- fraction, cooling water, to air: 0.3875 dimensionless; name fraction_CW_to_air; = (0.5*fraction_CW_OT_to_air)+(0.5*fraction_CW_R_to_air); lognormal variance with pedigree 0.092025, pedigree (4,4,3,2,4)
  Calculated value based on literature value (see comments of the other parametres present in this dataset) and expert opinion. In the case when no industry/literature data are available about the type of cooling or directly fraction, cooling water, to air specific for the process a default assumption is applied. It is assumed that the once-through cooling system is used in 50% of all cases and recirculating system is used in another 50% of all cases.

## Reference product
- enriched uranium, 4.2%: 1 kg; CPC 33620: Uranium enriched in U235 and its compounds; plutonium and its compounds; alloys, dispersions, ceramic products[…]; By-product classification allocatable product
  EcoSpold01Location=CH
  production volume 0.0336675 kg
    This is a placeholder value that does not reflect real-world production volumes. This dataset does not currently require a real-world production volume to work in the database framework, and no actual data were collected yet. This has no negative effect on the results of the ecoinvent database. The placeholder value of this activity was scaled according to the nominal GDP of 2005 (source: United Nations, http://data.un.org/Glossary.aspx?q=GDP+%28current+US%24%29, accessed 20130726) to reflect an appropriate share of the global production volume, which is also a placeholder value.
  property price 586 EUR2005
    UN Data. Commodity: Uranium (enriched 235), plutonium compounds, alloys. Average import price (trade/quantity) Germany-France.
  property carbon content 0
    carbon content on a dry matter basis (reserved; not for manual entry)
  properties: carbon content, fossil 0, water content 0, wet mass 1 kg, dry mass 1 kg, water in wet mass 0 kg, carbon content, non-fossil 0, carbon allocation 0 kg

## Inputs from technosphere
- low level radioactive waste: -0.000333 m3; lognormal variance with pedigree 0.34, pedigree (1,1,5,1,1)
  EcoSpold01Location=CH
  own assumption
  production volume 0.000333 m3
    Calculated from the production volume of enriched uranium, 4.2% in proportion to the respective output amounts.
  properties: dry mass 2500 kg, wet mass 2500 kg
- nuclear fuel factory: 3.7e-8 unit; lognormal variance with pedigree 0.08, pedigree (1,1,5,1,1)
  own estimation
  EcoSpold01Location=GLO
- wastewater, unpolluted: -0.135 m3; lognormal variance with pedigree 0.16, pedigree (1,1,5,1,1)
  EcoSpold01Location=CH
  old reference
  production volume 0.135 m3
    (same comment as for low level radioactive waste)
  properties: carbon content, fossil 0.00178991, carbon content, non-fossil 0.00178991, wet mass 1000 kg, water content 2962.17, dry mass 0.337476 kg
  note on carbon content, fossil: Assumed to be like in tap water. Bicarbonate content is 2.93 mol/m3. CO2 content is 0.1 mol/m3 (ecoinvent v2.2 report 8, Tab 93.1).
- electricity, medium voltage: 36 kWh; lognormal variance with pedigree 0.16, pedigree (1,1,5,1,1)
  EcoSpold01Location=UCTE
  old reference & own assumption
- water, decarbonised: 300 kg; name water_decarbonised_input; lognormal variance with pedigree 0.16, pedigree (1,1,5,1,1)
  EcoSpold01Location=RER
  old reference
  properties: wet mass 1 kg
- chromium: 0.6 kg; lognormal variance with pedigree 0.04, pedigree (1,1,5,1,1)
  EcoSpold01Location=RER
  estimation on number, not on module substituting Zr
  properties: dry mass 1 kg, wet mass 1 kg
- cement, unspecified: 0.0065 kg; lognormal variance with pedigree 0.16, pedigree (1,1,5,1,1)
  own assumption
  EcoSpold01Location=CH
  properties: wet mass 1 kg, dry mass 1 kg
- inert waste, for final disposal: -0.8 kg; lognormal variance with pedigree 0.04, pedigree (1,1,5,1,1)
  EcoSpold01Location=CH
  own assumption
  production volume 0.8 kg
    (same comment as for low level radioactive waste)
  properties: water content 0.00502513, dry mass 0.995 kg, wet mass 1 kg
- uranium, enriched 4.2%, per separative work unit: 6.12 unit; lognormal variance with pedigree 0.04, pedigree (1,1,5,1,1)
  calculated
  EcoSpold01Location=CH
  properties: dry mass 1 kg, wet mass 1 kg
- heat, district or industrial, other than natural gas: 30.4 MJ; lognormal variance with pedigree 0.16, pedigree (1,1,5,1,1)
  EcoSpold01Location=CH
  old reference & own assumption
  properties: heating value, net 1 MJ

## Emissions to nature
- Boron [water, surface water]: 6.39e-5 kg; lognormal variance with pedigree 0.16, pedigree (1,1,5,1,1)
  old reference
- Iron, ion [water, surface water]: 0.000153 kg; lognormal variance with pedigree 0.16, pedigree (1,1,5,1,1)
  old reference
- VOC, volatile organic compounds, unspecified origin [water, surface water]: 0.0894 kg; lognormal variance with pedigree 0.16, pedigree (1,1,5,1,1)
  old reference
- Molybdenum [water, surface water]: 2.75e-5 kg; lognormal variance with pedigree 0.16, pedigree (1,1,5,1,1)
  old reference
- Ammonium, ion [water, surface water]: 0.0581 kg; lognormal variance with pedigree 0.16, pedigree (1,1,5,1,1)
  old reference
- Calcium, ion [water, surface water]: 0.083 kg; lognormal variance with pedigree 0.16, pedigree (1,1,5,1,1)
  old reference
- TOC, Total Organic Carbon [water, surface water]: 0.00614815 kg; lognormal variance with pedigree 0.16, pedigree (1,1,5,1,1)
  Calculated by default as TOC (gC) = COD/2.7 (COD measured in g O2). Should more correctly be calculated from the carbon content of the specified emissions to water.
- Uranium alpha [air, non-urban air or from high stacks]: 0.0001 kBq; lognormal variance with pedigree 0.34, pedigree (1,1,5,1,1)
  few recent data, or too old data
- Fluoride [water, surface water]: 0.0358 kg; lognormal variance with pedigree 0.16, pedigree (1,1,5,1,1)
  old reference
- COD, Chemical Oxygen Demand [water, surface water]: 0.0166 kg; lognormal variance with pedigree 0.16, pedigree (1,1,5,1,1)
  old reference
- Oils, unspecified [water, surface water]: 0.00128 kg; lognormal variance with pedigree 0.16, pedigree (1,1,5,1,1)
  old reference
- Phosphorus [water, surface water]: 0.000217 kg; lognormal variance with pedigree 0.16, pedigree (1,1,5,1,1)
  old reference
- Nickel, ion [water, surface water]: 0.000147 kg; lognormal variance with pedigree 0.16, pedigree (1,1,5,1,1)
  old reference
- Nitrogen [water, surface water]: 0.0703 kg; lognormal variance with pedigree 0.16, pedigree (1,1,5,1,1)
  old reference
- NMVOC, non-methane volatile organic compounds, unspecified origin [air, non-urban air or from high stacks]: 0.0033 kg; lognormal variance with pedigree 0.16, pedigree (1,1,5,1,1)
  old reference
- Suspended solids, unspecified [water, surface water]: 0.0023 kg; lognormal variance with pedigree 0.16, pedigree (1,1,5,1,1)
  old reference
- Silver, ion [water, surface water]: 2.17e-5 kg; lognormal variance with pedigree 0.16, pedigree (1,1,5,1,1)
  old reference
- Water [water, unspecified]: 0.04875 m3; name water_to_water_unspecified; = (water_decarbonised_input/1000)*(1-fraction_WDC_to_air)-0.135; lognormal variance with pedigree 0.0807, pedigree (2,2,5,1,1)
  Calculated value based on literature values and expert opinion. See comments in the parametres' comment field.
  property fraction, origin: unspecified 0; name fraction_origin_unspecified_Ww
  property fraction, origin: salt water 0; name fraction_origin_salt_water_Ww
  property fraction, origin: fresh water 1; name fraction_origin_fresh_water_Ww
  property wet mass 1000 kg; name WM
  property carbon content, fossil 0; name C_content_fossil
  property water in wet mass 1000 kg; name WWM
  property dry mass 0 kg; name DM
  property carbon content, non-fossil 0; name C_content_non_fossil
- Magnesium [water, surface water]: 0.000402 kg; lognormal variance with pedigree 0.16, pedigree (1,1,5,1,1)
  old reference
- Water [air, unspecified]: 0.11625 m3; name water_to_air_unspecified; = (water_decarbonised_input/1000*fraction_WDC_to_air); lognormal variance with pedigree 0.0807, pedigree (2,2,5,1,1)
  (same comment as for Water)
  property fraction, origin: fresh water 1; name fraction_origin_fresh_water
  property fraction, origin: unspecified 0; name fraction_origin_unspecified
  property fraction, origin: salt water 0; name fraction_origin_salt_water
- Sulfite [water, surface water]: 0.000185 kg; lognormal variance with pedigree 0.16, pedigree (1,1,5,1,1)
  old reference
- Nitrogen oxides [air, non-urban air or from high stacks]: 0.03 kg; lognormal variance with pedigree 0.16, pedigree (1,1,5,1,1)
  old reference
- Uranium alpha [water, surface water]: 0.8 kBq; lognormal variance with pedigree 0.34, pedigree (1,1,5,1,1)
  few recent data, or too old data
- Sulfate [water, surface water]: 0.0121 kg; lognormal variance with pedigree 0.16, pedigree (1,1,5,1,1)
  old reference
- DOC, Dissolved Organic Carbon [water, surface water]: 0.00614815 kg; lognormal variance with pedigree 0.16, pedigree (1,1,5,1,1)
  Calculated as equal to TOC.
- Manganese [water, surface water]: 1.02e-5 kg; lognormal variance with pedigree 0.16, pedigree (1,1,5,1,1)
  old reference
- BOD5, Biological Oxygen Demand [water, surface water]: 0.00313 kg; lognormal variance with pedigree 0.16, pedigree (1,1,5,1,1)
  old reference
- Sodium, ion [water, surface water]: 0.00894 kg; lognormal variance with pedigree 0.16, pedigree (1,1,5,1,1)
  old reference
- Chloride [water, surface water]: 0.00703 kg; lognormal variance with pedigree 0.16, pedigree (1,1,5,1,1)
  old reference

## Sampling procedure
Literature

## Extrapolations
This dataset has been extrapolated from year 2000 to the year of the calculation (2021). The uncertainty has been adjusted accordingly.

## Review by Hans-Jörg Althaus 2007-10-26
Passed
