# sodium sulfate production, from natural sources

Dataset: EcoSpold 2, unit process
Geography: RoW
Time period: 2000-01-01 to 2021-12-31
Technology level: current
Classification: ISIC rev.4 ecoinvent: 2011:Manufacture of basic chemicals
Synonyms: Salt cake; 7757-82-6; Thenardite; SODIUM SULFATE; Disodium sulfate; Sodium sulphate
Scenario: Business-as-Usual
System model: Allocation, cut-off by classification
Generated by: Roland Hischier
Published in: Althaus H.-J. 2007
Database: ecoinvent
isCopyrightProtected: true
accessRestrictedTo: 1

## General comment
This dataset represents the production of 1 kg of sodium sulfate obtained by exploitation of naturally occuring sodium sulfate. Sodium sulfate is used for the production of soap and detergents, textiles, pulp and paper, glass and for a variety of other uses – e.g. carpet fresheners or starch manufacturing. Sodium sulfate is found in nature in the anhydrous form (thenardite) or the decahydrate form (Glauber's salt). Sodium sulfate is also produced chemically – either as a by-product of other processes or as the main product of a process. As Glauber’s salt is not a commercial product according to von Plessen (2000), this dataset models the exploitation of the anhydrous form of sodium sulfate.
The resource amounts used in this dataset are based on an estimated production yield. The energy consumption is estimated based on a similar process (NaCl exploitation). The infrastructure, emissions and waste are estimated.
References:
Althaus H.-J., Chudacoff M., Hischier R., Jungbluth N., Osses M. and Primas A. (2007) Life Cycle Inventories of Chemicals. ecoinvent report No. 8, v2.0. EMPA Dübendorf, Swiss Centre for Life Cycle Inventories, Dübendorf, CH.
von Plessen, H. 2000. Sodium Sulfates. Ullmann's Encyclopedia of Industrial Chemistry.

## Included activities start
The activity starts with the extraction of sodium sulfate in the ground.

## Included activities end
This activity ends with the production of sodium sulfate.

## Geography
The data used has no specific geographical origin. It is assumed to be representative of the production processes in this geography.

## Technology
A variety of different processes are used for the production of sodium sulphate from natural resources. Several of these processes use shallow basins, where water is evaporated naturally during hot weather. In a second step, the precipitated minerals containing sodium sulphate are then taken out of these basins for further treatment. Another possibility is the use of floating dredges for the mining of permanent deposits of sodium sulphate containing rock. No data were available for any type of exploitation of natural sources of sodium sulphate. Thus, the following assumptions are used:
- The overall yield for the sodium sulphate minerals is assumed to be 95% - thus per kg of sodium sulphate, from natural resources, 1.05 kg of sodium sulphate minerals is needed.
- For the first step (evaporation of water from a brine of sodium sulphate minerals) no environmental burdens are taken into account.
- For the further treatment, the energy consumption is approximated by the energy consumption for the sodium chloride production. Besides the energy, no further input is taken into account. Concerning emissions to air and water, it is assumed that 50% of the surplus input of sodium sulphate is eliminated in the water and 50% is eliminated within the inert waste that is assumed to be landfilled.
- Infrastructure: As no specific information is available, the infrastructure is estimated based on data from a large chemical plant.
References:
Althaus H.-J., Chudacoff M., Hischier R., Jungbluth N., Osses M. and Primas A. (2007) Life Cycle Inventories of Chemicals. Final report ecoinvent data v2.0 No. 8. EMPA, Swiss Centre for Life Cycle Inventories, Dübendorf, CH.

## Reference product
- sodium sulfate, anhydrite: 1 kg; name RP; CPC 34240: Phosphates of triammonium; salts and peroxysalts of inorganic acids and metals n.e.c.; By-product classification allocatable product; CAS 7757-82-6
  Sodium sulfate is used for the production of soap and detergents, textiles, pulp and paper, glass and for a variety of other uses – e.g. carpet fresheners or starch manufacturing. Sodium sulfate is found in nature in the anhydrous form (thenardite) or the decahydrate form (Glauber's salt).
  production volume 7.56e9 kg; name RP_PV
    The value is given in kg. Annual production volume (2012), based on USGS available here https://s3-us-west-2.amazonaws.com/prd-wret/assets/palladium/production/mineral-pubs/sodium-sulfate/mcs-2013-nasul.pdf
  property price 0.191 EUR2005
    Temporary price data. Calculated as 90% of purchasers price based on: 2004 Import/Export data (total trades (USD) divided by total weight (kg) in EU27, USA, China, Japan and India) from UN Commodity Trade Statistics Database (http://data.un.org/Explorer.aspxDatabase [Accessed 2 July 2010]). Commodity: Sodium sulphates other than disodium sulphate
  property carbon content 0
    carbon content on a dry matter basis (reserved; not for manual entry)
  properties: carbon content, non-fossil 0, water in wet mass 0 kg, wet mass 1 kg, water content 0, carbon content, fossil 0, dry mass 1 kg, carbon allocation 0 kg

## Inputs from technosphere
- chemical factory, organics: 2e-10 unit; lognormal variance with pedigree 0.3498, pedigree (2,3,5,4,3)
  Calculated based on literature data published by the industry. For this activity, no information was readily available concerning infrastructure and land-use. Therefore, the infrastructure is estimated based on data from two chemical factories, the BASF site of Ludwigshafen and the chemical factory in Gendorf (which are both located in Germany), which produce a wide range of chemical substances. Based on this data, the following assumptions are made: the built area amounts to about 4.2 ha, the plant has an average output of 50'000 t/a and a lifespan of fifty years. The estimated infrastructure amount is therefore 4.00 E-10 units per kg of produced chemical. Additional assumptions were made in the case of this dataset.
  References:
  Althaus H.-J., Chudacoff M., Hischier R., Jungbluth N., Osses M. and Primas A. (2007) Life Cycle Inventories of Chemicals. ecoinvent report No. 8, v2.0. EMPA Dübendorf, Swiss Centre for Life Cycle Inventories, Dübendorf, CH.
  Gendorf (2000) Umwelterklärung 2000, Werk Gendorf. Werk Gendorf, Burgkirchen.
- diesel, burned in building machine: 0.00428 MJ; lognormal variance with pedigree 0.27, pedigree (1,5,5,5,5)
  Estimated, based on NaCl production data
  Uncertainty: e
  properties: heating value, net 1 MJ
- electricity, medium voltage: 0 kWh; pedigree (1,1,1,1,1)
  Estimated, based on NaCl production data
  Uncertainty: e
- inert waste, for final disposal: -0.03 kg; name BP_inert_waste_for_final_disposal; lognormal variance with pedigree 0.27, pedigree (1,5,5,5,5)
  Estimated, based on NaCl production data
  Uncertainty: e
  production volume 2.268e8 kg; = RP_PV*BP_inert_waste_for_final_disposal/ABS(RP)
    Calculated from the production volume of sodium sulfate, anhydrite in proportion to the respective output amounts.
  property price 0 EUR2005; name BP_inert_waste_for_final_d_price_EUR2005
  properties: wet mass 1 kg, dry mass 0.995 kg, water content 0.00502513
- heat, district or industrial, other than natural gas: 0 MJ; pedigree (1,1,1,1,1)
  Estimated, based on NaCl production data
  Uncertainty: e
  properties: heating value, net 1 MJ
- electricity, medium voltage: 0.00214288, 0.000410913, 0.00689837, 0.100331, 0.0141416, 0.0460756 kWh (6 entries); lognormal variance with pedigree 0.27, pedigree (1,5,5,5,5)
  Estimated, based on NaCl production data
  Uncertainty: e
- heat, district or industrial, other than natural gas: 7.35499e-5, 0.181376 MJ (2 entries); lognormal variance with pedigree 0.27, pedigree (1,5,5,5,5)
  Estimated, based on NaCl production data
  Uncertainty: e

## Inputs from nature
- Sodium sulphate, various forms, in ground [natural resource, in ground]: 1.05 kg; lognormal variance with pedigree 0.1786, pedigree (4,5,5,5,5)
  Assumption of yield = 95%
  Uncertainty: a

## Emissions to nature
- Sulfate [water, surface water]: 0.0258 kg; lognormal variance with pedigree 0.23, pedigree (5,5,5,5,4)
  Assuming 2.5% of input material as emission
  Uncertainty: a

## Sampling procedure
Estimations based on similar processes.

## Extrapolations
This dataset has been copied from an original dataset covering the geography RER. The uncertainty has been adjusted accordingly.

## Review by Gregor Wernet 2017-08-04
This dataset was additionally reviewed in a separate review process by Eric Johnson of Atlantic Consulting as well as Emilia Moreno Ruiz and Gregor Wernet of ecoinvent.
