# treatment of wastewater from medium density fibreboard production, capacity 5E9l/year

Dataset: EcoSpold 2, unit process
Geography: RoW
Time period: 2012-01-01 to 2021-12-31
Technology level: current
Classification: ISIC rev.4 ecoinvent: 3700:Sewerage
Classification: EcoSpold01Categories: waste management/wastewater treatment
Tags: Treatment
Scenario: Business-as-Usual
System model: Allocation, cut-off by classification
Generated by: Frank Werner
Database: ecoinvent
isCopyrightProtected: true
accessRestrictedTo: 1

## General comment
Wastewater purified in a medium size municipal wastewater treatment plant (capacity class 3), with an average capacity size of 24900 per-captia-equivalents PCE.
The treated waste water has the following composition (see sampling procedure for source):
Wastewater contains (in kg/m3): BOD: 0.00651 (GSD=122.5%); DOC: 0.0608 (GSD=122.5%); Ntot.: 0.006802 (GSD=122.5%); PO4-P: 0.00001044 (GSD=122.5%); Cr: 0.0000669 (GSD=223.8%); Cu: 0.0000334 (GSD=223.8%); Zn: 0.000048 (GSD=223.8%);
[This dataset is meant to replace the following datasets:]

## Included activities end
Infrastructure materials for municipal wastewater treatment plant, transports, dismantling. Land use burdens.

## Geography
Specific to the technology mix encountered in Switzerland in 2000. Well applicable to modern treatment practices in Europe, North America or Japan.

## Technology
Three stage wastewater treatment (mechanical, biological, chemical) including sludge digestion (fermentation) according to the average technology in Switzerland

## Parameters
- fraction, process water, to air: 0.1 dimensionless; lognormal variance with pedigree 0.092025, pedigree (4,4,3,2,4)
- scaling factor: 7.40942 dimensionless; name scaling_factor

## Reference product
- wastewater from medium density board production: -1 m3; = -0.134963325183374 * scaling_factor; CPC 39920: Sewage sludge; By-product classification Waste
  Amount was scaled to 1.
  production volume 3.538e7 m3; name p_board
    Extrapolated from RER production to GLO production of the board, assuming the same quantity of wastewater per m3
  property price 0 EUR2005
    Waste products are assigned a price of zero as they are assumed to require further treatment.

## Inputs from technosphere
- electricity, for reuse in municipal waste incineration only: 0 kWh; pedigree (1,1,1,1,1)
  Amount was scaled to the amount of reference product.
- waste cement, hydrated: -0.000139 kg; name w_cement; = (1.8759902200489E-05 * scaling_factor)*-1; lognormal variance with pedigree 0.05, pedigree (1,1,4,5,1)
  EcoSpold01Location=CH
  burden from sludge incineration. Uncertainty calculated from wastewater composition and treatment model
  Amount was scaled to the amount of reference product.
  production volume 0 kg
    calculated by the system
  property price 0 EUR2005; name w_cement_price_EUR2005
  properties: dry mass 1 kg, wet mass 1 kg
- aluminium sulfate, powder: 1.34e-5 kg; lognormal variance with pedigree 0.035, pedigree (1,1,4,5,1)
  Amount was scaled to the amount of reference product.
  properties: dry mass 1 kg, wet mass 1 kg
- waste graphical paper: 0 kg; name w_paper; pedigree (1,1,1,1,1)
  EcoSpold01Location=CH
  direct wastewater treatment plant burden. Uncertainty calculated from wastewater composition and treatment model
  Amount was scaled to the amount of reference product.
  production volume 0 kg
    calculated by the system
  property price 0 EUR2005; name w_paper_price_EUR2005
  properties: dry mass 0.888 kg, wet mass 1 kg, carbon content, non-fossil 0.454955, water content 0.126126, heating value, net 14.12 MJ
  note on heating value, net: Value taken from the general comment of the treatment dataset.
- sodium hydroxide, without water, in 50% solution state: 1.43e-6 kg; lognormal variance with pedigree 0.035, pedigree (1,1,4,5,1)
  Amount was scaled to the amount of reference product.
  properties: dry mass 1 kg, wet mass 1 kg, heating value, net 3.03 MJ
- process-specific burdens, municipal waste incineration: 0.0565 kg; lognormal variance with pedigree 0.02, pedigree (1,1,4,5,1)
  burden from sludge incineration. Uncertainty calculated from wastewater composition and treatment model
  Amount was scaled to the amount of reference product.
  EcoSpold01Location=CH
- process-specific burdens, residual material landfill: 0.000122 kg; lognormal variance with pedigree 0.04, pedigree (1,1,4,5,1)
  (same comment as for process-specific burdens, municipal waste incineration)
- quicklime, milled, packed: 2.6e-7 kg; lognormal variance with pedigree 0.035, pedigree (1,1,4,5,1)
  Amount was scaled to the amount of reference product.
  properties: dry mass 0.99 kg, wet mass 1 kg, water content 0.010101
- hydrochloric acid, without water, in 30% solution state: 1.836e-8 kg; lognormal variance with pedigree 0.12, pedigree (1,1,4,5,1)
  EcoSpold01Location=RER
  burden from sludge incineration. Uncertainty calculated from wastewater composition and treatment model
  Amount was scaled to the amount of reference product.
  properties: wet mass 1 kg, dry mass 1 kg, heating value, net 3.32 MJ
- process-specific burdens, slag landfill: 0.000229 kg; lognormal variance with pedigree 0.04, pedigree (1,1,4,5,1)
  (same comment as for waste cement, hydrated)
- iron (III) chloride, without water, in 40% solution state: 7.26e-5 kg; lognormal variance with pedigree 0.16, pedigree (1,1,4,5,1)
  Amount was scaled to the amount of reference product.
  properties: wet mass 1 kg, dry mass 1 kg
- sewer grid, 5E9l/year, 110 km: 2.17e-7 km; = 2.92870415647922E-08 * scaling_factor; lognormal variance with pedigree 0.01, pedigree (1,1,4,5,1)
  EcoSpold01Location=CH
  uncertainty heeded in exchanges of the module
  Amount was scaled to the amount of reference product.
- residual material landfill: 2.54e-13 unit; lognormal variance with pedigree 0.04, pedigree (1,1,4,5,1)
  (same comment as for process-specific burdens, municipal waste incineration)
- ammonia, anhydrous, liquid: 0 kg; pedigree (1,1,1,1,1)
  Amount was scaled to the amount of reference product.
  properties: dry mass 1 kg, wet mass 1 kg
- wastewater treatment facility, capacity 5E9l/year: 5.688e-9 unit; = 7.67671393643032E-10 * scaling_factor; lognormal variance with pedigree 0.01, pedigree (1,1,4,5,1)
  (same comment as for sewer grid, 5E9l/year, 110 km)
- electricity, low voltage: 0 kWh; pedigree (1,1,1,1,1)
  (same comment as for waste graphical paper)
- titanium dioxide: 8.15e-7 kg; = 1.0999511002445E-07 * scaling_factor; lognormal variance with pedigree 0.035, pedigree (1,1,4,5,1)
  Amount was scaled to the amount of reference product.
  properties: dry mass 1 kg, wet mass 1 kg
- slag landfill: 4.063e-13 unit; lognormal variance with pedigree 0.04, pedigree (1,1,4,5,1)
  (same comment as for process-specific burdens, municipal waste incineration)
- chemical, inorganic: 3.26e-8 kg; = 4.39980440097799E-09 * scaling_factor; lognormal variance with pedigree 0.12, pedigree (1,1,4,5,1)
  EcoSpold01Location=GLO
  burden from sludge incineration. Uncertainty calculated from wastewater composition and treatment model
  Amount was scaled to the amount of reference product.
  properties: wet mass 1 kg, carbon content, fossil 0.003, dry mass 1 kg
  note on carbon content, fossil: This dataset is an unweighted average of 20 inorganic substances (listed in Tab 88.1, ecoinvent v2.2 report 8, part II), being part of the top100 chemicals included in this database. The C-content has also been calculated as an unweighted average of the C content of the substances composing this dataset.
- chromium oxide, flakes: 1.66e-8 kg; = 2.24039119804401E-09 * scaling_factor; lognormal variance with pedigree 0.035, pedigree (1,1,4,5,1)
  Amount was scaled to the amount of reference product.
  properties: wet mass 1 kg, dry mass 1 kg
- waste plastic, mixture: 0 kg; name w_plastic; pedigree (1,1,1,1,1)
  (same comment as for waste graphical paper)
  production volume 0 kg
    calculated by the system
  property price 0 EUR2005; name w_plastic_price_EUR2005
  properties: heating value, net 30.79 MJ, water content 0.180638, dry mass 0.847 kg, carbon content, fossil 0.747344, wet mass 1 kg
  note on carbon content, fossil: C content in 1 kg DM was calculated using data in Tab A.2, ecoinvent v2.2 report 13_I
- heat, for reuse in municipal waste incineration only: 0 MJ; pedigree (1,1,1,1,1)
  Amount was scaled to the amount of reference product.
- municipal waste incineration facility: 1.41e-11 unit; lognormal variance with pedigree 0.02, pedigree (1,1,4,5,1)
  (same comment as for waste cement, hydrated)
- iron sulfate: 4.95e-5 kg; lognormal variance with pedigree 0.16, pedigree (1,1,4,5,1)
  Amount was scaled to the amount of reference product.
  properties: dry mass 1 kg, wet mass 1 kg
- cement, unspecified: 0 kg; pedigree (1,1,1,1,1)
  (same comment as for process-specific burdens, municipal waste incineration)
  properties: wet mass 1 kg, dry mass 1 kg
- electricity, for reuse in municipal waste incineration only: 0.000275904, 6.62748e-6, 2.93216e-6, 0.000109936, 0.0077046 kWh (5 entries); lognormal variance with pedigree 0.035, pedigree (1,1,4,5,1)
  Amount was scaled to the amount of reference product.
- waste graphical paper: -0.000758025, -0.000115754, -1.01216e-5, -0.000418268, -4.07846e-5, -7.54965e-5, -0.0140816 kg (7 entries); lognormal variance with pedigree 0.01, pedigree (1,1,4,5,1)
  (same comment as for waste graphical paper)
- ammonia, anhydrous, liquid: 5.97397e-6, 5.13534e-7, 7.98927e-7, 1.58296e-6, 1.55088e-6, 1.62549e-7, 7.26654e-7, 1.71905e-5 kg (8 entries); lognormal variance with pedigree 0.16, pedigree (1,1,4,5,1)
  Amount was scaled to the amount of reference product.
- electricity, low voltage: 0.000792834, 0.00014436, 0.00232438, 0.0356866, 0.00577346, 0.0165784 kWh (6 entries); lognormal variance with pedigree 0.13, pedigree (1,1,4,5,1)
  (same comment as for waste graphical paper)
- waste plastic, mixture: -0.00190479, -0.000127271, -9.62528e-6, -5.25674e-5, -2.12366e-5, -4.99177e-5, -0.0133346 kg (7 entries); lognormal variance with pedigree 0.01, pedigree (1,1,4,5,1)
  (same comment as for waste graphical paper)
- heat, for reuse in municipal waste incineration only: 0.00125435, 3.01306e-5, 1.33305e-5, 0.000499803, 0.0456024 MJ (5 entries); lognormal variance with pedigree 0.035, pedigree (1,1,4,5,1)
  Amount was scaled to the amount of reference product.
- cement, unspecified: 1.95941e-6, 1.43513e-7, 4.0906e-7, 9.25103e-6, 2.72285e-7, 2.9905e-6, 3.61816e-7, 4.04124e-5 kg (8 entries); lognormal variance with pedigree 0.05, pedigree (1,1,4,5,1)
  (same comment as for process-specific burdens, municipal waste incineration)

## Emissions to nature
- Nitrate [water, ground-, long-term]: 2.03e-5 kg; lognormal variance with pedigree 0.16, pedigree (1,1,4,5,1)
  Amount was scaled to the amount of reference product.
- NMVOC, non-methane volatile organic compounds, unspecified origin [air, urban air close to ground]: 1.55e-6 kg; = 2.0919315403423E-07 * scaling_factor; lognormal variance with pedigree 0.3, pedigree (1,1,4,5,1)
  direct digester gas emission. Uncertainty calculated from wastewater composition and treatment model
  Amount was scaled to the amount of reference product.
- Cyanide [air, urban air close to ground]: 5.08e-7 kg; = 6.8561369193154E-08 * scaling_factor; lognormal variance with pedigree 0.16, pedigree (1,1,4,5,1)
  Amount was scaled to the amount of reference product.
- Phosphate [water, ground-, long-term]: 7.76e-7 kg; lognormal variance with pedigree 0.16, pedigree (1,1,4,5,1)
  Amount was scaled to the amount of reference product.
- BOD5, Biological Oxygen Demand [water, ground-, long-term]: 9.49e-5 kg; = 1.28080195599022E-05 * scaling_factor; lognormal variance with pedigree 0.16, pedigree (1,1,4,5,1)
  emission from sludge incineration. Uncertainty calculated from wastewater composition and treatment model
  Amount was scaled to the amount of reference product.
- Phosphorus [air, urban air close to ground]: 6.63e-9 kg; lognormal variance with pedigree 0.16, pedigree (1,1,4,5,1)
  Amount was scaled to the amount of reference product.
- Chromium VI [water, ground-, long-term]: 3.48e-6 kg; = 4.69672371638142E-07 * scaling_factor; lognormal variance with pedigree 0.16, pedigree (1,1,4,5,1)
  Amount was scaled to the amount of reference product.
- Carbon dioxide, non-fossil [air, urban air close to ground]: 0.1745 kg; = 0.0235511002444988 * scaling_factor; lognormal variance with pedigree 0.07, pedigree (1,1,4,5,1)
  direct wastewater treatment plant emission plus direct digester gas emission plus emission from sludge incineration. Uncertainty calculated from wastewater composition and treatment model
  Amount was scaled to the amount of reference product.
- Chromium [air, urban air close to ground]: 2.436e-12 kg; lognormal variance with pedigree 0.16, pedigree (1,1,4,5,1)
  Amount was scaled to the amount of reference product.
- Copper, ion [water, ground-, long-term]: 1.99e-5 kg; = 2.68577017114914E-06 * scaling_factor; lognormal variance with pedigree 0.16, pedigree (1,1,4,5,1)
  Amount was scaled to the amount of reference product.
- Ammonium, ion [water, surface water]: 0.00267 kg; = 0.000360352078239609 * scaling_factor; lognormal variance with pedigree 0.16, pedigree (1,1,4,5,1)
  Amount was scaled to the amount of reference product.
- Copper [air, urban air close to ground]: 1.82e-10 kg; = 2.45633251833741E-11 * scaling_factor; lognormal variance with pedigree 0.16, pedigree (1,1,4,5,1)
  Amount was scaled to the amount of reference product.
- Iron, ion [water, ground-, long-term]: 1.95e-5 kg; lognormal variance with pedigree 0.16, pedigree (1,1,4,5,1)
  Amount was scaled to the amount of reference product.
- Nitrate [water, surface water]: 0.0117 kg; = 0.00157907090464548 * scaling_factor; lognormal variance with pedigree 0.16, pedigree (1,1,4,5,1)
  Amount was scaled to the amount of reference product.
- Zinc [air, urban air close to ground]: 5.41e-10 kg; = 7.30151589242054E-11 * scaling_factor; lognormal variance with pedigree 0.16, pedigree (1,1,4,5,1)
  Amount was scaled to the amount of reference product.
- Aluminium [water, ground-, long-term]: 1.56e-6 kg; lognormal variance with pedigree 0.16, pedigree (1,1,4,5,1)
  Amount was scaled to the amount of reference product.
- Nitrogen [water, surface water]: 0.0001187 kg; = 1.60201466992665E-05 * scaling_factor; lognormal variance with pedigree 0.16, pedigree (1,1,4,5,1)
  Amount was scaled to the amount of reference product.
- Iron [air, urban air close to ground]: 1.39e-9 kg; lognormal variance with pedigree 0.16, pedigree (1,1,4,5,1)
  Amount was scaled to the amount of reference product.
- Zinc, ion [water, ground-, long-term]: 5.14e-7 kg; = 6.93711491442543E-08 * scaling_factor; lognormal variance with pedigree 0.16, pedigree (1,1,4,5,1)
  Amount was scaled to the amount of reference product.
- Nitrogen oxides [air, urban air close to ground]: 0.000176 kg; = 2.37535452322738E-05 * scaling_factor; lognormal variance with pedigree 0.16, pedigree (1,1,4,5,1)
  Amount was scaled to the amount of reference product.
- Aluminium [air, urban air close to ground]: 3.3e-9 kg; lognormal variance with pedigree 0.16, pedigree (1,1,4,5,1)
  Amount was scaled to the amount of reference product.
- Water [air, unspecified]: 0.1 m3; = 0.0134963325183374 * scaling_factor; lognormal variance with pedigree 0.0507, pedigree (2,2,4,5,1)
  Calculated value based on water balance.
  Amount was scaled to the amount of reference product.
- Ammonia [air, urban air close to ground]: 1.807e-5 kg; = 2.43878728606357E-06 * scaling_factor; lognormal variance with pedigree 0.16, pedigree (1,1,4,5,1)
  Amount was scaled to the amount of reference product.
- Sulfate [water, surface water]: 4.26e-5 kg; lognormal variance with pedigree 0.16, pedigree (1,1,4,5,1)
  Amount was scaled to the amount of reference product.
- Water [water, unspecified]: 0.9 m3; = 0.121466992665037 * scaling_factor; lognormal variance with pedigree 0.0507, pedigree (2,2,4,5,1)
  (same comment as for Water)
  property dry mass 0 kg; name DM
  property wet mass 1000 kg; name WM
  property water in wet mass 1000 kg; name WWM
  property carbon content, fossil 0; name C_content_fossil
  property carbon content, non-fossil 0; name C_content_non_fossil
- Dinitrogen monoxide [air, urban air close to ground]: 3.37e-5 kg; = 4.54826405867971E-06 * scaling_factor; lognormal variance with pedigree 0.16, pedigree (1,1,4,5,1)
  Amount was scaled to the amount of reference product.
- Nitrite [water, surface water]: 0.000156 kg; = 2.10542787286064E-05 * scaling_factor; lognormal variance with pedigree 0.16, pedigree (1,1,4,5,1)
  Amount was scaled to the amount of reference product.
- TOC, Total Organic Carbon [water, ground-, long-term]: 0.000115 kg; = 1.5520782396088E-05 * scaling_factor; lognormal variance with pedigree 0.16, pedigree (1,1,4,5,1)
  (same comment as for BOD5, Biological Oxygen Demand)
- Phosphate [water, surface water]: 1.13e-5 kg; lognormal variance with pedigree 0.16, pedigree (1,1,4,5,1)
  Amount was scaled to the amount of reference product.
- COD, Chemical Oxygen Demand [water, surface water]: 0.0383 kg; = 0.00516909535452323 * scaling_factor; lognormal variance with pedigree 0.01, pedigree (1,1,4,5,1)
  sewer overload discharge plus direct wastewater treatment plant emission plus emission from sludge incineration. Uncertainty calculated from wastewater composition and treatment model
  Amount was scaled to the amount of reference product.
- Chloride [water, surface water]: 4.44e-5 kg; lognormal variance with pedigree 0.16, pedigree (1,1,4,5,1)
  Amount was scaled to the amount of reference product.
- Methane, non-fossil [air, urban air close to ground]: 0.000341 kg; = 4.60224938875306E-05 * scaling_factor; lognormal variance with pedigree 0.18, pedigree (1,1,4,5,1)
  direct digester gas emission plus emission from sludge incineration. Uncertainty calculated from wastewater composition and treatment model
  Amount was scaled to the amount of reference product.
- Chromium VI [water, surface water]: 3.5e-5 kg; = 4.72371638141809E-06 * scaling_factor; lognormal variance with pedigree 0.16, pedigree (1,1,4,5,1)
  Amount was scaled to the amount of reference product.
- DOC, Dissolved Organic Carbon [water, ground-, long-term]: 0.000115 kg; = 1.5520782396088E-05 * scaling_factor; lognormal variance with pedigree 0.16, pedigree (1,1,4,5,1)
  (same comment as for BOD5, Biological Oxygen Demand)
- Copper, ion [water, surface water]: 8.66e-6 kg; = 1.16878239608802E-06 * scaling_factor; lognormal variance with pedigree 0.16, pedigree (1,1,4,5,1)
  Amount was scaled to the amount of reference product.
- COD, Chemical Oxygen Demand [water, ground-, long-term]: 0.00029 kg; = 3.91393643031785E-05 * scaling_factor; lognormal variance with pedigree 0.16, pedigree (1,1,4,5,1)
  (same comment as for BOD5, Biological Oxygen Demand)
- Zinc, ion [water, surface water]: 1.48e-5 kg; = 1.99745721271394E-06 * scaling_factor; lognormal variance with pedigree 0.16, pedigree (1,1,4,5,1)
  Amount was scaled to the amount of reference product.
- TOC, Total Organic Carbon [water, surface water]: 0.0097 kg; = 0.00130914425427873 * scaling_factor; lognormal variance with pedigree 0.09, pedigree (1,1,4,5,1)
  (same comment as for COD, Chemical Oxygen Demand)
- Iron, ion [water, surface water]: 1.42e-8 kg; lognormal variance with pedigree 0.16, pedigree (1,1,4,5,1)
  Amount was scaled to the amount of reference product.
- Carbon monoxide, non-fossil [air, urban air close to ground]: 0.000112 kg; = 1.51158924205379E-05 * scaling_factor; lognormal variance with pedigree 0.2, pedigree (1,1,4,5,1)
  (same comment as for Methane, non-fossil)
- Aluminium [water, surface water]: 1.76e-10 kg; lognormal variance with pedigree 0.16, pedigree (1,1,4,5,1)
  Amount was scaled to the amount of reference product.
- BOD5, Biological Oxygen Demand [water, surface water]: 0.000617 kg; = 8.32723716381418E-05 * scaling_factor; lognormal variance with pedigree 0.1, pedigree (1,1,4,5,1)
  (same comment as for COD, Chemical Oxygen Demand)
- Chromium, ion [water, surface water]: 1.05e-7 kg; = 1.41711491442543E-08 * scaling_factor; lognormal variance with pedigree 0.16, pedigree (1,1,4,5,1)
  Amount was scaled to the amount of reference product.
- DOC, Dissolved Organic Carbon [water, surface water]: 0.009311 kg; = 0.0012566435207824 * scaling_factor; lognormal variance with pedigree 0.01, pedigree (1,1,4,5,1)
  (same comment as for COD, Chemical Oxygen Demand)

## Sampling procedure
Survey among member companies of the European Panel Federation; generation of dataset with ecoinvent 2.0 tool for treatment of wastewater

## Review by Emilia Moreno Ruiz 2015-01-29
Correction on nitrate emission to groundwater long term
