# manganese production

Dataset: EcoSpold 2, unit process
Geography: RER
Time period: 2003-01-01 to 2021-12-31
Technology level: current
Classification: EcoSpold01Categories: metals/extraction
Classification: ISIC rev.4 ecoinvent: 2420:Manufacture of basic precious and other non-ferrous metals
Tags: ConvertedDataset
Scenario: Business-as-Usual
System model: Allocation, cut-off by classification
Share of production covered: 0 %
Generated by: Mischa Classen
Published in: Althaus H.-J. 2000
Database: ecoinvent
isCopyrightProtected: true
accessRestrictedTo: 1

## General comment
This dataset describes the production of 1 kg manganese, at plant, in 1994. It is designed solely for the use of the metal in special applications like sputtering or as alloying element. No information is available on the share of the two major production processes, a ratio electrothermal/electrolysis of 75/25 is assumed.This module is explicitly not to be used as alloying element in bulk iron or steel industry. It does not consider secondary sources of manganese. Process data is based on rough estimations, the overall data quality is very poor.
[This dataset was already contained in the ecoinvent database version 2. It was not individually updated during the transfer to ecoinvent version 3. Life Cycle Impact Assessment results may still have changed, as they are affected by changes in the supply chain, i.e. in other datasets. This dataset was generated following the ecoinvent quality guidelines for version 2. It may have been subject to central changes described in the ecoinvent version 3 change report (http://www.ecoinvent.org/database/ecoinvent-version-3/reports-of-changes/), and the results of the central updates were reviewed extensively. The changes added e.g. consistent water flows and other information throughout the database. The documentation of this dataset can be found in the ecoinvent reports of version 2, which are still available via the ecoinvent website. The change report linked above covers all central changes that were made during the conversion process.]

## Included activities start
From the transport of materials for the electrolysis process.

## Included activities end
This activity ends with the production of manganese through electrothermal decomposition of manganese ores, at the factory gate.

The dataset includes the electrolysis of aqueous manganese salts.

The dataset does not include the material input and output of the electrolytic process, nor the consumption of chemicals for reduction and leaching and the emissions correspondent to their use, nor the transport of metal inputs for the electrothermal process, nor the overall majority of inputs and outputs for the electrothermal process.

## Geography
No informations were available on production or consumption mix.

## Technology
The metal is won by electrolysis (25%) and electrothermic processes (75%).
ELECTROLYSIS OF AQUEOUS MANGANESE SALTS
The production of manganese metal by the electrolysis of aqueous manganese salts requires at first a milling of the manganese ore. Milling increases the active surface and ensures sufficient reactivity in both the reduction and the subsequent leaching steps. After milling the manganese ore is fed to a rotary kiln where the reduction and calcination takes place. This process is carried out at about 850 - 1000 ºC in a reducing atmosphere. As a reducing agent, several carbon sources can be used e.g. anthracite, coal, charcoal and hydrocarbon oil or natural gas. The cal-cined ore needs to be cooled below 100 ºC to avoid a further re-oxidation. The subsequent leaching process is carried out with recycled electrolyte, mainly sulphuric acid. After leaching and filtration the iron content is removed from the solution by oxidative precipitation and the nickel and cobalt are removed by sulphide precipitation. The purified electrolyte is then treated with SO2 in order to ensure plating of γ-Mn during electrolysis. Electrolysis is carried out in diaphragm cells. The cathode is normally made of stainless steel or titanium. For the anode lead-calcium or lead-silver alloy can be used. After an appropriate reaction time the cathodes are removed from the electrolysis bath. The manganese that is deposited on the cathode starter-sheet is stripped off mechanically and then washed and dried. The metal is crushed to produce metal flakes or powder or granulated, depending on the end use.
ELECTROTHERMAL DECOMPOSITION OF MANGANESE ORES
The electrothermal process is the second important process to produce manganese metal in an industrial scale. The electrothermal process takes place as a multistage process. In the first stage manganese ore is smelted with only a small amount of reductant in order to reduce mostly the iron oxide. This produces a low-grade ferro-manganese and a slag that is rich in Mn-oxide. The slag is then smelted in the second stage with silicon to produce silicomanganese. The molten silicomanganese can be treated with liquid slag from the fist stage to obtain relatively pure manganese metal. For the last step a ladle or shaking ladle can be used. The manganese metal produced by the electrothermal process contains up to 98% of Mn.
Overall emissions and waste: Emissions to air consist of dust and fume emissions from smelting, hard metal and carbide production; Other emissions to air are ammonia (NH3), acid fume (HCl), hydrogen fluoride (HF), VOC and heavy metals. Effluents are composed of overflow water from wet scrubbing systems, wastewater from slag and metal granulation, and blow down from cooling water cycles. Waste includes dust, fume, sludge and slag.
References:
Wellbeloved D. B., Craven P. M. and Waudby J. W. (1997) Manganese and Manganese Alloys. In: Ullmann's encyclopedia of industrial chemistry (ed. Anonymous). 5th edition on CD-ROM Edition. Wiley & Sons, London.
IPPC (2001) Integrated Pollution Prevention and Control (IPPC); Reference Document on Best Available Techniques in the Non Ferrous Metals Industries. European Commission. Retrieved from http://www.jrc.es/pub/english.cgi/ 0/733169

## Reference product
- manganese: 1 kg; name RP_amount_1; CPC 41603: Bismuth, antimony, manganese, chromium and articles thereof; including waste and scrap of bismuth or manganese; By-product classification allocatable product; CAS 7439-96-5
  EcoSpold01Location=RER
  Manganese is a silver-grey metal, resembling iron. It is hard and very brittle, and its primary uses in a metallic form are as an alloying, desulphurising, and deoxidising agent for steel, cast iron, and non-ferrous metals. Due to its high tendency to oxidise, annealing colours are often evident. Manganese belongs to group 7 and period 4 of the periodic table with an atomic number of 25 and atomic mass of 54.94. Six isotopes have been produced, of which only 55Mn is stable. The other isotopes, 51Mn, 52Mn, 54Mn, 56Mn, and 57Mn, have half-lives ranging from 46 min to 310 d. Manganese exists in four allotropic forms: a, b, g, and d. It has a low vapour pressure.
  Uses: The largest application of manganese metal in the metallurgical sector is in aluminium alloying, particularly the alloys from which items such as beverage cans and siding are made. The predominant form in which manganese is added to molten aluminium is briquette (typically 75% manganese, 25% aluminium) made by compacting powders of the two metals. In 1990, the amount of manganese metal used by the steel industry was about one-third as much as by the aluminium industry. Because use of manganese metal, as opposed to ferroalloy, is a relatively expensive way of adding manganese, the metal is added in steel making as a "trimming addition" to adjust final composition, particularly when an increase in carbon content is not permissible.
  Estimation from dataset author.
  production volume 1.33805e9 kg; name RP_PV_1; = 5.25E+09*(1.44E+13/5.65E+13)
    Calculated based on literature and estimates. The european production volume is scaled from the global production volume using GDP.
    5.25E+09 kg is the global production volume
    1.44E+13 current international dollar is the GDP, PPP of Europe (International Monetry Fund, 2005)
    5.65E+13 current international dollar is the GDP, PPP of the whole world (International Monetry Fund, 2005)
    Calculated based on literature value. The global production of manganese in 2005 was 1.05E+10 kg (USGS, http://minerals.usgs.gov/minerals/pubs/commodity/manganese/mangamcs07.pdf, accessed 20130321). It is estimated, that 50% is produced by this technology.
  property price 1.24 EUR2005
    Literature value (USGS,http://minerals.usgs.gov/minerals/pubs/commodity/manganese/myb1-2009-manga.pdf, accessed 20160222). The price for manganese ore (48% manganese) is reported to be 6.61 USD/metric ton unit (MTU) = 10kg. The resulting price is (1/0.48*0.661=) 1.38 USD. Cross reference; in 2005 manganese was traded on the markets for 1.5 USD/kg (http://www.infomine.com/investment/metal-prices/manganese/all/, accessed 20160704).
  property carbon content 0
    carbon content on a dry matter basis (reserved; not for manual entry)
  properties: water in wet mass 0 kg, wet mass 1 kg, dry mass 1 kg, water content 0, carbon content, fossil 0, carbon content, non-fossil 0, carbon allocation 0 kg

## Inputs from technosphere
- ferromanganese, high-coal, 74.5% Mn: 1.21 kg; source Adelhardt W. 1998; lognormal variance with pedigree 0.128, pedigree (5,5,5,1,1)
  EcoSpold01Location=RER
  Estimation from dataset author: For the electrothermal process, 75 % of the Mn contained in the raw material originates from ore with a special grade, which is processed in a way similar to high-coal ferromanganese.
  For the process, : efficiencies between 60 % and 65 % have been reported; the average of 62.5% was chosen.
  Uncertainty: 4; rough estimate
  properties: heating value, net 2.27 MJ, dry mass 1 kg, carbon content, fossil 0.075, wet mass 1 kg
  note on carbon content, fossil: Typical composition of ferromanganese, high-carbon is given in Tab. 3.4 ecoinvent v2.2 report 20_part VII
- manganese concentrate: 0.983 kg; lognormal variance with pedigree 0.128, pedigree (5,5,5,1,1)
  EcoSpold01Location=GLO
  Estimation from dataset author: For the electrolysis process, a yield of 60% is roughly calculated.
  Uncertainty: 4; rough estimate
  properties: wet mass 1 kg, dry mass 1 kg
- non-ferrous metal smelter: 1.06e-14 unit; lognormal variance with pedigree 0.428, pedigree (5,5,5,1,1)
  Estimation from dataset author.
  Proxy: "non-ferrous metal smelter" is used as a proxy for the infrastructure of the overall process.
  EcoSpold01Location=GLO
- nickel smelter slag: -0.968 kg; name BP_amount_1
  Estimation from dataset author.
  Proxy: "nickel smelter slag, 0% water" is used as a proxy for high silica slag.
  production volume 1.29524e9 kg; = (RP_PV_1 * (BP_amount_1 / RP_amount_1))
    Calculated from production volume of reference product using the relative outputs.
  property price 0 EUR2005; name BP_amount_1_price_EUR2005
  properties: carbon content, fossil 0.00345, dry mass 1 kg, wet mass 1 kg
- electricity, medium voltage: 2.63 kWh; source Wellbeloved D. B. 1997; lognormal variance with pedigree 0.2106, pedigree (5,5,5,5,5)
  Estimation: The energy demand is stated to be 9 - 12 kWh per kg manganese. For grinding prior to electrolysis, a value of 20 kWh electrical energy per tonne processed ore is assumed, for base metal sites.
  Further references:
  IPPC (2002) Integrated Pollution Prevention and Control (IPPC); Draft Reference Document on Best Available Techniques for Management of Tailings and Waste-Rock in Mining Activities. European Commission. Retrieved at 01.03.2003 from <http://www.jrc.es/pub/english.cgi/0/733169>
  EcoSpold01Location=UCTE
  Uncertainty: 2; based on theoretical values

## Sampling procedure
literature

## Extrapolations
This dataset has been extrapolated from year 2003 to the year of the calculation (2021). The uncertainty has been adjusted accordingly.

## Review by Emilia Moreno Ruiz 2013-04-12
PV corrected

## Review by Roland Hischier 2003-07-07
Passed.

## Review by Roland Hischier 2011-12-09
Transfer of documentation done.
