# treatment of spent nuclear fuel, reprocessing

Dataset: EcoSpold 2, unit process
Geography: RER
Time period: 1985-01-01 to 2021-12-31
Technology level: current
Classification: ISIC rev.4 ecoinvent: 3822:Treatment and disposal of hazardous waste
Classification: EcoSpold01Categories: nuclear power/waste treatment
Tags: ConvertedDataset; Treatment
Scenario: Business-as-Usual
System model: Allocation, cut-off by classification
Generated by: Roberto Dones
Published in: Dones, R. 2007
Database: ecoinvent
isCopyrightProtected: true
accessRestrictedTo: 1

## General comment
The factor for infrastrucure requirement has been calculated using THORP annual throughput of 1200 tonne heavy metal (modelled herewith practically as all uranium) for 30 years operation. Recent radioactive and non-radioactive emission data exist from an environmental report of La Hague (Cogema, FR) for both units UP2 and UP3 in the years 1996 and 1997. Radioactive releases to air and sea are given only for aggregated classes. Also the input for the use of main chemicals is from the French facilities. Material transports are estimated using ecoinvent standard distances with the exception of the transport of spent fuel from Swiss power plants to reprocessing facilities in UK and FR. The volumes for the six radioactive waste types to deliver to the intermediate repository and then to the final repository for high and intermediate radioactive waste have been taken from the old Swiss project for final repositories (Gewähr, 1985); the volume of the vitrified high level waste has been adjusted to take into account current average burnups of Swiss nuclear power plants. No allocation has been attempted to different products (uranium, plutonium, useful isotopes, and conditioned wastes). Low active waste from decommissioning of the facilities has roughly been estimated.
[This dataset was already contained in the ecoinvent database version 2. It was not individually updated during the transfer to ecoinvent version 3. Life Cycle Impact Assessment results may still have changed, as they are affected by changes in the supply chain, i.e. in other datasets. This dataset was generated following the ecoinvent quality guidelines for version 2. It may have been subject to central changes described in the ecoinvent version 3 change report (http://www.ecoinvent.org/database/ecoinvent-version-3/reports-of-changes/), and the results of the central updates were reviewed extensively. The changes added e.g. consistent water flows and other information throughout the database. The documentation of this dataset can be found in the ecoinvent reports of version 2, which are still available via the ecoinvent website. The change report linked above covers all central changes that were made during the conversion process.]

## Included activities end
The module includes: main chemicals for the operation; glass, steel and cement for the conditioning of the high and intermediale radioactive wastes; transport of spent fuel to the reprocessing plant, and transport of all materials; radioactive and non-radioactive solid waste streams; radioactive and non-radioactive emissions to air and sea.

## Geography
European facilities.

## Technology
Current commercial facilities.

## Parameters
- fraction, water, decarbonised, to air: 0.3875 dimensionless; name fraction_WDC_to_air; = fraction_CW_to_air; lognormal variance with pedigree 0.092025, pedigree (4,4,3,2,4)
  Calculated value. See comments in the other parametres present in this dataset. Decarbonised water is considered to be always used as cooling water, thus cooling water fractions to air are applied to all carbonised water input flows to calculate the amount of water consumed in the processes.
- fraction, cooling water, to air: 0.3875 dimensionless; name fraction_CW_to_air; = (0.5*fraction_CW_OT_to_air)+(0.5*fraction_CW_R_to_air); lognormal variance with pedigree 0.092025, pedigree (4,4,3,2,4)
  Calculated value based on literature value (see comments of the other parametres present in this dataset) and expert opinion. In the case when no industry/literature data are available about the type of cooling or directly fraction, cooling water, to air specific for the process a default assumption is applied. It is assumed that the once-through cooling system is used in 50% of all cases and recirculating system is used in another 50% of all cases.
- fraction, cooling water, recirculating system, to air: 0.771 dimensionless; name fraction_CW_R_to_air; lognormal variance with pedigree 0.0413, pedigree (2,3,1,3,1)
  Calculated based on literature value (Scown, C.D., 2011, Water Footprint of U.S. Transportation Fuels and supplying information of the article) (Vionnet, S., Quantis Water Database - Technical Report, 2012).
- fraction, cooling water, once-through system, to air: 0.004 dimensionless; name fraction_CW_OT_to_air; lognormal variance with pedigree 0.0413, pedigree (2,3,1,3,1)
  (same comment as for fraction, cooling water, recirculating system, to air)
- fraction, cooling water, cooling pond system, to air: 0.032 dimensionless; name fraction_CW_CP_to_air; lognormal variance with pedigree 0.0413, pedigree (2,3,1,3,1)
  (same comment as for fraction, cooling water, recirculating system, to air)

## Reference product
- spent nuclear fuel: -1 kg; By-product classification Waste; CPC 33720: Spent (irradiated) fuel elements (cartridges) of nuclear reactors
  EcoSpold01Location=RER
  production volume 1 kg
    Dummy value to be replaced by value to be calculated from the demand for this treatment activity
  property price 0 EUR2005
    Waste products are assigned a price of zero as they are assumed to require further treatment.
  property carbon content 0
    carbon content on a dry matter basis (reserved; not for manual entry)
  properties: water in wet mass 0 kg, water content 0, dry mass 1 kg, carbon content, non-fossil 0, wet mass 1 kg, carbon content, fossil 0, carbon allocation 0 kg

## Inputs from technosphere
- steel, chromium steel 18/8, hot rolled: 6.6 kg; lognormal variance with pedigree 0.05, pedigree (1,1,5,1,1)
  own calculation
  EcoSpold01Location=RER
  properties: dry mass 1 kg, carbon content, fossil 0.0008, wet mass 1 kg
  note on carbon content, fossil: Stainless steel model is the grade 304 steel (18/8 stainless, 18% chromium 8% nickel; max. 0.08% C)
- nuclear spent fuel reprocessing facility: 2.78e-8 unit; lognormal variance with pedigree 0.06, pedigree (1,1,5,1,1)
  EcoSpold01Location=RER
  estimation
- formaldehyde: 2.33 kg; lognormal variance with pedigree 0.04, pedigree (1,1,5,1,1)
  data from operator
  EcoSpold01Location=RER
  properties: dry mass 1 kg, wet mass 1 kg, carbon content, fossil 0.4, heating value, net 20.19 MJ
- waste plastic, mixture: -0.259 kg; lognormal variance with pedigree 0.04, pedigree (1,1,5,1,1)
  EcoSpold01Location=CH
  data from operator
  production volume 0.259 kg
    Calculated from the production volume of spent nuclear fuel in proportion to the respective output amounts.
  properties: water content 0.180638, carbon content, fossil 0.747344, dry mass 0.847 kg, wet mass 1 kg, heating value, net 30.79 MJ
  note on carbon content, fossil: C content in 1 kg DM was calculated using data in Tab A.2, ecoinvent v2.2 report 13_I
  note on heating value, net: Value taken from the general comment of the treatment dataset.
- municipal solid waste: -7.65 kg; lognormal variance with pedigree 0.04, pedigree (1,1,5,1,1)
  data from operator
  EcoSpold01Location=CH
  production volume 7.65 kg
    (same comment as for waste plastic, mixture)
  properties: dry mass 0.771 kg, wet mass 1 kg, carbon content, non-fossil 0.261655, water content 0.297017, heating value, net 11.74 MJ, carbon content, fossil 0.171549
  note on carbon content, non-fossil: MSW composition in tab 4.1, ecoinvent v2.2 report 13_I. C content referred to 1 kg DM
- chemical, organic: 0.017 kg; lognormal variance with pedigree 0.04, pedigree (1,1,5,1,1)
  EcoSpold01Location=GLO
  data from operator
  properties: heating value, net 19.03 MJ, dry mass 1 kg, wet mass 1 kg, carbon content, fossil 0.628
  note on carbon content, fossil: This dataset is an unweighted average of 20 organic substances (listed in Tab 88.1, ecoinvent v2.2 report 8, part II), being part of the top100 chemicals included in this database. The C-content has also been calculated as an unweighted average of the C content of the substances composing this dataset.
- flat glass, uncoated: 0.36 kg; lognormal variance with pedigree 0.16, pedigree (1,1,5,1,1)
  own calculation
  EcoSpold01Location=RER
  properties: dry mass 1 kg, wet mass 1 kg
- sodium hydroxide, without water, in 50% solution state: 5.42 kg; lognormal variance with pedigree 0.04, pedigree (1,1,5,1,1)
  EcoSpold01Location=RER
  data from operator
  properties: wet mass 1 kg, heating value, net 3.03 MJ, dry mass 1 kg
- hazardous waste, for incineration: 0 kg; pedigree (1,1,1,1,1)
  EcoSpold01Location=CH
  data from operator
  production volume 0 kg
    (same comment as for waste plastic, mixture)
  properties: wet mass 1 kg, dry mass 0.75 kg, carbon content, fossil 0.554667, water content 0.333333, heating value, net 17 MJ
  note on carbon content, fossil: Tab A.6, ecoinvent v2.2 report 13_I. C content has been calculated after data in the tables, and then referred to 1 kg DM
- cement, unspecified: 0 kg; pedigree (1,1,1,1,1)
  EcoSpold01Location=CH
  estimation
  properties: dry mass 1 kg, wet mass 1 kg
- welding, arc, steel: 0.23 m; lognormal variance with pedigree 0.34, pedigree (1,1,5,1,1)
  estimation
  EcoSpold01Location=RER
- electricity, high voltage: 254 kWh; lognormal variance with pedigree 0.04, pedigree (1,1,5,1,1)
  data from operator
  EcoSpold01Location=FR
- water, decarbonised: 0 kg; name water_decarbonised_input; pedigree (1,1,1,1,1)
  EcoSpold01Location=RER
  data from operator
  properties: wet mass 1 kg
- chemical, inorganic: 4.6 kg; lognormal variance with pedigree 0.04, pedigree (1,1,5,1,1)
  EcoSpold01Location=GLO
  data from operator
  properties: dry mass 1 kg, wet mass 1 kg, carbon content, fossil 0.003
  note on carbon content, fossil: This dataset is an unweighted average of 20 inorganic substances (listed in Tab 88.1, ecoinvent v2.2 report 8, part II), being part of the top100 chemicals included in this database. The C-content has also been calculated as an unweighted average of the C content of the substances composing this dataset.
- nitric acid, without water, in 50% solution state: 4.36 kg; lognormal variance with pedigree 0.04, pedigree (1,1,5,1,1)
  EcoSpold01Location=RER
  data from operator
  properties: dry mass 1 kg, wet mass 1 kg
- low level radioactive waste: -0.00435 m3; lognormal variance with pedigree 0.08, pedigree (1,1,5,1,1)
  estimation, based on old assessment
  EcoSpold01Location=CH
  production volume 0.00435 m3
    (same comment as for waste plastic, mixture)
  properties: wet mass 2500 kg, dry mass 2500 kg
- diesel, burned in diesel-electric generating set, 10MW: 4.81 MJ; lognormal variance with pedigree 0.04, pedigree (1,1,5,1,1)
  data from operator
  EcoSpold01Location=GLO
  properties: heating value, net 1 MJ
- inert waste, for final disposal: -2.29 kg; lognormal variance with pedigree 0.04, pedigree (1,1,5,1,1)
  data from operator
  EcoSpold01Location=CH
  production volume 2.29 kg
    (same comment as for waste plastic, mixture)
  properties: dry mass 0.995 kg, wet mass 1 kg, water content 0.00502513
- heat, district or industrial, other than natural gas: 909.15 MJ; lognormal variance with pedigree 0.04, pedigree (1,1,5,1,1)
  data from operator
  EcoSpold01Location=RER
  properties: heating value, net 1 MJ
- conditioned spent nuclear fuel: 0 m3; pedigree (1,1,1,1,1)
  estimation, based on old assessment
  EcoSpold01Location=CH
  production volume 0 m3
    (same comment as for waste plastic, mixture)
  properties: wet mass 7600 kg, dry mass 7600 kg
- hazardous waste, for incineration: -0.601283, -0.0157172 kg (2 entries); lognormal variance with pedigree 0.04, pedigree (1,1,5,1,1)
  EcoSpold01Location=CH
  data from operator
  production volume 0.617 kg
- cement, unspecified: 3.93218, 0.067822 kg (2 entries); lognormal variance with pedigree 0.16, pedigree (1,1,5,1,1)
  EcoSpold01Location=CH
  estimation
- water, decarbonised: 189.303, 38.1626, 125.486, 0.120202, 6.92758 kg (5 entries); lognormal variance with pedigree 0.04, pedigree (1,1,5,1,1)
  EcoSpold01Location=RER
  data from operator
- conditioned spent nuclear fuel: -0.00433977, -0.000130225 m3 (2 entries); lognormal variance with pedigree 0.08, pedigree (1,1,5,1,1)
  estimation, based on old assessment
  EcoSpold01Location=CH
  production volume 0.00447 m3

## Emissions to nature
- Noble gases, radioactive, unspecified [air, non-urban air or from high stacks]: 1.66e8 kBq; lognormal variance with pedigree 0.08, pedigree (1,1,5,1,1)
  presumed uncertainty of measurements
- Strontium-90 [water, ocean]: 358 kBq; lognormal variance with pedigree 0.34, pedigree (1,1,5,1,1)
  lower release in 2002 compared to 1996/1997
- Barium [water, ocean]: 6e-5 kg; lognormal variance with pedigree 0.04, pedigree (1,1,5,1,1)
  data from operator
- Nitrite [water, ocean]: 0.0436 kg; lognormal variance with pedigree 0.04, pedigree (1,1,5,1,1)
  data from operator
- Hydrogen-3, Tritium [water, ocean]: 6.69e6 kBq; lognormal variance with pedigree 0.08, pedigree (1,1,5,1,1)
  presumed uncertainty of measurements
- Actinides, radioactive, unspecified [water, ocean]: 28.1 kBq; lognormal variance with pedigree 0.08, pedigree (1,1,5,1,1)
  presumed uncertainty of measurements
- Cadmium [air, non-urban air or from high stacks]: 2.64e-5 kg; lognormal variance with pedigree 0.16, pedigree (1,1,5,1,1)
  extrapolation
- Iodine-129 [air, non-urban air or from high stacks]: 17.3 kBq; lognormal variance with pedigree 0.34, pedigree (1,1,5,1,1)
  lower release in 2002 compared to 1996/1997
- Cobalt [water, ocean]: 9.7e-5 kg; lognormal variance with pedigree 0.04, pedigree (1,1,5,1,1)
  data from operator
- NMVOC, non-methane volatile organic compounds, unspecified origin [air, non-urban air or from high stacks]: 0.00061 kg; lognormal variance with pedigree 0.16, pedigree (1,1,5,1,1)
  extrapolation
- Plutonium-alpha [air, non-urban air or from high stacks]: 5.41e-6 kBq; lognormal variance with pedigree 0.34, pedigree (1,1,5,1,1)
  old reference
- Sulfide [water, ocean]: 0.00363 kg; lognormal variance with pedigree 0.04, pedigree (1,1,5,1,1)
  data from operator
- Nickel, ion [water, ocean]: 9.7e-5 kg; lognormal variance with pedigree 0.04, pedigree (1,1,5,1,1)
  data from operator
- Ammonium, ion [water, ocean]: 0.000125 kg; lognormal variance with pedigree 0.04, pedigree (1,1,5,1,1)
  data from operator
- Methane, fossil [air, non-urban air or from high stacks]: 6.2e-5 kg; lognormal variance with pedigree 0.16, pedigree (1,1,5,1,1)
  extrapolation
- Hydrogen fluoride [air, non-urban air or from high stacks]: 1.56e-5 kg; lognormal variance with pedigree 0.16, pedigree (1,1,5,1,1)
  extrapolation
- Sulfur dioxide [air, non-urban air or from high stacks]: 0.00263 kg; lognormal variance with pedigree 0.16, pedigree (1,1,5,1,1)
  extrapolation
- Oils, unspecified [water, ocean]: 0.00304 kg; lognormal variance with pedigree 0.04, pedigree (1,1,5,1,1)
  data from operator
- Aluminium [water, ocean]: 0.000179 kg; lognormal variance with pedigree 0.04, pedigree (1,1,5,1,1)
  data from operator
- Radioactive species, Nuclides, unspecified [water, ocean]: 16800 kBq; lognormal variance with pedigree 0.08, pedigree (1,1,5,1,1)
  presumed uncertainty of measurements
- Aerosols, radioactive, unspecified [air, non-urban air or from high stacks]: 0.0153 kBq; lognormal variance with pedigree 0.34, pedigree (1,1,5,1,1)
  higher release in 2002 compared to 1996/1997
- Hydrogen chloride [air, non-urban air or from high stacks]: 0.000281 kg; lognormal variance with pedigree 0.16, pedigree (1,1,5,1,1)
  extrapolation
- Carbon-14 [air, non-urban air or from high stacks]: 16600 kBq; lognormal variance with pedigree 0.16, pedigree (1,1,5,1,1)
  extrapolation
- Dinitrogen monoxide [air, non-urban air or from high stacks]: 0.037 kg; lognormal variance with pedigree 0.16, pedigree (1,1,5,1,1)
  extrapolation
- Nitrate [water, ocean]: 2.1 kg; lognormal variance with pedigree 0.04, pedigree (1,1,5,1,1)
  data from operator
- Ammonia [air, non-urban air or from high stacks]: 5.86e-5 kg; lognormal variance with pedigree 0.16, pedigree (1,1,5,1,1)
  extrapolation
- Water [water, unspecified]: 0.2205 m3; name water_to_water_unspecified; = (water_decarbonised_input/1000)*(1-fraction_WDC_to_air); lognormal variance with pedigree 0.0807, pedigree (2,2,5,1,1)
  Calculated value based on literature values and expert opinion. See comments in the parametres' comment field.
  property fraction, origin: unspecified 0; name fraction_origin_unspecified_Ww
  property dry mass 0 kg; name DM
  property water in wet mass 1000 kg; name WWM
  property wet mass 1000 kg; name WM
  property fraction, origin: fresh water 1; name fraction_origin_fresh_water_Ww
  property carbon content, non-fossil 0; name C_content_non_fossil
  property carbon content, fossil 0; name C_content_fossil
  property fraction, origin: salt water 0; name fraction_origin_salt_water_Ww
- Phosphorus [water, ocean]: 0.000836 kg; lognormal variance with pedigree 0.04, pedigree (1,1,5,1,1)
  data from operator
- Water [air, unspecified]: 0.1395 m3; name water_to_air_unspecified; = (water_decarbonised_input/1000*fraction_WDC_to_air); lognormal variance with pedigree 0.0807, pedigree (2,2,5,1,1)
  (same comment as for Water)
  property fraction, origin: unspecified 0; name fraction_origin_unspecified
  property fraction, origin: salt water 0; name fraction_origin_salt_water
  property fraction, origin: fresh water 1; name fraction_origin_fresh_water
- Cesium-137 [water, ocean]: 3220 kBq; lognormal variance with pedigree 0.34, pedigree (1,1,5,1,1)
  lower release in 2002 compared to 1996/1997
- Hydrogen-3, Tritium [air, non-urban air or from high stacks]: 44900 kBq; lognormal variance with pedigree 0.08, pedigree (1,1,5,1,1)
  presumed uncertainty of measurements
- Particulates, > 2.5 um, and < 10um [air, non-urban air or from high stacks]: 0.000651 kg; lognormal variance with pedigree 0.16, pedigree (1,1,5,1,1)
  extrapolation
- Carbon monoxide, fossil [air, non-urban air or from high stacks]: 0.0589 kg; lognormal variance with pedigree 0.16, pedigree (1,1,5,1,1)
  extrapolation
- Plutonium-238 [air, non-urban air or from high stacks]: 2.36e-6 kBq; lognormal variance with pedigree 0.34, pedigree (1,1,5,1,1)
  old reference

## Sampling procedure
Literature

## Extrapolations
This dataset has been extrapolated from year 2002 to the year of the calculation (2021). The uncertainty has been adjusted accordingly.

## Review by Emilia Moreno Ruiz 2015-10-09
price corrected

## Review by Roberto Dones 2003-08-19
passed
for final calculation August 2003
