# treatment of waste newspaper, municipal incineration with fly ash extraction

Dataset: EcoSpold 2, unit process
Geography: CH
Time period: 2006-01-01 to 2021-12-31
Technology level: current
Classification: ISIC rev.4 ecoinvent: 3821:Treatment and disposal of non-hazardous waste
Synonyms: municipal waste incineration
Scenario: Business-as-Usual
System model: Allocation, cut-off by classification
Share of production covered: 1.8 %
Generated by: Gabor Doka
Published in: Doka G. 2015
Database: ecoinvent
isCopyrightProtected: true
accessRestrictedTo: 1

## General comment
This dataset represents the activity of waste disposal of waste newspaper in a municipal solid waste incinerator (MSWI) // Recommended use of this dataset: For newspaper, which goes to disposal as part of communal waste mixture. Larger amounts of separated newspaper will likely not be disposed in incinerators or landfills, but rather go to recycling. // // Waste composition (wet, in ppm): upper heating value 15.19 MJ/kg; lower heating value 14.11 MJ/kg; H2O 109440; O 386620; H 53858; C 408310; S 1631.1; N 678.41; P 12.167; B n.a.; Cl 1343.3; Br n.a.; F n.a.; I n.a.; Ag 0.47733; As n.a.; Ba 13.571; Cd 0.13891; Co 0.91253; Cr 10.31; Cu 29.989; Hg 0.081846; Mn 46.797; Mo n.a.; Ni 2.319; Pb 90.284; Sb n.a.; Se n.a.; Sn n.a.; V n.a.; Zn 55.563; Be n.a.; Sc n.a.; Sr n.a.; Ti n.a.; Tl n.a.; W n.a.; Si 20871; Fe 139.03; Ca n.a.; Al 12167; K 4679.7; Mg n.a.; Na n.a.; // Share of carbon in waste that is biogenic 100%. // Share of metals in waste not oxidised and bulk-recyclable (exclude very small or thin parts) Iron: 0%; Alu: 0%; Copper: 0%. // Recovery of metal scrap from bottom ash to recycling: 0g iron scrap, 0g aluminium scrap, 0g copper scrap. From this waste, the FLUWA process in the technology mix recovers 0.000416kg (DM) of a hydroxide sludge to be recycled in zinc furnaces. // Ultimately one kg of this waste produces 0.08973 kg of bottom ash (can include some washed ash) and 0.008442 kg of residues, which are landfilled (technology mix). Additional solidification of residues with 0.003377 kg of cement.Net energy production: 1.75MJ/kg electric energy and 3.5MJ/kg thermal energy. //

## Included activities start
waste incineration from waste reception gate and delivery into waste bunker at incinerator plant site (without transports to the incinerator)

## Included activities end
Waste-specific short-term emissions to water from leachate. Long-term emissions from landfill to ground water.

## Geography
Specific to the technology mix encountered in Switzerland in 2012.

## Technology
average Swiss MSWI plants in 2010 (grate incinerators) with electrostatic precipitator for fly ash (ESP), wet flue gas scrubber and 25% SNCR , 42.77% SCR-high dust , 32.68% SCR-low dust -DeNOx facilities and 0% without Denox (weighted according to mass of burnt waste, representing Swiss average). Efficiency of iron scrap separation from slag : 58%. Efficiency of non-ferrous scrap separation from slag : 31%. The technology mix for this dataset includes a filter ash treatment (FLUWA) of a share of 46.22%. Gross electric efficiency technology mix 15.84% and Gross thermal efficiency technology mix 28.51%

## Time period
Waste composition as given in literature reference, theoretical data or other source. Transfer coefficients for modern MSWI.

## Reference product
- heat, for reuse in municipal waste incineration only: 1 MJ; name E_th_prod_MSWI; By-product classification allocatable product; CPC 17300: Steam and hot water; pedigree (1,1,1,1,1)
  Net useful heat generated from this waste and used in internal MSWI plant energy redistribution.
  Uncertainty: uncertainty is calculated from uncertainties in waste composition and uncertainties in energy efficiency and the uncertainty in internal energy demand
  production volume 4.8609e8 MJ
    calculated in proportion to reference product waste input to incinerator
  property exergy 0.1842 MJ; name E_th_prod_MSWI_exergy
    This exergy property is based on the exergy content of the product.
  property true value relation 0.1842; name E_th_prod_MSWI_true_value_relation
    property to calculate "true value" from
  property price 0.0106 EUR2005; name E_th_prod_MSWI_price_EUR2005
    Average European district heat price from Ecoheatcool and Euroheat 2005-2006, Ecoheat Work package 1: The European heat market. Final report. 10.6 EUR/GJ i s the price of district heat. http://www.solarthermalworld.org/files/Ecoheatcool%20WP1%20Web.pdf?download
  property true value 0.0231016; name E_th_prod_MSWI_true_value
    allocation property applied in "true value" allocation // value calculated from true value relation
- waste newspaper: 0 kg; By-product classification Recyclable; CPC 39240: Waste and scrap of paper or paperboard
  Main reference product of this activity (supply of disposal service).
  production volume 0 kg; name RP_PV_1
    based on corresponding global production volume of MSW fraction in conventional MSWI (wo fly ash extraction) and scaled down to annual Swiss incinerated MSW mass of 3.02 mio. tonnes.
  property price 0.1 EUR2005
    For paper and board waste the price, in 2005, according to [http://ec.europa.eu/eurostat] is about 1 EUR/kg corresponding to a purchase price of 0.099 similar to the price of UN comodittie: Waste, scrap of paper, board, nes (including unsorted).
  property heating value, net 14.11 MJ
    Value taken from the general comment of the treatment dataset.
  property carbon content 0.45848
    carbon content on a dry matter basis (reserved; not for manual entry)
  properties: nitrogen content 0.00076178, phosphorus content 1.3662e-5, hydrogen content 0.060476, silver content 5.3598e-7, chromium content 1.1577e-5, sulfur content 0.0018316, copper content 3.3675e-5, chlorine content 0.0015084, barium content 1.5239e-5, nickel content 2.604e-6, cobalt content 1.0247e-6, aluminium content 0.013662, manganese content 5.2547e-5, potassium content 0.0052547, dry mass 0.89056 kg, mercury content 9.1904e-8, lead content 0.00010138, zinc content 6.2391e-5, cadmium content 1.5598e-7, silicon content 0.023436, carbon content, non-fossil 0.45848, oxygen content 0.43414, iron content 0.00015612, water content 0.12289, wet mass 1 kg, water in wet mass 0.10944 kg, carbon allocation 0.408304 kg
- electricity, for reuse in municipal waste incineration only: 0 kWh; name E_el_prod_MSWI; CPC 17100: Electrical energy; By-product classification allocatable product; pedigree (1,1,1,1,1)
  Net electricity generated from this waste and used in internal MSWI plant energy redistribution.
  Uncertainty: uncertainty is calculated from uncertainties in waste composition and uncertainties in energy efficiency and the uncertainty in internal energy demand
  production volume 6.731e7 kWh
  property exergy 3.6 MJ; name E_el_prod_MSWI_exergy
  property true value relation 3.6; name E_el_prod_MSWI_true_value_relation
  property price 0.1 EUR2005; name E_el_prod_MSWI_price_EUR2005
  property true value 0.0625208; name E_el_prod_MSWI_true_value

## By-products
- metalliferous hydroxide sludge: 0 kg; By-product classification Recyclable; CPC 1429: Other non-ferrous metal ores and concentrates (other than uranium or thorium ores and concentrates); pedigree (1,1,1,1,1)
  Metalliferous hydroxide sludge from filter ash leaching (FLUWA).
  Uncertainty: uncertainty is calculated from uncertainties in waste composition and transfer coefficients to filter ash in incinerator and the uncertainty of the transfer coefficients of the FLUWA process.
  production volume 0 kg
    calculated in proportion to reference product waste input to incinerator
  property price 0.0042 EUR2005
    World market value of manure, deflated with barley world market price and consumer price index, based on [http://www.gov.pe.ca/photos/original/af_NM_manconv.pdf].
  property heating value, net 0 MJ
    Non combustible products are assumed to have an LHV equal to zero (0).
  property carbon content 0.051044
    carbon content on a dry matter basis (reserved; not for manual entry)
  properties: nickel content 5.1882e-6, aluminium content 0.0020179, iron content 3.6872e-5, water in wet mass 0.75 kg, water content 3, dry mass 0.25 kg, carbon content, non-fossil 0.051044, barium content 9.1802e-6, wet mass 1 kg, phosphorus content 0.00057402, oxygen content 0.52527, mercury content 3.5844e-7, sulfur content 0.24109, cobalt content 5.4107e-5, chlorine content 0.077841, silver content 1.562e-6, zinc content 0.023554, lead content 0.0039175, silicon content 0.0026576, cadmium content 0.00011375, copper content 2.9948e-5, potassium content 0.071546, chromium content 0.00011877, manganese content 0.00011495, carbon allocation 0.012761 kg
- electricity, for reuse in municipal waste incineration only: 0 kWh; CPC 17100: Electrical energy; By-product classification allocatable product; pedigree (1,1,1,1,1)
  (same comment as for electricity, for reuse in municipal waste incineration only)
  production volume 0 kWh
    calculated in proportion to reference product waste input to incinerator

## Inputs from technosphere
- transport, freight, lorry, unspecified: 0.000316585 metric ton*km; lognormal variance with pedigree 0.034431, pedigree (1,1,4,1,1)
  Transport services to transport incineration residues to landfills and filter ash to external treatments (FLUWA).
  Uncertainty: uncertainty calculated from uncertainty of the waste composition of this waste, uncertainty of transfer coefficients and the uncertainty in generic transportation distances
- water, decarbonised: 0.0346067 kg; lognormal variance with pedigree 0.38041, pedigree (1,1,4,1,1)
  Incinerator process water used in flue gas scrubber stage.
  Uncertainty: uncertainty calculated from uncertainty in average water input, and the uncertainty of the waste composition of this waste
  properties: wet mass 1 kg
- titanium dioxide: 2.16914e-6 kg; lognormal variance with pedigree 0.60423, pedigree (1,1,4,1,1)
  Input to DeNOx stage (TiO2 catalyst carrier)
  Uncertainty: uncertainty calculated from uncertainty in average DeNOx input, uncertainty in the share of thermal NOx, uncertainty of nitrogen content in average municipal waste and the uncertainty in nitrogen content in *this* waste.
  properties: dry mass 1 kg, wet mass 1 kg
- heat, district or industrial, natural gas: 0.00647429 MJ; lognormal variance with pedigree 0.30072, pedigree (1,1,4,1,1)
  Input to DeNOx stage, to heat up flue gas in low-dust SCR.
  Uncertainty: uncertainty calculated from uncertainty in average DeNOx input, uncertainty in the share of thermal NOx, uncertainty of nitrogen content in average municipal waste and the uncertainty in nitrogen content in *this* waste.
  properties: heating value, net 1 MJ
- slag landfill: 1.22897e-11 unit; lognormal variance with pedigree 0.042151, pedigree (1,1,4,1,1)
  Landfill infrastructure required for landfilling of bottom ash.
  Uncertainty: uncertainty is calculated from uncertainties in waste composition and transfer coefficients in incinerator
- sodium hydroxide, without water, in 50% solution state: 6.66665e-5 kg; lognormal variance with pedigree 0.19795, pedigree (1,1,4,1,1)
  Auxilliary inputs for the flue gas treatment stage of the incinerator plant, and partially in the filter ash treatment (FLUWA).
  Uncertainty: uncertainty calculated from uncertainty in average NaOH input, of transfer coefficients in the incinerator, and the uncertainty of the waste composition of this waste
  properties: wet mass 1 kg, heating value, net 3.03 MJ, dry mass 1 kg
- hydrochloric acid, without water, in 30% solution state: 1.82509e-5 kg; lognormal variance with pedigree 0.042384, pedigree (1,1,4,1,1)
  Auxilliary inputs for the wastewater treatment stage of the incinerator plant.
  Uncertainty: uncertainty calculated from uncertainty in average HCl input, of transfer coefficients in the incinerator, and the uncertainty of the waste composition of this waste
  properties: wet mass 1 kg, dry mass 1 kg, heating value, net 3.32 MJ
- ammonia, anhydrous, liquid: 3.46221e-5 kg; lognormal variance with pedigree 0.30072, pedigree (1,1,4,1,1)
  Input to DeNOx stage (100% NH3).
  Uncertainty: uncertainty calculated from uncertainty in average DeNOx input, uncertainty in the share of thermal NOx, uncertainty of nitrogen content in average municipal waste and the uncertainty in nitrogen content in *this* waste.
  properties: dry mass 1 kg, wet mass 1 kg
- municipal waste incineration facility: 1.92593e-11 unit
  Demands per kilogram waste.
- chemical, inorganic: 2.91917e-6 kg; lognormal variance with pedigree 0.21108, pedigree (1,1,4,1,1)
  Auxilliary inputs for the wastewater treatment stage of the incinerator plant. Proxy for Polyelectrolyte.
  Uncertainty: uncertainty calculated from uncertainty in average Polyelectrolyte input, of transfer coefficients in the incinerator, and the uncertainty of the waste composition of this waste
  properties: wet mass 1 kg, dry mass 1 kg, carbon content, fossil 0.003
- quicklime, milled, packed: 3.03142e-5 kg; lognormal variance with pedigree 1.0903, pedigree (1,1,4,1,1)
  Auxilliary inputs for the flue gas treatment stage of the incinerator plant.
  Uncertainty: uncertainty calculated from uncertainty in average CaO input, of transfer coefficients in the incinerator, and the uncertainty of the waste composition of this waste
  properties: water content 0.010101, wet mass 1 kg, dry mass 0.99 kg
- spent activated carbon with mercury: -3.36375e-8 kg; name BP_amount_1; lognormal variance with pedigree 1.9284, pedigree (1,1,4,1,1)
  Spent ion exchanger charged with mercury, from FLUWA filter ash treatment, approximated here with Spent activated carbon with mercury, deposited undergound in a polyethylene Big Bag.
  Uncertainty: uncertainty calculated from uncertainty in of transfer coefficients in the incinerator, and the uncertainty of the waste composition of this waste.
  production volume 60.6013 kg; = ABS(RP_PV_1 * (BP_amount_1 / RP_amount_1))
    Calculated from production volume of reference product using the relative outputs.
  property price 0 EUR2005; name BP_amount_1_price_EUR2005
  properties: dry mass 1 kg, wet mass 1 kg, carbon content, fossil 0.6, heating value, net 18.18 MJ
- iron (III) chloride, without water, in 40% solution state: 1.96229e-7 kg; lognormal variance with pedigree 0.38041, pedigree (1,1,4,1,1)
  Auxilliary inputs for the wastewater treatment stage of the incinerator plant.
  Uncertainty: uncertainty calculated from uncertainty in average FeCl3 input, of transfer coefficients in the incinerator, and the uncertainty of the waste composition of this waste
  properties: wet mass 1 kg, dry mass 1 kg
- chromium oxide, flakes: 4.42679e-8 kg; lognormal variance with pedigree 0.60423, pedigree (1,1,4,1,1)
  Input to DeNOx stage. Active component in SCR catalyst (vanadium pentoxide, V2O5), here approximated with the available chromium trioxide.
  Uncertainty: uncertainty calculated from uncertainty in average DeNOx input, uncertainty in the share of thermal NOx, uncertainty of nitrogen content in average municipal waste and the uncertainty in nitrogen content in *this* waste.
  properties: dry mass 1 kg, wet mass 1 kg
- residual material landfill: 2.70123e-12 unit; lognormal variance with pedigree 0.037239, pedigree (1,1,4,1,1)
  Landfill infrastructure required for landfilling of incineration residues.
  Uncertainty: uncertainty is calculated from uncertainties in waste composition and transfer coefficients in incinerator
- process-specific burdens, slag landfill: 0.00691286 kg; lognormal variance with pedigree 0.042151, pedigree (1,1,4,1,1)
  Mass-specific expenditures required for landfilling of bottom ash.;activityLink introduced to establish a direct link to the corresponding regional supply of this product
  Uncertainty: uncertainty is calculated from uncertainties in waste composition and transfer coefficients in incinerator
- process-specific burdens, residual material landfill: 0.00129661 kg; lognormal variance with pedigree 0.037239, pedigree (1,1,4,1,1)
  Mass-specific expenditures required for landfilling of incineration residues.;activityLink introduced to establish a direct link to the corresponding regional supply of this product
  Uncertainty: uncertainty is calculated from uncertainties in waste composition and transfer coefficients in incinerator
- waste cement, hydrated: -0.000650333 kg; lognormal variance with pedigree 0.046323, pedigree (1,1,4,1,1)
  Hydrated cement output for solidification of landfilled residual material.
  Uncertainty: Uncertainty calculated from uncertainty of the waste composition of this waste and transfer coefficients in the incinerator and of the solidification recipe.
  production volume 1.1716e6 kg
    calculated in proportion to reference product waste input to incinerator
  properties: dry mass 1 kg, wet mass 1 kg
- hydrogen peroxide, without water, in 50% solution state: 4.44982e-5 kg; lognormal variance with pedigree 0.045185, pedigree (1,1,4,1,1)
  Auxilliary oxidising agent for filter ash treatment (FLUWA).
  Uncertainty: uncertainty calculated from uncertainty in of transfer coefficients in the incinerator, and the uncertainty of the waste composition of this waste
  properties: dry mass 1 kg, wet mass 1 kg, heating value, net 7.13 MJ
- chemical, organic: 5.76493e-8 kg; lognormal variance with pedigree 1.887, pedigree (1,1,4,1,1)
  Auxilliary inputs for the wastewater treatment stage of the incinerator plant. Proxy for (pure) Trisodium-trimercapto-s-triazine (CAS 17766-26-6), used as 15% diluted solution, aka TMT15.
  Uncertainty: uncertainty calculated from uncertainty in average TMT15 input, of transfer coefficients in the incinerator, and the uncertainty of the waste composition of this waste
  properties: heating value, net 19.03 MJ, carbon content, fossil 0.628, wet mass 1 kg, dry mass 1 kg
- cement, unspecified: 0.000260132 kg; lognormal variance with pedigree 0.046323, pedigree (1,1,4,1,1)
  Cement required for solidification of landfilled residual material.
  Uncertainty: Uncertainty calculated from uncertainty of the waste composition of this waste, of transfer coefficients in the incinerator and of the solidification recipe.
  properties: dry mass 1 kg, wet mass 1 kg
- cationic resin: 3.19558e-8 kg; lognormal variance with pedigree 1.9284, pedigree (1,1,4,1,1)
  Auxilliary input for mercury removal in filter ash treatment (FLUWA).
  Uncertainty: uncertainty calculated from uncertainty in of transfer coefficients in the incinerator, and the uncertainty of the waste composition of this waste
  properties: wet mass 1 kg, dry mass 0.5 kg, water content 1, heating value, net 6.68 MJ, carbon content, fossil 0.521606
- waste newspaper: 0.0770372 kg
  Main reference product of this activity (supply of disposal service).
  production volume 1.3879e8 kg
  properties: price 0.1 EUR2005, hydrogen content 0.060476, sulfur content 0.0018316, aluminium content 0.013662, potassium content 0.0052547, dry mass 0.89056 kg, silicon content 0.023436, carbon content, non-fossil 0.45848, oxygen content 0.43414, water content 0.12289, wet mass 1 kg, heating value, net 14.11 MJ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
  note on heating value, net: Value taken from the general comment of the treatment dataset.
- metalliferous hydroxide sludge: -0.000128205 kg; lognormal variance with pedigree 0.052223, pedigree (1,1,4,1,1)
  (same comment as for metalliferous hydroxide sludge)
  production volume 230970 kg
  properties: water content 3, price 0.0042 EUR2005, dry mass 0.25 kg, carbon content, non-fossil 0.051044, wet mass 1 kg, oxygen content 0.52527, sulfur content 0.24109, chlorine content 0.077841, zinc content 0.023554, lead content 0.0039175, silicon content 0.0026576, potassium content 0.071546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

## Inputs from nature
- Oxygen [natural resource, in air]: 0.0890165 kg; lognormal variance with pedigree 0.035048, pedigree (1,1,4,1,1)
  Oxygen from ambient air needed to combust and oxidise this waste. Net demand, i.e. without O2 leaving the plant in flue gas uncombusted.
  Uncertainty: uncertainty is calculated from uncertainties in waste composition and transfer coefficients to flue gas and soild residues in incinerator

## Emissions to nature
- Dinitrogen monoxide [air, urban air close to ground]: 7.79463e-7 kg; lognormal variance with pedigree 1.4904, pedigree (1,1,4,1,1)
  Nitrogen species emitted to air after DeNOx stage.
  Uncertainty: uncertainty calculated from uncertainty in average N-emissions and uncertainty in the share of thermal NOx and the uncertainty in nitrogen content in *this* waste.
- Cadmium, ion [water, ground-, long-term]: 1.71608e-9 kg; lognormal variance with pedigree 5.8406, pedigree (1,1,4,1,1)
  Long-term emissions from landfilling of incineration residues.
  Uncertainty: uncertainty is calculated from uncertainties in waste composition and transfer coefficients in incinerator and landfills.
- Cyanide [air, urban air close to ground]: 1.67464e-7 kg; lognormal variance with pedigree 1.4904, pedigree (1,1,4,1,1)
  (same comment as for Dinitrogen monoxide)
- Cobalt [water, ground-, long-term]: 6.16999e-8 kg; lognormal variance with pedigree 1.5386, pedigree (1,1,4,1,1)
  (same comment as for Cadmium, ion)
- Phosphorus [air, urban air close to ground]: 9.52565e-10 kg; lognormal variance with pedigree 1.2735, pedigree (1,1,4,1,1)
  Emission to air from waste composition and transfer coefficients.
  Uncertainty: uncertainty is calculated from uncertainties in waste composition and transfer coefficients in incinerator
- Chromium VI [water, ground-, long-term]: 4.31663e-8 kg; lognormal variance with pedigree 2.6362, pedigree (1,1,4,1,1)
  (same comment as for Cadmium, ion)
- Hydrogen chloride [air, urban air close to ground]: 5.90537e-8 kg; lognormal variance with pedigree 0.65053, pedigree (1,1,4,1,1)
  (same comment as for Phosphorus)
- Copper, ion [water, ground-, long-term]: 2.17661e-6 kg; lognormal variance with pedigree 1.119, pedigree (1,1,4,1,1)
  (same comment as for Cadmium, ion)
- Barium [air, urban air close to ground]: 4.10354e-9 kg; lognormal variance with pedigree 1.2515, pedigree (1,1,4,1,1)
  (same comment as for Phosphorus)
- Mercury [water, ground-, long-term]: 1.32442e-9 kg; lognormal variance with pedigree 1.9189, pedigree (1,1,4,1,1)
  (same comment as for Cadmium, ion)
- TOC, Total Organic Carbon [water, surface water]: 1.04301e-5 kg; lognormal variance with pedigree 0.039892, pedigree (1,1,4,1,1)
  Emissions to water from waste composition and transfer coefficients in incinerator and landfills.
  Uncertainty: uncertainty is calculated from uncertainties in waste composition and transfer coefficients in incinerator and landfills
- Silver, ion [water, surface water]: 7.4079e-11 kg; lognormal variance with pedigree 1.6311, pedigree (1,1,4,1,1)
  (same comment as for TOC, Total Organic Carbon)
- Cadmium [air, urban air close to ground]: 5.45447e-12 kg; lognormal variance with pedigree 1.8533, pedigree (1,1,4,1,1)
  (same comment as for Phosphorus)
- Manganese [water, ground-, long-term]: 2.85847e-6 kg; lognormal variance with pedigree 1.3551, pedigree (1,1,4,1,1)
  (same comment as for Cadmium, ion)
- Cobalt [air, urban air close to ground]: 1.27851e-10 kg; lognormal variance with pedigree 1.606, pedigree (1,1,4,1,1)
  (same comment as for Phosphorus)
- Nickel, ion [water, ground-, long-term]: 1.76862e-7 kg; lognormal variance with pedigree 1.4325, pedigree (1,1,4,1,1)
  (same comment as for Cadmium, ion)
- Chromium [air, urban air close to ground]: 6.93566e-10 kg; lognormal variance with pedigree 1.2954, pedigree (1,1,4,1,1)
  (same comment as for Phosphorus)
- Lead [water, ground-, long-term]: 4.8971e-6 kg; lognormal variance with pedigree 2.5175, pedigree (1,1,4,1,1)
  (same comment as for Cadmium, ion)
- COD, Chemical Oxygen Demand [water, surface water]: 2.39124e-5 kg; lognormal variance with pedigree 0.039815, pedigree (1,1,4,1,1)
  (same comment as for TOC, Total Organic Carbon)
- Copper [air, urban air close to ground]: 2.11598e-10 kg; lognormal variance with pedigree 1.1636, pedigree (1,1,4,1,1)
  (same comment as for Phosphorus)
- Antimony [water, ground-, long-term]: 3.97658e-11 kg; lognormal variance with pedigree 0.013413, pedigree (1,1,4,1,1)
  (same comment as for Cadmium, ion)
- Barium [water, surface water]: 4.43596e-10 kg; lognormal variance with pedigree 0.97676, pedigree (1,1,4,1,1)
  (same comment as for TOC, Total Organic Carbon)
- Mercury [air, urban air close to ground]: 1.78773e-10 kg; lognormal variance with pedigree 1.9367, pedigree (1,1,4,1,1)
  (same comment as for Phosphorus)
- Tin, ion [water, ground-, long-term]: 1.75629e-11 kg; lognormal variance with pedigree 3.9403, pedigree (1,1,4,1,1)
  (same comment as for Cadmium, ion)
- Cadmium, ion [water, surface water]: 1.90267e-12 kg; lognormal variance with pedigree 1.7144, pedigree (1,1,4,1,1)
  (same comment as for TOC, Total Organic Carbon)
- Manganese [air, urban air close to ground]: 6.88489e-10 kg; lognormal variance with pedigree 1.0975, pedigree (1,1,4,1,1)
  (same comment as for Phosphorus)
- Vanadium, ion [water, ground-, long-term]: 1.23968e-8 kg; lognormal variance with pedigree 0.02524, pedigree (1,1,4,1,1)
  (same comment as for Cadmium, ion)
- Cobalt [water, surface water]: 1.19177e-11 kg; lognormal variance with pedigree 2.0579, pedigree (1,1,4,1,1)
  (same comment as for TOC, Total Organic Carbon)
- Nickel [air, urban air close to ground]: 2.24425e-10 kg; lognormal variance with pedigree 1.484, pedigree (1,1,4,1,1)
  (same comment as for Phosphorus)
- Zinc, ion [water, ground-, long-term]: 1.92216e-6 kg; lognormal variance with pedigree 1.8631, pedigree (1,1,4,1,1)
  (same comment as for Cadmium, ion)
- Chromium VI [water, surface water]: 1.24577e-8 kg; lognormal variance with pedigree 1.3412, pedigree (1,1,4,1,1)
  (same comment as for TOC, Total Organic Carbon)
- Lead [air, urban air close to ground]: 5.73003e-10 kg; lognormal variance with pedigree 1.0166, pedigree (1,1,4,1,1)
  (same comment as for Phosphorus)
- Thallium [water, ground-, long-term]: 4.86097e-11 kg; lognormal variance with pedigree 0.26601, pedigree (1,1,4,1,1)
  (same comment as for Cadmium, ion)
- Nitrate [water, surface water]: 6.71457e-7 kg; lognormal variance with pedigree 0.48809, pedigree (1,1,4,1,1)
  (same comment as for TOC, Total Organic Carbon)
- Copper, ion [water, surface water]: 2.00043e-10 kg; lognormal variance with pedigree 1.2534, pedigree (1,1,4,1,1)
  (same comment as for TOC, Total Organic Carbon)
- Zinc [air, urban air close to ground]: 2.86902e-9 kg; lognormal variance with pedigree 1.0681, pedigree (1,1,4,1,1)
  (same comment as for Phosphorus)
- Silicon [water, ground-, long-term]: 0.000120432 kg; lognormal variance with pedigree 5.2068, pedigree (1,1,4,1,1)
  (same comment as for Cadmium, ion)
- Mercury [water, surface water]: 3.35505e-11 kg; lognormal variance with pedigree 2.0938, pedigree (1,1,4,1,1)
  (same comment as for TOC, Total Organic Carbon)
- Silicon [air, urban air close to ground]: 2.50425e-9 kg; lognormal variance with pedigree 0.35349, pedigree (1,1,4,1,1)
  (same comment as for Phosphorus)
- Iron, ion [water, ground-, long-term]: 5.51055e-6 kg; lognormal variance with pedigree 4.0788, pedigree (1,1,4,1,1)
  (same comment as for Cadmium, ion)
- Manganese [water, surface water]: 4.40892e-10 kg; lognormal variance with pedigree 1.0893, pedigree (1,1,4,1,1)
  (same comment as for TOC, Total Organic Carbon)
- Iron [air, urban air close to ground]: 1.91954e-11 kg; lognormal variance with pedigree 0.99455, pedigree (1,1,4,1,1)
  (same comment as for Phosphorus)
- Calcium, ion [water, ground-, long-term]: 1.10941e-5 kg; lognormal variance with pedigree 1.4527, pedigree (1,1,4,1,1)
  (same comment as for Cadmium, ion)
- Nickel, ion [water, surface water]: 1.21919e-10 kg; lognormal variance with pedigree 2.0353, pedigree (1,1,4,1,1)
  (same comment as for TOC, Total Organic Carbon)
- Aluminium [air, urban air close to ground]: 7.64209e-10 kg; lognormal variance with pedigree 0.42674, pedigree (1,1,4,1,1)
  (same comment as for Phosphorus)
- Aluminium [water, ground-, long-term]: 0.00072076 kg; lognormal variance with pedigree 0.33652, pedigree (1,1,4,1,1)
  (same comment as for Cadmium, ion)
- Lead [water, surface water]: 4.73648e-10 kg; lognormal variance with pedigree 0.81744, pedigree (1,1,4,1,1)
  (same comment as for TOC, Total Organic Carbon)
- BOD5, Biological Oxygen Demand [water, surface water]: 2.34008e-5 kg; lognormal variance with pedigree 0.040737, pedigree (1,1,4,1,1)
  (same comment as for TOC, Total Organic Carbon)
- Potassium, ion [water, ground-, long-term]: 0.000258676 kg; lognormal variance with pedigree 0.29056, pedigree (1,1,4,1,1)
  (same comment as for Cadmium, ion)
- Antimony [water, surface water]: 2.16636e-11 kg; lognormal variance with pedigree 0.037563, pedigree (1,1,4,1,1)
  (same comment as for TOC, Total Organic Carbon)
- Potassium [air, urban air close to ground]: 1.7811e-6 kg; lognormal variance with pedigree 0.48153, pedigree (1,1,4,1,1)
  (same comment as for Phosphorus)
- NMVOC, non-methane volatile organic compounds, unspecified origin [air, urban air close to ground]: 1.1598e-7 kg; lognormal variance with pedigree 0.100914, pedigree (1,1,4,1,1)
  Incomplete combustion product emitted to air.
  Uncertainty: uncertainty calculated from uncertainty in average operation emissions, and the uncertainty of the flue gas volume from this waste.
- Tin, ion [water, surface water]: 2.93211e-14 kg; lognormal variance with pedigree 1.1159, pedigree (1,1,4,1,1)
  (same comment as for TOC, Total Organic Carbon)
- Particulates, < 2.5 um [air, urban air close to ground]: 3.04259e-7 kg; lognormal variance with pedigree 0.43231, pedigree (1,1,4,1,1)
  (same comment as for NMVOC, non-methane volatile organic compounds, unspecified origin)
- Vanadium, ion [water, surface water]: 3.9584e-11 kg; lognormal variance with pedigree 0.54562, pedigree (1,1,4,1,1)
  (same comment as for TOC, Total Organic Carbon)
- DOC, Dissolved Organic Carbon [water, surface water]: 1.04301e-5 kg; lognormal variance with pedigree 0.039892, pedigree (1,1,4,1,1)
  (same comment as for TOC, Total Organic Carbon)
- Particulates, > 2.5 um, and < 10um [air, urban air close to ground]: 1.52896e-9 kg; lognormal variance with pedigree 0.20929, pedigree (1,1,4,1,1)
  (same comment as for NMVOC, non-methane volatile organic compounds, unspecified origin)
- Chloride [water, surface water]: 8.78995e-5 kg; lognormal variance with pedigree 0.25345, pedigree (1,1,4,1,1)
  (same comment as for TOC, Total Organic Carbon)
- Zinc, ion [water, surface water]: 2.61711e-10 kg; lognormal variance with pedigree 0.88375, pedigree (1,1,4,1,1)
  (same comment as for TOC, Total Organic Carbon)
- Dioxins, measured as 2,3,7,8-tetrachlorodibenzo-p-dioxin [air, urban air close to ground]: 5.09648e-15 kg; lognormal variance with pedigree 0.43231, pedigree (1,1,4,1,1)
  (same comment as for NMVOC, non-methane volatile organic compounds, unspecified origin)
- Thallium [water, surface water]: 8.1151e-14 kg; lognormal variance with pedigree 0.72642, pedigree (1,1,4,1,1)
  (same comment as for TOC, Total Organic Carbon)
- Benzene [air, urban air close to ground]: 2.54839e-9 kg; lognormal variance with pedigree 0.100914, pedigree (1,1,4,1,1)
  (same comment as for NMVOC, non-methane volatile organic compounds, unspecified origin)
- Silicon [water, surface water]: 3.8487e-7 kg; lognormal variance with pedigree 0.43903, pedigree (1,1,4,1,1)
  (same comment as for TOC, Total Organic Carbon)
- Toluene [air, urban air close to ground]: 5.09678e-9 kg; lognormal variance with pedigree 0.100914, pedigree (1,1,4,1,1)
  (same comment as for NMVOC, non-methane volatile organic compounds, unspecified origin)
- Iron, ion [water, surface water]: 2.54731e-10 kg; lognormal variance with pedigree 1.1767, pedigree (1,1,4,1,1)
  (same comment as for TOC, Total Organic Carbon)
- Benzene, pentachloro- [air, urban air close to ground]: 1.34638e-11 kg; lognormal variance with pedigree 0.100914, pedigree (1,1,4,1,1)
  (same comment as for NMVOC, non-methane volatile organic compounds, unspecified origin)
- Calcium, ion [water, surface water]: 1.85213e-8 kg; lognormal variance with pedigree 0.90914, pedigree (1,1,4,1,1)
  (same comment as for TOC, Total Organic Carbon)
- Benzene, hexachloro- [air, urban air close to ground]: 5.32859e-12 kg; lognormal variance with pedigree 0.100914, pedigree (1,1,4,1,1)
  (same comment as for NMVOC, non-methane volatile organic compounds, unspecified origin)
- Aluminium [water, surface water]: 6.48915e-8 kg; lognormal variance with pedigree 0.73007, pedigree (1,1,4,1,1)
  (same comment as for TOC, Total Organic Carbon)
- Phenol, pentachloro- [air, urban air close to ground]: 1.1098e-12 kg; lognormal variance with pedigree 0.100914, pedigree (1,1,4,1,1)
  (same comment as for NMVOC, non-methane volatile organic compounds, unspecified origin)
- Potassium, ion [water, surface water]: 9.77602e-5 kg; lognormal variance with pedigree 0.16883, pedigree (1,1,4,1,1)
  (same comment as for TOC, Total Organic Carbon)
- Benzo(a)pyrene [air, urban air close to ground]: 5.67102e-14 kg; lognormal variance with pedigree 0.43231, pedigree (1,1,4,1,1)
  (same comment as for NMVOC, non-methane volatile organic compounds, unspecified origin)
- BOD5, Biological Oxygen Demand [water, ground-, long-term]: 7.62437e-5 kg; lognormal variance with pedigree 0.03446, pedigree (1,1,4,1,1)
  (same comment as for Cadmium, ion)
- Sulfate [water, surface water]: 5.13484e-5 kg; lognormal variance with pedigree 0.30344, pedigree (1,1,4,1,1)
  (same comment as for TOC, Total Organic Carbon)
- Heat, waste [water, surface water]: 0.212438 MJ; lognormal variance with pedigree 0.059824, pedigree (1,1,4,1,1)
  Waste heat generated from heating value of this waste plus any electricity required to process it.
  Uncertainty: uncertainty is calculated from uncertainties in waste composition and uncertainties in energy efficiency and the uncertainty in internal energy demand
- Arsenic, ion [water, surface water]: 2.43977e-9 kg
  Emissions to water from waste composition and transfer coefficients in incinerator and landfills.
- Chromium, ion [water, surface water]: 1.03114e-10 kg; lognormal variance with pedigree 0.84894, pedigree (1,1,4,1,1)
  (same comment as for TOC, Total Organic Carbon)
- Heat, waste [air, urban air close to ground]: 0.861353 MJ; lognormal variance with pedigree 0.059824, pedigree (1,1,4,1,1)
  (same comment as for Heat, waste)
- COD, Chemical Oxygen Demand [water, ground-, long-term]: 0.000233092 kg; lognormal variance with pedigree 0.03446, pedigree (1,1,4,1,1)
  (same comment as for Cadmium, ion)
- Water [air, urban air close to ground]: 6.39225e-5 m3; lognormal variance with pedigree 1.2239, pedigree (1,1,4,1,1)
  Water vapour from waste humidity, hydrogen oxidation and part of the process water.
  Uncertainty: Uncertainty calculated from uncertainty in waste composition, process water input and the uncertainty of fraction to air.
- TOC, Total Organic Carbon [water, ground-, long-term]: 9.22367e-5 kg; lognormal variance with pedigree 0.03446, pedigree (1,1,4,1,1)
  (same comment as for Cadmium, ion)
- DOC, Dissolved Organic Carbon [water, ground-, long-term]: 9.22367e-5 kg; lognormal variance with pedigree 0.03446, pedigree (1,1,4,1,1)
  (same comment as for Cadmium, ion)
- Water [water, surface water]: 1.16343e-5 m3; lognormal variance with pedigree 1.595, pedigree (1,1,4,1,1)
  Process water released to surface water.
  Uncertainty: uncertainty calculated from uncertainty in process water input and the uncertainty of fraction to surface water.
- Sulfate [water, ground-, long-term]: 0.00030043 kg; lognormal variance with pedigree 0.43544, pedigree (1,1,4,1,1)
  (same comment as for Cadmium, ion)
- Carbon monoxide, non-fossil [air, urban air close to ground]: 4.33196e-6 kg; lognormal variance with pedigree 0.83029, pedigree (1,1,4,1,1)
  (same comment as for NMVOC, non-methane volatile organic compounds, unspecified origin)
- Nitrate [water, ground-, long-term]: 1.87447e-6 kg; lognormal variance with pedigree 0.7244, pedigree (1,1,4,1,1)
  (same comment as for Cadmium, ion)
- Carbon dioxide, non-fossil [air, urban air close to ground]: 0.114631 kg; lognormal variance with pedigree 0.030566, pedigree (1,1,4,1,1)
  (same comment as for Phosphorus)
- Phosphate [water, ground-, long-term]: 8.43018e-8 kg; lognormal variance with pedigree 5.6366, pedigree (1,1,4,1,1)
  (same comment as for Cadmium, ion)
- Methane, non-fossil [air, urban air close to ground]: 3.82259e-8 kg; lognormal variance with pedigree 0.100914, pedigree (1,1,4,1,1)
  (same comment as for NMVOC, non-methane volatile organic compounds, unspecified origin)
- Chloride [water, ground-, long-term]: 1.30355e-5 kg; lognormal variance with pedigree 0.61442, pedigree (1,1,4,1,1)
  (same comment as for Cadmium, ion)
- Phosphate [water, surface water]: 1.39561e-9 kg; lognormal variance with pedigree 0.65307, pedigree (1,1,4,1,1)
  (same comment as for TOC, Total Organic Carbon)
- Sulfur dioxide [air, urban air close to ground]: 1.33629e-6 kg; lognormal variance with pedigree 0.614, pedigree (1,1,4,1,1)
  (same comment as for Phosphorus)
- Silver, ion [water, ground-, long-term]: 2.98057e-8 kg; lognormal variance with pedigree 1.6343, pedigree (1,1,4,1,1)
  (same comment as for Cadmium, ion)
- Nitrogen oxides [air, urban air close to ground]: 1.28906e-5 kg; lognormal variance with pedigree 0.3434, pedigree (1,1,4,1,1)
  Sum of fuel-Nox and thermal-NOx emitted to air after DeNOx stage.
  Uncertainty: uncertainty calculated from uncertainty in average N-emissions and uncertainty in the share of thermal NOx and the uncertainty in nitrogen content in *this* waste.
- Arsenic, ion [water, ground-, long-term]: 0 kg; pedigree (1,1,1,1,1)
  (same comment as for Cadmium, ion)
- Ammonia [air, urban air close to ground]: 4.07065e-8 kg; lognormal variance with pedigree 0.3434, pedigree (1,1,4,1,1)
  (same comment as for Dinitrogen monoxide)
- Barium [water, ground-, long-term]: 7.63793e-7 kg; lognormal variance with pedigree 1.5426, pedigree (1,1,4,1,1)
  (same comment as for Cadmium, ion)
