# biogas purification to biomethane by membrane technique

Dataset: EcoSpold 2, unit process
Geography: RoW
Time period: 2018-01-01 to 2021-12-31
Technology level: current
Classification: ISIC rev.4 ecoinvent: 3520:Manufacture of gas; distribution of gaseous fuels through mains
Tags: ConvertedDataset
Scenario: Business-as-Usual
System model: Allocation, cut-off by classification
Generated by: Thomas Kägi
Published in: Kaegi Thomas 2019
Database: ecoinvent
isCopyrightProtected: true
accessRestrictedTo: 1

## General comment
The data presented is derived from information available from the manufacturer of biogas upgrading plants. The upgraded gas leaves the process with a pressure of 5 bar. For the composition of the product gas we assume a share of more than 96 Vol. % of methane.
[This dataset is meant to replace the following datasets:]

## Included activities start
The activity starts with the biogas being available at the gates of the purification plant.

## Included activities end
The activity ends with the biomethane being available for transportation at the gates of the purification plant. Electricity consumption and emissions represent the raw gas compression, H2S removal, gas conditioning and methane enrichment of biogas. The production and disposal of activated carbon are neglected. Infrastructure expenditures are included employing generic data for facilities of a chemical plant as a first approximation.

## Geography
Plants using the described technology are in operation in Switzerland.

## Technology
Membrane technology

## Parameters
- carbon dioxide density (ntp): 1.997 kg/m3; name CO2_density
  CO2 has a density of 1.997 kg/Nm3 in standard temperature and pressure (STP) conditions. STP is defined as 0oC (273.15 K, 32oF) and 1 atm (101.325 kN/m2, 101.325 kPa, 14.7 psia, 0 psig, 30 in Hg, 760 torr).
  Reference: Engineering ToolBox, (2003). Gases - Densities. [online] Available at: https://www.engineeringtoolbox.com/gas-density-d_158.html [Accessed 30 01 2020].
- methane density (stp): 0.717 kg/m3; name CH4_density_STP
  CH4 has a density of 0.717 kg/Nm3 in standard temperature and pressure (STP) conditions. STP is defined as 0oC (273.15 K, 32oF) and 1 atm (101.325 kN/m2, 101.325 kPa, 14.7 psia, 0 psig, 30 in Hg, 760 torr).
  Reference: Engineering ToolBox, (2003). Gases - Densities. [online] Available at: https://www.engineeringtoolbox.com/gas-density-d_158.html [Accessed 30 01 2020].
- share of methane in biogas: 0.633 dimensionless; name CH4_volumetric_concentration
  Assumed volumetric concentration of CH4 in biogas.
- carbon dioxide, volumetric concentration: 0.367 dimensionless; name CO2_volumetric_share
  Assumed volumetric concentration of CO2 in biogas.

## Reference product
- biomethane, high pressure: 1 m3; name RP_CH4; CPC 17200: Coal gas, water gas, producer gas and similar gases, other than petroleum gases and other gaseous hydrocarbons; By-product classification allocatable product; CAS 74-82-8
  production volume 1.1532e9 m3
    Production volume amount was scaled from the respective Swiss value. GDP scaling was employed with Switzerland accounting for roughly 0.8% of the global GDP, yielding a global production volume of 1162500000 m3 of biomethane.
  property heating value, net 34.97 MJ
    Literature value, Source: United Nations Statistics Division (2018) International Recommendations for Energy Statistics (IRES). Available at: http://unstats.un.org/unsd/statcom/doc11/BG-IRES.pdf.
  property price 0.144 EUR2005; name RP_CH4_price_EUR2005
    Temporary price data. Calculated as 90% of purchasers price based on: Same prices per energy output as natural gas, based on the proportional heating value (55.5 MJ/kg for methane; 54.8 MJ/kg for natural gas)
  property carbon content 0.71887
    carbon content on a dry matter basis (reserved; not for manual entry)
  properties: carbon content, fossil 0, water in wet mass 0 kg, dry mass 0.72651 kg, wet mass 0.72651 kg, carbon content, non-fossil 0.71887, water content 0, carbon allocation 0.522266 kg

## Inputs from technosphere
- activated carbon, granular: 0.00214 kg; lognormal variance with pedigree 0.1262, pedigree (3,4,2,5,1)
  Reported amount in Willi 2019
  properties: wet mass 1 kg, carbon content, fossil 0.81, dry mass 0.97 kg, water content 0.0309278, heating value, net 30.23 MJ
  note on carbon content, fossil: Literature value. From Biomass and Bioenergy: Processing and Properties (2014) edited by Khalid Rehman Hakeem, Mohammad Jawaid, Umer Rashid (p. 252). Carbon content is in the range of 72-90%, an average value of 81% is taken.
- biogas: 0.94078 m3; name BG3
  Reported share in Hafner 2019
  properties: carbon content, non-fossil 0.44848, wet mass 1.15 kg, heating value, net 22.73 MJ, dry mass 1.15 kg
  note on carbon content, non-fossil: Total C content in kg/Nm3 (Tab 12.8, ecoinvent v2.2 report n17), referred to 1kg DM
  note on heating value, net: Value taken from the general comment of "heat and power co-generation, biogas, gas engine" dataset.
- biogas: 0.02622 m3; name BG1
  Reported share in Hafner 2019
  properties: heating value, net 22.73 MJ, wet mass 1.15 kg, carbon content, non-fossil 0.44848, dry mass 1.15 kg
- biogas: 0.57526 m3; name BG2; lognormal variance with pedigree 0.0034, pedigree (2,1,2,5,1)
  Reported share in Hafner 2019
  properties: carbon content, non-fossil 0.44848, dry mass 1.15 kg, heating value, net 22.73 MJ, wet mass 1.15 kg
- lubricating oil: 0.000114 kg; lognormal variance with pedigree 0.1262, pedigree (3,4,2,5,1)
  Reported amount in Willi 2019
  properties: heating value, net 40.2 MJ, wet mass 1 kg, dry mass 1 kg, carbon content, fossil 0.75
  note on heating value, net: Literature value, Source: IPCC 2006, 2006 IPCC Guidelines for National Greenhouse Gas Inventories, Prepared by the National Greenhouse Gas Inventories Programme, Eggleston H.S., Buendia L., Miwa K., Ngara T. and Tanabe K. (eds). Published: IGES, Japan
  note on carbon content, fossil: Lubricating oil is produced from diesel. C-content/dry mass of fats and oils considered 75%, from: ecoinvent v2.2 report, n 15a, pg 40
- electricity, low voltage: 0 kWh; pedigree (1,1,1,1,1)
  Average of two sources: Willi 2019 and Hitachi Zosen Inova 2016
- steel, chromium steel 18/8: 0.000101 kg; lognormal variance with pedigree 0.1262, pedigree (3,4,2,5,1)
  Reported amount in Willi 2019
  properties: carbon content, fossil 0.0008, dry mass 1 kg, wet mass 1 kg
  note on carbon content, fossil: Stainless steel model is the grade 304 steel (18/8 stainless, 18% chromium 8% nickel; max. 0.08% C)
- chemical factory, organics: 5.4e-11 unit; lognormal variance with pedigree 0.448, pedigree (4,5,5,5,5)
  Reported amount in Willi 2019
- electricity, low voltage: 0.00599761, 0.00109205, 0.0246517, 0.0861275, 0.0175834, 0.269961, 0.0436749, 0.125412 kWh (8 entries); lognormal variance with pedigree 0.1262, pedigree (3,4,2,5,1)
  Average of two sources: Willi 2019 and Hitachi Zosen Inova 2016

## Emissions to nature
- Nitrogen [air, unspecified]: 0.05156 kg
  Emissions are calculated based on a) the composition of the biogas entering the process, b) the composition of biomethane being produced and the fugitive emissions of CH4 (on the basis of the biomethane produced). The composition of the biogas is the following: CH4: 63.3% v/v and CO2: 33.4% v/v, N: 3.2% v/v and H2S: 0.0005% v/v. The composition of the biomethane is the following: CH4: 97% v/v, CO2: 1.5% v/v, N: 0.8% v/v, H2S: 0.0002% v/v. Fugitive emissions for this type of upgrading technology have been measured to be 0.64% of CH4 in biogas. Nitrogen and hydrogen sulfide in the biogas, exit the process as emissions to air. Density of CO2 and CH4 considered to be: 1.977 kg/m3 and 0.708 kg/m3 respectively.
- Sulfur dioxide [air, urban air close to ground]: 6.599e-6 kg; lognormal variance with pedigree 0.22, pedigree (5,5,5,5,5)
  Due to missing data assumed to be the same as in PSA technology reported in Stucki 2011
- Heat, waste [air, non-urban air or from high stacks]: 1.28 MJ; lognormal variance with pedigree 0.22, pedigree (5,5,5,5,5)
  Due to missing data assumed to be the same as in PSA technology reported in Stucki 2011
- Methane, non-fossil [air, non-urban air or from high stacks]: 0.00442 kg; lognormal variance with pedigree 0.0122, pedigree (1,1,2,5,1)
  (same comment as for Nitrogen)
- Carbon dioxide, non-fossil [air, non-urban air or from high stacks]: 0.98872 kg; lognormal variance with pedigree 0.22, pedigree (5,5,5,5,5)
  (same comment as for Nitrogen)
- Hydrogen sulfide [air, non-urban air or from high stacks]: 9.8e-6 kg; lognormal variance with pedigree 0.22, pedigree (5,5,5,5,5)
  (same comment as for Nitrogen)
