# concrete slab production

Dataset: EcoSpold 2, unit process
Geography: IN
Time period: 2014-04-01 to 2021-12-31
Technology level: current
Classification: ISIC rev.4 ecoinvent: 2395:Manufacture of articles of concrete, cement and plaster
Scenario: Business-as-Usual
System model: Allocation, cut-off by classification
Generated by: P V Kiran Ananth
Published in: Kiran Ananth P. V. 2017
Database: ecoinvent
isCopyrightProtected: true
accessRestrictedTo: 1

## General comment
A concrete slab is a common structural element of modern buildings. Horizontal slabs of steel reinforced concrete, typically between 4 and 20 inches (100 and 500 millimeters) thick, are most often used to construct floors and ceilings, while thinner slabs are also used for exterior paving.
In many domestic and industrial buildings a thick concrete slab, supported on foundations or directly on the subsoil, is used to construct the ground floor of a building. These can either be "ground-bearing" or "suspended" slabs. For Double-storey or Multi-storey buildings, the use of a few common types of concrete suspended slabs are used. In high rise buildings and skyscrapers, thinner, pre-cast concrete slabs are slung between the steel frames to form the floors and ceilings on each level. Cast in-Situ slabs which used in high rise buildings and huge shopping complexes as well as houses. These in-situ slabs are cast on site using shutters and reinforced steel.
On the technical drawings, reinforced concrete slabs are often abbreviated to "r.c.c.slab" or simply "r.c." Technical drawings are often created by structural Engineers who use software such as AutoCad or Revit structure

## Included activities start
Activity startes with reception of concrete of 25-30 MPa strength and reinforced steel at construction site.

## Included activities end
Activity ends with the reinforced concrete slab prepared, on site.

## Geography
Data represents for Indian geography.

## Technology
Two types of concrete used to cast slab: Ready mixed concrete and Hand/Machine mix concrete. Hand mix concrete are rearly used in slab casting.

## Time period
Data available for above period.

## Parameters
- fraction, process water, to air: 0.15 dimensionless; name fraction_PW_to_air; lognormal variance with pedigree 0.094, pedigree (4,4,3,5,4)
- fraction, tap water, to air: 0.15 dimensionless; name fraction_TW_to_air; lognormal variance with pedigree 0.094, pedigree (4,4,3,5,4)

## Reference product
- concrete slab: 1 m3; name RP_amount_1; By-product classification allocatable product; CPC 3733: Refractory cements, mortars, concretes and similar compositions n.e.c.
  production volume 1.764e7 m3; name concreteslab_PV; = 5.88E07*30%
    Out of 58.8 million m3 concrete of strength of 25-30 MPa nearly 30 percentage used in manufacturing concrete slab. Value considered is puerly based on assumption and have very high uncertainty.
  property price 185 EUR2005; name RP_amount_1_price_EUR2005
    Calculated value based on data from United Nations Commodity Trade Statistics Database (comtrade.un.org). UN comtrade category: 681019 Tiles & flagstones of cement, concrete, artificial ston. Year 2005. Using exchange rate of 1EURO = 1.209 USD. Average of price of import into 5 main markets (EU, US, JP, IN and CN).
  property carbon content 0
    carbon content on a dry matter basis (reserved; not for manual entry)
  properties: water content 0.0725913, carbon content, non-fossil 0, dry mass 2273 kg, carbon content, fossil 0, water in wet mass 165 kg, wet mass 2438 kg, carbon allocation 0 kg

## Inputs from technosphere
- lubricating oil: 1.8992 kg; = 0.000779*2438; lognormal variance with pedigree 0.0606, pedigree (2,1,4,5,4)
  India specific data not available due to sector in informal in nature. Data refered from Fibre cement corrugated slag production,GLO,1991-201 dataset
  properties: heating value, net 40.2 MJ, dry mass 1 kg, wet mass 1 kg, carbon content, fossil 0.75
  note on heating value, net: Literature value, Source: IPCC 2006, 2006 IPCC Guidelines for National Greenhouse Gas Inventories, Prepared by the National Greenhouse Gas Inventories Programme, Eggleston H.S., Buendia L., Miwa K., Ngara T. and Tanabe K. (eds). Published: IGES, Japan
  note on carbon content, fossil: Lubricating oil is produced from diesel. C-content/dry mass of fats and oils considered 75%, from: ecoinvent v2.2 report, n 15a, pg 40
- reinforcing steel: 80 kg; lognormal variance with pedigree 0.005225, pedigree (3,3,3,2,1)
  Data represents with reference to the consultation with manufacturer of concrete slab. The use of reinforced steel is in the range of 70 to 90 kg per cubic meter of concrete slab.
  properties: dry mass 1 kg, carbon content, fossil 0.004, wet mass 1 kg
- electricity, medium voltage: 650.946 kWh; = 0.267*2438; lognormal variance with pedigree 0.0512, pedigree (2,1,4,5,4)
  Reference to the consultation with 2 concrete slab manufacture energy & water do not play importnat role. Data refered from Fibre cement corrugated slag production,GLO,1991-201 dataset (accessed on 20171212)
- tap water: 5875.58 kg; name tap_water_input; = 2.41*2438; lognormal variance with pedigree 0.0512, pedigree (2,1,4,5,4)
  (same comment as for electricity, medium voltage)
  properties: carbon content, fossil 0.00178991, water content 2962.17, wet mass 1 kg, dry mass 0.000337476 kg
  note on carbon content, fossil: Bicarbonate content is 2.93 mol/m3. CO2 content is 0.1 mol/m3 (ecoinvent v2.2 report 8, Tab 93.1).
- heat, central or small-scale, other than natural gas: 30.9382 MJ; = 0.01269*2438; lognormal variance with pedigree 0.0512, pedigree (2,1,4,5,4)
  (same comment as for electricity, medium voltage)
  properties: heating value, net 1 MJ
- wastewater from concrete production: -0.026818 m3; name wastewater; = (1.1E-05*2438)*-1; lognormal variance with pedigree 0.0606, pedigree (2,1,4,5,4)
  (same comment as for lubricating oil)
  production volume 473070 m3; = wastewater*concreteslab_PV
    Calculated from production volume of reference product.
  property price 0 EUR2005; name wastewater_price_EUR2005
  properties: water content 2225.48, carbon content, fossil 0.027074, wet mass 1000 kg, dry mass 0.449139 kg
- wastewater, unpolluted: -2.8037 m3; name wastewaterunpolluted; = (0.00115*2438)*-1; lognormal variance with pedigree 0.0606, pedigree (2,1,4,5,4)
  (same comment as for lubricating oil)
  production volume 4.94573e7 m3; = concreteslab_PV * (wastewaterunpolluted / RP_amount_1)
    Calculated from production volume of reference product using the relative outputs.
  property price 0 EUR2005; name wastewaterunpolluted_price_EUR2005
  properties: wet mass 1000 kg, water content 2962.17, carbon content, non-fossil 0.00178991, carbon content, fossil 0.00178991, dry mass 0.337476 kg
  note on carbon content, fossil: Assumed to be like in tap water. Bicarbonate content is 2.93 mol/m3. CO2 content is 0.1 mol/m3 (ecoinvent v2.2 report 8, Tab 93.1).
- concrete, 25-30MPa: 0.99 m3; name concrete; lognormal variance with pedigree 0.0052, pedigree (3,3,3,1,1)
  Data represents with reference to the consultation with manufacturer of concrete slab. The value calculated by considering the density of steel as 8050 kg/m3 and use of reinforced steel is in the range of 70 to 90 kg per cubic meter of concrete slab.
  property water in wet mass 165 kg; name ref_WWM
  property sand content 787 kg; name sand
  property dry mass 2273 kg; name ref_DM; = sand+gravel+cement
  property gravel content 1180 kg; name gravel
  property cement content 306 kg; name cement
  properties: carbon content, fossil 1e-51, wet mass 2438 kg, water content 0.0725913
- heat, district or industrial, other than natural gas: 574.393 MJ; = 0.2356*2438; lognormal variance with pedigree 0.0512, pedigree (2,1,4,5,4)
  (same comment as for lubricating oil)
  properties: corresponding fuel use, propane, furnace >100kW 1.05263 MJ, heating value, net 1 MJ
  note on corresponding fuel use, propane, furnace >100kW: Lower heating value of the fuel input related to the heat/electricity output, taken directly from ecoinvent v3.0 dataset "heat production, natural gas, at industrial furnace >100kW, GLO 2000".

## Emissions to nature
- Water [water, unspecified]: 2.16372 m3; name water_to_water_unspecified; = (tap_water_input/1000)*(1-fraction_TW_to_air)-(wastewater*-1)-(wastewaterunpolluted*-1); lognormal variance with pedigree 0.0847, pedigree (2,2,3,5,4)
  (same comment as for lubricating oil)
- Water [air, unspecified]: 0.881337 m3; name water_to_air_unspecified; = 0.0003615*2438; lognormal variance with pedigree 0.0847, pedigree (2,2,3,5,4)
  (same comment as for lubricating oil)

## Sampling procedure
Data collected by consulting with two concrete slab manufacturer and secondary research.

## Extrapolations
This dataset has been extrapolated from year 2017 to the year of the calculation (2021). The uncertainty has been adjusted accordingly.

## Review by Marion Sié 2017-11-09
Minor imbalances have been observed (between 3% and 1%).
