# treatment of residue from mechanical treatment, cathode ray tube display, municipal waste incineration

Dataset: EcoSpold 2, unit process
Geography: RoW
Time period: 2006-01-01 to 2021-12-31
Technology level: current
Classification: ISIC rev.4 ecoinvent: 3821:Treatment and disposal of non-hazardous waste
Synonyms: municipal waste incineration; Siedlungsabfallverbrennung; Kehrichtverbrennung
Scenario: Business-as-Usual
System model: Allocation, cut-off by classification
Share of production covered: 1.8 %
Generated by: Gabor Doka
Published in: Doka G. 2013
Database: ecoinvent
isCopyrightProtected: true
accessRestrictedTo: 1

## General comment
This dataset represents the activity of waste disposal of residue from mechanical treatment, cathode ray tube display in a municipal solid waste incinerator (MSWI) // Recommended use of this dataset: Only for incineration of shredder residues generated in the recycling (mechanical treatment) of CRT screens (Cathode Ray Tube residue) // Inventoried waste contains 1.84% rubber; 45.2% Plastics from electronic consumer goods; 45.2% Plastics from electronic industrial goods; 2.32% MSWI iron scrap; 2.19% Alu in MSW; 1.39% Glass; 1.86% wiring copper; 0.0715% Pb in ASR inert; 0.0149% silver; . // Waste composition (wet, in ppm): upper heating value 33.29 MJ/kg; lower heating value 31.91 MJ/kg; H2O 8559.9; O 56016; H 68796; C 751310; S 401.89; N 12011; P 470.09; B n.a.; Cl 6229.2; Br 4967.1; F 225.78; I n.a.; Ag 148.56; As 6.7733; Ba 159.85; Cd 136.2; Co 26.621; Cr 79.422; Cu 21842; Hg 0.76766; Mn 61.83; Mo 2.7093; Ni 476.78; Pb 858.09; Sb 4335.5; Se 1.7697; Sn 198.85; V 6.4689; Zn 698.08; Be 0.42136; Sc n.a.; Sr 74.58; Ti 4043.2; Tl 0.33709; W n.a.; Si 8372.8; Fe 20313; Ca 3820; Al 24220; K 105.66; Mg n.a.; Na 1019.8; // Share of carbon in waste that is biogenic 0%. // Share of metals in waste not oxidised and bulk-recyclable (exclude very small or thin parts) Iron: 92.98%; Alu: 90.09%; Copper: 85.35%. // One kg of this waste produces 0.1059 kg of slag and 0.02048 kg of residues, which are landfilled. Additional solidification with 0.008194 kg of cement. // Net energy production: 4.09MJ/kg electric energy and 7.95MJ/kg thermal energy. // Recovery of metal scrap to recycling: 10.932g iron scrap, 6.6548g aluminium scrap, 5.6944g copper scrap.

## Included activities start
waste incineration from waste reception gate and delivery into waste bunker at incinerator plant site (without transports to the incinerator)

## Included activities end
Waste-specific short-term emissions to water from leachate. Long-term emissions from landfill to ground water.

## Geography
Specific to the technology mix encountered in Switzerland in 2010. Well applicable to modern incineration practices in Europe, North America or Japan.

## Technology
average Swiss MSWI plants in 2010 (grate incinerators) with electrostatic precipitator for fly ash (ESP), wet flue gas scrubber and 25% SNCR , 42.77% SCR-high dust , 32.68% SCR-low dust -DeNOx facilities and 0% without Denox (weighted according to mass of burnt waste, representing Swiss average). Efficiency of iron scrap separation from slag : 58%. Efficiency of non-ferrous scrap separation from slag : 31%. Gross electric efficiency technology mix 15.84% and Gross thermal efficiency technology mix 28.51%

## Time period
Waste composition as given in literature reference, theoretical data or other source. Transfer coefficients for modern MSWI.

## Reference product
- residue from mechanical treatment, cathode ray tube display: -1 kg; CPC 39990: Other wastes n.e.c.; By-product classification Waste
  Main reference product of this activity (supply of disposal service).
  production volume 5.2955e7 kg
    based on estimate on MSW in WTE globally and estimate of share of WEEE residues in Swiss MSW based on unqualified estimate of CRT waste in CH and rate of this residue waste per device (from Hischier et al. 2007-V)
  property heating value, net 31.91 MJ
    Value taken from the general comment of the treatment dataset.
  property price 0 EUR2005
    Waste products are assigned a price of zero as they are assumed to require further treatment.
  property carbon content 0.764801
    carbon content on a dry matter basis (reserved; not for manual entry)
  properties: carbon content, non-fossil 0, water content 0, dry mass 1 kg, carbon content, fossil 0.764801, wet mass 1 kg, water in wet mass 0 kg, carbon allocation 0.764801 kg

## By-products
All rows: pedigree (1,1,1,1,1)
- electricity, for reuse in municipal waste incineration only: 0 kWh; name E_el_prod_MSWI; CPC 17100: Electrical energy; By-product classification allocatable product
  Net electricity generated from this waste and used in internal MSWI plant energy redistribution.
  Uncertainty: uncertainty is calculated from uncertainties in waste composition and uncertainties in energy efficiency and the uncertainty in internal energy demand
  production volume 6.0097e7 kWh
    calculated in proportion to reference product waste input to incinerator
  property true value relation 3.6; name E_el_prod_MSWI_true_value_relation
    property to calculate "true value" from
  property exergy 3.6 MJ; name E_el_prod_MSWI_exergy
    This exergy property is based on the exergy content of the product.
  property price 0.1 EUR2005; name E_el_prod_MSWI_price_EUR2005
    Estimated to be the same price as in case of electricity, medium voltage.
- heat, for reuse in municipal waste incineration only: 0 MJ; name E_th_prod_MSWI; By-product classification allocatable product; CPC 17300: Steam and hot water
  (same comment as for electricity, for reuse in municipal waste incineration only)
  production volume 4.2099e8 MJ
    calculated in proportion to reference product waste input to incinerator
  property true value relation 0.1842; name E_th_prod_MSWI_true_value_relation
    property to calculate "true value" from
  property exergy 0.1842 MJ; name E_th_prod_MSWI_exergy
    This exergy property is based on the exergy content of the product.
  property price 0.0106 EUR2005; name E_th_prod_MSWI_price_EUR2005
    Average European district heat price from Ecoheatcool and Euroheat 2005-2006, Ecoheat Work package 1: The European heat market. Final report. 10.6 EUR/GJ i s the price of district heat. http://www.solarthermalworld.org/files/Ecoheatcool%20WP1%20Web.pdf?download
- copper scrap, sorted, pressed: 0 kg; CPC 39361: Waste and scrap of copper; By-product classification Recyclable
  Copper scrap recovered from this waste.
  Uncertainty: uncertainty calculated from uncertainty in waste composition, uncertainty of share of recyclable metal, uncertainty of transfer coefficient to bottom ash, uncertainty of the efficiency of scrap removal in MSWI plant.
  production volume 0 kg
    calculated in proportion to reference product waste input to incinerator
  property price 2.84 EUR2005
    Temporary price data. Calculated as 90% of purchasers price based on: Source: USGS Mineral Yearbook 2007, Table 1 in <http://minerals.usgs.gov/minerals/pubs/commodity/recycle/myb1-2007-recyc.pdf>
  property carbon content 0
    carbon content on a dry matter basis (reserved; not for manual entry)
  properties: water in wet mass 0 kg, wet mass 1 kg, dry mass 1 kg, carbon content, fossil 0, water content 0, carbon content, non-fossil 0, carbon allocation 0 kg
- iron scrap, sorted, pressed: 0 kg; CPC 39310: Slag, dross, scalings and other waste from the manufacture of iron or steel; By-product classification Recyclable
  Iron scrap recovered from this waste.
  Uncertainty: uncertainty calculated from uncertainty in waste composition, uncertainty of share of recyclable metal, uncertainty of transfer coefficient to bottom ash, uncertainty of the efficiency of scrap removal in MSWI plant.
  production volume 0 kg
    calculated in proportion to reference product waste input to incinerator
  property price 0.175 EUR2005
    Temporary price data. Calculated as 90% of purchasers price based on: 2005 import and export prices (total trades (USD) divided by total weight (kg) in biggest economies of the world: EU27, USA, Brasil, China, India, Japan and Russia) from UN Commodity Trade Statistics Database (http://data.un.org/Explorer.aspxDatabase [Accessed 2011.06.20]). Commodity: Waste or scrap, of cast iron
  property carbon content 0
    carbon content on a dry matter basis (reserved; not for manual entry)
  properties: wet mass 1 kg, dry mass 1 kg, water in wet mass 0 kg, carbon content, fossil 0, carbon content, non-fossil 0, water content 0, carbon allocation 0 kg
- aluminium scrap, post-consumer, prepared for melting: 0 kg; By-product classification Recyclable; CPC 39363: Waste and scrap of aluminium
  Aluminium scrap recovered from this waste.
  Uncertainty: uncertainty calculated from uncertainty in waste composition, uncertainty of share of recyclable metal, uncertainty of transfer coefficient to bottom ash, uncertainty of the efficiency of scrap removal in MSWI plant.
  production volume 0 kg
    calculated in proportion to reference product waste input to incinerator
  property price 0.806 EUR2005
    Temporary price data. Calculated as 90% of purchasers price based on: 2005 import and export prices (total trades (USD) divided by total weight (kg) in biggest economies of the world: EU27, USA, Brasil, China, India, Japan and Russia) from UN Commodity Trade Statistics Database (http://data.un.org/Explorer.aspxDatabase [Accessed 2011.06.17]). Commodity: Waste or scrap, aluminium
  property carbon content 0
    carbon content on a dry matter basis (reserved; not for manual entry)
  properties: water content 0, dry mass 1 kg, carbon content, non-fossil 0, wet mass 1 kg, carbon content, fossil 0, water in wet mass 0 kg, carbon allocation 0 kg

## Inputs from technosphere
- cement, unspecified: 0 kg; pedigree (1,1,1,1,1)
  Cement required for solidification of landfilled residual material.
  Uncertainty: Uncertainty calculated from uncertainty of the waste composition of this waste, of transfer coefficients in the incinerator and of the solidification recipe.
  properties: wet mass 1 kg, dry mass 1 kg
- titanium dioxide: 0.00013381 kg; lognormal variance with pedigree 1.0377, pedigree (1,1,4,1,1)
  Input to DeNOx stage (TiO2 catalyst carrier)
  Uncertainty: uncertainty calculated from uncertainty in average DeNOx input, uncertainty in the share of thermal NOx, uncertainty of nitrogen content in average municipal waste and the uncertainty in nitrogen content in *this* waste.
  properties: dry mass 1 kg, wet mass 1 kg
- process-specific burdens, slag landfill: 0 kg; pedigree (1,1,1,1,1)
  Mass-specific expenditures required for landfilling of bottom ash.
  Uncertainty: uncertainty is calculated from uncertainties in waste composition and transfer coefficients in incinerator
- sodium hydroxide, without water, in 50% solution state: 0.00087309 kg; lognormal variance with pedigree 0.26139, pedigree (1,1,4,1,1)
  Auxilliary inputs for the flue gas treatment stage of the incinerator plant.
  Uncertainty: uncertainty calculated from uncertainty in average NaOH input, of transfer coefficients in the incinerator, and the uncertainty of the waste composition of this waste
  properties: wet mass 1 kg, dry mass 1 kg, heating value, net 3.03 MJ
- iron (III) chloride, without water, in 40% solution state: 0.00012531 kg; lognormal variance with pedigree 0.26751, pedigree (1,1,4,1,1)
  Auxilliary inputs for the wastewater treatment stage of the incinerator plant.
  Uncertainty: uncertainty calculated from uncertainty in average FeCl3 input, of transfer coefficients in the incinerator, and the uncertainty of the waste composition of this waste
  properties: dry mass 1 kg, wet mass 1 kg
- transport, freight, lorry, unspecified: 0 metric ton*km; pedigree (1,1,1,1,1)
  Transport services to transport incineration residues to landfills.
  Uncertainty: uncertainty calculated from uncertainty of the waste composition of this waste, uncertainty of transfer coefficients and the uncertainty in generic transportation distances
- hydrochloric acid, without water, in 30% solution state: 7.6989e-5 kg; lognormal variance with pedigree 0.22247, pedigree (1,1,4,1,1)
  Auxilliary inputs for the wastewater treatment stage of the incinerator plant.
  Uncertainty: uncertainty calculated from uncertainty in average HCl input, of transfer coefficients in the incinerator, and the uncertainty of the waste composition of this waste
  properties: wet mass 1 kg, dry mass 1 kg, heating value, net 3.32 MJ
- ammonia, anhydrous, liquid: 0 kg; pedigree (1,1,1,1,1)
  Input to DeNOx stage (100% NH3).
  Uncertainty: uncertainty calculated from uncertainty in average DeNOx input, uncertainty in the share of thermal NOx, uncertainty of nitrogen content in average municipal waste and the uncertainty in nitrogen content in *this* waste.
  properties: dry mass 1 kg, wet mass 1 kg
- quicklime, milled, packed: 0.0038728 kg; lognormal variance with pedigree 0.33257, pedigree (1,1,4,1,1)
  Auxilliary inputs for the flue gas treatment stage of the incinerator plant.
  Uncertainty: uncertainty calculated from uncertainty in average CaO input, of transfer coefficients in the incinerator, and the uncertainty of the waste composition of this waste
  properties: water content 0.010101, dry mass 0.99 kg, wet mass 1 kg
- slag landfill: 1.8566e-10 unit; lognormal variance with pedigree 0.042498, pedigree (1,1,4,1,1)
  Landfill infrastructure required for landfilling of bottom ash.
  Uncertainty: uncertainty is calculated from uncertainties in waste composition and transfer coefficients in incinerator
- heat, district or industrial, natural gas: 0 MJ; pedigree (1,1,1,1,1)
  Input to DeNOx stage, to heat up flue gas in low-dust SCR.
  Uncertainty: uncertainty calculated from uncertainty in average DeNOx input, uncertainty in the share of thermal NOx, uncertainty of nitrogen content in average municipal waste and the uncertainty in nitrogen content in *this* waste.
  properties: heating value, net 1 MJ
- waste cement, hydrated: 0 kg; pedigree (1,1,1,1,1)
  Hydrated cement output for solidification of landfilled residual material.
  Uncertainty: Uncertainty calculated from uncertainty of the waste composition of this waste and transfer coefficients in the incinerator and of the solidification recipe.
  production volume 0 kg
    calculated in proportion to reference product waste input to incinerator
  properties: dry mass 1 kg, wet mass 1 kg
- chemical, inorganic: 0.00029291 kg; lognormal variance with pedigree 0.22247, pedigree (1,1,4,1,1)
  Auxilliary inputs for the wastewater treatment stage of the incinerator plant. Proxy for Polyelectrolyte.
  Uncertainty: uncertainty calculated from uncertainty in average Polyelectrolyte input, of transfer coefficients in the incinerator, and the uncertainty of the waste composition of this waste
  properties: dry mass 1 kg, wet mass 1 kg, carbon content, fossil 0.003
- chromium oxide, flakes: 2.7308e-6 kg; lognormal variance with pedigree 1.0377, pedigree (1,1,4,1,1)
  Input to DeNOx stage.
  Uncertainty: uncertainty calculated from uncertainty in average DeNOx input, uncertainty in the share of thermal NOx, uncertainty of nitrogen content in average municipal waste and the uncertainty in nitrogen content in *this* waste.
  properties: dry mass 1 kg, wet mass 1 kg
- residual material landfill: 4.2676e-11 unit; lognormal variance with pedigree 0.062608, pedigree (1,1,4,1,1)
  Landfill infrastructure required for landfilling of incineration residues.
  Uncertainty: uncertainty is calculated from uncertainties in waste composition and transfer coefficients in incinerator
- chemical, organic: 4.8521e-5 kg; lognormal variance with pedigree 0.75652, pedigree (1,1,4,1,1)
  Auxilliary inputs for the wastewater treatment stage of the incinerator plant. Proxy for (pure) Trisodium-trimercapto-s-triazine (CAS 17766-26-6), used as 15% diluted solution, aka TMT15.
  Uncertainty: uncertainty calculated from uncertainty in average TMT15 input, of transfer coefficients in the incinerator, and the uncertainty of the waste composition of this waste
  properties: heating value, net 19.03 MJ, dry mass 1 kg, wet mass 1 kg, carbon content, fossil 0.628
- water, decarbonised: 0 kg; pedigree (1,1,1,1,1)
  Incinerator process water used in flue gas scrubber stage.
  Uncertainty: uncertainty calculated from uncertainty in average water input, and the uncertainty of the waste composition of this waste
  properties: wet mass 1 kg
- process-specific burdens, residual material landfill: 0 kg; pedigree (1,1,1,1,1)
  Mass-specific expenditures required for landfilling of incineration residues.
  Uncertainty: uncertainty is calculated from uncertainties in waste composition and transfer coefficients in incinerator
- municipal waste incineration facility: 2.5e-10 unit
  Demands per kilogram waste.
- copper scrap, sorted, pressed: -0.0056944 kg; lognormal variance with pedigree 0.29452, pedigree (1,1,4,1,1)
  (same comment as for copper scrap, sorted, pressed)
  production volume 301550 kg
  properties: price 2.84 EUR2005, wet mass 1 kg, dry mass 1 kg
- iron scrap, sorted, pressed: -0.010932 kg; lognormal variance with pedigree 0.30216, pedigree (1,1,4,1,1)
  (same comment as for iron scrap, sorted, pressed)
  production volume 578890 kg
  properties: wet mass 1 kg, price 0.175 EUR2005, dry mass 1 kg
- aluminium scrap, post-consumer, prepared for melting: -0.0066548 kg; lognormal variance with pedigree 0.28276, pedigree (1,1,4,1,1)
  (same comment as for aluminium scrap, post-consumer, prepared for melting)
  production volume 352410 kg
  properties: dry mass 1 kg, wet mass 1 kg, price 0.806 EUR2005
- cement, unspecified: 0.00118315, 0.000246178, 1.80309e-5, 5.13939e-5, 0.00116229, 3.42096e-5, 0.000375722, 4.54582e-5, 0.00507737 kg (9 entries); lognormal variance with pedigree 0.071692, pedigree (1,1,4,1,1)
  (same comment as for cement, unspecified)
- process-specific burdens, slag landfill: 0.0295406, 0.0748894 kg (2 entries); lognormal variance with pedigree 0.042498, pedigree (1,1,4,1,1)
  (same comment as for process-specific burdens, slag landfill)
- transport, freight, lorry, unspecified: 0.000571826, 8.95269e-5, 0.00433535 metric ton*km (3 entries); lognormal variance with pedigree 0.033654, pedigree (1,1,4,1,1)
  (same comment as for transport, freight, lorry, unspecified)
- ammonia, anhydrous, liquid: 0.000447671, 3.84827e-5, 5.98691e-5, 0.000118622, 0.000116218, 1.21809e-5, 5.44532e-5, 0.0012882 kg (8 entries); lognormal variance with pedigree 0.6805, pedigree (1,1,4,1,1)
  (same comment as for ammonia, anhydrous, liquid)
- heat, district or industrial, natural gas: 0.00444516, 0.106515, 0.28842 MJ (3 entries); lognormal variance with pedigree 0.6805, pedigree (1,1,4,1,1)
  (same comment as for heat, district or industrial, natural gas)
- waste cement, hydrated: -0.00579468, -0.0146903 kg (2 entries); lognormal variance with pedigree 0.071692, pedigree (1,1,4,1,1)
  (same comment as for waste cement, hydrated)
  production volume 1.0848e6 kg
- water, decarbonised: 0.0313105, 0.0814697, 0.328586, 0.0802391, 0.0161758, 0.0531892, 0.00293636, 0.0418425, 0.0974683, 0.611392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 kg (12 entries); lognormal variance with pedigree 0.26751, pedigree (1,1,4,1,1)
  (same comment as for water, decarbonised)
- process-specific burdens, residual material landfill: 0.00579468, 0.0146903 kg (2 entries); lognormal variance with pedigree 0.062608, pedigree (1,1,4,1,1)
  (same comment as for process-specific burdens, residual material landfill)

## Inputs from nature
- Oxygen [natural resource, in air]: 2.599 kg; lognormal variance with pedigree 0.0179523, pedigree (1,1,4,1,1)
  Oxygen from ambient air needed to combust and oxidise this waste. Net demand, i.e. without O2 leaving the plant in flue gas uncombusted.
  Uncertainty: uncertainty is calculated from uncertainties in waste composition and transfer coefficients to flue gas and soild residues in incinerator

## Emissions to nature
- Manganese [water, ground-, long-term]: 5.944e-5 kg; lognormal variance with pedigree 1.0356, pedigree (1,1,4,1,1)
  Long-term emissions from landfilling of incineration residues.
  Uncertainty: uncertainty is calculated from uncertainties in waste composition and transfer coefficients in incinerator and landfills.
- NMVOC, non-methane volatile organic compounds, unspecified origin [air, urban air close to ground]: 6.8262e-7 kg; lognormal variance with pedigree 0.077138, pedigree (1,1,4,1,1)
  Incomplete combustion product emitted to air.
  Uncertainty: uncertainty calculated from uncertainty in average operation emissions, and the uncertainty of the flue gas volume from this waste.
- Beryllium [water, surface water]: 2.6391e-10 kg; lognormal variance with pedigree 2.2025, pedigree (1,1,4,1,1)
  Emissions to water from waste composition and transfer coefficients in incinerator and landfills.
  Uncertainty: uncertainty is calculated from uncertainties in waste composition and transfer coefficients in incinerator and landfills
- Carbon dioxide, fossil [air, urban air close to ground]: 2.7382 kg; lognormal variance with pedigree 0.0105449, pedigree (1,1,4,1,1)
  Emission to air from waste composition and transfer coefficients.
  Uncertainty: uncertainty is calculated from uncertainties in waste composition and transfer coefficients in incinerator
- Potassium [air, urban air close to ground]: 5.2203e-7 kg; lognormal variance with pedigree 0.97248, pedigree (1,1,4,1,1)
  (same comment as for Carbon dioxide, fossil)
- Zinc, ion [water, surface water]: 6.2658e-8 kg; lognormal variance with pedigree 0.61215, pedigree (1,1,4,1,1)
  (same comment as for Beryllium)
- Copper, ion [water, surface water]: 8.3425e-7 kg; lognormal variance with pedigree 1.00387, pedigree (1,1,4,1,1)
  (same comment as for Beryllium)
- Antimony [air, urban air close to ground]: 3.4691e-9 kg; lognormal variance with pedigree 0.55141, pedigree (1,1,4,1,1)
  (same comment as for Carbon dioxide, fossil)
- Potassium, ion [water, surface water]: 2.3001e-5 kg; lognormal variance with pedigree 0.59201, pedigree (1,1,4,1,1)
  (same comment as for Beryllium)
- Selenium [water, ground-, long-term]: 1.1494e-6 kg; lognormal variance with pedigree 1.1039, pedigree (1,1,4,1,1)
  (same comment as for Manganese)
- Sulfate [water, surface water]: 0.00019976 kg; lognormal variance with pedigree 0.38197, pedigree (1,1,4,1,1)
  (same comment as for Beryllium)
- Nitrate [water, surface water]: 0.00015311 kg; lognormal variance with pedigree 0.25442, pedigree (1,1,4,1,1)
  (same comment as for Beryllium)
- Hydrogen fluoride [air, urban air close to ground]: 1.5232e-6 kg; lognormal variance with pedigree 0.87284, pedigree (1,1,4,1,1)
  (same comment as for Carbon dioxide, fossil)
- Cadmium, ion [water, surface water]: 1.3111e-8 kg; lognormal variance with pedigree 0.80609, pedigree (1,1,4,1,1)
  (same comment as for Beryllium)
- Mercury [water, ground-, long-term]: 4.8893e-8 kg; lognormal variance with pedigree 3.1672, pedigree (1,1,4,1,1)
  (same comment as for Manganese)
- Lead [water, surface water]: 2.5969e-8 kg; lognormal variance with pedigree 1.2837, pedigree (1,1,4,1,1)
  (same comment as for Beryllium)
- Sodium [air, urban air close to ground]: 1.0343e-6 kg; lognormal variance with pedigree 0.68004, pedigree (1,1,4,1,1)
  (same comment as for Carbon dioxide, fossil)
- Particulates, > 2.5 um, and < 10um [air, urban air close to ground]: 8.9991e-9 kg; lognormal variance with pedigree 0.17347, pedigree (1,1,4,1,1)
  (same comment as for NMVOC, non-methane volatile organic compounds, unspecified origin)
- Zinc, ion [water, ground-, long-term]: 0.00021602 kg; lognormal variance with pedigree 2.8054, pedigree (1,1,4,1,1)
  (same comment as for Manganese)
- Calcium, ion [water, surface water]: 3.5518e-5 kg; lognormal variance with pedigree 0.4127, pedigree (1,1,4,1,1)
  (same comment as for Beryllium)
- Thallium [water, surface water]: 2.065e-10 kg; lognormal variance with pedigree 1.8903, pedigree (1,1,4,1,1)
  (same comment as for Beryllium)
- Titanium, ion [water, surface water]: 1.5075e-6 kg; lognormal variance with pedigree 0.40488, pedigree (1,1,4,1,1)
  (same comment as for Beryllium)
- Particulates, < 2.5 um [air, urban air close to ground]: 1.7908e-6 kg; lognormal variance with pedigree 0.37951, pedigree (1,1,4,1,1)
  (same comment as for NMVOC, non-methane volatile organic compounds, unspecified origin)
- Arsenic [air, urban air close to ground]: 5.3057e-8 kg; lognormal variance with pedigree 1.3391, pedigree (1,1,4,1,1)
  (same comment as for Carbon dioxide, fossil)
- Zinc [air, urban air close to ground]: 4.643e-7 kg; lognormal variance with pedigree 0.73803, pedigree (1,1,4,1,1)
  (same comment as for Carbon dioxide, fossil)
- Benzene [air, urban air close to ground]: 1.4999e-8 kg; lognormal variance with pedigree 0.077138, pedigree (1,1,4,1,1)
  (same comment as for NMVOC, non-methane volatile organic compounds, unspecified origin)
- Silver, ion [water, ground-, long-term]: 0.00014855 kg; lognormal variance with pedigree 0.91736, pedigree (1,1,4,1,1)
  (same comment as for Manganese)
- Phosphate [water, ground-, long-term]: 6.1255e-5 kg; lognormal variance with pedigree 4.9061, pedigree (1,1,4,1,1)
  (same comment as for Manganese)
- Arsenic, ion [water, ground-, long-term]: 2.0283e-6 kg; lognormal variance with pedigree 1.328, pedigree (1,1,4,1,1)
  (same comment as for Manganese)
- Fluoride [water, surface water]: 1.7264e-5 kg; lognormal variance with pedigree 0.5311, pedigree (1,1,4,1,1)
  (same comment as for Beryllium)
- Copper [air, urban air close to ground]: 2.642e-7 kg; lognormal variance with pedigree 0.33402, pedigree (1,1,4,1,1)
  (same comment as for Carbon dioxide, fossil)
- Dioxins, measured as 2,3,7,8-tetrachlorodibenzo-p-dioxin [air, urban air close to ground]: 2.9997e-14 kg; lognormal variance with pedigree 0.37951, pedigree (1,1,4,1,1)
  (same comment as for NMVOC, non-methane volatile organic compounds, unspecified origin)
- Tin, ion [water, surface water]: 5.0984e-9 kg; lognormal variance with pedigree 1.5077, pedigree (1,1,4,1,1)
  (same comment as for Beryllium)
- Mercury [air, urban air close to ground]: 2.1766e-8 kg; lognormal variance with pedigree 1.6203, pedigree (1,1,4,1,1)
  (same comment as for Carbon dioxide, fossil)
- Hydrogen chloride [air, urban air close to ground]: 3.4829e-6 kg; lognormal variance with pedigree 0.45626, pedigree (1,1,4,1,1)
  (same comment as for Carbon dioxide, fossil)
- Nitrate [water, ground-, long-term]: 0.00043201 kg; lognormal variance with pedigree 0.36134, pedigree (1,1,4,1,1)
  (same comment as for Manganese)
- Barium [water, ground-, long-term]: 8.0504e-5 kg; lognormal variance with pedigree 2.2642, pedigree (1,1,4,1,1)
  (same comment as for Manganese)
- Heat, waste [water, surface water]: 5.6433 MJ; lognormal variance with pedigree 0.024341, pedigree (1,1,4,1,1)
  Waste heat generated from heating value of this waste plus any electricity required to process it.
  Uncertainty: uncertainty is calculated from uncertainties in waste composition and uncertainties in energy efficiency and the uncertainty in internal energy demand
- Strontium [air, urban air close to ground]: 7.458e-9 kg; lognormal variance with pedigree 1.046, pedigree (1,1,4,1,1)
  (same comment as for Carbon dioxide, fossil)
- Potassium, ion [water, ground-, long-term]: 8.2141e-5 kg; lognormal variance with pedigree 0.53499, pedigree (1,1,4,1,1)
  (same comment as for Manganese)
- Silicon [air, urban air close to ground]: 4.1706e-9 kg; lognormal variance with pedigree 0.47462, pedigree (1,1,4,1,1)
  (same comment as for Carbon dioxide, fossil)
- Sulfate [water, ground-, long-term]: 0.00099977 kg; lognormal variance with pedigree 0.47459, pedigree (1,1,4,1,1)
  (same comment as for Manganese)
- Phenol, pentachloro- [air, urban air close to ground]: 6.5321e-12 kg; lognormal variance with pedigree 0.077138, pedigree (1,1,4,1,1)
  (same comment as for NMVOC, non-methane volatile organic compounds, unspecified origin)
- Iron, ion [water, surface water]: 1.0404e-7 kg; lognormal variance with pedigree 1.3229, pedigree (1,1,4,1,1)
  (same comment as for Beryllium)
- Manganese [water, surface water]: 3.8157e-9 kg; lognormal variance with pedigree 1.8302, pedigree (1,1,4,1,1)
  (same comment as for Beryllium)
- Barium [air, urban air close to ground]: 6.2742e-7 kg; lognormal variance with pedigree 0.921, pedigree (1,1,4,1,1)
  (same comment as for Carbon dioxide, fossil)
- Lead [water, ground-, long-term]: 0.00078931 kg; lognormal variance with pedigree 0.85695, pedigree (1,1,4,1,1)
  (same comment as for Manganese)
- DOC, Dissolved Organic Carbon [water, surface water]: 0.00038381 kg; lognormal variance with pedigree 0.033506, pedigree (1,1,4,1,1)
  (same comment as for Beryllium)
- Titanium [air, urban air close to ground]: 3.3545e-6 kg; lognormal variance with pedigree 0.50931, pedigree (1,1,4,1,1)
  (same comment as for Carbon dioxide, fossil)
- Thallium [water, ground-, long-term]: 1.967e-7 kg; lognormal variance with pedigree 1.2908, pedigree (1,1,4,1,1)
  (same comment as for Manganese)
- DOC, Dissolved Organic Carbon [water, ground-, long-term]: 0.0022326 kg; lognormal variance with pedigree 0.021852, pedigree (1,1,4,1,1)
  (same comment as for Manganese)
- Aluminium [air, urban air close to ground]: 1.7646e-9 kg; lognormal variance with pedigree 0.36661, pedigree (1,1,4,1,1)
  (same comment as for Carbon dioxide, fossil)
- Chloride [water, surface water]: 0.0047944 kg; lognormal variance with pedigree 0.33573, pedigree (1,1,4,1,1)
  (same comment as for Beryllium)
- Thallium [air, urban air close to ground]: 3.3709e-10 kg; lognormal variance with pedigree 1.7409, pedigree (1,1,4,1,1)
  (same comment as for Carbon dioxide, fossil)
- Barium [water, surface water]: 2.1515e-8 kg; lognormal variance with pedigree 1.2053, pedigree (1,1,4,1,1)
  (same comment as for Beryllium)
- Titanium, ion [water, ground-, long-term]: 0.0012087 kg; lognormal variance with pedigree 0.64182, pedigree (1,1,4,1,1)
  (same comment as for Manganese)
- Selenium [water, surface water]: 5.9784e-7 kg; lognormal variance with pedigree 1.1979, pedigree (1,1,4,1,1)
  (same comment as for Beryllium)
- Molybdenum [water, surface water]: 7.3997e-7 kg; lognormal variance with pedigree 1.0105, pedigree (1,1,4,1,1)
  (same comment as for Beryllium)
- Benzene, hexachloro- [air, urban air close to ground]: 3.1363e-11 kg; lognormal variance with pedigree 0.077138, pedigree (1,1,4,1,1)
  (same comment as for NMVOC, non-methane volatile organic compounds, unspecified origin)
- Chromium [air, urban air close to ground]: 4.1402e-8 kg; lognormal variance with pedigree 1.024, pedigree (1,1,4,1,1)
  (same comment as for Carbon dioxide, fossil)
- Nickel [air, urban air close to ground]: 5.6839e-7 kg; lognormal variance with pedigree 0.78174, pedigree (1,1,4,1,1)
  (same comment as for Carbon dioxide, fossil)
- Nitrogen oxides [air, urban air close to ground]: 0.00079517 kg; lognormal variance with pedigree 0.73571, pedigree (1,1,4,1,1)
  Sum of fuel-Nox and thermal-NOx emitted to air after DeNOx stage.
  Uncertainty: uncertainty calculated from uncertainty in average N-emissions and uncertainty in the share of thermal NOx and the uncertainty in nitrogen content in *this* waste.
- Vanadium, ion [water, ground-, long-term]: 8.8179e-7 kg; lognormal variance with pedigree 2.3315, pedigree (1,1,4,1,1)
  (same comment as for Manganese)
- Calcium [air, urban air close to ground]: 2.2118e-5 kg; lognormal variance with pedigree 0.50235, pedigree (1,1,4,1,1)
  (same comment as for Carbon dioxide, fossil)
- Bromine [air, urban air close to ground]: 2.4811e-6 kg; lognormal variance with pedigree 0.48153, pedigree (1,1,4,1,1)
  (same comment as for Carbon dioxide, fossil)
- Toluene [air, urban air close to ground]: 2.9999e-8 kg; lognormal variance with pedigree 0.077138, pedigree (1,1,4,1,1)
  (same comment as for NMVOC, non-methane volatile organic compounds, unspecified origin)
- Strontium [water, ground-, long-term]: 7.4483e-5 kg; lognormal variance with pedigree 1.0086, pedigree (1,1,4,1,1)
  (same comment as for Manganese)
- BOD5, Biological Oxygen Demand [water, ground-, long-term]: 0.0018455 kg; lognormal variance with pedigree 0.021852, pedigree (1,1,4,1,1)
  (same comment as for Manganese)
- Cyanide [air, urban air close to ground]: 3.8488e-5 kg; lognormal variance with pedigree 1.1276, pedigree (1,1,4,1,1)
  Nitrogen species emitted to air after DeNOx stage.
  Uncertainty: uncertainty calculated from uncertainty in average N-emissions and uncertainty in the share of thermal NOx and the uncertainty in nitrogen content in *this* waste.
- Tin [air, urban air close to ground]: 1.1975e-10 kg; lognormal variance with pedigree 0.95041, pedigree (1,1,4,1,1)
  (same comment as for Carbon dioxide, fossil)
- Cadmium, ion [water, ground-, long-term]: 1.0064e-5 kg; lognormal variance with pedigree 6.376, pedigree (1,1,4,1,1)
  (same comment as for Manganese)
- Aluminium [water, surface water]: 4.3657e-7 kg; lognormal variance with pedigree 0.89355, pedigree (1,1,4,1,1)
  (same comment as for Beryllium)
- Silver, ion [water, surface water]: 5.1577e-9 kg; lognormal variance with pedigree 2.013, pedigree (1,1,4,1,1)
  (same comment as for Beryllium)
- Cobalt [water, ground-, long-term]: 2.1686e-5 kg; lognormal variance with pedigree 1.0709, pedigree (1,1,4,1,1)
  (same comment as for Manganese)
- Iron, ion [water, ground-, long-term]: 0.0048578 kg; lognormal variance with pedigree 0.40056, pedigree (1,1,4,1,1)
  (same comment as for Manganese)
- Tin, ion [water, ground-, long-term]: 8.56e-5 kg; lognormal variance with pedigree 1.5609, pedigree (1,1,4,1,1)
  (same comment as for Manganese)
- Water [air, urban air close to ground]: 0.0014604 m3; lognormal variance with pedigree 0.77012, pedigree (1,1,4,1,1)
  Water vapour from waste humidity, hydrogen oxidation and part of the process water.
  Uncertainty: Uncertainty calculated from uncertainty in waste composition, process water input and the uncertainty of fraction to air.
- TOC, Total Organic Carbon [water, ground-, long-term]: 0.0022326 kg; lognormal variance with pedigree 0.021852, pedigree (1,1,4,1,1)
  (same comment as for Manganese)
- Copper, ion [water, ground-, long-term]: 0.015839 kg; lognormal variance with pedigree 0.28326, pedigree (1,1,4,1,1)
  (same comment as for Manganese)
- Heat, waste [air, urban air close to ground]: 24.531 MJ; lognormal variance with pedigree 0.024341, pedigree (1,1,4,1,1)
  (same comment as for Heat, waste)
- Water [water, surface water]: 0.00047045 m3; lognormal variance with pedigree 1.1434, pedigree (1,1,4,1,1)
  Process water released to surface water.
  Uncertainty: uncertainty calculated from uncertainty in process water input and the uncertainty of fraction to surface water.
- TOC, Total Organic Carbon [water, surface water]: 0.00038381 kg; lognormal variance with pedigree 0.033506, pedigree (1,1,4,1,1)
  (same comment as for Beryllium)
- Antimony [water, ground-, long-term]: 0.0027547 kg; lognormal variance with pedigree 0.46085, pedigree (1,1,4,1,1)
  (same comment as for Manganese)
- Cobalt [air, urban air close to ground]: 4.8416e-8 kg; lognormal variance with pedigree 1.1636, pedigree (1,1,4,1,1)
  (same comment as for Carbon dioxide, fossil)
- Phosphate [water, surface water]: 2.5512e-7 kg; lognormal variance with pedigree 0.57067, pedigree (1,1,4,1,1)
  (same comment as for Beryllium)
- Chromium VI [water, surface water]: 1.326e-6 kg; lognormal variance with pedigree 1.0833, pedigree (1,1,4,1,1)
  (same comment as for Beryllium)
- Vanadium, ion [water, surface water]: 3.6508e-9 kg; lognormal variance with pedigree 1.7126, pedigree (1,1,4,1,1)
  (same comment as for Beryllium)
- Bromine [water, ground-, long-term]: 0.00047875 kg; lognormal variance with pedigree 0.46974, pedigree (1,1,4,1,1)
  (same comment as for Manganese)
- Chloride [water, ground-, long-term]: 0.0014315 kg; lognormal variance with pedigree 0.42344, pedigree (1,1,4,1,1)
  (same comment as for Manganese)
- Silicon [water, ground-, long-term]: 0.00031918 kg; lognormal variance with pedigree 5.7064, pedigree (1,1,4,1,1)
  (same comment as for Manganese)
- Molybdenum [water, ground-, long-term]: 1.9658e-6 kg; lognormal variance with pedigree 1.4458, pedigree (1,1,4,1,1)
  (same comment as for Manganese)
- Arsenic, ion [water, surface water]: 4.6919e-6 kg; lognormal variance with pedigree 1.2201, pedigree (1,1,4,1,1)
  (same comment as for Beryllium)
- Lead [air, urban air close to ground]: 1.0969e-8 kg; lognormal variance with pedigree 0.73803, pedigree (1,1,4,1,1)
  (same comment as for Carbon dioxide, fossil)
- Cadmium [air, urban air close to ground]: 6.9354e-8 kg; lognormal variance with pedigree 0.95041, pedigree (1,1,4,1,1)
  (same comment as for Carbon dioxide, fossil)
- Chromium, ion [water, surface water]: 3.6815e-9 kg; lognormal variance with pedigree 1.0401, pedigree (1,1,4,1,1)
  (same comment as for Beryllium)
- Beryllium [water, ground-, long-term]: 3.8509e-7 kg; lognormal variance with pedigree 1.6082, pedigree (1,1,4,1,1)
  (same comment as for Manganese)
- Sodium, ion [water, surface water]: 0.0001433 kg; lognormal variance with pedigree 0.5912, pedigree (1,1,4,1,1)
  (same comment as for Beryllium)
- Carbon monoxide, fossil [air, urban air close to ground]: 2.5497e-5 kg; lognormal variance with pedigree 0.7561, pedigree (1,1,4,1,1)
  (same comment as for NMVOC, non-methane volatile organic compounds, unspecified origin)
- Sulfur dioxide [air, urban air close to ground]: 4.0866e-6 kg; lognormal variance with pedigree 0.79745, pedigree (1,1,4,1,1)
  (same comment as for Carbon dioxide, fossil)
- Vanadium [air, urban air close to ground]: 1.4365e-8 kg; lognormal variance with pedigree 1.3464, pedigree (1,1,4,1,1)
  (same comment as for Carbon dioxide, fossil)
- COD, Chemical Oxygen Demand [water, surface water]: 0.00087888 kg; lognormal variance with pedigree 0.033438, pedigree (1,1,4,1,1)
  (same comment as for Beryllium)
- Manganese [air, urban air close to ground]: 1.1901e-9 kg; lognormal variance with pedigree 1.0828, pedigree (1,1,4,1,1)
  (same comment as for Carbon dioxide, fossil)
- Silicon [water, surface water]: 8.6665e-7 kg; lognormal variance with pedigree 0.7043, pedigree (1,1,4,1,1)
  (same comment as for Beryllium)
- Benzo(a)pyrene [air, urban air close to ground]: 3.3379e-13 kg; lognormal variance with pedigree 0.37951, pedigree (1,1,4,1,1)
  (same comment as for NMVOC, non-methane volatile organic compounds, unspecified origin)
- Selenium [air, urban air close to ground]: 2.1112e-8 kg; lognormal variance with pedigree 1.5128, pedigree (1,1,4,1,1)
  (same comment as for Carbon dioxide, fossil)
- Antimony [water, surface water]: 0.0014926 kg; lognormal variance with pedigree 0.4912, pedigree (1,1,4,1,1)
  (same comment as for Beryllium)
- Fluoride [water, ground-, long-term]: 0.00020243 kg; lognormal variance with pedigree 0.48221, pedigree (1,1,4,1,1)
  (same comment as for Manganese)
- Mercury [water, surface water]: 8.337e-10 kg; lognormal variance with pedigree 1.1397, pedigree (1,1,4,1,1)
  (same comment as for Beryllium)
- Phosphorus [air, urban air close to ground]: 4.5889e-7 kg; lognormal variance with pedigree 0.78174, pedigree (1,1,4,1,1)
  (same comment as for Carbon dioxide, fossil)
- Strontium [water, surface water]: 4.6958e-8 kg; lognormal variance with pedigree 1.7207, pedigree (1,1,4,1,1)
  (same comment as for Beryllium)
- Iron [air, urban air close to ground]: 2.554e-9 kg; lognormal variance with pedigree 0.37981, pedigree (1,1,4,1,1)
  (same comment as for Carbon dioxide, fossil)
- Chromium VI [water, ground-, long-term]: 4.5588e-6 kg; lognormal variance with pedigree 2.2709, pedigree (1,1,4,1,1)
  (same comment as for Manganese)
- Dinitrogen monoxide [air, urban air close to ground]: 0.00017915 kg; lognormal variance with pedigree 1.1276, pedigree (1,1,4,1,1)
  (same comment as for Cyanide)
- Methane, fossil [air, urban air close to ground]: 2.2499e-7 kg; lognormal variance with pedigree 0.077138, pedigree (1,1,4,1,1)
  (same comment as for NMVOC, non-methane volatile organic compounds, unspecified origin)
- Sodium, ion [water, ground-, long-term]: 0.00087543 kg; lognormal variance with pedigree 0.62027, pedigree (1,1,4,1,1)
  (same comment as for Manganese)
- Calcium, ion [water, ground-, long-term]: 0.0030985 kg; lognormal variance with pedigree 0.4682, pedigree (1,1,4,1,1)
  (same comment as for Manganese)
- Molybdenum [air, urban air close to ground]: 3.5649e-9 kg; lognormal variance with pedigree 1.4696, pedigree (1,1,4,1,1)
  (same comment as for Carbon dioxide, fossil)
- Cobalt [water, surface water]: 4.8232e-9 kg; lognormal variance with pedigree 1.4597, pedigree (1,1,4,1,1)
  (same comment as for Beryllium)
- Nickel, ion [water, ground-, long-term]: 0.00045862 kg; lognormal variance with pedigree 0.74056, pedigree (1,1,4,1,1)
  (same comment as for Manganese)
- BOD5, Biological Oxygen Demand [water, surface water]: 0.00086758 kg; lognormal variance with pedigree 0.034037, pedigree (1,1,4,1,1)
  (same comment as for Beryllium)
- Nickel, ion [water, surface water]: 3.1932e-7 kg; lognormal variance with pedigree 1.3326, pedigree (1,1,4,1,1)
  (same comment as for Beryllium)
- Aluminium [water, ground-, long-term]: 0.014145 kg; lognormal variance with pedigree 0.27878, pedigree (1,1,4,1,1)
  (same comment as for Manganese)
- Ammonia [air, urban air close to ground]: 2.5111e-6 kg; lognormal variance with pedigree 0.73571, pedigree (1,1,4,1,1)
  (same comment as for Cyanide)
- Bromine [water, surface water]: 0.0044859 kg; lognormal variance with pedigree 0.19347, pedigree (1,1,4,1,1)
  (same comment as for Beryllium)
- Benzene, pentachloro- [air, urban air close to ground]: 7.9247e-11 kg; lognormal variance with pedigree 0.077138, pedigree (1,1,4,1,1)
  (same comment as for NMVOC, non-methane volatile organic compounds, unspecified origin)
- COD, Chemical Oxygen Demand [water, ground-, long-term]: 0.0056421 kg; lognormal variance with pedigree 0.021852, pedigree (1,1,4,1,1)
  (same comment as for Manganese)
