# purified terephthalic acid production

Dataset: EcoSpold 2, unit process
Geography: CA-QC
Time period: 1999-01-01 to 2021-12-31
Technology level: current
Classification: ISIC rev.4 ecoinvent: 2013:Manufacture of plastics and synthetic rubber in primary forms
Classification: EcoSpold01Categories: plastics/polymers
Synonyms: PTA
Tags: recontextualization
Scenario: Business-as-Usual
System model: Allocation, cut-off by classification
Generated by: Pascal Lesage
Published in: Hischier R. 2007
Database: ecoinvent
isCopyrightProtected: true
accessRestrictedTo: 1

## General comment
Data are based on the average unit process from the Eco-profiles of the European plastics industry
[This dataset was already contained in the ecoinvent database version 2. It was not individually updated during the transfer to ecoinvent version 3. Life Cycle Impact Assessment results may still have changed, as they are affected by changes in the supply chain, i.e. in other datasets. This dataset was generated following the ecoinvent quality guidelines for version 2. It may have been subject to central changes described in the ecoinvent version 3 change report (http://www.ecoinvent.org/database/ecoinvent-version-3/reports-of-changes/), and the results of the central updates were reviewed extensively. The changes added e.g. consistent water flows and other information throughout the database. The documentation of this dataset can be found in the ecoinvent reports of version 2, which are still available via the ecoinvent website. The change report linked above covers all central changes that were made during the conversion process.]
Child dataset exchanges identical to GLO dataset. Created to enable linking to regional markets (e.g. for electricity). Data uncertainty adjusted accordingly.

## Included activities end
Average data for the production of purified terephthalic acid out of acetic acid and xylene. The data include material and energy input, waste as well as air and water emissions. Missing sum parameters to water (DOC, TOC, COD), transport and infrastructure are estimated.

## Geography
Data from several European production sites
Child dataset exchanges identical to GLO dataset. Created to enable linking to regional markets (e.g. for electricity). Data uncertainty adjusted accordingly.

## Technology
PTA production out of p-xylene and acetic acid

## Time period
date of publication

## Parameters
- Quebec gross domestic product 2011: 3.11e11 USD(2011); name quebecGDP2011; lognormal variance with pedigree 0.0006, pedigree (1,1,1,1,1)
  Quebec Gross domestic product for 2011, expressed in 2011 USD. Source: Institut de la statistique du Québec. Converted from CAD to USD using a yearly average exchange rate of 0.989 CAD/USD (Source: bank of Canada).
- fraction, process water, to air: 0.205 dimensionless; lognormal variance with pedigree 0.092025, pedigree (4,4,3,2,4)
- fraction, cooling water, once-through system, to air: 0.004 dimensionless; lognormal variance with pedigree 0.0413, pedigree (2,3,1,3,1)
- fraction, water, completely softened, to air: 0.205 dimensionless; lognormal variance with pedigree 0.092025, pedigree (4,4,3,2,4)
- world gross domestic product 2011: 7e13 USD(2011); name worldGDP2011; lognormal variance with pedigree 0.0006, pedigree (1,1,1,1,1)
  World Gross domestic product for 2011, expressed in 2011 USD. Source: World Bank.
- fraction, cooling water, recirculating system, to air: 0.771 dimensionless; lognormal variance with pedigree 0.0413, pedigree (2,3,1,3,1)
- fraction, cooling water, to air: 0.3875 dimensionless; lognormal variance with pedigree 0.092025, pedigree (4,4,3,2,4)
- fraction, cooling water, cooling pond system, to air: 0.032 dimensionless; lognormal variance with pedigree 0.0413, pedigree (2,3,1,3,1)

## Reference product
- purified terephthalic acid: 1 kg; name RefProd; CPC 347: Plastics in primary forms; By-product classification allocatable product; CAS 100-21-0
  production volume 0.0177714 kg; name ProdVol
    Gross approximation of Quebec production volume using relative value of Quebec GDP to world GDP.
  property price 0.67 EUR2005
    Calculated value based on data from United Nations Commodity Trade Statistics Database (comtrade.un.org). UN comtrade category: 291736 Terephthalic acid, its salts. Year 2005. Using exchange rate of 1EURO = 1.209 USD. Average of price of import into 5 main markets (EU, US, JP, IN and CN).
  property heating value, net 21.9 MJ
    LHV is calculated based on the elemental composition of the substance. Based on the name of the substance, the chemical formula of the substance is assumed to be: C8H6O4
  property carbon content 0.578313
    carbon content on a dry matter basis (reserved; not for manual entry)
  properties: dry mass 1 kg, water in wet mass 0 kg, water content 0, carbon content, non-fossil 0, wet mass 1 kg, carbon content, fossil 0.578313, carbon allocation 0.578313 kg

## Inputs from technosphere
- water, completely softened: 0.425 kg; lognormal variance with pedigree 0.0532, pedigree (2,3,5,5,1)
  European average value, based on industrial survey
  Uncertainty: e
  properties: wet mass 1 kg
- heat, district or industrial, natural gas: 0.458 MJ; lognormal variance with pedigree 0.1332, pedigree (2,3,5,5,4)
  Amount industrial survey - distribution according to cumulated data
  Uncertainty: a
  properties: heating value, net 1 MJ
- chemical factory, organics: 4e-10 unit; lognormal variance with pedigree 0.448, pedigree (4,5,5,5,5)
  Estimation
  Uncertainty: e
- xylene: 0.661 kg; lognormal variance with pedigree 0.0532, pedigree (2,3,5,5,1)
  European average value, based on industrial survey
  Uncertainty: e
  properties: carbon content, fossil 0.905061, heating value, net 38.84 MJ, wet mass 1 kg, dry mass 1 kg
- heat, district or industrial, other than natural gas: 1.172 MJ; lognormal variance with pedigree 0.1332, pedigree (2,3,5,5,4)
  Amount industrial survey - distribution according to cumulated data
  Uncertainty: a
  properties: heating value, net 1 MJ
- nitrogen, liquid: 0.0488 kg; lognormal variance with pedigree 0.0532, pedigree (2,3,5,5,1)
  European average value, based on industrial survey
  Uncertainty: e
  properties: wet mass 1 kg, dry mass 1 kg
- average incineration residue: -0.006 kg; name IncinRes; lognormal variance with pedigree 0.0532, pedigree (2,3,5,5,1)
  European average value, based on industrial survey
  Uncertainty: e
  production volume 0.000106629 kg; = ProdVol*IncinRes/RefProd
    Calculated from the production volume of purified terephthalic acid in proportion to the respective output amounts.
  properties: carbon content, non-fossil 0.0511208, dry mass 1 kg, carbon content, fossil 0.0325466, wet mass 1 kg
  note on carbon content, non-fossil: Tab A.1, ecoinvent v2.2 report 13_I. It is considered that 61.1% of the C has a biogenic origin
- electricity, medium voltage: 0.469 kWh; lognormal variance with pedigree 0.0532, pedigree (2,3,5,5,1)
  European average value, based on industrial survey
  Uncertainty: e
- acetic acid, without water, in 98% solution state: 0.05 kg; lognormal variance with pedigree 0.0532, pedigree (2,3,5,5,1)
  European average value, based on industrial survey
  Uncertainty: e
  properties: heating value, net 14.6 MJ, wet mass 1 kg, carbon content, fossil 0.400016, dry mass 1 kg
  note on heating value, net: Based on literature, page 10, Althaus H.-J., Chudacoff M., Hischier R., Jungbluth N., Osses M. and Primas A. (2007) Life Cycle Inventories of Chemicals. Final report ecoinvent data v2.0 No. 8. EMPA, Swiss Centre for Life Cycle Inventories, Dübendorf, CH, Online-Version under: www.ecoinvent.org.
- hazardous waste, for underground deposit: -0.0002 kg; name HazWaste; lognormal variance with pedigree 0.0532, pedigree (2,3,5,5,1)
  European average value, based on industrial survey
  Uncertainty: e
  production volume 3.55429e-6 kg; = ProdVol*HazWaste/RefProd
    (same comment as for average incineration residue)
  properties: wet mass 1 kg, carbon content, fossil 0.554667, dry mass 1 kg
  note on carbon content, fossil: Tab A.6, ecoinvent v2.2 report 13_I, average hazardous waste composition was used, and referred to 0% water mass. No waste-specific emission are currently inventoried for underground deposits. Accordingly, no waste composition must be specified. For generic, average waste to underground deposit deposition in a 200 liter steel drum without cement solidification is assumed (ecoinvent v2.2 report 13_I).
- sodium hydroxide, without water, in 50% solution state: 0.00145 kg; lognormal variance with pedigree 0.0532, pedigree (2,3,5,5,1)
  European average value, based on industrial survey
  Uncertainty: e
  properties: dry mass 1 kg, wet mass 1 kg, heating value, net 3.03 MJ
- steam, in chemical industry: 0.64 kg; lognormal variance with pedigree 0.0532, pedigree (2,3,5,5,1)
  European average value, based on industrial survey
  Uncertainty: e
  properties: dry mass 1 kg, wet mass 1 kg

## Inputs from nature
- Water, cooling, unspecified natural origin [natural resource, in water]: 0.000342 m3; lognormal variance with pedigree 0.0532, pedigree (2,3,5,5,1)
  European average value, based on industrial survey
  Uncertainty: e

## Emissions to nature
- Suspended solids, unspecified [water, surface water]: 0.000256 kg; lognormal variance with pedigree 0.1032, pedigree (2,3,5,5,1)
  European average value, based on industrial survey
  Uncertainty: e
- Water [air, unspecified]: 0.00021965 m3; lognormal variance with pedigree 0.0827, pedigree (2,2,5,5,1)
  Calculated value based on literature values and expert opinion. See comments in the parametres" comment field.
- Particulates, > 10 um [air, urban air close to ground]: 2.88e-5 kg; lognormal variance with pedigree 0.1032, pedigree (2,3,5,5,1)
  European average value, based on industrial survey
  Uncertainty: e
- Hydrocarbons, aromatic [air, urban air close to ground]: 0.000378 kg; lognormal variance with pedigree 0.1832, pedigree (2,3,5,5,1)
  European average value, based on industrial survey
  Uncertainty: e
- NMVOC, non-methane volatile organic compounds, unspecified origin [air, urban air close to ground]: 0.00011 kg; lognormal variance with pedigree 0.1832, pedigree (2,3,5,5,1)
  European average value, based on industrial survey
  Uncertainty: e
- Hydrocarbons, unspecified [water, surface water]: 1.4e-5 kg; lognormal variance with pedigree 0.3632, pedigree (2,3,5,5,1)
  European average value, based on industrial survey
  Uncertainty: e
- COD, Chemical Oxygen Demand [water, surface water]: 0.0013 kg; lognormal variance with pedigree 0.23, pedigree (5,5,5,5,4)
  Estimated, based on rules in Frischknecht 2003
  Uncertainty: e
- Particulates, < 2.5 um [air, urban air close to ground]: 2.25e-5 kg; lognormal variance with pedigree 0.3632, pedigree (2,3,5,5,1)
  European average value, based on industrial survey
  Uncertainty: e
- Particulates, > 2.5 um, and < 10um [air, urban air close to ground]: 3.87e-5 kg; lognormal variance with pedigree 0.1832, pedigree (2,3,5,5,1)
  European average value, based on industrial survey
  Uncertainty: e
- BOD5, Biological Oxygen Demand [water, surface water]: 0.0013 kg; lognormal variance with pedigree 0.1032, pedigree (2,3,5,5,1)
  European average value, based on industrial survey
  Uncertainty: e
- TOC, Total Organic Carbon [water, surface water]: 1.22e-5 kg; lognormal variance with pedigree 0.23, pedigree (5,5,5,5,4)
  Estimated, based on rules in Frischknecht 2003
  Uncertainty: e
- DOC, Dissolved Organic Carbon [water, surface water]: 1.22e-5 kg; lognormal variance with pedigree 0.23, pedigree (5,5,5,5,4)
  Estimated, based on rules in Frischknecht 2003
  Uncertainty: e
- Water [water, unspecified]: 0.00054735 m3; lognormal variance with pedigree 0.0827, pedigree (2,2,5,5,1)
  (same comment as for Water)
  property carbon content, non-fossil 0; name C_content_non_fossil
  property water in wet mass 1000 kg; name WWM
  property dry mass 0 kg; name DM
  property wet mass 1000 kg; name WM
  property carbon content, fossil 0; name C_content_fossil

## Sampling procedure
company data

## Extrapolations
This dataset has been extrapolated from year 2000 to the year of the calculation (2021). The uncertainty has been adjusted accordingly.
