# onion seedling production, for planting

Dataset: EcoSpold 2, unit process
Geography: RoW
Time period: 2009-01-01 to 2021-12-31
Technology level: current
Classification: ISIC rev.4 ecoinvent: 0130:Plant propagation
Tags: WFLDB
Scenario: Business-as-Usual
System model: Allocation, cut-off by classification
Generated by: [System]
Database: ecoinvent
isCopyrightProtected: true
accessRestrictedTo: 1

## General comment
This global dataset is a copy of the regional NZ dataset, except for the following modifications.
The production volume represents the global annual production.
The geographicalCorrelation score of every pedigree matrix of was changed to '5'.
Yield of the global dataset = 11300000 kg/ha, calculated as a weighted average of the regional yields.
The comments below were part of the NZ regional dataset.
The dataset refers to the production of 1 Onion Seedling raised in a nursery during one year. From a onion nursery of 1 ha, seedlings for 10 ha productive onion fields can be obtained, i.e. a total of 11'300'000 seedlings are obtained from 1 ha nursery. This number (10 ha) is calculated from the weight of 1 onion seedling (5 g), the yield (55 t/ha) and the number of seedlings per ha (1'130'000).
PEF-Quality: data quality rating (DQR) =1.5 (i.e. excellent quality).
This dataset refers to an average situation; for specific situations exchanges might differ substantially due to site specific parameters

## Included activities start
The activity starts with soil cultivation of the field in order to establish a onion nursery for 1 year.

## Included activities end
The inventory includes the process total diesel combusted in agricultural machinery. Machine infrastructure including a shed for shelter and fuel use are also considered. Inputs of fertilisers, pesticides, irrigation are included. Direct field emissions from crop production activities (e.g. fertiliser and pesticide use) and land use change are considered.
The activity ends with harvesting onion seedlings.

## Reference product
- onion seedling, for planting: 1 unit; CPC 01961: Live plants; bulbs, tubers and roots; cuttings and slips; mushroom spawn; By-product classification allocatable product
  production volume 2.23481e12 unit
    Source: FAOSTAT. Average, 2009-2012. Calculation method: crop production volume [kg] / crop productivity [kg/ha] * planting density [units/ha] = units
  property carbon content, non-fossil 0.439481
    calculation: C-content of components according to ecoinvent report No. 15a. Source of composition: https://ndb.nal.usda.gov/ndb/search/. Unspecific seedling used as proxy.
  property price 0.000555018 EUR2005
    Calculated based on inputs: The price of the product has been calculated as a sum of the values of the material and energy inputs for this product. This value is therefore a rough estimation. It may underestimate the real price since there are additional expenses when producing any product. These expences can include for example labour costs, treatment of waste materials and profit for the producer. Please consider carefully whether this level of data quality is acceptable for your application.
  property carbon content 0.439481
    carbon content on a dry matter basis (reserved; not for manual entry)
  properties: dry mass 0.578035 kg, wet mass 1 kg, carbon content, fossil 0, water in wet mass 0.421965 kg, water content 0.73, carbon allocation 0.254036 kg

## Inputs from technosphere
- cyclic N-compound: 5.46682e-8 kg; lognormal variance with pedigree 0.0158498, pedigree (2,2,4,5,1)
  Proxy: Source for total amount of pesticides: Literature value or expert estimation (Barber 2004). Active ingredient is calculated based on Ecoinvent dataset 'onion855 production GLO'. For calculations see supporting documentation 'WFLDB-Documentation.pdf' (https://ecoquery.ecoinvent.org/File/Reports).
  properties: wet mass 1 kg, carbon content, fossil 0.641962, dry mass 1 kg
- inorganic phosphorus fertiliser, as P2O5: 0 kg; source Warwick Catto 2015; pedigree (1,1,1,1,1)
  Calculated based on literature values or expert estimation: The total amount of nutrient (Personal written communication, Warwick Catto & Scott Beckett, Yara, 2015) multiplied by the share of fertiliser type (Personal written communication, Warwick Catto & Scott Beckett, Yara, 2015). See supporting documentation 'WFLDB-Documentation.pdf' chapter 'Fertiliser application' for L3 and L4 data (https://ecoquery.ecoinvent.org/File/Reports).
  Corresponds to 40.0 kg/ha
  properties: wet mass 1 kg, dry mass 1 kg
- irrigation: 0 m3; source Barber A. 2004; pedigree (1,1,1,1,1)
  Calculated value: The total amount of water used for irrigation (Barber 2004) multiplied by the country-share of irrigation technique (WFLDB-Guidelines.pdf, Appendix 6.1). See supporting documentation 'WFLDB-Documentation.pdf' chapter 'Water use for irrigation' (https://ecoquery.ecoinvent.org/File/Reports).
  properties: dry mass 0.11 kg, wet mass 1000 kg, water content 9089.91
- dinitroaniline-compound: 1.8436e-7 kg; lognormal variance with pedigree 0.0158498, pedigree (2,2,4,5,1)
  (same comment as for cyclic N-compound)
  properties: dry mass 1 kg, wet mass 1 kg, carbon content, fossil 0.55516
- inorganic nitrogen fertiliser, as N: 0 kg; source Warwick Catto 2015; pedigree (1,1,1,1,1)
  Calculated based on literature values or expert estimation: The total amount of nutrient (Personal written communication, Warwick Catto & Scott Beckett, Yara, 2015) multiplied by the share of fertiliser type (Personal written communication, Warwick Catto & Scott Beckett, Yara, 2015). See supporting documentation 'WFLDB-Documentation.pdf' chapter 'Fertiliser application' for L3 and L4 data (https://ecoquery.ecoinvent.org/File/Reports).
  Corresponds to 31.1 kg/ha
  properties: wet mass 1 kg, dry mass 1 kg
- potassium sulfate: 6.22112e-6 kg; source Warwick Catto 2015; lognormal variance with pedigree 0.126177, pedigree (2,1,4,5,1)
  The exchange has been updated from 'potassium sulfate, as K2O' into 'potassium sulfate' and therefore its amount has been scaled (multiplied) from 0 kg by 1.85 kg of 'potassium sulfate' per kg of 'potassium sulfate, as K2O'. Original comment of the exchange is: Calculated based on literature values or expert estimation: The total amount of nutrient (Personal written communication, Warwick Catto & Scott Beckett, Yara, 2015) multiplied by the share of fertiliser type (Personal written communication, Warwick Catto & Scott Beckett, Yara, 2015). See supporting documentation 'WFLDB-Documentation.pdf' chapter 'Fertiliser application' for L3 and L4 data (https://ecoquery.ecoinvent.org/File/Reports).
  Corresponds to 38.0 kg/ha
  properties: dry mass 1 kg, wet mass 1 kg
- pyrethroid-compound: 4.798e-9 kg; lognormal variance with pedigree 0.0158498, pedigree (2,2,4,5,1)
  (same comment as for cyclic N-compound)
  properties: wet mass 1 kg, carbon content, fossil 0.623, dry mass 1 kg
- diesel, burned in agricultural machinery: 0.00152124 MJ; source Barber A. 2004; lognormal variance with pedigree 0.126177, pedigree (2,1,4,5,1)
  Literature value or expert estimation (Barber 2004).
- dithiocarbamate-compound: 1.74764e-6 kg; lognormal variance with pedigree 0.0158498, pedigree (2,2,4,5,1)
  (same comment as for cyclic N-compound)
  properties: carbon content, fossil 0.179339, wet mass 1 kg, dry mass 1 kg
- organophosphorus-compound, unspecified: 7.2697e-8 kg; lognormal variance with pedigree 0.0158498, pedigree (2,2,4,5,1)
  (same comment as for cyclic N-compound)
  properties: carbon content, fossil 0.260898, wet mass 1 kg, dry mass 1 kg
- packaging, for fertilisers: 3.76991e-5 kg; lognormal variance with pedigree 0.0592, pedigree (4,3,4,5,4)
  Total amount of active substance/s of fertilisers needed for the production of 'onion seedling, for planting' is calculated to be circa 1.88E-05 kg. Fertiliser/s used in this dataset is/are: 'nitrogen fertiliser, as N', 'phosphate fertiliser, as P2O5', 'potassium sulfate, as K2O'. The total amount of active substance/s is doubled in order to account for the packaging of the dilluted product of fertiliser/s that is/are applied. Therefore, 3.77E-05 kg of packaging for fertilisers is justified with this exchange.
  properties: dry mass 1 kg, carbon content, fossil 0.825301, price 0.0642 EUR2005, wet mass 1 kg, heating value, net 25.01 MJ
  note on carbon content, fossil: Considering a chemical formula (C2H4)n for polyethylene, carbon content-fossil is calculated to be 0.856286 kg of Carbon per kg of dry mass.
- packaging, for pesticides: 4.12832e-6 kg; lognormal variance with pedigree 0.0592, pedigree (4,3,4,5,4)
  Total amount of active substance/s of pesticides needed for the production of onion seedling, for planting is calculated to be circa 2.06E-06 kg. Pesticide/s used in this dataset is/are: 'cyclic N-compound', 'dinitroaniline-compound', 'dithiocarbamate-compound', 'organophosphorus-compound, unspecified', 'pyrethroid-compound'. The total amount of active substance/s is doubled in order to account for the packaging of the dilluted product of pesticide/s that is/are applied. Therefore, 4.13E-06 kg of packaging for pesticides is justified with this exchange.
  properties: heating value, net 25.97 MJ, price 0.0642 EUR2005, wet mass 1 kg, carbon content, fossil 0.85714, dry mass 1 kg
- inorganic phosphorus fertiliser, as P2O5: 2.50656e-8, 3.25204e-8, 2.60402e-8, 2.03894e-7, 4.29628e-8, 1.77023e-9, 4.66624e-9, 4.8135e-7, 8.6761e-9, 9.46772e-10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 kg (29 entries); source Warwick Catto 2015; lognormal variance with pedigree 0.126177, pedigree (2,1,4,5,1)
  (same comment as for inorganic phosphorus fertiliser, as P2O5)
- irrigation: 8.36569e-7, 3.55098e-8, 1.42039e-9, 7.47836e-6, 1.22551e-7, 6.12803e-9, 3.47965e-7, 5.66377e-8, 1.4371e-5, 2.76245e-7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 m3 (16 entries); source Barber A. 2004; lognormal variance with pedigree 0.126177, pedigree (2,1,4,5,1)
  (same comment as for irrigation)
- inorganic nitrogen fertiliser, as N: 5.74323e-8, 8.25512e-8, 7.37815e-8, 2.59183e-7, 1.54787e-7, 1.91856e-9, 1.14877e-8, 1.45555e-6, 2.72032e-8, 4.08581e-9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 kg (29 entries); source Warwick Catto 2015; lognormal variance with pedigree 0.126177, pedigree (2,1,4,5,1)
  (same comment as for inorganic nitrogen fertiliser, as N)

## Inputs from nature
- Occupation, annual crop [natural resource, land]: 0.000884956 m2*year; lognormal variance with pedigree 0.0220616, pedigree (2,1,4,5,1)
  Related to the duration from harvest date of previous crop to harvest date of main crop.
- Transformation, from arable land, unspecified use [natural resource, land]: 0.000884956 m2; lognormal variance with pedigree 0.0462144, pedigree (2,1,4,5,1)
  10000 m2 divided by the life time of the crop.
- Transformation, to arable land, unspecified use [natural resource, land]: 0.000884956 m2; lognormal variance with pedigree 0.0462144, pedigree (2,1,4,5,1)
  10000 m2 divided by the life time of the crop.
- Energy, gross calorific value, in biomass [natural resource, biotic]: 0.00834416 MJ; lognormal variance with pedigree 0.0158498, pedigree (2,2,4,5,1)
  Gross energy content is related to MJ/kg dry matter of product. Source: ecoinvent data.
- Carbon dioxide, in air [natural resource, in air]: 0.000706416 kg; lognormal variance with pedigree 0.0158498, pedigree (2,2,4,5,1)
  CO2 uptake by biomass

## Emissions to nature
- Nickel, ion [water, surface water]: 2.55982e-9 kg; source Freiermuth R.  2006; lognormal variance with pedigree 0.358938, pedigree (2,2,4,5,1)
  Calculated value - Freiermuth (2006). See 'WFLDB-Guidelines.pdf', available at https://ecoquery.ecoinvent.org/File/Reports.
- Pyrimethanil [soil, agricultural]: 9.6711e-8 kg; lognormal variance with pedigree 0.0467216, pedigree (2,2,4,5,1)
  Calculated value - 100% emission in soil. See 'WFLDB-Guidelines.pdf', available at https://ecoquery.ecoinvent.org/File/Reports.
- Zinc, ion [water, surface water]: 5.32841e-9 kg; source Freiermuth R.  2006; lognormal variance with pedigree 0.358938, pedigree (2,2,4,5,1)
  (same comment as for Nickel, ion)
- Dimethomorph [soil, agricultural]: 4.86141e-8 kg; lognormal variance with pedigree 0.0467216, pedigree (2,2,4,5,1)
  (same comment as for Pyrimethanil)
- Dinitrogen monoxide [air, non-urban air or from high stacks]: 3.8852e-7 kg; source IPCC 2006; lognormal variance with pedigree 0.126664, pedigree (2,2,4,5,1)
  Calculated value - IPCC (2006). See 'WFLDB-Guidelines.pdf', available at https://ecoquery.ecoinvent.org/File/Reports.
- Lambda-cyhalothrin [soil, agricultural]: 4.26666e-9 kg; lognormal variance with pedigree 0.0467216, pedigree (2,2,4,5,1)
  (same comment as for Pyrimethanil)
- Chromium, ion [water, ground-]: 1.78204e-9 kg; source Freiermuth R.  2006; lognormal variance with pedigree 0.358938, pedigree (2,2,4,5,1)
  (same comment as for Nickel, ion)
- Cymoxanil [soil, agricultural]: 4.65454e-8 kg; lognormal variance with pedigree 0.0467216, pedigree (2,2,4,5,1)
  (same comment as for Pyrimethanil)
- Copper, ion [water, ground-]: 3.03513e-10 kg; source Freiermuth R.  2006; lognormal variance with pedigree 0.358938, pedigree (2,2,4,5,1)
  (same comment as for Nickel, ion)
- Lead [soil, agricultural]: -3.55084e-10 kg; source Freiermuth R.  2006
  Comment on mathematicalRelation:
  -1.09584070796e-10 from Calculated value - Freiermuth (2006). See 'WFLDB-Guidelines.pdf', available at https://ecoquery.ecoinvent.org/File/Reports.
  -2.4550000885e-10 from Crop, default, heavy metals uptake model
  Heavy metal uptake can be excluded by setting the parameter heavyMetalUptakeSwitch to zero.
- Carbon dioxide, fossil [air, non-urban air or from high stacks]: 4.6892e-6 kg; lognormal variance with pedigree 0.0158498, pedigree (2,2,4,5,1)
  Calculated value - CO2 emissions from urea and lime. See 'WFLDB-Guidelines.pdf', available at https://ecoquery.ecoinvent.org/File/Reports.
- Nitrogen oxides [air, non-urban air or from high stacks]: 6.00363e-7 kg; source EEA 2013; lognormal variance with pedigree 0.126664, pedigree (2,2,4,5,1)
  Calculated value - EEA/EMEP (2013). See 'WFLDB-Guidelines.pdf', available at https://ecoquery.ecoinvent.org/File/Reports.
- Mercury [water, ground-]: 1.06442e-13 kg; source Freiermuth R.  2006; lognormal variance with pedigree 0.358938, pedigree (2,2,4,5,1)
  (same comment as for Nickel, ion)
- Phosphate [water, surface water]: 5.69929e-8 kg; source Prasuhn V.  2006; lognormal variance with pedigree 0.177866, pedigree (2,2,4,5,1)
  Calculated value - Prasuhn (2006). See 'WFLDB-Guidelines.pdf', available at https://ecoquery.ecoinvent.org/File/Reports.
- Water [air, non-urban air or from high stacks]: 2.1477e-5 m3; lognormal variance with pedigree 0.126177, pedigree (2,1,4,5,1)
  Calculated value - Emission calculated from water balance. See 'WFLDB-Guidelines.pdf', available at https://ecoquery.ecoinvent.org/File/Reports.
- Chromium, ion [water, surface water]: 3.28451e-9 kg; source Freiermuth R.  2006; lognormal variance with pedigree 0.358938, pedigree (2,2,4,5,1)
  (same comment as for Nickel, ion)
- Water [water, ground-]: 1.47451e-6 m3; lognormal variance with pedigree 0.126177, pedigree (2,1,4,5,1)
  (same comment as for Water)
- Cadmium [soil, agricultural]: 4.28195e-10 kg; source Freiermuth R.  2006
  Comment on mathematicalRelation:
  4.74292035398e-10 from Calculated value - Freiermuth (2006). See 'WFLDB-Guidelines.pdf', available at https://ecoquery.ecoinvent.org/File/Reports.
  -4.60973628319e-11 from Crop, default, heavy metals uptake model
  Heavy metal uptake can be excluded by setting the parameter heavyMetalUptakeSwitch to zero.
- Chromium [soil, agricultural]: 8.06473e-10 kg; source Freiermuth R.  2006
  Comment on mathematicalRelation:
  1.05389380531e-09 from Calculated value - Freiermuth (2006). See 'WFLDB-Guidelines.pdf', available at https://ecoquery.ecoinvent.org/File/Reports.
  -2.47420353982e-10 from Crop, default, heavy metals uptake model
  Heavy metal uptake can be excluded by setting the parameter heavyMetalUptakeSwitch to zero.
- Copper [soil, agricultural]: -1.78177e-9 kg; source Freiermuth R.  2006
  Comment on mathematicalRelation:
  1.22672566372e-09 from Calculated value - Freiermuth (2006). See 'WFLDB-Guidelines.pdf', available at https://ecoquery.ecoinvent.org/File/Reports.
  Heavy metal uptake can be excluded by setting the parameter heavyMetalUptakeSwitch to zero.
- Phosphate [water, ground-]: 1.91885e-8 kg; source Prasuhn V.  2006; lognormal variance with pedigree 0.177866, pedigree (2,2,4,5,1)
  (same comment as for Phosphate)
- Mercury [soil, agricultural]: 2.65494e-11 kg; source Freiermuth R.  2006
  Comment on mathematicalRelation:
  4.49610619469e-11 from Calculated value - Freiermuth (2006). See 'WFLDB-Guidelines.pdf', available at https://ecoquery.ecoinvent.org/File/Reports.
  -1.84117061947e-11 from Crop, default, heavy metals uptake model
  Heavy metal uptake can be excluded by setting the parameter heavyMetalUptakeSwitch to zero.
- Cadmium, ion [water, ground-]: 3.9446e-12 kg; source Freiermuth R.  2006; lognormal variance with pedigree 0.358938, pedigree (2,2,4,5,1)
  (same comment as for Nickel, ion)
- Carbon dioxide, from soil or biomass stock [air, non-urban air or from high stacks]: 7.69558e-5 kg; normal variance with pedigree 0.5452, pedigree (3,3,5,5,2)
  Global average LUC emissions according 2nd edition of the Quantis-modified tool developed by Blonk Consultants 'WFLDB-adapted-Blonk 2014 direct-land-use-change-assessment-tool_2015-05-18a.xlsx', tab. 'Country & land use unknown'. The emission are based on the relative change in production areas in all countries for a given crop. The weighted average is used which takes into acount relative difference in crop expansion into primary forest, secondary forest, grassland, perennial and annual land.
  Uncertainty: Uncertainty estimated based on IPCC guidlines 2006.
- Lead [water, surface water]: 9.71681e-10 kg; source Freiermuth R.  2006; lognormal variance with pedigree 0.358938, pedigree (2,2,4,5,1)
  (same comment as for Nickel, ion)
- Phosphorus [water, surface water]: 1.11628e-7 kg; source Prasuhn V.  2006; lognormal variance with pedigree 0.177866, pedigree (2,2,4,5,1)
  Calculated value - Prasuhn (2006) and SQCB-Erosion. See 'WFLDB-Guidelines.pdf', available at https://ecoquery.ecoinvent.org/File/Reports.
- Nickel [soil, agricultural]: -1.35834e-9 kg; source Freiermuth R.  2006
  Comment on mathematicalRelation:
  -8.84115044248e-10 from Calculated value - Freiermuth (2006). See 'WFLDB-Guidelines.pdf', available at https://ecoquery.ecoinvent.org/File/Reports.
  -4.74229911504e-10 from Crop, default, heavy metals uptake model
  Heavy metal uptake can be excluded by setting the parameter heavyMetalUptakeSwitch to zero.
- Cadmium, ion [water, surface water]: 3.06982e-11 kg; source Freiermuth R.  2006; lognormal variance with pedigree 0.358938, pedigree (2,2,4,5,1)
  (same comment as for Nickel, ion)
- Zinc [soil, agricultural]: 1.7869e-9 kg; source Freiermuth R.  2006
  Comment on mathematicalRelation:
  1.63247787611e-08 from Calculated value - Freiermuth (2006). See 'WFLDB-Guidelines.pdf', available at https://ecoquery.ecoinvent.org/File/Reports.
  -1.45378752212e-08 from Crop, default, heavy metals uptake model
  Heavy metal uptake can be excluded by setting the parameter heavyMetalUptakeSwitch to zero.
- Diazinon [soil, agricultural]: 6.46464e-8 kg; lognormal variance with pedigree 0.0467216, pedigree (2,2,4,5,1)
  (same comment as for Pyrimethanil)
- Ammonia [air, non-urban air or from high stacks]: 1.90602e-5 kg; source EEA 2013; lognormal variance with pedigree 0.0467216, pedigree (2,2,4,5,1)
  Calculated value - EMEP/EEA (2013). See 'WFLDB-Guidelines.pdf', available at https://ecoquery.ecoinvent.org/File/Reports.
- Pendimethalin [soil, agricultural]: 1.63943e-7 kg; lognormal variance with pedigree 0.0467216, pedigree (2,2,4,5,1)
  (same comment as for Pyrimethanil)
- Copper, ion [water, surface water]: 2.74752e-9 kg; source Freiermuth R.  2006; lognormal variance with pedigree 0.358938, pedigree (2,2,4,5,1)
  (same comment as for Nickel, ion)
- Lead [water, ground-]: 1.84407e-11 kg; source Freiermuth R.  2006; lognormal variance with pedigree 0.358938, pedigree (2,2,4,5,1)
  (same comment as for Nickel, ion)
- Ioxynil [soil, agricultural]: 8.53332e-8 kg; lognormal variance with pedigree 0.0467216, pedigree (2,2,4,5,1)
  (same comment as for Pyrimethanil)
- Nitrate [water, ground-]: 3.8163e-5 kg; source Faist Emmenegger M. 2009; lognormal variance with pedigree 0.177866, pedigree (2,2,4,5,1)
- Zinc, ion [water, ground-]: 2.18655e-9 kg; source Freiermuth R.  2006; lognormal variance with pedigree 0.358938, pedigree (2,2,4,5,1)
  (same comment as for Nickel, ion)
- Water [water, surface water]: 5.89814e-6 m3; lognormal variance with pedigree 0.126177, pedigree (2,1,4,5,1)
  (same comment as for Water)
- Mercury [water, surface water]: 9.69115e-12 kg; source Freiermuth R.  2006; lognormal variance with pedigree 0.358938, pedigree (2,2,4,5,1)
  (same comment as for Nickel, ion)
- Mancozeb [soil, agricultural]: 1.5541e-6 kg; lognormal variance with pedigree 0.0467216, pedigree (2,2,4,5,1)
  (same comment as for Pyrimethanil)

## Sampling procedure
Inputs and Outputs for the seedling production are the same as for the activity 'onion production NZ' (New Zealand) for 1 ha but with 11'300'000 seedlings for product output per year.
Data collection and direct field emissions follow the WFLDB Methodological Guidelines for the Life Cycle Inventory of Agricultural Products in the latest version, available at: (Report section: https://v30.ecoquery.ecoinvent.org/File/Reports). Data sources: Data were categorised from level 0 (L0) to level (L4) as follows: L0 = estimate, proxy; L1 = statistical data (e.g. FAOSTAT); L2 = L1 adapted to crop or country; L3 = literature data or approved L1 L2 by experts; medium detailing (i.e. kg of total N-fertiliser); L4 = L3 data of high detailing (i.e. portion N-fertiliser types).In this dataset data were obtained for yield: L3; Fertilisers: L3; Pesticides: L1; Machinery: L0; Irrigation: L2. Detailed information about the sources used for data sampling can be taken from WFLDB 3.0 - Documentation, available at: (Report section: https://v30.ecoquery.ecoinvent.org/File/Reports).

## Extrapolations
The amount of the exchanges are copy from a regional dataset.
