# orange production, fresh grade

Dataset: EcoSpold 2, unit process
Geography: ES
Time period: 2000-01-01 to 2021-12-31
Technology level: current
Classification: ISIC rev.4 ecoinvent: 0123:Growing of citrus fruits
Tags: WFLDB
Scenario: Business-as-Usual
System model: Allocation, cut-off by classification
Generated by: Xavier Bengoa
Published in: Nemecek T. 2015
Database: ecoinvent
isCopyrightProtected: true
accessRestrictedTo: 1

## General comment
This dataset represents the production of 1 kg of orange, fresh grade (Navelina). Fresh grade oranges are meant for direct human consumption. The reference flow is the average yield per ha and for the year 2000: yield (30 t/ha) obtained under irrigated conditions (total amount of water 4187 m3/ha). The data are representative for orange production, fresh grade (Navelina), in Spain (Ribera Alta and Ribera Baixa) used for the export market. Mineral NPK fertiliser input is 300-65-135 kg/ha. Organic fertilisers applied amount to 3.6 t/ha of solid manure. Total active ingredients (a.i.) applied as pesticides amount to 14 kg a.i./ha and 74.7 kg/ha of horticultural oil.
The dataset was modelled within the project 'World Food LCA database (WFLDB)'. The aim of this project was to provide inventories of a broad variety of agricultural products and processes and to cover for each product at least 50% of the global export market. The export share of fresh grade oranges produced in Spain amounts to 20.5% of the global export (tonnage exported in 2010). The production system regarded in this dataset aimed at representing fresh grade oranges produced in Spain or the export market.
PEF-Quality: data quality rating (DQR) = 2.2 (i.e. good quality). This dataset refers to an average situation; for specific situations exchanges might differ substantially due to site specific parameters

## Included activities start
This activity starts with the nursery producing fruit tree seedlings, i.e.grafted young trees to be planted.

## Included activities end
This activity ends with the waste treatment after the clearing of the orchard (rooting up the trees). The dataset includes all activities during a year in the productive phase of the orchard including the establishment phase per year of lifetime (20 years), the clearing of the orchard including waste treatment.
The establishment phase of the orchard includes tree nursery, soil cultivation, planting trees, sowing grass, installation of trellis system (posts and wires) and irrigation. Fertiliser and pesticide use in a year of the establishment phase is assumed to be half of the amount of a year in the productive phase.
The productive phase of the orchard includes machine operations, corresponding infrastructure, fuel use and sheds. Machine operations in the productive phase are: soil cultivation (mulching, mowing), fertiliser and pesticide application, harvesting and irrigation. Further, direct field emissions and land use change are included. At the end of the productive phase the orchard is cleared by rooting up the trees.
The inputs of seedlings, fertilisers and pesticides as well as packaging of fertilisers and pesticides are considered. The dataset doesn't include emissions from manure storage because these are within the system boundary of animal production. Heavy metal uptake by the crop is considered.

## Technology
Conventional production

## Time period
Time period referring to the data source: 2000-2000. Based on expert opinion data is considered to be valid at least up to 2012.

## Parameters
- LUC_crop_specific: 1 dimensionless
  This parameter allows to switch between a 'crop specific' and a 'country specific' approach when calculating the LUC of a crop. By default, the chosen approach is 'crop specific', so the value of the parameter is 1. If you want to apply a 'country specific' approach, turn the parameter to 0.
- heavyMetalUptakeSwitch: 1 dimensionless

## Reference product
- orange, fresh grade: 1 kg; CPC 01323: Oranges; By-product classification allocatable product
  Orange, fresh grade, Spanish production
  Yield = 30000.0 kg/haOutput of orange, fresh grade, produced for direct human consumption.
  production volume 2.88966e9 kg
    Source: FAOSTAT. Average, 2009-2012
  property price 0.16 EUR2005
    Personal communication with the Technical Head of Citrus at Core Fruit, South Africa on 26.04.2018
  property carbon content, non-fossil 0.350629
    calculation: C-content of components according to ecoinvent report No. 15a. Source of composition: Souci, S.W., Fachmann, W., Kraut, H. (Hg.: Bundesminsiterium fur Ernahrung, Landwirtschaft und Forsten, Bonn) 'Die Zusammensetzung der Lebensmittel - Nahrwerttabellen', medpharm Scientific Publishers Stuttgart, CRC Press; 2000.
  property carbon content 0.350629
    carbon content on a dry matter basis (reserved; not for manual entry)
  properties: water content 0.842, carbon content, fossil 0, wet mass 1 kg, dry mass 0.542888 kg, water in wet mass 0.457112 kg, carbon allocation 0.190353 kg

## Inputs from technosphere
- naphtha: 0.00249 kg; source Sanjuan, N. 2005; lognormal variance with pedigree 0.0138498, pedigree (2,2,4,1,1)
  Literature value or expert estimation (Sanjuan et al. 2005).
  properties: dry mass 1 kg, wet mass 1 kg, carbon content, fossil 0.919743, heating value, net 45 MJ
- irrigation: 0.139583 m3; source Sanjuan, N. 2005; lognormal variance with pedigree 0.124177, pedigree (2,1,4,1,1)
  Calculated value: The total amount of water used for irrigation (calculated from evapotranspiration, Pfister et al. 2011) multiplied by the of irrigation technique (Sanjuan et al. 2005). See supporting documentation 'WFLDB-Documentation.pdf' chapter 'Water use for irrigation' for L1 data (https://ecoquery.ecoinvent.org/File/Reports).
  properties: wet mass 1000 kg, water content 9089.91, dry mass 0.11 kg
- glyphosate: 9e-5 kg; source Sanjuan, N. 2005; lognormal variance with pedigree 0.0138498, pedigree (2,2,4,1,1)
  Literature value or expert estimation (Sanjuan et al. 2005 AND USDA 2015).
  properties: dry mass 1 kg, wet mass 1 kg, carbon content, fossil 0.214286
- ammonium nitrate: 0.0249511 kg; lognormal variance with pedigree 0.124177, pedigree (2,1,4,1,1)
  The exchange has been updated from 'ammonium nitrate, as N' into 'ammonium nitrate' and therefore its amount has been scaled (multiplied) from 0.0087 kg by 2.8573 kg of 'ammonium nitrate' per kg of 'ammonium nitrate, as N'. Original comment of the exchange is:
  Corresponds to 262.0 kg/ha
  properties: wet mass 1 kg, dry mass 1 kg
- waste wood, untreated: -0.0444333 kg; lognormal variance with pedigree 0.124177, pedigree (2,1,4,1,1)
  Wood from trees after 1-2 years of sorrage at the field (20% water) per lifetime year (20 years) of the orchard
  production volume 1.28397e8 kg
    Calculated from the reference product amount and production volume
  properties: wet mass 1 kg, carbon content, non-fossil 0.48632, dry mass 0.8 kg, water content 0.25, heating value, net 13.99 MJ
  note on heating value, net: Value taken from the general comment of the treatment dataset.
- land use change, perennial crop: 4.65e-6 ha; = 4.65e-06*LUC_crop_specific+0.0*(1-LUC_crop_specific)
  Calculated value. Land use change (LUC) combines land transformation areas calculated with the adapted 'Direct Land Use Change Assessment Tool' version 2014 developed by Blonk Consultants and the carbon losses from soil organic carbon (SOC) and vegetation (VEG) as calculated in ecoinvent v3. See 'WFLDB-Guidelines.pdf', available at https://ecoquery.ecoinvent.org/File/Reports.
- inorganic nitrogen fertiliser, as N: 0.00126967 kg; source Sanjuan, N. 2005; lognormal variance with pedigree 0.124177, pedigree (2,1,4,1,1)
  Calculated based on literature values or expert estimation: The total amount of nutrient (Sanjuan et al. 2005) multiplied by the share of fertiliser type (Sanjuan et al. 2005). See supporting documentation 'WFLDB-Documentation.pdf' chapter 'Fertiliser application' for L3 and L4 data (https://ecoquery.ecoinvent.org/File/Reports).
  Corresponds to 38.1 kg/ha
  properties: wet mass 1 kg, dry mass 1 kg
- packaging, for pesticides: 0.000935 kg; lognormal variance with pedigree 0.0592, pedigree (4,3,4,5,4)
  Total amount of active substance/s of pesticides needed for the production of orange, fresh grade is calculated to be circa 4.68E-04 kg. Pesticide/s used in this dataset is/are: 'copper oxide', 'glyphosate', 'organophosphorus-compound, unspecified', 'phenoxy-compound', 'triazine-compound, unspecified'. The total amount of active substance/s is doubled in order to account for the packaging of the dilluted product of pesticide/s that is/are applied. Therefore, 9.35E-04 kg of packaging for pesticides is justified with this exchange.
  properties: dry mass 1 kg, carbon content, fossil 0.85714, price 0.0642 EUR2005, heating value, net 25.97 MJ, wet mass 1 kg
- inorganic phosphorus fertiliser, as P2O5: 0.00216 kg; source Sanjuan, N. 2005; lognormal variance with pedigree 0.124177, pedigree (2,1,4,1,1)
  Calculated based on literature values or expert estimation: The total amount of nutrient (Sanjuan et al. 2005) multiplied by the share of fertiliser type (Sanjuan et al. 2005). See supporting documentation 'WFLDB-Documentation.pdf' chapter 'Fertiliser application' for L3 and L4 data (https://ecoquery.ecoinvent.org/File/Reports).
  Corresponds to 64.8 kg/ha
  properties: wet mass 1 kg, dry mass 1 kg
- inorganic potassium fertiliser, as K2O: 0.00449267 kg; source Sanjuan, N. 2005; lognormal variance with pedigree 0.124177, pedigree (2,1,4,1,1)
  Calculated based on literature values or expert estimation: The total amount of nutrient (Sanjuan et al. 2005) multiplied by the share of fertiliser type (Sanjuan et al. 2005). See supporting documentation 'WFLDB-Documentation.pdf' chapter 'Fertiliser application' for L3 and L4 data (https://ecoquery.ecoinvent.org/File/Reports).
  Corresponds to 135.0 kg/ha
  properties: dry mass 1 kg, wet mass 1 kg
- manure, solid, cattle: 0.0725122 kg; source Sanjuan, N. 2005; lognormal variance with pedigree 0.124177, pedigree (2,1,4,1,1)
  Calculated based on literature values: The total amount of manure (Sanjuan et al. 2005) multiplied by the country-share of manure per animal category (FAOSTAT 2015). See supporting documentation 'WFLDB-Documentation.pdf' chapter 'Fertiliser application' (https://ecoquery.ecoinvent.org/File/Reports).
  Corresponds to 2180.0 kg/ha
  properties: dry mass 0.22 kg, carbon content, non-fossil 0.441, water content 3.5454, wet mass 1 kg
- poultry manure, dried: 0.0474878 kg; source Sanjuan, N. 2005; lognormal variance with pedigree 0.124177, pedigree (2,1,4,1,1)
  Calculated based on literature values: The total amount of manure (Sanjuan et al. 2005) multiplied by the country-share of manure per animal category (FAOSTAT 2015). See supporting documentation 'WFLDB-Documentation.pdf' chapter 'Fertiliser application' (https://ecoquery.ecoinvent.org/File/Reports).
  Corresponds to 1420.0 kg/ha
  properties: nickel content 4e-5, zinc content 0.000349, water content 0.156069, carbon content, non-fossil 0.33389, cadmium content 2.92e-7, copper content 4.38e-5, phosphorus content 0.0167, mercury content 2e-7, lead content 2.92e-6, potassium content 0.024, dry mass 0.865 kg, wet mass 1 kg, nitrogen content 0.532
- trellis system, wooden poles, soft wood, tar impregnated: 3.33333e-9 ha; lognormal variance with pedigree 0.124177, pedigree (2,1,4,1,1)
  Used to attach trees in orchards with a tree density of more than 500 trees per ha.
- fertilising, by broadcaster: 0.000133333 ha; lognormal variance with pedigree 0.124177, pedigree (2,1,4,1,1)
  Estimation based on a modified MEXALCA-approach (Roches et al. 2010; Nemecek et al. 2012): See supporting documentation 'WFLDB-Documentation.pdf' chapter 'Machinery processes' for L2 data (https://ecoquery.ecoinvent.org/File/Reports).
- mowing, by motor mower: 0.00015226 ha; lognormal variance with pedigree 0.124177, pedigree (2,1,4,1,1)
  Proxy: Extrapolated using a modified MEXALCA-approach (Roches et al. 2010; Nemecek et al. 2012). See supporting documentation 'WFLDB-Documentation.pdf' chapter 'Machinery processes' for L1 data (https://ecoquery.ecoinvent.org/File/Reports).
- solid manure loading and spreading, by hydraulic loader and spreader: 0.12 kg; source Sanjuan, N. 2005; lognormal variance with pedigree 0.124177, pedigree (2,1,4,1,1)
  This amount corresponds the input of solid manure. Sanjuan et al. 2005
- application of plant protection product, by field sprayer: 0.00027407 ha; lognormal variance with pedigree 0.124664, pedigree (2,2,4,1,1)
  Proxy: Extrapolated using a modified MEXALCA-approach (Roches et al. 2010; Nemecek et al. 2012). See supporting documentation 'WFLDB-Documentation.pdf' chapter 'Machinery processes' for L1 data (https://ecoquery.ecoinvent.org/File/Reports). Field sprayer used as a proxy for pesticide application in orchards.
- mulching: 4.68933e-5 ha; lognormal variance with pedigree 0.124177, pedigree (2,1,4,1,1)
  (same comment as for mowing, by motor mower)
- packaging, for fertilisers: 0.0333093 kg; lognormal variance with pedigree 0.0592, pedigree (4,3,4,5,4)
  Total amount of active substance/s of fertilisers needed for the production of 'orange, fresh grade' is calculated to be circa 1.67E-02 kg. Fertiliser/s used in this dataset is/are: 'ammonium nitrate, as N', 'nitrogen fertiliser, as N', 'phosphate fertiliser, as P2O5', 'potassium fertiliser, as K2O'. The total amount of active substance/s is doubled in order to account for the packaging of the dilluted product of fertiliser/s that is/are applied. Therefore, 3.33E-02 kg of packaging for fertilisers is justified with this exchange.
  properties: price 0.0642 EUR2005, carbon content, fossil 0.825301, dry mass 1 kg, heating value, net 25.01 MJ, wet mass 1 kg
  note on carbon content, fossil: Considering a chemical formula (C2H4)n for polyethylene, carbon content-fossil is calculated to be 0.856286 kg of Carbon per kg of dry mass.
- transport, tractor and trailer, agricultural: 0.0005535 metric ton*km; lognormal variance with pedigree 0.162439, pedigree (4,1,4,1,1)
  On-farm transport: Yield (in tonnes) multiplied by the average distance from field to farm. The distance was obtained by extrapolation (modified MEXALCA approach). See supporting documentation 'WFLDB-Documentation.pdf' chapter 'Machinery processes' (https://ecoquery.ecoinvent.org/File/Reports).
- phenoxy-compound: 9e-5 kg; source Sanjuan, N. 2005; lognormal variance with pedigree 0.0138498, pedigree (2,2,4,1,1)
  Literature value or expert estimation (Sanjuan et al. 2005).
  properties: carbon content, fossil 0.532559, wet mass 1 kg, dry mass 1 kg
- copper oxide: 5.5e-6 kg; source Sanjuan, N. 2005; lognormal variance with pedigree 0.0138498, pedigree (2,2,4,1,1)
  Literature value or expert estimation (Sanjuan et al. 2005).
  properties: wet mass 1 kg, dry mass 1 kg
- fruit tree seedling, for planting: 0.000555567 unit; source Sanjuan, N. 2005; lognormal variance with pedigree 0.124177, pedigree (2,1,4,1,1)
  Literature value or expert estimation (Sanjuan et al. 2005). This is the number of trees per ha divided by the lifetime years of the orchard.
  properties: carbon content, non-fossil 0.439481, water content 0.73, dry mass 0.578035 kg, wet mass 1 kg
  note on carbon content, non-fossil: calculation: C-content of components according to ecoinvent report No. 15a. Source of composition: https://ndb.nal.usda.gov/ndb/search/. Unspecific seedling used as proxy.
- organophosphorus-compound, unspecified: 0.000192 kg; source Sanjuan, N. 2005; lognormal variance with pedigree 0.0138498, pedigree (2,2,4,1,1)
  Literature value or expert estimation (Sanjuan et al. 2005).
  properties: wet mass 1 kg, dry mass 1 kg, carbon content, fossil 0.260898
- establishing orchard: 0.000555567 unit; source Sanjuan, N. 2005; lognormal variance with pedigree 0.124177, pedigree (2,1,4,1,1)
  (same comment as for fruit tree seedling, for planting)
- triazine-compound, unspecified: 9e-5 kg; source Sanjuan, N. 2005; lognormal variance with pedigree 0.0138498, pedigree (2,2,4,1,1)
  Literature value or expert estimation (Sanjuan et al. 2005 AND USDA 2015).
  properties: carbon content, fossil 0.475616, dry mass 1 kg, wet mass 1 kg
- planting tree: 0.000555567 unit; source Sanjuan, N. 2005; lognormal variance with pedigree 0.124177, pedigree (2,1,4,1,1)
  (same comment as for fruit tree seedling, for planting)

## Inputs from nature
- Occupation, permanent crop, irrigated [natural resource, land]: 0.334233 m2*year; lognormal variance with pedigree 0.0200616, pedigree (2,1,4,1,1)
  Related to the duration from harvest date of previous crop to harvest date of main crop.
- Transformation, to permanent crop, irrigated [natural resource, land]: 0.0166667 m2; lognormal variance with pedigree 0.0442144, pedigree (2,1,4,1,1)
  10000 m2 divided by the life time of the perennial crop (20 years).
- Transformation, from permanent crop, irrigated [natural resource, land]: 0.0166667 m2; lognormal variance with pedigree 0.0442144, pedigree (2,1,4,1,1)
  10000 m2 divided by the life time of the perennial crop (20 years).
- Carbon dioxide, in air [natural resource, in air]: 0.222473 kg; lognormal variance with pedigree 0.0138498, pedigree (2,2,4,1,1)
  Calculated value: CO2 uptake by biomass. Dry matter content = 16%
- Energy, gross calorific value, in biomass [natural resource, biotic]: 2.5503 MJ; lognormal variance with pedigree 0.0138498, pedigree (2,2,4,1,1)
  Calculated value: dry matter content = 16%

## Emissions to nature
- Copper [soil, agricultural]: 5.50762e-6 kg; = 6.55466666667e-06 + ( - 1.0470502e-06)*heavyMetalUptakeSwitch; source Freiermuth R.  2006
  Comment on mathematicalRelation:
  6.55466666667e-06 from Calculated value - Freiermuth (2006). See 'WFLDB-Guidelines.pdf', available at https://ecoquery.ecoinvent.org/File/Reports.
  -1.0470502e-06 from Crop, default, heavy metals uptake model
  Heavy metal uptake can be excluded by setting the parameter heavyMetalUptakeSwitch to zero.
- Nitrogen oxides [air, non-urban air or from high stacks]: 0.0004322 kg; source EEA 2013; lognormal variance with pedigree 0.124664, pedigree (2,2,4,1,1)
  Calculated value - EEA/EMEP (2013). See 'WFLDB-Guidelines.pdf', available at https://ecoquery.ecoinvent.org/File/Reports.
- Mercury [soil, agricultural]: 8.08515e-9 kg; = 1.4493e-08 + ( - 6.407848e-09)*heavyMetalUptakeSwitch; source Freiermuth R.  2006
  Comment on mathematicalRelation:
  1.4493e-08 from Calculated value - Freiermuth (2006). See 'WFLDB-Guidelines.pdf', available at https://ecoquery.ecoinvent.org/File/Reports.
  -6.407848e-09 from Crop, default, heavy metals uptake model
  Heavy metal uptake can be excluded by setting the parameter heavyMetalUptakeSwitch to zero.
- Lead [soil, agricultural]: 7.92383e-8 kg; = 1.6468e-07 + ( - 8.544166e-08)*heavyMetalUptakeSwitch; source Freiermuth R.  2006
  Comment on mathematicalRelation:
  1.6468e-07 from Calculated value - Freiermuth (2006). See 'WFLDB-Guidelines.pdf', available at https://ecoquery.ecoinvent.org/File/Reports.
  -8.544166e-08 from Crop, default, heavy metals uptake model
  Heavy metal uptake can be excluded by setting the parameter heavyMetalUptakeSwitch to zero.
- Cadmium, ion [water, surface water]: 1.2357e-9 kg; source Freiermuth R.  2006; lognormal variance with pedigree 0.356938, pedigree (2,2,4,1,1)
  Calculated value - Freiermuth (2006). See 'WFLDB-Guidelines.pdf', available at https://ecoquery.ecoinvent.org/File/Reports.
- Nickel [soil, agricultural]: 5.12253e-7 kg; = 6.773e-07 + ( - 1.650468e-07)*heavyMetalUptakeSwitch; source Freiermuth R.  2006
  Comment on mathematicalRelation:
  6.773e-07 from Calculated value - Freiermuth (2006). See 'WFLDB-Guidelines.pdf', available at https://ecoquery.ecoinvent.org/File/Reports.
  -1.650468e-07 from Crop, default, heavy metals uptake model
  Heavy metal uptake can be excluded by setting the parameter heavyMetalUptakeSwitch to zero.
- Zinc [soil, agricultural]: -1.97967e-7 kg; = 4.86166666667e-06 + ( - 5.059634e-06)*heavyMetalUptakeSwitch; source Freiermuth R.  2006
  Comment on mathematicalRelation:
  4.86166666667e-06 from Calculated value - Freiermuth (2006). See 'WFLDB-Guidelines.pdf', available at https://ecoquery.ecoinvent.org/File/Reports.
  -5.059634e-06 from Crop, default, heavy metals uptake model
  Heavy metal uptake can be excluded by setting the parameter heavyMetalUptakeSwitch to zero.
- Mineral oil [soil, agricultural]: 0.00249 kg; lognormal variance with pedigree 0.0447216, pedigree (2,2,4,1,1)
  Calculated value - 100% emission in soil. See 'WFLDB-Guidelines.pdf', available at https://ecoquery.ecoinvent.org/File/Reports.
- Glyphosate [soil, agricultural]: 9e-5 kg; lognormal variance with pedigree 0.0447216, pedigree (2,2,4,1,1)
  (same comment as for Mineral oil)
- MCPA [soil, agricultural]: 9e-5 kg; lognormal variance with pedigree 0.0447216, pedigree (2,2,4,1,1)
  (same comment as for Mineral oil)
- Lead [water, surface water]: 2.61653e-8 kg; source Freiermuth R.  2006; lognormal variance with pedigree 0.356938, pedigree (2,2,4,1,1)
  (same comment as for Cadmium, ion)
- Nickel, ion [water, surface water]: 8.81033e-8 kg; source Freiermuth R.  2006; lognormal variance with pedigree 0.356938, pedigree (2,2,4,1,1)
  (same comment as for Cadmium, ion)
- Zinc, ion [water, surface water]: 2.03227e-7 kg; source Freiermuth R.  2006; lognormal variance with pedigree 0.356938, pedigree (2,2,4,1,1)
  (same comment as for Cadmium, ion)
- Chlorpyrifos methyl [soil, agricultural]: 0.000192 kg; lognormal variance with pedigree 0.0447216, pedigree (2,2,4,1,1)
  (same comment as for Mineral oil)
- Cadmium, ion [water, ground-]: 1.5287e-9 kg; source Freiermuth R.  2006; lognormal variance with pedigree 0.356938, pedigree (2,2,4,1,1)
  (same comment as for Cadmium, ion)
- Phosphate [water, ground-]: 6.14567e-6 kg; source Prasuhn V.  2006; lognormal variance with pedigree 0.175866, pedigree (2,2,4,1,1)
  Calculated value - Prasuhn (2006). See 'WFLDB-Guidelines.pdf', available at https://ecoquery.ecoinvent.org/File/Reports.
- Chromium, ion [water, ground-]: 6.547e-7 kg; source Freiermuth R.  2006; lognormal variance with pedigree 0.356938, pedigree (2,2,4,1,1)
  (same comment as for Cadmium, ion)
- Copper, ion [water, ground-]: 1.18883e-7 kg; source Freiermuth R.  2006; lognormal variance with pedigree 0.356938, pedigree (2,2,4,1,1)
  (same comment as for Cadmium, ion)
- Simazine [soil, agricultural]: 9e-5 kg; lognormal variance with pedigree 0.0447216, pedigree (2,2,4,1,1)
  Calculated value - 100% emission in soil. See 'WFLDB-Guidelines.pdf', available at https://ecoquery.ecoinvent.org/File/Reports. This active ingredient is no longer registered in this specific country, but is used as a proxy.
- Lead [water, ground-]: 4.78933e-9 kg; source Freiermuth R.  2006; lognormal variance with pedigree 0.356938, pedigree (2,2,4,1,1)
  (same comment as for Cadmium, ion)
- Mercury [water, surface water]: 3.045e-10 kg; source Freiermuth R.  2006; lognormal variance with pedigree 0.356938, pedigree (2,2,4,1,1)
  (same comment as for Cadmium, ion)
- Mercury [water, ground-]: 5.375e-11 kg; source Freiermuth R.  2006; lognormal variance with pedigree 0.356938, pedigree (2,2,4,1,1)
  (same comment as for Cadmium, ion)
- Dinitrogen monoxide [air, non-urban air or from high stacks]: 0.000198757 kg; source IPCC 2006; lognormal variance with pedigree 0.124664, pedigree (2,2,4,1,1)
  Calculated value - IPCC (2006). See 'WFLDB-Guidelines.pdf', available at https://ecoquery.ecoinvent.org/File/Reports.
- Nickel, ion [water, ground-]: 8.84233e-12 kg; source Freiermuth R.  2006; lognormal variance with pedigree 0.356938, pedigree (2,2,4,1,1)
  (same comment as for Cadmium, ion)
- Water [air, non-urban air or from high stacks]: 0.1005 m3; lognormal variance with pedigree 0.124177, pedigree (2,1,4,1,1)
  Calculated value - Emission calculated from water balance. See 'WFLDB-Guidelines.pdf', available at https://ecoquery.ecoinvent.org/File/Reports.
- Zinc, ion [water, ground-]: 7.251e-7 kg; source Freiermuth R.  2006; lognormal variance with pedigree 0.356938, pedigree (2,2,4,1,1)
  (same comment as for Cadmium, ion)
- Phosphate [water, surface water]: 3.1277e-5 kg; source Prasuhn V.  2006; lognormal variance with pedigree 0.175866, pedigree (2,2,4,1,1)
  (same comment as for Phosphate)
- Water [water, surface water]: 0.0312667 m3; lognormal variance with pedigree 0.124177, pedigree (2,1,4,1,1)
  (same comment as for Water)
- Copper, ion [water, surface water]: 1.70403e-7 kg; source Freiermuth R.  2006; lognormal variance with pedigree 0.356938, pedigree (2,2,4,1,1)
  (same comment as for Cadmium, ion)
- Phosphorus [water, surface water]: 2.93857e-6 kg; source Prasuhn V.  2006; lognormal variance with pedigree 0.175866, pedigree (2,2,4,1,1)
  Calculated value - Prasuhn (2006) and SQCB-Erosion. See 'WFLDB-Guidelines.pdf', available at https://ecoquery.ecoinvent.org/File/Reports.
- Water [water, ground-]: 0.00781667 m3; lognormal variance with pedigree 0.124177, pedigree (2,1,4,1,1)
  (same comment as for Water)
- Ammonia [air, non-urban air or from high stacks]: 0.0006717 kg; source EEA 2013; lognormal variance with pedigree 0.0447216, pedigree (2,2,4,1,1)
  Calculated value - EMEP/EEA (2013). See 'WFLDB-Guidelines.pdf', available at https://ecoquery.ecoinvent.org/File/Reports.
- Chromium, ion [water, surface water]: 1.098e-7 kg; source Freiermuth R.  2006; lognormal variance with pedigree 0.356938, pedigree (2,2,4,1,1)
  (same comment as for Cadmium, ion)
- Nitrate [water, ground-]: 0.00169022 kg; source Richner W. 2014; lognormal variance with pedigree 0.175866, pedigree (2,2,4,1,1)
- Chromium [soil, agricultural]: 6.2819e-7 kg; = 7.143e-07 + ( - 8.611e-08)*heavyMetalUptakeSwitch; source Freiermuth R.  2006
  Comment on mathematicalRelation:
  7.143e-07 from Calculated value - Freiermuth (2006). See 'WFLDB-Guidelines.pdf', available at https://ecoquery.ecoinvent.org/File/Reports.
  -8.611e-08 from Crop, default, heavy metals uptake model
  Heavy metal uptake can be excluded by setting the parameter heavyMetalUptakeSwitch to zero.
- Cadmium [soil, agricultural]: 2.3149e-7 kg; = 2.47533333333e-07 + ( - 1.604332e-08)*heavyMetalUptakeSwitch; source Freiermuth R.  2006
  Comment on mathematicalRelation:
  2.47533333333e-07 from Calculated value - Freiermuth (2006). See 'WFLDB-Guidelines.pdf', available at https://ecoquery.ecoinvent.org/File/Reports.
  -1.604332e-08 from Crop, default, heavy metals uptake model
  Heavy metal uptake can be excluded by setting the parameter heavyMetalUptakeSwitch to zero.

## Sampling procedure
WFLDB Methodological Guidelines for the Life Cycle Inventory of Agricultural Products in the latest version, available at: https://ecoquery.ecoinvent.org/File/Reports. Data sources: Data were categorised from level 0 (L0) to level (L4) as follows: L0 = estimate, proxy; L1 = statistical data (e.g. FAOSTAT); L2 = L1 adapted to crop and country; L3 = literature data or L1 resp. L2 data approved by experts; medium detailing (i.e. kg of total N-fertiliser); L4 = L3 data of high detailing (i.e. portion N-fertiliser types).In this dataset data were obtained for yield: L3; Fertilisers: L4; Pesticides: L1; Machinery: L0; Irrigation: L2. For information regarding the calculation of individual exchanges see supporting documentation WFLDB-Documentation.pdf

## Extrapolations
This dataset has been extrapolated from year 2012 to the year of the calculation (2021). The uncertainty has been adjusted accordingly.

## Review by Assumpció ANTON 2016-05-30
Be aware that the use of statistics in input calculations could provide some specific inputs not common for specific crops, this should be corrected if better information is available and better reflexed in DQR . Currently, I would dissent for some of good marks provided, being a revision of criteria applied advisable.

Pesticides will need to be amended periodically checking for update of pesticides' ban.
