# tetrachloroethylene production

Dataset: EcoSpold 2, unit process
Geography: WEU
Time period: 1997-01-01 to 2021-12-31
Technology level: current
Classification: ISIC rev.4 ecoinvent: 2011:Manufacture of basic chemicals
Classification: EcoSpold01Categories: chemicals/organics
Synonyms: Perc; PER; ethylene tetrachloride; perchloroethylene; tetrachloroethene; carbon dichloride
Tags: ConvertedDataset
Scenario: Business-as-Usual
System model: Allocation, cut-off by classification
Share of production covered: 76 %
Generated by: Alex Primas
Published in: Althaus H.-J. 2007
Database: ecoinvent
isCopyrightProtected: true
accessRestrictedTo: 1

## General comment
The data source for this process is a system inventory from Boustead. Due to the cumulated form of this data only the ressources and emissions included in the data source were considered. No land occupation and land use is included in this dataset. Further it was not possible to implement an uncertainity assessment with this data.
[This dataset was already contained in the ecoinvent database version 2. It was not individually updated during the transfer to ecoinvent version 3. Life Cycle Impact Assessment results may still have changed, as they are affected by changes in the supply chain, i.e. in other datasets. This dataset was generated following the ecoinvent quality guidelines for version 2. It may have been subject to central changes described in the ecoinvent version 3 change report (http://www.ecoinvent.org/database/ecoinvent-version-3/reports-of-changes/), and the results of the central updates were reviewed extensively. The changes added e.g. consistent water flows and other information throughout the database. The documentation of this dataset can be found in the ecoinvent reports of version 2, which are still available via the ecoinvent website. The change report linked above covers all central changes that were made during the conversion process.]

## Included activities end
Raw materials, processing energy, emissions to air and water from process, energy services and transports, infrastructure only partly included, no infrastructure of main process included, no land use data included.

## Geography
Data from various plants within Europe.

## Technology
Data refers to actual technology used in the companies included. This leads in total to an average value including all important production routes for this chemical

## Time period
Time of literature publication. Measurements took place before this period.

## Parameters
- fraction, cooling water, recirculating system, to air: 0.771 dimensionless; name fraction_CW_R_to_air; lognormal variance with pedigree 0.0413, pedigree (2,3,1,3,1)
  Calculated based on literature value (Scown, C.D., 2011, Water Footprint of U.S. Transportation Fuels and supplying information of the article) (Vionnet, S., Quantis Water Database - Technical Report, 2012).
- fraction, cooling water, cooling pond system, to air: 0.032 dimensionless; name fraction_CW_CP_to_air; lognormal variance with pedigree 0.0413, pedigree (2,3,1,3,1)
  (same comment as for fraction, cooling water, recirculating system, to air)
- fraction, cooling water, once-through system, to air: 0.004 dimensionless; name fraction_CW_OT_to_air; lognormal variance with pedigree 0.0413, pedigree (2,3,1,3,1)
  (same comment as for fraction, cooling water, recirculating system, to air)
- fraction, process water, to air: 0.205 dimensionless; name fraction_PW_to_air; lognormal variance with pedigree 0.092025, pedigree (4,4,3,2,4)
  Literature value (Statistics Canada, 2007 & Shaffer, K.H., 2008, Consumptive water use in the Great Lakes Basin, USGS) (Vionnet, S., Quantis Water Database - Technical Report, 2012).
- fraction, cooling water, to air: 0.3875 dimensionless; name fraction_CW_to_air; = (0.5*fraction_CW_OT_to_air)+(0.5*fraction_CW_R_to_air); lognormal variance with pedigree 0.092025, pedigree (4,4,3,2,4)
  Calculated value based on literature value (see comments of the other parametres present in this dataset) and expert opinion. In the case when no industry/literature data are available about the type of cooling or directly fraction, cooling water, to air specific for the process a default assumption is applied. It is assumed that the once-through cooling system is used in 50% of all cases and recirculating system is used in another 50% of all cases.

## Reference product
- tetrachloroethylene: 1 kg; CPC 34110: Hydrocarbons and their halogenated, sulphonated, nitrated or nitrosated derivatives; By-product classification allocatable product; CAS 127-18-4
  EcoSpold01Location=WEU
  production volume 0.582248 kg
    This is a placeholder value that does not reflect real-world production volumes. This dataset does not currently require a real-world production volume to work in the database framework, and no actual data were collected yet. This has no negative effect on the results of the ecoinvent database. The placeholder value of this activity was scaled according to the nominal GDP of 2005 (source: United Nations, http://data.un.org/Glossary.aspx?q=GDP+%28current+US%24%29, accessed 20130726) to reflect an appropriate share of the global production volume, which is also a placeholder value.
  property heating value, net 4.39 MJ
    LHV is calculated based on the elemental composition of the substance. Based on the CAS number of the substance (000127-18-4), the chemical formula of the substance is found to be: C2Cl4, (PubChem 2020).
    Reference: Kim, S., Chen, J., Cheng, T., Gindulyte, A., He, J., He, S., Li, Q., Shoemaker, B. A., Thiessen, P. A., Yu, B., Zaslavsky, L., Zhang, J., & Bolton, E. E. (2019). PubChem 2019 update: improved access to chemical data. Nucleic acids research, 47(D1), D1102–D1109. https://doi.org/10.1093/nar/gky1033
  property carbon content 0.146341
    carbon content on a dry matter basis (reserved; not for manual entry)
  properties: wet mass 1 kg, water in wet mass 0 kg, dry mass 1 kg, price 0.704 EUR2005, carbon content, fossil 0.146341, carbon content, non-fossil 0, water content 0, carbon allocation 0.146341 kg

## Inputs from technosphere
- municipal solid waste: 0 kg
  EcoSpold01Location=CH
  Uncertainty for LCI results cannot be determined
  production volume 0 kg
    Calculated from the production volume of tetrachloroethylene in proportion to the respective output amounts.
  properties: wet mass 1 kg, heating value, net 11.74 MJ, water content 0.297017, carbon content, fossil 0.171549, carbon content, non-fossil 0.261655, dry mass 0.771 kg
  note on heating value, net: Value taken from the general comment of the treatment dataset.
  note on carbon content, fossil: MSW composition in tab 4.1, ecoinvent v2.2 report 13_I. C content referred to 1 kg DM
- average incineration residue: -0.0209 kg
  Uncertainty for LCI results cannot be determined
  EcoSpold01Location=CH
  production volume 0.0209 kg
    (same comment as for municipal solid waste)
  properties: carbon content, fossil 0.0325466, dry mass 1 kg, carbon content, non-fossil 0.0511208, wet mass 1 kg
  note on carbon content, fossil: Tab A.1, ecoinvent v2.2 report 13_I. It is considered that 61.1% of the C has a biogenic origin
- waste wood, untreated: 0 kg
  EcoSpold01Location=CH
  Uncertainty for LCI results cannot be determined
  production volume 0 kg
    (same comment as for municipal solid waste)
  properties: water content 0.25, carbon content, non-fossil 0.48632, wet mass 1 kg, dry mass 0.8 kg, heating value, net 13.99 MJ
  note on carbon content, non-fossil: Tab A.4, ecoinvent v2.2 report 13_I. C content has been referred to 1 kg DM,
- hazardous waste, for incineration: -0.0039 kg
  EcoSpold01Location=CH
  Uncertainty for LCI results cannot be determined
  production volume 0.0039 kg
    (same comment as for municipal solid waste)
  properties: water content 0.333333, carbon content, fossil 0.554667, wet mass 1 kg, dry mass 0.75 kg, heating value, net 17 MJ
  note on carbon content, fossil: Tab A.6, ecoinvent v2.2 report 13_I. C content has been calculated after data in the tables, and then referred to 1 kg DM
- waste plastic, mixture: 0 kg
  EcoSpold01Location=CH
  Uncertainty for LCI results cannot be determined
  production volume 0 kg
    (same comment as for municipal solid waste)
  properties: heating value, net 30.79 MJ, water content 0.180638, carbon content, fossil 0.747344, dry mass 0.847 kg, wet mass 1 kg
  note on carbon content, fossil: C content in 1 kg DM was calculated using data in Tab A.2, ecoinvent v2.2 report 13_I
- decommissioned chemical production facilities: -3e-5 kg
  EcoSpold01Location=RER
  Uncertainty for LCI results cannot be determined
  production volume 3e-5 kg
    (same comment as for municipal solid waste)
  properties: carbon content, fossil 0.0169382, wet mass 1 kg, carbon content, non-fossil 5.78006e-6, dry mass 1 kg
  note on carbon content, fossil: Calculated from C content in input materials in the infrastructure
- municipal solid waste: -0.000135377, -0.0010872, -0.00130746, -1.16325e-5, -0.000146393, -0.000173316, -0.00026563 kg (7 entries)
  EcoSpold01Location=CH
  Uncertainty for LCI results cannot be determined
  production volume 0.003127 kg
- waste wood, untreated: -2.12184e-8, -2.16494e-7, -1.70785e-7, -2.40116e-9, -1.97788e-8, -2.01556e-8, -4.91667e-8 kg (7 entries)
  EcoSpold01Location=CH
  Uncertainty for LCI results cannot be determined
  production volume 5e-7 kg
- waste plastic, mixture: -7.66536e-8, -9.69327e-7, -5.06157e-7, -1.09723e-8, -3.25155e-8, -9.78059e-8, -3.06569e-7 kg (7 entries)
  EcoSpold01Location=CH
  Uncertainty for LCI results cannot be determined
  production volume 2e-6 kg

## Inputs from nature
- Energy, potential (in hydropower reservoir), converted [natural resource, in water]: 0.27 MJ
- Sulfur, in ground [natural resource, in ground]: 0.001 kg
  Uncertainty for LCI results cannot be determined
- Sylvite, in ground [natural resource, in ground]: 3e-6 kg
  25% Sylvite in sylvinite; Uncertainty for LCI results cannot be determined
- Clay, unspecified, in ground [natural resource, in ground]: 0.0005 kg
  Uncertainty for LCI results cannot be determined
- Gas, natural, in ground [natural resource, in ground]: 0.362 m3
  Uncertainty for LCI results cannot be determined
- Sodium chloride, in ground [natural resource, in ground]: 1.2 kg
  Uncertainty for LCI results cannot be determined
- Water, salt, ocean [natural resource, in water]: 3.5e-6 m3; name water_salt_ocean_input; lognormal variance with pedigree 1.21, pedigree (5,5,5,5,5)
  Uncertainty for LCI results cannot be determined
- Uranium, in ground [natural resource, in ground]: 6.65e-6 kg
  Uncertainty for LCI results cannot be determined
- Coal, hard, unspecified, in ground [natural resource, in ground]: 0.2 kg
  Uncertainty for LCI results cannot be determined
- Water, river [natural resource, in water]: 4.2e-6 m3; name water_river_input; lognormal variance with pedigree 1.21, pedigree (5,5,5,5,5)
  Uncertainty for LCI results cannot be determined
- Water, cooling, unspecified natural origin [natural resource, in water]: 0.11 m3; name water_cooling_UNO_input; lognormal variance with pedigree 1.21, pedigree (5,5,5,5,5)
  Uncertainty for LCI results cannot be determined
- Olivine, in ground [natural resource, in ground]: 4e-6 kg
  Uncertainty for LCI results cannot be determined
- Wood, unspecified, standing [natural resource, biotic]: 3.04e-9 m3
  Uncertainty for LCI results cannot be determined
- Sand, unspecified, in ground [natural resource, in ground]: 0.072 kg
  Uncertainty for LCI results cannot be determined
- Water, unspecified natural origin [natural resource, in water]: 0.0082 m3; name water_UNO_input; lognormal variance with pedigree 1.21, pedigree (5,5,5,5,5)
  Uncertainty for LCI results cannot be determined
- Gravel, in ground [natural resource, in ground]: 1e-6 kg
  Uncertainty for LCI results cannot be determined
- Clay, bentonite, in ground [natural resource, in ground]: 2e-5 kg
  Uncertainty for LCI results cannot be determined
- Anhydrite, in ground [natural resource, in ground]: 2e-6 kg
  Uncertainty for LCI results cannot be determined
- Dolomite, in ground [natural resource, in ground]: 5e-6 kg
  Uncertainty for LCI results cannot be determined
- Water, well, in ground [natural resource, in water]: 3e-7 m3; name water_well_in_ground_input; lognormal variance with pedigree 1.21, pedigree (5,5,5,5,5)
  Uncertainty for LCI results cannot be determined
- Coal, brown, in ground [natural resource, in ground]: 0.11 kg
  Uncertainty for LCI results cannot be determined
- Calcite, in ground [natural resource, in ground]: 0.0078 kg
  Uncertainty for LCI results cannot be determined
- Fluorspar, in ground [natural resource, in ground]: 2e-6 kg
  92% CaF2 in ore; Uncertainty for LCI results cannot be determined
- Shale, in ground [natural resource, in ground]: 6e-6 kg
  Uncertainty for LCI results cannot be determined
- Aluminium, in ground [natural resource, in ground]: 7.42e-5 kg
  24% Al in bauxite; 11% Al in ore; Uncertainty for LCI results cannot be determined
- Iron, in ground [natural resource, in ground]: 0.0004 kg
  46% Fe in siderite; 25% Fe in ore; Uncertainty for LCI results cannot be determined
- Oil, crude, in ground [natural resource, in ground]: 0.18 kg
  Uncertainty for LCI results cannot be determined

## Emissions to nature
- Cyanide [water, surface water]: 5e-7 kg
  Uncertainty for LCI results cannot be determined
- Zinc, ion [water, surface water]: 5e-7 kg
  Uncertainty for LCI results cannot be determined
- Phosphorus [water, surface water]: 8.8e-7 kg
  Uncertainty for LCI results cannot be determined
- Water [water, unspecified]: 0.073897 m3; name water_to_water_unspecified; = water_cooling_UNO_input*(1-fraction_CW_to_air)+water_salt_ocean_input*(1-fraction_PW_to_air)+water_UNO_input*(1-fraction_PW_to_air)+water_well_in_ground_input*(1-fraction_PW_to_air); lognormal variance with pedigree 0.0807, pedigree (2,2,5,1,1)
  Calculated value based on literature values and expert opinion. See comments in the parametres' comment field.
  property fraction, origin: unspecified 0.999914; name fraction_origin_unspecified_Ww
  property fraction, origin: salt water 3.7652e-5; name fraction_origin_salt_water_Ww
  property fraction, origin: fresh water 4.84098e-5; name fraction_origin_fresh_water_Ww
  property dry mass 0 kg; name DM
  property wet mass 1000 kg; name WM
  property carbon content, fossil 0; name C_content_fossil
  property water in wet mass 1000 kg; name WWM
  property carbon content, non-fossil 0; name C_content_non_fossil
- Ethene, chloro- [air, urban air close to ground]: 0.0028 kg
  Uncertainty for LCI results cannot be determined
- Sulfate [air, urban air close to ground]: 4.9e-7 kg
  Uncertainty for LCI results cannot be determined
- Dinitrogen monoxide [air, urban air close to ground]: 5e-7 kg
  Uncertainty for LCI results cannot be determined
- Ethane, 1,2-dichloro- [water, surface water]: 1.5e-5 kg
  Uncertainty for LCI results cannot be determined
- Lead [air, urban air close to ground]: 5e-7 kg
  Uncertainty for LCI results cannot be determined
- Carbon monoxide, fossil [air, urban air close to ground]: 0.0038 kg
  Uncertainty for LCI results cannot be determined
- Particulates, < 2.5 um [air, urban air close to ground]: 0.00105 kg
  Uncertainty for LCI results cannot be determined
- Hydrocarbons, chlorinated [air, urban air close to ground]: 0.0024 kg
  Uncertainty for LCI results cannot be determined
- Ethane, 1,2-dichloro- [air, urban air close to ground]: 0.0055 kg
  Uncertainty for LCI results cannot be determined
- Phenol [water, surface water]: 3e-6 kg
  Uncertainty for LCI results cannot be determined
- Ammonium, ion [water, surface water]: 2e-6 kg
  Uncertainty for LCI results cannot be determined
- Mercury [water, surface water]: 5e-7 kg
  Uncertainty for LCI results cannot be determined
- Nickel, ion [water, surface water]: 5e-7 kg
  Uncertainty for LCI results cannot be determined
- Dissolved solids [water, surface water]: 8.2e-5 kg
  Uncertainty for LCI results cannot be determined
- Chlorate [water, surface water]: 5e-7 kg
  Uncertainty for LCI results cannot be determined
- Hydrocarbons, aromatic [air, urban air close to ground]: 2e-6 kg
  Uncertainty for LCI results cannot be determined
- Sulfur dioxide [air, urban air close to ground]: 0.0094 kg
  Uncertainty for LCI results cannot be determined
- Aldehydes, unspecified [air, urban air close to ground]: 5e-7 kg
  Uncertainty for LCI results cannot be determined
- Particulates, > 10 um [air, urban air close to ground]: 0.00134 kg
  Uncertainty for LCI results cannot be determined
- Copper, ion [water, surface water]: 5e-7 kg
  Uncertainty for LCI results cannot be determined
- Hydrogen fluoride [air, urban air close to ground]: 5e-6 kg
  Uncertainty for LCI results cannot be determined
- Hydrogen [air, urban air close to ground]: 0.00056 kg
  Uncertainty for LCI results cannot be determined
- Fluorine [air, urban air close to ground]: 5e-7 kg
  Uncertainty for LCI results cannot be determined
- Bromate [water, surface water]: 5e-7 kg
  Uncertainty for LCI results cannot be determined
- Nitrate [water, surface water]: 5e-7 kg
  Uncertainty for LCI results cannot be determined
- Hydrogen chloride [air, urban air close to ground]: 0.00011 kg
  Uncertainty for LCI results cannot be determined
- Hydrogen sulfide [air, urban air close to ground]: 5e-7 kg
  Uncertainty for LCI results cannot be determined
- Particulates, > 2.5 um, and < 10um [air, urban air close to ground]: 0.00181 kg
  Uncertainty for LCI results cannot be determined
- Aluminium [water, surface water]: 5e-7 kg
  Uncertainty for LCI results cannot be determined
- Nitrogen oxides [air, urban air close to ground]: 0.0088 kg
  Uncertainty for LCI results cannot be determined
- Potassium, ion [water, surface water]: 5e-7 kg
  Uncertainty for LCI results cannot be determined
- AOX, Adsorbable Organic Halogen as Cl [water, surface water]: 5e-7 kg
  Uncertainty for LCI results cannot be determined
- Chlorine [air, urban air close to ground]: 2e-6 kg
  Uncertainty for LCI results cannot be determined
- DOC, Dissolved Organic Carbon [water, surface water]: 0.00015 kg
  Calculated as equal to TOC.
- Sulfate [water, surface water]: 0.00082 kg
  Uncertainty for LCI results cannot be determined
- Carbonate [water, surface water]: 1.8e-5 kg
  Uncertainty for LCI results cannot be determined
- Sulfide [water, surface water]: 1.6e-5 kg
  Uncertainty for LCI results cannot be determined
- Methane, fossil [air, urban air close to ground]: 0.0074 kg
  Uncertainty for LCI results cannot be determined
- Chlorine [water, surface water]: 3.9e-5 kg
  Uncertainty for LCI results cannot be determined
- Oils, unspecified [water, surface water]: 2.8e-5 kg
  Uncertainty for LCI results cannot be determined
- Sodium, ion [water, surface water]: 0.097 kg
  Uncertainty for LCI results cannot be determined
- COD, Chemical Oxygen Demand [water, surface water]: 0.00048 kg
  Uncertainty for LCI results cannot be determined
- Calcium, ion [water, surface water]: 0.0012 kg
  Uncertainty for LCI results cannot be determined
- Carbon dioxide, fossil [air, urban air close to ground]: 2 kg
  Uncertainty for LCI results cannot be determined
- Acidity, unspecified [water, surface water]: 2.9e-5 kg
  Uncertainty for LCI results cannot be determined
- BOD5, Biological Oxygen Demand [water, surface water]: 4.2e-5 kg
  Uncertainty for LCI results cannot be determined
- TOC, Total Organic Carbon [water, surface water]: 0.00015 kg
  Uncertainty for LCI results cannot be determined
- NMVOC, non-methane volatile organic compounds, unspecified origin [air, urban air close to ground]: 0.00188 kg
  Uncertainty for LCI results cannot be determined
- Methane, dichlorodifluoro-, CFC-12 [air, urban air close to ground]: 0.00015 kg
  Uncertainty for LCI results cannot be determined
- Mercury [air, urban air close to ground]: 5e-7 kg
  Uncertainty for LCI results cannot be determined
- Hydrocarbons, unspecified [water, surface water]: 4.4e-5 kg
  Uncertainty for LCI results cannot be determined
- Chlorinated solvents, unspecified [water, surface water]: 3.4e-5 kg
  Uncertainty for LCI results cannot be determined
- Nitrogen [water, surface water]: 2e-6 kg
  Uncertainty for LCI results cannot be determined
- Ammonia [air, urban air close to ground]: 5e-7 kg
  Uncertainty for LCI results cannot be determined
- Chloride [water, surface water]: 0.16 kg
  Uncertainty for LCI results cannot be determined
- Iron, ion [water, surface water]: 0.00019 kg
  Uncertainty for LCI results cannot be determined
- Magnesium [water, surface water]: 9e-6 kg
  Uncertainty for LCI results cannot be determined
- Suspended solids, unspecified [water, surface water]: 0.0012 kg
  Uncertainty for LCI results cannot be determined
- Fluoride [water, surface water]: 5e-7 kg
  Uncertainty for LCI results cannot be determined
- Water [air, unspecified]: 0.0443068 m3; name water_to_air_unspecified; = (water_cooling_UNO_input*fraction_CW_to_air)+(water_salt_ocean_input*fraction_PW_to_air)+(water_UNO_input*fraction_PW_to_air)+(water_well_in_ground_input*fraction_PW_to_air); lognormal variance with pedigree 0.0807, pedigree (2,2,5,1,1)
  (same comment as for Water)
  property fraction, origin: salt water 1.61936e-5; name fraction_origin_salt_water
  property fraction, origin: fresh water 2.08203e-5; name fraction_origin_fresh_water
  property fraction, origin: unspecified 0.999963; name fraction_origin_unspecified

## Sampling procedure
Data represent a large share of the European production. Due to the cummulated data source for the product system invetory there are important parameters as land use or soil emissions missing in this dataset. Considered are only emissions stated in the original source of Boustead.

## Extrapolations
This dataset has been extrapolated from year 1997 to the year of the calculation (2021). The uncertainty has been adjusted accordingly.

## Review by Roland Hischier 2004-06-07
passed.
