# copper mine operation and beneficiation, sulfide ore

Dataset: EcoSpold 2, unit process
Geography: RoW
Time period: 1994-01-01 to 2021-12-31
Technology level: current
Classification: ISIC rev.4 ecoinvent: 0729:Mining of other non-ferrous metal ores
Synonyms: sulphide ore
Scenario: Business-as-Usual
System model: Allocation, cut-off by classification
Share of production covered: 80 %
Generated by: David Turner
Published in: Turner, D. A. 2019
Database: ecoinvent
isCopyrightProtected: true
accessRestrictedTo: 1

## General comment
"For the mining and beneficiation of copper sulfide ores globally.

Background: Metals are produced as part of a complex, highly interconnected and interdependent system, with many desirable but scarce/critical metals recovered as by-products during the production of one or more ‘host’ metal(s). Copper is one of the world’s major mineral commodities and is mined from heterogeneous sulfide or oxide mineral deposits in countries worldwide. Copper sulfide deposits, such as those of the porphyry or massive sulphide type, contain numerous other valuable minerals, which are desirable to society. Copper is mined & beneficiated to produce a copper sulfide concentrate, as well as other by-product concentrates (e.g. molybdenite), which are sold to smelters. Copper sulfide concentrates are smelted to produce the intermediate product, copper anode. This is then sold to refineries, where it is electrorefined to produce copper cathode, which is sold to fabricators. The by-product of copper electrorefining is anode slime, which contains various important by-product metals (principally gold, silver, selenium & tellurium) and is sold to precious metal recovery plants for further processing to recover the valuable metals.

Modelling approach: This dataset was created using the life cycle inventory process model described by Classen et al. (2009) and used to generate datasets for ecoinvent v2.1. Typical average ore grades are estimated for each region based on data from Northey et al. (2014), while values for several other key input parameters have been updated since the release of the v2.1 dataset. These include (non-exclusively) the production volumes, beneficiation efficiency (i.e. yield), concentrate grades, anode slime composition (a product of the downstream copper electrorefining processing but that has a direct influence on the properties of exchanges in this dataset), and water outputs. Further information on these changes is provided in the Sampling Procedure comment, as well as the accompanying documentation (see Turner & Hischier, 2019).

References:
Classen, M., Althaus, H.-J., Blaser, S., Scharnhost, W., Tuchschmid, M., Jungbluth, N., & Emmenegger, M. F. (2009). Life cycle inventories of metals. Final report, ecoinvent data v2.1, No. 10. Dübendorf, Switzerland.
Northey, S., Mohr, S., Mudd, G. M., Weng, Z., & Giurco, D. (2014). Modelling future copper ore grade decline based on a detailed assessment of copper resources and mining. Resources Conservation and Recycling, 83, 190-201.
Turner, D. A. & Hischier, R. (2019). Regionalised life cycle inventories of primary copper production (pyrometallurgy) and anode slime processing. Empa, St. Gallen, Switzerland."

## Included activities start
Construction of mine site (including mill), including site excavation and facility installation.

## Included activities end
Site closure; termination of mining and beneficiation activities and the deconstruction of the mine site.

## Allocation
No allocation is applied.

## Geography
This dataset is valid for the whole corresponding region. Some agents used, such as lime and sodium cynaide, originate from datasets value for Switzerland or Europe. Processes such as blasting originate from datasets value for Switzerland or Europe. Exchanges amounts calculated based on country-specific average ore grade (as reported in Northey et al. 2014).
References:
Northey, S., Mohr, S., Mudd, G. M., Weng, Z., & Giurco, D. (2014). Modelling future copper ore grade decline based on a detailed assessment of copper resources and mining. Resources Conservation and Recycling, 83, 190-201.

## Technology
Based on typical current technology. Mining is done 70% open pit and 30% underground, followed by joint beneficiation of copper and molybdenite trough flotation, where considerable amounts of agents are added. Overburden is disposed separate to sulfidic tailings near the mining site. No dewatering (or other pre-treatment) of the tailings of is assumed as this is considered a treatment activity that occurs only at selective sites and is therefore modelled separately.

## Time period
Production volumes are representative of the situation in 2015 but are considered valid until the end of 2019. Data sources for the inventory model have not been updated since v2.1 (see Classen et al. 2009), but important model parameters that determine input data to the model have been updated to be consistent with the current situation.
References
Classen, M., Althaus, H.-J., Blaser, S., Scharnhost, W., Tuchschmid, M., Jungbluth, N., & Emmenegger, M. F. (2009). Life cycle inventories of metals. Final report, ecoinvent data v2.1, No. 10. Dübendorf, Switzerland.

## Reference product
- copper concentrate, sulfide ore: 0 kg; By-product classification allocatable product; CPC 14290: Other non-ferrous metal ores and concentrates (other than uranium or thorium ores and concentrates)
  Amount calculated through mass balance of the copper production chain. Source: Turner & Hischier (2019). Regionalised life cycle inventories of primary copper production (pyrometallurgy) and anode slime processing. Empa, St. Gallen, Switzerland.
  production volume 1.78438e10 kg
    Calculated based on:
    a) global copper mine production (kg, Cu content) in 2015, from 'concentrates' only (Brininstool & Flanagan, 2017)
    b) assumed copper recovery rate of 93.0%±4.1% (arithmetic mean of available literature values)
    c) assumed copper concentrate grade (%Cu) of 26.7%±18.0% (Delbeke & Rodriguez, 2014)
    References
    Brininstool, M. & Flanagan, D. M. (2017). 2015 Minerals Yearbook - Copper. Reston, VA, USA: USGS.
    Delbeke, K., & Rodriguez, P. H. (2014). Copper Concentrates - Environmental and Human Health hazard classification. Application to the assessment of substances “Harmful to the Marine Environment” (HME) as set out under the 2012 Annex V MARPOL Convention amendments. Santiago, Chile: European Copper Institute.
  property price 0.8402 EUR2005
    Price calculated as:
    Price = (Cu content * Cu price) + (Au content * Au price) + (Ag content * Ag price) + (Te content * Te price) + (Se content * Se price) Treatment costs [TC] Refining costs [RC] Delivery costs Penalties.
    Equation source: Devlin (2015)
    Price data were taken from USGS (2020) and represent 5-year market averages (2015-2019). TC and RC data were taken from Díaz-Borrego et al. (2019) and represent 3-year market averages (2015-2017). Metal content values were taken from the literature (see Turner & Hischier 2019). Penalties and Delivery costs were assumed to be zero. Prices converted to EUR2005 (USD2019/EUR2005 exchange rate: 0.62; Official Data Foundation [2020] and Macrotrends [2020]).
    References:
    Devlin, D. (2015). Mineral product pricing study [Online]. Available from: https://www.imf.org/external/spanish/np/seminars/2015/andean/pdf/sesion5-devlin-en.pdf [Accessed 28/07/2020]
    Díaz-Borrego et al. (2019; https://doi.org/10.1155/2019/8523748)
    Turner, D. & Hischier, R. (2019). Life cycle inventories of copper production (pyrometallurgy) and anode slime processing. Empa: St Gallen, Switzerland.
    Official Data Foundation (2020). Inflation Calculator [Online]. Available from: https://www.officialdata.org/us/inflation/2005?endYear=2019&amount=1 [Accessed 28/07/2020]
    USGS (2020). Mineral Commodity Summaries 2020 [Online]. Available from: https://pubs.usgs.gov/periodicals/mcs2020/mcs2020.pdf [Accessed 28/07/2020]
    Macrotrends (2020). Euro Dollar Exchange Rate (EUR USD) - Historical Chart [Online]. Available from: https://www.macrotrends.net/2548/euro-dollar-exchange-rate-historical-chart [Accessed 28/07/2020]
  property carbon content 0
    carbon content on a dry matter basis (reserved; not for manual entry)
  property true value 0.8402
    allocation property applied in "true value" allocation // value calculated from revenue
  properties: rhenium content 2.07756e-7, copper content 0.296333, selenium content 0.000111833, carbon content, fossil 0, gold content 2.41881e-6, zinc content 0, silver content 8.71677e-5, dry mass 0.9 kg, carbon content, non-fossil 0, water in wet mass 0.1 kg, tellurium content 7.52457e-6, wet mass 1 kg, water content 0.111111, molybdenum content 0.00121126, carbon allocation 0 kg
- molybdenite: 1 kg; By-product classification allocatable product; CPC 4160: Other non-ferrous metals and articles thereof (including waste and scrap of some metals); cermets and articles […]; CAS 1317-33-5; pedigree (1,1,1,1,1)
  (same comment as for copper concentrate, sulfide ore)
  production volume 9.8991e7 kg
    Calculated based on:
    a) global molybdenum mine production (kg, Mo content) in 2015 (Polyak, 2018)
    b) assumed molybdenum recovery rate of 79.0%±6.8% (Lin et al., 2017)
    c) assumed molybdenum concentrate grade (%Mo) of 48.0%±9.3% (Johansson, 2004)
    References
    Johansson, K. (2004). A fork in the road: molybdenum concentrate leaching at Teck Highland Calley Copper Partnership. MBA Thesis. Burnaby, BC, Canada: Simon Fraser University.
    Lin, Q.-Q., Gu, G.-H., Wang, H., Liu, Y.-C., Wang, C.-Q., Fu, J.-G., Zhao, J.-Y. & Huang, L.-L. (2017). Recovery of molybdenum and copper from porphyry ore via iso-flotability flotation. Transactions of Nonferrous Metals Society of China, 27, 2260-2271.
    Polyak, D. E. (2018). 2015 Minerals Yearbook - Molybdenum. Reston, VA, USA: USGS.
  property price 5.84156 EUR2005
    Price calculated as:
    Price = (Mo content * Mo price) + (Re content * Re price) Treatment costs [TC] Refining costs [RC] Delivery costs Penalties.
    Equation source: Devlin (2015)
    Price data were taken from USGS (2020) and represent 5-year market averages (2015-2019). TC and RC data were taken from Díaz-Borrego et al. (2019) and represent 3-year market averages (2015-2017) for copper, which was used as a proxy here. Metal content values were taken from the literature (see Turner & Hischier 2019). Penalties and Delivery costs were assumed to be zero. Prices converted to EUR2005 (USD2019/EUR2005 exchange rate: 0.62; Official Data Foundation [2020] and Macrotrends [2020]).
    References:
    Devlin, D. (2015). Mineral product pricing study [Online]. Available from: https://www.imf.org/external/spanish/np/seminars/2015/andean/pdf/sesion5-devlin-en.pdf [Accessed 28/07/2020]
    Díaz-Borrego et al. (2019; https://doi.org/10.1155/2019/8523748)
    Turner, D. & Hischier, R. (2019). Life cycle inventories of copper production (pyrometallurgy) and anode slime processing. Empa: St Gallen, Switzerland.
    Official Data Foundation (2020). Inflation Calculator [Online]. Available from: https://www.officialdata.org/us/inflation/2005?endYear=2019&amount=1 [Accessed 28/07/2020]
    USGS (2020). Mineral Commodity Summaries 2020 [Online]. Available from: https://pubs.usgs.gov/periodicals/mcs2020/mcs2020.pdf [Accessed 28/07/2020]
    Macrotrends (2020). Euro Dollar Exchange Rate (EUR USD) - Historical Chart [Online]. Available from: https://www.macrotrends.net/2548/euro-dollar-exchange-rate-historical-chart [Accessed 28/07/2020]
  property carbon content 0
    carbon content on a dry matter basis (reserved; not for manual entry)
  property true value 0.0616515
    allocation property applied in "true value" allocation // value calculated from revenue
  properties: wet mass 1 kg, molybdenum content 0.533333, silver content 0, carbon content, fossil 0, carbon content, non-fossil 0, water in wet mass 0.1 kg, rhenium content 9.14815e-5, selenium content 0, dry mass 0.9 kg, tellurium content 0, gold content 0, copper content 0.0388889, water content 0.111111, carbon allocation 0 kg

## Inputs from technosphere
- chemical, inorganic: 0.219818 kg; lognormal variance with pedigree 0.0426, pedigree (1,1,5,5,1)
  Original amount reported in Classen et al. (2009) regionalised based on geography-specific ore grade (see Sampling Procedure and Turner & Hischier, 2019 for details).
  References:
  Classen, M., Althaus, H.-J., Blaser, S., Scharnhost, W., Tuchschmid, M., Jungbluth, N., & Emmenegger, M. F. (2009). Life cycle inventories of metals. Final report, ecoinvent data v2.1, No. 10. Dübendorf, Switzerland.
  Turner, D. A. & Hischier, R. (2019). Regionalised life cycle inventories of primary copper production (pyrometallurgy) and anode slime processing. Empa, St. Gallen, Switzerland.
  properties: dry mass 1 kg, carbon content, fossil 0.003, wet mass 1 kg
  note on carbon content, fossil: This dataset is an unweighted average of 20 inorganic substances (listed in Tab 88.1, ecoinvent v2.2 report 8, part II), being part of the top100 chemicals included in this database. The C-content has also been calculated as an unweighted average of the C content of the substances composing this dataset.
- conveyor belt: 2.36162e-5 m; lognormal variance with pedigree 0.398, pedigree (5,5,5,5,3)
  (same comment as for chemical, inorganic)
- lime, packed: 0.370904 kg; lognormal variance with pedigree 0.0512, pedigree (4,3,5,5,1)
  (same comment as for chemical, inorganic)
  properties: wet mass 1 kg, dry mass 0.998 kg, water content 0.00200401, carbon content, fossil 0.117492
- dithiocarbamate-compound: 1.17997e-6 kg; lognormal variance with pedigree 0.0432, pedigree (1,3,5,5,1)
  (same comment as for chemical, inorganic)
  properties: carbon content, fossil 0.179339, wet mass 1 kg, dry mass 1 kg
- sulfidic tailings, from copper mine operation: 0 kg; pedigree (1,1,1,1,1)
  (same comment as for copper concentrate, sulfide ore)
  production volume 0 kg
    Calculated based on:
    a) global copper mine production (kg, Cu content) in 2015, from 'concentrates' only (Brininstool & Flanagan, 2017)
    b) average national copper ore grade (%Cu) of 0.62%±21.0% (Northey et al., 2014)
    c) assumed copper concentrate grade (%Cu) of 26.7%±18.0% (Delbeke & Rodriguez, 2014)
    d) global molybdenum mine production (kg, Mo content) in 2015 (Polyak, 2018)
    e) assumed molybdenum concentrate grade (%Mo) of 48.0%±9.3% (Johansson, 2004)
    References
    Brininstool, M. & Flanagan, D. M. (2017). 2015 Minerals Yearbook - Copper. Reston, VA, USA: USGS.
    Delbeke, K., & Rodriguez, P. H. (2014). Copper Concentrates - Environmental and Human Health hazard classification. Application to the assessment of substances “Harmful to the Marine Environment” (HME) as set out under the 2012 Annex V MARPOL Convention amendments. Santiago, Chile: European Copper Institute.
    Johansson, K. (2004). A fork in the road: molybdenum concentrate leaching at Teck Highland Calley Copper Partnership. MBA Thesis. Burnaby, BC, Canada: Simon Fraser University.
    Northey, S., Mohr, S., Mudd, G. M., Weng, Z., & Giurco, D. (2014). Modelling future copper ore grade decline based on a detailed assessment of copper resources and mining. Resources Conservation and Recycling, 83, 190-201.
    Polyak, D. E. (2018). 2015 Minerals Yearbook - Molybdenum. Reston, VA, USA: USGS.
  properties: silver content 6.2168e-7, tellurium content 1.92972e-6, gold content 1.72509e-8, wet mass 1 kg, rhenium content 1.3939e-9, water content 0.428571, molybdenum content 8.13035e-6, dry mass 0.7 kg, selenium content 2.87133e-5, copper content 0.000590237
- diesel, burned in building machine: 0.0186891 MJ; lognormal variance with pedigree 0.0452, pedigree (3,3,5,5,1)
  (same comment as for chemical, inorganic)
  properties: heating value, net 1 MJ
- diesel: 0 kg; pedigree (1,1,1,1,1)
  (same comment as for chemical, inorganic)
  properties: wet mass 1 kg, carbon content, fossil 0.865, dry mass 1 kg, heating value, net 42.8 MJ
  note on carbon content, fossil: C-content of diesel is 86.5% (ecoinvent v2.2 report 6_IV, Tab 3.14)
- synthetic rubber: 1.76029e-6 kg; lognormal variance with pedigree 0.0432, pedigree (1,3,5,5,1)
  (same comment as for chemical, inorganic)
  properties: heating value, net 26.42 MJ, wet mass 1 kg, carbon content, fossil 0.871949, dry mass 1 kg
  note on carbon content, fossil: EPDM (Ethylene-propene-diene terpolymer) rubber is a terpolymer of ethylene, propene, and a diene with the residual unsaturated portion of the diene in the side chain (ecoinvent v2.2 report 7-part XX & Ullmann). Chemical formula (deduced from Evidences of Solvent-Induced Miscibility in Polychloroprene-co-Ethylene-Propene Diene Terpolymer Blends, Dubey et al., Journal of Applied Polymer Science, 2009, 111:1884–1891): C20H35
- steel, chromium steel 18/8, hot rolled: 0.225791 kg; lognormal variance with pedigree 0.0426, pedigree (1,1,5,5,1)
  (same comment as for chemical, inorganic)
  properties: wet mass 1 kg, carbon content, fossil 0.0008, dry mass 1 kg
  note on carbon content, fossil: Stainless steel model is the grade 304 steel (18/8 stainless, 18% chromium 8% nickel; max. 0.08% C)
- aluminium hydroxide factory: 2.62233e-9 unit; lognormal variance with pedigree 0.3521, pedigree (3,2,5,5,3)
  (same comment as for chemical, inorganic)
- electricity, medium voltage: 0 kWh; pedigree (1,1,1,1,1)
  (same comment as for chemical, inorganic)
- sodium cyanide: 0.0100218 kg; lognormal variance with pedigree 0.0452, pedigree (3,3,5,5,1)
  (same comment as for chemical, inorganic)
  properties: wet mass 1 kg, dry mass 1 kg, carbon content, fossil 0.244898, heating value, net 7.43 MJ
- electricity, high voltage: 0 kWh; pedigree (1,1,1,1,1)
  (same comment as for chemical, inorganic)
- iron pellet: 1.08609e-5 kg; lognormal variance with pedigree 0.0452, pedigree (3,3,5,5,1)
  (same comment as for chemical, inorganic)
  properties: wet mass 1 kg, dry mass 1 kg
- mine infrastructure, open cast, non-ferrous metal: 2.94515e-9 unit; lognormal variance with pedigree 0.398, pedigree (5,5,5,5,3)
  (same comment as for chemical, inorganic)
- copper sulfate: 2.64274e-6 kg; lognormal variance with pedigree 0.0452, pedigree (3,3,5,5,1)
  (same comment as for chemical, inorganic)
  properties: wet mass 1 kg, dry mass 1 kg
- blasting: 0.285808 kg; lognormal variance with pedigree 0.0433, pedigree (2,2,5,5,1)
  (same comment as for chemical, inorganic)
- chemical, organic: 0.0705131 kg; lognormal variance with pedigree 0.0426, pedigree (1,1,5,5,1)
  (same comment as for chemical, inorganic)
  properties: dry mass 1 kg, carbon content, fossil 0.628, wet mass 1 kg, heating value, net 19.03 MJ
  note on carbon content, fossil: This dataset is an unweighted average of 20 organic substances (listed in Tab 88.1, ecoinvent v2.2 report 8, part II), being part of the top100 chemicals included in this database. The C-content has also been calculated as an unweighted average of the C content of the substances composing this dataset.
- aluminium sulfate, powder: 7.08277e-7 kg; lognormal variance with pedigree 0.0452, pedigree (3,3,5,5,1)
  (same comment as for chemical, inorganic)
  properties: wet mass 1 kg, dry mass 1 kg
- potassium carbonate: 1.2591e-8 kg; lognormal variance with pedigree 0.0512, pedigree (4,3,5,5,1)
  (same comment as for chemical, inorganic)
  properties: heating value, net 2.63 MJ, dry mass 1 kg, carbon content, fossil 0.0869565, wet mass 1 kg
- carbon disulfide: 5.94426e-7 kg; lognormal variance with pedigree 0.0907, pedigree (4,2,5,5,4)
  (same comment as for chemical, inorganic)
  properties: wet mass 1 kg, dry mass 1 kg, heating value, net 32.72 MJ, carbon content, fossil 0.157895
- mine infrastructure, underground, non-ferrous metal: 1.28488e-9 unit; lognormal variance with pedigree 0.398, pedigree (5,5,5,5,3)
  (same comment as for chemical, inorganic)
- non-sulfidic tailing, off-site: -535.999 kg; normal variance with pedigree 294.521, pedigree (4,4,1,1,1)
  Original amount reported in Classen et al. (2009) regionalised based on geography-specific ore grade (see Sampling Procedure and Turner & Hischier, 2019 for details).
  References:
  Classen, M., Althaus, H.-J., Blaser, S., Scharnhost, W., Tuchschmid, M., Jungbluth, N., & Emmenegger, M. F. (2009). Life cycle inventories of metals. Final report, ecoinvent data v2.1, No. 10. Dübendorf, Switzerland.
  Turner & Hischier (2019). Regionalised life cycle inventories of primary copper production (pyrometallurgy) and anode slime processing. Empa, St. Gallen, Switzerland.
  production volume 1.33954e12 kg
    Assuming 1.73 kg overburden per kg ore extracted (Classen et al. 2009).
    References
    Classen, M., Althaus, H.-J., Blaser, S., Scharnhost, W., Tuchschmid, M., Jungbluth, N., & Emmenegger, M. F. (2009). Life cycle inventories of metals. Final report, ecoinvent data v2.1, No. 10. Dübendorf, Switzerland.
  properties: wet mass 1 kg, water content 0.428571, dry mass 0.7 kg
- sulfidic tailings, from copper mine operation: -101.157, -190.765 kg (2 entries); normal variance with pedigree 160.41, pedigree (4,4,1,1,1)
  (same comment as for copper concentrate, sulfide ore)
  production volume 6.57445e11 kg
- diesel: 3.84859e-7, 1.85018e-8, 7.76734e-7, 5.4407e-8, 7.86389e-8 kg (5 entries); lognormal variance with pedigree 0.0512, pedigree (4,3,5,5,1)
  (same comment as for chemical, inorganic)
- electricity, medium voltage: 0.00622139, 0.00202171, 0.00371499, 0.0441659, 0.00688573, 0.0209748, 0.00593942, 0.000466844, 0.00120513, 0.00299045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 kWh (90 entries); lognormal variance with pedigree 0.0438, pedigree (2,3,5,5,1)
  (same comment as for chemical, inorganic)
- electricity, high voltage: 0.00991225, 0.00323825, 0.00596058, 0.0711962, 0.0110238, 0.0336051, 0.00942496, 0.000746919, 0.00193347, 0.00480078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 kWh (90 entries); lognormal variance with pedigree 0.0438, pedigree (2,3,5,5,1)
  (same comment as for chemical, inorganic)

## Inputs from nature
- Water, well, in ground [natural resource, in water]: 3.00444e-6 m3; lognormal variance with pedigree 0.0054, pedigree (3,3,2,5,1)
  (same comment as for chemical, inorganic)
- Copper, in ground [natural resource, in ground]: 1.8505 kg; lognormal variance with pedigree 0.0026, pedigree (3,1,1,1,1)
  Amount calculated through mass balance of the copper production chain. Source: Turner, D. A. & Hischier, R. (2019). Regionalised life cycle inventories of primary copper production (pyrometallurgy) and anode slime processing. Empa, St. Gallen, Switzerland.
- Gold, in ground [natural resource, in ground]: 1.76257e-5 kg; lognormal variance with pedigree 0.0026, pedigree (3,1,1,1,1)
  (same comment as for Copper, in ground)
- Transformation, to mineral extraction site [natural resource, land]: 0.000542257 m2; lognormal variance with pedigree 0.1646, pedigree (2,4,5,5,1)
  (same comment as for chemical, inorganic)
- Silver, in ground [natural resource, in ground]: 0.000635301 kg; lognormal variance with pedigree 0.0026, pedigree (3,1,1,1,1)
  (same comment as for Copper, in ground)
- Gangue, in ground [natural resource, in ground]: 582.892 kg; lognormal variance with pedigree 0.0026, pedigree (3,1,1,1,1)
  Amount calculated based on dry mass balance, where missing mass was assumed to be rock and gangue materials
- Rhenium, in ground [natural resource, in ground]: 7.12435e-6 kg; lognormal variance with pedigree 0.0026, pedigree (3,1,1,1,1)
  (same comment as for Copper, in ground)
- Transformation, from unspecified [natural resource, land]: 0.000542257 m2; lognormal variance with pedigree 0.1646, pedigree (2,4,5,5,1)
  (same comment as for chemical, inorganic)
- Selenium, in ground [natural resource, in ground]: 0.00651936 kg; lognormal variance with pedigree 0.0026, pedigree (3,1,1,1,1)
  (same comment as for Copper, in ground)
- Water, river [natural resource, in water]: 0.304521 m3; lognormal variance with pedigree 0.0054, pedigree (3,3,2,5,1)
  Amount calculated based on wet mass balance, where missing mass was assumed to be water
- Molybdenum, in ground [natural resource, in ground]: 0.0415358 kg; lognormal variance with pedigree 0.0026, pedigree (3,1,1,1,1)
  (same comment as for Copper, in ground)
- Occupation, mineral extraction site [natural resource, land]: 0.0163099 m2*year; lognormal variance with pedigree 0.0832, pedigree (2,3,5,5,1)
  (same comment as for Copper, in ground)
- Tellurium, in ground [natural resource, in ground]: 0.00043808 kg; lognormal variance with pedigree 0.0026, pedigree (3,1,1,1,1)
  (same comment as for Copper, in ground)

## Emissions to nature
- Beryllium [air, non-urban air or from high stacks]: 3.70804e-7 kg; lognormal variance with pedigree 0.7021, pedigree (3,2,5,5,3)
  (same comment as for non-sulfidic tailing, off-site)
- Cobalt [air, non-urban air or from high stacks]: 2.85072e-6 kg; lognormal variance with pedigree 0.0527, pedigree (3,2,5,5,3)
  (same comment as for non-sulfidic tailing, off-site)
- Mercury [air, non-urban air or from high stacks]: 7.12681e-9 kg; lognormal variance with pedigree 0.0527, pedigree (3,2,5,5,3)
  (same comment as for non-sulfidic tailing, off-site)
- Fluorine [air, non-urban air or from high stacks]: 0.000135409 kg; lognormal variance with pedigree 0.0527, pedigree (3,2,5,5,3)
  (same comment as for non-sulfidic tailing, off-site)
- Selenium [air, non-urban air or from high stacks]: 7.12681e-9 kg; lognormal variance with pedigree 0.0527, pedigree (3,2,5,5,3)
  (same comment as for non-sulfidic tailing, off-site)
- Water [water, surface water]: 1.75373e-6 m3; lognormal variance with pedigree 0.0921, pedigree (3,2,5,5,3)
  (same comment as for non-sulfidic tailing, off-site)
- Iron, ion [water, surface water]: 1.61198e-5 kg; lognormal variance with pedigree 0.7007, pedigree (2,2,5,5,3)
  (same comment as for non-sulfidic tailing, off-site)
- DOC, Dissolved Organic Carbon [water, surface water]: 0.0002261 kg; lognormal variance with pedigree 0.0907, pedigree (2,2,5,5,3)
  (same comment as for non-sulfidic tailing, off-site)
- Cadmium, ion [water, surface water]: 1.75151e-8 kg; lognormal variance with pedigree 0.7007, pedigree (2,2,5,5,3)
  (same comment as for non-sulfidic tailing, off-site)
- Sulfate [water, surface water]: 0.130721 kg; lognormal variance with pedigree 0.0907, pedigree (2,2,5,5,3)
  (same comment as for non-sulfidic tailing, off-site)
- Aluminium [water, surface water]: 4.78672e-6 kg; lognormal variance with pedigree 0.7007, pedigree (2,2,5,5,3)
  (same comment as for non-sulfidic tailing, off-site)
- Lead [water, surface water]: 1.55203e-7 kg; lognormal variance with pedigree 0.7021, pedigree (3,2,5,5,3)
  (same comment as for non-sulfidic tailing, off-site)
- Zinc [air, non-urban air or from high stacks]: 2.70819e-5 kg; lognormal variance with pedigree 0.0527, pedigree (3,2,5,5,3)
  (same comment as for non-sulfidic tailing, off-site)
- Cyanide [water, surface water]: 0.000189458 kg; lognormal variance with pedigree 0.0981, pedigree (4,2,5,5,3)
  (same comment as for non-sulfidic tailing, off-site)
- Barium [air, non-urban air or from high stacks]: 5.91061e-11 kg; lognormal variance with pedigree 0.7021, pedigree (3,2,5,5,3)
  (same comment as for non-sulfidic tailing, off-site)
- Mercury [water, surface water]: 2.08784e-9 kg; lognormal variance with pedigree 0.7021, pedigree (3,2,5,5,3)
  (same comment as for non-sulfidic tailing, off-site)
- COD, Chemical Oxygen Demand [water, surface water]: 0.000577951 kg; lognormal variance with pedigree 0.0907, pedigree (2,2,5,5,3)
  (same comment as for non-sulfidic tailing, off-site)
- Particulates, > 2.5 um, and < 10um [air, non-urban air or from high stacks]: 0.0630514 kg; lognormal variance with pedigree 0.2041, pedigree (3,2,5,5,4)
  (same comment as for non-sulfidic tailing, off-site)
- Carbon disulfide [air, non-urban air or from high stacks]: 0.0309861 kg; lognormal variance with pedigree 0.0907, pedigree (4,2,5,5,4)
  (same comment as for non-sulfidic tailing, off-site)
- Nitrogen, organic bound [water, surface water]: 0.00126143 kg; lognormal variance with pedigree 0.0907, pedigree (2,2,5,5,3)
  (same comment as for non-sulfidic tailing, off-site)
- Lead [air, non-urban air or from high stacks]: 1.99551e-6 kg; lognormal variance with pedigree 0.0527, pedigree (3,2,5,5,3)
  (same comment as for non-sulfidic tailing, off-site)
- Antimony [air, non-urban air or from high stacks]: 2.85072e-8 kg; lognormal variance with pedigree 0.7021, pedigree (3,2,5,5,3)
  (same comment as for non-sulfidic tailing, off-site)
- Nitrogen oxides [air, non-urban air or from high stacks]: 1.69972e-7 kg; lognormal variance with pedigree 0.0921, pedigree (3,2,5,5,3)
  (same comment as for non-sulfidic tailing, off-site)
- Carbon dioxide, fossil [air, non-urban air or from high stacks]: 0.176879 kg; lognormal variance with pedigree 0.2032, pedigree (5,3,5,5,5)
  (same comment as for non-sulfidic tailing, off-site)
- Nickel [air, non-urban air or from high stacks]: 1.14029e-5 kg; lognormal variance with pedigree 0.0527, pedigree (3,2,5,5,3)
  (same comment as for non-sulfidic tailing, off-site)
- TOC, Total Organic Carbon [water, surface water]: 0.000226092 kg; lognormal variance with pedigree 0.0907, pedigree (2,2,5,5,3)
  (same comment as for non-sulfidic tailing, off-site)
- Boron [air, non-urban air or from high stacks]: 1.42536e-6 kg; lognormal variance with pedigree 0.0527, pedigree (3,2,5,5,3)
  (same comment as for non-sulfidic tailing, off-site)
- Dissolved solids [water, surface water]: 0.000286621 kg; lognormal variance with pedigree 0.0907, pedigree (2,2,5,5,3)
  (same comment as for non-sulfidic tailing, off-site)
- Nickel, ion [water, surface water]: 1.34911e-6 kg; lognormal variance with pedigree 0.7007, pedigree (2,2,5,5,3)
  (same comment as for non-sulfidic tailing, off-site)
- Manganese [air, non-urban air or from high stacks]: 0.000135409 kg; lognormal variance with pedigree 0.0527, pedigree (3,2,5,5,3)
  (same comment as for non-sulfidic tailing, off-site)
- Particulates, > 10 um [air, non-urban air or from high stacks]: 0.0724784 kg; lognormal variance with pedigree 0.1241, pedigree (3,2,5,5,4)
  (same comment as for non-sulfidic tailing, off-site)
- Manganese [water, surface water]: 1.36786e-6 kg; lognormal variance with pedigree 0.7021, pedigree (3,2,5,5,3)
  (same comment as for non-sulfidic tailing, off-site)
- Cadmium [air, non-urban air or from high stacks]: 1.5679e-8 kg; lognormal variance with pedigree 0.0527, pedigree (3,2,5,5,3)
  (same comment as for non-sulfidic tailing, off-site)
- Calcium, ion [water, surface water]: 0.0380503 kg; lognormal variance with pedigree 0.7007, pedigree (2,2,5,5,3)
  (same comment as for non-sulfidic tailing, off-site)
- Particulates, < 2.5 um [air, non-urban air or from high stacks]: 0.0070063 kg; lognormal variance with pedigree 0.3841, pedigree (3,2,5,5,4)
  (same comment as for non-sulfidic tailing, off-site)
- Molybdenum [air, non-urban air or from high stacks]: 4.54179e-14 kg; lognormal variance with pedigree 0.0527, pedigree (3,2,5,5,3)
  (same comment as for non-sulfidic tailing, off-site)
- Cyanide [air, non-urban air or from high stacks]: 1.79422e-15 kg; lognormal variance with pedigree 0.0981, pedigree (4,2,5,5,3)
  (same comment as for non-sulfidic tailing, off-site)
- Copper, ion [water, surface water]: 4.39103e-7 kg; lognormal variance with pedigree 0.7007, pedigree (2,2,5,5,3)
  (same comment as for non-sulfidic tailing, off-site)
- Chromium [air, non-urban air or from high stacks]: 1.42536e-5 kg; lognormal variance with pedigree 0.0527, pedigree (3,2,5,5,3)
  (same comment as for non-sulfidic tailing, off-site)
- Arsenic [air, non-urban air or from high stacks]: 2.13804e-7 kg; lognormal variance with pedigree 0.7021, pedigree (3,2,5,5,3)
  (same comment as for non-sulfidic tailing, off-site)
- Water [water, unspecified]: 0.0277441 m3; lognormal variance with pedigree 0.0921, pedigree (3,2,5,5,3)
  (same comment as for non-sulfidic tailing, off-site)
- Copper [air, non-urban air or from high stacks]: 7.12681e-6 kg; lognormal variance with pedigree 0.0527, pedigree (3,2,5,5,3)
  (same comment as for non-sulfidic tailing, off-site)
- BOD5, Biological Oxygen Demand [water, surface water]: 0.000577958 kg; lognormal variance with pedigree 0.0907, pedigree (2,2,5,5,3)
  (same comment as for non-sulfidic tailing, off-site)
- Arsenic, ion [water, surface water]: 1.63669e-7 kg; lognormal variance with pedigree 0.7007, pedigree (2,2,5,5,3)
  (same comment as for non-sulfidic tailing, off-site)
- Water [air, non-urban air or from high stacks]: 0.0277444 m3; lognormal variance with pedigree 0.0921, pedigree (3,2,5,5,3)
  (same comment as for non-sulfidic tailing, off-site)
- Chromium, ion [water, surface water]: 3.03218e-8 kg; lognormal variance with pedigree 0.7007, pedigree (2,2,5,5,3)
  (same comment as for non-sulfidic tailing, off-site)
- Zinc, ion [water, surface water]: 4.20753e-6 kg; lognormal variance with pedigree 0.7007, pedigree (2,2,5,5,3)
  (same comment as for non-sulfidic tailing, off-site)
- Cobalt [water, surface water]: 4.33247e-8 kg; lognormal variance with pedigree 0.7021, pedigree (3,2,5,5,3)
  (same comment as for non-sulfidic tailing, off-site)

## Sampling procedure
All exchanges to the environment and from the technosphere calculated using the life cycle inventory model presented in Classen et al. (2009) for 'copper, molybdenum & telluride and silver containing byproducts' (ecoinvent v.2.1). All exchange values are calculated as a function of the mass of ore processed, which is itself a function of ore grade. To increase the temporal and geographical representativeness of the inventory, ore grades have been updated here (since v2.1). The average global copper ore grade was estimated to be 0.62% by Northey et al. (2014), based on an extensive literature review and regression modelling (for more information, see published article).

The amounts and composition (exchange properties) of 'copper concentrate, sulfide ore', 'molybdenute concentrate' and 'treatment of sulfidic tailings, from copper mine operation, tailings impoundment' were estimated based on a global material flow analysis of copper production. Key input data to the model include: production volumes of each metal, taken from the USGS Minerals Yearbook 2015; concentration yields (i.e. transfer coefficients for each element from Earth's crust to each product via mining and beneficiation), taken as the arithmetic mean of values reported in the literature; anode slime composition, from which the amounts of silver, gold, tellerium and selenium that are extracted from the Earth's crust during this activity are estimated, taken as the arithmetic mean of values reported in the literature; 'copper concentrate,sulfide ore' grade (26.7% Cu), taken from Delbeke & Rodriguez (2014); 'molybdenite concentrate' composition, taken as the arithmetic mean of values reported in the literature (48% Mo; 3.5% Cu). For more information, please refer to the accompanying documentation.

References
Classen, M., Althaus, H.-J., Blaser, S., Scharnhost, W., Tuchschmid, M., Jungbluth, N., & Emmenegger, M. F. (2009). Life cycle inventories of metals. Final report, ecoinvent data v2.1, No. 10. Dübendorf, Switzerland.
Delbeke, K., & Rodriguez, P. H. (2014). Copper Concentrates - Environmental and Human Health hazard classification. Application to the assessment of substances “Harmful to the Marine Environment” (HME) as set out under the 2012 Annex V MARPOL Convention amendments. Santiago, Chile.
Northey, S., Mohr, S., Mudd, G. M., Weng, Z., & Giurco, D. (2014). Modelling future copper ore grade decline based on a detailed assessment of copper resources and mining. Resources Conservation and Recycling, 83, 190-201.

## Extrapolations
see Geography and Technology comments.
