# concrete mixing factory construction

Dataset: EcoSpold 2, unit process
Geography: CH
Time period: 1997-01-01 to 2021-12-31
Technology level: current
Classification: EcoSpold01Categories: construction materials/others
Classification: ISIC rev.4 ecoinvent: 4290:Construction of other civil engineering projects
Tags: ConvertedDataset
Scenario: Business-as-Usual
System model: Allocation, cut-off by classification
Generated by: Daniel Kellenberger (obsolete)
Published in: Kellenberger D. 2007
Database: ecoinvent
isCopyrightProtected: true
accessRestrictedTo: 1

## General comment
The lifespan of the insfrastructure and the land occupation is assumed to be 50 years. The average yearly production is about 100'000 t/a
[This dataset was already contained in the ecoinvent database version 2. It was not individually updated during the transfer to ecoinvent version 3. Life Cycle Impact Assessment results may still have changed, as they are affected by changes in the supply chain, i.e. in other datasets. This dataset was generated following the ecoinvent quality guidelines for version 2. It may have been subject to central changes described in the ecoinvent version 3 change report (http://www.ecoinvent.org/database/ecoinvent-version-3/reports-of-changes/), and the results of the central updates were reviewed extensively. The changes added e.g. consistent water flows and other information throughout the database. The documentation of this dataset can be found in the ecoinvent reports of version 2, which are still available via the ecoinvent website. The change report linked above covers all central changes that were made during the conversion process.]

## Included activities end
includes the area of the infrastructure (buildings, roads, etc.) and the machines used for the ready-mixed concrete production

## Geography
For some exchanges RER-modules have been used as proxy

## Technology
The data of the infrastructure corresponds tohigh level of technology

## Reference product
- concrete mixing factory: 1 unit; CPC 53269: Other constructions for manufacturing; By-product classification allocatable product
  production volume 0.0336675 unit
    This is a placeholder value that does not reflect real-world production volumes. This dataset does not currently require a real-world production volume to work in the database framework, and no actual data were collected yet. This has no negative effect on the results of the ecoinvent database. The placeholder value of this activity was scaled according to the nominal GDP of 2005 (source: United Nations, http://data.un.org/Glossary.aspx?q=GDP+%28current+US%24%29, accessed 20130726) to reflect an appropriate share of the global production volume, which is also a placeholder value.
  property price 1.25016e6 EUR2005
    Calculated based on inputs: The price of the product has been calculated as a sum of the values of the material and energy inputs for this product. This value is therefore a rough estimation. It may underestimate the real price since there are additional expenses when producing any product. These expences can include for example labour costs, treatment of waste materials and profit for the producer. Please consider carefully whether this level of data quality is acceptable for your application.

## Inputs from technosphere
- building, multi-storey: 7190 m3; lognormal variance with pedigree 0.370025, pedigree (3,5,5,2,1)
  activityLink introduced to establish a direct link to the corresponding regional supply of this product
- building, hall, steel construction: 1400 m2; lognormal variance with pedigree 0.37, pedigree (3,5,5,1,1)
  This exchange has an activity link directly to the producing activity because the product is primarily consumed in the same geographical area where it is produced.
- industrial machine, heavy, unspecified: 160000 kg; lognormal variance with pedigree 0.370025, pedigree (3,5,5,2,1)
  (same comment as for building, multi-storey)
- conveyor belt: 750 m; lognormal variance with pedigree 0.370025, pedigree (3,5,5,2,1)
  (same comment as for building, multi-storey)

## Inputs from nature
- Occupation, industrial area [natural resource, land]: 217900 m2*year; lognormal variance with pedigree 0.1012, pedigree (2,3,5,1,1)
- Occupation, traffic area, road network [natural resource, land]: 150000 m2*year; lognormal variance with pedigree 0.1012, pedigree (2,3,5,1,1)
- Transformation, to industrial area [natural resource, land]: 4370 m2; lognormal variance with pedigree 0.1812, pedigree (2,3,5,1,1)
- Transformation, to traffic area, road network [natural resource, land]: 3010 m2; lognormal variance with pedigree 0.1812, pedigree (2,3,5,1,1)
- Transformation, from unspecified [natural resource, land]: 7370 m2; lognormal variance with pedigree 0.1812, pedigree (2,3,5,1,1)

## Sampling procedure
Measured data of 6 Swiss plants

## Extrapolations
This dataset has been extrapolated from year 2001 to the year of the calculation (2021). The uncertainty has been adjusted accordingly.

## Review by Roberto Dones 2003-07-04
Passed
