# molybdenum trioxide production

Dataset: EcoSpold 2, unit process
Geography: GLO
Time period: 2008-01-01 to 2021-12-31
Technology level: current
Classification: EcoSpold01Categories: metals/processing
Classification: ISIC rev.4 ecoinvent: 2420:Manufacture of basic precious and other non-ferrous metals
Synonyms: MoO3
Scenario: Business-as-Usual
System model: Allocation, cut-off by classification
Share of production covered: 30 %
Generated by: Marylène Dussault
Database: ecoinvent
isCopyrightProtected: true
accessRestrictedTo: 1

## General comment
This dataset represents the production of molybdenum trioxide by roasting of molybdenum sulfide ore (molybdenite) in air. This is a rough estimation created from published reasearch data and includes raw material and energy inputs for conversion reaction only. This dataset should be replaced as soon as better data are available.

## Included activities start
Production process starting with the raw molybdenum sulfide.

## Included activities end
This activity ends with the production of molybdenum trioxide from roasting in air.
This dataset includes raw materials and energy inputs for conversion reaction.
This dataset only includes sulfur dioxide air emissions. From molybdenite roasting.

## Geography
Dataset is representive of the global region.

## Technology
Average technique for the world. The infrastructure was assumed to be the same as for blast furnace.

## Parameters
- energy: roasting_scrubbing operation: 597 kcal; name roast_scrub; uniform min 519, max 675, pedigree (5,5,5,5,5)
  litterature value. Average energy consumption for roasting/scrubbing process per kg of molybdenum - from McHugh F. L. 2008.
  2008, McHugh, L. F., Balliett, R., Mozolic J. A., The sulfide ore looping oxidation process: an alternative to current roasting and smelting practice. Journal of the minerals, metals and materials society. 60 (7), p. 84-87
  Uncertainty: Based on litterature values.
- MoO3/Mo molecular weight ratio: 1.5 kg/kg; name MoO3_Mo; lognormal variance with pedigree 0, pedigree (1,1,1,1,1)
  litterature value. Molecular weight ratio of MoO3 (143.9g/mol) over Mo (95.9 g/mol).
- unit conversion kcal to mj: 0.004184 MJ/kcal; name kcal_mj; lognormal variance with pedigree 0, pedigree (1,1,1,1,1)
  litterature value. Conversion from kilocalorie to megajoule.

## Reference product
- molybdenum trioxide: 1 kg; name MoO3; CPC 41601: Tungsten, molybdenum, tantalum, magnesium, cobalt, cadmium, titanium, zirconium, beryllium, gallium, hafnium, […]; By-product classification allocatable product; CAS 1313-27-5
  Literature value. Based on technical grade. Assumed impurities to have little effect on molar mass,
  production volume 4 kg
    This is a placeholder value that does not reflect real-world production volumes. This dataset does not currenlty require a real-world production volume to work in the database framework and no actual data were collected yet. This has no negative effect on the results of the ecoinvent database.
  property price 8.29869 EUR2005; name MoO3_price_EUR2005
    Assuming a 67% Mo content (by molar mass), price calculated as 5-year market average (2015-2019; USD/kg; USGS [2020]) of the Mo content and converted to EUR2005 (USD2019/EUR2005 exchange rate: 0.62; Official Data Foundation [2020] and Macrotrends [2020]).
    References:
    Official Data Foundation (2020). Inflation Calculator [Online]. Available from: https://www.officialdata.org/us/inflation/2005?endYear=2019&amount=1 [Accessed 28/07/2020]
    USGS (2020). Mineral Commodity Summaries 2020 [Online]. Available from: https://pubs.usgs.gov/periodicals/mcs2020/mcs2020.pdf [Accessed 28/07/2020]
    Macrotrends (2020). Euro Dollar Exchange Rate (EUR USD) - Historical Chart [Online]. Available from: https://www.macrotrends.net/2548/euro-dollar-exchange-rate-historical-chart [Accessed 28/07/2020]
  property carbon content, fossil 0; name MoO3_C_content_fossil
    fossil carbon content on a dry matter basis
  property carbon content, non-fossil 0; name MoO3_C_content_non_fossil
    biogene carbon content on a dry matter basis
  property sulfur content 0.0003; name MoO3_S_content
    sulfur content on a dry matter basis
  property wet mass 0 kg; name MoO3_WM
  property dry mass 1 kg; name MoO3_DM
  property copper content 0.0006; name MoO3_Cu_content
    copper content on a dry matter basis
  property molecular weight 143.9 g/mol; name MoO3_mol_weight
  property bismuth content 8e-5; name MoO3_Bi_content
    bismuth content on a dry matter basis
  property oxygen content 0.29; name MoO3_O_content
    oxygen content on a dry matter basis
  property molybdenum content 0.62; name MoO3_Mo_content
    molybdenum content on a dry matter basis
  property iron content 0.0044; name MoO3_Fe_content
    iron content on a dry matter basis
  property lead content 0.00015; name MoO3_Pb_content
    lead content on a dry matter basis
  property carbon content 0
    carbon content on a dry matter basis (reserved; not for manual entry)
  properties: carbon allocation 0 kg

## Inputs from technosphere
- blast furnace: 1.333e-11 unit; lognormal variance with pedigree 0.51, pedigree (5,5,5,5,5)
  Proxy. Taken directly from the ecoinvent v3.0 dataset "pig iron production, GLO 2002".
  Uncertainty: No data collected, the uncertainty was then maximized.
- heat, district or industrial, natural gas: 1.66523 MJ; = roast_scrub* kcal_mj/ MoO3_Mo; source McHugh, L. F. 2008; lognormal variance with pedigree 0.04, pedigree (1,1,5,1,1)
  EcoSpold01Location=RER
  Calculated Value. Represents energy requirements for roasting and scrubbing operation to produce molybdenum trioxide. Value was reported in kcal/kg of Mo, thus conversion to mass of MoO3 produced was necessary (McHugh, L.F., et al. 2008).
  Uncertainty: Calculated variable. Uncertainty will be determined from propagation of uncertainty factors of underlying variables. Uncertainty of actual relation between variables not accounted for at this time, although this could be included in a future update.
  properties: heating value, net 1 MJ
- molybdenite: 1.112 kg; lognormal variance with pedigree 0.04, pedigree (1,1,5,1,1)
  Stochiometric relation. Based on reaction of MoS2 to MoO3.
  Uncertainty: No uncertainty added - uncertainty based on propagation of the uncertainty of the underlying parameters.
  properties: wet mass 1 kg, dry mass 1 kg

## Emissions to nature
- Sulfur dioxide [air, unspecified]: 0.0623 kg; lognormal variance with pedigree 0.212, pedigree (4,4,5,5,5)
  Calculated value. Represents emissions from roasting of MoS2 based on stochiometry and assuming 93% efficiency of wet scrubbers (alkali) as reported by Environment Australia (1999).
  Environment Australia (1999), Emission estimation technique manual for sewage and biomedical waste incineration, National pollutant inventory, 37p. http://www2.unitar.org/cwm/publications/cbl/prtr/pdf/cat5/Australia_incineration.pdf

## Sampling procedure
Based on litterature, from McHugh F. L. et al. (2008), The sulfide ore looping oxidation process: an alternative to current roasting and smelting practice. Journal of the minerals, metals and materials society. 60 (7), p. 84-87.

## Extrapolations
This dataset has been extrapolated from year 2008 to the year of the calculation (2021). The uncertainty has been adjusted accordingly.
