# drying of protein pea

Dataset: EcoSpold 2, unit process
Geography: RoW
Time period: 2019-01-01 to 2021-12-31
Technology level: current
Classification: ISIC rev.4 ecoinvent: 0163:Post-harvest crop activities
Classification: EcoSpold01Categories: agricultural means of production/work processes
Synonyms: corn drying
Scenario: Business-as-Usual
System model: Allocation, cut-off by classification
Generated by: Avraam Symeonidis
Published in: Food Systems PRISM Lab 2020
Database: ecoinvent
isCopyrightProtected: true
accessRestrictedTo: 1

## General comment
The functional unit is one liter of water evaporated. This module should be used when evaluating drying of protein peas from the fresh product to a final product with less moisture content. Only electricity is consumed for this process.
The drying capacity corresponds to the reduction of moisture from 20% to 18%. Drying capacity is assumed to be 80 tonnes of protein peas dried per hour.

## Included activities start
The activity starts with the reseption of fresh protein peas with a moisture content of 20%.

## Included activities end
This activity ends with the removal of 1 kg of water from the protein peas. The dataset is a service dataset. It includes the energy demand (supplied by consumption of electricity only) for evaporating 1 liter of water. The data for energy demand are based on primary data collection from 20% to <18% of moisture content. Also included in the inventory is the infrastructure (building and machinery) and land use. However, in this dataset just drying burdens are corvered. The dataset does not include waste and air emissions (like dust). Protein pea input, production of the wet educt and utilisation of the dried product are not included as well.

## Technology
Data are based on smale scale of drying. Drying is taking place with electric fans. Evaporation capacity is assumed to be 80 tonnes.hour-1 of legume.

## Time period
Time period of the specific electricity data.

## Parameters
- liter per kg: 0.025 l/kg; name liters_per_kg; = (0,18-0,20)/(0,20-1); lognormal variance with pedigree 0.0013, pedigree (2,2,1,1,1)
  Water evaporated per kg of dried crop.
  Moisture of fresh product: 20%
  Final moisture (after drying process): 18%
- evaporation capacity: 80000 kg/hour; name evaporation_capacity; lognormal variance with pedigree 0.0013, pedigree (2,2,1,1,1)
  Kilogram of crop dried per hour. Assumed equal capacity as maize grain in Brazil, From May et al. (2016).
- annual yield drying: 3.84e7 kg/year; name annual_yield; = evaporation_capacity*60*8; lognormal variance with pedigree 0.0013, pedigree (2,2,1,1,1)
  Annual yield of dried product. Drying process lasts for 2 months (60 days)s with 8 hours of work time. From May et al. (2016).
- kg per liter: 40 kg/l; name kg_per_liter; = 1/liters_per_kg; lognormal variance with pedigree 0.0013, pedigree (2,2,1,1,1)
  Dried crop per liter of water evaporated.

## Reference product
- drying of protein pea: 1 l; CPC 86111: Post-harvest crop services; By-product classification allocatable product
  The functional unit is one liter of water evaporated.This dataset is a service dataset. Grain input and utilisation of the dried product are not included.
  The grain input and the evaporated water and dried grain outputs need to be added in the dataset which is using this service.
  production volume 3.712 l
    This is a placeholder value that does not reflect real-world production volumes. This dataset does not currently require a real-world production volume to work in the database framework, and no actual data were collected yet. This has no negative effect on the results of the ecoinvent database. The placeholder value of this activity was scaled according to the nominal GDP of 2005 (source: United Nations, http://data.un.org/Glossary.aspx?q=GDP+%28current+US%24%29, accessed 20130726) to reflect an appropriate share of the global production volume, which is also a placeholder value.
  property price 0.00361662 EUR2005
    Calculated based on inputs: The price of the product has been calculated as a sum of the values of the material and energy inputs for this product. This value is therefore a rough estimation. It may underestimate the real price since there are additional expenses when producing any product. These expences can include for example labour costs, treatment of waste materials and profit for the producer. Please consider carefully whether this level of data quality is acceptable for your application.

## Inputs from technosphere
- building, hall, steel construction: 1.11111e-6 m2; = 160* kg_per_liter/annual_yield *(4/12)/50; source Folegatti Matsuura M. 2017; lognormal variance with pedigree 0.300925, pedigree (2,2,2,2,1)
  The capacity utilization rate is 2/12 (2 months per year). The life time of the infraestructure was considered 50 years like "drying of maize grain GLO" dataset. The total building area is 160 m², according to May et al. (2016).
- electricity, low voltage: 0 kWh; source Folegatti Matsuura M. 2017; pedigree (1,1,1,1,1)
  The total amount of electricity consumption is derived from primary data collection that is province specific. For more information please refer to the original publication quoted in this dataset.
  EcoSpold01Location=CH
  Uncertainty: Calculated variable. Uncertainty will be determined from propagation of uncertainty factors of underlying variables.
- electricity, low voltage: 0.000282981, 0.000339055, 8.36163e-5, 2.0089e-5, 1.68337e-5, 1.5129e-5, 5.47839e-7, 2.86895e-7, 0.000204564, 2.31473e-6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 kWh (18 entries); source Folegatti Matsuura M. 2017; lognormal variance with pedigree 0.001525, pedigree (2,2,2,2,1)
  (same comment as for electricity, low voltage)

## Inputs from nature
- Transformation, from industrial area [natural resource, land]: 0.000166667 m2; = 160*kg_per_liter/ annual_yield; source Folegatti Matsuura M. 2017; lognormal variance with pedigree 0.008925, pedigree (2,2,2,2,1)
  The surface area occupied by equipments used for drying was determine by primary data from May et al. (2016). The transformation of the land calculated for one liter of water evaporated, is obtained by dividing this area by the annual yield of dried product and multiplying by drying capacity of the reference product.
- Occupation, industrial area [natural resource, land]: 2.77778e-5 m2*year; name occupation; = 160*2/12* kg_per_liter / annual_yield; source Folegatti Matsuura M. 2017; lognormal variance with pedigree 0.002925, pedigree (2,2,2,2,1)
  The surface area occupied by equipments used for drying was determine by primary data from May et al. (2016). The occupation of the land calculated for one liter of water evaporated, is obtained by dividing this area by the annual yield of dried product and multiplying by drying capacity of the reference product. 2 months is the time occupation of the facility in Canada.
- Transformation, to industrial area [natural resource, land]: 0.000166667 m2; = 160*kg_per_liter/ annual_yield; source Folegatti Matsuura M. 2017; lognormal variance with pedigree 0.008925, pedigree (2,2,2,2,1)
  (same comment as for Transformation, from industrial area)

## Sampling procedure
The dataset is extrapolated from the "drying of maize grain" in Brazil. Province-pecific electricity consumption data originate from primary data collection.

## Extrapolations
Lifetime of machinery and building. Only electricity is used for this drying process.
