# deep well drilling, for deep geothermal power

Dataset: EcoSpold 2, unit process
Geography: RoW
Time period: 2015-01-01 to 2021-12-31
Technology level: current
Classification: ISIC rev.4 ecoinvent: 0990:Support activities for other mining and quarrying
Synonyms: deep borehole drilling
Tags: Infrastructure; geothermal power
Scenario: Business-as-Usual
System model: Allocation, cut-off by classification
Generated by: Karin Treyer
Published in: S Hirchberg, S Wiemer, P Burgherr 2015
Database: ecoinvent
isCopyrightProtected: true
accessRestrictedTo: 1

## General comment
This activity represents the the drilling of 1 meter of a borehole for deep geothermal power generation. The inventory reflects the conditions for a well with a depth of 5000m. This is important to not because exchanges do not scale linearly with depth.
Geothermal drilling profits from the experience gained in onshore oil and natural gas drilling, but not all facts can be carried over for geothermal drillings. The latter are situated in hard rock and operate with larger borehole diameters and deepter boreholes.
Detailed information on this dataset is presented in the book "Energy from the Earth. 2015. Hirschberg, Wiemer, Burgherr (eds.) (see field "Data Generator and Publication").

## Included activities start
This is an onshore (rotatory drilling service station) service starting with the reciept of chemicals, reinforcing materials and energy for the drilling. The energy source is electricity from the grid. Diesel is only used as a stand by and for activities on or related to the drill site.

## Included activities end
Deep onshore borehole ready for use. Borehole casing (steel, cement) remains in the ground after end of life of the geothermal plant (no waste treatment).

## Geography
Represents installation of a deep geothermal power plant in Switzerland, extrapolated to GLO. The inventory reflects the conditions for a 5000 m well.

## Technology
Onshore drilling with a rig capacity of 6.75 MWel. The diameter of the borehole at the top is 10 inches.

## Reference product
- deep well, drilled, for geothermal power: 1 m; name RP_amount_1; source S Hirchberg, S Wiemer, P Burgherr 2015; CPC 86219: Support services to other mining; By-product classification allocatable product
  production volume 1.38383e11 m; name RP_PV_1; = 32000*4.37e6
    scaled up according to proportion of GLO vs CH geothermal electricity generation
  property price 657.604 EUR2005
    Calculated based on inputs: The price of the product has been calculated as a sum of the values of the material and energy inputs for this product. This value is therefore a rough estimation. It may underestimate the real price since there are additional expenses when producing any product. These expences can include for example labour costs, treatment of waste materials and profit for the producer. Please consider carefully whether this level of data quality is acceptable for your application.

## Inputs from technosphere
- chemical, organic: 20 kg; source S Hirchberg, S Wiemer, P Burgherr 2015; lognormal variance with pedigree 0.1433, pedigree (2,2,5,5,2)
  Assumption. Amounts for the drilling fluid components are rough estimations. They further represent an average mix over the whole drilling time and not specific drilling fluid compositions for the different stages during the drilling process.
  Source: Kaiser, M., and Fäs, M. (2004). Umweltverträglichkeitsbericht (Hauptuntersuchung) Deep Heat Mining, Basel, Switzerland. Gruner AG Ingenieure und Planer, Geohermal Explorers Ltd./ Sonderegger, M. (2013). Personal Communication with M. Sonderegger, Sankt Galler Stadtwerke, Switzerland.
  This item belongs to the drilling fluid category of the LCI.
  properties: heating value, net 19.03 MJ, dry mass 1 kg, carbon content, fossil 0.628, wet mass 1 kg
  note on carbon content, fossil: This dataset is an unweighted average of 20 organic substances (listed in Tab 88.1, ecoinvent v2.2 report 8, part II), being part of the top100 chemicals included in this database. The C-content has also been calculated as an unweighted average of the C content of the substances composing this dataset.
- wastewater, average: -0.6 m3; name BP_amount_2; lognormal variance with pedigree 0.1433, pedigree (2,2,5,5,2)
  Assumption. It is assumed that the total volume of water used for the drilling fluid is treated (not considering any losses). An additional amount of meteoric water is estimated. The wastewater from the drilling place is partly first stored at place and used for laboratory testing. All wastewater goes to the public wastewater treatment plant.
  COD is estimated to be 3kg, DOC 0.3kg, Potassium ions in the water 0.9kg, sodium ions in the water 6kg. These values could not be modelled in this inventory.
  production volume 8.303e10 m3; = RP_PV_1 * (BP_amount_2 / RP_amount_1)
    Calculated from production volume of reference product using the relative outputs.
  property price 0 EUR2005; name BP_amount_2_price_EUR2005
  properties: dry mass 0.346837 kg, wet mass 1000 kg, water content 2882.2, carbon content, non-fossil 0.194039
  note on carbon content, non-fossil: 0.0673 kg TOC/m3 (Tab A.17, ecoinvent v2.2 report 13_I). TOC was considered as Total Carbon.
- bentonite: 20 kg; source S Hirchberg, S Wiemer, P Burgherr 2015; lognormal variance with pedigree 0.1433, pedigree (2,2,5,5,2)
  (same comment as for chemical, organic)
  properties: dry mass 1 kg, wet mass 1 kg
- reinforcing steel: 309 kg; source S Hirchberg, S Wiemer, P Burgherr 2015; lognormal variance with pedigree 0.1433, pedigree (2,2,5,5,2)
  Calculated value. This item belongs to the casing activity during the drilling process. Steel use for the casing calculated for a given well design (length of well sections, borehole and pipe diameters and well depth).
  properties: wet mass 1 kg, dry mass 1 kg, carbon content, fossil 0.004
- sodium hydroxide, without water, in 50% solution state: 1 kg; source S Hirchberg, S Wiemer, P Burgherr 2015; lognormal variance with pedigree 0.1433, pedigree (2,2,5,5,2)
  (same comment as for chemical, organic)
  properties: heating value, net 3.03 MJ, dry mass 1 kg, wet mass 1 kg
- diesel, burned in diesel-electric generating set, 10MW: 111 MJ; source S Hirchberg, S Wiemer, P Burgherr 2015; lognormal variance with pedigree 0.1433, pedigree (2,2,5,5,2)
  Assumption. Rather pessimistic assumption of diesel use for
  - different applications at the drilling site (i.e. staplers), based on St. Gallen
  - backup in case of electrical power outage, based on Basel.
  Source: Haering, M. (2003). Deep Heat Mining Basel. Voruntersuchung und Pflichtenheft für die Umweltverträglichkeits-Prüfung. : Geothermal Explorers Ltd., Basel, Schweiz./ Sonderegger, M. (2013). Personal Communication with M. Sonderegger, Sankt Galler Stadtwerke,
  Switzerland.
  properties: heating value, net 1 MJ
- sodium chloride, powder: 6 kg; source S Hirchberg, S Wiemer, P Burgherr 2015; lognormal variance with pedigree 0.1433, pedigree (2,2,5,5,2)
  (same comment as for chemical, organic)
  properties: wet mass 1 kg, dry mass 1 kg
- cement, Portland: 0 kg; source S Hirchberg, S Wiemer, P Burgherr 2015; pedigree (1,1,1,1,1)
  Calculated value. This item belongs to the casing activity during the drilling process. Cement use for the casing calculated for a given well design (length of well sections, borehole and pipe diameters and well depth). A loss factor of 1.5 is assumed.
  Geothermal cements should tie well casing to the rock formation, be impermeable, hydraulically isolate the well from geological strata other than those related to production and injection, and resist attack b substances present in geothermal reservoirs. It is normally a cement of low density, mainly Portland cement class G with a density of around 1800 kg/m3.
  No dataset for class G cement exists in ecoinvent, so that this
  dataset is taken as a proxy. No data for special additives were
  available.
  properties: wet mass 1 kg, dry mass 1 kg
- potassium carbonate: 15 kg; source S Hirchberg, S Wiemer, P Burgherr 2015; lognormal variance with pedigree 0.1433, pedigree (2,2,5,5,2)
  (same comment as for chemical, organic)
  properties: dry mass 1 kg, wet mass 1 kg, carbon content, fossil 0.0869565, heating value, net 2.63 MJ
- drilling waste: -466 kg; name BP_amount_1; source S Hirchberg, S Wiemer, P Burgherr 2015; lognormal variance with pedigree 0.1438, pedigree (2,3,5,5,2)
  Calculated from the volume of the borehole.
  This item belongs to the drilling cuttings.
  production volume 6.44866e13 kg; = RP_PV_1 * (BP_amount_1 / RP_amount_1)
    Calculated from production volume of reference product using the relative outputs.
  property price 0 EUR2005; name BP_amount_1_price_EUR2005
  properties: dry mass 0.285 kg, carbon content, fossil 0.105263, water content 2.50877, wet mass 1 kg
- cellulose fibre: 17.5 kg; source S Hirchberg, S Wiemer, P Burgherr 2015; lognormal variance with pedigree 0.1433, pedigree (2,2,5,5,2)
  (same comment as for chemical, organic)
  properties: carbon content, non-fossil 0.46, dry mass 1 kg, wet mass 1 kg
- steel, low-alloyed: 0.5 kg; source S Hirchberg, S Wiemer, P Burgherr 2015; lognormal variance with pedigree 0.1433, pedigree (2,2,5,5,2)
  Estimation for the material use of the drilling rig (could also be made of brass instead of steel).
  This item belongs to the infrastructure category in the LCI.
  properties: dry mass 1 kg, carbon content, fossil 0.005, wet mass 1 kg
- barite: 20 kg; source S Hirchberg, S Wiemer, P Burgherr 2015; lognormal variance with pedigree 0.1433, pedigree (2,2,5,5,2)
  (same comment as for chemical, organic)
  properties: dry mass 1 kg, wet mass 1 kg
- electricity, medium voltage: 0 kWh; source S Hirchberg, S Wiemer, P Burgherr 2015; pedigree (1,1,1,1,1)
  Calculated value/estimation. Electricity use for the drilling process (including tripping time) calculated as a function of well depth, well design, well volume and installed rig capacity necessary for the well and geological conditions.
  Energy use for the drilling process does not show a linear behaviour. This exchange value is therefore only correct for the specific conditions as specified in the report "Energy from the Earth" (see source field).
- cement, Portland: 5.76075, 8.41339, 178.652, 9.98402, 8.18982 kg (5 entries); source S Hirchberg, S Wiemer, P Burgherr 2015; lognormal variance with pedigree 0.1433, pedigree (2,2,5,5,2)
  (same comment as for cement, Portland)
- electricity, medium voltage: 4.22509, 44.3865, 1.91658, 1.37299, 2.52293, 29.9941, 50.6657, 4.67625, 3.03773, 14.2445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 kWh (136 entries); source S Hirchberg, S Wiemer, P Burgherr 2015; lognormal variance with pedigree 0.1433, pedigree (2,2,5,5,2)
  (same comment as for electricity, medium voltage)

## Inputs from nature
- Occupation, industrial area [natural resource, land]: 6e-5 m2*year; = (6/12)/(5000)* transformation_land_from; source S Hirchberg, S Wiemer, P Burgherr 2015; lognormal variance with pedigree 0.1438, pedigree (2,3,5,5,2)
  Assumption. It is assumed that the actual drilling time amounts to 6 months for 5000 m, and that the preparation and closing time of the drill site amounts to 4 months.
  This item belongs to the Infrastructure category of the LCI.
- Transformation, to industrial area [natural resource, land]: 0.6 m2; = transformation_land_from; source S Hirchberg, S Wiemer, P Burgherr 2015; lognormal variance with pedigree 0.1438, pedigree (2,3,5,5,2)
  Assumption. A drill site area of 18’000m2 is assumed, including the actual
  drilling rig area, storage area, etc.
  This item belongs to the Infrastructure category of the LCI.
- Water, well, in ground [natural resource, in water]: 0.5 m3; source S Hirchberg, S Wiemer, P Burgherr 2015; lognormal variance with pedigree 0.1433, pedigree (2,2,5,5,2)
  Assumption. The amount for the use of water per m in the drilling fluid is a rather rough estimation.
  This item belongs to the Drilling fluid category of the LCI.
- Transformation, from unspecified, natural (non-use) [natural resource, land]: 0.6 m2; name transformation_land_from; lognormal variance with pedigree 0.1433, pedigree (2,2,5,5,2)
  (same comment as for Transformation, to industrial area)

## Sampling procedure
Literature

## Extrapolations
Extrapolated from a dataset modelled for CH conditions.
