# chemical production, inorganic

Dataset: EcoSpold 2, unit process
Geography: GLO
Time period: 2000-01-01 to 2021-12-31
Technology level: current
Classification: ISIC rev.4 ecoinvent: 2011:Manufacture of basic chemicals
Classification: EcoSpold01Categories: chemicals/inorganics
Tags: ConvertedDataset
Scenario: Business-as-Usual
System model: Allocation, cut-off by classification
Generated by: Roland Hischier
Published in: Althaus H.-J. 2007
Database: ecoinvent
isCopyrightProtected: true
accessRestrictedTo: 1

## General comment
An unweighted average of the first 20 inorganic substances, being part of the top100 chemicals and included into this database, is established.
[This dataset was already contained in the ecoinvent database version 2. It was not individually updated during the transfer to ecoinvent version 3. Life Cycle Impact Assessment results may still have changed, as they are affected by changes in the supply chain, i.e. in other datasets. This dataset was generated following the ecoinvent quality guidelines for version 2. It may have been subject to central changes described in the ecoinvent version 3 change report (http://www.ecoinvent.org/database/ecoinvent-version-3/reports-of-changes/), and the results of the central updates were reviewed extensively. The changes added e.g. consistent water flows and other information throughout the database. The documentation of this dataset can be found in the ecoinvent reports of version 2, which are still available via the ecoinvent website. The change report linked above covers all central changes that were made during the conversion process.]

## Included activities end
A general module for inorganic chemicals is established, based on the modules of several inorganic substances from the ecoinvent database

## Geography
General module, based on chemicals from Europe, Switzerland and Global level, used as a global average.

## Technology
Present technology for the production of the different included chemicals (for details, see datasets of the respective chemical substance)

## Reference product
- chemical, inorganic: 1 kg; CPC 342: Basic inorganic chemicals n.e.c.; By-product classification allocatable product
  EcoSpold01Location=GLO
  production volume 1 kg
    Unknown
    Dummy value to be replaced by measured, estimated or calculated value
  property heating value, net 0 MJ
    Non combustible products are assumed to have an LHV equal to zero (0).
  property price 5.60574 EUR2005
    Calculated based on inputs: The price of the product has been calculated as a sum of the values of the material and energy inputs for this product. This value is therefore a rough estimation. It may underestimate the real price since there are additional expenses when producing any product. These expences can include for example labour costs, treatment of waste materials and profit for the producer. Please consider carefully whether this level of data quality is acceptable for your application.
  property carbon content, non-fossil 0
    This dataset is an unweighted average of 20 inorganic substances (listed in Tab 88.1, ecoinvent v2.2 report 8, part II), being part of the top100 chemicals included in this database. The C-content has also been calculated as an unweighted average of the C content of the substances composing this dataset.
  property carbon content, fossil 0.003
    (same comment as for chemical, inorganic)
  property carbon content 0.003
    carbon content on a dry matter basis (reserved; not for manual entry)
  properties: water content 0, dry mass 1 kg, water in wet mass 0 kg, wet mass 1 kg, carbon allocation 0.003 kg

## Inputs from technosphere
- quicklime, milled, loose: 0 kg; pedigree (1,1,1,1,1)
  EcoSpold01Location=CH
  Estimated, based on most produced chemicals
  Uncertainty: estimated, based on most produced chemicals
  properties: water content 0.010101, wet mass 1 kg, dry mass 0.99 kg
- oxygen, liquid: 0 kg; pedigree (1,1,1,1,1)
  Estimated, based on most produced chemicals
  EcoSpold01Location=RER
  Uncertainty: estimated, based on most produced chemicals
  properties: wet mass 1 kg, dry mass 1 kg
- nitrogen, liquid: 0 kg; pedigree (1,1,1,1,1)
  EcoSpold01Location=RER
  Estimated, based on most produced chemicals
  Uncertainty: estimated, based on most produced chemicals
  properties: dry mass 1 kg, wet mass 1 kg
- hydrogen fluoride: 0 kg; pedigree (1,1,1,1,1)
  EcoSpold01Location=GLO
  Estimated, based on most produced chemicals
  Uncertainty: estimated, based on most produced chemicals
  properties: wet mass 1 kg, dry mass 1 kg, heating value, net 6.06 MJ
- sodium sulfate, anhydrite: 0 kg; pedigree (1,1,1,1,1)
  (same comment as for nitrogen, liquid)
  properties: wet mass 1 kg, dry mass 1 kg
- sodium silicate, spray powder, 80%: 0 kg; pedigree (1,1,1,1,1)
  (same comment as for oxygen, liquid)
  properties: dry mass 1 kg, wet mass 1 kg
- phosphoric acid, industrial grade, without water, in 85% solution state: 0.05 kg; lognormal variance with pedigree 0.1561, pedigree (5,5,5,3,3)
  (same comment as for nitrogen, liquid)
  properties: wet mass 1 kg, dry mass 1 kg
- titanium dioxide: 0 kg; pedigree (1,1,1,1,1)
  (same comment as for nitrogen, liquid)
  properties: dry mass 1 kg, wet mass 1 kg
- ammonium nitrate: 0 kg; pedigree (1,1,1,1,1)
  EcoSpold01Location=RER
  The exchange has been updated from 'ammonium nitrate, as N' into 'ammonium nitrate' and therefore its amount has been scaled (multiplied) from 0.05 kg by 2.8573 kg of 'ammonium nitrate' per kg of 'ammonium nitrate, as N'. Original comment of the exchange is: Estimated, based on most produced chemicals
  Uncertainty: estimated, based on most produced chemicals
  properties: wet mass 1 kg, dry mass 1 kg
- sulfuric acid: 0 kg; pedigree (1,1,1,1,1)
  (same comment as for oxygen, liquid)
  properties: dry mass 1 kg, wet mass 1 kg
- nitric acid, without water, in 50% solution state: 0 kg; pedigree (1,1,1,1,1)
  (same comment as for oxygen, liquid)
  properties: wet mass 1 kg, dry mass 1 kg
- chlorine, liquid: 0 kg; pedigree (1,1,1,1,1)
  (same comment as for nitrogen, liquid)
  properties: dry mass 1 kg, wet mass 1 kg
- aluminium sulfate, powder: 0 kg; pedigree (1,1,1,1,1)
  (same comment as for oxygen, liquid)
  properties: dry mass 1 kg, wet mass 1 kg
- ammonium sulfate: 0 kg; pedigree (1,1,1,1,1)
  (same comment as for oxygen, liquid)
  properties: wet mass 1 kg, dry mass 1 kg
- sodium chlorate, powder: 0 kg; pedigree (1,1,1,1,1)
  (same comment as for nitrogen, liquid)
  properties: wet mass 1 kg, dry mass 1 kg
- sodium hydroxide, without water, in 50% solution state: 0.05 kg; lognormal variance with pedigree 0.1561, pedigree (5,5,5,3,3)
  (same comment as for nitrogen, liquid)
  properties: wet mass 1 kg, heating value, net 3.03 MJ, dry mass 1 kg
- hydrochloric acid, without water, in 30% solution state: 0 kg; pedigree (1,1,1,1,1)
  (same comment as for oxygen, liquid)
  properties: wet mass 1 kg, heating value, net 3.32 MJ, dry mass 1 kg
- calcium chloride: 0 kg; pedigree (1,1,1,1,1)
  (same comment as for oxygen, liquid)
  properties: dry mass 1 kg, wet mass 1 kg
- ammonia, anhydrous, liquid: 0 kg; pedigree (1,1,1,1,1)
  (same comment as for oxygen, liquid)
  properties: dry mass 1 kg, wet mass 1 kg
- soda ash, light, crystalline, heptahydrate: 0.05 kg; lognormal variance with pedigree 0.1561, pedigree (5,5,5,3,3)
  (same comment as for oxygen, liquid)
  properties: wet mass 1 kg, dry mass 1 kg, heating value, net 3.43 MJ, carbon content, fossil 0.0517241
- quicklime, milled, loose: 0.000414394, 0.0495856 kg (2 entries); lognormal variance with pedigree 0.1561, pedigree (5,5,5,3,3)
  (same comment as for quicklime, milled, loose)
- oxygen, liquid: 0.0107655, 0.0392345 kg (2 entries); lognormal variance with pedigree 0.1561, pedigree (5,5,5,3,3)
  (same comment as for oxygen, liquid)
- nitrogen, liquid: 0.0107687, 0.0392313 kg (2 entries); lognormal variance with pedigree 0.1561, pedigree (5,5,5,3,3)
  (same comment as for nitrogen, liquid)
- hydrogen fluoride: 0.0127105, 0.0372895 kg (2 entries); lognormal variance with pedigree 0.1561, pedigree (5,5,5,3,3)
  (same comment as for hydrogen fluoride)
- sodium sulfate, anhydrite: 0.00702013, 0.0429799 kg (2 entries); lognormal variance with pedigree 0.1561, pedigree (5,5,5,3,3)
  (same comment as for nitrogen, liquid)
- sodium silicate, spray powder, 80%: 0.0087, 0.0413 kg (2 entries); lognormal variance with pedigree 0.1561, pedigree (5,5,5,3,3)
  (same comment as for oxygen, liquid)
- titanium dioxide: 0.0166667, 0.0333333 kg (2 entries); lognormal variance with pedigree 0.1561, pedigree (5,5,5,3,3)
  (same comment as for nitrogen, liquid)
- ammonium nitrate: 0.0353964, 0.0245487, 0.0188683, 0.0640525 kg (4 entries); lognormal variance with pedigree 0.1561, pedigree (5,5,5,3,3)
  (same comment as for ammonium nitrate)
- sulfuric acid: 0.00578434, 0.0442157 kg (2 entries); lognormal variance with pedigree 0.1561, pedigree (5,5,5,3,3)
  (same comment as for oxygen, liquid)
- nitric acid, without water, in 50% solution state: 0.00160728, 0.00399702, 0.00191516, 0.0122035, 0.00160133, 0.00658691, 0.00173653, 0.00108173, 0.005198, 0.0140725 kg (10 entries); lognormal variance with pedigree 0.1561, pedigree (5,5,5,3,3)
  (same comment as for oxygen, liquid)
- chlorine, liquid: 0.00833463, 0.0416654 kg (2 entries); lognormal variance with pedigree 0.1561, pedigree (5,5,5,3,3)
  (same comment as for nitrogen, liquid)
- aluminium sulfate, powder: 0.0087, 0.0413 kg (2 entries); lognormal variance with pedigree 0.1561, pedigree (5,5,5,3,3)
  (same comment as for oxygen, liquid)
- ammonium sulfate: 0.0117405, 0.0382595 kg (2 entries); lognormal variance with pedigree 0.1561, pedigree (5,5,5,3,3)
  (same comment as for oxygen, liquid)
- sodium chlorate, powder: 0.00442968, 0.0455703 kg (2 entries); lognormal variance with pedigree 0.1561, pedigree (5,5,5,3,3)
  (same comment as for nitrogen, liquid)
- hydrochloric acid, without water, in 30% solution state: 0.00913609, 0.0408639 kg (2 entries); lognormal variance with pedigree 0.1561, pedigree (5,5,5,3,3)
  (same comment as for oxygen, liquid)
- calcium chloride: 0.0112024, 0.0387976 kg (2 entries); lognormal variance with pedigree 0.1561, pedigree (5,5,5,3,3)
  (same comment as for oxygen, liquid)
- ammonia, anhydrous, liquid: 0.000804099, 0.00537432, 0.00125097, 0.00242839, 0.00247862, 0.0011378, 0.00935412, 0.000254521, 0.0269172 kg (9 entries); lognormal variance with pedigree 0.1561, pedigree (5,5,5,3,3)
  (same comment as for oxygen, liquid)

## Extrapolations
This dataset has been extrapolated from year 2000 to the year of the calculation (2021). The uncertainty has been adjusted accordingly.

## Review by Heiko Kunst 2003-06-20
Passed
Passed
