# concrete production 50MPa

Dataset: EcoSpold 2, unit process
Geography: ZA
Time period: 2017-01-01 to 2021-12-31
Technology level: current
Classification: ISIC rev.4 ecoinvent: 2395:Manufacture of articles of concrete, cement and plaster
Classification: EcoSpold01Categories: construction materials/concrete
Synonyms: ready-mix concrete; ready mixed concrete; 50MPa ready mixed concrete
Scenario: Business-as-Usual
System model: Allocation, cut-off by classification
Share of production covered: 35 %
Generated by: Rachel Muigai
Published in: Muigai, R. 2017
Database: ecoinvent
isCopyrightProtected: true
accessRestrictedTo: 1

## General comment
This dataset represents the production of South African 50MPa ready-mix concrete. Density: 2,232 kg/m³. The composition of concrete (for 1 m³) contains: Portland fly ash cement 545 kg, Water 157 kg, Gravel 950kg, Sand 737 kg, Admixtures (air-entrainers and superplastisizers) 2.96kg.

[The amount of ingredients indicated here do not include the production waste amount of 24.5kg per 1m3 of concrete adopted from "concrete production, 50MPa, RNA only, GLO 2006" dataset [accessed on 2017/12/14 ]. The production waste volume is proportionally shared between the inputs: cement, sand and gravel. The adjusted input values are indicated in the exchange section. In addition, the amount of water included here refers to the batch water. Non-process water is adopted from "concrete production, 50MPa, RNA only, GLO 2006" dataset [accessed on 2017/12/14 ]]. 50 MPa concrete is Ultra high strength concrete is suitable for suspended structural beams and slabs, columns and water-retaining structures.

Annual production volume of Ready-Mix concrete for South Africa is published in www.statssa.gov.za.
Distribution by Ready-Mix concrete for South Africa is estimated based on a sample of 1% of ready-mix producers in SA. Distribution by ready-mix strength class is estimate as: • 15MPa = 3.6% 20 MPa = 4 %
• 25 MPa = 32 %
• 30 MPa = 49%
• 35 MPa = 4 %
• 40 MPa = 6 %
• 45 MPa = 0.1 %
• 50 MPa = 1.3%

## Included activities start
From reception of raw materials at the ready-mix plant gate.

## Included activities end
This activity ends with the input of concrete in the mixing truck.
The dataset includes the whole manufacturing processes to produce ready-mixed concrete, internal processes (material handling and mixing) and infrastructure. The dataset does not include the transportation of concrete in the mixing truck. An average of 4.64 litres of diesel is used on average transportation of 1m3 concrete.

## Geography
South African data. For some exchanges RER-modules have been used as proxy. Data quality indicators adjusted accordingly.

## Technology
Typical technology for South Africa production.

## Parameters
- fraction_01: 0.8 dimensionless; name fraction_ethylene_oxide
  Literature value. Superplastisizer assumed to be 80% ehtlyne oxide. 20 MPa mix admixtures. Source: Athena and morrison Hershfield (2012): Life Cycle Assessment of Precast Concrete Commerical Buildings Cradle-to-Grave. Adopted from "20MPa, RNA only, CA-QC 2006" dataset on 2017/11/05
- superplastisizer: 2.96 kg
  Estimated value from primary data collection
- fraction_02: 0.2 dimensionless; name fraction_acetic_acid
  Literature value. Superplastisizer assumed to be 20% acetic acid. 20 MPa mix admixtures. Source: Athena and morrison Hershfield (2012): Life Cycle Assessment of Precast Concrete Commerical Buildings Cradle-to-Grave. Adopted from "20MPa, RNA only, CA-QC 2006" dataset on 2017/11/05
- fraction, process water, to air: 0.15 dimensionless; name fraction_PW_to_air
  Rough estimation to represent water evaporation of process water. Adopted from "20MPa, RNA only, CA-QC 2006" dataset on 2017/11/05
- south africa concrete prod: 5.30815e6 m3; name PV_ready_mix_ZA
  Annual concrete production in South Africa
- fraction of 50 MPa concrete to overall concrete production: 0.013 dimensionless; name fraction_50MPa_concrete
  For Annual production volume purpose. Calculated value based on primary data collection in South Africa. In South Africa, 50MPa concrete represents 1.3% of the overall ready-mix concrete production.
- fraction of 20 MPa concrete to overall concrete production: 0.04 dimensionless; name fraction_20MPa_concrete; lognormal variance with pedigree 0.0014, pedigree (2,2,1,3,1)
  For Annual production volume purpose. Calculated value based on primary data collection in South Africa. In South Africa, 20MPa concrete represents 4% of the overall ready-mix concrete production.

## Reference product
- concrete, 50MPa: 1 m3; name ref; By-product classification allocatable product; CPC 37510: Non-refractory mortars and concretes
  50 MPa concrete is Ultra high strength concrete is suitable for suspended structural beams and slabs, columns and water-retaining structures.
  production volume 69005.9 m3; name PV_ref; = fraction_50MPa_concrete* PV_ready_mix_ZA
    (same comment as for concrete, 50MPa)
  property wet mass 2389 kg; name ref_WM; = ref_WWM+ref_DM
  property sand content 737 kg; name sand
    Calculated value. From primary data callection
  property cement content 545 kg; name cement
    Calculated value. From primary data callection
  property gravel content 950 kg; name gravel
    Calculated value. From primary data callection
  property water in wet mass 157 kg; name ref_WWM; = batch_water
  property water content 0.0703405; name ref_water_content; = ref_WWM/ref_DM
  property price 185 EUR2005; name ref_price_EUR2005
    Estimated to be the same price as in case of concrete, normal (Data are not easily available. Therefore, an average price of products supplied by the activities in the same ISIC 3 code has been applied.This price is obtained as '_49 Concrete, asphalt and other mineral products, EU27 virgin, EU27' in the 'EU & DK Input Output Database' (available in SimaPro). The price is assumed to be valid for both RER2003, RER 2004, world 2003 and world 2004. Multiplied by density.).
  property dry mass 2232 kg; name ref_DM; = sand+gravel+cement
  property carbon content, fossil 1e-51; name ref_C_content_fossil
    Estimated value to zero, based on components properties.
  property carbon content 1e-51
    carbon content on a dry matter basis (reserved; not for manual entry)
  properties: carbon allocation 2.232e-48 kg

## Inputs from technosphere
- waste concrete: -24.5 kg; name Waste; source Marceau, M.L. 2007; lognormal variance with pedigree 0.0127, pedigree (2,1,3,3,1)
  Adopted from "concrete production, 50MPa, RNA only, GLO 2006" dataset [accessed on 2017/12/14 ] Solid waste consists of concrete and small amounts of paste (cement and water after aggregate has been reclaimed)
  production volume 1.69065e6 kg; = PV_ref*Waste/ref
    Calculated from the production volume of reference product, in proportion to the respective output amounts of 1.3% for 50MPa concrete.
  property price 0 EUR2005; name Waste_price_EUR2005
  properties: water content 0.0703405, dry mass 0.934282 kg, wet mass 1 kg, carbon content, fossil 1e-51
  note on carbon content, fossil: Adopted from "20MPa, RNA only, CA-QC 2006" dataset on 2017/11/05 .Tab A.3, ecoinvent v2.2 report 13_I
- gravel, round: 959.743 kg; = gravel*(1+(Waste*-1)/Ref_WM); lognormal variance with pedigree 0.002, pedigree (1,1,3,1,1)
  Primary data collected from ready mix plant plant. Gravel content in 1 m3 of concrete. Value includes production waste.
  Uncertainty: C
  properties: wet mass 1 kg, dry mass 1 kg
- ethylene oxide: 2.368 kg; name EO_Amount; = fraction_ethylene_oxide*superplastisizer; lognormal variance with pedigree 0.002, pedigree (1,1,3,1,1)
  Superplastisizer. Literature value
  Uncertainty: C
  property carbon content, fossil 0.545455; name EO_C_content_fossil
  properties: dry mass 1 kg, heating value, net 27.53 MJ, wet mass 1 kg
  note on carbon content, fossil: Adopted from "20MPa, RNA only, CA-QC 2006" dataset on 2017/11/05
- steel, low-alloyed, hot rolled: 0.0238 kg; source Kellenberger D. 2007; lognormal variance with pedigree 0.0146, pedigree (2,1,3,5,1)
  Adopted value. From "concrete production, 50 MPa, RNA only, GLO" dataset. Accessed 20171213
  properties: wet mass 1 kg, carbon content, fossil 0.005, dry mass 1 kg
  note on carbon content, fossil: Low alloyed steel composition given in Tab. 3.2 ecoinvent v2.2 report 10_partII. Steel assumed to have a C content of 0.5%. Adopted from "20MPa, RNA only, CA-QC 2006" dataset on 2017/11/05
- sand: 744.558 kg; = sand*(1+(Waste*-1)/Ref_WM); lognormal variance with pedigree 0.002, pedigree (1,1,3,1,1)
  Primary data collected from ready mix plant plant. Sand content in 1 m3 of concrete. Value includes production waste.
  Uncertainty: C
  properties: dry mass 1 kg, wet mass 1 kg
- wastewater from concrete production: -0.0348 m3; name WWater; source Marceau, M.L. 2007; lognormal variance with pedigree 0.0127, pedigree (2,1,3,3,1)
  Adopted from "concrete production, 20MPa, RNA only, GLO 2006" dataset [accessed on 2017/12/14 ]
  production volume 2401.41 m3; = PV_ref*WWater/ref
    (same comment as for waste concrete)
  property price 0 EUR2005; name WWater_price_EUR2005
  properties: dry mass 0.449139 kg, carbon content, fossil 0.027074, wet mass 1000 kg, water content 2225.48
  note on carbon content, fossil: TOC =0.01216 kg/m3 (Tab A.20, ecoinvent v2.2 report 13_I). TOC was considered as Total Carbon. Adopted from "20MPa, RNA only, CA-QC 2006" dataset on 2017/11/05
- acetic acid, without water, in 98% solution state: 0.592 kg; name AA_Amount; = fraction_acetic_acid*superplastisizer; lognormal variance with pedigree 0.002, pedigree (1,1,3,1,1)
  Superplastisizer. Primary data collection of superplasticizer (kg) per m3 of concrete
  Uncertainty: C
  property carbon content, fossil 0.400016; name AA_C_content_fossil
  properties: heating value, net 14.6 MJ, dry mass 1 kg, wet mass 1 kg
  note on heating value, net: Based on literature, page 10, Althaus H.-J., Chudacoff M., Hischier R., Jungbluth N., Osses M. and Primas A. (2007) Life Cycle Inventories of Chemicals. Final report ecoinvent data v2.0 No. 8. EMPA, Swiss Centre for Life Cycle Inventories, Dübendorf, CH, Online-Version under: www.ecoinvent.org.
- electricity, medium voltage: 3.57 kWh; lognormal variance with pedigree 0.0201, pedigree (4,1,3,3,1)
  Primary data collected from ready mix plant plant. Energy use in ready-mix plant.
  Uncertainty: T
- concrete mixing factory: 4.57e-7 unit; source Kellenberger D. 2007; lognormal variance with pedigree 0.3246, pedigree (2,1,3,5,1)
  Adopted value. Adopted from "concrete production, 50MPa, RNA only, GLO 2006" dataset [accessed on 2017/12/14 ]
- cement, portland fly ash cement 21-35%: 550.589 kg; = cement*(1+ (Waste*-1)/ ref_WM); lognormal variance with pedigree 0.0051, pedigree (2,1,3,5,1)
  Primary data collected from ready mix plant plant. Portland fly ash cement content in 1 m3 of concrete. Value includes production waste.
  properties: wet mass 1 kg, dry mass 1 kg
- tap water: 197.941 kg; = batch_water+non_process_water; lognormal variance with pedigree 0.002, pedigree (1,1,3,1,1)
  Water use in ready-mix plant, assumed to be sourced from municipal water system. Primary data collected from ready mix plant plant. Consists of batch water and non-process water used in producing 1 m3 of concrete.
  Uncertainty: C
  property batch water 157 kg; name batch_water
  property non-process water, net 40.9412 kg; name non_process_water; = (WWater*-1)*1000/(1- fraction_PW_to_air)
  properties: carbon content, fossil 0.00178991, dry mass 0.000337476 kg, water content 2962.17, wet mass 1 kg
  note on carbon content, fossil: Bicarbonate content is 2.93 mol/m3. CO2 content is 0.1 mol/m3 (ecoinvent v2.2 report 8, Tab 93.1). Adopted from "20MPa, RNA only, CA-QC 2006" dataset on 2017/11/05
  note on non-process water, net: The average water consumption (not including batch water) is 65 L/m3 of ready mixed concrete. The average amount of water disposed is 34,8 L/m3. Water not discarded is recycled back into the process or into other products. Source: Athena (2005):Cement and Structural Concrete: LCI Update 2005 An amount of 15% water evaporated to air was assumed, in order to calculate to non-process water input.: Adopted from "20MPa, RNA only, CA-QC 2006" dataset on 2017/11/05
- lubricating oil: 0.0119 kg; source Kellenberger D. 2007; lognormal variance with pedigree 0.0146, pedigree (2,1,3,5,1)
  (same comment as for concrete mixing factory)
  properties: carbon content, fossil 0.75, heating value, net 40.2 MJ, dry mass 1 kg, wet mass 1 kg
  note on carbon content, fossil: Lubricating oil is produced from diesel. C-content/dry mass of fats and oils considered 75%, from: ecoinvent v2.2 report, n 15a, pg 40. Adopted from "20MPa, RNA only, CA-QC 2006" dataset on 2017/11/05
  note on heating value, net: Literature value, Source: IPCC 2006, 2006 IPCC Guidelines for National Greenhouse Gas Inventories, Prepared by the National Greenhouse Gas Inventories Programme, Eggleston H.S., Buendia L., Miwa K., Ngara T. and Tanabe K. (eds). Published: IGES, Japan
- diesel, burned in building machine: 15.6427 MJ; = diesel_input*1000*density_diesel*NHV_diesel*42.8; lognormal variance with pedigree 0.002, pedigree (1,1,3,1,1)
  Ready mix plant data. Energy use in ready-mix plant. Adopted from "concrete production, 50MPa, RNA only, GLO 2006" dataset [accessed on 2017/12/14 ]
  Uncertainty: C
  property heating value, net 1 MJ; name NHV_diesel
  property density 0.84 kg/l; name density_diesel
  property fuel input in physical units, m3 0.0004351 m3; name diesel_input; = 0.4351/1000
  note on heating value, net: ecoinvent, report 1, table 4.6. Adopted from "20MPa, RNA only, CA-QC 2006" dataset on 2017/11/05
  note on density: ecoinvent report 1, table 4.6. Adopted from "20MPa, RNA only, CA-QC 2006" dataset on 2017/11/05

## Emissions to nature
- Carbon dioxide, fossil [air, non-urban air or from high stacks]: 5.6043 kg; = ((AA_Amount* AA_C_content_fossil)+ (EO_Amount* EO_C_content_fossil))*44/12; lognormal variance with pedigree 0.0051, pedigree (2,1,3,5,1)
  Amount of carbon dioxide, fossil to the environment due to the use of superplasticizers in the concrete mix
- Suspended solids, unspecified [water, unspecified]: 4.64e-7 kg; source Marceau, M.L. 2007; lognormal variance with pedigree 0.0033, pedigree (2,1,3,3,1)
  (same comment as for concrete mixing factory)
- Chlorides, unspecified [water, unspecified]: 3.09e-9 kg; source Marceau, M.L. 2007; lognormal variance with pedigree 0.0033, pedigree (2,1,3,3,1)
  (same comment as for concrete mixing factory)
- Oils, unspecified [water, unspecified]: 2.32e-7 kg; source Marceau, M.L. 2007; lognormal variance with pedigree 0.0033, pedigree (2,1,3,3,1)
  (same comment as for concrete mixing factory)
- Water [air, unspecified]: 0.00614118 m3; = non_process_water/1000*fraction_PW_to_air; lognormal variance with pedigree 0.002, pedigree (1,1,3,1,1)
  Adopted value - non-process water. Adopted from "concrete production, 50 MPa, RNA only, GLO 2006" dataset [accessed on 2017/12/14 ]
  Uncertainty: C
- Iron, ion [water, unspecified]: 1.55e-8 kg; source Marceau, M.L. 2007; lognormal variance with pedigree 0.0033, pedigree (2,1,3,3,1)
  (same comment as for concrete mixing factory)
- Copper, ion [water, unspecified]: 1.55e-8 kg; source Marceau, M.L. 2007; lognormal variance with pedigree 0.0033, pedigree (2,1,3,3,1)
  (same comment as for wastewater from concrete production)

## Sampling procedure
The data presented in this dataset is representative of ready-mix producers who represent 35% of the concrete production market in ZA.

## Extrapolations
This dataset has been extrapolated from year 2017 to the year of the calculation (2021). The uncertainty has been adjusted accordingly.
