# wood preservation, pressure vessel, creosote, outdoor use, ground contact

Dataset: EcoSpold 2, unit process
Geography: RoW
Time period: 2008-01-01 to 2021-12-31
Technology level: current
Classification: ISIC rev.4 ecoinvent: 1610:Sawmilling and planing of wood
Classification: EcoSpold01Categories: wooden materials/refinement
Scenario: Business-as-Usual
System model: Allocation, cut-off by classification
Generated by: trainee ecoinvent
Published in: Werner F. 2009
Database: ecoinvent
isCopyrightProtected: true
accessRestrictedTo: 1

## General comment
This dataset covers the treatment of timber with creosote in a pressure vessel via the simple Rüping/double Rüping as an empty-cell process. As data was compiled on plant-level for plants that employ both processes, the dataset is not specific for one of the two Rüping processes but reflects the annual mix from the plants under study.
Wood is not included in the dataset.
Pressure processes have been used for more than 150 years for impregnating wood with preservatives. The choice of the pressure process depends on the intended use, the nature and quality of the preservative, and the moisture level of the wood at the time of treatment.
According to DIN 68811:2007 Ber 1:2007-04, the following creosote input can be assumed (for railway sleepers/ cross ties): beech: 130 +/- 20 kg/m3; oak: 35 +/- 15 kg/m3; pine: 65 +/- 15 kg/m3.
The basic equipment for a plant for pressure impregnation consists of an impregnation cylinder with one or two two seals, one or more storage vessels for variouls wood preservatives and solutions of different concentrations, a pressure pump, a vacuum pump, measuring and dissolving vessels, and a control device for maintaining impregnation conditions. Plants for the Rüping process also include a compressor and a pressurizeable storage vessel.
In 1902, Rüping developed an impregnation process where only the endangered cell walls are treated with preservative, while the cell cavities remain empty (therefore also referred to as "empty-cell process as compared to a "full-cell" process). In the Rüping process, air present in the cells is first compressed and absorption of liquid is prevented. The impregnation cyclinder is the filled with preservative while the initial air pressure ain maintained and an impregnating pressure (generally > 0.9 MPa) is produced and maintained over a defined period. The cyclinder is the depressureized to atmospheric pressure. During depressurization, air in the wood, which has been compressed in the prepressure stage and further during impregnation, expands and expels a considerable portion of the preservative from the wood cells. This is then recycled to the storage vessel. Subsequently as high a final vaccum as possible is produced, which results in a second expulsion of preservative. After the cyclinder has been aerated to return it to atmospheric pressure, the impregnating solution recovered during the final vacuum is also recycled to the storage vessel.
The simple Rüping process is suitable for impregnating softwoods, such as pine, spruce, larch, fir, etc. as some hardwoods, such as oak (according to DIN 68811:2007).
The double Rüping process involves the combination of two simple Rüping impregnations and is suited for wood species that are difficult to impregnate (e.g. beech according to DIN 68811:2007). Today, usually the intermediate vacuum is omitted after the first compression period, particularly if preconditioning is made.
Improved Rüping processes with preconditioning (sometimes referred to as the Boulton process) allow a considerably improved creosote distribution in the wood: the creosote is heated to the prescribed impregnation temperature before the beginning of the pressure period. In a preconditioning phase the impregnating cylinder is filled with hot creosote at 115 - 120 °C. After cooling the creosote on the wood, the former is heated again to at least 100 °C. This temperature is maintained until the wood is sufficiently prewarmed. The lower viscosity of the creosote achieved by these measures allows more rapid penetration of the preservative and better distribution in areas of the wood that can be impregnated. Both the simple and the double Rüping process can be improved by pre-conditioning.
A comparable empty cell processes has been developed by Lowry in 1906. This process does not employ preliminary air compression. On the one hand, this allows to us a simplified plant design as for the full-cell process (thus avoiding an air compressor, an extra tank for the preservative, or a pot to force the preservative into the cylinder aginast the air pressure. On the other hand the quantity of liquid expelled is less than in the Rüping process.
Air-borne emissions and emissions into surface water are calculated based on emission factors (EF) as determined in OECD (2000, part 1, p. 46ff), depending on the physical properties of the main componentes of creosote. The determination of emission factors for the PAH considered relevant by the U.S. Environmental Protection Agency (EPA) is documented in the following table:
For detailed calculations see data.
Sources:
OECD (2000): Emission scenario document for wood preservatives, part 1. OECD series on emission scenario documents, number 2, Organisation for Economic Co-operation and Development, Paris.
Werner, F. (2008): Ökologische Bilanzierung von Eisenbahnschwellen; Vergleich von Schwellen aus Buchenholz, Eichenholz, Beton und Stahl. Studiengesellschaft Holzschwellenoberbau e.V., Bingen/Rhein.
Personal written communications of several producers and/or researchers (see source fields for each exchange)

## Included activities start
Service starting with the reception of the creosote at the factory gate

## Included activities end
The data set contains the treatment service of wood with creosote in a pressure vessel: it covers the necessary inputs of creosote, electricity, and heat as well as some infrastructure. The dataset does not include wood. Also eventual waste streams (e.g. saw dust in recovered creosote) or VOC emissions into air during storage are not included; VOC emissions during storage should be accounted for consistently with emissions during the use phase.

## Geography
Data from German plants

## Technology
Average of simple Rüping and double Rüping process currently in use in Germany for the treatment of railway sleepers/crossties.

## Parameters
- share of collected rainwater: 0.5 dimensionless; name share_collected_rainwater
  share of the rainwater that is colleced and lead into the sewer contrary to run-off water; default value according to OECD (2000, part 1)
- scaling factor: 39.6296 dimensionless; name scaling_factor
- efficiency of air filter: 0.75 dimensionless; name efficiency_air_filter
  According to EPA 1999 (p. 10.8-5) 'the result of one emission test on the incinerator-controlled facility indicated a VOC control efficiency of more than 99 percent', although this value refers to the conditioning and first blowback of creosote only. The EPA study does not cover plants with incinerator controlled VOC emissions over the whole process; other emissions control devices such as knock-out tanks followed by a ventury scrubber are indicated to have a VOC control efficiency of 75%. Also filitering devices containing activiated charcoal are used e.g. in Germany in combination with wood fired boilers for the heating of creosote

## Reference product
- wood preservation, pressure vessel, creosote, outdoor use, ground contact: 1 kg; CPC 54730: Painting services; By-product classification allocatable product
  Amount was scaled to 1.
  production volume 4.04042e8 kg; name p_preservation; = 3.65E09 * 0.5 *0.32 * 0.9
    Using the GLO value of 3.65E09 kg preservative derived from Vlosky (2009), the distribution on creosote (32%), the assumption of 50% Type C and 90% pressure methods, we obtain: 3.65E09 kg * 0.5 (type C) *0.32 (creosote) * 0.9 (pressure) = 5.26E08
  property price 0.529326 EUR2005
    Calculated based on inputs: The price of the product has been calculated as a sum of the values of the material and energy inputs for this product. This value is therefore a rough estimation. It may underestimate the real price since there are additional expenses when producing any product. These expences can include for example labour costs, treatment of waste materials and profit for the producer. Please consider carefully whether this level of data quality is acceptable for your application.

## Inputs from technosphere
- heat, district or industrial, natural gas: 0 MJ; source Werner F. 2009; pedigree (1,1,1,1,1)
  normalization of input as reported in source to 1 kg of wood preservative, based on the assumption that for the underlying data, 1/3 of sleepers are oak sleepers and 2/3 are beech sleepers (personal communication, Mr. Schimmelpfennig, Germany)
  Amount was scaled to the amount of reference product.
  properties: heating value, net 1 MJ
- electricity, medium voltage: 0 kWh; source Werner F. 2009; pedigree (1,1,1,1,1)
  EcoSpold01Location=UCTE
- wood preservation facility, oscillating pressure method: 2.22222e-8 unit; = 1/6000/75/100; source Leuenberger H. 2012; lognormal variance with pedigree 0.412, pedigree (3,5,5,5,1)
  per 6000 m3/year over 75 years with an average input of 100 kg of preservative/m3
  Amount was scaled to the amount of reference product.
- wood preservative, creosote: 1 kg; source Werner F. 2009; lognormal variance with pedigree 0.042, pedigree (1,1,5,5,1)
  Amount was scaled to the amount of reference product.
  property carbon content, non-fossil 0; name C_content_non_fossil
  property carbon content, fossil 0.940828; name C_content_fossil
  property water content 0; name water_content
  property wet mass 1 kg; name WM
  property water in wet mass 0 kg; name WWM
  property dry mass 1 kg; name DM
  properties: heating value, net 28.51 MJ
- heat, district or industrial, natural gas: 0.110313, 7.15753 MJ (2 entries); source Werner F. 2009; lognormal variance with pedigree 0.0446, pedigree (1,4,5,5,1)
  (same comment as for heat, district or industrial, natural gas)
- electricity, medium voltage: 0.00172457, 0.000330698, 0.00555174, 0.080745, 0.0113811, 0.0370812 kWh (6 entries); source Werner F. 2009; lognormal variance with pedigree 0.0446, pedigree (1,4,5,5,1)
  EcoSpold01Location=UCTE

## Inputs from nature
- Water, cooling, unspecified natural origin [natural resource, in water]: 0.0729954 m3; name m_cooling_water; = (1.75/3.24/3+1.75/14.1/3*2)/3.6; source Werner F. 2009; lognormal variance with pedigree 0.0446, pedigree (1,4,5,5,1)
  normalization of input as reported in source to 1 kg of wood preservative, based on the assumption that for the underlying data, 1/3 of sleepers are oak sleepers (input of creosote: 3.24 kg/m3) and 2/3 are beech sleepers (input of creosote: 14.1 kg/m3) (personal communication, Mr. Schimmelpfennig, Germany)
  Amount was scaled to the amount of reference product.

## Emissions to nature
- Acenaphthene [air, unspecified]: 0.000466875 kg; = (1-efficiency_air_filter)*2.49E-02*0.075; source OECD 2000; lognormal variance with pedigree 0.4026, pedigree (3,3,5,5,3)
  air emissions from the vacuum system (conditioning cycle and final cycle, the treated wood charge during its removal from treating cylinder and immediately thereafter, and the displaced air from working tank blow backs. Calculated based the averaged composition of 3 different creosotes with grade WEI Type C as reported by Kohler (2002: Gehalte und Emissionen von polyzyklischen aromatischen Kohlenwasserstoffen in und aus teerölbehandelten Holzschwellen des schweizerischen Eisenbahnnetzes. Untersuchungsbericht Nr. 200'055, Empa Duebendorf) and emissions factors for pressure treatment depending on vapor pressure as defined in OECD (2000, part 1).
  Amount was scaled to the amount of reference product.
- Acenaphthene [water, surface water]: 0.0003735 kg; = (1-share_collected_rainwater)*2.49E-02*0.03; source OECD 2000; lognormal variance with pedigree 0.3526, pedigree (3,3,5,5,3)
  leaching emissions during on-site storage, assuming a distribution of emissions as 50% run-off water and 50% as input to the sewage treatment (default as per OECD 2000). Calculated based the averaged composition of 3 different creosotes with grade WEI Type C as reported by Kohler (2002: Gehalte und Emissionen von polyzyklischen aromatischen Kohlenwasserstoffen in und aus teerölbehandelten Holzschwellen des schweizerischen Eisenbahnnetzes. Untersuchungsbericht Nr. 200'055, Empa Duebendorf) and emissions factors for pressure treatment depending on the solubility in water, as defined in OECD (2000, part 1). It should be noted that in modern wood treatment plants, rainwater of storage places is recolleced completely and lead to a sewage treatment. The inventoried value thus is conservative and might need to be adjusted for the specific LCA.
  Amount was scaled to the amount of reference product.
- VOC, volatile organic compounds, unspecified origin [water, unspecified]: 0.00969 kg; = (1-share_collected_rainwater)*6.46E-01*0.03; source OECD 2000; lognormal variance with pedigree 0.3526, pedigree (3,3,5,5,3)
  leaching emissions during on-site storage, assuming a distribution of emissions as 50% run-off water and 50% as input to the sewage treatment (default as per OECD 2000). Calculated based the averaged composition of 3 different creosotes with grade WEI Type C as reported by Kohler (2002: Gehalte und Emissionen von polyzyklischen aromatischen Kohlenwasserstoffen in und aus teerölbehandelten Holzschwellen des schweizerischen Eisenbahnnetzes. Untersuchungsbericht Nr. 200'055, Empa Duebendorf) and emissions factors for pressure treatment depending on the solubility in water, as defined in OECD (2000, part 1). It should be noted that in modern wood treatment plants, rainwater of storage places is recolleced completely and lead to a sewage treatment. The inventoried value thus is conservative and might need to be adjusted for the specific LCA. For unspecified VOC, the most conservative emission factor according to OECD (2000, part) is used.
  Amount was scaled to the amount of reference product.
- Fluorene [water, surface water]: 0.0005805 kg; = (1-share_collected_rainwater)*3.87E-02*0.03; source OECD 2000; lognormal variance with pedigree 0.3526, pedigree (3,3,5,5,3)
  (same comment as for Acenaphthene)
- Benzo(a)pyrene [water, surface water]: 3.645e-8 kg; = (1-share_collected_rainwater)*2.43E-05*0.003; source OECD 2000; lognormal variance with pedigree 0.3526, pedigree (3,3,5,5,3)
  (same comment as for Acenaphthene)
- Naphtalene [air, unspecified]: 0.000291 kg; = (1-efficiency_air_filter)*7.76E-03*0.15; source OECD 2000; lognormal variance with pedigree 0.4026, pedigree (3,3,5,5,3)
  (same comment as for Acenaphthene)
- Naphtalene [water, surface water]: 0.0001164 kg; = (1-share_collected_rainwater)*7.76E-03*0.03; source OECD 2000; lognormal variance with pedigree 0.3526, pedigree (3,3,5,5,3)
  (same comment as for Acenaphthene)
- Acenaphthylene [water, surface water]: 1.0305e-6 kg; = (1-share_collected_rainwater)*6.87E-05*0.03; source OECD 2000; lognormal variance with pedigree 0.3526, pedigree (3,3,5,5,3)
  (same comment as for Acenaphthene)
- Benz(a)anthracene [water, surface water]: 3e-7 kg; = (1-share_collected_rainwater)*2.00E-04*0.003; source OECD 2000; lognormal variance with pedigree 0.3526, pedigree (3,3,5,5,3)
  (same comment as for Acenaphthene)
- Dibenz(a,h)anthracene [water, surface water]: 3.5025e-9 kg; = (1-share_collected_rainwater)*4.67E-06*0.0015; source OECD 2000; lognormal variance with pedigree 0.3526, pedigree (3,3,5,5,3)
  (same comment as for Acenaphthene)
- Benzo(a)pyrene [air, unspecified]: 6.075e-9 kg; = (1-efficiency_air_filter)*2.43E-05*0.001; source OECD 2000; lognormal variance with pedigree 0.4026, pedigree (3,3,5,5,3)
  (same comment as for Acenaphthene)
- Benzo(k)fluoranthene [water, surface water]: 1.6725e-8 kg; = (1-share_collected_rainwater)*2.23E-05*0.0015; source OECD 2000; lognormal variance with pedigree 0.3526, pedigree (3,3,5,5,3)
  (same comment as for Acenaphthene)
- Benzo(b)fluoranthene [water, surface water]: 3.555e-8 kg; = (1-share_collected_rainwater)*2.37E-05*0.003; source OECD 2000; lognormal variance with pedigree 0.3526, pedigree (3,3,5,5,3)
  (same comment as for Acenaphthene)
- Fluoranthene [water, surface water]: 0.001575 kg; = (1-share_collected_rainwater)*1.05E-01*0.03; source OECD 2000; lognormal variance with pedigree 0.3526, pedigree (3,3,5,5,3)
  (same comment as for Acenaphthene)
- Carbon dioxide, fossil [air, non-urban air or from high stacks]: 0.396881 kg; = ((6.46E-01*0.25* C_content_fossil_NMVOC)+(2.43E-05*0.001+1.06*0.001+2.00E-04*0.001+2.37E-05*0.001+1.05E-01*0.001+8.71E-02*0.02+2.49E-02*0.075+6.87E-05*0.02+6.67E-06*0.001+2.23E-05*0.001+1.29E-04*0.001+4.67E-06*0.001+3.87E-02*0.02+7.33E-06*0.001+7.76E-03*0.15+7.91E-02*0.001)*0.94083)*efficiency_air_filter/12*44; lognormal variance with pedigree 0.082, pedigree (5,1,5,5,1)
  all filtered C is assumed to finally be converted into CO2, irrespective of the filter technology being applied; for all PAK, an average value is used for the carbon content; once the values for each individual PAK are accessible, the equation can then be completed
  Amount was scaled to the amount of reference product.
- Pyrene [water, surface water]: 0.0011865 kg; = (1-share_collected_rainwater)*7.91E-02*0.03; source OECD 2000; lognormal variance with pedigree 0.3526, pedigree (3,3,5,5,3)
  (same comment as for Acenaphthene)
- Water [air, unspecified]: 0.0729954 m3; = m_cooling_water; lognormal variance with pedigree 0.2125, pedigree (5,5,5,5,5)
- Benzo(ghi)perylene [water, surface water]: 5.0025e-9 kg; = (1-share_collected_rainwater)*6.67E-06*0.0015; source OECD 2000; lognormal variance with pedigree 0.3526, pedigree (3,3,5,5,3)
  (same comment as for Acenaphthene)
- Indeno(1,2,3-cd)pyrene [water, surface water]: 5.4975e-8 kg; = (1-share_collected_rainwater)*7.33E-06*0.015; source OECD 2000; lognormal variance with pedigree 0.3526, pedigree (3,3,5,5,3)
  (same comment as for Acenaphthene)
- Anthracene [water, surface water]: 7.95e-5 kg; = (1-share_collected_rainwater)*1.06E-02*0.015; source OECD 2000; lognormal variance with pedigree 0.3526, pedigree (3,3,5,5,3)
  (same comment as for Acenaphthene)
- Phenanthrene [water, surface water]: 0.0013065 kg; = (1-share_collected_rainwater)*8.71E-02*0.03; source OECD 2000; lognormal variance with pedigree 0.3526, pedigree (3,3,5,5,3)
  (same comment as for Acenaphthene)
- NMVOC, non-methane volatile organic compounds, unspecified origin [air, unspecified]: 0.040375 kg; = (1-efficiency_air_filter)*6.46E-01*0.25; source OECD 2000; lognormal variance with pedigree 0.4026, pedigree (3,3,5,5,3)
  air emissions from the vacuum system (conditioning cycle and final cycle, the treated wood charge during its removal from treating cylinder and immediately thereafter, and the displaced air from working tank blow backs. Calculated based the averaged composition of 3 different creosotes with grade WEI Type C as reported by Kohler (2002: Gehalte und Emissionen von polyzyklischen aromatischen Kohlenwasserstoffen in und aus teerölbehandelten Holzschwellen des schweizerischen Eisenbahnnetzes. Untersuchungsbericht Nr. 200'055, Empa Duebendorf) and emissions factors for pressure treatment depending on vapor pressure as defined in OECD (2000, part 1). For NMVOC, the highest emission factor has been assumed as a conservative approach.
  Amount was scaled to the amount of reference product.
  property carbon content, non-fossil 0; name C_content_non_fossil_NMVOC
  property carbon content, fossil 0.854049; name C_content_fossil_NMVOC
- Chrysene [water, surface water]: 1.935e-7 kg; = (1-share_collected_rainwater)*1.29E-04*0.003; source OECD 2000; lognormal variance with pedigree 0.3526, pedigree (3,3,5,5,3)
  (same comment as for Acenaphthene)

## Sampling procedure
Plant measurements for input of energy, water, etc. Estimates based on literature for air-borne emissions and emissions into water.

## Extrapolations
Calculated as weighted average of existing local data

## Review by Emilia Moreno Ruiz 2015-10-07
amounts of exchanges corrected
