# purified terephthalic acid production

Dataset: EcoSpold 2, unit process
Geography: RER
Time period: 2011-01-01 to 2021-12-31
Technology level: current
Classification: ISIC rev.4 ecoinvent: 2013:Manufacture of plastics and synthetic rubber in primary forms
Synonyms: PTA
Scenario: Business-as-Usual
System model: Allocation, cut-off by classification
Share of production covered: 79 %
Generated by: Thomas Fröhlich
Published in: PlasticsEurope 2016
Database: ecoinvent
isCopyrightProtected: true
accessRestrictedTo: 1

## General comment
The dataset represents the production mix of commercial PTA production technologies.
Crude terephthalic acid (CTA) is produced by oxidation of p-xylene. A subsequent purification step leads to purified terephthalic acid (PTA). The oxidation reaction is catalysed by cobalt-manganese-bromide cata-lysts. Acetic acid is used as solvent, and compressed air is used for oxygen supply. As a bromide source, usually hydrobromic acid is used, but sodium bromide (NaBr), tetrabromoethane or other bromide com-pounds are also possible.
The conversion of p-xylene is usually carried out in bubble col-umn reactors in liquid phase at elevated temperature (175-225 °C) and pressure (15-30 bar). Temperature control is achieved by boiling point evaporation of acetic acid. Oxidation of p-xylene proceeds via several steps producing terephthalic acid with yields of more than 95 % at conversion of p-xylene of more than 98 %. From the reactor effluent, crude terephthalic acid (CTA) is obtained by crystallisation and centrifuga-tion/filtration. Vapour output from the reactor is condensed in heat exchangers and the condensate (mostly acetic acid and water) is recycled to the reactor. Steam generated from residual heat of this condensate is usually used internally. Liquid output from the centrifuge/filters is also recycled to the reactor after de-gassing and dehydration. For purification, CTA is entirely dissolved in water (at 260 °C) and brought into contact with hydrogen in the presence of a Pd catalyst. Under these conditions the undesired co-product 4-carboxybenzaldehyde (4-CBA) is converted to p-toluic acid, which is separated from terephthalic acid in a series of crystallisers. After centrifugation/filtration and drying, purified terephthalic acid (PTA) is obtained as powder.

## Included activities start
Acitivity starts with p-xylene and ethylene glycol entering the polymerisation plant. Energy supply is included in terms of heat production inside the battery limits of the plant. Steam and electricity supply is outside the activity.

## Included activities end
Activity ends with PTA leaving the factory.

## Geography
EU27 including Norway and Switzerland

## Technology
Coverage of production capacity in Europe: 79%

## Time period
Data was collected for the years 2011-2013, processed in 2014 and published in 2015

## Reference product
- purified terephthalic acid: 1 kg; CPC 347: Plastics in primary forms; By-product classification allocatable product; CAS 100-21-0
  Reference Product
  production volume 4.1e9 kg; name RP_PV
    Production Capacity in 2012 in EU27+NOR+CH, Source: PlasticsEurope
  property heating value, net 21.9 MJ
    LHV is calculated based on the elemental composition of the substance. Based on the name of the substance, the chemical formula of the substance is assumed to be: C8H6O4
  property price 0.67 EUR2005
    Calculated value based on data from United Nations Commodity Trade Statistics Database (comtrade.un.org). UN comtrade category: 291736 Terephthalic acid, its salts. Year 2005. Using exchange rate of 1EURO = 1.209 USD. Average of price of import into 5 main markets (EU, US, JP, IN and CN).
  property carbon content 0.578313
    carbon content on a dry matter basis (reserved; not for manual entry)
  properties: dry mass 1 kg, water content 0, carbon content, non-fossil 0, wet mass 1 kg, water in wet mass 0 kg, carbon content, fossil 0.578313, carbon allocation 0.578313 kg

## Inputs from technosphere
- chemical factory, organics: 4e-10 unit; lognormal variance with pedigree 0.311225, pedigree (2,3,3,2,3)
  Calculated based on literature data published by the industry. For this activity, no information was readily available concerning infrastructure and land-use. Therefore, the infrastructure is estimated based on data from two chemical factories, the BASF site of Ludwigshafen and the chemical factory in Gendorf (which are both located in Germany), which produce a wide range of chemical substances. Based on this data, the following assumptions are made: the built area amounts to about 4.2 ha, the plant has an average output of 50"000 t/a and a lifespan of fifty years. The estimated infrastructure amount is therefore 4.00 E-10 units per kg of produced chemical.
  References:
  Althaus H.-J., Chudacoff M., Hischier R., Jungbluth N., Osses M. and Primas A. (2007) Life Cycle Inventories of Chemicals. ecoinvent report No. 8, v2.0. EMPA Dübendorf, Swiss Centre for Life Cycle Inventories, Dübendorf, CH.
  Gendorf (2000) Umwelterklärung 2000, Werk Gendorf. Werk Gendorf, Burgkirchen.
- waste mineral oil: 0 kg; name BP_amount2; pedigree (1,1,1,1,1)
  Weighted average of reported waste
  production volume 0 kg
    calculated with production volume of reference product
  property price 0 EUR2005; name BP_amount2_price_EUR2005
  properties: carbon content, fossil 0.864444, dry mass 0.9 kg, heating value, net 34.7 MJ, water content 0.111111, wet mass 1 kg
  note on carbon content, fossil: Tab A.6, ecoinvent v2.2 report 13_I. C content has been calculated after data in the tables, and then referred to 1 kg DM
  note on heating value, net: Value taken from the general comment of the treatment dataset.
- heat, from steam, in chemical industry: 1.85538 MJ; lognormal variance with pedigree 0.0033, pedigree (2,2,3,1,1)
  Weighted average of reported input
  properties: heating value, net 1 MJ
- municipal solid waste: -8.92294e-5 kg; name BP_amount4; lognormal variance with pedigree 0.0047, pedigree (3,2,3,1,1)
  Weighted average of reported waste
  production volume 365840 kg; = BP_amount4*RP_PV
    calculated with production volume of reference product
  property price 0 EUR2005; name BP_amount4_price_EUR2005
  properties: dry mass 0.771 kg, carbon content, fossil 0.171549, water content 0.297017, heating value, net 11.74 MJ, wet mass 1 kg, carbon content, non-fossil 0.261655
  note on carbon content, fossil: MSW composition in tab 4.1, ecoinvent v2.2 report 13_I. C content referred to 1 kg DM
- electricity, medium voltage: 0.261587 kWh; lognormal variance with pedigree 0.0033, pedigree (2,2,3,1,1)
  Weighted average of reported input
- cobalt: 0.00021955 kg; lognormal variance with pedigree 0.0033, pedigree (2,2,3,1,1)
  Weighted average of reported input
  properties: wet mass 1 kg, dry mass 1 kg
- acetic acid, without water, in 98% solution state: 0.0554999 kg; lognormal variance with pedigree 0.0033, pedigree (2,2,3,1,1)
  Weighted average of reported input
  properties: wet mass 1 kg, dry mass 1 kg, carbon content, fossil 0.400016, heating value, net 14.6 MJ
  note on heating value, net: Based on literature, page 10, Althaus H.-J., Chudacoff M., Hischier R., Jungbluth N., Osses M. and Primas A. (2007) Life Cycle Inventories of Chemicals. Final report ecoinvent data v2.0 No. 8. EMPA, Swiss Centre for Life Cycle Inventories, Dübendorf, CH, Online-Version under: www.ecoinvent.org.
- nitrogen, liquid: 0.0345896 kg; lognormal variance with pedigree 0.0033, pedigree (2,2,3,1,1)
  Weighted average of reported input
  properties: dry mass 1 kg, wet mass 1 kg
- sodium hydroxide, without water, in 50% solution state: 0.014073 kg; lognormal variance with pedigree 0.0033, pedigree (2,2,3,1,1)
  Weighted average of reported input
  properties: wet mass 1 kg, dry mass 1 kg, heating value, net 3.03 MJ
- chemical, inorganic: 0.000612427 kg; lognormal variance with pedigree 0.0033, pedigree (2,2,3,1,1)
  Sum input parameter covering partly confidential information on additives, solvents, catalysts. Weighted average of reported input materials.
  properties: wet mass 1 kg, dry mass 1 kg, carbon content, fossil 0.003
  note on carbon content, fossil: This dataset is an unweighted average of 20 inorganic substances (listed in Tab 88.1, ecoinvent v2.2 report 8, part II), being part of the top100 chemicals included in this database. The C-content has also been calculated as an unweighted average of the C content of the substances composing this dataset.
- manganese: 0.000217466 kg; lognormal variance with pedigree 0.0033, pedigree (2,2,3,1,1)
  Weighted average of reported input
  properties: wet mass 1 kg, dry mass 1 kg
- natural gas, high pressure: 0 m3; pedigree (1,1,1,1,1)
  Weighted average of reported input
  properties: carbon content, fossil 0.695187, dry mass 1 kg, heating value, net 39 MJ, wet mass 1 kg
  note on heating value, net: Literature value, Source: United Nations Statistics Division (2018) International Recommendations for Energy Statistics (IRES). Available at: http://unstats.un.org/unsd/statcom/doc11/BG-IRES.pdf.
- wastewater, average: 0 m3; name BP_amount6; pedigree (1,1,1,1,1)
  Weighted average of reported waste
  production volume 0 m3
    calculated with production volume of reference product
  property price 0 EUR2005; name BP_amount6_price_EUR2005
  properties: water content 2882.2, dry mass 0.346837 kg, carbon content, non-fossil 0.194039, wet mass 1000 kg
  note on carbon content, non-fossil: 0.0673 kg TOC/m3 (Tab A.17, ecoinvent v2.2 report 13_I). TOC was considered as Total Carbon.
- compressed air, 600 kPa gauge: 0.345986 m3; lognormal variance with pedigree 0.0033, pedigree (2,2,3,1,1)
  Weighted average of reported input
- sewage sludge: -3.73978e-6 m3; name BP_amount1; lognormal variance with pedigree 0.0047, pedigree (3,2,3,1,1)
  Weighted average of reported waste
  production volume 15333.1 m3; = BP_amount1*RP_PV
    calculated with production volume of reference product
  property price 0 EUR2005; name BP_amount1_price_EUR2005
  properties: carbon content, non-fossil 0.4096, water content 19, wet mass 721 kg, dry mass 36.05 kg
- xylene: 0.658543 kg; lognormal variance with pedigree 0.0033, pedigree (2,2,3,1,1)
  Weighted average of reported input
  properties: carbon content, fossil 0.905061, dry mass 1 kg, wet mass 1 kg, heating value, net 38.84 MJ
- chemical, organic: 0.00744987 kg; lognormal variance with pedigree 0.0033, pedigree (2,2,3,1,1)
  (same comment as for chemical, inorganic)
  properties: carbon content, fossil 0.628, wet mass 1 kg, heating value, net 19.03 MJ, dry mass 1 kg
  note on carbon content, fossil: This dataset is an unweighted average of 20 organic substances (listed in Tab 88.1, ecoinvent v2.2 report 8, part II), being part of the top100 chemicals included in this database. The C-content has also been calculated as an unweighted average of the C content of the substances composing this dataset.
- hazardous waste, for incineration: 0 kg; name BP_amount3; pedigree (1,1,1,1,1)
  Weighted average of reported waste
  production volume 0 kg
    calculated with production volume of reference product
  property price 0 EUR2005; name BP_amount3_price_EUR2005
  properties: carbon content, fossil 0.554667, heating value, net 17 MJ, dry mass 0.75 kg, wet mass 1 kg, water content 0.333333
- waste mineral oil: -3.64674e-5, -9.02789e-7 kg (2 entries); lognormal variance with pedigree 0.0047, pedigree (3,2,3,1,1)
  Weighted average of reported waste
  production volume 153218 kg
- natural gas, high pressure: 0.0216546, 0.000139815 m3 (2 entries); lognormal variance with pedigree 0.0033, pedigree (2,2,3,1,1)
  Weighted average of reported input
- wastewater, average: -0.00494355, -0.0005348 m3 (2 entries); lognormal variance with pedigree 0.0047, pedigree (3,2,3,1,1)
  Weighted average of reported waste
  production volume 2.24612e7 m3
- hazardous waste, for incineration: -4.60947e-5, -1.20489e-6 kg (2 entries); lognormal variance with pedigree 0.0047, pedigree (3,2,3,1,1)
  Weighted average of reported waste
  production volume 193928 kg

## Inputs from nature
- Water, river [natural resource, in water]: 0.00143331 m3; lognormal variance with pedigree 0.0047, pedigree (3,2,3,1,1)
  Weighted average of reported input
- Water, well, in ground [natural resource, in water]: 7.89904e-5 m3; lognormal variance with pedigree 0.0047, pedigree (3,2,3,1,1)
  Weighted average of reported input
- Water, cooling, unspecified natural origin [natural resource, in water]: 0.00167304 m3; lognormal variance with pedigree 0.0047, pedigree (3,2,3,1,1)
  Weighted average of reported input
- Water, unspecified natural origin [natural resource, in water]: 0.00279464 m3; lognormal variance with pedigree 0.0047, pedigree (3,2,3,1,1)
  Weighted average of reported input

## Emissions to nature
- Nitrogen, organic bound [water, unspecified]: 3.54178e-5 kg; lognormal variance with pedigree 0.0432, pedigree (2,3,3,1,1)
  Weighted average of reported emissions
- NMVOC, non-methane volatile organic compounds, unspecified origin [air, unspecified]: 0.000377925 kg; lognormal variance with pedigree 0.0427, pedigree (2,2,3,1,1)
  Weighted average of reported emissions
- Arsenic, ion [water, unspecified]: 2.61569e-10 kg; lognormal variance with pedigree 0.6532, pedigree (2,3,3,1,1)
  Weighted average of reported emissions
- Copper, ion [water, unspecified]: 4.41718e-10 kg; lognormal variance with pedigree 0.6532, pedigree (2,3,3,1,1)
  Weighted average of reported emissions
- Lead [water, unspecified]: 4.70038e-10 kg; lognormal variance with pedigree 0.6532, pedigree (2,3,3,1,1)
  Weighted average of reported emissions
- Phosphorus [water, unspecified]: 5.34348e-6 kg; lognormal variance with pedigree 0.0432, pedigree (2,3,3,1,1)
  Weighted average of reported emissions
- Chromium, ion [water, unspecified]: 4.10395e-8 kg; lognormal variance with pedigree 0.6532, pedigree (2,3,3,1,1)
  Weighted average of reported emissions
- Acetic acid [air, unspecified]: 2.19616e-5 kg; lognormal variance with pedigree 0.1232, pedigree (2,3,3,1,1)
  Weighted average of reported waste
- Nitrogen oxides [air, unspecified]: 6.21985e-5 kg; lognormal variance with pedigree 0.0427, pedigree (2,2,3,1,1)
  Weighted average of reported emissions
- Water [air, unspecified]: 0.000501912 m3; lognormal variance with pedigree 0.0107, pedigree (4,2,3,1,1)
  Calculated to close water balance
- Methanol [air, unspecified]: 8.88155e-6 kg; lognormal variance with pedigree 0.1232, pedigree (2,3,3,1,1)
  Weighted average of reported emissions
- Sulfur dioxide [air, unspecified]: 3.12074e-6 kg; lognormal variance with pedigree 0.0038, pedigree (2,3,3,1,1)
  Weighted average of reported emissions
- Particulates, > 10 um [air, unspecified]: 2.06699e-6 kg; lognormal variance with pedigree 0.1232, pedigree (2,3,3,1,1)
  Weighted average of reported emissions
- Carbon dioxide, fossil [air, unspecified]: 0.106456 kg; lognormal variance with pedigree 0.0033, pedigree (2,2,3,1,1)
  Weighted average of reported emissions
- Methyl acetate [air, unspecified]: 1.61463e-5 kg; lognormal variance with pedigree 0.1232, pedigree (2,3,3,1,1)
  Weighted average of reported emissions
- Methane, bromo-, Halon 1001 [air, unspecified]: 3.01354e-5 kg; lognormal variance with pedigree 0.1232, pedigree (2,3,3,1,1)
  Weighted average of reported waste
- Xylene [air, unspecified]: 3.63438e-5 kg; lognormal variance with pedigree 0.1232, pedigree (2,3,3,1,1)
  Weighted average of reported emissions
- Methane, fossil [air, unspecified]: 0.000203583 kg; lognormal variance with pedigree 0.0432, pedigree (2,3,3,1,1)
  Weighted average of reported emissions
- Cobalt [water, unspecified]: 1.7482e-6 kg; lognormal variance with pedigree 0.6532, pedigree (2,3,3,1,1)
  Weighted average of reported emissions
- Nickel, ion [water, unspecified]: 5.67319e-8 kg; lognormal variance with pedigree 0.6532, pedigree (2,3,3,1,1)
  Weighted average of reported emissions
- Carbon monoxide, fossil [air, unspecified]: 0.00097233 kg; lognormal variance with pedigree 0.6532, pedigree (2,3,3,1,1)
  Weighted average of reported emissions
- Zinc, ion [water, unspecified]: 1.29893e-7 kg; lognormal variance with pedigree 0.6532, pedigree (2,3,3,1,1)
  Weighted average of reported emissions
- Dinitrogen monoxide [air, unspecified]: 6.64666e-7 kg; lognormal variance with pedigree 0.0427, pedigree (2,2,3,1,1)
  Weighted average of reported emissions
- Mercury [water, unspecified]: 9.90817e-10 kg; lognormal variance with pedigree 0.6532, pedigree (2,3,3,1,1)
  Weighted average of reported emissions
- Methyl formate [air, unspecified]: 1.25639e-7 kg; lognormal variance with pedigree 0.1232, pedigree (2,3,3,1,1)
  Weighted average of reported emissions
- Toluene [air, unspecified]: 1.17687e-5 kg; lognormal variance with pedigree 0.1232, pedigree (2,3,3,1,1)
  Weighted average of reported emissions
- Benzene [air, unspecified]: 8.7144e-6 kg; lognormal variance with pedigree 0.1232, pedigree (2,3,3,1,1)
  Weighted average of reported emissions
- Suspended solids, unspecified [water, unspecified]: 3.92536e-5 kg; lognormal variance with pedigree 0.0427, pedigree (2,2,3,1,1)
  Weighted average of reported emissions
- Cadmium, ion [water, unspecified]: 6.1754e-11 kg; lognormal variance with pedigree 0.6532, pedigree (2,3,3,1,1)
  Weighted average of reported emissions
- Particulates, < 2.5 um [air, unspecified]: 3.72484e-6 kg; lognormal variance with pedigree 0.1232, pedigree (2,3,3,1,1)
  Weighted average of reported emissions

## Sampling procedure
Questionnaires sent out to all production units in Europe operated by PlasticEurope/ECVM member companies.

## Extrapolations
This dataset has been extrapolated from year 2017 to the year of the calculation (2021). The uncertainty has been adjusted accordingly.
