# glass etching factory construction

Dataset: EcoSpold 2, unit process
Geography: DK
Time period: 2002-01-01 to 2021-12-31
Technology level: current
Classification: EcoSpold01Categories: glass/construction
Classification: ISIC rev.4 ecoinvent: 4100:Construction of buildings
Tags: ConvertedDataset
Scenario: Business-as-Usual
System model: Allocation, cut-off by classification
Generated by: Niels Jungbluth
Published in: Kellenberger D. 2007
Database: ecoinvent
isCopyrightProtected: true
accessRestrictedTo: 1

## General comment
Infrastructure of a glass etching plant.
[This dataset was already contained in the ecoinvent database version 2. It was not individually updated during the transfer to ecoinvent version 3. Life Cycle Impact Assessment results may still have changed, as they are affected by changes in the supply chain, i.e. in other datasets. This dataset was generated following the ecoinvent quality guidelines for version 2. It may have been subject to central changes described in the ecoinvent version 3 change report (http://www.ecoinvent.org/database/ecoinvent-version-3/reports-of-changes/), and the results of the central updates were reviewed extensively. The changes added e.g. consistent water flows and other information throughout the database. The documentation of this dataset can be found in the ecoinvent reports of version 2, which are still available via the ecoinvent website. The change report linked above covers all central changes that were made during the conversion process.]

## Included activities end
Infrastructure of a glass etching plant with data for land use and area of buildings. No data for machinery. Annual capacity normalized to 100000 m2/a.

## Geography
Production plant in DK. Building background data from CH.

## Technology
Infrastructure of a plant for the anti reflex etching process.

## Time period
Date of estimation.

## Reference product
- glass etching factory: 1 unit; By-product classification allocatable product; CPC 53269: Other constructions for manufacturing
  EcoSpold01Location=DK
  production volume 0.0225477 unit
    This is a placeholder value that does not reflect real-world production volumes. This dataset does not currently require a real-world production volume to work in the database framework, and no actual data were collected yet. This has no negative effect on the results of the ecoinvent database. The placeholder value of this activity was scaled according to the nominal GDP of 2005 (source: United Nations, http://data.un.org/Glossary.aspx?q=GDP+%28current+US%24%29, accessed 20130726) to reflect an appropriate share of the global production volume, which is also a placeholder value.
  property price 167939 EUR2005
    Calculated based on inputs: The price of the product has been calculated as a sum of the values of the material and energy inputs for this product. This value is therefore a rough estimation. It may underestimate the real price since there are additional expenses when producing any product. These expences can include for example labour costs, treatment of waste materials and profit for the producer. Please consider carefully whether this level of data quality is acceptable for your application.

## Inputs from technosphere
- building, hall: 1200 m2; lognormal variance with pedigree 0.3402, pedigree (1,2,5,3,1)
  EcoSpold01Location=CH
  Questionnaire
  Uncertainty: Questionnaire

## Inputs from nature
- Transformation, from unspecified [natural resource, land]: 6000 m2; lognormal variance with pedigree 0.1602, pedigree (1,2,5,3,1)
  Questionnaire
  Uncertainty: Questionnaire
- Transformation, to industrial area [natural resource, land]: 6000 m2; lognormal variance with pedigree 0.1602, pedigree (1,2,5,3,1)
  Questionnaire
  Uncertainty: Questionnaire
- Occupation, industrial area [natural resource, land]: 540000 m2*year; lognormal variance with pedigree 0.0802, pedigree (1,2,5,3,1)
  Standard 50a occupation
  Uncertainty: Standard 50a occupation

## Sampling procedure
Questionnaire.

## Extrapolations
This dataset has been extrapolated from year 2002 to the year of the calculation (2021). The uncertainty has been adjusted accordingly.

## Review by Daniel Kellenberger (obsolete) 2003-06-13
passed
