# grass production, organic, intensive

Dataset: EcoSpold 2, unit process
Geography: CH
Time period: 1995-01-01 to 2021-12-31
Technology level: current
Classification: ISIC rev.4 ecoinvent: 0119:Growing of other non-perennial crops
Scenario: Business-as-Usual
System model: Allocation, cut-off by classification
Generated by: Fredy Dinkel
Published in: Jungbluth N. 2007
Database: ecoinvent
isCopyrightProtected: true
accessRestrictedTo: 1

## General comment
This dataset represents the production of 1 kg of grass (dry matter). The dry matter yield is 11500 kg/ha. Moisture content at harvest is 85%.
[This dataset was already contained in the ecoinvent database version 2. It was not individually updated during the transfer to ecoinvent version 3. Life Cycle Impact Assessment results may still have changed, as they are affected by changes in the supply chain, i.e. in other datasets. This dataset was generated following the ecoinvent quality guidelines for version 2. It may have been subject to central changes described in the ecoinvent version 3 change report (http://www.ecoinvent.org/database/ecoinvent-version-3/reports-of-changes/), and the results of the central updates were reviewed extensively. The changes added e.g. consistent water flows and other information throughout the database. The documentation of this dataset can be found in the ecoinvent reports of version 2, which are still available via the ecoinvent website. The change report linked above covers all central changes that were made during the conversion process.]

## Included activities start
This activity assumes grass production on a temporary meadow during three years (2-3 years in regions with high arable use, 3-4 years in regions with low arable use) and represents an average of the three years; it starts with the soil cultivation and sowing after the harvest of the previous crop. The input of seeds is considered. Farm manure as an organic fertiliser is only accounted for in terms of direct field emissions; all pre-processes are included in the animal production systems.

## Included activities end
The dataset includes all machine operations and corresponding machine infrastructure and sheds. Machine operations are: soil cultivation, sowing, fertilisation, mowing and loading for transport. This activity ends after loading of the grass at the farm gate.

## Geography
Refers to a production in the Swiss plateau (lowlands <700m).

## Technology
Intensive organic production.

## Parameters
- fraction, irrigation water, to air: 0.3353 dimensionless; name fraction_IW_to_air; lognormal variance with pedigree 0.0409, pedigree (2,2,2,1,1)
  Literature value (Siebert, 2010) (Vionnet, S., Quantis Water Database - Technical Report, 2012).
- fraction, irrigation water to surface water: 0.2 dimensionless; name fraction_IW_to_surface_water; lognormal variance with pedigree 0.0886, pedigree (4,3,1,1,4)
  Literature value (Döll, 2011) cross referenced with expert opinion.
- fraction, irrigation water, to ground water: 0.8 dimensionless; name fraction_IW_to_ground_water; lognormal variance with pedigree 0.0886, pedigree (4,3,1,1,4)
  Literature value (Döll, 2011) cross referenced with expert opinion.

## Reference product
- grass, organic: 1 kg; name REF_PRODUCT; By-product classification allocatable product; CPC 01919: Forage products, n.e.c.
  Net yield of 11'500 kg DM/(ha*year) (experts assumption R. Tschachtli, LBBZ, 2005).
  production volume 1.70703e8 kg
    Source: ecoinvent 2; 12% organic production
  property price 0.645 EUR2005; name REF_PRODUCT_price_EUR2005
    Temporary price data. Calculated as 90% of purchasers price based on: Source: Ecoinvent report nr. 17, table 12.46
  property energy content 17.9 MJ; name REF_PRODUCT_energy_content
    Approximation by values for hay. See chapter 'Product Properties' in '01_crop production - yields & inputs CH & Europe_v1.0.pdf', section 'AGRICULTURAL PRODUCTION IN SWITZERLAND' - pdf-document on the dedicated talk page of ecoinvent (www.ecoinvent.org/documentation).
  property carbon content, non-fossil 0.443857; name REF_PRODUCT_C_content_non_fossil
    biogene carbon content on a dry matter basis
    Composition data obtained from the average composition of Fescue Fresh, Orchardgrass Fresh, and Timothy Fresh in (http://beefmagazine.com/images/2009%20feed%20table.pdf). First, composition data were refered to 1 kg dry mass. Then, C-contents were calculated considering a C-content/dry mass of 46% in carbohydrates (including fibres), 53% in proteins and 75% in fats. All data from 'Evolutionary and Biochemical Aspects', A.D. Kay and T. Vrede (in Global Ecology, 2010, Elsevier B.V., S.E. Jørgensen Ed.).
  property dry mass 1 kg; name REF_PRODUCT_DM
  property carbon content 0.443857
    carbon content on a dry matter basis (reserved; not for manual entry)
  properties: water in wet mass 5.66667 kg, wet mass 6.66667 kg, water content 5.66667, carbon content, fossil 0, carbon allocation 0.443857 kg

## Inputs from technosphere
- mowing, by rotary mower: 0.00043478 ha; source LBL 2004; lognormal variance with pedigree 0.0506, pedigree (2,1,5,1,1)
  4-6 harvests (LBL 2004), 5 harvests assumed
  This exchange has an activity link directly to the producing activity because the product is primarily consumed in the same geographical area where it is produced.
- grass seed, organic, for sowing: 0.0011594 kg; name SEED; source Hersener J.-L. 1997; lognormal variance with pedigree 0.0407, pedigree (2,2,5,1,1)
  As in Hersener et al. (1997), 40 kg/ha. Assumed cultivation time 3 years
  property dry mass 0.9 kg; name SEED_DM
  property carbon content, non-fossil 0.464601; name SEED_C_content_non_fossil
  property energy content 16.299 MJ; name SEED_energy_content
  properties: wet mass 1 kg, water content 0.111111
  note on carbon content, non-fossil: biogene carbon content on a dry matter basis wheat grains values are used
  note on energy content: See chapter 'Product Properties' in '01_crop production - yields & inputs CH & Europe_v1.0.pdf', section 'AGRICULTURAL PRODUCTION IN SWITZERLAND' - pdf-document on the dedicated talk page of ecoinvent (www.ecoinvent.org/documentation).
- tillage, harrowing, by rotary harrow: 2.8986e-5 ha; source Hersener J.-L. 1997; lognormal variance with pedigree 0.0587, pedigree (2,2,5,1,3)
  Cultivation of soil as in Hersener et al. 1997, assumed cultivation time 3 years.
  This exchange has an activity link directly to the producing activity because the product is primarily consumed in the same geographical area where it is produced.
- irrigation: 0.000134376 m3; name water_irrigation_input; source Siebert, S. 2010; lognormal variance with pedigree 0.0427, pedigree (2,2,5,1,1)
  Calculated based on literature values (Döll, 2010) and partially modelled at ETH (Pfister, S.).
  property dry mass 0.11 kg; name DM
  property carbon content, fossil 0; name C_content_fossil
  property carbon content, non-fossil 0; name C_content_non_fossil
  property wet mass 1000 kg; name WM
  property water content 9089.91; name water_content
  property water in wet mass 999.89 kg; name WWM
- tillage, rolling: 2.8986e-5 ha; source Hersener J.-L. 1997; lognormal variance with pedigree 0.0587, pedigree (2,2,5,1,3)
  (same comment as for tillage, harrowing, by rotary harrow)
- tillage, cultivating, chiselling: 2.8986e-5 ha; source Hersener J.-L. 1997; lognormal variance with pedigree 0.0587, pedigree (2,2,5,1,3)
  (same comment as for tillage, harrowing, by rotary harrow)
- sowing: 2.8986e-5 ha; source Hersener J.-L. 1997; lognormal variance with pedigree 0.0587, pedigree (2,2,5,1,3)
  (same comment as for tillage, harrowing, by rotary harrow)
- liquid manure spreading, by vacuum tanker: 0.006087 m3; source LBL 2004; lognormal variance with pedigree 0.0587, pedigree (2,2,5,1,3)
  Amount N corresponding to the fertilization recommendations in LBL (2004). Portion of organic and mineral fertilizer as for hay from natural intensive meadow in ecoinvent report No.15 (Nemecek et al. 2004). Initial fertilization of slurry before seeding considered addtionally.
  This exchange has an activity link directly to the producing activity because the product is primarily consumed in the same geographical area where it is produced.
- fodder loading, by self-loading trailer: 0.056 m3; lognormal variance with pedigree 0.0587, pedigree (2,2,5,1,3)
  Calculation with 120 kg/m3 and dry matter content 15% at harvest (=0.056 m3/kg DM)
  This exchange has an activity link directly to the producing activity because the product is primarily consumed in the same geographical area where it is produced.
- solid manure loading and spreading, by hydraulic loader and spreader: 0.86957 kg; source LBL 2004; lognormal variance with pedigree 0.0587, pedigree (2,2,5,1,3)
  Amount N corresponding to the fertilization recommendations in LBL (2004). Portion of slurry and manure as for hay from natural intensive meadow in ecoinvent report No.15 (Nemecek et al. 2004). Initial fertilization of slurry before seeding considered addtionally.
  This exchange has an activity link directly to the producing activity because the product is primarily consumed in the same geographical area where it is produced.

## Inputs from nature
- Transformation, from pasture, man made, intensive [natural resource, land]: 0.086957 m2; lognormal variance with pedigree 0.1781, pedigree (4,2,5,1,1)
  Modelled, see chapter 'Land use' in '01_crop production_direct field emissions and natural resources_v1.0.pdf' - pdf-document on the dedicated talk page of ecoinvent (www.ecoinvent.org/documentation)
- Transformation, from annual crop, non-irrigated, extensive [natural resource, land]: 0.2029 m2; lognormal variance with pedigree 0.1781, pedigree (4,2,5,1,1)
  (same comment as for Transformation, from pasture, man made, intensive)
- Carbon dioxide, in air [natural resource, in air]: 1.6257 kg; = 44/12 * (REF_PRODUCT_C_content_non_fossil * REF_PRODUCT * REF_PRODUCT_DM - SEED_C_content_non_fossil * SEED * SEED_DM); lognormal variance with pedigree 0.0407, pedigree (2,1,5,3,1)
  Modelled,see chapter 'CO2 binding' in '01_crop production_direct field emissions and natural resources_v1.0.pdf' - pdf-document on the dedicated talk page of ecoinvent (www.ecoinvent.org/documentation)
- Transformation, to pasture, man made, intensive [natural resource, land]: 0.28986 m2; lognormal variance with pedigree 0.1781, pedigree (4,2,5,1,1)
  (same comment as for Transformation, from pasture, man made, intensive)
- Energy, gross calorific value, in biomass [natural resource, biotic]: 17.9 MJ; lognormal variance with pedigree 0.041981, pedigree (2,1,5,3,1)
  Calculation with 17.9 MJ/kg DM (Nemecek et al. 2004, Tab. 4.7))
- Occupation, pasture, man made, intensive [natural resource, land]: 0.86957 m2*year; lognormal variance with pedigree 0.0807, pedigree (2,2,5,1,1)
  (same comment as for Transformation, from pasture, man made, intensive)

## Emissions to nature
- Phosphate [water, ground-]: 1.5405e-5 kg; source Nemecek, T. 2004; lognormal variance with pedigree 0.1608, pedigree (2,2,5,3,4)
  Formula as in ecoinvent report No. 15, chapter 4.4 (Nemecek et al. 2004)
- Nitrate [water, ground-]: 0.0013 kg; lognormal variance with pedigree 0.1608, pedigree (2,2,5,3,4)
  Modelled with the 'SALCA-NO3 model' described in '01_crop production_direct field emissions and natural resources_v1.0.pdf' - pdf-document on the dedicated talk page of ecoinvent (www.ecoinvent.org/documentation)
- Cadmium [soil, agricultural]: -6.5038e-8 kg; source Nemecek, T. 2004
  Calculation input - output balance using data about metal content of grass, seed and fertilizers summarized in Nemecek et al. (2004)
- Lead [soil, agricultural]: -1.9857e-6 kg; source Nemecek, T. 2004
  (same comment as for Cadmium)
- Nitrogen oxides [air, non-urban air or from high stacks]: 5.376e-5 kg; = 0.21 * N2O; lognormal variance with pedigree 0.1607, pedigree (2,1,5,3,4)
  Modelled, see chapter 'Emissions of NOx to the air' in '01_crop production_direct field emissions and natural resources_v1.0.pdf' - pdf-document on the dedicated talk page of ecoinvent (www.ecoinvent.org/documentation)
- Mercury [soil, agricultural]: -1.0696e-8 kg; source Nemecek, T. 2004
  (same comment as for Cadmium)
- Phosphate [water, surface water]: 5.3238e-5 kg; source Nemecek, T. 2004; lognormal variance with pedigree 0.1608, pedigree (2,2,5,3,4)
  Formula as in ecoinvent report No. 15, chapter 4.4 (Nemecek et al. 2004)
- Phosphorus [water, surface water]: 2.6852e-5 kg; source Nemecek, T. 2004; lognormal variance with pedigree 0.1608, pedigree (2,2,5,3,4)
  Formula as in ecoinvent report No. 15, chapter 4.4 (Nemecek et al. 2004)
- Nickel [soil, agricultural]: -1.824e-7 kg; source Nemecek, T. 2004
  Modelled, see chapter 'Emissions of heavy metals to agricultural soil, surface water and ground water' in '01_crop production_direct field emissions and natural resources_v1.0.pdf' - pdf-document on the dedicated talk page of ecoinvent (www.ecoinvent.org/documentation)
- Chromium [soil, agricultural]: 2.6779e-7 kg; source Nemecek, T. 2004; lognormal variance with pedigree 0.1087, pedigree (2,1,5,3,3)
  (same comment as for Cadmium)
- Copper [soil, agricultural]: 2.1346e-6 kg; source Nemecek, T. 2004; lognormal variance with pedigree 0.1087, pedigree (2,1,5,3,3)
  (same comment as for Cadmium)
- Dinitrogen monoxide [air, non-urban air or from high stacks]: 0.000256 kg; name N2O; lognormal variance with pedigree 0.1607, pedigree (2,1,5,3,4)
  Modelled, see chapter 'Emissions of N2O to the air' in '01_crop production_direct field emissions and natural resources_v1.0.pdf' - pdf-document on the dedicated talk page of ecoinvent (www.ecoinvent.org/documentation)
- Water [air, unspecified]: 4.50562e-5 m3; name water_to_air_unspecified; = (water_irrigation_input*fraction_IW_to_air); lognormal variance with pedigree 0.0807, pedigree (2,2,5,1,1)
  Calculated value based on literature values and expert opinion. See comments in the parametres' comment field.
  property fraction, origin: unspecified 0; name fraction_origin_unspecified
  property fraction, origin: salt water 0; name fraction_origin_salt_water
  property fraction, origin: fresh water 1; name fraction_origin_fresh_water
- Ammonia [air, non-urban air or from high stacks]: 0.00409587 kg; lognormal variance with pedigree 0.1207, pedigree (2,1,5,3,4)
  Modelled with the 'AGRAMMON model' described in '01_crop production_direct field emissions and natural resources_v1.0.pdf' - pdf-document on the dedicated talk page of ecoinvent (www.ecoinvent.org/documentation)
- Water [water, ground-]: 7.14557e-5 m3; name water_to_water_ground; = water_irrigation_input*(1-fraction_IW_to_air)*fraction_IW_to_ground_water; lognormal variance with pedigree 0.1286, pedigree (4,3,5,1,4)
  Calculated value. See the parameters and their comments to understand the calculation.
  property fraction, origin: fresh water 1; name fraction_origin_fresh_water_Wgw
  property fraction, origin: unspecified 0; name fraction_origin_unspecified_Wgw
  property fraction, origin: salt water 0; name fraction_origin_salt_water_Wgw
- Zinc [soil, agricultural]: 9.1478e-6 kg; source Nemecek, T. 2004; lognormal variance with pedigree 0.1087, pedigree (2,1,5,3,3)
  (same comment as for Cadmium)
- Water [water, surface water]: 1.78639e-5 m3; name water_to_water_surface; = water_irrigation_input*(1-fraction_IW_to_air)*fraction_IW_to_surface_water; lognormal variance with pedigree 0.1286, pedigree (4,3,5,1,4)
  Calculated value. See the parameters and their comments to understand the calculation.
  property fraction, origin: fresh water 1; name fraction_origin_fresh_water_Wsw
  property fraction, origin: salt water 0; name fraction_origin_salt_water_Wsw

## Sampling procedure
Data were compiled from statistics, fertilising recommendations, documents from extension services and expert knowledge.

## Extrapolations
This dataset has been extrapolated from year 2005 to the year of the calculation (2021). The uncertainty has been adjusted accordingly.

## Review by Niels Jungbluth 2005-12-02
Passed.
