# treatment of residue from mechanical treatment, laptop computer, municipal waste incineration

Dataset: EcoSpold 2, unit process
Geography: CH
Time period: 1994-01-01 to 2021-12-31
Technology level: outdated
Classification: ISIC rev.4 ecoinvent: 3821:Treatment and disposal of non-hazardous waste
Classification: EcoSpold01Categories: waste management/municipal incineration
Tags: ConvertedDataset; Treatment
Scenario: Business-as-Usual
System model: Allocation, cut-off by classification
Generated by: Roland Hischier
Published in: Hischier R. 2007
Database: ecoinvent
isCopyrightProtected: true
accessRestrictedTo: 1

## General comment
Inventoried waste contains 1.85% rubber; 45.2% Plastics from electronic consumer goods; 45.2% Plastics from electronic industrial goods; 1.99% MSWI iron scrap; 3.6% Alu in MSW; 0.33% Glass; 1.71% wiring copper; 0.04% Pb in ASR inert; 0.02% silver; .
waste composition (wet, in ppm): upper heating value 33.35 MJ/kg; lower heating value 31.96 MJ/kg; H2O 8362.7; O 50596; H 68913; C 752590; S 400.06; N 12032; P 468.24; B n.a.; Cl 6303; Br 4975.5; F 226.16; I n.a.; Ag 200; As 6.7848; Ba 160.12; Cd 136.46; Co 26.666; Cr 72.375; Cu 20260; Hg 0.76896; Mn 54.002; Mo 2.7139; Ni 474.12; Pb 541.98; Sb 4342.1; Se 1.7727; Sn 196.97; V 5.6535; Zn 698.96; Be 0.42207; Sc n.a.; Sr 74.707; Ti 4050.1; Tl 0.33766; W n.a.; Si 4483.2; Fe 17653; Ca 3055.5; Al 38195; K 105.84; Mg n.a.; Na 338.95;
Share of carbon in waste that is biogenic 0%.
Share of iron in waste that is metallic/recyclable 91.9%.
Net energy produced in MSWI: 3.64MJ/kg waste electric energy and 7.33MJ/kg waste thermal energy
Allocation of energy production: no substitution or expansion. Total burden allocated to waste disposal function of MSWI.
One kg of this waste produces 0.1256 kg of slag and 0.01682 kg of residues, which are landfilled. Additional solidification with 0.006727 kg of cement.
[This dataset was already contained in the ecoinvent database version 2. It was not individually updated during the transfer to ecoinvent version 3. Life Cycle Impact Assessment results may still have changed, as they are affected by changes in the supply chain, i.e. in other datasets. This dataset was generated following the ecoinvent quality guidelines for version 2. It may have been subject to central changes described in the ecoinvent version 3 change report (http://www.ecoinvent.org/database/ecoinvent-version-3/reports-of-changes/), and the results of the central updates were reviewed extensively. The changes added e.g. consistent water flows and other information throughout the database. The documentation of this dataset can be found in the ecoinvent reports of version 2, which are still available via the ecoinvent website. The change report linked above covers all central changes that were made during the conversion process.]

## Included activities end
waste-specific air and water emisions from incineration, auxiliary material consumption for flue gas cleaning. Short-term emissions to river water and long-term emisisons to ground water from slag compartment (from bottom slag) and residual material landfill (from solidified fly ashes and scrubber slugde). Process energy demands for MSWI.

## Geography
Specific to the technology mix encountered in Switzerland in 2000. Well applicable to modern incineration practices in Europe, North America or Japan.

## Technology
replaced by newer incineration technology with fly ash extraction. Average Swiss MSWI plants in 2000 (grate incinerators) with electrostatic precipitator for fly ash (ESP), wet flue gas scrubber and 29.4% SNCR , 32.2% SCR-high dust , 24.6% SCR-low dust -DeNOx facilities and 13.8% without Denox (by burnt waste, according to Swiss average). Share of waste incinerated in plants with magnetic scrap separation from slag : 50%. Gross electric efficiency technology mix 12.997% and Gross thermal efficiency technology mix 25.57%

## Time period
Waste composition as given in literature reference, theoretical data or other source. Transfer coefficients for modern Swiss MSWI. Emission speciation based on early 90ies data.

## Reference product
- residue from mechanical treatment, laptop computer: -1 kg; CPC 39990: Other wastes n.e.c.; By-product classification Waste
  EcoSpold01Location=CH
  production volume 0 kg; name RP_PV_1
    outdated. Replaced by newer incineration technology with fly ash extraction.
  property price 0 EUR2005
    Waste products are assigned a price of zero as they are assumed to require further treatment.
  property heating value, net 31.96 MJ
    Value taken from the general comment of the treatment dataset.
  property carbon content, fossil 0.766065
    Tab 4.19, ecoinvent v2.2 report 18_V, for details in fraction composition. Carbon content in plastic was calculated using data in Tab A.2, ecoinvent v2.2 report 13_I. Others was also considered plastic, and calculated the same way (from pg 70, ecoinvent v2.2 report 18_V). Ferro was assumed to have a C content of 0.012 kg C/ kg (C content of steel, calculated out of emission factors published in Commission Decision of 18 July 2007 establishing guidelines for the monitoring and reporting of greenhouse gas emissions pursuant to Directive 2003/87/EC of the European Parliament and of the Council (notified under document number C(2007) 3416)). The other component of the fraction were considered to content no C.
  property carbon content 0.766065
    carbon content on a dry matter basis (reserved; not for manual entry)
  properties: water in wet mass 0 kg, wet mass 1 kg, dry mass 1 kg, water content 0, carbon content, non-fossil 0, carbon allocation 0.766065 kg

## Inputs from technosphere
- ammonia, anhydrous, liquid: 0.000607 kg; lognormal variance with pedigree 1.3, pedigree (1,1,5,1,1)
  EcoSpold01Location=CH
  uncertainty calculated from uncertainty in average DeNOx input, uncertainty in the share of thermal NOx, uncertainty of nitrogen content in average municipal waste and the unertainty in nitrogen content in *this* waste.
  properties: wet mass 1 kg, dry mass 1 kg
- process-specific burdens, municipal waste incineration: 1 kg; lognormal variance with pedigree 0.04, pedigree (1,1,5,1,1)
  demands per kilogram waste. uncertainty is heeded in the module;activityLink introduced to establish a direct link to the corresponding regional supply of this product
  EcoSpold01Location=CH
- residual material landfill: 3.5038e-11 unit; lognormal variance with pedigree 0.12, pedigree (1,1,5,1,1)
  uncertainty is calculated from uncertainties in waste composition and transfer coefficients in incinerator
  EcoSpold01Location=CH
- process-specific burdens, slag landfill: 0.12561 kg; lognormal variance with pedigree 0.09, pedigree (1,1,5,1,1)
  uncertainty is calculated from uncertainties in waste composition and transfer coefficients in incinerator;activityLink introduced to establish a direct link to the corresponding regional supply of this product
  EcoSpold01Location=CH
- chemical, inorganic: 2.115e-5 kg; lognormal variance with pedigree 0.36, pedigree (1,1,5,1,1)
  EcoSpold01Location=GLO
  Proxy for Polyelectrolyte. uncertainty calculated from uncertainty in average auxiliary material input, and the unertainty of the waste composition of this waste
  properties: wet mass 1 kg, dry mass 1 kg, carbon content, fossil 0.003
  note on carbon content, fossil: This dataset is an unweighted average of 20 inorganic substances (listed in Tab 88.1, ecoinvent v2.2 report 8, part II), being part of the top100 chemicals included in this database. The C-content has also been calculated as an unweighted average of the C content of the substances composing this dataset.
- heat, district or industrial, natural gas: 0.0532764 MJ; lognormal variance with pedigree 1.3, pedigree (1,1,5,1,1)
  EcoSpold01Location=RER
  uncertainty calculated from uncertainty in average DeNOx input, uncertainty in the share of thermal NOx, uncertainty of nitrogen content in average municipal waste and the unertainty in nitrogen content in *this* waste.
  properties: heating value, net 1 MJ
- chromium oxide, flakes: 3.546e-7 kg; lognormal variance with pedigree 2.01, pedigree (1,1,5,1,1)
  EcoSpold01Location=RER
  Proxy for vanadium pentoxide V2O5 in SCR catalyst, uncertainty calculated from uncertainty in average DeNOx input, uncertainty in the share of thermal NOx, uncertainty of nitrogen content in average municipal waste and the unertainty in nitrogen content in *this* waste.
  properties: wet mass 1 kg, dry mass 1 kg
- municipal waste incineration facility: 2.5e-10 unit; lognormal variance with pedigree 0.04, pedigree (1,1,5,1,1)
  EcoSpold01Location=CH
  demands per kilogram waste. uncertainty is heeded in the module
- titanium dioxide: 1.7375e-5 kg; lognormal variance with pedigree 2.01, pedigree (1,1,5,1,1)
  uncertainty calculated from uncertainty in average DeNOx input, uncertainty in the share of thermal NOx, uncertainty of nitrogen content in average municipal waste and the unertainty in nitrogen content in *this* waste.
  EcoSpold01Location=RER
  properties: dry mass 1 kg, wet mass 1 kg
- chemical, organic: 0.0005438 kg; lognormal variance with pedigree 0.97, pedigree (1,1,5,1,1)
  EcoSpold01Location=GLO
  Proxy for TMT15. uncertainty calculated from uncertainty in average auxiliary material input, and the unertainty of the waste composition of this waste
  properties: carbon content, fossil 0.628, wet mass 1 kg, dry mass 1 kg, heating value, net 19.03 MJ
  note on carbon content, fossil: This dataset is an unweighted average of 20 organic substances (listed in Tab 88.1, ecoinvent v2.2 report 8, part II), being part of the top100 chemicals included in this database. The C-content has also been calculated as an unweighted average of the C content of the substances composing this dataset.
- process-specific burdens, residual material landfill: 0.016818 kg; lognormal variance with pedigree 0.12, pedigree (1,1,5,1,1)
  EcoSpold01Location=CH
  uncertainty is calculated from uncertainties in waste composition and transfer coefficients in incinerator;activityLink introduced to establish a direct link to the corresponding regional supply of this product
- hydrochloric acid, without water, in 30% solution state: 1.269e-5 kg; lognormal variance with pedigree 0.36, pedigree (1,1,5,1,1)
  uncertainty calculated from uncertainty in average auxiliary material input, and the unertainty of the waste composition of this waste
  EcoSpold01Location=RER
  properties: dry mass 1 kg, wet mass 1 kg, heating value, net 3.32 MJ
- quicklime, milled, packed: 0.0010666 kg; lognormal variance with pedigree 0.46, pedigree (1,1,5,1,1)
  uncertainty calculated from uncertainty in average auxiliary material input, and the unertainty of the waste composition of this waste
  EcoSpold01Location=CH
  properties: dry mass 0.99 kg, water content 0.010101, wet mass 1 kg
- slag landfill: 2.2331e-10 unit; lognormal variance with pedigree 0.09, pedigree (1,1,5,1,1)
  EcoSpold01Location=CH
  uncertainty is calculated from uncertainties in waste composition and transfer coefficients in incinerator
- waste cement, hydrated: -0.016818 kg; name BP_amount_1; lognormal variance with pedigree 0.12, pedigree (1,1,5,1,1)
  EcoSpold01Location=CH
  Hydrated cement for solidification of landfilled residual material. Uncertainty calculated from unertainty of the waste composition of this waste and transfer coefficients in the incinerator and of the solidification recipe.
  production volume 0 kg; = RP_PV_1* BP_amount_1
    Calculated from the production volume of residue from mechanical treatment, laptop computer in proportion to the respective output amounts.
  property price 0 EUR2005; name BP_amount_1_price_EUR2005
  properties: dry mass 1 kg, wet mass 1 kg
- sodium hydroxide, without water, in 50% solution state: 0.00616 kg; lognormal variance with pedigree 0.45, pedigree (1,1,5,1,1)
  EcoSpold01Location=RER
  uncertainty calculated from uncertainty in average auxiliary material input, and the unertainty of the waste composition of this waste
  properties: dry mass 1 kg, wet mass 1 kg, heating value, net 3.03 MJ
- cement, unspecified: 0.0067273 kg; lognormal variance with pedigree 0.12, pedigree (1,1,5,1,1)
  EcoSpold01Location=CH
  Cement for solidification of landfilled residual material. Uncertainty calculated from unertainty of the waste composition of this waste, of transfer coefficients in the incinerator and of the solidification recipe.
  properties: dry mass 1 kg, wet mass 1 kg
- iron (III) chloride, without water, in 40% solution state: 0.00052183 kg; lognormal variance with pedigree 0.32, pedigree (1,1,5,1,1)
  EcoSpold01Location=CH
  uncertainty calculated from uncertainty in average auxiliary material input, and the unertainty of the waste composition of this waste
  properties: dry mass 1 kg, wet mass 1 kg

## Emissions to nature
- Barium [water, surface water]: 2.2017e-8 kg; lognormal variance with pedigree 1.82, pedigree (1,1,5,1,1)
  uncertainty is calculated from uncertainties in waste composition and transfer coefficients in incinerator and landfills
- Nitrate [water, surface water]: 0.0001539 kg; lognormal variance with pedigree 0.29, pedigree (1,1,5,1,1)
  (same comment as for Barium)
- Chloride [water, ground-, long-term]: 0.00017004 kg; lognormal variance with pedigree 0.24, pedigree (1,1,5,1,1)
  Long-term emissions from landfilling of incineration residues. uncertainty is calculated from uncertainties in waste composition and transfer coefficients in incinerator and landfills.
- Molybdenum [air, urban air close to ground]: 5.4278e-9 kg; lognormal variance with pedigree 1.49, pedigree (1,1,5,1,1)
  uncertainty is calculated from uncertainties in waste composition and transfer coefficients in incinerator
- Beryllium [air, urban air close to ground]: 4.2207e-10 kg; lognormal variance with pedigree 1.74, pedigree (1,1,5,1,1)
  (same comment as for Molybdenum)
- Arsenic, ion [water, ground-, long-term]: 3.726e-6 kg; lognormal variance with pedigree 1.36, pedigree (1,1,5,1,1)
  (same comment as for Chloride)
- Nickel [air, urban air close to ground]: 1.9561e-11 kg; lognormal variance with pedigree 0.89, pedigree (1,1,5,1,1)
  (same comment as for Molybdenum)
- Barium [air, urban air close to ground]: 1.6012e-7 kg; lognormal variance with pedigree 0.96, pedigree (1,1,5,1,1)
  (same comment as for Molybdenum)
- COD, Chemical Oxygen Demand [water, ground-, long-term]: 0.018572 kg; lognormal variance with pedigree 0.05, pedigree (1,1,5,1,1)
  (same comment as for Chloride)
- Antimony [water, surface water]: 0.0015057 kg; lognormal variance with pedigree 0.43, pedigree (1,1,5,1,1)
  (same comment as for Barium)
- Lead [air, urban air close to ground]: 4.9505e-9 kg; lognormal variance with pedigree 0.83, pedigree (1,1,5,1,1)
  (same comment as for Molybdenum)
- Cadmium [air, urban air close to ground]: 7.5055e-9 kg; lognormal variance with pedigree 1, pedigree (1,1,5,1,1)
  (same comment as for Molybdenum)
- Phosphate [water, ground-, long-term]: 5.3618e-5 kg; lognormal variance with pedigree 5.03, pedigree (1,1,5,1,1)
  (same comment as for Chloride)
- COD, Chemical Oxygen Demand [water, surface water]: 5.03e-5 kg; lognormal variance with pedigree 0.28, pedigree (1,1,5,1,1)
  (same comment as for Barium)
- Hydrogen fluoride [air, urban air close to ground]: 1.1903e-7 kg; lognormal variance with pedigree 0.92, pedigree (1,1,5,1,1)
  (same comment as for Molybdenum)
- Titanium [air, urban air close to ground]: 4.0501e-6 kg; lognormal variance with pedigree 0.54, pedigree (1,1,5,1,1)
  (same comment as for Molybdenum)
- Calcium, ion [water, ground-, long-term]: 0.0026891 kg; lognormal variance with pedigree 0.54, pedigree (1,1,5,1,1)
  (same comment as for Chloride)
- Iron, ion [water, surface water]: 5.5694e-7 kg; lognormal variance with pedigree 0.41, pedigree (1,1,5,1,1)
  (same comment as for Barium)
- Fluoride [water, surface water]: 1.7385e-5 kg; lognormal variance with pedigree 0.62, pedigree (1,1,5,1,1)
  (same comment as for Barium)
- Cobalt [water, ground-, long-term]: 2.3347e-5 kg; lognormal variance with pedigree 1.13, pedigree (1,1,5,1,1)
  (same comment as for Chloride)
- Manganese [air, urban air close to ground]: 3.3988e-14 kg; lognormal variance with pedigree 1.23, pedigree (1,1,5,1,1)
  (same comment as for Molybdenum)
- Strontium [water, ground-, long-term]: 7.4609e-5 kg; lognormal variance with pedigree 1.04, pedigree (1,1,5,1,1)
  (same comment as for Chloride)
- Cyanide [air, urban air close to ground]: 1.0829e-5 kg; lognormal variance with pedigree 1.41, pedigree (1,1,5,1,1)
  uncertainty calculated from uncertainty in average N-emissions, uncertainty in the share of thermal NOx, uncertainty of nitrogen content in average municipal waste and the unertainty in nitrogen content in *this* waste.
- Sodium [air, urban air close to ground]: 1.1873e-6 kg; lognormal variance with pedigree 0.85, pedigree (1,1,5,1,1)
  (same comment as for Molybdenum)
- Ammonia [air, urban air close to ground]: 9.5334e-6 kg; lognormal variance with pedigree 1.41, pedigree (1,1,5,1,1)
  (same comment as for Cyanide)
- TOC, Total Organic Carbon [water, ground-, long-term]: 0.0073489 kg; lognormal variance with pedigree 0.05, pedigree (1,1,5,1,1)
  (same comment as for Chloride)
- Arsenic [air, urban air close to ground]: 6.9205e-14 kg; lognormal variance with pedigree 1.47, pedigree (1,1,5,1,1)
  (same comment as for Molybdenum)
- Hydrogen chloride [air, urban air close to ground]: 6.788e-8 kg; lognormal variance with pedigree 0.51, pedigree (1,1,5,1,1)
  (same comment as for Molybdenum)
- Barium [water, ground-, long-term]: 0.00014215 kg; lognormal variance with pedigree 0.99, pedigree (1,1,5,1,1)
  (same comment as for Chloride)
- Calcium, ion [water, surface water]: 1.1691e-5 kg; lognormal variance with pedigree 1.01, pedigree (1,1,5,1,1)
  (same comment as for Barium)
- Dinitrogen monoxide [air, urban air close to ground]: 5.0807e-5 kg; lognormal variance with pedigree 1.41, pedigree (1,1,5,1,1)
  (same comment as for Cyanide)
- Bromine [air, urban air close to ground]: 1.4927e-5 kg; lognormal variance with pedigree 0.51, pedigree (1,1,5,1,1)
  (same comment as for Molybdenum)
- Molybdenum [water, surface water]: 4.6352e-7 kg; lognormal variance with pedigree 0.98, pedigree (1,1,5,1,1)
  (same comment as for Barium)
- Zinc, ion [water, ground-, long-term]: 1.5834e-5 kg; lognormal variance with pedigree 5.27, pedigree (1,1,5,1,1)
  (same comment as for Chloride)
- Nickel, ion [water, ground-, long-term]: 0.00044522 kg; lognormal variance with pedigree 0.76, pedigree (1,1,5,1,1)
  (same comment as for Chloride)
- Mercury [water, ground-, long-term]: 4.0008e-8 kg; lognormal variance with pedigree 3.41, pedigree (1,1,5,1,1)
  (same comment as for Chloride)
- DOC, Dissolved Organic Carbon [water, ground-, long-term]: 0.0073489 kg; lognormal variance with pedigree 0.05, pedigree (1,1,5,1,1)
  (same comment as for Chloride)
- Mercury [air, urban air close to ground]: 2.6558e-14 kg; lognormal variance with pedigree 1.75, pedigree (1,1,5,1,1)
  (same comment as for Molybdenum)
- Chloride [water, surface water]: 0.0061329 kg; lognormal variance with pedigree 0.4, pedigree (1,1,5,1,1)
  (same comment as for Barium)
- Aluminium [water, surface water]: 6.5376e-7 kg; lognormal variance with pedigree 1.19, pedigree (1,1,5,1,1)
  (same comment as for Barium)
- Arsenic, ion [water, surface water]: 3.0588e-6 kg; lognormal variance with pedigree 1.13, pedigree (1,1,5,1,1)
  (same comment as for Barium)
- Tin, ion [water, ground-, long-term]: 0.00010557 kg; lognormal variance with pedigree 1.22, pedigree (1,1,5,1,1)
  (same comment as for Chloride)
- Lead [water, surface water]: 1.1174e-8 kg; lognormal variance with pedigree 1.52, pedigree (1,1,5,1,1)
  (same comment as for Barium)
- BOD5, Biological Oxygen Demand [water, surface water]: 2.8163e-5 kg; lognormal variance with pedigree 0.16, pedigree (1,1,5,1,1)
  (same comment as for Barium)
- Nitrogen oxides [air, urban air close to ground]: 0.0003828 kg; lognormal variance with pedigree 1.41, pedigree (1,1,5,1,1)
  (same comment as for Cyanide)
- Fluoride [water, ground-, long-term]: 0.00020174 kg; lognormal variance with pedigree 0.59, pedigree (1,1,5,1,1)
  (same comment as for Chloride)
- Silicon [water, ground-, long-term]: 0.00024832 kg; lognormal variance with pedigree 5.63, pedigree (1,1,5,1,1)
  (same comment as for Chloride)
- Cadmium, ion [water, ground-, long-term]: 1.5352e-6 kg; lognormal variance with pedigree 6.79, pedigree (1,1,5,1,1)
  (same comment as for Chloride)
- Bromine [water, ground-, long-term]: 0.00087004 kg; lognormal variance with pedigree 0.5, pedigree (1,1,5,1,1)
  (same comment as for Chloride)
- Cobalt [air, urban air close to ground]: 8.4666e-13 kg; lognormal variance with pedigree 1.28, pedigree (1,1,5,1,1)
  (same comment as for Molybdenum)
- Copper, ion [water, surface water]: 7.2042e-7 kg; lognormal variance with pedigree 1.35, pedigree (1,1,5,1,1)
  (same comment as for Barium)
- Sulfate [water, surface water]: 0.00019104 kg; lognormal variance with pedigree 0.41, pedigree (1,1,5,1,1)
  (same comment as for Barium)
- Silicon [air, urban air close to ground]: 6.2444e-6 kg; lognormal variance with pedigree 0.52, pedigree (1,1,5,1,1)
  (same comment as for Molybdenum)
- Methane, fossil [air, urban air close to ground]: 6.3821e-6 kg; lognormal variance with pedigree 0.091225, pedigree (2,3,5,2,1)
  Confidential data from 5 plants in Switzerland and Germany
  Uncertainty: & basic uncertainty of 1.5; confidential data from 5 plants in Switzerland and Germany
- Thallium [air, urban air close to ground]: 3.3766e-10 kg; lognormal variance with pedigree 1.77, pedigree (1,1,5,1,1)
  (same comment as for Molybdenum)
- Selenium [water, ground-, long-term]: 1.1919e-6 kg; lognormal variance with pedigree 1.05, pedigree (1,1,5,1,1)
  (same comment as for Chloride)
- Potassium [air, urban air close to ground]: 3.191e-7 kg; lognormal variance with pedigree 1.01, pedigree (1,1,5,1,1)
  (same comment as for Molybdenum)
- Beryllium [water, surface water]: 2.6228e-10 kg; lognormal variance with pedigree 1.96, pedigree (1,1,5,1,1)
  (same comment as for Barium)
- Chromium VI [water, ground-, long-term]: 5.1905e-6 kg; lognormal variance with pedigree 1.98, pedigree (1,1,5,1,1)
  (same comment as for Chloride)
- Iron [air, urban air close to ground]: 4.7657e-8 kg; lognormal variance with pedigree 0.41, pedigree (1,1,5,1,1)
  (same comment as for Molybdenum)
- Sodium, ion [water, ground-, long-term]: 0.00028452 kg; lognormal variance with pedigree 0.74, pedigree (1,1,5,1,1)
  (same comment as for Chloride)
- Aluminium [air, urban air close to ground]: 3.3868e-6 kg; lognormal variance with pedigree 0.29, pedigree (1,1,5,1,1)
  (same comment as for Molybdenum)
- Copper, ion [water, ground-, long-term]: 0.019705 kg; lognormal variance with pedigree 0.32, pedigree (1,1,5,1,1)
  (same comment as for Chloride)
- Cadmium, ion [water, surface water]: 6.1899e-8 kg; lognormal variance with pedigree 0.93, pedigree (1,1,5,1,1)
  (same comment as for Barium)
- Titanium, ion [water, ground-, long-term]: 0.0012135 kg; lognormal variance with pedigree 0.88, pedigree (1,1,5,1,1)
  (same comment as for Chloride)
- DOC, Dissolved Organic Carbon [water, surface water]: 2.0631e-5 kg; lognormal variance with pedigree 0.27, pedigree (1,1,5,1,1)
  (same comment as for Barium)
- Strontium [water, surface water]: 4.7038e-8 kg; lognormal variance with pedigree 1.75, pedigree (1,1,5,1,1)
  (same comment as for Barium)
- Sulfur dioxide [air, urban air close to ground]: 1.6399e-6 kg; lognormal variance with pedigree 0.83, pedigree (1,1,5,1,1)
  (same comment as for Molybdenum)
- Calcium [air, urban air close to ground]: 4.6931e-6 kg; lognormal variance with pedigree 0.57, pedigree (1,1,5,1,1)
  (same comment as for Molybdenum)
- Chromium VI [water, surface water]: 1.5482e-6 kg; lognormal variance with pedigree 1, pedigree (1,1,5,1,1)
  (same comment as for Barium)
- BOD5, Biological Oxygen Demand [water, ground-, long-term]: 0.0060748 kg; lognormal variance with pedigree 0.05, pedigree (1,1,5,1,1)
  (same comment as for Chloride)
- Antimony [air, urban air close to ground]: 1.6874e-11 kg; lognormal variance with pedigree 0.63, pedigree (1,1,5,1,1)
  (same comment as for Molybdenum)
- Copper [air, urban air close to ground]: 2.133e-8 kg; lognormal variance with pedigree 0.39, pedigree (1,1,5,1,1)
  (same comment as for Molybdenum)
- Vanadium, ion [water, surface water]: 2.6649e-9 kg; lognormal variance with pedigree 2.04, pedigree (1,1,5,1,1)
  (same comment as for Barium)
- Nickel, ion [water, surface water]: 2.9742e-7 kg; lognormal variance with pedigree 1.39, pedigree (1,1,5,1,1)
  (same comment as for Barium)
- Iron, ion [water, ground-, long-term]: 0.0049231 kg; lognormal variance with pedigree 0.46, pedigree (1,1,5,1,1)
  (same comment as for Chloride)
- Manganese [water, surface water]: 2.7937e-9 kg; lognormal variance with pedigree 2.1, pedigree (1,1,5,1,1)
  (same comment as for Barium)
- Antimony [water, ground-, long-term]: 0.002773 kg; lognormal variance with pedigree 0.4, pedigree (1,1,5,1,1)
  (same comment as for Chloride)
- Zinc, ion [water, surface water]: 1.2772e-7 kg; lognormal variance with pedigree 0.67, pedigree (1,1,5,1,1)
  (same comment as for Barium)
- Potassium, ion [water, ground-, long-term]: 8.717e-5 kg; lognormal variance with pedigree 0.7, pedigree (1,1,5,1,1)
  (same comment as for Chloride)
- Vanadium, ion [water, ground-, long-term]: 6.0262e-7 kg; lognormal variance with pedigree 2.65, pedigree (1,1,5,1,1)
  (same comment as for Chloride)
- Tin, ion [water, surface water]: 7.0267e-9 kg; lognormal variance with pedigree 1.09, pedigree (1,1,5,1,1)
  (same comment as for Barium)
- Cobalt [water, surface water]: 4.5618e-9 kg; lognormal variance with pedigree 1.63, pedigree (1,1,5,1,1)
  (same comment as for Barium)
- Mercury [water, surface water]: 8.2231e-9 kg; lognormal variance with pedigree 1.61, pedigree (1,1,5,1,1)
  (same comment as for Barium)
- Tin [air, urban air close to ground]: 2.436e-7 kg; lognormal variance with pedigree 0.93, pedigree (1,1,5,1,1)
  (same comment as for Molybdenum)
- Phosphorus [air, urban air close to ground]: 4.5232e-7 kg; lognormal variance with pedigree 0.81, pedigree (1,1,5,1,1)
  (same comment as for Molybdenum)
- Chromium [air, urban air close to ground]: 3.5117e-12 kg; lognormal variance with pedigree 1.14, pedigree (1,1,5,1,1)
  (same comment as for Molybdenum)
- Potassium, ion [water, surface water]: 1.8354e-5 kg; lognormal variance with pedigree 0.62, pedigree (1,1,5,1,1)
  (same comment as for Barium)
- Bromine [water, surface water]: 0.0041005 kg; lognormal variance with pedigree 0.4, pedigree (1,1,5,1,1)
  (same comment as for Barium)
- Beryllium [water, ground-, long-term]: 3.3992e-7 kg; lognormal variance with pedigree 1.5, pedigree (1,1,5,1,1)
  (same comment as for Chloride)
- Sodium, ion [water, surface water]: 5.3247e-5 kg; lognormal variance with pedigree 0.62, pedigree (1,1,5,1,1)
  (same comment as for Barium)
- Nitrate [water, ground-, long-term]: 0.00043222 kg; lognormal variance with pedigree 0.4, pedigree (1,1,5,1,1)
  (same comment as for Chloride)
- Vanadium [air, urban air close to ground]: 6.7848e-11 kg; lognormal variance with pedigree 1.43, pedigree (1,1,5,1,1)
  (same comment as for Molybdenum)
- Carbon monoxide, fossil [air, urban air close to ground]: 0.0002229 kg; lognormal variance with pedigree 0.690625, pedigree (1,3,5,2,1)
  Literature data from switzerland and germany adapted to plant age distribution in switzerland
  Uncertainty: & basic uncertainty of 5; literature data from switzerland and germany adapted to plant age distribution in switzerland
- Silver, ion [water, ground-, long-term]: 0.00019999 kg; lognormal variance with pedigree 0.91, pedigree (1,1,5,1,1)
  (same comment as for Chloride)
- Thallium [water, surface water]: 2.0685e-10 kg; lognormal variance with pedigree 1.92, pedigree (1,1,5,1,1)
  (same comment as for Barium)
- Sulfate [water, ground-, long-term]: 0.0010067 kg; lognormal variance with pedigree 0.5, pedigree (1,1,5,1,1)
  (same comment as for Chloride)
- Phosphate [water, surface water]: 8.9512e-8 kg; lognormal variance with pedigree 1.11, pedigree (1,1,5,1,1)
  (same comment as for Barium)
- Lead [water, ground-, long-term]: 0.0004181 kg; lognormal variance with pedigree 1.82, pedigree (1,1,5,1,1)
  (same comment as for Chloride)
- Silver, ion [water, surface water]: 6.9438e-9 kg; lognormal variance with pedigree 2.01, pedigree (1,1,5,1,1)
  (same comment as for Barium)
- Manganese [water, ground-, long-term]: 5.3133e-5 kg; lognormal variance with pedigree 1.08, pedigree (1,1,5,1,1)
  (same comment as for Chloride)
- Molybdenum [water, ground-, long-term]: 2.2449e-6 kg; lognormal variance with pedigree 1.48, pedigree (1,1,5,1,1)
  (same comment as for Chloride)
- Strontium [air, urban air close to ground]: 7.4707e-9 kg; lognormal variance with pedigree 1.08, pedigree (1,1,5,1,1)
  (same comment as for Molybdenum)
- Titanium, ion [water, surface water]: 1.9519e-8 kg; lognormal variance with pedigree 1.87, pedigree (1,1,5,1,1)
  (same comment as for Barium)
- Selenium [water, surface water]: 5.7738e-7 kg; lognormal variance with pedigree 1.23, pedigree (1,1,5,1,1)
  (same comment as for Barium)
- Carbon dioxide, fossil [air, urban air close to ground]: 2.7288 kg; lognormal variance with pedigree 0.04, pedigree (1,1,5,1,1)
  (same comment as for Molybdenum)
- Chromium, ion [water, surface water]: 1.5137e-7 kg; lognormal variance with pedigree 1.06, pedigree (1,1,5,1,1)
  (same comment as for Barium)
- Aluminium [water, ground-, long-term]: 0.031034 kg; lognormal variance with pedigree 0.26, pedigree (1,1,5,1,1)
  (same comment as for Chloride)
- Selenium [air, urban air close to ground]: 8.9151e-15 kg; lognormal variance with pedigree 1.66, pedigree (1,1,5,1,1)
  (same comment as for Molybdenum)
- Silicon [water, surface water]: 6.3483e-7 kg; lognormal variance with pedigree 0.73, pedigree (1,1,5,1,1)
  (same comment as for Barium)
- Zinc [air, urban air close to ground]: 1.1336e-8 kg; lognormal variance with pedigree 0.79, pedigree (1,1,5,1,1)
  (same comment as for Molybdenum)
- Thallium [water, ground-, long-term]: 1.9703e-7 kg; lognormal variance with pedigree 1.32, pedigree (1,1,5,1,1)
  (same comment as for Chloride)
- TOC, Total Organic Carbon [water, surface water]: 2.0631e-5 kg; lognormal variance with pedigree 0.27, pedigree (1,1,5,1,1)
  (same comment as for Barium)

## Sampling procedure
waste-specific calculation based on literature data

## Extrapolations
This dataset has been extrapolated from year 2000 to the year of the calculation (2021). The uncertainty has been adjusted accordingly.

## Review by Jürgen Sutter 2007-08-31
passed.
