# sunflower production

Dataset: EcoSpold 2, unit process
Geography: FR
Time period: 2006-01-01 to 2021-12-31
Technology level: current
Classification: ISIC rev.4 ecoinvent: 0111:Growing of cereals (except rice), leguminous crops and oil seeds
Tags: WFLDB
Scenario: Business-as-Usual
System model: Allocation, cut-off by classification
Generated by: Eliane Riedener
Published in: Nemecek T. 2015
Database: ecoinvent
isCopyrightProtected: true
accessRestrictedTo: 1

## General comment
This dataset represents the production of 1 kg of sunflower grains, at standard water content required for storage (9%). The average yield from 2006 - 2010 is 2.4 t/ha. The data are representative for conventional sunflower seed production in France, considering an average of irrigated and non-irrigated fields, used for the export market. Mineral NPK fertiliser input is 41-25-22 kg/ha. Organic fertilisers applied amount to 1 m3/ha of liquid manure and 2.8 t/ha of solid manure. Total active ingredients (a.i.) applied as pesticides amount to 3.24 kg a.i./ha.
The dataset was modelled within the project 'World Food LCA database (WFLDB)'. The aim of this project was to provide inventories of a broad variety of agricultural products and processes and to cover for each product at least 50% of the global export market. The export share of sunflower produced in France amounts to 11% of the global export (tonnage exported in 2010). The production system regarded in this dataset aimed at representing sunflower produced in France for the export market.
PEF-Quality: data quality rating (DQR) = 1.3 (i.e. excellent quality). This dataset refers to an average situation; for specific situations exchanges might differ substantially due to site specific parameters

## Included activities start
This activity starts with soil cultivation after the harvest of the previous crop.

## Included activities end
This activity ends with the harvest of sunflowers and their transport to the farm gate. The dataset includes all machine operations, corresponding infrastructure, fuel use and sheds. Machine operations are: soil cultivation, sowing, pesticide and fertilizer application, harvesting, and on-farm transport. Drying is not applied systematically (assumption 10% of yield is dried). Further, direct field emissions and land use change are included. Heavy metal uptake by the crop is considered. The inputs of seeds, fertilisers and pesticides as well as packaging of fertilisers and pesticides are considered. The dataset doesn't include emissions from manure storage because these are within the system boundary of animal production. Heavy metal uptake by the crop is considered.

## Technology
Conventional production

## Time period
Time period referring to the data source: 2006-2010. Based on expert opinion data is considered to be valid at least up to 2012.

## Parameters
- LUC_crop_specific: 1 dimensionless
  This parameter allows to switch between a 'crop specific' and a 'country specific' approach when calculating the LUC of a crop. By default, the chosen approach is 'crop specific', so the value of the parameter is 1. If you want to apply a 'country specific' approach, turn the parameter to 0.
- heavyMetalUptakeSwitch: 1 dimensionless

## Reference product
- sunflower seed: 1 kg; By-product classification allocatable product; CPC 01445: Sunflower seed
  Reference flow: Yield = 2410.0 kg/ha
  production volume 1.70139e9 kg
    Source: FAOSTAT. Average, 2009-2014
  property price 0.317966 EUR2005
    Calculated based on inputs: The price of the product has been calculated as a sum of the values of the material and energy inputs for this product. This value is therefore a rough estimation. It may underestimate the real price since there are additional expenses when producing any product. These expences can include for example labour costs, treatment of waste materials and profit for the producer. Please consider carefully whether this level of data quality is acceptable for your application.
  property carbon content 0.574
    carbon content on a dry matter basis (reserved; not for manual entry)
  properties: water in wet mass 0.06 kg, carbon content, non-fossil 0.574, wet mass 1 kg, carbon content, fossil 0, dry mass 0.94 kg, water content 0.0638298, carbon allocation 0.53956 kg

## Inputs from technosphere
- packaging, for pesticides: 0.00268465 kg; lognormal variance with pedigree 0.0592, pedigree (4,3,4,5,4)
  Total amount of active substance/s of pesticides needed for the production of sunflower seed is calculated to be circa 1.34E-03 kg. Pesticide/s used in this dataset is/are: '[sulfonyl]urea-compound', '[thio]carbamate-compound', 'acetamide-anillide-compound, unspecified', 'aclonifen', 'cyclic N-compound', 'diazole-compound', 'glyphosate', 'metaldehyde', 'metolachlor', 'pendimethalin', 'phenoxy-compound', 'pyrethroid-compound'. The total amount of active substance/s is doubled in order to account for the packaging of the dilluted product of pesticide/s that is/are applied. Therefore, 2.68E-03 kg of packaging for pesticides is justified with this exchange.
  properties: carbon content, fossil 0.85714, wet mass 1 kg, heating value, net 25.97 MJ, price 0.0642 EUR2005, dry mass 1 kg
- sowing: 0.000414938 ha; lognormal variance with pedigree 0.124177, pedigree (2,1,4,1,1)
  Proxy: Extrapolated using a modified MEXALCA-approach (Roches et al. 2010; Nemecek et al. 2012). See supporting documentation 'WFLDB-Documentation.pdf' chapter 'Machinery processes' for L1 data (https://ecoquery.ecoinvent.org/File/Reports).
- ammonium sulfate: 0.000974689 kg; source Terres Inovia 2009; lognormal variance with pedigree 0.124177, pedigree (2,1,4,1,1)
  Calculated based on literature values or expert estimation: The total amount of nutrient (Terres Inovia 2006, 2009) multiplied by the share of fertiliser type (UNIFA 2005-2009). See supporting documentation 'WFLDB-Documentation.pdf' chapter 'Fertiliser application' for L3 and L4 data (https://ecoquery.ecoinvent.org/File/Reports).
  Corresponds to 2.35 kg/ha
  properties: wet mass 1 kg, dry mass 1 kg
- single superphosphate: 0.00217348 kg
  The exchange has been updated from 'single superphosphate' into 'single superphosphate' and therefore its amount has been scaled (multiplied) from 0.0005 kg by 4.7619 kg of 'single superphosphate' per kg of 'single superphosphate'. Original comment of the exchange is: Calculated based on literature values or expert estimation: The total amount of nutrient (Koch and Salou 2013) multiplied by the share of fertiliser type (UNIFA 2005-2009). See supporting documentation 'WFLDB-Documentation.pdf' chapter 'Fertiliser application' for L3 and L4 data (https://ecoquery.ecoinvent.org/File/Reports).
  properties: dry mass 1 kg, wet mass 1 kg, phosphorus content 0.0916484
- transport, tractor and trailer, agricultural: 0.00622407 metric ton*km; source Koch and Salou 2013; lognormal variance with pedigree 0.162439, pedigree (4,1,4,1,1)
  On-farm transport: Yield (in tonnes) multiplied by the average distance from field to farm. The distance was obtained from literature or expert estimation (Koch and Salou 2013). Corresponds to 15tkm/ha.
- urea: 0.00947541 kg; source Terres Inovia 2009; lognormal variance with pedigree 0.124177, pedigree (2,1,4,1,1)
  The exchange has been updated from 'urea, as N' into 'urea' and therefore its amount has been scaled (multiplied) from 0.0044 kg by 2.1438 kg of 'urea' per kg of 'urea, as N'. Original comment of the exchange is: Calculated based on literature values or expert estimation: The total amount of nutrient (Terres Inovia 2006, 2009) multiplied by the share of fertiliser type (UNIFA 2005-2009). See supporting documentation 'WFLDB-Documentation.pdf' chapter 'Fertiliser application' for L3 and L4 data (https://ecoquery.ecoinvent.org/File/Reports).
  Corresponds to 10.7 kg/ha
  properties: dry mass 1 kg, wet mass 1 kg, carbon content, fossil 0.2
- potassium chloride: 0.0127735 kg; source Koch and Salou 2013; lognormal variance with pedigree 0.124177, pedigree (2,1,4,1,1)
  The exchange has been updated from 'potassium chloride, as K2O' into 'potassium chloride' and therefore its amount has been scaled (multiplied) from 0.0081 kg by 1.5829 kg of 'potassium chloride' per kg of 'potassium chloride, as K2O'. Original comment of the exchange is: Calculated based on literature values or expert estimation: The total amount of nutrient (Koch and Salou 2013) multiplied by the share of fertiliser type (UNIFA 2005-2009). See supporting documentation 'WFLDB-Documentation.pdf' chapter 'Fertiliser application' for L3 and L4 data (https://ecoquery.ecoinvent.org/File/Reports).
  Corresponds to 19.4 kg/ha
  properties: dry mass 1 kg, wet mass 1 kg
- packaging, for fertilisers: 0.0726141 kg; lognormal variance with pedigree 0.0592, pedigree (4,3,4,5,4)
  Total amount of active substance/s of fertilisers needed for the production of 'sunflower seed' is calculated to be circa 3.63E-02 kg. Fertiliser/s used in this dataset is/are: 'ammonium nitrate, as N', 'ammonium sulfate, as N', 'nitrogen fertiliser, as N', 'nitrogen fertiliser, as N', 'nitrogen fertiliser, as N', 'phosphate fertiliser, as P2O5', 'phosphate fertiliser, as P2O5', 'phosphate fertiliser, as P2O5', 'phosphate fertiliser, as P2O5', 'phosphate fertiliser, as P2O5', 'potassium chloride, as K2O', 'potassium sulfate, as K2O', 'urea, as N'. The total amount of active substance/s is doubled in order to account for the packaging of the dilluted product of fertiliser/s that is/are applied. Therefore, 7.26E-02 kg of packaging for fertilisers is justified with this exchange.
  properties: carbon content, fossil 0.825301, wet mass 1 kg, dry mass 1 kg, price 0.0642 EUR2005, heating value, net 25.01 MJ
  note on carbon content, fossil: Considering a chemical formula (C2H4)n for polyethylene, carbon content-fossil is calculated to be 0.856286 kg of Carbon per kg of dry mass.
- transport, freight, lorry, unspecified: 0.00167022 metric ton*km
  This represent the transport of fertilizers that are directly linked to their supplying activities, to better represent the fertilizer mix of the activity. Transport distance based on US BTS Commodity Flow Surveys 1993, 1997, 2002, 2007, US Dep. Of Transportation, Bureau of Transportation Statistics. Of the total road transport, 6% is assumed to be by delivery van for goods with a large share of retail sale, and 3% for goods that are mainly sold via wholesale.
- metolachlor: 0.000337393 kg; source Terres Inovia 2011; lognormal variance with pedigree 0.0138498, pedigree (2,2,4,1,1)
  Proxy: Source for total amount of pesticides: literature (oral communication, Terres Inovia, 2011). Active ingredient is calculated based on Ecoinvent dataset 'Sunflower, conventional, 9% moisture, national average, at farm gate/FR U '. For calculations see supporting documentation 'WFLDB-Documentation.pdf' (https://ecoquery.ecoinvent.org/File/Reports).
  properties: dry mass 1 kg, wet mass 1 kg, carbon content, fossil 0.633803
- inorganic phosphorus fertiliser, as P2O5: 0, 0.00142116 kg (2 entries)
  Calculated based on literature values or expert estimation: The total amount of nutrient (Koch and Salou 2013) multiplied by the share of fertiliser type (UNIFA 2005-2009). See supporting documentation 'WFLDB-Documentation.pdf' chapter 'Fertiliser application' for L3 and L4 data (https://ecoquery.ecoinvent.org/File/Reports).
  properties: wet mass 1 kg, dry mass 1 kg
- inorganic phosphorus fertiliser, as P2O5: 0, 0, 0.00270747, 0.00153527 kg (4 entries)
  (same comment as for inorganic phosphorus fertiliser, as P2O5)
  properties: dry mass 1 kg, wet mass 1 kg
- inorganic nitrogen fertiliser, as N: 0, 0, 0.00030249, 0.000151245 kg (4 entries)
  Calculated based on literature values or expert estimation: The total amount of nutrient (Terres Inovia 2006, 2009) multiplied by the share of fertiliser type (UNIFA 2005-2009). See supporting documentation 'WFLDB-Documentation.pdf' chapter 'Fertiliser application' for L3 and L4 data (https://ecoquery.ecoinvent.org/File/Reports).
  Corresponds to 0.729 kg/ha
  properties: dry mass 1 kg, wet mass 1 kg
- inorganic nitrogen fertiliser, as N: 0, 0.000420124 kg (2 entries)
  (same comment as for inorganic nitrogen fertiliser, as N)
  properties: wet mass 1 kg, dry mass 1 kg
- aclonifen: 0.000429276 kg; lognormal variance with pedigree 0.0138498, pedigree (2,2,4,1,1)
  (same comment as for metolachlor)
  properties: dry mass 1 kg, carbon content, fossil 0.541353, wet mass 1 kg
- triple superphosphate: 0.0092459 kg
  The exchange has been updated from 'triple superphosphate' into 'triple superphosphate' and therefore its amount has been scaled (multiplied) from 0.0043 kg by 2.1739 kg of 'triple superphosphate' per kg of 'triple superphosphate'. Original comment of the exchange is: Calculated based on literature values or expert estimation: The total amount of nutrient (Koch and Salou 2013) multiplied by the share of fertiliser type (UNIFA 2005-2009). See supporting documentation 'WFLDB-Documentation.pdf' chapter 'Fertiliser application' for L3 and L4 data (https://ecoquery.ecoinvent.org/File/Reports).
  properties: dry mass 1 kg, wet mass 1 kg, phosphorus content 0.200754
  note on phosphorus content: Phosphorus content (on a dry matter basis) of triple superphosphate is calculated from the molecular formula of the nutrient present in the substance.
- potassium sulfate: 0.00195897 kg; source Koch and Salou 2013; lognormal variance with pedigree 0.124177, pedigree (2,1,4,1,1)
  The exchange has been updated from 'potassium sulfate, as K2O' into 'potassium sulfate' and therefore its amount has been scaled (multiplied) from 0.0011 kg by 1.85 kg of 'potassium sulfate' per kg of 'potassium sulfate, as K2O'. Original comment of the exchange is: Calculated based on literature values or expert estimation: The total amount of nutrient (Koch and Salou 2013) multiplied by the share of fertiliser type (UNIFA 2005-2009). See supporting documentation 'WFLDB-Documentation.pdf' chapter 'Fertiliser application' for L3 and L4 data (https://ecoquery.ecoinvent.org/File/Reports).
  Corresponds to 2.55 kg/ha
  properties: wet mass 1 kg, dry mass 1 kg
- acetamide-anillide-compound, unspecified: 2.9913e-5 kg; lognormal variance with pedigree 0.0138498, pedigree (2,2,4,1,1)
  (same comment as for metolachlor)
  properties: dry mass 1 kg, wet mass 1 kg, carbon content, fossil 0.659175
- transport, freight train: 0.00309976 metric ton*km
  This represent the transport of fertilizers that are directly linked to their supplying activities, to better represent the fertilizer mix of the activity. Transport distance based on US BTS Commodity Flow Surveys 1993, 1997, 2002, 2007, US Dep. Of Transportation, Bureau of Transportation Statistics.
- manure, liquid, cattle: 0.356842 kg; source Sylvie D. 2015; lognormal variance with pedigree 0.124177, pedigree (2,1,4,1,1)
  Calculated based on literature values: The total amount of manure (Personal written communication, Sylvie Dauguet, Terres Inovia, 2015) multiplied by the country-share of manure per animal category (FAOSTAT 2015). See supporting documentation 'WFLDB-Documentation.pdf' chapter 'Fertiliser application' (https://ecoquery.ecoinvent.org/File/Reports).
  Corresponds to 0.86 m3/ha
  properties: wet mass 1 kg, carbon content, non-fossil 0.68, water content 12.333, dry mass 0.075 kg
- diazole-compound: 2.2444e-6 kg; lognormal variance with pedigree 0.0138498, pedigree (2,2,4,1,1)
  (same comment as for metolachlor)
  properties: carbon content, fossil 0.541859, dry mass 1 kg, wet mass 1 kg
- manure, liquid, swine: 0.0535526 kg; source Sylvie D. 2015; lognormal variance with pedigree 0.124177, pedigree (2,1,4,1,1)
  Calculated based on literature values: The total amount of manure (Personal written communication, Sylvie Dauguet, Terres Inovia, 2015) multiplied by the country-share of manure per animal category (FAOSTAT 2015). See supporting documentation 'WFLDB-Documentation.pdf' chapter 'Fertiliser application' (https://ecoquery.ecoinvent.org/File/Reports).
  Corresponds to 0.129 m3/ha
  properties: dry mass 0.05 kg, carbon content, non-fossil 0.64, water content 19, wet mass 1 kg
- [sulfonyl]urea-compound: 1.12174e-6 kg; lognormal variance with pedigree 0.0138498, pedigree (2,2,4,1,1)
  (same comment as for metolachlor)
  properties: dry mass 1 kg, carbon content, fossil 0.540853, wet mass 1 kg
- poultry manure, fresh: 0.0022716 kg; source Sylvie D. 2015; lognormal variance with pedigree 0.124177, pedigree (2,1,4,1,1)
  Calculated based on literature values: The total amount of manure (Personal written communication, Sylvie Dauguet, Terres Inovia, 2015) multiplied by the country-share of manure per animal category (FAOSTAT 2015). See supporting documentation 'WFLDB-Documentation.pdf' chapter 'Fertiliser application' (https://ecoquery.ecoinvent.org/File/Reports).
  Corresponds to 0.0109 m3/ha
  properties: dry mass 0.38 kg, carbon content, non-fossil 0.33389, wet mass 1 kg, water content 1.63158
- phenoxy-compound: 4.36554e-6 kg; lognormal variance with pedigree 0.0138498, pedigree (2,2,4,1,1)
  (same comment as for metolachlor)
  properties: wet mass 1 kg, dry mass 1 kg, carbon content, fossil 0.532559
- manure, solid, cattle: 0.98242 kg; source SCEES - AGRESTE 2006; lognormal variance with pedigree 0.124177, pedigree (2,1,4,1,1)
  Calculated based on literature values: The total amount of manure (SCEES - AGRESTE 2006) multiplied by the country-share of manure per animal category (FAOSTAT 2015). See supporting documentation 'WFLDB-Documentation.pdf' chapter 'Fertiliser application' (https://ecoquery.ecoinvent.org/File/Reports).
  Corresponds to 2370.0 kg/ha
  properties: carbon content, non-fossil 0.441, wet mass 1 kg, dry mass 0.22 kg, water content 3.5454
- glyphosate: 0.000174094 kg; lognormal variance with pedigree 0.0138498, pedigree (2,2,4,1,1)
  (same comment as for metolachlor)
  properties: carbon content, fossil 0.214286, wet mass 1 kg, dry mass 1 kg
- poultry manure, dried: 0.179405 kg; source SCEES - AGRESTE 2006; lognormal variance with pedigree 0.124177, pedigree (2,1,4,1,1)
  Calculated based on literature values: The total amount of manure (SCEES - AGRESTE 2006) multiplied by the country-share of manure per animal category (FAOSTAT 2015). See supporting documentation 'WFLDB-Documentation.pdf' chapter 'Fertiliser application' (https://ecoquery.ecoinvent.org/File/Reports).
  Corresponds to 432.0 kg/ha
  properties: nickel content 4e-5, lead content 2.92e-6, mercury content 2e-7, carbon content, non-fossil 0.33389, wet mass 1 kg, potassium content 0.024, dry mass 0.865 kg, nitrogen content 0.532, water content 0.156069, cadmium content 2.92e-7, phosphorus content 0.0167, copper content 4.38e-5, zinc content 0.000349
- pyrethroid-compound: 8.67821e-6 kg; lognormal variance with pedigree 0.0138498, pedigree (2,2,4,1,1)
  (same comment as for metolachlor)
  properties: carbon content, fossil 0.623, dry mass 1 kg, wet mass 1 kg
- pendimethalin: 0.000212155 kg; lognormal variance with pedigree 0.0138498, pedigree (2,2,4,1,1)
  (same comment as for metolachlor)
  properties: wet mass 1 kg, carbon content, fossil 0.55516, dry mass 1 kg
- tillage, ploughing: 0.000414938 ha; source Terres Inovia 2009; lognormal variance with pedigree 0.124177, pedigree (2,1,4,1,1)
  Literature value or expert estimation (Terres Inovia 2006, 2009).
- [thio]carbamate-compound: 2.2076e-7 kg; lognormal variance with pedigree 0.0138498, pedigree (2,2,4,1,1)
  (same comment as for metolachlor)
  properties: carbon content, fossil 0.626349, dry mass 1 kg, wet mass 1 kg
- drying of bread grain, seed and legumes: 0.0123572 l; source Terres Inovia 2011; lognormal variance with pedigree 0.124177, pedigree (2,1,4,1,1)
  kg detracted H2O. Calculated based on literature value or expert estimation (Oral communication, Terres Inovia, 2011). Drying is not applied systematically.
- metaldehyde: 9.40955e-5 kg; lognormal variance with pedigree 0.0138498, pedigree (2,2,4,1,1)
  (same comment as for metolachlor)
  properties: dry mass 1 kg, wet mass 1 kg, carbon content, fossil 0.545455
- fertilising, by broadcaster: 0.000829876 ha; lognormal variance with pedigree 0.124177, pedigree (2,1,4,1,1)
  Estimation based on a modified MEXALCA-approach (Roches et al. 2010; Nemecek et al. 2012): See supporting documentation 'WFLDB-Documentation.pdf' chapter 'Machinery processes' for L2 data (https://ecoquery.ecoinvent.org/File/Reports).
- sunflower seed, for sowing: 0.00178423 kg; source Terres Inovia 2011; lognormal variance with pedigree 0.124177, pedigree (2,1,4,1,1)
  Literature value or expert estimation (Oral communication, Terres Inovia, 2011). Sowing density: 4.3kg/ha.
  properties: wet mass 1 kg, water content 0.0638298, dry mass 0.94 kg, carbon content, non-fossil 0.7766
- transport, freight, inland waterways, barge: 0.000524124 metric ton*km
  (same comment as for transport, freight train)
- liquid manure spreading, by vacuum tanker: 0.000414938 m3; lognormal variance with pedigree 0.124177, pedigree (2,1,4,1,1)
  This amount corresponds to the input of liquid manure.
- cyclic N-compound: 4.87674e-5 kg; lognormal variance with pedigree 0.0138498, pedigree (2,2,4,1,1)
  (same comment as for metolachlor)
  properties: dry mass 1 kg, carbon content, fossil 0.641962, wet mass 1 kg
- solid manure loading and spreading, by hydraulic loader and spreader: 1.16183 kg; lognormal variance with pedigree 0.124177, pedigree (2,1,4,1,1)
  This amount corresponds the input of solid manure.
- irrigation: 0.00995851 m3; source Terres Inovia 2009; lognormal variance with pedigree 0.124177, pedigree (2,1,4,1,1)
  Calculated value: The total amount of water used for irrigation (Terres Inovia 2006, 2009) multiplied by the country-share of irrigation technique (WFLDB-Guidelines.pdf, Appendix 6.1). See supporting documentation 'WFLDB-Documentation.pdf' chapter 'Water use for irrigation' (https://ecoquery.ecoinvent.org/File/Reports). 4% of the area is irrigated. The amount of water apllied on irrigated fields amounts to 600 m3/ha. This results in 24 m3/ha when considering an average of irrigated and non-irrigated sunflower fields.
  properties: water content 9089.91, wet mass 1000 kg, dry mass 0.11 kg
- application of plant protection product, by field sprayer: 0.000954357 ha; source Terres Inovia 2011; lognormal variance with pedigree 0.124664, pedigree (2,2,4,1,1)
  Literature value or expert estimation (Oral communication, Terres Inovia, 2011).
- compost: 0.0829876 kg; source SCEES - AGRESTE 2006; lognormal variance with pedigree 0.124177, pedigree (2,1,4,1,1)
  Literature value or expert estimation (SCEES - AGRESTE 2006).
  Corresponds to 200.0 kg/ha
  properties: nitrogen content 0.014, chromium content 2.23e-5, dry mass 0.5 kg, wet mass 1 kg, phosphorus content 0.0035, lead content 4.9e-5, copper content 5.77e-5, nickel content 1.63e-5, mercury content 1.2e-7, potassium content 0.01, zinc content 0.000184, carbon content, non-fossil 0.183645, water content 1, cadmium content 3.6e-7
- combine harvesting: 0.000414938 ha; source Sylvie D. 2015; lognormal variance with pedigree 0.124177, pedigree (2,1,4,1,1)
  Literature value or expert estimation (Personal written communication, Sylvie Dauguet, Terres Inovia, 2015).
- ammonium nitrate: 0.0301062 kg; source Terres Inovia 2009; lognormal variance with pedigree 0.124177, pedigree (2,1,4,1,1)
  The exchange has been updated from 'ammonium nitrate, as N' into 'ammonium nitrate' and therefore its amount has been scaled (multiplied) from 0.0105 kg by 2.8573 kg of 'ammonium nitrate' per kg of 'ammonium nitrate, as N'. Original comment of the exchange is: Calculated based on literature values or expert estimation: The total amount of nutrient (Terres Inovia 2006, 2009) multiplied by the share of fertiliser type (UNIFA 2005-2009). See supporting documentation 'WFLDB-Documentation.pdf' chapter 'Fertiliser application' for L3 and L4 data (https://ecoquery.ecoinvent.org/File/Reports).
  Corresponds to 25.4 kg/ha
  properties: wet mass 1 kg, dry mass 1 kg

## Inputs from nature
- Occupation, annual crop [natural resource, land]: 4.16058 m2*year; lognormal variance with pedigree 0.0200616, pedigree (2,1,4,1,1)
  Related to the duration from harvest date of previous crop to harvest date of main crop: 366 days.
- Transformation, to arable land, unspecified use [natural resource, land]: 4.14938 m2; lognormal variance with pedigree 0.0442144, pedigree (2,1,4,1,1)
  10000 m2 divided by the life time of the crop.
- Transformation, from arable land, unspecified use [natural resource, land]: 4.14938 m2; lognormal variance with pedigree 0.0442144, pedigree (2,1,4,1,1)
  10000 m2 divided by the life time of the crop.
- Carbon dioxide, in air [natural resource, in air]: 2.80212 kg; lognormal variance with pedigree 0.0138498, pedigree (2,2,4,1,1)
  CO2 uptake by biomass
- Energy, gross calorific value, in biomass [natural resource, biotic]: 38.1763 MJ; lognormal variance with pedigree 0.0138498, pedigree (2,2,4,1,1)
  Gross energy content is related to MJ/kg dry matter of product. Source: ecoinvent data.

## Emissions to nature
- Nickel, ion [water, surface water]: 3.88531e-6 kg; source Freiermuth R.  2006; lognormal variance with pedigree 0.356938, pedigree (2,2,4,1,1)
  Calculated value - Freiermuth (2006). See 'WFLDB-Guidelines.pdf', available at https://ecoquery.ecoinvent.org/File/Reports.
- Dinitrogen monoxide [air, non-urban air or from high stacks]: 0.00118441 kg; source IPCC 2006; lognormal variance with pedigree 0.124664, pedigree (2,2,4,1,1)
  Calculated value - IPCC (2006). See 'WFLDB-Guidelines.pdf', available at https://ecoquery.ecoinvent.org/File/Reports.
- Metaldehyde [soil, agricultural]: 8.22343e-5 kg; lognormal variance with pedigree 0.0447216, pedigree (2,2,4,1,1)
  Calculated value - 100% emission in soil. See 'WFLDB-Guidelines.pdf', available at https://ecoquery.ecoinvent.org/File/Reports.
- Water [air, non-urban air or from high stacks]: 0.00600913 m3; lognormal variance with pedigree 0.124177, pedigree (2,1,4,1,1)
  Calculated value - Emission calculated from water balance. See 'WFLDB-Guidelines.pdf', available at https://ecoquery.ecoinvent.org/File/Reports.
- Lead [water, surface water]: 1.63071e-6 kg; source Freiermuth R.  2006; lognormal variance with pedigree 0.356938, pedigree (2,2,4,1,1)
  (same comment as for Nickel, ion)
- Metazachlor [soil, agricultural]: 2.61424e-5 kg; lognormal variance with pedigree 0.0447216, pedigree (2,2,4,1,1)
  (same comment as for Metaldehyde)
- Phosphorus [water, surface water]: 0.000209183 kg; source Prasuhn V.  2006; lognormal variance with pedigree 0.175866, pedigree (2,2,4,1,1)
  Calculated value - Prasuhn (2006) and SQCB-Erosion. See 'WFLDB-Guidelines.pdf', available at https://ecoquery.ecoinvent.org/File/Reports.
- Phosphate [water, surface water]: 0.000277884 kg; source Prasuhn V.  2006; lognormal variance with pedigree 0.175866, pedigree (2,2,4,1,1)
  Calculated value - Prasuhn (2006). See 'WFLDB-Guidelines.pdf', available at https://ecoquery.ecoinvent.org/File/Reports.
- Pendimethalin [soil, agricultural]: 0.000185412 kg; lognormal variance with pedigree 0.0447216, pedigree (2,2,4,1,1)
  (same comment as for Metaldehyde)
- Water [water, surface water]: 0.00315946 m3; lognormal variance with pedigree 0.124177, pedigree (2,1,4,1,1)
  (same comment as for Water)
- Copper, ion [water, ground-]: 1.60066e-6 kg; source Freiermuth R.  2006; lognormal variance with pedigree 0.356938, pedigree (2,2,4,1,1)
  (same comment as for Nickel, ion)
- Pirimicarb [soil, agricultural]: 1.92933e-7 kg; lognormal variance with pedigree 0.0447216, pedigree (2,2,4,1,1)
  (same comment as for Metaldehyde)
- Mercury [water, surface water]: 1.501e-8 kg; source Freiermuth R.  2006; lognormal variance with pedigree 0.356938, pedigree (2,2,4,1,1)
  (same comment as for Nickel, ion)
- Phosphate [water, ground-]: 0.000101498 kg; source Prasuhn V.  2006; lognormal variance with pedigree 0.175866, pedigree (2,2,4,1,1)
  (same comment as for Phosphate)
- Cadmium [soil, agricultural]: 7.72495e-7 kg; = 8.6489626556e-07 + ( - 9.24014e-08)*heavyMetalUptakeSwitch; source Freiermuth R.  2006
  Comment on mathematicalRelation:
  8.6489626556e-07 from Calculated value - Freiermuth (2006). See 'WFLDB-Guidelines.pdf', available at https://ecoquery.ecoinvent.org/File/Reports.
  -9.24014e-08 from Crop, default, heavy metals uptake model
  Heavy metal uptake can be excluded by setting the parameter heavyMetalUptakeSwitch to zero.
- Quinmerac [soil, agricultural]: 6.5356e-6 kg; lognormal variance with pedigree 0.0447216, pedigree (2,2,4,1,1)
  (same comment as for Metaldehyde)
- Copper [soil, agricultural]: 3.93923e-6 kg; = 9.96970954357e-06 + ( - 6.030479e-06)*heavyMetalUptakeSwitch; source Freiermuth R.  2006
  Comment on mathematicalRelation:
  9.96970954357e-06 from Calculated value - Freiermuth (2006). See 'WFLDB-Guidelines.pdf', available at https://ecoquery.ecoinvent.org/File/Reports.
  -6.030479e-06 from Crop, default, heavy metals uptake model
  Heavy metal uptake can be excluded by setting the parameter heavyMetalUptakeSwitch to zero.
- Chromium [soil, agricultural]: -4.52711e-6 kg; = -4.03116182573e-06 + ( - 4.9595e-07)*heavyMetalUptakeSwitch; source Freiermuth R.  2006
  Comment on mathematicalRelation:
  -4.03116182573e-06 from Calculated value - Freiermuth (2006). See 'WFLDB-Guidelines.pdf', available at https://ecoquery.ecoinvent.org/File/Reports.
  -4.9595e-07 from Crop, default, heavy metals uptake model
  Heavy metal uptake can be excluded by setting the parameter heavyMetalUptakeSwitch to zero.
- Quizalofop-p-ethyl [soil, agricultural]: 1.09007e-6 kg; lognormal variance with pedigree 0.0447216, pedigree (2,2,4,1,1)
  (same comment as for Metaldehyde)
- Lead [soil, agricultural]: 2.023e-6 kg; = 2.51510373444e-06 + ( - 4.921007e-07)*heavyMetalUptakeSwitch; source Freiermuth R.  2006
  Comment on mathematicalRelation:
  2.51510373444e-06 from Calculated value - Freiermuth (2006). See 'WFLDB-Guidelines.pdf', available at https://ecoquery.ecoinvent.org/File/Reports.
  -4.921007e-07 from Crop, default, heavy metals uptake model
  Heavy metal uptake can be excluded by setting the parameter heavyMetalUptakeSwitch to zero.
- Mercury [soil, agricultural]: 8.61521e-8 kg; = 1.23058091286e-07 + ( - 3.690596e-08)*heavyMetalUptakeSwitch; source Freiermuth R.  2006
  Comment on mathematicalRelation:
  1.23058091286e-07 from Calculated value - Freiermuth (2006). See 'WFLDB-Guidelines.pdf', available at https://ecoquery.ecoinvent.org/File/Reports.
  Heavy metal uptake can be excluded by setting the parameter heavyMetalUptakeSwitch to zero.
- Cadmium, ion [water, surface water]: 4.31992e-8 kg; source Freiermuth R.  2006; lognormal variance with pedigree 0.356938, pedigree (2,2,4,1,1)
  (same comment as for Nickel, ion)
- Nickel [soil, agricultural]: 8.4875e-7 kg; = 1.79933609959e-06 + ( - 9.50586e-07)*heavyMetalUptakeSwitch; source Freiermuth R.  2006
  Comment on mathematicalRelation:
  1.79933609959e-06 from Calculated value - Freiermuth (2006). See 'WFLDB-Guidelines.pdf', available at https://ecoquery.ecoinvent.org/File/Reports.
  -9.50586e-07 from Crop, default, heavy metals uptake model
  Heavy metal uptake can be excluded by setting the parameter heavyMetalUptakeSwitch to zero.
- Zinc [soil, agricultural]: 4.39545e-5 kg; = 7.30954356846e-05 + ( - 2.914093e-05)*heavyMetalUptakeSwitch; source Freiermuth R.  2006
  Comment on mathematicalRelation:
  7.30954356846e-05 from Calculated value - Freiermuth (2006). See 'WFLDB-Guidelines.pdf', available at https://ecoquery.ecoinvent.org/File/Reports.
  -2.914093e-05 from Crop, default, heavy metals uptake model
  Heavy metal uptake can be excluded by setting the parameter heavyMetalUptakeSwitch to zero.
- Aclonifen [soil, agricultural]: 0.000375164 kg; lognormal variance with pedigree 0.0447216, pedigree (2,2,4,1,1)
  (same comment as for Metaldehyde)
- tau-Fluvalinate [soil, agricultural]: 1.04184e-7 kg; lognormal variance with pedigree 0.0447216, pedigree (2,2,4,1,1)
  (same comment as for Metaldehyde)
- Nitrate [water, ground-]: 0.149582 kg; source Richner W. 2014; lognormal variance with pedigree 0.175866, pedigree (2,2,4,1,1)
- Clethodim [soil, agricultural]: 2.18014e-6 kg; lognormal variance with pedigree 0.0447216, pedigree (2,2,4,1,1)
  (same comment as for Metaldehyde)
- Tribenuron-methyl [soil, agricultural]: 9.80339e-7 kg; lognormal variance with pedigree 0.0447216, pedigree (2,2,4,1,1)
  (same comment as for Metaldehyde)
- Metolachlor [soil, agricultural]: 0.000294863 kg; lognormal variance with pedigree 0.0447216, pedigree (2,2,4,1,1)
  (same comment as for Metaldehyde)
- Cypermethrin [soil, agricultural]: 7.41633e-6 kg; lognormal variance with pedigree 0.0447216, pedigree (2,2,4,1,1)
  (same comment as for Metaldehyde)
- Carbon dioxide, fossil [air, non-urban air or from high stacks]: 0.006939 kg; lognormal variance with pedigree 0.0138498, pedigree (2,2,4,1,1)
  Calculated value - CO2 emissions from urea and lime. See 'WFLDB-Guidelines.pdf', available at https://ecoquery.ecoinvent.org/File/Reports.
- Chromium, ion [water, ground-]: 8.6278e-6 kg; source Freiermuth R.  2006; lognormal variance with pedigree 0.356938, pedigree (2,2,4,1,1)
  (same comment as for Nickel, ion)
- Nickel, ion [water, ground-]: 2.6766e-10 kg; source Freiermuth R.  2006; lognormal variance with pedigree 0.356938, pedigree (2,2,4,1,1)
  (same comment as for Nickel, ion)
- Deltamethrin [soil, agricultural]: 1.97515e-8 kg; lognormal variance with pedigree 0.0447216, pedigree (2,2,4,1,1)
  (same comment as for Metaldehyde)
- Cadmium, ion [water, ground-]: 1.79602e-8 kg; source Freiermuth R.  2006; lognormal variance with pedigree 0.356938, pedigree (2,2,4,1,1)
  (same comment as for Nickel, ion)
- Copper, ion [water, surface water]: 4.47386e-6 kg; source Freiermuth R.  2006; lognormal variance with pedigree 0.356938, pedigree (2,2,4,1,1)
  (same comment as for Nickel, ion)
- Fenpropimorph [soil, agricultural]: 3.60844e-5 kg; lognormal variance with pedigree 0.0447216, pedigree (2,2,4,1,1)
  (same comment as for Metaldehyde)
- Zinc, ion [water, ground-]: 1.10763e-5 kg; source Freiermuth R.  2006; lognormal variance with pedigree 0.356938, pedigree (2,2,4,1,1)
  (same comment as for Nickel, ion)
- Fluazifop-P-butyl [soil, agricultural]: 2.72517e-6 kg; lognormal variance with pedigree 0.0447216, pedigree (2,2,4,1,1)
  (same comment as for Metaldehyde)
- Zinc, ion [water, surface water]: 8.34689e-6 kg; source Freiermuth R.  2006; lognormal variance with pedigree 0.356938, pedigree (2,2,4,1,1)
  (same comment as for Nickel, ion)
- Fluorochloridone [soil, agricultural]: 0.000129904 kg; lognormal variance with pedigree 0.0447216, pedigree (2,2,4,1,1)
  (same comment as for Metaldehyde)
- Mercury [water, ground-]: 1.45336e-9 kg; source Freiermuth R.  2006; lognormal variance with pedigree 0.356938, pedigree (2,2,4,1,1)
  (same comment as for Nickel, ion)
- Flurtamone [soil, agricultural]: 3.71215e-5 kg; lognormal variance with pedigree 0.0447216, pedigree (2,2,4,1,1)
  (same comment as for Metaldehyde)
- Chromium, ion [water, surface water]: 4.9166e-6 kg; source Freiermuth R.  2006; lognormal variance with pedigree 0.356938, pedigree (2,2,4,1,1)
  (same comment as for Nickel, ion)
- Glyphosate [soil, agricultural]: 0.000152148 kg; lognormal variance with pedigree 0.0447216, pedigree (2,2,4,1,1)
  (same comment as for Metaldehyde)
- Ammonia [air, non-urban air or from high stacks]: 0.00688091 kg; source EEA 2013; lognormal variance with pedigree 0.0447216, pedigree (2,2,4,1,1)
  Calculated value - EMEP/EEA (2013). See 'WFLDB-Guidelines.pdf', available at https://ecoquery.ecoinvent.org/File/Reports.
- Imazamox [soil, agricultural]: 1.96148e-6 kg; lognormal variance with pedigree 0.0447216, pedigree (2,2,4,1,1)
  (same comment as for Metaldehyde)
- Water [water, ground-]: 0.000789876 m3; lognormal variance with pedigree 0.124177, pedigree (2,1,4,1,1)
  (same comment as for Water)
- Nitrogen oxides [air, non-urban air or from high stacks]: 0.000838714 kg; source EEA 2013; lognormal variance with pedigree 0.124664, pedigree (2,2,4,1,1)
  Calculated value - EEA/EMEP (2013). See 'WFLDB-Guidelines.pdf', available at https://ecoquery.ecoinvent.org/File/Reports.
- Lambda-cyhalothrin [soil, agricultural]: 4.40128e-8 kg; lognormal variance with pedigree 0.0447216, pedigree (2,2,4,1,1)
  (same comment as for Metaldehyde)
- Lead [water, ground-]: 1.00108e-7 kg; source Freiermuth R.  2006; lognormal variance with pedigree 0.356938, pedigree (2,2,4,1,1)
  (same comment as for Nickel, ion)

## Sampling procedure
WFLDB Methodological Guidelines for the Life Cycle Inventory of Agricultural Products in the latest version, available at: (Report section: https://v30.ecoquery.ecoinvent.org/File/Reports). Data sources: Data were categorised from level 0 (L0) to level (L4) as follows: L0 = estimate, proxy; L1 = statistical data (e.g. FAOSTAT); L2 = L1 adapted to crop and country; L3 = literature data or L1 resp. L2 data approved by experts; medium detailing (i.e. kg of total N-fertiliser); L4 = L3 data of high detailing (i.e. portion N-fertiliser types).In this dataset data were obtained for yield: L3; Fertilisers: L4; Pesticides: L3; Machinery: L4; Irrigation: L3. For information regarding the calculation of individual exchanges see supporting documentation WFLDB-Documentation.pdf.

## Extrapolations
This dataset has been extrapolated from year 2012 to the year of the calculation (2021). The uncertainty has been adjusted accordingly.

## Review by Assumpció ANTON 2016-05-30
Be aware that the use of statistics in input calculations could provide some specific inputs not common for specific crops, this should be corrected if better information is available and better reflexed in DQR . Currently, I would dissent for some of good marks provided, being a revision of criteria applied advisable.

Pesticides will need to be amended periodically checking for update of pesticides' ban.
