# hard chromium coating, electroplating, steel substrate, 0.14 mm thickness

Dataset: EcoSpold 2, unit process
Geography: GLO
Time period: 2014-01-01 to 2021-12-31
Technology level: current
Classification: ISIC rev.4 ecoinvent: 2592:Treatment and coating of metals; machining
Classification: EcoSpold01Categories: metals/refinement
Synonyms: hard chrome plating
Scenario: Business-as-Usual
System model: Allocation, cut-off by classification
Generated by: Jean-Francois Menard
Published in: Montavon G. 2006
Database: ecoinvent
isCopyrightProtected: true
accessRestrictedTo: 1

## General comment
This dataset represents the hard chromium coating of a steel surface for wear resistance. The functional unit is 1 m2 of hard chromium coated steel surface.
This dataset represents a hard chromium thickness of 0,14 mm since it is the thickness for which data were provided in the data source but the dataset is parameterized to the chromium thickness (Cr_coating_thickness in Exchange Properties) so new instances can be created for other thicknesses. This parameter being a very important one since it affects the major contributors to the environmental profile (electricity and chromium oxide inputs and hexavalent chromium emissions), careful attention must be given to its quantification. Published sources report hard chromium layer thickness ranging from 1 um to 1 mm, with typical values ranging from 0,012 to 0,25 mm.
It is important to also note that the dataset does not include the steel piece that is going to be coated but does include the input of hard chromium needed for the coat.

## Included activities start
From the reception of the material and energy inputs at the factory gate.

## Included activities end
This activity ends with the hard chromium plated steel piece at the plating plant gate.
The dataset includes pre-treatment alkaline cleaning, acid dip, chromium electroplating, with rinsing after each operation and waste water treatment. The sequence of unit operations in a conventional chromium plating operation includes (i) pre-treatment alkaline cleaning in electrolytic wash bath (Na2CO3 (40 g/l), Na5P3O10 (25 g/l), NaOH (10 g/l)) at 90°C for 2 minutes, (ii) acid dip at 50°C for 1 minute, (iii) chromium electroplating in 100:1 chromic acid (225 to 375 g/l): sulfuric acid (2.25 to 3.75 g/l) solution at 49 to 66°C for 397 minutes (best case) to 2155 minutes (worst case). It also includes infrastructure.
This dataset excludes the coated steel piece manufacturing, any packaging, solid wastes other than wastewater sludge and any heat treatment of plated parts (parts that are susceptible to hydrogen embrittlement may be subjected to heat treatment at 200°C, for three hours or longer).

## Parameters
- alkaline cleaning electricity: 0.13 kWh; name alkaline_cleaning_electricity; lognormal variance with pedigree 0.0138, pedigree (2,5,3,5,2)
  Electricity for pre-treatment alkaline cleaning of the steel substrate.
- acid dip electricity: 0.42 kWh; name acid_dip_electricity; lognormal variance with pedigree 0.0138, pedigree (2,5,3,5,2)
  Electricity for the acid dip of the steel substrate.
- wastewater sulfur dioxide: 2.8 dimensionless; name wastewater_sulfur_dioxide; lognormal variance with pedigree 0.0138, pedigree (2,5,3,5,2)
  Used for wastewater treatment, at 2.8 g SO2/g Cr VI in wastewater.
- hexavalent chromium air emissions pre-abatement: 0.387402 kg; name Cr_VI_air_pre_abat; lognormal variance with pedigree 0.0191655, pedigree (2,5,3,5,2)
  Pre-abatement emissions at the hard chromium electroplating plant.
  Uncertainty: Minimum and maximum values representing best (0.335 kg/m2) and worst (0.448 kg/m2) cases reported in source were used as 95% interval of log-normal distribution.
- hexavalent chromium air emissions post-abatment: 0.00894427 kg; name Cr_VI_air_post_abat; lognormal variance with pedigree 0.0133399, pedigree (2,5,3,5,2)
  Post-abatement (pack bed technology was reported in source) emissions at the hard chromium electroplating plant.
  Uncertainty: Minimum and maximum values representing best (0.008 kg/m2) and worst (0.01 kg/m2) cases reported in source were used as 95% interval of log-normal distribution.
- hexavalent chromium drag-out losses: 0.0127808 kg; name Cr_VI_drag_out_losses; lognormal variance with pedigree 0.01406, pedigree (2,5,3,5,2)
  The drag-out losses of electroplating electrolyte that is removed from the bath by adhering to the surface of the plated part were assumed to be as low as 0.1 l/m2, considering an adequate draining period with the part suspended over the bath. Considering a chromic acid concentration of 225 (best case) to 375 (worst case) g/l gives 9.9 to 16.5 g Cr VI losses/m2.
  Uncertainty: Minimum and maximum values representing best (9.9 g/m2) and worst (16.5 g/m2) cases reported in source were used as 95% interval of log-normal distribution.
- electricity for electroplating: 497.242 kWh; name electricity_for_electroplating; lognormal variance with pedigree 0.0133369, pedigree (2,5,3,5,2)
  Electricity for the electroplating of the chromium layer onto the steel substrate.
  Uncertainty: Minimum and maximum values representing best (430 kWh/m2) and worst (575 kWh/m2) cases reported in source were used as 95% interval of log-normal distribution.

## Reference product
- hard chromium coat, electroplating, steel substrate, 0.14 mm thickness: 1 m2; name Cr_coating; CPC 41603: Bismuth, antimony, manganese, chromium and articles thereof; including waste and scrap of bismuth or manganese; By-product classification allocatable product
  production volume 100000 m2; name PV_Cr_coating
    Default value using the generic metal coating facility dataset created within the ecoinvent project.
    This is a placeholder value that does not reflect real-world production volumes. This dataset does not currenlty require a real-world production volume to work in the database framework and no actual data were collected yet. This has no negative effect on the results of the ecoinvent database.
  property price 55.1452 EUR2005; name Cr_coating_price_EUR2005
    Calculated based on inputs: The price of the product has been calculated as a sum of the values of the material and energy inputs for this product. This value is therefore a rough estimation. It may underestimate the real price since there are additional expenses when producing any product. These expences can include for example labour costs, treatment of waste materials and profit for the producer. Please consider carefully whether this level of data quality is acceptable for your application.
  property density 7.19 kg/l; name Cr_coating_density
    7190 kg/m3 (en.wikipedia.org/Chromium).
  property chromium layer thickness 0.00014 m; name Cr_coating_thickness
    Thickness of plated hard chromium layer. Basic parameter used in the calculation of the exchanges.
  property carbon content, fossil 0; name Cr_coating_C_content_fossil
    fossil carbon content on a dry matter basis
  property water in wet mass 0 kg; name Cr_coating_WWM
  property water content 0; name Cr_coating_water_content
  property carbon content, non-fossil 0; name Cr_coating_C_content_non_fossil
    biogene carbon content on a dry matter basis
  property dry mass 1.0066 kg; name Cr_coating_DM; = 1*1*Cr_coating_thickness*Cr_coating_density*1000
  property wet mass 1.0066 kg; name Cr_coating_WM; = Cr_coating_DM
  property chromium layer reference thickness 0.00014 m; name Cr_coating_reference_thickness
    Reference thickness of plated hard chromium layer defined in data source.
  property carbon content 0
    carbon content on a dry matter basis (reserved; not for manual entry)
  properties: carbon allocation 0 kg

## Inputs from technosphere
- sulfuric acid: 0 kg; pedigree (1,1,1,1,1)
  For acid dip (0,00009 kg) of steel surface and wastewater treatment (0,0012 kg). Not assumed to be proportional to hard chromium layer thickness since more related to area plated.
  EcoSpold01Location=RER
  properties: dry mass 1 kg, wet mass 1 kg
- sludge from steel rolling: -0.0288 kg; name sludge; lognormal variance with pedigree 0.0518, pedigree (2,5,5,5,2)
  Proxy. From wastewater treatment. Assumed not to be proportional to hard chromium layer thickness since it is related to hexavalent chromium drag-out losses.
  production volume 2880 kg; = PV_Cr_coating * sludge / Cr_coating
    Calculated from production volume of reference product using the relative outputs.
  property price 0 EUR2005; name sludge_price_EUR2005
  properties: wet mass 1 kg, carbon content, fossil 0.0123943, water content 0.25, dry mass 0.8 kg
- filter dust from Al electrolysis: -0.378457 kg; name dust; = ((Cr_VI_air_pre_abat-Cr_VI_air_post_abat)*Cr_coating_thickness/Cr_coating_reference_thickness)*-1; lognormal variance with pedigree 0.002, pedigree (1,1,3,1,1)
  Proxy. Represents hexavalent chromium collected from electroplating air emissions abatement technology (packed bedreported in source). Assumed to be proportional to hard chromium layer thickness.
  Uncertainty: Calculated variable. Uncertainty should be determined from propagation of uncertainty factors of underlying variables, however no uncertainty could be generated for the terms of the polynomial function. Uncertainty of actual relation between variables not accounted at this time, although this could be included in a future update.
  production volume 37845.7 kg; = PV_Cr_coating * dust / Cr_coating
    Calculated from production volume of reference product using the relative outputs.
  property price 0 EUR2005; name dust_price_EUR2005
  properties: carbon content, fossil 0.11586, dry mass 1 kg, wet mass 1 kg
- sulfur dioxide, liquid: 0 kg; pedigree (1,1,1,1,1)
  Used for wastewater treatment. The chromium drag-out losses are assumed not to be proportionnal to hard chromium layer thickness since are more related to area plated.
  Uncertainty: Calculated variable. Uncertainty should be determined from propagation of uncertainty factors of underlying variables, however no uncertainty could be generated for the terms of the polynomial function. Uncertainty of actual relation between variables not accounted at this time, although this could be included in a future update.
  properties: dry mass 1 kg, wet mass 1 kg
- sodium phosphate: 0 kg; pedigree (1,1,1,1,1)
  Proxy. For pre-treatment alkaline cleaning. Reported as trisodium phosphate in source. Not assumed to be proportional to hard chromium layer thickness since more related to area plated.
  properties: dry mass 1 kg, wet mass 1 kg
- chromium oxide, flakes: 2.70537 kg; = (Cr_coating_DM+Cr_VI_air_pre_abat+Cr_VI_drag_out_losses)*Cr_coating_thickness/Cr_coating_reference_thickness/chromium_content; lognormal variance with pedigree 0.002, pedigree (1,1,3,1,1)
  Hard chromium coating material. Assumed to be proportional to hard chromium layer thickness. Adjusted to chromium content of chromium oxide.
  Uncertainty: Calculated variable. Uncertainty should be determined from propagation of uncertainty factors of underlying variables, however no uncertainty could be generated for the terms of the polynomial function. Uncertainty of actual relation between variables not accounted at this time, although this could be included in a future update.
  property chromium content 0.519996; name chromium_content
  properties: wet mass 1 kg, dry mass 1 kg
- soda ash, dense: 0.0103 kg; lognormal variance with pedigree 0.0518, pedigree (2,5,5,5,2)
  For pre-treatment alkaline cleaning. Reported as sodium carbonate in source. Not assumed to be proportional to hard chromium layer thickness since more related to area plated.
  properties: heating value, net 3.43 MJ, dry mass 1 kg, carbon content, fossil 0.113208, wet mass 1 kg
- tap water: 0.0242 kg; name water; lognormal variance with pedigree 0.0518, pedigree (2,5,5,5,2)
  Used for rinsing baths: alkaline cleaning (8,1 liters), acid dip (8,1 liters) and hard chromium electroplating (8 liters). No evaporation indicated in source, so none was assumed. Not assumed to be proportional to hard chromium layer thickness since more related to area plated.
  properties: dry mass 0.000337476 kg, wet mass 1 kg, water content 2962.17, carbon content, fossil 0.00178991
  note on carbon content, fossil: Bicarbonate content is 2.93 mol/m3. CO2 content is 0.1 mol/m3 (ecoinvent v2.2 report 8, Tab 93.1).
- wastewater from black chrome coating: -2.42e-5 m3; name wastewater; = (water/1000)*-1; lognormal variance with pedigree 0.002, pedigree (1,1,3,1,1)
  Proxy. Reported in source as "rinse with wastewater discharge" for alkaline cleaning, acid dip and hard chromium electroplating. Assumed not to be proportional to had chromium layer thickness.
  Uncertainty: Calculated variable. Uncertainty should be determined from propagation of uncertainty factors of underlying variables, however no uncertainty could be generated for the terms of the polynomial function. Uncertainty of actual relation between variables not accounted at this time, although this could be included in a future update.
  production volume 2.42 m3; = PV_Cr_coating * wastewater / Cr_coating
    Calculated from production volume of reference product using the relative outputs.
  property price 0 EUR2005; name wastewater_price_EUR2005
  properties: dry mass 0.337476 kg, wet mass 1000 kg, carbon content, fossil 0.00256552, water content 2962.17
- electricity, medium voltage: 497.792 kWh; = alkaline_cleaning_electricity+acid_dip_electricity+electricity_for_electroplating*Cr_coating_thickness/Cr_coating_reference_thickness; lognormal variance with pedigree 0.002, pedigree (1,1,3,1,1)
  Total electricity used. The amount of electricity for chromium electroplating is assumed to be proportionnal to hard chromium layer thickness.
  Uncertainty: Calculated variable. Uncertainty should be determined from propagation of uncertainty factors of underlying variables, however no uncertainty could be generated for the terms of the polynomial function. Uncertainty of actual relation between variables not accounted at this time, although this could be included in a future update.
- metal coating facility: 3.33333e-7 unit; = 1 / (PV_Cr_coating * lifetime); lognormal variance with pedigree 0.002, pedigree (1,1,3,1,1)
  Default value using the generic metal coating facility dataset created within the ecoinvent project, based on 100000 m2 of coatings per year and a 30 year lifetime.
  EcoSpold01Location=RER
  Uncertainty: Calculated variable. Uncertainty should be determined from propagation of uncertainty factors of underlying variables, however no uncertainty could be generated for the terms of the polynomial function. Uncertainty of actual relation between variables not accounted at this time, although this could be included in a future update.
  property lifetime 30 year; name lifetime
  note on lifetime: Default value using the generic metal coating facility dataset created within the ecoinvent project.
- sulfuric acid: 0.000149236, 0.00114076 kg (2 entries); lognormal variance with pedigree 0.0518, pedigree (2,5,5,5,2)
  (same comment as for sulfuric acid)
- sulfur dioxide, liquid: 0.0102564, 0.02553 kg (2 entries); lognormal variance with pedigree 0.002, pedigree (1,1,3,1,1)
  (same comment as for sulfur dioxide, liquid)
- sodium phosphate: 0.0011136, 0.0052864 kg (2 entries); lognormal variance with pedigree 0.0518, pedigree (2,5,5,5,2)
  (same comment as for sodium phosphate)

## Emissions to nature
- Chromium VI [air, unspecified]: 0.00894427 kg; = Cr_VI_air_post_abat*Cr_coating_thickness/Cr_coating_reference_thickness; lognormal variance with pedigree 0.002, pedigree (1,1,3,1,1)
  Chromium VI emissions are assumed to be proportionnal to hard chromium layer thickness.
  Uncertainty: Calculated variable. Uncertainty should be determined from propagation of uncertainty factors of underlying variables, however no uncertainty could be generated for the terms of the polynomial function. Uncertainty of actual relation between variables not accounted at this time, although this could be included in a future update.

## Sampling procedure
Dataset based on literature.

## Extrapolations
This dataset has been extrapolated from year 2014 to the year of the calculation (2021). The uncertainty has been adjusted accordingly.

## Review by Emilia Moreno Ruiz 2015-09-16
PV corrected
