# chipper production, mobile, diesel

Dataset: EcoSpold 2, unit process
Geography: GLO
Time period: 2012-01-01 to 2021-12-31
Technology level: current
Classification: ISIC rev.4 ecoinvent: 2821:Manufacture of agricultural and forestry machinery
Tags: Swiss Brushup completed
Scenario: Business-as-Usual
System model: Allocation, cut-off by classification
Generated by: Frank Werner
Published in: Spielmann, M. 2007
Database: ecoinvent
isCopyrightProtected: true
accessRestrictedTo: 1

## Included activities start
The activity starts with the semi-finished products and raw materials at the factory gate.

## Included activities end
The inventory accounts for the input and disposal of all materials, their (pre-) processing and the energy required for the production and maintenance of the forest machinery represented by this dataset. In addition, material for and emissions from disassembly are included.
Infrastructure for the production and maintenance of the machinery is inventoried as a rough guess from lorry production.
The dataset does not contain fuel consumption or related emissions. These issues are inventoried in the respective dataset on the operation of the machinery.

## Geography
The inventories apply to the production in Northern/Central Europe

## Parameters
- maintenance factor: 0.55 dimensionless; name maintenance_factor; lognormal variance with pedigree 0.1048, pedigree (3,4,2,1,2)
  Spielmann et al. 2007
- weight of the vehicle: 29000 kg/unit; name vehicle_weight
- lifetime of machine, productive machine hours: 15000 hour; name total_PMH; lognormal variance with pedigree 0.1042, pedigree (3,4,2,1,1)
  Oral personal communication, P. Wiss, Präsident des Verbandes Forstunternehmer Schweiz

## Reference product
- chipper, mobile, diesel: 1 unit; CPC 441: Agricultural or forestry machinery and parts thereof; By-product classification allocatable product
  production volume 5000 unit; name p_machinery
    unqualified guess, no information available
  property price 58083.1 EUR2005
    Calculated based on inputs: The price of the product has been calculated as a sum of the values of the material and energy inputs for this product. This value is therefore a rough estimation. It may underestimate the real price since there are additional expenses when producing any product. These expences can include for example labour costs, treatment of waste materials and profit for the producer. Please consider carefully whether this level of data quality is acceptable for your application.
  property lifetime capacity [h] 15000 hour; = total_PMH
    Total of operation hours expected; in case of forest machinery: total of productive machine hours.
  property lifetime 8.52273 year; name lifetime; = total_PMH/8/220
    service life

## By-products
- scrap lead acid battery: 0 kg; source Spielmann, M. 2007; By-product classification Recyclable; CPC 39364: Waste and scrap of lead; pedigree (1,1,1,1,1)
  production volume 0 kg; = p_machinery*w_lead
    Calculated from production volume of reference product using the relative outputs.
  property price 0 EUR2005; name w_lead_price_EUR2005
    Assumed without economic value

## Inputs from technosphere
- water, completely softened: 0 kg; name m_water_softened; source Spielmann, M. 2007; pedigree (1,1,1,1,1)
  for battery; the amount is extrapolated from reference via total weight of machine
  property dry mass 0 kg; name m_water_softened_DM
  properties: wet mass 1 kg
- waste electric and electronic equipment: -144.71 kg; name w_electronics; = (m_electronics)*-1; source Spielmann, M. 2007; lognormal variance with pedigree 0.203, pedigree (4,5,5,5,5)
  production volume 723550 kg; = p_machinery*w_electronics
    Calculated from production volume of reference product using the relative outputs.
  property carbon content, fossil 0.337146; name w_electronics_C_content_fossil; = C_content_fossil_electronics
  property dry mass 1 kg; name w_electronics_DM
  property carbon content, non-fossil 0.00013442; name w_electronics_C_content_non_fossil; = C_content_non_fossil_electronics
  properties: wet mass 1 kg
- steel, chromium steel 18/8, hot rolled: 1695.7 kg; name m_chromium_steel; = (1+maintenance_factor)*1094; source Spielmann, M. 2007; lognormal variance with pedigree 0.235, pedigree (5,5,5,5,5)
  total material input for production and maintenance (estimated via default factor); the amount of material used in production is extrapolated from reference via total weight of machine
  properties: wet mass 1 kg, carbon content, fossil 0.0008, dry mass 1 kg
  note on carbon content, fossil: Stainless steel model is the grade 304 steel (18/8 stainless, 18% chromium 8% nickel; max. 0.08% C)
- scrap steel: 0 kg; name w_scrap_steel; source Spielmann, M. 2007; pedigree (1,1,1,1,1)
  used for chromium steel, for which no specific dataset is available (15.09.2012)
  production volume 0 kg
    Calculated from production volume of reference product using the relative outputs.
  property dry mass 1 kg; name w_chromium_steel_DM
  properties: wet mass 1 kg
- polypropylene, granulate: 1015.25 kg; name m_PP; = (1+maintenance_factor)*655; source Spielmann, M. 2007; lognormal variance with pedigree 0.235, pedigree (5,5,5,5,5)
  (same comment as for steel, chromium steel 18/8, hot rolled)
  property carbon content, fossil 0.857143; name C_content_fossil_PP
  properties: heating value, net 32.78 MJ, wet mass 1 kg, dry mass 1 kg
  note on heating value, net: Value extracted from "treatment of waste polypropylene, open burning"
  note on carbon content, fossil: Polypropylene is formed by the polymerisation of propylene, C3H6 (ecoinvent v2.2 report 11_II)
- waste rubber, unspecified: 0 kg; name w_rubber; source Spielmann, M. 2007; pedigree (1,1,1,1,1)
  production volume 0 kg
    Calculated from production volume of reference product using the relative outputs.
  property dry mass 1 kg; name w_rubber_DM
  properties: carbon content, fossil 0.853, wet mass 1 kg, heating value, net 27.19 MJ
  note on heating value, net: Value taken from the general comment of the treatment dataset.
- copper, cathode: 51 kg; name m_copper; source Spielmann, M. 2007; lognormal variance with pedigree 0.235, pedigree (5,5,5,5,5)
  total material input for production (no maintenance according to reference); the amount of material used in production is extrapolated from reference via total weight of machine
  properties: wet mass 1 kg, dry mass 1 kg
- steel, low-alloyed, hot rolled: 3642.5 kg; name m_steel_low_alloyed; = (1+maintenance_factor)*2350; source Spielmann, M. 2007; lognormal variance with pedigree 0.235, pedigree (5,5,5,5,5)
  (same comment as for steel, chromium steel 18/8, hot rolled)
  properties: carbon content, fossil 0.005, UVEK_relative_amount_9 0.1, UVEK_relative_amount_2 1, UVEK_link_8 4417, UVEK_link_2 2662, dry mass 1 kg, UVEK_link_9 4433, UVEK_relative_amount_1 1, UVEK_relative_amount_8 0.2, wet mass 1 kg, UVEK_link_1 4222
  note on carbon content, fossil: Low alloyed steel composition given in Tab. 3.2 ecoinvent v2.2 report 10_partII. Steel assumed to have a C content of 0.5%
  note on UVEK_relative_amount_9: scaling factor = amount of transport in corresponding KBOB dataset/amount of this input from technosphere. To be used only in special submissions in coordination with ecoinvent and the Swiss FOEN.
  note on UVEK_relative_amount_2: to be used only in special submissions in coordination with ecoinvent and the Swiss FOEN.
  note on UVEK_link_8: This link has been introduced to model transport specifically for the SAM model; to be used only in special submissions in coordination with ecoinvent and the Swiss FOEN.
- wire drawing, copper: 51 kg; = m_copper; source Spielmann, M. 2007; lognormal variance with pedigree 0.235, pedigree (5,5,5,5,5)
- waste polypropylene: 0 kg; name w_PP; source Spielmann, M. 2007; pedigree (1,1,1,1,1)
  Input of PP correct for water content of waste flow
  production volume 0 kg
    Calculated from production volume of reference product using the relative outputs.
  property dry mass 0.841 kg; name DM_waste_polypropylene
  property water content 0.189061; name WC_waste_PP
  properties: heating value, net 32.78 MJ, wet mass 1 kg, carbon content, fossil 0.825208
  note on heating value, net: Value assumed for all polypropylene products. Source: Phyllis2, database for (treated) biomass, algae, feedstocks for biogas production and biochar, https://phyllis.nl/Biomass/View/1186, ECN.TNO
- flat glass, uncoated: 0 kg; name m_glass; source Spielmann, M. 2007; pedigree (1,1,1,1,1)
  (same comment as for steel, chromium steel 18/8, hot rolled)
  properties: wet mass 1 kg, dry mass 1 kg
- electronics, for control units: 144.71 kg; name m_electronics; source Spielmann, M. 2007; lognormal variance with pedigree 0.235, pedigree (5,5,5,5,5)
  (same comment as for copper, cathode)
  property wet mass 1 kg; name m_electronics_WM
  property carbon content, fossil 0.337146; name C_content_fossil_electronics
  property water content 0; name water_content
  property dry mass 1 kg; name m_electronics_DM
  property carbon content, non-fossil 0.00013442; name C_content_non_fossil_electronics
  property water in wet mass 0 kg; name WWM
- cast iron: 373 kg; name m_cast_iron; source Spielmann, M. 2007; lognormal variance with pedigree 0.235, pedigree (5,5,5,5,5)
  (same comment as for copper, cathode)
  property carbon content, fossil 0.04; name C_content_fossil_cast_iron
  property dry mass 1 kg; name m_cast_iron_DM
  property wet mass 1 kg; name m_cast_iron_WM
- wastewater, average: 0 m3; name w_sewage; source Spielmann, M. 2007; pedigree (1,1,1,1,1)
  amounts of water inputs converted to m3
  production volume 0 m3
    Calculated from production volume of reference product using the relative outputs.
  properties: wet mass 1000 kg, carbon content, non-fossil 0.194039, water content 2882.2, dry mass 0.346837 kg
- acetylene: 0 kg; name m_acethylene; source Spielmann, M. 2007; pedigree (1,1,1,1,1)
  used during disassembly
  property dry mass 1 kg; name m_acethylene_DM
  property carbon content, fossil 0.923077; name C_content_fossil_acetylene
  property wet mass 1 kg; name m_acethylene_WM
  properties: heating value, net 51.2 MJ
  note on heating value, net: Based on literature, page 25 (Value may refer to HHV), Althaus H.-J., Chudacoff M., Hischier R., Jungbluth N., Osses M. and Primas A. (2007) Life Cycle Inventories of Chemicals. Final report ecoinvent data v2.0 No. 8. EMPA, Swiss Centre for Life Cycle Inventories, Dübendorf, CH, Online-Version under: www.ecoinvent.org.
- electricity, medium voltage: 110182 kWh; = (1+maintenance_factor)*71085; source Spielmann, M. 2007; lognormal variance with pedigree 0.235, pedigree (5,5,5,5,5)
  total electricity input for production and maintenance (estimated via default factor); the amount of electricity used in production is extrapolated from reference via total weight of machine
  properties: UVEK_link_1 1779, UVEK_relative_amount_1 1
- waste aluminium: -578.15 kg; name w_aluminium; = (m_aluminium)*-1; source Spielmann, M. 2007; lognormal variance with pedigree 0.203, pedigree (4,5,5,5,5)
  production volume 2.89075e6 kg; = p_machinery*w_aluminium
    Calculated from production volume of reference product using the relative outputs.
  property dry mass 1 kg; name w_aluminium_DM
  properties: wet mass 1 kg
- oxygen, liquid: 0 kg; source Spielmann, M. 2007; pedigree (1,1,1,1,1)
  used during disassembly
  properties: wet mass 1 kg, dry mass 1 kg
- injection moulding: 1015.25 kg; = m_PP; source Spielmann, M. 2007; lognormal variance with pedigree 0.23, pedigree (5,5,5,5,5)
- tap water: 59854.8 kg; name m_tap_water; = (1+maintenance_factor)*38616; source Spielmann, M. 2007; lognormal variance with pedigree 0.235, pedigree (5,5,5,5,5)
  total water input for production and maintenance (estimated via default factor); the amount of water used in production is extrapolated from reference via total weight of machine
  property carbon content, fossil 0.00178991; name C_content_fossil
  property carbon content, non-fossil 0; name C_content_non_fossil
  properties: water content 2962.17, wet mass 1 kg, dry mass 0.000337476 kg
- scrap copper: 0 kg; name w_copper; source Spielmann, M. 2007; pedigree (1,1,1,1,1)
  (same comment as for steel, chromium steel 18/8, hot rolled)
  production volume 0 kg
    Calculated from production volume of reference product using the relative outputs.
  property dry mass 1 kg; name w_copper_DM
  properties: wet mass 1 kg
- waste bulk iron, excluding reinforcement: 0 kg; name w_bulk_iron; source Spielmann, M. 2007; pedigree (1,1,1,1,1)
  production volume 0 kg
    Calculated from production volume of reference product using the relative outputs.
  property dry mass 1 kg; name w_bulk_iron_DM
  properties: wet mass 1 kg
- steel, low-alloyed: 62328.2 kg; name m_steel_unalloyed; = (1+maintenance_factor)*17373+35400; source Spielmann, M. 2007; lognormal variance with pedigree 0.235, pedigree (5,5,5,5,5)
  total material input for production and maintenance (estimated via default factor); the amount of material used in production is extrapolated from reference via total weight of machine; plus total amount of knives used over total service life, estimated based on Spielmann et al. 2007.
  properties: wet mass 1 kg, carbon content, fossil 0.005, dry mass 1 kg
- heat, district or industrial, natural gas: 161834 MJ; = (1+maintenance_factor)*104409; source Spielmann, M. 2007; lognormal variance with pedigree 0.235, pedigree (5,5,5,5,5)
  total heat input for production and maintenance (estimated via default factor); the amount of heat used in production is extrapolated from reference via total weight of machine
  properties: UVEK_link_1 2580, UVEK_relative_amount_1 1, heating value, net 1 MJ
  note on UVEK_link_1: From a principal point of view, linking to a dataset representing a technology mix would be preferable.
- wastewater from lorry production: -9.9975 m3; name w_WW; = ((1+maintenance_factor)*6.45)*-1; source Spielmann, M. 2007; lognormal variance with pedigree 0.203, pedigree (4,5,5,5,5)
  total production specific waste water from production and maintenance (estimated via default factor); the amount of waste water from production is extrapolated from reference via total weight of machine
  production volume 49987.5 m3; = p_machinery*w_WW
    Calculated from production volume of reference product using the relative outputs.
  properties: dry mass 0.337476 kg, wet mass 1000 kg, water content 2962.17
- synthetic rubber: 2510 kg; name m_rubber; = 400+2110; source Spielmann, M. 2007; lognormal variance with pedigree 0.235, pedigree (5,5,5,5,5)
  rubber sealings and tubes plus rubber tyres (production and mantenance)
  property carbon content, fossil 0.871949; name C_content_fossil_rubber
  properties: wet mass 1 kg, dry mass 1 kg, heating value, net 26.42 MJ
  note on carbon content, fossil: EPDM (Ethylene-propene-diene terpolymer) rubber is a terpolymer of ethylene, propene, and a diene with the residual unsaturated portion of the diene in the side chain (ecoinvent v2.2 report 7-part XX & Ullmann). Chemical formula (deduced from Evidences of Solvent-Induced Miscibility in Polychloroprene-co-Ethylene-Propene Diene Terpolymer Blends, Dubey et al., Journal of Applied Polymer Science, 2009, 111:1884-1891): C20H35
- road vehicle factory: 8.73e-7 unit; source Spielmann M. 2007; lognormal variance with pedigree 0.76, pedigree (5,5,5,5,5)
  no specific information available; proxy as for production of lorry 16 t
- aluminium, cast alloy: 578.15 kg; name m_aluminium; = (1+maintenance_factor)*373; source Spielmann, M. 2007; lognormal variance with pedigree 0.235, pedigree (5,5,5,5,5)
  (same comment as for steel, chromium steel 18/8, hot rolled)
  properties: wet mass 1 kg, dry mass 1 kg
- powder coat, steel: 79.515 m2; = (1+maintenance_factor)*51.3; source Spielmann, M. 2007; lognormal variance with pedigree 0.235, pedigree (5,5,5,5,5)
  total powder coating input for production and maintenance (estimated via default factor)
- lead: 295.3 kg; name m_lead; source Spielmann, M. 2007; lognormal variance with pedigree 0.235, pedigree (5,5,5,5,5)
  for battery; the amount is extrapolated from reference via total weight of machine
  properties: wet mass 1 kg, dry mass 1 kg
- waste glass sheet: 0 kg; name w_glass; source Spielmann, M. 2007; pedigree (1,1,1,1,1)
  production volume 0 kg
    Calculated from the production volume of harvester in proportion to the respective output amounts.
  properties: wet mass 1 kg, dry mass 1 kg
- scrap lead acid battery: -295.3 kg; source Spielmann, M. 2007; lognormal variance with pedigree 0.203, pedigree (4,5,5,5,5)
  production volume 1.4765e6 kg
- water, completely softened: 14.212, 19.773, 26.415 kg (3 entries); source Spielmann, M. 2007; lognormal variance with pedigree 0.235, pedigree (5,5,5,5,5)
  for battery; the amount is extrapolated from reference via total weight of machine
- scrap steel: -16476.4, -20.875, -51169 kg (3 entries); source Spielmann, M. 2007; lognormal variance with pedigree 0.203, pedigree (4,5,5,5,5)
  used for chromium steel, for which no specific dataset is available (15.09.2012)
  production volume 3.38332e8 kg
  properties: wet mass 1 kg, dry mass 1 kg
- waste rubber, unspecified: -1229.2, -51.6016, -1229.2 kg (3 entries); source Spielmann, M. 2007; lognormal variance with pedigree 0.203, pedigree (4,5,5,5,5)
  production volume 1.255e7 kg
  properties: carbon content, fossil 0.853, wet mass 1 kg, heating value, net 27.19 MJ, dry mass 1 kg
- waste polypropylene: -116.198, -8.95819, -3.70005, -3.51355, -134.072, -1.49478, -0.677493, -938.58 kg (8 entries); source Spielmann, M. 2007; lognormal variance with pedigree 0.203, pedigree (4,5,5,5,5)
  Input of PP correct for water content of waste flow
  production volume 6.03597e6 kg
  properties: dry mass 0.841 kg, heating value, net 32.78 MJ, water content 0.189061, wet mass 1 kg, carbon content, fossil 0.825208
- flat glass, uncoated: 39.808, 193.312 kg (2 entries); source Spielmann, M. 2007; lognormal variance with pedigree 0.235, pedigree (5,5,5,5,5)
  (same comment as for steel, chromium steel 18/8, hot rolled)
- wastewater, average: -18.7212, -2.02528, -39.1687 m3 (3 entries); source Spielmann, M. 2007; lognormal variance with pedigree 0.203, pedigree (4,5,5,5,5)
  amounts of water inputs converted to m3
  production volume 299576 m3
- acetylene: 0.87, 4.13 kg (2 entries); source Spielmann, M. 2007; lognormal variance with pedigree 0.235, pedigree (5,5,5,5,5)
  used during disassembly
  properties: dry mass 1 kg, heating value, net 51.2 MJ, carbon content, fossil 0.923077, wet mass 1 kg
- oxygen, liquid: 2.58372, 9.41628 kg (2 entries); source Spielmann, M. 2007; lognormal variance with pedigree 0.235, pedigree (5,5,5,5,5)
  used during disassembly
- scrap copper: -16.1776, -0.759018, -34.0634 kg (3 entries); source Spielmann, M. 2007; lognormal variance with pedigree 0.203, pedigree (4,5,5,5,5)
  (same comment as for steel, chromium steel 18/8, hot rolled)
  production volume 255000 kg
  properties: dry mass 1 kg, wet mass 1 kg
- waste bulk iron, excluding reinforcement: -120.106, -3.1395, -249.755 kg (3 entries); source Spielmann, M. 2007; lognormal variance with pedigree 0.203, pedigree (4,5,5,5,5)
  production volume 1.865e6 kg
  properties: dry mass 1 kg, wet mass 1 kg
- waste glass sheet: -47.782, -1.21653, -184.122 kg (3 entries); source Spielmann, M. 2007; lognormal variance with pedigree 0.203, pedigree (4,5,5,5,5)
  production volume 1.1656e6 kg

## Emissions to nature
- Carbon dioxide, fossil [air, non-urban air or from high stacks]: 16.9231 kg; = m_acethylene*C_content_fossil_acetylene/12*(12+2*16); source Spielmann, M. 2007; lognormal variance with pedigree 0.033, pedigree (1,1,4,1,1)
  acethylene converted to CO2

## Sampling procedure
Data adapted from Spielmann, M,, L. Barreto, V. Erni, F. Frutig and O.Thees (2007): Life cycle assessment of energy wood supply of forest wood chips in Switzerland, Paul Scherrer Institute and Swiss Federal Institute for Forest, Snow and Landscape Research (WSL), unpublished.

## Extrapolations
This dataset has been extrapolated from year 2012 to the year of the calculation (2021). The uncertainty has been adjusted accordingly.
