# maize seed production, at farm

Dataset: EcoSpold 2, unit process
Geography: GLO
Time period: 2000-01-01 to 2021-12-31
Technology level: current
Classification: ISIC rev.4 ecoinvent: 0111:Growing of cereals (except rice), leguminous crops and oil seeds
Synonyms: corn; Zea mays L.
Scenario: Business-as-Usual
System model: Allocation, cut-off by classification
Generated by: Thomas Nemecek
Published in: Nemecek, T. 2007
Database: ecoinvent
isCopyrightProtected: true
accessRestrictedTo: 1

## General comment
This dataset represents the production of 1 kg of maize seed (fresh matter). The yield is 3000 kg/ha at a moisture content at storage of 14%.
[This dataset was already contained in the ecoinvent database version 2. It was not individually updated during the transfer to ecoinvent version 3. Life Cycle Impact Assessment results may still have changed, as they are affected by changes in the supply chain, i.e. in other datasets. This dataset was generated following the ecoinvent quality guidelines for version 2. It may have been subject to central changes described in the ecoinvent version 3 change report (http://www.ecoinvent.org/database/ecoinvent-version-3/reports-of-changes/), and the results of the central updates were reviewed extensively. The changes added e.g. consistent water flows and other information throughout the database. The documentation of this dataset can be found in the ecoinvent reports of version 2, which are still available via the ecoinvent website. The change report linked above covers all central changes that were made during the conversion process.]

## Included activities start
This activity starts after the harvest of the previous crop. The inputs of seeds, mineral fertilisers and pesticides are considered. Farm manure as an organic fertiliser is only accounted for in terms of direct field emissions; all pre-processes are included in the animal production systems.

## Included activities end
The dataset includes all machine operations and corresponding machine infrastructure and sheds. Machine operations are: soil cultivation, sowing, fertilisation, weed control, pest and pathogen control, combine-harvest, transport from field to regional processing centre (10 km) and drying of grains. Further, direct field emissions are included. This activity ends after drying of grains at the regional processing centre.

## Geography
Values refer to the situation in Switzerland.

## Technology
Integrated production

## Reference product
- maize seed, at farm: 1 kg; name REF_PRODUCT; CPC 01121: Maize (corn), seed; By-product classification allocatable product
  production volume 5.61088e9 kg
    FAOSTAT 2011: 'maize', average of the years 1999-2002. http://faostat.fao.org/. The original value was split into conventional/integrated seed (98%) and organic seed (2%), where 2% organic production is an extrapolation from Europe to the world (http://www.fao.org/docrep/004/y3557e/y3557e09.htm).
  property wet mass 1 kg; name maize_seed_farm_WM
  property price 0.201365 EUR2005; name REF_PRODUCT_price_EUR2005
    Calculated based on inputs: The price of the product has been calculated as a sum of the values of the material and energy inputs for this product. This value is therefore a rough estimation. It may underestimate the real price since there are additional expenses when producing any product. These expences can include for example labour costs, treatment of waste materials and profit for the producer. Please consider carefully whether this level of data quality is acceptable for your application.
  property dry mass 0.86 kg; name REF_PRODUCT_DM
  property carbon content, non-fossil 0.436047; name REF_PRODUCT_C_content_non_fossil
    biogene carbon content on a dry matter basis; Composition data obtained from Corn Grain Whole, in (http://beefmagazine.com/images/2009%20feed%20table.pdf). First, composition data were refered to 1 kg dry mass. Then, C-contents were calculated considering a C-content/dry mass of 44% in carbohydrates (including fibres), 53% in proteins and 75% in fats. All data from ecoinvent report, n 15a, pg 40, except C-content in protein, that comes from Determination of protein concentration by total organic carbon analysis, Rouwenhorst et al., 1991, J Biochem and Biophys Methods, 22:119-128.
  property energy content 15.9272 MJ; name REF_PRODUCT_energy_content_1
    See chapter 'Product Properties' in '01_crop production - yields & inputs CH & Europe_v1.0.pdf', section 'AGRICULTURAL PRODUCTION IN SWITZERLAND' - pdf-document on the dedicated talk page of ecoinvent (www.ecoinvent.org/documentation)
  property water content 0.162791; name REF_PRODUCT_energy_content
  property water in wet mass 0.14 kg; name maize_seed_farm_WWM
  property carbon content 0.436047
    carbon content on a dry matter basis (reserved; not for manual entry)
  properties: carbon allocation 0.375 kg

## Inputs from technosphere
- acetamide-anillide-compound, unspecified: 0.00019667 kg; lognormal variance with pedigree 0.0426, pedigree (2,1,5,5,1)
  Based on the inventory for commercial crop production 'maize production, Swiss integrated production'. Adaptations: see '01_crop production - seed production & processing_v1.0.pdf' - pdf-document on the dedicated talk page of ecoinvent (www.ecoinvent.org/documentation)
  properties: wet mass 1 kg, dry mass 1 kg, carbon content, fossil 0.659175
  note on carbon content, fossil: Approximated as an unweighted average of the C-content of the acetamide-anillide-compound (Tab 2.25 Sutter, 2010) alachor, metolachlor, propachlor and teflubenzuron
- potassium chloride: 0 kg; pedigree (1,1,1,1,1)
  The exchange has been updated from 'potassium chloride, as K2O' into 'potassium chloride' and therefore its amount has been scaled (multiplied) from 0.015 kg by 1.5829 kg of 'potassium chloride' per kg of 'potassium chloride, as K2O'. Original comment of the exchange is: Based on the inventory for commercial crop production 'maize production, Swiss integrated production'. Adaptations: see '01_crop production - seed production & processing_v1.0.pdf' - pdf-document on the dedicated talk page of ecoinvent (www.ecoinvent.org/documentation)
  properties: wet mass 1 kg, dry mass 1 kg
- combine harvesting: 0.00033333 ha; lognormal variance with pedigree 0.0426, pedigree (2,1,5,5,1)
  (same comment as for acetamide-anillide-compound, unspecified)
- tillage, ploughing: 0.00033333 ha; lognormal variance with pedigree 0.0426, pedigree (2,1,5,5,1)
  (same comment as for acetamide-anillide-compound, unspecified)
- packaging, for pesticides: 0.00100001 kg; lognormal variance with pedigree 0.0912, pedigree (4,3,5,5,4)
  Total amount of active substance/s of pesticides needed for the production of maize seed, at farm is calculated to be circa 5.00E-04 kg. Pesticide/s used in this dataset is/are: 'acetamide-anillide-compound, unspecified', 'organophosphorus-compound, unspecified', 'triazine-compound, unspecified'. The total amount of active substance/s is doubled in order to account for the packaging of the dilluted product of pesticide/s that is/are applied. Therefore, 1.00E-03 kg of packaging for pesticides is justified with this exchange.
  properties: wet mass 1 kg, price 0.0642 EUR2005, heating value, net 25.97 MJ, carbon content, fossil 0.85714, dry mass 1 kg
- fertilising, by broadcaster: 0.001 ha; lognormal variance with pedigree 0.0426, pedigree (2,1,5,5,1)
  (same comment as for acetamide-anillide-compound, unspecified)
- triazine-compound, unspecified: 0.00022 kg; lognormal variance with pedigree 0.0426, pedigree (2,1,5,5,1)
  (same comment as for acetamide-anillide-compound, unspecified)
  properties: carbon content, fossil 0.475616, wet mass 1 kg, dry mass 1 kg
  note on carbon content, fossil: An unweighted average of the C content in Atrazine, Cyanazine, metamitron, simazine, and terbuthylazine. Those substances are classified as triazine-compounds in Tab 2.25, Sutter 2010
- transport, tractor and trailer, agricultural: 0 metric ton*km; pedigree (1,1,1,1,1)
  (same comment as for acetamide-anillide-compound, unspecified)
- packaging, for fertilisers: 0.144326 kg; lognormal variance with pedigree 0.0912, pedigree (4,3,5,5,4)
  Total amount of active substance/s of fertilisers needed for the production of 'maize seed, at farm' is calculated to be circa 7.22E-02 kg. Fertiliser/s used in this dataset is/are: 'ammonium nitrate, as N', 'phosphate fertiliser, as P2O5', 'potassium chloride, as K2O'. The total amount of active substance/s is doubled in order to account for the packaging of the dilluted product of fertiliser/s that is/are applied. Therefore, 1.44E-01 kg of packaging for fertilisers is justified with this exchange.
  properties: carbon content, fossil 0.825301, dry mass 1 kg, heating value, net 25.01 MJ, price 0.0642 EUR2005, wet mass 1 kg
  note on carbon content, fossil: Considering a chemical formula (C2H4)n for polyethylene, carbon content-fossil is calculated to be 0.856286 kg of Carbon per kg of dry mass.
- mowing, by rotary mower: 0.002 ha; lognormal variance with pedigree 0.0426, pedigree (2,1,5,5,1)
  (same comment as for acetamide-anillide-compound, unspecified)
- drying of bread grain, seed and legumes: 0.35385 l; lognormal variance with pedigree 0.0426, pedigree (2,1,5,5,1)
  (same comment as for acetamide-anillide-compound, unspecified)
- organophosphorus-compound, unspecified: 8.3333e-5 kg; lognormal variance with pedigree 0.0426, pedigree (2,1,5,5,1)
  (same comment as for acetamide-anillide-compound, unspecified)
  properties: wet mass 1 kg, carbon content, fossil 0.260898, dry mass 1 kg
  note on carbon content, fossil: C content was calculated as an unweighted average of glyphosate, parathion, and fosetyl-Al. Those substances are classified as organo-phosphorous compounds in Tab 2.25, Sutter 2010
- tillage, harrowing, by spring tine harrow: 0.001 ha; lognormal variance with pedigree 0.0426, pedigree (2,1,5,5,1)
  (same comment as for acetamide-anillide-compound, unspecified)
- application of plant protection product, by field sprayer: 0.00056667 ha; lognormal variance with pedigree 0.0426, pedigree (2,1,5,5,1)
  (same comment as for acetamide-anillide-compound, unspecified)
- inorganic phosphorus fertiliser, as P2O5: 0 kg; pedigree (1,1,1,1,1)
  (same comment as for acetamide-anillide-compound, unspecified)
  properties: dry mass 1 kg, wet mass 1 kg
- ammonium nitrate: 0 kg; pedigree (1,1,1,1,1)
  The exchange has been updated from 'ammonium nitrate, as N' into 'ammonium nitrate' and therefore its amount has been scaled (multiplied) from 0.0354 kg by 2.8573 kg of 'ammonium nitrate' per kg of 'ammonium nitrate, as N'. Original comment of the exchange is: Based on the inventory for commercial crop production 'maize production, Swiss integrated production'. Adaptations: see '01_crop production - seed production & processing_v1.0.pdf' - pdf-document on the dedicated talk page of ecoinvent (www.ecoinvent.org/documentation)
  properties: dry mass 1 kg, wet mass 1 kg
- sowing: 0.0011667 ha; lognormal variance with pedigree 0.0426, pedigree (2,1,5,5,1)
  (same comment as for acetamide-anillide-compound, unspecified)
- electricity, low voltage: 0.013 kWh; lognormal variance with pedigree 0.0426, pedigree (2,1,5,5,1)
  (same comment as for acetamide-anillide-compound, unspecified)
- maize seed, for sowing: 0.005 kg; name SEED; lognormal variance with pedigree 0.0426, pedigree (2,1,5,5,1)
  (same comment as for acetamide-anillide-compound, unspecified)
  property water content 0.162791; name maize_seed_sowing_water_content
  property carbon content, non-fossil 0.436047; name SEED_C_content_non_fossil
  property energy content 15.9272 MJ; name SEED_energy_content
  property dry mass 0.86 kg; name SEED_DM
  property wet mass 1 kg; name maize_seed_sowing_WM
  property water in wet mass 0.14 kg; name maize_seed_sowing_WWM
  note on carbon content, non-fossil: biogene carbon content on a dry matter basis; Composition data obtained from Corn Grain Whole, in (http://beefmagazine.com/images/2009%20feed%20table.pdf). First, composition data were refered to 1 kg dry mass. Then, C-contents were calculated considering a C-content/dry mass of 44% in carbohydrates (including fibres), 53% in proteins and 75% in fats. All data from ecoinvent report, n 15a, pg 40, except C-content in protein, that comes from Determination of protein concentration by total organic carbon analysis, Rouwenhorst et al., 1991, J Biochem and Biophys Methods, 22:119-128.
  note on energy content: See chapter 'Product Properties' in '01_crop production - yields & inputs CH & Europe_v1.0.pdf', section 'AGRICULTURAL PRODUCTION IN SWITZERLAND' - pdf-document on the dedicated talk page of ecoinvent (www.ecoinvent.org/documentation)
- potassium chloride: 0.00182085, 0.0219558 kg (2 entries); lognormal variance with pedigree 0.0426, pedigree (2,1,5,5,1)
  (same comment as for potassium chloride)
- transport, tractor and trailer, agricultural: 4.05e-5, 0.0099595 metric ton*km (2 entries); lognormal variance with pedigree 0.0426, pedigree (2,1,5,5,1)
  (same comment as for acetamide-anillide-compound, unspecified)
- inorganic phosphorus fertiliser, as P2O5: 0.000812979, 8.26072e-5, 0.00295031, 4.12061e-5, 5.80299e-6, 0.000159607, 5.90052e-6, 9.52129e-5, 5.31778e-5, 0.000195278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 kg (30 entries); lognormal variance with pedigree 0.0426, pedigree (2,1,5,5,1)
  (same comment as for acetamide-anillide-compound, unspecified)
- ammonium nitrate: 0.0250345, 0.0173623, 0.0133448, 0.0453018 kg (4 entries); lognormal variance with pedigree 0.0426, pedigree (2,1,5,5,1)
  (same comment as for ammonium nitrate)

## Inputs from nature
- Carbon dioxide, in air [natural resource, in air]: 1.36813 kg; = 44/12 * (REF_PRODUCT_C_content_non_fossil * REF_PRODUCT * REF_PRODUCT_DM - SEED_C_content_non_fossil * SEED * SEED_DM); lognormal variance with pedigree 0.1327, pedigree (2,2,5,5,1)
  (same comment as for acetamide-anillide-compound, unspecified)
- Occupation, annual crop, non-irrigated, intensive [natural resource, land]: 1.6667 m2*year; lognormal variance with pedigree 0.0426, pedigree (2,1,5,5,1)
- Transformation, from annual crop, non-irrigated, intensive [natural resource, land]: 3.3333 m2; lognormal variance with pedigree 0.0526, pedigree (2,1,5,5,1)
- Transformation, to annual crop, non-irrigated, intensive [natural resource, land]: 3.3333 m2; lognormal variance with pedigree 0.0526, pedigree (2,1,5,5,1)
- Energy, gross calorific value, in biomass [natural resource, biotic]: 17.4124 MJ; lognormal variance with pedigree 0.0499, pedigree (2,3,5,3,3)
  Estimated based on literature value (Swiss Feed Database, http://www.feed-alp.admin.ch, accesseed 20131113).

## Emissions to nature
- Ammonia [air, non-urban air or from high stacks]: 0.000859933 kg; lognormal variance with pedigree 0.0527, pedigree (2,2,5,5,1)
  (same comment as for acetamide-anillide-compound, unspecified)
- Atrazine [soil, agricultural]: 0.00022 kg; lognormal variance with pedigree 0.0527, pedigree (2,2,5,5,1)
  (same comment as for acetamide-anillide-compound, unspecified)
- Chromium [soil, agricultural]: 5.1036e-6 kg; lognormal variance with pedigree 0.0827, pedigree (2,2,5,5,1)
  (same comment as for acetamide-anillide-compound, unspecified)
- Nitrate [water, ground-]: 0.0846958 kg; lognormal variance with pedigree 0.0827, pedigree (2,2,5,5,1)
  (same comment as for acetamide-anillide-compound, unspecified)
- Chromium, ion [water, surface water]: 1.1092e-6 kg; lognormal variance with pedigree 0.1327, pedigree (2,2,5,5,1)
  (same comment as for acetamide-anillide-compound, unspecified)
- Cadmium [soil, agricultural]: 2.4202e-6 kg; lognormal variance with pedigree 0.0827, pedigree (2,2,5,5,1)
  (same comment as for acetamide-anillide-compound, unspecified)
- Copper, ion [water, ground-]: 9.5798e-7 kg; lognormal variance with pedigree 0.1327, pedigree (2,2,5,5,1)
  (same comment as for acetamide-anillide-compound, unspecified)
- Zinc [soil, agricultural]: 8.3917e-6 kg; lognormal variance with pedigree 0.0827, pedigree (2,2,5,5,1)
  (same comment as for acetamide-anillide-compound, unspecified)
- Lead [water, ground-]: 1.619e-8 kg; lognormal variance with pedigree 0.1327, pedigree (2,2,5,5,1)
  (same comment as for acetamide-anillide-compound, unspecified)
- Cadmium, ion [water, surface water]: 1.1043e-8 kg; lognormal variance with pedigree 0.1327, pedigree (2,2,5,5,1)
  (same comment as for acetamide-anillide-compound, unspecified)
- Zinc, ion [water, surface water]: 1.0493e-6 kg; lognormal variance with pedigree 0.1327, pedigree (2,2,5,5,1)
  (same comment as for acetamide-anillide-compound, unspecified)
- Copper [soil, agricultural]: -3.1582e-7 kg
  (same comment as for acetamide-anillide-compound, unspecified)
- Zinc, ion [water, ground-]: 4.6211e-6 kg; lognormal variance with pedigree 0.1327, pedigree (2,2,5,5,1)
  (same comment as for acetamide-anillide-compound, unspecified)
- Lead [water, surface water]: 7.949e-8 kg; lognormal variance with pedigree 0.1327, pedigree (2,2,5,5,1)
  (same comment as for acetamide-anillide-compound, unspecified)
- Metolachlor [soil, agricultural]: 0.00019667 kg; lognormal variance with pedigree 0.0527, pedigree (2,2,5,5,1)
  (same comment as for acetamide-anillide-compound, unspecified)
- Chromium, ion [water, ground-]: 6.4586e-6 kg; lognormal variance with pedigree 0.1327, pedigree (2,2,5,5,1)
  (same comment as for acetamide-anillide-compound, unspecified)
- Nickel [soil, agricultural]: 2.3545e-6 kg; lognormal variance with pedigree 0.0827, pedigree (2,2,5,5,1)
  (same comment as for acetamide-anillide-compound, unspecified)
- Dinitrogen monoxide [air, non-urban air or from high stacks]: 0.000792225 kg; name N2O; lognormal variance with pedigree 0.0727, pedigree (2,2,5,5,1)
  (same comment as for acetamide-anillide-compound, unspecified)
- Lead [soil, agricultural]: 4.3245e-7 kg; lognormal variance with pedigree 0.0827, pedigree (2,2,5,5,1)
  (same comment as for acetamide-anillide-compound, unspecified)
- Phosphate [water, ground-]: 4.2913e-5 kg; lognormal variance with pedigree 0.0827, pedigree (2,2,5,5,1)
  (same comment as for acetamide-anillide-compound, unspecified)
- Nitrogen oxides [air, non-urban air or from high stacks]: 0.000166367 kg; = 0.21 * N2O; lognormal variance with pedigree 0.0727, pedigree (2,2,5,5,1)
  (same comment as for acetamide-anillide-compound, unspecified)
- Copper, ion [water, surface water]: 8.0806e-7 kg; lognormal variance with pedigree 0.1327, pedigree (2,2,5,5,1)
  (same comment as for acetamide-anillide-compound, unspecified)
- Glyphosate [soil, agricultural]: 8.3333e-5 kg; lognormal variance with pedigree 0.0527, pedigree (2,2,5,5,1)
  (same comment as for acetamide-anillide-compound, unspecified)
- Cadmium, ion [water, ground-]: 1.5228e-8 kg; lognormal variance with pedigree 0.1327, pedigree (2,2,5,5,1)
  (same comment as for acetamide-anillide-compound, unspecified)
- Phosphate [water, surface water]: 4.2913e-5 kg; lognormal variance with pedigree 0.0827, pedigree (2,2,5,5,1)
  (same comment as for acetamide-anillide-compound, unspecified)
- Phosphorus [water, surface water]: 4.784e-5 kg; lognormal variance with pedigree 0.0827, pedigree (2,2,5,5,1)
  (same comment as for acetamide-anillide-compound, unspecified)
- Nickel, ion [water, surface water]: 7.8329e-7 kg; lognormal variance with pedigree 0.1327, pedigree (2,2,5,5,1)
  (same comment as for acetamide-anillide-compound, unspecified)

## Sampling procedure
Data derived from literature, recommendations and expert information

## Extrapolations
This dataset has been extrapolated from year 2000 to the year of the calculation (2021). The uncertainty has been adjusted accordingly.
