# planing, lath, hardwood, u=20%

Dataset: EcoSpold 2, unit process
Geography: CA-QC
Time period: 2011-01-01 to 2021-12-31
Technology level: current
Classification: ISIC rev.4 ecoinvent: 1610:Sawmilling and planing of wood
Tags: recontextualization
Scenario: Business-as-Usual
System model: Allocation, cut-off by classification
Generated by: Hugues Imbeault-Tétreault
Published in: BFS 2013
Database: ecoinvent
isCopyrightProtected: true
accessRestrictedTo: 1

## General comment
This dataset represents the planing of one m3 hardwood lath that has been dried to 20% moisture content. The ratio of air dried respectively kiln dried laths corresponds to the estimated current market mix. The planing mill is assumed to be located on the sawmill site. The suction of the shavings is modeled in a separate activity.
The data was provided by and approved by the Swiss forest industry (Holzindustrie Schweiz HIS).
Within ecoinvent, three products - boards, beams and laths - are distinguished:
After being sawn, the resulting products can either be air dried down to a moisture content of u=20% (mass of water per dry mass), kiln dried down to u=20% or kiln dried down to u=10%. The resulting products can then be planed (the ratio of planed products at a moisture content of u=20% reflects the market share of air dried and kiln dried unplaned products). The activity name indicates the respective product and moisture content of the product being planed.
The exchanges of this child dataset are identical to the GLO dataset. This dataset was created to enable linking to regional markets (e.g. for electricity). Data quality indicators were adjusted accordingly.

## Included activities start
Planing process starting from air respectively kiln dried hardwood lath with a moisture content of 20%, at sawmill site.

## Included activities end
This activity ends with planed hardwood lath, at plant. The dataset includes the planing process at the sawmill site and input of wood. The dataset does not include dust emissions.

## Geography
Represents average Swiss conditions. The exchanges of this child dataset are identical to the GLO dataset. This dataset was created to enable linking to regional markets (e.g. for electricity). Data quality indicators were adjusted accordingly.

## Parameters
- share of shaving: 13 dimensionless; name share_shaving
  share of shaving production per volume of sawlog input
- share of lath: 87 dimensionless; name share_lath
  share of lath production per volume of sawlog input
- moisture content lath: 20 dimensionless; name moisture_lath
  moisture content of lath
- share of kiln dried wood: 0.8 dimensionless; name share_kiln_dried
  share of kiln dried sawnwood input (part of sawnwood input is air dried instead of kiln dried)
- shrinkage ratio (u=30% - 0%): 0.004 dimensionless; name shrinkage_ratio
  shrinkage of volume (%) per change in moisture content in %, relevant for u=30% to 0%
- wood density, apparent: 706.56 kg/m3; name wood_d_apparent; = (1+moisture_lath/100)* basic_wood_d
  kg wet matter/wet volume
- wood density, basic: 588.8 kg/m3; name basic_wood_d; = dry_wood_d*(1-moisture_lath*shrinkage_ratio)
  kg oven-dry matter/wet volume
- wood density, dry: 640 kg/m3; name dry_wood_d
  kg oven-dry matter/oven-dry volume

## Reference product
- sawnwood, lath, hardwood, dried (u=20%), planed: 0 m3; name lath_planed; source BFS 2013; CPC 31102: Wood, sawn or chipped lengthwise, sliced or peeled, of a thickness exceeding 6 mm, of non-coniferous wood; By-product classification allocatable product
  production volume 204199 m3; name p_sawnwood_planed; = 314152.368512736*0.5+94245.7105538209*0.5
    Estimated to be 50% of respective air dried and kiln dried sawn timber product; extraplated to global production volume from Swiss production volumes via the production volumes of sawntimber (NC) or (C) as applicable according to FAOStat
  property heating value, net 8524.3 MJ
    LHV is calculated based on the Carbon content of the product. More details can be found on the respective documentation.The property is based on a value of 12.06MJ/kg
  property wet mass 706.56 kg; = basic_wood_d*(1+moisture_lath/100)
  property water in wet mass 117.76 kg; = basic_wood_d*moisture_lath/100
  property carbon content, fossil 0; name lath_planed_C_content_fossil
    fossil carbon content on a dry matter basis
  property water content 0.2; = moisture_lath/100
  property price 265 EUR2005; name lath_planed_price_EUR2005
    Expert judgement (Urs Luginbühl, Swiss Sawmilling industry, personal communication in June 2014). Cross-reference; FAOSTAT (accessed 20140428). The price is calculated by using data on total world import quantity (m3) and import value (1000 USD), year 2005. 25656806 m3 of Sawnwood (NC) - coniferous was imported in the world in 2005. The import value was 9652714000 USD. The calculated price is thus (9652714000/25656806=376*0.8=) 303 Euro.
  property dry mass 588.8 kg; = basic_wood_d
  property carbon content 0.494
    carbon content on a dry matter basis (reserved; not for manual entry)
  property true value 265; name lath_planed_true_value
    allocation property applied in "true value" allocation // value calculated from revenue
  properties: carbon content, non-fossil 0.494, carbon allocation 290.867 kg
- shavings, hardwood, loose, measured as dry mass: 1 kg; name m_shavings; = (lath_raw_u20_ad + lath_raw_u20_kd) * share_shaving/100* basic_wood_d; source BFS 2013; By-product classification allocatable product; CPC 39283: Non-agglomerated wood waste and scrap
  calculated as dry mass
  production volume 1.79658e7 kg; = m_shavings*p_sawnwood_planed
    Calculated from production volume of reference product using the relative outputs.
  property heating value, net 12.61 MJ
    LHV is calculated based on the Carbon content of the product. More details can be found on the respective documentation.
  property price 0.113 EUR2005; name m_shavings_price_EUR2005
    Calculated based on data from FAOSTAT (accessed 20140429). The price is calculated by using data on total world import quantity (m3) and import value (1000 USD), year 2005. 40461924 m3 of Chips and Particles was imported in the world in 2005. The import value was 3022227000 USD. The calculated price is thus (3022227000/40461924=74.7*0.8=) 62.2 Euro/m3. It is estimated, that the chips and particles are half hardwood (of density 650 kg/m3) and half softwood (of density 450 kg/m3), thus the remaining mixture has a density of 550 kg/m3. The recalculated price is (1/550*62.2=) 0.11 Euro/kg. Using the same approach the calculated price for 2010 was 0.123 Euro/kg.
  property carbon content 0.494
    carbon content on a dry matter basis (reserved; not for manual entry)
  property true value 9.94192; name m_shavings_true_value
    allocation property applied in "true value" allocation // value calculated from revenue
  properties: water content 0.2, carbon content, fossil 0, water in wet mass 0.2 kg, wet mass 1.2 kg, dry mass 1 kg, carbon content, non-fossil 0.494, carbon allocation 0.494 kg

## Inputs from technosphere
- planing mill: 3.04137e-10 unit; name planemill; source BFS 2013; lognormal variance with pedigree 0.4406, pedigree (2,1,4,5,1)
  data taken from ecoinvent 2.2 dataset
- electricity, medium voltage: 0.00916521 kWh; name elec_medvol; source BFS 2013; lognormal variance with pedigree 0.2106, pedigree (2,1,4,5,1)
  electricity consumed for the planing; the suction of the shavings in covered in a separate dataset; data from Swiss industry
- sawnwood, lath, hardwood, raw, dried (u=20%): 9.44818e-5 m3; name lath_raw_u20_ad; = 1/(1-share_shaving/100)*(1-share_kiln_dried); source BFS 2013; lognormal variance with pedigree 0.0106, pedigree (1,1,4,5,1)
  input of raw sawn wood to be planed; usually processes within the sawmill that produces the raw sawn wood
  property water content 0.2; name water_content
  properties: carbon content, non-fossil 0.494, wet mass 706.56 kg, dry mass 588.8 kg, heating value, net 8524.3 MJ
- sawnwood, lath, hardwood, raw, dried (u=20%): 0 m3; name lath_raw_u20_ad_GLO
  input of raw sawn wood to be planed
  properties: dry mass 588.8 kg, carbon content, non-fossil 0.494, water content 0.2, wet mass 706.56 kg, heating value, net 8524.3 MJ
- sawnwood, lath, hardwood, raw, dried (u=20%): 0.000377927 m3; name lath_raw_u20_kd; = 1/(1-share_shaving/100)*share_kiln_dried; source BFS 2013; lognormal variance with pedigree 0.0106, pedigree (1,1,4,5,1)
  (same comment as for sawnwood, lath, hardwood, raw, dried (u=20%))
  properties: heating value, net 8524.3 MJ, dry mass 588.8 kg, water content 0.2, wet mass 706.56 kg, carbon content, non-fossil 0.494

## Inputs from nature
- Carbon dioxide, non-fossil, resource correction [natural resource, in air]: 1.3075 kg; pedigree (1,1,1,1,1)
  This exchange has been added after economic allocation in order to re-balance the non-fossil carbon dioxide resource extraction.

## Sampling procedure
complementary literature and sampling from sawmills

## Extrapolations
Extrapolated from Swiss data. The exchanges of this child dataset are identical to the GLO dataset. This dataset was created to enable linking to regional markets (e.g. for electricity). Data quality indicators were adjusted accordingly.
