# treatment of residue from mechanical treatment, desktop computer, municipal waste incineration

Dataset: EcoSpold 2, unit process
Geography: RoW
Time period: 2006-01-01 to 2021-12-31
Technology level: current
Classification: ISIC rev.4 ecoinvent: 3821:Treatment and disposal of non-hazardous waste
Synonyms: Siedlungsabfallverbrennung; municipal waste incineration; Kehrichtverbrennung
Scenario: Business-as-Usual
System model: Allocation, cut-off by classification
Share of production covered: 1.8 %
Generated by: Gabor Doka
Published in: Doka G. 2013
Database: ecoinvent
isCopyrightProtected: true
accessRestrictedTo: 1

## General comment
This dataset represents the activity of waste disposal of residue from mechanical treatment, desktop computer in a municipal solid waste incinerator (MSWI) // Recommended use of this dataset: Only for incineration of shredder residues generated in the recycling (mechanical treatment) of desktop computers // Inventoried waste contains 1.48% rubber; 36.3% Plastics from electronic consumer goods; 36.3% Plastics from electronic industrial goods; 12.4% MSWI iron scrap; 7.21% Alu in MSW; 2.98% Glass; 2.97% wiring copper; 0.218% Pb in ASR inert; 0.038% silver; . // Waste composition (wet, in ppm): upper heating value 26.8 MJ/kg; lower heating value 25.69 MJ/kg; H2O 7264.1; O 66883; H 55378; C 604770; S 403.51; N 9668.6; P 462.62; B n.a.; Cl 5359.8; Br 3998.3; F 181.74; I n.a.; Ag 379.62; As 5.4522; Ba 128.67; Cd 110.11; Co 21.429; Cr 195.94; Cu 33734; Hg 0.61793; Mn 302.43; Mo 2.1809; Ni 494.33; Pb 2339; Sb 3512; Se 1.4245; Sn 230.6; V 31.526; Zn 584.84; Be 0.33917; Sc n.a.; Sr 60.034; Ti 3254.6; Tl 0.27134; W n.a.; Si 16708; Fe 102190; Ca 4435.6; Al 74799; K 85.054; Mg n.a.; Na 2025.7; // Share of carbon in waste that is biogenic 0%. // Share of metals in waste not oxidised and bulk-recyclable (exclude very small or thin parts) Iron: 98.88%; Alu: 95.98%; Copper: 88.13%. // One kg of this waste produces 0.2244 kg of slag and 0.01649 kg of residues, which are landfilled. Additional solidification with 0.006596 kg of cement. // Net energy production: 3.23MJ/kg electric energy and 6.4MJ/kg thermal energy. // Recovery of metal scrap to recycling: 58.582g iron scrap, 22.162g aluminium scrap, 9.1459g copper scrap.

## Included activities start
waste incineration from waste reception gate and delivery into waste bunker at incinerator plant site (without transports to the incinerator)

## Included activities end
Waste-specific short-term emissions to water from leachate. Long-term emissions from landfill to ground water.

## Geography
Specific to the technology mix encountered in Switzerland in 2010. Well applicable to modern incineration practices in Europe, North America or Japan.

## Technology
average Swiss MSWI plants in 2010 (grate incinerators) with electrostatic precipitator for fly ash (ESP), wet flue gas scrubber and 25% SNCR , 42.77% SCR-high dust , 32.68% SCR-low dust -DeNOx facilities and 0% without Denox (weighted according to mass of burnt waste, representing Swiss average). Efficiency of iron scrap separation from slag : 58%. Efficiency of non-ferrous scrap separation from slag : 31%. Gross electric efficiency technology mix 15.84% and Gross thermal efficiency technology mix 28.51%

## Time period
Waste composition as given in literature reference, theoretical data or other source. Transfer coefficients for modern MSWI.

## Reference product
- residue from mechanical treatment, desktop computer: -1 kg; CPC 39: Wastes or scraps; By-product classification Waste
  Main reference product of this activity (supply of disposal service).
  production volume 1.5332e8 kg
    based on estimate on MSW in WTE globally and estimate of share of WEEE residues in Swiss MSW based on unqualified estimate of desktop PC waste in CH and rate of this residue waste per device (from Hischier et al. 2007-V)
  property heating value, net 25.69 MJ
    Value taken from the general comment of the treatment dataset.
  property price 0 EUR2005
    Waste products are assigned a price of zero as they are assumed to require further treatment.
  property carbon content 0.616224
    carbon content on a dry matter basis (reserved; not for manual entry)
  properties: wet mass 1 kg, water in wet mass 0 kg, water content 0, dry mass 1 kg, carbon content, fossil 0.616224, carbon content, non-fossil 0, carbon allocation 0.616224 kg

## By-products
All rows: pedigree (1,1,1,1,1)
- aluminium scrap, post-consumer, prepared for melting: 0 kg; By-product classification Recyclable; CPC 39363: Waste and scrap of aluminium
  Aluminium scrap recovered from this waste.
  Uncertainty: uncertainty calculated from uncertainty in waste composition, uncertainty of share of recyclable metal, uncertainty of transfer coefficient to bottom ash, uncertainty of the efficiency of scrap removal in MSWI plant.
  production volume 0 kg
    calculated in proportion to reference product waste input to incinerator
  property price 0.806 EUR2005
    Temporary price data. Calculated as 90% of purchasers price based on: 2005 import and export prices (total trades (USD) divided by total weight (kg) in biggest economies of the world: EU27, USA, Brasil, China, India, Japan and Russia) from UN Commodity Trade Statistics Database (http://data.un.org/Explorer.aspxDatabase [Accessed 2011.06.17]). Commodity: Waste or scrap, aluminium
  property carbon content 0
    carbon content on a dry matter basis (reserved; not for manual entry)
  properties: dry mass 1 kg, carbon content, fossil 0, water in wet mass 0 kg, water content 0, wet mass 1 kg, carbon content, non-fossil 0, carbon allocation 0 kg
- heat, for reuse in municipal waste incineration only: 0 MJ; name E_th_prod_MSWI; By-product classification allocatable product; CPC 17300: Steam and hot water
  Net electricity generated from this waste and used in internal MSWI plant energy redistribution.
  Uncertainty: uncertainty is calculated from uncertainties in waste composition and uncertainties in energy efficiency and the uncertainty in internal energy demand
  production volume 9.8176e8 MJ
    calculated in proportion to reference product waste input to incinerator
  property true value relation 0.1842; name E_th_prod_MSWI_true_value_relation
    property to calculate "true value" from
  property exergy 0.1842 MJ; name E_th_prod_MSWI_exergy
    This exergy property is based on the exergy content of the product.
  property price 0.0106 EUR2005; name E_th_prod_MSWI_price_EUR2005
    Average European district heat price from Ecoheatcool and Euroheat 2005-2006, Ecoheat Work package 1: The European heat market. Final report. 10.6 EUR/GJ i s the price of district heat. http://www.solarthermalworld.org/files/Ecoheatcool%20WP1%20Web.pdf?download
- electricity, for reuse in municipal waste incineration only: 0 kWh; name E_el_prod_MSWI; CPC 17100: Electrical energy; By-product classification allocatable product
  (same comment as for heat, for reuse in municipal waste incineration only)
  production volume 1.3776e8 kWh
    calculated in proportion to reference product waste input to incinerator
  property true value relation 3.6; name E_el_prod_MSWI_true_value_relation
    property to calculate "true value" from
  property exergy 3.6 MJ; name E_el_prod_MSWI_exergy
    This exergy property is based on the exergy content of the product.
  property price 0.1 EUR2005; name E_el_prod_MSWI_price_EUR2005
    Estimated to be the same price as in case of electricity, medium voltage.
- iron scrap, sorted, pressed: 0 kg; CPC 39310: Slag, dross, scalings and other waste from the manufacture of iron or steel; By-product classification Recyclable
  Iron scrap recovered from this waste.
  Uncertainty: uncertainty calculated from uncertainty in waste composition, uncertainty of share of recyclable metal, uncertainty of transfer coefficient to bottom ash, uncertainty of the efficiency of scrap removal in MSWI plant.
  production volume 0 kg
    calculated in proportion to reference product waste input to incinerator
  property price 0.175 EUR2005
    Temporary price data. Calculated as 90% of purchasers price based on: 2005 import and export prices (total trades (USD) divided by total weight (kg) in biggest economies of the world: EU27, USA, Brasil, China, India, Japan and Russia) from UN Commodity Trade Statistics Database (http://data.un.org/Explorer.aspxDatabase [Accessed 2011.06.20]). Commodity: Waste or scrap, of cast iron
  property carbon content 0
    carbon content on a dry matter basis (reserved; not for manual entry)
  properties: wet mass 1 kg, carbon content, non-fossil 0, dry mass 1 kg, water content 0, carbon content, fossil 0, water in wet mass 0 kg, carbon allocation 0 kg
- copper scrap, sorted, pressed: 0 kg; CPC 39361: Waste and scrap of copper; By-product classification Recyclable
  Copper scrap recovered from this waste.
  Uncertainty: uncertainty calculated from uncertainty in waste composition, uncertainty of share of recyclable metal, uncertainty of transfer coefficient to bottom ash, uncertainty of the efficiency of scrap removal in MSWI plant.
  production volume 0 kg
    calculated in proportion to reference product waste input to incinerator
  property price 2.84 EUR2005
    Temporary price data. Calculated as 90% of purchasers price based on: Source: USGS Mineral Yearbook 2007, Table 1 in <http://minerals.usgs.gov/minerals/pubs/commodity/recycle/myb1-2007-recyc.pdf>
  property carbon content 0
    carbon content on a dry matter basis (reserved; not for manual entry)
  properties: water content 0, wet mass 1 kg, water in wet mass 0 kg, carbon content, non-fossil 0, dry mass 1 kg, carbon content, fossil 0, carbon allocation 0 kg

## Inputs from technosphere
- sodium hydroxide, without water, in 50% solution state: 0.0007028 kg; lognormal variance with pedigree 0.27322, pedigree (1,1,4,1,1)
  Auxilliary inputs for the flue gas treatment stage of the incinerator plant.
  Uncertainty: uncertainty calculated from uncertainty in average NaOH input, of transfer coefficients in the incinerator, and the uncertainty of the waste composition of this waste
  properties: heating value, net 3.03 MJ, wet mass 1 kg, dry mass 1 kg
- slag landfill: 3.9678e-10 unit; lognormal variance with pedigree 0.033372, pedigree (1,1,4,1,1)
  Landfill infrastructure required for landfilling of bottom ash.
  Uncertainty: uncertainty is calculated from uncertainties in waste composition and transfer coefficients in incinerator
- chemical, organic: 3.9057e-5 kg; lognormal variance with pedigree 0.77874, pedigree (1,1,4,1,1)
  Auxilliary inputs for the wastewater treatment stage of the incinerator plant. Proxy for (pure) Trisodium-trimercapto-s-triazine (CAS 17766-26-6), used as 15% diluted solution, aka TMT15.
  Uncertainty: uncertainty calculated from uncertainty in average TMT15 input, of transfer coefficients in the incinerator, and the uncertainty of the waste composition of this waste
  properties: carbon content, fossil 0.628, wet mass 1 kg, dry mass 1 kg, heating value, net 19.03 MJ
- heat, district or industrial, natural gas: 0 MJ; pedigree (1,1,1,1,1)
  Input to DeNOx stage, to heat up flue gas in low-dust SCR.
  Uncertainty: uncertainty calculated from uncertainty in average DeNOx input, uncertainty in the share of thermal NOx, uncertainty of nitrogen content in average municipal waste and the uncertainty in nitrogen content in *this* waste.
  properties: heating value, net 1 MJ
- waste cement, hydrated: 0 kg; pedigree (1,1,1,1,1)
  Hydrated cement output for solidification of landfilled residual material.
  Uncertainty: Uncertainty calculated from uncertainty of the waste composition of this waste and transfer coefficients in the incinerator and of the solidification recipe.
  production volume 0 kg
    calculated in proportion to reference product waste input to incinerator
  properties: wet mass 1 kg, dry mass 1 kg
- chemical, inorganic: 0.00023578 kg; lognormal variance with pedigree 0.23364, pedigree (1,1,4,1,1)
  Auxilliary inputs for the wastewater treatment stage of the incinerator plant. Proxy for Polyelectrolyte.
  Uncertainty: uncertainty calculated from uncertainty in average Polyelectrolyte input, of transfer coefficients in the incinerator, and the uncertainty of the waste composition of this waste
  properties: carbon content, fossil 0.003, dry mass 1 kg, wet mass 1 kg
- water, decarbonised: 0 kg; pedigree (1,1,1,1,1)
  Incinerator process water used in flue gas scrubber stage.
  Uncertainty: uncertainty calculated from uncertainty in average water input, and the uncertainty of the waste composition of this waste
  properties: wet mass 1 kg
- municipal waste incineration facility: 2.5e-10 unit
  Demands per kilogram waste.
- titanium dioxide: 0.00010755 kg; lognormal variance with pedigree 1.0599, pedigree (1,1,4,1,1)
  Input to DeNOx stage (TiO2 catalyst carrier)
  Uncertainty: uncertainty calculated from uncertainty in average DeNOx input, uncertainty in the share of thermal NOx, uncertainty of nitrogen content in average municipal waste and the uncertainty in nitrogen content in *this* waste.
  properties: dry mass 1 kg, wet mass 1 kg
- iron (III) chloride, without water, in 40% solution state: 0.00010087 kg; lognormal variance with pedigree 0.28448, pedigree (1,1,4,1,1)
  Auxilliary inputs for the wastewater treatment stage of the incinerator plant.
  Uncertainty: uncertainty calculated from uncertainty in average FeCl3 input, of transfer coefficients in the incinerator, and the uncertainty of the waste composition of this waste
  properties: dry mass 1 kg, wet mass 1 kg
- cement, unspecified: 0 kg; pedigree (1,1,1,1,1)
  Cement required for solidification of landfilled residual material.
  Uncertainty: Uncertainty calculated from uncertainty of the waste composition of this waste, of transfer coefficients in the incinerator and of the solidification recipe.
  properties: wet mass 1 kg, dry mass 1 kg
- transport, freight, lorry, unspecified: 0 metric ton*km; pedigree (1,1,1,1,1)
  Transport services to transport incineration residues to landfills.
  Uncertainty: uncertainty calculated from uncertainty of the waste composition of this waste, uncertainty of transfer coefficients and the uncertainty in generic transportation distances
- hydrochloric acid, without water, in 30% solution state: 6.1973e-5 kg; lognormal variance with pedigree 0.23364, pedigree (1,1,4,1,1)
  Auxilliary inputs for the wastewater treatment stage of the incinerator plant.
  Uncertainty: uncertainty calculated from uncertainty in average HCl input, of transfer coefficients in the incinerator, and the uncertainty of the waste composition of this waste
  properties: wet mass 1 kg, dry mass 1 kg, heating value, net 3.32 MJ
- process-specific burdens, slag landfill: 0 kg; pedigree (1,1,1,1,1)
  Mass-specific expenditures required for landfilling of bottom ash.
  Uncertainty: uncertainty is calculated from uncertainties in waste composition and transfer coefficients in incinerator
- residual material landfill: 3.4352e-11 unit; lognormal variance with pedigree 0.06513, pedigree (1,1,4,1,1)
  Landfill infrastructure required for landfilling of incineration residues.
  Uncertainty: uncertainty is calculated from uncertainties in waste composition and transfer coefficients in incinerator
- chromium oxide, flakes: 2.1949e-6 kg; lognormal variance with pedigree 1.0599, pedigree (1,1,4,1,1)
  Input to DeNOx stage.
  Uncertainty: uncertainty calculated from uncertainty in average DeNOx input, uncertainty in the share of thermal NOx, uncertainty of nitrogen content in average municipal waste and the uncertainty in nitrogen content in *this* waste.
  properties: wet mass 1 kg, dry mass 1 kg
- quicklime, milled, packed: 0.0031174 kg; lognormal variance with pedigree 0.34733, pedigree (1,1,4,1,1)
  Auxilliary inputs for the flue gas treatment stage of the incinerator plant.
  Uncertainty: uncertainty calculated from uncertainty in average CaO input, of transfer coefficients in the incinerator, and the uncertainty of the waste composition of this waste
  properties: dry mass 0.99 kg, wet mass 1 kg, water content 0.010101
- process-specific burdens, residual material landfill: 0 kg; pedigree (1,1,1,1,1)
  Mass-specific expenditures required for landfilling of incineration residues.
  Uncertainty: uncertainty is calculated from uncertainties in waste composition and transfer coefficients in incinerator
- ammonia, anhydrous, liquid: 0 kg; pedigree (1,1,1,1,1)
  Input to DeNOx stage (100% NH3).
  Uncertainty: uncertainty calculated from uncertainty in average DeNOx input, uncertainty in the share of thermal NOx, uncertainty of nitrogen content in average municipal waste and the uncertainty in nitrogen content in *this* waste.
  properties: wet mass 1 kg, dry mass 1 kg
- aluminium scrap, post-consumer, prepared for melting: -0.022162 kg; lognormal variance with pedigree 0.1652, pedigree (1,1,4,1,1)
  (same comment as for aluminium scrap, post-consumer, prepared for melting)
  production volume 3.3979e6 kg
  properties: price 0.806 EUR2005, dry mass 1 kg, wet mass 1 kg
- iron scrap, sorted, pressed: -0.058582 kg; lognormal variance with pedigree 0.13649, pedigree (1,1,4,1,1)
  (same comment as for iron scrap, sorted, pressed)
  production volume 8.9821e6 kg
  properties: price 0.175 EUR2005, wet mass 1 kg, dry mass 1 kg
- copper scrap, sorted, pressed: -0.0091459 kg; lognormal variance with pedigree 0.24671, pedigree (1,1,4,1,1)
  (same comment as for copper scrap, sorted, pressed)
  production volume 1.4023e6 kg
  properties: wet mass 1 kg, price 2.84 EUR2005, dry mass 1 kg
- heat, district or industrial, natural gas: 0.00357289, 0.0856134, 0.231824 MJ (3 entries); lognormal variance with pedigree 0.70247, pedigree (1,1,4,1,1)
  (same comment as for heat, district or industrial, natural gas)
- waste cement, hydrated: -0.00466432, -0.0118247 kg (2 entries); lognormal variance with pedigree 0.074214, pedigree (1,1,4,1,1)
  (same comment as for waste cement, hydrated)
  production volume 2.5282e6 kg
- water, decarbonised: 0.0252046, 0.0655824, 0.264509, 0.0645917, 0.0130214, 0.0428168, 0.00236374, 0.0336828, 0.0784611, 0.492165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 kg (12 entries); lognormal variance with pedigree 0.28448, pedigree (1,1,4,1,1)
  (same comment as for water, decarbonised)
- cement, unspecified: 0.000952391, 0.000198164, 1.45142e-5, 4.13701e-5, 0.000935599, 2.75374e-5, 0.000302442, 3.65921e-5, 0.00408709 kg (9 entries); lognormal variance with pedigree 0.074214, pedigree (1,1,4,1,1)
  (same comment as for cement, unspecified)
- transport, freight, lorry, unspecified: 0.00109714, 0.000171772, 0.00831808 metric ton*km (3 entries); lognormal variance with pedigree 0.03027, pedigree (1,1,4,1,1)
  (same comment as for transport, freight, lorry, unspecified)
- process-specific burdens, slag landfill: 0.0631347, 0.160055 kg (2 entries); lognormal variance with pedigree 0.033372, pedigree (1,1,4,1,1)
  (same comment as for process-specific burdens, slag landfill)
- process-specific burdens, residual material landfill: 0.00466432, 0.0118247 kg (2 entries); lognormal variance with pedigree 0.06513, pedigree (1,1,4,1,1)
  (same comment as for process-specific burdens, residual material landfill)
- ammonia, anhydrous, liquid: 0.000359822, 3.0931e-5, 4.81207e-5, 9.53441e-5, 9.3412e-5, 9.79059e-6, 4.37675e-5, 0.00103541 kg (8 entries); lognormal variance with pedigree 0.70247, pedigree (1,1,4,1,1)
  (same comment as for ammonia, anhydrous, liquid)

## Inputs from nature
- Oxygen [natural resource, in air]: 2.1061 kg; lognormal variance with pedigree 0.02197, pedigree (1,1,4,1,1)
  Oxygen from ambient air needed to combust and oxidise this waste. Net demand, i.e. without O2 leaving the plant in flue gas uncombusted.
  Uncertainty: uncertainty is calculated from uncertainties in waste composition and transfer coefficients to flue gas and soild residues in incinerator

## Emissions to nature
- Sodium, ion [water, surface water]: 0.00026238 kg; lognormal variance with pedigree 0.60476, pedigree (1,1,4,1,1)
  Emissions to water from waste composition and transfer coefficients in incinerator and landfills.
  Uncertainty: uncertainty is calculated from uncertainties in waste composition and transfer coefficients in incinerator and landfills
- Cobalt [water, ground-, long-term]: 1.7456e-5 kg; lognormal variance with pedigree 1.0988, pedigree (1,1,4,1,1)
  Long-term emissions from landfilling of incineration residues.
  Uncertainty: uncertainty is calculated from uncertainties in waste composition and transfer coefficients in incinerator and landfills.
- Chloride [water, ground-, long-term]: 0.0011993 kg; lognormal variance with pedigree 0.41508, pedigree (1,1,4,1,1)
  (same comment as for Cobalt)
- Iron [air, urban air close to ground]: 2.0559e-9 kg; lognormal variance with pedigree 0.2348, pedigree (1,1,4,1,1)
  Emission to air from waste composition and transfer coefficients.
  Uncertainty: uncertainty is calculated from uncertainties in waste composition and transfer coefficients in incinerator
- Particulates, > 2.5 um, and < 10um [air, urban air close to ground]: 1.3149e-8 kg; lognormal variance with pedigree 0.19419, pedigree (1,1,4,1,1)
  Incomplete combustion product emitted to air.
  Uncertainty: uncertainty calculated from uncertainty in average operation emissions, and the uncertainty of the flue gas volume from this waste.
- Strontium [water, surface water]: 3.7799e-8 kg; lognormal variance with pedigree 1.7496, pedigree (1,1,4,1,1)
  (same comment as for Sodium, ion)
- Copper, ion [water, surface water]: 1.074e-6 kg; lognormal variance with pedigree 1.1157, pedigree (1,1,4,1,1)
  (same comment as for Sodium, ion)
- Zinc, ion [water, ground-, long-term]: 0.00019681 kg; lognormal variance with pedigree 2.6554, pedigree (1,1,4,1,1)
  (same comment as for Cobalt)
- Titanium, ion [water, ground-, long-term]: 0.00097295 kg; lognormal variance with pedigree 0.66486, pedigree (1,1,4,1,1)
  (same comment as for Cobalt)
- Selenium [water, surface water]: 4.8123e-7 kg; lognormal variance with pedigree 1.2229, pedigree (1,1,4,1,1)
  (same comment as for Sodium, ion)
- Molybdenum [water, ground-, long-term]: 1.5823e-6 kg; lognormal variance with pedigree 1.4742, pedigree (1,1,4,1,1)
  (same comment as for Cobalt)
- Aluminium [water, ground-, long-term]: 0.042834 kg; lognormal variance with pedigree 0.1655, pedigree (1,1,4,1,1)
  (same comment as for Cobalt)
- Nickel [air, urban air close to ground]: 4.5753e-7 kg; lognormal variance with pedigree 0.78174, pedigree (1,1,4,1,1)
  (same comment as for Iron)
- Phenol, pentachloro- [air, urban air close to ground]: 9.5447e-12 kg; lognormal variance with pedigree 0.090744, pedigree (1,1,4,1,1)
  (same comment as for Particulates, > 2.5 um, and < 10um)
- Beryllium [water, surface water]: 2.1243e-10 kg; lognormal variance with pedigree 2.23, pedigree (1,1,4,1,1)
  (same comment as for Sodium, ion)
- Nitrate [water, surface water]: 0.00012325 kg; lognormal variance with pedigree 0.27121, pedigree (1,1,4,1,1)
  (same comment as for Sodium, ion)
- Arsenic, ion [water, surface water]: 3.7768e-6 kg; lognormal variance with pedigree 1.2475, pedigree (1,1,4,1,1)
  (same comment as for Sodium, ion)
- Nickel, ion [water, ground-, long-term]: 0.00047964 kg; lognormal variance with pedigree 0.74094, pedigree (1,1,4,1,1)
  (same comment as for Cobalt)
- BOD5, Biological Oxygen Demand [water, surface water]: 0.00069836 kg; lognormal variance with pedigree 0.038999, pedigree (1,1,4,1,1)
  (same comment as for Sodium, ion)
- Phosphate [water, surface water]: 2.1105e-7 kg; lognormal variance with pedigree 0.58425, pedigree (1,1,4,1,1)
  (same comment as for Sodium, ion)
- Barium [water, surface water]: 1.7318e-8 kg; lognormal variance with pedigree 1.2302, pedigree (1,1,4,1,1)
  (same comment as for Sodium, ion)
- Manganese [air, urban air close to ground]: 9.5795e-10 kg; lognormal variance with pedigree 0.88427, pedigree (1,1,4,1,1)
  (same comment as for Iron)
- Copper [air, urban air close to ground]: 2.1267e-7 kg; lognormal variance with pedigree 0.28957, pedigree (1,1,4,1,1)
  (same comment as for Iron)
- Mercury [air, urban air close to ground]: 1.7521e-8 kg; lognormal variance with pedigree 1.6488, pedigree (1,1,4,1,1)
  (same comment as for Iron)
- Aluminium [air, urban air close to ground]: 1.4204e-9 kg; lognormal variance with pedigree 0.26486, pedigree (1,1,4,1,1)
  (same comment as for Iron)
- DOC, Dissolved Organic Carbon [water, ground-, long-term]: 0.0017971 kg; lognormal variance with pedigree 0.02443, pedigree (1,1,4,1,1)
  (same comment as for Cobalt)
- Sulfate [water, ground-, long-term]: 0.0010229 kg; lognormal variance with pedigree 0.52437, pedigree (1,1,4,1,1)
  (same comment as for Cobalt)
- Thallium [water, surface water]: 1.6622e-10 kg; lognormal variance with pedigree 1.9161, pedigree (1,1,4,1,1)
  (same comment as for Sodium, ion)
- Lead [air, urban air close to ground]: 8.8296e-9 kg; lognormal variance with pedigree 0.61535, pedigree (1,1,4,1,1)
  (same comment as for Iron)
- Nickel, ion [water, surface water]: 3.2665e-7 kg; lognormal variance with pedigree 1.3592, pedigree (1,1,4,1,1)
  (same comment as for Sodium, ion)
- Water [water, surface water]: 0.00046361 m3; lognormal variance with pedigree 1.2113, pedigree (1,1,4,1,1)
  Process water released to surface water.
  Uncertainty: uncertainty calculated from uncertainty in process water input and the uncertainty of fraction to surface water.
- Silicon [water, ground-, long-term]: 0.00034221 kg; lognormal variance with pedigree 5.8305, pedigree (1,1,4,1,1)
  (same comment as for Cobalt)
- Cobalt [water, surface water]: 3.8824e-9 kg; lognormal variance with pedigree 1.4855, pedigree (1,1,4,1,1)
  (same comment as for Sodium, ion)
- Tin, ion [water, surface water]: 5.2322e-9 kg; lognormal variance with pedigree 1.4056, pedigree (1,1,4,1,1)
  (same comment as for Sodium, ion)
- TOC, Total Organic Carbon [water, ground-, long-term]: 0.0017971 kg; lognormal variance with pedigree 0.02443, pedigree (1,1,4,1,1)
  (same comment as for Cobalt)
- Potassium [air, urban air close to ground]: 4.2021e-7 kg; lognormal variance with pedigree 1.00191, pedigree (1,1,4,1,1)
  (same comment as for Iron)
- Cadmium, ion [water, surface water]: 1.08e-8 kg; lognormal variance with pedigree 0.83996, pedigree (1,1,4,1,1)
  (same comment as for Sodium, ion)
- Chloride [water, surface water]: 0.0041577 kg; lognormal variance with pedigree 0.31385, pedigree (1,1,4,1,1)
  (same comment as for Sodium, ion)
- Strontium [water, ground-, long-term]: 5.9955e-5 kg; lognormal variance with pedigree 1.0375, pedigree (1,1,4,1,1)
  (same comment as for Cobalt)
- Calcium, ion [water, ground-, long-term]: 0.003849 kg; lognormal variance with pedigree 0.45778, pedigree (1,1,4,1,1)
  (same comment as for Cobalt)
- Chromium VI [water, ground-, long-term]: 4.5334e-6 kg; lognormal variance with pedigree 3.3711, pedigree (1,1,4,1,1)
  (same comment as for Cobalt)
- Hydrogen fluoride [air, urban air close to ground]: 1.2261e-6 kg; lognormal variance with pedigree 0.90166, pedigree (1,1,4,1,1)
  (same comment as for Iron)
- Carbon monoxide, fossil [air, urban air close to ground]: 3.7257e-5 kg; lognormal variance with pedigree 0.79946, pedigree (1,1,4,1,1)
  (same comment as for Particulates, > 2.5 um, and < 10um)
- Vanadium, ion [water, ground-, long-term]: 3.2821e-6 kg; lognormal variance with pedigree 2.4137, pedigree (1,1,4,1,1)
  (same comment as for Cobalt)
- Nitrogen oxides [air, urban air close to ground]: 0.00063913 kg; lognormal variance with pedigree 0.7578, pedigree (1,1,4,1,1)
  Sum of fuel-Nox and thermal-NOx emitted to air after DeNOx stage.
  Uncertainty: uncertainty calculated from uncertainty in average N-emissions and uncertainty in the share of thermal NOx and the uncertainty in nitrogen content in *this* waste.
- Potassium, ion [water, surface water]: 1.8515e-5 kg; lognormal variance with pedigree 0.61191, pedigree (1,1,4,1,1)
  (same comment as for Sodium, ion)
- Arsenic, ion [water, ground-, long-term]: 1.6327e-6 kg; lognormal variance with pedigree 1.3566, pedigree (1,1,4,1,1)
  (same comment as for Cobalt)
- Antimony [air, urban air close to ground]: 2.7924e-9 kg; lognormal variance with pedigree 0.57972, pedigree (1,1,4,1,1)
  (same comment as for Iron)
- Sulfate [water, surface water]: 0.00018269 kg; lognormal variance with pedigree 0.3971, pedigree (1,1,4,1,1)
  (same comment as for Sodium, ion)
- Heat, waste [air, urban air close to ground]: 19.84 MJ; lognormal variance with pedigree 0.029902, pedigree (1,1,4,1,1)
  Waste heat generated from heating value of this waste plus any electricity required to process it.
  Uncertainty: uncertainty is calculated from uncertainties in waste composition and uncertainties in energy efficiency and the uncertainty in internal energy demand
- Heat, waste [water, surface water]: 4.5599 MJ; lognormal variance with pedigree 0.029902, pedigree (1,1,4,1,1)
  (same comment as for Heat, waste)
- Phosphorus [air, urban air close to ground]: 3.6938e-7 kg; lognormal variance with pedigree 0.78905, pedigree (1,1,4,1,1)
  (same comment as for Iron)
- Molybdenum [water, surface water]: 5.9564e-7 kg; lognormal variance with pedigree 1.0339, pedigree (1,1,4,1,1)
  (same comment as for Sodium, ion)
- Toluene [air, urban air close to ground]: 4.3835e-8 kg; lognormal variance with pedigree 0.090744, pedigree (1,1,4,1,1)
  (same comment as for Particulates, > 2.5 um, and < 10um)
- Iron, ion [water, ground-, long-term]: 0.022664 kg; lognormal variance with pedigree 0.23414, pedigree (1,1,4,1,1)
  (same comment as for Cobalt)
- Water [air, urban air close to ground]: 0.0013383 m3; lognormal variance with pedigree 0.88664, pedigree (1,1,4,1,1)
  Water vapour from waste humidity, hydrogen oxidation and part of the process water.
  Uncertainty: Uncertainty calculated from uncertainty in waste composition, process water input and the uncertainty of fraction to air.
- Manganese [water, surface water]: 1.6003e-8 kg; lognormal variance with pedigree 1.8249, pedigree (1,1,4,1,1)
  (same comment as for Sodium, ion)
- Silicon [air, urban air close to ground]: 3.3571e-9 kg; lognormal variance with pedigree 0.3998, pedigree (1,1,4,1,1)
  (same comment as for Iron)
- Nitrate [water, ground-, long-term]: 0.00034775 kg; lognormal variance with pedigree 0.38696, pedigree (1,1,4,1,1)
  (same comment as for Cobalt)
- Barium [water, ground-, long-term]: 6.4802e-5 kg; lognormal variance with pedigree 2.2834, pedigree (1,1,4,1,1)
  (same comment as for Cobalt)
- Mercury [water, ground-, long-term]: 3.9356e-8 kg; lognormal variance with pedigree 3.19, pedigree (1,1,4,1,1)
  (same comment as for Cobalt)
- Tin, ion [water, ground-, long-term]: 0.00013904 kg; lognormal variance with pedigree 1.0684, pedigree (1,1,4,1,1)
  (same comment as for Cobalt)
- Tin [air, urban air close to ground]: 9.6395e-11 kg; lognormal variance with pedigree 0.9357, pedigree (1,1,4,1,1)
  (same comment as for Iron)
- Benzene, pentachloro- [air, urban air close to ground]: 1.158e-10 kg; lognormal variance with pedigree 0.090744, pedigree (1,1,4,1,1)
  (same comment as for Particulates, > 2.5 um, and < 10um)
- Particulates, < 2.5 um [air, urban air close to ground]: 2.6167e-6 kg; lognormal variance with pedigree 0.41024, pedigree (1,1,4,1,1)
  (same comment as for Particulates, > 2.5 um, and < 10um)
- Molybdenum [air, urban air close to ground]: 2.8696e-9 kg; lognormal variance with pedigree 1.4912, pedigree (1,1,4,1,1)
  (same comment as for Iron)
- Chromium, ion [water, surface water]: 2.9634e-9 kg; lognormal variance with pedigree 0.9283, pedigree (1,1,4,1,1)
  (same comment as for Sodium, ion)
- Thallium [air, urban air close to ground]: 2.7134e-10 kg; lognormal variance with pedigree 1.7621, pedigree (1,1,4,1,1)
  (same comment as for Iron)
- DOC, Dissolved Organic Carbon [water, surface water]: 0.00030895 kg; lognormal variance with pedigree 0.038334, pedigree (1,1,4,1,1)
  (same comment as for Sodium, ion)
- Manganese [water, ground-, long-term]: 0.0003005 kg; lognormal variance with pedigree 0.82221, pedigree (1,1,4,1,1)
  (same comment as for Cobalt)
- Cadmium [air, urban air close to ground]: 5.5826e-8 kg; lognormal variance with pedigree 0.97983, pedigree (1,1,4,1,1)
  (same comment as for Iron)
- Bromine [air, urban air close to ground]: 1.9971e-6 kg; lognormal variance with pedigree 0.50931, pedigree (1,1,4,1,1)
  (same comment as for Iron)
- Zinc [air, urban air close to ground]: 3.7374e-7 kg; lognormal variance with pedigree 0.75986, pedigree (1,1,4,1,1)
  (same comment as for Iron)
- Titanium, ion [water, surface water]: 1.2135e-6 kg; lognormal variance with pedigree 0.42147, pedigree (1,1,4,1,1)
  (same comment as for Sodium, ion)
- Antimony [water, surface water]: 0.0012015 kg; lognormal variance with pedigree 0.51692, pedigree (1,1,4,1,1)
  (same comment as for Sodium, ion)
- BOD5, Biological Oxygen Demand [water, ground-, long-term]: 0.0014856 kg; lognormal variance with pedigree 0.02443, pedigree (1,1,4,1,1)
  (same comment as for Cobalt)
- COD, Chemical Oxygen Demand [water, surface water]: 0.00070745 kg; lognormal variance with pedigree 0.038244, pedigree (1,1,4,1,1)
  (same comment as for Sodium, ion)
- Vanadium [air, urban air close to ground]: 1.1564e-8 kg; lognormal variance with pedigree 1.149, pedigree (1,1,4,1,1)
  (same comment as for Iron)
- NMVOC, non-methane volatile organic compounds, unspecified origin [air, urban air close to ground]: 9.9745e-7 kg; lognormal variance with pedigree 0.090744, pedigree (1,1,4,1,1)
  (same comment as for Particulates, > 2.5 um, and < 10um)
- Benzene [air, urban air close to ground]: 2.1917e-8 kg; lognormal variance with pedigree 0.090744, pedigree (1,1,4,1,1)
  (same comment as for Particulates, > 2.5 um, and < 10um)
- Barium [air, urban air close to ground]: 5.0505e-7 kg; lognormal variance with pedigree 0.95041, pedigree (1,1,4,1,1)
  (same comment as for Iron)
- Sulfur dioxide [air, urban air close to ground]: 3.2896e-6 kg; lognormal variance with pedigree 0.79789, pedigree (1,1,4,1,1)
  (same comment as for Iron)
- Iron, ion [water, surface water]: 3.854e-7 kg; lognormal variance with pedigree 1.3639, pedigree (1,1,4,1,1)
  (same comment as for Sodium, ion)
- Bromine [water, ground-, long-term]: 0.00038537 kg; lognormal variance with pedigree 0.49641, pedigree (1,1,4,1,1)
  (same comment as for Cobalt)
- Fluoride [water, ground-, long-term]: 0.00016294 kg; lognormal variance with pedigree 0.50124, pedigree (1,1,4,1,1)
  (same comment as for Cobalt)
- Copper, ion [water, ground-, long-term]: 0.02434 kg; lognormal variance with pedigree 0.23616, pedigree (1,1,4,1,1)
  (same comment as for Cobalt)
- Beryllium [water, ground-, long-term]: 3.0998e-7 kg; lognormal variance with pedigree 1.6356, pedigree (1,1,4,1,1)
  (same comment as for Cobalt)
- Sodium, ion [water, ground-, long-term]: 0.0017624 kg; lognormal variance with pedigree 0.55919, pedigree (1,1,4,1,1)
  (same comment as for Cobalt)
- Dinitrogen monoxide [air, urban air close to ground]: 0.0001442 kg; lognormal variance with pedigree 1.1535, pedigree (1,1,4,1,1)
  Nitrogen species emitted to air after DeNOx stage.
  Uncertainty: uncertainty calculated from uncertainty in average N-emissions and uncertainty in the share of thermal NOx and the uncertainty in nitrogen content in *this* waste.
- Selenium [water, ground-, long-term]: 9.2523e-7 kg; lognormal variance with pedigree 1.1281, pedigree (1,1,4,1,1)
  (same comment as for Cobalt)
- Vanadium, ion [water, surface water]: 1.4615e-8 kg; lognormal variance with pedigree 1.8113, pedigree (1,1,4,1,1)
  (same comment as for Sodium, ion)
- Silver, ion [water, ground-, long-term]: 0.00037961 kg; lognormal variance with pedigree 0.79289, pedigree (1,1,4,1,1)
  (same comment as for Cobalt)
- Lead [water, ground-, long-term]: 0.0022836 kg; lognormal variance with pedigree 0.5684, pedigree (1,1,4,1,1)
  (same comment as for Cobalt)
- Benzo(a)pyrene [air, urban air close to ground]: 4.8773e-13 kg; lognormal variance with pedigree 0.41024, pedigree (1,1,4,1,1)
  (same comment as for Particulates, > 2.5 um, and < 10um)
- Hydrogen chloride [air, urban air close to ground]: 2.8036e-6 kg; lognormal variance with pedigree 0.47519, pedigree (1,1,4,1,1)
  (same comment as for Iron)
- Calcium, ion [water, surface water]: 3.4528e-5 kg; lognormal variance with pedigree 0.4624, pedigree (1,1,4,1,1)
  (same comment as for Sodium, ion)
- Phosphate [water, ground-, long-term]: 5.2714e-5 kg; lognormal variance with pedigree 5.0077, pedigree (1,1,4,1,1)
  (same comment as for Cobalt)
- Sodium [air, urban air close to ground]: 8.326e-7 kg; lognormal variance with pedigree 0.60107, pedigree (1,1,4,1,1)
  (same comment as for Iron)
- Cyanide [air, urban air close to ground]: 3.0981e-5 kg; lognormal variance with pedigree 1.1535, pedigree (1,1,4,1,1)
  (same comment as for Dinitrogen monoxide)
- Methane, fossil [air, urban air close to ground]: 3.2876e-7 kg; lognormal variance with pedigree 0.090744, pedigree (1,1,4,1,1)
  (same comment as for Particulates, > 2.5 um, and < 10um)
- Titanium [air, urban air close to ground]: 2.7002e-6 kg; lognormal variance with pedigree 0.53733, pedigree (1,1,4,1,1)
  (same comment as for Iron)
- Silver, ion [water, surface water]: 1.318e-8 kg; lognormal variance with pedigree 1.8885, pedigree (1,1,4,1,1)
  (same comment as for Sodium, ion)
- Zinc, ion [water, surface water]: 5.1119e-8 kg; lognormal variance with pedigree 0.62765, pedigree (1,1,4,1,1)
  (same comment as for Sodium, ion)
- Selenium [air, urban air close to ground]: 1.6994e-8 kg; lognormal variance with pedigree 1.5416, pedigree (1,1,4,1,1)
  (same comment as for Iron)
- Ammonia [air, urban air close to ground]: 2.0183e-6 kg; lognormal variance with pedigree 0.7578, pedigree (1,1,4,1,1)
  (same comment as for Dinitrogen monoxide)
- Chromium [air, urban air close to ground]: 3.3326e-8 kg; lognormal variance with pedigree 0.91365, pedigree (1,1,4,1,1)
  (same comment as for Iron)
- Cobalt [air, urban air close to ground]: 3.8972e-8 kg; lognormal variance with pedigree 1.193, pedigree (1,1,4,1,1)
  (same comment as for Iron)
- Mercury [water, surface water]: 6.7109e-10 kg; lognormal variance with pedigree 1.1627, pedigree (1,1,4,1,1)
  (same comment as for Sodium, ion)
- Dioxins, measured as 2,3,7,8-tetrachlorodibenzo-p-dioxin [air, urban air close to ground]: 4.3832e-14 kg; lognormal variance with pedigree 0.41024, pedigree (1,1,4,1,1)
  (same comment as for Particulates, > 2.5 um, and < 10um)
- Chromium VI [water, surface water]: 1.0712e-6 kg; lognormal variance with pedigree 0.96449, pedigree (1,1,4,1,1)
  (same comment as for Sodium, ion)
- Calcium [air, urban air close to ground]: 1.7804e-5 kg; lognormal variance with pedigree 0.48845, pedigree (1,1,4,1,1)
  (same comment as for Iron)
- Antimony [water, ground-, long-term]: 0.0022206 kg; lognormal variance with pedigree 0.48465, pedigree (1,1,4,1,1)
  (same comment as for Cobalt)
- Thallium [water, ground-, long-term]: 1.5833e-7 kg; lognormal variance with pedigree 1.3148, pedigree (1,1,4,1,1)
  (same comment as for Cobalt)
- Bromine [water, surface water]: 0.0036109 kg; lognormal variance with pedigree 0.20612, pedigree (1,1,4,1,1)
  (same comment as for Sodium, ion)
- Cadmium, ion [water, ground-, long-term]: 8.5801e-6 kg; lognormal variance with pedigree 6.3629, pedigree (1,1,4,1,1)
  (same comment as for Cobalt)
- Fluoride [water, surface water]: 1.3896e-5 kg; lognormal variance with pedigree 0.55077, pedigree (1,1,4,1,1)
  (same comment as for Sodium, ion)
- Benzene, hexachloro- [air, urban air close to ground]: 4.5828e-11 kg; lognormal variance with pedigree 0.090744, pedigree (1,1,4,1,1)
  (same comment as for Particulates, > 2.5 um, and < 10um)
- Arsenic [air, urban air close to ground]: 4.2708e-8 kg; lognormal variance with pedigree 1.3682, pedigree (1,1,4,1,1)
  (same comment as for Iron)
- Aluminium [water, surface water]: 8.5725e-7 kg; lognormal variance with pedigree 1.1463, pedigree (1,1,4,1,1)
  (same comment as for Sodium, ion)
- Carbon dioxide, fossil [air, urban air close to ground]: 2.2041 kg; lognormal variance with pedigree 0.0155861, pedigree (1,1,4,1,1)
  (same comment as for Iron)
- Lead [water, surface water]: 5.0991e-8 kg; lognormal variance with pedigree 1.538, pedigree (1,1,4,1,1)
  (same comment as for Sodium, ion)
- Silicon [water, surface water]: 1.0654e-6 kg; lognormal variance with pedigree 0.88883, pedigree (1,1,4,1,1)
  (same comment as for Sodium, ion)
- COD, Chemical Oxygen Demand [water, ground-, long-term]: 0.0045416 kg; lognormal variance with pedigree 0.02443, pedigree (1,1,4,1,1)
  (same comment as for Cobalt)
- Strontium [air, urban air close to ground]: 6.0034e-9 kg; lognormal variance with pedigree 1.0755, pedigree (1,1,4,1,1)
  (same comment as for Iron)
- TOC, Total Organic Carbon [water, surface water]: 0.00030895 kg; lognormal variance with pedigree 0.038334, pedigree (1,1,4,1,1)
  (same comment as for Sodium, ion)
- Potassium, ion [water, ground-, long-term]: 6.6119e-5 kg; lognormal variance with pedigree 0.55436, pedigree (1,1,4,1,1)
  (same comment as for Cobalt)
