# heat and power co-generation unit construction, 6400kW thermal, building

Dataset: EcoSpold 2, unit process
Geography: RoW
Time period: 2000-01-01 to 2021-12-31
Technology level: current
Classification: ISIC rev.4 ecoinvent: 4220:Construction of utility projects
Classification: EcoSpold01Categories: wood energy/cogeneration
Tags: ConvertedDataset
Scenario: Business-as-Usual
System model: Allocation, cut-off by classification
Generated by: Christian Bauer
Published in: Bauer, C. 2007
Database: ecoinvent
isCopyrightProtected: true
accessRestrictedTo: 1

## General comment
Assumed lifetime: 20 years. Operation time for heat production 2030 h/a, for electricity production 3500 h/a, calculated from reported annual production.
[This dataset was already contained in the ecoinvent database version 2. It was not individually updated during the transfer to ecoinvent version 3. Life Cycle Impact Assessment results may still have changed, as they are affected by changes in the supply chain, i.e. in other datasets. This dataset was generated following the ecoinvent quality guidelines for version 2. It may have been subject to central changes described in the ecoinvent version 3 change report (http://www.ecoinvent.org/database/ecoinvent-version-3/reports-of-changes/), and the results of the central updates were reviewed extensively. The changes added e.g. consistent water flows and other information throughout the database. The documentation of this dataset can be found in the ecoinvent reports of version 2, which are still available via the ecoinvent website. The change report linked above covers all central changes that were made during the conversion process.]

## Included activities end
This module includes the most important materials used for the construction of the building: concrete, steel, gravel, wood, rock wool, paint. Also includes the transport of these materials, the area occupied, and the disposal of the building.

## Geography
Could be used for central European conditions.

## Technology
Specific cogeneration unit installed in Switzerland.

## Reference product
- heat and power co-generation unit, 6400kW thermal, building: 1 unit; CPC 53262: Power plants; By-product classification allocatable product
  EcoSpold01Location=CH
  production volume 3.96633 unit
    This is a placeholder value that does not reflect real-world production volumes. This dataset does not currently require a real-world production volume to work in the database framework, and no actual data were collected yet. This has no negative effect on the results of the ecoinvent database.
  property price 1.37004e6 EUR2005
    Calculated by 2.0 - For EU 2003 data from EU27 I/O database-79 Building, non-residential EU 27. Based on consumption of iron basic, iron, after first processing, fabricated metal products (except machinery) and machinery and equipment -39100 kg. Convert from EU 27 price to the world by currency exchange rate.

## Inputs from technosphere
- concrete, normal: 0 m3; pedigree (1,1,1,1,1)
  Basic uncertainty:2
  EcoSpold01Location=CH
  properties: water content 0.086758, dry mass 2190 kg, wet mass 2380 kg
- excavation, hydraulic digger: 8000 m3; lognormal variance with pedigree 0.188, pedigree (4,5,5,5,1)
  Basic uncertainty:2
  EcoSpold01Location=RER
- sawnwood, softwood, raw, dried (u=20%): 150 m3; lognormal variance with pedigree 0.188, pedigree (4,5,5,5,1)
  EcoSpold01Location=RER
  Basic uncertainty:2
  properties: wet mass 540 kg, dry mass 450 kg, water content 0.2, carbon content, non-fossil 0.494, heating value, net 6514.84 MJ
  note on carbon content, non-fossil: C content of dry mass is 0.494 kgC/kg dry wood (ecoinvent v2.2 report 9)
- stone wool: 13 kg; lognormal variance with pedigree 0.188, pedigree (4,5,5,5,1)
  EcoSpold01Location=CH
  Basic uncertainty:2
  properties: wet mass 1 kg, carbon content, fossil 0.015401, dry mass 1 kg
  note on carbon content, fossil: The chemical composition of the glass fibres used in the rock wool production is similar to the composition of naturally cooled volcano basalt and has a composition listed in Tab. 3.1 and 3.2 in ecoinvent v2.2 report 16, part XIV. Rock wool contains: a minimum of 96% mineral fibres,between 0.5 and 3.0 weight percent of phenolic resin depending on the specific product characteristics, and about 0.2 percent mineral oil (ecoinvent v2.2 report 16, part XIV). An average composition of 1.8% phenolic resin, 0.2% mineral oil, and 98% mineral fibres has been assumed and used to calculate C content of the rock wool
- reinforcing steel: 31500 kg; lognormal variance with pedigree 0.188, pedigree (4,5,5,5,1)
  Basic uncertainty:2
  EcoSpold01Location=RER
  properties: carbon content, fossil 0.004, dry mass 1 kg, wet mass 1 kg
- alkyd paint, white, without solvent, in 60% solution state: 680 kg; lognormal variance with pedigree 0.188, pedigree (4,5,5,5,1)
  EcoSpold01Location=RER
  Basic uncertainty:2
  properties: heating value, net 10.3 MJ, dry mass 1 kg, carbon content, fossil 0.140367, carbon content, non-fossil 0.199629, wet mass 1 kg
  note on carbon content, fossil: C content was calculated as an addition of C content in the raw materials.
- waste concrete gravel: -210000 kg; lognormal variance with pedigree 0.1246, pedigree (3,3,5,5,4)
  EcoSpold01Location=CH
  production volume 630000 kg
    Calculated from the production volume of cogen unit, 6400kWth, wood burning, building in proportion to the respective output amounts.
  properties: dry mass 1 kg, wet mass 1 kg
- steel, low-alloyed, hot rolled: 7600 kg; lognormal variance with pedigree 0.188, pedigree (4,5,5,5,1)
  EcoSpold01Location=RER
  Basic uncertainty:2
  properties: wet mass 1 kg, carbon content, fossil 0.005, dry mass 1 kg
  note on carbon content, fossil: Low alloyed steel composition given in Tab. 3.2 ecoinvent v2.2 report 10_partII. Steel assumed to have a C content of 0.5%
- waste mineral wool: 0 kg; pedigree (1,1,1,1,1)
  EcoSpold01Location=CH
  production volume 0 kg
    (same comment as for waste concrete gravel)
  properties: dry mass 1 kg, wet mass 1 kg
- waste wood, untreated: 0 kg; pedigree (1,1,1,1,1)
  EcoSpold01Location=CH
  production volume 0 kg
    (same comment as for waste concrete gravel)
  properties: water content 0.25, dry mass 0.8 kg, carbon content, non-fossil 0.48632, wet mass 1 kg, heating value, net 13.99 MJ
  note on carbon content, non-fossil: Tab A.4, ecoinvent v2.2 report 13_I. C content has been referred to 1 kg DM,
  note on heating value, net: Value taken from the general comment of the treatment dataset.
- gravel, crushed: 0 kg; pedigree (1,1,1,1,1)
  EcoSpold01Location=CH
  Basic uncertainty:2
  properties: wet mass 1 kg, dry mass 1 kg
- waste reinforced concrete: 0 kg; pedigree (1,1,1,1,1)
  EcoSpold01Location=CH
  production volume 0 kg
    (same comment as for waste concrete gravel)
  properties: dry mass 0.99418 kg, water content 0.00585407, wet mass 1 kg
- glued laminated timber, average glue mix: 0 m3; pedigree (1,1,1,1,1)
  EcoSpold01Location=RER
  properties: dry mass 404.4 kg, heating value, net 5537.41 MJ, carbon content, fossil 0.01791, wet mass 444 kg, price 298 EUR2005, water content 0.0979228, carbon content, non-fossil 0.441932
- waste paint on wood: -680 kg; lognormal variance with pedigree 0.1246, pedigree (3,3,5,5,4)
  EcoSpold01Location=CH
  production volume 2040 kg
    (same comment as for waste concrete gravel)
  properties: heating value, net 19.7 MJ, carbon content, fossil 0.65, dry mass 1 kg, wet mass 1 kg
- concrete, normal: 16.4426, 1.7133, 13.8704, 7.80208, 33.0396, 1.11441, 653.018 m3 (7 entries); lognormal variance with pedigree 0.188, pedigree (4,5,5,5,1)
  Basic uncertainty:2
  EcoSpold01Location=CH
- waste mineral wool: -3.78062, -9.21938 kg (2 entries); lognormal variance with pedigree 0.1246, pedigree (3,3,5,5,4)
  EcoSpold01Location=CH
  production volume 39 kg
- waste wood, untreated: -802.826, -99.6829, -7.28794, -279.979, -42.2981, -66.8698, -1250.01, -10651 kg (8 entries); lognormal variance with pedigree 0.1246, pedigree (3,3,5,5,4)
  EcoSpold01Location=CH
  production volume 39600 kg
- gravel, crushed: 9035.58, 827.206, 41364.6, 158773 kg (4 entries); lognormal variance with pedigree 0.188, pedigree (4,5,5,5,1)
  EcoSpold01Location=CH
  Basic uncertainty:2
- waste reinforced concrete: -106733, -1.52327e6 kg (2 entries); lognormal variance with pedigree 0.1246, pedigree (3,3,5,5,4)
  EcoSpold01Location=CH
  production volume 4.89e6 kg
- glued laminated timber, average glue mix: 5.73918, 12.4608 m3 (2 entries); lognormal variance with pedigree 0.188, pedigree (4,5,5,5,1)
  EcoSpold01Location=RER

## Inputs from nature
- Occupation, industrial area [natural resource, land]: 160000 m2*year; lognormal variance with pedigree 0.188, pedigree (4,5,5,5,1)
  Basic uncertainty:2
- Transformation, from unspecified [natural resource, land]: 2000 m2; lognormal variance with pedigree 0.188, pedigree (4,5,5,5,1)
  Basic uncertainty:2
- Transformation, to industrial area [natural resource, land]: 2000 m2; lognormal variance with pedigree 0.188, pedigree (4,5,5,5,1)
  Basic uncertainty:2

## Sampling procedure
literature

## Extrapolations
none This dataset has been copied from an original dataset covering the geography CH. The uncertainty has been adjusted accordingly.

## Review by Christian Bauer 2003-08-19
passed
