# refinery gas, burned in furnace

Dataset: EcoSpold 2, unit process
Geography: CH
Time period: 1980-01-01 to 2021-12-31
Technology level: current
Classification: EcoSpold01Categories: oil/heating systems
Classification: ISIC rev.4 ecoinvent: 3530:Steam and air conditioning supply
Scenario: Business-as-Usual
System model: Allocation, cut-off by classification
Share of production covered: 100 %
Generated by: Niels Jungbluth
Published in: Jungbluth, N. 2007
Database: ecoinvent
isCopyrightProtected: true
accessRestrictedTo: 1

## General comment
Description of the direct emissions due to the combustion of refinery gas in refinery furnaces and generators not including the infrastructure of the furnace.
[This dataset was already contained in the ecoinvent database version 2. It was not individually updated during the transfer to ecoinvent version 3. Life Cycle Impact Assessment results may still have changed, as they are affected by changes in the supply chain, i.e. in other datasets. This dataset was generated following the ecoinvent quality guidelines for version 2. It may have been subject to central changes described in the ecoinvent version 3 change report (http://www.ecoinvent.org/database/ecoinvent-version-3/reports-of-changes/), and the results of the central updates were reviewed extensively. The changes added e.g. consistent water flows and other information throughout the database. The documentation of this dataset can be found in the ecoinvent reports of version 2, which are still available via the ecoinvent website. The change report linked above covers all central changes that were made during the conversion process.]

## Included activities end
Consumption of refinery gas and combustion emissions.

## Geography
Data for Swiss and single European plants.

## Technology
Average technology in use.

## Time period
New Swiss data for regulated emissions like CO2, NOx, SOx etc. have been provided by the refineries. They have been compared and discussed with older literature data.

## Reference product
- heat, district or industrial, other than natural gas: 1 MJ; By-product classification allocatable product; CPC 17300: Steam and hot water
  production volume 0.0336675 MJ
    This is a placeholder value that does not reflect real-world production volumes. This dataset does not currently require a real-world production volume to work in the database framework, and no actual data were collected yet. This has no negative effect on the results of the ecoinvent database. The placeholder value of this activity was scaled according to the nominal GDP of 2005 (source: United Nations, http://data.un.org/Glossary.aspx?q=GDP+%28current+US%24%29, accessed 20130726) to reflect an appropriate share of the global production volume, which is also a placeholder value.
  property price 0.0106 EUR2005
    Average European district heat price from Ecoheatcool and Euroheat 2005-2006, Ecoheat Work package 1: The European heat market. Final report. 10.6 EUR/GJ i s the price of district heat. http://www.solarthermalworld.org/files/Ecoheatcool%20WP1%20Web.pdf?download
  property corresponding fuel use, propane, furnace >100kW 1.05263 MJ; = 1/0.95
    Lower heating value of the fuel input related to the heat/electricity output, taken directly from ecoinvent v3.0 dataset "heat production, natural gas, at industrial furnace >100kW, GLO 2000".
  properties: heating value, net 1 MJ

## Inputs from technosphere
- refinery gas: 0, 0, 0, 0, 0, 0, 0, 0 kg (8 entries); pedigree (1,1,1,1,1)
  Activity Link set to Swiss petroleum refinery operation
  Uncertainty: Literature data
  properties: carbon content, fossil 0.77, wet mass 1 kg, dry mass 1 kg, heating value, net 50.3 MJ
- refinery gas: 0.0199 kg; lognormal variance with pedigree 0.0447, pedigree (3,4,5,3,1)
  Activity Link set to Swiss petroleum refinery operation
  Uncertainty: Literature data

## Emissions to nature
- Particulates, < 2.5 um [air, urban air close to ground]: 5.46e-6 kg; lognormal variance with pedigree 0.1626, pedigree (2,4,5,1,1)
  Literature data
  Uncertainty: Literature data
- Carbon dioxide, fossil [air, urban air close to ground]: 0.0561 kg; lognormal variance with pedigree 0.0541, pedigree (3,4,5,3,1)
  Literature data
  Uncertainty: Literature data
- Nitrogen oxides [air, urban air close to ground]: 5e-5 kg; lognormal variance with pedigree 0.32, pedigree (1,1,5,1,1)
  44.5% of Range for RER refineries
- Sulfur dioxide [air, urban air close to ground]: 5.77e-6 kg; lognormal variance with pedigree 1.79, pedigree (1,1,5,1,1)
  Range for RER refineries, Share for combustion
- Carbon monoxide, fossil [air, urban air close to ground]: 1.5e-5 kg; lognormal variance with pedigree 0.7041, pedigree (3,4,5,3,1)
  Literature data
  Uncertainty: Literature data
- Radon-222 [air, non-urban air or from high stacks]: 0.00636 kBq; lognormal variance with pedigree 0.1626, pedigree (2,4,5,1,1)
  Literature data
  Uncertainty: Literature data
- Methane, fossil [air, urban air close to ground]: 4.97e-6 kg; lognormal variance with pedigree 0.0941, pedigree (3,4,5,3,1)
  Literature data
  Uncertainty: Literature data
- Mercury [air, urban air close to ground]: 1.39e-9 kg; lognormal variance with pedigree 0.7041, pedigree (3,4,5,3,1)
  Literature data
  Uncertainty: Literature data
- NMVOC, non-methane volatile organic compounds, unspecified origin [air, urban air close to ground]: 4.97e-6 kg; lognormal variance with pedigree 0.1741, pedigree (3,4,5,3,1)
  Literature data
  Uncertainty: Literature data

## Sampling procedure
Literature survey and plant data.

## Extrapolations
This dataset has been extrapolated from year 2000 to the year of the calculation (2021). The uncertainty has been adjusted accordingly.

## Review by Michael Spielmann (obsolete) 2003-07-04
passed

## Review by Bo Weidema 2012-03-18
Passed for upload to database, in order to enable calculation check. The dataset will later be re/submitted for a more thorough review.
