# treatment of waste cement, hydrated, residual material landfill

Dataset: EcoSpold 2, unit process
Geography: RoW
Time period: 1994-01-01 to 2021-12-31
Technology level: current
Classification: EcoSpold01Categories: waste management/residual material landfill
Classification: ISIC rev.4 ecoinvent: 3822:Treatment and disposal of hazardous waste
Synonyms: cement and water for solidification of residual material waste
Tags: ConvertedDataset; Treatment
Scenario: Business-as-Usual
System model: Allocation, cut-off by classification
Generated by: Gabor Doka (obsolete)
Published in: Doka G. 2009
Database: ecoinvent
isCopyrightProtected: true
accessRestrictedTo: 1

## General comment
Inventoried waste contains 100% cement hydrated; .
waste composition (wet, in ppm): H2O 5969.2; O 672760; H 66667; C n.a.; S 4938.4; N n.a.; P 231.96; B n.a.; Cl n.a.; Br n.a.; F n.a.; I n.a.; Ag n.a.; As 3.3957; Ba n.a.; Cd 0.60687; Co 1.7555; Cr 21.386; Cu 3.8614; Hg 0.017115; Mn 189.76; Mo n.a.; Ni 16.464; Pb 29.371; Sb 0.0881; Se n.a.; Sn 1.3293; V 23.132; Zn 80.532; Be n.a.; Sc n.a.; Sr n.a.; Ti n.a.; Tl 0.19256; W n.a.; Si 38427; Fe 10046; Ca 183060; Al 13408; K n.a.; Mg n.a.; Na 4115.3;
Share of carbon in waste that is biogenic 60.4%.
[This dataset was already contained in the ecoinvent database version 2. It was not individually updated during the transfer to ecoinvent version 3. Life Cycle Impact Assessment results may still have changed, as they are affected by changes in the supply chain, i.e. in other datasets. This dataset was generated following the ecoinvent quality guidelines for version 2. It may have been subject to central changes described in the ecoinvent version 3 change report (http://www.ecoinvent.org/database/ecoinvent-version-3/reports-of-changes/), and the results of the central updates were reviewed extensively. The changes added e.g. consistent water flows and other information throughout the database. The documentation of this dataset can be found in the ecoinvent reports of version 2, which are still available via the ecoinvent website. The change report linked above covers all central changes that were made during the conversion process.]

## Included activities end
Waste-specific short-term emissions to water from leachate. Long-term emissions from landfill to ground water.

## Geography
Technology encountered in Switzerland in 2000. Landfill includes base seal and leachate collection system.

## Technology
Swiss residual material landfill for polluted, inorganic waste. With base seal and leachate collection system. Recultivation after closure.

## Time period
Waste composition as given in literature reference, theoretical data or other source. Transfer coefficients from prospective model.

## Reference product
- waste cement, hydrated: -1 kg; CPC 39: Wastes or scraps; By-product classification Waste
  EcoSpold01Location=CH
  production volume 2.84436 kg
    This is a placeholder value that does not reflect real-world production volumes. This dataset does not currently require a real-world production volume to work in the database framework, and no actual data were collected yet. This has no negative effect on the results of the ecoinvent database.
  property price 0 EUR2005
    Waste products are assigned a price of zero as they are assumed to require further treatment.
  property carbon content 0
    carbon content on a dry matter basis (reserved; not for manual entry)
  properties: water in wet mass 0 kg, dry mass 1 kg, wet mass 1 kg, carbon content, non-fossil 0, water content 0, carbon content, fossil 0, carbon allocation 0 kg

## Inputs from technosphere
- residual material landfill: 2.0833e-9 unit; lognormal variance with pedigree 0.042, pedigree (1,1,5,5,1)
  EcoSpold01Location=CH
  demands per kilogram waste. uncertainty is heeded in the module
- process-specific burdens, residual material landfill: 1 kg; lognormal variance with pedigree 0.042, pedigree (1,1,5,5,1)
  EcoSpold01Location=CH
  demands per kilogram waste. uncertainty is heeded in the module

## Emissions to nature
- Copper, ion [water, surface water]: 2.4815e-10 kg; lognormal variance with pedigree 2.452, pedigree (1,1,5,5,1)
  uncertainty is calculated from uncertainties in waste composition and transfer coefficients in residual landfill
- Phosphate [water, ground-, long-term]: 0.00015889 kg; lognormal variance with pedigree 1.452, pedigree (1,1,5,5,1)
  uncertainty is calculated from uncertainties in waste composition and transfer coefficients in incinerator and landfills.
- Lead [water, ground-, long-term]: 1.5235e-7 kg; lognormal variance with pedigree 8.092, pedigree (1,1,5,5,1)
  (same comment as for Phosphate)
- Mercury [water, ground-, long-term]: 8.0787e-10 kg; lognormal variance with pedigree 4.292, pedigree (1,1,5,5,1)
  (same comment as for Phosphate)
- Tin, ion [water, surface water]: 4.2051e-11 kg; lognormal variance with pedigree 2.682, pedigree (1,1,5,5,1)
  (same comment as for Copper, ion)
- Nickel, ion [water, ground-, long-term]: 5.9604e-6 kg; lognormal variance with pedigree 1.502, pedigree (1,1,5,5,1)
  (same comment as for Phosphate)
- Phosphate [water, surface water]: 2.6526e-7 kg; lognormal variance with pedigree 1.672, pedigree (1,1,5,5,1)
  (same comment as for Copper, ion)
- Vanadium, ion [water, surface water]: 5.6771e-8 kg; lognormal variance with pedigree 1.732, pedigree (1,1,5,5,1)
  (same comment as for Copper, ion)
- Silicon [water, ground-, long-term]: 0.03834 kg; lognormal variance with pedigree 0.262, pedigree (1,1,5,5,1)
  (same comment as for Phosphate)
- Iron, ion [water, ground-, long-term]: 5.0348e-5 kg; lognormal variance with pedigree 7.422, pedigree (1,1,5,5,1)
  (same comment as for Phosphate)
- Zinc, ion [water, surface water]: 1.6477e-9 kg; lognormal variance with pedigree 2.202, pedigree (1,1,5,5,1)
  (same comment as for Copper, ion)
- Manganese [water, ground-, long-term]: 1.5674e-6 kg; lognormal variance with pedigree 6.672, pedigree (1,1,5,5,1)
  (same comment as for Phosphate)
- Nickel, ion [water, surface water]: 9.9506e-9 kg; lognormal variance with pedigree 1.962, pedigree (1,1,5,5,1)
  (same comment as for Copper, ion)
- Aluminium [water, ground-, long-term]: 0.0039802 kg; lognormal variance with pedigree 0.742, pedigree (1,1,5,5,1)
  (same comment as for Phosphate)
- Chromium VI [water, surface water]: 1.2856e-6 kg; lognormal variance with pedigree 1.372, pedigree (1,1,5,5,1)
  (same comment as for Copper, ion)
- Antimony [water, ground-, long-term]: 5.7031e-8 kg; lognormal variance with pedigree 1.972, pedigree (1,1,5,5,1)
  (same comment as for Phosphate)
- Cadmium, ion [water, surface water]: 6.8781e-12 kg; lognormal variance with pedigree 2.922, pedigree (1,1,5,5,1)
  (same comment as for Copper, ion)
- Aluminium [water, surface water]: 6.6448e-6 kg; lognormal variance with pedigree 1.122, pedigree (1,1,5,5,1)
  (same comment as for Copper, ion)
- Thallium [water, surface water]: 1.1639e-10 kg; lognormal variance with pedigree 2.542, pedigree (1,1,5,5,1)
  (same comment as for Copper, ion)
- Chromium VI [water, ground-, long-term]: 4.0609e-6 kg; lognormal variance with pedigree 1.212, pedigree (1,1,5,5,1)
  (same comment as for Phosphate)
- Vanadium, ion [water, ground-, long-term]: 1.778e-5 kg; lognormal variance with pedigree 1.212, pedigree (1,1,5,5,1)
  (same comment as for Phosphate)
- Tin, ion [water, ground-, long-term]: 2.5189e-8 kg; lognormal variance with pedigree 5.502, pedigree (1,1,5,5,1)
  (same comment as for Phosphate)
- Antimony [water, surface water]: 3.1069e-8 kg; lognormal variance with pedigree 1.992, pedigree (1,1,5,5,1)
  (same comment as for Copper, ion)
- Thallium [water, ground-, long-term]: 6.9715e-8 kg; lognormal variance with pedigree 2.082, pedigree (1,1,5,5,1)
  (same comment as for Phosphate)
- Silicon [water, surface water]: 8.642e-5 kg; lognormal variance with pedigree 0.802, pedigree (1,1,5,5,1)
  (same comment as for Copper, ion)
- Sodium, ion [water, ground-, long-term]: 0.0025709 kg; lognormal variance with pedigree 0.522, pedigree (1,1,5,5,1)
  (same comment as for Phosphate)
- Cobalt [water, ground-, long-term]: 3.0013e-7 kg; lognormal variance with pedigree 2.322, pedigree (1,1,5,5,1)
  (same comment as for Phosphate)
- Calcium, ion [water, surface water]: 2.7615e-5 kg; lognormal variance with pedigree 1.012, pedigree (1,1,5,5,1)
  (same comment as for Copper, ion)
- Sulfate [water, ground-, long-term]: 0.013226 kg; lognormal variance with pedigree 0.492, pedigree (1,1,5,5,1)
  (same comment as for Phosphate)
- Zinc, ion [water, ground-, long-term]: 9.87e-7 kg; lognormal variance with pedigree 5.872, pedigree (1,1,5,5,1)
  (same comment as for Phosphate)
- Copper, ion [water, ground-, long-term]: 1.4864e-7 kg; lognormal variance with pedigree 4.092, pedigree (1,1,5,5,1)
  (same comment as for Phosphate)
- Sodium, ion [water, surface water]: 0.0015444 kg; lognormal variance with pedigree 0.542, pedigree (1,1,5,5,1)
  (same comment as for Copper, ion)
- Sulfate [water, surface water]: 0.0015895 kg; lognormal variance with pedigree 0.612, pedigree (1,1,5,5,1)
  (same comment as for Copper, ion)
- Mercury [water, surface water]: 1.3487e-12 kg; lognormal variance with pedigree 2.952, pedigree (1,1,5,5,1)
  (same comment as for Copper, ion)
- Arsenic, ion [water, ground-, long-term]: 3.3957e-15 kg; lognormal variance with pedigree 1.472, pedigree (1,1,5,5,1)
  (same comment as for Phosphate)
- Manganese [water, surface water]: 2.6168e-9 kg; lognormal variance with pedigree 2.132, pedigree (1,1,5,5,1)
  (same comment as for Copper, ion)
- Calcium, ion [water, ground-, long-term]: 0.016541 kg; lognormal variance with pedigree 1.562, pedigree (1,1,5,5,1)
  (same comment as for Phosphate)
- Iron, ion [water, surface water]: 8.4054e-8 kg; lognormal variance with pedigree 1.692, pedigree (1,1,5,5,1)
  (same comment as for Copper, ion)
- Arsenic, ion [water, surface water]: 3.3957e-6 kg; lognormal variance with pedigree 1.452, pedigree (1,1,5,5,1)
  (same comment as for Copper, ion)
- Lead [water, surface water]: 2.5434e-10 kg; lognormal variance with pedigree 2.442, pedigree (1,1,5,5,1)
  (same comment as for Copper, ion)
- Cadmium, ion [water, ground-, long-term]: 4.12e-9 kg; lognormal variance with pedigree 7.912, pedigree (1,1,5,5,1)
  (same comment as for Phosphate)
- Cobalt [water, surface water]: 5.0104e-10 kg; lognormal variance with pedigree 2.352, pedigree (1,1,5,5,1)
  (same comment as for Copper, ion)

## Sampling procedure
Landfill model based on observed leachate concentrations in literature. Extrapolated to 60'000 years heeding chemical characteristics. Initial waste composition from various literature sources.

## Extrapolations
This dataset has been copied from an original dataset covering the geography CH. The uncertainty has been adjusted accordingly.

## Review by Niels Jungbluth 2009-02-15
passed.
