# swine production

Dataset: EcoSpold 2, unit process
Geography: RoW
Time period: 2009-01-01 to 2021-12-31
Technology level: current
Classification: ISIC rev.4 ecoinvent: 0145:Raising of swine/pigs
Synonyms: pig
Scenario: Business-as-Usual
System model: Allocation, cut-off by classification
Generated by: Dominique Maxime
Published in: OCO Technologies 2010
Database: ecoinvent
isCopyrightProtected: true
accessRestrictedTo: 1

## General comment
This dataset has been extrapolated from an original dataset covering the geography of Quebec (Canada) which represents the farrow-to-finish production of swine, the main swine production system in Québec, in 2009-2011 (about 75% of total Québec swine production). The module includes the consumption of feed, and the operation of pig housing systems for the management of the herd and the production of finished pigs. The functional unit is 1 kg live weight of swine for slaughtering, at the farm gate. Culled sows are also sold for slaughtering. Thus, they are embedded in the reference product in addition to finished pigs, and are not considered a by-product. By-products are the liquid manure and dead animals unsuitable for the food market, hence considered as a "slaughterhouse waste" since they are commonly sent to a rendering plant.
The production system is modelled considering the productive lifetime of a sow. Two sub-production stages are considered: the nursery stage where sows are farrowing and then piglets are grown until they enter the finishing stage where they are intensively fed and become finished pigs.The average farrow-to-finish pig farm in Québec produced abour 5'790'530 finished pigs (at 122 kg live weight). The annual baseline population of the typical pig farm is about: 420 sows, 9060 piglets and 8760 pigs. In addition to finished pigs, 0.029 culled sows per finished pig is sold for slaughtering. The sow replacement rate is 44.6%. Over 99% of swine production is in slatted-floor pig barn.
This dataset does not cover organic swine production in Quebec.
Liquid management of the manure (slurry) is the dominant mode of manure management. Over 99% of Québec swine production use slatted-floor barns without litter under the animals (Pouliot, F. (2007). Porc Québec, Avril 2007, pp. 70-73). The slurry collected from buildings is mostly stored at farm in open-pit. Around 98% of pig farms have non-covered slurry storage systems (FPPQ (2013). personnal communication). According to this management figure and to the distribution of animal categories within the herd, main emissions to the air from liquid manure management have been calculated. After storage, the liquid manure supplied, e.g. to farmers, has the following characteristics (per metric ton, fresh basis): N total=3.5 kg N/mt; NH4-N=2.4 kg N/mt; P total=2.3 kg P2O5/mt; K total=2.9 kg K2O/mt; density=1 mt/m3; dry matter content=35 kg dry matter/mt (3.5%); carbon-to-nitrogen ratio C/N=3.4.

## Included activities start
This activity starts from the reception and storage of feed materials, and the farrowing stage.

## Included activities end
This activity ends with the provision of swine (finished pig and culled sow) at farm, ready-to-deliver for slaughtering. The dataset includes the consumption of feed; the livestock management operations during the three stages of farrowing, nursery and growing-finishing; emissions of ammonia, methane, dinitrogen oxyde, particulate matters, and carbon dioxide from animal housing; emissions from manure storage (ammonia, methane and indirect dinitrogen oxyde). Drinking and cleaning water, energy use and buildings infrastructure necessary for the operation of a typical farrow-to-finish pig farm are considered through the exchange of the housing system. Energy and infrastructure for liquid manure management are considered through the exchange of the slury storage system.
The dataset does not include: fodder and feed production and processing into meal for animals; litter consumption on the farm (because litter is mostly used on pig farm with solid management of manure which is marginal in farrow-to-finish production system); boars and insemination (generally, there is just a couple of boars in the typical pig farm); any animal transportation to the farm. Also, the dataset does not include any drugs used on the pig farm, because of the lack of data available on quantities and content. In terms of mass, drugs represent generally much less than 1% of inputs. Finally, some air emissions within housing are missing due to lack of information; these are H2S, PM10 and PM2.5 from sow and piglets.

## Geography
The inventory applies to Québec farrow-to-finish pig farms.

## Technology
Intensive pig farming, farrow-to-finish

## Time period
Period indicated in the reference.

## Parameters
- feed, per sow, threonine: 0 kg; name Feed_Sow_Threonine
  kg of ingredient per head. The parameter is used in formula for feed supply only (not, e.g. for emission calculation)
- feed, per piglet, blood plasma: 0.124 kg; name Feed_Piglet_Blood_plasma; lognormal variance with pedigree 0.0032, pedigree (2,1,1,5,1)
  kg of ingredient per head
- dinitrogen oxide emission from piglet building: 1e-5 kg/(head.d); name Bldg_Piglet_N2O; lognormal variance with pedigree 0.0114, pedigree (2,1,2,5,2)
  (kg/head.day) (Hamelin et al, 2009) Building emissions
- feed, per piglet, barley: 5.14 kg; name Feed_Piglet_Barley; lognormal variance with pedigree 0.0032, pedigree (2,1,1,5,1)
  kg of ingredient per head
- feed, per piglet, choline chloride: 0.01905 kg; name Feed_Piglet_Choline_chloride; lognormal variance with pedigree 0.0032, pedigree (2,1,1,5,1)
  kg of ingredient per head
- feed, per piglet, canola meal: 0 kg; name Feed_Piglet_Canola_meal
  (same comment as for feed, per sow, threonine)
- feed, per sow, soymeal: 93.735 kg; name Feed_Sow_Soymeal; lognormal variance with pedigree 0.0032, pedigree (2,1,1,5,1)
  kg of ingredient per head
- average population of piglets in nursering: 1.07969 dimensionless; name Average_population_piglets_nursering; = (piglet_nursery+ piglet_finishing)/2; lognormal variance with pedigree 0, pedigree (1,1,1,1,1)
  Average population of piglets in nursering (heads per finished pig)
  Uncertainty: Calculated variable. Uncertainty will be determined from propagation of uncertainty factors of underlying variables. Uncertainty of actual relation between variables not accounted at this time, although this could be included in a future update.
- carcass weight of one finished pig: 97.6 kg; name CarcassWgtPig; lognormal variance with pedigree 0.0032, pedigree (2,1,1,5,1)
  Carcass weight of 1 finished pig (kg/head). So, 100*CarcassWgtPig/AN_LW_FPig= dressing percentage (at slaughterhouse) (FPPQ, 2010)
- feed, per piglet, fish flour: 0.248 kg; name Feed_Piglet_Fish_flour; lognormal variance with pedigree 0.0032, pedigree (2,1,1,5,1)
  kg of ingredient per head
- death rate pig in finishing: 0.053 dimensionless; name DeathRatePig; lognormal variance with pedigree 0.0032, pedigree (2,1,1,5,1)
  (-) Death rate of pig in finishing (FPPQ, 2010)
- feed, per piglet, lysine: 0.05255 kg; name Feed_Piglet_Lysine; lognormal variance with pedigree 0.0032, pedigree (2,1,1,5,1)
  kg of ingredient per head
- volume of sow slurry with animal rotation and mean inventory: 5.3 m3/head/yr; name SL_Vol_Sow; = SL_Rate_Sow/ annual_sow_rotation; lognormal variance with pedigree 0, pedigree (1,1,1,1,1)
  (m3/head) Volume of sow slurry per year divided by animal rotation during the year.
  Uncertainty: Calculated variable. Uncertainty will be determined from propagation of uncertainty factors of underlying variables. Uncertainty of actual relation between variables not accounted at this time, although this could be included in a future update.
- feed, per piglet, methionine: 0.03447 kg; name Feed_Piglet_Methionine; lognormal variance with pedigree 0.0032, pedigree (2,1,1,5,1)
  kg of ingredient per head
- dinitrogen oxide emissions from sow building: 0 kg/(head.d); name Bldg_Sow_N2O
  No N2O emissions from sow building.
- feed, per piglet, limestone: 0.23536 kg; name Feed_Piglet_Limestone; lognormal variance with pedigree 0.0032, pedigree (2,1,1,5,1)
  kg of ingredient per head
- annual sow rotation: 1 unit; name annual_sow_rotation; lognormal variance with pedigree 0.002, pedigree (1,1,1,5,1)
  Sow rotation in a year: raising lasts 365 days a year (OCO, 2010). Used to scale annual inventory data or intensity.
- feed, per piglet, micro premix: 0.11528 kg; name Feed_Piglet_Micro_premix; lognormal variance with pedigree 0.0032, pedigree (2,1,1,5,1)
  kg of ingredient per head
- feed, per piglet, maize grain: 13.5149 kg; name Feed_Piglet_Maize_grain; lognormal variance with pedigree 0.0032, pedigree (2,1,1,5,1)
  kg of ingredient per head
- annual pig rotation: 3.12 unit; name Annual_pig_rotation; lognormal variance with pedigree 0.0032, pedigree (2,1,1,5,1)
  Pig rotation in a year: raising last 117 days a year (OCO, 2010). Used to scale annual inventory data or intensity.
- hydrogen sulfide emissions from piglet building: 0 kg/(head.d); name Bldg_Piglet_H2S
  (kg/head.day) Building emissions; No data was available.
- feed, per piglet, oat: 0 kg; name Feed_Piglet_Oat
  (same comment as for feed, per sow, threonine)
- feed, per piglet, phosphate: 0.19532 kg; name Feed_Piglet_Phosphate; lognormal variance with pedigree 0.0032, pedigree (2,1,1,5,1)
  kg of ingredient per head
- sow in gestation and lactation: 0.0796688 dimensionless; name sow_gest_and_lactation; = 1/(1- sow_replacement_rate)* piglet_nursery/( LitterPerSow* PigletPerLitter); lognormal variance with pedigree 0, pedigree (1,1,1,1,1)
  Number of sow heads per finished pig
  Uncertainty: Calculated variable. Uncertainty will be determined from propagation of uncertainty factors of underlying variables. Uncertainty of actual relation between variables not accounted at this time, although this could be included in a future update.
- litter per sow per year: 2.5 unit; name LitterPerSow; lognormal variance with pedigree 0.0032, pedigree (2,1,1,5,1)
  number of litters per sow in a year (FPPQ, 2010)
- feed, per piglet, sodium chloride: 0.0771 kg; name Feed_Piglet_Sodium_chloride; lognormal variance with pedigree 0.0032, pedigree (2,1,1,5,1)
  kg of ingredient per head
- culling rate of sow: 0.36 dimensionless; name SowCullRate; lognormal variance with pedigree 0.0032, pedigree (2,1,1,5,1)
  Culling rate of sow (FPPQ, 2010)
- particulate matter less than 10 micrometers emissions from pig building: 0.004 kg/(head.d); name Bldg_Pig_PM10; lognormal variance with pedigree 0.0114, pedigree (2,1,2,5,2)
  (kg/head.day) PM less than 10 micrometers (Hamelin et al, 2009) Building emissions.
- feed, per piglet, roasted soybeans: 4.785 kg; name Feed_Piglet_Soybeans_roasted; lognormal variance with pedigree 0.0032, pedigree (2,1,1,5,1)
  kg of ingredient per head
- methane emissions from piglet building: 0.00049 kg/(head.d); name Bldg_Piglet_CH4; lognormal variance with pedigree 0.0114, pedigree (2,1,2,5,2)
  (kg/head.day) (Hamelin et al, 2009) Building emissions
- feed, per piglet, oat groat: 0.62 kg; name Feed_Piglet_Oat_groat; lognormal variance with pedigree 0.0032, pedigree (2,1,1,5,1)
  kg of ingredient per head
- particulate matter less than 2,5 micrometers emissions from sow building: 0 kg/(head.d); name Bldg_Sow_PM2_5
  (kg/head.day) PM less than 2.5 micrometers. No data available.
- methane emissions from sow building: 0.0494 kg/(head.d); name Bldg_Sow_CH4; lognormal variance with pedigree 0.0114, pedigree (2,1,2,5,2)
  (kg/head.day) (Hamelin et al, 2009) Building emissions
- feed, per piglet, soymeal: 6.1055 kg; name Feed_Piglet_Soymeal; lognormal variance with pedigree 0.0032, pedigree (2,1,1,5,1)
  kg of ingredient per head
- slurry volume production rate for sow: 5.3 m3/head/yr; name SL_Rate_Sow; lognormal variance with pedigree 0.0043, pedigree (3,2,2,5,1)
  Volume of slurry generated per sow in nursery; annual volume per head (CRAAQ, 2007). Dilution by servicing water and precipitation is accounted for. Content analysis:
  Dry matter (%) 2.7%
  N (% DM) 10.7%
  P2O5 (% DM) 7.4%
  K2O (% DM) 5.6%
- piglet that goes to finishing: 1.05597 dimensionless; name piglet_finishing; = 1/(1- DeathRatePig); lognormal variance with pedigree 0, pedigree (1,1,1,1,1)
  (piglet/finished pig) surviving piglet going to finishing
  Uncertainty: Calculated variable. Uncertainty will be determined from propagation of uncertainty factors of underlying variables. Uncertainty of actual relation between variables not accounted at this time, although this could be included in a future update.
- feed, per pig, barley: 51.4 kg; name Feed_Pig_Barley; lognormal variance with pedigree 0.0032, pedigree (2,1,1,5,1)
  kg of ingredient per head
- slurry volume production rate for piglet: 0.8 m3/head/yr; name SL_Rate_Piglet; lognormal variance with pedigree 0.0043, pedigree (3,2,2,5,1)
  Volume of slurry generated per piglet in nursery ; annual volume per head (CRAAQ, 2007). Dilution by servicing water and precipitation is accounted for. Content analysis:
  Dry matter (%) 2.3%
  N (% DM) 11.3%
  P2O5 (% DM) 7.0%
  K2O (% DM) 9.1%
- particulate matter less than 2,5 micrometers emissions from pig building: 0.00197 kg/(head.d); name Bldg_Pig_PM2_5; lognormal variance with pedigree 0.0114, pedigree (2,1,2,5,2)
  (kg/head.day) PM less than 2.5 micrometers (Hamelin et al, 2009) Building emissions.
- feed, per pig, blood plasma: 0 kg; name Feed_Pig_Blood_plasma
  (same comment as for feed, per sow, threonine)
- feed, per piglet, wheat shorts: 0 kg; name Feed_Piglet_Wheat_shorts
  (same comment as for feed, per sow, threonine)
- feed, per pig, canola meal: 20.2 kg; name Feed_Pig_Canola_meal; lognormal variance with pedigree 0.0032, pedigree (2,1,1,5,1)
  kg of ingredient per head
- piglet to breed in nursery: 1.10341 dimensionless; name piglet_nursery; = piglet_finishing/(1- DeathRatePiglet); lognormal variance with pedigree 0, pedigree (1,1,1,1,1)
  (piglet/finished pig) piglet to breed in nursery
  Uncertainty: Calculated variable. Uncertainty will be determined from propagation of uncertainty factors of underlying variables. Uncertainty of actual relation between variables not accounted at this time, although this could be included in a future update.
- feed, per piglet, threonine: 0.01347 kg; name Feed_Piglet_Threonine; lognormal variance with pedigree 0.0032, pedigree (2,1,1,5,1)
  kg of ingredient per head
- piglets per litter: 10 unit; name PigletPerLitter; lognormal variance with pedigree 0.0032, pedigree (2,1,1,5,1)
  (piglets/litter) (FPPQ, 2010)
- feed, per pig, choline chloride: 0.1285 kg; name Feed_Pig_Choline_chloride; lognormal variance with pedigree 0.0032, pedigree (2,1,1,5,1)
  kg of ingredient per head
- slurry volume production rate for pig: 1.8 m3/head/yr; name SL_Rate_Pig; lognormal variance with pedigree 0.0043, pedigree (3,2,2,5,1)
  Volume of slurry generated per pig in finishing, during one year (CRAAQ, 2007). Dilution by servicing water and precipitation is accounted for. According to FPPQ, most pig farms use water reduction equipments that limit slurry volume, hence the 1.8 m3/head is the choosen figure (FPPQ, 2013). Content analysis:
  Dry matter (%): 4.9%
  N (% DM): 9.2%
  P2O5 (% DM): 4.7%
  K2O (% DM): 5.9%
- animals, live weight, piglet: 26 kg; name AN_LW_Piglet; lognormal variance with pedigree 0.0032, pedigree (2,1,1,5,1)
  (kg/head) ANimals, Live Weight, Piglet (FPPQ, 2010)
- feed, per pig, fish flour: 0 kg; name Feed_Pig_Fish_flour
  (same comment as for feed, per sow, threonine)
- feed, per pig, limestone: 2.157 kg; name Feed_Pig_Limestone; lognormal variance with pedigree 0.0032, pedigree (2,1,1,5,1)
  kg of ingredient per head
- ammonia emissions from piglet building: 0.00033 kg/(head.d); name Bldg_Piglet_NH3; lognormal variance with pedigree 0.0114, pedigree (2,1,2,5,2)
  (kg/head.day) (Hamelin et al, 2009) Building emissions
- feed, per pig, maize grain: 144.115 kg; name Feed_Pig_Maize_grain; lognormal variance with pedigree 0.0032, pedigree (2,1,1,5,1)
  kg of ingredient per head
- ammonia emissions from sow building: 0.01421 kg/(head.d); name Bldg_Sow_NH3; lognormal variance with pedigree 0.0114, pedigree (2,1,2,5,2)
  (kg/head.day) (Hamelin et al, 2009) Building emissions
- feed, per pig, lysine: 0.3726 kg; name Feed_Pig_Lysine; lognormal variance with pedigree 0.0032, pedigree (2,1,1,5,1)
  kg of ingredient per head
- sow replacement rate: 0.446 dimensionless; name sow_replacement_rate; = SowCullRate+ DeathRateSow; lognormal variance with pedigree 0, pedigree (1,1,1,1,1)
  Replacement rate for sow (culling + death).
  Uncertainty: Calculated variable. Uncertainty will be determined from propagation of uncertainty factors of underlying variables. Uncertainty of actual relation between variables not accounted at this time, although this could be included in a future update.
- feed, per pig, oat: 0 kg; name Feed_Pig_Oat
  (same comment as for feed, per sow, threonine)
- feed, per pig, methionine: 0.0605 kg; name Feed_Pig_Methionine; lognormal variance with pedigree 0.0032, pedigree (2,1,1,5,1)
  kg of ingredient per head
- total particulate matter from pig building: 0.0069 kg/(head.d); name Bldg_Pig_PMtot; lognormal variance with pedigree 0.0114, pedigree (2,1,2,5,2)
  (kg/head.day) Respirable dust (Hamelin et al, 2009) Building emissions.
- feed, per pig, oat groat: 0 kg; name Feed_Pig_Oat_groat
  (same comment as for feed, per sow, threonine)
- feed, per pig, micro premix: 0.771 kg; name Feed_Pig_Micro_premix; lognormal variance with pedigree 0.0032, pedigree (2,1,1,5,1)
  kg of ingredient per head
- sow in nursery to produce one kg of piglet: 0.00277701 dimensionless; name sow_per_kg_piglet_produced; = sow_gest_and_lactation/ piglet_nursery/ AN_LW_Piglet; lognormal variance with pedigree 0, pedigree (1,1,1,1,1)
  Number of sow heads in nursery to satisfy the production of 1 kg LW piglet
  Uncertainty: Calculated variable. Uncertainty will be determined from propagation of uncertainty factors of underlying variables. Uncertainty of actual relation between variables not accounted at this time, although this could be included in a future update.
- feed, per pig, sodium chloride: 0.771 kg; name Feed_Pig_Sodium_chloride; lognormal variance with pedigree 0.0032, pedigree (2,1,1,5,1)
  kg of ingredient per head
- volume of pig slurry per year with animal rotation and mean inventory: 0.576923 m3/head/yr; name SL_Vol_Pig; = SL_Rate_Pig/ Annual_pig_rotation; lognormal variance with pedigree 0, pedigree (1,1,1,1,1)
  (m3/head) Volume of finished pig slurry per year divided by animal rotation during the year.
  Uncertainty: Calculated variable. Uncertainty will be determined from propagation of uncertainty factors of underlying variables. Uncertainty of actual relation between variables not accounted at this time, although this could be included in a future update.
- feed, per pig, roasted soybeans: 5.5 kg; name Feed_Pig_Soybeans_roasted; lognormal variance with pedigree 0.0032, pedigree (2,1,1,5,1)
  kg of ingredient per head
- volume of piglet slurry per year with animal rotation and mean inventory: 0.109589 m3/head/yr; name SL_Vol_Piglet; = SL_Rate_Piglet/ annual_piglet_rotation; lognormal variance with pedigree 0, pedigree (1,1,1,1,1)
  (m3/head) Volume of piglet slurry per year divided by animal rotation during the year.
  Uncertainty: Calculated variable. Uncertainty will be determined from propagation of uncertainty factors of underlying variables. Uncertainty of actual relation between variables not accounted at this time, although this could be included in a future update.
- feed, per pig, phosphate: 1.1269 kg; name Feed_Pig_Phosphate; lognormal variance with pedigree 0.0032, pedigree (2,1,1,5,1)
  kg of ingredient per head
- carbon dioxide emissions from piglet building: 0.00056 kg/(head.d); name Bldg_Piglet_CO2; lognormal variance with pedigree 0.0114, pedigree (2,1,2,5,2)
  (kg/head.day) CO2 from animal respiration (96%) and decomposition of dejection (4%) (Hamelin et al. 2009).
- death rate sow in nursery: 0.086 dimensionless; name DeathRateSow; lognormal variance with pedigree 0.0032, pedigree (2,1,1,5,1)
  (-) Death rate of sow (FPPQ, 2010)
- feed, per pig, soymeal: 30.37 kg; name Feed_Pig_Soymeal; lognormal variance with pedigree 0.0032, pedigree (2,1,1,5,1)
  kg of ingredient per head
- carbon dioxide emissions from pig building: 0.0014 kg/(head.d); name Bldg_Pig_CO2; lognormal variance with pedigree 0.0114, pedigree (2,1,2,5,2)
  (kg/head.day) CO2 from animal respiration (96%) and decomposition of dejection (4%) (Hamelin et al. 2009)
- feed, per pig, whey: 0 kg; name Feed_Pig_Whey
  (same comment as for feed, per sow, threonine)
- feed, per pig, threonine: 0.0275 kg; name Feed_Pig_Threonine; lognormal variance with pedigree 0.0032, pedigree (2,1,1,5,1)
  kg of ingredient per head
- carbon dioxide emissions from sow building: 0.00529 kg/(head.d); name Bldg_Sow_CO2; lognormal variance with pedigree 0.0114, pedigree (2,1,2,5,2)
  (same comment as for carbon dioxide emissions from piglet building)
- feed, per pig, wheat shorts: 0 kg; name Feed_Pig_Wheat_shorts
  (same comment as for feed, per sow, threonine)
- methane emission factor, pig slurry, open-pit storage: 4.4623 kg/m3; name CH4_EF_storage_pig_slurry; lognormal variance with pedigree 0.0106, pedigree (2,1,1,5,1)
  (kg CH4/m3 slurry). Open-pit slurry storage. IPCC 2006; CRAAQ 2007; Protocole GES de la FPPQ (Protocole porcin de l'Alberta et Agriculture Canada)
- feed, per piglet, whey: 0.62 kg; name Feed_Piglet_Whey; lognormal variance with pedigree 0.0032, pedigree (2,1,1,5,1)
  kg of ingredient per head
- hydrogen sulfide emissions from sow building: 0 kg/(head.d); name Bldg_Sow_H2S
  (kg/head.day) Building emissions. No data available.
- particulate matter less than 10 micrometers emissions from sow building: 0 kg/(head.d); name Bldg_Sow_PM10
  (kg/head.day) PM less than 10 micrometers. No data available.
- particulate matter less than 2,5 micrometers emissions from piglet building: 0 kg/(head.d); name Bldg_Piglet_PM2_5
  (kg/head.day) PM less than 2.5 micrometers. No data available.
- nitrogen loss ratio from open pit storage for overall manure: 0.3 dimensionless; name N_loss_manure_storage; lognormal variance with pedigree 0.0147, pedigree (3,2,3,5,2)
  (kg NH3-N lost/kg total N in manure) NH3-N volatilization from open pit storage (no crust) of overall liquid manure. 30% loss is reported by Rotz (2004) as typical percent within the 20-35% range of possible (case of slurry tank, top loaded). This also within IPCC (2006) wider range of 15-60% (case of management system= liquid slurry (Table 10.22)). Rotz (2004). J. ANIM. SCI.(82)13 suppl.:E119-E13
- particulate matter less than 10 micrometers emissions from piglet building: 0 kg/(head.d); name Bldg_Piglet_PM10
  (kg/head.day) PM less than 10 micrometers. No data available.
- piglet per finished pig: 0.235154 kg/kg; name piglet_per_finished_pig; = piglet_nursery/AN_LW_FPig*AN_LW_Piglet; lognormal variance with pedigree 0, pedigree (1,1,1,1,1)
  kg LW of piglet to breed to satisfy the production of 1 kg LW of finished pig.
  Uncertainty: Calculated variable. Uncertainty will be determined from propagation of uncertainty factors of underlying variables. Uncertainty of actual relation between variables not accounted at this time, although this could be included in a future update.
- methane emission factor, sow slurry, open-pit storage: 4.9832 kg/m3; name CH4_EF_storage_sow_slurry; lognormal variance with pedigree 0.0106, pedigree (2,1,1,5,1)
  (same comment as for methane emission factor, pig slurry, open-pit storage)
- animals, live weight, finished pig: 122 kg; name AN_LW_FPig; lognormal variance with pedigree 0.0032, pedigree (2,1,1,5,1)
  (kg/head) ANimals, Live Weight, Finished pig (FPPQ, 2010)
- total particulate matter from sow building: 0.0532 kg/(head.d); name Bldg_Sow_PMtot; lognormal variance with pedigree 0.0114, pedigree (2,1,2,5,2)
  (kg/head.day) Respirable dust (Hamelin et al, 2009) Building emissions.
- feed, per sow, whey: 0 kg; name Feed_Sow_Whey
  (same comment as for feed, per sow, threonine)
- methane emission factor, piglet slurry, open-pit storage: 3.3752 kg/m3; name CH4_EF_storage_piglet_slurry; lognormal variance with pedigree 0.0106, pedigree (2,1,1,5,1)
  (same comment as for methane emission factor, pig slurry, open-pit storage)
- feed, per sow, limestone: 14.3445 kg; name Feed_Sow_Limestone; lognormal variance with pedigree 0.0032, pedigree (2,1,1,5,1)
  kg of ingredient per head
- death rate piglet in nursery: 0.043 dimensionless; name DeathRatePiglet; lognormal variance with pedigree 0.0032, pedigree (2,1,1,5,1)
  (-) Death rate of piglet (FPPQ, 2010)
- total particulate matter from piglet building: 0.0064 kg/(head.d); name Bldg_Piglet_PMtot; lognormal variance with pedigree 0.0114, pedigree (2,1,2,5,2)
  (kg/head.day) Respirable dust (Hamelin et al, 2009) Building emissions.
- hydrogen sulfide emissions from pig building: 0.06012 kg/(head.d); name Bldg_Pig_H2S; lognormal variance with pedigree 0.0114, pedigree (2,1,2,5,2)
  (kg/head.day) (Hamelin et al, 2009) Building emissions
- feed, per sow, choline chloride: 0.8337 kg; name Feed_Sow_Choline_chloride; lognormal variance with pedigree 0.0032, pedigree (2,1,1,5,1)
  kg of ingredient per head
- dinitrogen oxide emissions from pig building: 4e-5 kg/(head.d); name Bldg_Pig_N2O; lognormal variance with pedigree 0.0114, pedigree (2,1,2,5,2)
  (kg/head.day) (Hamelin et al, 2009) Building emissions
- feed, per sow, fish flour: 0 kg; name Feed_Sow_Fish_flour
  (same comment as for feed, per sow, threonine)
- feed, per sow, oat: 425.424 kg; name Feed_Sow_Oat; lognormal variance with pedigree 0.0032, pedigree (2,1,1,5,1)
  kg of ingredient per head
- feed, per sow, roasted soybeans: 74.25 kg; name Feed_Sow_Soybeans_roasted; lognormal variance with pedigree 0.0032, pedigree (2,1,1,5,1)
  kg of ingredient per head
- methane emissions from pig building: 0.00226 kg/(head.d); name Bldg_Pig_CH4; lognormal variance with pedigree 0.0114, pedigree (2,1,2,5,2)
  (kg/head.day) (Hamelin et al, 2009) Building emissions
- feed, pers sow, oat groat: 0 kg; name Feed_Sow_Oat_groat
  (same comment as for feed, per sow, threonine)
- feed, per sow, wheat shorts: 174 kg; name Feed_Sow_Wheat_shorts; lognormal variance with pedigree 0.0032, pedigree (2,1,1,5,1)
  kg of ingredient per head
- feed, per sow, micro premix: 3.573 kg; name Feed_Sow_Micro_premix; lognormal variance with pedigree 0.0032, pedigree (2,1,1,5,1)
  kg of ingredient per head
- ammonia emissions from pig building: 0.00548 kg/(head.d); name Bldg_Pig_NH3; lognormal variance with pedigree 0.0114, pedigree (2,1,2,5,2)
  (kg/head.day) (Hamelin et al, 2009) Building emissions
- feed, per sow, methionine: 0.099 kg; name Feed_Sow_Methionine; lognormal variance with pedigree 0.0032, pedigree (2,1,1,5,1)
  kg of ingredient per head
- feed, per sow, lysine: 0.9018 kg; name Feed_Sow_Lysine; lognormal variance with pedigree 0.0032, pedigree (2,1,1,5,1)
  kg of ingredient per head
- feed, per sow, barley: 0 kg; name Feed_Sow_Barley
  (same comment as for feed, per sow, threonine)
- feed, per sow, blood plasma: 0 kg; name Feed_Sow_Blood_plasma
  (same comment as for feed, per sow, threonine)
- feed, per sow, maize grain: 394.62 kg; name Feed_Sow_Maize_grain; lognormal variance with pedigree 0.0032, pedigree (2,1,1,5,1)
  kg of ingredient per head
- annual piglet rotation: 7.3 unit; name annual_piglet_rotation; lognormal variance with pedigree 0.0032, pedigree (2,1,1,5,1)
  Piglet rotation in a year: raising lasts 50 days a year (OCO, 2010). Used to scale annual inventory data or intensity.
- feed, per sow, canola meal: 0 kg; name Feed_Sow_Canola_meal
  (same comment as for feed, per sow, threonine)
- feed, per sow, phosphate: 3.96 kg; name Feed_Sow_Phosphate; lognormal variance with pedigree 0.0032, pedigree (2,1,1,5,1)
  kg of ingredient per head
- animals, live weight, sow: 225 kg; name AN_LW_Sow; lognormal variance with pedigree 0.0047, pedigree (3,2,1,5,1)
  (kg/head) ANimals, Live Weight, Sow (kg/head). rough estimate (only used to estimate the weight of dead and culled sows)
- feed, per sow, sodium chloride: 5.259 kg; name Feed_Sow_Sodium_chloride; lognormal variance with pedigree 0.0032, pedigree (2,1,1,5,1)
  kg of ingredient per head
- average population of pigs in finishing: 1.02798 dimensionless; name average_population_pigs_finishing; = (piglet_finishing+1)/2; lognormal variance with pedigree 0, pedigree (1,1,1,1,1)
  Average population of pigs in finishing (heads per finished pig)
  Uncertainty: Calculated variable. Uncertainty will be determined from propagation of uncertainty factors of underlying variables. Uncertainty of actual relation between variables not accounted at this time, although this could be included in a future update.

## Reference product
- swine for slaughtering, live weight: 1 kg; name REF_PRODUCT; = 1+(sow_gest_and_lactation*SowCullRate*AN_LW_Sow/AN_LW_FPig); CPC 02140: Swine / pigs; By-product classification allocatable product
  In addition to the production of 1 kg LW of finished pig, there is the coproduction of culled sow also sent to slaughterhouse. This additional amount is worth "sow_gest_and_lactation*SowCullRate*AN_LW_Sow/AN_LW_FPig" kg LW culled sow/kg LW finished pig
  production volume 1.64953e11 kg; name REF_PRODUCT_APV
    The 2009-2011 average annual world production of pig in the world is 1.3598E+09 heads (FAOSTATS 2013). Assuming the same live weight of finished pig as in Québec (122 kg), a production volume of 1.6590E+11 kg is derived. It is unknown if culled animals are included in this statistics and the share of farrow-to-finish production system from this production volume is not available.
  property carbon content, fossil 0; name REF_PRODUCT_C_content_fossil
    fossil carbon content on a dry matter basis. Composition data from De Lange, C.F.M., Morel, P.C.H. and Birkett, S.H. (2003). Modeling chemical and physical body composition of the growing pig. J. Anim. Sci. 81(E. Suppl. 2):E159–E165. First, composition data were refered to 1 kg dry mass. Then, C-contents were calculated considering a C-content/dry mass of 46% in carbohydrates (including fibres), 53% in proteins and 75% in fats. All data from "Evolutionary and Biochemical Aspects", A.D. Kay and T. Vrede (in Global Ecology, 2010, Elsevier B.V., S.E. Jørgensen Ed.).
  property dry mass 0.36 kg; name REF_PRODUCT_DM
  property carbon content, non-fossil 0.6158; name REF_PRODUCT_C_content_non_fossil
    biogene carbon content on a dry matter basis. Composition data from De Lange, C.F.M., Morel, P.C.H. and Birkett, S.H. (2003). Modeling chemical and physical body composition of the growing pig. J. Anim. Sci. 81(E. Suppl. 2):E159–E165. First, composition data were refered to 1 kg dry mass. Then, C-contents were calculated considering a C-content/dry mass of 46% in carbohydrates (including fibres), 53% in proteins and 75% in fats. All data from "Evolutionary and Biochemical Aspects", A.D. Kay and T. Vrede (in Global Ecology, 2010, Elsevier B.V., S.E. Jørgensen Ed.).
  property water content 1.7778; name REF_PRODUCT_water_content
  property wet mass 1 kg; name REF_PRODUCT_WM
  property price 5.48 EUR2005; name REF_PRODUCT_price_EUR2005
    Calculated from literature. The USDA statistical data suggest, that pork meat cost approximatelly 3 USD/kg in 2005 (http://www.ers.usda.gov/data-products/meat-price-spreads.aspx).
  property water in wet mass 0.64 kg; name REF_PRODUCT_WWM
  property carbon content 0.6158
    carbon content on a dry matter basis (reserved; not for manual entry)
  properties: carbon allocation 0.221688 kg

## By-products
- manure, liquid, swine: 0 kg; By-product classification Recyclable; CPC 34654: Excreta of animals useful for manure/fertilizer and fuel preparation; pedigree (1,1,1,1,1)
  Explanation of formula:
  "SL_Vol_Pig/AN_LW_FPig": Slurry generated during finishing by finished pigs (m3/kg LW finished pig).
  "piglet_per_finished_pig": Piglet to breed in nursery (kg LW piglet/kg LW finished pig).
  "SL_Vol_Piglet/AN_LW_Piglet": Slurry generated during breeding by piglets (m3/kg LW piglet).
  "SL_Vol_Sow* sow_per_kg_piglet_produced": Slurry generated in nursery by sows reported to piglets (m3/kg LW piglet).
  Uncertainty: Calculated variable. Uncertainty will be determined from propagation of uncertainty factors of underlying variables. Uncertainty of actual relation between variables not accounted at this time, although this could be included in a future update.
  production volume 0 kg; = Manure_weight/ REF_PRODUCT*REF_PRODUCT_APV
    Calculated from production volume of reference product using the relative outputs.
  property density 1 kg/l; name MANURE_density
    density of liquid manure (slurry) from swine/pig. 1 kg/L is the default value
  property nitrogen content 0.1; name Manure_weight_N_content
    total nitrogen content on a dry matter basis
  property price 0.0042 EUR2005; name Manure_weight_price_EUR2005
    World market value of manure, deflated with barley world market price and consumer price index, based on [http://www.gov.pe.ca/photos/original/af_NM_manconv.pdf].
  property dry mass 0.035 kg; name MANURE_dry_mass
  property potassium content 0.0688; name Manure_weight_K_content
    potassium content (as K) on a dry matter basis
  property phosphorus content 0.0287; name Manure_weight_P_content
    phosphorus content (as P) on a dry matter basis
  property carbon content 0.64
    carbon content on a dry matter basis (reserved; not for manual entry)
  properties: carbon content, non-fossil 0.64, water content 27.571, wet mass 1 kg, water in wet mass 0.965 kg, carbon content, fossil 0, carbon allocation 0.0224 kg

## Inputs from technosphere
- slaughterhouse waste: -0.0538461 kg; name Dead_Animals; = (DeathRatePig/(1-DeathRatePig)*(AN_LW_FPig+AN_LW_Piglet)/2/AN_LW_FPig+piglet_per_finished_pig*((Piglet_nursery-Piglet_Finishing)/Piglet_nursery+( sow_gest_and_lactation*DeathRateSow/Piglet_nursery/AN_LW_Piglet*AN_LW_Sow)))*-1; lognormal variance with pedigree 0.008, pedigree (1,1,4,1,1)
  This flow is for dead animals which are sent to the rendering market.
  Explanation of formula:
  "DeathRatePig/(1-DeathRatePig)*(AN_LW_FPig+AN_LW_Piglet)/2/AN_LW_FPig": dead pigs (kg LW/kg LW finished pig). An average weight between reared piglet (entering the fattening) and fat pig is assumed.
  "piglet_per_finished_pig": Piglet to breed in nursery (kg LW piglet/kg LW finished pig).
  "(Piglet_nursery-PigletToFinishing)/PigletRemainNursery": dead piglets (kg LW/kg LW piglet).
  "sow_gest_and_lactation*DeathRateSow/Piglet_nursery/AN_LW_Piglet*AN_LW_Sow": dead sows (kg LW/kg LW piglet)
  Uncertainty: Calculated variable. Uncertainty will be determined from propagation of uncertainty factors of underlying variables. Uncertainty of actual relation between variables not accounted at this time, although this could be included in a future update.
  production volume 8.88209e9 kg; = Dead_Animals/ REF_PRODUCT*REF_PRODUCT_APV
    Calculated from production volume of reference product using the relative outputs.
  property price 0 EUR2005; name Dead_Animals_price_EUR2005
  properties: heating value, net 22.1 MJ, dry mass 0.36 kg, carbon content, non-fossil 0.6158, wet mass 1 kg, water content 1.7778
  note on carbon content, non-fossil: Properties of the reference product (live swine) are used as a proxy for the animals dead at the pig farm.
- soybean, feed: 0.145084 kg; = (Feed_Pig_Soybeans_roasted/ AN_LW_FPig+ piglet_per_finished_pig*(Feed_Piglet_Soybeans_roasted/ AN_LW_Piglet+ sow_per_kg_piglet_produced*Feed_Sow_Soybeans_roasted))*(0.96/0.86); lognormal variance with pedigree 0.128, pedigree (1,1,4,1,5)
  Soybean, feed (i.e. ground whole soybeans) used as proxy for roasted soybean. Since the primary data for roasted soybeans input (parameter data) is given for roasted soybeans at about 4% moisture while soybean, feed is at 14% moisture, the calculated amount is corrected accordingly.
  Uncertainty: Calculated variable. Uncertainty will be determined from propagation of uncertainty factors of underlying variables. Uncertainty of actual relation between variables not accounted at this time, although this could be included in a future update.
  properties: dry mass 0.89 kg, carbon content, non-fossil 0.52451, water content 0.1236, wet mass 1 kg
- oat grain: 0.269181 kg; = (Feed_Pig_Oat/ AN_LW_FPig+ piglet_per_finished_pig*(Feed_Piglet_Oat/ AN_LW_Piglet+ sow_per_kg_piglet_produced*Feed_Sow_Oat)) +(Feed_Pig_Oat_groat/ AN_LW_FPig+ piglet_per_finished_pig*(Feed_Piglet_Oat_groat/ AN_LW_Piglet+ sow_per_kg_piglet_produced*Feed_Sow_Oat_groat)); lognormal variance with pedigree 0.008, pedigree (1,1,4,1,1)
  Oat and oat groat feed
  Uncertainty: Calculated variable. Uncertainty will be determined from propagation of uncertainty factors of underlying variables. Uncertainty of actual relation between variables not accounted at this time, although this could be included in a future update.
  properties: carbon content, non-fossil 0.4916, wet mass 1 kg, dry mass 0.865 kg, water content 0.156069
  note on carbon content, non-fossil: biogene carbon content on a dry matter basis. Composition data obtained from http://ndb.nal.usda.gov/ndb/search/list (DB number: 20038, Oats). First, composition data were refered to 1 kg dry mass. Then, C-contents were calculated considering a C-content/dry mass of 46% in carbohydrates (including fibres), 53% in proteins and 75% in fats. All data from "Evolutionary and Biochemical Aspects", A.D. Kay and T. Vrede (in Global Ecology, 2010, Elsevier B.V., S.E. Jørgensen Ed.).
- operation, housing system, pig, fully-slatted floor, per pig place: 0.0104591 unit; = (average_population_pigs_finishing + Average_population_piglets_nursering*5/25 + sow_gest_and_lactation*5/4)/ AN_LW_FPig; lognormal variance with pedigree 0.008, pedigree (1,1,4,1,1)
  Since the functional unit of the housing process is 1 fattening pig place during one year, a conversion is made using the following livestock unit (LU) data: 5 fattening pigs are worth 1 LU; 25 piglets are worth 1 LU; 4 sows (including the unweaned piglets) are worth 1 LU (source: http://www.mrchr.qc.ca/documents/amenagementautres/annexes.pdf). Hence, equivalencies are: 1 piglet is worth 5/25 fattening pig place, and 1 sow is worth 5/4 fattening pig place.
  Uncertainty: Calculated variable. Uncertainty will be determined from propagation of uncertainty factors of underlying variables. Uncertainty of actual relation between variables not accounted at this time, although this could be included in a future update.
- soybean meal: 0.347011 kg; = (Feed_Pig_Soymeal/ AN_LW_FPig+ piglet_per_finished_pig*(Feed_Piglet_Soymeal/ AN_LW_Piglet+ sow_per_kg_piglet_produced*Feed_Sow_Soymeal)); source OCO Technologies 2010; lognormal variance with pedigree 0.008, pedigree (1,1,4,1,1)
  soymeal
  Uncertainty: Calculated variable. Uncertainty will be determined from propagation of uncertainty factors of underlying variables. Uncertainty of actual relation between variables not accounted at this time, although this could be included in a future update.
  properties: wet mass 1 kg, dry mass 0.89 kg, carbon content, non-fossil 0.475627, water content 0.123596
- maize grain, feed: 0 kg; pedigree (1,1,1,1,1)
  It is assumed that the amount of maize grains is an amount of ground grains.
  Uncertainty: Calculated variable. Uncertainty will be determined from propagation of uncertainty factors of underlying variables. Uncertainty of actual relation between variables not accounted at this time, although this could be included in a future update.
  properties: wet mass 1 kg, carbon content, non-fossil 0.46957, dry mass 0.86 kg, water content 0.162791
- rape meal: 0.157256 kg; = (Feed_Pig_Canola_meal/ AN_LW_FPig+ piglet_per_finished_pig*(Feed_Piglet_Canola_meal/ AN_LW_Piglet+ sow_per_kg_piglet_produced*Feed_Sow_Canola_meal)); source OCO Technologies 2010; lognormal variance with pedigree 0.008, pedigree (1,1,4,1,1)
  Canola meal
  Uncertainty: Calculated variable. Uncertainty will be determined from propagation of uncertainty factors of underlying variables. Uncertainty of actual relation between variables not accounted at this time, although this could be included in a future update.
  properties: water content 0.111111, carbon content, non-fossil 0.457233, wet mass 1 kg, dry mass 0.9 kg
- chemical, organic: 0.00675074 kg; = (Feed_Pig_Lysine/ AN_LW_FPig+ piglet_per_finished_pig*(Feed_Piglet_Lysine/ AN_LW_Piglet+ sow_per_kg_piglet_produced*Feed_Sow_Lysine)) +(Feed_Pig_Methionine/ AN_LW_FPig+ piglet_per_finished_pig*(Feed_Piglet_Methionine/ AN_LW_Piglet+ sow_per_kg_piglet_produced*Feed_Sow_Methionine)) +(Feed_Pig_Threonine/ AN_LW_FPig+ piglet_per_finished_pig*(Feed_Piglet_Threonine/ AN_LW_Piglet+ sow_per_kg_piglet_produced*Feed_Sow_Threonine)) +(Feed_Pig_Choline_chloride/ AN_LW_FPig+ piglet_per_finished_pig*(Feed_Piglet_Choline_chloride/ AN_LW_Piglet+ sow_per_kg_piglet_produced*Feed_Sow_Choline_chloride)); source OCO Technologies 2010; lognormal variance with pedigree 0.008, pedigree (1,1,4,1,1)
  Lysine, Methionine and Threonine (aminoacids), and choline chloride supplementation in the diet.
  Uncertainty: Calculated variable. Uncertainty will be determined from propagation of uncertainty factors of underlying variables. Uncertainty of actual relation between variables not accounted at this time, although this could be included in a future update.
  properties: dry mass 1 kg, carbon content, fossil 0.628, wet mass 1 kg, heating value, net 19.03 MJ
  note on carbon content, fossil: This dataset is an unweighted average of 20 organic substances (listed in Tab 88.1, ecoinvent v2.2 report 8, part II), being part of the top100 chemicals included in this database. The C-content has also been calculated as an unweighted average of the C content of the substances composing this dataset.
- barley grain, feed: 0.444298 kg; = (Feed_Pig_Barley/ AN_LW_FPig+ piglet_per_finished_pig*(Feed_Piglet_Barley/ AN_LW_Piglet+ sow_per_kg_piglet_produced*Feed_Sow_Barley)); lognormal variance with pedigree 0.008, pedigree (1,1,4,1,1)
  It is assumed that the amount of barley grains is an amount of ground grains.
  Uncertainty: Calculated variable. Uncertainty will be determined from propagation of uncertainty factors of underlying variables. Uncertainty of actual relation between variables not accounted at this time, although this could be included in a future update.
  properties: dry mass 0.86 kg, carbon content, non-fossil 0.46538, water content 0.16279, wet mass 1 kg
- whey: 0.0053258 kg; = (Feed_Pig_Whey/ AN_LW_FPig+ piglet_per_finished_pig*(Feed_Piglet_Whey/ AN_LW_Piglet+ sow_per_kg_piglet_produced*Feed_Sow_Whey)); source OCO Technologies 2010; lognormal variance with pedigree 0.008, pedigree (1,1,4,1,1)
  No information is available about any pre-treatment of the whey, i.e. whether raw whey, whey liquor, or whey fitrate (or a mix of these forms) is used in practice as ingredient of the diet.
  Uncertainty: Calculated variable. Uncertainty will be determined from propagation of uncertainty factors of underlying variables. Uncertainty of actual relation between variables not accounted at this time, although this could be included in a future update.
  property dry mass 0.064 kg; name WHEY_DM
  properties: wet mass 1 kg, water content 14.625, carbon content, non-fossil 0.340757
- wheat grain, feed: 0.107918 kg; = (Feed_Pig_Wheat_shorts/ AN_LW_FPig+ piglet_per_finished_pig*(Feed_Piglet_Wheat_shorts/ AN_LW_Piglet+ sow_per_kg_piglet_produced*Feed_Sow_Wheat_shorts)); lognormal variance with pedigree 0.008, pedigree (1,1,4,1,1)
  Ground wheat grain used as a proxy for wheat shorts.
  Uncertainty: Calculated variable. Uncertainty will be determined from propagation of uncertainty factors of underlying variables. Uncertainty of actual relation between variables not accounted at this time, although this could be included in a future update.
  properties: water content 0.17647, carbon content, non-fossil 0.4646, wet mass 1 kg, dry mass 0.85 kg
- limestone, crushed, washed: 0.0277106 kg; = (Feed_Pig_Limestone/ AN_LW_FPig+ piglet_per_finished_pig*(Feed_Piglet_Limestone/ AN_LW_Piglet+ sow_per_kg_piglet_produced*Feed_Sow_Limestone)); source OCO Technologies 2010; lognormal variance with pedigree 0.008, pedigree (1,1,4,1,1)
  calcium supplementation in diet
  Uncertainty: Calculated variable. Uncertainty will be determined from propagation of uncertainty factors of underlying variables. Uncertainty of actual relation between variables not accounted at this time, although this could be included in a future update.
  properties: carbon content, fossil 0.117257, wet mass 1 kg, water content 0.00200401, dry mass 0.998 kg
  note on carbon content, fossil: Table 3.1, ecoinvent v2.2 report 7, part VII, pg 3. MW CaCO3=100, MW MgCO3=84. C content of limestone is 0.117257 kg/kg DM
- sodium chloride, powder: 0.0099262 kg; = (Feed_Pig_Sodium_chloride/ AN_LW_FPig+ piglet_per_finished_pig*(Feed_Piglet_Sodium_chloride/ AN_LW_Piglet+ sow_per_kg_piglet_produced*Feed_Sow_Sodium_chloride)); source OCO Technologies 2010; lognormal variance with pedigree 0.008, pedigree (1,1,4,1,1)
  Sodium chloride supplementation in diet
  Uncertainty: Calculated variable. Uncertainty will be determined from propagation of uncertainty factors of underlying variables. Uncertainty of actual relation between variables not accounted at this time, although this could be included in a future update.
  properties: wet mass 1 kg, dry mass 1 kg
- liquid manure storage and processing facility: 0.00871983 m3; = (SL_Vol_Pig/AN_LW_FPig+ piglet_per_finished_pig*(SL_Vol_Piglet/AN_LW_Piglet+SL_Vol_Sow* sow_per_kg_piglet_produced)); lognormal variance with pedigree 0.008, pedigree (1,1,4,1,1)
  This exchange is used as a proxy for the storage of slurry in an open-pit. Explanation of formula: see the exchange 'manure, liquid, swine'.
  Uncertainty: Calculated variable. Uncertainty will be determined from propagation of uncertainty factors of underlying variables. Uncertainty of actual relation between variables not accounted at this time, although this could be included in a future update.
- manure, liquid, swine: -8.71983 kg; lognormal variance with pedigree 0.008, pedigree (1,1,4,1,1)
  (same comment as for manure, liquid, swine)
  production volume 1.43836e12 kg
  properties: carbon content, non-fossil 0.64, water content 27.571, wet mass 1 kg
  note on density: density of liquid manure (slurry) from swine/pig. 1 kg/L is the default value
- maize grain, feed: 0.0173565, 1.46541 kg (2 entries); lognormal variance with pedigree 0.008, pedigree (1,1,4,1,1)
  (same comment as for maize grain, feed)

## Emissions to nature
All rows: lognormal variance with pedigree 0.008, pedigree (1,1,4,1,1)
- Hydrogen sulfide [air, non-urban air or from high stacks]: 0.0562857 kg; = (Bldg_Pig_H2S*(365/ Annual_pig_rotation)* average_population_pigs_finishing/AN_LW_FPig +piglet_per_finished_pig*(Bldg_Piglet_H2S*(365/ Annual_piglet_rotation)* Average_population_piglets_nursering/AN_LW_Piglet +Bldg_Sow_H2S*(365/ Annual_sow_rotation)* sow_per_kg_piglet_produced))
  Housing emission. Explanation of formula: see Ammonia emission.
  Uncertainty: Calculated variable. Uncertainty will be determined from propagation of uncertainty factors of underlying variables. Uncertainty of actual relation between variables not accounted at this time, although this could be included in a future update.
- Dinitrogen monoxide [air, non-urban air or from high stacks]: 0.000247625 kg; = (Bldg_Pig_N2O*(365/ Annual_pig_rotation)* average_population_pigs_finishing/AN_LW_FPig +piglet_per_finished_pig*(Bldg_Piglet_N2O*(365/ Annual_piglet_rotation)* Average_population_piglets_nursering/AN_LW_Piglet +Bldg_Sow_N2O*(365/ Annual_sow_rotation)* sow_per_kg_piglet_produced)) +(44/28)*0.01*Manure_weight* Manure_weight_N_content* MANURE_dry_mass/(1/N_loss_manure_storage-1)
  Housing emission (indirect) from slurry decomposition and indirect N2O from NH3 volatilization from liquid manure storage (IPCC 2006 emission factor of 0.01 kg N2O-N/kg NH3-N is used). There is no direct N2O emission considered from manure management since open-pit storage without crust formation does not lead to direct N2O (IPCC, 2006; OCO Technologies, 2010). Explanation of formula: see Ammonia emission.
  Uncertainty: Calculated variable. Uncertainty will be determined from propagation of uncertainty factors of underlying variables. Uncertainty of actual relation between variables not accounted at this time, although this could be included in a future update.
- Particulates, < 2.5 um [air, non-urban air or from high stacks]: 0.00184436 kg; = (Bldg_Pig_PM2_5*(365/ Annual_pig_rotation)* average_population_pigs_finishing/AN_LW_FPig +piglet_per_finished_pig*(Bldg_Piglet_PM2_5*(365/ Annual_piglet_rotation)* Average_population_piglets_nursering/AN_LW_Piglet +Bldg_Sow_PM2_5*(365/ Annual_sow_rotation)* sow_per_kg_piglet_produced))
  Dust emission from housing (litter, soil,etc.). Explanation of formula: see Ammonia emission.
  Uncertainty: Calculated variable. Uncertainty will be determined from propagation of uncertainty factors of underlying variables. Uncertainty of actual relation between variables not accounted at this time, although this could be included in a future update.
- Methane, non-fossil [air, non-urban air or from high stacks]: 0.0531256 kg; = (Bldg_Pig_CH4*(365/ Annual_pig_rotation)* average_population_pigs_finishing/AN_LW_FPig +piglet_per_finished_pig*(Bldg_Piglet_CH4*(365/ Annual_piglet_rotation)* Average_population_piglets_nursering/AN_LW_Piglet +Bldg_Sow_CH4*(365/ Annual_sow_rotation)* sow_per_kg_piglet_produced))+ (SL_Vol_Pig/AN_LW_FPig* CH4_EF_storage_pig_slurry +piglet_per_finished_pig*(SL_Vol_Piglet/AN_LW_Piglet* CH4_EF_storage_piglet_slurry +SL_Vol_Sow* sow_per_kg_piglet_produced* CH4_EF_storage_sow_slurry))
  Housing emission and manure storage emission. Explanation of formula: see Ammonia emission.
  Uncertainty: Calculated variable. Uncertainty will be determined from propagation of uncertainty factors of underlying variables. Uncertainty of actual relation between variables not accounted at this time, although this could be included in a future update.
- Particulates, > 10 um [air, non-urban air or from high stacks]: 0.0177263 kg; = ((Bldg_Pig_PMtot-Bldg_Pig_PM10)*(365/ Annual_pig_rotation) *average_population_pigs_finishing/AN_LW_FPig +piglet_per_finished_pig*((Bldg_Piglet_PMtot-Bldg_Piglet_PM10)*(365/ Annual_piglet_rotation)* Average_population_piglets_nursering/AN_LW_Piglet +(Bldg_Sow_PMtot-Bldg_Sow_PM10)*(365/ Annual_sow_rotation)* sow_per_kg_piglet_produced))
  (same comment as for Particulates, < 2.5 um)
- Carbon dioxide, non-fossil [air, non-urban air or from high stacks]: 0.00276794 kg; = (Bldg_Pig_CO2*(365/ Annual_pig_rotation)* average_population_pigs_finishing/AN_LW_FPig +piglet_per_finished_pig*(Bldg_Piglet_CO2*(365/ Annual_piglet_rotation)* Average_population_piglets_nursering/AN_LW_Piglet +Bldg_Sow_CO2*(365/ Annual_sow_rotation)* sow_per_kg_piglet_produced))
  Housing emission of biogenic CO2 from animal respiration (for 96%) and dejections (for 4%). Explanation of formula: see Ammonia emission.
  Uncertainty: Calculated variable. Uncertainty will be determined from propagation of uncertainty factors of underlying variables. Uncertainty of actual relation between variables not accounted at this time, although this could be included in a future update.
- Ammonia [air, non-urban air or from high stacks]: 0.0243829 kg; = (Bldg_Pig_NH3*(365/ Annual_pig_rotation)* average_population_pigs_finishing/AN_LW_FPig +piglet_per_finished_pig*(Bldg_Piglet_NH3*(365/ Annual_piglet_rotation)* Average_population_piglets_nursering/AN_LW_Piglet +Bldg_Sow_NH3*(365/ Annual_sow_rotation)* sow_per_kg_piglet_produced)) + (17/14)*Manure_weight* Manure_weight_N_content* MANURE_dry_mass/(1/N_loss_manure_storage-1)
  Housing emission and manure storage emission. Explanation of formula:
  Emission rate per animal category, e.g. "Bldg_Pig_NH3", is in kg NH3/head.day.
  The emission rate is multiplied by the number of days a single animal is on the farm during a year (e.g. the factor "365/ Annual_pig_rotation").
  Hence:
  "Bldg_Pig_NH3*(365/ Annual_pig_rotation)* average_population_pigs_finishing/AN_LW_FPig": NH3 emitted in housing by pigs in finishing (kg NH3/kg LW finished pig).
  "piglet_per_finished_pig": this gives the amount of piglet to breed in nursery (kg LW piglet/kg LW finished pig).
  "(Bldg_Piglet_NH3*(365/ Annual_piglet_rotation)* Average_population_piglets_nursering/AN_LW_Piglet": NH3 emitted in housing by piglets in nursery (kg NH3/kg LW piglet).
  "Bldg_Sow_NH3*(365/ Annual_sow_rotation)* sow_per_kg_piglet_produced": NH3 emitted in housing by sows (kg NH3/kg LW piglet).
  For manure storage emission: emitted NH3 is calculated from the final N content of manure (net after storage) taken from exchange properties and using an emission factor which is to be applied to the N content before storage.
  Uncertainty: Calculated variable. Uncertainty will be determined from propagation of uncertainty factors of underlying variables. Uncertainty of actual relation between variables not accounted at this time, although this could be included in a future update.
- Particulates, > 2.5 um, and < 10um [air, non-urban air or from high stacks]: 0.00190053 kg; = ((Bldg_Pig_PM10-Bldg_Pig_PM2_5)*(365/ Annual_pig_rotation)* average_population_pigs_finishing/AN_LW_FPig +piglet_per_finished_pig*((Bldg_Piglet_PM10-Bldg_Piglet_PM2_5)*(365/ Annual_piglet_rotation)* Average_population_piglets_nursering/AN_LW_Piglet +(Bldg_Sow_PM10-Bldg_Sow_PM2_5)*(365/ Annual_sow_rotation)* sow_per_kg_piglet_produced))
  (same comment as for Particulates, < 2.5 um)

## Sampling procedure
This dataset has been extrapolated from an original dataset covering the geography of Quebec (Canada). Uncertainty has been adapted accordingly.
A majority of activity and emissions data was sourced from three studies about farrow-to-finish pig production in Québec, which is representative of about 75% of total Québec pig production during this period. Other sources include literature, statistics, and discussions with the Quebec federation of pig producers [FPPQ] and various experts.
Refences of the three studies are:
"OCO Technologies (2010). Évaluation du niveau de perfectionnement à apporter à l’outil de quantification des émissions de GES de la FPPQ pour quantifier l’empreinte carbone de la production porcine au Québec. 65p. Report for the FPPQ".
"Quantis (2012). Principales données et hypothèses pour l'évaluation du « bilan eau » du secteur porcin au Québes. Report for the FPPQ".
"Hamelin, L., Godbout, S. and Lemay, S.P. (2009). Baseline scenario for gas, odour, dust and particulate matter emissions from swine buildings in Québec - Part I : emissions inventory. CSBE/SCGAB 2009 Annual Conference. Paper No. 09-512. 23 pages.

## Extrapolations
This dataset has been extrapolated from an original dataset covering the geography of Quebec (Canada). Uncertainty has been adapted accordingly. The modelling of the Quebec dataset is described as follow:
The modelling approach considers the lifetime of a sow. Two sub-production stages are considered: the nursery stage where sows are farrowing and then piglets are grown until they enter the finishing stage where they are intensively fed and become finished pigs. Dataset parameters are: the number of litters during sow's lifetime; piglets per litter; sow culling rate; death rate; slurry production rate; air emissions' rates within buildings; feed ingredients for the three animal categories (sow, piglet and pig) present on the pig farm (excluding any boar). Feed composition data specific for sow in gestation and sow in lactation have been aggregated as feed for sow, as well as feed composition data for piglets and pigs which were available for two periods of weight gain for both animal categories (source: FPPQ, 2010). Parameters and mathematical relations for most of the flows translate first the amount of the flow per kg of piglet leaving the nursery stage and then the amount per kg of finished pigs, before the final conversion with respect to the reference product. This approach offers some flexibility to the user who would like to dissagregate the production of piglet to that of finished pig, and to model different production systems. However, it is worth noting that neither air emissions rates parameters nor manure excretions rates parameters and manure composition is calcuted within the dataset from the diet composition parameters. No information was available for any other solid or liquid waste than provided.
It is worth noting that drinking and service water inputs, as well as water evaporation and wastewater output (apart of manure) are considered outside this dataset, through the "operation, housing system, pig, fully-slatted floor, per pig place" dataset. Hence, water balance is ensured throughout the two datasets.
Minor ingredients in terms of mass of the animal diets could not be modelled due to lack of exchanges from technosphere in existing ecoinvent database and are omitted from the dataset. They are: blood plasma (0.4% w/w of piglet diet), fish flour (0.8% w/w of piglet diet), dicalcium phosphate (0.3% w/w of sow diet, 0.6% of piglet diet, and 0.4% of pig diet) and commercial Micro premix (0.3% w/w of sow diet, 0.4% of piglet diet, and 0.3% of pig diet). Micro premix is a commercial mix of micro-nutrients such as minerals, and possibly vitamins, phytase, etc.
