# gold-silver mine operation and beneficiation

Dataset: EcoSpold 2, unit process
Geography: CA-QC
Time period: 2012-01-01 to 2021-12-31
Technology level: current
Classification: ISIC rev.4 ecoinvent: 0729:Mining of other non-ferrous metal ores
Tags: single enterprise data
Scenario: Business-as-Usual
System model: Allocation, cut-off by classification
Share of production covered: 100 %
Generated by: Catherine Reid
Database: ecoinvent
isCopyrightProtected: true
accessRestrictedTo: 1

## Included activities start
From metal containing ore extraction from the ground.

## Included activities end
This activity ends with the benefication of the concentrates and a first refining of the gold-silver ingots.

The dataset includes underground mining, benefication, first refining of the ingots, waste rock piles, tailings ponds and wastewater treatment.

This dataset doesn"t include :
- Waste sent to recycling : Paper, cardboard, plastic, glass (3.129E0 kg/kg), batteries (1.865E-1 kg/kg), textiles (5.028E-2 kg/kg)
- Waste sent back to provider for reuse : ink cartridges (1.658E-3 kg/kg)
- Electro-winning : anode and cathode production and infrastructures.

Also, emissions to air and water are limited to what has been measured on site.

## Geography
Inputs and outputs relate to Quebec production.

## Technology
The ore is mined in an underground mine and transported by trucks to the mill for further processing.
The ore is then fed into a series of grinding mills where steel balls grind the ore. Then follows the steps of flotation of copper and zinc, concentrate handling, cyanide destruction and backfilling of the tailings, refining of gold by electro-winning and melting in furnace to produce the gold and silver ingots. 20% of the tailings produce are sent underground to be used as backfill; sulfidic tailing is managed on site in tailings ponds.

## Time period
The dataset represents the activity in 2012

## Parameters
- fraction_TW_to_air: 0.15 dimensionless; = fraction_PW_to_air
  Calculated value. See comment in the other parametres present in this dataset. Tap water is considered to be always used as process water, thus process water fractions to air are applied to all tap water input flows to calculate the amount of water consumed in the processes.
- fraction_PW_to_air: 0.15 dimensionless
  Literature value. In case when no industry/process specific data are available, default evaporation fraction value is used. This value is 15% and is based on literature (Statistics Canada, 2007 & Shaffer, K.H., 2008, Consumptive water use in the Great Lakes Basin, USGS & Shiklomanov, 2003, World Water Resources at the Beginning of the 21st Century) and has been approved by an expert.

## Reference product
- gold-silver, ingot: 0 kg; name PV_ref; CPC 41320: Gold (including gold plated with platinum), unwrought or in semi-manufactured forms, or in powder form; By-product classification allocatable product
  production volume 14478 kg; name PV_Quebec
    Measured Value. Source: questionnaire. Primary data for 2012 gold-silver-zinc-lead-copper mining and benefication in Quebec.
  property price 2337.81 EUR2005; name PV_ref_price_EUR2005
    Assuming a gold content of 0.0853 kg and a silver content of 0.5992 kg (personal communication with data providers), price calculated as 5-year market average (2015-2019; USD/kg; USGS [2020]) of Au and Ag amount and converted to EUR2005 (USD2019/EUR2005 exchange rate: 0.62; Official Data Foundation [2020] and Macrotrends [2020]).
    References:
    Official Data Foundation (2020). Inflation Calculator [Online]. Available from: https://www.officialdata.org/us/inflation/2005?endYear=2019&amount=1 [Accessed 28/07/2020]
    USGS (2020). Mineral Commodity Summaries 2020 [Online]. Available from: https://pubs.usgs.gov/periodicals/mcs2020/mcs2020.pdf [Accessed 28/07/2020]
    Macrotrends (2020). Euro Dollar Exchange Rate (EUR USD) - Historical Chart [Online]. Available from: https://www.macrotrends.net/2548/euro-dollar-exchange-rate-historical-chart [Accessed 28/07/2020]
  property water in wet mass 0 kg; name PV_ref_WWM
  property carbon content, non-fossil 0; name PV_ref_C_content_non_fossil
    biogene carbon content on a dry matter basis
  property water content 0; name PV_ref_water_content
  property carbon content, fossil 0; name PV_ref_C_content_fossil
    fossil carbon content on a dry matter basis
  property carbon content 0
    carbon content on a dry matter basis (reserved; not for manual entry)
  property true value 2337.81; name PV_ref_true_value
    allocation property applied in "true value" allocation // value calculated from revenue
  properties: copper content 0.2524, lead content 0.03155, dry mass 1 kg, gold content 0.0853, zinc content 0.03155, wet mass 1 kg, silver content 0.5992, carbon allocation 0 kg
- lead concentrate: 1 kg; name leadConcentrate; CPC 14290: Other non-ferrous metal ores and concentrates (other than uranium or thorium ores and concentrates); By-product classification allocatable product; pedigree (1,1,1,1,1)
  Measured Value.
  production volume 2.09641e6 kg; = PV_Quebec * (leadConcentrate / PV_ref)
    Calculated from production volume of reference product using the relative outputs.
  property price 0.376 EUR2005; name leadConcentrate_price_EUR2005
    Temporary price data. Calculated as 90% of purchasers price based on: Lead content in concentrate 55%. Concentrate price per kg Pb 86.5% of refined Pb price (13.5% treatment charges according to CHR Metals Limited 2005: Dynamic cost curves. http://www.minecost.com/dynamic.pdf). 2004 lead price from USGS (2007) Mineral commodity summaries 2007. <http://minerals.usgs.gov/minerals/pubs/mcs/2007/mcs2007.pdf> [Accessed 25 May 2010]
  property concentration, lead 0 kg/kg
    Calculated based on information from the zinc-lead mine operation dataset.
  property carbon content 0
    carbon content on a dry matter basis (reserved; not for manual entry)
  property true value 54.4448; name leadConcentrate_true_value
    allocation property applied in "true value" allocation // value calculated from revenue
  properties: carbon content, non-fossil 0, lead content 0.5347, dry mass 1 kg, gold content 0.0002174, copper content 0.04562, carbon content, fossil 0, wet mass 1 kg, silver content 0.003829, water in wet mass 0 kg, water content 0, carbon allocation 0 kg

## By-products
- iron scrap, sorted, pressed: 0 kg; CPC 39310: Slag, dross, scalings and other waste from the manufacture of iron or steel; By-product classification Recyclable; pedigree (1,1,1,1,1)
  Measured Value. Reported as ferrous metal sent to recovery.
  production volume 0 kg; = PV_Quebec * (ironScrap / PV_ref)
    Calculated from production volume of reference product using the relative outputs.
  property price 0.175 EUR2005; name ironScrap_price_EUR2005
    Temporary price data. Calculated as 90% of purchasers price based on: 2005 import and export prices (total trades (USD) divided by total weight (kg) in biggest economies of the world: EU27, USA, Brasil, China, India, Japan and Russia) from UN Commodity Trade Statistics Database (http://data.un.org/Explorer.aspxDatabase [Accessed 2011.06.20]). Commodity: Waste or scrap, of cast iron
  property carbon content 0
    carbon content on a dry matter basis (reserved; not for manual entry)
  properties: water in wet mass 0 kg, carbon content, non-fossil 0, carbon content, fossil 0, water content 0, wet mass 1 kg, dry mass 1 kg, carbon allocation 0 kg
- zinc concentrate: 0 kg; name zincConcentrate; By-product classification allocatable product; CPC 14290: Other non-ferrous metal ores and concentrates (other than uranium or thorium ores and concentrates); pedigree (1,1,1,1,1)
  Measured Value.
  production volume 8.09899e7 kg; = PV_Quebec * (zincConcentrate / PV_ref)
    Calculated from production volume of reference product using the relative outputs.
  property price 0.38 EUR2005; name zincConcentrate_price_EUR2005
    Temporary price data. Calculated as 90% of purchasers price based on: Zinc content in concentrate 53%. Concentrate price per kg Zn 86.5% of refined Zn price (13.5% treatment charges according to CHR Metals Limited 2005: Dynamic cost curves. http://www.minecost.com/dynamic.pdf). 2004 zinc price from USGS (2007) Mineral commodity summaries 2007. <http://minerals.usgs.gov/minerals/pubs/mcs/2007/mcs2007.pdf> [Accessed 25 May 2010]
  property carbon content 0
    carbon content on a dry matter basis (reserved; not for manual entry)
  property true value 2125.72; name zincConcentrate_true_value
    allocation property applied in "true value" allocation // value calculated from revenue
  properties: carbon content, non-fossil 0, wet mass 1 kg, carbon content, fossil 0, dry mass 1 kg, gold content 3.19e-6, water in wet mass 0 kg, water content 0, zinc content 0.5613, silver content 0.0001742, carbon allocation 0 kg
- copper concentrate, sulfide ore: 0 kg; name copperConcentrate; By-product classification allocatable product; CPC 14290: Other non-ferrous metal ores and concentrates (other than uranium or thorium ores and concentrates); pedigree (1,1,1,1,1)
  Measured Value.
  production volume 3.79179e7 kg; = PV_Quebec * (copperConcentrate / PV_ref)
    Calculated from production volume of reference product using the relative outputs.
  property price 0.8402 EUR2005; name copperConcentrate_price_EUR2005
    Price calculated as:
    Price = (Cu content * Cu price) + (Au content * Au price) + (Ag content * Ag price) + (Te content * Te price) + (Se content * Se price) Treatment costs [TC] Refining costs [RC] Delivery costs Penalties.
    Equation source: Devlin (2015)
    Price data were taken from USGS (2020) and represent 5-year market averages (2015-2019). TC and RC data were taken from Díaz-Borrego et al. (2019) and represent 3-year market averages (2015-2017). Metal content values were taken from the literature (see Turner & Hischier 2019). Penalties and Delivery costs were assumed to be zero. Prices converted to EUR2005 (USD2019/EUR2005 exchange rate: 0.62; Official Data Foundation [2020] and Macrotrends [2020]).
    References:
    Devlin, D. (2015). Mineral product pricing study [Online]. Available from: https://www.imf.org/external/spanish/np/seminars/2015/andean/pdf/sesion5-devlin-en.pdf [Accessed 28/07/2020]
    Díaz-Borrego et al. (2019; https://doi.org/10.1155/2019/8523748)
    Turner, D. & Hischier, R. (2019). Life cycle inventories of copper production (pyrometallurgy) and anode slime processing. Empa: St Gallen, Switzerland.
    Official Data Foundation (2020). Inflation Calculator [Online]. Available from: https://www.officialdata.org/us/inflation/2005?endYear=2019&amount=1 [Accessed 28/07/2020]
    USGS (2020). Mineral Commodity Summaries 2020 [Online]. Available from: https://pubs.usgs.gov/periodicals/mcs2020/mcs2020.pdf [Accessed 28/07/2020]
    Macrotrends (2020). Euro Dollar Exchange Rate (EUR USD) - Historical Chart [Online]. Available from: https://www.macrotrends.net/2548/euro-dollar-exchange-rate-historical-chart [Accessed 28/07/2020]
  property carbon content 0
    carbon content on a dry matter basis (reserved; not for manual entry)
  property true value 2200.48; name copperConcentrate_true_value
    allocation property applied in "true value" allocation // value calculated from revenue
  properties: copper content 0.1188, lead content 0.07146, gold content 7.969e-5, zinc content 0.0415, water in wet mass 0 kg, carbon content, non-fossil 0, water content 0, dry mass 1 kg, carbon content, fossil 0, silver content 0.00108, wet mass 1 kg, carbon allocation 0 kg
- electronics scrap: 0 kg; By-product classification Recyclable; CPC 39: Wastes or scraps; pedigree (1,1,1,1,1)
  Measured Value. Reported as computer equipement sent to recovery.
  production volume 0 kg; = PV_Quebec * (electronicsScrap / PV_ref)
    Calculated from production volume of reference product using the relative outputs.
  property price 16.1 EUR2005; name electronicsScrap_price_EUR2005
    Temporary price data. Calculated as 90% of purchasers price based on: 2005 import prices (total trades (USD) divided by total weight (kg) in biggest economies of the world: EU27, USA, Brasil, China, India, Japan and Russia) from UN Commodity Trade Statistics Database (http://data.un.org/Explorer.aspxDatabase [Accessed 2011.06.20]). Commodity: Waste/scrap, precious metals except pure gold/platinum
  property carbon content, fossil 0.317311
    Carbon content assumed equal with the intermediate exchange of "electronic component, passive, unspecified"
  property carbon content, non-fossil 0.0045566
    (same comment as for electronics scrap)
  property carbon content 0.321868
    carbon content on a dry matter basis (reserved; not for manual entry)
  properties: wet mass 1 kg, water content 0, dry mass 1 kg, water in wet mass 0 kg, carbon allocation 0.321868 kg

## Inputs from technosphere
- sodium silicate, spray powder, 80%: 0.00510179 kg; lognormal variance with pedigree 0.0086, pedigree (1,1,4,1,1)
  Measured Value used for wastewater treatment.
  properties: dry mass 1 kg, wet mass 1 kg
- sulfur dioxide, liquid: 0.00320121 kg; lognormal variance with pedigree 0.0086, pedigree (1,1,4,1,1)
  Measured Value.
  properties: dry mass 1 kg, wet mass 1 kg
- borax, anhydrous, powder: 0.000605544 kg; lognormal variance with pedigree 0.0086, pedigree (1,1,4,1,1)
  Measured Value. Used as Fluxing agent.
  properties: wet mass 1 kg, dry mass 1 kg
- steel, unalloyed: 0.011652 kg; lognormal variance with pedigree 0.0092, pedigree (2,1,4,1,1)
  Calculated Value. Different types of steel balls are used. The only available composition contains 15% chromium. We hence assume a composition of 15% chromium and 85% steel for all balls.
  properties: wet mass 1 kg, dry mass 1 kg, carbon content, fossil 0.0025
- copper sulfate: 0.00106334 kg; lognormal variance with pedigree 0.0086, pedigree (1,1,4,1,1)
  Measured Value.
  properties: dry mass 1 kg, wet mass 1 kg
- oxygen, liquid: 0.00796385 kg; lognormal variance with pedigree 0.0086, pedigree (1,1,4,1,1)
  Measured Value.
  properties: dry mass 1 kg, wet mass 1 kg
- synthetic rubber: 4.25224e-6 kg; lognormal variance with pedigree 0.0086, pedigree (1,1,4,1,1)
  Measured Value. Reported as rubber protective coating for pumps (amount for grinders not known).
  properties: carbon content, fossil 0.871949, wet mass 1 kg, heating value, net 26.42 MJ, dry mass 1 kg
  note on carbon content, fossil: EPDM (Ethylene-propene-diene terpolymer) rubber is a terpolymer of ethylene, propene, and a diene with the residual unsaturated portion of the diene in the side chain (ecoinvent v2.2 report 7-part XX & Ullmann). Chemical formula (deduced from Evidences of Solvent-Induced Miscibility in Polychloroprene-co-Ethylene-Propene Diene Terpolymer Blends, Dubey et al., Journal of Applied Polymer Science, 2009, 111:1884-1891): C20H35
- transport, passenger car, large size, petrol, EURO 3: 0.00287829 km; lognormal variance with pedigree 0.292, pedigree (3,5,5,5,5)
  Calculated value. Reported as liters of petrol used in pickup trucks (5.571E+0 liters/kg). Conversion using : 0.081237 kg/km (taken directly from ecoinvent v3.0 dataset "transport, passenger car, large size, petrol, EURO 3, GLO") and 0.75 kg/l (taken from Table 5.1 of the data quality guideline).
- chemical, inorganic: 0.000424776 kg; lognormal variance with pedigree 0.0086, pedigree (1,1,4,1,1)
  Measured Value. Stands for Collector (3418-A) - aérophine (91%); Collector (KAX-51) - xantate (3%); lead nitrate (6%, for Merill-Crowe process).
  properties: carbon content, fossil 0.003, dry mass 1 kg, wet mass 1 kg
  note on carbon content, fossil: This dataset is an unweighted average of 20 inorganic substances (listed in Tab 88.1, ecoinvent v2.2 report 8, part II), being part of the top100 chemicals included in this database. The C-content has also been calculated as an unweighted average of the C content of the substances composing this dataset.
- chromium: 0.00205616 kg; lognormal variance with pedigree 0.0092, pedigree (2,1,4,1,1)
  (same comment as for steel, unalloyed)
  properties: wet mass 1 kg, dry mass 1 kg
- lubricating oil: 8.42769e-6 kg; = input_lubricatingOil*density_lubricatingOil; lognormal variance with pedigree 0.008, pedigree (1,1,4,1,1)
  Calculated value. Reported as "grease and oils". See parameters exchanges properties for details.
  Uncertainty: C
  property density 0.89 kg/l; name density_lubricatingOil
  property input 0.1692 l; name input_lubricatingOil
  properties: wet mass 1 kg, carbon content, fossil 0.75, heating value, net 40.2 MJ, dry mass 1 kg
  note on density: Literature Value taken from MSDS obtained from data provider.
  note on carbon content, fossil: Lubricating oil is produced from diesel. C-content/dry mass of fats and oils considered 75%, from: ecoinvent v2.2 report, n 15a, pg 40
  note on heating value, net: Literature value, Source: IPCC 2006, 2006 IPCC Guidelines for National Greenhouse Gas Inventories, Prepared by the National Greenhouse Gas Inventories Programme, Eggleston H.S., Buendia L., Miwa K., Ngara T. and Tanabe K. (eds). Published: IGES, Japan
- carboxymethyl cellulose, powder: 0.00186196 kg; lognormal variance with pedigree 0.0086, pedigree (1,1,4,1,1)
  Measured Value. Used for the Merill-Crowe process (gold recovery).
  properties: wet mass 1 kg, heating value, net 20.19 MJ, carbon content, fossil 0.0979592, carbon content, non-fossil 0.293878, dry mass 1 kg
- quicklime, milled, loose: 0.0170862 kg; lognormal variance with pedigree 0.0086, pedigree (1,1,4,1,1)
  Measured Value. Reported as quicklime, loose. Assumption : milled.
  Sum of three uses : 1) 56% of total for the Merill-Crowe process (gold recovery), 2) 4% of total for backfilling and 3) 40% of total for wastewater treatment.
  properties: water content 0.010101, wet mass 1 kg, dry mass 0.99 kg
- sodium nitrate: 0.000207463 kg; lognormal variance with pedigree 0.0092, pedigree (2,1,4,1,1)
  Calculated Value. Used as oxydising agent. The amount is given for all 4 agents together (silica sand, manganese dioxide, soda ash, sodium nitrate - we assume 25% of each).
  properties: wet mass 1 kg, dry mass 1 kg
- aluminium sulfate, powder: 0.000593791 kg; lognormal variance with pedigree 0.0086, pedigree (1,1,4,1,1)
  Measured Value. Used for wastewater treatment.
  properties: dry mass 1 kg, wet mass 1 kg
- sodium cyanide: 0.00377094 kg; lognormal variance with pedigree 0.0086, pedigree (1,1,4,1,1)
  Measured Value. Sum of sodium cyanide (96%, of which 97% is for cyanidation), used in a 30% solution and cyanure (4%, proxy, used for the Merill-Crowe process).
  Proxy: "sodium cyanide" is used as a proxy for Cyanide.
  properties: carbon content, fossil 0.244898, wet mass 1 kg, heating value, net 7.43 MJ, dry mass 1 kg
- soda ash, dense: 0.00524562 kg; lognormal variance with pedigree 0.0086, pedigree (1,1,4,1,1)
  Calculated Value for the first use and Measured Value for the second use. Sum of two uses : 1) 4% of total for oxydising agent - the amount is given for all 4 agents together (silica sand, manganese dioxide, soda ash, sodium nitrate - we assume 25% of each), 2) 96% of total for wastewater treatment.
  properties: heating value, net 3.43 MJ, wet mass 1 kg, dry mass 1 kg, carbon content, fossil 0.113208
- diesel, low-sulfur: 0.000228618 kg; lognormal variance with pedigree 0.0092, pedigree (2,1,4,1,1)
  Calculated Value. It is assume that the given amount represented the complecte explosive, i.e. 94% ammonium nitrate and 6% petrol.
  Assumption : diesel low sulfur.
  properties: dry mass 1 kg, carbon content, fossil 0.865, heating value, net 42.8 MJ, wet mass 1 kg
- waste mineral oil: -0.000831313 kg; name wasteMineralOil; = (wasteMineralOil_output*density_lubricatingOil)*-1; lognormal variance with pedigree 0.008, pedigree (1,1,4,1,1)
  Calculated Value. See parameters exchanges properties for details.
  Uncertainty: C
  production volume 215058 kg; = PV_Quebec * (wasteMineralOil / PV_ref)
    Calculated from production volume of reference product using the relative outputs.
  property input 16.69 l; name wasteMineralOil_output
  property price 0 EUR2005; name wasteMineralOil_price_EUR2005
  properties: dry mass 0.9 kg, water content 0.111111, carbon content, fossil 0.864444, wet mass 1 kg, heating value, net 34.7 MJ
  note on carbon content, fossil: Tab A.6, ecoinvent v2.2 report 13_I. C content has been calculated after data in the tables, and then referred to 1 kg DM
  note on heating value, net: Value taken from the general comment of the treatment dataset.
- carbon dioxide, liquid: 0.000819331 kg; lognormal variance with pedigree 0.0086, pedigree (1,1,4,1,1)
  Measured Value. Used for wastewater treatment. The given amount represent the active agent only, used in a 60-100% solution.
  properties: carbon content, fossil 0.272727, heating value, net 8.27 MJ, wet mass 1 kg, dry mass 1 kg
- mine infrastructure, underground, non-ferrous metal: 7.7288e-11 unit; lognormal variance with pedigree 0.31, pedigree (3,1,4,1,1)
  Extrapolation based on mine life time of the underground mine dataset which is 50 years. This extrapolation is validated based on the area of buildings. The dataset for the "lead-copper-zinc-silver-gold" mine infrastructure is based on an open-pit mine, hence not representative for this underground mine
- municipal solid waste: -0.00141928 kg; name municipalSolidWaste; lognormal variance with pedigree 0.0086, pedigree (1,1,4,1,1)
  Measured Value. Reported as domestic waste sent to landfill.
  production volume 367162 kg; = PV_Quebec * (municipalSolidWaste / PV_ref)
    Calculated from the production volume of copper in proportion to the respective output amounts.
  properties: water content 0.297017, carbon content, non-fossil 0.261655, wet mass 1 kg, dry mass 0.771 kg, heating value, net 11.74 MJ, carbon content, fossil 0.171549
  note on carbon content, non-fossil: MSW composition in tab 4.1, ecoinvent v2.2 report 13_I. C content referred to 1 kg DM
- polyacrylamide: 6.33527e-5 kg; lognormal variance with pedigree 0.0086, pedigree (1,1,4,1,1)
  Measured Value reported as Floculant (Flomin 905MC). Sum of three uses : 1) 9% of total for concentrate handling, 2) 69% of total for backfilling and 3) 22% of total for wastewater treatment.
  properties: carbon content, fossil 0.51, heating value, net 23.88 MJ, dry mass 1 kg, wet mass 1 kg
- cement, Portland: 0.121109 kg; lognormal variance with pedigree 0.0086, pedigree (1,1,4,1,1)
  Measured Value. Extrapolation for ciment type10 (60%) and ciment type 50 (40%).
  properties: wet mass 1 kg, dry mass 1 kg
- manganese dioxide: 0.000207463 kg; lognormal variance with pedigree 0.0092, pedigree (2,1,4,1,1)
  (same comment as for sodium nitrate)
  property molecular weight 0 g/mol; name manganese_dioxide_output_MW
  properties: wet mass 1 kg, dry mass 1 kg
- ammonium nitrate: 0.00358144 kg; = (input_ammoniumNitrate*N_content_ammoniumNitrate)*2.85731828339295; lognormal variance with pedigree 0.008, pedigree (1,1,4,1,1)
  The exchange has been updated from "ammonium nitrate, as N" into "ammonium nitrate" and therefore its amount has been scaled (multiplied) from 22.3965 kg by 2.8573 kg of "ammonium nitrate" per kg of "ammonium nitrate, as N". Original comment of the exchange is: Calculated value. See parameters exchanges properties for details.
  Uncertainty: C
  property input_kg 63.99 kg; name input_ammoniumNitrate
  property N content 0.35; name N_content_ammoniumNitrate
  properties: wet mass 1 kg, dry mass 1 kg
  note on input_kg: Calculated Value. It is assume that the given amount represented the complecte explosive, i.e. 94% ammonium nitrate and 6% petrol.
- electricity, high voltage: 1.41984 kWh; lognormal variance with pedigree 0.0086, pedigree (1,1,4,1,1)
  Measured Value.
- diesel, burned in building machine: 0.673236 MJ; = fuel_input_diesel_buildingmachine*density_diesel_buildingmachine*UnitConversion(1, 'm3', 'l')*Net_heat_value_diesel_buildingmachine*42.8; lognormal variance with pedigree 0.008, pedigree (1,1,4,1,1)
  Calculated value. See parameters exchanges properties for details.
  Uncertainty: C
  property density 0.84 kg/l; name density_diesel_buildingmachine
  property heating value, net 1 MJ; name Net_heat_value_diesel_buildingmachine
  property fuel input in physical units, m3 0.3346 m3; name fuel_input_diesel_buildingmachine
  note on density: Density value. Value Taken from Table 5.1 of report "Overview and methodology, Data quality guideline for the ecoinvent database version 3" (ecoinvent report No. 1 (v3), 2011)
  note on heating value, net: Net (lower) heating (calorific) value. Value Taken from Table 5.1 of report "Overview and methodology, Data quality guideline for the ecoinvent database version 3" (ecoinvent report No. 1 (v3), 2011)
- sulfidic tailings, generic: -6.73821 kg; name sulfidicTailing; lognormal variance with pedigree 0.0086, pedigree (1,1,4,1,1)
  Measured Value. 20% is sent underground to be used as backfill (excluded from the amount); sulfidic tailing is managed on site.
  production volume 1.74315e9 kg; = PV_Quebec * (sulfidicTailing / PV_ref)
    (same comment as for municipal solid waste)
  property price 0 EUR2005; name sulfidicTailing_price_EUR2005
  properties: oxygen content 0.89157, carbon content, fossil 0.0087785, iron content 0.015374, calcium content 0.0045972, aluminium content 0.014738, wet mass 1 kg, water content 0.428571, magnesium content 0.0022359, dry mass 0.7 kg, sodium content 0.0014472, potassium content 0.0025181, silicon content 0.053273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
- lime, hydrated, loose weight: 0.0067662 kg; lognormal variance with pedigree 0.0086, pedigree (1,1,4,1,1)
  Measured Value. Used for wastewater treatment.
  properties: dry mass 0.997 kg, wet mass 1 kg, water content 0.00300903
- fatty alcohol: 0.000121948 kg; lognormal variance with pedigree 0.0086, pedigree (1,1,4,1,1)
  Measured Value. Reported as Oil-based anti-foaming agent. Stands for CC-5428 (77%), Nalco 7810 (7%) and CC-7425/76 (16% ; for wastewater treatment).
  properties: carbon content, fossil 0.0408973, wet mass 1 kg, dry mass 1 kg, carbon content, non-fossil 0.743434, heating value, net 41.01 MJ
- silica sand: 0.000207463 kg; lognormal variance with pedigree 0.0092, pedigree (2,1,4,1,1)
  (same comment as for sodium nitrate)
  properties: wet mass 1 kg, dry mass 0.99 kg, water content 0.010101
- phosphoric acid, industrial grade, without water, in 85% solution state: 0.000104487 kg; lognormal variance with pedigree 0.0086, pedigree (1,1,4,1,1)
  Measured Value. Used for wastewater treatment. The amount is the active agent only. It is used in a 85% solution.
  properties: dry mass 1 kg, wet mass 1 kg
- scrap aluminium: -8.27166e-5 kg; name scrapAluminium; lognormal variance with pedigree 0.0086, pedigree (1,1,4,1,1)
  Measured Value. Reported as non-ferrous metal sent to recovery.
  production volume 21398.5 kg; = PV_Quebec * (scrapAluminium / PV_ref)
    Calculated from production volume of reference product using the relative outputs.
  property price 0 EUR2005; name scrapAluminium_price_EUR2005
  properties: dry mass 1 kg, wet mass 1 kg
- polycarboxylates, 40% active substance: 0.000127265 kg; lognormal variance with pedigree 0.0086, pedigree (1,1,4,1,1)
  Measured Value. Sum of sodium cyanide (96%, of which 97% is for cyanidation ) and cyanure (4%, proxy, used for the Merill-Crowe process)
  properties: carbon content, fossil 0.496429, water content 1.5, wet mass 1 kg, heating value, net 4.54 MJ, dry mass 0.4 kg
- hydrogen peroxide, without water, in 50% solution state: 0.0109076 kg; lognormal variance with pedigree 0.0086, pedigree (1,1,4,1,1)
  Measured Value. For wastewater treatment - Amount is active agent only, to be used in a 70% solution (around 1/3) and a 50% solution.
  properties: wet mass 1 kg, dry mass 1 kg, heating value, net 7.13 MJ
- waste wood, untreated: -0.00141424 kg; name wasteWood; lognormal variance with pedigree 0.0086, pedigree (1,1,4,1,1)
  Measured Value. Reported as wood sent to recovery.
  production volume 365859 kg; = PV_Quebec * (wasteWood / PV_ref)
    Calculated from production volume of reference product using the relative outputs.
  property price 0 EUR2005; name wasteWood_price_EUR2005
  properties: water content 0.25, dry mass 0.8 kg, carbon content, non-fossil 0.48632, heating value, net 13.99 MJ, wet mass 1 kg
- zinc monosulfate: 0.00318498 kg; lognormal variance with pedigree 0.0086, pedigree (1,1,4,1,1)
  Measured Value.
  properties: wet mass 1 kg, dry mass 1 kg
- heat, district or industrial, natural gas: 0.597941 MJ; = fuel_input_naturalgas*Net_heat_value_naturalgas*36.3/fuel_use_naturalgas; lognormal variance with pedigree 0.008, pedigree (1,1,4,1,1)
  Calculated value based on reported fuel input (in m³), the Net Heating Value of the fuel and assumed efficiency (1/Fuel_use).
  See parameters exchanges properties for details.
  Uncertainty: C
  property heating value, net 1 MJ; name Net_heat_value_naturalgas
  property fuel input in physical units, m3 308 m3; name fuel_input_naturalgas
  property Corresponding fuel use 1.04645 MJ; name fuel_use_naturalgas; = (0.98039+1.0417+1.0526+1.1111)/4
  note on heating value, net: Literature value.Net (lower) heating (calorific) value. Value Taken from Table 5.1 of report "Overview and methodology, Data quality guideline for the ecoinvent database version 3" (ecoinvent report No. 1 (v3), 2011)
  note on Corresponding fuel use: Calculated value. Lower heating value of the fuel input related to the heat/electricity output. Calculated with corresponding heat production datasets.
- waste plastic, mixture: -2.0293e-5 kg; name wastePlastic; lognormal variance with pedigree 0.0086, pedigree (1,1,4,1,1)
  Measured Value. Reported as rigid plastic sent to recovery.
  production volume 5249.72 kg; = PV_Quebec * (wastePlastic / PV_ref)
    Calculated from production volume of reference product using the relative outputs.
  property price 0 EUR2005; name wastePlastic_price_EUR2005
  properties: wet mass 1 kg, carbon content, fossil 0.747344, dry mass 0.847 kg, heating value, net 30.79 MJ, water content 0.180638
- iron sulfate: 0.00164538 kg; lognormal variance with pedigree 0.0086, pedigree (1,1,4,1,1)
  Measured Value used for wastewater treatment.
  properties: wet mass 1 kg, dry mass 1 kg
- soap: 0.000126593 kg; lognormal variance with pedigree 0.0086, pedigree (1,1,4,1,1)
  Measured Value reported as Foaming agent MIBC.
  properties: wet mass 1 kg, heating value, net 17.93 MJ, water content 0.149425, carbon content, non-fossil 0.692237, dry mass 0.87 kg
- zinc: 0.00156199 kg; lognormal variance with pedigree 0.0086, pedigree (1,1,4,1,1)
  Measured Value. Used for the Merill-Crowe process (gold recovery).
  properties: wet mass 1 kg, dry mass 1 kg
- iron scrap, sorted, pressed: -0.0032818 kg; lognormal variance with pedigree 0.0086, pedigree (1,1,4,1,1)
  Measured Value. Reported as ferrous metal sent to recovery.
  production volume 848990 kg
  properties: wet mass 1 kg, dry mass 1 kg
- electronics scrap: -1.78977e-6 kg; lognormal variance with pedigree 0.0086, pedigree (1,1,4,1,1)
  Measured Value. Reported as computer equipement sent to recovery.
  production volume 463.006 kg
  properties: wet mass 1 kg, carbon content, fossil 0.317311, dry mass 1 kg, carbon content, non-fossil 0.0045566
  note on carbon content, fossil: Carbon content assumed equal with the intermediate exchange of "electronic component, passive, unspecified"

## Inputs from nature
- Transformation, from forest, unspecified [natural resource, land]: 0.00136163 m2; = surface_kg; lognormal variance with pedigree 0.008, pedigree (1,1,4,1,1)
  Calculated Value. See parameters exchanges properties for details.
  Uncertainty: S
  property Surface 24.33 m2; name surface_kg
- Gold, in ground [natural resource, in ground]: 2.26044e-5 kg; source Ressources naturelles Québec 2011; lognormal variance with pedigree 0.0106, pedigree (3,1,4,1,1)
  1.8 ppm Au in ore; Calculated Value. When the amount is calculated based on the ore composition (1,79 g Au/t ore), the amount of recovered gold is higher than the amount of extracted gold. We hence calculate the amount of extracted gold based on a hypothetic recovery rate of 85%.
- Copper, in ground [natural resource, in ground]: 0.0189386 kg; source Ressources naturelles Québec 2011; lognormal variance with pedigree 0.0092, pedigree (2,1,4,1,1)
  0.2% Cu in ore; Calculated Value based on ore composition.
- Lead, in ground [natural resource, in ground]: 0.0340884 kg; source Ressources naturelles Québec 2011; lognormal variance with pedigree 0.0092, pedigree (2,1,4,1,1)
  0.36% Pb in ore; Calculated Value based on ore composition.
- Water, lake [natural resource, in water]: 0.00422817 m3; name water_lake_input; lognormal variance with pedigree 0.0086, pedigree (1,1,4,1,1)
  Measured Value.
- Zinc, in ground [natural resource, in ground]: 0.292586 kg; source Ressources naturelles Québec 2011; lognormal variance with pedigree 0.0092, pedigree (2,1,4,1,1)
  3.1% Zn in ore; Calculated Value based on ore composition.
- Occupation, industrial area [natural resource, land]: 0.0517421 m2*year; = surface_kg*lifetime; lognormal variance with pedigree 0.008, pedigree (1,1,4,1,1)
  Calculated Value. See parameters exchanges properties for details.
  Uncertainty: C
  property lifetime 38 year; name lifetime
- Water, well, in ground [natural resource, in water]: 1.20997e-5 m3; name water_well_in_ground_input; lognormal variance with pedigree 0.0086, pedigree (1,1,4,1,1)
  Measured Value.
- Silver, in ground [natural resource, in ground]: 0.000515328 kg; source Ressources naturelles Québec 2011; lognormal variance with pedigree 0.0092, pedigree (2,1,4,1,1)
  54 ppm Ag in ore; Calculated Value based on ore composition.
- Transformation, to industrial area [natural resource, land]: 0.00136163 m2; = surface_kg; lognormal variance with pedigree 0.008, pedigree (1,1,4,1,1)
  Calculated Value. See parameters exchanges properties for details.
  Uncertainty: S

## Emissions to nature
- Arsenic, ion [water, surface water]: 1.68455e-5 kg; lognormal variance with pedigree 0.0086, pedigree (1,1,4,1,1)
  Measured Value. Final effluent (does not include recirculated water).
  It is considered that the water emissions given by the plant are additional to those of the sulfidic tailing dataset. The first go to surface water after going through the WWT, while the second come from leaching and go to underground water.
- Lead [air, non-urban air or from high stacks]: 7.93587e-8 kg; lognormal variance with pedigree 0.658, pedigree (1,1,4,1,1)
  Measured Value. Process emission only.
- Sulfur dioxide [air, non-urban air or from high stacks]: 0.000240147 kg; lognormal variance with pedigree 0.0086, pedigree (1,1,4,1,1)
  Measured Value. Process emission only.
- Nitrate [water, surface water]: 0.000754411 kg; lognormal variance with pedigree 0.048, pedigree (1,1,4,1,1)
  (same comment as for Arsenic, ion)
- Water [water, surface water]: 0.00424027 m3; = water_well_in_ground_input+water_lake_input; lognormal variance with pedigree 0.0086, pedigree (1,1,4,1,1)
  (same comment as for Arsenic, ion)
- Antimony [water, surface water]: 1.37283e-6 kg; lognormal variance with pedigree 0.658, pedigree (1,1,4,1,1)
  (same comment as for Arsenic, ion)
- Cadmium, ion [water, surface water]: 5.92672e-8 kg; lognormal variance with pedigree 0.658, pedigree (1,1,4,1,1)
  (same comment as for Arsenic, ion)
- Ammonium, ion [water, surface water]: 6.62069e-5 kg; lognormal variance with pedigree 0.048, pedigree (1,1,4,1,1)
  (same comment as for Arsenic, ion)
- Copper, ion [water, surface water]: 2.68913e-7 kg; lognormal variance with pedigree 0.658, pedigree (1,1,4,1,1)
  (same comment as for Arsenic, ion)
- Particulates, < 2.5 um [air, non-urban air or from high stacks]: 5.17734e-6 kg; lognormal variance with pedigree 0.308, pedigree (1,1,4,1,1)
  Measured Value. Process emission only.
- Cyanide [water, surface water]: 4.20467e-7 kg; lognormal variance with pedigree 0.048, pedigree (1,1,4,1,1)
  (same comment as for Arsenic, ion)
- Particulates, > 10 um [air, non-urban air or from high stacks]: 4.82868e-5 kg; lognormal variance with pedigree 0.048, pedigree (1,1,4,1,1)
  Measured Value. Process emission only.
- Zinc, ion [water, surface water]: 1.63027e-7 kg; lognormal variance with pedigree 0.658, pedigree (1,1,4,1,1)
  (same comment as for Arsenic, ion)
- Nickel, ion [water, surface water]: 9.52528e-7 kg; lognormal variance with pedigree 0.658, pedigree (1,1,4,1,1)
  (same comment as for Arsenic, ion)
- Cobalt [water, surface water]: 9.72676e-7 kg; lognormal variance with pedigree 0.658, pedigree (1,1,4,1,1)
  (same comment as for Arsenic, ion)
- Lead [water, surface water]: 6.22333e-9 kg; lognormal variance with pedigree 0.658, pedigree (1,1,4,1,1)
  (same comment as for Arsenic, ion)
- Nitrogen oxides [air, non-urban air or from high stacks]: 0.00104879 kg; lognormal variance with pedigree 0.048, pedigree (1,1,4,1,1)
  Measured Value. Process emission only.
- Dinitrogen monoxide [air, non-urban air or from high stacks]: 1.74332e-6 kg; lognormal variance with pedigree 0.048, pedigree (1,1,4,1,1)
  Measured Value. Process emission only.
- Particulates, > 2.5 um, and < 10um [air, non-urban air or from high stacks]: 0.000111259 kg; lognormal variance with pedigree 0.128, pedigree (1,1,4,1,1)
  Measured Value. Process emission only.

## Sampling procedure
Specific data were collected on the only production site in Quebec.

## Extrapolations
Specific data were collected from the only mine in Quebec who produced all of these products from one ore.
Extrapolation was done for the infrastructure based on dataset ""mine infrastructure, underground, non-ferrous metal"".
Uncertainty has been adjusted accordingly.
