# protein pea production

Dataset: EcoSpold 2, unit process
Geography: CA-AB
Time period: 2017-01-01 to 2021-12-31
Technology level: current
Classification: ISIC rev.4 ecoinvent: 0111:Growing of cereals (except rice), leguminous crops and oil seeds
Synonyms: field pea (Canada)
Scenario: Business-as-Usual
System model: Allocation, cut-off by classification
Generated by: Davoud Heidari
Published in: Food Systems PRISM Lab 2020
Database: ecoinvent
isCopyrightProtected: true
accessRestrictedTo: 1

## General comment
This dataset represents the production of 1 tonne of dried pea product with a dry matter of 84% at minimum during May-August, 2019, at 34046.23 ha pea farms located in the Province of Alberta, Canada. Farms have yield of 3167.51 kg dried matter per ha for this crop cycle. The system boundaries include the production of all of crop inputs (e.g. seeds, fertilizers, crop protection products, and fuel). There is an estimated 0.808 kg of N fixation per tonne of peas produced in this region that can be included as an avoided use of N fertilizer for the next crop in the rotation. However, this was not included in this model due to data presentation restrictions. Irrigation is not included since it is rarely performed for peas in this region.. Sowing date for the crop is May, 2019 and harvesting date is August, 2020. Seeding rate is 0.16 kg/tonne of pea production. Fertilizer applied contain nitrogen (as N) 3.89 kg/tonne, phosphate (as P2O5) 10.85 kg/tonne, potash (as K2O) 3.57 kg/tonne, sulfur (as S) 0.87 kg/tonne, zinc (as Zn) 0.0002 kg/tonne, and magnesium (as Mg) 0.03 kg/tonne. Predominant crop protection applied contain active ingredients of Pyraclostrobin 10.99 g/tonne, Prothioconazole 7.06 g/tonne, and Fluxapyroxad 6.54g/tonne. Machinery is used for tillage (disk), land rolling, seeding, tillage (cultivator), swathing, harrowing, fertilizer application, in-crop herbicide application, foliar fungicide application, foliar insecticide application, combining, post-harvest herbicide application, and burndown/desiccant application with total fuel consumption of 28.66 kg/tonne.

## Included activities start
Starting inputs for this activity include seed, fertilizer, crop protection products and fuel on the farm. This activity begins with soil preparation about 37 weeks after the harvest of the previous crop. The soil is prepared for cultivation in 1st week of May and sowing of seeds started about 5 days after soil preparation.

## Included activities end
This activity ends with pea drying to <16% moisture at farm gate. Carbon and nitrogen emissions associated with above- and below-ground biomass are accounted for using the DNDC model. This model was also used to calculate a nitrogen fixation credit that can be included as an avoided use of N fertilizer for the next crop in the rotation. However, this was not included in this model due to data presentation restrictions. For peas in this region, the N credit was estimated to be 0.808 kg/t.

## Geography
Refers to weighted-average production in the Province of Alberta, Canada

## Technology
Production of pea includes farm practices from tillage (disk), land rolling, seeding, tillage (cultivator), swathing, harrowing, fertilizer application, in-crop herbicide application, foliar fungicide application, foliar insecticide application, combining, post-harvest herbicide application, burndown/desiccant application, to drying.

## Time period
Soil cultivating date for the main crop: April - May 2019; Harvesting date main crop: August, 2017-2019. The soil cultivation, sowing and harvesting dates are the data collected by the farmers. Total time from date of sowing to date of harvesting comes to 119 days. The data is collected for three crop cycles. The cycle of one year is considered for entry in ecoinvent.

## Parameters
- LUC_crop_specific: 1 dimensionless
- yield kgha: 3167.51 kg/ha; name yield_kg_ha

## Reference product
- protein pea: 1 kg; name REF_PRODUCT; By-product classification allocatable product; CPC 0124: Green leguminous vegetables
  production volume 107842 kg
    Production volume for dry pea is provided in kg. Data is for the year 2017-2019.
  property dry mass 0.87 kg; name REF_PRODUCT_DM
  property price 2.11 EUR2005; name REF_PRODUCT_price_EUR2005
    Calculated value based on data from United Nations Commodity Trade Statistics Database (comtrade.un.org). UN comtrade category: 210610 Protein concentrates and textures protein substances. Year 2005. Using exchange rate of 1EURO = 1.209 USD. Average of price of import into 5 main markets (EU, US, JP, IN and CN).
  property energy content 16.0776 MJ; name REF_PRODUCT_energy_content
    See chapter 'Product Properties' in '01_crop production - yields & inputs CH & Europe_v1.0.pdf', section 'AGRICULTURAL PRODUCTION IN SWITZERLAND' - pdf-document on the dedicated talk page of ecoinvent (www.ecoinvent.org/documentation)
  property carbon content, non-fossil 0.469421; name REF_PRODUCT_C_content_non_fossil
    biogene carbon content on a dry matter basis
    Composition data obtained from Peas, split, mature seeds, raw, in (http://www.nal.usda.gov/fnic/foodcomp/search/). First, composition data were refered to 1 kg dry mass. Then, C-contents were calculated considering a C-content/dry mass of 46% in carbohydrates (including fibres), 53% in proteins and 75% in fats. All data from 'Evolutionary and Biochemical Aspects', A.D. Kay and T. Vrede (in Global Ecology, 2010, Elsevier B.V., S.E. Jørgensen Ed.).
  property carbon content 0.469421
    carbon content on a dry matter basis (reserved; not for manual entry)
  properties: wet mass 1 kg, water in wet mass 0.13 kg, carbon content, fossil 0, water content 0.149425, carbon allocation 0.408396 kg

## Inputs from technosphere
- diammonium phosphate: 0.00012843 kg; lognormal variance with pedigree 0.002, pedigree (2,3,2,1,1)
  This refers to production of Diammonium phosphate (DAP) (as N) and Diammonium phosphate (DAP) (as P2O5)
  Uncertainty: D
  properties: nitrogen content 0.18, phosphorus content 0.200754, dry mass 1 kg, wet mass 1 kg
  note on nitrogen content: Nitrogen content (on a dry matter basis) of diammonium phosphate is calculated from the molecular formula of the nutrient present in the substance.
  note on phosphorus content: Phosphorus content (on a dry matter basis) of diammonium phosphate is calculated from the molecular formula of the nutrient present in the substance.
- monoammonium phosphate: 0.013243 kg; lognormal variance with pedigree 0.002, pedigree (2,3,2,1,1)
  This refers to production of Ammonium Polyphosphate (liquid) (as N), CropAid (as N), In-furrow liquid starter (as N), MicroEssentials S15 (as N), MicroEssentials SZ (as N), Monoammonium Phosphate (MAP) (as N), Power Rich (as N), Ammonium Polyphosphate (liquid) (as P2O5), CropAid (as P2O5), In-furrow liquid starter (as P2O5), MicroEssentials S15 (as P2O5), MicroEssentials SZ (as P2O5), Monoammonium Phosphate (MAP) (as P2O5), Power Rich (as P2O5)
  Uncertainty: D
  properties: nitrogen content 0.084, wet mass 1 kg, phosphorus content 0.226939, dry mass 1 kg
  note on nitrogen content: Nitrogen content (on a dry matter basis) of monoammonium phosphate is calculated from the molecular formula of the nutrient present in the substance.
  note on phosphorus content: Phosphorus content (on a dry matter basis) of monoammonium phosphate is calculated from the molecular formula of the nutrient present in the substance.
- drying of protein pea: 0.025 l; lognormal variance with pedigree 0.0008, pedigree (1,1,2,1,1)
  This refers to drying of peas.
- combine harvesting: 8.51381e-5 ha; lognormal variance with pedigree 0.0008, pedigree (1,1,2,1,1)
  This refers to combine harvesting.
- ammonium sulfate: 0.0012112 kg; lognormal variance with pedigree 0.002, pedigree (2,3,2,1,1)
  This refers to production of Ammonium Sulphate (as N) and Ammonium thiosulphate (as N)
  Uncertainty: D
  properties: wet mass 1 kg, dry mass 1 kg
- sulfur: 0.000873124 kg; lognormal variance with pedigree 0.002, pedigree (2,3,2,1,1)
  This refers to production of Bio-Sul Premium Plus (as S), CropAid - S, K Mag (S), MicroEssentials S15 - S, MicroEssentials SZ - S, and Tiger 90
  Uncertainty: D
  properties: dry mass 1 kg, wet mass 1 kg
- pesticide, unspecified: 0.000174141 kg; lognormal variance with pedigree 0.002, pedigree (1,3,2,1,2)
  This refers to active ingredients of all herbicides (except glyphosate), fungicides and insecticides.
  Uncertainty: D
  properties: dry mass 1 kg, carbon content, fossil 0.486978, wet mass 1 kg
- tillage, rotary cultivator: 0.000231291 ha; lognormal variance with pedigree 0.0008, pedigree (1,1,2,1,1)
  This refers to tillage, rotary cultivator.
- tillage, harrowing, by rotary harrow: 0.00016991 ha; lognormal variance with pedigree 0.0008, pedigree (1,1,2,1,1)
  This refers to tillage, harrowing, by rotary harrow.
- sowing: 8.28438e-5 ha; lognormal variance with pedigree 0.0008, pedigree (1,1,2,1,1)
  This refers to sowing.
- swath, by rotary windrower: 8.34938e-5 ha; lognormal variance with pedigree 0.0008, pedigree (1,1,2,1,1)
  This refers to swath, by rotary windrower.
- ammonia, anhydrous, liquid: 4.12764e-5 kg; lognormal variance with pedigree 0.002, pedigree (2,3,2,1,1)
  This refers to production of anhydrous ammonia
  Uncertainty: D
  properties: wet mass 1 kg, dry mass 1 kg
- urea: 0.000112591 kg; lognormal variance with pedigree 0.002, pedigree (2,3,2,1,1)
  This refers to production of SuperU (as N) and Urea (as N)
  Uncertainty: D
  properties: dry mass 1 kg, wet mass 1 kg, carbon content, fossil 0.2
- tillage, cultivating, chiselling: 0.000368071 ha; lognormal variance with pedigree 0.0008, pedigree (1,1,2,1,1)
  This refers to tillage, cultivating, chiselling.
- peat moss: 6.59835e-6 m3; = 0.001365859/207
  Peat moss is used as a proxy to model the used inoculum. The amount is calculated by dividing the peat moss mass by its density (207 kg/m3).
  properties: heating value, net 17.88 MJ
- pea seed, for sowing: 0.000163 kg; lognormal variance with pedigree 0.002, pedigree (2,3,2,1,1)
  This refers to production of pea seed.
  Uncertainty: D
  properties: dry mass 0.87 kg, water content 0.149425, carbon content, non-fossil 0.469421, wet mass 1 kg
- potassium sulfate: 0.000750027 kg; lognormal variance with pedigree 0.002, pedigree (2,3,2,1,1)
  This refers to production of Potassium sulphate (as K2O)
  Uncertainty: D
  properties: dry mass 1 kg, wet mass 1 kg
- potassium chloride: 0.00282204 kg; lognormal variance with pedigree 0.002, pedigree (2,3,2,1,1)
  This refers to production of In-furrow liquid starter (as K2O), K Mag (as K2O), Potash (as K2O), and Power Rich (as K2O)
  Uncertainty: D
  properties: wet mass 1 kg, dry mass 1 kg
- zinc: 1.53852e-7 kg; lognormal variance with pedigree 0.002, pedigree (2,3,2,1,1)
  This refers to production of MicroEssentials SZ - Zn
  Uncertainty: D
  properties: dry mass 1 kg, wet mass 1 kg
- fertilising, by broadcaster: 0.00011864 ha; lognormal variance with pedigree 0.0008, pedigree (1,1,2,1,1)
  This refers to fertilising, by broadcaster.
- application of plant protection product, by field sprayer: 0.000206394 ha; lognormal variance with pedigree 0.0008, pedigree (1,1,2,1,1)
  This refers to application of plant protection product, by field sprayer.
- glyphosate: 0.000292 kg; lognormal variance with pedigree 0.0014, pedigree (1,3,2,1,1)
  This refers to production of glyphosate
  Uncertainty: D
  properties: carbon content, fossil 0.214286, dry mass 1 kg, wet mass 1 kg
- magnesium: 2.9927e-5 kg; lognormal variance with pedigree 0.002, pedigree (2,3,2,1,1)
  This refers to production of K Mag (Mg)
  Uncertainty: D
  properties: wet mass 1 kg, dry mass 1 kg
- tillage, rolling: 0.000107761 ha; lognormal variance with pedigree 0.0008, pedigree (1,1,2,1,1)
  This refers to tillage, rolling.
- tillage, harrowing, by offset disc harrow: 0.000295805 ha; lognormal variance with pedigree 0.0008, pedigree (1,1,2,1,1)
  This refers to tillage, harrowing, by offset disk harrow.

## Inputs from nature
- Occupation, annual crop, non-irrigated [natural resource, land]: 3.15705 m2*year; lognormal variance with pedigree 0.0022, pedigree (1,1,2,1,1)
  Uncertainty: D
- Transformation, to annual crop, non-irrigated [natural resource, land]: 3.15705 m2; lognormal variance with pedigree 0.0082, pedigree (1,1,2,1,1)
  Uncertainty: D
- Transformation, from unspecified [natural resource, land]: 3.15705 m2; lognormal variance with pedigree 0.0082, pedigree (1,1,2,1,1)
  Uncertainty: D

## Emissions to nature
- Flumioxazin [water, ground-]: 9.01e-7 kg; lognormal variance with pedigree 0.0408, pedigree (1,3,2,1,1)
  Modelled, farm-level emissions from plant protection product application were modelled based on the active ingredients for each substance. As per Margni et al. (2002), it was assumed that, regardless of the timing of the products, 76.5% of the active ingredient of each agricultural plant protection product is emitted to soil, 8.5% to water, and 10% to air. This means a total of 95% of the applied active ingredient is emitted back to the environment. The last 5% is taken up by the plant and was therefore not considered as an emission in this model. (Reference: Margni M, Rossier D, Crettaz P, Jolliet O (2002) Life cycle impact assessment of pesticides on human health and ecosystems. Agric Ecosyst Environ 93:379–392. https://doi.org/10.1016/S0167-8809(01)00336-X)
  Uncertainty: D
- Dinitrogen monoxide [air, low population density, long-term]: 3.37e-5 kg; lognormal variance with pedigree 0.0328, pedigree (3,3,2,1,1)
  Modelled with using the DeNitrification DeComposition (DNDC) -Management Factor Tool (DNDC-MFT) that was developed by Smith et al, (2010). The Canadian version of DNDC that has been used in this study was developed to include a crop growth model for cultivars grown in Canada as well as the impact of snow dynamics, crop biomass, and residue management on soil temperature (Dutta et al, 2016). (References: Dutta B, Smith WN, Grant BB, et al (2016) Model development in DNDC for the prediction of evapotranspiration and water use in temperate field cropping systems. Environ Model Softw 80:. https://doi.org/10.1016/j.envsoft.2016.02.014
  Uncertainty: D
- Phosphorus [water, ground-]: 0.000242 kg; lognormal variance with pedigree 0.0428, pedigree (3,3,2,1,1)
  (same comment as for Dinitrogen monoxide)
- Zinc, ion [water, ground-]: 2.98815e-6 kg; lognormal variance with pedigree 0.0872596, pedigree (2,2,2,1,1)
  The heavy metal emissions are calculated by SALCA-heavy metal (Freiermuth 2006) using the ecoinvent LCI calculation tool for crop production.
  Uncertainty: C
- Picoxystrobin [soil, agricultural]: 8.16e-7 kg; lognormal variance with pedigree 0.0338, pedigree (1,3,2,1,1)
  (same comment as for Flumioxazin)
- Saflufenacil [water, ground-]: 2.72e-7 kg; lognormal variance with pedigree 0.0408, pedigree (1,3,2,1,1)
  (same comment as for Flumioxazin)
- Metribuzin [water, ground-]: 2.8e-7 kg; lognormal variance with pedigree 0.0408, pedigree (1,3,2,1,1)
  (same comment as for Flumioxazin)
- MCPA [water, ground-]: 1.66e-7 kg; lognormal variance with pedigree 0.0408, pedigree (1,3,2,1,1)
  (same comment as for Flumioxazin)
- Mercury [water, surface water]: 2.07715e-8 kg; lognormal variance with pedigree 0.0872596, pedigree (2,2,2,1,1)
  (same comment as for Zinc, ion)
- Trifluralin [water, ground-]: 1.83e-7 kg; lognormal variance with pedigree 0.0408, pedigree (1,3,2,1,1)
  (same comment as for Flumioxazin)
- Nitrogen oxides [air, low population density, long-term]: 9.19e-6 kg; lognormal variance with pedigree 0.0328, pedigree (3,3,2,1,1)
  (same comment as for Dinitrogen monoxide)
- Tribenuron-methyl [water, ground-]: 5.17e-9 kg; lognormal variance with pedigree 0.0408, pedigree (1,3,2,1,1)
  (same comment as for Flumioxazin)
- Pyraclostrobin [water, ground-]: 9.84e-7 kg; lognormal variance with pedigree 0.0408, pedigree (1,3,2,1,1)
  (same comment as for Flumioxazin)
- Imazethapyr [air, non-urban air or from high stacks]: 1.69e-7 kg; lognormal variance with pedigree 0.0408, pedigree (1,3,2,1,1)
  (same comment as for Flumioxazin)
- Imazethapyr [soil, agricultural]: 1.29e-6 kg; lognormal variance with pedigree 0.0338, pedigree (1,3,2,1,1)
  (same comment as for Flumioxazin)
- Ammonia [air, low population density, long-term]: 0.000171 kg; lognormal variance with pedigree 0.0108, pedigree (3,3,2,1,1)
  (same comment as for Dinitrogen monoxide)
- Cadmium [soil, agricultural]: 1.75728e-7 kg; lognormal variance with pedigree 0.0419915, pedigree (2,2,2,1,1)
  (same comment as for Zinc, ion)
- Bentazone [air, non-urban air or from high stacks]: 6.22e-6 kg; lognormal variance with pedigree 0.0408, pedigree (1,3,2,1,1)
  (same comment as for Flumioxazin)
- Prothioconazol [water, ground-]: 6.32e-7 kg; lognormal variance with pedigree 0.0408, pedigree (1,3,2,1,1)
  (same comment as for Flumioxazin)
- Imidacloprid [air, low population density, long-term]: 9.72e-8 kg; lognormal variance with pedigree 0.0408, pedigree (1,3,2,1,1)
  (same comment as for Flumioxazin)
- Azoxystrobin [air, non-urban air or from high stacks]: 5.35e-7 kg; lognormal variance with pedigree 0.0408, pedigree (1,3,2,1,1)
  (same comment as for Flumioxazin)
- Lambda-cyhalothrin [soil, agricultural]: 9.76e-8 kg; lognormal variance with pedigree 0.0338, pedigree (1,3,2,1,1)
  (same comment as for Flumioxazin)
- Nickel, ion [water, surface water]: 7.03877e-6 kg; lognormal variance with pedigree 0.0872596, pedigree (2,2,2,1,1)
  (same comment as for Zinc, ion)
- Chromium [soil, agricultural]: -1.57423e-5 kg
  The heavy metal emissions are calculated by SALCA-heavy metal (Freiermuth 2006) using the ecoinvent LCI calculation tool for crop production.
- Phosphorus [soil, agricultural]: 9.22e-5 kg; lognormal variance with pedigree 0.0358, pedigree (3,3,2,1,1)
  (same comment as for Dinitrogen monoxide)
- Metalaxyl-M [soil, agricultural]: 2.12e-7 kg; lognormal variance with pedigree 0.0338, pedigree (1,3,2,1,1)
  (same comment as for Flumioxazin)
- Trifloxystrobin [air, non-urban air or from high stacks]: 5.94e-7 kg; lognormal variance with pedigree 0.0408, pedigree (1,3,2,1,1)
  (same comment as for Flumioxazin)
- Copper [soil, agricultural]: -1.60969e-5 kg
  (same comment as for Chromium)
- Penflufen [soil, agricultural]: 1.21e-8 kg; lognormal variance with pedigree 0.0338, pedigree (1,3,2,1,1)
  (same comment as for Flumioxazin)
- Imidacloprid [water, ground-]: 8.26e-8 kg; lognormal variance with pedigree 0.0408, pedigree (1,3,2,1,1)
  (same comment as for Flumioxazin)
- Flumioxazin [soil, agricultural]: 8.11e-6 kg; lognormal variance with pedigree 0.0338, pedigree (1,3,2,1,1)
  (same comment as for Flumioxazin)
- Tribenuron-methyl [soil, agricultural]: 4.66e-8 kg; lognormal variance with pedigree 0.0338, pedigree (1,3,2,1,1)
  (same comment as for Flumioxazin)
- MCPA [air, non-urban air or from high stacks]: 1.96e-7 kg; lognormal variance with pedigree 0.0408, pedigree (1,3,2,1,1)
  (same comment as for Flumioxazin)
- Propiconazole [water, ground-]: 6.86e-8 kg; lognormal variance with pedigree 0.0408, pedigree (1,3,2,1,1)
  (same comment as for Flumioxazin)
- Fludioxonil [soil, agricultural]: 3.41e-7 kg; lognormal variance with pedigree 0.0338, pedigree (1,3,2,1,1)
  (same comment as for Flumioxazin)
- Cadmium, ion [water, ground-]: 1.13502e-8 kg; lognormal variance with pedigree 0.0872596, pedigree (2,2,2,1,1)
  (same comment as for Zinc, ion)
- Quizalofop-ethyl [soil, agricultural]: 6.25e-7 kg; lognormal variance with pedigree 0.0338, pedigree (1,3,2,1,1)
  (same comment as for Flumioxazin)
- Fluxapyroxad [water, ground-]: 5.86e-7 kg; lognormal variance with pedigree 0.0408, pedigree (1,3,2,1,1)
  (same comment as for Flumioxazin)
- Penflufen [water, ground-]: 1.35e-9 kg; lognormal variance with pedigree 0.0408, pedigree (1,3,2,1,1)
  (same comment as for Flumioxazin)
- Pyroxasulfone [soil, agricultural]: 2.55e-6 kg; lognormal variance with pedigree 0.0338, pedigree (1,3,2,1,1)
  (same comment as for Flumioxazin)
- Prothioconazol [air, non-urban air or from high stacks]: 7.43e-7 kg; lognormal variance with pedigree 0.0408, pedigree (1,3,2,1,1)
  (same comment as for Flumioxazin)
- Thiamethoxam [soil, agricultural]: 1.78e-7 kg; lognormal variance with pedigree 0.0338, pedigree (1,3,2,1,1)
  (same comment as for Flumioxazin)
- Trifluralin [air, non-urban air or from high stacks]: 2.15e-7 kg; lognormal variance with pedigree 0.0408, pedigree (1,3,2,1,1)
  (same comment as for Flumioxazin)
- Clethodim [soil, agricultural]: 2.82e-6 kg; lognormal variance with pedigree 0.0338, pedigree (1,3,2,1,1)
  (same comment as for Flumioxazin)
- Azoxystrobin [water, ground-]: 4.55e-7 kg; lognormal variance with pedigree 0.0408, pedigree (1,3,2,1,1)
  (same comment as for Flumioxazin)
- Bentazone [soil, agricultural]: 4.76e-5 kg; lognormal variance with pedigree 0.0338, pedigree (1,3,2,1,1)
  (same comment as for Flumioxazin)
- Lead [soil, agricultural]: -1.92223e-6 kg
  (same comment as for Chromium)
- Thiamethoxam [water, ground-]: 1.98e-8 kg; lognormal variance with pedigree 0.0408, pedigree (1,3,2,1,1)
  (same comment as for Flumioxazin)
- Imazamox [water, ground-]: 3.02e-7 kg; lognormal variance with pedigree 0.0408, pedigree (1,3,2,1,1)
  (same comment as for Flumioxazin)
- Trifluralin [soil, agricultural]: 1.64e-6 kg; lognormal variance with pedigree 0.0338, pedigree (1,3,2,1,1)
  (same comment as for Flumioxazin)
- Metalaxyl-M [water, ground-]: 2.36e-8 kg; lognormal variance with pedigree 0.0408, pedigree (1,3,2,1,1)
  (same comment as for Flumioxazin)
- Chromium, ion [water, surface water]: 1.50913e-5 kg; lognormal variance with pedigree 0.0872596, pedigree (2,2,2,1,1)
  (same comment as for Zinc, ion)
- Ethaboxam [soil, agricultural]: 3.95e-7 kg; lognormal variance with pedigree 0.0338, pedigree (1,3,2,1,1)
  (same comment as for Flumioxazin)
- Lambda-cyhalothrin [water, ground-]: 1.08e-8 kg; lognormal variance with pedigree 0.0408, pedigree (1,3,2,1,1)
  (same comment as for Flumioxazin)
- Imazamox [soil, agricultural]: 2.71e-6 kg; lognormal variance with pedigree 0.0338, pedigree (1,3,2,1,1)
  (same comment as for Flumioxazin)
- Lead [water, surface water]: 1.48045e-6 kg; lognormal variance with pedigree 0.0872596, pedigree (2,2,2,1,1)
  (same comment as for Zinc, ion)
- Quizalofop-ethyl [air, non-urban air or from high stacks]: 8.18e-8 kg; lognormal variance with pedigree 0.0408, pedigree (1,3,2,1,1)
  (same comment as for Flumioxazin)
- Propiconazole [air, non-urban air or from high stacks]: 8.07e-8 kg; lognormal variance with pedigree 0.0408, pedigree (1,3,2,1,1)
  (same comment as for Flumioxazin)
- Zinc [soil, agricultural]: -3.93222e-5 kg
  (same comment as for Chromium)
- Metribuzin [air, non-urban air or from high stacks]: 3.29e-7 kg; lognormal variance with pedigree 0.0408, pedigree (1,3,2,1,1)
  (same comment as for Flumioxazin)
- Pyraflufen-ethyl [air, unspecified]: 4.7e-9 kg; lognormal variance with pedigree 0.0408, pedigree (1,3,2,1,1)
  (same comment as for Flumioxazin)
- Imazethapyr [water, ground-]: 1.43e-7 kg; lognormal variance with pedigree 0.0408, pedigree (1,3,2,1,1)
  (same comment as for Flumioxazin)
- Sethoxydim [soil, agricultural]: 4.18e-6 kg; lognormal variance with pedigree 0.0338, pedigree (1,3,2,1,1)
  (same comment as for Flumioxazin)
- MCPA [soil, agricultural]: 1.5e-6 kg; lognormal variance with pedigree 0.0338, pedigree (1,3,2,1,1)
  (same comment as for Flumioxazin)
- Lead [water, ground-]: 1.95122e-8 kg; lognormal variance with pedigree 0.0872596, pedigree (2,2,2,1,1)
  (same comment as for Zinc, ion)
- Deltamethrin [air, low population density, long-term]: 1.91e-9 kg; lognormal variance with pedigree 0.0408, pedigree (1,3,2,1,1)
  (same comment as for Flumioxazin)
- Prothioconazol [soil, agricultural]: 5.69e-6 kg; lognormal variance with pedigree 0.0338, pedigree (1,3,2,1,1)
  (same comment as for Flumioxazin)
- Thiram [soil, agricultural]: 6.72e-7 kg; lognormal variance with pedigree 0.0338, pedigree (1,3,2,1,1)
  (same comment as for Flumioxazin)
- Sulfentrazone [water, ground-]: 1.82e-7 kg; lognormal variance with pedigree 0.0408, pedigree (1,3,2,1,1)
  (same comment as for Flumioxazin)
- Deltamethrin [soil, agricultural]: 1.46e-8 kg; lognormal variance with pedigree 0.0338, pedigree (1,3,2,1,1)
  (same comment as for Flumioxazin)
- Flumioxazin [air, non-urban air or from high stacks]: 1.06e-6 kg; lognormal variance with pedigree 0.0408, pedigree (1,3,2,1,1)
  (same comment as for Flumioxazin)
- Sethoxydim [water, ground-]: 4.65e-7 kg; lognormal variance with pedigree 0.0408, pedigree (1,3,2,1,1)
  (same comment as for Flumioxazin)
- Ethalfluralin [soil, agricultural]: 2.51e-6 kg; lognormal variance with pedigree 0.0338, pedigree (1,3,2,1,1)
  (same comment as for Flumioxazin)
- Fludioxonil [air, low population density, long-term]: 4.46e-8 kg; lognormal variance with pedigree 0.0408, pedigree (1,3,2,1,1)
  (same comment as for Flumioxazin)
- Cadmium, ion [water, surface water]: 1.27189e-7 kg; lognormal variance with pedigree 0.0872596, pedigree (2,2,2,1,1)
  (same comment as for Zinc, ion)
- Pyraclostrobin (prop) [soil, agricultural]: 8.85e-6 kg; lognormal variance with pedigree 0.0338, pedigree (1,3,2,1,1)
  (same comment as for Flumioxazin)
- Imazamox [air, non-urban air or from high stacks]: 3.55e-7 kg; lognormal variance with pedigree 0.0408, pedigree (1,3,2,1,1)
  (same comment as for Flumioxazin)
- Zinc, ion [water, surface water]: 1.04851e-5 kg; lognormal variance with pedigree 0.0872596, pedigree (2,2,2,1,1)
  (same comment as for Zinc, ion)
- Saflufenacil [soil, agricultural]: 2.45e-6 kg; lognormal variance with pedigree 0.0338, pedigree (1,3,2,1,1)
  (same comment as for Flumioxazin)
- Carbon dioxide, fossil [air, low population density, long-term]: 0.000259 kg; lognormal variance with pedigree 0.0008, pedigree (1,1,2,1,1)
  (same comment as for Dinitrogen monoxide)
- Sulfentrazone [air, non-urban air or from high stacks]: 2.14e-7 kg; lognormal variance with pedigree 0.0408, pedigree (1,3,2,1,1)
  (same comment as for Flumioxazin)
- Propiconazole [soil, agricultural]: 6.17e-7 kg; lognormal variance with pedigree 0.0338, pedigree (1,3,2,1,1)
  (same comment as for Flumioxazin)
- Ethalfluralin [air, low population density, long-term]: 3.28e-7 kg; lognormal variance with pedigree 0.0408, pedigree (1,3,2,1,1)
  (same comment as for Flumioxazin)
- Sedaxane [soil, agricultural]: 6.46e-7 kg; lognormal variance with pedigree 0.0338, pedigree (1,3,2,1,1)
  (same comment as for Flumioxazin)
- Metalaxyl-M [air, low population density, long-term]: 2.78e-8 kg; lognormal variance with pedigree 0.0408, pedigree (1,3,2,1,1)
  (same comment as for Flumioxazin)
- Thiram [air, low population density, long-term]: 8.79e-8 kg; lognormal variance with pedigree 0.0408, pedigree (1,3,2,1,1)
  (same comment as for Flumioxazin)
- Glyphosate [water, ground-]: 2.48e-5 kg; lognormal variance with pedigree 0.0408, pedigree (1,3,2,1,1)
  (same comment as for Flumioxazin)
- Carfentrazone-ethyl [soil, agricultural]: 1.64e-7 kg; lognormal variance with pedigree 0.0338, pedigree (1,3,2,1,1)
  (same comment as for Flumioxazin)
- Nickel [soil, agricultural]: -7.47974e-6 kg
  (same comment as for Chromium)
- Triallate [water, ground-]: 2.27e-7 kg; lognormal variance with pedigree 0.0408, pedigree (1,3,2,1,1)
  (same comment as for Flumioxazin)
- Deltamethrin [water, ground-]: 1.62e-9 kg; lognormal variance with pedigree 0.0408, pedigree (1,3,2,1,1)
  (same comment as for Flumioxazin)
- Carfentrazone-ethyl [air, non-urban air or from high stacks]: 2.15e-8 kg; lognormal variance with pedigree 0.0408, pedigree (1,3,2,1,1)
  (same comment as for Flumioxazin)
- Thiamethoxam [air, low population density, long-term]: 2.33e-8 kg; lognormal variance with pedigree 0.0408, pedigree (1,3,2,1,1)
  (same comment as for Flumioxazin)
- Ethalfluralin [water, ground-]: 2.79e-7 kg; lognormal variance with pedigree 0.0408, pedigree (1,3,2,1,1)
  (same comment as for Flumioxazin)
- Nitrate [soil, unspecified]: 1.9e-5 kg; lognormal variance with pedigree 0.0358, pedigree (3,3,2,1,1)
  (same comment as for Dinitrogen monoxide)
- Lambda-cyhalothrin [air, non-urban air or from high stacks]: 1.28e-8 kg; lognormal variance with pedigree 0.0408, pedigree (1,3,2,1,1)
  (same comment as for Flumioxazin)
- Thiram [water, ground-]: 7.47e-8 kg; lognormal variance with pedigree 0.0408, pedigree (1,3,2,1,1)
  (same comment as for Flumioxazin)
- Chromium, ion [water, ground-]: 5.68648e-6 kg; lognormal variance with pedigree 0.0872596, pedigree (2,2,2,1,1)
  (same comment as for Zinc, ion)
- Ethaboxam [water, ground-]: 4.39e-8 kg; lognormal variance with pedigree 0.0408, pedigree (1,3,2,1,1)
  (same comment as for Flumioxazin)
- Pyraflufen-ethyl [soil, agricultural]: 3.6e-8 kg; lognormal variance with pedigree 0.0338, pedigree (1,3,2,1,1)
  (same comment as for Flumioxazin)
- Mercury [soil, agricultural]: -5.40037e-8 kg
  (same comment as for Chromium)
- Fludioxonil [water, ground-]: 3.79e-8 kg; lognormal variance with pedigree 0.0408, pedigree (1,3,2,1,1)
  (same comment as for Flumioxazin)
- Triallate [soil, agricultural]: 2.05e-6 kg; lognormal variance with pedigree 0.0338, pedigree (1,3,2,1,1)
  (same comment as for Flumioxazin)
- Metribuzin [soil, agricultural]: 2.52e-6 kg; lognormal variance with pedigree 0.0338, pedigree (1,3,2,1,1)
  (same comment as for Flumioxazin)
- Sethoxydim [air, non-urban air or from high stacks]: 5.47e-7 kg; lognormal variance with pedigree 0.0408, pedigree (1,3,2,1,1)
  (same comment as for Flumioxazin)
- Nitrate [water, ground-]: 1.9e-5 kg; lognormal variance with pedigree 0.0428, pedigree (3,3,2,1,1)
  (same comment as for Dinitrogen monoxide)
- Imidacloprid [soil, agricultural]: 7.44e-7 kg; lognormal variance with pedigree 0.0338, pedigree (1,3,2,1,1)
  (same comment as for Flumioxazin)
- Benzovindiflupyr [water, ground-]: 3.41e-7 kg; lognormal variance with pedigree 0.0408, pedigree (1,3,2,1,1)
  (same comment as for Flumioxazin)
- Sedaxane [water, ground-]: 7.18e-8 kg; lognormal variance with pedigree 0.0408, pedigree (1,3,2,1,1)
  (same comment as for Flumioxazin)
- Quizalofop-ethyl [water, ground-]: 6.95e-8 kg; lognormal variance with pedigree 0.0408, pedigree (1,3,2,1,1)
  (same comment as for Flumioxazin)
- Clethodim [air, non-urban air or from high stacks]: 3.68e-7 kg; lognormal variance with pedigree 0.0408, pedigree (1,3,2,1,1)
  (same comment as for Flumioxazin)
- Trifloxystrobin [soil, agricultural]: 4.55e-6 kg; lognormal variance with pedigree 0.0338, pedigree (1,3,2,1,1)
  (same comment as for Flumioxazin)
- Mercury [water, ground-]: 1.58447e-10 kg; lognormal variance with pedigree 0.0872596, pedigree (2,2,2,1,1)
  (same comment as for Zinc, ion)
- Azoxystrobin [soil, agricultural]: 4.09e-6 kg; lognormal variance with pedigree 0.0338, pedigree (1,3,2,1,1)
  (same comment as for Flumioxazin)
- Triallate [air, low population density, long-term]: 2.68e-7 kg; lognormal variance with pedigree 0.0408, pedigree (1,3,2,1,1)
  (same comment as for Flumioxazin)
- Benzovindiflupyr [soil, agricultural]: 3.07e-6 kg; lognormal variance with pedigree 0.0338, pedigree (1,3,2,1,1)
  (same comment as for Flumioxazin)
- Sulfentrazone [soil, agricultural]: 1.64e-6 kg; lognormal variance with pedigree 0.0338, pedigree (1,3,2,1,1)
  (same comment as for Flumioxazin)
- Copper, ion [water, ground-]: 8.15846e-7 kg; lognormal variance with pedigree 0.0872596, pedigree (2,2,2,1,1)
  (same comment as for Zinc, ion)
- Bentazone [water, ground-]: 5.29e-6 kg; lognormal variance with pedigree 0.0408, pedigree (1,3,2,1,1)
  (same comment as for Flumioxazin)
- Carboxin [soil, agricultural]: 7.85e-7 kg; lognormal variance with pedigree 0.0338, pedigree (1,3,2,1,1)
  (same comment as for Flumioxazin)
- Fluxapyroxad [soil, agricultural]: 5.27e-6 kg; lognormal variance with pedigree 0.0338, pedigree (1,3,2,1,1)
  (same comment as for Flumioxazin)
- Trifloxystrobin [water, ground-]: 5.05e-7 kg; lognormal variance with pedigree 0.0408, pedigree (1,3,2,1,1)
  (same comment as for Flumioxazin)
- Tribenuron-methyl [air, low population density, long-term]: 6.09e-9 kg; lognormal variance with pedigree 0.0408, pedigree (1,3,2,1,1)
  (same comment as for Flumioxazin)
- Clethodim [water, ground-]: 3.13e-7 kg; lognormal variance with pedigree 0.0408, pedigree (1,3,2,1,1)
  (same comment as for Flumioxazin)
- Glyphosate [soil, agricultural]: 0.000223 kg; lognormal variance with pedigree 0.0338, pedigree (1,3,2,1,1)
  (same comment as for Flumioxazin)
- Pyroxasulfone [water, ground-]: 2.83e-7 kg; lognormal variance with pedigree 0.0408, pedigree (1,3,2,1,1)
  (same comment as for Flumioxazin)
- Glyphosate [air, non-urban air or from high stacks]: 2.92e-5 kg; lognormal variance with pedigree 0.0408, pedigree (1,3,2,1,1)
  (same comment as for Flumioxazin)
- Carboxin [water, ground-]: 8.72e-8 kg; lognormal variance with pedigree 0.0408, pedigree (1,3,2,1,1)
  (same comment as for Flumioxazin)
- Carfentrazone ethyl ester [water, ground-]: 1.83e-8 kg; lognormal variance with pedigree 0.0408, pedigree (1,3,2,1,1)
  (same comment as for Flumioxazin)
- Boscalid [soil, agricultural]: 5.99e-7 kg; lognormal variance with pedigree 0.0338, pedigree (1,3,2,1,1)
  (same comment as for Flumioxazin)
- Pyraclostrobin [air, non-urban air or from high stacks]: 1.16e-6 kg; lognormal variance with pedigree 0.0408, pedigree (1,3,2,1,1)
  (same comment as for Flumioxazin)
- Copper, ion [water, surface water]: 1.06342e-5 kg; lognormal variance with pedigree 0.0872596, pedigree (2,2,2,1,1)
  (same comment as for Zinc, ion)

## Sampling procedure
Site-specific field data were collected via survey from prairie province pea producers for crop rotation, seeding rate, machinery and fuel use for field operations (e.g., tillage, harrowing, harvest), farm inputs (e.g., fertilizers, pesticides), and electricity for crop drying. Production weighted averages were calculated for the region. Outliers were removed from reported fuel use data based on visual inspection.

## Extrapolations
This dataset has been extrapolated from year 2019 to the year of the calculation (2021). The uncertainty has been adjusted accordingly.

## Review by Jens Lansche 2021-02-02
All comments from the previous reviews have been taken into account in the current version.
