# treatment of sludge, NaCl electrolysis, residual material landfill

Dataset: EcoSpold 2, unit process
Geography: RoW
Time period: 1994-01-01 to 2021-12-31
Technology level: current
Classification: EcoSpold01Categories: waste management/residual material landfill
Classification: ISIC rev.4 ecoinvent: 3822:Treatment and disposal of hazardous waste
Synonyms: Brine filtration sludge from chloralkali electrolysis WITHOUT mercury cells
Tags: ConvertedDataset; Treatment
Scenario: Business-as-Usual
System model: Allocation, cut-off by classification
Generated by: Gabor Doka (obsolete)
Published in: Doka G. 2009
Database: ecoinvent
isCopyrightProtected: true
accessRestrictedTo: 1

## General comment
Inventoried waste contains 100% Brine filtration sludge without mercury cells; .
waste composition (wet, in ppm): H2O n.a.; O 559210; H 16295; C n.a.; S 6857.2; N n.a.; P n.a.; B n.a.; Cl n.a.; Br n.a.; F n.a.; I n.a.; Ag n.a.; As n.a.; Ba 29428; Cd n.a.; Co n.a.; Cr n.a.; Cu n.a.; Hg n.a.; Mn n.a.; Mo n.a.; Ni n.a.; Pb n.a.; Sb n.a.; Se n.a.; Sn n.a.; V n.a.; Zn n.a.; Be n.a.; Sc n.a.; Sr n.a.; Ti n.a.; Tl n.a.; W n.a.; Si n.a.; Fe n.a.; Ca 190230; Al n.a.; K n.a.; Mg 197980; Na n.a.;
Share of carbon in waste that is biogenic 60.4%.
Additional solidification with 0.4 kg of cement.
[This dataset was already contained in the ecoinvent database version 2. It was not individually updated during the transfer to ecoinvent version 3. Life Cycle Impact Assessment results may still have changed, as they are affected by changes in the supply chain, i.e. in other datasets. This dataset was generated following the ecoinvent quality guidelines for version 2. It may have been subject to central changes described in the ecoinvent version 3 change report (http://www.ecoinvent.org/database/ecoinvent-version-3/reports-of-changes/), and the results of the central updates were reviewed extensively. The changes added e.g. consistent water flows and other information throughout the database. The documentation of this dataset can be found in the ecoinvent reports of version 2, which are still available via the ecoinvent website. The change report linked above covers all central changes that were made during the conversion process.]

## Included activities end
Waste-specific short-term emissions to water from leachate. Long-term emissions from landfill to ground water. Expenditures for solidificalion with cement (user-specified option)

## Geography
Technology encountered in Switzerland in 2000. Landfill includes base seal and leachate collection system.

## Technology
Swiss residual material landfill for polluted, inorganic waste. With base seal and leachate collection system. Recultivation after closure.

## Time period
Waste composition as given in literature reference, theoretical data or other source. Transfer coefficients from prospective model.

## Reference product
- sludge, NaCl electrolysis: -1 kg; By-product classification Waste; CPC 39920: Sewage sludge
  EcoSpold01Location=CH
  production volume 3.96633 kg
    This is a placeholder value that does not reflect real-world production volumes. This dataset does not currently require a real-world production volume to work in the database framework, and no actual data were collected yet. This has no negative effect on the results of the ecoinvent database.
  property price 0 EUR2005
    Waste products are assigned a price of zero as they are assumed to require further treatment.
  property carbon content 0
    carbon content on a dry matter basis (reserved; not for manual entry)
  properties: dry mass 1 kg, carbon content, non-fossil 0, water content 0, wet mass 1 kg, carbon content, fossil 0, water in wet mass 0 kg, carbon allocation 0 kg

## Inputs from technosphere
- waste cement, hydrated: 0 kg; pedigree (1,1,1,1,1)
  EcoSpold01Location=CH
  Hydrated cement for solidification of residual material waste. Uncertainty in mass from solidification recipe.
  production volume 0 kg
    Calculated from the production volume of sludge, NaCl electrolysis, 0% water in proportion to the respective output amounts.
  properties: dry mass 1 kg, wet mass 1 kg
- cement, unspecified: 0 kg; pedigree (1,1,1,1,1)
  EcoSpold01Location=CH
  Cement for solidification of residual material waste. Uncertainty in mass from solidification recipe.
  properties: dry mass 1 kg, wet mass 1 kg
- process-specific burdens, residual material landfill: 0 kg; pedigree (1,1,1,1,1)
  demands per kilogram waste. uncertainty is heeded in the module
  EcoSpold01Location=CH
- residual material landfill: 2.0833e-9 unit; lognormal variance with pedigree 0.042, pedigree (1,1,5,5,1)
  demands per kilogram waste. uncertainty is heeded in the module
  EcoSpold01Location=CH
- waste cement, hydrated: -0.282874, -0.717126 kg (2 entries); lognormal variance with pedigree 0.052, pedigree (1,1,5,5,1)
  (same comment as for waste cement, hydrated)
  production volume 3 kg
- cement, unspecified: 0.0577583, 0.0120178, 0.00088022, 0.00250892, 0.05674, 0.00167002, 0.0183418, 0.00221915, 0.247864 kg (9 entries); lognormal variance with pedigree 0.052, pedigree (1,1,5,5,1)
  (same comment as for cement, unspecified)
- process-specific burdens, residual material landfill: 0.282874, 0.717126 kg (2 entries); lognormal variance with pedigree 0.042, pedigree (1,1,5,5,1)
  demands per kilogram waste. uncertainty is heeded in the module
  EcoSpold01Location=CH

## Emissions to nature
- Magnesium [water, surface water]: 3.7555e-5 kg; lognormal variance with pedigree 0.982, pedigree (1,1,5,5,1)
  uncertainty is calculated from uncertainties in waste composition and transfer coefficients in residual landfill
- Barium [water, surface water]: 4.0582e-7 kg; lognormal variance with pedigree 1.502, pedigree (1,1,5,5,1)
  (same comment as for Magnesium)
- Calcium, ion [water, ground-, long-term]: 0.017189 kg; lognormal variance with pedigree 1.552, pedigree (1,1,5,5,1)
  uncertainty is calculated from uncertainties in waste composition and transfer coefficients in incinerator and landfills.
- Barium [water, ground-, long-term]: 0.00024309 kg; lognormal variance with pedigree 6.032, pedigree (1,1,5,5,1)
  (same comment as for Calcium, ion)
- Magnesium [water, ground-, long-term]: 0.022496 kg; lognormal variance with pedigree 1.292, pedigree (1,1,5,5,1)
  (same comment as for Calcium, ion)
- Sulfate [water, ground-, long-term]: 0.018365 kg; lognormal variance with pedigree 0.452, pedigree (1,1,5,5,1)
  (same comment as for Calcium, ion)
- Calcium, ion [water, surface water]: 2.8696e-5 kg; lognormal variance with pedigree 1.012, pedigree (1,1,5,5,1)
  (same comment as for Magnesium)
- Sulfate [water, surface water]: 0.0022071 kg; lognormal variance with pedigree 0.572, pedigree (1,1,5,5,1)
  (same comment as for Magnesium)

## Sampling procedure
Landfill model based on observed leachate concentrations in literature. Extrapolated to 60'000 years heeding chemical characteristics. Initial waste composition from various literature sources.

## Extrapolations
This dataset has been copied from an original dataset covering the geography CH. The uncertainty has been adjusted accordingly.

## Review by Niels Jungbluth 2009-02-15
passed.
