# treatment of copper in car shredder residue, municipal incineration

Dataset: EcoSpold 2, unit process
Geography: CH
Time period: 1994-01-01 to 2021-12-31
Technology level: outdated
Classification: EcoSpold01Categories: waste management/municipal incineration
Classification: ISIC rev.4 ecoinvent: 3821:Treatment and disposal of non-hazardous waste
Synonyms: Metallteile in RESH aus Automobilen; metal parts in Automotive Shredder Residue ASR
Tags: Treatment; ConvertedDataset
Scenario: Business-as-Usual
System model: Allocation, cut-off by classification
Generated by: Gabor Doka (obsolete)
Published in: Doka G. 2007
Database: ecoinvent
isCopyrightProtected: true
accessRestrictedTo: 1

## General comment
Inventoried waste contains 50% Cu in ASR burnable; 50% Cu in ASR inert; .
waste composition (wet, in ppm): H2O n.a.; O n.a.; H n.a.; C n.a.; S 0.0000028372; N n.a.; P n.a.; B n.a.; Cl n.a.; Br n.a.; F n.a.; I n.a.; Ag 489.05; As n.a.; Ba n.a.; Cd n.a.; Co n.a.; Cr 2.7346; Cu 924870; Hg n.a.; Mn 1483.2; Mo n.a.; Ni 4062.3; Pb 0.0044823; Sb 3438.1; Se n.a.; Sn 8733.9; V 0.00002178; Zn 1075.5; Be n.a.; Sc n.a.; Sr n.a.; Ti n.a.; Tl n.a.; W n.a.; Si 6428.2; Fe 9181.1; Ca n.a.; Al 40233; K n.a.; Mg n.a.; Na n.a.;
Share of carbon in waste that is biogenic 60.4%.
Share of iron in waste that is metallic/recyclable 0%.
Net energy produced in MSWI: 0MJ/kg waste electric energy and 0MJ/kg waste thermal energy
Allocation of energy production: no substitution or expansion. Total burden allocated to waste disposal function of MSWI.
One kg of this waste produces 1.145 kg of slag and 0.1281 kg of residues, which are landfilled. Additional solidification with 0.05123 kg of cement.
[This dataset was already contained in the ecoinvent database version 2. It was not individually updated during the transfer to ecoinvent version 3. Life Cycle Impact Assessment results may still have changed, as they are affected by changes in the supply chain, i.e. in other datasets. This dataset was generated following the ecoinvent quality guidelines for version 2. It may have been subject to central changes described in the ecoinvent version 3 change report (http://www.ecoinvent.org/database/ecoinvent-version-3/reports-of-changes/), and the results of the central updates were reviewed extensively. The changes added e.g. consistent water flows and other information throughout the database. The documentation of this dataset can be found in the ecoinvent reports of version 2, which are still available via the ecoinvent website. The change report linked above covers all central changes that were made during the conversion process.]

## Included activities end
waste-specific air and water emisions from incineration, auxiliary material consumption for flue gas cleaning. Short-term emissions to river water and long-term emisisons to ground water from slag compartment (from bottom slag) and residual material landfill (from solidified fly ashes and scrubber slugde). Process energy demands for MSWI.

## Geography
Specific to the technology mix encountered in Switzerland in 2000. Well applicable to modern incineration practices in Europe, North America or Japan.

## Technology
replaced by newer incineration technology with fly ash extraction. Average Swiss MSWI plants in 2000 with electrostatic precipitator for fly ash (ESP), wet flue gas scrubber and 29.4% SNCR , 32.2% SCR-high dust , 24.6% SCR-low dust -DeNOx facilities and 13.8% without Denox (by burnt waste, according to Swiss average). Share of waste incinerated in plants with magnetic scrap separation from slag : 50%. Gross electric efficiency technology mix 12.997% and Gross thermal efficiency technology mix 25.57%

## Time period
Waste composition as given in literature reference, theoretical data or other source. Transfer coefficients for modern Swiss MSWI. Emission speciation based on early 90ies data.

## Reference product
- copper in car shredder residue: -1 kg; By-product classification Waste; CPC 39361: Waste and scrap of copper; CAS 7440-50-8
  EcoSpold01Location=CH
  production volume 0 kg; name RP_PV_1
    outdated. Replaced by newer incineration technology with fly ash extraction.
  property price 0 EUR2005
    Waste products are assigned a price of zero as they are assumed to require further treatment.
  property carbon content 0
    carbon content on a dry matter basis (reserved; not for manual entry)
  properties: carbon content, non-fossil 0, wet mass 1 kg, water in wet mass 0 kg, dry mass 1 kg, carbon content, fossil 0, water content 0, carbon allocation 0 kg

## Inputs from technosphere
- heat, for reuse in municipal waste incineration only: 0.839 MJ; name E_th_prod_MSWI; lognormal variance with pedigree 0.04, pedigree (1,1,5,1,1)
  uncertainty is calculated from uncertainties in waste composition and uncertainties in energy efficiency and the uncertainty in internal energy demand
- process-specific burdens, municipal waste incineration: 1 kg; lognormal variance with pedigree 0.04, pedigree (1,1,5,1,1)
  EcoSpold01Location=CH
  demands per kilogram waste. uncertainty is heeded in the module;activityLink introduced to establish a direct link to the corresponding regional supply of this product
- iron (III) chloride, without water, in 40% solution state: 0.00426 kg; lognormal variance with pedigree 0.06, pedigree (1,1,5,1,1)
  uncertainty calculated from uncertainty in average auxiliary material input, and the unertainty of the waste composition of this waste
  EcoSpold01Location=CH
  properties: wet mass 1 kg, dry mass 1 kg
- waste cement, hydrated: -0.128 kg; name BP_amount_1; lognormal variance with pedigree 0.05, pedigree (1,1,5,1,1)
  Hydrated cement for solidification of landfilled residual material. Uncertainty calculated from unertainty of the waste composition of this waste and transfer coefficients in the incinerator and of the solidification recipe.
  EcoSpold01Location=CH
  production volume 0 kg; = RP_PV_1* BP_amount_1
    Calculated from the production volume of copper in car shredder residue, 0% water in proportion to the respective output amounts.
  property price 0 EUR2005; name BP_amount_1_price_EUR2005
  properties: wet mass 1 kg, dry mass 1 kg
- process-specific burdens, slag landfill: 1.15 kg; lognormal variance with pedigree 0.04, pedigree (1,1,5,1,1)
  EcoSpold01Location=CH
  uncertainty is calculated from uncertainties in waste composition and transfer coefficients in incinerator;activityLink introduced to establish a direct link to the corresponding regional supply of this product
- residual material landfill: 2.67e-10 unit; lognormal variance with pedigree 0.04, pedigree (1,1,5,1,1)
  EcoSpold01Location=CH
  uncertainty is calculated from uncertainties in waste composition and transfer coefficients in incinerator
- electricity, for reuse in municipal waste incineration only: 0.144 kWh; name E_el_prod_MSWI; lognormal variance with pedigree 0.48, pedigree (1,1,5,1,1)
  (same comment as for heat, for reuse in municipal waste incineration only)
- process-specific burdens, residual material landfill: 0.128 kg; lognormal variance with pedigree 0.04, pedigree (1,1,5,1,1)
  uncertainty is calculated from uncertainties in waste composition and transfer coefficients in incinerator;activityLink introduced to establish a direct link to the corresponding regional supply of this product
  EcoSpold01Location=CH
- slag landfill: 2.04e-9 unit; lognormal variance with pedigree 0.04, pedigree (1,1,5,1,1)
  (same comment as for residual material landfill)
- chemical, inorganic: 2.34e-5 kg; lognormal variance with pedigree 0.06, pedigree (1,1,5,1,1)
  Proxy for Polyelectrolyte. uncertainty calculated from uncertainty in average auxiliary material input, and the unertainty of the waste composition of this waste
  EcoSpold01Location=GLO
  properties: wet mass 1 kg, carbon content, fossil 0.003, dry mass 1 kg
  note on carbon content, fossil: This dataset is an unweighted average of 20 inorganic substances (listed in Tab 88.1, ecoinvent v2.2 report 8, part II), being part of the top100 chemicals included in this database. The C-content has also been calculated as an unweighted average of the C content of the substances composing this dataset.
- hydrochloric acid, without water, in 30% solution state: 1.41e-5 kg; lognormal variance with pedigree 0.06, pedigree (1,1,5,1,1)
  EcoSpold01Location=RER
  uncertainty calculated from uncertainty in average auxiliary material input, and the unertainty of the waste composition of this waste
  properties: dry mass 1 kg, wet mass 1 kg, heating value, net 3.32 MJ
- sodium hydroxide, without water, in 50% solution state: 5.19e-13 kg; lognormal variance with pedigree 1.42, pedigree (1,1,5,1,1)
  (same comment as for hydrochloric acid, without water, in 30% solution state)
  properties: dry mass 1 kg, wet mass 1 kg, heating value, net 3.03 MJ
- cement, unspecified: 0.0512 kg; lognormal variance with pedigree 0.05, pedigree (1,1,5,1,1)
  EcoSpold01Location=CH
  Cement for solidification of landfilled residual material. Uncertainty calculated from unertainty of the waste composition of this waste, of transfer coefficients in the incinerator and of the solidification recipe.
  properties: dry mass 1 kg, wet mass 1 kg
- municipal waste incineration facility: 2.5e-10 unit; lognormal variance with pedigree 0.04, pedigree (1,1,5,1,1)
  EcoSpold01Location=CH
  demands per kilogram waste. uncertainty is heeded in the module

## Emissions to nature
- Iron, ion [water, ground-, long-term]: 0.00454 kg; lognormal variance with pedigree 0.72, pedigree (1,1,5,1,1)
  Long-term emissions from landfilling of incineration residues. uncertainty is calculated from uncertainties in waste composition and transfer coefficients in incinerator and landfills.
- Nickel, ion [water, surface water]: 2.55e-6 kg; lognormal variance with pedigree 1.17, pedigree (1,1,5,1,1)
  uncertainty is calculated from uncertainties in waste composition and transfer coefficients in incinerator and landfills
- Sulfate [water, ground-, long-term]: 7.43e-12 kg; lognormal variance with pedigree 1.68, pedigree (1,1,5,1,1)
  (same comment as for Iron, ion)
- Tin, ion [water, surface water]: 2.32e-7 kg; lognormal variance with pedigree 0.91, pedigree (1,1,5,1,1)
  (same comment as for Nickel, ion)
- Vanadium, ion [water, surface water]: 1.22e-14 kg; lognormal variance with pedigree 2.34, pedigree (1,1,5,1,1)
  (same comment as for Nickel, ion)
- Iron [air, urban air close to ground]: 1.53e-7 kg; lognormal variance with pedigree 0.47, pedigree (1,1,5,1,1)
  uncertainty is calculated from uncertainties in waste composition and transfer coefficients in incinerator
- Iron, ion [water, surface water]: 1.61e-6 kg; lognormal variance with pedigree 0.41, pedigree (1,1,5,1,1)
  (same comment as for Nickel, ion)
- Silicon [water, surface water]: 8e-7 kg; lognormal variance with pedigree 0.72, pedigree (1,1,5,1,1)
  (same comment as for Nickel, ion)
- Copper, ion [water, surface water]: 3.48e-5 kg; lognormal variance with pedigree 0.93, pedigree (1,1,5,1,1)
  (same comment as for Nickel, ion)
- Antimony [air, urban air close to ground]: 6.69e-12 kg; lognormal variance with pedigree 0.68, pedigree (1,1,5,1,1)
  (same comment as for Iron)
- Aluminium [air, urban air close to ground]: 3.14e-5 kg; lognormal variance with pedigree 0.27, pedigree (1,1,5,1,1)
  (same comment as for Iron)
- Sulfur dioxide [air, urban air close to ground]: 6.04e-15 kg; lognormal variance with pedigree 1.98, pedigree (1,1,5,1,1)
  (same comment as for Iron)
- Tin [air, urban air close to ground]: 5.79e-6 kg; lognormal variance with pedigree 0.44, pedigree (1,1,5,1,1)
  (same comment as for Iron)
- Tin, ion [water, ground-, long-term]: 0.00654 kg; lognormal variance with pedigree 0.48, pedigree (1,1,5,1,1)
  (same comment as for Iron, ion)
- Methane, fossil [air, urban air close to ground]: 2.53e-6 kg; lognormal variance with pedigree 0.091225, pedigree (2,3,5,2,1)
  Confidential data from 5 plants in Switzerland and Germany
  Uncertainty: & basic uncertainty of 1.5; confidential data from 5 plants in Switzerland and Germany
- Manganese [air, urban air close to ground]: 4.04e-12 kg; lognormal variance with pedigree 0.78, pedigree (1,1,5,1,1)
  (same comment as for Iron)
- Chromium, ion [water, surface water]: 4.36e-9 kg; lognormal variance with pedigree 1.5, pedigree (1,1,5,1,1)
  (same comment as for Nickel, ion)
- Copper, ion [water, ground-, long-term]: 0.836 kg; lognormal variance with pedigree 0.04, pedigree (1,1,5,1,1)
  (same comment as for Iron, ion)
- Manganese [water, ground-, long-term]: 0.00138 kg; lognormal variance with pedigree 0.67, pedigree (1,1,5,1,1)
  (same comment as for Iron, ion)
- Lead [air, urban air close to ground]: 8.32e-14 kg; lognormal variance with pedigree 2.01, pedigree (1,1,5,1,1)
  (same comment as for Iron)
- Vanadium [air, urban air close to ground]: 1.09e-15 kg; lognormal variance with pedigree 2, pedigree (1,1,5,1,1)
  (same comment as for Iron)
- Chromium VI [water, ground-, long-term]: 1.54e-7 kg; lognormal variance with pedigree 2.85, pedigree (1,1,5,1,1)
  (same comment as for Iron, ion)
- Sulfate [water, surface water]: 1.08e-12 kg; lognormal variance with pedigree 1.39, pedigree (1,1,5,1,1)
  (same comment as for Nickel, ion)
- Silicon [air, urban air close to ground]: 7.48e-6 kg; lognormal variance with pedigree 0.48, pedigree (1,1,5,1,1)
  (same comment as for Iron)
- Aluminium [water, ground-, long-term]: 0.0313 kg; lognormal variance with pedigree 0.25, pedigree (1,1,5,1,1)
  (same comment as for Iron, ion)
- Manganese [water, surface water]: 7.94e-8 kg; lognormal variance with pedigree 1.56, pedigree (1,1,5,1,1)
  (same comment as for Nickel, ion)
- Silver, ion [water, surface water]: 3.76e-8 kg; lognormal variance with pedigree 0.93, pedigree (1,1,5,1,1)
  (same comment as for Nickel, ion)
- Zinc [air, urban air close to ground]: 8.78e-9 kg; lognormal variance with pedigree 0.74, pedigree (1,1,5,1,1)
  (same comment as for Iron)
- Copper [air, urban air close to ground]: 3.41e-6 kg; lognormal variance with pedigree 0.1, pedigree (1,1,5,1,1)
  (same comment as for Iron)
- Silver [air, urban air close to ground]: 3.18e-9 kg; lognormal variance with pedigree 0.84, pedigree (1,1,5,1,1)
  (same comment as for Iron)
- Chromium [air, urban air close to ground]: 1.01e-13 kg; lognormal variance with pedigree 1.58, pedigree (1,1,5,1,1)
  (same comment as for Iron)
- Chromium VI [water, surface water]: 4.46e-8 kg; lognormal variance with pedigree 1.38, pedigree (1,1,5,1,1)
  (same comment as for Nickel, ion)
- Zinc, ion [water, ground-, long-term]: 0.000546 kg; lognormal variance with pedigree 1.51, pedigree (1,1,5,1,1)
  (same comment as for Iron, ion)
- Silicon [water, ground-, long-term]: 0.000307 kg; lognormal variance with pedigree 5.67, pedigree (1,1,5,1,1)
  (same comment as for Iron, ion)
- Lead [water, ground-, long-term]: 2.4e-9 kg; lognormal variance with pedigree 4.52, pedigree (1,1,5,1,1)
  (same comment as for Iron, ion)
- Antimony [water, ground-, long-term]: 0.00135 kg; lognormal variance with pedigree 0.44, pedigree (1,1,5,1,1)
  (same comment as for Iron, ion)
- Antimony [water, surface water]: 0.000598 kg; lognormal variance with pedigree 0.45, pedigree (1,1,5,1,1)
  (same comment as for Nickel, ion)
- Nickel [air, urban air close to ground]: 8.77e-11 kg; lognormal variance with pedigree 0.63, pedigree (1,1,5,1,1)
  (same comment as for Iron)
- Aluminium [water, surface water]: 1.94e-6 kg; lognormal variance with pedigree 0.72, pedigree (1,1,5,1,1)
  (same comment as for Nickel, ion)
- Zinc, ion [water, surface water]: 1.15e-7 kg; lognormal variance with pedigree 0.58, pedigree (1,1,5,1,1)
  (same comment as for Nickel, ion)
- Methane, non-fossil [air, urban air close to ground]: 3.86e-6 kg; lognormal variance with pedigree 0.091225, pedigree (2,3,5,2,1)
  (same comment as for Methane, fossil)
- Lead [water, surface water]: 1.03e-13 kg; lognormal variance with pedigree 2.11, pedigree (1,1,5,1,1)
  (same comment as for Nickel, ion)
- Silver, ion [water, ground-, long-term]: 0.000399 kg; lognormal variance with pedigree 0.77, pedigree (1,1,5,1,1)
  (same comment as for Iron, ion)
- Carbon monoxide, non-fossil [air, urban air close to ground]: 0.000135 kg; lognormal variance with pedigree 0.690625, pedigree (1,3,5,2,1)
  Literature data from switzerland and germany adapted to plant age distribution in switzerland
  Uncertainty: & basic uncertainty of 5; literature data from switzerland and germany adapted to plant age distribution in switzerland
- Nickel, ion [water, ground-, long-term]: 0.00393 kg; lognormal variance with pedigree 0.5, pedigree (1,1,5,1,1)
  (same comment as for Iron, ion)
- Carbon monoxide, fossil [air, urban air close to ground]: 8.82e-5 kg; lognormal variance with pedigree 0.690625, pedigree (1,3,5,2,1)
  (same comment as for Carbon monoxide, non-fossil)
- Vanadium, ion [water, ground-, long-term]: 2.93e-12 kg; lognormal variance with pedigree 2.97, pedigree (1,1,5,1,1)
  (same comment as for Iron, ion)

## Sampling procedure
waste-specific calculation based on literature data

## Extrapolations
This dataset has been extrapolated from year 2000 to the year of the calculation (2021). The uncertainty has been adjusted accordingly.

## Review by Niels Jungbluth 2003-07-15
Passed. Calculation for standard deviation 95 of, i.e., infrastructure,
land occupation, transport services or other services can differ from
standard Pedigree approach used in this project and figures obtained by
this procedure.
