# heat production, wood pellet, at furnace 300kW, state-of-the-art 2014

Dataset: EcoSpold 2, unit process
Geography: RoW
Time period: 2014-01-01 to 2021-12-31
Technology level: modern
Classification: EcoSpold01Categories: wood energy/heating systems
Classification: ISIC rev.4 ecoinvent: 3530:Steam and air conditioning supply
Scenario: Business-as-Usual
System model: Allocation, cut-off by classification
Share of production covered: 0.1 %
Generated by: Christian Bauer
Published in: Bauer, C. 2007
Database: ecoinvent
isCopyrightProtected: true
accessRestrictedTo: 1

## General comment
Activity represents combustion of wood pellets in new (=installed in 2014) wood pellet furnaces in Switzerland. Only uncertainty factors were adjusted in order to provide a GLO activity. The inventory shall be considered valid for boilers with nominal capacities in the approximate range of 100 to 500 kW. The activity represents average annual operation including start/stop (warm up and cool down), which reduces the efficiency compared to rated values provided by boiler manufacturers and increases some emission factors such as CO. Air emission factors as well as other exchanges correspond to v2.2 except of PM, CO, NOx, CH4 and NMVOC. These key emission factors were updated based on latest available information.
[This dataset was already contained in the ecoinvent database version 2. It was not individually updated during the transfer to ecoinvent version 3. Life Cycle Impact Assessment results may still have changed, as they are affected by changes in the supply chain, i.e. in other datasets. This dataset was generated following the ecoinvent quality guidelines for version 2. It may have been subject to central changes described in the ecoinvent version 3 change report (http://www.ecoinvent.org/database/ecoinvent-version-3/reports-of-changes/), and the results of the central updates were reviewed extensively. The changes added e.g. consistent water flows and other information throughout the database. The documentation of this dataset can be found in the ecoinvent reports of version 2, which are still available via the ecoinvent website. The change report linked above covers all central changes that were made during the conversion process.]

## Included activities start
From reception of wood pellets.

## Included activities end
This activity represents the combustion of wood pellets until heat production at the boiler outlet. Included are the infrastructure, the wood requirements (average pellets, u=10%), the emissions to air, the electricity needed for operation, and the disposal of the ashes.

## Geography
based on data from Switzerland

## Technology
Modern boiler technology installed in CH in 2014

## Time period
Some emission data are from the second half of the 1990´s. However, key emission factors (PM, CO, NOx, CH4 and NMVOC) are updated in 2014. Activity can be considered as representative for new installations until 2020.

## Parameters
- scaling factor: 1.25 dimensionless; name scaling_factor; = 1/0.8
  the scaling factor corresponds to the inverse of the annual use efficiency. This efficiency represents an average annual value including start/stop operation (warm-up and cool down), which reduces the efficiency compared to rated values of the manufacturer. Source: Thomas Nussbaumer, Verenum, January 2014, personal communication.

## Reference product
- heat, central or small-scale, other than natural gas: 1 MJ; = 0.8 * scaling_factor; source T. Nussbaumer 2014; CPC 17300: Steam and hot water; By-product classification allocatable product
  EcoSpold01Location=CH
  Original dataset referred to 1MJ energy input (end energy). Amount was scaled to 1 using annual use efficiency of 0.8 (according to source).
  production volume 1.44659e10 MJ; = 26500000000*0.6
    Literature value / calculation.
    Data taken from BFE (2012) and extrapolated to global conditions with a factor 1:10 between CH:GLO.
    Total energy input from wood in different types of plants in 2009 in Switzerland amounts to 36800 TJ. Out of it, only a certain share is turned into heat due to efficiencies lower than 1. These efficiencies could be calculated with data present for the year 2012, which were taken over for calculating the heat output for 2009. The resulting output of 23852 TJ was evenly distributed between the six 9 datasets modelling heat production with wood in the database (3 datasets for heat production with mixed logs, 2 datasets for heat production with hardwood, softwood and wood pellets each). 60% of the totel APV in this category are estimated to correspond to "modern" technology according to data from Switzerland.
    BFE. 2012. Schweizerische Gesamtenergiestatistik 2012. Bundesamt für Energie, Bern, Switzerland.
  property price 0.0106 EUR2005
    Average European district heat price from Ecoheatcool and Euroheat 2005-2006, Ecoheat Work package 1: The European heat market. Final report. 10.6 EUR/GJ i s the price of district heat. http://www.solarthermalworld.org/files/Ecoheatcool%20WP1%20Web.pdf?download
  properties: Corresponding fuel use 1.17647 MJ, heating value, net 1 MJ

## Inputs from technosphere
- electricity, low voltage: 0 kWh; source Bauer, C. 2007; pedigree (1,1,1,1,1)
  EcoSpold01Location=CH
  general assuption
  Amount was scaled to the amount of reference product.
- wood pellet, measured as dry mass: 0.0667062 kg; = 0.053365 * scaling_factor; source Bauer, C. 2007; lognormal variance with pedigree 0.5127, pedigree (2,2,5,5,4)
  EcoSpold01Location=RER
  Literature value. Original amount (from the source, ecoinvent v2.2) was scaled to the amount of the new reference product using the annual efficiency. Corresponds to a LHV of 18.7 MJ/kg.
  properties: wet mass 1.1 kg, carbon content, non-fossil 0.494, dry mass 1 kg, heating value, net 13.38 MJ, water content 0.1
  note on carbon content, non-fossil: C content of dry mass is 0.494 kgC/kg dry wood (ecoinvent v2.2 report 9).
- furnace, pellets, with silo, 300kW: 2.89352e-8 unit; = 1/(20*2000*300*3.6) * scaling_factor; lognormal variance with pedigree 0.5127, pedigree (2,2,5,5,4)
  Calculated value. Assuming 20 years lifetime, 2000 operational hours per year, 300kW capactiy.
- wood ash mixture, pure: 0 kg; source Bauer, C. 2007; pedigree (1,1,1,1,1)
  EcoSpold01Location=CH
  homogeneous fuel
  Amount was scaled to the amount of reference product.
  production volume 0 kg
    Calculated from the production volume of wood pellet, mixed, burned in furnace 50kW in proportion to the respective output amounts.
  properties: wet mass 1 kg, dry mass 1 kg, carbon content, non-fossil 0.012
- electricity, low voltage: 5.4417e-5, 9.90829e-6, 0.000223668, 0.000781444, 0.000159536, 0.00244938, 0.000396267, 0.00113788 kWh (8 entries); source Bauer, C. 2007; lognormal variance with pedigree 0.5127, pedigree (2,2,5,5,4)
  (same comment as for electricity, low voltage)
- wood ash mixture, pure: -9.64313e-5, -0.000201069 kg (2 entries); source Bauer, C. 2007; lognormal variance with pedigree 0.002, pedigree (1,1,3,1,1)
  (same comment as for wood ash mixture, pure)
  production volume 1.27631e9 kg

## Emissions to nature
- Dinitrogen monoxide [air, urban air close to ground]: 3.125e-6 kg; = 2.5E-06 * scaling_factor; source Bauer, C. 2007; lognormal variance with pedigree 0.5127, pedigree (2,2,5,5,4)
  extrapolation, based on measuring data of other emissions
  Amount was scaled to the amount of reference product.
- Arsenic [air, urban air close to ground]: 1.25e-9 kg; = 1E-09 * scaling_factor; source Bauer, C. 2007; lognormal variance with pedigree 0.5127, pedigree (2,2,5,5,4)
  (same comment as for Dinitrogen monoxide)
- Chromium VI [air, urban air close to ground]: 5e-11 kg; = 4E-11 * scaling_factor; source Bauer, C. 2007; lognormal variance with pedigree 0.5127, pedigree (2,2,5,5,4)
  (same comment as for Dinitrogen monoxide)
- Bromine [air, urban air close to ground]: 7.5e-8 kg; = 6E-08 * scaling_factor; source Bauer, C. 2007; lognormal variance with pedigree 0.5127, pedigree (2,2,5,5,4)
  (same comment as for Dinitrogen monoxide)
- Methane, non-fossil [air, urban air close to ground]: 3e-6 kg; = 2.4E-06 * scaling_factor; source Bauer, C. 2007; lognormal variance with pedigree 0.5127, pedigree (2,2,5,5,4)
  (same comment as for Dinitrogen monoxide)
- Ammonia [air, urban air close to ground]: 2.1625e-6 kg; = 1.73E-06 * scaling_factor; source Bauer, C. 2007; lognormal variance with pedigree 0.5127, pedigree (2,2,5,5,4)
  (same comment as for Dinitrogen monoxide)
- Magnesium [air, urban air close to ground]: 4.5e-7 kg; = 3.6E-07 * scaling_factor; source Bauer, C. 2007; lognormal variance with pedigree 0.5127, pedigree (2,2,5,5,4)
  (same comment as for Dinitrogen monoxide)
- Copper [air, urban air close to ground]: 2.75e-8 kg; = 2.2E-08 * scaling_factor; source Bauer, C. 2007; lognormal variance with pedigree 0.5127, pedigree (2,2,5,5,4)
  (same comment as for Dinitrogen monoxide)
- Fluorine [air, urban air close to ground]: 6.25e-8 kg; = 5E-08 * scaling_factor; source Bauer, C. 2007; lognormal variance with pedigree 0.5127, pedigree (2,2,5,5,4)
  (same comment as for Dinitrogen monoxide)
- Toluene [air, urban air close to ground]: 3.75e-7 kg; = 3E-07 * scaling_factor; source Bauer, C. 2007; lognormal variance with pedigree 0.5127, pedigree (2,2,5,5,4)
  (same comment as for Dinitrogen monoxide)
- Zinc [air, urban air close to ground]: 3.75e-7 kg; = 3E-07 * scaling_factor; source Bauer, C. 2007; lognormal variance with pedigree 0.5127, pedigree (2,2,5,5,4)
  (same comment as for Dinitrogen monoxide)
- Benzo(a)pyrene [air, urban air close to ground]: 6.25e-10 kg; = 5E-10 * scaling_factor; source Bauer, C. 2007; lognormal variance with pedigree 0.5127, pedigree (2,2,5,5,4)
  (same comment as for Dinitrogen monoxide)
- Phosphorus [air, urban air close to ground]: 3.75e-7 kg; = 3E-07 * scaling_factor; source Bauer, C. 2007; lognormal variance with pedigree 0.5127, pedigree (2,2,5,5,4)
  (same comment as for Dinitrogen monoxide)
- Sulfur dioxide [air, urban air close to ground]: 3.125e-6 kg; = 2.5E-06 * scaling_factor; source Bauer, C. 2007; lognormal variance with pedigree 0.5127, pedigree (2,2,5,5,4)
  (same comment as for Dinitrogen monoxide)
- Benzene, ethyl- [air, urban air close to ground]: 3.75e-8 kg; = 3E-08 * scaling_factor; source Bauer, C. 2007; lognormal variance with pedigree 0.5127, pedigree (2,2,5,5,4)
  (same comment as for Dinitrogen monoxide)
- m-Xylene [air, urban air close to ground]: 1.5e-7 kg; = 1.2E-07 * scaling_factor; source Bauer, C. 2007; lognormal variance with pedigree 0.5127, pedigree (2,2,5,5,4)
  (same comment as for Dinitrogen monoxide)
- Mercury [air, urban air close to ground]: 3.75e-10 kg; = 3E-10 * scaling_factor; source Bauer, C. 2007; lognormal variance with pedigree 0.5127, pedigree (2,2,5,5,4)
  (same comment as for Dinitrogen monoxide)
- Calcium [air, urban air close to ground]: 7.3125e-6 kg; = 5.85E-06 * scaling_factor; source Bauer, C. 2007; lognormal variance with pedigree 0.5127, pedigree (2,2,5,5,4)
  (same comment as for Dinitrogen monoxide)
- Dioxins, measured as 2,3,7,8-tetrachlorodibenzo-p-dioxin [air, urban air close to ground]: 3.875e-14 kg; = 3.1E-14 * scaling_factor; source Bauer, C. 2007; lognormal variance with pedigree 0.5127, pedigree (2,2,5,5,4)
  (same comment as for Dinitrogen monoxide)
- Cadmium [air, urban air close to ground]: 8.75e-10 kg; = 7E-10 * scaling_factor; source Bauer, C. 2007; lognormal variance with pedigree 0.5127, pedigree (2,2,5,5,4)
  (same comment as for Dinitrogen monoxide)
- Sodium [air, urban air close to ground]: 1.625e-6 kg; = 1.3E-06 * scaling_factor; source Bauer, C. 2007; lognormal variance with pedigree 0.5127, pedigree (2,2,5,5,4)
  (same comment as for Dinitrogen monoxide)
- Carbon dioxide, non-fossil [air, urban air close to ground]: 0.120625 kg; = 0.0965 * scaling_factor; source Bauer, C. 2007; lognormal variance with pedigree 0.5127, pedigree (2,2,5,5,4)
  uncertainty of carbon content in the wood
  Amount was scaled to the amount of reference product.
- Lead [air, urban air close to ground]: 3.125e-8 kg; = 2.5E-08 * scaling_factor; source Bauer, C. 2007; lognormal variance with pedigree 0.5127, pedigree (2,2,5,5,4)
  (same comment as for Dinitrogen monoxide)
- Nickel [air, urban air close to ground]: 7.5e-9 kg; = 6E-09 * scaling_factor; source Bauer, C. 2007; lognormal variance with pedigree 0.5127, pedigree (2,2,5,5,4)
  (same comment as for Dinitrogen monoxide)
- PAH, polycyclic aromatic hydrocarbons [air, urban air close to ground]: 1.3875e-8 kg; = 1.11E-08 * scaling_factor; source Bauer, C. 2007; lognormal variance with pedigree 0.5127, pedigree (2,2,5,5,4)
  (same comment as for Dinitrogen monoxide)
- NMVOC, non-methane volatile organic compounds, unspecified origin [air, urban air close to ground]: 7e-6 kg; = 5.6E-06 * scaling_factor; source T. Nussbaumer 2014; lognormal variance with pedigree 0.0747, pedigree (2,2,3,5,4)
  estimation
- Potassium [air, urban air close to ground]: 2.925e-5 kg; = 2.34E-05 * scaling_factor; source Bauer, C. 2007; lognormal variance with pedigree 0.5127, pedigree (2,2,5,5,4)
  (same comment as for Dinitrogen monoxide)
- Benzene, hexachloro- [air, urban air close to ground]: 9e-15 kg; = 7.2E-15 * scaling_factor; source Bauer, C. 2007; lognormal variance with pedigree 0.5127, pedigree (2,2,5,5,4)
  (same comment as for Dinitrogen monoxide)
- Acetaldehyde [air, urban air close to ground]: 7.625e-8 kg; = 6.1E-08 * scaling_factor; source Bauer, C. 2007; lognormal variance with pedigree 0.5127, pedigree (2,2,5,5,4)
  (same comment as for Dinitrogen monoxide)
- Chromium [air, urban air close to ground]: 4.95e-9 kg; = 3.96E-09 * scaling_factor; source Bauer, C. 2007; lognormal variance with pedigree 0.5127, pedigree (2,2,5,5,4)
  (same comment as for Dinitrogen monoxide)
- Chlorine [air, urban air close to ground]: 2.25e-7 kg; = 1.8E-07 * scaling_factor; source Bauer, C. 2007; lognormal variance with pedigree 0.5127, pedigree (2,2,5,5,4)
  (same comment as for Dinitrogen monoxide)
- Formaldehyde [air, urban air close to ground]: 1.625e-7 kg; = 1.3E-07 * scaling_factor; source Bauer, C. 2007; lognormal variance with pedigree 0.5127, pedigree (2,2,5,5,4)
  (same comment as for Dinitrogen monoxide)
- Manganese [air, urban air close to ground]: 2.125e-7 kg; = 1.7E-07 * scaling_factor; source Bauer, C. 2007; lognormal variance with pedigree 0.5127, pedigree (2,2,5,5,4)
  (same comment as for Dinitrogen monoxide)
- Water [air, urban air close to ground]: 6.67e-5 m3; lognormal variance with pedigree 0.0083, pedigree (2,2,3,1,2)
  calculated value, supposed to ensure correct water balance
- Phenol, pentachloro- [air, urban air close to ground]: 1.0125e-11 kg; = 8.1E-12 * scaling_factor; source Bauer, C. 2007; lognormal variance with pedigree 0.5127, pedigree (2,2,5,5,4)
  (same comment as for Dinitrogen monoxide)
- Benzene [air, urban air close to ground]: 1.1375e-6 kg; = 9.1E-07 * scaling_factor; source Bauer, C. 2007; lognormal variance with pedigree 0.5127, pedigree (2,2,5,5,4)
  (same comment as for Dinitrogen monoxide)
- Particulates, > 2.5 um, and < 10um [air, urban air close to ground]: 1.875e-6 kg; = 1.5E-06 * scaling_factor; source T. Nussbaumer 2014; lognormal variance with pedigree 0.0747, pedigree (2,2,3,5,4)
  estimation
- Carbon monoxide, non-fossil [air, urban air close to ground]: 0.00015625 kg; = 1.25E-04 * scaling_factor; source T. Nussbaumer 2014; lognormal variance with pedigree 0.0747, pedigree (2,2,3,5,4)
  estimation
- Nitrogen oxides [air, urban air close to ground]: 8.75e-5 kg; = 7E-05 * scaling_factor; source T. Nussbaumer 2014; lognormal variance with pedigree 0.0747, pedigree (2,2,3,5,4)
  estimation
- Particulates, < 2.5 um [air, urban air close to ground]: 3.375e-5 kg; = 27E-06 * scaling_factor; source T. Nussbaumer 2014; lognormal variance with pedigree 0.0747, pedigree (2,2,3,5,4)
  estimation
- Hydrocarbons, aliphatic, alkanes, unspecified [air, urban air close to ground]: 1.1375e-6 kg; = 9.1E-07 * scaling_factor; source Bauer, C. 2007; lognormal variance with pedigree 0.5127, pedigree (2,2,5,5,4)
  (same comment as for Dinitrogen monoxide)
- Hydrocarbons, aliphatic, unsaturated [air, urban air close to ground]: 3.875e-6 kg; = 3.1E-06 * scaling_factor; source Bauer, C. 2007; lognormal variance with pedigree 0.5127, pedigree (2,2,5,5,4)
  (same comment as for Dinitrogen monoxide)

## Sampling procedure
literature

## Extrapolations
representative for Switzerland. Only uncertainty factors adjusted accordingly
