# treatment of used capacitor, to hazardous waste incineration, with energy recovery

Dataset: EcoSpold 2, unit process
Geography: CH
Time period: 1997-01-01 to 2021-12-31
Technology level: current
Classification: ISIC rev.4 ecoinvent: 3822:Treatment and disposal of hazardous waste
Tags: ConvertedDataset; Treatment
Scenario: Business-as-Usual
System model: Allocation, cut-off by classification
Share of production covered: 39 %
Generated by: Roland Hischier
Published in: Hischier R. 2007
Database: ecoinvent
isCopyrightProtected: true
accessRestrictedTo: 1

## General comment
Inventoried waste contains 2.52% rubber; 6.59% Plastics from electronic consumer goods; 6.59% Plastics from electronic industrial goods; 7.74% average paper; 76.6% Capacitor (w/o plastics rubber paper); . waste composition (wet, in ppm): upper heating value 6.8 MJ/kg; lower heating value 6.358 MJ/kg; H2O 9785.8; O 151710; H 38272; C 246570; S 248.21; N 2042.4; P 599.86; B 1.3305; Cl 1482.5; Br 724.35; F 34.432; I n.a.; Ag 4846.9; As 1.1463; Ba 32.153; Cd 20.151; Co 3.9391; Cr 8.0335; Cu 21482; Hg 0.12273; Mn 4.0218; Mo 0.72774; Ni 516.94; Pb 239.31; Sb 631.59; Se 0.45766; Sn 1994.6; V 0.098775; Zn 4666.9; Be 0.13684; Sc n.a.; Sr 15.387; Ti 602.93; Tl 0.18221; W n.a.; Si 2035.6; Fe 30928; Ca 675.96; Al 479070; K 118.16; Mg 332.64; Na 89.49; Share of carbon in waste that is biogenic 12.7%. Net energy produced in HWI: 17.11MJ/kg thermal energy and 1.27MJ/kg electric energy. Allocation of energy production: no substitution or expansion. 100% of burden allocated to waste disposal function of HWI. One kg of this waste produces 0.5616 kg of residues, which are landfilled. Additional solidification with 0.2246 kg of cement.
[This dataset is meant to replace the following datasets:]

## Included activities end
waste-specific air and water emissions from incineration, auxiliary material consumption for flue gas cleaning. Short-term emissions to river water and long-term emissions to ground water from residual material landfill (from solidified fly ashes and scrubber slugde). Process energy demands for HWI.

## Geography
Specific to the technology encountered in Switzerland in 2000. Well applicable to modern incineration practices in Europe or North America or Japan.

## Technology
Swiss HWI plant in 2000 with wet flue gas scrubber and low-dust SCR DeNOx facility. Gross thermal efficiency 74.4% and gross electric efficiency 10%.

## Time period
Transfer coefficients for modern Swiss MSWI. Emission speciation based on early 90ies data.

## Reference product
- used capacitor: -1 kg; name RP; CPC 39: Wastes or scraps; By-product classification Waste
  production volume 0.0336675 kg; name PV_RP
    This is a placeholder value that does not reflect real-world production volumes. This dataset does not currently require a real-world production volume to work in the database framework, and no actual data were collected yet. This has no negative effect on the results of the ecoinvent database. The placeholder value of this activity was scaled according to the nominal GDP of 2005 (source: United Nations, http://data.un.org/Glossary.aspx?q=GDP+%28current+US%24%29, accessed 20130726) to reflect an appropriate share of the global production volume, which is also a placeholder value.
  property price 0 EUR2005; name RP_price_EUR2005
    Waste products are assigned a price of zero as they are assumed to require further treatment.
  property carbon content, fossil 0.179153
    Mix of different types of capacitor (ecoinvent v2.2 report 18_V, pg 113 for details)
  property carbon content, non-fossil 0.0306706
    Mix of different types of capacitor (ecoinvent v2.2 report 18_V, pg 113 for details)
  property carbon content 0.209824
    carbon content on a dry matter basis (reserved; not for manual entry)
  properties: wet mass 1 kg, dry mass 1 kg, water in wet mass 0 kg, water content 0, carbon allocation 0.209824 kg

## By-products
- electricity, for reuse in municipal waste incineration only: 0 kWh; name BP3; CPC 17100: Electrical energy; By-product classification allocatable product; pedigree (1,1,1,1,1)
  production volume 0.0118772 kWh; = BP3*PV_RP/ABS(RP)
    Calculated based on the production volume of the reference product.
  property price 0.1 EUR2005; name BP3_price_EUR2005
    Estimated to be the same price as in case of electricity, medium voltage.
- heat, for reuse in municipal waste incineration only: 0 MJ; name BP2; By-product classification allocatable product; CPC 17300: Steam and hot water; pedigree (1,1,1,1,1)
  production volume 0.576052 MJ; = BP2*PV_RP/ABS(RP)
    Calculated based on the production volume of the reference product.
  property price 0.0106 EUR2005; name BP2_price_EUR2005
    Average European district heat price from Ecoheatcool and Euroheat 2005-2006, Ecoheat Work package 1: The European heat market. Final report. 10.6 EUR/GJ i s the price of district heat. http://www.solarthermalworld.org/files/Ecoheatcool%20WP1%20Web.pdf?download

## Inputs from technosphere
- calcium chloride: 0.0020801 kg; lognormal variance with pedigree 0.8, pedigree (1,1,5,1,1)
  uncertainty calculated from uncertainty in average auxiliary material input, and the unertainty of the waste composition of this waste
  properties: dry mass 1 kg, wet mass 1 kg
- sodium hydroxide, without water, in 50% solution state: 0.0041235 kg; lognormal variance with pedigree 0.31, pedigree (1,1,5,1,1)
  (same comment as for calcium chloride)
  properties: dry mass 1 kg, wet mass 1 kg, heating value, net 3.03 MJ
- ammonia, anhydrous, liquid: 7.4484e-5 kg; lognormal variance with pedigree 1.09, pedigree (1,1,5,1,1)
  uncertainty calculated from uncertainty in average DeNOx input, uncertainty in the share of thermal NOx, uncertainty of nitrogen content in average municipal waste and the unertainty in nitrogen content in *this* waste.
  properties: dry mass 1 kg, wet mass 1 kg
- hydrogen peroxide, without water, in 50% solution state: 1.1163e-6 kg; lognormal variance with pedigree 0.89, pedigree (1,1,5,1,1)
  (same comment as for calcium chloride)
  properties: heating value, net 7.13 MJ, dry mass 1 kg, wet mass 1 kg
- residual material landfill: 1.17e-9 unit; lognormal variance with pedigree 0.05, pedigree (1,1,5,1,1)
  uncertainty is calculated from uncertainties in waste composition and transfer coefficients in incinerator
- hydrochloric acid, without water, in 30% solution state: 0.001078 kg; lognormal variance with pedigree 0.1, pedigree (1,1,5,1,1)
  (same comment as for calcium chloride)
  properties: dry mass 1 kg, wet mass 1 kg, heating value, net 3.32 MJ
- quicklime, milled, packed: 0.00062086 kg; lognormal variance with pedigree 0.31, pedigree (1,1,5,1,1)
  (same comment as for calcium chloride)
  properties: wet mass 1 kg, water content 0.010101, dry mass 0.99 kg
- waste cement, hydrated: -0.56161 kg; name BP1; lognormal variance with pedigree 0.06, pedigree (1,1,5,1,1)
  Hydrated cement for solidification of landfilled residual material. Uncertainty calculated from unertainty of the waste composition of this waste and transfer coefficients in the incinerator and of the solidification recipe.
  production volume 0.018908 kg; name BP_WS_PV; = BP1*PV_RP/ABS(RP)
    Calculated from the production volume of used capacitor, 0% water in proportion to the respective output amounts.
  property price 0 EUR2005; name BP1_price_EUR2005
  properties: dry mass 1 kg, wet mass 1 kg
- process-specific burdens, hazardous waste incineration plant: 1 kg; lognormal variance with pedigree 0.04, pedigree (1,1,5,1,1)
  demands per kilogram waste. uncertainty is heeded in the module;activityLink introduced to establish a direct link to the corresponding regional supply of this product
- titanium dioxide: 2.9248e-6 kg; lognormal variance with pedigree 1.47, pedigree (1,1,5,1,1)
  (same comment as for ammonia, anhydrous, liquid)
  properties: wet mass 1 kg, dry mass 1 kg
- iron (III) chloride, without water, in 40% solution state: 0.020316 kg; lognormal variance with pedigree 0.21, pedigree (1,1,5,1,1)
  (same comment as for calcium chloride)
  properties: dry mass 1 kg, wet mass 1 kg
- chemical, inorganic: 0.0017966 kg; lognormal variance with pedigree 0.1, pedigree (1,1,5,1,1)
  Proxy for Polyelectrolyte. uncertainty calculated from uncertainty in average auxiliary material input, and the unertainty of the waste composition of this waste
  properties: carbon content, fossil 0.003, wet mass 1 kg, dry mass 1 kg
  note on carbon content, fossil: This dataset is an unweighted average of 20 inorganic substances (listed in Tab 88.1, ecoinvent v2.2 report 8, part II), being part of the top100 chemicals included in this database. The C-content has also been calculated as an unweighted average of the C content of the substances composing this dataset.
- cement, unspecified: 0.22465 kg; lognormal variance with pedigree 0.06, pedigree (1,1,5,1,1)
  Cement for solidification of landfilled residual material. Uncertainty calculated from unertainty of the waste composition of this waste, of transfer coefficients in the incinerator and of the solidification recipe.
  properties: wet mass 1 kg, dry mass 1 kg
- hazardous waste incineration facility: 1.25e-9 unit; lognormal variance with pedigree 0.04, pedigree (1,1,5,1,1)
  demands per kilogram waste. uncertainty is heeded in the module This exchange has an activity link directly to the producing activity because the product is primarily consumed in the same geographical area where it is produced.
- heat, central or small-scale, other than natural gas: 15.6435 MJ; lognormal variance with pedigree 0.12, pedigree (1,1,5,1,1)
  Uncertainty dependent on total energy required and heating value present, using experimental GSd for substraction from uc=A*GSDa^2-B
  properties: heating value, net 1 MJ
- heat, district or industrial, natural gas: 0.0363582 MJ; lognormal variance with pedigree 1.19, pedigree (1,1,5,1,1)
  (same comment as for ammonia, anhydrous, liquid)
  properties: heating value, net 1 MJ
- process-specific burdens, residual material landfill: 0.56161 kg; lognormal variance with pedigree 0.05, pedigree (1,1,5,1,1)
  uncertainty is calculated from uncertainties in waste composition and transfer coefficients in incinerator;activityLink introduced to establish a direct link to the corresponding regional supply of this product
- chromium: 5.969e-8 kg; lognormal variance with pedigree 1.47, pedigree (1,1,5,1,1)
  Proxy for vanadium pentoxide V2O5 in SCR catalyst. uncertainty calculated from uncertainty in average DeNOx input, uncertainty in the share of thermal NOx, uncertainty of nitrogen content in average municipal waste and the unertainty in nitrogen content in *this* waste.
  properties: dry mass 1 kg, wet mass 1 kg
- chemical, organic: 0.00012811 kg; lognormal variance with pedigree 1.26, pedigree (1,1,5,1,1)
  Proxy for TMT15. uncertainty calculated from uncertainty in average auxiliary material input, and the unertainty of the waste composition of this waste
  properties: wet mass 1 kg, heating value, net 19.03 MJ, carbon content, fossil 0.628, dry mass 1 kg
  note on carbon content, fossil: This dataset is an unweighted average of 20 organic substances (listed in Tab 88.1, ecoinvent v2.2 report 8, part II), being part of the top100 chemicals included in this database. The C-content has also been calculated as an unweighted average of the C content of the substances composing this dataset.

## Emissions to nature
- Aluminium [water, ground-, long-term]: 0.021499 kg; lognormal variance with pedigree 0.56, pedigree (1,1,5,1,1)
  Long-term emissions from landfilling of incineration residues. uncertainty is calculated from uncertainties in waste composition and transfer coefficients in incinerator and landfills.
- Barium [air, urban air close to ground]: 3.2153e-8 kg; lognormal variance with pedigree 1.17, pedigree (1,1,5,1,1)
  (same comment as for residual material landfill)
- Silver, ion [water, surface water]: 3.5356e-7 kg; lognormal variance with pedigree 0.53, pedigree (1,1,5,1,1)
  uncertainty is calculated from uncertainties in waste composition and transfer coefficients in incinerator and landfills
- Boron [water, ground-, long-term]: 9.396e-5 kg; lognormal variance with pedigree 0.97, pedigree (1,1,5,1,1)
  (same comment as for Aluminium)
- Chromium [air, urban air close to ground]: 5.9401e-13 kg; lognormal variance with pedigree 1.43, pedigree (1,1,5,1,1)
  (same comment as for residual material landfill)
- DOC, Dissolved Organic Carbon [water, ground-, long-term]: 0.0023757 kg; lognormal variance with pedigree 0.13, pedigree (1,1,5,1,1)
  (same comment as for Aluminium)
- Silicon [water, ground-, long-term]: 0.13629 kg; lognormal variance with pedigree 0.13, pedigree (1,1,5,1,1)
  (same comment as for Aluminium)
- Nitrogen oxides [air, urban air close to ground]: 5.2517e-5 kg; lognormal variance with pedigree 1.13, pedigree (1,1,5,1,1)
  uncertainty calculated from uncertainty in average N-emissions, uncertainty in the share of thermal NOx, uncertainty of nitrogen content in average municipal waste and the unertainty in nitrogen content in *this* waste.
- Cyanide [air, urban air close to ground]: 1.8179e-6 kg; lognormal variance with pedigree 1.22, pedigree (5,5,5,5,5)
  uncertainty calculated from uncertainty for proxy (from MSWI), uncertainty in average N-emissions, uncertainty in the share of thermal NOx, uncertainty of nitrogen content in average municipal waste and the unertainty in nitrogen content in *this* waste.
- Copper, ion [water, ground-, long-term]: 4.6601e-5 kg; lognormal variance with pedigree 3.32, pedigree (1,1,5,1,1)
  (same comment as for Aluminium)
- Strontium [water, surface water]: 4.2732e-7 kg; lognormal variance with pedigree 1.46, pedigree (1,1,5,1,1)
  (same comment as for Silver, ion)
- Aluminium [air, urban air close to ground]: 0.0007484 kg; lognormal variance with pedigree 0.07, pedigree (1,1,5,1,1)
  (same comment as for residual material landfill)
- Dinitrogen monoxide [air, urban air close to ground]: 7.2716e-6 kg; lognormal variance with pedigree 1.22, pedigree (5,5,5,5,5)
  (same comment as for Cyanide)
- Fluoride [water, surface water]: 3.437e-5 kg; lognormal variance with pedigree 1.14, pedigree (1,1,5,1,1)
  (same comment as for Silver, ion)
- Nickel, ion [water, surface water]: 0.0001058 kg; lognormal variance with pedigree 0.78, pedigree (1,1,5,1,1)
  (same comment as for Silver, ion)
- Phosphorus [air, urban air close to ground]: 4.199e-7 kg; lognormal variance with pedigree 0.79, pedigree (1,1,5,1,1)
  (same comment as for residual material landfill)
- Selenium [water, surface water]: 1.3796e-6 kg; lognormal variance with pedigree 1.46, pedigree (1,1,5,1,1)
  (same comment as for Silver, ion)
- Copper, ion [water, surface water]: 0.00092166 kg; lognormal variance with pedigree 0.32, pedigree (1,1,5,1,1)
  (same comment as for Silver, ion)
- Carbon dioxide, non-fossil [air, urban air close to ground]: 0.11339 kg; lognormal variance with pedigree 0.09, pedigree (1,1,5,1,1)
  calculated from uncertainty in carbon in waste and transfer coefficients
- Titanium, ion [water, ground-, long-term]: 0.0015731 kg; lognormal variance with pedigree 0.85, pedigree (1,1,5,1,1)
  (same comment as for Aluminium)
- TOC, Total Organic Carbon [water, surface water]: 6.4606e-6 kg; lognormal variance with pedigree 0.42, pedigree (1,1,5,1,1)
  (same comment as for Silver, ion)
- Hydrogen fluoride [air, urban air close to ground]: 8.6636e-9 kg; lognormal variance with pedigree 1.17, pedigree (1,1,5,1,1)
  (same comment as for residual material landfill)
- Lead [water, ground-, long-term]: 3.3378e-6 kg; lognormal variance with pedigree 7.68, pedigree (1,1,5,1,1)
  (same comment as for Aluminium)
- Cobalt [water, surface water]: 3.9364e-6 kg; lognormal variance with pedigree 1.43, pedigree (1,1,5,1,1)
  (same comment as for Silver, ion)
- Tin, ion [water, ground-, long-term]: 2.1259e-6 kg; lognormal variance with pedigree 4.92, pedigree (1,1,5,1,1)
  (same comment as for Aluminium)
- Antimony [water, ground-, long-term]: 1.8032e-5 kg; lognormal variance with pedigree 1.18, pedigree (1,1,5,1,1)
  (same comment as for Aluminium)
- Potassium, ion [water, surface water]: 0.0025665 kg; lognormal variance with pedigree 0.46, pedigree (1,1,5,1,1)
  (same comment as for Silver, ion)
- Cadmium, ion [water, ground-, long-term]: 9.1674e-8 kg; lognormal variance with pedigree 7.5, pedigree (1,1,5,1,1)
  (same comment as for Aluminium)
- Chloride [water, surface water]: 0.0014829 kg; lognormal variance with pedigree 0.65, pedigree (1,1,5,1,1)
  (same comment as for Silver, ion)
- Hydrogen chloride [air, urban air close to ground]: 4.573e-7 kg; lognormal variance with pedigree 0.67, pedigree (1,1,5,1,1)
  (same comment as for residual material landfill)
- DOC, Dissolved Organic Carbon [water, surface water]: 6.4606e-6 kg; lognormal variance with pedigree 0.42, pedigree (1,1,5,1,1)
  (same comment as for Silver, ion)
- Iron [air, urban air close to ground]: 2.1649e-5 kg; lognormal variance with pedigree 0.3, pedigree (1,1,5,1,1)
  (same comment as for residual material landfill)
- Lead [air, urban air close to ground]: 8.883e-9 kg; lognormal variance with pedigree 0.93, pedigree (1,1,5,1,1)
  (same comment as for residual material landfill)
- Molybdenum [water, surface water]: 1.2476e-5 kg; lognormal variance with pedigree 1.28, pedigree (1,1,5,1,1)
  (same comment as for Silver, ion)
- Sulfate [water, ground-, long-term]: 0.00033094 kg; lognormal variance with pedigree 0.57, pedigree (1,1,5,1,1)
  (same comment as for Aluminium)
- Nitrate [water, ground-, long-term]: 0.00011222 kg; lognormal variance with pedigree 0.56, pedigree (1,1,5,1,1)
  (same comment as for Aluminium)
- Carbon monoxide, fossil [air, urban air close to ground]: 1.0545e-5 kg; lognormal variance with pedigree 0.71, pedigree (1,4,5,1,3)
  1 plant for waste solvent incineration in Switzerland
- Calcium [air, urban air close to ground]: 1.1268e-6 kg; lognormal variance with pedigree 0.77, pedigree (1,1,5,1,1)
  (same comment as for residual material landfill)
- Carbon monoxide, non-fossil [air, urban air close to ground]: 1.5315e-6 kg; lognormal variance with pedigree 0.71, pedigree (1,4,5,1,3)
  1 plant for waste solvent incineration in Switzerland
- Silicon [air, urban air close to ground]: 4.7389e-6 kg; lognormal variance with pedigree 0.62, pedigree (1,1,5,1,1)
  (same comment as for residual material landfill)
- Nickel [air, urban air close to ground]: 3.6186e-7 kg; lognormal variance with pedigree 0.81, pedigree (1,1,5,1,1)
  (same comment as for residual material landfill)
- Selenium [water, ground-, long-term]: 2.5323e-6 kg; lognormal variance with pedigree 1.44, pedigree (1,1,5,1,1)
  (same comment as for Aluminium)
- Scandium [water, ground-, long-term]: 3.9469e-6 kg; lognormal variance with pedigree 1.41, pedigree (1,1,5,1,1)
  (same comment as for Aluminium)
- Manganese [water, surface water]: 1.337e-8 kg; lognormal variance with pedigree 1.92, pedigree (1,1,5,1,1)
  (same comment as for Silver, ion)
- Tin, ion [water, surface water]: 3.0008e-8 kg; lognormal variance with pedigree 0.65, pedigree (1,1,5,1,1)
  (same comment as for Silver, ion)
- Phosphate [water, ground-, long-term]: 0.00084071 kg; lognormal variance with pedigree 1.23, pedigree (1,1,5,1,1)
  (same comment as for Aluminium)
- BOD5, Biological Oxygen Demand [water, ground-, long-term]: 0.0054302 kg; lognormal variance with pedigree 0.13, pedigree (1,1,5,1,1)
  (same comment as for Aluminium)
- Mercury [water, ground-, long-term]: 6.9023e-8 kg; lognormal variance with pedigree 3.89, pedigree (1,1,5,1,1)
  (same comment as for Aluminium)
- Tungsten [water, surface water]: 1.2471e-6 kg; lognormal variance with pedigree 1.47, pedigree (1,1,5,1,1)
  (same comment as for Silver, ion)
- Vanadium, ion [water, surface water]: 3.6955e-7 kg; lognormal variance with pedigree 1.49, pedigree (1,1,5,1,1)
  (same comment as for Silver, ion)
- Boron [water, surface water]: 9.4923e-7 kg; lognormal variance with pedigree 1.08, pedigree (1,1,5,1,1)
  (same comment as for Silver, ion)
- Mercury [water, surface water]: 1.3997e-9 kg; lognormal variance with pedigree 1.72, pedigree (1,1,5,1,1)
  (same comment as for Silver, ion)
- Manganese [air, urban air close to ground]: 2.1899e-14 kg; lognormal variance with pedigree 1.55, pedigree (1,1,5,1,1)
  (same comment as for residual material landfill)
- Strontium [water, ground-, long-term]: 0.00025597 kg; lognormal variance with pedigree 1, pedigree (1,1,5,1,1)
  (same comment as for Aluminium)
- Potassium [air, urban air close to ground]: 3.5623e-7 kg; lognormal variance with pedigree 0.99, pedigree (1,1,5,1,1)
  (same comment as for residual material landfill)
- Sodium [air, urban air close to ground]: 8.4198e-7 kg; lognormal variance with pedigree 1.03, pedigree (1,1,5,1,1)
  (same comment as for residual material landfill)
- Thallium [air, urban air close to ground]: 1.8221e-10 kg; lognormal variance with pedigree 1.85, pedigree (1,1,5,1,1)
  (same comment as for residual material landfill)
- Sodium, ion [water, ground-, long-term]: 0.0053717 kg; lognormal variance with pedigree 0.43, pedigree (1,1,5,1,1)
  (same comment as for Aluminium)
- Cobalt [air, urban air close to ground]: 2.7574e-9 kg; lognormal variance with pedigree 1.45, pedigree (1,1,5,1,1)
  (same comment as for residual material landfill)
- Iodide [water, ground-, long-term]: 0 kg; pedigree (1,1,1,1,1)
  (same comment as for Aluminium)
- Magnesium [water, surface water]: 4.6591e-6 kg; lognormal variance with pedigree 1.17, pedigree (1,1,5,1,1)
  (same comment as for Silver, ion)
- Vanadium, ion [water, ground-, long-term]: 0.00011574 kg; lognormal variance with pedigree 0.96, pedigree (1,1,5,1,1)
  (same comment as for Aluminium)
- Calcium, ion [water, ground-, long-term]: 0.0019065 kg; lognormal variance with pedigree 1.77, pedigree (1,1,5,1,1)
  (same comment as for Aluminium)
- Titanium, ion [water, surface water]: 2.6262e-6 kg; lognormal variance with pedigree 1.23, pedigree (1,1,5,1,1)
  (same comment as for Silver, ion)
- COD, Chemical Oxygen Demand [water, surface water]: 1.4767e-5 kg; lognormal variance with pedigree 0.42, pedigree (1,1,5,1,1)
  (same comment as for Silver, ion)
- Barium [water, surface water]: 1.1797e-8 kg; lognormal variance with pedigree 1.94, pedigree (1,1,5,1,1)
  (same comment as for Silver, ion)
- Arsenic, ion [water, ground-, long-term]: 5.8903e-15 kg; lognormal variance with pedigree 1.4, pedigree (1,1,5,1,1)
  (same comment as for Aluminium)
- Iodide [water, surface water]: 3.7386e-9 kg; lognormal variance with pedigree 1.55, pedigree (1,1,5,1,1)
  (same comment as for Silver, ion)
- Aluminium [water, surface water]: 3.5892e-5 kg; lognormal variance with pedigree 0.94, pedigree (1,1,5,1,1)
  (same comment as for Silver, ion)
- Barium [water, ground-, long-term]: 7.0663e-6 kg; lognormal variance with pedigree 6.47, pedigree (1,1,5,1,1)
  (same comment as for Aluminium)
- TOC, Total Organic Carbon [water, ground-, long-term]: 0.0023757 kg; lognormal variance with pedigree 0.13, pedigree (1,1,5,1,1)
  (same comment as for Aluminium)
- Phosphate [water, surface water]: 2.9529e-5 kg; lognormal variance with pedigree 0.71, pedigree (1,1,5,1,1)
  (same comment as for Silver, ion)
- Magnesium [water, ground-, long-term]: 0.0027908 kg; lognormal variance with pedigree 1.49, pedigree (1,1,5,1,1)
  (same comment as for Aluminium)
- Iron, ion [water, ground-, long-term]: 5.3784e-5 kg; lognormal variance with pedigree 7.23, pedigree (1,1,5,1,1)
  (same comment as for Aluminium)
- Manganese [water, ground-, long-term]: 7.9846e-6 kg; lognormal variance with pedigree 6.45, pedigree (1,1,5,1,1)
  (same comment as for Aluminium)
- Molybdenum [air, urban air close to ground]: 1.4555e-9 kg; lognormal variance with pedigree 1.67, pedigree (1,1,5,1,1)
  (same comment as for residual material landfill)
- Chromium VI [water, ground-, long-term]: 6.5688e-5 kg; lognormal variance with pedigree 0.84, pedigree (1,1,5,1,1)
  (same comment as for Aluminium)
- Bromine [air, urban air close to ground]: 1.4487e-7 kg; lognormal variance with pedigree 0.77, pedigree (1,1,5,1,1)
  (same comment as for residual material landfill)
- Antimony [air, urban air close to ground]: 2.4568e-12 kg; lognormal variance with pedigree 0.88, pedigree (1,1,5,1,1)
  (same comment as for residual material landfill)
- Thallium [water, surface water]: 2.133e-9 kg; lognormal variance with pedigree 2.16, pedigree (1,1,5,1,1)
  (same comment as for Silver, ion)
- Calcium, ion [water, surface water]: 3.1828e-6 kg; lognormal variance with pedigree 1.22, pedigree (1,1,5,1,1)
  (same comment as for Silver, ion)
- Nickel, ion [water, ground-, long-term]: 5.1226e-5 kg; lognormal variance with pedigree 1.18, pedigree (1,1,5,1,1)
  (same comment as for Aluminium)
- Beryllium [water, surface water]: 4.2705e-9 kg; lognormal variance with pedigree 2.07, pedigree (1,1,5,1,1)
  (same comment as for Silver, ion)
- Fluoride [water, ground-, long-term]: 9.1754e-8 kg; lognormal variance with pedigree 1.09, pedigree (1,1,5,1,1)
  (same comment as for Aluminium)
- Strontium [air, urban air close to ground]: 1.5387e-9 kg; lognormal variance with pedigree 1.28, pedigree (1,1,5,1,1)
  (same comment as for residual material landfill)
- Vanadium [air, urban air close to ground]: 9.8775e-12 kg; lognormal variance with pedigree 2, pedigree (1,1,5,1,1)
  (same comment as for residual material landfill)
- Lead [water, surface water]: 1.0014e-8 kg; lognormal variance with pedigree 1.46, pedigree (1,1,5,1,1)
  (same comment as for Silver, ion)
- Nitrate [water, surface water]: 3.5168e-5 kg; lognormal variance with pedigree 0.44, pedigree (1,1,5,1,1)
  (same comment as for Silver, ion)
- Silicon [water, surface water]: 0.00030721 kg; lognormal variance with pedigree 0.68, pedigree (1,1,5,1,1)
  (same comment as for Silver, ion)
- Tin [air, urban air close to ground]: 2.6458e-6 kg; lognormal variance with pedigree 0.63, pedigree (1,1,5,1,1)
  (same comment as for residual material landfill)
- Silver [air, urban air close to ground]: 6.2965e-8 kg; lognormal variance with pedigree 0.54, pedigree (1,1,5,1,1)
  (same comment as for residual material landfill)
- Titanium [air, urban air close to ground]: 6.0293e-7 kg; lognormal variance with pedigree 0.78, pedigree (1,1,5,1,1)
  (same comment as for residual material landfill)
- Magnesium [air, urban air close to ground]: 4.5804e-7 kg; lognormal variance with pedigree 0.86, pedigree (1,1,5,1,1)
  (same comment as for residual material landfill)
- Silver, ion [water, ground-, long-term]: 2.7483e-8 kg; lognormal variance with pedigree 4.31, pedigree (1,1,5,1,1)
  (same comment as for Aluminium)
- Antimony [water, surface water]: 9.9383e-6 kg; lognormal variance with pedigree 1.19, pedigree (1,1,5,1,1)
  (same comment as for Silver, ion)
- Tungsten [water, ground-, long-term]: 2.2892e-6 kg; lognormal variance with pedigree 1.45, pedigree (1,1,5,1,1)
  (same comment as for Aluminium)
- Arsenic, ion [water, surface water]: 5.8905e-6 kg; lognormal variance with pedigree 1.38, pedigree (1,1,5,1,1)
  (same comment as for Silver, ion)
- Beryllium [air, urban air close to ground]: 1.3684e-10 kg; lognormal variance with pedigree 1.88, pedigree (1,1,5,1,1)
  (same comment as for residual material landfill)
- Bromine [water, surface water]: 0.00072303 kg; lognormal variance with pedigree 0.74, pedigree (1,1,5,1,1)
  (same comment as for Silver, ion)
- Zinc, ion [water, ground-, long-term]: 1.7974e-5 kg; lognormal variance with pedigree 5.49, pedigree (1,1,5,1,1)
  (same comment as for Aluminium)
- Bromine [water, ground-, long-term]: 1.3992e-8 kg; lognormal variance with pedigree 1.15, pedigree (1,1,5,1,1)
  (same comment as for Aluminium)
- Zinc, ion [water, surface water]: 6.2567e-5 kg; lognormal variance with pedigree 0.51, pedigree (1,1,5,1,1)
  (same comment as for Silver, ion)
- Chromium VI [water, surface water]: 2.082e-5 kg; lognormal variance with pedigree 1, pedigree (1,1,5,1,1)
  (same comment as for Silver, ion)
- Boron [air, urban air close to ground]: 1.5967e-7 kg; lognormal variance with pedigree 1.57, pedigree (1,1,5,1,1)
  (same comment as for residual material landfill)
- Carbon dioxide, fossil [air, urban air close to ground]: 0.78072 kg; lognormal variance with pedigree 0.09, pedigree (1,1,5,1,1)
  calculated from uncertainty in carbon in waste and transfer coefficients
- Zinc [air, urban air close to ground]: 3.2668e-6 kg; lognormal variance with pedigree 0.52, pedigree (1,1,5,1,1)
  (same comment as for residual material landfill)
- Thallium [water, ground-, long-term]: 1.2777e-6 kg; lognormal variance with pedigree 1.7, pedigree (1,1,5,1,1)
  (same comment as for Aluminium)
- Mercury [air, urban air close to ground]: 4.2388e-15 kg; lognormal variance with pedigree 1.98, pedigree (1,1,5,1,1)
  (same comment as for residual material landfill)
- Cadmium [air, urban air close to ground]: 1.1097e-9 kg; lognormal variance with pedigree 1.25, pedigree (1,1,5,1,1)
  (same comment as for residual material landfill)
- Scandium [water, surface water]: 6.4855e-7 kg; lognormal variance with pedigree 1.5, pedigree (1,1,5,1,1)
  (same comment as for Silver, ion)
- Molybdenum [water, ground-, long-term]: 5.7542e-8 kg; lognormal variance with pedigree 1.3, pedigree (1,1,5,1,1)
  (same comment as for Aluminium)
- COD, Chemical Oxygen Demand [water, ground-, long-term]: 0.0054302 kg; lognormal variance with pedigree 0.13, pedigree (1,1,5,1,1)
  (same comment as for Aluminium)
- Sulfate [water, surface water]: 0.0007521 kg; lognormal variance with pedigree 0.83, pedigree (1,1,5,1,1)
  (same comment as for Silver, ion)
- Cadmium, ion [water, surface water]: 9.0305e-9 kg; lognormal variance with pedigree 1.2, pedigree (1,1,5,1,1)
  (same comment as for Silver, ion)
- BOD5, Biological Oxygen Demand [water, surface water]: 1.4767e-5 kg; lognormal variance with pedigree 0.42, pedigree (1,1,5,1,1)
  (same comment as for Silver, ion)
- Sulfur dioxide [air, urban air close to ground]: 2.9786e-7 kg; lognormal variance with pedigree 0.9, pedigree (1,1,5,1,1)
  (same comment as for residual material landfill)
- Potassium, ion [water, ground-, long-term]: 0.0065383 kg; lognormal variance with pedigree 0.42, pedigree (1,1,5,1,1)
  (same comment as for Aluminium)
- Ammonia [air, urban air close to ground]: 2.0199e-6 kg; lognormal variance with pedigree 1.13, pedigree (1,1,5,1,1)
  (same comment as for Nitrogen oxides)
- Sodium, ion [water, surface water]: 0.0032268 kg; lognormal variance with pedigree 0.45, pedigree (1,1,5,1,1)
  (same comment as for Silver, ion)
- Arsenic [air, urban air close to ground]: 1.1692e-14 kg; lognormal variance with pedigree 1.71, pedigree (1,1,5,1,1)
  (same comment as for residual material landfill)
- Selenium [air, urban air close to ground]: 2.3016e-15 kg; lognormal variance with pedigree 1.83, pedigree (1,1,5,1,1)
  (same comment as for residual material landfill)
- Iron, ion [water, surface water]: 0.024844 kg; lognormal variance with pedigree 0.28, pedigree (1,1,5,1,1)
  (same comment as for Silver, ion)
- Chloride [water, ground-, long-term]: 8.3458e-6 kg; lognormal variance with pedigree 0.47, pedigree (1,1,5,1,1)
  (same comment as for Aluminium)
- Copper [air, urban air close to ground]: 1.5037e-5 kg; lognormal variance with pedigree 0.34, pedigree (1,1,5,1,1)
  (same comment as for residual material landfill)
- Beryllium [water, ground-, long-term]: 2.558e-6 kg; lognormal variance with pedigree 1.61, pedigree (1,1,5,1,1)
  (same comment as for Aluminium)

## Sampling procedure
The 2 Swiss HWI plants, used as the inventory reference technology mix, have a total annual capacity of 53'000 tons of hazardous waste. This corresponds to 39% of the Swiss total installed capacity in 2000. Swiss average plants size is 20'000 t/a.

## Extrapolations
This dataset has been extrapolated from year 2000 to the year of the calculation (2021). The uncertainty has been adjusted accordingly.
