# building construction, hostel

Dataset: EcoSpold 2, unit process
Geography: BR
Time period: 2017-01-01 to 2021-12-31
Technology level: current
Classification: ISIC rev.4 ecoinvent: 4100:Construction of buildings
Synonyms: backpacker hostel building construction; backpacker hotel building construction; hostel building construction
Tags: single enterprise data
Scenario: Business-as-Usual
System model: Allocation, cut-off by classification
Generated by: Marina Santa Rosa Rocha
Published in: Filimonau, V 2018
Database: ecoinvent
isCopyrightProtected: true
accessRestrictedTo: 1

## General comment
This dataset represents construction of a tourist accommodation facility classed as a hostel, located in Rio de Janeiro, RJ, Brazil. It was first opened in 2016 although the building where the hostel resides was constructed in 1959. Prior to becoming a hostel, the building was used as residence. The hostel has capacity of 30 and offers rooms of the following types (total number of rooms is given in brackets): double (2) and shared use (3). The hostel has 3 floors with a games room in the underground, a lobby and a pool on the ground floor, and the rooms and kitchen in the first floor. This hostel does not serve breakfast. The laundry is done in the hostel dependecies and there is no parking available on site. The hostel occupies a total area of 365,49 m2 where the building itself occupies the plot of 172,65 m2. The average annual occupancy of the hostel is 58% which is equal to 6300 guest nights per year. The load bearing structure of hotel building is made of concrete and the facade is made of concrete and brickwork.

## Included activities start
This dataset is modelled to include the inputs for the construction of a hostel building. This includes: energy and water used in construction, land transformation, building structure and outer building shell, foundations, inner walls, roofs, ceiling and windows, doors, floors, finishing and painting, bathroom equipment. Activities include hotel building construction with lifeframe of the hotel building of 75 years. Maintenance is included only through the consideration of the lifetime of the different exchanges. For example, windows are assumed to have a lifetime of 35 years, therefore the exchange amount is multiplied by 75years / 35 years=2.14.

## Included activities end
Activities end with 1 unit of hostel building, including maintenance. Due to data availability, the following building construction processes have been excluded: cables, gutter, drains, ventilation.

## Geography
The hostel is based in the city of Rio de Janeiro, RJ, Brazil.

## Technology
The level of technology is considered current. The load bearing structure of hotel building is made of concrete and the facade is made of concrete and brickwork.

## Time period
The survey was done in the year 2017 with the data provided covering the operational year 2016-2017.

## Parameters
- gross floor area: 172.65 m2; name GFA
  This represents gross floor area for the hostel building.
- occupancy rate/year: 0.575342 dimensionless; name occupancy_y; = (525*12)/(30*365)
  The hostel reports a occupancy of 525 guests per month. Its full capacity is 30 guests per day. The occupancy rate was calculated accordingly,
- volume: 775.035 m3; = AFA*3
  Building volume. Calculated by multiplying sum of all floors area (AFA) by the height of the floor. Height of the floor is assumed to be equal to 3 meters.
- sum of all floors area: 258.345 m2; name AFA
  This represents gross floor area for the hostel building.

## Reference product
- building, hostel: 1 unit; name RP; By-product classification allocatable product
  production volume 9 unit; name RP_PV
    Annual production volume is estimated based on the number of hostel properties in Brazil. In 2017 it was estimate that there were 10314 hotels in Brazil (Source: JLL, FOHB and ABR. Lodging Industry in Numbers - Brazil 2017. Available from: http://www.jll.com.br/brazil/pt-br/relatorios/175/hotelaria-em-numeros-2017) Accessed 27 March 2018. A study from the Brazilian Institute of Geography and Statistics (IBGE, 2012) showed that 46,9% of tourism accomodations in main urban areas in Brazil are hotels and 1,4% are hostels. (Source: IBGE, 2012. Pesquisa de Serviços de Hospedagem 2011- Municípios das Capitais, Regiões Metropolitanas das Capitais e Regiões Integradas Available from: ftp://ftp.ibge.gov.br/Comercio_e_Servicos/Pesquisa_Servicos_de_Hospedagem/2011/psh2011.pdf. Accessed 27 March 2018). By equivalence, if 46,9% = 10314; 1,4% = 308 hostel in Brazil. Another study from IBGE (2017) showed that from 2011 to 2016 the Brazilian hotel supply increased 15% (Source: IBGE, 2017. Pesquisa de Serviços de Hospedagem 2016 Available from: https://biblioteca.ibge.gov.br/index.php/biblioteca-catalogo?view=detalhes&id=2100623 Accessed 04 June 2018). Assuming this growth distributes equally across the years and various categories of hotels in Brazil, it can be estimated that the number of hostel properties annually constructed in Brazil is equal to: 308 hostels * (0.15/5) = 9 hotels.
  property price 303070 EUR2005; name RP_price_EUR2005
    Calculated based on inputs: The price of the product has been calculated as a sum of the values of the material and energy inputs for this product. This value is therefore a rough estimation. It may underestimate the real price since there are additional expenses when producing any product. These expences can include for example labour costs, treatment of waste materials and profit for the producer. Please consider carefully whether this level of data quality is acceptable for your application.
  property lifetime capacity 821250 guest night; name lifetime_guests; = 30*365*lifetime
    The total capacity of the hostel is 30 guests/day. The lifetime capacity is calculated accordingly.
  property lifetime 75 year; name lifetime
    Estimated value. The lifetime of a hotel building is assumed to be equal to 75 years which is an average of the 50-100 years' estimates available in the literature. Source: Filimonau et al. 2011. Reviewing the carbon footprint analysis of hotels: Life Cycle Energy Analysis (LCEA) as a holistic method for carbon impact appraisal of tourist accommodation. Journal of Cleaner Production, 19, 1917-1930.

## By-products
- aluminium scrap, post-consumer: 0 kg; CPC 39363: Waste and scrap of aluminium; By-product classification Recyclable; pedigree (1,1,1,1,1)
  Calculated value. Amount of output material is set equal to the amount of respective input material, window frame, aluminum multiplied by its wet mass (assumed to equals the density)
  production volume 0 kg; = RP_PV * (scrap_alu / RP)
    Calculated from production volume of reference product using the relative outputs.
  property price 0.685 EUR2005; name scrap_alu_price_EUR2005
    Temporary price data. Calculated as 90% of purchasers price based on: estimated at 85% of new scrap
  property carbon content 0
    carbon content on a dry matter basis (reserved; not for manual entry)
  properties: carbon content, non-fossil 0, dry mass 1 kg, carbon content, fossil 0, wet mass 1 kg, water in wet mass 0 kg, water content 0, carbon allocation 0 kg

## Inputs from technosphere
- waste paint on wall: -113.4 kg; name waste_paint; = (paint)*-1; lognormal variance with pedigree 0.122825, pedigree (1,4,2,2,5)
  Calculated value. Amount of output material is set equal to the amount of respective input material, alkyd paint and acrylic varnish.
  production volume 1020.6 kg; = waste_paint*RP_PV/RP
    Calculated from production volume of reference product using the relative outputs.
  property price 0 EUR2005; name waste_paint_price_EUR2005
  properties: heating value, net 19.7 MJ, wet mass 1 kg, carbon content, fossil 0.65, dry mass 1 kg
- waste concrete: -248325 kg; name waste_concrete; = ((concrete* concrete_WM)+brick)*-1; lognormal variance with pedigree 0.122825, pedigree (1,4,2,2,5)
  Calculated value. Amount of output material is set equal to the amount of respective input material, concrete, brick, foundation. Conversion is made from m3 of concrete to kg of concrete based on the density reported in the properties section for the product "concrete, normal" (see wet mass property).
  production volume 2.23492e6 kg; = waste_concrete*RP_PV
    Calculated from production volume of reference product using the relative outputs.
  property price 0 EUR2005; name waste_concrete_price_EUR2005
  properties: dry mass 0.5 kg, water content 1, wet mass 1 kg
- flat glass, coated: 8437.5 kg; name glass; = (150*15)*(lifetime/20); lognormal variance with pedigree 0.122825, pedigree (1,4,2,2,5)
  Calculated value. The amount of exchange is calculated as: amount of input product * (lifetime of the hotel / lifetime of the product). Assuming 15 kg of window glass is required to cover 1m2 of area (double-glazed windows). Assumed average service life of 20 years. Source: Howard et al. 2007. Comparative service life assessment of window systems. Available from: http://www.fwpa.com.au/images/marketaccess/PR07.1047%20Final%20Report%20WEB.pdf Accessed 16 March 2018. In terms of outputs assumed to have gone to waste glass.
  properties: wet mass 1 kg, dry mass 1 kg
- door, inner, wood: 64.575 m2; name door_inner_w; = 34,44*(lifetime/40); lognormal variance with pedigree 0.122825, pedigree (1,4,2,2,5)
  Calculated value. The amount of exchange is calculated as: amount of input product * (lifetime of the hostel / lifetime of the product). Assumed service life of 40 years. Source: Cobut et al. 2015. The environmental footprint of interior wood doors in non-residential buildings – part 1: life cycle assessment. Journal of Cleaner Production, 109, 232-246. In terms of outputs, assumed to have gone to used door, inner, wood.
  properties: wet mass 27.6 kg, carbon content, fossil 0.074995, water content 0.0526316, dry mass 26.22 kg, carbon content, non-fossil 0.715131
- waste gypsum plasterboard: -2309.04 kg; name waste_g; = (gypsum)*-1; lognormal variance with pedigree 0.123425, pedigree (2,4,2,2,5)
  Calculated value. Amount of output material is set equal to the amount of respective input material, gypsum plasterboard.
  production volume 20781.4 kg; = waste_g*RP_PV/RP
    Calculated from production volume of reference product using the relative outputs.
  property price 0 EUR2005; name waste_g_price_EUR2005
  properties: wet mass 1 kg, water content 0.239157, dry mass 0.807 kg
- waste glass: -8437.5 kg; name waste_glass; = (glass)*-1; lognormal variance with pedigree 0.122825, pedigree (1,4,2,2,5)
  Calculated value. Amount of output material is set equal to the amount of respective input material, flat glass, coated, and glass wool mat.
  production volume 75937.5 kg; = waste_glass*RP_PV/RP
    Calculated from production volume of reference product using the relative outputs.
  property price 0 EUR2005; name waste_glass_price_EUR2005
  properties: wet mass 1 kg, dry mass 1 kg, heating value, net 0.05 MJ
  note on heating value, net: Value extracted from "treatment of waste glass, open dump, very wet infiltration class (1000mm)"
- concrete, normal: 32.3929 m3; name concrete; = 67,235*(225/1000)+17,265; lognormal variance with pedigree 0.122825, pedigree (1,4,2,2,5)
  Calculated value.
  Combined of all instances of use across the building structure and walls (15.128m3). Assumed thickness of 225 mm, http://kingspaninsulation.co.uk/getattachment/5fdd04b2-e58e-4622-97bb-5861799ab02a/Thermafloor-TF70-pdf.pdf. Assumed service life of 75 years which is equal to the service life of the hotel building with minor refurbishments throughout.
  Additionally the concrete for foundations is accounted for (17.265m3). Calculated value. Combined of all instances of use across the building structure and walls. Assumed thickness of 225 mm, http://kingspaninsulation.co.uk/getattachment/5fdd04b2-e58e-4622-97bb-5861799ab02a/Thermafloor-TF70-pdf.pdf. Assumed service life of 75 years which is equal to the service life of the hotel building with minor refurbishments throughout.
  property wet mass 2380 kg; name concrete_WM
  properties: dry mass 2190 kg, water content 0.086758
- gypsum plasterboard: 2309.04 kg; name gypsum; = (29,28*12.5/1000*640)+(3,241875*640); lognormal variance with pedigree 0.123425, pedigree (2,4,2,2,5)
  Calculated value. Combined of all instances of all across the building walls (data in m3) and roof (data in m2). Assumed thickness of roof plasterboard 12.5 mm. Source: Practical DYI 2018. Types of plasterboard. Available from: https://www.practicaldiy.com/general-building/plasterboard/plasterboard.php Accessed 23 March 2018. Assumed density of plasterboard 640 kg/m3. Source: British Gypsum 2018. What is the density of Gyproc plasterboards? Available from: http://www.british-gypsum.com/technical-advice/faqs/114-what-is-the-density-of-gyproc-plasterboards Accessed 23 March 2018. Assumed service life of 75 years with minor refurbishments throughout. In terms of outputs assumed to have gone to waste gypsum plasterboard.
  properties: carbon content, fossil 0.00113571, dry mass 1 kg, carbon content, non-fossil 0.0188747, wet mass 1 kg
- used door, inner, wood: -64.575 m2; name used_door; = (door_inner_w)*-1; lognormal variance with pedigree 0.122825, pedigree (1,4,2,2,5)
  Calculated value. Amount of output material is set equal to the amount of respectiveinput material, door, inner, wood.
  production volume 581.175 m2; = used_door*RP_PV/RP
    Calculated from production volume of reference product using the relative outputs.
  property price 0 EUR2005; name used_door_price_EUR2005
  properties: carbon content, fossil 0.074995, dry mass 26.22 kg, water content 0.0526316, carbon content, non-fossil 0.715131, wet mass 27.6 kg
- ceramic tile: 59527.3 kg; name tile; = ((266,345*12.3)*(lifetime/5))+(140,74*73,8); lognormal variance with pedigree 0.122825, pedigree (1,4,2,2,5)
  Calculated value. The amount of exchange is calculated as: amount of input product * (lifetime of the hostel / lifetime of the product). Combined of all instances of use across the building floor and roof. Assuming that 73.8kg/m2 of tiles required of roof ceramic tiles, https://www.marleyeternit.co.uk/~/media/Roofing-Specification/pdfs/Roofing-Specification-Guide---Concrete.pdf. Assumed service life of 75 years with minor refurbishments throughout. Assuming 12.3 kg of tiles is required to cover 1 m2 of floor area. Source: Victoria Plumbing 2018. British ceramic tile. Available from: https://victoriaplum.com/product/british-ceramic-tile-metro-bevel-white-gloss-tile-100mm-x-200mm Accessed 16 March 2018. Assumed service life of 5 years for floor ceramic tile which is equivalent to the period of major refurbishments in hotels. Source: Filimonau et al. 2011. Reviewing the carbon footprint analysis of hotels: Life Cycle Energy Analysis (LCEA) as a holistic method for carbon impact appraisal of tourist accommodation. Journal of Cleaner Production, 19(17-18), 1917-1930. In terms of outputs assumed to have gone to insert waste.
  properties: dry mass 1 kg, wet mass 1 kg
- electricity, low voltage: 232.511 kWh; name el; = 0.3* volume; lognormal variance with pedigree 0.422225, pedigree (1,4,2,2,5)
  Calculated value. Assuming that 0.30 kWh/m3 of electricity is necessary to construct a building. Source: Zabalza et al. 2013. Use of LCA as a Tool for Building Ecodesign. A Case Study of a Low Energy Building in Spain. Energies, 6 (8), 3901-3921.
- alkyd paint, white, without water, in 60% solution state: 113.4 kg; name paint; = (50,4/10*1.5)*(lifetime/5); lognormal variance with pedigree 0.122825, pedigree (1,4,2,2,5)
  Calculated value. The amount of exchange is calculated as: amount of input product * (lifetime of the hostel / lifetime of the product). Used here in place of water soluble acrylic paint and alkyd enamel. Combined of all instances of use across the building structure and walls. Assuming 1 liter of paint is required to paint 10m2 and weighs 1.5 kg. Source: BQ 2018. Wall painting calculator. Available from: https://www.diy.com/help-advice/wall-painting-calculator/Dev_npcart_100008.art Accessed 16 March 2018. Assumed service life of 5 years which is equivalent to the period of major refurbishments in hotels. Source: Filimonau et al. 2011. Reviewing the carbon footprint analysis of hotels: Life Cycle Energy Analysis (LCEA) as a holistic method for carbon impact appraisal of tourist accommodation. Journal of Cleaner Production, 19(17-18), 1917-1930. In terms of outputs assumed to have gone to waste paint on wall.
  properties: dry mass 1 kg, heating value, net 17.46 MJ, wet mass 1 kg, carbon content, non-fossil 0.161654, carbon content, fossil 0.414587
- blower and heat exchange unit, decentralized, 180-250 m3/h: 25 unit; = 5*lifetime/15; lognormal variance with pedigree 0.422225, pedigree (1,4,2,2,5)
  Calculated value. Represents here 5 air-conditioning units. The amount of exchange is calculated as: amount of input product * (lifetime of the hotel / lifetime of the product). Assumed service life of the air-conditioning unit is 15 years. Source: ASHRAE 2018. ASHRAE Equipment Life Expectancy chart. Available from: http://www.culluminc.com/wp-content/uploads/2013/02/ASHRAE_Chart_HVAC_Life_Expectancy%201.pdf Accessed 23 March 2018.
  properties: wet mass 43.1 kg, dry mass 43.1 kg, carbon content, non-fossil 6.48865e-7, carbon content, fossil 0.225044
- diesel, burned in building machine: 3878.28 MJ; name diesel; = 1.39*3.6*volume; lognormal variance with pedigree 0.422225, pedigree (1,4,2,2,5)
  Calculated value. Assuming that 1.39 kWh/m3 of diesel is necessary to construct a building. Source: Zabalza et al. 2013. Use of LCA as a Tool for Building Ecodesign. A Case Study of a Low Energy Building in Spain. Energies, 6(8), 3901-3921. Assuming 1 kWh = 3.6 MJ
  properties: heating value, net 1 MJ
- sanitary ceramics: 1400 kg; name sanitary; = ((7*15)*(lifetime/15)+(5*35)*(lifetime/15)); lognormal variance with pedigree 0.422225, pedigree (1,4,2,2,5)
  Calculated value. The amount of exchange is calculated as: amount of input product * (lifetime of the hotel / lifetime of the product). This flow represents ceramic washing basin and ceramic toilet seat. The hostel has 7 washing basins and 5 toilet seats. Washing basins are assumed to weigh 15kg (information taken from IKEA (2018) for the product "TÖRNVIKEN Countertop wash-basin", source retrieved from: http://www.ikea.com/gb/en/products/washstands-taps/wash-basins/t%C3%B6rnviken-countertop-wash-basin-white-art-90291518/, accessed 12 Feb 2018). The assumed lifetime is 15 years. Toilet seats are assumed to weigh 35kg (information taken from B&Q (2018) for the product "COOKE & LEWIS FABIENNE CLOSE-COUPLED TOILET WITH SOFT CLOSE SEAT", source retrieved from: https://www.diy.com/departments/cooke-lewis-fabienne-close-coupled-toilet-with-soft-close-seat/1142804_BQ.prd?B/R_Toilets_C_CT, accessed 12 Feb 2018). The assumed lifetime is 15 years. In terms of outputs, assumed to have gone to inert waste.
  properties: dry mass 1 kg, wet mass 1 kg
- wastewater, average: -129.173 m3; name wastewater; = (tap_water/1000)*-1; lognormal variance with pedigree 0.122825, pedigree (1,4,2,2,5)
  Calculated value. The amount is set equal to the amount of input material, tap water with conversion from kg to m3. 1 m3 of water is assumed to be equal to 1000 kg of water.
  production volume 1162.55 m3; = wastewater*RP_PV/RP
    Calculated from production volume of reference product using the relative outputs.
  property price 0 EUR2005; name wastewater_price_EUR2005
  properties: dry mass 0.346837 kg, water content 2882.2, wet mass 1000 kg, carbon content, non-fossil 0.194039
  note on carbon content, non-fossil: 0.0673 kg TOC/m3 (Tab A.17, ecoinvent v2.2 report 13_I). TOC was considered as Total Carbon.
- tap water: 129172 kg; name tap_water; = (0.5*1000*AFA); lognormal variance with pedigree 0.422225, pedigree (1,4,2,2,5)
  Calculated value. Assuming that 0.5 kl per 1 m2 of floor area (AFA) is required in building construction. Source: Crawford et al. 2005. In terms of outputs assumed to have gone to wastewater. Value double checked in McCormack, et al. 2007.
  Reference:
  Crawford, Robert and Treloar, Graham 2005, An assessment of the energy and water embodied in commercial building construction, in Australian Life Cycle Assessment Conference (4th : 2005 : Novotel, Sydney, N.S.W.), Australian Life Cycle Assessment Society, Sydney, N.S.W., pp. 1-10.
  McCormack, et al. 2007. Modelling direct and indirect water requirements of construction. Building research & information. 35(2), 156-162.
  properties: dry mass 0.000337476 kg, water content 2962.17, wet mass 1 kg, carbon content, fossil 0.00178991
  note on carbon content, fossil: Bicarbonate content is 2.93 mol/m3. CO2 content is 0.1 mol/m3 (ecoinvent v2.2 report 8, Tab 93.1).
- window frame, aluminium, U=1.6 W/m2K: 321.429 m2; name window; = 150*(lifetime/35); lognormal variance with pedigree 0.2106, pedigree (5,5,5,5,5)
  Calculated value. The amount of exchange is calculated as: amount of input product * (lifetime of the hotel / lifetime of the product). Assumed service life of 35 years. Source: Asif et al. 2002. LIFE CYCLE OF WINDOW MATERIALS - A COMPARATIVE ASSESSMENT. Available from: http://ohp.parks.ca.gov/pages/1054/files/uk%20window%20frame%20lca.pdf Accessed 16 March 2018.
  property wet mass 50.7 kg; name window_WM
  properties: heating value, net 219.49 MJ, dry mass 50.7 kg, carbon content, fossil 0.142876
- clay brick: 171230 kg; name brick; = 89,08925*1922; lognormal variance with pedigree 0.123425, pedigree (2,4,2,2,5)
  Calculated value. Combined of all instances of use across the building structure and walls. Assumed density of bricks = 1922 kg/m3. Source: The calculator site, 2018. Construction. Available from: https://www.thecalculatorsite.com/conversions/substances/construction.php. Accessed 13 January 2018. Assumed service life of 75 years which is equal to the service life of the hotel building with minor refurbishments throughout. In terms of outputs assumed to have gone to waste concrete.
  properties: dry mass 1 kg, wet mass 1 kg
- inert waste: -60927.3 kg; name inert_w; = (sanitary+ tile)*-1; lognormal variance with pedigree 0.122825, pedigree (1,4,2,2,5)
  Calculated value. Amount of output material is set equal to the amount of respective input material, sanitary ceramics. It also contains waste ceramic tile.
  production volume 548345 kg; = inert_w*RP_PV/RP
    Calculated from production volume of reference product using the relative outputs.
  property price 0 EUR2005; name inert_w_price_EUR2005
  properties: dry mass 1 kg, wet mass 1 kg
- aluminium scrap, post-consumer: -16296.4 kg; lognormal variance with pedigree 0.123425, pedigree (2,4,2,2,5)
  (same comment as for aluminium scrap, post-consumer)
  production volume 146668 kg
  properties: dry mass 1 kg, wet mass 1 kg

## Inputs from nature
- Transformation, from urban, green area [natural resource, land]: 172.65 m2; = GFA; lognormal variance with pedigree 0.242225, pedigree (1,4,2,2,5)
  Calculated value. Based on survey data.
- Transformation, to urban, continuously built [natural resource, land]: 172.65 m2; = GFA; lognormal variance with pedigree 0.242225, pedigree (1,4,2,2,5)
  Calculated value. Based on survey data.
- Occupation, urban, continuously built [natural resource, land]: 12948.8 m2*year; = GFA* lifetime; lognormal variance with pedigree 0.162225, pedigree (1,4,2,2,5)
  Calculated value. Based on survey data, the gross floor area multiplied by the lifetime of the building.

## Sampling procedure
Primary data from the hotel supplemented with literature-based calculations and estimates, where appropriate.

## Extrapolations
This dataset has been extrapolated from year 2018 to the year of the calculation (2021). The uncertainty has been adjusted accordingly.
