# hard disk drive production, for laptop computer

Dataset: EcoSpold 2, unit process
Geography: GLO
Time period: 2002-01-01 to 2021-12-31
Technology level: current
Classification: ISIC rev.4 ecoinvent: 2620:Manufacture of computers and peripheral equipment
Classification: EcoSpold01Categories: electronics/module
Synonyms: hard drive; Festplatte; Hard disk
Tags: ConvertedDataset
Scenario: Business-as-Usual
System model: Allocation, cut-off by classification
Generated by: Martin Lehmann
Published in: Hischier R. 2007
Database: ecoinvent
isCopyrightProtected: false
accessRestrictedTo: 1

## General comment
This dataset represents the production of 1 unit of Hard Disk for a laptop computer. It is based on a common hard disk drive in the last 3 years before 2005, 2.5 inch or 63.5 mm of radius, up to 80 or more GB with a total weight of 0.115 kg. Main data are based on one dissertation work plus laptop-specific data provided by a leading HDD manufacturer. Data for the desktop HDD have been extrapolated to the lighter laptop HDD by specific calculation setups.
[This dataset was already contained in the ecoinvent database version 2. It was not individually updated during the transfer to ecoinvent version 3. Life Cycle Impact Assessment results may still have changed, as they are affected by changes in the supply chain, i.e. in other datasets. This dataset was generated following the ecoinvent quality guidelines for version 2. It may have been subject to central changes described in the ecoinvent version 3 change report (http://www.ecoinvent.org/database/ecoinvent-version-3/reports-of-changes/), and the results of the central updates were reviewed extensively. The changes added e.g. consistent water flows and other information throughout the database. The documentation of this dataset can be found in the ecoinvent reports of version 2, which are still available via the ecoinvent website. The change report linked above covers all central changes that were made during the conversion process.]

## Included activities start
From reception of metals and plastics at the factory gate.

## Included activities end
This dataset includes the materials (mainly metals and plastics) with their respective manufacturing processes (e.g. sheet rolling or blow moulding). Further inventoried is the infrastructure (factory), the electricity for the assembly of the hard disk drive, the respective waste heat, and the required rail and road transport for input materials from the regional storage to the factory. Not included are emissions to air and water (negligible), the heating of the facility, scrap materials (recycled and reused), the packaging, as well as the disposal, which is attributed to the desktop computer as a whole.

## Geography
A laptop hard disk drive may be assembled anywhere in the world.

## Technology
The production of a hard disk drive for a laptop computer includes the metal processing steps rolling, cutting, section bar extrusion and coating. Plastic parts are blow moulded or extruded into required shapes.

## Reference product
- hard disk drive, for laptop computer: 1 unit; By-product classification allocatable product; CPC 45271: Fixed media storage units
  Notebook drives are typically 2.5" in size and can range from 20 up to 200 GB in size. Most systems will have between 60 and 120 GB of data size that is more than enough for the standard notebook system. Some of the ultraportable systems use the newer 1.8" PC card style hard drives. These range in size from about 10 to 60 GB. A typical computer Hard disk is built with: Top and bottom cover (aluminium), Printed circuit board (different materials - metals and plastics), Platters (aluminium) with motor/coils (different materials), Read/write heads on a pointer (aluminium), Motor for the pointer arm, with ultra-strong magnet (different materials). A hard disk can be characterised according to its capacity and physical size and some other measures:
  The capacity is usually quoted in gigabytes, older hard disks used to quote their smaller capacities in megabytes.
  The physical size on the other hand is quoted in inches. Almost all hard disks today are of either the 3.5" or 2.5" varieties, used in desktops and laptops, respectively. 2.5" disks are usually slower and have less capacity, but use less power and are more tolerant of movement. However, as of early 2007, manufacturers have started selling SATA and SAS 2.5" drives for use in servers and desktops. The size designations are more nomenclature than descriptive: for example, a 3.5" drive is named for the size of the floppy disk whose drive bay size it is originally designed to occupy; the drive itself is actually wider
  Number of I/O operations per second: Modern disks can perform around 50 random access or 100 sequential access operations per second.
  Power consumption (especially important in battery-powered laptops)
  Audible noise in dBA (although many still report it in bels, not decibels)
  G-shock rating (surprisingly high in modern disks)
  Transfer rate: Inner zone from 44.2 MB/s to 74.5 MB/s, outer zone from 74.0 MB/s to 111.4 MB/s
  Random access time: from 5 ms to 15 ms.
  The disk geometry of different hard drives varies, but always follows the same layout, no matter what the size or storage capacity. In each hard drive, each platter has 2 sides, and both of these sides have the same structure in all platters.
  Notable Hard disk families include Bit Serial Interfaces on the one hand and World Serial Interfaces on the other:
  Bit Serial Interfaces: These families are connected to a hard disk controller with three cables, one for data, one for control and one for power. The hard disk controller provides significant functions such as serial to parallel conversion, data separation and track formatting, and required matching to the drive in order to assure reliability.
  World Serial Interfaces: These families connect to a host bus adapter (today typically integrated into the "North Bridge") with two cables, one for data/control and one for power. The earliest versions of these interfaces typically had a 16 bit parallel data transfer to/from the drive and there are 8 and 32 bit variants. Modern versions have serial data transfer. Examples for these kind of families are IDE, DMA, SCSI, SATA or SAS.
  Integrated Drive Electronics (IDE) is later renamed to ATA, and then PATA. The name comes from the way early families had the hard disk controller external to the disk. Moving the hard disk controller from the interface card to the disk helped to standardize interfaces, including reducing the cost and complexity. In 2005/2006 parlance, the 40 pin IDE/ATA is called "PATA" or parallel ATA, which means that there are 16 bits of data transferred in parallel at a time on the data cable. The data cable is originally 40 conductor, but UDMA modes from the later disks requires using an 80 conductor cable (note that the 80 conductor cable still uses a 40 position connector.)
  Direct Memory Access (DMA): EIDE is an unofficial update (by Western Digital) to the original IDE standard, with the key improvement being the use of DMA to transfer data between the disk and the computer, an improvement later adopte
  EcoSpold01Location=GLO
  production volume 1 unit
    Unknown
    Dummy value to be replaced by measured, estimated or calculated value
  property price 22.33 EUR2005
    Calculated after Amazon. Source: http://www.amazon.com/250GB-Inchs-Drive-Laptop-Notebook/dp/B0087HHBXM
  property carbon content, fossil 0.0184862
    Calculated as the addition of C contents in the product composition, then referred to 1 kg DM
  property carbon content, non-fossil 6.95277e-5
    (same comment as for hard disk drive, for laptop computer)
  property carbon content 0.0185557
    carbon content on a dry matter basis (reserved; not for manual entry)
  properties: water content 0, wet mass 0.115 kg, water in wet mass 0 kg, dry mass 0.115 kg, carbon allocation 0.00213391 kg

## Inputs from technosphere
- acrylonitrile-butadiene-styrene copolymer: 0.0005102 kg; lognormal variance with pedigree 0.0521, pedigree (1,4,5,3,1)
  Calculated Value, Ratio platter surface Laptop HDD vs. PC HDD
  EcoSpold01Location=RER
  properties: dry mass 1 kg, carbon content, fossil 0.853081, wet mass 1 kg, heating value, net 35.58 MJ
  note on carbon content, fossil: ABS is the abbreviation originating from its monomers acrylonitrile, butadiene and styrene. It was assumed that every monomer was present in the same proportion, so the basic ABS monomer was considered (C8H8·C4H6·C3H3N), and the MW=104+54+53=211 g/mol
- steel, chromium steel 18/8, hot rolled: 0.0024 kg; lognormal variance with pedigree 0.0521, pedigree (1,4,5,3,1)
  Calculated Value,15 screws Laptop HDD instead of 25 for PC HDD
  EcoSpold01Location=RER
  properties: carbon content, fossil 0.0008, dry mass 1 kg, wet mass 1 kg
  note on carbon content, fossil: Stainless steel model is the grade 304 steel (18/8 stainless, 18% chromium 8% nickel; max. 0.08% C)
- printed wiring board mounting facility: 3.3333e-8 unit; lognormal variance with pedigree 0.3707, pedigree (2,4,5,3,3)
  Calculated Value, via the annual production volume (1.2 mill.) for a hard disk drive factory in China.
  EcoSpold01Location=GLO
- aluminium, wrought alloy: 0.0621785 kg; lognormal variance with pedigree 0.0521, pedigree (1,4,5,3,1)
  Calculated Value, Ratio Laptop HDD to PC HDD is 0.115/0.58=0.198 (=Ratio of total weights)
  EcoSpold01Location=RER
  properties: wet mass 1 kg, dry mass 1 kg
- electricity, medium voltage: 1.7125 kWh; source Stachura 2006; lognormal variance with pedigree 0.0521, pedigree (1,4,5,3,1)
  EcoSpold01Location=UCTE
  Estimation, based on literature and Mepsaws, a leading metal saw supplier in Italy.
- aluminium, cast alloy: 0.0292605 kg; lognormal variance with pedigree 0.0521, pedigree (1,4,5,3,1)
  EcoSpold01Location=RER
  Calculated Value, Ratio Laptop HDD to PC HDD is 0.115/0.58=0.198 (=Ratio of total weights)
  properties: wet mass 1 kg, dry mass 1 kg
- printed wiring board, surface mounted, unspecified, Pb free: 0.00291466 kg; lognormal variance with pedigree 0.0521, pedigree (1,4,5,3,1)
  EcoSpold01Location=GLO
  Calculated Value. Ratio Laptop HDD to PC HDD is 0.115/0.58=0.198
  properties: carbon content, fossil 0.132522, wet mass 1 kg, dry mass 1 kg
  note on carbon content, fossil: C content was calculated as the addition of C content in the PWB components
- printed wiring board, through-hole mounted, unspecified, Pb containing: 0.00124914 kg; lognormal variance with pedigree 0.0521, pedigree (1,4,5,3,1)
  EcoSpold01Location=GLO
  Calculated Value. Ratio Laptop HDD to PC HDD is 0.115/0.58=0.198
  properties: dry mass 1 kg, wet mass 1 kg, carbon content, fossil 0.132522
- printed wiring board, surface mounted, unspecified, Pb containing: 0.00124914 kg; lognormal variance with pedigree 0.0521, pedigree (1,4,5,3,1)
  EcoSpold01Location=GLO
  Calculated Value. Ratio Laptop HDD to PC HDD is 0.115/0.58=0.198
  properties: carbon content, fossil 0.132522, dry mass 1 kg, wet mass 1 kg
- powder coat, aluminium sheet: 0.0063337 m2; lognormal variance with pedigree 0.0721, pedigree (3,4,5,3,3)
  EcoSpold01Location=RER
  Calculated Value,Laptop HDD 63.5 mm platter diameter, desktop HDD 88.9 mm; 1 platter
- printed wiring board, through-hole mounted, unspecified, Pb free: 0.00291466 kg; lognormal variance with pedigree 0.0521, pedigree (1,4,5,3,1)
  Calculated Value. Ratio Laptop HDD to PC HDD is 0.115/0.58=0.198
  EcoSpold01Location=GLO
  properties: carbon content, fossil 0.132522, dry mass 1 kg, wet mass 1 kg
- section bar extrusion, aluminium: 0.087357 kg; lognormal variance with pedigree 0.0521, pedigree (1,4,5,3,1)
  Calculated Value
  EcoSpold01Location=RER
- steel, low-alloyed, hot rolled: 0.015069 kg; lognormal variance with pedigree 0.0521, pedigree (1,4,5,3,1)
  Calculated Value, Ratio Laptop HDD to PC HDD is 0.115/0.58=0.198
  EcoSpold01Location=RER
  properties: carbon content, fossil 0.005, wet mass 1 kg, dry mass 1 kg
  note on carbon content, fossil: Low alloyed steel composition given in Tab. 3.2 ecoinvent v2.2 report 10_partII. Steel assumed to have a C content of 0.5%
- stretch blow moulding: 0.0005102 kg; lognormal variance with pedigree 0.0701, pedigree (1,4,5,3,3)
  EcoSpold01Location=RER
  Calculated Value
- sheet rolling, aluminium: 0.0040816 kg; lognormal variance with pedigree 0.0521, pedigree (1,4,5,3,1)
  Calculated Value
  EcoSpold01Location=RER
- hot rolling, steel: 0.0024 kg; lognormal variance with pedigree 0.0521, pedigree (1,4,5,3,1)
  EcoSpold01Location=RER
  Calculated Value
- sheet rolling, steel: 0.015069 kg; lognormal variance with pedigree 0.0521, pedigree (1,4,5,3,1)
  Calculated Value
  EcoSpold01Location=RER

## Sampling procedure
Own estimations based on literature. Weighing of original components happened at a Technical University after professional disassembly.

## Extrapolations
This dataset has been extrapolated from year 2006 to the year of the calculation (2021). The uncertainty has been adjusted accordingly.

## Review by Rolf Frischknecht 2007-11-08
passed.

## Review by Roland Hischier 2011-09-28
Transfer of documentation done.
