# avocado production

Dataset: EcoSpold 2, unit process
Geography: GLO
Time period: 2010-01-01 to 2021-12-31
Technology level: current
Classification: ISIC rev.4 ecoinvent: 0122:Growing of tropical and subtropical fruits
Scenario: Business-as-Usual
System model: Allocation, cut-off by classification
Generated by: Franziska Stössel
Published in: Stoessel, Franziska; 2012
Database: ecoinvent
isCopyrightProtected: false
accessRestrictedTo: 1

## General comment
This dataset represents avocado production.

Yield: 10 t / ha.
Duration of one cycle: 12 months in permanent culture
Field production.
The LCA study, from which this LCI has been derived, contains detailed descriptions of the system boundaries and the data sources used (Stoessel et al. 2012). The publication is published and freely available with comprehensive supporting information:
http://pubs.acs.org/doi/pdf/10.1021/es2030577
Franziska Stoessel, Ronnie Juraske, Stephan Pfister, Stefanie Hellweg. (2012) Life Cycle Inventory and Carbon and Water FoodPrint of Fruits and Vegetables: Application to a Swiss Retailer. Environmental Science & Technology 6(46) 3253-3262.
This activity was adapted to include the global average land use change (LUC) emissions according 2nd edition of the Quantis-modified tool developed by Blonk Consultants 'WFLDB-adapted-Blonk 2014 direct-land-use-change-assessment-tool_2015-05-18a.xlsx', tab. 'Country & land use unknown'. The size of the emission depends on (i) the relative crop expansion in all countries of the crop during the last 20 years and (ii) the corresponding, country specific land transformations. The current results are based on the average FAOSTAT data (harvested area) of 2009-2011 and 1989-1991. The weighted average is used which takes into account relative difference in crop expansion into primary forest, secondary forest, grassland, perennial and annual land.

## Included activities start
From maintenance of the orchards after harvest of the previous crop.

## Included activities end
This activity ends with harvest and storage.
The dataset includes a storage period of 0.9 month and it's use of electricity. The pesticide inputs are classified according to their chemical classes and the emmssions are assigned to the soil (100%). Mercury emissions are neglected due to a lack of data while other heavy metal emissions are included.
The dataset doesn't include infrastructure for production and storage facilities. No transports for agricultural means of production from the regional storage to the farm are included.

## Technology
Production without production standard, but according to GAP

## Parameters
- fraction, irrigation water to surface water: 0.2 dimensionless; name fraction_IW_to_surface_water; lognormal variance with pedigree 0.0886, pedigree (4,3,1,1,4)
  Literature value (Doll, 2011) cross referenced with expert opinion.
- fraction, irrigation water, to air: 0.586986 dimensionless; name fraction_IW_to_air; lognormal variance with pedigree 0.0409, pedigree (2,2,2,1,1)
  Literature value (Siebert, 2010) (Vionnet, S., Quantis Water Database - Technical Report, 2012).
- fraction, irrigation water, to ground water: 0.8 dimensionless; name fraction_IW_to_ground_water; lognormal variance with pedigree 0.0886, pedigree (4,3,1,1,4)
  Literature value (Doll, 2011) cross referenced with expert opinion.

## Reference product
- avocado: 1 kg; source Stoessel, Franziska; 2012; CPC 01311: Avocados; By-product classification allocatable product
  production volume 3.8409e9 kg
    in kg / year (2010)
  property price 1.28 EUR2005
    Calculated from the trade statistics for the year 2005 published by the UN (COMTRADE database, accessed 20151105) as an average of 5 biggest importers of avocado in the world; USA, FR, UK, NL and JP. Comtrade cathegory: 80440: Avocados, fresh or dried.
  property carbon content 0.172351
    carbon content on a dry matter basis (reserved; not for manual entry)
  properties: carbon content, non-fossil 0.172351, water content 3.23729, dry mass 0.236 kg, carbon content, fossil 0, water in wet mass 0.764 kg, wet mass 1 kg, carbon allocation 0.0406748 kg

## Inputs from technosphere
- packaging, for fertilisers: 0.083 kg; lognormal variance with pedigree 0.0592, pedigree (4,3,4,5,4)
  Total amount of active substance/s of fertilisers needed for the production of 'avocado' is calculated to be circa 4.15E-02 kg. Fertiliser/s used in this dataset is/are: 'ammonium nitrate, as N', 'phosphate fertiliser, as P2O5', 'potassium sulfate, as K2O'. The total amount of active substance/s is doubled in order to account for the packaging of the dilluted product of fertiliser/s that is/are applied. Therefore, 8.30E-02 kg of packaging for fertilisers is justified with this exchange.
  properties: carbon content, fossil 0.825301, wet mass 1 kg, heating value, net 25.01 MJ, dry mass 1 kg, price 0.0642 EUR2005
  note on carbon content, fossil: Considering a chemical formula (C2H4)n for polyethylene, carbon content-fossil is calculated to be 0.856286 kg of Carbon per kg of dry mass.
- inorganic phosphorus fertiliser, as P2O5: 0 kg; source Stoessel, Franziska; 2012; pedigree (1,1,1,1,1)
  properties: wet mass 1 kg, dry mass 1 kg
- glyphosate: 0.00025 kg; source Stoessel, Franziska; 2012; lognormal variance with pedigree 0.0439, pedigree (3,3,5,3,2)
  properties: carbon content, fossil 0.214286, dry mass 1 kg, wet mass 1 kg
- organophosphorus-compound, unspecified: 0.00054 kg; = fosetyl; source Stoessel, Franziska; 2012; lognormal variance with pedigree 0.0453, pedigree (3,4,5,3,2)
  sum of organophosphorous compounds
  property carbon content, fossil 0.260898; name C_content_fossil
  property water content 0; name water_content
  property wet mass 1 kg; name WM
  property water in wet mass 0 kg; name WWM
  property carbon content, non-fossil 0; name C_content_non_fossil
  property dry mass 1 kg; name DM
- packaging, for pesticides: 0.0017 kg; lognormal variance with pedigree 0.0592, pedigree (4,3,4,5,4)
  Total amount of active substance/s of pesticides needed for the production of avocado is calculated to be circa 8.50E-04 kg. Pesticide/s used in this dataset is/are: 'acetamide-anillide-compound, unspecified', 'glyphosate', 'organophosphorus-compound, unspecified'. The total amount of active substance/s is doubled in order to account for the packaging of the dilluted product of pesticide/s that is/are applied. Therefore, 1.70E-03 kg of packaging for pesticides is justified with this exchange.
  properties: dry mass 1 kg, price 0.0642 EUR2005, heating value, net 25.97 MJ, carbon content, fossil 0.85714, wet mass 1 kg
- fertilising, by broadcaster: 0.0023 ha; source Stoessel, Franziska; 2012; lognormal variance with pedigree 0.0439, pedigree (3,3,5,3,2)
  Fertilizing by broadcaster is used as a proxy for all the machinery work done in horticultural processes.
- irrigation: 0.7505 m3; name water_irrigation_input; source Stoessel, Franziska; 2012; lognormal variance with pedigree 0.0198, pedigree (2,4,4,4,3)
  Average Israel Spain and South Africa
  properties: wet mass 1000 kg, dry mass 0.11 kg, water content 9089.91
- acetamide-anillide-compound, unspecified: 6e-5 kg; = metalaxyl; source Stoessel, Franziska; 2012; lognormal variance with pedigree 0.0453, pedigree (3,4,5,3,2)
  sum of acetamide-anilide compounds
  properties: dry mass 1 kg, carbon content, fossil 0.659175, wet mass 1 kg
- potassium sulfate: 0 kg; source Stoessel, Franziska; 2012; pedigree (1,1,1,1,1)
  The exchange has been updated from 'potassium sulfate, as K2O' into 'potassium sulfate' and therefore its amount has been scaled (multiplied) from 0.018 kg by 1.85 kg of 'potassium sulfate' per kg of 'potassium sulfate, as K2O'.
  properties: dry mass 1 kg, wet mass 1 kg
- ammonium nitrate: 0 kg; source Stoessel, Franziska; 2012; pedigree (1,1,1,1,1)
  The exchange has been updated from 'ammonium nitrate, as N' into 'ammonium nitrate' and therefore its amount has been scaled (multiplied) from 0.015 kg by 2.8573 kg of 'ammonium nitrate' per kg of 'ammonium nitrate, as N'.
  properties: dry mass 1 kg, wet mass 1 kg
- electricity, low voltage: 0.0249 kWh; source Stoessel, Franziska; 2012; lognormal variance with pedigree 0.0439, pedigree (3,3,5,3,2)
- inorganic phosphorus fertiliser, as P2O5: 0.000317293, 3.22403e-5, 0.00115146, 1.60821e-5, 2.26481e-6, 6.22919e-5, 2.30288e-6, 3.71601e-5, 2.07545e-5, 7.62139e-5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 kg (30 entries); source Stoessel, Franziska; 2012; lognormal variance with pedigree 0.0439, pedigree (3,3,5,3,2)
- potassium sulfate: 0.00579409, 0.0275053 kg (2 entries); source Stoessel, Franziska; 2012; lognormal variance with pedigree 0.04336, pedigree (3,3,5,3,2)
  (same comment as for potassium sulfate)
- ammonium nitrate: 0.0106189, 0.00736461, 0.00566049, 0.0192158 kg (4 entries); source Stoessel, Franziska; 2012; lognormal variance with pedigree 0.0439, pedigree (3,3,5,3,2)
  (same comment as for ammonium nitrate)

## Inputs from nature
- Energy, gross calorific value, in biomass [natural resource, biotic]: 7.79284 MJ; lognormal variance with pedigree 0.0099, pedigree (2,3,4,3,1)
  Calculated value based on literature. The gross energy is calculated using following formula; gross energy (MJ) = crude protein (kg)*23.04 (MJ/kg)+crude fat (kg)*38.96 (MJ/kg)+crude fibre (kg)*17.95 (MJ/kg)+carbohydrates (kg)*17.17 (MJ/kg) (formula based on expert opinion, cross referenced; Diepenbrock, 2012, Energy Balance in Crop Production). The product composition of fruits and vegetables is extracted from the USDA National Nutrient Database for Standard Reference (http://ndb.nal.usda.gov/, accessed 20131114). Crude protein (g)= 20, crude fat (g)= 146.6, crude fibre (g)= 67, ash (g)= 15.8, water (g)= 732.3, carbohydrates (g)= 85.3. The gross energy per kg of DM is 37.46MJ. The calculated gross energy per kg of reference product is thus 7.79MJ.
- Occupation, permanent crop, irrigated, intensive [natural resource, land]: 1 m2*year; source Stoessel, Franziska; 2012; lognormal variance with pedigree 0.0453, pedigree (3,3,5,3,2)
- Transformation, from permanent crop, irrigated, intensive [natural resource, land]: 1 m2; source Stoessel, Franziska; 2012; lognormal variance with pedigree 0.0453, pedigree (3,3,5,3,2)
- Transformation, to permanent crop, irrigated, intensive [natural resource, land]: 1 m2; source Stoessel, Franziska; 2012; lognormal variance with pedigree 0.0453, pedigree (3,3,5,3,2)

## Emissions to nature
- Water [air, unspecified]: 0.440533 m3; name water_to_air_unspecified; = water_irrigation_input*fraction_IW_to_air; lognormal variance with pedigree 0.0487, pedigree (2,2,4,1,1)
  Calculated value based on literature values and expert opinion. See comments in the parametres' comment field.
  property fraction, origin: salt water 0; name fraction_origin_salt_water
  property fraction, origin: fresh water 1; name fraction_origin_fresh_water
  property fraction, origin: unspecified 0; name fraction_origin_unspecified
- Nitrogen oxides [air, non-urban air or from high stacks]: 6.16275e-5 kg; source Thomas Nemecek 2011; lognormal variance with pedigree 0.0747, pedigree (3,4,5,3,2)
- Chromium [soil, agricultural]: 5.47401e-8 kg; source Thomas Nemecek 2011; lognormal variance with pedigree 0.0847, pedigree (3,4,5,3,2)
- Carbon dioxide, from soil or biomass stock [air, non-urban air or from high stacks]: 0.133891 kg; normal variance with pedigree 0.5452, pedigree (3,3,5,5,2)
  Global average LUC emissions according 2nd edition of the Quantis-modified tool developed by Blonk Consultants 'WFLDB-adapted-Blonk 2014 direct-land-use-change-assessment-tool_2015-05-18a.xlsx', tab. 'Country & land use unknown'. The emission are based on the relative change in production areas in all countries for a given crop. The weighted average is used which takes into acount relative difference in crop expansion into primary forest, secondary forest, grassland, perennial and annual land.
  Uncertainty: Uncertainty estimated based on IPCC 2006
- Cadmium [soil, agricultural]: 4.13756e-7 kg; source Thomas Nemecek 2011; lognormal variance with pedigree 0.0847, pedigree (3,4,5,3,2)
- Dinitrogen monoxide [air, non-urban air or from high stacks]: 0.000293464 kg; source Thomas Nemecek 2011; lognormal variance with pedigree 0.0747, pedigree (3,4,5,3,2)
- Glyphosate [soil, agricultural]: 0.00025 kg; source Stoessel, Franziska; 2012; lognormal variance with pedigree 0.0777, pedigree (3,4,5,3,2)
- Copper [soil, agricultural]: -1.88532e-6 kg; source Thomas Nemecek 2011
- Ammonia [air, non-urban air or from high stacks]: 0.000364286 kg; source Thomas Nemecek 2011; lognormal variance with pedigree 0.0527, pedigree (3,4,5,3,2)
- Nitrate [water, ground-]: 0.0199286 kg; source Thomas Nemecek 2011; lognormal variance with pedigree 0.0847, pedigree (3,4,5,3,2)
- Lead [soil, agricultural]: 4.20572e-6 kg; source Thomas Nemecek 2011; lognormal variance with pedigree 0.0847, pedigree (3,4,5,3,2)
- Phosphorus [water, surface water]: 2.45e-5 kg; source Stoessel, Franziska; 2012; lognormal variance with pedigree 0.0847, pedigree (3,4,5,3,2)
- Nickel [soil, agricultural]: 6.05505e-7 kg; source Thomas Nemecek 2011; lognormal variance with pedigree 0.0847, pedigree (3,4,5,3,2)
- Phosphate [water, ground-]: 7e-6 kg; source Stoessel, Franziska; 2012; lognormal variance with pedigree 0.0847, pedigree (3,4,5,3,2)
- Water [water, surface water]: 0.0619934 m3; name water_to_water_surface; = water_irrigation_input*(1-fraction_IW_to_air)*fraction_IW_to_surface_water; lognormal variance with pedigree 0.0966, pedigree (4,3,4,1,4)
  Calculated value. See the parameters and their comments to understand the calculation.
  property fraction, origin: fresh water 1; name fraction_origin_fresh_water_Wsw
  property fraction, origin: salt water 0; name fraction_origin_salt_water_Wsw
- Zinc [soil, agricultural]: 4.66145e-6 kg; source Thomas Nemecek 2011; lognormal variance with pedigree 0.0847, pedigree (3,4,5,3,2)
- Metalaxyl-M [soil, agricultural]: 6e-5 kg; name metalaxyl; source Stoessel, Franziska; 2012; lognormal variance with pedigree 0.0777, pedigree (3,4,5,3,2)
- Water [water, ground-]: 0.247974 m3; name water_to_water_ground; = water_irrigation_input*(1-fraction_IW_to_air)*fraction_IW_to_ground_water; lognormal variance with pedigree 0.0966, pedigree (4,3,4,1,4)
  Calculated value. See the parameters and their comments to understand the calculation.
  property fraction, origin: unspecified 0; name fraction_origin_unspecified_Wgw
  property fraction, origin: fresh water 1; name fraction_origin_fresh_water_Wgw
  property fraction, origin: salt water 0; name fraction_origin_salt_water_Wgw
- Fosetyl-aluminium [soil, agricultural]: 0.00054 kg; name fosetyl; source Stoessel, Franziska; 2012; lognormal variance with pedigree 0.0777, pedigree (3,4,5,3,2)

## Sampling procedure
The LCI is based on avocado production information from different sources (peer reviewed journals, books, extension leaflets, personal information) and is well representative for a conventional production in their main production countries. Most probably it is representative for productions in other countries or farms which produces similarly.
Please refer to Stoessel et al. (2012) for more information: http://pubs.acs.org/doi/pdf/10.1021/es2030577
Franziska Stoessel, Ronnie Juraske, Stephan Pfister, Stefanie Hellweg. (2012) Life Cycle Inventory and Carbon and Water FoodPrint of Fruits and Vegetables: Application to a Swiss Retailer. Environmental Science & Technology 6(46) 3253-3262.

## Extrapolations
This dataset has been extrapolated from year 2010 to the year of the calculation (2021). The uncertainty has been adjusted accordingly.

## Review by Gregor Wernet 2011-12-31
The documentation on this dataset is quite poor. The dataset has been temporarily accepted since the data provider promised to provide more detailed information within the dataset and in a general document in the editorial section of the ecoinvent homepage.

## Review by Bo Weidema 2011-12-31
Infrastructure missing. Source of production volume (FAOSTAT) missing.
