# treatment of waste paperboard, open dump, moist infiltration class (300mm)

Dataset: EcoSpold 2, unit process
Geography: GLO
Time period: 2006-01-01 to 2021-12-31
Technology level: current
Classification: ISIC rev.4 ecoinvent: 3821:Treatment and disposal of non-hazardous waste
Synonyms: municipal waste landfill
Scenario: Business-as-Usual
System model: Allocation, cut-off by classification
Share of production covered: 1 %
Generated by: Avraam Symeonidis
Database: ecoinvent
isCopyrightProtected: true
accessRestrictedTo: 1

## General comment
This dataset represents the activity of waste disposal of waste paperboard in a open dump. Recommended use of this dataset: For cardboard, which goes to disposal as part of unmanaged communal waste mixture. Larger amounts of *already separated* cardboard could go to recycling, depending on country-specific situation. // Waste composition (wet, in ppm): upper heating value 17.91 MJ/kg; lower heating value 15.92 MJ/kg; H2O 104370; O 392680; H 57791; C 433270; S 1776.8; N 2583.5; P n.a.; B n.a.; Cl 7173.3; Br n.a.; F n.a.; I n.a.; Ag n.a.; As 1.168; Ba 57.193; Cd 0.93313; Co 0.91806; Cr 9.2403; Cu 35.113; Hg 0.30131; Mn 95.196; Mo n.a.; Ni 10.64; Pb 28.963; Sb 0.0046044; Se 3.1073; Sn 6.7521; V n.a.; Zn 63.333; Be 1.1299; Sc n.a.; Sr 45.009; Ti n.a.; Tl n.a.; W n.a.; Si n.a.; Fe n.a.; Ca n.a.; Al n.a.; K n.a.; Mg n.a.; Na n.a.; . // Share of carbon in waste that is biogenic 100%. Share of metals in waste not oxidised and bulk-recyclable (exclude very small or thin parts) Iron: 0%; Alu: 0%; Copper: 0%. Overall degradability of waste during 100 years: 32.44%.

## Included activities start
from final waste deposition (without transports to the site)

## Included activities end
Waste-specific short-term emissions to air via landfill gas and landfill leachate. Waste-specific long-term emissions from landfill.

## Geography
Given name of landfill location is 'infiltration class 3 moist (2018)'. Landfill site with mean annual temperature (MAT) of 8 degC, mean annual precipitation (MAP) of 900 mm/year, and net infiltration of 300 mm/year.
Climate adjustments result in an alpha t (temperature) for permafrost areas of 0.999. Total climate adjustments with alpha pt of 0.999.

## Technology
This is an inventory for an open, uncontrolled waste dump for municipal solid waste. Ultimate average landfill height is 7 meters. Operation phase duration is 15 years.Percentage of landfill gas directly emitted is 100w%. A Methane Correction Factor (MCF) for landfill air emissions of 0.7057 is employed.
Leachate of the landfill is not treated. Based on average waste composition and climate data the end of carbonate phase is estimated to be reached 2658 years after waste deposition.

## Reference product
- waste paperboard: -1 kg; CPC 39240: Waste and scrap of paper or paperboard; By-product classification Waste; pedigree (1,1,1,1,1)
  main reference product of this activity (supply of disposal service).
  Uncertainty: Uncertainty is not adjusted, as this is the refence product
  production volume 1 kg
    The amount of the annual production volume is a placeholder value. The contribution of this technology to the different local markets can be found in the markets themselves.
  property price 0 EUR2005
    Waste products are assigned a price of zero as they are assumed to require further treatment.
  property heating value, net 15.92 MJ
    Value taken from the general comment of the treatment dataset.
  property carbon content 0.48376
    carbon content on a dry matter basis (reserved; not for manual entry)
  properties: wet mass 1 kg, oxygen content 0.43844, cadmium content 1.0419e-6, hydrogen content 0.064525, manganese content 0.00010629, cobalt content 1.025e-6, tin content 7.5389e-6, nitrogen content 0.0028846, antimony content 5.141e-9, copper content 3.9204e-5, selenium content 3.4694e-6, sulfur content 0.0019839, dry mass 0.89563 kg, lead content 3.2338e-5, nickel content 1.188e-5, arsenic content 1.3041e-6, chromium content 1.0317e-5, zinc content 7.0713e-5, water in wet mass 0.10437 kg, chlorine content 0.0080092, strontium content 5.0253e-5, beryllium content 1.2616e-6, carbon content, non-fossil 0.48376, mercury content 3.3642e-7, barium content 6.3858e-5, heating value, gross 17.906 MJ, water content 0.11653, carbon allocation 0.43327 kg

## Inputs from nature
- Occupation, dump site [natural resource, land]: 0.0035714 m2*year; lognormal variance with pedigree 0.088256, pedigree (1,1,4,1,1)
  for landfill operation phase and spontaneous renaturation.
  Uncertainty: Uncertainty calculated from uncertainty in base parameters.

## Emissions to nature
- Heat, waste [soil, industrial]: 4.6687 MJ; lognormal variance with pedigree 0.028713, pedigree (1,1,4,1,1)
  burden from short-term decomposition of waste (0-100a).
  Uncertainty: Uncertainty calculated from unertainty of the waste composition of this waste, uncertainty in waste decomposition and short-term leaching in landfill
- Arsenic, ion [water, ground-, long-term]: 1.0991e-6 kg; lognormal variance with pedigree 0.3954, pedigree (1,1,4,1,1)
  Emissions from long-term leachate (>100a) directly from MSW landfill and indirectly via incineration of treatement sludge from leachate treatement.
  Uncertainty: Uncertainty calculated depending on waste input and uncertainty of long-term transfer coefficents in landfill.
- BOD5, Biological Oxygen Demand [water, ground-]: 0.0010587 kg; lognormal variance with pedigree 0.105812, pedigree (1,1,4,1,1)
  burden from short-term leachate to groundwater in uncontrolled landfill in moist cimate.
  Uncertainty: Uncertainty calculated from unertainty of the waste composition of this waste, uncertainty in waste decomposition and short-term leaching in landfill
- Nitrogen, organic bound [water, ground-, long-term]: 0.00032838 kg; lognormal variance with pedigree 0.15296, pedigree (1,1,4,1,1)
  (same comment as for Arsenic, ion)
- Heat, waste [water, ground-, long-term]: 12.104 MJ; lognormal variance with pedigree 0.030912, pedigree (1,1,4,1,1)
  burden from long-term decomposition of waste (>100a).
  Uncertainty: Uncertainty calculated from unertainty of the waste composition of this waste, uncertainty in waste decomposition and short-term leaching in landfill
- Nitrite [water, ground-, long-term]: 1.0935e-5 kg; lognormal variance with pedigree 0.15296, pedigree (1,1,4,1,1)
  (same comment as for Arsenic, ion)
- Antimony [air, non-urban air or from high stacks]: 3.9332e-14 kg; lognormal variance with pedigree 0.8086, pedigree (1,1,4,1,1)
  burden from direct release or incineration of landfill biogas; or windblown leachate evaporite in arid climates.
  Uncertainty: Uncertainty calculated from unertainty of the waste composition of this waste, uncertainty in waste decomposition and short-term leaching in landfill
- Ammonium, ion [water, ground-, long-term]: 0.00020091 kg; lognormal variance with pedigree 0.15296, pedigree (1,1,4,1,1)
  (same comment as for Arsenic, ion)
- Selenium [air, non-urban air or from high stacks]: 2.6543e-11 kg; lognormal variance with pedigree 0.68357, pedigree (1,1,4,1,1)
  (same comment as for Antimony)
- DOC, Dissolved Organic Carbon [water, ground-, long-term]: 0.29289 kg; lognormal variance with pedigree 0.0142852, pedigree (1,1,4,1,1)
  (same comment as for Arsenic, ion)
- Tin [air, non-urban air or from high stacks]: 3.2229e-12 kg; lognormal variance with pedigree 0.75167, pedigree (1,1,4,1,1)
  (same comment as for Antimony)
- Hydrogen sulfide [water, ground-, long-term]: 0.00011107 kg; lognormal variance with pedigree 0.15417, pedigree (1,1,4,1,1)
  (same comment as for Arsenic, ion)
- Zinc [air, non-urban air or from high stacks]: 2.1603e-10 kg; lognormal variance with pedigree 0.6139, pedigree (1,1,4,1,1)
  (same comment as for Antimony)
- Sulfate [water, ground-, long-term]: 0.0042609 kg; lognormal variance with pedigree 0.15417, pedigree (1,1,4,1,1)
  (same comment as for Arsenic, ion)
- Nickel [air, non-urban air or from high stacks]: 5.0108e-11 kg; lognormal variance with pedigree 0.66259, pedigree (1,1,4,1,1)
  (same comment as for Antimony)
- BOD5, Biological Oxygen Demand [water, ground-, long-term]: 0.075836 kg; lognormal variance with pedigree 0.0142852, pedigree (1,1,4,1,1)
  (same comment as for Arsenic, ion)
- Lead [air, non-urban air or from high stacks]: 1.8431e-11 kg; lognormal variance with pedigree 0.69426, pedigree (1,1,4,1,1)
  (same comment as for Antimony)
- COD, Chemical Oxygen Demand [water, ground-, long-term]: 0.32034 kg; lognormal variance with pedigree 0.0142852, pedigree (1,1,4,1,1)
  (same comment as for Arsenic, ion)
- Manganese [air, non-urban air or from high stacks]: 8.8316e-9 kg; lognormal variance with pedigree 0.49152, pedigree (1,1,4,1,1)
  (same comment as for Antimony)
- TOC, Total Organic Carbon [water, ground-, long-term]: 0.29289 kg; lognormal variance with pedigree 0.0142852, pedigree (1,1,4,1,1)
  (same comment as for Arsenic, ion)
- Cadmium [air, non-urban air or from high stacks]: 3.5467e-10 kg; lognormal variance with pedigree 0.5974, pedigree (1,1,4,1,1)
  (same comment as for Antimony)
- Chromium [air, non-urban air or from high stacks]: 8.5318e-12 kg; lognormal variance with pedigree 0.72015, pedigree (1,1,4,1,1)
  (same comment as for Antimony)
- Strontium [water, ground-]: 8.4784e-7 kg; lognormal variance with pedigree 0.34781, pedigree (1,1,4,1,1)
  (same comment as for BOD5, Biological Oxygen Demand)
- Mercury [air, non-urban air or from high stacks]: 2.6751e-9 kg; lognormal variance with pedigree 0.53362, pedigree (1,1,4,1,1)
  (same comment as for Antimony)
- Beryllium [water, ground-]: 2.1285e-8 kg; lognormal variance with pedigree 0.46913, pedigree (1,1,4,1,1)
  (same comment as for BOD5, Biological Oxygen Demand)
- Cobalt [air, non-urban air or from high stacks]: 2.3903e-11 kg; lognormal variance with pedigree 0.68654, pedigree (1,1,4,1,1)
  (same comment as for Antimony)
- Lead [water, ground-]: 5.5294e-8 kg; lognormal variance with pedigree 0.43213, pedigree (1,1,4,1,1)
  (same comment as for BOD5, Biological Oxygen Demand)
- Copper [air, non-urban air or from high stacks]: 1.5918e-11 kg; lognormal variance with pedigree 0.69872, pedigree (1,1,4,1,1)
  (same comment as for Antimony)
- Antimony [water, ground-]: 1.5733e-10 kg; lognormal variance with pedigree 0.54482, pedigree (1,1,4,1,1)
  (same comment as for BOD5, Biological Oxygen Demand)
- Hydrogen chloride [air, non-urban air or from high stacks]: 8.4366e-5 kg; lognormal variance with pedigree 0.19704, pedigree (1,1,4,1,1)
  (same comment as for Antimony)
- Zinc, ion [water, ground-]: 9.7213e-7 kg; lognormal variance with pedigree 0.34229, pedigree (1,1,4,1,1)
  (same comment as for BOD5, Biological Oxygen Demand)
- Barium [air, non-urban air or from high stacks]: 5.306e-9 kg; lognormal variance with pedigree 0.50847, pedigree (1,1,4,1,1)
  (same comment as for Antimony)
- Tin, ion [water, ground-]: 1.2892e-8 kg; lognormal variance with pedigree 0.48033, pedigree (1,1,4,1,1)
  (same comment as for BOD5, Biological Oxygen Demand)
- Arsenic [air, non-urban air or from high stacks]: 9.5291e-10 kg; lognormal variance with pedigree 0.56514, pedigree (1,1,4,1,1)
  (same comment as for Antimony)
- Selenium [water, ground-]: 1.0617e-7 kg; lognormal variance with pedigree 0.4198, pedigree (1,1,4,1,1)
  (same comment as for BOD5, Biological Oxygen Demand)
- Nitrogen oxides [air, non-urban air or from high stacks]: 1.1481e-6 kg; lognormal variance with pedigree 0.19827, pedigree (1,1,4,1,1)
  burden from direct release or incineration of landfill biogas.
  Uncertainty: Uncertainty calculated from unertainty of the waste composition of this waste, uncertainty in waste decomposition and short-term leaching in landfill
- Nickel, ion [water, ground-]: 2.0043e-7 kg; lognormal variance with pedigree 0.39566, pedigree (1,1,4,1,1)
  (same comment as for BOD5, Biological Oxygen Demand)
- Methane, non-fossil [air, non-urban air or from high stacks]: 0.071751 kg; lognormal variance with pedigree 0.032929, pedigree (1,1,4,1,1)
  (same comment as for Nitrogen oxides)
- Manganese [water, ground-]: 3.5327e-5 kg; lognormal variance with pedigree 0.25688, pedigree (1,1,4,1,1)
  (same comment as for BOD5, Biological Oxygen Demand)
- Sulfur dioxide [air, non-urban air or from high stacks]: 7.5131e-5 kg; lognormal variance with pedigree 0.22325, pedigree (1,1,4,1,1)
  (same comment as for Nitrogen oxides)
- Mercury [water, ground-]: 6.6877e-9 kg; lognormal variance with pedigree 0.50708, pedigree (1,1,4,1,1)
  (same comment as for BOD5, Biological Oxygen Demand)
- Chromium VI [water, ground-]: 3.4127e-8 kg; lognormal variance with pedigree 0.44912, pedigree (1,1,4,1,1)
  (same comment as for BOD5, Biological Oxygen Demand)
- Carbon dioxide, non-fossil [air, non-urban air or from high stacks]: 0.30244 kg; lognormal variance with pedigree 0.008, pedigree (1,1,4,1,1)
  (same comment as for Nitrogen oxides)
- Cobalt [water, ground-]: 9.5612e-8 kg; lognormal variance with pedigree 0.43229, pedigree (1,1,4,1,1)
  (same comment as for BOD5, Biological Oxygen Demand)
- Strontium [water, ground-, long-term]: 4.4161e-5 kg; lognormal variance with pedigree 0.27508, pedigree (1,1,4,1,1)
  (same comment as for Arsenic, ion)
- Copper, ion [water, ground-]: 5.5712e-8 kg; lognormal variance with pedigree 0.43165, pedigree (1,1,4,1,1)
  (same comment as for BOD5, Biological Oxygen Demand)
- Beryllium [water, ground-, long-term]: 1.1086e-6 kg; lognormal variance with pedigree 0.39641, pedigree (1,1,4,1,1)
  (same comment as for Arsenic, ion)
- Nitrate [water, ground-]: 8.3882e-5 kg; lognormal variance with pedigree 0.14238, pedigree (1,1,4,1,1)
  (same comment as for BOD5, Biological Oxygen Demand)
- Tin, ion [water, ground-, long-term]: 6.7392e-6 kg; lognormal variance with pedigree 0.33793, pedigree (1,1,4,1,1)
  (same comment as for Arsenic, ion)
- Arsenic, ion [water, ground-]: 6.7974e-8 kg; lognormal variance with pedigree 0.43804, pedigree (1,1,4,1,1)
  (same comment as for BOD5, Biological Oxygen Demand)
- Zinc, ion [water, ground-, long-term]: 6.236e-5 kg; lognormal variance with pedigree 0.26372, pedigree (1,1,4,1,1)
  (same comment as for Arsenic, ion)
- Chloride [water, ground-]: 0.005853 kg; lognormal variance with pedigree 0.11021, pedigree (1,1,4,1,1)
  (same comment as for BOD5, Biological Oxygen Demand)
- Selenium [water, ground-, long-term]: 5.5157e-7 kg; lognormal variance with pedigree 0.54735, pedigree (1,1,4,1,1)
  (same comment as for Arsenic, ion)
- Cadmium, ion [water, ground-]: 5.3201e-8 kg; lognormal variance with pedigree 0.44582, pedigree (1,1,4,1,1)
  (same comment as for BOD5, Biological Oxygen Demand)
- Antimony [water, ground-, long-term]: 2.7905e-10 kg; lognormal variance with pedigree 0.97499, pedigree (1,1,4,1,1)
  (same comment as for Arsenic, ion)
- Barium [water, ground-]: 2.1224e-5 kg; lognormal variance with pedigree 0.27384, pedigree (1,1,4,1,1)
  (same comment as for BOD5, Biological Oxygen Demand)
- Manganese [water, ground-, long-term]: 5.9861e-5 kg; lognormal variance with pedigree 0.25161, pedigree (1,1,4,1,1)
  (same comment as for Arsenic, ion)
- Nitrite [water, ground-]: 4.3412e-5 kg; lognormal variance with pedigree 0.14238, pedigree (1,1,4,1,1)
  (same comment as for BOD5, Biological Oxygen Demand)
- Lead [water, ground-, long-term]: 2.8908e-5 kg; lognormal variance with pedigree 0.28973, pedigree (1,1,4,1,1)
  (same comment as for Arsenic, ion)
- Nitrogen, organic bound [water, ground-]: 0.0013036 kg; lognormal variance with pedigree 0.14238, pedigree (1,1,4,1,1)
  (same comment as for BOD5, Biological Oxygen Demand)
- Nickel, ion [water, ground-, long-term]: 1.044e-5 kg; lognormal variance with pedigree 0.32293, pedigree (1,1,4,1,1)
  (same comment as for Arsenic, ion)
- Ammonium, ion [water, ground-]: 0.00079761 kg; lognormal variance with pedigree 0.14238, pedigree (1,1,4,1,1)
  (same comment as for BOD5, Biological Oxygen Demand)
- Mercury [water, ground-, long-term]: 2.9195e-7 kg; lognormal variance with pedigree 0.43898, pedigree (1,1,4,1,1)
  (same comment as for Arsenic, ion)
- Hydrogen sulfide [water, ground-]: 1.5617e-5 kg; lognormal variance with pedigree 0.17978, pedigree (1,1,4,1,1)
  (same comment as for BOD5, Biological Oxygen Demand)
- Copper, ion [water, ground-, long-term]: 3.5057e-5 kg; lognormal variance with pedigree 0.28333, pedigree (1,1,4,1,1)
  (same comment as for Arsenic, ion)
- TOC, Total Organic Carbon [water, ground-]: 0.0040889 kg; lognormal variance with pedigree 0.105812, pedigree (1,1,4,1,1)
  (same comment as for BOD5, Biological Oxygen Demand)
- Cobalt [water, ground-, long-term]: 8.2243e-7 kg; lognormal variance with pedigree 0.40332, pedigree (1,1,4,1,1)
  (same comment as for Arsenic, ion)
- Sulfate [water, ground-]: 0.00059909 kg; lognormal variance with pedigree 0.17978, pedigree (1,1,4,1,1)
  (same comment as for BOD5, Biological Oxygen Demand)
- Chromium VI [water, ground-, long-term]: 2.5591e-8 kg; lognormal variance with pedigree 2.4945, pedigree (1,1,4,1,1)
  (same comment as for Arsenic, ion)
- DOC, Dissolved Organic Carbon [water, ground-]: 0.0040889 kg; lognormal variance with pedigree 0.105812, pedigree (1,1,4,1,1)
  (same comment as for BOD5, Biological Oxygen Demand)
- Barium [water, ground-, long-term]: 3.5964e-5 kg; lognormal variance with pedigree 0.26857, pedigree (1,1,4,1,1)
  (same comment as for Arsenic, ion)
- Strontium [air, non-urban air or from high stacks]: 2.1196e-10 kg; lognormal variance with pedigree 0.61474, pedigree (1,1,4,1,1)
  (same comment as for Antimony)
- Chloride [water, ground-, long-term]: 0.0012382 kg; lognormal variance with pedigree 0.1162, pedigree (1,1,4,1,1)
  (same comment as for Arsenic, ion)
- COD, Chemical Oxygen Demand [water, ground-]: 0.0044723 kg; lognormal variance with pedigree 0.105812, pedigree (1,1,4,1,1)
  (same comment as for BOD5, Biological Oxygen Demand)
- Nitrate [water, ground-, long-term]: 2.1129e-5 kg; lognormal variance with pedigree 0.15296, pedigree (1,1,4,1,1)
  (same comment as for Arsenic, ion)
- Beryllium [air, non-urban air or from high stacks]: 5.3212e-12 kg; lognormal variance with pedigree 0.73606, pedigree (1,1,4,1,1)
  (same comment as for Antimony)
- Cadmium, ion [water, ground-, long-term]: 8.7957e-7 kg; lognormal variance with pedigree 0.40267, pedigree (1,1,4,1,1)
  (same comment as for Arsenic, ion)

## Extrapolations
This dataset has been extrapolated from year 2012 to the year of the calculation (2021). The uncertainty has been adjusted accordingly.
