# glass wool mat production, without cullet

Dataset: EcoSpold 2, unit process
Geography: GLO
Time period: 1993-01-01 to 2021-12-31
Technology level: current
Classification: EcoSpold01Categories: insulation materials/production
Classification: ISIC rev.4 ecoinvent: 2399:Manufacture of other non-metallic mineral products n.e.c.
Scenario: Business-as-Usual
System model: Allocation, cut-off by classification
Generated by: Bo Weidema
Published in: Kellenberger D. 2004
Database: ecoinvent
isCopyrightProtected: true
accessRestrictedTo: 1

## General comment
Most glass wool is produced with cullet input. This datasets represents a marginal additional production without cullet.
[This dataset is meant to replace the following datasets:]

## Included activities start
Included processes: melting, fibre forming & collecting, hardening & curing and internal processes (workshop, etc.). Additionally, energy carrier for furnace, packing and infrastructure are included.

## Included activities end
The activity ends with the product being ready to be shipped.

## Technology
The company worked on a very high technical level but the data refer to the situation before 1995. The energy for the melting process is mainly electricity and from natural gas.

## Parameters
- Na2O in cullet: 0.13 kg; name Na2O_in_cullet; triangular min 0.12, mostLikely 0.13, max 0.14, pedigree (2,1,1,5,2)
  Average Na2O content in container glass (EU commission 2012: Best Available Techniques (BAT) Reference Document for the Manufacture of Glass)
- fraction, tap water, to air: 0.15 dimensionless; name fraction_TW_to_air; = fraction_PW_to_air; lognormal variance with pedigree 0.092025, pedigree (4,4,3,2,4)
  Calculated value. See comment in the other parametres present in this dataset. Tap water is considered to be always used as process water, thus process water fractions to air are applied to all tap water input flows to calculate the amount of water consumed in the processes.
- energy saving factor: 0.25 dimensionless; name energy_saving_factor; triangular min 0.2, mostLikely 0.25, max 0.3, pedigree (2,1,1,5,1)
  Reduction of energy requirement per % cullet (EU commission 2012: Best Available Techniques (BAT) Reference Document for the Manufacture of Glass)
- electricity input: 2.32 kWh; name electricity_original; lognormal variance with pedigree 0.0148, pedigree (2,4,2,5,1)
  electricity use per kg glass in original dataset
- CaO in cullet: 0.105 kg; name CaO_in_cullet; triangular min 0.09, mostLikely 0.105, max 0.12, pedigree (2,1,1,5,2)
  Average CaO content in container glass (EU commission 2012: Best Available Techniques (BAT) Reference Document for the Manufacture of Glass)
- original cullet input, kg per kg raw material input: 0.65 dimensionless; name cullet_original; lognormal variance with pedigree 0.0148, pedigree (2,4,2,5,1)
  65%
- cullet input, kg per kg output: 0.797 dimensionless; name cullet_fraction; lognormal variance with pedigree 0.0148, pedigree (2,4,2,5,1)
  Cullet input in original dataset
- fraction, process water, to air: 0.15 dimensionless; name fraction_PW_to_air; lognormal variance with pedigree 0.092025, pedigree (4,4,3,2,4)
  Literature value. In case when no industry/process specific data are available, default evaporation fraction value is used. This value is 15% and is based on literature (Statistics Canada, 2007 & Shaffer, K.H., 2008, Consumptive water use in the Great Lakes Basin, USGS & Shiklomanov, 2003, World Water Resources at the Beginning of the 21st Century) and has been approved by an expert.
- original soda input: 0.0836 kg; name soda_original; lognormal variance with pedigree 0.0148, pedigree (2,4,2,5,1)
  Soda input in original dataset

## Reference product
- glass wool mat: 1 kg; By-product classification allocatable product; CPC 37116: Glass mirrors; multiple walled insulating units of glass
  EcoSpold01Location=CH
  production volume 7.77e7 kg
    Estimated value. It is estimated, that 1% of global production volume is from another material than glass cullets.
  property carbon content, fossil 0.0107327
    A share of 16 w-% for the binders is taken into account. The binder used in this study is a mixture of phenol, formaldehyde and urea resins (ecoinvent v2.2 report 16_part XIV), and the C content was calculated as a weigthed average of phenol, formaldehyde and urea C content.
  property heating value, net 0 MJ
    Non combustible products are assumed to have an LHV equal to zero (0).
  property carbon content 0.0107327
    carbon content on a dry matter basis (reserved; not for manual entry)
  properties: water content 0, water in wet mass 0 kg, dry mass 1 kg, carbon content, non-fossil 0, price 1.77 EUR2005, wet mass 1 kg, carbon allocation 0.0107327 kg

## Inputs from technosphere
- waste mineral oil: 0 kg; pedigree (1,1,1,1,1)
  EcoSpold01Location=CH
  estimated
  production volume 0 kg
    Calculated from the production volume of glass wool mat in proportion to the respective output amounts.
  properties: dry mass 0.9 kg, water content 0.111111, wet mass 1 kg, carbon content, fossil 0.864444, heating value, net 34.7 MJ
  note on carbon content, fossil: Tab A.6, ecoinvent v2.2 report 13_I. C content has been calculated after data in the tables, and then referred to 1 kg DM
  note on heating value, net: Value taken from the general comment of the treatment dataset.
- acrylic dispersion, without water, in 65% solution state: 0 kg; pedigree (1,1,1,1,1)
  EcoSpold01Location=RER
  properties: heating value, net 16.66 MJ, carbon content, fossil 0.549932, wet mass 1 kg, dry mass 1 kg
  note on carbon content, fossil: Dispersants ensure that the individual particles in the emulsion paint do not combine to form agglomerates.The poly(acrylic acids) are suitable dispersing agents (Ullmann), and have therefore been used as representative example. Their formula is (C3H4O2)n. The formulation of this specific dispersion includes 50% acrylic binder
- heat, district or industrial, natural gas: 6.597 MJ; lognormal variance with pedigree 0.0546, pedigree (2,4,5,5,1)
  EcoSpold01Location=RER
  properties: heating value, net 1 MJ
- sodium borates: 0.0576 kg; name borate; lognormal variance with pedigree 0.0546, pedigree (2,4,5,5,1)
  EcoSpold01Location=US
  properties: wet mass 1 kg, dry mass 1 kg
- ammonia, anhydrous, liquid: 0 kg; pedigree (1,1,1,1,1)
  EcoSpold01Location=CH
  properties: wet mass 1 kg, dry mass 1 kg
- silicone product: 0 kg; name silicone; pedigree (1,1,1,1,1)
  EcoSpold01Location=RER
  properties: carbon content, fossil 0.324324, dry mass 1 kg, wet mass 1 kg, heating value, net 9.83 MJ
  note on carbon content, fossil: The term silicones is used for compounds in which silicon atoms are linked via oxygen atoms, each silicon atom bearing one or several organic groups. In industrially important silicones, these groups are usually methyl or phenyl (ecoinvent v2.2 report 8_part71 & Ullmann). The chemical formula was considered to be [Si(CH3)2O]n (Ullmann).
- chemical, organic: 5.74e-5 kg; lognormal variance with pedigree 0.0546, pedigree (2,4,5,5,1)
  EcoSpold01Location=GLO
  properties: heating value, net 19.03 MJ, carbon content, fossil 0.628, dry mass 1 kg, wet mass 1 kg
  note on carbon content, fossil: This dataset is an unweighted average of 20 organic substances (listed in Tab 88.1, ecoinvent v2.2 report 8, part II), being part of the top100 chemicals included in this database. The C-content has also been calculated as an unweighted average of the C content of the substances composing this dataset.
- electricity, medium voltage: 2.77015 kWh; = electricity_original/(1-energy_saving_factor*cullet_original); lognormal variance with pedigree 0.0546, pedigree (2,4,5,5,1)
  EcoSpold01Location=CH
  Calculated from original electricity input and cullet fraction and the reduction in energy requirement per % cullet (EU commission 2012: Best Available Techniques (BAT) Reference Document for the Manufacture of Glass)
- solvent, organic: 1.15e-5 kg; lognormal variance with pedigree 0.0546, pedigree (2,4,5,5,1)
  EcoSpold01Location=GLO
  properties: wet mass 1 kg, dry mass 1 kg, carbon content, fossil 0.63072, heating value, net 19.11 MJ
  note on carbon content, fossil: Mixture of 15 of the most often used solvents (list in ecoinvent v2.2 report 11-III, pg 293). C content was calculated as an unweighted average of C content of the different solvents
- urea: 0 kg; pedigree (1,1,1,1,1)
  The exchange has been updated from 'urea, as N' into 'urea' and therefore its amount has been scaled (multiplied) from 0.0386 kg by 2.1438 kg of 'urea' per kg of 'urea, as N'.
  EcoSpold01Location=RER
  properties: wet mass 1 kg, carbon content, fossil 0.2, dry mass 1 kg
- stone wool factory: 4.43e-10 unit; lognormal variance with pedigree 0.3546, pedigree (2,4,5,5,1)
  EcoSpold01Location=CH
- corrugated board box: 0 kg; pedigree (1,1,1,1,1)
  EcoSpold01Location=RER
  properties: water content 0.0582011, wet mass 1 kg, carbon content, fossil 0.000656085, dry mass 0.945 kg, carbon content, non-fossil 0.432275, heating value, net 12.86 MJ
  note on carbon content, fossil: Fossil C content was calculated after fossil C contents of chemicals used in the production of board (Tab 10-15 & 10.16 ecoinvent v2.2 report 11_III, part 10)
  note on carbon content, non-fossil: Biogenic C content was calculated after biogenic C contents of chemicals used in the production of board (Tab 10.15 & 10.16, ecoinvent v2.2 report 11_III, part 10).
- lime, packed: 0 kg; name lime; pedigree (1,1,1,1,1)
  EcoSpold01Location=CH
  Calculated to correspond to give same composition of glass wool as glass wool with cullet from packaging glass. Molar mass of lime (CaCO3) to CaO:100 to 56.
  properties: carbon content, fossil 0.117492, water content 0.00200401, wet mass 1 kg, dry mass 0.998 kg
  note on carbon content, fossil: Table 3.1, ecoinvent v2.2 report 7, part VII, pg 3. MW CaCO3=100, MW MgCO3=84
- sulfuric acid: 0 kg; pedigree (1,1,1,1,1)
  EcoSpold01Location=RER
  properties: wet mass 1 kg, dry mass 1 kg
- soda ash, light, crystalline, heptahydrate: 0.26074 kg; name soda; = cullet_fraction*Na2O_in_cullet*106/62+soda_original; lognormal variance with pedigree 0.0546, pedigree (2,4,5,5,1)
  EcoSpold01Location=RER
  Calculated to correspond to give same composition of glass wool as glass wool with cullet from packaging glass. Molar mass of soda (Na2CO3) to Na2O:106 to 62.
  properties: carbon content, fossil 0.0517241, heating value, net 3.43 MJ, wet mass 1 kg, dry mass 1 kg
- wastewater, average: 0 m3; pedigree (1,1,1,1,1)
  EcoSpold01Location=CH
  production volume 0 m3
    (same comment as for waste mineral oil)
  properties: carbon content, non-fossil 0.194039, wet mass 1000 kg, dry mass 0.346837 kg, water content 2882.2
  note on carbon content, non-fossil: 0.0673 kg TOC/m3 (Tab A.17, ecoinvent v2.2 report 13_I). TOC was considered as Total Carbon.
- sodium hydroxide, without water, in 50% solution state: 0.0035 kg; lognormal variance with pedigree 0.0546, pedigree (2,4,5,5,1)
  EcoSpold01Location=RER
  properties: dry mass 1 kg, heating value, net 3.03 MJ, wet mass 1 kg
- acrylic varnish, without water, in 87.5% solution state: 0 kg; name acryl; pedigree (1,1,1,1,1)
  EcoSpold01Location=RER
  properties: dry mass 1 kg, heating value, net 20.44 MJ, carbon content, fossil 0.674725, wet mass 1 kg
  note on carbon content, fossil: Isobornyl acrylate (C13H20O2) has been used as a representative example of acrylic varnish (Turpentines, Ullmann).The formulation of this specific varnish includes 50% acrylic binder
- molybdenum: 1.25e-5 kg; lognormal variance with pedigree 0.0546, pedigree (2,4,5,5,1)
  EcoSpold01Location=RER
  properties: dry mass 1 kg, wet mass 1 kg
- rosin size, for paper production: 0 kg; pedigree (1,1,1,1,1)
  EcoSpold01Location=RER
  properties: carbon content, non-fossil 0.515474, dry mass 1 kg, wet mass 1 kg, heating value, net 15.62 MJ
  note on carbon content, non-fossil: Mixture of rosin size (approximated by soap) (75%) and alkali (shown as sodium hydroxide) (25%). (ecoinvent v2.2 report 11-III, pg 299).
- dolomite: 0 kg; pedigree (1,1,1,1,1)
  EcoSpold01Location=RER
  properties: wet mass 1 kg, dry mass 1 kg, carbon content, fossil 0.130435, heating value, net 3.95 MJ
- municipal solid waste: 0 kg; pedigree (1,1,1,1,1)
  EcoSpold01Location=CH
  production volume 0 kg
    (same comment as for waste mineral oil)
  properties: heating value, net 11.74 MJ, carbon content, non-fossil 0.261655, carbon content, fossil 0.171549, water content 0.297017, dry mass 0.771 kg, wet mass 1 kg
  note on carbon content, non-fossil: MSW composition in tab 4.1, ecoinvent v2.2 report 13_I. C content referred to 1 kg DM
- refractory, fireclay, packed: 0.00229 kg; name clay; lognormal variance with pedigree 0.0546, pedigree (2,4,5,5,1)
  EcoSpold01Location=DE
  properties: wet mass 1 kg, dry mass 1 kg
- packaging film, low density polyethylene: 0.0132 kg; lognormal variance with pedigree 0.0546, pedigree (2,4,5,5,1)
  EcoSpold01Location=RER
  properties: wet mass 1 kg, dry mass 1 kg, carbon content, fossil 0.857143, heating value, net 42.47 MJ
  note on carbon content, fossil: Polyethylene is formed out of a huge amount of ethylene monomers (C2H4) (ecoinvent v2.2 report 11_II). MW=28 g/mol
- manganese: 0.00262 kg; name mn; lognormal variance with pedigree 0.0546, pedigree (2,4,5,5,1)
  EcoSpold01Location=RER
  properties: wet mass 1 kg, dry mass 1 kg
- municipal waste collection service by 21 metric ton lorry: 0.000783 metric ton*km; lognormal variance with pedigree 0.1746, pedigree (2,4,5,5,1)
  EcoSpold01Location=CH
- silica sand: 0.306845 kg; = 1-lime*56/100-soda*62/106-feldspar-borate-formaldehyde-urea*0.46646163273393926*60/28-silicone-phenol-fluorspar-Ca_nitrate*56/164-acryl-clay; lognormal variance with pedigree 0.0546, pedigree (2,4,5,5,1)
  EcoSpold01Location=DE
  Calculated as residual raw material requirement.
  properties: water content 0.010101, dry mass 0.99 kg, wet mass 1 kg
- waste paperboard: 0 kg; pedigree (1,1,1,1,1)
  EcoSpold01Location=CH
  production volume 0 kg
    (same comment as for waste mineral oil)
  properties: carbon content, non-fossil 0.483259, water content 0.243781, wet mass 1 kg, dry mass 0.804 kg, heating value, net 15.92 MJ
  note on carbon content, non-fossil: C content was calculated for 1 kg DM, using data in Tab A.3, ecoinvent v2.2 report 13_I.
- phenol: 0 kg; pedigree (1,1,1,1,1)
  EcoSpold01Location=RER
  properties: carbon content, fossil 0.765957, wet mass 1 kg, dry mass 1 kg, heating value, net 30.93 MJ
- average incineration residue: 0 kg; pedigree (1,1,1,1,1)
  EcoSpold01Location=CH
  estimated
  production volume 0 kg
    (same comment as for waste mineral oil)
  properties: dry mass 1 kg, carbon content, fossil 0.0325466, carbon content, non-fossil 0.0511208, wet mass 1 kg
  note on carbon content, fossil: Tab A.1, ecoinvent v2.2 report 13_I. It is considered that 61.1% of the C has a biogenic origin
- ammonium sulfate: 0 kg; pedigree (1,1,1,1,1)
  EcoSpold01Location=RER
  properties: wet mass 1 kg, dry mass 1 kg
- feldspar: 0.136 kg; lognormal variance with pedigree 0.0546, pedigree (2,4,5,5,1)
  EcoSpold01Location=RER
  properties: dry mass 1 kg, wet mass 1 kg
- waste polyethylene: 0 kg; pedigree (1,1,1,1,1)
  EcoSpold01Location=CH
  production volume 0 kg
    (same comment as for waste mineral oil)
  properties: dry mass 0.996 kg, heating value, net 42.47 MJ, wet mass 1 kg, water content 0.00401606, carbon content, fossil 0.825301
  note on carbon content, fossil: C content in 1 kg DM was calculated using data in Tab A.1, ecoinvent v2.2 report 13_I
- lubricating oil: 0 kg; pedigree (1,1,1,1,1)
  EcoSpold01Location=RER
  properties: dry mass 1 kg, heating value, net 40.2 MJ, wet mass 1 kg, carbon content, fossil 0.75
  note on heating value, net: Literature value, Source: IPCC 2006, 2006 IPCC Guidelines for National Greenhouse Gas Inventories, Prepared by the National Greenhouse Gas Inventories Programme, Eggleston H.S., Buendia L., Miwa K., Ngara T. and Tanabe K. (eds). Published: IGES, Japan
  note on carbon content, fossil: Lubricating oil is produced from diesel. C-content/dry mass of fats and oils considered 75%, from: ecoinvent v2.2 report, n 15a, pg 40
- calcium nitrate: 0 kg; name Ca_nitrate
  calculated from the original input measured as N (molar masses N2
  properties: dry mass 1 kg, wet mass 1 kg
- fluorspar, 97% purity: 0.022 kg; name fluorspar; lognormal variance with pedigree 0.0546, pedigree (2,4,5,5,1)
  EcoSpold01Location=GLO
  properties: wet mass 1 kg, dry mass 1 kg
- formaldehyde: 0 kg; pedigree (1,1,1,1,1)
  EcoSpold01Location=RER
  properties: wet mass 1 kg, dry mass 1 kg, carbon content, fossil 0.4, heating value, net 20.19 MJ
- tap water: 5.74 kg; name tap_water_input; lognormal variance with pedigree 0.0546, pedigree (2,4,5,5,1)
  EcoSpold01Location=CH
  properties: water content 2962.17, carbon content, fossil 0.00178991, wet mass 1 kg, dry mass 0.000337476 kg
  note on carbon content, fossil: Bicarbonate content is 2.93 mol/m3. CO2 content is 0.1 mol/m3 (ecoinvent v2.2 report 8, Tab 93.1).
- diesel, burned in building machine: 0.054 MJ; lognormal variance with pedigree 0.0546, pedigree (2,4,5,5,1)
  EcoSpold01Location=GLO
  properties: heating value, net 1 MJ
- waste mineral oil: -0.00077132, -1.90948e-5, -0.00201958 kg (3 entries); lognormal variance with pedigree 0.692, pedigree (1,1,5,5,1)
  EcoSpold01Location=CH
  estimated
  production volume 0.01124 kg
- acrylic dispersion, without water, in 65% solution state: 9.918e-7, 4.7082e-6 kg (2 entries); lognormal variance with pedigree 0.0546, pedigree (2,4,5,5,1)
  EcoSpold01Location=RER
- ammonia, anhydrous, liquid: 3.97225e-5, 0.000265491, 6.1798e-5, 0.000119962, 0.000122444, 5.62076e-5, 0.000462094, 1.25734e-5, 0.00132971 kg (9 entries); lognormal variance with pedigree 0.0546, pedigree (2,4,5,5,1)
  EcoSpold01Location=CH
- silicone product: 0.00978508, 0.0199149 kg (2 entries); lognormal variance with pedigree 0.0546, pedigree (2,4,5,5,1)
  EcoSpold01Location=RER
- urea: 0.00607056, 0.00489693, 0.0330637, 0.0387195 kg (4 entries); lognormal variance with pedigree 0.0546, pedigree (2,4,5,5,1)
  (same comment as for urea)
- corrugated board box: 0.00235389, 0.000105244, 0.00894087 kg (3 entries); lognormal variance with pedigree 0.0546, pedigree (2,4,5,5,1)
  EcoSpold01Location=RER
- lime, packed: 0.0494029, 0.0012578, 0.0987768 kg (3 entries); lognormal variance with pedigree 0.0546, pedigree (2,4,5,5,1)
  (same comment as for lime, packed)
- sulfuric acid: 0.000238315, 0.00182169 kg (2 entries); lognormal variance with pedigree 0.0546, pedigree (2,4,5,5,1)
  EcoSpold01Location=RER
- wastewater, average: -0.000474941, -5.13797e-5, -0.000993679 m3 (3 entries); lognormal variance with pedigree 0.0546, pedigree (2,4,5,5,1)
  EcoSpold01Location=CH
  production volume 0.00608 m3
- acrylic varnish, without water, in 87.5% solution state: 0.00115707, 0.00234293 kg (2 entries); lognormal variance with pedigree 0.0546, pedigree (2,4,5,5,1)
  EcoSpold01Location=RER
- rosin size, for paper production: 0.000111252, 0.000232748 kg (2 entries); lognormal variance with pedigree 0.0546, pedigree (2,4,5,5,1)
  EcoSpold01Location=RER
- dolomite: 0.00101461, 0.00191539 kg (2 entries); lognormal variance with pedigree 0.0546, pedigree (2,4,5,5,1)
  EcoSpold01Location=RER
- municipal solid waste: -0.000649787, -3.98272e-6, -2.78695e-6, -1.10604e-5, -0.00782238 kg (5 entries); lognormal variance with pedigree 0.0546, pedigree (2,4,5,5,1)
  EcoSpold01Location=CH
  production volume 0.03396 kg
- waste paperboard: -0.000113659, -7.06727e-6, -2.5537e-5, -4.60938e-6, -4.62807e-5, -2.49007e-6, -6.17969e-7, -0.000859739 kg (8 entries); lognormal variance with pedigree 0.0546, pedigree (2,4,5,5,1)
  EcoSpold01Location=CH
  production volume 0.00424 kg
- phenol: 0.00510429, 0.0242957 kg (2 entries); lognormal variance with pedigree 0.0546, pedigree (2,4,5,5,1)
  EcoSpold01Location=RER
- average incineration residue: -0.000116995, -0.013783 kg (2 entries); lognormal variance with pedigree 0.692, pedigree (1,1,5,5,1)
  EcoSpold01Location=CH
  estimated
  production volume 0.0556 kg
- ammonium sulfate: 0.000188553, 0.000614447 kg (2 entries); lognormal variance with pedigree 0.0546, pedigree (2,4,5,5,1)
  EcoSpold01Location=RER
- waste polyethylene: -6.51644e-5, -5.02379e-6, -2.07501e-6, -1.97041e-6, -7.51883e-5, -8.38279e-7, -3.79941e-7, -0.00052636 kg (8 entries); lognormal variance with pedigree 0.0546, pedigree (2,4,5,5,1)
  EcoSpold01Location=CH
  production volume 0.002708 kg
- lubricating oil: 0.0019314, 0.0091686 kg (2 entries); lognormal variance with pedigree 0.0546, pedigree (2,4,5,5,1)
  EcoSpold01Location=RER
- calcium nitrate: 0.00259249, 0.00226237 kg (2 entries)
  calculated from the original input measured as N (molar masses N2
- formaldehyde: 0.0177762, 0.0743238 kg (2 entries); lognormal variance with pedigree 0.0546, pedigree (2,4,5,5,1)
  EcoSpold01Location=RER

## Emissions to nature
- Ammonia [air, unspecified]: 0.00146 kg; lognormal variance with pedigree 0.164, pedigree (1,4,5,5,1)
- Phenol [air, unspecified]: 0.00026 kg; lognormal variance with pedigree 0.164, pedigree (1,4,5,5,1)
- Carbon dioxide, fossil [air, non-urban air or from high stacks]: 0.175183 kg; = soda*44/106+lime*44/100+dolomite*88/215
  Stoichiometric emission of CO2 (molar mass 44) from soda (Na2CO3; molar mass 106), lime (CaCO3; molar mass 100) and dolomite (CaMg(CO3)2; molar mass 215)
  property wet mass 1 kg; name WM
  property water content 0; name water_content
  property carbon content, non-fossil 0; name C_content_non_fossil
  property water in wet mass 0 kg; name WWM
  property dry mass 1 kg; name DM
  property carbon content, fossil 0.272916; name C_content_fossil
- Nitrogen oxides [air, non-urban air or from high stacks]: 0.00272346 kg; = Ca_nitrate*92/164
  Calculated stoichiometrically
- Water [water, unspecified]: 0.003359 m3; name water_to_water_unspecified; = (tap_water_input/1000)*(1-fraction_TW_to_air)-0.00152; lognormal variance with pedigree 0.130025, pedigree (4,4,5,2,4)
  Calculated value based on literature values and expert opinion. See comments in the parametres' comment field.
  property fraction, origin: salt water 0; name fraction_origin_salt_water_Ww
  property fraction, origin: fresh water 1; name fraction_origin_fresh_water_Ww
  property fraction, origin: unspecified 0; name fraction_origin_unspecified_Ww
- Water [air, unspecified]: 0.000861 m3; name water_to_air_unspecified; = (tap_water_input/1000)*fraction_TW_to_air; lognormal variance with pedigree 0.130025, pedigree (4,4,5,2,4)
  (same comment as for Water)
  property fraction, origin: unspecified 0; name fraction_origin_unspecified
  property fraction, origin: salt water 0; name fraction_origin_salt_water
  property fraction, origin: fresh water 1; name fraction_origin_fresh_water
- Formaldehyde [air, unspecified]: 0.00046 kg; lognormal variance with pedigree 0.164, pedigree (1,4,5,5,1)
- Fluorine [air, unspecified]: 9e-5 kg; lognormal variance with pedigree 0.164, pedigree (1,4,5,5,1)

## Sampling procedure
literature and environmental report

## Extrapolations
This dataset has been extrapolated from year 2000 to the year of the calculation (2021). The uncertainty has been adjusted accordingly.
