# treatment of waste polyethylene, unsanitary landfill, moist infiltration class (300mm)

Dataset: EcoSpold 2, unit process
Geography: GLO
Time period: 2006-01-01 to 2021-12-31
Technology level: current
Classification: ISIC rev.4 ecoinvent: 3821:Treatment and disposal of non-hazardous waste
Synonyms: municipal waste landfill
Scenario: Business-as-Usual
System model: Allocation, cut-off by classification
Share of production covered: 1 %
Generated by: Avraam Symeonidis
Database: ecoinvent
isCopyrightProtected: true
accessRestrictedTo: 1

## General comment
This dataset represents the activity of waste disposal of waste polyethylene in a unsanitary landfill. Recommended use of this dataset: For PE, which goes to disposal as part of managed communal waste mixture. // Waste composition (wet, in ppm): upper heating value 42.82 MJ/kg; lower heating value 42.47 MJ/kg; H2O 4000; O 38435; H 122490; C 822050; S 426.9; N 1297.2; P n.a.; B n.a.; Cl 1461.5; Br 9.5896; F 14.384; I n.a.; Ag n.a.; As 1.822; Ba 239.74; Cd 33.946; Co 1.6782; Cr 12.466; Cu 41.367; Hg 0.047948; Mn 30.047; Mo n.a.; Ni 0.95896; Pb 22.596; Sb 10.069; Se 2.0138; Sn 3.814; V 2205.6; Zn 342.01; Be 0.47948; Sc n.a.; Sr 84.868; Ti 958.96; Tl 0.38358; W n.a.; Si n.a.; Fe 1534.3; Ca 2589.2; Al 191.79; K n.a.; Mg 95.896; Na 1405.4; . // Share of carbon in waste that is biogenic 0%. Share of metals in waste not oxidised and bulk-recyclable (exclude very small or thin parts) Iron: 0%; Alu: 0%; Copper: 0%. Overall degradability of waste during 100 years: 1%.

## Included activities start
from final waste deposition (without transports to the site)

## Included activities end
Waste-specific short-term emissions to air via landfill gas and landfill leachate. Waste-specific long-term emissions from landfill.

## Geography
Given name of landfill location is 'infiltration class 3 moist (2018)'. Landfill site with mean annual temperature (MAT) of 8 degC, mean annual precipitation (MAP) of 900 mm/year, and net infiltration of 300 mm/year.
Climate adjustments result in an alpha t (temperature) for permafrost areas of 0.999. Total climate adjustments with alpha pt of 0.999.

## Technology
This is an inventory for an unsanitary, sub-controlled landfill for municipal solid waste. Ultimate average landfill height is 15 meters. Operation phase duration is 25 years.Percentage of landfill gas directly emitted is 100w%.
Leachate of the landfill is not treated. Based on average waste composition and climate data the end of carbonate phase is estimated to be reached 5581 years after waste deposition.

## Reference product
- waste polyethylene: -1 kg; By-product classification Waste; CPC 39270: Waste, parings and scrap of plastics; CAS 9002-88-4; pedigree (1,1,1,1,1)
  main reference product of this activity (supply of disposal service).
  Uncertainty: Uncertainty is not adjusted, as this is the refence product
  production volume 1 kg
    The amount of the annual production volume is a placeholder value. The contribution of this technology to the different local markets can be found in the markets themselves.
  property price 0 EUR2005
    Waste products are assigned a price of zero as they are assumed to require further treatment.
  property heating value, net 42.47 MJ
    Value taken from the general comment of the treatment dataset.
  property carbon content 0.82535
    carbon content on a dry matter basis (reserved; not for manual entry)
  properties: beryllium content 4.8141e-7, carbon content, fossil 0.82535, water in wet mass 0.004 kg, titanium content 0.00096281, thallium content 3.8512e-7, magnesium content 9.6281e-5, dry mass 0.996 kg, selenium content 2.0219e-6, tin content 3.8294e-6, iron content 0.0015405, aluminium content 0.00019256, lead content 2.2687e-5, antimony content 1.011e-5, sodium content 0.001411, zinc content 0.00034338, wet mass 1 kg, calcium content 0.0025996, water content 0.0040161, vanadium content 0.0022145, strontium content 8.5209e-5, chlorine content 0.0014674, arsenic content 1.8293e-6, sulfur content 0.00042861, cadmium content 3.4082e-5, hydrogen content 0.12298, copper content 4.1533e-5, fluorine content 1.4442e-5, oxygen content 0.03859, bromine content 9.6281e-6, barium content 0.0002407, manganese content 3.0168e-5, chromium content 1.2517e-5, nitrogen content 0.0013024, heating value, gross 42.823 MJ, mercury content 4.8141e-8, cobalt content 1.6849e-6, nickel content 9.6281e-7, carbon allocation 0.822049 kg

## Inputs from technosphere
- diesel, burned in building machine: 0.046738 MJ; lognormal variance with pedigree 0.088256, pedigree (1,1,4,1,1)
  for waste distribution and compaction.
  Uncertainty: Uncertainty calculated from uncertainty in base parameters.
  properties: heating value, net 1 MJ
- excavation, skid-steer loader: 0.00031708 m3; lognormal variance with pedigree 0.088256, pedigree (1,1,4,1,1)
  application of daily cover.
  Uncertainty: Uncertainty calculated from uncertainty in base parameters.

## Inputs from nature
- Occupation, dump site [natural resource, land]: 0.0023333 m2*year; lognormal variance with pedigree 0.088256, pedigree (1,1,4,1,1)
  for landfill operation phase and spontaneous renaturation.
  Uncertainty: Uncertainty calculated from uncertainty in base parameters.

## Emissions to nature
- Nitrogen oxides [air, non-urban air or from high stacks]: 1.777e-8 kg; lognormal variance with pedigree 0.32289, pedigree (1,1,4,1,1)
  burden from direct release or incineration of landfill biogas.
  Uncertainty: Uncertainty calculated from unertainty of the waste composition of this waste, uncertainty in waste decomposition and short-term leaching in landfill
- Hydrogen sulfide [water, ground-]: 1.1566e-7 kg; lognormal variance with pedigree 0.32166, pedigree (1,1,4,1,1)
  burden from short-term leachate to groundwater in uncontrolled landfill in moist cimate.
  Uncertainty: Uncertainty calculated from unertainty of the waste composition of this waste, uncertainty in waste decomposition and short-term leaching in landfill
- Carbon dioxide, fossil [air, non-urban air or from high stacks]: 0.012875 kg; lognormal variance with pedigree 0.101231, pedigree (1,1,4,1,1)
  (same comment as for Nitrogen oxides)
- Ammonium, ion [water, ground-]: 1.2345e-5 kg; lognormal variance with pedigree 0.23066, pedigree (1,1,4,1,1)
  (same comment as for Hydrogen sulfide)
- Nitrogen, organic bound [water, ground-]: 2.0178e-5 kg; lognormal variance with pedigree 0.23066, pedigree (1,1,4,1,1)
  (same comment as for Hydrogen sulfide)
- Sodium, ion [water, ground-, long-term]: 0.0013473 kg; lognormal variance with pedigree 0.16138, pedigree (1,1,4,1,1)
  Emissions from long-term leachate (>100a) directly from MSW landfill and indirectly via incineration of treatement sludge from leachate treatement.
  Uncertainty: Uncertainty calculated depending on waste input and uncertainty of long-term transfer coefficents in landfill.
- DOC, Dissolved Organic Carbon [water, ground-]: 0.00023915 kg; lognormal variance with pedigree 0.21191, pedigree (1,1,4,1,1)
  (same comment as for Hydrogen sulfide)
- Calcium, ion [water, ground-, long-term]: 0.0025858 kg; lognormal variance with pedigree 0.14171, pedigree (1,1,4,1,1)
  (same comment as for Sodium, ion)
- Sulfate [water, ground-]: 4.437e-6 kg; lognormal variance with pedigree 0.32166, pedigree (1,1,4,1,1)
  (same comment as for Hydrogen sulfide)
- Magnesium [water, ground-, long-term]: 9.5305e-5 kg; lognormal variance with pedigree 0.2499, pedigree (1,1,4,1,1)
  (same comment as for Sodium, ion)
- BOD5, Biological Oxygen Demand [water, ground-]: 6.1922e-5 kg; lognormal variance with pedigree 0.21191, pedigree (1,1,4,1,1)
  (same comment as for Hydrogen sulfide)
- Aluminium [water, ground-, long-term]: 0.0001917 kg; lognormal variance with pedigree 0.22685, pedigree (1,1,4,1,1)
  (same comment as for Sodium, ion)
- Sodium [air, non-urban air or from high stacks]: 1.4522e-8 kg; lognormal variance with pedigree 0.47523, pedigree (1,1,4,1,1)
  burden from direct release or incineration of landfill biogas; or windblown leachate evaporite in arid climates.
  Uncertainty: Uncertainty calculated from unertainty of the waste composition of this waste, uncertainty in waste decomposition and short-term leaching in landfill
- Iron, ion [water, ground-, long-term]: 0.0015341 kg; lognormal variance with pedigree 0.1585, pedigree (1,1,4,1,1)
  (same comment as for Sodium, ion)
- Heat, waste [water, ground-, long-term]: 42.395 MJ; lognormal variance with pedigree 0.020651, pedigree (1,1,4,1,1)
  burden from long-term decomposition of waste (>100a).
  Uncertainty: Uncertainty calculated from unertainty of the waste composition of this waste, uncertainty in waste decomposition and short-term leaching in landfill
- Thallium [water, ground-, long-term]: 3.8336e-7 kg; lognormal variance with pedigree 0.43123, pedigree (1,1,4,1,1)
  (same comment as for Sodium, ion)
- TOC, Total Organic Carbon [water, ground-]: 0.00023915 kg; lognormal variance with pedigree 0.21191, pedigree (1,1,4,1,1)
  (same comment as for Hydrogen sulfide)
- Titanium, ion [water, ground-, long-term]: 0.00095848 kg; lognormal variance with pedigree 0.17377, pedigree (1,1,4,1,1)
  (same comment as for Sodium, ion)
- COD, Chemical Oxygen Demand [water, ground-]: 0.00026157 kg; lognormal variance with pedigree 0.21191, pedigree (1,1,4,1,1)
  (same comment as for Hydrogen sulfide)
- Beryllium [water, ground-, long-term]: 4.792e-7 kg; lognormal variance with pedigree 0.42407, pedigree (1,1,4,1,1)
  (same comment as for Sodium, ion)
- Heat, waste [soil, industrial]: 0.29463 MJ; lognormal variance with pedigree 0.077031, pedigree (1,1,4,1,1)
  burden from short-term decomposition of waste (0-100a).
  Uncertainty: Uncertainty calculated from unertainty of the waste composition of this waste, uncertainty in waste decomposition and short-term leaching in landfill
- Calcium, ion [water, ground-]: 3.3674e-6 kg; lognormal variance with pedigree 0.29643, pedigree (1,1,4,1,1)
  (same comment as for Hydrogen sulfide)
- Zinc, ion [water, ground-, long-term]: 0.00034184 kg; lognormal variance with pedigree 0.20767, pedigree (1,1,4,1,1)
  (same comment as for Sodium, ion)
- Magnesium [air, non-urban air or from high stacks]: 1.4776e-10 kg; lognormal variance with pedigree 0.62592, pedigree (1,1,4,1,1)
  (same comment as for Sodium)
- Sodium, ion [water, ground-]: 5.8089e-5 kg; lognormal variance with pedigree 0.21271, pedigree (1,1,4,1,1)
  (same comment as for Hydrogen sulfide)
- Vanadium, ion [water, ground-, long-term]: 0.00074476 kg; lognormal variance with pedigree 0.22047, pedigree (1,1,4,1,1)
  (same comment as for Sodium, ion)
- Aluminium [air, non-urban air or from high stacks]: 2.394e-11 kg; lognormal variance with pedigree 0.68316, pedigree (1,1,4,1,1)
  (same comment as for Sodium)
- Magnesium [water, ground-]: 5.9105e-7 kg; lognormal variance with pedigree 0.35561, pedigree (1,1,4,1,1)
  (same comment as for Hydrogen sulfide)
- Strontium [water, ground-, long-term]: 8.4819e-5 kg; lognormal variance with pedigree 0.25397, pedigree (1,1,4,1,1)
  (same comment as for Sodium, ion)
- Calcium [air, non-urban air or from high stacks]: 8.4184e-10 kg; lognormal variance with pedigree 0.5677, pedigree (1,1,4,1,1)
  (same comment as for Sodium)
- Aluminium [water, ground-]: 9.5758e-8 kg; lognormal variance with pedigree 0.41271, pedigree (1,1,4,1,1)
  (same comment as for Hydrogen sulfide)
- Tin, ion [water, ground-, long-term]: 3.8138e-6 kg; lognormal variance with pedigree 0.35671, pedigree (1,1,4,1,1)
  (same comment as for Sodium, ion)
- Thallium [air, non-urban air or from high stacks]: 5.5685e-14 kg; lognormal variance with pedigree 0.88278, pedigree (1,1,4,1,1)
  (same comment as for Sodium)
- Thallium [water, ground-]: 2.2274e-10 kg; lognormal variance with pedigree 0.61214, pedigree (1,1,4,1,1)
  (same comment as for Hydrogen sulfide)
- Selenium [water, ground-, long-term]: 6.5904e-7 kg; lognormal variance with pedigree 0.45555, pedigree (1,1,4,1,1)
  (same comment as for Sodium, ion)
- Titanium [air, non-urban air or from high stacks]: 1.197e-10 kg; lognormal variance with pedigree 0.63008, pedigree (1,1,4,1,1)
  (same comment as for Sodium)
- Titanium, ion [water, ground-]: 4.7879e-7 kg; lognormal variance with pedigree 0.35963, pedigree (1,1,4,1,1)
  (same comment as for Hydrogen sulfide)
- Lead [water, ground-, long-term]: 2.2595e-5 kg; lognormal variance with pedigree 0.29798, pedigree (1,1,4,1,1)
  (same comment as for Sodium, ion)
- Iron [air, non-urban air or from high stacks]: 5.2624e-11 kg; lognormal variance with pedigree 0.65517, pedigree (1,1,4,1,1)
  (same comment as for Sodium)
- Iron, ion [water, ground-]: 2.105e-7 kg; lognormal variance with pedigree 0.38693, pedigree (1,1,4,1,1)
  (same comment as for Hydrogen sulfide)
- Nickel, ion [water, ground-, long-term]: 9.584e-7 kg; lognormal variance with pedigree 0.40171, pedigree (1,1,4,1,1)
  (same comment as for Sodium, ion)
- Zinc [air, non-urban air or from high stacks]: 3.5961e-11 kg; lognormal variance with pedigree 0.66938, pedigree (1,1,4,1,1)
  (same comment as for Sodium)
- Zinc, ion [water, ground-]: 1.6183e-7 kg; lognormal variance with pedigree 0.39529, pedigree (1,1,4,1,1)
  (same comment as for Hydrogen sulfide)
- Antimony [water, ground-, long-term]: 1.1966e-6 kg; lognormal variance with pedigree 0.60825, pedigree (1,1,4,1,1)
  (same comment as for Sodium, ion)
- Beryllium [air, non-urban air or from high stacks]: 6.9607e-14 kg; lognormal variance with pedigree 0.87562, pedigree (1,1,4,1,1)
  (same comment as for Sodium)
- Beryllium [water, ground-]: 2.7843e-10 kg; lognormal variance with pedigree 0.60498, pedigree (1,1,4,1,1)
  (same comment as for Hydrogen sulfide)
- Manganese [water, ground-, long-term]: 2.9704e-5 kg; lognormal variance with pedigree 0.28851, pedigree (1,1,4,1,1)
  (same comment as for Sodium, ion)
- Strontium [air, non-urban air or from high stacks]: 1.232e-11 kg; lognormal variance with pedigree 0.70552, pedigree (1,1,4,1,1)
  (same comment as for Sodium)
- Strontium [water, ground-]: 4.9281e-8 kg; lognormal variance with pedigree 0.43488, pedigree (1,1,4,1,1)
  (same comment as for Hydrogen sulfide)
- Copper, ion [water, ground-, long-term]: 4.1365e-5 kg; lognormal variance with pedigree 0.27788, pedigree (1,1,4,1,1)
  (same comment as for Sodium, ion)
- Tin [air, non-urban air or from high stacks]: 5.612e-14 kg; lognormal variance with pedigree 0.87946, pedigree (1,1,4,1,1)
  (same comment as for Sodium)
- Vanadium, ion [water, ground-]: 2.3231e-6 kg; lognormal variance with pedigree 0.30836, pedigree (1,1,4,1,1)
  (same comment as for Hydrogen sulfide)
- Mercury [water, ground-, long-term]: 4.7902e-8 kg; lognormal variance with pedigree 0.48845, pedigree (1,1,4,1,1)
  (same comment as for Sodium, ion)
- Vanadium [air, non-urban air or from high stacks]: 5.8079e-10 kg; lognormal variance with pedigree 0.57953, pedigree (1,1,4,1,1)
  (same comment as for Sodium)
- Antimony [water, ground-]: 1.0606e-8 kg; lognormal variance with pedigree 0.48628, pedigree (1,1,4,1,1)
  (same comment as for Hydrogen sulfide)
- Chromium VI [water, ground-, long-term]: 6.763e-8 kg; lognormal variance with pedigree 2.0186, pedigree (1,1,4,1,1)
  (same comment as for Sodium, ion)
- Selenium [air, non-urban air or from high stacks]: 5.3028e-13 kg; lognormal variance with pedigree 0.8103, pedigree (1,1,4,1,1)
  (same comment as for Sodium)
- Tin, ion [water, ground-]: 2.2448e-10 kg; lognormal variance with pedigree 0.61315, pedigree (1,1,4,1,1)
  (same comment as for Hydrogen sulfide)
- Cobalt [water, ground-, long-term]: 1.6728e-6 kg; lognormal variance with pedigree 0.38354, pedigree (1,1,4,1,1)
  (same comment as for Sodium, ion)
- Antimony [air, non-urban air or from high stacks]: 2.6514e-12 kg; lognormal variance with pedigree 0.75745, pedigree (1,1,4,1,1)
  (same comment as for Sodium)
- Selenium [water, ground-]: 2.1211e-9 kg; lognormal variance with pedigree 0.53913, pedigree (1,1,4,1,1)
  (same comment as for Hydrogen sulfide)
- Barium [water, ground-, long-term]: 0.000237 kg; lognormal variance with pedigree 0.21945, pedigree (1,1,4,1,1)
  (same comment as for Sodium, ion)
- Nickel [air, non-urban air or from high stacks]: 1.3921e-13 kg; lognormal variance with pedigree 0.85326, pedigree (1,1,4,1,1)
  (same comment as for Sodium)
- Lead [water, ground-]: 1.3298e-9 kg; lognormal variance with pedigree 0.55441, pedigree (1,1,4,1,1)
  (same comment as for Hydrogen sulfide)
- Cadmium, ion [water, ground-, long-term]: 3.3886e-5 kg; lognormal variance with pedigree 0.28446, pedigree (1,1,4,1,1)
  (same comment as for Sodium, ion)
- Lead [air, non-urban air or from high stacks]: 4.4327e-13 kg; lognormal variance with pedigree 0.81189, pedigree (1,1,4,1,1)
  (same comment as for Sodium)
- Manganese [water, ground-]: 3.4372e-7 kg; lognormal variance with pedigree 0.37566, pedigree (1,1,4,1,1)
  (same comment as for Hydrogen sulfide)
- Fluoride [water, ground-, long-term]: 1.4319e-5 kg; lognormal variance with pedigree 0.31295, pedigree (1,1,4,1,1)
  (same comment as for Sodium, ion)
- Copper [air, non-urban air or from high stacks]: 5.7808e-13 kg; lognormal variance with pedigree 0.80221, pedigree (1,1,4,1,1)
  (same comment as for Sodium)
- Nickel, ion [water, ground-]: 5.5685e-10 kg; lognormal variance with pedigree 0.58262, pedigree (1,1,4,1,1)
  (same comment as for Hydrogen sulfide)
- Bromine [water, ground-, long-term]: 9.345e-6 kg; lognormal variance with pedigree 0.32638, pedigree (1,1,4,1,1)
  (same comment as for Sodium, ion)
- Manganese [air, non-urban air or from high stacks]: 8.5931e-11 kg; lognormal variance with pedigree 0.64445, pedigree (1,1,4,1,1)
  (same comment as for Sodium)
- Mercury [water, ground-]: 3.2806e-11 kg; lognormal variance with pedigree 0.66401, pedigree (1,1,4,1,1)
  (same comment as for Hydrogen sulfide)
- Arsenic, ion [water, ground-, long-term]: 1.8187e-6 kg; lognormal variance with pedigree 0.38087, pedigree (1,1,4,1,1)
  (same comment as for Sodium, ion)
- Mercury [air, non-urban air or from high stacks]: 1.3122e-11 kg; lognormal variance with pedigree 0.69407, pedigree (1,1,4,1,1)
  (same comment as for Sodium)
- Copper, ion [water, ground-]: 2.0233e-9 kg; lognormal variance with pedigree 0.54044, pedigree (1,1,4,1,1)
  (same comment as for Hydrogen sulfide)
- Nitrate [water, ground-, long-term]: 5.4237e-5 kg; lognormal variance with pedigree 0.16396, pedigree (1,1,4,1,1)
  (same comment as for Sodium, ion)
- Cobalt [air, non-urban air or from high stacks]: 1.3469e-12 kg; lognormal variance with pedigree 0.78061, pedigree (1,1,4,1,1)
  (same comment as for Sodium)
- Chromium VI [water, ground-]: 1.4193e-9 kg; lognormal variance with pedigree 0.55228, pedigree (1,1,4,1,1)
  (same comment as for Hydrogen sulfide)
- Chloride [water, ground-, long-term]: 0.0014243 kg; lognormal variance with pedigree 0.16009, pedigree (1,1,4,1,1)
  (same comment as for Sodium, ion)
- Chromium [air, non-urban air or from high stacks]: 3.5483e-13 kg; lognormal variance with pedigree 0.82012, pedigree (1,1,4,1,1)
  (same comment as for Sodium)
- Cadmium, ion [water, ground-]: 5.966e-8 kg; lognormal variance with pedigree 0.4295, pedigree (1,1,4,1,1)
  (same comment as for Hydrogen sulfide)
- Nitrite [water, ground-, long-term]: 2.807e-5 kg; lognormal variance with pedigree 0.16396, pedigree (1,1,4,1,1)
  (same comment as for Sodium, ion)
- Cadmium [air, non-urban air or from high stacks]: 3.9773e-10 kg; lognormal variance with pedigree 0.59421, pedigree (1,1,4,1,1)
  (same comment as for Sodium)
- Arsenic, ion [water, ground-]: 3.2687e-9 kg; lognormal variance with pedigree 0.52525, pedigree (1,1,4,1,1)
  (same comment as for Hydrogen sulfide)
- Ammonium, ion [water, ground-, long-term]: 0.00051572 kg; lognormal variance with pedigree 0.16396, pedigree (1,1,4,1,1)
  (same comment as for Sodium, ion)
- Barium [air, non-urban air or from high stacks]: 6.8562e-10 kg; lognormal variance with pedigree 0.57538, pedigree (1,1,4,1,1)
  (same comment as for Sodium)
- Barium [water, ground-]: 2.7425e-6 kg; lognormal variance with pedigree 0.30659, pedigree (1,1,4,1,1)
  (same comment as for Hydrogen sulfide)
- Hydrogen sulfide [water, ground-, long-term]: 3.096e-5 kg; lognormal variance with pedigree 0.20035, pedigree (1,1,4,1,1)
  (same comment as for Sodium, ion)
- Arsenic [air, non-urban air or from high stacks]: 4.5823e-11 kg; lognormal variance with pedigree 0.66543, pedigree (1,1,4,1,1)
  (same comment as for Sodium)
- Cobalt [water, ground-]: 5.3876e-9 kg; lognormal variance with pedigree 0.50947, pedigree (1,1,4,1,1)
  (same comment as for Hydrogen sulfide)
- Nitrogen, organic bound [water, ground-, long-term]: 0.00084292 kg; lognormal variance with pedigree 0.16396, pedigree (1,1,4,1,1)
  (same comment as for Sodium, ion)
- Hydrogen fluoride [air, non-urban air or from high stacks]: 5.727e-8 kg; lognormal variance with pedigree 0.43374, pedigree (1,1,4,1,1)
  (same comment as for Sodium)
- Bromine [water, ground-]: 2.412e-7 kg; lognormal variance with pedigree 0.39102, pedigree (1,1,4,1,1)
  (same comment as for Hydrogen sulfide)
- TOC, Total Organic Carbon [water, ground-, long-term]: 0.81384 kg; lognormal variance with pedigree 0.00830669, pedigree (1,1,4,1,1)
  (same comment as for Sodium, ion)
- Bromine [air, non-urban air or from high stacks]: 3.3813e-9 kg; lognormal variance with pedigree 0.52364, pedigree (1,1,4,1,1)
  (same comment as for Sodium)
- Fluoride [water, ground-]: 1.0555e-8 kg; lognormal variance with pedigree 0.48622, pedigree (1,1,4,1,1)
  (same comment as for Hydrogen sulfide)
- DOC, Dissolved Organic Carbon [water, ground-, long-term]: 0.81384 kg; lognormal variance with pedigree 0.00830669, pedigree (1,1,4,1,1)
  (same comment as for Sodium, ion)
- Hydrogen chloride [air, non-urban air or from high stacks]: 5.2988e-7 kg; lognormal variance with pedigree 0.35735, pedigree (1,1,4,1,1)
  (same comment as for Sodium)
- Chloride [water, ground-]: 3.6761e-5 kg; lognormal variance with pedigree 0.22473, pedigree (1,1,4,1,1)
  (same comment as for Hydrogen sulfide)
- Sulfate [water, ground-, long-term]: 0.0011877 kg; lognormal variance with pedigree 0.20035, pedigree (1,1,4,1,1)
  (same comment as for Sodium, ion)
- Methane, fossil [air, non-urban air or from high stacks]: 0.0059469 kg; lognormal variance with pedigree 0.11136, pedigree (1,1,4,1,1)
  (same comment as for Nitrogen oxides)
- Nitrite [water, ground-]: 6.7192e-7 kg; lognormal variance with pedigree 0.23066, pedigree (1,1,4,1,1)
  (same comment as for Hydrogen sulfide)
- BOD5, Biological Oxygen Demand [water, ground-, long-term]: 0.21073 kg; lognormal variance with pedigree 0.00830669, pedigree (1,1,4,1,1)
  (same comment as for Sodium, ion)
- Sulfur dioxide [air, non-urban air or from high stacks]: 5.5645e-7 kg; lognormal variance with pedigree 0.37749, pedigree (1,1,4,1,1)
  (same comment as for Nitrogen oxides)
- Nitrate [water, ground-]: 1.2983e-6 kg; lognormal variance with pedigree 0.23066, pedigree (1,1,4,1,1)
  (same comment as for Hydrogen sulfide)
- COD, Chemical Oxygen Demand [water, ground-, long-term]: 0.89014 kg; lognormal variance with pedigree 0.00830669, pedigree (1,1,4,1,1)
  (same comment as for Sodium, ion)

## Extrapolations
This dataset has been extrapolated from year 2012 to the year of the calculation (2021). The uncertainty has been adjusted accordingly.
