# aluminium, ingot, primary, import from Middle East (Gulf cooperation Council)

Dataset: EcoSpold 2, unit process
Geography: IAI Area, EU27 & EFTA
Time period: 2015-01-01 to 2021-12-31
Technology level: current
Classification: ISIC rev.4 ecoinvent: 2420:Manufacture of basic precious and other non-ferrous metals
Classification: EcoSpold01Categories: metals/extraction
Scenario: Business-as-Usual
System model: Allocation, cut-off by classification
Generated by: Lucia Valsasina
Published in: Christian Leroy ; Djibril René 2013
Database: ecoinvent
isCopyrightProtected: true
accessRestrictedTo: 1

## General comment
This dataset represents the amount of imported primary aluminium from Middle East (Gulf Council Cooperation) to EU27 & EFTA. The import value is valid for 2015 and includes all imports, independently whether used within the importing region, or re-exported. EAA statistics

## Included activities start
This activity represents the point of "handing over" the primary aluminium ingot from one country to the other at the border.

## Reference product
- aluminium, primary, ingot: 1 kg; source Christian Leroy ; Djibril René 2013; CPC 41431: Unwrought aluminium; By-product classification allocatable product; ISIC rev.4 ecoinvent 242:Manufacture of basic precious and other non-ferrous metals; CAS 7429-90-5
  production volume 8.19e8 kg
    In 2015, Europe imported 3.9 million tonnes of primary aluminium. 21% are imported from Middle East on average. (Source : European Aluminium statistics)
  property price 3.67 EUR2005
    Estimated to be the same as in case of aluminium, primary, liquid.
  property carbon content 0
    carbon content on a dry matter basis (reserved; not for manual entry)
  properties: water in wet mass 0 kg, water content 0, carbon content, non-fossil 0, dry mass 1 kg, wet mass 1 kg, carbon content, fossil 0, carbon allocation 0 kg

## Inputs from technosphere
- aluminium, primary, ingot: 1 kg; source Christian Leroy ; Djibril René 2013; lognormal variance with pedigree 0.0026, pedigree (1,1,3,1,1)
  activityLink added to better reflect the reality of the supply chain
  properties: wet mass 1 kg, dry mass 1 kg

## Extrapolations
This dataset has been extrapolated from year 2015 to the year of the calculation (2021). The uncertainty has been adjusted accordingly.
