# compact fluorescent lamp production

Dataset: EcoSpold 2, unit process
Geography: GLO
Time period: 2012-01-01 to 2021-12-31
Technology level: current
Classification: ISIC rev.4 ecoinvent: 2740:Manufacture of electric lighting equipment
Scenario: Business-as-Usual
System model: Allocation, cut-off by classification
Generated by: Viachaslau Filimonau
Published in: Elijosiute, K 2012
Database: ecoinvent
isCopyrightProtected: true
accessRestrictedTo: 1

## General comment
This activity represents the production and disposal of an average compact fluorescent lamp which is circa 75 g in mass (excluding packaging). It has the envisaged lifetime of 1.1 years (10000 hours of operational time), 10W power and is manufactured in Europe. The figures on material inputs from technosphere and energy required to produce an average compact fluorescent lamp are taken from Elijosiute et al. 2012. The figure on the annual production volume (2.9 million units) is from Worldwatch Institute 2009.

## Included activities start
This activity starts with the reception of materials at the factory.

## Included activities end
The activity includes the processes of material and energy use in manufacturing an average compact fluorescent lamp. The inventory additionally accounts for disposal of all materials. Packaging is not included.

## Geography
Geography GLO was chosen because the dataset aims to represent the production of an average compact fluoresecent lamp. The literature sources used refer to manufacturing in Europe.

## Time period
The literature sources used refer to the underpinning technology as being current.

## Reference product
- compact fluorescent lamp: 1 unit; name RP; CPC 4653: Lighting equipment; By-product classification allocatable product
  production volume 2.9e6 unit; name RP_PV
    Calculated from Worldwatch Institute 2009 based on the share of China (2400000) which is assumed to be equal to 85% of the global production. Source: Worldwatch Institute 2009. Strong Growth in Compact Fluorescent Bulbs Reduces Electricity Demand. Worldwatch Institute, Washington, DC, USA.
  property price 1.45 EUR2005; name RP_price_EUR2005
    Estimated value. The price is taken from TrovaPrezzi, an online search engine for prices, website (retrieved from: https://www.trovaprezzi.it/prezzo_lampadine_lampadine_fluorescenti_compatte.aspx, accessed 13Feb2018). The range of prices varies greatly from 1.4 to over 1.74 euros. A representative price of 300 was chosen. The choice is based on the most common price for an average appliance, and accounting for profit margins. According to an article from Blokhin "What profit margin is average for a company in the electronics sector?" (Source: Investopedia, retrieved from: https://www.investopedia.com/ask/answers/051215/what-profit-margin-average-company-electronics-sector.asp, 13Feb2018) the average profit margin made in the electronics sector in 2015 was of 9%.
  property lifetime capacity [h] 10000 hour
    Calculated from Elijosiute et al. 2012 who estimate the life time of a bulb to be eqaul to 10000 hours which equates to circa 1 year. Source: Elijosiute et al. 2012, 2012, Elijosiute, K, Balciukeviciute, J., and Danafas, G., Assessment of Compact Fluorescent and Incadescent Lamps: Comparative Analysis, Environmental Research, Engineering and , 3, 61, 65-72, 1 - Article, Elijosiute, K., Balciukeviciute, J., and Danafas, G., 2012. Life Cycle Assessment of Compact Fluorescent and Incadescent Lamps: Comparative Analysis. Environmental Research, Engineering and Management, 3(61), 65-72.
  property lifetime 1 year
    (same comment as for compact fluorescent lamp)
  property weight 0.75 kg; name weight
    (same comment as for compact fluorescent lamp)

## By-products
- iron scrap, unsorted: 0 kg; CPC 39310: Slag, dross, scalings and other waste from the manufacture of iron or steel; By-product classification Recyclable
  The amount is set equal to the input amount for the respective material.
  production volume 0 kg; = RP_PV * (BP_amount_2 / RP)
    Calculated from production volume of reference product using the relative outputs.
  property price 0.149 EUR2005; name BP_amount_2_price_EUR2005
    Temporary price data. Calculated as 90% of purchasers price based on: estimated at 85% of sorted scrap
  property carbon content 0
    carbon content on a dry matter basis (reserved; not for manual entry)
  properties: water in wet mass 0 kg, wet mass 1 kg, carbon content, fossil 0, carbon content, non-fossil 0, water content 0, dry mass 1 kg, carbon allocation 0 kg

## Inputs from technosphere
- scrap aluminium: 0 kg; name BP_amount_4
  The amount is set equal to the input amount for the respective material.
  production volume 0 kg
    Calculated from production volume of reference product using the relative outputs.
  property price 0 EUR2005; name BP_amount_4_price_EUR2005
  properties: wet mass 1 kg, dry mass 1 kg
- integrated circuit, logic type: 0.00142 kg; name circuit
  Value from literature: Ramroth, L. 2008. Comparison of Life-Cycle Analyses of Compact Fluorescent and Incandescent Lamps Based on Rated Life of Compact Fluorescent Lamp. Retrieved from: http://infohouse.p2ric.org/ref/47/46011.pdf, accessed 20180614
  properties: dry mass 1 kg, carbon content, fossil 0.221701, wet mass 1 kg
- aluminium, cast alloy: 0.00709 kg; name alu
  (same comment as for integrated circuit, logic type)
  properties: dry mass 1 kg, wet mass 1 kg
- electricity, high voltage: 0.000224 kWh; lognormal variance with pedigree 0.0118, pedigree (1,4,4,4,2)
  (same comment as for integrated circuit, logic type)
- foam glass: 0.003 kg; name foam
  (same comment as for integrated circuit, logic type)
  properties: wet mass 1 kg, dry mass 1 kg
- polypropylene, granulate: 0.00425 kg; name polyprop
  (same comment as for integrated circuit, logic type)
  properties: wet mass 1 kg, dry mass 1 kg, heating value, net 32.78 MJ, carbon content, fossil 0.857143
  note on heating value, net: Value extracted from "treatment of waste polypropylene, open burning"
- flat glass factory: 4.51807e-11 unit; = 1/22133333333; lognormal variance with pedigree 0.3112, pedigree (1,4,4,4,2)
  (same comment as for integrated circuit, logic type)
- cast iron: 0.00627 kg; name iron
  (same comment as for integrated circuit, logic type)
  properties: wet mass 1 kg, carbon content, fossil 0.04, dry mass 1 kg
  note on carbon content, fossil: Cast iron is made by remelting pig iron in small furnaces (e.g. cupola furnaces or electric arc furnaces) and poured into moulds to make castings. It usually contains 2% to 6% carbon (ecoinvent v2.2 report 10_partII). An average content of 4% was considered
- waste glass: 0 kg; name waste_glass; pedigree (1,1,1,1,1)
  Includes waste from regular glass and black glass.
  production volume 0 kg
    Calculated from production volume of reference product using the relative outputs.
  property price 0 EUR2005; name waste_glass_price_EUR2005
  properties: dry mass 1 kg, wet mass 1 kg, heating value, net 0.05 MJ
  note on heating value, net: Value extracted from "treatment of waste glass, open dump, very wet infiltration class (1000mm)"
- copper, cathode: 0.00615 kg; name copper; lognormal variance with pedigree 0.0118, pedigree (1,4,4,4,2)
  (same comment as for integrated circuit, logic type)
  properties: wet mass 1 kg, dry mass 1 kg
- lead: 3.6e-5 kg
  (same comment as for integrated circuit, logic type)
  properties: dry mass 1 kg, wet mass 1 kg
- polyvinylchloride, bulk polymerised: 0.0168 kg; name polyvynil
  (same comment as for integrated circuit, logic type)
  properties: carbon content, fossil 0.387097, dry mass 1 kg, wet mass 1 kg, heating value, net 21.5 MJ
  note on carbon content, fossil: Monomer is vynyl chloride, C2H3Cl (ecoinvent v2.2 report 11_II). MW=62 g/mol
- scrap copper: 0 kg; name waste_copper; pedigree (1,1,1,1,1)
  The amount is set equal to the input amount for the respective material.
  production volume 0 kg
    Calculated from production volume of reference product using the relative outputs.
  property price 0 EUR2005; name waste_copper_price_EUR2005
  properties: wet mass 0.075 kg, dry mass 0.075 kg, carbon content, fossil 0.009542
- printed wiring board, surface mounted, unspecified, Pb containing: 0.004 kg; name board
  (same comment as for integrated circuit, logic type)
  properties: carbon content, fossil 0.132522, dry mass 1 kg, wet mass 1 kg
- electrode, negative, Ni: 0.0016 kg; name electrode
  (same comment as for integrated circuit, logic type)
  properties: carbon content, fossil 0.00301397, wet mass 1 kg, dry mass 1 kg
- scrap tin sheet: 0 kg; name waste_tin; pedigree (1,1,1,1,1)
  The amount is set equal to the input amount for the respective material.
  production volume 0 kg
    Calculated from production volume of reference product using the relative outputs.
  property price 0 EUR2005; name waste_tin_price_EUR2005
  properties: wet mass 0.075 kg, dry mass 0.075 kg
- acrylonitrile-butadiene-styrene copolymer: 0.00142 kg; name ABS
  (same comment as for integrated circuit, logic type)
  properties: heating value, net 35.58 MJ, dry mass 1 kg, wet mass 1 kg, carbon content, fossil 0.853081
- waste electric and electronic equipment: -0.00702 kg; name BP_amount_1; = (circuit+electrode+board)*-1
  The amount is set equal to the input amount for the inputs of electronics, i.e. integrated circuit, printed wiring board and electrode.
  production volume 20358 kg; = RP_PV * (BP_amount_1 / RP)
    Calculated from production volume of reference product using the relative outputs.
  property price 0 EUR2005; name BP_amount_1_price_EUR2005
  properties: carbon content, non-fossil 0.000485011, wet mass 1 kg, carbon content, fossil 0.0877555, dry mass 1 kg
- waste polyvinylchloride: 0 kg; name BP_amount_5
  The amount is set equal to the input amount for the respective material.
  production volume 0 kg
    Calculated from production volume of reference product using the relative outputs.
  property price 0 EUR2005; name BP_amount_5_price_EUR2005
  properties: water content 0.00200401, dry mass 0.998 kg, carbon content, fossil 0.440882, wet mass 1 kg, heating value, net 21.51 MJ
  note on heating value, net: Value taken from the general comment of the treatment dataset.
- tin: 0.0048 kg; lognormal variance with pedigree 0.0118, pedigree (1,4,4,4,2)
  (same comment as for integrated circuit, logic type)
  properties: dry mass 1 kg, wet mass 1 kg
- waste polypropylene: 0 kg; name BP_amount_3
  The amount is set equal to the input amount of polypropylene and ABS.
  production volume 0 kg
    Calculated from production volume of reference product using the relative outputs.
  property price 0 EUR2005; name BP_amount_3_price_EUR2005
  properties: heating value, net 32.78 MJ, wet mass 1 kg, dry mass 0.841 kg, water content 0.189061, carbon content, fossil 0.825208
  note on heating value, net: Value assumed for all polypropylene products. Source: Phyllis2, database for (treated) biomass, algae, feedstocks for biogas production and biochar, https://phyllis.nl/Biomass/View/1186, ECN.TNO
- flat glass, uncoated: 0 kg; name glass; pedigree (1,1,1,1,1)
  (same comment as for integrated circuit, logic type)
  properties: dry mass 1 kg, wet mass 1 kg
- mercury: 5e-6 kg; lognormal variance with pedigree 0.0118, pedigree (1,4,4,4,2)
  (same comment as for integrated circuit, logic type)
  properties: wet mass 1 kg, dry mass 1 kg
- iron scrap, unsorted: -0.00627 kg
  The amount is set equal to the input amount for the respective material.
  production volume 18183 kg
  properties: wet mass 1 kg, dry mass 1 kg
- scrap aluminium: -0.002249, -0.000105518, -0.00473548 kg (3 entries)
  The amount is set equal to the input amount for the respective material.
  production volume 20561 kg
- waste glass: -0.00633274, -0.000307274, -2.86682e-5, -0.00012828, -0.00333385, -4.35343e-5, -6.97101e-6, -0.0314187 kg (8 entries); lognormal variance with pedigree 0.0118, pedigree (1,4,4,4,2)
  Includes waste from regular glass and black glass.
  production volume 120640 kg
- scrap copper: -0.00195083, -9.15286e-5, -0.00410764 kg (3 entries); lognormal variance with pedigree 0.0118, pedigree (1,4,4,4,2)
  The amount is set equal to the input amount for the respective material.
  production volume 17835 kg
- scrap tin sheet: -7.14365e-5, -0.00472856 kg (2 entries); lognormal variance with pedigree 0.0118, pedigree (1,4,4,4,2)
  The amount is set equal to the input amount for the respective material.
  production volume 13920 kg
- waste polyvinylchloride: -0.00161708, -0.000124667, -5.1492e-5, -4.88965e-5, -0.00186583, -2.08022e-5, -9.42838e-6, -0.0130618 kg (8 entries)
  The amount is set equal to the input amount for the respective material.
  production volume 48720 kg
- waste polypropylene: -0.000545764, -4.20752e-5, -1.73786e-5, -1.65026e-5, -0.000629716, -7.02074e-6, -3.18208e-6, -0.00440836 kg (8 entries)
  The amount is set equal to the input amount of polypropylene and ABS.
  production volume 16443 kg
- flat glass, uncoated: 0.00659141, 0.0320086 kg (2 entries); lognormal variance with pedigree 0.0118, pedigree (1,4,4,4,2)
  (same comment as for integrated circuit, logic type)

## Emissions to nature
- Arsenic [soil, unspecified]: 2e-9 kg
  (same comment as for integrated circuit, logic type)
- Lead [water, unspecified]: 3.46e-5 kg
  (same comment as for integrated circuit, logic type)
- Mercury [air, urban air close to ground]: 5e-6 kg; = mercury; lognormal variance with pedigree 0.0512, pedigree (1,4,4,4,2)
  (same comment as for integrated circuit, logic type)
- Arsenic, ion [water, unspecified]: 7.19e-6 kg
  (same comment as for integrated circuit, logic type)
- Arsenic [air, unspecified]: 5.07e-7 kg
  (same comment as for integrated circuit, logic type)
- Lead [air, unspecified]: 1.43e-6 kg
  (same comment as for integrated circuit, logic type)
- Lead [soil, unspecified]: 1.2e-8 kg
  (same comment as for integrated circuit, logic type)

## Sampling procedure
Manufacturing data are taken from Elijosiute et al. 2012. Data on the annual production volume are taken from Worldwatch Institute 2009. Sources: Elijosiute, K., Balciukeviciute, J., and Danafas, G., 2012. Life Cycle Assessment of Compact Fluorescent and Incadescent Lamps: Comparative Analysis. Environmental Research, Engineering and Management, 3(61), 65-72. Worldwatch Institute 2009. Strong Growth in Compact Fluorescent Bulbs Reduces Electricity Demand. Worldwatch Institute, Washington, DC, USA. Available from: http://www.worldwatch.org/node/5920 (Accessed 20 January 2018).

## Extrapolations
This dataset has been extrapolated from year 2018 to the year of the calculation (2021). The uncertainty has been adjusted accordingly.
