# treatment of wastewater, average, capacity 1.6E8l/year

Dataset: EcoSpold 2, unit process
Geography: CH
Time period: 1994-01-01 to 2021-12-31
Technology level: current
Classification: ISIC rev.4 ecoinvent: 3700:Sewerage
Classification: EcoSpold01Categories: waste management/wastewater treatment
Tags: Treatment; ConvertedDataset
Scenario: Business-as-Usual
System model: Allocation, cut-off by classification
Generated by: Gabor Doka (obsolete)
Published in: Doka G. 2008
Database: ecoinvent
isCopyrightProtected: true
accessRestrictedTo: 1

## General comment
Wastewater purified in a small size municipal wastewater treatment plant (capacity class 5), with an average capacity size of 806 per-captia-equivalents PCE.
Wastewater contains (in kg/m3): COD: 0.1556 (GSD=122.5%); BOD: 0.1036 (GSD=122.5%); DOC: 0.04575 (GSD=122.5%); TOC: 0.0673 (GSD=122.5%); SO4-S: 0.044 (GSD=122.5%); S part.: 0.002 (GSD=122.5%); NH4-N: 0.01495 (GSD=122.5%); NO3-N: 0.00105 (GSD=122.5%); NO2-N: 0.0004 (GSD=122.5%); N part.: 0.003279 (GSD=122.5%); N org. solv.: 0.008392 (GSD=122.5%); PO4-P: 0.002459 (GSD=122.5%); P part.: 0.0006147 (GSD=122.5%); Cl: 0.03003 (GSD=224.1%); F: 0.00003277 (GSD=224.1%); As: 0.0000009 (GSD=224.1%); Cd: 0.0000002806 (GSD=223.8%); Co: 0.000001618 (GSD=223.8%); Cr: 0.00001223 (GSD=223.8%); Cu: 0.00003744 (GSD=223.8%); Hg: 0.0000002 (GSD=223.8%); Mn: 0.000053 (GSD=224.1%); Mo: 0.0000009574 (GSD=223.8%); Ni: 0.000006589 (GSD=223.8%); Pb: 0.000008631 (GSD=223.8%); Sn: 0.0000034 (GSD=224.1%); Zn: 0.0001094 (GSD=223.8%); Si: 0.003126 (GSD=224.1%); Fe: 0.007093 (GSD=224.1%); Ca: 0.05083 (GSD=224.1%); Al: 0.001038 (GSD=224.1%); K: 0.0003989 (GSD=224.1%); Mg: 0.005707 (GSD=224.1%); Na: 0.002186 (GSD=224.1%);
[This dataset was already contained in the ecoinvent database version 2. It was not individually updated during the transfer to ecoinvent version 3. Life Cycle Impact Assessment results may still have changed, as they are affected by changes in the supply chain, i.e. in other datasets. This dataset was generated following the ecoinvent quality guidelines for version 2. It may have been subject to central changes described in the ecoinvent version 3 change report (http://www.ecoinvent.org/database/ecoinvent-version-3/reports-of-changes/), and the results of the central updates were reviewed extensively. The changes added e.g. consistent water flows and other information throughout the database. The documentation of this dataset can be found in the ecoinvent reports of version 2, which are still available via the ecoinvent website. The change report linked above covers all central changes that were made during the conversion process.]

## Included activities end
Infrastructure materials for municipal wastewater treatment plant, transports, dismantling. Land use burdens.

## Geography
Specific to the technology mix encountered in Switzerland in 2000. Well applicable to modern treatment practices in Europe, North America or Japan.

## Technology
Three stage wastewater treatment (mechanical, biological, chemical) including sludge digestion (fermentation) according to the average technology in Switzerland

## Parameters
- fraction, process water, to air: 0.1 dimensionless; name fraction_PW_to_air; lognormal variance with pedigree 0.092025, pedigree (4,4,3,2,4)
  Literature value (Statistics Canada, 2007 & Shaffer, K.H., 2008, Consumptive water use in the Great Lakes Basin, USGS) (Vionnet, S., Quantis Water Database - Technical Report, 2012).

## Reference product
- wastewater, average: -1 m3; name RP_amount_1; CPC 39920: Sewage sludge; By-product classification Waste
  production volume 6.46602e8 m3; name RP_PV_1
    (year 2000) source: ecoinvent v2, report 13IV p.2
  property price 0 EUR2005; name RP_amount_1_price_EUR2005
    Waste products are assigned a price of zero as they are assumed to require further treatment.
  property carbon content, non-fossil 0.194039
    0.0673 kg TOC/m3 (Tab A.17, ecoinvent v2.2 report 13_I). TOC was considered as Total Carbon.
  property carbon content 0.194039
    carbon content on a dry matter basis (reserved; not for manual entry)
  properties: water content 2882.2, carbon content, fossil 0, wet mass 1000 kg, water in wet mass 999.653 kg, dry mass 0.346837 kg, carbon allocation 0.0673 kg

## Inputs from technosphere
- iron (III) chloride, without water, in 40% solution state: 0.015944 kg; lognormal variance with pedigree 0.1, pedigree (1,1,5,1,1)
  direct wastewater treatment plant burden plus burden from sludge incineration. Uncertainty calculated from wastewater composition and treatment model
  properties: dry mass 1 kg, wet mass 1 kg
- waste graphical paper: -0.0155 kg; name BP_amount_1; lognormal variance with pedigree 0.04, pedigree (1,1,5,1,1)
  direct wastewater treatment plant burden. Uncertainty calculated from wastewater composition and treatment model
  production volume 1.00223e7 kg; = BP_amount_1* RP_PV_1/ABS( RP_amount_1)
    Calculated from the production volume of sewage, average in proportion to the respective output amounts.
  property price 0 EUR2005; name BP_amount_1_price_EUR2005
  properties: dry mass 0.888 kg, wet mass 1 kg, carbon content, non-fossil 0.454955, water content 0.126126, heating value, net 14.12 MJ
  note on heating value, net: Value taken from the general comment of the treatment dataset.
- cement, unspecified: 0.00070862 kg; lognormal variance with pedigree 0.08, pedigree (1,1,5,1,1)
  burden from sludge incineration. Uncertainty calculated from wastewater composition and treatment model
  properties: dry mass 1 kg, wet mass 1 kg
- waste cement, hydrated: -0.0017715 kg; name BP_amount_2; lognormal variance with pedigree 0.08, pedigree (1,1,5,1,1)
  (same comment as for cement, unspecified)
  production volume 1.14546e6 kg; = BP_amount_2* RP_PV_1/ABS( RP_amount_1)
    (same comment as for waste graphical paper)
  property price 0 EUR2005; name BP_amount_2_price_EUR2005
  properties: dry mass 1 kg, wet mass 1 kg
- slag landfill: 2.0088e-11 unit; lognormal variance with pedigree 0.07, pedigree (1,1,5,1,1)
  (same comment as for cement, unspecified)
- waste plastic, mixture: -0.0155 kg; name BP_amount_3; lognormal variance with pedigree 0.04, pedigree (1,1,5,1,1)
  (same comment as for waste graphical paper)
  production volume 1.00223e7 kg; = BP_amount_3* RP_PV_1/ABS( RP_amount_1)
    (same comment as for waste graphical paper)
  property price 0 EUR2005; name BP_amount_3_price_EUR2005
  properties: carbon content, fossil 0.747344, dry mass 0.847 kg, heating value, net 30.79 MJ, water content 0.180638, wet mass 1 kg
  note on carbon content, fossil: C content in 1 kg DM was calculated using data in Tab A.2, ecoinvent v2.2 report 13_I
- chemical, organic: 2.5144e-7 kg; lognormal variance with pedigree 0.43, pedigree (1,1,5,1,1)
  (same comment as for cement, unspecified)
  properties: wet mass 1 kg, carbon content, fossil 0.628, dry mass 1 kg, heating value, net 19.03 MJ
  note on carbon content, fossil: This dataset is an unweighted average of 20 organic substances (listed in Tab 88.1, ecoinvent v2.2 report 8, part II), being part of the top100 chemicals included in this database. The C-content has also been calculated as an unweighted average of the C content of the substances composing this dataset.
- ammonia, anhydrous, liquid: 3.4481e-5 kg; lognormal variance with pedigree 0.22, pedigree (1,1,5,1,1)
  (same comment as for cement, unspecified)
  properties: dry mass 1 kg, wet mass 1 kg
- municipal waste incineration facility: 1.5512e-11 unit; lognormal variance with pedigree 0.05, pedigree (1,1,5,1,1)
  (same comment as for cement, unspecified)
- chromium oxide, flakes: 2.0143e-8 kg; lognormal variance with pedigree 0.54, pedigree (1,1,5,1,1)
  (same comment as for cement, unspecified)
  properties: dry mass 1 kg, wet mass 1 kg
- electricity, low voltage: 0.20571 kWh; lognormal variance with pedigree 0.06, pedigree (1,1,5,1,1)
  (same comment as for waste graphical paper)
- hydrochloric acid, without water, in 30% solution state: 1.8903e-7 kg; lognormal variance with pedigree 0.08, pedigree (1,1,5,1,1)
  (same comment as for cement, unspecified)
  properties: wet mass 1 kg, dry mass 1 kg, heating value, net 3.32 MJ
- process-specific burdens, residual material landfill: 0.0017715 kg; lognormal variance with pedigree 0.07, pedigree (1,1,5,1,1)
  burden from sludge incineration. Uncertainty calculated from wastewater composition and treatment model;activityLink introduced to establish a direct link to the corresponding regional supply of this product
- electricity, high voltage: 0.0089206 kWh; lognormal variance with pedigree 0.49, pedigree (1,1,5,1,1)
  (same comment as for cement, unspecified)
- iron sulfate: 0.01166 kg; lognormal variance with pedigree 0.1, pedigree (1,1,5,1,1)
  (same comment as for waste graphical paper)
  properties: wet mass 1 kg, dry mass 1 kg
- quicklime, milled, packed: 5.9992e-7 kg; lognormal variance with pedigree 0.09, pedigree (1,1,5,1,1)
  (same comment as for cement, unspecified)
  properties: wet mass 1 kg, dry mass 0.99 kg, water content 0.010101
- chemical, inorganic: 3.1505e-7 kg; lognormal variance with pedigree 0.08, pedigree (1,1,5,1,1)
  (same comment as for cement, unspecified)
  properties: dry mass 1 kg, carbon content, fossil 0.003, wet mass 1 kg
  note on carbon content, fossil: This dataset is an unweighted average of 20 inorganic substances (listed in Tab 88.1, ecoinvent v2.2 report 8, part II), being part of the top100 chemicals included in this database. The C-content has also been calculated as an unweighted average of the C content of the substances composing this dataset.
- process-specific burdens, slag landfill: 0.011299 kg; lognormal variance with pedigree 0.07, pedigree (1,1,5,1,1)
  (same comment as for process-specific burdens, residual material landfill)
- sodium hydroxide, without water, in 50% solution state: 0.0001685 kg; lognormal variance with pedigree 0.09, pedigree (1,1,5,1,1)
  (same comment as for cement, unspecified)
  properties: wet mass 1 kg, dry mass 1 kg, heating value, net 3.03 MJ
- liquid manure spreading, by vacuum tanker: 0.0005977 m3; lognormal variance with pedigree 0.04, pedigree (1,1,5,1,1)
  burden from sludge spreading. Uncertainty calculated from wastewater composition and treatment model
  This exchange has an activity link directly to the producing activity because the product is primarily consumed in the same geographical area where it is produced.
- aluminium sulfate, powder: 0.0031512 kg; lognormal variance with pedigree 0.1, pedigree (1,1,5,1,1)
  (same comment as for waste graphical paper)
  properties: wet mass 1 kg, dry mass 1 kg
- heat, district or industrial, natural gas: 0.00302634 MJ; lognormal variance with pedigree 0.22, pedigree (1,1,5,1,1)
  (same comment as for cement, unspecified)
  properties: heating value, net 1 MJ
- heat, district or industrial, other than natural gas: 0.052039 MJ; lognormal variance with pedigree 0.05, pedigree (1,1,5,1,1)
  (same comment as for cement, unspecified)
  properties: heating value, net 1 MJ
- wastewater treatment facility, capacity 1.6E8l/year: 1.7546e-7 unit; lognormal variance with pedigree 0.04, pedigree (1,1,5,1,1)
  uncertainty heeded in exchanges of the module
- sewer grid, 1.6E8l/year, 6 km: 3.7624e-7 km; lognormal variance with pedigree 0.04, pedigree (1,1,5,1,1)
  uncertainty heeded in exchanges of the module
- residual material landfill: 3.6907e-12 unit; lognormal variance with pedigree 0.07, pedigree (1,1,5,1,1)
  (same comment as for cement, unspecified)
- titanium dioxide: 9.87e-7 kg; lognormal variance with pedigree 0.54, pedigree (1,1,5,1,1)
  (same comment as for cement, unspecified)
  properties: wet mass 1 kg, dry mass 1 kg
- process-specific burdens, municipal waste incineration: 0.062049 kg; lognormal variance with pedigree 0.05, pedigree (1,1,5,1,1)
  (same comment as for process-specific burdens, residual material landfill)

## Emissions to nature
- Copper [air, urban air close to ground]: 6.0072e-11 kg; lognormal variance with pedigree 0.77, pedigree (1,1,5,1,1)
  direct digester gas emission plus emission from sludge incineration. Uncertainty calculated from wastewater composition and treatment model
- Lead [soil, agricultural]: 5.4283e-6 kg; lognormal variance with pedigree 0.71, pedigree (1,1,5,1,1)
  emission from sludge spreading. Uncertainty calculated from wastewater composition and treatment model
- Silicon [water, surface water]: 0.00018768 kg; lognormal variance with pedigree 0.57, pedigree (1,1,5,1,1)
  sewer overload discharge plus direct wastewater treatment plant emission plus emission from sludge incineration. Uncertainty calculated from wastewater composition and treatment model
- Manganese [water, surface water]: 2.6898e-5 kg; lognormal variance with pedigree 0.66, pedigree (1,1,5,1,1)
  (same comment as for Silicon)
- Nitrate [water, surface water]: 0.048295 kg; lognormal variance with pedigree 0.06, pedigree (1,1,5,1,1)
  (same comment as for Silicon)
- Calcium, ion [water, ground-, long-term]: 0.0012735 kg; lognormal variance with pedigree 0.71, pedigree (1,1,5,1,1)
  emission from sludge incineration. Uncertainty calculated from wastewater composition and treatment model
- Nitrite [water, surface water]: 0.000644 kg; lognormal variance with pedigree 0.08, pedigree (1,1,5,1,1)
  direct wastewater treatment plant emission. Uncertainty calculated from wastewater composition and treatment model
- Tin, ion [water, ground-, long-term]: 2.9174e-7 kg; lognormal variance with pedigree 1.27, pedigree (1,1,5,1,1)
  (same comment as for Calcium, ion)
- Tin [air, urban air close to ground]: 7.702e-10 kg; lognormal variance with pedigree 0.73, pedigree (1,1,5,1,1)
  (same comment as for Copper)
- Arsenic, ion [water, surface water]: 7.3122e-7 kg; lognormal variance with pedigree 0.64, pedigree (1,1,5,1,1)
  (same comment as for Silicon)
- Iron [soil, agricultural]: 0.0093763 kg; lognormal variance with pedigree 0.16, pedigree (1,1,5,1,1)
  (same comment as for Lead)
- Mercury [air, urban air close to ground]: 3.353e-13 kg; lognormal variance with pedigree 0.74, pedigree (1,1,5,1,1)
  (same comment as for Copper)
- Zinc, ion [water, surface water]: 3.3805e-5 kg; lognormal variance with pedigree 0.65, pedigree (1,1,5,1,1)
  (same comment as for Silicon)
- Molybdenum [air, urban air close to ground]: 2.7675e-10 kg; lognormal variance with pedigree 0.73, pedigree (1,1,5,1,1)
  (same comment as for Copper)
- Iron, ion [water, ground-, long-term]: 0.0018241 kg; lognormal variance with pedigree 1, pedigree (1,1,5,1,1)
  (same comment as for Calcium, ion)
- Molybdenum [soil, agricultural]: 3.3317e-7 kg; lognormal variance with pedigree 0.71, pedigree (1,1,5,1,1)
  (same comment as for Lead)
- Mercury [water, surface water]: 6.2267e-8 kg; lognormal variance with pedigree 0.65, pedigree (1,1,5,1,1)
  (same comment as for Silicon)
- Sulfur [soil, agricultural]: 0.0010873 kg; lognormal variance with pedigree 0.1, pedigree (1,1,5,1,1)
  (same comment as for Lead)
- COD, Chemical Oxygen Demand [water, ground-, long-term]: 0.00012522 kg; lognormal variance with pedigree 0.12, pedigree (1,1,5,1,1)
  (same comment as for Calcium, ion)
- Nickel [soil, agricultural]: 1.8324e-6 kg; lognormal variance with pedigree 0.71, pedigree (1,1,5,1,1)
  (same comment as for Lead)
- Carbon [soil, agricultural]: 0.012217 kg; lognormal variance with pedigree 0.1, pedigree (1,1,5,1,1)
  (same comment as for Lead)
- Cyanide [air, urban air close to ground]: 6.1511e-7 kg; lognormal variance with pedigree 0.24, pedigree (1,1,5,1,1)
  (same comment as for Calcium, ion)
- Nitrate [water, ground-, long-term]: 2.4552e-5 kg; lognormal variance with pedigree 0.09, pedigree (1,1,5,1,1)
  (same comment as for Calcium, ion)
- Ammonium, ion [water, surface water]: 0.011027 kg; lognormal variance with pedigree 0.06, pedigree (1,1,5,1,1)
  (same comment as for Nitrite)
- Silicon [soil, agricultural]: 0.0020764 kg; lognormal variance with pedigree 0.71, pedigree (1,1,5,1,1)
  (same comment as for Lead)
- TOC, Total Organic Carbon [water, ground-, long-term]: 4.9549e-5 kg; lognormal variance with pedigree 0.12, pedigree (1,1,5,1,1)
  (same comment as for Calcium, ion)
- Arsenic, ion [water, ground-, long-term]: 3.13e-8 kg; lognormal variance with pedigree 0.71, pedigree (1,1,5,1,1)
  (same comment as for Calcium, ion)
- Aluminium [water, surface water]: 6.2281e-5 kg; lognormal variance with pedigree 0.55, pedigree (1,1,5,1,1)
  (same comment as for Silicon)
- Silicon [air, urban air close to ground]: 2.0077e-6 kg; lognormal variance with pedigree 0.73, pedigree (1,1,5,1,1)
  (same comment as for Copper)
- Chromium [soil, agricultural]: 4.2565e-6 kg; lognormal variance with pedigree 0.71, pedigree (1,1,5,1,1)
  (same comment as for Lead)
- Cobalt [soil, agricultural]: 5.6294e-7 kg; lognormal variance with pedigree 0.71, pedigree (1,1,5,1,1)
  (same comment as for Lead)
- Water [air, unspecified]: 0.1 m3; name water_to_air_unspecified; lognormal variance with pedigree 0.0807, pedigree (2,2,5,1,1)
  Calculated value based on water balance.
  property fraction, origin: unspecified 1; name fraction_origin_unspecified
  property fraction, origin: fresh water 0; name fraction_origin_fresh_water
  property fraction, origin: salt water 0; name fraction_origin_salt_water
- Cadmium, ion [water, ground-, long-term]: 4.0696e-10 kg; lognormal variance with pedigree 6.9, pedigree (1,1,5,1,1)
  (same comment as for Calcium, ion)
- Calcium, ion [water, surface water]: 0.045852 kg; lognormal variance with pedigree 0.67, pedigree (1,1,5,1,1)
  (same comment as for Silicon)
- Water [water, unspecified]: 0.9 m3; name water_to_water_unspecified; lognormal variance with pedigree 0.0807, pedigree (2,2,5,1,1)
  Calculated value based on water balance.
  property fraction, origin: fresh water 1; name fraction_origin_fresh_water_Ww
  property dry mass 0 kg; name DM
  property carbon content, fossil 0; name C_content_fossil
  property water in wet mass 1000 kg; name WWM
  property wet mass 1000 kg; name WM
  property carbon content, non-fossil 0; name C_content_non_fossil
  property fraction, origin: unspecified 0; name fraction_origin_unspecified_Ww
  property fraction, origin: salt water 0; name fraction_origin_salt_water_Ww
- Phosphate [water, ground-]: 2.6769e-5 kg; lognormal variance with pedigree 0.12, pedigree (1,1,5,1,1)
  (same comment as for Lead)
- Cobalt [water, surface water]: 8.2105e-7 kg; lognormal variance with pedigree 0.66, pedigree (1,1,5,1,1)
  (same comment as for Silicon)
- Aluminium [air, urban air close to ground]: 6.7533e-7 kg; lognormal variance with pedigree 0.47, pedigree (1,1,5,1,1)
  (same comment as for Copper)
- Magnesium [water, ground-, long-term]: 0.00015166 kg; lognormal variance with pedigree 0.71, pedigree (1,1,5,1,1)
  (same comment as for Calcium, ion)
- Mercury [water, ground-, long-term]: 2.1102e-9 kg; lognormal variance with pedigree 2.98, pedigree (1,1,5,1,1)
  (same comment as for Calcium, ion)
- Sulfate [water, ground-, long-term]: 0.0011326 kg; lognormal variance with pedigree 0.11, pedigree (1,1,5,1,1)
  (same comment as for Calcium, ion)
- Zinc [air, urban air close to ground]: 3.622e-10 kg; lognormal variance with pedigree 0.76, pedigree (1,1,5,1,1)
  (same comment as for Copper)
- Ammonia [air, urban air close to ground]: 0.00058896 kg; lognormal variance with pedigree 0.31, pedigree (1,1,5,1,1)
  direct digester gas emission plus emission from sludge incineration plus emission from sludge spreading. Uncertainty calculated from wastewater composition and treatment model
- Sulfur dioxide [air, urban air close to ground]: 0.00088405 kg; lognormal variance with pedigree 0.11, pedigree (1,1,5,1,1)
  (same comment as for Copper)
- Aluminium [water, ground-, long-term]: 0.00031992 kg; lognormal variance with pedigree 0.47, pedigree (1,1,5,1,1)
  (same comment as for Calcium, ion)
- Silicon [water, ground-, long-term]: 7.4886e-5 kg; lognormal variance with pedigree 5.46, pedigree (1,1,5,1,1)
  (same comment as for Calcium, ion)
- Magnesium [soil, agricultural]: 0.00039557 kg; lognormal variance with pedigree 0.71, pedigree (1,1,5,1,1)
  (same comment as for Lead)
- Phosphate [water, surface water]: 0.0027466 kg; lognormal variance with pedigree 0.08, pedigree (1,1,5,1,1)
  sewer overload discharge plus direct wastewater treatment plant emission plus emission from sludge incineration plus emission from sludge spreading. Uncertainty calculated from wastewater composition and treatment model
- Tin [soil, agricultural]: 1.3974e-6 kg; lognormal variance with pedigree 0.71, pedigree (1,1,5,1,1)
  (same comment as for Lead)
- Cadmium [air, urban air close to ground]: 2.2955e-12 kg; lognormal variance with pedigree 0.72, pedigree (1,1,5,1,1)
  (same comment as for Copper)
- Manganese [water, ground-, long-term]: 6.596e-6 kg; lognormal variance with pedigree 0.87, pedigree (1,1,5,1,1)
  (same comment as for Calcium, ion)
- Mercury [soil, agricultural]: 9.7652e-8 kg; lognormal variance with pedigree 0.71, pedigree (1,1,5,1,1)
  (same comment as for Lead)
- Magnesium [water, surface water]: 0.0051478 kg; lognormal variance with pedigree 0.67, pedigree (1,1,5,1,1)
  (same comment as for Silicon)
- Potassium, ion [water, surface water]: 0.0003989 kg; lognormal variance with pedigree 0.67, pedigree (1,1,5,1,1)
  (same comment as for Silicon)
- TOC, Total Organic Carbon [water, surface water]: 0.0072992 kg; lognormal variance with pedigree 0.08, pedigree (1,1,5,1,1)
  (same comment as for Silicon)
- Cadmium [soil, agricultural]: 9.7652e-8 kg; lognormal variance with pedigree 0.71, pedigree (1,1,5,1,1)
  (same comment as for Lead)
- Cobalt [air, urban air close to ground]: 7.4233e-15 kg; lognormal variance with pedigree 0.82, pedigree (1,1,5,1,1)
  (same comment as for Copper)
- Chloride [water, surface water]: 0.040484 kg; lognormal variance with pedigree 0.48, pedigree (1,1,5,1,1)
  (same comment as for Silicon)
- BOD5, Biological Oxygen Demand [water, surface water]: 0.0098227 kg; lognormal variance with pedigree 0.07, pedigree (1,1,5,1,1)
  (same comment as for Silicon)
- Chromium, ion [water, surface water]: 5.6343e-9 kg; lognormal variance with pedigree 0.73, pedigree (1,1,5,1,1)
  (same comment as for Calcium, ion)
- DOC, Dissolved Organic Carbon [water, ground-, long-term]: 4.9549e-5 kg; lognormal variance with pedigree 0.12, pedigree (1,1,5,1,1)
  (same comment as for Calcium, ion)
- Nitrogen [water, surface water]: 0.00049 kg; lognormal variance with pedigree 0.08, pedigree (1,1,5,1,1)
  (same comment as for Nitrite)
- Calcium [soil, agricultural]: 0.0035234 kg; lognormal variance with pedigree 0.71, pedigree (1,1,5,1,1)
  (same comment as for Lead)
- Lead [water, ground-, long-term]: 1.6063e-7 kg; lognormal variance with pedigree 6.92, pedigree (1,1,5,1,1)
  (same comment as for Calcium, ion)
- Carbon monoxide, non-fossil [air, urban air close to ground]: 0.00016152 kg; lognormal variance with pedigree 0.16, pedigree (1,1,5,1,1)
  (same comment as for Copper)
- Cobalt [water, ground-, long-term]: 2.047e-7 kg; lognormal variance with pedigree 0.71, pedigree (1,1,5,1,1)
  (same comment as for Calcium, ion)
- Chromium VI [water, surface water]: 6.2654e-6 kg; lognormal variance with pedigree 0.65, pedigree (1,1,5,1,1)
  (same comment as for Silicon)
- Sodium, ion [water, surface water]: 0.002186 kg; lognormal variance with pedigree 0.67, pedigree (1,1,5,1,1)
  (same comment as for Silicon)
- Cadmium, ion [water, surface water]: 1.4244e-7 kg; lognormal variance with pedigree 0.66, pedigree (1,1,5,1,1)
  (same comment as for Silicon)
- BOD5, Biological Oxygen Demand [water, ground-, long-term]: 4.0959e-5 kg; lognormal variance with pedigree 0.12, pedigree (1,1,5,1,1)
  (same comment as for Calcium, ion)
- Calcium [air, urban air close to ground]: 2.4395e-6 kg; lognormal variance with pedigree 0.73, pedigree (1,1,5,1,1)
  (same comment as for Copper)
- Magnesium [air, urban air close to ground]: 2.2623e-7 kg; lognormal variance with pedigree 0.73, pedigree (1,1,5,1,1)
  (same comment as for Copper)
- Iron [air, urban air close to ground]: 1.3001e-7 kg; lognormal variance with pedigree 0.21, pedigree (1,1,5,1,1)
  (same comment as for Copper)
- Iron, ion [water, surface water]: 0.0036009 kg; lognormal variance with pedigree 0.66, pedigree (1,1,5,1,1)
  (same comment as for Silicon)
- Copper, ion [water, surface water]: 9.7122e-6 kg; lognormal variance with pedigree 0.65, pedigree (1,1,5,1,1)
  (same comment as for Silicon)
- Molybdenum [water, ground-, long-term]: 1.1446e-7 kg; lognormal variance with pedigree 0.71, pedigree (1,1,5,1,1)
  (same comment as for Calcium, ion)
- Zinc, ion [water, ground-, long-term]: 3.4373e-7 kg; lognormal variance with pedigree 5.51, pedigree (1,1,5,1,1)
  (same comment as for Calcium, ion)
- DOC, Dissolved Organic Carbon [water, surface water]: 0.0075377 kg; lognormal variance with pedigree 0.08, pedigree (1,1,5,1,1)
  (same comment as for Silicon)
- Phosphate [water, ground-, long-term]: 7.4541e-5 kg; lognormal variance with pedigree 4.25, pedigree (1,1,5,1,1)
  (same comment as for Calcium, ion)
- Dinitrogen monoxide [air, urban air close to ground]: 0.00011435 kg; lognormal variance with pedigree 0.09, pedigree (1,1,5,1,1)
  direct wastewater treatment plant emission plus direct digester gas emission plus emission from sludge incineration plus emission from sludge spreading. Uncertainty calculated from wastewater composition and treatment model
- Fluoride [water, surface water]: 3.2769e-5 kg; lognormal variance with pedigree 0.67, pedigree (1,1,5,1,1)
  (same comment as for Silicon)
- COD, Chemical Oxygen Demand [water, surface water]: 0.030152 kg; lognormal variance with pedigree 0.08, pedigree (1,1,5,1,1)
  (same comment as for Silicon)
- Nickel, ion [water, surface water]: 3.9961e-6 kg; lognormal variance with pedigree 0.66, pedigree (1,1,5,1,1)
  (same comment as for Silicon)
- Chromium [air, urban air close to ground]: 1.3072e-13 kg; lognormal variance with pedigree 0.81, pedigree (1,1,5,1,1)
  (same comment as for Copper)
- Nitrogen oxides [air, urban air close to ground]: 0.00067623 kg; lognormal variance with pedigree 0.09, pedigree (1,1,5,1,1)
  (same comment as for Copper)
- Manganese [soil, agricultural]: 1.8443e-5 kg; lognormal variance with pedigree 0.71, pedigree (1,1,5,1,1)
  (same comment as for Lead)
- Phosphorus [air, urban air close to ground]: 6.3647e-7 kg; lognormal variance with pedigree 0.1, pedigree (1,1,5,1,1)
  (same comment as for Copper)
- Manganese [air, urban air close to ground]: 4.1708e-14 kg; lognormal variance with pedigree 0.84, pedigree (1,1,5,1,1)
  (same comment as for Copper)
- Lead [air, urban air close to ground]: 8.3969e-11 kg; lognormal variance with pedigree 0.75, pedigree (1,1,5,1,1)
  (same comment as for Copper)
- Methane, non-fossil [air, urban air close to ground]: 0.00050213 kg; lognormal variance with pedigree 0.14, pedigree (1,1,5,1,1)
  (same comment as for Copper)
- NMVOC, non-methane volatile organic compounds, unspecified origin [air, urban air close to ground]: 2.2813e-6 kg; lognormal variance with pedigree 0.26, pedigree (1,1,5,1,1)
  direct digester gas emission. Uncertainty calculated from wastewater composition and treatment model
- Chromium VI [water, ground-, long-term]: 1.8714e-7 kg; lognormal variance with pedigree 1.09, pedigree (1,1,5,1,1)
  (same comment as for Calcium, ion)
- Arsenic [air, urban air close to ground]: 2.5337e-10 kg; lognormal variance with pedigree 0.73, pedigree (1,1,5,1,1)
  (same comment as for Copper)
- Nickel, ion [water, ground-, long-term]: 7.1255e-7 kg; lognormal variance with pedigree 0.71, pedigree (1,1,5,1,1)
  (same comment as for Calcium, ion)
- Zinc [soil, agricultural]: 5.3381e-5 kg; lognormal variance with pedigree 0.71, pedigree (1,1,5,1,1)
  (same comment as for Lead)
- Sulfate [water, surface water]: 0.14466 kg; lognormal variance with pedigree 0.08, pedigree (1,1,5,1,1)
  (same comment as for Silicon)
- Molybdenum [water, surface water]: 5.0954e-7 kg; lognormal variance with pedigree 0.62, pedigree (1,1,5,1,1)
  (same comment as for Silicon)
- Copper, ion [water, ground-, long-term]: 6.5781e-6 kg; lognormal variance with pedigree 0.73, pedigree (1,1,5,1,1)
  (same comment as for Calcium, ion)
- Arsenic [soil, agricultural]: 1.3723e-7 kg; lognormal variance with pedigree 0.71, pedigree (1,1,5,1,1)
  (same comment as for Lead)
- Nickel [air, urban air close to ground]: 3.2846e-14 kg; lognormal variance with pedigree 0.81, pedigree (1,1,5,1,1)
  (same comment as for Copper)
- Aluminium [soil, agricultural]: 0.0010409 kg; lognormal variance with pedigree 0.45, pedigree (1,1,5,1,1)
  (same comment as for Lead)
- Tin, ion [water, surface water]: 1.4223e-6 kg; lognormal variance with pedigree 0.66, pedigree (1,1,5,1,1)
  (same comment as for Silicon)
- Lead [water, surface water]: 9.4866e-7 kg; lognormal variance with pedigree 0.6, pedigree (1,1,5,1,1)
  (same comment as for Silicon)
- Carbon dioxide, non-fossil [air, urban air close to ground]: 0.17249 kg; lognormal variance with pedigree 0.06, pedigree (1,1,5,1,1)
  direct wastewater treatment plant emission plus direct digester gas emission plus emission from sludge incineration. Uncertainty calculated from wastewater composition and treatment model
- Copper [soil, agricultural]: 1.9594e-5 kg; lognormal variance with pedigree 0.71, pedigree (1,1,5,1,1)
  (same comment as for Lead)

## Extrapolations
This dataset has been extrapolated from year 2000 to the year of the calculation (2021). The uncertainty has been adjusted accordingly.

## Review by Niels Jungbluth 2009-01-22
passed.
