# electricity production, hydro, reservoir, alpine region, renewable energy products

Dataset: EcoSpold 2, unit process
Geography: CH
Time period: 1945-01-01 to 2021-12-31
Technology level: modern
Classification: ISIC rev.4 ecoinvent: 3510:Electric power generation, transmission and distribution
Classification: EcoSpold01Categories: hydro power/power plants
Tags: certified electricity; hydro power
Scenario: Business-as-Usual
System model: Allocation, cut-off by classification
Generated by: Christian Bauer
Published in: Bolliger, R. 2007
Database: ecoinvent
isCopyrightProtected: true
accessRestrictedTo: 1

## General comment
This dataset represents the production of certified high voltage electricity at grid-connected reservoir hydropower plants in Switzerland in 2009. Here, the reservoir hydropower plants are modelled with alpine region plants based on data from Swiss hydropower plants. A representative sample of Swiss dams with a height of more than 30 metres is taken into account for calculating the input. Lifetime is assumed to be 150 years for the structural part and 80 years for the turbines. Net average electrical efficiency, including pipe losses, is 78% (best efficiency can be 84%).

## Included activities start
This dataset starts from the power plant ready to produce electricity, i.e. the reservoir filled with water

## Included activities end
This activity ends with 1kWh of high voltage electricity produced at the power plant and arrived at the busbar.

This dataset includes
- the area/volume occupied for the barrage, power station, and the lake
- a preliminary estimation of emissions of methane and dinitrogen oxide
- operation and maintenance activities and materials of the power plants, such as lubricating oil or mass of water passing through the turbines.

This dataset doesn't include
- land use for access roads to the reservoir
- emissions of carbon dioxide
- raw materials extraction, decommissioning and waste treatment as these activities are already included in the infrastructure datasets
- transformation of the electricity produced.

## Geography
Inventory represents Swiss data for label-certified electricity.

## Technology
The module describes average installed technology with an efficiency of 78%, including pipe losses (best technology has 82%).

## Parameters
- lifetime: 150 year; lognormal variance with pedigree 0.0014, pedigree (2,2,1,3,1)
  Estimation based on experiences.

## Reference product
- electricity, high voltage, renewable energy products: 1 kWh; By-product classification allocatable product; CPC 17100: Electrical energy
  production volume 3.909e9 kWh; name apv_electricity
    Literature value/statistics. Net production of grid-connected certified electricity in 2011 with this technology in Switzerland.
  property price 0.101 EUR2005
    Temporary price data. Calculated as 90% of purchasers price based on: 94% of the average price (to account for a 6% loss in transformation and transmission) for electricity for industrial consumersin 2005 (excluded taxes). From IEA. In addition, regarding label-certified electricity, the Swiss government has a market instrument for renewable energy which is calculated as the difference between the market price and the production price. This was started in 2009 and is 0.45 Rp/kWh. Therefore, the production price of label certified energy is assumed to be the supplyer price plus the 0.45Rp/kWh (http://www.bfe.admin.ch/themen/00612/02073/index.html?lang=de).The unit conversion from CH to EUR is based on the ecoinvent unit conversion file (1 CHF2005 = 0.644 EUR2005). As an approximation, this is also used for global electricity production

## Inputs from technosphere
- lubricating oil: 7.56e-6 kg; name lubricating_oil; = 0.000009*0.84; source Vögtlin H. J. 2002, p. p.36 in Bolliger, Tab. 5.2; lognormal variance with pedigree 0.1001, pedigree (4,2,3,5,3)
  EcoSpold01Location=RER
  Estimation. Data for a run-of-river power station were overtaken.
  There, a consumption of lubricating oil for turbines of 9 liters per GWh is estimated. With an oil density of 0.84 kg/l this amounts to 0.007 g/kWh. The lubricating oil is in a closed loop system (i.e. cannot get into the turbined water system) and is disposed annualy as waste oil in a hazardous waste treatment plant.
  Uncertainty: Values overtaken from run-off-river power plant
  properties: dry mass 1 kg, heating value, net 40.2 MJ, carbon content, fossil 0.75, wet mass 1 kg
  note on heating value, net: Literature value, Source: IPCC 2006, 2006 IPCC Guidelines for National Greenhouse Gas Inventories, Prepared by the National Greenhouse Gas Inventories Programme, Eggleston H.S., Buendia L., Miwa K., Ngara T. and Tanabe K. (eds). Published: IGES, Japan
  note on carbon content, fossil: Lubricating oil is produced from diesel. C-content/dry mass of fats and oils considered 75%, from: ecoinvent v2.2 report, n 15a, pg 40
- waste mineral oil: -7.56e-6 kg; name waste_oil; = (lubricating_oil)*-1; lognormal variance with pedigree 0.132, pedigree (1,1,5,5,1)
  Estimation. This dataset is based on data of Swiss reservoir power plants. The lubricating oil is in a closed loop system (i.e. cannot get into the turbined water system) and is disposed annualy as waste oil in a hazardous waste treatment plant. The information given is based on own assumptions.
  EcoSpold01Location=CH
  production volume 29552 kg; = apv_electricity* waste_oil
    Calculated from the production volume of electricity, high voltage, hydro, reservoir, alpine region in proportion to the respective output amounts.
  property price 0 EUR2005; name waste_oil_price_EUR2005
  properties: wet mass 1 kg, heating value, net 34.7 MJ, water content 0.111111, carbon content, fossil 0.864444, dry mass 0.9 kg
  note on heating value, net: Value taken from the general comment of the treatment dataset.
  note on carbon content, fossil: Tab A.6, ecoinvent v2.2 report 13_I. C content has been calculated after data in the tables, and then referred to 1 kg DM
- hydropower plant, reservoir, alpine region: 3.9e-13 unit; lognormal variance with pedigree 0.044, pedigree (1,1,3,5,1)
  EcoSpold01Location=RER
  Estimation

## Inputs from nature
- Volume occupied, reservoir [natural resource, in water]: 0.15 m3*year; source BWW 1991, p. p.35 in Bolliger, Tab. 5.2; lognormal variance with pedigree 0.164, pedigree (1,1,3,5,1)
  Estimation based on Swiss reservoir volumes.
- Transformation, from unspecified [natural resource, land]: 2.3e-5 m2; name transformation_from; lognormal variance with pedigree 0.164, pedigree (1,1,3,5,1)
  Estimation
- Occupation, lake, artificial [natural resource, land]: 0.00345 m2*year; = transformation_from*lifetime; lognormal variance with pedigree 0.074, pedigree (1,1,3,5,1)
  calculated value
- Transformation, to industrial area [natural resource, land]: 2.3e-7 m2; name transformation_to_industrial; = transformation_from*0.01; lognormal variance with pedigree 0.16, pedigree (4,1,3,5,3)
  Estimation. The area for the barrage and the power station are assumed to amount to 1% of the total land use. No land use for access roads was taken into account.
  Uncertainty: Rough estimation
- Energy, potential (in hydropower reservoir), converted [natural resource, in water]: 3.79 MJ
- Transformation, to lake, artificial [natural resource, land]: 2.277e-5 m2; = transformation_from-transformation_to_industrial; lognormal variance with pedigree 0.164, pedigree (1,1,3,5,1)
  Estimation
- Water, turbine use, unspecified natural origin [natural resource, in water]: 0.81 m3; name water_turbine_use_UNO_input; lognormal variance with pedigree 0.005, pedigree (1,1,3,5,1)
  Literature value/estimation. The specific turbine water amount is inversely proportional to the average head. A guidance value says that a hydropower plant can produce 1kWh of electricity with 1 m3 water over a head of 450 m. The ecological relevance of the turbine water amount is that it presents a demonstrative dimension of water being taken from natural water balance for a while.

## Emissions to nature
- Dinitrogen monoxide [air, non-urban air or from high stacks]: 7.7e-8 kg; source Dones R. 1996, p. p.37, Tab. 5.2, Tab. 4.3; lognormal variance with pedigree 0.162, pedigree (1,1,5,5,1)
  Estimation. Total emissions of greenhouse gases are assumed to be 0.3 CO2equivalents per kWh. Research projects in Swiss natural lakes had measurements of 8-16 μmol per m2 and day (brutto emissions). Because of the limited rates of nitrification and denitrification, a maximum of 0.24 to 2.4 μmol per m2 and Tag can be assumed for Swiss reservoir plants.
- Methane, non-fossil [air, non-urban air or from high stacks]: 1.4e-5 kg; = 40 / (20000000000/7000); lognormal variance with pedigree 0.1726, pedigree (4,4,5,5,2)
  Estimation. The emissions of methane are lower in alpine regions than in warmer regions. Total emissions of greenhouse gases are assumed to be 0.3 CO2equivalents per kWh. Methane emissions are a function of the flooded area, depth of the reservoir, flooded bimoass, surrounding temperature and climatic zone.
  Gross methane emissions of natural Swiss lakes are assumed to amount to 40 kg/ha*y (Egger 1995). Further assumptions are the total area of Swiss reservoir plants (7000 ha) and the electricity production of those plants as an average of the years 1991-2000 (20'000 GWh/y).
  It can be assumed the the actual methane emissions are lower than the resulting 0.014 g/kWh because of the high altitude of the reservoirs. There, only little biomass is flooded and the low temperatures constrain anaerobic degradation of the biomass.
  Egger K.W. (1995) Methanemissionen der Schweiz und deren
  Klimawirksamkeit. In: Gas - Wasser - Abwasser, 3/95 (1995), S. 224-234.
- Water [air, unspecified]: 0.0292217 m3; name water_to_air_unspecified; lognormal variance with pedigree 0.0427, pedigree (2,2,3,1,1)
  Calculated value based on literature values and expert opinion. See comments in the parametres' comment field.
  property fraction, origin: unspecified 0; name fraction_origin_unspecified_Ww
  property fraction, origin: fresh water 1; name fraction_origin_fresh_water_Ww
  property fraction, origin: salt water 0; name fraction_origin_salt_water_Ww
- Water [water, unspecified]: 0.780778 m3; name water_to_water_unspecified; = water_turbine_use_UNO_input-water_to_air_unspecified; lognormal variance with pedigree 0.130025, pedigree (4,4,5,2,4)
  (same comment as for Water)
  property fraction, origin: unspecified 0; name fraction_origin_unspecified
  property fraction, origin: salt water 0; name fraction_origin_salt_water
  property fraction, origin: fresh water 1; name fraction_origin_fresh_water

## Sampling procedure
literature

## Extrapolations
This dataset has been extrapolated from year 2015 to the year of the calculation (2021). The uncertainty has been adjusted accordingly.

## Review by Carl Vadenbo 2015-05-22
The update of the whole electricity sector for the ecoinvent v3.2 database consist of hundreds of datasets. All these datasets have passed through a streamlined review processes where the underlying modelling of production volumes, technology shares and efficiencies was reviewed in detail prior to the datasets being submitted to the database.
