# treatment of wastewater, unpolluted, capacity 5E9l/year

Dataset: EcoSpold 2, unit process
Geography: RoW
Time period: 1994-01-01 to 2021-12-31
Technology level: current
Classification: ISIC rev.4 ecoinvent: 3700:Sewerage
Classification: EcoSpold01Categories: waste management/wastewater treatment
Tags: Treatment; ConvertedDataset
Scenario: Business-as-Usual
System model: Allocation, cut-off by classification
Generated by: Gabor Doka (obsolete)
Published in: Doka G. 2008
Database: ecoinvent
isCopyrightProtected: true
accessRestrictedTo: 1

## General comment
Wastewater purified in a medium size municipal wastewater treatment plant (capacity class 3), with an average capacity size of 24900 per-captia-equivalents PCE.
Wastewater contains (in kg/m3):
[This dataset was already contained in the ecoinvent database version 2. It was not individually updated during the transfer to ecoinvent version 3. Life Cycle Impact Assessment results may still have changed, as they are affected by changes in the supply chain, i.e. in other datasets. This dataset was generated following the ecoinvent quality guidelines for version 2. It may have been subject to central changes described in the ecoinvent version 3 change report (http://www.ecoinvent.org/database/ecoinvent-version-3/reports-of-changes/), and the results of the central updates were reviewed extensively. The changes added e.g. consistent water flows and other information throughout the database. The documentation of this dataset can be found in the ecoinvent reports of version 2, which are still available via the ecoinvent website. The change report linked above covers all central changes that were made during the conversion process.]

## Included activities end
Infrastructure materials for municipal wastewater treatment plant, transports, dismantling. Land use burdens.

## Geography
Specific to the technology mix encountered in Switzerland in 2000. Well applicable to modern treatment practices in Europe, North America or Japan.

## Technology
Three stage wastewater treatment (mechanical, biological, chemical) including sludge digestion (fermentation) according to the average technology in Switzerland

## Parameters
- fraction, process water, to air: 0.1 dimensionless; name fraction_PW_to_air; lognormal variance with pedigree 0.092025, pedigree (4,4,3,2,4)

## Reference product
- wastewater, unpolluted: -1 m3; By-product classification Waste; CPC 39920: Sewage sludge
  EcoSpold01Location=CH
  production volume 0.992 m3
    This activity is included for information only. Production volume set to 1 in order for the dataset to be available.
  property price 0 EUR2005
    Waste products are assigned a price of zero as they are assumed to require further treatment.
  property carbon content, fossil 0.00178991
    Assumed to be like in tap water. Bicarbonate content is 2.93 mol/m3. CO2 content is 0.1 mol/m3 (ecoinvent v2.2 report 8, Tab 93.1).
  property carbon content 0.00357982
    carbon content on a dry matter basis (reserved; not for manual entry)
  properties: water content 2962.17, water in wet mass 999.663 kg, carbon content, non-fossil 0.00178991, wet mass 1000 kg, dry mass 0.337476 kg, carbon allocation 0.0012081 kg

## Inputs from technosphere
- sewer grid, 5E9l/year, 110 km: 2.1782e-7 km; lognormal variance with pedigree 0.042, pedigree (1,1,5,5,1)
  uncertainty heeded in exchanges of the module
  EcoSpold01Location=CH
- waste graphical paper: -0.0155 kg; lognormal variance with pedigree 0.042, pedigree (1,1,5,5,1)
  direct wastewater treatment plant burden. Uncertainty calculated from wastewater composition and treatment model
  EcoSpold01Location=CH
  production volume 0.0155 kg
    Calculated from the production volume of sewage, unpolluted in proportion to the respective output amounts.
  properties: dry mass 0.888 kg, carbon content, non-fossil 0.454955, heating value, net 14.12 MJ, water content 0.126126, wet mass 1 kg
  note on heating value, net: Value taken from the general comment of the treatment dataset.
- electricity, low voltage: 0 kWh; pedigree (1,1,1,1,1)
  (same comment as for waste graphical paper)
- heat, central or small-scale, other than natural gas: 0 MJ; pedigree (1,1,1,1,1)
  (same comment as for waste graphical paper)
  properties: heating value, net 1 MJ
- waste plastic, mixture: 0 kg; pedigree (1,1,1,1,1)
  EcoSpold01Location=CH
  direct wastewater treatment plant burden. Uncertainty calculated from wastewater composition and treatment model
  production volume 0 kg
    (same comment as for waste graphical paper)
  properties: heating value, net 30.79 MJ, water content 0.180638, carbon content, fossil 0.747344, dry mass 0.847 kg, wet mass 1 kg
  note on carbon content, fossil: C content in 1 kg DM was calculated using data in Tab A.2, ecoinvent v2.2 report 13_I
- wastewater treatment facility, capacity 5E9l/year: 5.6882e-9 unit; lognormal variance with pedigree 0.042, pedigree (1,1,5,5,1)
  EcoSpold01Location=CH
  uncertainty heeded in exchanges of the module
- heat, district or industrial, natural gas: 0 MJ; pedigree (1,1,1,1,1)
  EcoSpold01Location=RER
  direct wastewater treatment plant burden. Uncertainty calculated from wastewater composition and treatment model
  properties: heating value, net 1 MJ
- electricity, low voltage: 0.000292312, 5.32244e-5, 0.00120148, 0.00419769, 0.000856979, 0.0131574, 0.00212863, 0.00611233 kWh (8 entries); lognormal variance with pedigree 0.042, pedigree (1,1,5,5,1)
  (same comment as for waste graphical paper)
- heat, central or small-scale, other than natural gas: 0.000176488, 0.01285 MJ (2 entries); lognormal variance with pedigree 0.042, pedigree (1,1,5,5,1)
  (same comment as for waste graphical paper)
- waste plastic, mixture: -0.00172425, -0.000115208, -8.71297e-6, -4.75849e-5, -1.92238e-5, -4.51863e-5, -0.00146914, -0.0120707 kg (8 entries); lognormal variance with pedigree 0.042, pedigree (1,1,5,5,1)
  (same comment as for waste plastic, mixture)
- heat, district or industrial, natural gas: 0.000199809, 0.0047878, 0.0129644 MJ (3 entries); lognormal variance with pedigree 0.042, pedigree (1,1,5,5,1)
  (same comment as for heat, district or industrial, natural gas)

## Emissions to nature
- Water [water, unspecified]: 0.9 m3; name water_to_water_unspecified; lognormal variance with pedigree 0.0827, pedigree (2,2,5,5,1)
  Calculated value based on water balance.
  property carbon content, fossil 0; name C_content_fossil
  property fraction, origin: salt water 0; name fraction_origin_salt_water_Ww
  property fraction, origin: unspecified 0; name fraction_origin_unspecified_Ww
  property fraction, origin: fresh water 1; name fraction_origin_fresh_water_Ww
  property carbon content, non-fossil 0; name C_content_non_fossil
  property water in wet mass 1000 kg; name WWM
  property wet mass 1000 kg; name WM
  property dry mass 0 kg; name DM
- Water [air, unspecified]: 0.1 m3; name water_to_air_unspecified; lognormal variance with pedigree 0.0827, pedigree (2,2,5,5,1)
  Calculated value based on water balance.
  property fraction, origin: unspecified 1; name fraction_origin_unspecified
  property fraction, origin: salt water 0; name fraction_origin_salt_water
  property fraction, origin: fresh water 0; name fraction_origin_fresh_water

## Extrapolations
wastewater compositions from literature and/or estimates This dataset has been copied from an original dataset covering the geography CH. The uncertainty has been adjusted accordingly.

## Review by Niels Jungbluth 2009-01-22
passed.
