# electricity production, oil

Dataset: EcoSpold 2, unit process
Geography: CN-JL
Time period: 1980-01-01 to 2021-12-31
Technology level: current
Classification: EcoSpold01Categories: oil/power plants
Classification: ISIC rev.4 ecoinvent: 3510:Electric power generation, transmission and distribution
Synonyms: heavy fuel oil; petroleum
Tags: fossil fuels; oil power
Scenario: Business-as-Usual
System model: Allocation, cut-off by classification
Generated by: Karin Treyer
Published in: Jungbluth, N. 2007
Database: ecoinvent
isCopyrightProtected: true
accessRestrictedTo: 1

## General comment
This dataset represents the production of high voltage electricity at a grid-connected oil power plant with a capacity of 500 MW in China - Jilin in 2012.
Emissions are in general calculated/estimated based on the fuel oil type S, European quality. This dataset has been built on the basis of oil electricity production datasets in version 2 of the ecoinvent database which were elaborated by N. Jungbluth 2007 (see main publication in modelling and administrative). The values and emissions are a weighted average of emissions in all datasets in version 2 (which are considered as the global values) multiplied with an efficiency scaling factor. The datasets in version 2 were valid for the following countries: AT, BE, BR, GR, CN, CS, CZ, DE, DK, ES, FI, FR, GB, GR, HR, HU, IE, IT, JP, MK, NL, NO, PT, PL, SE, SI, SK. Weighting was made with electricity production data in those countries based on IEA/OECD 2010. The weighted averages are taken as global values and then scaled with a factor derived from the comparison of the global average efficiency and the efficiency valid for this dataset in order to account for a higher or lower fuel input for the production of 1 kWh, respectively. Nothing else than the efficiency has been adjusted in this dataset; besides that no new data collection has taken place
Comments:
- sulfur content of the oil is not adapted to local/average conditions.
- CO2 emissions are presented for the combustion and for the flue gas treatment
- Extensive comments on emissions can be found in Jungbluth 2007, on which this dataset is based on.
Emissions to the water are from flue gas treatment. Most of these data come from two power plants in Portugal (EDP 2001) and data from Slowakia
EDP (2001) Environmental Report 2000. Electricidade de Portugal, S.A., Lisboa, PT, retrieved from: www.edp.pt.
Slovenské elektrárne (2002) Environment Report 2001, Bratislave, SK, retrieved from: www.seas.sk.
IEA/OECD. 2010. Electricity Information 2010. International Energy Agency (IEA), Paris Cedex (FR). Part IV. Detailed OECD Electricity And Heat Data.
[This dataset is meant to replace the following datasets:]

## Included activities start
From the constructed power plant ready to produce electricity and from the fuel ready to be used.

## Included activities end
This activity ends with 1kWh of high voltage electricity produced at the power plant and arrived at the busbar.

This dataset includes all energy use, use of chemicals, emissions to air and water including treatment of flue gasses and effluents. In an oil power plant, water is needed for cooling, feed water for the steam circuit, for the flue gas treatment, or other cleaning. This dataset only considers water use (evaporation) for cooling and steam circuit.

## Technology
Electricity production in a conventional oil power plant with a capacity of 500 MWe.

## Time period
The Annual Production Volume is valid for the year 2012.

## Parameters
- relation between the global and the country's efficiency of oil power plants: 1.48 dimensionless; name relation_global_country; = efficiency_oil_global/ efficiency_oil_country; undefined min 1, max 1, standardDeviation95 0, pedigree (1,1,1,1,1)
  This factor brings the amounts of the exchanges in the global dataset into relation with the amounts in the country datasets.
  nan
- recirculating cooling system as a fraction of all cooling systems: 0.375 dimensionless; name recirculating_CS_fraction_from_allCS; lognormal variance with pedigree 0.092025, pedigree (4,4,3,2,4)
  Calculated as an average of data available for Europe (Floerke, 2008, Future changes of freshwater needs in the electricity production sector) and USA (NERL, 2011, Estimating freshwater needs to meet future thermoelectric generation requirements).
  nan
- average efficiency of oil power plants, global: 0.37 dimensionless; name efficiency_oil_global; lognormal variance with pedigree 0.003325, pedigree (3,2,1,2,2)
  Literature value/calculated value. Net electrical efficiency based on the lower heating value (LHV).
  For all OECD countries, the IEA Electricity information 2014 provides data for the year 2012 on fuel input (TJ, Net calorific value NCV) and gross electricity production (GWh) as well as heat production (TJ) in tables 8 and 9 for each country for electricity only and Combined Heat and Power (CHP) plants each. Together with the information on own use (see parameter "losses"), the net electrical efficiency based on the NCV is calculated.
  For all non-OECD countries, data from the IEA Energy balances of non-OECD countries 2014 have been used. These tables do not always provide information on how much of the electricity has been produced in electricity only and in CHP plants, but often give the total value only.
  IEA. 2014. Electricity Information 2014. ISBN 978-92-64-21692-1. International Energy Agency (IEA), Paris Cedex (FR).
  IEA/OECD. 2014. Energy balances of non-OECD countries 2014. International Energy Agency (IEA), Paris Cedex (FR).
  nan
- fraction, cooling water, to air: 0.0159178 dimensionless; name fraction_CW_to_air; = (WConsumption_EP_oil_recirculatingCS*recirculating_CS_fraction_from_allCS+WConsumption_EP_oil_onceT_andCP_CS*once_through_andCP_CS_fractio_from_allCS)/(WWithdrawal_EP_oil_recirculating_CS*recirculating_CS_fraction_from_allCS+WWithdrawal_EP_oil_onceT_andCP_CS*once_through_andCP_CS_fractio_from_allCS); lognormal variance with pedigree 0.092025, pedigree (4,4,3,2,4)
  Calculated value
  nan
- average efficiency of oil power plants, country: 0.25 dimensionless; name efficiency_oil_country; lognormal variance with pedigree 0.003825, pedigree (3,3,1,2,2)
  For China, the efficiencies of thermal power plants are calculated based on SONG et al, Getting Every Ton of Emissions Right: An Analysis of Emission Factors for Purchased Electricity in China, World Resources Institute, June, 2013
  http://www.wri.org/publication/getting-every-ton-emissions-right."
  , using the total fuel input (kWh) estimated by lower heating value and the amount of net electricity supplied. Note that although fuel input data is available by type of fuel, electricity output is only available for the total thermal power sector. Thus it is not possible to calculate the efficiency by individual fuel, but the same value is applied in all electricity production datasets in China with hard coal, natural gas and oil.
  nan
- gross electricity production: 1.03448e8 kWh; name gross_electricity; lognormal variance with pedigree 0.0095, pedigree (4,2,2,1,2)
  Literature value/calculated value. Data from the China Electric Power Yearbook 2013 (Chinese National Bureau of Statistics) for 2012, which provides data on gross electricity production in each CN Province with various energy sources. Data were given for
  nan
- fraction, water, completely softened, to air: 0.15 dimensionless; name fraction_WCS_to_air; = fraction_PW_to_air; lognormal variance with pedigree 0.092025, pedigree (4,4,3,2,4)
  Calculated value. See comment in the other parametres present in this dataset. Water, completely softened is considered to be always used as process water, thus process water fractions to air are applied to all water, completely softened input flows to calculate the amount of water consumed in the processes.
  nan
- fraction, water, decarbonised, to air: 0.0159178 dimensionless; name fraction_WDC_to_air; = fraction_CW_to_air; lognormal variance with pedigree 0.092025, pedigree (4,4,3,2,4)
  Calculated value. See comments in the other parametres present in this dataset. Decarbonised water is considered to be always used as cooling water, thus cooling water fractions to air are applied to all carbonised water input flows to calculate the amount of water consumed in the processes.
  nan
- losses from gross electricity production: 0.08 dimensionless; name losses_gross_net; lognormal variance with pedigree 0.003525, pedigree (3,2,2,2,2)
  Calculated value. Own use of electricity plants in this country in 2012. For the non-OECD countries, the losses were first calculated for the total electricity sector based on the IEA electricity information 2014, table 1.1 (net electricity = gross electricity minus own use). However, this value can be very low if the share of electricity from fossiles is low in a specific country. Therefore, the default loss as described by the IEA in the electricity statistic is applied, which is 0.07 (IEA electricity information 2014: The difference between gross and net electricity production is generally observed to be about 7% for conventional thermal stations, 1% for hydro stations and 6% for nuclear.)
  IEA. 2014. Electricity Information 2014. ISBN 978-92-64-21692-1. International Energy Agency (IEA), Paris Cedex (FR).
  nan
  Uncertainty: g
- factor: input of MJ for the production of 1 kWh: 14.4 MJ/kWh; name factor_MJ_kWh; = 1*3.6/efficiency_oil_country; lognormal variance with pedigree 0.0006, pedigree (1,1,1,1,1)
  Calculated value. 3.6 MJ = 1kWh.
  nan
- water withdrawal, electricity production from oil, once-T and coolingP CS: 0.098 m3/kWh; name WWithdrawal_EP_oil_onceT_andCP_CS; lognormal variance with pedigree 0.092025, pedigree (4,4,3,2,4)
  Estimated based on literature (Scown, 2011, Water Footprint of U.S. Transportation Fuels, SI).
  nan
- water consumption, electricity production from oil, recirculating CS: 0.0018 m3/kWh; name WConsumption_EP_oil_recirculatingCS; lognormal variance with pedigree 0.092025, pedigree (4,4,3,2,4)
  (same comment as for water withdrawal, electricity production from oil, once-T and coolingP)
- once-through and cooling pond cooling systems as a fraction of all cooling syste: 0.625 dimensionless; name once_through_andCP_CS_fractio_from_allCS; lognormal variance with pedigree 0.092025, pedigree (4,4,3,2,4)
  (same comment as for recirculating cooling system as a fraction of all cooling systems)
- water withdrawal, electricity production from oil, recirculating CS: 0.0021 m3/kWh; name WWithdrawal_EP_oil_recirculating_CS; lognormal variance with pedigree 0.092025, pedigree (4,4,3,2,4)
  (same comment as for water withdrawal, electricity production from oil, once-T and coolingP)
- water consumption, electricity production from oil, once-T and coolingP CS: 0.0005 m3/kWh; name WConsumption_EP_oil_onceT_andCP_CS; lognormal variance with pedigree 0.092025, pedigree (4,4,3,2,4)
  (same comment as for water withdrawal, electricity production from oil, once-T and coolingP)
- fraction, process water, to air: 0.15 dimensionless; name fraction_PW_to_air; lognormal variance with pedigree 0.092025, pedigree (4,4,3,2,4)
  Literature value. In case when no industry/process specific data are available, default evaporation fraction value is used. This value is 15% and is based on literature (Statistics Canada, 2007 & Shaffer, K.H., 2008, Consumptive water use in the Great Lakes Basin, USGS & Shiklomanov, 2003, World Water Resources at the Beginning of the 21st Century) and has been approved by an expert.
  nan

## Reference product
- electricity, high voltage: 1 kWh; name electricity; By-product classification allocatable product; CPC 17100: Electrical energy
  production volume 9.51724e7 kWh; name apv_electricity; = gross_electricity* (1-losses_gross_net)
    Calculated value.
  property price 0.0977 EUR2005
    Temporary price data. Calculated as 90% of purchasers price based on: 94% of the average price (to account for a 6% loss in transformation and transmission) for electricity for industrial consumersin 2005 (excluded taxes). From IEA.

## Inputs from technosphere
- fly ash and scrubber sludge: -4.05464e-5 kg; name fly_ash; = (2.73962181380553E-05 * relation_global_country)*-1; source Jungbluth, N. 2007, p. Tab. 12.27, p. 238; lognormal variance with pedigree 0.0433, pedigree (2,2,5,5,1)
  Average of literature data
  production volume 3858.9 kg; = apv_electricity * fly_ash
    Calculated from the production volume of electricity produced in proportion to the respective output amounts.
  property price 0 EUR2005; name fly_ash_price_EUR2005
  properties: dry mass 0.1 kg, wet mass 1 kg, water content 9, carbon content, fossil 0.167
  note on carbon content, fossil: Tab A.6, ecoinvent v2.2 report 13_I. C content has been calculated after data in the tables, and then referred to 1 kg DM
- oil power plant, 500MW: 1.89402e-11 unit; = 1.27974335560263E-11 * relation_global_country; source Jungbluth, N. 2007; lognormal variance with pedigree 0.3506, pedigree (2,5,5,5,1)
  Estimation based on case study
- lignite ash: -0.000870131 kg; name lignite_ash; = (0.000587926601413295 * relation_global_country)*-1; source Jungbluth, N. 2007; lognormal variance with pedigree 0.0438, pedigree (2,3,5,5,1)
  Average of literature data
  production volume 82812.5 kg; = apv_electricity * lignite_ash
    (same comment as for fly ash and scrubber sludge)
  property price 0 EUR2005; name lignite_ash_price_EUR2005
  properties: dry mass 1 kg, wet mass 1 kg
- water, completely softened: 0.155612 kg; name water_softened_input; = 0.105143225836924 * relation_global_country; source Jungbluth, N. 2007, p. Tab. 12.10 p. 228; lognormal variance with pedigree 0.0439, pedigree (2,2,5,5,2)
  Literature value/estimation. Estimation based on several literature sources:
  Frischknecht R., Bollens U., Bosshart S., Ciot M., Ciseri L., Doka G., Dones R., Gantner U., Hischier R. and Martin A. (1996) Ökoinventare von Energiesystemen: Grundlagen für den ökologischen Vergleich von Energiesystemen und den Einbezug von Energiesystemen in Ökobilanzen für die Schweiz. 3. Gruppe Energie - Stoffe - Umwelt (ESU), Eidgenössische Technische Hochschule Zürich und Sektion Ganzheitliche Systemanalysen, Paul Scherrer Institut, Villigen, Bundesamt für Energie (Hrsg.), Bern, CH, retrieved from: www.energieforschung.ch.
  Powergen (2001) Environment Report 2000. Powergen UK, Coventry, UK, retrieved from: www.pgen.com
  ESB (1997) Environmental Review 1997. Electricity Supply Board, Dublin, IE, retrieved from: www.esb.ie
  EDP (2001) Environmental Report 2000. Electricidade de Portugal, S.A., Lisboa, PT, retrieved from: www.edp.pt
  IPPC (2001b) Integrated Pollution Prevention and Control (IPPC): Draft Reference Document on Best Available Techniques for Large Combustion Plants. European Commission Directorate-General JRC, Joint Research Centre, Seville, Spain, retrieved from: http://eippcb.jrc.es.
  properties: wet mass 1 kg
- residue from cooling tower: -0.000208424 kg; name cooling_tower; = (0.000140826964829544 * relation_global_country)*-1; source Jungbluth, N. 2007, p. Tab. 12.27, p. 238; lognormal variance with pedigree 0.0438, pedigree (2,3,5,5,1)
  Average of literature data
  production volume 19836.2 kg; = apv_electricity * cooling_tower
    (same comment as for fly ash and scrubber sludge)
  property price 0 EUR2005; name cooling_tower_price_EUR2005
  properties: carbon content, fossil 0.0544233, wet mass 1 kg, dry mass 0.7 kg, water content 0.428571
- waste mineral oil: -0.000839802 kg; name waste_oil; = (0.000567434011587811 * relation_global_country)*-1; source Jungbluth, N. 2007; lognormal variance with pedigree 0.0438, pedigree (2,3,5,5,1)
  Average of literature data
  production volume 79926 kg; = apv_electricity *waste_oil
    (same comment as for fly ash and scrubber sludge)
  property price 0 EUR2005; name waste_oil_price_EUR2005
  properties: dry mass 0.9 kg, heating value, net 34.7 MJ, carbon content, fossil 0.864444, wet mass 1 kg, water content 0.111111
  note on heating value, net: Value taken from the general comment of the treatment dataset.
- ammonia, anhydrous, liquid: 0.000968634 kg; = 0.000654482227803382 * relation_global_country; source Jungbluth, N. 2007, p. Tab. 12.11 p. 228; lognormal variance with pedigree 0.0546, pedigree (2,4,5,5,1)
  Literature value for flue gas treatment.
  IPPC (2001b) Integrated Pollution Prevention and Control (IPPC): Draft Reference Document on Best Available Techniques for Large Combustion Plants. European Commission Directorate- eneral JRC, Joint Research Centre, Seville, Spain, retrieved from: http://eippcb.jrc.es.
  properties: dry mass 1 kg, wet mass 1 kg
- municipal solid waste: -0.000230725 kg; name municipal_waste; = (0.000155895267385992 * relation_global_country)*-1; source Jungbluth, N. 2007; lognormal variance with pedigree 0.0058, pedigree (2,3,3,5,1)
  Average of literature data
  production volume 21958.7 kg; = apv_electricity * municipal_waste
    (same comment as for fly ash and scrubber sludge)
  property price 0 EUR2005; name municipal_waste_price_EUR2005
  properties: dry mass 0.771 kg, carbon content, fossil 0.171549, heating value, net 11.74 MJ, carbon content, non-fossil 0.261655, water content 0.297017, wet mass 1 kg
  note on carbon content, fossil: MSW composition in tab 4.1, ecoinvent v2.2 report 13_I. C content referred to 1 kg DM
- water, decarbonised: 0.775134 kg; name water_decarbonised_input; = 0.52373934843876 * relation_global_country; source Jungbluth, N. 2007, p. Tab. 12.10 p. 228; lognormal variance with pedigree 0.0439, pedigree (2,2,5,5,2)
  (same comment as for water, completely softened)
  properties: wet mass 1 kg
- heavy fuel oil: 0.373778 kg; = 0.252552604756268 * relation_global_country; source Jungbluth, N. 2007; lognormal variance with pedigree 0.0433, pedigree (2,2,5,5,1)
  Literature data for heating value
  properties: heating value, net 41.2 MJ, carbon content, fossil 0.849, dry mass 1 kg, wet mass 1 kg
- limestone, crushed, washed: 0.0210903 kg; = 0.0142502047575074 * relation_global_country; source Jungbluth, N. 2007, p. Tab. 12.11 p. 228; lognormal variance with pedigree 0.0546, pedigree (2,4,5,5,1)
  (same comment as for ammonia, anhydrous, liquid)
  properties: dry mass 0.998 kg, carbon content, fossil 0.117257, water content 0.00200401, wet mass 1 kg
  note on carbon content, fossil: Table 3.1, ecoinvent v2.2 report 7, part VII, pg 3. MW CaCO3=100, MW MgCO3=84. C content of limestone is 0.117257 kg/kg DM
- bilge oil: -3.27681e-5 kg; name bilge_oil; = (2.21405798675039E-05 * relation_global_country)*-1; source Jungbluth, N. 2007; lognormal variance with pedigree 0.0438, pedigree (2,3,5,5,1)
  Average of literature data
  production volume 3118.62 kg; = apv_electricity * bilge_oil
    (same comment as for fly ash and scrubber sludge)
  property price 0 EUR2005; name bilge_oil_price_EUR2005
  properties: carbon content, fossil 0.84, dry mass 0.1 kg, heating value, net 1.92 MJ, water content 9, wet mass 1 kg

## Inputs from nature
- Water, cooling, unspecified natural origin [natural resource, in water]: 0.0917469 m3; name water_cooling_UNO_input; = ((recirculating_CS_fraction_from_allCS*WWithdrawal_EP_oil_recirculating_CS)+(once_through_andCP_CS_fractio_from_allCS*WWithdrawal_EP_oil_onceT_andCP_CS))/9.737*(1/efficiency_oil_country*3.6); source Jungbluth, N. 2007, p. Tab. 12.10 p. 228; lognormal variance with pedigree 0.3432, pedigree (2,3,5,5,1)
  (same comment as for water, completely softened)

## Emissions to nature
- Methanol [air, urban air close to ground]: 7.91962e-6 kg; = 5.35109739033632E-06 * relation_global_country; source Jungbluth, N. 2007; lognormal variance with pedigree 0.1233, pedigree (2,2,5,5,2)
  Calculation based on VOC emission. Deviation calculated from ranges
- AOX, Adsorbable Organic Halogen as Cl [water, surface water]: 9.63331e-8 kg; = 6.50899387734297E-08 * relation_global_country; source Jungbluth, N. 2007, p. Tab. 12.26, p. 238; lognormal variance with pedigree 0.0439, pedigree (2,2,5,5,2)
  Literature data/estimations. See Tab. 12.26 for details: concentration of pollutants in the wastewater of oil power plants and of flue gas treatment as well as in the condensate and feed water preparation. Mean of values for Europe, range of concentrations.
  Slovenské elektrárne (2002) Environment Report 2001, Bratislave, SK, retrieved from: www.seas.sk.
  EDP (2001) Environmental Report 2000. Electricidade de Portugal, S.A., Lisboa, PT, retrieved from: www.edp.pt.
  IPPC (2001b) Integrated Pollution Prevention and Control (IPPC): Draft Reference Document on Best Available Techniques for Large Combustion Plants. European Commission Directorate- General JRC, Joint Research Centre, Seville, Spain, retrieved from: http://eippcb.jrc.es.
- Sulfite [water, surface water]: 2.73018e-5 kg; = 1.84471359144431E-05 * relation_global_country; source Jungbluth, N. 2007, p. Tab. 12.26, p. 238; lognormal variance with pedigree 0.0633, pedigree (2,2,5,5,2)
  (same comment as for AOX, Adsorbable Organic Halogen as Cl)
- Acetic acid [air, urban air close to ground]: 1.5839e-5 kg; = 1.07020073585515E-05 * relation_global_country; source Jungbluth, N. 2007; lognormal variance with pedigree 0.132, pedigree (1,1,5,5,1)
  Calculation based on VOC emission. Deviation calculated from ranges
- Water [water, unspecified]: 0.0911816 m3; name water_to_water_unspecified; = (water_softened_input/1000)*(1-fraction_WCS_to_air)+(water_decarbonised_input/1000)*(1-fraction_WDC_to_air)+water_cooling_UNO_input*(1-fraction_CW_to_air); lognormal variance with pedigree 0.130025, pedigree (4,4,5,2,4)
  Calculated value based on literature values and expert opinion. See comments in the parametres" comment field.
  property fraction, origin: unspecified 0.989318; name fraction_origin_unspecified_Ww
  property fraction, origin: fresh water 0.0106825; name fraction_origin_fresh_water_Ww
  property fraction, origin: salt water 0; name fraction_origin_salt_water_Ww
- Particulates, > 10 um [air, urban air close to ground]: 9.73356e-5 kg; = 6.57672660175277E-05 * relation_global_country; source Jungbluth, N. 2007, p. Tab. 12.17 / Tab. 12.18; lognormal variance with pedigree 0.0907, pedigree (2,2,5,5,3)
  Literature value/estimation. Compilation from different sources - see Tab. 12.17 fo details. Particle emissions mainly depend on the composition of the fuel, the type of combustion and the combustion conditions.
  Particle size fractions are adopted from Berdowski et al .2002 (see Tab. 12.18).
  Berdowski J., Visschedijk A., Creemers E. and Pulles T. (2002) The Coordinated European Programme on Particulate Matter Emission Inventories, Projections and Guidance (CEPMEIP) Database. TNO-MEP, Apeldoorn, NL, retrieved from: www.air.sk/tno/cepmeip/
- Hydrogen fluoride [air, urban air close to ground]: 4.61283e-7 kg; = 3.11677927046195E-07 * relation_global_country; source Jungbluth, N. 2007, p. Tab. 12.25; lognormal variance with pedigree 0.0912, pedigree (2,3,5,5,3)
  Literature data/calculation. See Tab. 12.25 for details.
- Hydrocarbons, aromatic [air, urban air close to ground]: 1.5839e-7 kg; = 1.07020073585515E-07 * relation_global_country; source Jungbluth, N. 2007; lognormal variance with pedigree 0.1233, pedigree (2,2,5,5,2)
  Calculation based on VOC emission. Deviation calculated from ranges
- Hypochlorite [water, ocean]: 5.29705e-6 kg; = 3.57908785086596E-06 * relation_global_country; source Jungbluth, N. 2007; lognormal variance with pedigree 0.094, pedigree (3,4,5,5,3)
  Literature
- Manganese [air, urban air close to ground]: 1.78547e-7 kg; = 1.20639782314836E-07 * relation_global_country; source Jungbluth, N. 2007, p. Tab. 12.23, Tab. 12.24; lognormal variance with pedigree 1.2433, pedigree (2,2,5,5,2)
  Literature data, calculation, estimation. See tab 12.23 with element concentrations in dust (Pacyna 1982, Pacyna 1991); and tab. 12.24 with emission factors of heavy metals in fuel oil S (Richardson 1999, Powergen 2001).
  J.M. Pacyna, "Estimation of Emission Factors of Trace Metals from Oil-Fired Power Plants", Norvegian Institute for Air Research (NILU), Lillestrøm 1982
  J. Pacyna, "Trace Element Emissions from Coal-, and Oil- power Plants in Europe. Methodology of Calculations", Norvegian Institute for Air Research (NILU), Lillestrøm 1982
  J.M. Pacyna, "Emission Factors of Atmospheric Cd, Pb and Zn for Major Source Categories in Europe in 1950 through 1985", Norvegian Institute for Air Research (NILU), Lillestrøm 1991
  Richardson S. (1999) Atmospheric Emission Inventory Guidebook. Second Edition. EMEP: Co-operative Programme for Monitoring and Evaluation of the Long Range Transmission of Air Pollutants in Europe, CORINAIR: The Core Inventory of Air Emissions in Europe, EEA: European Environment Agency, Copenhagen, DK.
  Powergen (2001) Environment Report 2000. Powergen UK, Coventry, UK, retrieved from: www.pgen.com.
- TOC, Total Organic Carbon [water, surface water]: 1.55491e-5 kg; = 1.05061549900062E-05 * relation_global_country; source Jungbluth, N. 2007, p. Tab. 12.26, p. 238; lognormal variance with pedigree 0.0439, pedigree (2,2,5,5,2)
  (same comment as for AOX, Adsorbable Organic Halogen as Cl)
- Hydrocarbons, aliphatic, unsaturated [air, urban air close to ground]: 7.91962e-7 kg; = 5.35109739033632E-07 * relation_global_country; source Jungbluth, N. 2007; lognormal variance with pedigree 0.1233, pedigree (2,2,5,5,2)
  Calculation based on VOC emission. Deviation calculated from ranges
- Cadmium, ion [water, surface water]: 4.39968e-9 kg; = 2.97275399353465E-09 * relation_global_country; source Jungbluth, N. 2007, p. Tab. 12.26, p. 238; lognormal variance with pedigree 0.4533, pedigree (2,2,5,5,2)
  (same comment as for AOX, Adsorbable Organic Halogen as Cl)
- Iron [air, urban air close to ground]: 1.07275e-6 kg; = 7.24832388479523E-07 * relation_global_country; source Jungbluth, N. 2007; lognormal variance with pedigree 0.7126, pedigree (3,3,5,5,3)
  Literature
- Water [air, unspecified]: 0.00149609 m3; name water_to_air_unspecified; = (water_softened_input/1000)*fraction_WCS_to_air+(water_decarbonised_input/1000)*fraction_WDC_to_air+water_cooling_UNO_input*fraction_CW_to_air; lognormal variance with pedigree 0.130025, pedigree (4,4,5,2,4)
  (same comment as for Water)
  property fraction, origin: unspecified 0.974079; name fraction_origin_unspecified
  property fraction, origin: fresh water 0.0259209; name fraction_origin_fresh_water
  property fraction, origin: salt water 0; name fraction_origin_salt_water
- Oils, unspecified [water, surface water]: 8.57738e-7 kg; = 5.79552688181026E-07 * relation_global_country; source Jungbluth, N. 2007, p. Tab. 12.26, p. 238; lognormal variance with pedigree 0.0633, pedigree (2,2,5,5,2)
  (same comment as for AOX, Adsorbable Organic Halogen as Cl)
- Nickel, ion [water, surface water]: 2.68686e-7 kg; = 1.81544893999945E-07 * relation_global_country; source Jungbluth, N. 2007, p. Tab. 12.26, p. 238; lognormal variance with pedigree 0.3733, pedigree (2,2,5,5,2)
  (same comment as for AOX, Adsorbable Organic Halogen as Cl)
- Acetone [air, urban air close to ground]: 3.87904e-6 kg; = 2.62096973868199E-06 * relation_global_country; source Jungbluth, N. 2007; lognormal variance with pedigree 0.132, pedigree (1,1,5,5,1)
  Calculation based on VOC emission. Deviation calculated from ranges
- Zinc [air, urban air close to ground]: 3.89557e-7 kg; = 2.63213980145308E-07 * relation_global_country; source Jungbluth, N. 2007; lognormal variance with pedigree 1.2433, pedigree (2,2,5,5,2)
  Calculation based on particle emission. Deviation calculated from ranges
- Manganese [water, surface water]: 5.42417e-8 kg; = 3.66498257602651E-08 * relation_global_country; source Jungbluth, N. 2007, p. Tab. 12.26, p. 238; lognormal variance with pedigree 0.0439, pedigree (2,2,5,5,2)
  (same comment as for AOX, Adsorbable Organic Halogen as Cl)
- Sodium [air, urban air close to ground]: 4.59751e-6 kg; = 3.1064245220551E-06 * relation_global_country; source Jungbluth, N. 2007, p. Tab. 12.25; lognormal variance with pedigree 0.1026, pedigree (3,3,5,5,3)
  Literature data/calculation. See Tab. 12.25 for details.
- Sulfur dioxide [air, urban air close to ground]: 0.00661998 kg; = 0.00447296246485209 * relation_global_country; source Jungbluth, N. 2007, p. Tab. 12.14 p. 230; lognormal variance with pedigree 0.0439, pedigree (2,2,5,5,2)
  Literature value/estimation. Compilation from different sources - see Tab. 12.14 for details. Emissions of SO2 are related to the sulfur content of the fuel, the ash, and the desulfurisation methods.
- Lead [air, urban air close to ground]: 5.33787e-7 kg; = 3.60667186373267E-07 * relation_global_country; source Jungbluth, N. 2007; lognormal variance with pedigree 1.2433, pedigree (2,2,5,5,2)
  Calculation based on particle emission. Deviation calculated from ranges
- Iron, ion [water, surface water]: 1.90137e-6 kg; = 1.28470679989333E-06 * relation_global_country; source Jungbluth, N. 2007, p. Tab. 12.26, p. 238; lognormal variance with pedigree 0.2733, pedigree (2,2,5,5,2)
  (same comment as for AOX, Adsorbable Organic Halogen as Cl)
- Carbon dioxide, fossil [air, urban air close to ground]: 1.19872 kg; = 0.809944632370249 * relation_global_country; source Jungbluth, N. 2007, p. Tab. 12.12, p. 229; lognormal variance with pedigree 0.0433, pedigree (2,2,5,5,1)
  Literature value/estimation. CO2 emissions from heavy fuel combustion. Compilation from different sources - see Tab. 12.12 for details.
- DOC, Dissolved Organic Carbon [water, surface water]: 1.50117e-6 kg; = 1.01430469569203E-06 * relation_global_country; source Jungbluth, N. 2007; lognormal variance with pedigree 0.0439, pedigree (2,2,5,5,2)
  Calculated as equal to TOC.
- COD, Chemical Oxygen Demand [water, surface water]: 2.90827e-5 kg; = 1.96505045960835E-05 * relation_global_country; source Jungbluth, N. 2007, p. Tab. 12.26, p. 238; lognormal variance with pedigree 0.5133, pedigree (2,2,5,5,2)
  (same comment as for AOX, Adsorbable Organic Halogen as Cl)
- Vanadium, ion [water, surface water]: 5.50794e-7 kg; = 3.72158241611466E-07 * relation_global_country; source Jungbluth, N. 2007, p. Tab. 12.26, p. 238; lognormal variance with pedigree 0.7033, pedigree (2,2,5,5,2)
  (same comment as for AOX, Adsorbable Organic Halogen as Cl)
- Chromium, ion [water, surface water]: 4.61248e-8 kg; = 3.11653979581671E-08 * relation_global_country; source Jungbluth, N. 2007, p. Tab. 12.26, p. 238; lognormal variance with pedigree 0.6633, pedigree (2,2,5,5,2)
  (same comment as for AOX, Adsorbable Organic Halogen as Cl)
- Particulates, < 2.5 um [air, urban air close to ground]: 0.000135163 kg; = 9.13261684426324E-05 * relation_global_country; source Jungbluth, N. 2007, p. Tab. 12.17 / Tab. 12.18; lognormal variance with pedigree 0.3507, pedigree (2,2,5,5,3)
  (same comment as for Particulates, > 10 um)
- BOD5, Biological Oxygen Demand [water, surface water]: 2.65899e-5 kg; = 1.79661764796503E-05 * relation_global_country; source Jungbluth, N. 2007, p. Tab. 12.26, p. 238; lognormal variance with pedigree 0.3233, pedigree (2,2,5,5,2)
  (same comment as for AOX, Adsorbable Organic Halogen as Cl)
- Selenium [air, urban air close to ground]: 8.11577e-8 kg; = 5.48363096904992E-08 * relation_global_country; source Jungbluth, N. 2007; lognormal variance with pedigree 1.2433, pedigree (2,2,5,5,2)
  Calculation based on particle emission. Deviation calculated from ranges
- Particulates, > 2.5 um, and < 10um [air, urban air close to ground]: 9.21322e-5 kg; = 6.22514591785016E-05 * relation_global_country; source Jungbluth, N. 2007, p. Tab. 12.17 / Tab. 12.18; lognormal variance with pedigree 0.1707, pedigree (2,2,5,5,3)
  (same comment as for Particulates, > 10 um)
- Arsenic, ion [water, surface water]: 1.80801e-9 kg; = 1.22162689595615E-09 * relation_global_country; source Jungbluth, N. 2007, p. Tab. 12.26, p. 238; lognormal variance with pedigree 0.0439, pedigree (2,2,5,5,2)
  (same comment as for AOX, Adsorbable Organic Halogen as Cl)
- Lead [water, surface water]: 7.55173e-8 kg; = 5.10252130314862E-08 * relation_global_country; source Jungbluth, N. 2007, p. Tab. 12.26, p. 238; lognormal variance with pedigree 0.5333, pedigree (2,2,5,5,2)
  (same comment as for AOX, Adsorbable Organic Halogen as Cl)
- Dinitrogen monoxide [air, urban air close to ground]: 6.17807e-5 kg; = 4.17437183887658E-05 * relation_global_country; source Jungbluth, N. 2007, p. Tab. 12.16 p. 232; lognormal variance with pedigree 0.3833, pedigree (2,2,5,5,2)
  Literature value/estimation. Compilation from different sources - see Tab. 12.16 for details.
- Carbon dioxide, fossil [air, unspecified]: 0.00946949 kg; = 0.00639830258807689 * relation_global_country; source Jungbluth, N. 2007, p. Tab. 12.29, Tab. 12.30; lognormal variance with pedigree 0.0606, pedigree (2,5,5,5,1)
  Literature value. CO2 emissions from flue gas treatment with limestone use.
- Methane, fossil [air, urban air close to ground]: 7.91962e-5 kg; = 5.35109739033632E-05 * relation_global_country; source Jungbluth, N. 2007, p. Tab. 12.19, Tab. 12.20; lognormal variance with pedigree 0.1233, pedigree (2,2,5,5,2)
  Literature/calculation/estimation. Calculation based on VOC emissions in Tab. 12.19 (compilation of different sources) and Veldt 1991.
  C. Veldt, "Default Emission Factors (VOC Profiles), Draft Report, Corinair Inventory Part 7, Commission of the European Community, September 1991
- Thallium [water, surface water]: 5.60506e-8 kg; = 3.78720561033709E-08 * relation_global_country; source Jungbluth, N. 2007, p. Tab. 12.26, p. 238; lognormal variance with pedigree 0.0439, pedigree (2,2,5,5,2)
  (same comment as for AOX, Adsorbable Organic Halogen as Cl)
- Ethanol [air, urban air close to ground]: 7.91962e-6 kg; = 5.35109739033632E-06 * relation_global_country; source Jungbluth, N. 2007; lognormal variance with pedigree 0.1233, pedigree (2,2,5,5,2)
  Calculation based on VOC emission. Deviation calculated from ranges
- PAH, polycyclic aromatic hydrocarbons [air, urban air close to ground]: 2.71759e-8 kg; = 1.83620897840367E-08 * relation_global_country; source Jungbluth, N. 2007, p. Tab. 12.21, p. 235; lognormal variance with pedigree 0.3626, pedigree (2,4,5,5,3)
  Literature value/estimation. Compilation of different emissions from Masclet et al. 1987- see Tab. 12.21 for details.
  P. Masclet, M.A. Bresson, G. Mouvier, "Polycyclic Aromatic Hydrocarbons Emitted by Power Stations, and the Influence of Combustion Conditions", in Fuel Vol. 66, Nr. 4, S. 556-562
- Calcium [air, urban air close to ground]: 4.59751e-7 kg; = 3.1064245220551E-07 * relation_global_country; source Jungbluth, N. 2007, p. Tab. 12.25; lognormal variance with pedigree 0.0926, pedigree (3,3,5,5,3)
  Literature data/calculation. See Tab. 12.25 for details.
- Arsenic [air, urban air close to ground]: 1.07128e-7 kg; = 7.23838706169984E-08 * relation_global_country; source Jungbluth, N. 2007, p. Tab. 12.23, Tab. 12.24; lognormal variance with pedigree 1.1933, pedigree (2,2,5,5,2)
  (same comment as for Manganese)
- Benzo(a)pyrene [air, urban air close to ground]: 2.29875e-10 kg; = 1.55321226102755E-10 * relation_global_country; source Jungbluth, N. 2007; lognormal variance with pedigree 0.3726, pedigree (3,3,5,5,3)
  Literature
- Mercury [air, urban air close to ground]: 2.29875e-9 kg; = 1.55321226102755E-09 * relation_global_country; source Jungbluth, N. 2007; lognormal variance with pedigree 1.6633, pedigree (2,2,5,5,2)
  Calculation from ranges
- Molybdenum [air, urban air close to ground]: 1.2336e-7 kg; = 8.33512865956363E-08 * relation_global_country; source Jungbluth, N. 2007; lognormal variance with pedigree 1.2433, pedigree (2,2,5,5,2)
  Calculation based on particle emission. Deviation calculated from ranges
- Nitrogen oxides [air, urban air close to ground]: 0.00401148 kg; = 0.00271045614138409 * relation_global_country; source Jungbluth, N. 2007, p. Tab. 12.15 p. 231; lognormal variance with pedigree 0.0827, pedigree (2,2,5,5,1)
  Literature value/estimation. Compilation from different sources - see Tab. 12.15 for details.
- Dioxins, measured as 2,3,7,8-tetrachlorodibenzo-p-dioxin [air, urban air close to ground]: 1.56534e-13 kg; = 1.05766153371863E-13 * relation_global_country; source Jungbluth, N. 2007, p. Tab. 12.22 p. 235; lognormal variance with pedigree 0.3452, pedigree (2,4,5,5,2)
  Measurement made in Great Britain (Powergen 2001) and estimation (see Tab. 12.22)
  Powergen (2001) Environment Report 2000. Powergen UK, Coventry, UK, retrieved from: www.pgen.com.
- Hydrogen chloride [air, urban air close to ground]: 6.91159e-7 kg; = 4.6699915314895E-07 * relation_global_country; source Jungbluth, N. 2007, p. Tab. 12.25; lognormal variance with pedigree 0.0912, pedigree (2,3,5,5,3)
  Literature data/calculation. See Tab. 12.25 for details.
- Suspended solids, unspecified [water, surface water]: 3.33552e-5 kg; = 2.25373034350681E-05 * relation_global_country; source Jungbluth, N. 2007, p. Tab. 12.26, p. 238; lognormal variance with pedigree 0.0833, pedigree (2,2,5,5,2)
  (same comment as for AOX, Adsorbable Organic Halogen as Cl)
- Tin, ion [water, surface water]: 1.80801e-9 kg; = 1.22162689595615E-09 * relation_global_country; source Jungbluth, N. 2007, p. Tab. 12.26, p. 238; lognormal variance with pedigree 0.0439, pedigree (2,2,5,5,2)
  (same comment as for AOX, Adsorbable Organic Halogen as Cl)
- Nitrogen [water, surface water]: 0.000123612 kg; = 8.3521456053517E-05 * relation_global_country; source Jungbluth, N. 2007, p. Tab. 12.26, p. 238; lognormal variance with pedigree 0.0633, pedigree (2,2,5,5,2)
  (same comment as for AOX, Adsorbable Organic Halogen as Cl)
- Mercury [water, surface water]: 1.89853e-9 kg; = 1.28278935719047E-09 * relation_global_country; source Jungbluth, N. 2007, p. Tab. 12.26, p. 238; lognormal variance with pedigree 0.5933, pedigree (2,2,5,5,2)
  (same comment as for AOX, Adsorbable Organic Halogen as Cl)
- Benzene [air, urban air close to ground]: 7.91962e-7 kg; = 5.35109739033632E-07 * relation_global_country; source Jungbluth, N. 2007; lognormal variance with pedigree 0.1233, pedigree (2,2,5,5,2)
  Calculation based on VOC emission. Deviation calculated from ranges
- Cobalt [water, surface water]: 3.61617e-9 kg; = 2.44335526523885E-09 * relation_global_country; source Jungbluth, N. 2007, p. Tab. 12.26, p. 238; lognormal variance with pedigree 0.0439, pedigree (2,2,5,5,2)
  (same comment as for AOX, Adsorbable Organic Halogen as Cl)
- Cadmium [air, urban air close to ground]: 5.12915e-8 kg; = 3.46564315860632E-08 * relation_global_country; source Jungbluth, N. 2007, p. Tab. 12.23, Tab. 12.24; lognormal variance with pedigree 1.2433, pedigree (2,2,5,5,2)
  (same comment as for Manganese)
- Hydrocarbons, unspecified [water, surface water]: 5.61625e-7 kg; = 3.79476313314415E-07 * relation_global_country; source Jungbluth, N. 2007, p. Tab. 12.26, p. 238; lognormal variance with pedigree 0.0733, pedigree (2,2,5,5,2)
  (same comment as for AOX, Adsorbable Organic Halogen as Cl)
- Beryllium [air, urban air close to ground]: 8.54707e-10 kg; = 5.77505028146857E-10 * relation_global_country; source Jungbluth, N. 2007; lognormal variance with pedigree 0.6946, pedigree (3,3,5,5,1)
  Literature
- Phosphorus [water, surface water]: 2.80253e-7 kg; = 1.8936030125843E-07 * relation_global_country; source Jungbluth, N. 2007, p. Tab. 12.26, p. 238; lognormal variance with pedigree 0.0439, pedigree (2,2,5,5,2)
  (same comment as for AOX, Adsorbable Organic Halogen as Cl)
- Propane [air, urban air close to ground]: 7.91962e-7 kg; = 5.35109739033632E-07 * relation_global_country; source Jungbluth, N. 2007, p. Tab. 12.19, Tab. 12.20; lognormal variance with pedigree 0.1233, pedigree (2,2,5,5,2)
  (same comment as for Methane, fossil)
- Ammonia [air, urban air close to ground]: 1.66618e-6 kg; = 1.12579399262229E-06 * relation_global_country; source Jungbluth, N. 2007, p. p.232; lognormal variance with pedigree 1.0433, pedigree (2,2,5,5,2)
  Literature value/estimation. Compilation from different sources
- Chloride [water, surface water]: 0.000369927 kg; = 0.000249950716155834 * relation_global_country; source Jungbluth, N. 2007, p. Tab. 12.26, p. 238; lognormal variance with pedigree 0.9233, pedigree (2,2,5,5,2)
  (same comment as for AOX, Adsorbable Organic Halogen as Cl)
- Chromium [air, urban air close to ground]: 1.85114e-7 kg; = 1.25077099991164E-07 * relation_global_country; source Jungbluth, N. 2007, p. Tab. 12.23, Tab. 12.24; lognormal variance with pedigree 1.4553, pedigree (2,2,3,5,2)
  (same comment as for Manganese)
- Sulfide [water, surface water]: 8.13634e-7 kg; = 5.49752460070304E-07 * relation_global_country; source Jungbluth, N. 2007, p. Tab. 12.26, p. 238; lognormal variance with pedigree 0.3033, pedigree (2,2,5,5,2)
  (same comment as for AOX, Adsorbable Organic Halogen as Cl)
- Vanadium [air, urban air close to ground]: 1.58574e-5 kg; = 1.07144316567474E-05 * relation_global_country; source Jungbluth, N. 2007; lognormal variance with pedigree 1.4233, pedigree (2,2,5,5,2)
  Calculation based on particle emission. Deviation calculated from ranges
- Hydrocarbons, aliphatic, alkanes, unspecified [air, urban air close to ground]: 1.5839e-5 kg; = 1.07020073585515E-05 * relation_global_country; source Jungbluth, N. 2007; lognormal variance with pedigree 0.1233, pedigree (2,2,5,5,2)
  Calculation based on VOC emission. Deviation calculated from ranges
- Hypochlorite [water, surface water]: 5.43047e-6 kg; = 3.66923603392927E-06 * relation_global_country; source Jungbluth, N. 2007; lognormal variance with pedigree 0.104, pedigree (3,4,5,5,3)
  Literature
- Cobalt [air, urban air close to ground]: 5.68103e-7 kg; = 3.83853480105306E-07 * relation_global_country; source Jungbluth, N. 2007, p. Tab. 12.23, Tab. 12.24; lognormal variance with pedigree 1.2433, pedigree (2,2,5,5,2)
  (same comment as for Manganese)
- Sulfate [water, surface water]: 0.00302399 kg; = 0.0020432380627013 * relation_global_country; source Jungbluth, N. 2007, p. Tab. 12.26, p. 238; lognormal variance with pedigree 0.0533, pedigree (2,2,5,5,2)
  (same comment as for AOX, Adsorbable Organic Halogen as Cl)
- Zinc, ion [water, surface water]: 9.56043e-8 kg; = 6.4597469671174E-08 * relation_global_country; source Jungbluth, N. 2007, p. Tab. 12.26, p. 238; lognormal variance with pedigree 0.2933, pedigree (2,2,5,5,2)
  (same comment as for AOX, Adsorbable Organic Halogen as Cl)
- Carbon monoxide, fossil [air, urban air close to ground]: 0.000189917 kg; = 0.000128322586737377 * relation_global_country; source Jungbluth, N. 2007, p. Tab. 12.13, p. 229; lognormal variance with pedigree 0.1933, pedigree (2,2,5,5,2)
  Literature value/estimation. Compilation from different sources - see Tab. 12.13 for details.
- Fluoride [water, surface water]: 3.07379e-6 kg; = 2.07688744963416E-06 * relation_global_country; source Jungbluth, N. 2007, p. Tab. 12.26, p. 238; lognormal variance with pedigree 0.7933, pedigree (2,2,5,5,2)
  (same comment as for AOX, Adsorbable Organic Halogen as Cl)
- Formaldehyde [air, urban air close to ground]: 1.18795e-5 kg; = 8.02669478279528E-06 * relation_global_country; source Jungbluth, N. 2007, p. Tab. 12.19, Tab. 12.20; lognormal variance with pedigree 0.1233, pedigree (2,2,5,5,2)
  (same comment as for Methane, fossil)
- Copper [air, urban air close to ground]: 7.33187e-7 kg; = 4.95396522447329E-07 * relation_global_country; source Jungbluth, N. 2007, p. Tab. 12.23, Tab. 12.24; lognormal variance with pedigree 1.3433, pedigree (2,2,5,5,2)
  (same comment as for Manganese)
- Chromium VI [air, urban air close to ground]: 4.7693e-9 kg; = 3.22250125169589E-09 * relation_global_country; source Jungbluth, N. 2007, p. Tab. 12.23, Tab. 12.24; lognormal variance with pedigree 2.2846, pedigree (3,3,5,5,1)
  (same comment as for Manganese)
- Nickel [air, urban air close to ground]: 4.38176e-6 kg; = 2.96065189134384E-06 * relation_global_country; source Jungbluth, N. 2007; lognormal variance with pedigree 1.2433, pedigree (2,2,5,5,2)
  Calculation based on particle emission. Deviation calculated from ranges
- Copper, ion [water, surface water]: 3.82313e-8 kg; = 2.58319599150767E-08 * relation_global_country; source Jungbluth, N. 2007, p. Tab. 12.26, p. 238; lognormal variance with pedigree 0.7533, pedigree (2,2,5,5,2)
  (same comment as for AOX, Adsorbable Organic Halogen as Cl)
- Acetaldehyde [air, urban air close to ground]: 3.87904e-6 kg; = 2.62096973868199E-06 * relation_global_country; source Jungbluth, N. 2007; lognormal variance with pedigree 0.132, pedigree (1,1,5,5,1)
  Calculation based on VOC emission. Deviation calculated from ranges

## Sampling procedure
Literature, environmental reports and questionnaires

## Extrapolations
This dataset has been extrapolated from year 2015 to the year of the calculation (2021). The uncertainty has been adjusted accordingly.

## Review by Carl Vadenbo 2015-07-14
The update of the whole electricity sector for the ecoinvent v3.2 database consist of hundreds of datasets. All these datasets have passed through a streamlined review processes where the underlying modelling of production volumes, technology shares and efficiencies was reviewed in detail prior to the datasets being submitted to the database.
