# solder production, paste, Sn63Pb37, for electronics industry

Dataset: EcoSpold 2, unit process
Geography: GLO
Time period: 2005-01-01 to 2021-12-31
Technology level: current
Classification: ISIC rev.4 ecoinvent: 2029:Manufacture of other chemical products n.e.c.
Classification: EcoSpold01Categories: metals/extraction
Tags: ConvertedDataset
Scenario: Business-as-Usual
System model: Allocation, cut-off by classification
Generated by: Roland Hischier
Published in: Hischier R. 2007
Database: ecoinvent
isCopyrightProtected: true
accessRestrictedTo: 1

## General comment
This dataset represents the production of 1 kg of solder paste of the type Sn63Pb37. It is based on information representing current solder materials used in the electronics industry. Data are taken from literature (report from a European research project in the field of lead-free soldering). Infrastructure are based on own assumptions.
[This dataset was already contained in the ecoinvent database version 2. It was not individually updated during the transfer to ecoinvent version 3. Life Cycle Impact Assessment results may still have changed, as they are affected by changes in the supply chain, i.e. in other datasets. This dataset was generated following the ecoinvent quality guidelines for version 2. It may have been subject to central changes described in the ecoinvent version 3 change report (http://www.ecoinvent.org/database/ecoinvent-version-3/reports-of-changes/), and the results of the central updates were reviewed extensively. The changes added e.g. consistent water flows and other information throughout the database. The documentation of this dataset can be found in the ecoinvent reports of version 2, which are still available via the ecoinvent website. The change report linked above covers all central changes that were made during the conversion process.]

## Included activities start
From reception of solder bar and auxiliaries at the factory gate.

## Included activities end
This dataset includes raw material input, auxillaries input, energy consumption and emissions (air), as well as an estimation of the efforts for transportation and of the infrastructure for the production of solder paste.

## Geography
Data represent global valid composition data for Pb-containing solder paste, used in the electronics industry.

## Technology
Typical solder material for the electronics industry. Production by melting (of solder bar), atomizing and sieving, followed by mixing with the respective flux.

## Reference product
- solder, paste, Sn63Pb37, for electronics industry: 1 kg; name RP_amount_1; CPC 42950: Wire, rods, tubes, plates, electrodes and similar products, of base metal or of metal carbides, coated or core[…]; By-product classification allocatable product
  A soldering material or a solder is a fusible metal alloy, with a melting point or melting range of 180-190°C (360-370 °F), which is melted to join metallic surfaces, especially in the fields of electronics and plumbing, in a process called soldering. Lead solder: most often, a mixture of 63% tin and 37% lead is used in this case, due to the fact that this mixture has the lowest melting point, a melting point that is close to the above mentioned 180°C.
  EcoSpold01Location=GLO
  production volume 4.52381e7 kg; name RP_PV_1
    Calculated based on literature value (http://blogs.indium.com/blog/solder-price, accessed 20140602) and estimates.
    Approximatelly 57000 tons of tin is used in solder bar production. It is estimated, that 50% is produced by this solder production technology.
  property carbon content 0
    carbon content on a dry matter basis (reserved; not for manual entry)
  properties: dry mass 1 kg, water content 0, carbon content, fossil 0, price 5.27 EUR2005, wet mass 1 kg, carbon content, non-fossil 0, water in wet mass 0 kg, carbon allocation 0 kg

## Inputs from technosphere
All rows: source Alvarado Ascencio C. 2005
- rosin size, for paper production: 0 kg; pedigree (1,1,1,1,1)
  Estimation, based on literature.
  Further references:
  Geibig J. R. and Socolof M. L. (2005) Solders in Electronics: A Life-Cycle Assessment. US EPA, Cincinnati (OH, USA)
  EcoSpold01Location=RER
  Uncertainty: data from literature
  properties: carbon content, non-fossil 0.515474, wet mass 1 kg, dry mass 1 kg, heating value, net 15.62 MJ
  note on carbon content, non-fossil: Mixture of rosin size (approximated by soap) (75%) and alkali (shown as sodium hydroxide) (25%). (ecoinvent v2.2 report 11-III, pg 299).
- scrap tin sheet: 0 kg; name BP_amount_1; pedigree (1,1,1,1,1)
  Literature Value.
  EcoSpold01Location=CH
  Uncertainty: data from literature
  production volume 0 kg
    Calculated from the production volume of solder, paste, Sn63Pb37, for electronic industry in proportion to the respective output amounts.
  property price 0 EUR2005; name BP_amount_1_price_EUR2005
  properties: dry mass 1 kg, wet mass 1 kg
- solder, bar, Sn63Pb37, for electronics industry: 1 kg; lognormal variance with pedigree 0.0513, pedigree (2,3,5,3,1)
  EcoSpold01Location=GLO
  Estimation, based on literature.
  Further references:
  Geibig J. R. and Socolof M. L. (2005) Solders in Electronics: A Life-Cycle Assessment. US EPA, Cincinnati (OH, USA)
  Uncertainty: data from literature
  properties: wet mass 1 kg, dry mass 1 kg
- monoethanolamine: 0.003 kg; lognormal variance with pedigree 0.0513, pedigree (2,3,5,3,1)
  Proxy with Estimation, to represent amines monoethanolamine is used, based on literature.
  Further references:
  Geibig J. R. and Socolof M. L. (2005) Solders in Electronics: A Life-Cycle Assessment. US EPA, Cincinnati (OH, USA)
  EcoSpold01Location=RER
  Uncertainty: data from literature
  properties: dry mass 1 kg, carbon content, fossil 0.393443, wet mass 1 kg, heating value, net 25.8 MJ
- electricity, medium voltage: 3.18 kWh; lognormal variance with pedigree 0.0513, pedigree (2,3,5,3,1)
  EcoSpold01Location=UCTE
  Literature Value.
  Uncertainty: data from literature
- heat, district or industrial, natural gas: 54.45 MJ; lognormal variance with pedigree 0.0513, pedigree (2,3,5,3,1)
  EcoSpold01Location=RER
  Literature Value.
  Uncertainty: data from literature
  properties: heating value, net 1 MJ
- formic acid: 0 kg; pedigree (1,1,1,1,1)
  Proxy with Estimation, to represent carboxylic acid, formic acid is used, based on literature.
  Further references:
  Geibig J. R. and Socolof M. L. (2005) Solders in Electronics: A Life-Cycle Assessment. US EPA, Cincinnati (OH, USA)
  EcoSpold01Location=RER
  Uncertainty: data from literature
  properties: heating value, net 13.17 MJ, wet mass 1 kg, dry mass 1 kg, carbon content, fossil 0.4
- isopropanol: 0 kg; pedigree (1,1,1,1,1)
  EcoSpold01Location=RER
  Proxy with Estimation, to represent solvents, isopropanol is used, based on literature.
  Further references:
  Geibig J. R. and Socolof M. L. (2005) Solders in Electronics: A Life-Cycle Assessment. US EPA, Cincinnati (OH, USA)
  Uncertainty: data from literature
  properties: heating value, net 34.3 MJ, wet mass 1 kg, carbon content, fossil 0.6, dry mass 1 kg
- rosin size, for paper production: 0.0148767, 0.0311233 kg (2 entries); lognormal variance with pedigree 0.0513, pedigree (2,3,5,3,1)
  (same comment as for rosin size, for paper production)
- scrap tin sheet: -0.00148826, -0.0985117 kg (2 entries); lognormal variance with pedigree 0.1713, pedigree (2,3,5,3,1)
  Literature Value.
  EcoSpold01Location=CH
  Uncertainty: data from literature
  production volume 4.52381e6 kg
- formic acid: 0.0030396, 0.0019604 kg (2 entries); lognormal variance with pedigree 0.0513, pedigree (2,3,5,3,1)
  (same comment as for formic acid)
- isopropanol: 0.008004, 0.037996 kg (2 entries); lognormal variance with pedigree 0.0513, pedigree (2,3,5,3,1)
  (same comment as for isopropanol)

## Emissions to nature
All rows: source Alvarado Ascencio C. 2005
- Particulates, > 2.5 um, and < 10um [air, urban air close to ground]: 0.00071595 kg; lognormal variance with pedigree 0.3513, pedigree (2,3,5,3,1)
  Literature Value.
  Uncertainty: data from literature
- Lead [air, urban air close to ground]: 0.000368 kg; lognormal variance with pedigree 0.0913, pedigree (2,3,5,3,1)
  Literature Value.
  Uncertainty: data from literature
- Tin [air, urban air close to ground]: 0.000297 kg; lognormal variance with pedigree 0.0913, pedigree (2,3,5,3,1)
  Literature Value.
  Uncertainty: data from literature
- Particulates, > 10 um [air, urban air close to ground]: 0.0003182 kg; lognormal variance with pedigree 0.3513, pedigree (2,3,5,3,1)
  Literature Value.
  Uncertainty: data from literature
- Particulates, < 2.5 um [air, urban air close to ground]: 0.00055685 kg; lognormal variance with pedigree 0.3513, pedigree (2,3,5,3,1)
  Literature Value.
  Uncertainty: data from literature

## Sampling procedure
own estimation

## Extrapolations
This dataset has been extrapolated from year 2005 to the year of the calculation (2021). The uncertainty has been adjusted accordingly.

## Review by Rolf Frischknecht 2007-09-14
passed
