# pear production

Dataset: EcoSpold 2, unit process
Geography: BE
Time period: 2009-01-01 to 2021-12-31
Technology level: current
Classification: ISIC rev.4 ecoinvent: 0124:Growing of pome fruits and stone fruits
Tags: WFLDB
Scenario: Business-as-Usual
System model: Allocation, cut-off by classification
Generated by: Hisko Baas
Published in: Nemecek T. 2015
Database: ecoinvent
isCopyrightProtected: true
accessRestrictedTo: 1

## General comment
This dataset represents the production of 1 kg of pear. The average yield from 2009 - 2012 is 48.2 t/ha. The data are representative for pear production in Belgium used for the export market. Mineral NPK fertiliser input is 36-0-21 kg/ha. Organic fertilisers applied amount to 2.56 m3/ha of liquid manure and 1.71 t/ha of solid manure. Total active ingredients (a.i.) applied as pesticides amount to 26.15 kg a.i./ha.
The dataset was modelled within the project 'World Food LCA database (WFLDB)'. The aim of this project was to provide inventories of a broad variety of agricultural products and processes and to cover for each product at least 50% of the global export market. The export share of pear produced in Belgium amounts to 12% of the global export (tonnage exported in 2010). The production system regarded in this dataset aimed at representing pear produced in Belgium for the export market.
PEF-Quality: data quality rating (DQR) = 3.0 (i.e. good quality). This dataset refers to an average situation; for specific situations exchanges might differ substantially due to site specific parameters

## Included activities start
This activity starts with the nursery producing fruit tree seedlings, i.e. grafted young trees to be planted.

## Included activities end
This activity ends with the waste treatment after the clearing of the orchard (rooting up the trees). The dataset includes all activities of a year in a year in the productive phase of the orchard including the establishment phase per year of lifetime (21 years, 2357 trees/ha planted), the clearing of the orchard including waste treatment.
The establishment phase of the orchard includes tree nursery, soil cultivation, planting trees, sowing grass, installation of trellis system (posts and wires) and irrigation. Fertiliser and pesticide use in a year of the establishment phase is assumed to be half of the amount of a year in the productive phase.
The productive phase of the orchard includes machine operations, corresponding infrastructure, fuel use and sheds. Machine operations in the productive phase are: soil cultivation (mulching, mowing), fertiliser and pesticide application, harvesting and irrigation. Further, direct field emissions and land use change are included. At the end of the productive phase the orchard is cleared by rooting up the trees.
Heavy metal uptake by the crop is considered.
The inputs of seedlings, fertilisers and pesticides as well as packaging of fertilisers and pesticides are considered. fertilisers and pesticides are considered. The dataset doesn't include emissions from manure storage because these are within the system boundary of animal production.

## Technology
Conventional production

## Parameters
- heavyMetalUptakeSwitch: 1 dimensionless
- LUC_crop_specific: 1 dimensionless
  This parameter allows to switch between a 'crop specific' and a 'country specific' approach when calculating the LUC of a crop. By default, the chosen approach is 'crop specific', so the value of the parameter is 1. If you want to apply a 'country specific' approach, turn the parameter to 0.

## Reference product
- pear: 1 kg; CPC 01342: Pears and quinces; By-product classification allocatable product
  Reference flow: Yield = 48205 kg/ha table fruit quality
  production volume 2.77274e8 kg
    Source: FAOSTAT. Average, 2009-2012
  property price 0.43 EUR2005
    Calculated from the trade statistics for the year 2005 published by the UN (COMTRADE database, accessed 20151105) as an average of 5 biggest importers of pear in the world; DE, UK, RU, NL and FR. Comtrade cathegory: 80820: Pears and quinces, fresh.
  property carbon content, non-fossil 0.476186
    calculation: C-content of components according to ecoinvent report No. 15a. Source of composition: https://ndb.nal.usda.gov/ndb/search/.
  property carbon content 0.476186
    carbon content on a dry matter basis (reserved; not for manual entry)
  properties: carbon content, fossil 0, dry mass 0.543596 kg, water content 0.8396, water in wet mass 0.456404 kg, wet mass 1 kg, carbon allocation 0.258853 kg

## Inputs from technosphere
- inorganic potassium fertiliser, as K2O: 0.000257753 kg; lognormal variance with pedigree 0.124177, pedigree (2,1,4,1,1)
  Calculated based on literature values: The nutrient content of the crop multiplied by the country-share of the fertiliser type (IFA 2014). See supporting documentation 'WFLDB-Documentation.pdf' chapter 'Fertiliser application' for L1 data and appendix for the source of nutrient content (https://ecoquery.ecoinvent.org/File/Reports).
  Corresponds to 12.4 kg/ha
  properties: dry mass 1 kg, wet mass 1 kg
- organophosphorus-compound, unspecified: 4.43593e-5 kg; lognormal variance with pedigree 0.124664, pedigree (2,2,4,1,1)
  Proxy: Source for total amount of pesticides: extrapolated from MEXALCA. Active ingredient is calculated based on Ecoinvent dataset Apple US. For calculations see supporting documentation 'WFLDB-Documentation.pdf' (https://ecoquery.ecoinvent.org/File/Reports).
  properties: carbon content, fossil 0.260898, dry mass 1 kg, wet mass 1 kg
- potassium sulfate: 1.45599e-5 kg; lognormal variance with pedigree 0.124177, pedigree (2,1,4,1,1)
  The exchange has been updated from 'potassium sulfate, as K2O' into 'potassium sulfate' and therefore its amount has been scaled (multiplied) from 0 kg by 1.85 kg of 'potassium sulfate' per kg of 'potassium sulfate, as K2O'. Original comment of the exchange is: Calculated based on literature values: The nutrient content of the crop multiplied by the country-share of the fertiliser type (IFA 2014). See supporting documentation 'WFLDB-Documentation.pdf' chapter 'Fertiliser application' for L1 data and appendix for the source of nutrient content (https://ecoquery.ecoinvent.org/File/Reports).
  Corresponds to 0.379 kg/ha
  properties: dry mass 1 kg, wet mass 1 kg
- sulfur: 0.000234053 kg; lognormal variance with pedigree 0.124664, pedigree (2,2,4,1,1)
  (same comment as for organophosphorus-compound, unspecified)
  properties: dry mass 1 kg, wet mass 1 kg
- manure, liquid, cattle: 0.0345609 kg; lognormal variance with pedigree 0.124177, pedigree (2,1,4,1,1)
  Calculated based on literature values: The total amount of manure multiplied by the country-share of manure per animal category (FAOSTAT 2015). See supporting documentation 'WFLDB-Documentation.pdf' chapter 'Fertiliser application' (https://ecoquery.ecoinvent.org/File/Reports).
  Corresponds to 1.67 m3/ha
  properties: dry mass 0.075 kg, wet mass 1 kg, carbon content, non-fossil 0.68, water content 12.333
- phenoxy-compound: 5.20999e-6 kg; lognormal variance with pedigree 0.124664, pedigree (2,2,4,1,1)
  (same comment as for organophosphorus-compound, unspecified)
  properties: wet mass 1 kg, carbon content, fossil 0.532559, dry mass 1 kg
- manure, liquid, swine: 0.0178934 kg; lognormal variance with pedigree 0.124177, pedigree (2,1,4,1,1)
  Calculated based on literature values: The total amount of manure multiplied by the country-share of manure per animal category (FAOSTAT 2015). See supporting documentation 'WFLDB-Documentation.pdf' chapter 'Fertiliser application' (https://ecoquery.ecoinvent.org/File/Reports).
  Corresponds to 0.863 m3/ha
  properties: dry mass 0.05 kg, carbon content, non-fossil 0.64, water content 19, wet mass 1 kg
- glyphosate: 2.29831e-5 kg; lognormal variance with pedigree 0.124664, pedigree (2,2,4,1,1)
  (same comment as for organophosphorus-compound, unspecified)
  properties: wet mass 1 kg, carbon content, fossil 0.214286, dry mass 1 kg
- poultry manure, fresh: 0.000277367 kg; lognormal variance with pedigree 0.124177, pedigree (2,1,4,1,1)
  Calculated based on literature values: The total amount of manure multiplied by the country-share of manure per animal category (FAOSTAT 2015). See supporting documentation 'WFLDB-Documentation.pdf' chapter 'Fertiliser application' (https://ecoquery.ecoinvent.org/File/Reports).
  Corresponds to 0.0267 m3/ha
  properties: wet mass 1 kg, water content 1.63158, carbon content, non-fossil 0.33389, dry mass 0.38 kg
- fruit tree seedling, for planting: 0.00232839 unit; source Deckers T. 2011; lognormal variance with pedigree 0.124177, pedigree (2,1,4,1,1)
  Literature value or expert estimation (Deckers et al. 2011). This is the number of trees per ha divided by the lifetime years of the orchard.
  properties: wet mass 1 kg, water content 0.73, dry mass 0.578035 kg, carbon content, non-fossil 0.439481
  note on carbon content, non-fossil: calculation: C-content of components according to ecoinvent report No. 15a. Source of composition: https://ndb.nal.usda.gov/ndb/search/. Unspecific seedling used as proxy.
- manure, solid, cattle: 0.0242848 kg; lognormal variance with pedigree 0.124177, pedigree (2,1,4,1,1)
  Calculated based on literature values: The total amount of manure multiplied by the country-share of manure per animal category (FAOSTAT 2015). See supporting documentation 'WFLDB-Documentation.pdf' chapter 'Fertiliser application' (https://ecoquery.ecoinvent.org/File/Reports).
  Corresponds to 1170.0 kg/ha
  properties: dry mass 0.22 kg, water content 3.5454, wet mass 1 kg, carbon content, non-fossil 0.441
- establishing orchard: 0.00232839 unit; source Deckers T. 2011; lognormal variance with pedigree 0.124177, pedigree (2,1,4,1,1)
  (same comment as for fruit tree seedling, for planting)
- trellis system, wooden poles, soft wood, tar impregnated: 2.07447e-5 ha; lognormal variance with pedigree 0.124177, pedigree (2,1,4,1,1)
  Used to attach trees in orchards with a tree density of more than 500 trees per ha.
- planting tree: 0.00232839 unit; source Deckers T. 2011; lognormal variance with pedigree 0.124177, pedigree (2,1,4,1,1)
  (same comment as for fruit tree seedling, for planting)
- poultry manure, dried: 0.0112302 kg; lognormal variance with pedigree 0.124177, pedigree (2,1,4,1,1)
  Calculated based on literature values: The total amount of manure multiplied by the country-share of manure per animal category (FAOSTAT 2015). See supporting documentation 'WFLDB-Documentation.pdf' chapter 'Fertiliser application' (https://ecoquery.ecoinvent.org/File/Reports).
  Corresponds to 541.0 kg/ha
  properties: dry mass 0.865 kg, potassium content 0.024, nitrogen content 0.532, lead content 2.92e-6, wet mass 1 kg, nickel content 4e-5, cadmium content 2.92e-7, water content 0.156069, zinc content 0.000349, phosphorus content 0.0167, copper content 4.38e-5, mercury content 2e-7, carbon content, non-fossil 0.33389
- inorganic nitrogen fertiliser, as N: 0.000543768 kg; lognormal variance with pedigree 0.124177, pedigree (2,1,4,1,1)
  Calculated based on literature values: The nutrient content of the crop multiplied by the country-share of the fertiliser type (IFA 2014). See supporting documentation 'WFLDB-Documentation.pdf' chapter 'Fertiliser application' for L1 data and appendix for the source of nutrient content (https://ecoquery.ecoinvent.org/File/Reports).
  Corresponds to 0.535 kg/ha
  properties: dry mass 1 kg, wet mass 1 kg
- fertilising, by broadcaster: 2.07447e-5 ha; lognormal variance with pedigree 0.124177, pedigree (2,1,4,1,1)
  Proxy: Similar crop and country used. Corresponds to 1 application per year.
- waste wood, untreated: -0.0276527 kg; lognormal variance with pedigree 0.124177, pedigree (2,1,4,1,1)
  Wood from trees after 1-2 years of sorrage at the field (20% water) per lifetime year (20 years) of the orchard
  production volume 7.66739e6 kg
    Calculated from the reference product amount and production volume
  properties: dry mass 0.8 kg, wet mass 1 kg, water content 0.25, carbon content, non-fossil 0.48632, heating value, net 13.99 MJ
  note on heating value, net: Value taken from the general comment of the treatment dataset.
- liquid manure spreading, by vacuum tanker: 5.3009e-5 m3; lognormal variance with pedigree 0.124177, pedigree (2,1,4,1,1)
  This amount corresponds to the input of liquid manure.
- packaging, for pesticides: 0.00108503 kg; lognormal variance with pedigree 0.0592, pedigree (4,3,4,5,4)
  Total amount of active substance/s of pesticides needed for the production of pear is calculated to be circa 5.43E-04 kg. Pesticide/s used in this dataset is/are: 'cyclic N-compound', 'dithiocarbamate-compound', 'glyphosate', 'organophosphorus-compound, unspecified', 'phenoxy-compound', 'sulfur'. The total amount of active substance/s is doubled in order to account for the packaging of the dilluted product of pesticide/s that is/are applied. Therefore, 1.09E-03 kg of packaging for pesticides is justified with this exchange.
  properties: wet mass 1 kg, carbon content, fossil 0.85714, price 0.0642 EUR2005, heating value, net 25.97 MJ, dry mass 1 kg
- mowing, by rotary mower: 8.29789e-5 ha; lognormal variance with pedigree 0.124177, pedigree (2,1,4,1,1)
  Apple US used as proxy
- packaging, for fertilisers: 0.00244644 kg; lognormal variance with pedigree 0.0592, pedigree (4,3,4,5,4)
  Total amount of active substance/s of fertilisers needed for the production of 'pear' is calculated to be circa 1.22E-03 kg. Fertiliser/s used in this dataset is/are: 'ammonia, liquid', 'ammonium nitrate, as N', 'ammonium sulfate, as N', 'nitrogen fertiliser, as N', 'potassium chloride, as K2O', 'potassium fertiliser, as K2O', 'potassium sulfate, as K2O', 'urea, as N'. The total amount of active substance/s is doubled in order to account for the packaging of the dilluted product of fertiliser/s that is/are applied. Therefore, 2.45E-03 kg of packaging for fertilisers is justified with this exchange.
  properties: carbon content, fossil 0.825301, dry mass 1 kg, heating value, net 25.01 MJ, price 0.0642 EUR2005, wet mass 1 kg
  note on carbon content, fossil: Considering a chemical formula (C2H4)n for polyethylene, carbon content-fossil is calculated to be 0.856286 kg of Carbon per kg of dry mass.
- application of plant protection product, by field sprayer: 0.000155586 ha; lognormal variance with pedigree 0.124664, pedigree (2,2,4,1,1)
  Proxy: Similar crop and country used (Apple US). Field sprayer used as a proxy for pesticide application in orchards. Corresponds to 7.5 applications per year.
- solid manure loading and spreading, by hydraulic loader and spreader: 0.035515 kg; lognormal variance with pedigree 0.124177, pedigree (2,1,4,1,1)
  This amount corresponds the input of solid manure.
- land use change, perennial crop: 5.58241e-6 ha; = 5.58240846385e-06*LUC_crop_specific+2.55160253086e-07*(1-LUC_crop_specific)
  Calculated value. Land use change (LUC) combines land transformation areas calculated with the adapted 'Direct Land Use Change Assessment Tool' version 2014 developed by Blonk Consultants and the carbon losses from soil organic carbon (SOC) and vegetation (VEG) as calculated in ecoinvent v3. See 'WFLDB-Guidelines.pdf', available at https://ecoquery.ecoinvent.org/File/Reports.
- ammonia, anhydrous, liquid: 0.000201703 kg; lognormal variance with pedigree 0.124177, pedigree (2,1,4,1,1)
  Calculated based on literature values: The nutrient content of the crop multiplied by the country-share of the fertiliser type (IFA 2014). See supporting documentation 'WFLDB-Documentation.pdf' chapter 'Fertiliser application' for L1 data and appendix for the source of nutrient content (https://ecoquery.ecoinvent.org/File/Reports).
  Corresponds to 9.72 kg/ha
  properties: wet mass 1 kg, dry mass 1 kg
- mulching: 0.000103724 ha; lognormal variance with pedigree 0.124177, pedigree (2,1,4,1,1)
  Apple US used as proxy
- ammonium nitrate: 8.65583e-6 kg; lognormal variance with pedigree 0.124177, pedigree (2,1,4,1,1)
  The exchange has been updated from 'ammonium nitrate, as N' into 'ammonium nitrate' and therefore its amount has been scaled (multiplied) from 0 kg by 2.8573 kg of 'ammonium nitrate' per kg of 'ammonium nitrate, as N'. Original comment of the exchange is: Calculated based on literature values: The nutrient content of the crop multiplied by the country-share of the fertiliser type (IFA 2014). See supporting documentation 'WFLDB-Documentation.pdf' chapter 'Fertiliser application' for L1 data and appendix for the source of nutrient content (https://ecoquery.ecoinvent.org/File/Reports).
  Corresponds to 0.146 kg/ha
  properties: wet mass 1 kg, dry mass 1 kg
- irrigation: 0.0346645 m3; lognormal variance with pedigree 0.124177, pedigree (2,1,4,1,1)
  Calculated value: The total amount of water used for irrigation (calculated from evapotranspiration, Pfister et al. 2011) multiplied by the country-share of irrigation technique (Deckers et al. 2011). See supporting documentation 'WFLDB-Documentation.pdf' chapter 'Water use for irrigation' for L1 data (https://ecoquery.ecoinvent.org/File/Reports).
  properties: wet mass 1000 kg, dry mass 0.11 kg, water content 9089.91
- ammonium sulfate: 2.12053e-5 kg; lognormal variance with pedigree 0.124177, pedigree (2,1,4,1,1)
  Calculated based on literature values: The nutrient content of the crop multiplied by the country-share of the fertiliser type (IFA 2014). See supporting documentation 'WFLDB-Documentation.pdf' chapter 'Fertiliser application' for L1 data and appendix for the source of nutrient content (https://ecoquery.ecoinvent.org/File/Reports).
  Corresponds to 1.02 kg/ha
  properties: wet mass 1 kg, dry mass 1 kg
- transport, tractor and trailer, agricultural: 0.002 metric ton*km; lognormal variance with pedigree 0.162439, pedigree (4,1,4,1,1)
  On-farm transport: Yield (in tonnes) multiplied by the average distance from field to farm. The distance was assumed to be 2 km (proxy).
- urea: 4.0048e-5 kg; lognormal variance with pedigree 0.124177, pedigree (2,1,4,1,1)
  The exchange has been updated from 'urea, as N' into 'urea' and therefore its amount has been scaled (multiplied) from 0 kg by 2.1438 kg of 'urea' per kg of 'urea, as N'. Original comment of the exchange is: Calculated based on literature values: The nutrient content of the crop multiplied by the country-share of the fertiliser type (IFA 2014). See supporting documentation 'WFLDB-Documentation.pdf' chapter 'Fertiliser application' for L1 data and appendix for the source of nutrient content (https://ecoquery.ecoinvent.org/File/Reports).
  Corresponds to 0.901 kg/ha
  properties: wet mass 1 kg, dry mass 1 kg, carbon content, fossil 0.2
- cyclic N-compound: 3.97189e-6 kg; lognormal variance with pedigree 0.124664, pedigree (2,2,4,1,1)
  (same comment as for organophosphorus-compound, unspecified)
  properties: carbon content, fossil 0.641962, wet mass 1 kg, dry mass 1 kg
- potassium chloride: 0.000267843 kg; lognormal variance with pedigree 0.124177, pedigree (2,1,4,1,1)
  The exchange has been updated from 'potassium chloride, as K2O' into 'potassium chloride' and therefore its amount has been scaled (multiplied) from 0.0002 kg by 1.5829 kg of 'potassium chloride' per kg of 'potassium chloride, as K2O'. Original comment of the exchange is: Calculated based on literature values: The nutrient content of the crop multiplied by the country-share of the fertiliser type (IFA 2014). See supporting documentation 'WFLDB-Documentation.pdf' chapter 'Fertiliser application' for L1 data and appendix for the source of nutrient content (https://ecoquery.ecoinvent.org/File/Reports).
  Corresponds to 8.16 kg/ha
  properties: dry mass 1 kg, wet mass 1 kg
- dithiocarbamate-compound: 0.000231939 kg; lognormal variance with pedigree 0.124664, pedigree (2,2,4,1,1)
  (same comment as for organophosphorus-compound, unspecified)
  properties: wet mass 1 kg, dry mass 1 kg, carbon content, fossil 0.179339

## Inputs from nature
- Occupation, permanent crop, irrigated [natural resource, land]: 0.208007 m2*year; lognormal variance with pedigree 0.0200616, pedigree (2,1,4,1,1)
  Related to the duration from harvest date of previous crop to harvest date of main crop.
- Transformation, from permanent crop, irrigated [natural resource, land]: 0.0103724 m2; lognormal variance with pedigree 0.0442144, pedigree (2,1,4,1,1)
  10000 m2 divided by the life time of the perennial crop (20 years).
- Carbon dioxide, in air [natural resource, in air]: 0.29748 kg; lognormal variance with pedigree 0.0138498, pedigree (2,2,4,1,1)
  CO2 uptake by biomass
- Energy, gross calorific value, in biomass [natural resource, biotic]: 3.15133 MJ; lognormal variance with pedigree 0.0138498, pedigree (2,2,4,1,1)
  Gross energy content is related to MJ/kg dry matter of product. Source: ecoinvent data
- Transformation, to permanent crop, irrigated [natural resource, land]: 0.0103724 m2; lognormal variance with pedigree 0.0442144, pedigree (2,1,4,1,1)
  10000 m2 divided by the life time of the perennial crop (20 years).

## Emissions to nature
- Carbon dioxide, fossil [air, non-urban air or from high stacks]: 4.39934e-5 kg; lognormal variance with pedigree 0.0138498, pedigree (2,2,4,1,1)
  Calculated value - CO2 emissions from urea and lime. See 'WFLDB-Guidelines.pdf', available at https://ecoquery.ecoinvent.org/File/Reports.
- Cadmium [soil, agricultural]: -1.39648e-8 kg; = 3.39840265533e-09 + ( - 1.73632241469e-08)*heavyMetalUptakeSwitch; source Freiermuth R.  2006
  Comment on mathematicalRelation:
  -1.73632241469e-08 from Crop, default, heavy metals uptake model
  Heavy metal uptake can be excluded by setting the parameter heavyMetalUptakeSwitch to zero.
- Mercury [water, ground-]: 2.25143e-10 kg; source Freiermuth R.  2006; lognormal variance with pedigree 0.356938, pedigree (2,2,4,1,1)
  Calculated value - Freiermuth (2006). See 'WFLDB-Guidelines.pdf', available at https://ecoquery.ecoinvent.org/File/Reports.
- Ammonia [air, non-urban air or from high stacks]: 0.00067939 kg; source EEA 2013; lognormal variance with pedigree 0.0447216, pedigree (2,2,4,1,1)
  Calculated value - EMEP/EEA (2013). See 'WFLDB-Guidelines.pdf', available at https://ecoquery.ecoinvent.org/File/Reports.
- Nitrogen oxides [air, non-urban air or from high stacks]: 3.63386e-5 kg; source EEA 2013; lognormal variance with pedigree 0.124664, pedigree (2,2,4,1,1)
  Calculated value - EEA/EMEP (2013). See 'WFLDB-Guidelines.pdf', available at https://ecoquery.ecoinvent.org/File/Reports.
- Dinitrogen monoxide [air, non-urban air or from high stacks]: 2.16333e-5 kg; source IPCC 2006; lognormal variance with pedigree 0.124664, pedigree (2,2,4,1,1)
  Calculated value - IPCC (2006). See 'WFLDB-Guidelines.pdf', available at https://ecoquery.ecoinvent.org/File/Reports.
- Water [air, non-urban air or from high stacks]: 0.0258542 m3; lognormal variance with pedigree 0.124177, pedigree (2,1,4,1,1)
  Calculated value - Emission calculated from water balance. See 'WFLDB-Guidelines.pdf', available at https://ecoquery.ecoinvent.org/File/Reports.
- Zinc, ion [water, ground-]: 4.47485e-7 kg; source Freiermuth R.  2006; lognormal variance with pedigree 0.356938, pedigree (2,2,4,1,1)
  (same comment as for Mercury)
- Lead [water, ground-]: 1.11717e-9 kg; source Freiermuth R.  2006; lognormal variance with pedigree 0.356938, pedigree (2,2,4,1,1)
  (same comment as for Mercury)
- Phosphate [water, surface water]: 1.63421e-5 kg; source Prasuhn V.  2006; lognormal variance with pedigree 0.175866, pedigree (2,2,4,1,1)
  Calculated value - Prasuhn (2006). See 'WFLDB-Guidelines.pdf', available at https://ecoquery.ecoinvent.org/File/Reports.
- Water [water, ground-]: 0.00176214 m3; lognormal variance with pedigree 0.124177, pedigree (2,1,4,1,1)
  (same comment as for Water)
- Phosphorus [water, surface water]: 2.10414e-6 kg; source Prasuhn V.  2006; lognormal variance with pedigree 0.175866, pedigree (2,2,4,1,1)
  Calculated value - Prasuhn (2006) and SQCB-Erosion. See 'WFLDB-Guidelines.pdf', available at https://ecoquery.ecoinvent.org/File/Reports.
- Phosphate [water, ground-]: 3.83549e-6 kg; source Prasuhn V.  2006; lognormal variance with pedigree 0.175866, pedigree (2,2,4,1,1)
  (same comment as for Phosphate)
- Nickel, ion [water, ground-]: 5.0974e-11 kg; source Freiermuth R.  2006; lognormal variance with pedigree 0.356938, pedigree (2,2,4,1,1)
  (same comment as for Mercury)
- Water [water, surface water]: 0.00704865 m3; lognormal variance with pedigree 0.124177, pedigree (2,1,4,1,1)
  (same comment as for Water)
- Cadmium, ion [water, surface water]: 2.01504e-10 kg; source Freiermuth R.  2006; lognormal variance with pedigree 0.356938, pedigree (2,2,4,1,1)
  (same comment as for Mercury)
- Chromium, ion [water, surface water]: 4.36054e-8 kg; source Freiermuth R.  2006; lognormal variance with pedigree 0.356938, pedigree (2,2,4,1,1)
  (same comment as for Mercury)
- Chromium [soil, agricultural]: -2.81598e-7 kg; = -1.88403692563e-07 + ( - 9.31943781765e-08)*heavyMetalUptakeSwitch; source Freiermuth R.  2006
  Comment on mathematicalRelation:
  -1.88403692563e-07 from Calculated value - Freiermuth (2006). See 'WFLDB-Guidelines.pdf', available at https://ecoquery.ecoinvent.org/File/Reports.
  -9.31943781765e-08 from Crop, default, heavy metals uptake model
  Heavy metal uptake can be excluded by setting the parameter heavyMetalUptakeSwitch to zero.
- Copper [soil, agricultural]: -7.43689e-7 kg; = 3.89503163572e-07 + ( - 1.13319233897e-06)*heavyMetalUptakeSwitch; source Freiermuth R.  2006
  Comment on mathematicalRelation:
  -1.13319233897e-06 from Crop, default, heavy metals uptake model
  Heavy metal uptake can be excluded by setting the parameter heavyMetalUptakeSwitch to zero.
- Copper, ion [water, surface water]: 1.13355e-7 kg; source Freiermuth R.  2006; lognormal variance with pedigree 0.356938, pedigree (2,2,4,1,1)
  (same comment as for Mercury)
- Lead [soil, agricultural]: -6.22522e-8 kg; = 3.0218856965e-08 + ( - 9.24710530028e-08)*heavyMetalUptakeSwitch; source Freiermuth R.  2006
  Comment on mathematicalRelation:
  -9.24710530028e-08 from Crop, default, heavy metals uptake model
  Heavy metal uptake can be excluded by setting the parameter heavyMetalUptakeSwitch to zero.
- Mercury [soil, agricultural]: -1.4912e-9 kg; = 5.44383362722e-09 + ( - 6.93502972721e-09)*heavyMetalUptakeSwitch; source Freiermuth R.  2006
  Comment on mathematicalRelation:
  5.44383362722e-09 from Calculated value - Freiermuth (2006). See 'WFLDB-Guidelines.pdf', available at https://ecoquery.ecoinvent.org/File/Reports.
  -6.93502972721e-09 from Crop, default, heavy metals uptake model
  Heavy metal uptake can be excluded by setting the parameter heavyMetalUptakeSwitch to zero.
- Nickel [soil, agricultural]: -1.20766e-7 kg; = 5.78591432424e-08 + ( - 1.78625408153e-07)*heavyMetalUptakeSwitch; source Freiermuth R.  2006
  Comment on mathematicalRelation:
  5.78591432424e-08 from Calculated value - Freiermuth (2006). See 'WFLDB-Guidelines.pdf', available at https://ecoquery.ecoinvent.org/File/Reports.
  -1.78625408153e-07 from Crop, default, heavy metals uptake model
  Heavy metal uptake can be excluded by setting the parameter heavyMetalUptakeSwitch to zero.
- Mercury [water, surface water]: 2.0435e-10 kg; source Freiermuth R.  2006; lognormal variance with pedigree 0.356938, pedigree (2,2,4,1,1)
  (same comment as for Mercury)
- Zinc [soil, agricultural]: -2.52558e-6 kg; = 2.95031635722e-06 + ( - 5.47589646302e-06)*heavyMetalUptakeSwitch; source Freiermuth R.  2006
  Comment on mathematicalRelation:
  2.95031635722e-06 from Calculated value - Freiermuth (2006). See 'WFLDB-Guidelines.pdf', available at https://ecoquery.ecoinvent.org/File/Reports.
  -5.47589646302e-06 from Crop, default, heavy metals uptake model
  Heavy metal uptake can be excluded by setting the parameter heavyMetalUptakeSwitch to zero.
- Mancozeb [soil, agricultural]: 0.000231939 kg; lognormal variance with pedigree 0.0447216, pedigree (2,2,4,1,1)
  Calculated value - 100% emission in soil. See 'WFLDB-Guidelines.pdf', available at https://ecoquery.ecoinvent.org/File/Reports.
- Lead [water, surface water]: 7.01774e-9 kg; source Freiermuth R.  2006; lognormal variance with pedigree 0.356938, pedigree (2,2,4,1,1)
  (same comment as for Mercury)
- Myclobutanil [soil, agricultural]: 3.97189e-6 kg; lognormal variance with pedigree 0.0447216, pedigree (2,2,4,1,1)
  (same comment as for Mancozeb)
- Nickel, ion [water, surface water]: 3.49922e-8 kg; source Freiermuth R.  2006; lognormal variance with pedigree 0.356938, pedigree (2,2,4,1,1)
  (same comment as for Mercury)
- Sulfur [soil, agricultural]: 0.000234053 kg; lognormal variance with pedigree 0.0447216, pedigree (2,2,4,1,1)
  (same comment as for Mancozeb)
- Zinc, ion [water, surface water]: 1.45844e-7 kg; source Freiermuth R.  2006; lognormal variance with pedigree 0.356938, pedigree (2,2,4,1,1)
  (same comment as for Mercury)
- 2,4-D [soil, agricultural]: 5.20999e-6 kg; lognormal variance with pedigree 0.124664, pedigree (2,2,4,1,1)
  (same comment as for Mancozeb)
- Cadmium, ion [water, ground-]: 2.16243e-10 kg; source Freiermuth R.  2006; lognormal variance with pedigree 0.356938, pedigree (2,2,4,1,1)
  (same comment as for Mercury)
- Glyphosate [soil, agricultural]: 2.29831e-5 kg; lognormal variance with pedigree 0.124664, pedigree (2,2,4,1,1)
  (same comment as for Mancozeb)
- Chromium, ion [water, ground-]: 2.22031e-7 kg; source Freiermuth R.  2006; lognormal variance with pedigree 0.356938, pedigree (2,2,4,1,1)
  (same comment as for Mercury)
- Chlorpyrifos methyl [soil, agricultural]: 4.43593e-5 kg; lognormal variance with pedigree 0.124664, pedigree (2,2,4,1,1)
  (same comment as for Mancozeb)
- Copper, ion [water, ground-]: 6.91547e-8 kg; source Freiermuth R.  2006; lognormal variance with pedigree 0.356938, pedigree (2,2,4,1,1)
  (same comment as for Mercury)

## Sampling procedure
WFLDB Methodological Guidelines for the Life Cycle Inventory of Agricultural Products in the latest version, available at: http://www.quantis-intl.com/microsites/wfldb. Data sources: Data were categorised from level 0 (L0) to level (L4) as follows: L0 = estimate, proxy; L1 = statistical data (e.g. FAOSTAT); L2 = L1 adapted to crop and country; L3 = literature data or L1 resp. L2 data approved by experts; medium detailing (e.g. kg of total N-fertiliser); L4 = L3 data of higher detailing as L3 data (e.g. kg of a specific N-fertiliser such as Ammonium-Nitrate or Urea).In this dataset data were obtained for yield: L3; Fertilisers: L1; Pesticides: L0; Machinery: L0; irrigation: L2. For information regarding the calculation of individual exchanges see supporting documentation WFLDB-Documentation.pdf.

## Extrapolations
This dataset has been extrapolated from year 2012 to the year of the calculation (2021). The uncertainty has been adjusted accordingly.

## Review by Assumpció ANTON 2016-05-30
Be aware that the use of statistics in input calculations could provide some specific inputs not common for specific crops, this should be corrected if better information is available and better reflexed in DQR . Currently, I would dissent for some of good marks provided, being a revision of criteria applied advisable.

Pesticides will need to be amended periodically checking for update of pesticides' ban.
