# electricity production, wind, 1-3MW turbine, onshore, renewable energy products

Dataset: EcoSpold 2, unit process
Geography: CH
Time period: 2010-01-01 to 2021-12-31
Technology level: modern
Classification: ISIC rev.4 ecoinvent: 3510:Electric power generation, transmission and distribution
Tags: wind power; certified electricity
Scenario: Business-as-Usual
System model: Allocation, cut-off by classification
Generated by: Christian Bauer
Published in: Burger, B. 2007
Database: ecoinvent
isCopyrightProtected: true
accessRestrictedTo: 1

## General comment
This dataset represents the production of certified high voltage electricity at onshore grid-connected wind power plants with a capacity between 1 (excluded) and 3 (included) MW on the world in 2009. A Swiss dataset has been copied for this global dataset. It includes operation and maintenance expenditures as well as infrastructure inputs. Wind load hours have been adapted to {{location_loadhours}}.

At the moment, the class of onshore 1-3 MW wind turbines is approximated with a 2 MW onshore wind turbine consisting out of the infrastructure datasets for the "wind turbine construction" and the "network connection construction". The wind turbine's parts are defined to be everything except for the network connection, i.e. rotor, nacelle, tower, and foundation.

## Included activities start
From operation of the wind power plant to high voltage electricity at the plant. According to (European Communities 2001), electricity produced with wind turbines in a wind power plant is connected to medium voltage or high voltage systems, depending on the size of the windfarm. Normally, each wind turbine contains a transformer from low voltage to medium voltage. The network connection additionally transforms the electricity to high voltage electricity. It is assumed here, that there are no stand-alone grid-connected small wind turbines and that all electricity is connected to the network in form of high voltage electricity.

Source:
European Communities. 2001. Wind Turbine Grid Connection and Interaction. Deutsches Windenergie-Institut /Tech-wise A/S /DM Energy, p. 7 Tab.2.1

## Included activities end
This activity ends with the production of 1kWh of high voltage electricity produced at the power plant and delivered to the grid.

This dataset includes
- the operation and maintenance of the wind power plant
- change of lubricating oil every year

This dataset doesn't include
- raw materials extraction, decommissioning and waste treatment as these activities are already included in infrastructure datasets
- transformation of the electricity produced in order to deliver in to the grid as this is already included in the infrastructure datasets.

## Geography
Inventory represents Swiss data for label-certified electricity.

## Technology
Technology of a 2MW Vestas V80 wind power plant modelled with a dataset for the wind turbine (moving+fixed parts) and a network connection each.
See dataset "wind turbine construction, 2MW, onshore" for detailed technical information.

## Parameters
- distance: 200 km; lognormal variance with pedigree 0.1016, pedigree (4,5,5,4,4)
  Estimation. Maintenance transport to the power plant. One person travels two times per year over a distance of 200 km each time, one time for check only with a car, one time for change of the lubricating oil with a lorry.
  Uncertainty: estimated variance. High uncertainty.
- Installed capacity: 14 MW; name capacity_installed; lognormal variance with pedigree 0.0032, pedigree (2,1,1,5,1)
  Literature value. Total installed capacity in Switzerland in 2008. This value was copied for this global dataset
  Source:
  WWEA 2009. World Wind Energy Report 2008. World Wind Energy Association. p.4
- losses from gross electricity production: 0.005 dimensionless; name gross_net_electricity; lognormal variance with pedigree 0.0113, pedigree (3,3,1,3,3)
  Estimation. The factor for the loss of electricity from gross to net electricity production is an assumption based on experiences, statistics and expertise (1% losses for wind).
- Wind load hours: 1350.36 hour; name wind_load_hours; = ( gross_electricity_2008*(1- gross_net_electricity))/(capacity_installed*1000); lognormal variance with pedigree 0.212, pedigree (5,5,5,5,5)
  Calculated value.
- use of lubricating oil for maintenance: 157.5 kg; name lubricating_oil_maintenance; = 63*(2/0.8); lognormal variance with pedigree 0.0912, pedigree (4,4,5,4,4)
  Estimation of the use of maintenance lubricating oil per year, extrapolated from the 800 kW turbine in (Burger & Bauer 2007) (63 kg per year) with the rate of capacities.
  Uncertainty: estimated variance. Extrapolation factor very rough.
- share of wind turbine 2 MW in 1-3 MW class: 1 dimensionless; name share_turbine_2MW; lognormal variance with pedigree 0.2106, pedigree (5,5,5,5,5)
  Parameter introduced for possible extension of this dataset with wind turbines with other capacities.
  Uncertainty: Uncertainty accounting for the extrapolation of using only a 2 MW wind turbine as a representative for the whole 1-3 MW wind turbine class.
- Percentage of onshore wind power plant class capacity on total: 0.839 dimensionless; name percentage_class_onshore; lognormal variance with pedigree 0.0127, pedigree (3,2,1,5,2)
  Literature value/calculated value. Percentage of installed capacity with onshore wind turbines 1-3 MW on total installed wind capacity installed. Value copied from Switzerland.
  Source: Compilation out of The Wind Power. 2011. Wind turbines and windfarms database. www.thewindpower.net <http://www.thewindpower.net>, Buc (FR)
- gross electricity production in 2008: 1.9e7 kWh; name gross_electricity_2008; lognormal variance with pedigree 0.0042, pedigree (2,1,1,5,2)
  Literature value. Gross value from the official OECD/IEA gross electricity production 2008 statistics, including data from 196 countries. The value for Switzerland was copied for this global dataset.
  IEA/OECD. 2010. Electricity Information 2010. International Energy Agency (IEA), Paris Cedex (FR). Part IV. Detailed OECD Electricity And Heat Data.
  Uncertainty: Basic data from IEA/OECD. Electricity production data with wind power in the US region were taken from EPA 2012 and calculated into the IEA value for 2008.
  EPA. 2012. eGRID 2012 Version 1.0. The Emissions&Generation Resource Integrated Database. US Environmental Protection Agency. http://www.epa.gov/cleanenergy/energy-resources/egrid/index.html

## Reference product
- electricity, high voltage, renewable energy products: 1 kWh; By-product classification allocatable product; CPC 17100: Electrical energy
  production volume 1.32562e8 kWh; name APV_electricity; = 158000000*percentage_class_onshore
    Literature value/statistics. Net production of grid-connected certified electricity in 2011 with this technology in Switzerland.
  property price 0.101 EUR2005
    Temporary price data. Calculated as 90% of purchasers price based on: 94% of the average price (to account for a 6% loss in transformation and transmission) for electricity for industrial consumersin 2005 (excluded taxes). From IEA. In addition, regarding label-certified electricity, the Swiss government has a market instrument for renewable energy which is calculated as the difference between the market price and the production price. This was started in 2009 and is 0.45 Rp/kWh. Therefore, the production price of label certified energy is assumed to be the supplyer price plus the 0.45Rp/kWh (http://www.bfe.admin.ch/themen/00612/02073/index.html?lang=de).The unit conversion from CH to EUR is based on the ecoinvent unit conversion file (1 CHF2005 = 0.644 EUR2005). As an approximation, this is also used for global electricity production

## Inputs from technosphere
- waste mineral oil: -5.83179e-5 kg; name waste_min_oil_10; = (lubricating_oil)*-1; lognormal variance with pedigree 0.002, pedigree (1,1,3,1,1)
  Calculated value. The same amount as lubricating oil use.
  production volume 7730.74 kg; = waste_min_oil_10* APV_electricity
    Calculated from production volume of reference product using the relative outputs.
  property price 0 EUR2005; name waste_min_oil_10_price_EUR2005
  properties: heating value, net 34.7 MJ, carbon content, fossil 0.864444, wet mass 1 kg, dry mass 0.9 kg, water content 0.111111
  note on heating value, net: Value taken from the general comment of the treatment dataset.
  note on carbon content, fossil: Tab A.6, ecoinvent v2.2 report 13_I. C content has been calculated after data in the tables, and then referred to 1 kg DM
- wind turbine network connection, 2MW, onshore: 1.85136e-8 unit; = (1/(lifetime*(capacity_MW*1000)*wind_load_hours))* share_turbine_2MW; lognormal variance with pedigree 0.227, pedigree (5,5,5,5,5)
  Calculated value
  properties: lifetime 20 year
  note on lifetime: Estimation/literature value. Today, wind turbine producers often use a lifetime of 20 years for all parts of the wind turbine in their financial calculataions, even if it can be assumed that the foundation could have a longer lifetime.
- wind turbine, 2MW, onshore: 1.85136e-8 unit; = (1/(lifetime*(capacity_MW*1000)*wind_load_hours))* share_turbine_2MW; lognormal variance with pedigree 0.227, pedigree (5,5,5,5,5)
  Calculated value
  property capacity [MW] 2 MW; name capacity_MW
  property lifetime 20 year; name lifetime
- transport, freight, lorry 7.5-16 metric ton, EURO3: 4.3187e-12 metric ton*km; = ((lubricating_oil/1000)/2)*(distance*2*lifetime/(lifetime*(capacity_MW*1000)*wind_load_hours))
  Calculated value. Two maintenance transports to the power plant with 200 km each. Once a year, the lubricating oil is transported and changed.
- lubricating oil: 5.83179e-5 kg; name lubricating_oil; = lubricating_oil_maintenance*lifetime/(lifetime*(capacity_MW*1000)*wind_load_hours); lognormal variance with pedigree 0.002, pedigree (1,1,3,1,1)
  Calculated value/Estimation. Estimated consumption of 157.5 kg lubrication oil per year, extrapolated from the 800 kW turbine in (Burger & Bauer 2004) with the rate of capacities are assumed for maintainance.
  properties: heating value, net 40.2 MJ, dry mass 1 kg, wet mass 1 kg, carbon content, fossil 0.75
  note on heating value, net: Literature value, Source: IPCC 2006, 2006 IPCC Guidelines for National Greenhouse Gas Inventories, Prepared by the National Greenhouse Gas Inventories Programme, Eggleston H.S., Buendia L., Miwa K., Ngara T. and Tanabe K. (eds). Published: IGES, Japan
  note on carbon content, fossil: Lubricating oil is produced from diesel. C-content/dry mass of fats and oils considered 75%, from: ecoinvent v2.2 report, n 15a, pg 40

## Inputs from nature
- Energy, kinetic (in wind), converted [natural resource, in air]: 3.87 MJ

## Sampling procedure
Literature, calculations

## Extrapolations
This dataset has been extrapolated from year 2015 to the year of the calculation (2021). The uncertainty has been adjusted accordingly.

## Review by Carl Vadenbo 2015-05-22
The update of the whole electricity sector for the ecoinvent v3.2 database consist of hundreds of datasets. All these datasets have passed through a streamlined review processes where the underlying modelling of production volumes, technology shares and efficiencies was reviewed in detail prior to the datasets being submitted to the database.
