# phosphoric acid production, dihydrate process

Dataset: EcoSpold 2, unit process
Geography: RER
Time period: 2011-01-01 to 2021-12-31
Technology level: current
Classification: ISIC rev.4 ecoinvent: 2012:Manufacture of fertilizers and nitrogen compounds
Synonyms: Orthophosphoric acid
Scenario: Business-as-Usual
System model: Allocation, cut-off by classification
Generated by: Anna Kounina
Database: ecoinvent
isCopyrightProtected: true
accessRestrictedTo: 1

## General comment
This dataset represents the production of 1 kg of phosphoric acid, with 51% P2O5. Phosphoric acid is an ancillary product, mainly used in the fertiliser manufacturing industry to produce phosphorous containing fertilisers. Phosphate rock and sulphuric acid are the raw materials to produce phosphoric acid. Phosphate minerals are digested with an acid. There are several technologies to manufacture phosphoric acid, the main ones being the hemihydrate and the dihydrate processes. The hemihydrate process is more energy efficient while the dihydrate process is more simple to operate. In this dataset, a combination of the dihydrate and the hemihydrate production processes is represented in a proportion of 80% (dihydrate) to 20% (hemihydrate). An average transport distance of the phosphate rock to the phosphoric acid plant is included with the respective fuel demand and assumed by tanker and train.
The main data source for this dataset is Fertilizers Europe (2000), complemented by Althaus et al (2007).
References:
Kongshaug G. (1998): Energy Consumption and Greenhouse Gas Emissions in Fertilizer Production. IFA 20th July 1998
Davies J., Haglund C. (1999): Life Cycle Inventory of Fertiliser Production. SIK-Report No 654 1999. Chalmers University of Technology, Sweden.
Fertilizers Europe (2000): Best Available Techniques for Pollution Prevention and Control in the European Fertilizer Industry. Booklet No. 2 of 8: Production of Phosphoric acid. Fertilizers Europe, Brussels.
Patyk R., Reinhardt, G.A. (1997): Düngemittel - Energie- und Stoffstrombilanzen. Vieweg Verlag, Braunschweig.
Fertilizers Europe (2016): Average Emissions Year 2014. Fertilizers Europe Environmental report (internal). Used for updated energy and GHG emission in Carbon Footprint Calculator
Althaus H.-J., Chudacoff M., Hischier R., Jungbluth N., Osses M. and Primas A. (2007) Life Cycle Inventories of Chemicals. ecoinvent report No. 8, v2.0. EMPA Dübendorf, Swiss Centre for Life Cycle Inventories, Dübendorf, CH.

## Included activities start
The activity includes all the raw and processed materials necessary to produce this product. Phosphate rock, sulfuric acid, quicklime, electricity and steam are included. Direct emissions to air and water are included.

## Included activities end
The activity ends with the final product being ready for transportation at the production site.

## Geography
The dataset is representative of phosphoric acid production in Europe

## Technology
This datasets corresponds to a mix of technologies used in Europe for phosphoric acid production, assuming 80% following the dihydrate process and 20% the hemihydrate process.

## Time period
Primary data were collected on fertiliser production for the year 2011. These data were based on annual average data for the year 2011.

## Reference product
- phosphoric acid, fertiliser grade, without water, in 70% solution state: 1 kg; name RP; By-product classification allocatable product; CPC 34232: Phosphoric acid; CAS 7664-38-2
  production volume 2.4525e9 kg; name PVRP
    Kg/y, International Fertilizers Association (2014).
  property price 0.242 EUR2005; name RP_price_EUR2005
    Temporary price data. Calculated as 90% of purchasers price based on: 2005 import prices (total trades (USD) divided by total weight (kg) in biggest economies of the world: EU27, USA, Brasil, China, India, Japan and Russia) from UN Commodity Trade Statistics Database (http://data.un.org/Explorer.aspxDatabase [Accessed 2011.06.22]). Commodity: Phosphoric acid and polyphosphoric acids
  property oxygen content 0.304333
    Oxygen content (on a dry matter basis) of phosphoric acid, fertiliser grade, without water, in 70% solution state is calculated from the molecular formula of the substance (H3PO4).
  property carbon content, fossil 0
    Carbon content, fossil is calculated based on the chemical formula of the substance.
  property phosphorus content 0.235667
    Phosphorus content (on a dry matter basis) of phosphoric acid, fertiliser grade, without water, in 70% solution state is calculated from the molecular formula of the substance (H3PO4).
  property carbon content 0
    carbon content on a dry matter basis (reserved; not for manual entry)
  properties: wet mass 1 kg, carbon content, non-fossil 0, water in wet mass 0 kg, dry mass 1 kg, water content 0, carbon allocation 0 kg

## Inputs from technosphere
- electricity, low voltage: 0.0684722 kWh; lognormal variance with pedigree 0.0413, pedigree (2,2,5,1,1)
  Data from Fertilizer Europe (2014).
- tap water: 2.465 kg; lognormal variance with pedigree 0.0413, pedigree (2,2,5,1,1)
  Data from Fertilizer Europe (2014).
  properties: water content 2962.17, carbon content, fossil 0.00178991, wet mass 1 kg, dry mass 0.000337476 kg
  note on carbon content, fossil: Bicarbonate content is 2.93 mol/m3. CO2 content is 0.1 mol/m3 (ecoinvent v2.2 report 8, Tab 93.1).
- quicklime, milled, loose: 0.0400444 kg; lognormal variance with pedigree 0.0413, pedigree (2,2,5,1,1)
  Estimation, based on various data sources (Althaus et al. 2007).
  properties: dry mass 0.99 kg, water content 0.010101, wet mass 1 kg
- waste gypsum: 0 kg; name BP; pedigree (1,1,1,1,1)
  Data from Fertilizer Europe (2014).
  production volume 0 kg
    Calculated based on the production volume of the reference product.
  property price 0 EUR2005; name BP_price_EUR2005
  properties: water content 0.240695, wet mass 1 kg, dry mass 0.806 kg
- phosphoric acid factory, fertiliser grade: 1.51111e-10 unit; lognormal variance with pedigree 0.0413, pedigree (2,2,5,1,1)
  Estimation, based on various data sources (Althaus et al. 2007).
- phosphate rock, beneficiated: 1.65278 kg; lognormal variance with pedigree 0.0413, pedigree (2,2,5,1,1)
  Data from Fertilizer Europe (2014).
  properties: dry mass 1 kg, wet mass 1 kg, oxygen content 0.180345, phosphorus content 0.139655
  note on oxygen content: Oxygen content (on a dry matter basis) of phosphate rock, beneficiated is calculated from the molecular formula of the substance ().
  note on phosphorus content: Phosphorus content (on a dry matter basis) of phosphate rock, beneficiated is calculated from the molecular formula of the substance ().
- sulfuric acid: 1.36 kg; lognormal variance with pedigree 0.0413, pedigree (2,2,5,1,1)
  Data from Fertilizer Europe (2014).
  properties: wet mass 1 kg, dry mass 1 kg
- steam, in chemical industry: 0.8075 kg; lognormal variance with pedigree 0.0413, pedigree (2,2,5,1,1)
  Calculation, based on Fertilizer Europe (2014).
  properties: dry mass 1 kg, wet mass 1 kg
- waste gypsum: -2.39883, -0.113395 kg (2 entries); lognormal variance with pedigree 0.0413, pedigree (2,2,5,1,1)
  Data from Fertilizer Europe (2014).
  production volume 6.16123e9 kg

## Inputs from nature
- Occupation, industrial area [natural resource, land]: 2.33278e-5 m2*year; lognormal variance with pedigree 0.0807, pedigree (2,2,5,1,1)
  Estimation, based on various data sources (Althaus et al. 2007).
- Transformation, to unspecified [natural resource, land]: 1.58667e-6 m2; lognormal variance with pedigree 0.1607, pedigree (2,2,5,1,1)
  Estimation, based on various data sources (Althaus et al. 2007).
- Water, river [natural resource, in water]: 0.00261611 m3; lognormal variance with pedigree 0.0413, pedigree (2,2,5,1,1)
  Estimation, based on various data sources (Althaus et al. 2007).
- Transformation, to pasture, man made [natural resource, land]: 1.58667e-6 m2; lognormal variance with pedigree 0.1607, pedigree (2,2,5,1,1)
  Estimation, based on various data sources (Althaus et al. 2007).
- Occupation, construction site [natural resource, land]: 0.220056 m2*year; lognormal variance with pedigree 0.0807, pedigree (2,2,5,1,1)
  Estimation, based on various data sources (Althaus et al. 2007).
- Transformation, from industrial area [natural resource, land]: 0.000203056 m2; lognormal variance with pedigree 0.1607, pedigree (2,2,5,1,1)
  Estimation, based on various data sources (Althaus et al. 2007).
- Transformation, from unspecified [natural resource, land]: 1.58667e-6 m2; lognormal variance with pedigree 0.1607, pedigree (2,2,5,1,1)
  Estimation, based on various data sources (Althaus et al. 2007).
- Water, cooling, unspecified natural origin [natural resource, in water]: 0.0618611 m3; lognormal variance with pedigree 0.0413, pedigree (2,2,5,1,1)
  Estimation, based on various data sources (Althaus et al. 2007).
- Transformation, from pasture, man made [natural resource, land]: 1.58667e-6 m2; lognormal variance with pedigree 0.1607, pedigree (2,2,5,1,1)
  Estimation, based on various data sources (Althaus et al. 2007).
- Transformation, to industrial area [natural resource, land]: 0.000203056 m2; lognormal variance with pedigree 0.1607, pedigree (2,2,5,1,1)
  Estimation, based on various data sources (Althaus et al. 2007).

## Emissions to nature
- Silicon tetrafluoride [air, non-urban air or from high stacks]: 1.58667e-6 kg; lognormal variance with pedigree 0.0807, pedigree (2,2,5,1,1)
  Estimation, based on various data sources (Althaus et al. 2007).
- Thorium-228 [air, non-urban air or from high stacks]: 3.40944e-6 kBq; lognormal variance with pedigree 0.0807, pedigree (2,2,5,1,1)
  Estimation, based on various data sources (Althaus et al. 2007).
- Phosphate [water, ocean]: 0.00167167 kg; lognormal variance with pedigree 0.0807, pedigree (2,2,5,1,1)
  Estimation, based on various data sources (Althaus et al. 2007).
- Manganese [water, ground-]: 5.78e-10 kg; lognormal variance with pedigree 0.6907, pedigree (2,2,5,1,1)
  Estimation, based on various data sources (Althaus et al. 2007).
- Radium-226 [water, ground-]: 0.0005695 kBq; lognormal variance with pedigree 0.6907, pedigree (2,2,5,1,1)
  Estimation, based on various data sources (Althaus et al. 2007).
- Radon-222 [air, non-urban air or from high stacks]: 1.39778 kBq; lognormal variance with pedigree 0.0807, pedigree (2,2,5,1,1)
  Estimation, based on various data sources (Althaus et al. 2007).
- Nickel, ion [water, ocean]: 1.46389e-6 kg; lognormal variance with pedigree 0.6907, pedigree (2,2,5,1,1)
  Estimation, based on various data sources (Althaus et al. 2007).
- Particulates, > 2.5 um, and < 10um [air, urban air close to ground]: 0.000594056 kg; lognormal variance with pedigree 0.1607, pedigree (2,2,5,1,1)
  Data from Fertilizer Europe (2014).
- Calcium, ion [water, ground-]: 2.07778e-5 kg; lognormal variance with pedigree 0.6907, pedigree (2,2,5,1,1)
  Estimation, based on various data sources (Althaus et al. 2007).
- Calcium, ion [water, ocean]: 0.0380611 kg; lognormal variance with pedigree 0.6907, pedigree (2,2,5,1,1)
  Estimation, based on various data sources (Althaus et al. 2007).
- Arsenic, ion [water, ground-]: 3.26778e-10 kg; lognormal variance with pedigree 0.6907, pedigree (2,2,5,1,1)
  Estimation, based on various data sources (Althaus et al. 2007).
- Lead-210 [water, ground-]: 0.000508111 kBq; lognormal variance with pedigree 0.6907, pedigree (2,2,5,1,1)
  Estimation, based on various data sources (Althaus et al. 2007).
- Chromium, ion [water, ground-]: 4.19333e-11 kg; lognormal variance with pedigree 0.6907, pedigree (2,2,5,1,1)
  Estimation, based on various data sources (Althaus et al. 2007).
- Lead-210 [air, non-urban air or from high stacks]: 0.000136944 kBq; lognormal variance with pedigree 0.0807, pedigree (2,2,5,1,1)
  Estimation, based on various data sources (Althaus et al. 2007).
- Radium-226 [air, non-urban air or from high stacks]: 0.000153944 kBq; lognormal variance with pedigree 0.0807, pedigree (2,2,5,1,1)
  Estimation, based on various data sources (Althaus et al. 2007).
- Thorium-228 [water, ground-]: 6.22389e-6 kBq; lognormal variance with pedigree 0.6907, pedigree (2,2,5,1,1)
  Estimation, based on various data sources (Althaus et al. 2007).
- Water [water, unspecified]: 0.0396667 m3; lognormal variance with pedigree 0.0807, pedigree (2,2,5,1,1)
  Estimation, based on various data sources (Althaus et al. 2007).
- Sulfate [water, ground-]: 4.675e-5 kg; lognormal variance with pedigree 0.0807, pedigree (2,2,5,1,1)
  Estimation, based on various data sources (Althaus et al. 2007).
- Polonium-210 [water, ground-]: 0.000772556 kBq; lognormal variance with pedigree 0.6907, pedigree (2,2,5,1,1)
  Estimation, based on various data sources (Althaus et al. 2007).
- Cadmium, ion [water, ocean]: 8.18833e-7 kg; lognormal variance with pedigree 0.6907, pedigree (2,2,5,1,1)
  Estimation, based on various data sources (Althaus et al. 2007).
- Uranium-238 [water, ocean]: 0.0509056 kBq; lognormal variance with pedigree 0.6907, pedigree (2,2,5,1,1)
  Estimation, based on various data sources (Althaus et al. 2007).
- Lead [water, ground-]: 6.62056e-11 kg; lognormal variance with pedigree 0.6907, pedigree (2,2,5,1,1)
  Estimation, based on various data sources (Althaus et al. 2007).
- Phosphate [water, ground-]: 1.28444e-6 kg; lognormal variance with pedigree 0.0807, pedigree (2,2,5,1,1)
  Estimation, based on various data sources (Althaus et al. 2007).
- Polonium-210 [water, ocean]: 0.151111 kBq; lognormal variance with pedigree 0.6907, pedigree (2,2,5,1,1)
  Estimation, based on various data sources (Althaus et al. 2007).
- Fluorine [air, urban air close to ground]: 0.000116167 kg; lognormal variance with pedigree 0.0807, pedigree (2,2,5,1,1)
  Data from Fertilizer Europe (2014).
- Sulfate [water, ocean]: 0.0754611 kg; lognormal variance with pedigree 0.0807, pedigree (2,2,5,1,1)
  Estimation, based on various data sources (Althaus et al. 2007).
- Zinc, ion [water, ocean]: 2.24778e-6 kg; lognormal variance with pedigree 0.6907, pedigree (2,2,5,1,1)
  Estimation, based on various data sources (Althaus et al. 2007).
- Potassium-40 [water, ocean]: 0.0119944 kBq; lognormal variance with pedigree 0.6907, pedigree (2,2,5,1,1)
  Estimation, based on various data sources (Althaus et al. 2007).
- Potassium-40 [air, non-urban air or from high stacks]: 1.36944e-5 kBq; lognormal variance with pedigree 0.0807, pedigree (2,2,5,1,1)
  Estimation, based on various data sources (Althaus et al. 2007).
- Uranium-238 [air, non-urban air or from high stacks]: 1.19e-5 kBq; lognormal variance with pedigree 0.0807, pedigree (2,2,5,1,1)
  Estimation, based on various data sources (Althaus et al. 2007).
- Chromium, ion [water, ocean]: 2.41778e-7 kg; lognormal variance with pedigree 0.6907, pedigree (2,2,5,1,1)
  Estimation, based on various data sources (Althaus et al. 2007).
- Fluoride [water, ground-]: 9.27444e-8 kg; lognormal variance with pedigree 0.6907, pedigree (2,2,5,1,1)
  Estimation, based on various data sources (Althaus et al. 2007).
- Copper, ion [water, ocean]: 2.67278e-7 kg; lognormal variance with pedigree 0.6907, pedigree (2,2,5,1,1)
  Estimation, based on various data sources (Althaus et al. 2007).
- Potassium-40 [water, ground-]: 6.13889e-5 kBq; lognormal variance with pedigree 0.6907, pedigree (2,2,5,1,1)
  Estimation, based on various data sources (Althaus et al. 2007).
- Water [air, unspecified]: 0.0275683 m3; = 0.02627+2.92/1000; lognormal variance with pedigree 0.0807, pedigree (2,2,5,1,1)
  Calculation, based on Fertilizer Europe (2014).
- Polonium-210 [air, non-urban air or from high stacks]: 0.000238944 kBq; lognormal variance with pedigree 0.0807, pedigree (2,2,5,1,1)
  Estimation, based on various data sources (Althaus et al. 2007).
- Lead-210 [water, ocean]: 0.0991667 kBq; lognormal variance with pedigree 0.6907, pedigree (2,2,5,1,1)
  Estimation, based on various data sources (Althaus et al. 2007).
- Zinc, ion [water, ground-]: 1.74722e-9 kg; lognormal variance with pedigree 0.6907, pedigree (2,2,5,1,1)
  Estimation, based on various data sources (Althaus et al. 2007).
- Arsenic, ion [water, ocean]: 2.16278e-6 kg; lognormal variance with pedigree 0.6907, pedigree (2,2,5,1,1)
  Estimation, based on various data sources (Althaus et al. 2007).
- Nickel, ion [water, ground-]: 2.69167e-10 kg; lognormal variance with pedigree 0.6907, pedigree (2,2,5,1,1)
  Estimation, based on various data sources (Althaus et al. 2007).
- Cadmium, ion [water, ground-]: 6.8e-10 kg; lognormal variance with pedigree 0.6907, pedigree (2,2,5,1,1)
  Estimation, based on various data sources (Althaus et al. 2007).
- Copper, ion [water, ground-]: 1.60556e-9 kg; lognormal variance with pedigree 0.6907, pedigree (2,2,5,1,1)
  Estimation, based on various data sources (Althaus et al. 2007).
- Thorium-228 [water, ocean]: 0.00121833 kBq; lognormal variance with pedigree 0.6907, pedigree (2,2,5,1,1)
  Estimation, based on various data sources (Althaus et al. 2007).
- Fluoride [water, surface water]: 0.000391944 kg; lognormal variance with pedigree 0.6907, pedigree (2,2,5,1,1)
  Estimation, based on various data sources (Althaus et al. 2007).
- Lead [water, ocean]: 1.12389e-7 kg; lognormal variance with pedigree 0.6907, pedigree (2,2,5,1,1)
  Estimation, based on various data sources (Althaus et al. 2007).
- Uranium-238 [water, ground-]: 0.000260667 kBq; lognormal variance with pedigree 0.6907, pedigree (2,2,5,1,1)
  Estimation, based on various data sources (Althaus et al. 2007).
- Radium-226 [water, ocean]: 0.111444 kBq; lognormal variance with pedigree 0.6907, pedigree (2,2,5,1,1)
  Estimation, based on various data sources (Althaus et al. 2007).
- Manganese [water, ocean]: 1.38833e-6 kg; lognormal variance with pedigree 0.6907, pedigree (2,2,5,1,1)
  Estimation, based on various data sources (Althaus et al. 2007).

## Extrapolations
This dataset has been extrapolated from year 2014 to the year of the calculation (2021). The uncertainty has been adjusted accordingly.
