# transport, freight, lorry, all sizes, EURO3 to generic market for transport, freight, lorry, unspecified

Dataset: EcoSpold 2, unit process
Geography: RER
Time period: 2010-01-01 to 2021-12-31
Technology level: old
Classification: ISIC rev.4 ecoinvent: 4923:Freight transport by road
Tags: linking activity
Scenario: Business-as-Usual
System model: Allocation, cut-off by classification
Generated by: Tereza Levova
Database: ecoinvent
isCopyrightProtected: true
accessRestrictedTo: 1

## General comment
This is a linking activity which transfers part of the production volume of the specific transport, freight, lorry of all sizes, EURO3 to the generic market for transport, freight, lorry, unspecified.
The transport, freight, lorry, unspecified is meant to be used by activities, where the size and EURO class of the transport supplied is unkown.
[This dataset is meant to replace the following datasets:
- size-specific lorry transport to generic market for lorry transport, RER, 2005 - 2005]

## Reference product
- transport, freight, lorry, unspecified: 1 metric ton*km; name transport_RP; By-product classification allocatable product; CPC 6511: Road transport services of freight
  production volume 2.7225e11 metric ton*km; name transport_RP_PV; = (357000000000*0.9*0.5)+(20000000000*0.9*0.5)+(24000000000*0.9*0.5)+(204000000000*0.9*0.5)
    Estimated.
    The production volume is calculated as a sum of all the "transport, freight, lorry, ..., EURO3" activities. There the production volumes for Europe are taken from the TREMOVE project and the GLO production volumes are calculated using GDP scaling. If the GDP of the whole world (GLO) is 1 the GDP of Europe (RER) is 0.289.
    It is estimated, that 10% of this transport is used for transport of goods in need of atmosphere control. And thus this production volume is included in the "transport, freight, lorry ... with refrigeration machine" datasets.
    It is also estimated, that 50% of the production volume of this transport is transfered to the generic market for transport, freight, lorry, unspecified. Which means, that 50% of people using this transport do not know or do not care about the size of the vehicle and the EURO class.
  property price 0.0244767 EUR2005; name transport_RP_price_EUR2005
    Calculated based on inputs: The price of the product has been calculated as a sum of the values of the material and energy inputs for this product. This value is therefore a rough estimation. It may underestimate the real price since there are additional expenses when producing any product. These expences can include for example labour costs, treatment of waste materials and profit for the producer. Please consider carefully whether this level of data quality is acceptable for your application.

## Inputs from technosphere
- transport, freight, lorry 7.5-16 metric ton, EURO3: 0.0396694 metric ton*km; name trans_03; = (24000000000*0.9*0.5)/ transport_RP_PV; lognormal variance with pedigree 0.0026, pedigree (1,1,3,1,1)
  Calculated from the production volumes.
  The production volume is taken from the "transport, freight, lorry, ..., EURO3" activities. There the production volumes for Europe are taken from the TREMOVE project and the GLO production volumes are calculated using GDP scaling. If the GDP of the whole world (GLO) is 1 the GDP of Europe (RER) is 0.289.
  It is estimated, that 10% of this transport is used for transport of goods in need of atmosphere control. And thus this production volume is included in the "transport, freight, lorry ... with refrigeration machine" datasets.
  It is also estimated, that 50% of the production volume of this transport is transfered to the generic market for transport, freight, lorry, unspecified. Which means, that 50% of people using this transport do not know or do not care about the size of the vehicle and the EURO class.
- transport, freight, lorry >32 metric ton, EURO3: 0.590083 metric ton*km; name trans_01; = (357000000000*0.9*0.5)/ transport_RP_PV; lognormal variance with pedigree 0.0026, pedigree (1,1,3,1,1)
  (same comment as for transport, freight, lorry 7.5-16 metric ton, EURO3)
- transport, freight, lorry 3.5-7.5 metric ton, EURO3: 0.0330579 metric ton*km; name trans_02; = (20000000000*0.9*0.5)/ transport_RP_PV; lognormal variance with pedigree 0.0026, pedigree (1,1,3,1,1)
  (same comment as for transport, freight, lorry 7.5-16 metric ton, EURO3)
- transport, freight, lorry 16-32 metric ton, EURO3: 0.33719 metric ton*km; name trans_04; = transport_RP-trans_01-trans_02-trans_03; lognormal variance with pedigree 0.0026, pedigree (1,1,3,1,1)
  (same comment as for transport, freight, lorry 7.5-16 metric ton, EURO3)

## Extrapolations
This dataset has been extrapolated from year 2015 to the year of the calculation (2021). The uncertainty has been adjusted accordingly.
