# hydrogen cyanide production

Dataset: EcoSpold 2, unit process
Geography: RER
Time period: 1992-01-01 to 2021-12-31
Technology level: current
Classification: EcoSpold01Categories: chemicals/organics
Classification: ISIC rev.4 ecoinvent: 2011:Manufacture of basic chemicals
Synonyms: Prussic acid; hydrocyanic acid
Tags: ConvertedDataset
Scenario: Business-as-Usual
System model: Allocation, cut-off by classification
Generated by: Roland Hischier
Published in: Althaus H.-J. 2007
Database: ecoinvent
isCopyrightProtected: true
accessRestrictedTo: 1

## General comment
This data represents the production of 1 kg of hydrogen cyanide. Raw materials and emissions are modelled with literature values representing an aggregation of data from 3 production plants. Not included are the values reported for: recyclable wastes, amount of air / N2 / O2 consumed, unspecified metal emission to air and to water, mercaptan emission to air, unspecified CFC/HCFC emission to air, dioxin to water.

## Included activities start
From the reception of methane at the factory gate.

## Included activities end
This activity ends with the production of 1 kg of hydrogen cyanide, 100% at the factory gate. The dataset includes the input materials and emissions.

## Geography
3 European plants (GB, F, D)

## Technology
Historically, HCN gained notoriety for its use as Cyclon B at the Nazi death camps during World War II. It was produced at that time by DeGussa (Deutsche Gold- und Silberscheide-Anstalt). Sodium cyanide continued down HCN’s path to notoriety by being mining companies choice chemical used to extract gold from ore. However, poor practices led to massive environmental contamination in several countries over the past decades2.
The worldwide cyanide production capacity in 1994 was one million tonnes. DuPont is reported to be the dominant producer with close to 40% of production capacity.
The U.S.produced about 1.4 billion pounds (645’000 tonnes) in 1998.
US production had the following uses:
Share (%)
Adiponitrile (for nylon): 41
Acetone cyanohydrin (for methyl methacrylate MMA): 32
Sodium cyanide: 14
methionine: 4
miscellaneous: 9
Major manufacturers include Cyanco, DeGussa-Huls Corp., Dow Chemical Co. and DuPont.
In 1997-2000, European production of toluene was approximately 2.7 million tons. Major plants are operated in Germany, the Netherlands, Italy, Spain, the UK, the US, Japan, Taiwan, South Korea, among others. Major manufacturers include DeGussa, Dow and DuPont.
HCN is produced mostly from the Andrussow and Blausäure-Methan-Ammoniak (BMA) processes, although some HCN is also obtained as a by-product from acrylonitrile production.
Andrussow process:
Filtered air, ammonia and natural gas are fed into a reactor and are heated to 2’200 °C in the presence of a catalyst. The reactor off-gas in cooled and sent through an ammonia absorption process to remove unreacted ammonia. Cold water is then added to capture the HCN. The HCN-water mixture is sent to a stripper, where pure HCN is gained. This step produces wastewater.
2 NH3 + 2 CH4 + 3 O2  2 HCN + 6 H2O (1)
Blausaure-Methan-Ammonia Process:
The BMA process involves the reaction of ammonia with methane without the presence of air. After removal of ammonia and recovery of HCN, the off-gases consist basically of hydrogen. The hydrogen can be used in other processes or burnt as a source of energy.
2 NH3 + 2 CH4  2 HCN + 6 H2 (2)

BMA accounts for 15 % of the total European production.
The production process for hydrogen cyanide was assessed with data based on the years 1992 – 1993 and accounts for about 63’000 tons of HCN produced at three sites in Europe. It cannot be ascertained which processes were used by the companies providing the data – the hydrogen emissions that are listed are no indicator of the actual processes, as hydrogen stemming from the BMA process may be captured and used in other processes and still cause emissions.
References:
http://www.moles.org/ProjectUnderground/reports/goldpack/goldpack_i.html
European Commission (2002) Integrated Pollution Prevention and Control (IPPC) - Reference Document on Best Available Techniques in the Large Vol-ume Organic Chemical Industry. Institute for Prospective Technological Studies, Sevilla
US-EPA (2000) Inorganic hydrogen cyanide Listing Background Document. United States Environmental Protection Agency (US-EPA), Washington D.C. (United States of America)

## Time period
time to which data refer

## Parameters
- fraction, cooling water, once-through system, to air: 0.004 dimensionless; name fraction_CW_OT_to_air; lognormal variance with pedigree 0.0413, pedigree (2,3,1,3,1)
  Calculated based on literature value (Scown, C.D., 2011, Water Footprint of U.S. Transportation Fuels and supplying information of the article) (Vionnet, S., Quantis Water Database - Technical Report, 2012).
- fraction, cooling water, to air: 0.3875 dimensionless; name fraction_CW_to_air; = (0.5*fraction_CW_OT_to_air)+(0.5*fraction_CW_R_to_air); lognormal variance with pedigree 0.092025, pedigree (4,4,3,2,4)
  Calculated value based on literature value (see comments of the other parametres present in this dataset) and expert opinion. In the case when no industry/literature data are available about the type of cooling or directly fraction, cooling water, to air specific for the process a default assumption is applied. It is assumed that the once-through cooling system is used in 50% of all cases and recirculating system is used in another 50% of all cases.
- fraction, process water, to air: 0.205 dimensionless; name fraction_PW_to_air; lognormal variance with pedigree 0.092025, pedigree (4,4,3,2,4)
  Literature value (Statistics Canada, 2007 & Shaffer, K.H., 2008, Consumptive water use in the Great Lakes Basin, USGS) (Vionnet, S., Quantis Water Database - Technical Report, 2012).
- fraction, cooling water, recirculating system, to air: 0.771 dimensionless; name fraction_CW_R_to_air; lognormal variance with pedigree 0.0413, pedigree (2,3,1,3,1)
  (same comment as for fraction, cooling water, once-through system, to air)
- fraction, cooling water, cooling pond system, to air: 0.032 dimensionless; name fraction_CW_CP_to_air; lognormal variance with pedigree 0.0413, pedigree (2,3,1,3,1)
  (same comment as for fraction, cooling water, once-through system, to air)

## Reference product
- hydrogen cyanide: 1 kg; source US-EPA 2000; CPC 341: Basic organic chemicals; By-product classification allocatable product; CAS 74-90-8
  EcoSpold01Location=RER
  HCN is a highly volatile and highly toxic colorless liquid that produces poisonous vapors at room temperature (almond odor). Its molecular weight is 27.03 g/mol. HCN melts at -13.2 °C, and boils just above 25°C. This chemical is used primarily for the production of synthetic fibers, plastics and nitrites.
  production volume 2.335e8 kg
    Worldwide capacity 1994 1 Mt
    Estimated to 1/3 of global production minus the amount from the Sohio process.
  property heating value, net 17.95 MJ
    LHV is calculated based on the elemental composition of the substance. Based on the CAS number of the substance (000074-90-8), the chemical formula of the substance is found to be: CHN, (PubChem 2020).
    Reference: Kim, S., Chen, J., Cheng, T., Gindulyte, A., He, J., He, S., Li, Q., Shoemaker, B. A., Thiessen, P. A., Yu, B., Zaslavsky, L., Zhang, J., & Bolton, E. E. (2019). PubChem 2019 update: improved access to chemical data. Nucleic acids research, 47(D1), D1102–D1109. https://doi.org/10.1093/nar/gky1033
  property price 0.73 EUR2005
    Temporary price data. Calculated as 90% of purchasers price based on: 2004 import and export prices (total trades (USD) divided by total weight (kg) in EU27, USA, China, Japan and India) from UN Commodity Trade Statistics Database (http://data.un.org/Explorer.aspxDatabase [Accessed 2 July 2010]). Commodity: 'Cyanides and cyanide oxides of sodium'
  property carbon content 0.444444
    carbon content on a dry matter basis (reserved; not for manual entry)
  properties: dry mass 1 kg, water in wet mass 0 kg, carbon content, non-fossil 0, water content 0, carbon content, fossil 0.444444, wet mass 1 kg, carbon allocation 0.444444 kg

## Inputs from technosphere
All rows: source Boustead, I. 2005
- average incineration residue: -0.042021 kg
  EcoSpold01Location=CH
  Literature value. Aggregated data from 3 production sites in Europe.
  production volume 9.8119e6 kg
    Calculated from the production volume of hydrogen cyanide in proportion to the respective output amounts.
  properties: dry mass 1 kg, wet mass 1 kg, carbon content, non-fossil 0.0511208, carbon content, fossil 0.0325466
  note on carbon content, non-fossil: Tab A.1, ecoinvent v2.2 report 13_I. It is considered that 61.1% of the C has a biogenic origin
- decommissioned chemical production facilities: -1.6332e-9 kg
  EcoSpold01Location=RER
  Literature value. Aggregated data from 3 production sites in Europe.
  production volume 0.381352 kg
    (same comment as for average incineration residue)
  properties: dry mass 1 kg, carbon content, non-fossil 5.78006e-6, carbon content, fossil 0.0169382, wet mass 1 kg
  note on carbon content, non-fossil: Calculated from C content in input materials in the infrastructure
- municipal solid waste: -0.007887 kg
  EcoSpold01Location=CH
  Literature value. Aggregated data from 3 production sites in Europe.
  production volume 1.84161e6 kg
    (same comment as for average incineration residue)
  properties: heating value, net 11.74 MJ, carbon content, fossil 0.171549, wet mass 1 kg, water content 0.297017, dry mass 0.771 kg, carbon content, non-fossil 0.261655
  note on heating value, net: Value taken from the general comment of the treatment dataset.
  note on carbon content, fossil: MSW composition in tab 4.1, ecoinvent v2.2 report 13_I. C content referred to 1 kg DM
- hazardous waste, for incineration: 0 kg
  Literature value. Aggregated data from 3 production sites in Europe.
  EcoSpold01Location=CH
  production volume 0 kg
    (same comment as for average incineration residue)
  properties: dry mass 0.75 kg, water content 0.333333, wet mass 1 kg, heating value, net 17 MJ, carbon content, fossil 0.554667
  note on carbon content, fossil: Tab A.6, ecoinvent v2.2 report 13_I. C content has been calculated after data in the tables, and then referred to 1 kg DM
- waste plastic, mixture: -7.1917e-6 kg
  Literature value. Aggregated data from 3 production sites in Europe.
  EcoSpold01Location=CH
  production volume 1679.26 kg
    (same comment as for average incineration residue)
  properties: dry mass 0.847 kg, carbon content, fossil 0.747344, wet mass 1 kg, water content 0.180638, heating value, net 30.79 MJ
  note on carbon content, fossil: C content in 1 kg DM was calculated using data in Tab A.2, ecoinvent v2.2 report 13_I
- spoil from hard coal mining: -0.0354 kg
  EcoSpold01Location=GLO
  Literature value. Aggregated data from 3 production sites in Europe.
  production volume 8.2659e6 kg
    (same comment as for average incineration residue)
  properties: carbon content, fossil 0.007879, wet mass 1 kg, dry mass 1 kg
  note on carbon content, fossil: Composition of coal spoil is adopted by proxy from lignite spoil (pg 19, Doka G. (2009) Life Cycle Inventory of the disposal of lignite spoil, coal spoil and coal tailings. Doka Life Cycle Assessments, Zurich. Commissioned by the Swiss Centre for Life Cycle Inventories ecoinvent Centre)
- coal slurry: -9.7368e-6 kg
  (same comment as for spoil from hard coal mining)
  production volume 2273.54 kg
    (same comment as for average incineration residue)
  properties: wet mass 1 kg, dry mass 1 kg, carbon content, fossil 0.124
  note on carbon content, fossil: Coal tailings composition in Tab 3.4, (Doka G. (2009) Life Cycle Inventory of the disposal of lignite spoil, coal spoil and coal tailings. Doka Life Cycle Assessments, Zurich. Commissioned by the Swiss Centre for Life Cycle Inventories ecoinvent Centre)
- waste wood, untreated: -8.1295e-7 kg
  Literature value. Aggregated data from 3 production sites in Europe.
  EcoSpold01Location=CH
  production volume 189.824 kg
    (same comment as for average incineration residue)
  properties: wet mass 1 kg, dry mass 0.8 kg, heating value, net 13.99 MJ, carbon content, non-fossil 0.48632, water content 0.25
  note on carbon content, non-fossil: Tab A.4, ecoinvent v2.2 report 13_I. C content has been referred to 1 kg DM,
- hazardous waste, for incineration: -0.009304, -0.000243201 kg (2 entries)
  Literature value. Aggregated data from 3 production sites in Europe.
  EcoSpold01Location=CH
  production volume 2.22927e6 kg

## Inputs from nature
- Titanium, in ground [natural resource, in ground]: 0 kg; source Boustead, I. 2005
  95% TiO2 in rutile; 0.4% TiO2 in ore; Literature value. Aggregated data from 3 production sites in Europe.
- Peat, in ground [natural resource, biotic]: 1.0736e-5 kg; source Boustead, I. 2005
  Literature value. Aggregated data from 3 production sites in Europe.
- Water, salt, ocean [natural resource, in water]: 6.8699e-8 m3; name water_salt_ocean_input; source Boustead, I. 2005; lognormal variance with pedigree 1.21, pedigree (5,5,5,5,5)
  Literature value. Aggregated data from 3 production sites in Europe.
- Coal, hard, unspecified, in ground [natural resource, in ground]: 0.16513 kg; source Boustead, I. 2005
  Literature value. Aggregated data from 3 production sites in Europe.
- Mercury, in ground [natural resource, in ground]: 1.4058e-8 kg; source Boustead, I. 2005
  Literature value. Aggregated data from 3 production sites in Europe.
- Chromium, in ground [natural resource, in ground]: 1.824e-12 kg; source Boustead, I. 2005
  25.5% Cr in chromite; 11.6% in ore; Literature value. Aggregated data from 3 production sites in Europe.
- Granite, in ground [natural resource, in ground]: 7.9493e-15 kg; source Boustead, I. 2005
  Literature value. Aggregated data from 3 production sites in Europe.
- Copper, in ground [natural resource, in ground]: 8.833e-11 kg; source Boustead, I. 2005
  0.99% Cu in sulfide; 0.36% Cu and 82 ppm Mo in ore; Literature value. Aggregated data from 3 production sites in Europe.
- Fluorspar, in ground [natural resource, in ground]: 1.6497e-5 kg; source Boustead, I. 2005
  92% CaF2 in ore; Literature value. Aggregated data from 3 production sites in Europe.
- Water, unspecified natural origin [natural resource, in water]: 0.013548 m3; name water_UNO_input; source Boustead, I. 2005; lognormal variance with pedigree 1.21, pedigree (5,5,5,5,5)
  Literature value. Aggregated data from 3 production sites in Europe.
- Zinc, in ground [natural resource, in ground]: 3.2628e-8 kg; source Boustead, I. 2005
  9.0% Zn in sulfide; 5.3% Zn in ore; Literature value. Aggregated data from 3 production sites in Europe.
- Dolomite, in ground [natural resource, in ground]: 1.4179e-6 kg; source Boustead, I. 2005
  Literature value. Aggregated data from 3 production sites in Europe.
- Magnesite, in ground [natural resource, in ground]: 0 kg; source Boustead, I. 2005
  60% Magnesite in ore; Literature value. Aggregated data from 3 production sites in Europe.
- Iron, in ground [natural resource, in ground]: 0.00011604 kg; source Boustead, I. 2005
  46% Fe in siderite; 25% Fe in ore; Literature value. Aggregated data from 3 production sites in Europe.
- Water, river [natural resource, in water]: 0.001951 m3; name water_river_input; source Boustead, I. 2005; lognormal variance with pedigree 1.21, pedigree (5,5,5,5,5)
  Literature value. Aggregated data from 3 production sites in Europe.
- Lead, in ground [natural resource, in ground]: 8.9171e-7 kg; source Boustead, I. 2005
  5.0% Pb in sulfide; 3.0% Pb in ore; Literature value. Aggregated data from 3 production sites in Europe.
- Sand, unspecified, in ground [natural resource, in ground]: 0.011348 kg; source Boustead, I. 2005
  Literature value. Aggregated data from 3 production sites in Europe.
- Uranium, in ground [natural resource, in ground]: 7.8711e-6 kg; source Boustead, I. 2005
  Literature value. Aggregated data from 3 production sites in Europe.
- Coal, brown, in ground [natural resource, in ground]: 1.7972e-6 kg; source Boustead, I. 2005
  Literature value. Aggregated data from 3 production sites in Europe.
- Nickel, in ground [natural resource, in ground]: 5.6499e-11 kg; source Boustead, I. 2005
  1.98% Ni in silicates; 1.04% Ni in ore; Literature value. Aggregated data from 3 production sites in Europe.
- Clay, bentonite, in ground [natural resource, in ground]: 9.622e-8 kg; source Boustead, I. 2005
  Literature value. Aggregated data from 3 production sites in Europe.
- Gravel, in ground [natural resource, in ground]: 4.2813e-7 kg; source Boustead, I. 2005
  Literature value. Aggregated data from 3 production sites in Europe.
- Energy, potential (in hydropower reservoir), converted [natural resource, in water]: 0.5375 MJ
- Energy, gross calorific value, in biomass [natural resource, biotic]: 0.33952 MJ
- Aluminium, in ground [natural resource, in ground]: 6.2998e-5 kg; source Boustead, I. 2005
  24% Al in bauxite; 11% Al in ore; Literature value. Aggregated data from 3 production sites in Europe.
- Calcite, in ground [natural resource, in ground]: 0.0013928 kg; source Boustead, I. 2005
  Literature value. Aggregated data from 3 production sites in Europe.
- Sodium nitrate, in ground [natural resource, in ground]: 0 kg; source Boustead, I. 2005
  Literature value. Aggregated data from 3 production sites in Europe.
- Talc, in ground [natural resource, in ground]: 0 kg; source Boustead, I. 2005
  Literature value. Aggregated data from 3 production sites in Europe.
- Sulfur, in ground [natural resource, in ground]: 0.022063 kg; source Boustead, I. 2005
  Literature value. Aggregated data from 3 production sites in Europe.
- Feldspar, in ground [natural resource, in ground]: 0 kg; source Boustead, I. 2005
  Literature value. Aggregated data from 3 production sites in Europe.
- Phosphorus, in ground [natural resource, in ground]: 0.0026212 kg; source Boustead, I. 2005
  18% P in apatite; 12% in ore; Literature value. Aggregated data from 3 production sites in Europe.
- Sylvite, in ground [natural resource, in ground]: 1.3559e-6 kg; source Boustead, I. 2005
  25% Sylvite in sylvinite; Literature value. Aggregated data from 3 production sites in Europe.
- Oil, crude, in ground [natural resource, in ground]: 0.31036 kg; source Boustead, I. 2005
  Literature value. Aggregated data from 3 production sites in Europe.
- Wood, unspecified, standing [natural resource, biotic]: 6.1809e-8 m3; source Boustead, I. 2005
  Literature value. Aggregated data from 3 production sites in Europe.
- Barium, in ground [natural resource, in ground]: 5.1403e-7 kg; source Boustead, I. 2005
  15% BaSO4 in ore; Literature value. Aggregated data from 3 production sites in Europe.
- Water, cooling, unspecified natural origin [natural resource, in water]: 0.071289 m3; name water_cooling_UNO_input; source Boustead, I. 2005; lognormal variance with pedigree 1.21, pedigree (5,5,5,5,5)
  Literature value. Aggregated data from 3 production sites in Europe.
- Olivine, in ground [natural resource, in ground]: 1.0886e-6 kg; source Boustead, I. 2005
  Literature value. Aggregated data from 3 production sites in Europe.
- Anhydrite, in ground [natural resource, in ground]: 1.553e-9 kg; source Boustead, I. 2005
  Literature value. Aggregated data from 3 production sites in Europe.
- Clay, unspecified, in ground [natural resource, in ground]: 2.3766e-9 kg; source Boustead, I. 2005
  Literature value. Aggregated data from 3 production sites in Europe.
- Shale, in ground [natural resource, in ground]: 4.3971e-9 kg; source Boustead, I. 2005
  Literature value. Aggregated data from 3 production sites in Europe.
- Gas, natural, in ground [natural resource, in ground]: 2.4129 m3; source Boustead, I. 2005
  Literature value. Aggregated data from 3 production sites in Europe.
- Manganese, in ground [natural resource, in ground]: 1.4966e-7 kg; source Boustead, I. 2005
  35.7% Mn in sedimentary deposit; 14.2% Mn in ore; Literature value. Aggregated data from 3 production sites in Europe.
- Sodium chloride, in ground [natural resource, in ground]: 0.0072227 kg; source Boustead, I. 2005
  Literature value. Aggregated data from 3 production sites in Europe.
- Water, well, in ground [natural resource, in water]: 0.00038541 m3; name water_well_in_ground_input; source Boustead, I. 2005; lognormal variance with pedigree 1.21, pedigree (5,5,5,5,5)
  Literature value. Aggregated data from 3 production sites in Europe.

## Emissions to nature
- Hydrogen sulfide [air, urban air close to ground]: 3.8781e-9 kg; source Boustead, I. 2005
  Literature value. Aggregated data from 3 production sites in Europe.
- Sulfate [water, surface water]: 0.0025355 kg; source Boustead, I. 2005
  Literature value. Aggregated data from 3 production sites in Europe.
- Particulates, < 2.5 um [air, urban air close to ground]: 0.00040545 kg; source Boustead, I. 2005
  Literature value. Aggregated data from 3 production sites in Europe.
- Nitrogen oxides [air, urban air close to ground]: 0.0073103 kg; source Boustead, I. 2005
  Literature value. Aggregated data from 3 production sites in Europe.
- Benzene [air, urban air close to ground]: 1.7799e-10 kg; source Boustead, I. 2005
  Literature value. Aggregated data from 3 production sites in Europe.
- Ammonia [air, urban air close to ground]: 0.00010834 kg; source Boustead, I. 2005
  Literature value. Aggregated data from 3 production sites in Europe.
- TOC, Total Organic Carbon [water, surface water]: 1.0046e-6 kg; source Boustead, I. 2005
  Literature value. Aggregated data from 3 production sites in Europe.
- NMVOC, non-methane volatile organic compounds, unspecified origin [air, urban air close to ground]: 0.0039944 kg; source Boustead, I. 2005
  Literature value. Aggregated data from 3 production sites in Europe.
- DOC, Dissolved Organic Carbon [water, surface water]: 1.0046e-6 kg
  Estimation. Calculated as equal to TOC.
- Iron, ion [water, surface water]: 6.6981e-9 kg; source Boustead, I. 2005
  Literature value. Aggregated data from 3 production sites in Europe.
- Ethene [air, urban air close to ground]: 6.72e-11 kg; source Boustead, I. 2005
  Literature value. Aggregated data from 3 production sites in Europe.
- Ethene, chloro- [air, urban air close to ground]: 8.7373e-10 kg; source Boustead, I. 2005
  Literature value. Aggregated data from 3 production sites in Europe.
- Cyanide [water, surface water]: 4.3293e-5 kg; source Boustead, I. 2005
  Literature value. Aggregated data from 3 production sites in Europe.
- Hydrocarbons, chlorinated [air, urban air close to ground]: 1.2856e-9 kg; source Boustead, I. 2005
  Literature value. Aggregated data from 3 production sites in Europe.
- Chromium, ion [water, surface water]: 1.6058e-10 kg; source Boustead, I. 2005
  Literature value. Aggregated data from 3 production sites in Europe.
- Ethane, 1,2-dichloro- [air, urban air close to ground]: 3.8927e-11 kg; source Boustead, I. 2005
  Literature value. Aggregated data from 3 production sites in Europe.
- Benzene, ethyl- [air, urban air close to ground]: 1.4517e-11 kg; source Boustead, I. 2005
  Literature value. Aggregated data from 3 production sites in Europe.
- Strontium [water, surface water]: 2.03e-10 kg; source Boustead, I. 2005
  Literature value. Aggregated data from 3 production sites in Europe.
- Propene [air, urban air close to ground]: 4.9589e-11 kg; source Boustead, I. 2005
  Literature value. Aggregated data from 3 production sites in Europe.
- Fluorine [air, urban air close to ground]: 3.2283e-9 kg; source Boustead, I. 2005
  Literature value. Aggregated data from 3 production sites in Europe.
- Methane, fossil [air, urban air close to ground]: 0.10181 kg; source Boustead, I. 2005
  Literature value. Aggregated data from 3 production sites in Europe.
- Dinitrogen monoxide [air, urban air close to ground]: 1.5421e-12 kg; source Boustead, I. 2005
  Literature value. Aggregated data from 3 production sites in Europe.
- Cadmium, ion [water, surface water]: 3.3433e-14 kg; source Boustead, I. 2005
  Literature value. Aggregated data from 3 production sites in Europe.
- Hydrocarbons, aliphatic, alkanes, cyclic [air, urban air close to ground]: 7.9694e-11 kg; source Boustead, I. 2005
  Literature value. Aggregated data from 3 production sites in Europe.
- Ethene, chloro- [water, surface water]: 1.6106e-11 kg; source Boustead, I. 2005
  Literature value. Aggregated data from 3 production sites in Europe.
- Hydrogen [air, urban air close to ground]: 7.9478e-5 kg; source Boustead, I. 2005
  Literature value. Aggregated data from 3 production sites in Europe.
- Cadmium [air, urban air close to ground]: 1.9272e-11 kg; source Boustead, I. 2005
  Literature value. Aggregated data from 3 production sites in Europe.
- Arsenic, ion [water, surface water]: 5.967e-11 kg; source Boustead, I. 2005
  Literature value. Aggregated data from 3 production sites in Europe.
- Phenol [water, surface water]: 6.0283e-9 kg; source Boustead, I. 2005
  Literature value. Aggregated data from 3 production sites in Europe.
- Water [air, unspecified]: 0.0308808 m3; name water_to_air_unspecified; = (water_cooling_UNO_input*fraction_CW_to_air)+(water_river_input*fraction_PW_to_air)+(water_salt_ocean_input*fraction_PW_to_air)+(water_UNO_input*fraction_PW_to_air)+(water_well_in_ground_input*fraction_PW_to_air); lognormal variance with pedigree 0.0807, pedigree (2,2,5,1,1)
  Calculated value based on literature values and expert opinion. See comments in the parametres' comment field.
  property fraction, origin: salt water 4.56053e-7; name fraction_origin_salt_water
  property fraction, origin: fresh water 0.0155101; name fraction_origin_fresh_water
  property fraction, origin: unspecified 0.984489; name fraction_origin_unspecified
- Lead [water, surface water]: 1.8805e-10 kg; source Boustead, I. 2005
  Literature value. Aggregated data from 3 production sites in Europe.
- Carbon disulfide [air, urban air close to ground]: 1.1317e-14 kg; source Boustead, I. 2005
  Literature value. Aggregated data from 3 production sites in Europe.
- Water [water, unspecified]: 0.0562927 m3; name water_to_water_unspecified; = water_cooling_UNO_input*(1-fraction_CW_to_air)+water_river_input*(1-fraction_PW_to_air)+water_salt_ocean_input*(1-fraction_PW_to_air)+water_UNO_input*(1-fraction_PW_to_air)+water_well_in_ground_input*(1-fraction_PW_to_air); lognormal variance with pedigree 0.0807, pedigree (2,2,5,1,1)
  (same comment as for Water)
  property water in wet mass 1000 kg; name WWM
  property carbon content, fossil 0; name C_content_fossil
  property fraction, origin: unspecified 0.967003; name fraction_origin_unspecified_Ww
  property fraction, origin: fresh water 0.0329962; name fraction_origin_fresh_water_Ww
  property fraction, origin: salt water 9.7021e-7; name fraction_origin_salt_water_Ww
  property dry mass 0 kg; name DM
  property wet mass 1000 kg; name WM
  property carbon content, non-fossil 0; name C_content_non_fossil
- Cyanide [air, urban air close to ground]: 4.7994e-5 kg; source Boustead, I. 2005
  Literature value. Aggregated data from 3 production sites in Europe.
- Nickel, ion [water, surface water]: 7.9402e-8 kg; source Boustead, I. 2005
  Literature value. Aggregated data from 3 production sites in Europe.
- Acidity, unspecified [water, surface water]: 9.9976e-5 kg; source Boustead, I. 2005
  Literature value. Aggregated data from 3 production sites in Europe.
- Chloride [water, surface water]: 0.0041549 kg; source Boustead, I. 2005
  Literature value. Aggregated data from 3 production sites in Europe.
- Silver [air, urban air close to ground]: 0 kg; source Boustead, I. 2005
  Literature value. Aggregated data from 3 production sites in Europe.
- Arsenic [air, urban air close to ground]: 1.3082e-11 kg; source Boustead, I. 2005
  Literature value. Aggregated data from 3 production sites in Europe.
- Sulfate [air, urban air close to ground]: 8.7385e-14 kg; source Boustead, I. 2005
  Literature value. Aggregated data from 3 production sites in Europe.
- Sodium, ion [water, surface water]: 0.00090533 kg; source Boustead, I. 2005
  Literature value. Aggregated data from 3 production sites in Europe.
- Mercury [air, urban air close to ground]: 2.1613e-9 kg; source Boustead, I. 2005
  Literature value. Aggregated data from 3 production sites in Europe.
- Sulfide [water, surface water]: 1.006e-12 kg; source Boustead, I. 2005
  Literature value. Aggregated data from 3 production sites in Europe.
- Oils, unspecified [water, surface water]: 7.3012e-9 kg; source Boustead, I. 2005
  Literature value. Aggregated data from 3 production sites in Europe.
- Aldehydes, unspecified [air, urban air close to ground]: 2.5046e-15 kg; source Boustead, I. 2005
  Literature value. Aggregated data from 3 production sites in Europe.
- Chlorate [water, surface water]: 1.8327e-6 kg; source Boustead, I. 2005
  Literature value. Aggregated data from 3 production sites in Europe.
- Selenium [air, urban air close to ground]: 0 kg; source Boustead, I. 2005
  Literature value. Aggregated data from 3 production sites in Europe.
- Hydrogen fluoride [air, urban air close to ground]: 3.3931e-6 kg; source Boustead, I. 2005
  Literature value. Aggregated data from 3 production sites in Europe.
- Carbon dioxide, non-fossil [air, urban air close to ground]: 0.0060733 kg; source Boustead, I. 2005
  Literature value. Aggregated data from 3 production sites in Europe.
- Carbon monoxide, fossil [air, urban air close to ground]: 0.0041135 kg; source Boustead, I. 2005
  Literature value. Aggregated data from 3 production sites in Europe.
- Copper, ion [water, surface water]: 1.1781e-7 kg; source Boustead, I. 2005
  Literature value. Aggregated data from 3 production sites in Europe.
- Chlorinated solvents, unspecified [water, surface water]: 1.0797e-7 kg; source Boustead, I. 2005
  Literature value. Aggregated data from 3 production sites in Europe.
- Hydrogen chloride [air, urban air close to ground]: 9.0344e-5 kg; source Boustead, I. 2005
  Literature value. Aggregated data from 3 production sites in Europe.
- Nickel [air, urban air close to ground]: 7.9937e-11 kg; source Boustead, I. 2005
  Literature value. Aggregated data from 3 production sites in Europe.
- Nitrogen [water, surface water]: 2.6579e-7 kg; source Boustead, I. 2005
  Literature value. Aggregated data from 3 production sites in Europe.
- Lead [air, urban air close to ground]: 1.9518e-10 kg; source Boustead, I. 2005
  Literature value. Aggregated data from 3 production sites in Europe.
- Particulates, > 2.5 um, and < 10um [air, urban air close to ground]: 0.00069738 kg; source Boustead, I. 2005
  Literature value. Aggregated data from 3 production sites in Europe.
- Mercury [water, surface water]: 3.3637e-10 kg; source Boustead, I. 2005
  Literature value. Aggregated data from 3 production sites in Europe.
- Antimony [air, urban air close to ground]: 1.5318e-14 kg; source Boustead, I. 2005
  Literature value. Aggregated data from 3 production sites in Europe.
- Manganese [water, surface water]: 2.3784e-13 kg; source Boustead, I. 2005
  Literature value. Aggregated data from 3 production sites in Europe.
- Methane, non-fossil [air, urban air close to ground]: 0.00013174 kg; source Boustead, I. 2005
  Literature value. Aggregated data from 3 production sites in Europe.
- Hydrocarbons, aromatic [air, urban air close to ground]: 7.4179e-7 kg; source Boustead, I. 2005
  Literature value. Aggregated data from 3 production sites in Europe.
- Toluene [air, urban air close to ground]: 3.1759e-11 kg; source Boustead, I. 2005
  Literature value. Aggregated data from 3 production sites in Europe.
- BOD5, Biological Oxygen Demand [water, surface water]: 4.9778e-5 kg; source Boustead, I. 2005
  Literature value. Aggregated data from 3 production sites in Europe.
- Copper [air, urban air close to ground]: 1.7725e-13 kg; source Boustead, I. 2005
  Literature value. Aggregated data from 3 production sites in Europe.
- Xylene [air, urban air close to ground]: 1.4161e-11 kg; source Boustead, I. 2005
  Literature value. Aggregated data from 3 production sites in Europe.
- Magnesium [water, surface water]: 9.403e-10 kg; source Boustead, I. 2005
  Literature value. Aggregated data from 3 production sites in Europe.
- Dissolved solids [water, surface water]: 0.00079285 kg; source Boustead, I. 2005
  Literature value. Aggregated data from 3 production sites in Europe.
- Zinc [air, urban air close to ground]: 1.9913e-10 kg; source Boustead, I. 2005
  Literature value. Aggregated data from 3 production sites in Europe.
- Fluoride [water, surface water]: 6.0011e-6 kg; source Boustead, I. 2005
  Literature value. Aggregated data from 3 production sites in Europe.
- AOX, Adsorbable Organic Halogen as Cl [water, surface water]: 4.24e-12 kg; source Boustead, I. 2005
  Literature value. Aggregated data from 3 production sites in Europe.
- Styrene [air, urban air close to ground]: 1.2259e-12 kg; source Boustead, I. 2005
  Literature value. Aggregated data from 3 production sites in Europe.
- Benzene [water, surface water]: 2.6719e-12 kg; source Boustead, I. 2005
  Literature value. Aggregated data from 3 production sites in Europe.
- Ammonium, ion [water, surface water]: 0.00097399 kg; source Boustead, I. 2005
  Literature value. Aggregated data from 3 production sites in Europe.
- Carbon dioxide, fossil [air, urban air close to ground]: 4.6933 kg; source Boustead, I. 2005
  Literature value. Aggregated data from 3 production sites in Europe.
- Aluminium [water, surface water]: 1.3247e-7 kg; source Boustead, I. 2005
  Literature value. Aggregated data from 3 production sites in Europe.
- COD, Chemical Oxygen Demand [water, surface water]: 0.00072052 kg; source Boustead, I. 2005
  Literature value. Aggregated data from 3 production sites in Europe.
- Suspended solids, unspecified [water, surface water]: 0.00095463 kg; source Boustead, I. 2005
  Literature value. Aggregated data from 3 production sites in Europe.
- Silicon [water, surface water]: 0 kg; source Boustead, I. 2005
  Literature value. Aggregated data from 3 production sites in Europe.
- Tin, ion [water, surface water]: 1.8016e-15 kg; source Boustead, I. 2005
  Literature value. Aggregated data from 3 production sites in Europe.
- Zinc, ion [water, surface water]: 1.9799e-7 kg; source Boustead, I. 2005
  Literature value. Aggregated data from 3 production sites in Europe.
- Hydrocarbons, unspecified [water, surface water]: 1.6679e-5 kg; source Boustead, I. 2005
  Literature value. Aggregated data from 3 production sites in Europe.
- Phosphorus [water, surface water]: 0.0004142 kg; source Boustead, I. 2005
  Literature value. Aggregated data from 3 production sites in Europe.
- Calcium, ion [water, surface water]: 5.9084e-7 kg; source Boustead, I. 2005
  Literature value. Aggregated data from 3 production sites in Europe.
- Chlorine [air, urban air close to ground]: 1.5989e-7 kg; source Boustead, I. 2005
  Literature value. Aggregated data from 3 production sites in Europe.
- Sulfur dioxide [air, urban air close to ground]: 0.0084234 kg; source Boustead, I. 2005
  Literature value. Aggregated data from 3 production sites in Europe.
- Nitrate [water, surface water]: 3.3476e-5 kg; source Boustead, I. 2005
  Literature value. Aggregated data from 3 production sites in Europe.
- Bromate [water, surface water]: 5.6275e-10 kg; source Boustead, I. 2005
  Literature value. Aggregated data from 3 production sites in Europe.
- Ethane, 1,2-dichloro- [water, surface water]: 8.8184e-13 kg; source Boustead, I. 2005
  Literature value. Aggregated data from 3 production sites in Europe.
- Chlorine [water, surface water]: 4.2821e-9 kg; source Boustead, I. 2005
  Literature value. Aggregated data from 3 production sites in Europe.
- Particulates, > 10 um [air, urban air close to ground]: 0.00051898 kg; source Boustead, I. 2005
  Literature value. Aggregated data from 3 production sites in Europe.
- Carbon monoxide, non-fossil [air, urban air close to ground]: 5.3231e-6 kg; source Boustead, I. 2005
  Literature value. Aggregated data from 3 production sites in Europe.
- Chromium [air, urban air close to ground]: 1.0318e-10 kg; source Boustead, I. 2005
  Literature value. Aggregated data from 3 production sites in Europe.
- Potassium, ion [water, surface water]: 4.2556e-8 kg; source Boustead, I. 2005
  Literature value. Aggregated data from 3 production sites in Europe.
- Carbonate [water, surface water]: 8.7848e-7 kg; source Boustead, I. 2005
  Literature value. Aggregated data from 3 production sites in Europe.
- Methane, dichloro-, HCC-30 [air, urban air close to ground]: 4.1719e-10 kg; source Boustead, I. 2005
  Literature value. Aggregated data from 3 production sites in Europe.
- Dioxins, measured as 2,3,7,8-tetrachlorodibenzo-p-dioxin [air, urban air close to ground]: 0 kg; source Boustead, I. 2005
  Literature value. Aggregated data from 3 production sites in Europe.

## Sampling procedure
literature values based on company survey

## Extrapolations
This dataset has been extrapolated from year 2001 to the year of the calculation (2021). The uncertainty has been adjusted accordingly.

## Review by Emilia Moreno Ruiz 2012-05-31
dataset documented by trainee Helen Hamilton

## Review by Jürgen Sutter 2010-04-06
passed.
