# bamboo forestry, sustainable forest management

Dataset: EcoSpold 2, unit process
Geography: PH
Time period: 2010-01-01 to 2021-12-31
Technology level: current
Classification: ISIC rev.4 ecoinvent: 0230:Gathering of non-wood forest products
Scenario: Business-as-Usual
System model: Allocation, cut-off by classification
Generated by: Edwin Zea Escamilla
Database: ecoinvent
isCopyrightProtected: true
accessRestrictedTo: 1

## General comment
This dataset represents the production of 1 Kg of bamboo culm which is the stem of bamboo. Although bamboo culm is not itself considered a construction material, the culm is used for the production of bamboo pole which can be used directly for the construction of columns, beams, or struts and other bamboo-based construction materials. Each species of bamboo yields different numbers of culms per year. This number can be influenced by fertiliser use and natural events (Liu et al., 2011). The culms can be extracted manually or using a chainsaw but lack a direct application as a construction material because their high water content (u= ca. 80 %), and when untreated their service life is approximately three years (De Flander and Rovers, 2009; Riaño et al., 2002). The production takes place at a bamboo forest or intermediary processing facility. The figures origin from mainly calculations and literature values. This dataset was developed with the support of the International Organization for Bamboo and Rattan INBAR.
Ref:
De Flander, K. and R. Rovers, One laminated bamboo-frame house per hectare per year. Construction and Building Materials, 2009. 23(1): p. 210-218.
Liu, J., et al., Seasonal soil CO2 efflux dynamics after land use change from a natural forest to Moso bamboo plantations in subtropical China. Forest Ecology and Management, 2011. 262(6): p. 1131-1137.
Riaño, N.M., et al., Plant growth and biomass distribution on Guadua angustifolia Kunth in relation to ageing in the Valle del Cauca – Colombia. Bamboo Science and Culture, 2002. 16(1): p. 43-51.
Zea Escamilla, E. and Habert, G., Environmental impacts from the production of bamboo based construction materials representing the global production diversity. Journal of Cleaner Production, 2013

## Included activities start
From transformation of land into Bamboo Forest and reception of fertilisers

## Included activities end
This activity ends with Bamboo Culm (u=80%) at forest. The dataset includes the CO2 absorption from air and the land use for the bamboo to grow. Since branches and leaves stay on the ground in the forest, i.e. do not leave the system, they are neglected in this dataset. The dataset does not include infrastructure, soil preparation, changes in carbon content in soil, use of pesticides, irrigation, and plantation of seedling, and leaching of pesticides and fertilisers.
All transport for this product is included in the respective market activity. At the plantation there is no mechanical transport, since plantations are rather small and the bamboo groove is very dense and cannot be easily accessed by vehicles. The culms will be trimmed and the pulled/transported to a collection point, where they can be picked up.

## Geography
Data for the Philippines

## Technology
Current production technology

## Reference product
- bamboo culm: 1 kg; CPC 03: Forestry and logging products; By-product classification allocatable product
  production volume 5.14134e6 kg; = 1.53*3360353.04
    The production volume is a rough estimate based on the annual production volume bamboo pole assuming that all bamboo culms are further processed into bamboo poles. 1.53 Kg of bamboo culm is required to produce 1 Kg of bamboo pole.
    All production volumes of bamboo products are calculated based on production volumes of glued laminated bamboo and woven bamboo mat panels, which are the end products of the bamboo production chain (as represented in the ecoinvent database). These are based on export data retrieved from INBAR (at <http://trade.inbar.int:10444/>, last accessed in December 2020) and the global GDP and GDP of the Philippines for 2018 (retrieved from <https://unstats.un.org/unsd/snaama/Basic>, filtered for GDP, At current price- US Dollar, last accessed in November 2020).
  property wet mass 1 kg; name WM_culm
  property carbon content, non-fossil 0.494; name CC_culm
    biogenic carbon content on a dry matter basis
  property price 0.107527 EUR2005
    Based on expert judgement, price given as 0.13 USD/kg. Converted with an exchange rate of 1EURO = 1.209 USD.
  property heating value, net 9.87 MJ
    LHV is calculated based on Carbon and water in wet mass content.
  property dry mass 0.555556 kg; name DM_culm
  property carbon content 0.494
    carbon content on a dry matter basis (reserved; not for manual entry)
  properties: carbon content, fossil 0, water content 0.8, water in wet mass 0.444444 kg, carbon allocation 0.274444 kg

## Inputs from technosphere
- inorganic potassium fertiliser, as K2O: 0.00215 kg; lognormal variance with pedigree 0.004425, pedigree (2,3,3,2,2)
  Considered as part of typical fertilizing mixture on managed bamboo plantations
  properties: wet mass 1 kg, dry mass 1 kg
- inorganic phosphorus fertiliser, as P2O5: 0.000708 kg; lognormal variance with pedigree 0.004425, pedigree (2,3,3,2,2)
  Considered as part of typical fertilizing mixture on managed bamboo plantations
  properties: wet mass 1 kg, dry mass 1 kg
- inorganic nitrogen fertiliser, as N: 0.00215 kg; name amount_inorganic_N_fert; lognormal variance with pedigree 0.004425, pedigree (2,3,3,2,2)
  Considered as part of typical fertilizing mixture on managed bamboo plantations
  properties: dry mass 1 kg, wet mass 1 kg
- power sawing, with catalytic converter: 0.000333333 hour; = (0.02/60)*WM_culm; lognormal variance with pedigree 0.004425, pedigree (2,3,3,2,2)
  0.02 minutes sawing per kg of bamboo culm

## Inputs from nature
- Energy, gross calorific value, in biomass [natural resource, biotic]: 10.7056 MJ; = DM_culm*19.27; lognormal variance with pedigree 0.004425, pedigree (2,3,3,2,2)
  dry mass of the culm x gross calorific value of bamboo
- Wood, unspecified, standing [natural resource, biotic]: 0.00269273 m3; = DM_culm/ DM_wood_standing; lognormal variance with pedigree 0.130725, pedigree (4,2,3,2,5)
  This input is used as a proxy to reflect bamboo, standing. The water properties have been adjusted according to the properties of the specific bamboo species (Bambusa blumeana)
  property dry mass 206.317 kg; name DM_wood_standing
- Occupation, forest, intensive [natural resource, land]: 0.408163 m2*year; = 10000/24500.00000049; lognormal variance with pedigree 0.052625, pedigree (3,3,3,2,3)
  Value has been calculated based on an average yearly harvest of 24500 Kg per hectare. The value is specific for Bambusa blumeana bamboo
- Transformation, to forest, intensive [natural resource, land]: 0.0204082 m2; = 10000/(24500.00000049*20); lognormal variance with pedigree 0.132625, pedigree (3,3,3,2,3)
  Value has been calculated based on an average yearly harvest of 24500 Kg per hectare. The value is specific for Bambusa blumeana bamboo. A rotation period of 5 years is assumed but only 25% of the culms are extracted during this time period. Thus, only after 20 years the whole area will be harvested.
- Transformation, from pasture, man made [natural resource, land]: 0.0204082 m2; = 10000/(24500.00000049*20); lognormal variance with pedigree 0.132625, pedigree (3,3,3,2,3)
  (same comment as for Transformation, to forest, intensive)
- Carbon dioxide, in air [natural resource, in air]: 1.0063 kg; = DM_culm* CC_culm/(12/44); lognormal variance with pedigree 0.004425, pedigree (2,3,3,2,2)
  Carbon uptake from air into the product calculated based on the carbon content and dry mass of the product. Scaled to the molar mass from C to CO2. Branches and leaves are not taken into account, since they do not leave the system.

## Emissions to nature
- Carbon dioxide, fossil [air, unspecified]: 0.00219572 kg; = 0.2/0.272916486782489*amount_inorganic_N_fert*0.65*2.144; source IPCC 2006; lognormal variance with pedigree 0.004425, pedigree (2,3,3,2,2)
  Carbon dioxide released from urea application, according to IPCC (2006). Roughly 65% of inorganic nitrogen fertiliser is assumed to be urea. All Carbon in urea is assumed to form CO2 which is then emitted to air. CO2 emissions are caluclated as C_content_urea/ C_content_CO2*Amount_Urea. The share of urea (i.e. 65 %) is based on the market shares of the market for "inorganic nitrogen fertiliser, as N" of the Philippines
  property carbon content, fossil 0.272916; name C_content_CO2

## Sampling procedure
The dataset is mostly based on literature values and was developed with the support of the International Organization for Bamboo and Rattan INBAR

## Extrapolations
This dataset has been extrapolated from year 2020 to the year of the calculation (2021). The uncertainty has been adjusted accordingly.
