# treatment of used tablet, mechanical treatment

Dataset: EcoSpold 2, unit process
Geography: GLO
Time period: 2020-01-01 to 2021-12-31
Technology level: current
Classification: EcoSpold01Categories: waste management/recycling
Classification: ISIC rev.4 ecoinvent: 3830:Materials recovery
Tags: Treatment
Scenario: Business-as-Usual
System model: Allocation, cut-off by classification
Generated by: Nikolia Stoikou
Published in: Hischier R. 2007
Database: ecoinvent
isCopyrightProtected: true
accessRestrictedTo: 1

## General comment
Manual dismantling plus subsequent shredding/separation procedure, based on calculations in accordance with the composition data of the product.

## Included activities end
This dataset represents the mechanical treatment of a WEEE devices in Switzerland. Two process steps are included: manual depollution and the mechanical treatment (shredder) of the remaining part.

## Geography
European data, used as average for global situation

## Technology
4-step-procedure (shredder - separation - shredder - separation) as used currently often in Europe

## Reference product
- used tablet: -1 kg; name RP; By-product classification Waste; CPC 39990: Other wastes n.e.c.
  production volume 1.441e8 kg; name PV_RP
    Source: IDC Worldwide Quarterly PCD Tracker (2020, January 30). Worldwide Tablet Shipments Continue to Decline in Q4 2019, According to IDC [Press Release]. Retrieved from https://www.idc.com/getdoc.jsp?containerId=prUS45959420
  property price 0 EUR2005; name RP_price_EUR2005
    Waste products are assigned a price of zero as they are assumed to require further treatment.
  property carbon content 0.178332
    carbon content on a dry matter basis (reserved; not for manual entry)
  properties: water content 0, dry mass 1 kg, carbon content, fossil 0.178256, water in wet mass 0 kg, wet mass 1 kg, carbon content, non-fossil 7.60429e-5, carbon allocation 0.178332 kg

## By-products
- electronics scrap: 0 kg; By-product classification Recyclable; CPC 39: Wastes or scraps; pedigree (1,1,1,1,1)
  Calculated - based on composition data
  production volume 0 kg; = PV_RP * abs( W4_elec_scrap/RP)
    Calculated from the production volume of the reference prdoduct in proportion to the respective output amounts.
  property water content 0; name water_content
  property carbon content, fossil 0.317311; name C_content_fossil
    Carbon content assumed equal with the intermediate exchange of "electronic component, passive, unspecified"
  property dry mass 1 kg; name DM
  property water in wet mass 0 kg; name WWM
  property price 16.1 EUR2005
    Temporary price data. Calculated as 90% of purchasers price based on: 2005 import prices (total trades (USD) divided by total weight (kg) in biggest economies of the world: EU27, USA, Brasil, China, India, Japan and Russia) from UN Commodity Trade Statistics Database (http://data.un.org/Explorer.aspxDatabase [Accessed 2011.06.20]). Commodity: Waste/scrap, precious metals except pure gold/platinum
  property carbon content, non-fossil 0.0045566; name C_content_non_fossil
    (same comment as for electronics scrap)
  property wet mass 1 kg; name WM
  property carbon content 0.321868
    carbon content on a dry matter basis (reserved; not for manual entry)
  properties: carbon allocation 0.321868 kg
- aluminium scrap, post-consumer, prepared for melting: 0 kg; By-product classification Recyclable; CPC 39363: Waste and scrap of aluminium; pedigree (1,1,1,1,1)
  Calculated - based on composition data
  production volume 0 kg; = PV_RP * abs( W2_alum/RP)
    (same comment as for electronics scrap)
  property price 0.806 EUR2005
    Temporary price data. Calculated as 90% of purchasers price based on: 2005 import and export prices (total trades (USD) divided by total weight (kg) in biggest economies of the world: EU27, USA, Brasil, China, India, Japan and Russia) from UN Commodity Trade Statistics Database (http://data.un.org/Explorer.aspxDatabase [Accessed 2011.06.17]). Commodity: Waste or scrap, aluminium
  property carbon content 0
    carbon content on a dry matter basis (reserved; not for manual entry)
  properties: wet mass 1 kg, water in wet mass 0 kg, dry mass 1 kg, carbon content, non-fossil 0, water content 0, carbon content, fossil 0, carbon allocation 0 kg
- iron scrap, sorted, pressed: 0 kg; CPC 39310: Slag, dross, scalings and other waste from the manufacture of iron or steel; By-product classification Recyclable; pedigree (1,1,1,1,1)
  Calculated - based on composition data
  production volume 0 kg; = PV_RP * abs( W3_iron/RP)
    (same comment as for electronics scrap)
  property price 0.175 EUR2005
    Temporary price data. Calculated as 90% of purchasers price based on: 2005 import and export prices (total trades (USD) divided by total weight (kg) in biggest economies of the world: EU27, USA, Brasil, China, India, Japan and Russia) from UN Commodity Trade Statistics Database (http://data.un.org/Explorer.aspxDatabase [Accessed 2011.06.20]). Commodity: Waste or scrap, of cast iron
  property carbon content 0
    carbon content on a dry matter basis (reserved; not for manual entry)
  properties: water in wet mass 0 kg, water content 0, wet mass 1 kg, carbon content, fossil 0, dry mass 1 kg, carbon content, non-fossil 0, carbon allocation 0 kg

## Inputs from technosphere
- used Li-ion battery: -0.266 kg; name U1; lognormal variance with pedigree 0.0142, pedigree (3,4,2,1,1)
  Calculated - based on composition data
  production volume 3.83306e7 kg; = PV_RP * abs( U1/RP)
    (same comment as for electronics scrap)
  property price 0 EUR2005; name U1_price_EUR2005
  properties: carbon content, fossil 0.328011, wet mass 1 kg, dry mass 1 kg
- residue from mechanical treatment, laptop computer: 0 kg; name W5_residue; pedigree (1,1,1,1,1)
  Calculated - based on composition data
  EcoSpold01Location=CH
  Uncertainty: calculated - based on composition data
  production volume 0 kg
    (same comment as for electronics scrap)
  property price 0 EUR2005; name W5_residue_price_EUR2005
  properties: dry mass 1 kg, heating value, net 31.96 MJ, wet mass 1 kg, carbon content, fossil 0.766065
  note on heating value, net: Value taken from the general comment of the treatment dataset.
  note on carbon content, fossil: Tab 4.19, ecoinvent v2.2 report 18_V, for details in fraction composition. Carbon content in plastic was calculated using data in Tab A.2, ecoinvent v2.2 report 13_I. Others was also considered plastic, and calculated the same way (from pg 70, ecoinvent v2.2 report 18_V). Ferro was assumed to have a C content of 0.012 kg C/ kg (C content of steel, calculated out of emission factors published in Commission Decision of 18 July 2007 establishing guidelines for the monitoring and reporting of greenhouse gas emissions pursuant to Directive 2003/87/EC of the European Parliament and of the Council (notified under document number C(2007) 3416)). The other component of the fraction were considered to content no C.
- waste electric and electronic equipment: -0.281 kg; name BP; = ((W1_plastic*-1)+ W2_alum+ W3_iron+ W4_elec_scrap+ (W5_residue*-1))*-1; lognormal variance with pedigree 0.134, pedigree (3,4,5,1,4)
  EcoSpold01Location=GLO
  calculated as the sum of the waste input
  Uncertainty: rough estimation
  production volume 4.04921e7 kg; = PV_RP * abs( BP/RP)
    (same comment as for electronics scrap)
  property price 0 EUR2005; name BP_price_EUR2005
- waste plastic, consumer electronics: 0 kg; name W1_plastic; pedigree (1,1,1,1,1)
  EcoSpold01Location=CH
  Calculated - based on composition data
  Uncertainty: calculated - based on composition data
  production volume 0 kg
    (same comment as for electronics scrap)
  property price 0 EUR2005; name W1_plastic_price_EUR2005
  properties: water content 0.180638, wet mass 1 kg, carbon content, fossil 0.830215, dry mass 0.847 kg, heating value, net 34.78 MJ
  note on carbon content, fossil: C content in 1 kg DM was calculated using data in Tab A.2, ecoinvent v2.2 report 13_I
  note on heating value, net: Assumed equal to "waste plastic, consumer electronics, sorted".
- used printed wiring boards: -0.072 kg; name U2; lognormal variance with pedigree 0.0142, pedigree (3,4,2,1,1)
  EcoSpold01Location=GLO
  Calculated - based on composition data
  Uncertainty: calculated - based on composition data
  production volume 1.03752e7 kg; = PV_RP * abs( U2/RP)
    (same comment as for electronics scrap)
  property price 0 EUR2005; name U2_price_EUR2005
  properties: carbon content, fossil 0.193742, wet mass 1 kg, carbon content, non-fossil 0.000960142, dry mass 1 kg
  note on carbon content, fossil: Composition of printed wiring boards used to calculate C content
- used liquid crystal display module: 0 kg; name U3; pedigree (1,1,1,1,1)
  (same comment as for residue from mechanical treatment, laptop computer)
  production volume 0 kg
    (same comment as for electronics scrap)
  property price 0 EUR2005; name U3_price_EUR2005
  properties: dry mass 1 kg, wet mass 1 kg, carbon content, fossil 0.327872, carbon content, non-fossil 4.20542e-5
- electronics scrap: -0.015 kg; lognormal variance with pedigree 0.2106, pedigree (5,5,5,5,5)
  Calculated - based on composition data
  production volume 2.1615e6 kg
  properties: price 16.1 EUR2005
  note on carbon content, fossil: Carbon content assumed equal with the intermediate exchange of "electronic component, passive, unspecified"
- aluminium scrap, post-consumer, prepared for melting: -0.197 kg; lognormal variance with pedigree 0.2106, pedigree (5,5,5,5,5)
  Calculated - based on composition data
  production volume 2.83877e7 kg
  properties: wet mass 1 kg, price 0.806 EUR2005, dry mass 1 kg
- iron scrap, sorted, pressed: -0.012 kg; lognormal variance with pedigree 0.2106, pedigree (5,5,5,5,5)
  Calculated - based on composition data
  production volume 1.7292e6 kg
  properties: wet mass 1 kg, price 0.175 EUR2005, dry mass 1 kg
- residue from mechanical treatment, laptop computer: -0.000312536, -0.0206875 kg (2 entries); lognormal variance with pedigree 0.0142, pedigree (3,4,2,1,1)
  (same comment as for residue from mechanical treatment, laptop computer)
  production volume 3.0261e6 kg
- waste plastic, consumer electronics: -0.000535774, -0.0354642 kg (2 entries); lognormal variance with pedigree 0.0142, pedigree (3,4,2,1,1)
  (same comment as for waste plastic, consumer electronics)
  production volume 5.1876e6 kg
- used liquid crystal display module: -0.00565539, -0.374345 kg (2 entries); lognormal variance with pedigree 0.0142, pedigree (3,4,2,1,1)
  (same comment as for residue from mechanical treatment, laptop computer)
  production volume 5.4758e7 kg

## Sampling procedure
literature and own experiences

## Extrapolations
This dataset has been extrapolated from year 2020 to the year of the calculation (2021). The uncertainty has been adjusted accordingly.
