# treatment of waste polyvinylchloride, sanitary landfill

Dataset: EcoSpold 2, unit process
Geography: CH
Time period: 1994-01-01 to 2021-12-31
Technology level: current
Classification: ISIC rev.4 ecoinvent: 3821:Treatment and disposal of non-hazardous waste
Classification: EcoSpold01Categories: waste management/sanitary landfill
Synonyms: PVC
Tags: Treatment; ConvertedDataset
Scenario: Business-as-Usual
System model: Allocation, cut-off by classification
Generated by: Gabor Doka (obsolete)
Published in: Doka G. 2007
Database: ecoinvent
isCopyrightProtected: true
accessRestrictedTo: 1

## General comment
Inventoried waste contains 100% PVC; .
waste composition (wet, in ppm): upper heating value 21.67 MJ/kg; lower heating value 21.51 MJ/kg; H2O 2000; O 16911; H 54921; C 440610; S 1057; N 1057; P n.a.; B n.a.; Cl 475290; Br 73.839; F 15.506; I n.a.; Ag n.a.; As 2.0042; Ba 196.73; Cd 2.7546; Co 33.322; Cr 43.106; Cu 28.223; Hg 0.89569; Mn 84.301; Mo n.a.; Ni 21.729; Pb 16.002; Sb 45.323; Se 2.2152; Sn 391.41; V 303.95; Zn 59.775; Be 0.52742; Sc n.a.; Sr 93.353; Ti 1054.8; Tl 0.42194; W n.a.; Si n.a.; Fe 3930; Ca n.a.; Al 210.97; K n.a.; Mg n.a.; Na 1545.9;
Share of carbon in waste that is biogenic 0%.
Overall degradability of waste during 100 years: 1%.
[This dataset was already contained in the ecoinvent database version 2. It was not individually updated during the transfer to ecoinvent version 3. Life Cycle Impact Assessment results may still have changed, as they are affected by changes in the supply chain, i.e. in other datasets. This dataset was generated following the ecoinvent quality guidelines for version 2. It may have been subject to central changes described in the ecoinvent version 3 change report (http://www.ecoinvent.org/database/ecoinvent-version-3/reports-of-changes/), and the results of the central updates were reviewed extensively. The changes added e.g. consistent water flows and other information throughout the database. The documentation of this dataset can be found in the ecoinvent reports of version 2, which are still available via the ecoinvent website. The change report linked above covers all central changes that were made during the conversion process.]

## Included activities end
Waste-specific short-term emissions to air via landfill gas incineration and landfill leachate. Burdens from treatment of short-term leachate (0-100a) in wastewater treatment plant (including WWTP sludge disposal in municipal incinerator). Long-term emissions from landfill to groundwater (after base lining failure).

## Geography
Technology encountered in Switzerland in 2000. Landfill includes base seal, leachate collection system, treatment of leachate in municipal wastewater treatment plant.

## Technology
Swiss municipal sanitary landfill for biogenic or untreated municipal waste ('reactive organic landfill'). Landfill gas and leachate collection system. Recultivation and monitoring for 150 years after closure.

## Reference product
- waste polyvinylchloride: -1 kg; CPC 39270: Waste, parings and scrap of plastics; By-product classification Waste; CAS 9002-86-2
  production volume 0 kg
    estimated proportion; source: ecoinvent v2; value to be replaced by value to be calculated from the demand for this treatment activity
  property price 0 EUR2005
    Waste products are assigned a price of zero as they are assumed to require further treatment.
  property carbon content, fossil 0.440882
    C content in 1 kg DM was calculated using data in Tab A.1, ecoinvent v2.2 report 13_I
  property heating value, net 21.51 MJ
    Value taken from the general comment of the treatment dataset.
  property carbon content 0.440882
    carbon content on a dry matter basis (reserved; not for manual entry)
  properties: water content 0.00200401, water in wet mass 0.002 kg, dry mass 0.998 kg, wet mass 1 kg, carbon content, non-fossil 0, carbon allocation 0.44 kg

## Inputs from technosphere
- wastewater treatment facility, capacity 5E9l/year: 1.42e-11 unit; lognormal variance with pedigree 0.2106, pedigree (5,5,5,5,5)
  burden from wastewater treatment of the short-term leachate (0-100a). Uncertainty calculated from unertainty of the waste composition of this waste, uncertainty in waste decomposition and short-term leaching in sanitary landfill
- ammonia, anhydrous, liquid: 3.71e-8 kg; lognormal variance with pedigree 0.76, pedigree (1,1,5,1,1)
  burden from incineration of sludge from wastewater treatment of the short-term leachate (0-100a). uncertainty is calculated from uncertainties in waste composition and transfer coefficients in incinerator and uncertainty of waste decomposition and short-term leaching in sanitary landfill
  properties: wet mass 1 kg, dry mass 1 kg
- hydrochloric acid, without water, in 30% solution state: 3.81e-11 kg; lognormal variance with pedigree 0.51, pedigree (1,1,5,1,1)
  (same comment as for ammonia, anhydrous, liquid)
  properties: dry mass 1 kg, heating value, net 3.32 MJ, wet mass 1 kg
- sodium hydroxide, without water, in 50% solution state: 1.85e-9 kg; lognormal variance with pedigree 0.67, pedigree (1,1,5,1,1)
  (same comment as for ammonia, anhydrous, liquid)
  properties: heating value, net 3.03 MJ, wet mass 1 kg, dry mass 1 kg
- slag landfill: 7.28e-15 unit; lognormal variance with pedigree 0.59, pedigree (1,1,5,1,1)
  (same comment as for ammonia, anhydrous, liquid)
- process-specific burdens, residual material landfill: 6.12e-7 kg; lognormal variance with pedigree 0.49, pedigree (1,1,5,1,1)
  burden from incineration of sludge from wastewater treatment of the short-term leachate (0-100a). uncertainty is calculated from uncertainties in waste composition and transfer coefficients in incinerator and uncertainty of waste decomposition and short-term leaching in sanitary landfill;activityLink introduced to establish a direct link to the corresponding regional supply of this product
- chemical, organic: 8.72e-9 kg; lognormal variance with pedigree 1.82, pedigree (1,1,5,1,1)
  (same comment as for ammonia, anhydrous, liquid)
  properties: carbon content, fossil 0.628, wet mass 1 kg, dry mass 1 kg, heating value, net 19.03 MJ
  note on carbon content, fossil: This dataset is an unweighted average of 20 organic substances (listed in Tab 88.1, ecoinvent v2.2 report 8, part II), being part of the top100 chemicals included in this database. The C-content has also been calculated as an unweighted average of the C content of the substances composing this dataset.
- process-specific burdens, slag landfill: 4.1e-6 kg; lognormal variance with pedigree 0.59, pedigree (1,1,5,1,1)
  (same comment as for process-specific burdens, residual material landfill)
- quicklime, milled, packed: 3.35e-10 kg; lognormal variance with pedigree 0.68, pedigree (1,1,5,1,1)
  (same comment as for ammonia, anhydrous, liquid)
  properties: wet mass 1 kg, water content 0.010101, dry mass 0.99 kg
- municipal waste incineration facility: 2.06e-14 unit; lognormal variance with pedigree 0.69, pedigree (1,1,5,1,1)
  Burden from incineration of sludge from wastewater treatment of the short-term leachate (0-100a).
  Burden from incineration of sludge from wastewater treatment of the short-term leachate (0-100a).
- heat, for reuse in municipal waste incineration only: 6.92e-5 MJ; name E_th_prod_MSWI; lognormal variance with pedigree 0.69, pedigree (1,1,5,1,1)
  (same comment as for ammonia, anhydrous, liquid)
- chemical, inorganic: 6.35e-11 kg; lognormal variance with pedigree 0.51, pedigree (1,1,5,1,1)
  (same comment as for ammonia, anhydrous, liquid)
  properties: carbon content, fossil 0.003, wet mass 1 kg, dry mass 1 kg
  note on carbon content, fossil: This dataset is an unweighted average of 20 inorganic substances (listed in Tab 88.1, ecoinvent v2.2 report 8, part II), being part of the top100 chemicals included in this database. The C-content has also been calculated as an unweighted average of the C content of the substances composing this dataset.
- electricity, for reuse in municipal waste incineration only: 1.19e-5 kWh; name E_el_prod_MSWI; lognormal variance with pedigree 1.07, pedigree (1,1,5,1,1)
  (same comment as for ammonia, anhydrous, liquid)
- sanitary landfill facility: 5.56e-10 unit; lognormal variance with pedigree 0.04, pedigree (1,1,5,1,1)
  demands per kilogram waste. uncertainty is heeded in the module
  This exchange has an activity link directly to the producing activity because the product is primarily consumed in the same geographical area where it is produced.
- waste cement, hydrated: -6.12e-7 kg; lognormal variance with pedigree 0.5, pedigree (1,1,5,1,1)
  (same comment as for ammonia, anhydrous, liquid)
  production volume 0 kg
    Calculated from the production volume of waste polyvinylchloride, 0.2% water in proportion to the respective output amounts.
  properties: dry mass 1 kg, wet mass 1 kg
- process-specific burdens, municipal waste incineration: 8.26e-5 kg; lognormal variance with pedigree 0.69, pedigree (1,1,5,1,1)
  Burden from incineration of sludge from wastewater treatment of the short-term leachate (0-100a).
  Burden from incineration of sludge from wastewater treatment of the short-term leachate (0-100a).;activityLink introduced to establish a direct link to the corresponding regional supply of this product
- residual material landfill: 1.28e-15 unit; lognormal variance with pedigree 0.49, pedigree (1,1,5,1,1)
  (same comment as for ammonia, anhydrous, liquid)
- cement, unspecified: 2.45e-7 kg; lognormal variance with pedigree 0.5, pedigree (1,1,5,1,1)
  (same comment as for ammonia, anhydrous, liquid)
  properties: wet mass 1 kg, dry mass 1 kg
- waste graphical paper: -3.88e-5 kg; lognormal variance with pedigree 0.2106, pedigree (5,5,5,5,5)
  (same comment as for wastewater treatment facility, capacity 5E9l/year)
  production volume 0 kg
    (same comment as for waste cement, hydrated)
  properties: heating value, net 14.12 MJ, dry mass 0.888 kg, carbon content, non-fossil 0.454955, wet mass 1 kg, water content 0.126126
  note on heating value, net: Value taken from the general comment of the treatment dataset.
- titanium dioxide: 1.06e-9 kg; lognormal variance with pedigree 1.02, pedigree (1,1,5,1,1)
  (same comment as for ammonia, anhydrous, liquid)
  properties: dry mass 1 kg, wet mass 1 kg
- process-specific burdens, sanitary landfill: 1 kg; lognormal variance with pedigree 0.04, pedigree (1,1,5,1,1)
  demands per kilogram waste. uncertainty is heeded in the module;activityLink introduced to establish a direct link to the corresponding regional supply of this product
- heat, central or small-scale, other than natural gas: 3.5908e-5 MJ; lognormal variance with pedigree 0.2106, pedigree (5,5,5,5,5)
  (same comment as for wastewater treatment facility, capacity 5E9l/year)
  properties: heating value, net 1 MJ
- sewer grid, 5E9l/year, 110 km: 5.45e-10 km; lognormal variance with pedigree 0.2106, pedigree (5,5,5,5,5)
  (same comment as for wastewater treatment facility, capacity 5E9l/year)
- heat, district or industrial, natural gas: 5.2794e-5 MJ; lognormal variance with pedigree 0.93, pedigree (5,5,5,5,5)
  (same comment as for ammonia, anhydrous, liquid)
  properties: heating value, net 1 MJ
- chromium oxide, flakes: 2.17e-11 kg; lognormal variance with pedigree 1.13, pedigree (5,5,5,5,5)
  burden from incineration of sludge from wastewater treatment of the short-term leachate (0-100a). Proxy for vanadium pentoxide V2O5 in SCR catalyst, uncertainty calculated from uncertainty in average DeNOx input, uncertainty in the share of thermal NOx, uncertainty of nitrogen content in average municipal waste and the unertainty in nitrogen content in *this* waste and uncertainty of waste decomposition and short-term leaching in sanitary landfill
  properties: wet mass 1 kg, dry mass 1 kg
- iron (III) chloride, without water, in 40% solution state: 9.79e-9 kg; lognormal variance with pedigree 0.6, pedigree (1,1,5,1,1)
  (same comment as for ammonia, anhydrous, liquid)
  properties: wet mass 1 kg, dry mass 1 kg
- electricity, low voltage: 0.000272 kWh; lognormal variance with pedigree 0.5, pedigree (5,5,5,5,5)
  (same comment as for wastewater treatment facility, capacity 5E9l/year)
- waste plastic, mixture: -3.88e-5 kg; lognormal variance with pedigree 0.2106, pedigree (5,5,5,5,5)
  (same comment as for wastewater treatment facility, capacity 5E9l/year)
  production volume 0 kg
    (same comment as for waste cement, hydrated)
  properties: water content 0.180638, dry mass 0.847 kg, carbon content, fossil 0.747344, wet mass 1 kg, heating value, net 30.79 MJ
  note on carbon content, fossil: C content in 1 kg DM was calculated using data in Tab A.2, ecoinvent v2.2 report 13_I

## Emissions to nature
- Lead [air, urban air close to ground]: 3.12e-14 kg; lognormal variance with pedigree 2.34, pedigree (1,1,5,1,1)
  Emissions from short-term leachate treatment and incineration of resulting sludge. Uncertainty calculated depending on waste input and uncertainty of transfer coefficents in landfill, wastewater treatment and incineration model.
- Methane, fossil [air, urban air close to ground]: 7.21e-7 kg; lognormal variance with pedigree 0.93, pedigree (1,1,5,1,1)
  (same comment as for Lead)
- Iron, ion [water, ground-, long-term]: 0.000275 kg; lognormal variance with pedigree 2.29, pedigree (1,1,5,1,1)
  Emissions from long-term leachate (>100a) directly from MSW landfill and indirectly via incineration of treatement sludge from leachate treatement. Uncertainty calculated depending on waste input and uncertainty of long-term transfer coefficents in landfill.
- Barium [air, non-urban air or from high stacks]: 5.63e-10 kg; lognormal variance with pedigree 2.34, pedigree (1,1,5,1,1)
  burden from direct release or incineration of landfill biogas. Uncertainty calculated from unertainty of the waste composition of this waste, uncertainty in waste decomposition and short-term leaching in sanitary landfill
- Mercury [water, ground-, long-term]: 8.95e-7 kg; lognormal variance with pedigree 1.62, pedigree (1,1,5,1,1)
  (same comment as for Iron, ion)
- Chloride [water, ground-, long-term]: 0.463 kg; lognormal variance with pedigree 0.06, pedigree (1,1,5,1,1)
  (same comment as for Iron, ion)
- Hydrogen sulfide [water, ground-, long-term]: 7.67e-5 kg; lognormal variance with pedigree 0.69, pedigree (1,1,5,1,1)
  (same comment as for Iron, ion)
- Ammonia [air, urban air close to ground]: 2.36e-8 kg; lognormal variance with pedigree 0.67, pedigree (1,1,5,1,1)
  (same comment as for Lead)
- Thallium [air, urban air close to ground]: 1.21e-13 kg; lognormal variance with pedigree 2.48, pedigree (1,1,5,1,1)
  (same comment as for Lead)
- Vanadium, ion [water, ground-, long-term]: 8.85e-5 kg; lognormal variance with pedigree 1.23, pedigree (1,1,5,1,1)
  (same comment as for Iron, ion)
- Chloride [water, surface water]: 0.012 kg; lognormal variance with pedigree 0.31, pedigree (1,1,5,1,1)
  Emissions from short-term leachate treatment. Uncertainty calculated depending on waste input and uncertainty of transfer coefficents in landfill and wastewater treatment.
- Manganese [air, non-urban air or from high stacks]: 2.41e-10 kg; lognormal variance with pedigree 2.45, pedigree (1,1,5,1,1)
  (same comment as for Barium)
- Arsenic, ion [water, surface water]: 3.17e-9 kg; lognormal variance with pedigree 2.1, pedigree (1,1,5,1,1)
  (same comment as for Lead)
- NMVOC, non-methane volatile organic compounds, unspecified origin [air, urban air close to ground]: 3.28e-9 kg; lognormal variance with pedigree 1.04, pedigree (1,1,5,1,1)
  (same comment as for Lead)
- Lead [air, non-urban air or from high stacks]: 3.14e-13 kg; lognormal variance with pedigree 3.3, pedigree (1,1,5,1,1)
  (same comment as for Barium)
- Zinc, ion [water, surface water]: 8.76e-9 kg; lognormal variance with pedigree 1.82, pedigree (1,1,5,1,1)
  (same comment as for Lead)
- Bromine [air, non-urban air or from high stacks]: 2.61e-8 kg; lognormal variance with pedigree 1.83, pedigree (1,1,5,1,1)
  (same comment as for Barium)
- Sulfur dioxide [air, non-urban air or from high stacks]: 1.38e-6 kg; lognormal variance with pedigree 1.4, pedigree (1,1,5,1,1)
  (same comment as for Barium)
- Methane, fossil [air, non-urban air or from high stacks]: 0.00169 kg; lognormal variance with pedigree 0.47, pedigree (1,1,5,1,1)
  (same comment as for Barium)
- Nitrite [water, surface water]: 2.69e-7 kg; lognormal variance with pedigree 0.96, pedigree (1,1,5,1,1)
  (same comment as for Lead)
- Cobalt [water, ground-, long-term]: 3.33e-5 kg; lognormal variance with pedigree 1.15, pedigree (1,1,5,1,1)
  (same comment as for Iron, ion)
- Copper, ion [water, surface water]: 3.59e-10 kg; lognormal variance with pedigree 2.22, pedigree (1,1,5,1,1)
  (same comment as for Lead)
- Copper [air, urban air close to ground]: 7.56e-15 kg; lognormal variance with pedigree 2.29, pedigree (1,1,5,1,1)
  (same comment as for Lead)
- Strontium [air, urban air close to ground]: 2.67e-12 kg; lognormal variance with pedigree 1.79, pedigree (1,1,5,1,1)
  (same comment as for Lead)
- DOC, Dissolved Organic Carbon [water, ground-, long-term]: 0.112 kg; lognormal variance with pedigree 0.53, pedigree (1,1,5,1,1)
  (same comment as for Iron, ion)
- Sodium [air, non-urban air or from high stacks]: 1.6e-8 kg; lognormal variance with pedigree 1.9, pedigree (1,1,5,1,1)
  (same comment as for Barium)
- Chromium VI [water, surface water]: 2.57e-9 kg; lognormal variance with pedigree 2.06, pedigree (1,1,5,1,1)
  (same comment as for Lead)
- Selenium [air, non-urban air or from high stacks]: 5.84e-13 kg; lognormal variance with pedigree 3.24, pedigree (1,1,5,1,1)
  (same comment as for Barium)
- Nitrite [water, ground-, long-term]: 2.29e-5 kg; lognormal variance with pedigree 0.69, pedigree (1,1,5,1,1)
  (same comment as for Iron, ion)
- Lead [water, surface water]: 1.04e-10 kg; lognormal variance with pedigree 2.28, pedigree (1,1,5,1,1)
  (same comment as for Lead)
- Cyanide [air, urban air close to ground]: 6.62e-10 kg; lognormal variance with pedigree 0.78, pedigree (1,1,5,1,1)
  (same comment as for Lead)
- Bromine [water, surface water]: 1.86e-6 kg; lognormal variance with pedigree 1.3, pedigree (1,1,5,1,1)
  (same comment as for Chloride)
- Fluoride [water, surface water]: 1.14e-8 kg; lognormal variance with pedigree 1.94, pedigree (1,1,5,1,1)
  (same comment as for Chloride)
- Beryllium [water, surface water]: 1.56e-10 kg; lognormal variance with pedigree 2.41, pedigree (1,1,5,1,1)
  (same comment as for Lead)
- Cadmium, ion [water, surface water]: 2.46e-9 kg; lognormal variance with pedigree 2.06, pedigree (1,1,5,1,1)
  (same comment as for Lead)
- Dinitrogen monoxide [air, urban air close to ground]: 6.5e-8 kg; lognormal variance with pedigree 0.6, pedigree (1,1,5,1,1)
  (same comment as for Lead)
- Zinc, ion [water, ground-, long-term]: 4.94e-5 kg; lognormal variance with pedigree 1.08, pedigree (1,1,5,1,1)
  (same comment as for Iron, ion)
- Iron [air, non-urban air or from high stacks]: 1.35e-10 kg; lognormal variance with pedigree 2.51, pedigree (1,1,5,1,1)
  (same comment as for Barium)
- Antimony [water, ground-, long-term]: 4.56e-6 kg; lognormal variance with pedigree 2.43, pedigree (1,1,5,1,1)
  (same comment as for Iron, ion)
- COD, Chemical Oxygen Demand [water, surface water]: 8.09e-5 kg; lognormal variance with pedigree 0.88, pedigree (1,1,5,1,1)
  (same comment as for Lead)
- Nickel, ion [water, ground-, long-term]: 2.17e-5 kg; lognormal variance with pedigree 1.21, pedigree (1,1,5,1,1)
  (same comment as for Iron, ion)
- Tin, ion [water, ground-, long-term]: 0.000391 kg; lognormal variance with pedigree 0.82, pedigree (1,1,5,1,1)
  (same comment as for Iron, ion)
- Carbon monoxide, fossil [air, non-urban air or from high stacks]: 6.25e-7 kg; lognormal variance with pedigree 1.08, pedigree (1,1,5,1,1)
  (same comment as for Barium)
- Tin [air, non-urban air or from high stacks]: 5.77e-12 kg; lognormal variance with pedigree 2.91, pedigree (1,1,5,1,1)
  (same comment as for Barium)
- Chromium VI [water, ground-, long-term]: 1.95e-7 kg; lognormal variance with pedigree 8.39, pedigree (1,1,5,1,1)
  (same comment as for Iron, ion)
- Nickel, ion [water, surface water]: 7.66e-9 kg; lognormal variance with pedigree 1.93, pedigree (1,1,5,1,1)
  (same comment as for Lead)
- Antimony [water, surface water]: 3.24e-8 kg; lognormal variance with pedigree 1.76, pedigree (1,1,5,1,1)
  (same comment as for Lead)
- Titanium, ion [water, ground-, long-term]: 0.00105 kg; lognormal variance with pedigree 0.69, pedigree (1,1,5,1,1)
  (same comment as for Iron, ion)
- Mercury [air, urban air close to ground]: 1.04e-15 kg; lognormal variance with pedigree 2.38, pedigree (1,1,5,1,1)
  (same comment as for Lead)
- Iron, ion [water, surface water]: 2.74e-7 kg; lognormal variance with pedigree 1.43, pedigree (1,1,5,1,1)
  (same comment as for Lead)
- Barium [water, surface water]: 1.35e-7 kg; lognormal variance with pedigree 1.29, pedigree (1,1,5,1,1)
  (same comment as for Lead)
- Mercury [water, surface water]: 1.94e-10 kg; lognormal variance with pedigree 2.33, pedigree (1,1,5,1,1)
  (same comment as for Lead)
- COD, Chemical Oxygen Demand [water, ground-, long-term]: 0.122 kg; lognormal variance with pedigree 0.53, pedigree (1,1,5,1,1)
  (same comment as for Iron, ion)
- Arsenic [air, non-urban air or from high stacks]: 5.05e-11 kg; lognormal variance with pedigree 2.66, pedigree (1,1,5,1,1)
  (same comment as for Barium)
- Thallium [water, surface water]: 1.25e-10 kg; lognormal variance with pedigree 2.45, pedigree (1,1,5,1,1)
  (same comment as for Lead)
- Mercury [air, non-urban air or from high stacks]: 2.45e-10 kg; lognormal variance with pedigree 2.44, pedigree (1,1,5,1,1)
  (same comment as for Barium)
- Vanadium, ion [water, surface water]: 1.63e-7 kg; lognormal variance with pedigree 1.5, pedigree (1,1,5,1,1)
  (same comment as for Lead)
- Thallium [water, ground-, long-term]: 4.22e-7 kg; lognormal variance with pedigree 1.72, pedigree (1,1,5,1,1)
  (same comment as for Iron, ion)
- Sulfate [water, surface water]: 1.2e-5 kg; lognormal variance with pedigree 1.18, pedigree (1,1,5,1,1)
  (same comment as for Chloride)
- Manganese [water, surface water]: 4.9e-7 kg; lognormal variance with pedigree 1.38, pedigree (1,1,5,1,1)
  (same comment as for Lead)
- Titanium, ion [water, surface water]: 2.68e-7 kg; lognormal variance with pedigree 1.43, pedigree (1,1,5,1,1)
  (same comment as for Lead)
- Thallium [air, non-urban air or from high stacks]: 6.13e-14 kg; lognormal variance with pedigree 3.53, pedigree (1,1,5,1,1)
  (same comment as for Barium)
- Cobalt [water, surface water]: 5.44e-8 kg; lognormal variance with pedigree 1.65, pedigree (1,1,5,1,1)
  (same comment as for Lead)
- Tin, ion [water, surface water]: 9.65e-9 kg; lognormal variance with pedigree 1.85, pedigree (1,1,5,1,1)
  (same comment as for Lead)
- Aluminium [water, surface water]: 6.33e-9 kg; lognormal variance with pedigree 1.65, pedigree (1,1,5,1,1)
  (same comment as for Lead)
- Barium [air, urban air close to ground]: 2.12e-9 kg; lognormal variance with pedigree 1.3, pedigree (1,1,5,1,1)
  (same comment as for Lead)
- Nickel [air, urban air close to ground]: 0 kg; pedigree (1,1,1,1,1)
  (same comment as for Lead)
- Nitrogen [water, surface water]: 3.47e-7 kg; lognormal variance with pedigree 0.64, pedigree (1,1,5,1,1)
  (same comment as for Lead)
- Arsenic [air, urban air close to ground]: 1.01e-12 kg; lognormal variance with pedigree 2.14, pedigree (1,1,5,1,1)
  (same comment as for Lead)
- Beryllium [water, ground-, long-term]: 5.27e-7 kg; lognormal variance with pedigree 1.69, pedigree (1,1,5,1,1)
  (same comment as for Iron, ion)
- NMVOC, non-methane volatile organic compounds, unspecified origin [air, non-urban air or from high stacks]: 1.18e-8 kg; lognormal variance with pedigree 0.47, pedigree (1,1,5,1,1)
  (same comment as for Barium)
- Copper [air, non-urban air or from high stacks]: 3.95e-13 kg; lognormal variance with pedigree 3.27, pedigree (1,1,5,1,1)
  (same comment as for Barium)
- Aluminium [water, ground-, long-term]: 0.000211 kg; lognormal variance with pedigree 0.9, pedigree (1,1,5,1,1)
  (same comment as for Iron, ion)
- Antimony [air, urban air close to ground]: 2.35e-12 kg; lognormal variance with pedigree 2.4, pedigree (1,1,5,1,1)
  (same comment as for Lead)
- Carbon monoxide, fossil [air, urban air close to ground]: 2.38e-7 kg; lognormal variance with pedigree 0.93, pedigree (1,1,5,1,1)
  (same comment as for Lead)
- DOC, Dissolved Organic Carbon [water, surface water]: 1.97e-5 kg; lognormal variance with pedigree 0.88, pedigree (1,1,5,1,1)
  (same comment as for Lead)
- Vanadium [air, non-urban air or from high stacks]: 8.01e-11 kg; lognormal variance with pedigree 2.58, pedigree (1,1,5,1,1)
  (same comment as for Barium)
- Titanium [air, urban air close to ground]: 2.6e-10 kg; lognormal variance with pedigree 1.48, pedigree (1,1,5,1,1)
  (same comment as for Lead)
- Beryllium [air, urban air close to ground]: 1.51e-13 kg; lognormal variance with pedigree 2.46, pedigree (1,1,5,1,1)
  (same comment as for Lead)
- Hydrogen chloride [air, non-urban air or from high stacks]: 0.000173 kg; lognormal variance with pedigree 0.85, pedigree (1,1,5,1,1)
  (same comment as for Barium)
- Carbon dioxide, fossil [air, urban air close to ground]: 0.000368 kg; lognormal variance with pedigree 0.88, pedigree (1,1,5,1,1)
  (same comment as for Lead)
- Iron [air, urban air close to ground]: 8.88e-12 kg; lognormal variance with pedigree 1.5, pedigree (1,1,5,1,1)
  (same comment as for Lead)
- Chromium [air, urban air close to ground]: 0 kg; pedigree (1,1,1,1,1)
  (same comment as for Lead)
- TOC, Total Organic Carbon [water, ground-, long-term]: 0.112 kg; lognormal variance with pedigree 0.53, pedigree (1,1,5,1,1)
  (same comment as for Iron, ion)
- Nitrogen oxides [air, urban air close to ground]: 2.3e-7 kg; lognormal variance with pedigree 0.66, pedigree (1,1,5,1,1)
  (same comment as for Lead)
- Bromine [water, ground-, long-term]: 7.2e-5 kg; lognormal variance with pedigree 1.04, pedigree (1,1,5,1,1)
  (same comment as for Iron, ion)
- Arsenic, ion [water, ground-, long-term]: 2e-6 kg; lognormal variance with pedigree 1.52, pedigree (1,1,5,1,1)
  (same comment as for Iron, ion)
- Strontium [water, surface water]: 2.76e-8 kg; lognormal variance with pedigree 1.73, pedigree (1,1,5,1,1)
  (same comment as for Lead)
- Sulfate [water, ground-, long-term]: 0.00294 kg; lognormal variance with pedigree 0.69, pedigree (1,1,5,1,1)
  (same comment as for Iron, ion)
- Tin [air, urban air close to ground]: 1.78e-11 kg; lognormal variance with pedigree 1.88, pedigree (1,1,5,1,1)
  (same comment as for Lead)
- Nitrate [water, ground-, long-term]: 4.42e-5 kg; lognormal variance with pedigree 0.69, pedigree (1,1,5,1,1)
  (same comment as for Iron, ion)
- Selenium [water, surface water]: 1.56e-9 kg; lognormal variance with pedigree 2.15, pedigree (1,1,5,1,1)
  (same comment as for Lead)
- Zinc [air, non-urban air or from high stacks]: 6.29e-12 kg; lognormal variance with pedigree 2.91, pedigree (1,1,5,1,1)
  (same comment as for Barium)
- Cadmium, ion [water, ground-, long-term]: 2.75e-6 kg; lognormal variance with pedigree 1.48, pedigree (1,1,5,1,1)
  (same comment as for Iron, ion)
- Nitrogen oxides [air, non-urban air or from high stacks]: 6.81e-9 kg; lognormal variance with pedigree 1.33, pedigree (1,1,5,1,1)
  (same comment as for Barium)
- Antimony [air, non-urban air or from high stacks]: 1.19e-11 kg; lognormal variance with pedigree 2.84, pedigree (1,1,5,1,1)
  (same comment as for Barium)
- Ammonium, ion [water, ground-, long-term]: 0.00042 kg; lognormal variance with pedigree 0.69, pedigree (1,1,5,1,1)
  (same comment as for Iron, ion)
- Ammonium, ion [water, surface water]: 1.28e-5 kg; lognormal variance with pedigree 0.7, pedigree (1,1,5,1,1)
  (same comment as for Lead)
- Selenium [air, urban air close to ground]: 0 kg; pedigree (1,1,1,1,1)
  (same comment as for Lead)
- Zinc [air, urban air close to ground]: 3.2e-13 kg; lognormal variance with pedigree 1.89, pedigree (1,1,5,1,1)
  (same comment as for Lead)
- Cobalt [air, urban air close to ground]: 1.67e-15 kg; lognormal variance with pedigree 1.77, pedigree (1,1,5,1,1)
  (same comment as for Lead)
- Aluminium [air, non-urban air or from high stacks]: 2.64e-11 kg; lognormal variance with pedigree 2.72, pedigree (1,1,5,1,1)
  (same comment as for Barium)
- Manganese [water, ground-, long-term]: 8.19e-5 kg; lognormal variance with pedigree 1.02, pedigree (1,1,5,1,1)
  (same comment as for Iron, ion)
- Aluminium [air, urban air close to ground]: 1.55e-10 kg; lognormal variance with pedigree 1.68, pedigree (1,1,5,1,1)
  (same comment as for Lead)
- Chromium [air, non-urban air or from high stacks]: 1.23e-12 kg; lognormal variance with pedigree 3.12, pedigree (1,1,5,1,1)
  (same comment as for Barium)
- Cobalt [air, non-urban air or from high stacks]: 2.68e-11 kg; lognormal variance with pedigree 2.74, pedigree (1,1,5,1,1)
  (same comment as for Barium)
- Vanadium [air, urban air close to ground]: 1.58e-11 kg; lognormal variance with pedigree 1.55, pedigree (1,1,5,1,1)
  (same comment as for Lead)
- Nitrate [water, surface water]: 4.66e-5 kg; lognormal variance with pedigree 0.63, pedigree (1,1,5,1,1)
  (same comment as for Lead)
- Chromium, ion [water, surface water]: 7.71e-12 kg; lognormal variance with pedigree 2.09, pedigree (1,1,5,1,1)
  (same comment as for Lead)
- Strontium [air, non-urban air or from high stacks]: 1.36e-11 kg; lognormal variance with pedigree 2.82, pedigree (1,1,5,1,1)
  (same comment as for Barium)
- Selenium [water, ground-, long-term]: 6.25e-7 kg; lognormal variance with pedigree 1.91, pedigree (1,1,5,1,1)
  (same comment as for Iron, ion)
- BOD5, Biological Oxygen Demand [water, ground-, long-term]: 0.029 kg; lognormal variance with pedigree 0.53, pedigree (1,1,5,1,1)
  (same comment as for Iron, ion)
- Nitrogen, organic bound [water, ground-, long-term]: 0.000687 kg; lognormal variance with pedigree 0.69, pedigree (1,1,5,1,1)
  (same comment as for Iron, ion)
- Cadmium [air, non-urban air or from high stacks]: 3.23e-11 kg; lognormal variance with pedigree 2.72, pedigree (1,1,5,1,1)
  (same comment as for Barium)
- Beryllium [air, non-urban air or from high stacks]: 7.67e-14 kg; lognormal variance with pedigree 3.5, pedigree (1,1,5,1,1)
  (same comment as for Barium)
- Hydrogen fluoride [air, non-urban air or from high stacks]: 6.18e-8 kg; lognormal variance with pedigree 1.73, pedigree (1,1,5,1,1)
  (same comment as for Barium)
- Sodium, ion [water, surface water]: 6.4e-5 kg; lognormal variance with pedigree 0.85, pedigree (1,1,5,1,1)
  (same comment as for Chloride)
- Copper, ion [water, ground-, long-term]: 2.82e-5 kg; lognormal variance with pedigree 1.17, pedigree (1,1,5,1,1)
  (same comment as for Iron, ion)
- Titanium [air, non-urban air or from high stacks]: 1.32e-10 kg; lognormal variance with pedigree 2.52, pedigree (1,1,5,1,1)
  (same comment as for Barium)
- Cadmium [air, urban air close to ground]: 1.33e-13 kg; lognormal variance with pedigree 2.11, pedigree (1,1,5,1,1)
  (same comment as for Lead)
- Manganese [air, urban air close to ground]: 2.59e-15 kg; lognormal variance with pedigree 1.51, pedigree (1,1,5,1,1)
  (same comment as for Lead)
- Fluoride [water, ground-, long-term]: 1.54e-5 kg; lognormal variance with pedigree 1.25, pedigree (1,1,5,1,1)
  (same comment as for Iron, ion)
- Nickel [air, non-urban air or from high stacks]: 3.16e-12 kg; lognormal variance with pedigree 3.01, pedigree (1,1,5,1,1)
  (same comment as for Barium)
- Particulates, < 2.5 um [air, non-urban air or from high stacks]: 2.1e-7 kg; lognormal variance with pedigree 0.73, pedigree (1,1,5,1,1)
  (same comment as for Barium)
- Lead [water, ground-, long-term]: 1.6e-5 kg; lognormal variance with pedigree 1.25, pedigree (1,1,5,1,1)
  (same comment as for Iron, ion)
- Carbon dioxide, fossil [air, non-urban air or from high stacks]: 0.011 kg; lognormal variance with pedigree 0.43, pedigree (1,1,5,1,1)
  (same comment as for Barium)
- TOC, Total Organic Carbon [water, surface water]: 2.05e-5 kg; lognormal variance with pedigree 0.88, pedigree (1,1,5,1,1)
  (same comment as for Lead)
- Strontium [water, ground-, long-term]: 9.33e-5 kg; lognormal variance with pedigree 1.01, pedigree (1,1,5,1,1)
  (same comment as for Iron, ion)
- Sodium, ion [water, ground-, long-term]: 0.00148 kg; lognormal variance with pedigree 0.64, pedigree (1,1,5,1,1)
  (same comment as for Iron, ion)
- Barium [water, ground-, long-term]: 0.000196 kg; lognormal variance with pedigree 0.9, pedigree (1,1,5,1,1)
  (same comment as for Iron, ion)
- BOD5, Biological Oxygen Demand [water, surface water]: 2.55e-5 kg; lognormal variance with pedigree 0.88, pedigree (1,1,5,1,1)
  (same comment as for Lead)

## Sampling procedure
Landfill model based on observed leachate concentrations in literature. Extrapolated to 60'000 years heeding chemical characteristics. Initial waste composition from various literature sources.

## Extrapolations
This dataset has been extrapolated from year 2000 to the year of the calculation (2021). The uncertainty has been adjusted accordingly.

## Review by Niels Jungbluth 2003-07-21
Passed. Calculation for standard deviation 95 of, i.e., infrastructure,
land occupation, transport services or other services can differ from
standard Pedigree approach used in this project and figures obtained by
this procedure.
