# aluminium hydroxide production

Dataset: EcoSpold 2, unit process
Geography: CN
Time period: 2015-01-01 to 2021-12-31
Technology level: current
Classification: EcoSpold01Categories: chemicals/inorganics
Classification: ISIC rev.4 ecoinvent: 2011:Manufacture of basic chemicals
Synonyms: Tonerdehydrat; gibbsite; Aluminiumtrihydrate; Hydragillit; Al2O3*3H2O; Bayerit; Gibbsit; aluminium hydroxide; bayerite; hydragillite; diaspore
Scenario: Business-as-Usual
System model: Allocation, cut-off by classification
Generated by: Linlin Wu
Published in: International Aluminium Insitute 2015
Database: ecoinvent
isCopyrightProtected: false
accessRestrictedTo: 1

## General comment
Data on Al(OH)3 extraction and calcination to Al2O3 was aggregated on original source (International ALuminium Institute 2015 LCI survey, IAI personnal communication in 2017). In- and outputs of Al(OH)3 are calculated according to the stoichiometry (1.530 kg Al(OH)3 --> 1.000 kg Al2O3 + 0.530 kg H2O). Separate energy data was provided by IAI for production of hydrate and calcination processes. The Al(OH)3 extraction process involves adding milled bauxite to a hot caustic soda (NaOH) solution, dissolving the aluminium-bearing minerals (gibbsite, böhmite and diaspore) present to form a sodium aluminate supersaturated solution or “pregnant liquor”. Flocculants are added to aid settling and the solution is progressively cooled causing aluminium hydroxide crystals to precipitate. Further information can be found at http://bauxite.world-aluminium.org/refining/process.html.
Two sources were used in the creation of this dataset: IAI 2015 Survey data (officially published in 2017); and original ecoinvent 2 data (Althaus, 2007) for exchanges
unreported by IAI.

## Included activities start
Unit process starts with the unloading of the process materials to their storage areas on site.

## Included activities end
Includes transport of bauxite and other inputs to the calcination plant, the extraction of Al(OH)3 (grinding, digestion and precipitation) and the disposal of the wastes. Also includes maintenance and repair of plant and equipment and treatment of process air, liquids and solids.
The output of the original IAI dataset is smelter grade alumina. However, by removing the energy inputs for calcination, the intended output of this unit process is aluminium hydroxide.

## Geography
While IAI data are global in scope, flows not reported by IAI and taken from anterior ecoinvent v2 dataset are based on European data.

## Technology
Average technology for the global aluminium industry.

## Parameters
- alumina, production volume: 1.15247e11 kg; name al2o3_productionvolume_2015
- molar mass, aluminion oxyde: 102 kg; name M_Al2O3; lognormal variance with pedigree 0.0007, pedigree (1,2,1,1,1)
- alumina, production volume, 2010: 8.5e10 kg; name al2o3_productionvolume_2010; lognormal variance with pedigree 0.0007, pedigree (2,2,1,1,1)
  Smelter grade alumina. As reported in IAI 2013.
- alumina, production volume, china: 5.8979e10 kg; name al2o3_productionvolume_cn_2015
- molar mass of aluminium hydroxide: 78 kg; name M_Al_OH_3
- Aluminium hydroxide used in alumina production: 90 % (obsolete); name Al_OH_3_for_Al2O3; lognormal variance with pedigree 0.0566, pedigree (4,5,5,1,1)
  Used to estimate global production volumes, readily available for Al2O3 but not for Al(OH)3.
  Uncertainty: Value cited in ecoinvent 2 report 5 (Althaus, 2007) without citation. Value also found on internet, but not in official documents.

## Reference product
- aluminium hydroxide: 1 kg; name aluminiumHydroxideAmount; By-product classification allocatable product; CPC 34231: Chemical elements n.e.c.; inorganic acids except phosphoric, nitric and sulphonitric; inorganic oxygen compoun[…]; CAS 14762-49-3
  Dry mass
  EcoSpold01Location=RER
  production volume 1.00226e11 kg; name aluminiumHydroxideProductionVolume; = al2o3_productionvolume_cn_2015*(2* M_Al_OH_3/ M_Al2O3)*(1/(Al_OH_3_for_Al2O3/100))
    Production volume calculated using the production volume of alumina, assuming that 90% of aluminium hydroxide is used for the production of alumina.
  property price 0.42 EUR2005; name aluminiumHydroxideAmount_price_EUR2005
    Calculated value based on data from United Nations Commodity Trade Statistics Database (comtrade.un.org). UN comtrade category: 281830 Aluminium hydroxide. Year 2005. Using exchange rate of 1EURO = 1.209 USD. Average of price of import into 5 main markets (EU, US, JP, IN and CN).
  property dry mass 1 kg; name aluminiumHydroxideAmount_DM
  property water content 0.11; name aluminiumHydroxideAmount_water_content
  property gallium content 0; name aluminiumHydroxideAmount_Ga_content
    gallium content on a dry matter basis
  property water in wet mass 0.11 kg; name aluminiumHydroxideAmount_WWM
  property carbon content, non-fossil 0; name aluminiumHydroxid_C_content_non_fossil_0
    biogene carbon content on a dry matter basis
  property carbon content, fossil 0; name aluminiumHydroxideAmo_C_content_fossil_0
    fossil carbon content on a dry matter basis
  property wet mass 1.11 kg; name aluminiumHydroxideAmount_WM
  property carbon content 0
    carbon content on a dry matter basis (reserved; not for manual entry)
  properties: carbon allocation 0 kg

## Inputs from technosphere
- electricity, medium voltage: 0.212 kWh; source International Aluminium Insitute 2015; lognormal variance with pedigree 0.0033, pedigree (2,2,3,1,1)
  As reported by IAI energy survey (2015)
- heat, district or industrial, natural gas: 0.0205885 MJ; = Net_Heat_Value_ng*40.4 *m3fuel_use_ng /fuel_use_ng; source International Aluminium Insitute 2015; lognormal variance with pedigree 0.0033, pedigree (2,2,3,1,1)
  Natural Gas.As reported by IAI 2015 Energy survey
  property Corresponding fuel use 1.04 MJ; name fuel_use_ng
  property heating value, net 1 MJ; name Net_Heat_Value_ng
  property fuel input in physical units, m3 0.00053 m3; name m3fuel_use_ng
  note on Corresponding fuel use: Lower heating value of the fuel input related to the heat/electricity output, based on an efficiency of 96%
  note on heating value, net: net (lower) heating (calorific) value. Based on European average as reported in Classen et al (2009)
- redmud from bauxite digestion: -0.804 kg; name redmudAmount; source International Aluminium Insitute 2015; lognormal variance with pedigree 0.0032, pedigree (1,3,3,1,1)
  EcoSpold01Location=CH
  2015 data. Water content was not specified in IAI datasets.
  Uncertainty: Uncertainty higher due to the 40% water content source (Althaus et al., 2000)
  production volume 8.05815e10 kg; = aluminiumHydroxideProductionVolume* redmudAmount/ aluminiumHydroxideAmount
    Calculated from the production volume of aluminium hydroxide in proportion to the respective output amounts.
  property water content 0.334; name redmudAmount_water_content
  property carbon content, non-fossil 0; name redmudAmount_C_content_non_fossil
  property price 0 EUR2005; name redmudAmount_price_EUR2005
  property carbon content, fossil 0; name redmudAmount_C_content_fossil
  property dry mass 1 kg; name redmudAmount_DM
  property wet mass 1.334 kg; name redmudAmount_WM
  property water in wet mass 0.334 kg; name redmudAmount_WWM
- aluminium hydroxide factory: 1.64e-11 unit; source Classen M. 2009; lognormal variance with pedigree 0.51, pedigree (5,5,5,5,5)
  EcoSpold01Location=RER
  Rough guess
  Uncertainty: rough guess
- inert waste, for final disposal: -0.012 kg; name inertWaste; source International Aluminium Insitute 2015; lognormal variance with pedigree 0.0032, pedigree (1,3,3,1,1)
  IAI 2015 data. recycled by products are excluded, only landfilled waste.
  EcoSpold01Location=CH
  production volume 1.20271e9 kg; = aluminiumHydroxideProductionVolume * inertWaste/aluminiumHydroxideAmount
    (same comment as for redmud from bauxite digestion)
  property price 0 EUR2005; name inertWaste_price_EUR2005
  properties: water content 0.00502513, dry mass 0.995 kg, wet mass 1 kg
- heat, district or industrial, other than natural gas: 6.358 MJ; = Net_Heat_Value_Coal*28.9 * kgFuel_Input_Coal / fuel_use_Coal; source International Aluminium Insitute 2015; lognormal variance with pedigree 0.0033, pedigree (2,2,3,1,1)
  EcoSpold01Location=RER
  Coal.IAI 2015 data.
  property heating value, net 1 MJ; name Net_Heat_Value_Coal
  property fuel input in physical units, kg 0.275 kg; name kgFuel_Input_Coal
  property Corresponding fuel use 1.25 MJ; name fuel_use_Coal
  note on heating value, net: net (lower) heating (calorific) value of industrial hard coal
  note on Corresponding fuel use: Lower heating value of the fuel input related to the heat/electricity output, assuming an eficiency of 80%
- sodium hydroxide, without water, in 50% solution state: 0.048 kg; source International Aluminium Insitute 2015; lognormal variance with pedigree 0.0032, pedigree (1,3,3,1,1)
  IAI 2015 data. Sodium hydroxide used (as 100% caustic soda)
  EcoSpold01Location=RER
  properties: wet mass 1 kg, dry mass 1 kg, heating value, net 3.03 MJ
- quicklime, milled, loose: 0.021 kg; source International Aluminium Insitute 2015; lognormal variance with pedigree 0.0032, pedigree (1,3,3,1,1)
  IAI 2015 data,collected as calcined lime
  EcoSpold01Location=CH
  properties: dry mass 0.99 kg, wet mass 1 kg, water content 0.010101
- bauxite: 1.861 kg; source International Aluminium Insitute 2015; lognormal variance with pedigree 0.0086, pedigree (1,3,3,1,1)
  IAI 2015 data. Response rate: 39% by production. Reported on a wet mass basis, dry mass is estimated as 88%
  property water in wet mass 0.12 kg; name WWM
  property carbon content, non-fossil 0; name C_content_non_fossil
  property carbon content, fossil 0; name C_content_fossil
  property wet mass 1 kg; name WM
  property dry mass 0.88 kg; name DM
  property water content 0.136364; name water_content; = (WM-DM)/DM
- heat, district or industrial, other than natural gas: 0.334283 MJ; = kgFuel_Input_HFO* Net_Heat_Value_HFO*40.0/ fuel_use_HFO; source International Aluminium Insitute 2015; lognormal variance with pedigree 0.0033, pedigree (2,2,3,1,1)
  Heavy Oil.As reported by IAI 2015 energy survey
  property heating value, net 1 MJ; name Net_Heat_Value_HFO
  property Corresponding fuel use 1.053 MJ; name fuel_use_HFO
  property fuel input in physical units, kg 0.0088 kg; name kgFuel_Input_HFO
  note on Corresponding fuel use: Lower heating value of the fuel input related to the heat/electricity output. Based on an assumed efficiency of 95%.

## Inputs from nature
- Water, unspecified natural origin [natural resource, in water]: 0.00133 m3; source International Aluminium Insitute 2015; lognormal variance with pedigree 0.0032, pedigree (1,3,3,1,1)
  IAI 2015 data. Response rate: 100% of surveyed sites.
- Water, salt, ocean [natural resource, in water]: 0.00013 m3; source International Aluminium Insitute 2015; lognormal variance with pedigree 0.0032, pedigree (1,3,3,1,1)
  IAI 2015 data. Response rate:19% of surveyed sites.
  Uncertainty: ;
- Occupation, unspecified [natural resource, land]: 0.001 m2*year; source International Aluminium Insitute 2015; lognormal variance with pedigree 0.0432, pedigree (1,3,5,1,2)
  IAI 2015 data. Reported as Land occupation

## Emissions to nature
- Particulates, > 10 um [air, unspecified]: 0.00023 kg; source International Aluminium Insitute 2015; lognormal variance with pedigree 0.5706, pedigree (1,3,5,1,1)
  IAI 2015 Data, Response rate: 9% by production
- Water [water, ocean]: 0.000126 m3; source International Aluminium Insitute 2015; lognormal variance with pedigree 0.0426, pedigree (1,3,3,1,1)
  IAI 2015 data. Response rate: 39% by production
- Suspended solids, unspecified [water, unspecified]: 3e-5 kg; source International Aluminium Insitute 2015; lognormal variance with pedigree 0.0426, pedigree (1,3,3,1,1)
  IAI 2015 data. Response rate: 34% by production
- Particulates, < 2.5 um [air, unspecified]: 3.8e-5 kg; source International Aluminium Insitute 2015; lognormal variance with pedigree 0.0407, pedigree (1,3,5,1,1)
  IAI 2015 Data, Response rate: 14% by production
- Water [water, surface water]: 0.00122 m3; source International Aluminium Insitute 2015; lognormal variance with pedigree 0.0426, pedigree (1,3,3,1,1)
  IAI 2015 data. Response rate: 39% by production
- Particulates, > 2.5 um, and < 10um [air, unspecified]: 4.3e-5 kg; source International Aluminium Insitute 2015; lognormal variance with pedigree 0.04061, pedigree (1,3,5,1,1)
  IAI 2015 Data, Response rate: 8% by production
- BOD5, Biological Oxygen Demand [water, unspecified]: 4.59e-5 kg; source Classen M. 2009; lognormal variance with pedigree 0.0807, pedigree (1,3,5,3,1)
  Values come from the former ecoinvent dataset (Althaus, 2009)
  Uncertainty: ;
- Mercury [air, unspecified]: 7.7e-8 kg; source International Aluminium Insitute 2015; lognormal variance with pedigree 0.6526, pedigree (1,3,3,1,1)
  IAI 2015 data. Response rate: 18% by production
- TOC, Total Organic Carbon [water, unspecified]: 1.8e-5 kg; source Classen M. 2009; lognormal variance with pedigree 0.0807, pedigree (1,3,5,3,1)
  Values come from the former ecoinvent dataset (Althaus, 2009)
  Uncertainty: ;
- Nitrogen oxides [air, unspecified]: 0.0004 kg; source International Aluminium Insitute 2015; lognormal variance with pedigree 0.0406006, pedigree (1,3,5,1,1)
  IAI 2015 Data, Response rate: 33% by production
- DOC, Dissolved Organic Carbon [water, unspecified]: 1.8e-5 kg; source Classen M. 2009; lognormal variance with pedigree 0.0807, pedigree (1,3,5,3,1)
  Values come from the former ecoinvent dataset (Althaus, 2009)
  Uncertainty: ;
- Sulfur dioxide [air, unspecified]: 0.00074 kg; source International Aluminium Insitute 2015; lognormal variance with pedigree 0.0032, pedigree (1,3,3,1,1)
  IAI 2015 data. Response rate: 37% by production
- COD, Chemical Oxygen Demand [water, unspecified]: 4.59e-5 kg; source Classen M. 2009; lognormal variance with pedigree 0.0807, pedigree (1,3,5,3,1)
  Values come from the former ecoinvent dataset (Althaus, 2009)
- Oils, unspecified [water, unspecified]: 0.0011 kg; source International Aluminium Insitute 2015; lognormal variance with pedigree 0.0426, pedigree (1,3,3,1,1)
  IAI 2015 data. Response rate: 32% by production
- Water [air, urban air close to ground]: 0.00042 m3; source International Aluminium Insitute 2015; lognormal variance with pedigree 0.2106, pedigree (5,5,5,5,5)
  IAI data, reported as Fresh water consumption
- Mercury [water, unspecified]: 3e-10 kg; source International Aluminium Insitute 2015; lognormal variance with pedigree 0.0426, pedigree (1,3,3,1,1)
  IAI 2015 data. Response rate: 26% by production
- Sodium, ion [water, unspecified]: 0.00128 kg; source Classen M. 2009; lognormal variance with pedigree 0.0807, pedigree (1,3,5,3,1)
  Values come from the former ecoinvent dataset (Althaus, 2009)

## Sampling procedure
2015 LCI Survey Data was collected by the IAI in Feb - July 2016 with analysis and data verification taking place Aug - Dec 2016. No plants in China responded to the IAI 2015 LCI survey, global average mean is used in this dataset. Production volume and energy data are updated with reference to China data collected from the IAI 2015 energy survey.

## Extrapolations
This dataset has been extrapolated from year 2015 to the year of the calculation (2021). The uncertainty has been adjusted accordingly.
