# acetaldehyde production

Dataset: EcoSpold 2, unit process
Geography: RoW
Time period: 1995-01-01 to 2021-12-31
Technology level: current
Classification: ISIC rev.4 ecoinvent: 2011:Manufacture of basic chemicals
Synonyms: 75-07-0; Ethyl aldehyde; Acetic aldehyde; Ethanal; Aldehyde; Acetaldehyde
Scenario: Business-as-Usual
System model: Allocation, cut-off by classification
Generated by: Maggie Osses
Published in: Althaus H.-J. 2007
Database: ecoinvent
isCopyrightProtected: true
accessRestrictedTo: 1

## General comment
This dataset represents the production of 1 kg of acetaldehyde by means of direct oxidation of ethylene (Wacker process), which is the most widely used method for producing acetaldehyde. Acetaldehyde is a colorless liquid with a pungent, suffocating odor that is slightly fruity when diluted. Acetaldehyde is used in the manufacturing of acetic acid, acetic anhydride, acetate esters, pyrine and pyridine bases, peracetic acid, 1,3-butylene glycol, and others.
This dataset is based on literature data. All numbers in the source used (von Däniken et al. 1995) are taken from the manufacturing of ethylene oxide, as an approximation. The water exchanges are based on data from a large chemical plant (Gendorf 2016).
References:
Gendorf (2016) Umwelterklärung 2015, Werk Gendorf Industriepark, www.gendorf.de.
Eckert, M., Fleischmann, G., Jira, R., Bolt, H. M. and Golka, K. 2006. Acetaldehyde. Ullmann's Encyclopedia of Industrial Chemistry.
Althaus H.-J., Chudacoff M., Hischier R., Jungbluth N., Osses M. and Primas A. (2007) Life Cycle Inventories of Chemicals. Final report ecoinvent data v2.0 No. 8. Swiss Centre for Life Cycle Inventories, Dübendorf, CH.
von Däniken A. and Chudacoff M. (1995) Vergleichende ökologische Bewertung von Anstrichstoffen im Baubereich - Band 2: Daten. Buwal Schriftenreihe Umwelt Nr. 232. BUWAL, Bern.

## Included activities start
The activity starts when the raw materials enter the process.

## Included activities end
This activity includes the oxidation of ethylene, the consumption of energy, as well as the generation of solid wastes and emissions into air and water. The infrastructure is estimated based on data from a large chemical plant. No by-product is generated in the process. Consumption of auxiliaries is not included due to lack of data.

## Geography
The data in this dataset are not geography-specific. Some values are based on data from a large chemical factory located in Germany. These are assumed to be valid for this geography.

## Technology
Ethylene is the most important starting material for the production of acetaldehyde and most of the present capacity works by its direct oxidation (Wacker process). One- and two-stage versions of the process are on stream. In the one-stage method, an ethylene-oxygen mixture reacts with the catalyst solution. In the two-stage process the reaction is carried out with ethylene and then with oxygen in two separate reactors. The catalyst solution is alternately reduced and oxidized. At the same time the degree of oxidation of the catalyst changes alternately. Air is used instead of pure oxygen for the catalyst oxidation.
References:
Eckert, M., Fleischmann, G., Jira, R., Bolt, H. M. and Golka, K. 2006. Acetaldehyde. Ullmann's Encyclopedia of Industrial Chemistry.
Althaus H.-J., Chudacoff M., Hischier R., Jungbluth N., Osses M. and Primas A. (2007) Life Cycle Inventories of Chemicals. Final report ecoinvent data v2.0 No. 8. Swiss Centre for Life Cycle Inventories, Dübendorf, CH.

## Time period
The literature refers to data from the 1990s. Some values are based on data published by the Gendorf factory that were collected between 2011 and 2015. The time period has been adjusted accordingly. For more details, see the comments of the exchanges.

## Reference product
- acetaldehyde: 1 kg; name RP; CPC 34170: Ethers, alcohol peroxides, ether peroxides, epoxides, acetals and hemiacetals, and their halogenated, sulphona[…]; By-product classification allocatable product; CAS 75-07-0
  Acetaldehyde is a colorless liquid with a pungent, suffocating odor that is slightly fruity when diluted. Acetaldehyde is used in the manufacturing of acetic acid, acetic anhydride, acetate esters, pyrine and pyridine bases, peracetic acid, 1,3-butylene glycol, and others.
  production volume 6.32716e8 kg; name RP_PV
    According to 'Ullmann's encyclopedia of industrial chemistry' the global world consumption is 766 000 000 kg for the year 2003.
    Reference(s):
    Eckert, M., Fleischmann, G., Jira, R., Bolt, H. M. and Golka, K. 2006. Acetaldehyde. Ullmann's Encyclopedia of Industrial Chemistry.
  property heating value, net 27.53 MJ
    LHV is calculated based on the elemental composition of the substance. Based on the CAS number of the substance (000075-07-0), the chemical formula of the substance is found to be: C2H4O, (PubChem 2020).
    Reference: Kim, S., Chen, J., Cheng, T., Gindulyte, A., He, J., He, S., Li, Q., Shoemaker, B. A., Thiessen, P. A., Yu, B., Zaslavsky, L., Zhang, J., & Bolton, E. E. (2019). PubChem 2019 update: improved access to chemical data. Nucleic acids research, 47(D1), D1102–D1109. https://doi.org/10.1093/nar/gky1033
  property carbon content 0.545296
    carbon content on a dry matter basis (reserved; not for manual entry)
  properties: water in wet mass 0 kg, price 0.81 EUR2005, water content 0, wet mass 1 kg, carbon content, non-fossil 0, dry mass 1 kg, carbon content, fossil 0.545296, carbon allocation 0.545296 kg

## Inputs from technosphere
- tap water: 0 kg; pedigree (1,1,1,1,1)
  Calculated based on literature data published by the industry. This value is a 5-year average of data (2011 - 2015) published by the Gendorf factory (Gendorf, 2016, Umwelterklärung, www.gendorf.de), (Gendorf, 2015, Umwelterklärung, www.gendorf.de), (Gendorf, 2014, Umwelterklärung, www.gendorf.de). The amount of tap water per kg of chemical substance produced is calculated using literature data published by the Gendorf factory based in Germany, which produces a wide range of chemical substances. The factory produced 1657400 tonnes of chemical substances in the year 2015 (Gendorf, 2016, Umwelterklärung, www.gendorf.de) and 740000 tonnes of intermediate products. The amount of tap water consumed in the year 2015 was 55100 tonnes (Gendorf, 2016, Umwelterklärung, www.gendorf.de). The resulting amount of tap water is 0.023 kg/kg of chemical product produced. The 5-year average (2011 - 2015, weighted by production volume) is 0.026 kg/kg.
  properties: carbon content, fossil 0.00178991, wet mass 1 kg, dry mass 0.000337476 kg, water content 2962.17
  note on carbon content, fossil: Bicarbonate content is 2.93 mol/m3. CO2 content is 0.1 mol/m3 (ecoinvent v2.2 report 8, Tab 93.1).
- wastewater, average: -2.7e-6 m3; name BP_wastewater_average; lognormal variance with pedigree 0.0106, pedigree (2,3,2,4,3)
  Calculated based on literature data published by the industry. This value is a 5-year average of data (2011 - 2015) published by the Gendorf factory (Gendorf, 2016, Umwelterklärung, www.gendorf.de), (Gendorf, 2015, Umwelterklärung, www.gendorf.de), (Gendorf, 2014, Umwelterklärung, www.gendorf.de). The amount of wastewater (which is later on treated in the municipal WWTP) per kg of chemical substance produced is calculated using literature data published by the Gendorf factory based in Germany, which produces a wide range of chemical substances. The factory produced 1657400 tonnes of chemical substances in the year 2015 (Gendorf, 2016, Umwelterklärung, www.gendorf.de) and 740000 tonnes of intermediate products. The amount of wastewater which is later on treated in the municipal WWTP in the year 2015 was 1200 tonnes (Gendorf, 2016, Umwelterklärung, www.gendorf.de). The resulting amount of wastewater is 2.7E-06 m3/kg of chemical product produced.
  production volume 1708.33 m3; = RP_PV*BP_wastewater_average/ABS(RP)
    Calculated from the production volume of acetaldehyde in proportion to the respective output amounts.
  property price 0 EUR2005; name BP_wastewater_average_price_EUR2005
  properties: wet mass 1000 kg, carbon content, non-fossil 0.194039, water content 2882.2, dry mass 0.346837 kg
  note on carbon content, non-fossil: 0.0673 kg TOC/m3 (Tab A.17, ecoinvent v2.2 report 13_I). TOC was considered as Total Carbon.
- ethylene: 0 kg; pedigree (1,1,1,1,1)
  Data from survey in literature (von Däniken et al. 1995).
  Uncertainty: d
  properties: wet mass 1 kg, dry mass 1 kg, carbon content, fossil 0.857143, heating value, net 43.22 MJ
- heat, district or industrial, other than natural gas: 0 MJ; pedigree (1,1,1,1,1)
  Data from survey in literature (von Däniken et al. 1995).
  Uncertainty: d
  properties: heating value, net 1 MJ
- municipal solid waste: 0 kg; name BP_municipal_solid_waste; pedigree (1,1,1,1,1)
  Estimation.
  Uncertainty: e
  production volume 0 kg
    (same comment as for wastewater, average)
  properties: wet mass 1 kg, dry mass 0.771 kg, water content 0.297017, heating value, net 11.74 MJ, carbon content, non-fossil 0.261655, carbon content, fossil 0.171549
  note on heating value, net: Value taken from the general comment of the treatment dataset.
  note on carbon content, non-fossil: MSW composition in tab 4.1, ecoinvent v2.2 report 13_I. C content referred to 1 kg DM
- chemical factory, organics: 4e-10 unit; lognormal variance with pedigree 0.31, pedigree (2,3,2,4,3)
  Calculated based on literature data published by the industry. For this activity, no information was readily available concerning infrastructure and land-use. Therefore, the infrastructure is estimated based on data from two chemical factories, the BASF site of Ludwigshafen and the chemical factory in Gendorf (which are both located in Germany), which produce a wide range of chemical substances. Based on this data, the following assumptions are made: the built area amounts to about 4.2 ha, the plant has an average output of 50'000 t/a and a lifespan of fifty years. The estimated infrastructure amount is therefore 4.00 E-10 units per kg of produced chemical.
  References:
  Althaus H.-J., Chudacoff M., Hischier R., Jungbluth N., Osses M. and Primas A. (2007) Life Cycle Inventories of Chemicals. ecoinvent report No. 8, v2.0. EMPA Dübendorf, Swiss Centre for Life Cycle Inventories, Dübendorf, CH.
  Gendorf (2000) Umwelterklärung 2000, Werk Gendorf. Werk Gendorf, Burgkirchen.
- oxygen, liquid: 0.382 kg; lognormal variance with pedigree 0.1786, pedigree (4,5,5,5,5)
  Calculated based on stoechiometry: 1 mole of O2 reacts with 2 moles of ethylene.
  properties: wet mass 1 kg, dry mass 1 kg
- electricity, medium voltage: 0 kWh; pedigree (1,1,1,1,1)
  Estimated value based on expert judgement.
- heat, district or industrial, natural gas: 0 MJ; pedigree (1,1,1,1,1)
  Data from survey in literature (von Däniken et al. 1995).
  Uncertainty: d
  properties: heating value, net 1 MJ
- tap water: 0.000404717, 4.8717e-5, 8.05128e-5, 0.00203022, 5.28156e-5, 0.000150233, 0.0232328 kg (7 entries); lognormal variance with pedigree 0.0106, pedigree (2,3,2,4,3)
  (same comment as for tap water)
- ethylene: 0.0105802, 0.65942 kg (2 entries); lognormal variance with pedigree 0.04, pedigree (3,5,4,5,1)
  Data from survey in literature (von Däniken et al. 1995).
  Uncertainty: d
- heat, district or industrial, other than natural gas: 0.000725973, 1.79027 MJ (2 entries); lognormal variance with pedigree 0.04, pedigree (3,5,4,5,1)
  Data from survey in literature (von Däniken et al. 1995).
  Uncertainty: d
- municipal solid waste: -1.70699e-5, -4.30118e-6, -6.14664e-6, -0.0120725 kg (4 entries); lognormal variance with pedigree 0.04, pedigree (3,5,4,5,1)
  Estimation.
  Uncertainty: e
  production volume 7.65586e6 kg
- electricity, medium voltage: 0.00126052, 0.000241713, 0.00405786, 0.059018, 0.00831861, 0.0271033 kWh (6 entries); lognormal variance with pedigree 0.1786, pedigree (4,5,5,5,5)
  Estimated value based on expert judgement.
- heat, district or industrial, natural gas: 0.0253779, 1.64662 MJ (2 entries); lognormal variance with pedigree 0.04, pedigree (3,5,4,5,1)
  Data from survey in literature (von Däniken et al. 1995).
  Uncertainty: d

## Inputs from nature
- Water, river [natural resource, in water]: 0.00086 m3; lognormal variance with pedigree 0.0106, pedigree (2,3,2,4,3)
  Calculated based on literature data published by the industry. This value is a 5-year average of data (2011 - 2015) published by the Gendorf factory (Gendorf, 2016, Umwelterklärung, www.gendorf.de), (Gendorf, 2015, Umwelterklärung, www.gendorf.de), (Gendorf, 2014, Umwelterklärung, www.gendorf.de). The amount of groundwater and surface water (river) extracted per kg of chemical substance produced is calculated using literature data published by the Gendorf factory based in Germany, which produces a wide range of chemical substances. The factory produced 1657400 tonnes of chemical substances in the year 2015 (Gendorf, 2016, Umwelterklärung, www.gendorf.de) and 740000 tonnes of intermediate products. The amount of groundwater and surface water (river) extracted in the year 2015 was 19950000 tonnes and 21488100 tonnes respectively (Gendorf, 2016, Umwelterklärung, www.gendorf.de).
- Water, cooling, unspecified natural origin [natural resource, in water]: 0.0164 m3; lognormal variance with pedigree 0.0106, pedigree (2,3,2,4,3)
  Calculated based on literature data published by the industry. This value is a 5-year average of data (2011 - 2015) published by the Gendorf factory (Gendorf, 2016, Umwelterklärung, www.gendorf.de), (Gendorf, 2015, Umwelterklärung, www.gendorf.de), (Gendorf, 2014, Umwelterklärung, www.gendorf.de). The amount of water for cooling extracted per kg of chemical substance produced is calculated using literature data published by the Gendorf factory based in Germany, which produces a wide range of chemical substances. The factory produced 1657400 tonnes of chemical substances in the year 2015 (Gendorf, 2016, Umwelterklärung, www.gendorf.de) and 740000 tonnes of intermediate products. The reported amounts of water extracted as groundwater and surface water (river) are assumed to be used entirely for cooling purposes.
- Water, well, in ground [natural resource, in water]: 0.00083 m3; lognormal variance with pedigree 0.0106, pedigree (2,3,2,4,3)
  (same comment as for Water, river)

## Emissions to nature
- Particulates, > 2.5 um, and < 10um [air, urban air close to ground]: 1e-6 kg; lognormal variance with pedigree 0.16, pedigree (3,5,4,5,1)
  Data from survey in literature (von Däniken et al. 1995).
  Uncertainty: d
- COD, Chemical Oxygen Demand [water, surface water]: 0.0027 kg; lognormal variance with pedigree 0.08, pedigree (3,5,4,5,1)
  Data from survey in literature (von Däniken et al. 1995).
  Uncertainty: d
- Particulates, > 10 um [air, urban air close to ground]: 1e-6 kg; lognormal variance with pedigree 0.08, pedigree (3,5,4,5,1)
  Data from survey in literature (von Däniken et al. 1995).
  Uncertainty: d
- Chromium, ion [water, surface water]: 1.4e-5 kg; lognormal variance with pedigree 0.67, pedigree (3,5,4,5,1)
  Data from survey in literature (von Däniken et al. 1995).
  Uncertainty: d
- Particulates, < 2.5 um [air, urban air close to ground]: 1e-6 kg; lognormal variance with pedigree 0.34, pedigree (3,5,4,5,1)
  Data from survey in literature (von Däniken et al. 1995).
  Uncertainty: d
- Water [air, unspecified]: 0.0014 m3; lognormal variance with pedigree 0.0106, pedigree (2,3,2,4,3)
  Calculated to ensure the water balance. In general, in the case of recirculating cooling systems, 77% of the water input evaporates to air. In case of once-through cooling systems, 4% of the water input evaporates to air. The process water has in the chemical industry an average evaporation rate of 20.5%. In the specific case of the Gendorf factory, the calculated evaporation rate based on the data published is 6.3%. This matches the qualitative information, that the majority of the cooling systems in Gendorf are once-through and that the amount of cooling water used is significantly higher than the amount of process water used (Gendorf, 2016, Umwelterklärung, www.gendorf.de).
- Carbon monoxide, fossil [air, urban air close to ground]: 4e-5 kg; lognormal variance with pedigree 0.16, pedigree (3,5,4,5,1)
  Data from survey in literature (von Däniken et al. 1995).
  Uncertainty: d
- Nitrogen oxides [air, urban air close to ground]: 0.00024 kg; lognormal variance with pedigree 0.04, pedigree (3,5,4,5,1)
  Data from survey in literature (von Däniken et al. 1995).
  Uncertainty: d
- Water [water, unspecified]: 0.0167 m3; lognormal variance with pedigree 0.0106, pedigree (2,3,2,4,3)
  Calculated based on literature data published by the industry (Gendorf, 2016, Umwelterklärung, www.gendorf.de). The amount of water released back to the environment consists of the amount of process water treated in the internal WWTP and then released back to the environment and the amount of cooling water released back to the environment.
- BOD5, Biological Oxygen Demand [water, surface water]: 0.0016 kg; lognormal variance with pedigree 0.08, pedigree (3,5,4,5,1)
  Data from survey in literature (von Däniken et al. 1995).
  Uncertainty: d
- Hydrocarbons, unspecified [water, surface water]: 5e-5 kg; lognormal variance with pedigree 0.08, pedigree (3,5,4,5,1)
  Data from survey in literature (von Däniken et al. 1995).
  Uncertainty: d
- TOC, Total Organic Carbon [water, surface water]: 0.001 kg; lognormal variance with pedigree 0.08, pedigree (3,5,4,5,1)
  Calculated by default as TOC (gC) = COD/2.7 (COD measured in g O2). Should more correctly be calculated from the carbon content of the specified emissions to water.
  Uncertainty: d
- Hydrocarbons, aliphatic, alkanes, unspecified [air, urban air close to ground]: 0.0109 kg; lognormal variance with pedigree 0.16, pedigree (3,5,4,5,1)
  Data from survey in literature (von Däniken et al. 1995).
  Uncertainty: d
- Suspended solids, unspecified [water, surface water]: 1.4e-5 kg; lognormal variance with pedigree 0.08, pedigree (3,5,4,5,1)
  Data from survey in literature (von Däniken et al. 1995).
  Uncertainty: d
- DOC, Dissolved Organic Carbon [water, surface water]: 0.001 kg; lognormal variance with pedigree 0.08, pedigree (3,5,4,5,1)
  Calculated as equal to TOC.
  Uncertainty: d
- Sulfur dioxide [air, urban air close to ground]: 1e-6 kg; lognormal variance with pedigree 0.04, pedigree (3,5,4,5,1)
  Data from survey in literature (von Däniken et al. 1995).
  Uncertainty: d
- Dissolved solids [water, surface water]: 0.00011 kg; lognormal variance with pedigree 0.08, pedigree (3,5,4,5,1)
  Data from survey in literature (von Däniken et al. 1995).
  Uncertainty: d

## Sampling procedure
Data based on literature as well as industrial data. Some values are calculated based on data from a large chemical factory located in Germany. For more details, see the comments of the exchanges.

## Extrapolations
The literature source used is based on numbers taken from the manufacture of ethylene oxide, as an approximation. This dataset has been copied from an original dataset covering the geography RER. The uncertainty has been adjusted accordingly.

## Review by Gregor Wernet 2017-08-04
This dataset was additionally reviewed in a separate review process by Eric Johnson of Atlantic Consulting as well as Emilia Moreno Ruiz and Gregor Wernet of ecoinvent.
