# barge tanker production

Dataset: EcoSpold 2, unit process
Geography: RoW
Time period: 1993-01-01 to 2021-12-31
Technology level: current
Classification: EcoSpold01Categories: transport systems/ship
Classification: ISIC rev.4 ecoinvent: 3011:Building of ships and floating structures
Tags: ConvertedDataset
Scenario: Business-as-Usual
System model: Allocation, cut-off by classification
Generated by: Michael Spielmann (obsolete)
Published in: Spielmann M. 2007
Database: ecoinvent
isCopyrightProtected: true
accessRestrictedTo: 1

## General comment
The exchanges of the barge manufacturing are derived from an assessment of one barge, with a load capacity of 2800t. This data was adjusted to model a barge, representing the current average total capacity for solid goods transports (1200 tonnes/barge). Energy consumption in manufacturing was estimated as 50% of the cumulative energy of the used materials. The split of energies is 10% electricity and 90% heavy fuel oil.
[This dataset was already contained in the ecoinvent database version 2. It was not individually updated during the transfer to ecoinvent version 3. Life Cycle Impact Assessment results may still have changed, as they are affected by changes in the supply chain, i.e. in other datasets. This dataset was generated following the ecoinvent quality guidelines for version 2. It may have been subject to central changes described in the ecoinvent version 3 change report (http://www.ecoinvent.org/database/ecoinvent-version-3/reports-of-changes/), and the results of the central updates were reviewed extensively. The changes added e.g. consistent water flows and other information throughout the database. The documentation of this dataset can be found in the ecoinvent reports of version 2, which are still available via the ecoinvent website. The change report linked above covers all central changes that were made during the conversion process.]

## Included activities end
This inventory calls processes of material production, representing the material composition of an average water vehicle used for solid goods transportation. For manufacturing, electricity and heavy oil burned in industrial furnace are included. For the transportation of materials standandard distance are applied. Also, waste treatment processes for non metal components of a water vehicle are accounted for.

## Geography
Manufacturing data represents conditions in Europe.

## Technology
The modelled goods wagons represent different technologies currently in use.

## Reference product
- barge tanker: 1 unit; By-product classification allocatable product; CPC 49314: Other vessels for the transport of goods and other vessels for the transport of both persons and goods
  EcoSpold01Location=RER
  production volume 2.67763 unit
    This is a placeholder value that does not reflect real-world production volumes. This dataset does not currently require a real-world production volume to work in the database framework, and no actual data were collected yet. This has no negative effect on the results of the ecoinvent database.
  property price 449940 EUR2005
    UNdata (Average import and export data for EU-27). Commodity: 'Ships, boats and other floating structures'. (http://data.un.org/Data.aspx?q=tankers&d=ComTrade&f=_l1Code%3a89%3bcmdCode%3a890120) The total weight is 3520 t (Source: Existing ecoinvent documentation from ecoinvent v.2.2. From information in the dataset barge.)

## Inputs from technosphere
- ceramic tile: 1320 kg; lognormal variance with pedigree 0.074, pedigree (3,4,5,5,3)
  Literatures studies
  EcoSpold01Location=CH
  Uncertainty: literatures studies
  properties: wet mass 1 kg, dry mass 1 kg
- copper, cathode: 2640 kg; lognormal variance with pedigree 0.074, pedigree (3,4,5,5,3)
  EcoSpold01Location=RER
  Literatures studies
  Uncertainty: literatures studies
  properties: wet mass 1 kg, dry mass 1 kg
- polyethylene, high density, granulate: 941 kg; lognormal variance with pedigree 0.074, pedigree (3,4,5,5,3)
  Literatures studies
  EcoSpold01Location=RER
  Uncertainty: literatures studies
  properties: dry mass 1 kg, carbon content, fossil 0.857143, wet mass 1 kg, heating value, net 42.47 MJ
  note on carbon content, fossil: Polyethylene is formed out of a huge amount of ethylene monomers (C2H4) (ecoinvent v2.2 report 11_II). MW=28 g/mol
- electricity, medium voltage: 0 kWh; pedigree (1,1,1,1,1)
  Literatures studies
  EcoSpold01Location=UCTE
  Uncertainty: literatures studies
- aluminium, cast alloy: 188 kg; lognormal variance with pedigree 0.074, pedigree (3,4,5,5,3)
  EcoSpold01Location=RER
  Literatures studies
  Uncertainty: literatures studies
  properties: dry mass 1 kg, wet mass 1 kg
- cement, unspecified: 0 kg; pedigree (1,1,1,1,1)
  EcoSpold01Location=CH
  Literatures studies
  Uncertainty: literatures studies
  properties: dry mass 1 kg, wet mass 1 kg
- waste plastic, mixture: 0 kg; pedigree (1,1,1,1,1)
  EcoSpold01Location=CH
  Own estimate, based on material composition
  Uncertainty: own estimate, based on material composition
  production volume 0 kg
    Calculated from the production volume of barge tanker in proportion to the respective output amounts.
  properties: wet mass 1 kg, carbon content, fossil 0.747344, dry mass 0.847 kg, heating value, net 30.79 MJ, water content 0.180638
  note on carbon content, fossil: C content in 1 kg DM was calculated using data in Tab A.2, ecoinvent v2.2 report 13_I
  note on heating value, net: Value taken from the general comment of the treatment dataset.
- polyethylene, low density, granulate: 1880 kg; lognormal variance with pedigree 0.074, pedigree (3,4,5,5,3)
  EcoSpold01Location=RER
  Literatures studies
  Uncertainty: literatures studies
  properties: carbon content, fossil 0.857143, dry mass 1 kg, wet mass 1 kg, heating value, net 42.47 MJ
- cast iron: 20700 kg; lognormal variance with pedigree 0.074, pedigree (3,4,5,5,3)
  Literatures studies
  EcoSpold01Location=RER
  Uncertainty: literatures studies
  properties: dry mass 1 kg, wet mass 1 kg, carbon content, fossil 0.04
  note on carbon content, fossil: Cast iron is made by remelting pig iron in small furnaces (e.g. cupola furnaces or electric arc furnaces) and poured into moulds to make castings. It usually contains 2% to 6% carbon (ecoinvent v2.2 report 10_partII). An average content of 4% was considered
- waste emulsion paint: -753 kg; lognormal variance with pedigree 0.236, pedigree (3,4,5,5,5)
  Own estimate, based on material composition
  EcoSpold01Location=CH
  Uncertainty: own estimate, based on material composition
  production volume 2259 kg
    (same comment as for waste plastic, mixture)
  properties: carbon content, fossil 0.27, dry mass 1 kg, wet mass 1 kg, heating value, net 8.18 MJ
  note on carbon content, fossil: Tab A.4, ecoinvent v2.2 report 13_I. C content has been calculated after data in the tables, and then referred to 1 kg DM
- synthetic rubber: 565 kg; lognormal variance with pedigree 0.074, pedigree (3,4,5,5,3)
  Literatures studies
  EcoSpold01Location=RER
  Uncertainty: literatures studies
  properties: carbon content, fossil 0.871949, wet mass 1 kg, dry mass 1 kg, heating value, net 26.42 MJ
  note on carbon content, fossil: EPDM (Ethylene-propene-diene terpolymer) rubber is a terpolymer of ethylene, propene, and a diene with the residual unsaturated portion of the diene in the side chain (ecoinvent v2.2 report 7-part XX & Ullmann). Chemical formula (deduced from Evidences of Solvent-Induced Miscibility in Polychloroprene-co-Ethylene-Propene Diene Terpolymer Blends, Dubey et al., Journal of Applied Polymer Science, 2009, 111:1884–1891): C20H35
- alkyd paint, white, without solvent, in 60% solution state: 1880 kg; lognormal variance with pedigree 0.074, pedigree (3,4,5,5,3)
  Literatures studies
  EcoSpold01Location=RER
  Uncertainty: literatures studies
  properties: heating value, net 10.3 MJ, carbon content, fossil 0.140367, carbon content, non-fossil 0.199629, wet mass 1 kg, dry mass 1 kg
  note on carbon content, fossil: C content was calculated as an addition of C content in the raw materials.
- stone wool, packed: 3390 kg; lognormal variance with pedigree 0.074, pedigree (3,4,5,5,3)
  Literatures studies
  EcoSpold01Location=CH
  Uncertainty: literatures studies
  properties: wet mass 1 kg, dry mass 1 kg, carbon content, fossil 0.015401
  note on carbon content, fossil: The chemical composition of the glass fibres used in the rock wool production is similar to the composition of naturally cooled volcano basalt and has a composition listed in Tab. 3.1 and 3.2 in ecoinvent v2.2 report 16, part XIV. Rock wool contains: a minimum of 96% mineral fibres,between 0.5 and 3.0 weight percent of phenolic resin depending on the specific product characteristics, and about 0.2 percent mineral oil (ecoinvent v2.2 report 16, part XIV). An average composition of 1.8% phenolic resin, 0.2% mineral oil, and 98% mineral fibres has been assumed and used to calculate C content of the rock wool
- glued laminated timber, average glue mix: 1.4 m3; lognormal variance with pedigree 0.074, pedigree (3,4,5,5,3)
  EcoSpold01Location=RER
  Literatures studies
  Uncertainty: literatures studies
  properties: dry mass 404.4 kg, water content 0.0979228, heating value, net 5537.41 MJ, price 298 EUR2005, carbon content, fossil 0.01791, carbon content, non-fossil 0.441932, wet mass 444 kg
- steel, chromium steel 18/8, hot rolled: 4140 kg; lognormal variance with pedigree 0.074, pedigree (3,4,5,5,3)
  EcoSpold01Location=RER
  Literatures studies
  Uncertainty: literatures studies
  properties: wet mass 1 kg, dry mass 1 kg, carbon content, fossil 0.0008
  note on carbon content, fossil: Stainless steel model is the grade 304 steel (18/8 stainless, 18% chromium 8% nickel; max. 0.08% C)
- waste wood, untreated: 0 kg; pedigree (1,1,1,1,1)
  (same comment as for waste emulsion paint)
  production volume 0 kg
    (same comment as for waste plastic, mixture)
  properties: dry mass 0.8 kg, wet mass 1 kg, carbon content, non-fossil 0.48632, water content 0.25, heating value, net 13.99 MJ
  note on carbon content, non-fossil: Tab A.4, ecoinvent v2.2 report 13_I. C content has been referred to 1 kg DM,
- reinforcing steel: 318000 kg; lognormal variance with pedigree 0.074, pedigree (3,4,5,5,3)
  Literatures studies
  EcoSpold01Location=RER
  Uncertainty: literatures studies
  properties: carbon content, fossil 0.004, dry mass 1 kg, wet mass 1 kg
- heat, district or industrial, other than natural gas: 0 MJ; pedigree (1,1,1,1,1)
  EcoSpold01Location=RER
  Literatures studies
  Uncertainty: literatures studies
  properties: heating value, net 1 MJ
- electricity, medium voltage: 1588.25, 304.559, 5112.91, 74362.7, 10481.5, 34150.2 kWh (6 entries); lognormal variance with pedigree 0.248, pedigree (4,5,5,5,5)
  Literatures studies
  EcoSpold01Location=UCTE
  Uncertainty: literatures studies
- cement, unspecified: 152.399, 11.1622, 31.8158, 719.525, 21.1777, 232.594, 28.1413, 3143.19 kg (8 entries); lognormal variance with pedigree 0.074, pedigree (3,4,5,5,3)
  EcoSpold01Location=CH
  Literatures studies
  Uncertainty: literatures studies
- waste plastic, mixture: -346.549, -23.1551, -1.75118, -9.56387, -3.8637, -9.08179, -2426.04 kg (7 entries); lognormal variance with pedigree 0.236, pedigree (3,4,5,5,5)
  (same comment as for waste plastic, mixture)
  production volume 8460 kg
- waste wood, untreated: -50.7225, -6.29796, -0.460452, -17.6891, -2.67239, -4.22483, -672.933 kg (7 entries); lognormal variance with pedigree 0.34, pedigree (5,5,5,5,5)
  (same comment as for waste emulsion paint)
  production volume 2265 kg
- heat, district or industrial, other than natural gas: 1571.12, 3.87443e6 MJ (2 entries); lognormal variance with pedigree 0.248, pedigree (4,5,5,5,5)
  EcoSpold01Location=RER
  Literatures studies
  Uncertainty: literatures studies

## Emissions to nature
- NMVOC, non-methane volatile organic compounds, unspecified origin [air, unspecified]: 1130 kg; lognormal variance with pedigree 0.114, pedigree (3,4,5,5,3)
  Estimated from the used paint (60%B solvent as NMVOC)
  Uncertainty: estimated from the used paint (60%B solvent as NMVOC)

## Sampling procedure
literature studies and own calculations.

## Extrapolations
none This dataset has been copied from an original dataset covering the geography RER. The uncertainty has been adjusted accordingly.

## Review by Niels Jungbluth 2004-04-02
Passed.
