# cadmium sulfide production, semiconductor-grade

Dataset: EcoSpold 2, unit process
Geography: US
Time period: 1981-01-01 to 2021-12-31
Technology level: current
Classification: ISIC rev.4 ecoinvent: 2011:Manufacture of basic chemicals
Synonyms: Cadmium sulphide; Cadmium sulfide (CdS); Thioxocadmium; Orange cadmium; Capsebon
Scenario: Business-as-Usual
System model: Allocation, cut-off by classification
Generated by: Matthias Tuchschmid (obsolete)
Published in: Classen M. 2009
Database: ecoinvent
isCopyrightProtected: true
accessRestrictedTo: 1

## General comment
This dataset represents the production of 1 kg of high-grade cadmium sulfide (99.99% purity) from cadmium and sulfuric acid. Cadmium sulfide (CdS) is used in thin film solar cells as a junction partner in CIS (Copper-Indium-Diselenid) and Cd/Te solar cells. The CdS layer itself is not intended to absorb light but instead allows light to pass through to either the CIS or CdTe substrate. Therefore, the CdS layer must be thin (30 to 100 nanometre) in order to allow sufficient light to pass through. A purity of at least 99.99% (4N) is required.
CdS is also used as pigment, that is valued for its good thermal stability in many polymers, for example in engineering plastics. By adding selenium in its formula it is possible to obtain colours ranging from a greenish yellow to red violet. Pigments do not necessarily need a purity as high as for solar cells.
References:
Classen M., Althaus H.-J., Blaser S., Tuchschmid M., Jungbluth N., Doka G., Faist Emmenegger M. and Scharnhorst W. (2009) Life Cycle Inventories of Metals. Final report ecoinvent data v2.1, No 10. EMPA Dübendorf, Swiss Centre for Life Cycle Inventories, Dübendorf, CH.

## Included activities start
The activity starts when the raw materials enter the process.

## Included activities end
This activity ends with the production of cadmium sulfide. The energy consumption and emissions are estimated.

## Geography
Production in US.

## Technology
Production of cadmium sulfide by the hydrometallurgical process. This aqueous technique of producing CdS involves a number of handling steps and is a complex procedure. According to a patent, the normal procedure is to “dissolve a cadmium salt in water, preferably the chloride or sulphate, and then bubble hydrogen sulfide through the solution to precipitate essentially all of the cadmium in the form of cadmium sulfide.” The reported yield is quite high; anionic and cationic impurities co-precipitates with the cadmium sulfide. The following purification involves extensive washing and leaching, until a high purity of the output product can be obtained.
Reference(s):
Classen M., Althaus H.-J., Blaser S., Tuchschmid M., Jungbluth N., Doka G., Faist Emmenegger M. and Scharnhorst W. (2009) Life Cycle Inventories of Metals. Final report ecoinvent data v2.1, No 10. EMPA Dübendorf, Swiss Centre for Life Cycle Inventories, Dübendorf, CH.

## Time period
Time of patents.

## Reference product
- cadmium sulfide, semiconductor-grade: 1 kg; name RP; CPC 34250: Salts of oxometallic or peroxometallic acids; colloidal precious metals and compounds thereof; inorganic and o[…]; By-product classification allocatable product; CAS 1306-23-6
  Cadmium sulfide (CdS) is used in thin film solar cells as a junction partner in CIS (Copper-Indium-Diselenid) and Cd/Te solar cells. The CdS layer itself is not intended to absorb light but instead allows light to pass through to either the CIS or CdTe substrate.
  References:
  Classen M., Althaus H.-J., Blaser S., Tuchschmid M., Jungbluth N., Doka G., Faist Emmenegger M. and Scharnhorst W. (2009) Life Cycle Inventories of Metals. Final report ecoinvent data v2.1, No 10. EMPA Dübendorf, Swiss Centre for Life Cycle Inventories, Dübendorf, CH.
  production volume 729.194 kg; name RP_PV
    Calculated from GLO production volumes, attributing 59% of CdS semiconductor grade production to the US, in the case of CdTe laminate; and in the case of CIS laminate, 26% (from informations in ecoinvent v2 report 6_XII).
  property price 0.970836 EUR2005
    Calculated based on mollar masses of Cd and S; price estimated based on S and Cd contents of the product and using 5-year market average prices (2015-2019; USD/kg; USGS [2020]) and converted to EUR2005 (USD2019/EUR2005 exchange rate: 0.62; Official Data Foundation [2020] and Macrotrends [2020]).
    References:
    Official Data Foundation (2020). Inflation Calculator [Online]. Available from: https://www.officialdata.org/us/inflation/2005?endYear=2019&amount=1 [Accessed 28/07/2020]
    USGS (2020). Mineral Commodity Summaries 2020 [Online]. Available from: https://pubs.usgs.gov/periodicals/mcs2020/mcs2020.pdf [Accessed 28/07/2020]
    Macrotrends (2020). Euro Dollar Exchange Rate (EUR USD) - Historical Chart [Online]. Available from: https://www.macrotrends.net/2548/euro-dollar-exchange-rate-historical-chart [Accessed 28/07/2020]
  property carbon content 0
    carbon content on a dry matter basis (reserved; not for manual entry)
  properties: carbon content, fossil 0, carbon content, non-fossil 0, wet mass 1 kg, water content 0, water in wet mass 0 kg, dry mass 1 kg, carbon allocation 0 kg

## Inputs from technosphere
- chemical factory, organics: 4e-10 unit; lognormal variance with pedigree 0.3498, pedigree (2,3,5,4,3)
  Calculated based on literature data published by the industry. For this activity, no information was readily available concerning infrastructure and land-use. Therefore, the infrastructure is estimated based on data from two chemical factories, the BASF site of Ludwigshafen and the chemical factory in Gendorf (which are both located in Germany), which produce a wide range of chemical substances. Based on this data, the following assumptions are made: the built area amounts to about 4.2 ha, the plant has an average output of 50'000 t/a and a lifespan of fifty years. The estimated infrastructure amount is therefore 4.00 E-10 units per kg of produced chemical.
  References:
  Althaus H.-J., Chudacoff M., Hischier R., Jungbluth N., Osses M. and Primas A. (2007) Life Cycle Inventories of Chemicals. ecoinvent report No. 8, v2.0. EMPA Dübendorf, Swiss Centre for Life Cycle Inventories, Dübendorf, CH.
  Gendorf (2000) Umwelterklärung 2000, Werk Gendorf. Werk Gendorf, Burgkirchen.
- transport, freight, lorry, unspecified: 0.13353 metric ton*km; = cadmium_chloride * 100/1000
  The cadmium chloride is assumed to be transported 100 km by lorry. This is the standard road transport distance for the US (see table 4.2, p. 635/926 in Classen et al., 2009).
  References:
  Classen M., Althaus H.-J., Blaser S., Tuchschmid M., Jungbluth N., Doka G., Faist Emmenegger M. and Scharnhorst W. (2009) Life Cycle Inventories of Metals. Final report ecoinvent data v2.1, No 10. EMPA Dübendorf, Swiss Centre for Life Cycle Inventories, Dübendorf, CH, Online-Version under: www.ecoinvent.ch
- cadmium chloride, semiconductor-grade: 1.3353 kg; name cadmium_chloride; lognormal variance with pedigree 0.332, pedigree (5,4,5,1,5)
  Calculated based on formula.
  This product is assumed to be supplied exclusively by the production in the US, therefore a direct activity link to the activity "cadmium chloride production, semiconductor-grade" in the US is used.
  Uncertainty: c
  properties: wet mass 1 kg, dry mass 1 kg
- transport, freight train: 0.26706 metric ton*km; = cadmium_chloride * 200/1000
  The cadmium chloride is assumed to be transported 200 km by rail. This is the standard rail transport distance for the US (see table 4.2, p. 635/926 in Classen et al., 2009).
  References:
  Classen M., Althaus H.-J., Blaser S., Tuchschmid M., Jungbluth N., Doka G., Faist Emmenegger M. and Scharnhorst W. (2009) Life Cycle Inventories of Metals. Final report ecoinvent data v2.1, No 10. EMPA Dübendorf, Swiss Centre for Life Cycle Inventories, Dübendorf, CH, Online-Version under: www.ecoinvent.ch
- electricity, medium voltage: 0.0038889 kWh; lognormal variance with pedigree 0.176, pedigree (4,5,5,1,4)
  Assumption
  Uncertainty: a
- hydrogen sulfide: 0.24841 kg; lognormal variance with pedigree 0.334, pedigree (5,4,5,5,5)
  Calculated based on formula
  Uncertainty: c
  properties: heating value, net 7.11 MJ, dry mass 1 kg, wet mass 1 kg

## Emissions to nature
- Cadmium, ion [water, unspecified]: 2.6e-6 kg; lognormal variance with pedigree 0.648, pedigree (5,5,5,1,5)
  Estimation
  Uncertainty: e
- Chloride [water, unspecified]: 0.51575 kg; lognormal variance with pedigree 0.648, pedigree (5,5,5,1,5)
  Estimation
  Uncertainty: e

## Sampling procedure
Literature and estimations.

## Extrapolations
This dataset has been extrapolated from year 1999 to the year of the calculation (2021). The uncertainty has been adjusted accordingly.

## Review by Emilia Moreno Ruiz 2017-08-09
This dataset was additionally reviewed in a separate review process by Eric Johnson of Atlantic Consulting as well as Emilia Moreno Ruiz and Gregor Wernet of ecoinvent.
