# yarn production, jute

Dataset: EcoSpold 2, unit process
Geography: BD
Time period: 2017-01-01 to 2021-12-31
Technology level: current
Classification: ISIC rev.4 ecoinvent: 1311:Preparation and spinning of textile fibres
Scenario: Business-as-Usual
System model: Allocation, cut-off by classification
Generated by: Mireille Faist Emmenegger
Published in: Faist Emmenegger, M. 2018
Database: ecoinvent
isCopyrightProtected: true
accessRestrictedTo: 1

## General comment
This dataset refers to the production of 1 kg yarn from jute fibre. The inventory includes softening, carding, drawing, and spinning of the raw jute. About 4% of raw jute converts into caddies and 6% of raw jute converts into jute dust. In most cases, byproducts/wastes are being reused in the same production process.
Hence, no wastes/by products are mentioned separately. Inputs have been scaled accordingly to account for an average of 5% by-products re-used in the production process.

## Included activities start
The activity starts with the opening of the raw jute fibre.

## Included activities end
The activity ends with the produced greige yarn.

## Geography
Bangladesh

## Reference product
- yarn, jute: 1 kg; By-product classification allocatable product; CPC 26380: Yarn of vegetable textile fibres other than cotton (including flax, jute, coir and true hemp); paper yarn
  production volume 9e8 kg; name pv
    The Bangladesh Jute Spinners Association reports the annual production for 2016.
  property heating value, net 14.87 MJ
    LHV is calculated based on the Carbon content of the product. More details can be found on the respective documentation.
  property price 0.712 EUR2005
    Average 2005 prices for EU27, USA, China, Japan and India from Import/Export data (US$ and tonnes) in UN Commodity Trade Statistics Database; Commodity: Yarn of jute or of other textile bast fibres of heading 264.0
  property carbon content 0.490909
    carbon content on a dry matter basis (reserved; not for manual entry)
  properties: carbon content, non-fossil 0.490909, water content 0, dry mass 1 kg, water in wet mass 0 kg, wet mass 1 kg, carbon content, fossil 0, carbon allocation 0.490909 kg

## Inputs from technosphere
- fibre, jute: 1 kg; lognormal variance with pedigree 0.0038, pedigree (2,3,3,1,1)
  Industry data. Expert interview with production manager of the jute mill. Data available from the jute mill for the year of 2016. In reality, 1.1 kg jute is used to produce 1 kg yarn. However, the 10% wastage are caddies and jute dute which are being reused in the same process.
  properties: wet mass 1 kg, carbon content, non-fossil 0.46, dry mass 0.879121 kg, heating value, net 11.96 MJ, water content 0.1375
- natural gas liquids: 0.0340316 kg; = 0.03233/0.95; lognormal variance with pedigree 0.0038, pedigree (2,3,3,1,1)
  Industry data (expert interview with the production manager of the jute mill), . It is used in the boiler.The value was scaled to account for the re-use of jute fibre wastes (0.05 kg per kg, value taken from India).
  properties: dry mass 1 kg, carbon content, fossil 0.812659, wet mass 1 kg, heating value, net 24.62 MJ
- building, hall: 9.35789e-5 m2; lognormal variance with pedigree 0.0092, pedigree (2,3,3,1,1)
- electricity, medium voltage: 0.368421 kWh; = 0.35/0.95; lognormal variance with pedigree 0.0038, pedigree (2,3,3,1,1)
  Industry data (expert interview with the production manager of the jute mill). The electricity data from the industry is available for a combined process of yarn and jute fabric production. Thus, the value is seperated using the ratio of the electricity consumption of the specific mechinaries from the article Sharif et al 2016.The value was scaled to account for the re-use of jute fibre wastes (0.05 kg per kg, value taken from India).
- wastewater from textile production: -3.02316e-6 m3; name ww; = (Water_well_in_ground_amount_1*0.8)*-1
  Industry data. Data on composition of wastewater from jute industry is unavailable. Hence, we used wastewaer, average.
  production volume 2720.84 m3; = pv*ww
    Calculated from production volume of reference product using the relative outputs.
  property price 0 EUR2005; name ww_price_EUR2005
  properties: mass concentration, potassium 0.01647 kg/m3, carbon content, non-fossil 0.216883, mass concentration, aluminium 0.0007758 kg/m3, mass concentration, magnesium 0.003219 kg/m3, wet mass 1000 kg, mass concentration, iron 0.0005904 kg/m3, mass concentration, zinc 0.0001075 kg/m3, mass concentration, copper 0.0001091 kg/m3, BOD5, mass per volume 0.495 kg/m3, COD, mass per volume 0.501 kg/m3, dry mass 0.238473 kg, water content 4192.34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
  note on carbon content, non-fossil: COD is 7.79e-4 kg/kg (Tab 12.11, ecoinvent v2.2 report 18_III). COD was converted to TOC, using conversion factors in Tab 4.10 (ecoinvent v2.2 report 13_IV). TOC was considered as Total Carbon.
- fatty acid: 0.00526316 kg; = 0.005/0.95; lognormal variance with pedigree 0.0418, pedigree (2,3,5,1,1)
  Industry data (expert interview with production manager of the jute mill). Data available from the jute mill for the year of 2016; Product is available in local market . Product is locally known as Tamarind Six (TS) powder.The value was scaled to account for the re-use of jute fibre wastes (0.05 kg per kg, value taken from India).
  properties: carbon content, non-fossil 0.75, dry mass 1 kg, wet mass 1 kg, heating value, net 22.73 MJ
- maize starch: 2.84211e-5 kg; = 2.7E-05/0.95; lognormal variance with pedigree 0.0418, pedigree (2,3,5,1,1)
  Industry data (expert interview with production manager of the jute mill). Data available from the jute mill for the year of 2016; Product is available in local market . Product is locally known as Quomar glue.The value was scaled to account for the re-use of jute fibre wastes (0.05 kg per kg, value taken from India).
  properties: heating value, net 11.64 MJ, water content 0.162791, dry mass 0.86 kg, carbon content, non-fossil 0.46, wet mass 1 kg
  note on carbon content, non-fossil: C-content of starch is considered 46% on dry mass basis (from "Evolutionary and Biochemical Aspects", A.D. Kay and T. Vrede (in Global Ecology, 2010, Elsevier B.V., S.E. Jørgensen Ed.)).
- soap: 8.63158e-6 kg; = 8.2E-06/0.95; lognormal variance with pedigree 0.0038, pedigree (2,3,3,1,1)
  Industry data (expert interview with production manager of the jute mill). Data available from the jute mill for the year of 2016; Product is available in local market . Product is locally known as Nikanil soap.The value was scaled to account for the re-use of jute fibre wastes (0.05 kg per kg, value taken from India).
  properties: carbon content, non-fossil 0.692237, dry mass 0.87 kg, wet mass 1 kg, water content 0.149425, heating value, net 17.93 MJ
- lubricating oil: 0.0930526 kg; = 0.0884/0.95; lognormal variance with pedigree 0.0038, pedigree (2,3,3,1,1)
  Industry data. Expert interview with production manager of the jute mill. Data available from the jute mill for the year of 2016.The value was scaled to account for the re-use of jute fibre wastes (0.05 kg per kg, value taken from India).
  properties: wet mass 1 kg, dry mass 1 kg, carbon content, fossil 0.75, heating value, net 40.2 MJ
  note on carbon content, fossil: Lubricating oil is produced from diesel. C-content/dry mass of fats and oils considered 75%, from: ecoinvent v2.2 report, n 15a, pg 40
  note on heating value, net: Literature value, Source: IPCC 2006, 2006 IPCC Guidelines for National Greenhouse Gas Inventories, Prepared by the National Greenhouse Gas Inventories Programme, Eggleston H.S., Buendia L., Miwa K., Ngara T. and Tanabe K. (eds). Published: IGES, Japan

## Inputs from nature
- Water, well, in ground [natural resource, in water]: 3.77895e-6 m3; name Water_well_in_ground_amount_1; = 3.59E-06/0.95; lognormal variance with pedigree 0.118777, pedigree (2,3,3,1,1)
  Industry data (expert interview with the production manager of the jute mill). The data are available for the entire process (from raw jute to woven fabric) from the jute mill for the year of 2016. Thus, the value for spinning process is calculated. The source of the water is ground water. Most of the water are being recirculated within the process. However, a tiny percentage of the water are discharged into environment as wastewater.
  The value was scaled to account for the re-use of jute fibre wastes (0.05 kg per kg, value taken from India).

## Emissions to nature
- Water [air, urban air close to ground]: 7.55789e-7 m3; = Water_well_in_ground_amount_1*0.2
  Assuming 20% evaporation.

## Sampling procedure
Data were collected from the Amin Jute Mill which is a public enterprise of Bangladesh Jute Mill Corporation (BJMC) under the Ministry of Textile and Jute. Its average production is 11100 MT per year. Statistical report of BJMC represents that production of Hessian, Sacking and Carpet Backing Cloth were 11260 MT, 26272 MT and 3822 MT respectively under the mills of BJMC in fiscal year 2014-2015 where Amin Jute Mill produced 1061.62 MT, 2463.16 MT and 701.70 MT of Hessian, Sacking and Carpet Backing Cloth respectively in the same fiscal year. It indicates that from total production of BJMC mills, 9.43%, 9.38% and 18.36% of Hessian, Sacking and Carpet Backing Cloth came from Amin Jute mill for the fiscal year 2014-2015. In the fiscal year 2015-2016, production turns into 1277.32 MT and 2662.51 MT for Hessian and Sacking bag respectively which shows even higher growth of production from Amin Jute Mill. Average export quantity of jute goods from BJMC mills was 1,31,085 MT according to the information provided by Bangladesh Jute Spinners Association (BJSA) in the fiscal year 2014-2015. In case of Amin jute Mill, almost 90% of jute goods produced in the mill are being exported in several countries ensured by respective authorities. Export takes place in 30 countries including Sudan Iran, japan, Indonesia, India etc. where Sudan is the largest buyer. Considering above factors, we took Amin Jute Mill as the representetative of overall jute processing and manufacturing practices for the whole country - Bangladesh.

## Extrapolations
This dataset has been extrapolated from year 2017 to the year of the calculation (2021). The uncertainty has been adjusted accordingly.
