# microwave oven production

Dataset: EcoSpold 2, unit process
Geography: GLO
Time period: 2018-01-01 to 2021-12-31
Technology level: current
Classification: ISIC rev.4 ecoinvent: 2750:Manufacture of domestic appliances
Synonyms: microwave
Scenario: Business-as-Usual
System model: Allocation, cut-off by classification
Generated by: Viachaslau Filimonau
Published in: Gallego-Schmid, A. 2018
Database: ecoinvent
isCopyrightProtected: true
accessRestrictedTo: 1

## General comment
This activity represents the production and disposal of an average microwave oven which is approximately 10.6 kg in mass, has a rating of 1150 W and capacity of 17 liters. This microwave oven has the envisaged lifetime of 8 years and is manufactured in China. The figures on material inputs from technosphere and energy required to produce an average microwave oven are taken from Gallego-Schmid et al. 2018. The figure on the annual production volume (40000000 units) is from International Microwave Power Institute 2013.

## Included activities start
This activity starts with the reception of materials at the factory.

## Included activities end
The activity includes the processes of material and energy use in manufacturing an average microwave oven. The inventory additionally accounts for disposal of all materials. Packaging is not included.

## Geography
Geography GLO was chosen because the dataset aims to represent the production of an average microwave oven. The literature sources used refer to manufacturing in China.

## Time period
The literature sources used refer to the underpinning technology as being current.

## Reference product
- microwave oven: 1 unit; name RP_amount_1; CPC 44821: Cooking appliances and plate warmers, non-electric, domestic, of iron or steel; By-product classification allocatable product
  production volume 4e7 unit; name RP_PV_1
    Data from International Microwave Power Institute 2013.
  property price 100 EUR2005; name RP_amount_1_price_EUR2005
    Estimated value. The price is taken from MediaWorld, a shop for electronics, website (retrieved from: https://www.mediaworld.it/mw/SearchDisplay?searchTerm=microonde&categoryId=&search=WCS&storeId=20000&catalogId=20000&langId=-4&pageSize=25&beginIndex=0&sType=SimpleSearch&resultCatEntryType=2&showResultsPage=true&searchSource=Q&pageView=). The range of prices varies greatly from 50 to over 500 euros. A representative price of 100 was chosen. The choice is based on the most common price for an average appliance, and accounting for profit margins. According to an article from Blokhin "What profit margin is average for a company in the electronics sector?" (Source: Investopedia, retrieved from: https://www.investopedia.com/ask/answers/051215/what-profit-margin-average-company-electronics-sector.asp, 13Feb2018) the average profit margin made in the electronics sector in 2015 was of 9%.
  property lifetime capacity [kWh] 537.6 kWh; = 1200*8*0.056
    Estimated from the specifications reproted in the source: "use of a microwave for 1200 use cycles per year
    consuming 0.056 kWh per cycle over its lifetime of eight years" (Gallego-Schmid et al. 2018, p.489). Source: Gallego-Schmid et al. 2018, 2018, Gallego-Schmid, A., Mendoza, J.M.F., Azapagic, A., Environmental assessment of microwaves and the effect of European energy efficiency and waste management legislation. , Science of the Total Environment, 618, 487-499, 1 - Article
  property weight 10.6 kg; name weight
    Source: Gallego-Schmid et al. 2018, 2018, Gallego-Schmid, A., Mendoza, J.M.F., Azapagic, A., Environmental assessment of microwaves and the effect of European energy efficiency and waste management legislation. , Science of the Total Environment, 618, 487-499, 1 - Article
  property lifetime 8 year
    (same comment as for microwave oven)

## Inputs from technosphere
- zinc: 0.0006 kg; lognormal variance with pedigree 0.0035, pedigree (1,4,2,3,2)
  Data are from Gallego-Schmid et al. 2018.
  properties: dry mass 1 kg, wet mass 1 kg
- waste polystyrene: 0 kg; name BP_amount_6; pedigree (1,1,1,1,1)
  Includes scrap ABS and scrap polystyrene (general purpose) Data are from Gallego-Schmid et al. 2018.The amount is set equal to the input amount for the respective material.
  production volume 0 kg
    Calculated from production volume of reference product using the relative outputs.
  property price 0 EUR2005; name BP_amount_6_price_EUR2005
  properties: wet mass 1 kg, carbon content, fossil 0.922579, water content 0.00200401, heating value, net 38.67 MJ, dry mass 0.998 kg
  note on heating value, net: Value taken from the general comment of the treatment dataset.
- palladium: 6e-6 kg; lognormal variance with pedigree 0.0035, pedigree (1,4,2,3,2)
  Data are from Gallego-Schmid et al. 2018.
  properties: dry mass 1 kg, wet mass 1 kg
- acrylonitrile-butadiene-styrene copolymer: 0.241 kg; name ABS; lognormal variance with pedigree 0.0035, pedigree (1,4,2,3,2)
  Data are from Gallego-Schmid et al. 2018. In terms of outputs, assumed to have gone to waste polystyrene.
  properties: dry mass 1 kg, wet mass 1 kg, carbon content, fossil 0.853081, heating value, net 35.58 MJ
- silver: 6e-5 kg; lognormal variance with pedigree 0.0035, pedigree (1,4,2,3,2)
  Data are from Gallego-Schmid et al. 2018.
  properties: wet mass 1 kg, dry mass 1 kg
- polyethylene, low density, granulate: 0.179 kg; name PE; lognormal variance with pedigree 0.0035, pedigree (1,4,2,3,2)
  Used here in place of polyethylene terephthalate. Data are from Gallego-Schmid et al. 2018.
  properties: heating value, net 42.47 MJ, dry mass 1 kg, carbon content, fossil 0.857143, wet mass 1 kg
- gold: 1.5e-5 kg; lognormal variance with pedigree 0.0035, pedigree (1,4,2,3,2)
  Data are from Gallego-Schmid et al. 2018.
  properties: dry mass 1 kg, wet mass 1 kg
- brass: 0 kg; pedigree (1,1,1,1,1)
  Data are from Gallego-Schmid et al. 2018.
  properties: dry mass 1 kg, wet mass 1 kg
- nickel, class 1: 0.0006 kg; name nickel; lognormal variance with pedigree 0.0035, pedigree (1,4,2,3,2)
  Data are from Gallego-Schmid et al. 2018.
  properties: dry mass 1 kg, wet mass 1 kg
- ferrite: 0.28 kg; lognormal variance with pedigree 0.0035, pedigree (1,4,2,3,2)
  Data are from Gallego-Schmid et al. 2018.
  properties: wet mass 1 kg, dry mass 1 kg
- polystyrene, general purpose: 0.024 kg; name PS; lognormal variance with pedigree 0.0035, pedigree (1,4,2,3,2)
  Data are from Gallego-Schmid et al. 2018.
  properties: carbon content, fossil 0.923077, dry mass 1 kg, wet mass 1 kg, heating value, net 38.67 MJ
- aluminium, cast alloy: 0.618 kg; name aluminium; lognormal variance with pedigree 0.0035, pedigree (1,4,2,3,2)
  Data are from Gallego-Schmid et al. 2018.
  properties: dry mass 1 kg, wet mass 1 kg
- lead: 0.0012 kg; lognormal variance with pedigree 0.0089, pedigree (1,4,2,3,2)
  Data are from Gallego-Schmid et al. 2018.
  properties: dry mass 1 kg, wet mass 1 kg
- scrap aluminium: 0 kg; name BP_amount_7; pedigree (1,1,1,1,1)
  Data are from Gallego-Schmid et al. 2018.The amount is set equal to the input amount for the respective material.
  production volume 0 kg
    Calculated from production volume of reference product using the relative outputs.
  property price 0 EUR2005; name BP_amount_7_price_EUR2005
  properties: wet mass 10.6 kg, dry mass 10.6 kg
- tin: 0.0018 kg; lognormal variance with pedigree 0.0035, pedigree (1,4,2,3,2)
  Data are from Gallego-Schmid et al. 2018.
  properties: dry mass 1 kg, wet mass 1 kg
- scrap copper: 0 kg; name BP_amount_8; pedigree (1,1,1,1,1)
  Also includes scrap brass.Data are from Gallego-Schmid et al. 2018.The amount is set equal to the input amount for the respective material.
  production volume 0 kg
    Calculated from production volume of reference product using the relative outputs.
  property price 0 EUR2005; name BP_amount_8_price_EUR2005
  properties: dry mass 1 kg, wet mass 1 kg
- ceramic tile: 0.067 kg; name ceramic_tile; lognormal variance with pedigree 0.0035, pedigree (1,4,2,3,2)
  Data are from Gallego-Schmid et al. 2018.
  properties: dry mass 1 kg, wet mass 1 kg
- copper, cathode: 0.645 kg; name copper; lognormal variance with pedigree 0.0035, pedigree (1,4,2,3,2)
  Data are from Gallego-Schmid et al. 2018.
  properties: dry mass 1 kg, wet mass 1 kg
- flat glass, coated: 0 kg; name flat_glass; pedigree (1,1,1,1,1)
  Data are from Gallego-Schmid et al. 2018.
  properties: dry mass 1 kg, wet mass 1 kg
- steel, low-alloyed, hot rolled: 7.04 kg; name steel; lognormal variance with pedigree 0.0035, pedigree (1,4,2,3,2)
  Data are from Gallego-Schmid et al. 2018.
  properties: wet mass 1 kg, dry mass 1 kg, carbon content, fossil 0.005
  note on carbon content, fossil: Low alloyed steel composition given in Tab. 3.2 ecoinvent v2.2 report 10_partII. Steel assumed to have a C content of 0.5%
- polyol: 0 kg; pedigree (1,1,1,1,1)
  Used here to describe polyoxymethylene. Data are from Gallego-Schmid et al. 2018. In terms of outputs assumed to have gone to waste water.
  properties: heating value, net 19.42 MJ, dry mass 1 kg, wet mass 1 kg, carbon content, fossil 0.640856
- scrap steel: 0 kg; name BP_amount_9; pedigree (1,1,1,1,1)
  Data are from Gallego-Schmid et al. 2018.The amount is set equal to the input amount for the respective material. This includes scrap steel (7.04), iron scrap (0.28) and scrap of other metals (0.0042).
  production volume 0 kg
    Calculated from production volume of reference product using the relative outputs.
  property price 0 EUR2005; name BP_amount_9_price_EUR2005
  properties: dry mass 1 kg, wet mass 1 kg
- waste glass: 0 kg; name BP_amount_2; pedigree (1,1,1,1,1)
  Data are from Gallego-Schmid et al. 2018.The amount is set equal to the input amount for the respective material
  production volume 0 kg
    Calculated from production volume of reference product using the relative outputs.
  property price 0 EUR2005; name BP_amount_2_price_EUR2005
  properties: dry mass 1 kg, wet mass 1 kg, heating value, net 0.05 MJ
  note on heating value, net: Value extracted from "treatment of waste glass, open dump, very wet infiltration class (1000mm)"
- electricity, high voltage: 27.5 kWh; lognormal variance with pedigree 0.0035, pedigree (1,4,2,3,2)
  Data are from Gallego-Schmid et al. 2018.
- nylon 6: 0 kg; name nylon; pedigree (1,1,1,1,1)
  Data are from Gallego-Schmid et al. 2018. In terms of outputs assumed to have gone to waste PE.
  properties: heating value, net 30.9 MJ, wet mass 1 kg, carbon content, fossil 0.637168, dry mass 1 kg
  note on heating value, net: Assumed equal to Nylon-66. Reference: Walters, R. N., Hackett, S. M. and Lyon, R. E. (2000) ‘Heats of combustion of high temperature polymers’, Fire and Materials, 24(5), pp. 245–252. doi: 10.1002/1099-1018(200009/10)24:5<245::AID-FAM744>3.0.CO;2-7.
  note on carbon content, fossil: It is a chain of caprolactam molecules, originating from aminocarboxylic acids - here caproic acid or caprolactam. The structure of nylon 6 is -(NH-(CH2)5-CO)n-, C6H11NO (ecoinvent v2.2 report 11_II). MW=113 g/mol
- tap water: 20.2 kg; name tap_water; lognormal variance with pedigree 0.0035, pedigree (1,4,2,3,2)
  Data are from Gallego-Schmid et al. 2018.
  properties: water content 2962.17, dry mass 0.000337476 kg, wet mass 1 kg, carbon content, fossil 0.00178991
  note on carbon content, fossil: Bicarbonate content is 2.93 mol/m3. CO2 content is 0.1 mol/m3 (ecoinvent v2.2 report 8, Tab 93.1).
- waste polypropylene: 0 kg; name BP_amount_3; pedigree (1,1,1,1,1)
  (same comment as for waste glass)
  production volume 0 kg
    Calculated from production volume of reference product using the relative outputs.
  property price 0 EUR2005; name BP_amount_3_price_EUR2005
  properties: heating value, net 32.78 MJ, wet mass 1 kg, water content 0.189061, dry mass 0.841 kg, carbon content, fossil 0.825208
  note on heating value, net: Value assumed for all polypropylene products. Source: Phyllis2, database for (treated) biomass, algae, feedstocks for biogas production and biochar, https://phyllis.nl/Biomass/View/1186, ECN.TNO
- heat, central or small-scale, other than natural gas: 63.2 MJ; lognormal variance with pedigree 0.0035, pedigree (1,4,2,3,2)
  Data are from Gallego-Schmid et al. 2018.
  properties: heating value, net 1 MJ
- polypropylene, granulate: 0.141 kg; name PP; lognormal variance with pedigree 0.0035, pedigree (1,4,2,3,2)
  Data are from Gallego-Schmid et al. 2018.
  properties: heating value, net 32.78 MJ, carbon content, fossil 0.857143, dry mass 1 kg, wet mass 1 kg
  note on heating value, net: Value extracted from "treatment of waste polypropylene, open burning"
- wastewater, average: 0 m3; name BP_amount_10; pedigree (1,1,1,1,1)
  Converted from liters. Data are from Gallego-Schmid et al. 2018.The amount is set equal to the input amount for the respective material.
  production volume 0 m3
    Calculated from production volume of reference product using the relative outputs.
  property price 0 EUR2005; name BP_amount_10_price_EUR2005
  properties: wet mass 1000 kg, carbon content, non-fossil 0.194039, dry mass 0.346837 kg, water content 2882.2
  note on carbon content, non-fossil: 0.0673 kg TOC/m3 (Tab A.17, ecoinvent v2.2 report 13_I). TOC was considered as Total Carbon.
- energy and auxilliary inputs, metal working factory: 0 kg; pedigree (1,1,1,1,1)
  Estimated value.The input of infrastructure is approximated with the exchange 'metal working factory', this was chosen as metal is the main material constituting the final product. The general comment for the activity 'metal working faculty, GLO' [accessed 19.01.2018] specifies: '4.58E-10 units of this process are needed to produce 1 kg of final product. Additionally, the dataset for 'metal working factory' needs to be used together with the 'energy and auxilliary inputs, metal working factory', 1 kg of this exchange is required per 1 kg of final product.
- waste polyvinylchloride: 0 kg; name BP_amount_4; pedigree (1,1,1,1,1)
  (same comment as for waste glass)
  production volume 0 kg
    Calculated from production volume of reference product using the relative outputs.
  property price 0 EUR2005; name BP_amount_4_price_EUR2005
  properties: dry mass 0.998 kg, wet mass 1 kg, water content 0.00200401, carbon content, fossil 0.440882, heating value, net 21.51 MJ
- inert waste: 0 kg; name BP_amount_1; pedigree (1,1,1,1,1)
  Represents here waste ceramic tile. Data are from Gallego-Schmid et al. 2018.
  production volume 0 kg
    Calculated from production volume of reference product using the relative outputs.
  property price 0 EUR2005; name BP_amount_1_price_EUR2005
  properties: dry mass 1 kg, wet mass 1 kg
- polyvinylchloride, suspension polymerised: 0.162 kg; name PVC; lognormal variance with pedigree 0.0035, pedigree (1,4,2,3,2)
  Data are from Gallego-Schmid et al. 2018.
  properties: wet mass 1 kg, dry mass 1 kg, carbon content, fossil 0.387097, heating value, net 21.5 MJ
- metal working factory: 4.8548e-9 unit; = 4.58E-10*10.6; lognormal variance with pedigree 0.3029, pedigree (1,4,2,3,2)
  (same comment as for energy and auxilliary inputs, metal working factory)
- waste polyethylene: 0 kg; name BP_amount_5; pedigree (1,1,1,1,1)
  Used here in place of waste from polyethylene terephthalate and nylon. Data are from Gallego-Schmid et al. 2018.
  production volume 0 kg
    Calculated from production volume of reference product using the relative outputs.
  property price 0 EUR2005; name BP_amount_5_price_EUR2005
  properties: dry mass 0.996 kg, carbon content, fossil 0.825301, wet mass 1 kg, heating value, net 42.47 MJ, water content 0.00401606
  note on carbon content, fossil: C content in 1 kg DM was calculated using data in Tab A.1, ecoinvent v2.2 report 13_I
- waste polystyrene: -0.0255075, -0.00196648, -0.000812226, -0.000771284, -0.0294312, -0.00032813, -0.000148721, -0.206034 kg (8 entries); lognormal variance with pedigree 0.0035, pedigree (1,4,2,3,2)
  (same comment as for waste polystyrene)
  production volume 1.06e7 kg
- brass: 0.0001, 0.0199 kg (2 entries); lognormal variance with pedigree 0.0035, pedigree (1,4,2,3,2)
  Data are from Gallego-Schmid et al. 2018.
- scrap aluminium: -0.196034, -0.00919748, -0.412768 kg (3 entries); lognormal variance with pedigree 0.0035, pedigree (1,4,2,3,2)
  (same comment as for scrap aluminium)
  production volume 2.472e7 kg
- scrap copper: -0.210943, -0.00989699, -0.44416 kg (3 entries); lognormal variance with pedigree 0.0035, pedigree (1,4,2,3,2)
  (same comment as for scrap copper)
  production volume 2.66e7 kg
- flat glass, coated: 0.376545, 0.762455 kg (2 entries); lognormal variance with pedigree 0.0035, pedigree (1,4,2,3,2)
  Data are from Gallego-Schmid et al. 2018.
- polyol: 0.00363652, 0.00736348 kg (2 entries); lognormal variance with pedigree 0.0035, pedigree (1,4,2,3,2)
  (same comment as for polyol)
- scrap steel: -1.78343, -0.00225954, -5.53859 kg (3 entries); lognormal variance with pedigree 0.0035, pedigree (1,4,2,3,2)
  (same comment as for scrap steel)
  production volume 2.92971e8 kg
- waste glass: -0.173389, -0.0084131, -0.00078493, -0.00351227, -0.0912802, -0.00119196, -0.000190865, -0.860237 kg (8 entries); lognormal variance with pedigree 0.0035, pedigree (1,4,2,3,2)
  (same comment as for waste glass)
  production volume 4.556e7 kg
- nylon 6: 0.0132237, 0.0267763 kg (2 entries); lognormal variance with pedigree 0.0035, pedigree (1,4,2,3,2)
  (same comment as for nylon 6)
- waste polypropylene: -0.0135719, -0.00104631, -0.000432165, -0.000410381, -0.0156596, -0.00017459, -7.91311e-5, -0.109626 kg (8 entries); lognormal variance with pedigree 0.0035, pedigree (1,4,2,3,2)
  (same comment as for waste glass)
  production volume 5.64e6 kg
- wastewater, average: -0.00631172, -0.00068281, -0.0132055 m3 (3 entries); lognormal variance with pedigree 0.0035, pedigree (1,4,2,3,2)
  (same comment as for wastewater, average)
  production volume 808000 m3
- energy and auxilliary inputs, metal working factory: 8.8521e-10, 3.96959e-9 kg (2 entries); lognormal variance with pedigree 0.0035, pedigree (1,4,2,3,2)
  (same comment as for energy and auxilliary inputs, metal working factory)
- waste polyvinylchloride: -0.0155933, -0.00120215, -0.00049653, -0.000471502, -0.0179919, -0.000200593, -9.09165e-5, -0.125953 kg (8 entries); lognormal variance with pedigree 0.0035, pedigree (1,4,2,3,2)
  (same comment as for waste glass)
  production volume 6.48e6 kg
- inert waste: -0.0147789, -0.000127286, -0.0520938 kg (3 entries); lognormal variance with pedigree 0.0035, pedigree (1,4,2,3,2)
  Represents here waste ceramic tile. Data are from Gallego-Schmid et al. 2018.
  production volume 2.68e6 kg
- waste polyethylene: -0.0210798, -0.00162513, -0.000671236, -0.000637401, -0.0243224, -0.000271171, -0.000122906, -0.17027 kg (8 entries); lognormal variance with pedigree 0.0035, pedigree (1,4,2,3,2)
  (same comment as for waste polyethylene)
  production volume 8.76e6 kg

## Sampling procedure
Manufacturing data are taken from Gallego-Schmid et al. 2018. Source: Gallego-Schmid, A., Mendoza, J.M.F., and Azapagic, A., 2018. Environmental assessment of microwaves and the effect of European energy efficiency and waste management legislation. Science of the Total Environment, 618, 487-499. Data on the annual production volume are taken from International Microwave Power Institute 2013. Source: International Microwave Power Institute, 2013. Microwave Ovens: an Overview: 2013. Available from: http://impi.org/microwave-ovens-an-overview-2013/ (Accessed 20 January 2018).

## Extrapolations
This dataset has been extrapolated from year 2018 to the year of the calculation (2021). The uncertainty has been adjusted accordingly.
