# three and five layered board production

Dataset: EcoSpold 2, unit process
Geography: RER
Time period: 2012-01-01 to 2021-12-31
Technology level: current
Classification: ISIC rev.4 ecoinvent: 1621:Manufacture of veneer sheets and wood-based panels
Synonyms: 3-Schicht-/5-Schicht Massivholzplatte
Tags: Swiss brush-up completed
Scenario: Business-as-Usual
System model: Allocation, cut-off by classification
Generated by: Frank Werner
Database: ecoinvent
isCopyrightProtected: true
accessRestrictedTo: 1

## General comment
This dataset represents the production of three-layered and 5-layered laminated board in Europe. This is a special form of plywood featuring relatively thick layers.
Data are based on a German production sample.
The three-layered/five-layered laminated board are made from logwood: out of rough sawn timber (u=70%) 22 mm lamellas are sawn, which are technically dried, planed, finger-jointed, glued with PVAc-adhesive at their ends to “never-ending” lamellas and finally glued to a bloc. This block is sawn to boards, which are planed.
Reference:
Rüter, S. and S. Diederichs (2012): Ökobilanz-Basisdaten für Bauprodukte aus Holz. Arbeitsbericht aus dem Institut für Holztechnologie und Holzbiologie Nr. 2012/1, Johann Heinrich von Thünen-Institut (vTI), Hamburg.
[This dataset is meant to replace the following datasets:
- three layered laminated board production, RER, 1997 - 2002]

## Included activities start
From the reception at the factory gate of all materials and fuels used.

## Included activities end
This activity ends with the three layered/five layerd board produced at the factory gate. The dataset includes the inputs to and outputs of the production processes and the available process emissions. Infrastructure is a rough estimate.

## Geography
Data for Germany used for central Europe

## Technology
Technology reflects a sample of German plywood production. The three-layered or 5-layered laminated board is actually a special form of plywood featuring relatively thick layers.

## Parameters
- wood_fuel: 1700.8; lognormal variance with pedigree 0.0256, pedigree (1,3,1,1,1)
  input of wood fuel used in production; value calculated from Rüter et al. 2012

## Reference product
- three and five layered board: 1 m3; By-product classification allocatable product
  Reference product. Plywood produced in Germany by processes representative for European average. The reference product is ready for delivery at the wooden board factory.
  A large number of materials can be produced with differing properties and areas of use. Typical uses are as construction plywood for wall, floor, and ceiling panels and also as panels for concrete shuttering, and decorative covering veneers in interior furnishings (e.g. wall panels or doors).
  production volume 4e6 m3; name layered_board_3_5_pv
    as in existing DS for 3-layered boards
  property heating value, net 5771.53 MJ
    LHV is calculated based on the Carbon content of the product. More details can be found on the respective documentation.The property is based on a value of 12.74MJ/kg
  property carbon content 0.468521
    carbon content on a dry matter basis (reserved; not for manual entry)
  property true value 485
    allocation property applied in "true value" allocation // value calculated from revenue
  properties: carbon content, fossil 0.03537, price 485 EUR2005, water content 0.095791, carbon content, non-fossil 0.433151, dry mass 413.4 kg, water in wet mass 39.6 kg, wet mass 453 kg, carbon allocation 193.687 kg

## By-products
- wood chips, dry, measured as dry mass: 0 kg; name m_wood_chips; By-product classification allocatable product; CPC 31230: Wood in chips or particles; pedigree (1,1,1,1,1)
  Literature value; sample from Germany
  production volume 2.8992e9 kg; = m_wood_chips*layered_board_3_5_pv
    Calculated from production volume of reference product using the relative outputs.
  property heating value, net 9.99 MJ
    LHV is calculated based on the Carbon content of the product. More details can be found on the respective documentation.
  property price 0.107 EUR2005; name m_wood_chips_price_EUR2005
    Expert judgement (Urs Luginbühl, Swiss Sawmilling industry, personal communication in June 2014). Wood chips from softwood should have a price of 0.101 EUR/kg. Woodchips from hardwood should have a price of 0.112 EUR/kg. Average of these two values is used. Cross-reference; FAOSTAT database; http://faostat.fao.org/site/626/DesktopDefault.aspx?PageID=626#ancor; Average import/export prices of EU for 'chips and particles'. Price: 48.76 Euro/m3. The density of the wood chips is 650 kg/m3. The price is recalculated accordingly.
  property carbon content 0.494
    carbon content on a dry matter basis (reserved; not for manual entry)
  property true value 77.5536; name m_wood_chips_true_value
    allocation property applied in "true value" allocation // value calculated from revenue
  properties: wet mass 1.4 kg, dry mass 1 kg, water content 0.4, water in wet mass 0.4 kg, carbon content, fossil 0, carbon content, non-fossil 0.494, carbon allocation 0.494 kg

## Inputs from technosphere
- wooden board factory, organic bonded boards: 2.87093e-8 unit; lognormal variance with pedigree 0.3961, pedigree (4,5,5,3,4)
  Default value from ecoinvent 2.2
  properties: UVEK_relative_amount_1 1, UVEK_link_1 4946
  note on UVEK_relative_amount_1: to be used only in special submissions in coordination with ecoinvent and the Swiss FOEN
- waste wood, post-consumer: 11.4665 kg; lognormal variance with pedigree 0.0093, pedigree (2,1,4,3,1)
  Literature value; sample from Germany
  properties: heating value, net 9.99 MJ, wet mass 1.4 kg, dry mass 1 kg, carbon content, non-fossil 0.494, water content 0.4
- wood ash mixture, pure: 0 kg; name w_wood_ash; pedigree (1,1,1,1,1)
  Amount derived from DS "Heat, district or industrial, other than natural gas {CH}| heat production, wood chips from industry, at furnace 5000kW | Cut-off, U" on heat generation from industrial residual wood per MJ, multiplied by the input of wood fuel (direct wood fuel plus production residues ) scaled to reflect wood input per generated heat
  production volume 0 kg
    Calculated from production volume of reference product using the relative outputs.
  property price 0 EUR2005; name w_wood_ash_price_EUR2005
  properties: carbon content, non-fossil 0.012, wet mass 1 kg, UVEK_link_2 1127, dry mass 1 kg, UVEK_link_3 1129, UVEK_link_1 1128, UVEK_relative_amount_3 -1
- tap water: 41.4845 kg; name m_tapwater; lognormal variance with pedigree 0.0099, pedigree (2,3,4,3,1)
  Literature value; sample from Germany
  properties: UVEK_relative_amount_1 1, water content 2962.17, wet mass 1 kg, dry mass 0.000337476 kg, carbon content, fossil 0.00178991, UVEK_link_1 4285
  note on carbon content, fossil: Bicarbonate content is 2.93 mol/m3. CO2 content is 0.1 mol/m3 (ecoinvent v2.2 report 8, Tab 93.1).
- melamine urea formaldehyde adhesive: 15.3401 kg; lognormal variance with pedigree 0.0427, pedigree (1,4,5,3,1)
  Literature value; sample from Germany
  properties: dry mass 1 kg, UVEK_link_1 2931, carbon content, fossil 0.311708, UVEK_relative_amount_1 1, wet mass 1 kg, heating value, net 14.65 MJ
- sawnwood, board, softwood, raw, dried (u=10%): 0 m3; pedigree (1,1,1,1,1)
  Literature value; sample from Germany
  property water content 0.1; name water_content
  property dry mass 422.4 kg; name basic_wood_d
  property wet mass 464.64 kg; name WM
  property water in wet mass 42.24 kg; name WWM
  properties: carbon content, non-fossil 0.494, heating value, net 5700.67 MJ
  note on heating value, net: Assumed equal to "sawnwood, softwood, dried (u=10%), planed".The property is based on a value of 13.38MJ/kg
- electricity, medium voltage: 154.709 kWh; lognormal variance with pedigree 0.0427, pedigree (1,4,5,3,1)
  Literature value; sample from Germany
  properties: UVEK_relative_amount_1 1, UVEK_link_1 1779
- synthetic rubber: 0.133632 kg; name m_rubber; lognormal variance with pedigree 0.2106, pedigree (5,5,5,5,5)
  Literature value; sample from Germany
  property carbon content, fossil 0.871949; name C_content_fossil_rubber
  properties: wet mass 1 kg, dry mass 1 kg, heating value, net 26.42 MJ, UVEK_relative_amount_1 1
  note on carbon content, fossil: EPDM (Ethylene-propene-diene terpolymer) rubber is a terpolymer of ethylene, propene, and a diene with the residual unsaturated portion of the diene in the side chain (ecoinvent v2.2 report 7-part XX & Ullmann). Chemical formula (deduced from Evidences of Solvent-Induced Miscibility in Polychloroprene-co-Ethylene-Propene Diene Terpolymer Blends, Dubey et al., Journal of Applied Polymer Science, 2009, 111:1884-1891): C20H35
  note on UVEK_relative_amount_1: to be used only in special submissions in coordination with ecoinvent and the Swiss FOEN.
- municipal solid waste: -0.426759 kg; name w_MSW; lognormal variance with pedigree 0.1298, pedigree (2,3,4,1,5)
  Literature value; sample from Germany
  Uncertainty: a
  production volume 1.98e6 kg; = w_MSW*layered_board_3_5_pv
    Calculated from production volume of reference product using the relative outputs.
  properties: UVEK_link_1 1004, water content 0.297017, dry mass 0.771 kg, carbon content, fossil 0.171549, carbon content, non-fossil 0.261655, heating value, net 11.74 MJ, UVEK_relative_amount_1 -1, wet mass 1 kg
  note on carbon content, fossil: MSW composition in tab 4.1, ecoinvent v2.2 report 13_I. C content referred to 1 kg DM
  note on heating value, net: Value taken from the general comment of the treatment dataset.
- sawnwood, softwood, raw: 0.0672469 m3; lognormal variance with pedigree 0.0093, pedigree (2,1,4,3,1)
  Literature value; sample from Germany
  properties: heating value, net 5130.57 MJ, water content 0.7, wet mass 659.726 kg, carbon content, non-fossil 0.494, dry mass 388.074 kg
- waste rubber, unspecified: 0 kg; name w_rubber; pedigree (1,1,1,1,1)
  calculated from rubber input
  production volume 0 kg
    Calculated from production volume of reference product using the relative outputs.
  property price 0 EUR2005; name w_rubber_price_EUR2005
  property dry mass 1 kg; name w_rubber_DM
  properties: carbon content, fossil 0.853, UVEK_relative_amount_1 -1, UVEK_link_1 1079, wet mass 1 kg, heating value, net 27.19 MJ
- furnace, wood chips, with silo, 300kW: 2.54042e-5 unit; = 2.31E-08*wood_fuel/1.33333; lognormal variance with pedigree 0.0086, pedigree (1,1,4,1,1)
  Infrastructure factor from DS "Heat, district or industrial, other than natural gas {CH}| heat production, wood chips from industry, at furnace 5000kW | Cut-off, U", multiplied by the input of wood fuel (direct wood fuel plus production residues); correction for assumed efficiency as original value refers to heat output
- wastewater from particleboard production: -0.0761649 m3; name wastewater; lognormal variance with pedigree 0.0427, pedigree (1,4,5,3,1)
  Literature value; sample from Germany
  production volume 353376 m3; = wastewater*layered_board_3_5_pv
    Calculated from production volume of reference product using the relative outputs.
  property price 0 EUR2005; name wastewater_price_EUR2005
  properties: water content 2962.17, dry mass 0.337476 kg, wet mass 1000 kg, carbon content, non-fossil 0.377131
- diesel, burned in building machine: 33.9107 MJ; lognormal variance with pedigree 0.0427, pedigree (1,4,5,3,1)
  Literature value; sample from Germany
  properties: UVEK_relative_amount_1 1, UVEK_link_1 732, UVEK_link_8 4417, UVEK_relative_amount_8 0.0452544, UVEK_relative_amount_9 0.271526, UVEK_link_9 4433, heating value, net 1 MJ
  note on UVEK_link_8: This link has been introduced to model transport specifically for the SAM model; to be used only in special submissions in coordination with ecoinvent and the Swiss FOEN.
  note on UVEK_relative_amount_8: Scaling factor = amount of transport related to adhesives/amount of this input from technosphere. Source for transport distance: Overview and Methodology/2007/Frischknecht et al., i.e. 600 km train, 100 km lorry. To be used only in special submissions in coordination with ecoinvent and the Swiss FOEN
- sawlog and veneer log, softwood, measured as solid wood under bark: 0 m3; pedigree (1,1,1,1,1)
  Literature value; sample from Germany
  properties: water content 0.7, basic wood density 397.449, wet mass 767.799 kg, dry mass 451.646 kg, carbon content, non-fossil 0.494, heating value, net 4483.78 MJ
  note on heating value, net: Value based on the dataset "softwood forestry, mixed species, sustainable forest management"The property is based on a value of 11.58MJ/kg
- lubricating oil: 0.253469 kg; name m_lubricating_oil; lognormal variance with pedigree 0.0186, pedigree (4,4,4,1,1)
  Literature value; sample from Germany
  property dry mass 1 kg; name DM_oil
  properties: UVEK_relative_amount_1 1, wet mass 1 kg, UVEK_link_1 2866, carbon content, fossil 0.75, heating value, net 40.2 MJ
  note on carbon content, fossil: Lubricating oil is produced from diesel. C-content/dry mass of fats and oils considered 75%, from: ecoinvent v2.2 report, n 15a, pg 40
  note on heating value, net: Literature value, Source: IPCC 2006, 2006 IPCC Guidelines for National Greenhouse Gas Inventories, Prepared by the National Greenhouse Gas Inventories Programme, Eggleston H.S., Buendia L., Miwa K., Ngara T. and Tanabe K. (eds). Published: IGES, Japan
- waste mineral oil: 0 kg; name w_mineral_oil; pedigree (1,1,1,1,1)
  hydraulic oil and engine oil/grease; adjusted for water content of waste oil
  production volume 0 kg
    Calculated from production volume of reference product using the relative outputs.
  property price 0 EUR2005; name w_mineral_oil_price_EUR2005
  properties: dry mass 0.9 kg, UVEK_relative_amount_1 -1, wet mass 1 kg, water content 0.111111, UVEK_link_1 1113, heating value, net 34.7 MJ, carbon content, fossil 0.864444
  note on carbon content, fossil: Tab A.6, ecoinvent v2.2 report 13_I. C content has been calculated after data in the tables, and then referred to 1 kg DM
- wood ash mixture, pure: -0.718398, -0.0147677 kg (2 entries); lognormal variance with pedigree 0.0092, pedigree (1,3,4,1,1)
  (same comment as for wood ash mixture, pure)
  production volume 3.40161e6 kg
- sawnwood, board, softwood, raw, dried (u=10%): 0.110071, 0.00459356 m3 (2 entries); lognormal variance with pedigree 0.0093, pedigree (2,1,4,3,1)
  Literature value; sample from Germany
  properties: water content 0.1, dry mass 422.4 kg, carbon content, non-fossil 0.494, wet mass 464.64 kg, heating value, net 5700.67 MJ
- waste rubber, unspecified: -0.128248, -0.00538382 kg (2 entries); lognormal variance with pedigree 0.1786, pedigree (4,5,5,5,5)
  calculated from rubber input
  production volume 620000 kg
  properties: carbon content, fossil 0.853, UVEK_relative_amount_1 -1, UVEK_link_1 1079, wet mass 1 kg, dry mass 1 kg, heating value, net 27.19 MJ
- sawlog and veneer log, softwood, measured as solid wood under bark: 2.04813, 0.100325 m3 (2 entries); lognormal variance with pedigree 0.0093, pedigree (2,1,4,3,1)
  Literature value; sample from Germany
- waste mineral oil: -0.247346, -0.0061233 kg (2 entries); lognormal variance with pedigree 0.0098, pedigree (2,3,4,1,1)
  hydraulic oil and engine oil/grease; adjusted for water content of waste oil
  production volume 1.176e6 kg

## Inputs from nature
- Carbon dioxide, non-fossil, resource correction [natural resource, in air]: -1073.25 kg; pedigree (1,1,1,1,1)
  This exchange has been added after economic allocation in order to re-balance the non-fossil carbon dioxide resource extraction.
- Water, cooling, unspecified natural origin [natural resource, in water]: 0.0346813 m3; name water_cooling_UNO_input; lognormal variance with pedigree 0.0427, pedigree (1,4,5,3,1)
  Literature value; sample from Germany

## Emissions to nature
- Benzene, ethyl- [air, unspecified]: 4.39899e-5 kg; = 0.00000004*wood_fuel/1.33333; lognormal variance with pedigree 0.0812, pedigree (2,3,5,1,1)
  Emission factor from DS "Heat, district or industrial, other than natural gas {CH}| heat production, wood chips from industry, at furnace 300kW | Cut-off, U" on heat generation from industrial residual wood per MJ, multiplied by the input of wood fuel (direct wood fuel plus production residues ) scaled to reflect wood input per generated heat.
- NMVOC, non-methane volatile organic compounds, unspecified origin [air, unspecified]: 0.0102643 kg; name nmvoc; = 9.33333333333334E-06*wood_fuel/1.33333; lognormal variance with pedigree 0.0812, pedigree (2,3,5,1,1)
  (same comment as for Benzene, ethyl-)
- Toluene [air, unspecified]: 0.000439899 kg; = 0.0000004*wood_fuel/1.33333; lognormal variance with pedigree 0.0812, pedigree (2,3,5,1,1)
  (same comment as for Benzene, ethyl-)
- Nitrogen oxides [air, unspecified]: 0.26394 kg; = 0.00024*wood_fuel/1.33333; lognormal variance with pedigree 0.0812, pedigree (2,3,5,1,1)
  (same comment as for Benzene, ethyl-)
- Formaldehyde [air, unspecified]: 0.0232011 kg; = 1.73333333333334E-07*wood_fuel/1.33333+0.02669; lognormal variance with pedigree 0.1612, pedigree (2,3,5,1,1)
  Emission factor from DS "Heat, district or industrial, other than natural gas {CH}| heat production, wood chips from industry, at furnace 300kW | Cut-off, U" on heat generation from industrial residual wood per MJ, multiplied by the input of wood fuel (direct wood fuel plus production residues ) scaled to reflect wood input per generated heat plus estimated emissions from wood and glue drying processes (according to Rüter & Diederichs 2012).
- Water [air, unspecified]: 0.0659858 m3; = 0.00006*wood_fuel/1.33333+m_tapwater/1000+water_cooling_UNO_input-(wastewater*-1); lognormal variance with pedigree 0.130025, pedigree (4,4,5,2,4)
  Water emissions from the combustion of the wood (emission per MJ, scaled to wood input and extrapolated from wood input to heat generated) plus tap water input plus input of cooling water minus waste water
- Copper [air, unspecified]: 3.22593e-5 kg; = 2.93333333333334E-08*wood_fuel/1.33333; lognormal variance with pedigree 0.6912, pedigree (2,3,5,1,1)
  (same comment as for Benzene, ethyl-)
- Sulfur dioxide [air, unspecified]: 0.00366583 kg; = 3.33333333333334E-06*wood_fuel/1.33333; lognormal variance with pedigree 0.0418, pedigree (2,3,5,1,1)
  (same comment as for Benzene, ethyl-)
- Cadmium [air, unspecified]: 1.02643e-6 kg; = 9.33333333333334E-10*wood_fuel/1.33333; lognormal variance with pedigree 0.6912, pedigree (2,3,5,1,1)
  (same comment as for Benzene, ethyl-)
- Benzene, hexachloro- [air, unspecified]: 1.05576e-11 kg; = 9.60000000000001E-15*wood_fuel/1.33333; lognormal variance with pedigree 0.0812, pedigree (2,3,5,1,1)
  (same comment as for Benzene, ethyl-)
- Arsenic [air, unspecified]: 1.46633e-6 kg; = 1.33333333333333E-09*wood_fuel/1.33333; lognormal variance with pedigree 0.6912, pedigree (2,3,5,1,1)
  (same comment as for Benzene, ethyl-)
- Benzo(a)pyrene [air, unspecified]: 7.33166e-7 kg; = 6.66666666666667E-10*wood_fuel/1.33333; lognormal variance with pedigree 0.3412, pedigree (2,3,5,1,1)
  (same comment as for Benzene, ethyl-)
- Chlorine [air, unspecified]: 0.00026394 kg; = 0.00000024*wood_fuel/1.33333; lognormal variance with pedigree 0.6912, pedigree (2,3,5,1,1)
  (same comment as for Benzene, ethyl-)
- m-Xylene [air, unspecified]: 0.00017596 kg; name mxylene; = 0.00000016*wood_fuel/1.33333; lognormal variance with pedigree 0.0812, pedigree (2,3,5,1,1)
  (same comment as for Benzene, ethyl-)
- Manganese [air, unspecified]: 0.000249276 kg; name manganese; = 2.26666666666667E-07*wood_fuel/1.33333; lognormal variance with pedigree 0.6912, pedigree (2,3,5,1,1)
  (same comment as for Benzene, ethyl-)
- Hydrocarbons, aliphatic, unsaturated [air, unspecified]: 0.00454563 kg; = 4.13333333333333E-06*wood_fuel/1.33333; lognormal variance with pedigree 0.0812, pedigree (2,3,5,1,1)
  (same comment as for Benzene, ethyl-)
- Methane, non-fossil [air, unspecified]: 0.00659849 kg; = 0.000006*wood_fuel/1.33333; lognormal variance with pedigree 0.0812, pedigree (2,3,5,1,1)
  (same comment as for Benzene, ethyl-)
- Acetaldehyde [air, unspecified]: 8.94462e-5 kg; = 8.13333333333333E-08*wood_fuel/1.33333; lognormal variance with pedigree 0.0812, pedigree (2,3,5,1,1)
  (same comment as for Benzene, ethyl-)
- Mercury [air, unspecified]: 4.39899e-7 kg; name mercury; = 0.0000000004*wood_fuel/1.33333; lognormal variance with pedigree 0.6912, pedigree (2,3,5,1,1)
  (same comment as for Benzene, ethyl-)
- Nickel [air, unspecified]: 8.79799e-6 kg; name nickel; = 0.000000008*wood_fuel/1.33333; lognormal variance with pedigree 0.6912, pedigree (2,3,5,1,1)
  (same comment as for Benzene, ethyl-)
- Lead [air, unspecified]: 3.66583e-5 kg; = 3.33333333333333E-08*wood_fuel/1.33333; lognormal variance with pedigree 0.6912, pedigree (2,3,5,1,1)
  (same comment as for Benzene, ethyl-)
- Carbon monoxide, non-fossil [air, unspecified]: 0.733166 kg; = 0.000666666666666667*wood_fuel/1.33333; lognormal variance with pedigree 0.6912, pedigree (2,3,5,1,1)
  (same comment as for Benzene, ethyl-)
- Sodium [air, unspecified]: 0.00190623 kg; = 1.73333333333334E-06*wood_fuel/1.33333; lognormal variance with pedigree 0.6912, pedigree (2,3,5,1,1)
  (same comment as for Benzene, ethyl-)
- Ammonia [air, unspecified]: 0.00253675 kg; = 2.30666666666667E-06*wood_fuel/1.33333; lognormal variance with pedigree 0.0812, pedigree (2,3,5,1,1)
  (same comment as for Benzene, ethyl-)
- Phenol, pentachloro- [air, unspecified]: 1.18773e-8 kg; = 0.0000000000108*wood_fuel/1.33333; lognormal variance with pedigree 0.0812, pedigree (2,3,5,1,1)
  (same comment as for Benzene, ethyl-)
- Dioxins, measured as 2,3,7,8-tetrachlorodibenzo-p-dioxin [air, unspecified]: 4.54563e-11 kg; = 4.13333333333333E-14*wood_fuel/1.33333; lognormal variance with pedigree 0.3412, pedigree (2,3,5,1,1)
  (same comment as for Benzene, ethyl-)
- Zinc [air, unspecified]: 0.000439899 kg; = 0.0000004*wood_fuel/1.33333; lognormal variance with pedigree 0.6912, pedigree (2,3,5,1,1)
  (same comment as for Benzene, ethyl-)
- Calcium [air, unspecified]: 0.00857804 kg; = 0.0000078*wood_fuel/1.33333; lognormal variance with pedigree 0.6912, pedigree (2,3,5,1,1)
  (same comment as for Benzene, ethyl-)
- Fluorine [air, unspecified]: 7.33166e-5 kg; = 6.66666666666667E-08*wood_fuel/1.33333; lognormal variance with pedigree 0.0812, pedigree (2,3,5,1,1)
  (same comment as for Benzene, ethyl-)
- PAH, polycyclic aromatic hydrocarbons [air, unspecified]: 1.62763e-5 kg; name pah; = 0.0000000148*wood_fuel/1.33333; lognormal variance with pedigree 0.3412, pedigree (2,3,5,1,1)
  (same comment as for Benzene, ethyl-)
- Carbon dioxide, non-fossil [air, unspecified]: 156.897 kg; = 0.142666666666666*wood_fuel/1.33333; lognormal variance with pedigree 0.0418, pedigree (2,3,5,1,1)
  (same comment as for Benzene, ethyl-)
- Hydrocarbons, aliphatic, alkanes, unspecified [air, unspecified]: 0.00133436 kg; = 1.21333333333333E-06*wood_fuel/1.33333; lognormal variance with pedigree 0.0812, pedigree (2,3,5,1,1)
  (same comment as for Benzene, ethyl-)
- Benzene [air, unspecified]: 0.00133436 kg; = 1.21333333333333E-06*wood_fuel/1.33333; lognormal variance with pedigree 0.0812, pedigree (2,3,5,1,1)
  (same comment as for Benzene, ethyl-)
- Chromium [air, unspecified]: 5.80667e-6 kg; = 5.28000000000001E-09*wood_fuel/1.33333; lognormal variance with pedigree 0.6912, pedigree (2,3,5,1,1)
  (same comment as for Benzene, ethyl-)
- Dinitrogen monoxide [air, unspecified]: 0.00366583 kg; = 3.33333333333334E-06*wood_fuel/1.33333; lognormal variance with pedigree 0.0812, pedigree (2,3,5,1,1)
  (same comment as for Benzene, ethyl-)
- Bromine [air, unspecified]: 8.79799e-5 kg; = 0.00000008*wood_fuel/1.33333; lognormal variance with pedigree 0.6912, pedigree (2,3,5,1,1)
  (same comment as for Benzene, ethyl-)
- Particulates, < 2.5 um [air, unspecified]: 0.13197 kg; = 0.00012*wood_fuel/1.33333; lognormal variance with pedigree 0.3412, pedigree (2,3,5,1,1)
  (same comment as for Benzene, ethyl-)
- Chromium VI [air, unspecified]: 5.86533e-8 kg; = 5.33333333333334E-11*wood_fuel/1.33333; lognormal variance with pedigree 0.6912, pedigree (2,3,5,1,1)
  (same comment as for Benzene, ethyl-)
- Magnesium [air, unspecified]: 0.000527879 kg; name magnesium; = 0.00000048*wood_fuel/1.33333; lognormal variance with pedigree 0.6912, pedigree (2,3,5,1,1)
  (same comment as for Benzene, ethyl-)
- Phosphorus [air, unspecified]: 0.000439899 kg; = 0.0000004*wood_fuel/1.33333; lognormal variance with pedigree 0.0812, pedigree (2,3,5,1,1)
  (same comment as for Benzene, ethyl-)
- Particulates, > 2.5 um, and < 10um [air, unspecified]: 0.13197 kg; = 0.00012*wood_fuel/1.33333; lognormal variance with pedigree 0.1612, pedigree (2,3,5,1,1)
  (same comment as for Benzene, ethyl-)
- Potassium [air, unspecified]: 0.0343122 kg; = 0.0000312*wood_fuel/1.33333; lognormal variance with pedigree 0.0812, pedigree (2,3,5,1,1)
  (same comment as for Benzene, ethyl-)

## Sampling procedure
Literature; emissions profile per MJ wood input from PSI (2014)

## Extrapolations
See Geography and Technology
