# treatment of waste building wood, chrome preserved, municipal incineration

Dataset: EcoSpold 2, unit process
Geography: CH
Time period: 1994-01-01 to 2021-12-31
Technology level: outdated
Classification: ISIC rev.4 ecoinvent: 3821:Treatment and disposal of non-hazardous waste
Classification: EcoSpold01Categories: waste management/municipal incineration
Synonyms: logs and timber impreganted with 7kg/m3 CKB/CCO preservatives.
Tags: ConvertedDataset; Treatment
Scenario: Business-as-Usual
System model: Allocation, cut-off by classification
Generated by: Gabor Doka (obsolete)
Published in: Doka G. 2007
Database: ecoinvent
isCopyrightProtected: true
accessRestrictedTo: 1

## General comment
Inventoried waste contains 100% chrome-preserved building wood; .
waste composition (wet, in ppm): upper heating value 15.36 MJ/kg; lower heating value 13.99 MJ/kg; H2O 173800; O 371580; H 50083; C 400820; S 198; N 985.41; P 108.79; B 27.33; Cl 330.42; Br n.a.; F 21.073; I n.a.; Ag n.a.; As 0.42145; Ba n.a.; Cd 0.20019; Co 0.086633; Cr 1013.2; Cu 351.4; Hg 0.31925; Mn 53.034; Mo 0.82887; Ni 0.55492; Pb 27.823; Sb n.a.; Se n.a.; Sn n.a.; V n.a.; Zn 17.778; Be n.a.; Sc n.a.; Sr n.a.; Ti n.a.; Tl n.a.; W n.a.; Si n.a.; Fe 15.454; Ca 130.68; Al 6.322; K 65.307; Mg 197.24; Na 156.13;
Share of carbon in waste that is biogenic 100%.
Share of iron in waste that is metallic/recyclable 0%.
Net energy produced in MSWI: 1.3MJ/kg waste electric energy and 2.74MJ/kg waste thermal energy
Allocation of energy production: no substitution or expansion. Total burden allocated to waste disposal function of MSWI.
One kg of this waste produces 0.00539 kg of slag and 0.002752 kg of residues, which are landfilled. Additional solidification with 0.001101 kg of cement.
[This dataset was already contained in the ecoinvent database version 2. It was not individually updated during the transfer to ecoinvent version 3. Life Cycle Impact Assessment results may still have changed, as they are affected by changes in the supply chain, i.e. in other datasets. This dataset was generated following the ecoinvent quality guidelines for version 2. It may have been subject to central changes described in the ecoinvent version 3 change report (http://www.ecoinvent.org/database/ecoinvent-version-3/reports-of-changes/), and the results of the central updates were reviewed extensively. The changes added e.g. consistent water flows and other information throughout the database. The documentation of this dataset can be found in the ecoinvent reports of version 2, which are still available via the ecoinvent website. The change report linked above covers all central changes that were made during the conversion process.]

## Included activities end
waste-specific air and water emisions from incineration, auxiliary material consumption for flue gas cleaning. Short-term emissions to river water and long-term emisisons to ground water from slag compartment (from bottom slag) and residual material landfill (from solidified fly ashes and scrubber slugde). Process energy demands for MSWI.

## Geography
Specific to the technology mix encountered in Switzerland in 2000. Well applicable to modern incineration practices in Europe, North America or Japan.

## Technology
replaced by newer incineration technology with fly ash extraction. Average Swiss MSWI plants in 2000 (grate incinerators) with electrostatic precipitator for fly ash (ESP), wet flue gas scrubber and 29.4% SNCR , 32.2% SCR-high dust , 24.6% SCR-low dust -DeNOx facilities and 13.8% without Denox (by burnt waste, according to Swiss average). Share of waste incinerated in plants with magnetic scrap separation from slag : 50%. Gross electric efficiency technology mix 12.997% and Gross thermal efficiency technology mix 25.57%

## Time period
Waste composition as given in literature reference, theoretical data or other source. Transfer coefficients for modern Swiss MSWI. Emission speciation based on early 90ies data.

## Reference product
- waste building wood, chrome preserved: -1 kg; CPC 39: Wastes or scraps; By-product classification Waste
  EcoSpold01Location=CH
  production volume 0 kg; name RP_PV_1
    outdated. Replaced by newer incineration technology with fly ash extraction.
  property heating value, net 11.63 MJ
    LHV is calculated based on the Carbon content of the product. More details can be found on the respective documentation.
  property price 0 EUR2005
    Waste products are assigned a price of zero as they are assumed to require further treatment.
  property carbon content, non-fossil 0.484262
    C content per kg DM was calculated using information in Tab A.4, ecoinvent v2.2 report 13_I
  property carbon content 0.484262
    carbon content on a dry matter basis (reserved; not for manual entry)
  properties: wet mass 1 kg, carbon content, fossil 0, dry mass 0.8 kg, water content 0.25, water in wet mass 0.2 kg, carbon allocation 0.387409 kg

## Inputs from technosphere
- process-specific burdens, residual material landfill: 0.00275 kg; lognormal variance with pedigree 0.08, pedigree (1,1,5,1,1)
  uncertainty is calculated from uncertainties in waste composition and transfer coefficients in incinerator;activityLink introduced to establish a direct link to the corresponding regional supply of this product
  EcoSpold01Location=CH
- waste cement, hydrated: -0.00275 kg; name BP_amount_1; lognormal variance with pedigree 0.09, pedigree (1,1,5,1,1)
  EcoSpold01Location=CH
  Hydrated cement for solidification of landfilled residual material. Uncertainty calculated from unertainty of the waste composition of this waste and transfer coefficients in the incinerator and of the solidification recipe.
  production volume 0 kg; = RP_PV_1* BP_amount_1
    Calculated from the production volume of waste building wood, chrome preserved, 20% water in proportion to the respective output amounts.
  property price 0 EUR2005; name BP_amount_1_price_EUR2005
  properties: wet mass 1 kg, dry mass 1 kg
- ammonia, anhydrous, liquid: 4.97e-5 kg; lognormal variance with pedigree 1.61, pedigree (1,1,5,1,1)
  uncertainty calculated from uncertainty in average DeNOx input, uncertainty in the share of thermal NOx, uncertainty of nitrogen content in average municipal waste and the unertainty in nitrogen content in *this* waste.
  EcoSpold01Location=CH
  properties: wet mass 1 kg, dry mass 1 kg
- iron (III) chloride, without water, in 40% solution state: 4.61e-5 kg; lognormal variance with pedigree 0.52, pedigree (1,1,5,1,1)
  EcoSpold01Location=CH
  uncertainty calculated from uncertainty in average auxiliary material input, and the unertainty of the waste composition of this waste
  properties: wet mass 1 kg, dry mass 1 kg
- sodium hydroxide, without water, in 50% solution state: 0.0004 kg; lognormal variance with pedigree 0.66, pedigree (1,1,5,1,1)
  uncertainty calculated from uncertainty in average auxiliary material input, and the unertainty of the waste composition of this waste
  EcoSpold01Location=RER
  properties: heating value, net 3.03 MJ, dry mass 1 kg, wet mass 1 kg
- chemical, inorganic: 2.57e-6 kg; lognormal variance with pedigree 0.28, pedigree (1,1,5,1,1)
  Proxy for Polyelectrolyte. uncertainty calculated from uncertainty in average auxiliary material input, and the unertainty of the waste composition of this waste
  EcoSpold01Location=GLO
  properties: carbon content, fossil 0.003, dry mass 1 kg, wet mass 1 kg
  note on carbon content, fossil: This dataset is an unweighted average of 20 inorganic substances (listed in Tab 88.1, ecoinvent v2.2 report 8, part II), being part of the top100 chemicals included in this database. The C-content has also been calculated as an unweighted average of the C content of the substances composing this dataset.
- residual material landfill: 5.73e-12 unit; lognormal variance with pedigree 0.08, pedigree (1,1,5,1,1)
  EcoSpold01Location=CH
  uncertainty is calculated from uncertainties in waste composition and transfer coefficients in incinerator
- hydrochloric acid, without water, in 30% solution state: 1.54e-6 kg; lognormal variance with pedigree 0.28, pedigree (1,1,5,1,1)
  EcoSpold01Location=RER
  uncertainty calculated from uncertainty in average auxiliary material input, and the unertainty of the waste composition of this waste
  properties: dry mass 1 kg, wet mass 1 kg, heating value, net 3.32 MJ
- process-specific burdens, slag landfill: 0.00539 kg; lognormal variance with pedigree 0.07, pedigree (1,1,5,1,1)
  EcoSpold01Location=CH
  uncertainty is calculated from uncertainties in waste composition and transfer coefficients in incinerator;activityLink introduced to establish a direct link to the corresponding regional supply of this product
- titanium dioxide: 1.42e-6 kg; lognormal variance with pedigree 2.33, pedigree (1,1,5,1,1)
  uncertainty calculated from uncertainty in average DeNOx input, uncertainty in the share of thermal NOx, uncertainty of nitrogen content in average municipal waste and the unertainty in nitrogen content in *this* waste.
  EcoSpold01Location=RER
  properties: wet mass 1 kg, dry mass 1 kg
- chromium oxide, flakes: 2.9e-8 kg; lognormal variance with pedigree 2.33, pedigree (1,1,5,1,1)
  EcoSpold01Location=RER
  Proxy for vanadium pentoxide V2O5 in SCR catalyst, uncertainty calculated from uncertainty in average DeNOx input, uncertainty in the share of thermal NOx, uncertainty of nitrogen content in average municipal waste and the unertainty in nitrogen content in *this* waste.
  properties: dry mass 1 kg, wet mass 1 kg
- chemical, organic: 1.51e-6 kg; lognormal variance with pedigree 1.26, pedigree (1,1,5,1,1)
  EcoSpold01Location=GLO
  Proxy for TMT15. uncertainty calculated from uncertainty in average auxiliary material input, and the unertainty of the waste composition of this waste
  properties: wet mass 1 kg, carbon content, fossil 0.628, heating value, net 19.03 MJ, dry mass 1 kg
  note on carbon content, fossil: This dataset is an unweighted average of 20 organic substances (listed in Tab 88.1, ecoinvent v2.2 report 8, part II), being part of the top100 chemicals included in this database. The C-content has also been calculated as an unweighted average of the C content of the substances composing this dataset.
- heat, district or industrial, natural gas: 0.004365 MJ; lognormal variance with pedigree 1.61, pedigree (1,1,5,1,1)
  EcoSpold01Location=RER
  uncertainty calculated from uncertainty in average DeNOx input, uncertainty in the share of thermal NOx, uncertainty of nitrogen content in average municipal waste and the unertainty in nitrogen content in *this* waste.
  properties: heating value, net 1 MJ
- municipal waste incineration facility: 2.5e-10 unit; lognormal variance with pedigree 0.04, pedigree (1,1,5,1,1)
  EcoSpold01Location=CH
  demands per kilogram waste. uncertainty is heeded in the module
- slag landfill: 9.58e-12 unit; lognormal variance with pedigree 0.07, pedigree (1,1,5,1,1)
  (same comment as for residual material landfill)
- cement, unspecified: 0.0011 kg; lognormal variance with pedigree 0.09, pedigree (1,1,5,1,1)
  Cement for solidification of landfilled residual material. Uncertainty calculated from unertainty of the waste composition of this waste, of transfer coefficients in the incinerator and of the solidification recipe.
  EcoSpold01Location=CH
  properties: wet mass 1 kg, dry mass 1 kg
- process-specific burdens, municipal waste incineration: 1 kg; lognormal variance with pedigree 0.04, pedigree (1,1,5,1,1)
  demands per kilogram waste. uncertainty is heeded in the module;activityLink introduced to establish a direct link to the corresponding regional supply of this product
  EcoSpold01Location=CH
- quicklime, milled, packed: 5.81e-5 kg; lognormal variance with pedigree 0.83, pedigree (1,1,5,1,1)
  (same comment as for iron (III) chloride, without water, in 40% solution state)
  properties: dry mass 0.99 kg, wet mass 1 kg, water content 0.010101

## Emissions to nature
- Chromium VI [water, ground-, long-term]: 0.000107 kg; lognormal variance with pedigree 0.96, pedigree (1,1,5,1,1)
  Long-term emissions from landfilling of incineration residues. uncertainty is calculated from uncertainties in waste composition and transfer coefficients in incinerator and landfills.
- Boron [water, ground-, long-term]: 1.8e-5 kg; lognormal variance with pedigree 0.65, pedigree (1,1,5,1,1)
  (same comment as for Chromium VI)
- Molybdenum [air, urban air close to ground]: 1.66e-9 kg; lognormal variance with pedigree 1.65, pedigree (1,1,5,1,1)
  uncertainty is calculated from uncertainties in waste composition and transfer coefficients in incinerator
- Calcium, ion [water, surface water]: 4.94e-7 kg; lognormal variance with pedigree 1.42, pedigree (1,1,5,1,1)
  uncertainty is calculated from uncertainties in waste composition and transfer coefficients in incinerator and landfills
- Lead [water, surface water]: 7.75e-10 kg; lognormal variance with pedigree 1.18, pedigree (1,1,5,1,1)
  (same comment as for Calcium, ion)
- Manganese [water, surface water]: 2.97e-9 kg; lognormal variance with pedigree 1.85, pedigree (1,1,5,1,1)
  (same comment as for Calcium, ion)
- Methane, non-fossil [air, urban air close to ground]: 6.38e-6 kg; lognormal variance with pedigree 0.091225, pedigree (2,3,5,2,1)
  Confidential data from 5 plants in Switzerland and Germany
  Uncertainty: & basic uncertainty of 1.5; confidential data from 5 plants in Switzerland and Germany
- Phosphorus [air, urban air close to ground]: 1.09e-7 kg; lognormal variance with pedigree 1.01, pedigree (1,1,5,1,1)
  (same comment as for Molybdenum)
- Sulfur dioxide [air, urban air close to ground]: 8.44e-7 kg; lognormal variance with pedigree 0.93, pedigree (1,1,5,1,1)
  (same comment as for Molybdenum)
- Potassium, ion [water, ground-, long-term]: 5.38e-5 kg; lognormal variance with pedigree 0.75, pedigree (1,1,5,1,1)
  (same comment as for Chromium VI)
- Manganese [air, urban air close to ground]: 2.89e-13 kg; lognormal variance with pedigree 1.21, pedigree (1,1,5,1,1)
  (same comment as for Molybdenum)
- DOC, Dissolved Organic Carbon [water, surface water]: 1.1e-5 kg; lognormal variance with pedigree 0.28, pedigree (1,1,5,1,1)
  (same comment as for Calcium, ion)
- Boron [water, surface water]: 4.27e-6 kg; lognormal variance with pedigree 1.12, pedigree (1,1,5,1,1)
  (same comment as for Calcium, ion)
- Iron [air, urban air close to ground]: 5.16e-10 kg; lognormal variance with pedigree 1.29, pedigree (1,1,5,1,1)
  (same comment as for Molybdenum)
- Lead [water, ground-, long-term]: 1.98e-6 kg; lognormal variance with pedigree 7.23, pedigree (1,1,5,1,1)
  (same comment as for Chromium VI)
- Cyanide [air, urban air close to ground]: 8.87e-7 kg; lognormal variance with pedigree 1.72, pedigree (1,1,5,1,1)
  uncertainty calculated from uncertainty in average N-emissions, uncertainty in the share of thermal NOx, uncertainty of nitrogen content in average municipal waste and the unertainty in nitrogen content in *this* waste.
- Chloride [water, ground-, long-term]: 7.8e-6 kg; lognormal variance with pedigree 0.43, pedigree (1,1,5,1,1)
  (same comment as for Chromium VI)
- Fluoride [water, ground-, long-term]: 1.88e-5 kg; lognormal variance with pedigree 0.83, pedigree (1,1,5,1,1)
  (same comment as for Chromium VI)
- Zinc, ion [water, ground-, long-term]: 2.76e-7 kg; lognormal variance with pedigree 5.79, pedigree (1,1,5,1,1)
  (same comment as for Chromium VI)
- Potassium [air, urban air close to ground]: 1.97e-7 kg; lognormal variance with pedigree 1.07, pedigree (1,1,5,1,1)
  (same comment as for Molybdenum)
- Magnesium [water, surface water]: 6.9e-7 kg; lognormal variance with pedigree 1.39, pedigree (1,1,5,1,1)
  (same comment as for Calcium, ion)
- Mercury [water, ground-, long-term]: 1.66e-8 kg; lognormal variance with pedigree 3.51, pedigree (1,1,5,1,1)
  (same comment as for Chromium VI)
- Nickel, ion [water, ground-, long-term]: 5.2e-7 kg; lognormal variance with pedigree 1.62, pedigree (1,1,5,1,1)
  (same comment as for Chromium VI)
- Zinc [air, urban air close to ground]: 2.9e-10 kg; lognormal variance with pedigree 1.28, pedigree (1,1,5,1,1)
  (same comment as for Molybdenum)
- Sodium, ion [water, ground-, long-term]: 0.000121 kg; lognormal variance with pedigree 0.65, pedigree (1,1,5,1,1)
  (same comment as for Chromium VI)
- Magnesium [water, ground-, long-term]: 0.000182 kg; lognormal variance with pedigree 0.89, pedigree (1,1,5,1,1)
  (same comment as for Chromium VI)
- Sodium [air, urban air close to ground]: 1.47e-6 kg; lognormal variance with pedigree 0.95, pedigree (1,1,5,1,1)
  (same comment as for Molybdenum)
- Molybdenum [water, surface water]: 1.42e-7 kg; lognormal variance with pedigree 1.1, pedigree (1,1,5,1,1)
  (same comment as for Calcium, ion)
- BOD5, Biological Oxygen Demand [water, ground-, long-term]: 0.00324 kg; lognormal variance with pedigree 0.06, pedigree (1,1,5,1,1)
  (same comment as for Chromium VI)
- TOC, Total Organic Carbon [water, surface water]: 1.1e-5 kg; lognormal variance with pedigree 0.28, pedigree (1,1,5,1,1)
  (same comment as for Calcium, ion)
- BOD5, Biological Oxygen Demand [water, surface water]: 1.5e-5 kg; lognormal variance with pedigree 0.17, pedigree (1,1,5,1,1)
  (same comment as for Calcium, ion)
- Potassium, ion [water, surface water]: 1.13e-5 kg; lognormal variance with pedigree 0.67, pedigree (1,1,5,1,1)
  (same comment as for Calcium, ion)
- Magnesium [air, urban air close to ground]: 2.72e-7 kg; lognormal variance with pedigree 0.93, pedigree (1,1,5,1,1)
  (same comment as for Molybdenum)
- Cobalt [water, surface water]: 1.48e-11 kg; lognormal variance with pedigree 2.37, pedigree (1,1,5,1,1)
  (same comment as for Calcium, ion)
- Hydrogen chloride [air, urban air close to ground]: 3.67e-9 kg; lognormal variance with pedigree 0.89, pedigree (1,1,5,1,1)
  (same comment as for Molybdenum)
- Nickel, ion [water, surface water]: 3.48e-10 kg; lognormal variance with pedigree 2.26, pedigree (1,1,5,1,1)
  (same comment as for Calcium, ion)
- Sulfate [water, ground-, long-term]: 0.000497 kg; lognormal variance with pedigree 0.56, pedigree (1,1,5,1,1)
  (same comment as for Chromium VI)
- Nitrogen oxides [air, urban air close to ground]: 3.14e-5 kg; lognormal variance with pedigree 1.72, pedigree (1,1,5,1,1)
  (same comment as for Cyanide)
- TOC, Total Organic Carbon [water, ground-, long-term]: 0.00391 kg; lognormal variance with pedigree 0.06, pedigree (1,1,5,1,1)
  (same comment as for Chromium VI)
- COD, Chemical Oxygen Demand [water, ground-, long-term]: 0.00989 kg; lognormal variance with pedigree 0.06, pedigree (1,1,5,1,1)
  (same comment as for Chromium VI)
- Nickel [air, urban air close to ground]: 2.39e-14 kg; lognormal variance with pedigree 1.79, pedigree (1,1,5,1,1)
  (same comment as for Molybdenum)
- COD, Chemical Oxygen Demand [water, surface water]: 2.68e-5 kg; lognormal variance with pedigree 0.3, pedigree (1,1,5,1,1)
  (same comment as for Calcium, ion)
- Molybdenum [water, ground-, long-term]: 6.86e-7 kg; lognormal variance with pedigree 1.63, pedigree (1,1,5,1,1)
  (same comment as for Chromium VI)
- Aluminium [water, ground-, long-term]: 4.68e-6 kg; lognormal variance with pedigree 1.29, pedigree (1,1,5,1,1)
  (same comment as for Chromium VI)
- Aluminium [water, surface water]: 5.26e-10 kg; lognormal variance with pedigree 1.56, pedigree (1,1,5,1,1)
  (same comment as for Calcium, ion)
- Boron [air, urban air close to ground]: 3.28e-6 kg; lognormal variance with pedigree 1.17, pedigree (1,1,5,1,1)
  (same comment as for Molybdenum)
- Iron, ion [water, surface water]: 5.29e-9 kg; lognormal variance with pedigree 1.22, pedigree (1,1,5,1,1)
  (same comment as for Calcium, ion)
- Copper, ion [water, surface water]: 1.43e-8 kg; lognormal variance with pedigree 1.47, pedigree (1,1,5,1,1)
  (same comment as for Calcium, ion)
- Iron, ion [water, ground-, long-term]: 7.24e-6 kg; lognormal variance with pedigree 1.97, pedigree (1,1,5,1,1)
  (same comment as for Chromium VI)
- Cadmium, ion [water, surface water]: 9.08e-11 kg; lognormal variance with pedigree 1.77, pedigree (1,1,5,1,1)
  (same comment as for Calcium, ion)
- Cobalt [water, ground-, long-term]: 7.58e-8 kg; lognormal variance with pedigree 1.9, pedigree (1,1,5,1,1)
  (same comment as for Chromium VI)
- Copper, ion [water, ground-, long-term]: 0.000284 kg; lognormal variance with pedigree 0.81, pedigree (1,1,5,1,1)
  (same comment as for Chromium VI)
- Chromium, ion [water, surface water]: 3.23e-6 kg; lognormal variance with pedigree 0.71, pedigree (1,1,5,1,1)
  (same comment as for Calcium, ion)
- Sodium, ion [water, surface water]: 3.38e-5 kg; lognormal variance with pedigree 0.52, pedigree (1,1,5,1,1)
  (same comment as for Calcium, ion)
- Nitrate [water, ground-, long-term]: 3.54e-5 kg; lognormal variance with pedigree 0.71, pedigree (1,1,5,1,1)
  (same comment as for Chromium VI)
- Carbon dioxide, non-fossil [air, urban air close to ground]: 1.45 kg; lognormal variance with pedigree 0.06, pedigree (1,1,5,1,1)
  (same comment as for Molybdenum)
- Dinitrogen monoxide [air, urban air close to ground]: 4.16e-6 kg; lognormal variance with pedigree 1.72, pedigree (1,1,5,1,1)
  (same comment as for Cyanide)
- Mercury [water, surface water]: 3.41e-9 kg; lognormal variance with pedigree 1.72, pedigree (1,1,5,1,1)
  (same comment as for Calcium, ion)
- Mercury [air, urban air close to ground]: 1.1e-14 kg; lognormal variance with pedigree 1.86, pedigree (1,1,5,1,1)
  (same comment as for Molybdenum)
- Phosphate [water, surface water]: 2.13e-8 kg; lognormal variance with pedigree 1.25, pedigree (1,1,5,1,1)
  (same comment as for Calcium, ion)
- Arsenic, ion [water, ground-, long-term]: 2.31e-7 kg; lognormal variance with pedigree 1.72, pedigree (1,1,5,1,1)
  (same comment as for Chromium VI)
- Cobalt [air, urban air close to ground]: 2.75e-15 kg; lognormal variance with pedigree 2.06, pedigree (1,1,5,1,1)
  (same comment as for Molybdenum)
- Hydrogen fluoride [air, urban air close to ground]: 1.11e-8 kg; lognormal variance with pedigree 1.23, pedigree (1,1,5,1,1)
  (same comment as for Molybdenum)
- Carbon monoxide, non-fossil [air, urban air close to ground]: 0.000223 kg; lognormal variance with pedigree 0.690625, pedigree (1,3,5,2,1)
  Literature data from switzerland and germany adapted to plant age distribution in switzerland
  Uncertainty: & basic uncertainty of 5; literature data from switzerland and germany adapted to plant age distribution in switzerland
- Sulfate [water, surface water]: 9.61e-5 kg; lognormal variance with pedigree 0.46, pedigree (1,1,5,1,1)
  (same comment as for Calcium, ion)
- Ammonia [air, urban air close to ground]: 7.81e-7 kg; lognormal variance with pedigree 1.72, pedigree (1,1,5,1,1)
  (same comment as for Cyanide)
- Lead [air, urban air close to ground]: 1.03e-9 kg; lognormal variance with pedigree 1.21, pedigree (1,1,5,1,1)
  (same comment as for Molybdenum)
- Calcium [air, urban air close to ground]: 2.18e-7 kg; lognormal variance with pedigree 0.98, pedigree (1,1,5,1,1)
  (same comment as for Molybdenum)
- Chloride [water, surface water]: 0.000323 kg; lognormal variance with pedigree 0.77, pedigree (1,1,5,1,1)
  (same comment as for Calcium, ion)
- Fluoride [water, surface water]: 1.62e-6 kg; lognormal variance with pedigree 0.87, pedigree (1,1,5,1,1)
  (same comment as for Calcium, ion)
- Arsenic [air, urban air close to ground]: 4.3e-15 kg; lognormal variance with pedigree 1.84, pedigree (1,1,5,1,1)
  (same comment as for Molybdenum)
- Calcium, ion [water, ground-, long-term]: 0.000114 kg; lognormal variance with pedigree 0.94, pedigree (1,1,5,1,1)
  (same comment as for Chromium VI)
- Manganese [water, ground-, long-term]: 4.57e-5 kg; lognormal variance with pedigree 1.17, pedigree (1,1,5,1,1)
  (same comment as for Chromium VI)
- Nitrate [water, surface water]: 1.26e-5 kg; lognormal variance with pedigree 0.5, pedigree (1,1,5,1,1)
  (same comment as for Calcium, ion)
- Chromium VI [water, surface water]: 3.3e-5 kg; lognormal variance with pedigree 0.71, pedigree (1,1,5,1,1)
  (same comment as for Calcium, ion)
- Chromium [air, urban air close to ground]: 7.49e-11 kg; lognormal variance with pedigree 0.79, pedigree (1,1,5,1,1)
  (same comment as for Molybdenum)
- Cadmium [air, urban air close to ground]: 1.1e-11 kg; lognormal variance with pedigree 1.86, pedigree (1,1,5,1,1)
  (same comment as for Molybdenum)
- DOC, Dissolved Organic Carbon [water, ground-, long-term]: 0.00391 kg; lognormal variance with pedigree 0.06, pedigree (1,1,5,1,1)
  (same comment as for Chromium VI)
- Cadmium, ion [water, ground-, long-term]: 2.01e-9 kg; lognormal variance with pedigree 7.5, pedigree (1,1,5,1,1)
  (same comment as for Chromium VI)
- Copper [air, urban air close to ground]: 2.59e-9 kg; lognormal variance with pedigree 0.89, pedigree (1,1,5,1,1)
  (same comment as for Molybdenum)
- Phosphate [water, ground-, long-term]: 1.27e-5 kg; lognormal variance with pedigree 5.21, pedigree (1,1,5,1,1)
  (same comment as for Chromium VI)
- Arsenic, ion [water, surface water]: 1.9e-7 kg; lognormal variance with pedigree 1.47, pedigree (1,1,5,1,1)
  (same comment as for Calcium, ion)
- Zinc, ion [water, surface water]: 3.27e-9 kg; lognormal variance with pedigree 1.09, pedigree (1,1,5,1,1)
  (same comment as for Calcium, ion)
- Aluminium [air, urban air close to ground]: 9.88e-9 kg; lognormal variance with pedigree 1.39, pedigree (1,1,5,1,1)
  (same comment as for Molybdenum)

## Sampling procedure
waste-specific calculation based on literature data

## Extrapolations
This dataset has been extrapolated from year 2000 to the year of the calculation (2021). The uncertainty has been adjusted accordingly.

## Review by Niels Jungbluth 2003-08-06
Passed. Calculation for standard deviation 95 of infrastructure, land occupation, transport services and other services can differ from standard Pedigree approach used in this project and figures obtained by this procedure.
