# ethanol production from sugar beet molasses

Dataset: EcoSpold 2, unit process
Geography: RoW
Time period: 1998-01-01 to 2021-12-31
Technology level: current
Classification: EcoSpold01Categories: biomass/fuels
Classification: ISIC rev.4 ecoinvent: 2011:Manufacture of basic chemicals
Tags: ConvertedDataset
Scenario: Business-as-Usual
System model: Allocation, cut-off by classification
Share of production covered: 0 %
Generated by: Edgard Gnansounou
Published in: Jungbluth N. 2007
Database: ecoinvent
isCopyrightProtected: true
accessRestrictedTo: 1

## General comment
Inventory refers to the production of 1 kg hydrated ethanol 95% (dry basis, i.e. 1.05 kg hydrated ethanol 95% wet basis), respectively 1 kg of stillage syrup (wet basis) from molasses. The multioutput-process 'sugar beet molasses, in distillery' delivers the co-products 'ethanol, 95% in H2O, from sugar beet molasses, at distillery' and 'syrup, from sugar beet molasses, at distillery'. Economic allocation with allocation factor for common stages of 94.5% to ethanol. Allocation is done according to carbon balance for CO2 emissions.
[This dataset was already contained in the ecoinvent database version 2. It was not individually updated during the transfer to ecoinvent version 3. Life Cycle Impact Assessment results may still have changed, as they are affected by changes in the supply chain, i.e. in other datasets. This dataset was generated following the ecoinvent quality guidelines for version 2. It may have been subject to central changes described in the ecoinvent version 3 change report (http://www.ecoinvent.org/database/ecoinvent-version-3/reports-of-changes/), and the results of the central updates were reviewed extensively. The changes added e.g. consistent water flows and other information throughout the database. The documentation of this dataset can be found in the ecoinvent reports of version 2, which are still available via the ecoinvent website. The change report linked above covers all central changes that were made during the conversion process.]

## Included activities end
This dataset includes the transport of molasses to the distillery, and the processing of molasses to hydrated ethanol (95%) and molasses stillage syrup (58% dry matter). System boundary is at the distillery. Dehydration to anhydrous ethanol is not included.

## Geography
Data is from the etha+ project (Alcosuisse, CH)

## Technology
The process is similar to that of sugarbeet-to-ethanol. The production of syrup from stillage includes pre-concentration and concentration. The syrup is 58% dry matter and is used as animal feed.

## Time period
Data from 1998 to 2005, current technology for the production of ethanol from sugar-based feedstocks

## Parameters
- fraction, tap water, to air: 0.0523465 dimensionless; name fraction_TW_to_air; lognormal variance with pedigree 1.21, pedigree (5,5,5,5,5)
- fraction, process water, to air: 0.0523465 dimensionless; name fraction_PW_to_air; lognormal variance with pedigree 1.21, pedigree (5,5,5,5,5)
  Calculated.

## Reference product
- ethanol, without water, in 95% solution state, from fermentation: 1 kg; name RP; CPC 35491: Biodiesel; By-product classification allocatable product; CAS 64-17-5
  EcoSpold01Location=CH
  production volume 4.617e8 kg; name PVRP
    Estimated to 23% of European production. Source for amounts: F. O. Licht World Ethanol and Biofuels Report, vol. 4, no. 17 (9 May 2006), p. 395.
  property heating value, net 31.58 MJ
    LHV is calculated based on the elemental composition of the substance. Based on the CAS number of the substance (000064-17-5), the chemical formula of the substance is found to be: C2H6O, (PubChem 2020).
    Reference: Kim, S., Chen, J., Cheng, T., Gindulyte, A., He, J., He, S., Li, Q., Shoemaker, B. A., Thiessen, P. A., Yu, B., Zaslavsky, L., Zhang, J., & Bolton, E. E. (2019). PubChem 2019 update: improved access to chemical data. Nucleic acids research, 47(D1), D1102–D1109. https://doi.org/10.1093/nar/gky1033
  property price 0.324 EUR2005
    Temporary price data. Calculated as 90% of purchasers price based on: 2005 prices from FAPRI2007, 2009. Agricultural outlook. (http://www.fapri.missouri.edu/outreach/publications/ag_outlook.asp?current_page=outreach; accessed 22/06/10). Unit conversion from US gallon to kg - 1 gallon = 3.7856 liter * 0.789 kg/liter (ethanol density) = 2.9868 kg
  property carbon content 0.521739
    carbon content on a dry matter basis (reserved; not for manual entry)
  properties: water in wet mass 0 kg, carbon content, fossil 0, wet mass 1 kg, water content 0, dry mass 1 kg, carbon content, non-fossil 0.521739, carbon allocation 0.521739 kg

## By-products
- vinasse, from fermentation of sugar beet molasses: 0 kg; CPC 39149: Beet-pulp and other waste of sugar manufacture; By-product classification Recyclable
  EcoSpold01Location=CH
  production volume 0 kg; = PVRP*BP1/RP
    Production volume of ethanol for use as a fuel was 1-1.5 Ml in 2005 in CH
    Calculated from the production volume of ethanol, without water, in 95% solution state, from fermentation in proportion to the respective output amounts.
  property price 0.027 EUR2005
    Temporary price data. Calculated as 90% of purchasers price based on: Calculated relative to the price of sugar beet pulp based on the difference in dry matter content 5.54%/25%
  property carbon content, non-fossil 0.12867
    The carbon content of all vinasses was assumed to be 0.12867 kg per dry matter (ecoinvent v2.2 report n 17, pg 281, vinasse from sugar beet)
  property carbon content 0.12867
    carbon content on a dry matter basis (reserved; not for manual entry)
  properties: water in wet mass 0.42 kg, wet mass 1 kg, water content 0.724138, carbon content, fossil 0, dry mass 0.58 kg, carbon allocation 0.0746286 kg

## Inputs from technosphere
- molasses, from sugar beet: 4.07598 kg; lognormal variance with pedigree 0.0521, pedigree (1,2,5,5,1)
  Etha+ project Alcosuisse, industrial data
  EcoSpold01Location=CH
  Uncertainty: etha+ project Alcosuisse, industrial data
  properties: dry mass 0.82 kg, water content 0.219512, carbon content, non-fossil 0.39592, wet mass 1 kg
  note on carbon content, non-fossil: Composition data obtained from Molasses Beet, in (http://beefmagazine.com/images/2009%20feed%20table.pdf). First, composition data were refered to 1 kg dry mass. Then, C-contents were calculated considering a C-content/dry mass of 46% in carbohydrates (including fibres), 53% in proteins and 75% in fats. All data from "Evolutionary and Biochemical Aspects", A.D. Kay and T. Vrede (in Global Ecology, 2010, Elsevier B.V., S.E. Jørgensen Ed.).
- inorganic nitrogen fertiliser, as N: 0 kg; pedigree (1,1,1,1,1)
  EcoSpold01Location=RER
  Etha+ project Alcosuisse, industrial data
  Uncertainty: etha+ project Alcosuisse, industrial data
  properties: dry mass 1 kg, wet mass 1 kg
- heat, district or industrial, natural gas: 0 MJ; pedigree (1,1,1,1,1)
  Etha+ project Alcosuisse, industrial data
  EcoSpold01Location=RER
  Uncertainty: etha+ project Alcosuisse, industrial data
  properties: heating value, net 1 MJ
- sulfuric acid: 0.0377407 kg; lognormal variance with pedigree 0.0521, pedigree (1,2,5,5,1)
  (same comment as for inorganic nitrogen fertiliser, as N)
  properties: dry mass 1 kg, wet mass 1 kg
- wastewater, from residence: -0.00762982 m3; name BP2; lognormal variance with pedigree 0.0521, pedigree (1,2,5,5,1)
  EcoSpold01Location=CH
  Etha+ project Alcosuisse, industrial data
  Uncertainty: etha+ project Alcosuisse, industrial data
  production volume 3.52269e6 m3; = PVRP*BP2/RP
    Calculated from the production volume of ethanol, without water, in 95% solution state, from fermentation in proportion to the respective output amounts.
  property price 0 EUR2005; name BP2_price_EUR2005
  properties: water content 2962.17, dry mass 0.337476 kg, carbon content, non-fossil 0.199421, wet mass 1000 kg
  note on carbon content, non-fossil: 0.0673 kg TOC/m3 (Tab A.17, ecoinvent v2.2 report 13_I). TOC was considered as Total Carbon.
- ammonium sulfate: 0.0050322 kg; lognormal variance with pedigree 0.0521, pedigree (1,2,5,5,1)
  (same comment as for inorganic nitrogen fertiliser, as N)
  properties: dry mass 1 kg, wet mass 1 kg
- ethanol fermentation plant: 4.87405e-10 unit; lognormal variance with pedigree 0.3521, pedigree (1,2,5,5,1)
  (same comment as for wastewater, from residence)
- tap water: 0 kg; name tap_water_input; pedigree (1,1,1,1,1)
  (same comment as for molasses, from sugar beet)
  properties: dry mass 0.000337476 kg, wet mass 1 kg, carbon content, fossil 0.00178991, water content 2962.17
  note on carbon content, fossil: Bicarbonate content is 2.93 mol/m3. CO2 content is 0.1 mol/m3 (ecoinvent v2.2 report 8, Tab 93.1).
- electricity, medium voltage: 0 kWh; pedigree (1,1,1,1,1)
  (same comment as for wastewater, from residence)
- vinasse, from fermentation of sugar beet molasses: -2.50383 kg
  EcoSpold01Location=CH
  production volume 1.15602e9 kg
  properties: price 0.027 EUR2005, wet mass 1 kg, water content 0.724138, carbon content, non-fossil 0.12867, dry mass 0.58 kg
  note on carbon content, non-fossil: The carbon content of all vinasses was assumed to be 0.12867 kg per dry matter (ecoinvent v2.2 report n 17, pg 281, vinasse from sugar beet)
- inorganic nitrogen fertiliser, as N: 6.79485e-7, 3.62106e-5, 4.53986e-6, 5.20478e-5, 1.3179e-6, 4.65186e-5, 6.10566e-6, 1.47807e-5, 0.000163412, 9.7592e-5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 kg (63 entries); lognormal variance with pedigree 0.0521, pedigree (1,2,5,5,1)
  (same comment as for inorganic nitrogen fertiliser, as N)
- heat, district or industrial, natural gas: 0.140844, 3.3749, 9.13853 MJ (3 entries); lognormal variance with pedigree 0.0521, pedigree (1,2,5,5,1)
  (same comment as for heat, district or industrial, natural gas)
- tap water: 0.0752323, 0.00905595, 0.0149664, 3.21816, 0.377395, 0.00981783, 0.0279266, 4.31872 kg (8 entries); lognormal variance with pedigree 0.0521, pedigree (1,2,5,5,1)
  (same comment as for molasses, from sugar beet)
- electricity, medium voltage: 0.00236267, 0.000453059, 0.0104029, 0.0344423, 0.00760592, 0.110621, 0.0155921, 0.0508015 kWh (8 entries); lognormal variance with pedigree 0.0521, pedigree (1,2,5,5,1)
  (same comment as for wastewater, from residence)

## Inputs from nature
- Carbon dioxide, in air [natural resource, in air]: 0.654439 kg; lognormal variance with pedigree 0.042, pedigree (1,1,5,5,1)
  Calculation, to close carbon balance
  Uncertainty: Calculation, to close carbon balance

## Emissions to nature
- Carbon dioxide, non-fossil [air, urban air close to ground]: 1.67657 kg; lognormal variance with pedigree 0.042, pedigree (1,1,5,5,1)
  Calculation, to close carbon balance
  Uncertainty: Calculation, to close carbon balance
- Water [air, unspecified]: 0.000421456 m3; name water_to_air_unspecified; = (tap_water_input/1000)-0.00762981984185212; lognormal variance with pedigree 0.130025, pedigree (4,4,5,2,4)
  Calculated value based on literature values and expert opinion. See comments in the parametres' comment field.
  property fraction, origin: salt water 0; name fraction_origin_salt_water
  property fraction, origin: fresh water 1; name fraction_origin_fresh_water
  property fraction, origin: unspecified 0; name fraction_origin_unspecified

## Sampling procedure
Data is from the etha+ project (Alcosuisse, CH), technology by French ethanol plant supplier, modelling by ENERS (CH)

## Extrapolations
none This dataset has been copied from an original dataset covering the geography CH. The uncertainty has been adjusted accordingly.

## Review by Niels Jungbluth 2006-08-15
Passed.
none
