# electricity production, wind, 1-3MW turbine, onshore

Dataset: EcoSpold 2, unit process
Geography: IN-AP
Time period: 2005-01-01 to 2021-12-31
Technology level: modern
Classification: ISIC rev.4 ecoinvent: 3510:Electric power generation, transmission and distribution
Tags: wind power; India
Scenario: Business-as-Usual
System model: Allocation, cut-off by classification
Generated by: Muhammed Noor Hossain
Published in: Hossain, Muhammed Noor 2016
Database: ecoinvent
isCopyrightProtected: true
accessRestrictedTo: 1

## General comment
This dataset represents the production of high voltage electricity at onshore grid-connected wind power plants with a capacity between 1 (excluded) and 3 (included) MW in India - Andhra Pradesh (a state/union territory in India) in 2012. It includes operation and maintenance expenditures as well as infrastructure inputs. Wind load hours have been adapted to local conditions (see parameters).
At the moment, the class of onshore 1-3MW wind turbines is approximated with a 2 MW onshore wind turbine consisting of the infrastructure datasets for the "wind turbine construction" and the "network connection construction". The wind turbine"s parts are defined to be everything except for the network connection, i.e. rotor, nacelle, tower, and foundation.
Data on electricity generation from wind power in India is ambiguous since Statistical Yearbook, India (Statistical Yearbook, India, 2015) reports electricity generation from diesel and wind together as a single aggregated number. Instead, we used a different source. We took the total generation from wind according to the Indian energy statistics from International Energy Agency (IEA, 2016). Then, we distributed the total generation among the states according to the installed capacity data from Statistical Yearbook, India, 2015 (Statistical Yearbook, India, 2015). We have, then, distributed the total generation from wind among the three different technologies based on the turbine class i.e. 1-3 MW turbine (52.69%), <1 MW turbine (29.45%) , and >3 MW turbine (17.86%) according to the ecoinvent v3.2. However, for the technical reasons (i.e. too many datasets for a very minor share of production volume), we kept only 1-3 MW wind turbine to represent as wind power technology in India.
Source:
IEA. (2016). International Energy Agency. Retrieved May 19, 2016, from http://www.iea.org/statistics/statisticssearch/report/?year=2013&country=INDIA&product=RenewablesandWaste
Statistical Yearbook, India. (2015). Energy. Retrieved 06 21, 2016, from Ministry of Statistics and Programme Implementation: http://mospi.nic.in/Mospi_New/upload/SYB2015/ch16.html
[This dataset is meant to replace the following datasets:
- electricity production, wind, 1-3MW turbine, onshore, IN, 2005 - 2015]

## Included activities start
From operation of the wind power plant to high voltage electricity at the plant. According to (European Communities 2001), electricity produced with wind turbines in a wind power plant is connected to medium voltage or high voltage systems, depending on the size of the windfarm. Normally, each wind turbine contains a transformer from low voltage to medium voltage. The network connection additionally transforms the electricity to high voltage electricity. It is assumed here, that there are no stand-alone grid-connected small wind turbines and that all electricity is connected to the network in form of high voltage electricity.

Source:
European Communities. 2001. Wind Turbine Grid Connection and Interaction. Deutsches Windenergie-Institut /Tech-wise A/S /DM Energy, p. 7 Tab.2.1

## Included activities end
This activity ends with the production of 1kWh of high voltage electricity produced at the power plant and delivered to the grid.

This dataset includes
- the operation and maintenance of the wind power plant
- change of lubricating oil every year

This dataset doesn"t include
- raw materials extraction, decommissioning and waste treatment as these activities are already included in infrastructure datasets
- transformation of the electricity produced in order to deliver in to the grid as this is already included in the infrastructure datasets.

## Technology
Technology of a 2MW Vestas V80 wind power plant modelled with a dataset for the wind turbine (moving+fixed parts) and a network connection each.
See dataset "wind turbine construction, 2MW, onshore" for detailed technical information.

## Time period
The Annual Production Volume data is valid for the period of 01.04.2012 - 31.03.2013.

## Parameters
- distance: 200 km; lognormal variance with pedigree 0.1016, pedigree (4,5,5,4,4)
  Estimation. Maintenance transport to the power plant. One person travels two times per year over a distance of 200 km each time, one time for check only with a car, one time for change of the lubricating oil with a lorry.
  nan
- Percentage of onshore wind power plant class capacity on total: 0 dimensionless; name percentage_class_onshore
  Parameter not needed in this dataset but present due to parent child relationship.
- Wind load hours: 1564.91 hour; name wind_load_hours; = ( gross_electricity*(1- losses_gross_net))/(capacity_installed*1000); lognormal variance with pedigree 0.0032, pedigree (2,1,1,1,2)
  Calculated value. This parameter value is calculated by dividing the gross electricity generation (kWh) by the installed wind capacity (kW) in a certain Indian state/union territory. However, as described in the comment for the parameters "installed capacity" and "gross electricity production", no statistical values for the latter were available. Therefore, the gross electricity production value has been calculated using the total electricity production with wind power plants in India and the state-wise installed capacity value. This implies, however, that the load hours are the same in all the states, which in reality is very unlikely. Another shortcoming is that the installed capacity value is valid per 31.03.2013, while the electricity production value is for 01.04.2012 - 31.03.2013. The load hours might be underestimated if much capacity has been added toward the end of that period. Once better data are available, this shortcoming should be eliminated. As wind power only plays a minor role in the Indian States" electricity production, the imprecision is accepted for now.
- losses from gross electricity production: 0.01 dimensionless; name losses_gross_net; lognormal variance with pedigree 0.0113, pedigree (3,3,1,3,3)
  Estimation. The factor for the loss of electricity from gross to net electricity production is an assumption based on experiences, statistics and expertise (1% losses for wind).
  nan
- use of lubricating oil for maintenance: 157.5 kg; name lubricating_oil_maintenance; = 63*(2/0.8); lognormal variance with pedigree 0.0912, pedigree (4,4,5,4,4)
  Estimation of the use of maintenance lubricating oil per year, extrapolated from the 800 kW turbine in (Burger & Bauer 2007) (63 kg per year) with the rate of capacities.
  nan
- Installed capacity: 447.65 MW; name capacity_installed; lognormal variance with pedigree 0.0018, pedigree (2,1,1,1,2)
  Literature Value. The state/union territory wise installed capacity data as on 31.03.2013 is collected from Statistical Yearbook, India, 2015. Source: Statistical Yearbook, India. (2015). Energy. Retrieved 06 21, 2016, from Ministry of Statistics and Programme Implementation: http://mospi.nic.in/Mospi_New/upload/SYB2015/ch16.html
- gross electricity production: 7.07609e8 kWh; name gross_electricity; lognormal variance with pedigree 0.0018, pedigree (2,1,1,1,2)
  Literature and calculated value. Data on electricity generation from wind power in India is ambiguous since Statistical Yearbook, India (Statistical Yearbook, India, 2015) reports electricity generation from diesel and wind together as a single aggregated number. Instead, we used a different source. We took the total generation from wind according to the Indian energy statistics from International Energy Agency (IEA, 2016). Then, we distributed the total generation among the states according to the installed capacity data from Statistical Yearbook, India, 2015. We have, then, distributed the total generation from wind among the three different technologies based on the turbine class i.e. 1-3 MW turbine (52.69%), <1 MW turbine (29.45%) , and >3 MW turbine (17.86%) according to the ecoinvent v3.2. However, for the technical reasons (i.e. too many datasets for a very minor share of production volume), we kept only 1-3 MW wind turbine to represent as wind power technology in India. Source: IEA. (2016). International Energy Agency. Retrieved May 19, 2016, from http://www.iea.org/statistics/statisticssearch/report/?year=2013&country=INDIA&product=RenewablesandWaste

## Reference product
- electricity, high voltage: 1 kWh; name amount_RP; By-product classification allocatable product; CPC 17100: Electrical energy
  production volume 7.00533e8 kWh; name APV_electricity; = gross_electricity* (1-losses_gross_net)
    Literature and calculated value. Data on electricity generation from wind power in India is ambiguous since Statistical Yearbook, India (Statistical Yearbook, India, 2015) reports electricity generation from diesel and wind together as a single aggregated number. Instead, we used a different source. We took the total generation from wind according to the Indian energy statistics from International Energy Agency (IEA, 2016). Then, we distributed the total generation among the states according to the installed capacity data from Statistical Yearbook, India, 2015 (Statistical Yearbook, India, 2015). We have, then, distributed the total generation from wind among the three different technologies based on the turbine class i.e. 1-3 MW turbine (52.69%), <1 MW turbine (29.45%) , and >3 MW turbine (17.86%) according to the ecoinvent v3.2. However, for the technical reasons (i.e. too many datasets for a very minor share of production volume), we kept only 1-3 MW wind turbine to represent as wind power technology in India.
  property price 0.0977 EUR2005
    Temporary price data. Calculated as 90% of purchasers price based on: 94% of the average price (to account for a 6% loss in transformation and transmission) for electricity for industrial consumersin 2005 (excluded taxes). From IEA.

## Inputs from technosphere
- wind turbine network connection, 2MW, onshore: 1.59753e-8 unit; = 1/(lifetime*(capacity_MW*1000)*wind_load_hours); lognormal variance with pedigree 0.227, pedigree (5,5,5,5,5)
  Calculated value
  properties: lifetime 20 year
  note on lifetime: Estimation/literature value. Today, wind turbine producers often use a lifetime of 20 years for all parts of the wind turbine in their financial calculataions, even if it can be assumed that the foundation could have a longer lifetime.
- transport, freight, lorry 7.5-16 metric ton, EURO3: 3.21567e-12 metric ton*km; = ((lubricating_oil/1000)/2)*(distance*2*lifetime/(lifetime*(capacity_MW*1000)*wind_load_hours)); undefined min 2.11326e-12, max 2.11326e-12, standardDeviation95 0, pedigree (1,1,3,1,1)
  Calculated value. Two maintenance transports to the power plant with 200 km each. Once a year, the lubricating oil is transported and changed.
- wind turbine, 2MW, onshore: 1.59753e-8 unit; = 1/(lifetime*(capacity_MW*1000)*wind_load_hours); lognormal variance with pedigree 0.227, pedigree (5,5,5,5,5)
  Calculated value
  property capacity [MW] 2 MW; name capacity_MW
  property lifetime 20 year; name lifetime
- lubricating oil: 5.03223e-5 kg; name lubricating_oil; = lubricating_oil_maintenance*lifetime/(lifetime*(capacity_MW*1000)*wind_load_hours); lognormal variance with pedigree 0.002, pedigree (1,1,3,1,1)
  Calculated value/Estimation. Estimated consumption of 157.5 kg lubrication oil per year, extrapolated from the 800 kW turbine in (Burger & Bauer 2004) with the rate of capacities are assumed for maintainance.
  properties: carbon content, fossil 0.75, dry mass 1 kg, wet mass 1 kg, heating value, net 40.2 MJ
  note on carbon content, fossil: Lubricating oil is produced from diesel. C-content/dry mass of fats and oils considered 75%, from: ecoinvent v2.2 report, n 15a, pg 40
  note on heating value, net: Literature value, Source: IPCC 2006, 2006 IPCC Guidelines for National Greenhouse Gas Inventories, Prepared by the National Greenhouse Gas Inventories Programme, Eggleston H.S., Buendia L., Miwa K., Ngara T. and Tanabe K. (eds). Published: IGES, Japan
- waste mineral oil: -5.03223e-5 kg; name waste_min_oil_10; = (lubricating_oil)*-1; lognormal variance with pedigree 0.002, pedigree (1,1,3,1,1)
  Calculated value. The same amount as lubricating oil use.
  production volume 35252.4 kg; = APV_electricity* waste_min_oil_10
    Calculated from production volume of reference product using the relative outputs.
    Due to reasons of the parent-child relationship, a safety amount of 400000kg waste mineral oil was added.
  property price 0 EUR2005; name waste_min_oil_10_price_EUR2005
  properties: dry mass 0.9 kg, water content 0.111111, carbon content, fossil 0.864444, heating value, net 34.7 MJ, wet mass 1 kg
  note on carbon content, fossil: Tab A.6, ecoinvent v2.2 report 13_I. C content has been calculated after data in the tables, and then referred to 1 kg DM
  note on heating value, net: Value taken from the general comment of the treatment dataset.

## Inputs from nature
- Energy, kinetic (in wind), converted [natural resource, in air]: 3.87 MJ; undefined min 3.87, max 3.87, standardDeviation95 0, pedigree (1,1,3,1,1)

## Sampling procedure
The inventory is generated using statistical data, literature data and modelling.

## Extrapolations
This dataset has been extrapolated from year 2015 to the year of the calculation (2021). The uncertainty has been adjusted accordingly.

## Review by Karin Treyer 2017-01-06
This dataset has been produced in a project on regionalisation of the Indian electricity mix on a states level.
In general, only key parameters have been adjusted to region-specific conditions, such as the electrical efficiency or power plants own use of electricity (losses from gross to net electricity). Whenever more accurate data will be available, these should be included in this dataset.

Comment regarding the parameter "wind load hours": this parameter value is calculated by dividing the gross electricity generation (kWh) by the installed wind capacity (kW) in a certain Indian State. However, as described in the comment for the parameters "installed capacity" and "gross electricity production", no statistical values for the latter were available. Therefore, the gross electricity production value has been calculated using the total electricity production with wind power plants in India and the state-wise installed capacity value. This implies, however, that the load hours are the same in all the states, which in reality is very unlikely. Once better data are available, this shortcoming should be eliminated. As wind power only plays a minor role in the Indian States" electricity production, the imprecision is accepted for now.

## Review by Carl Vadenbo 2015-05-28
The update of the whole electricity sector for the ecoinvent v3.2 database consist of hundreds of datasets. All these datasets have passed through a streamlined review processes where the underlying modelling of production volumes, technology shares and efficiencies was reviewed in detail prior to the datasets being submitted to the database.
