# treatment of waste glass pane in burnable frame, sorting plant

Dataset: EcoSpold 2, unit process
Geography: RoW
Time period: 1994-01-01 to 2021-12-31
Technology level: current
Classification: ISIC rev.4 ecoinvent: 3830:Materials recovery
Classification: EcoSpold01Categories: waste management/building demolition
Tags: Treatment; ConvertedDataset
Scenario: Business-as-Usual
System model: Allocation, cut-off by classification
Generated by: Gabor Doka (obsolete)
Published in: Doka G. 2007
Database: ecoinvent
isCopyrightProtected: true
accessRestrictedTo: 1

## General comment
The waste contains 1kg inert material (GSD=100%) Waste density is 2500 kg/m3.
[This dataset was already contained in the ecoinvent database version 2. It was not individually updated during the transfer to ecoinvent version 3. Life Cycle Impact Assessment results may still have changed, as they are affected by changes in the supply chain, i.e. in other datasets. This dataset was generated following the ecoinvent quality guidelines for version 2. It may have been subject to central changes described in the ecoinvent version 3 change report (http://www.ecoinvent.org/database/ecoinvent-version-3/reports-of-changes/), and the results of the central updates were reviewed extensively. The changes added e.g. consistent water flows and other information throughout the database. The documentation of this dataset can be found in the ecoinvent reports of version 2, which are still available via the ecoinvent website. The change report linked above covers all central changes that were made during the conversion process.]

## Included activities end
machines for handling in sorting plant, electricity demand for sorting plant, transport to dismantling facilities, final disposal of waste material,

## Geography
Specific to the technology mix encountered in Switzerland in late 1990ies

## Technology
Building demolition with skid-steer loaders. Dry sorting plant for building wastes with pre-sorting of mixed waste, crushing and manual sorting.

## Reference product
- waste glass pane in burnable frame: -1 kg; CPC 37111: Glass in the mass, in balls (except microspheres), rods or tubes, unworked; waste and scrap of glass; By-product classification Waste
  EcoSpold01Location=CH
  production volume 2120.56 kg; = 118.8087851*18
    Production volume amount was scaled from the respective Swiss value. GDP scaling was employed with Switzerland accounting for roughly 0.8% of the global GDP.
  property heating value, net 0 MJ
    Non combustible products are assumed to have an LHV equal to zero (0).
  property price 0 EUR2005
    Waste products are assigned a price of zero as they are assumed to require further treatment.
  property carbon content 0
    carbon content on a dry matter basis (reserved; not for manual entry)
  properties: water in wet mass 0 kg, carbon content, non-fossil 0, carbon content, fossil 0, wet mass 1 kg, water content 0, dry mass 1 kg, carbon allocation 0 kg

## Inputs from technosphere
- excavation, hydraulic digger: 0.000444 m3; lognormal variance with pedigree 0.052, pedigree (1,1,5,5,1)
  EcoSpold01Location=RER
  handling in sorting plant. Uncertainty from range in literature
- sorting facility, for construction waste: 1e-10 unit; lognormal variance with pedigree 0.042, pedigree (1,1,5,5,1)
  Uncertainty heeded in exchanges, 1kg = 1kg
  EcoSpold01Location=CH
- electricity, low voltage: 0 kWh; pedigree (1,1,1,1,1)
  demand in sorting plant. Uncertainty from range in literature
  EcoSpold01Location=CH
- waste glass: 0 kg; pedigree (1,1,1,1,1)
  EcoSpold01Location=CH
  disposed masses. Uncertainty calculated from uncertainty in transfer coefficients and uncertainty of waste fractions
  production volume 0 kg
    Calculated from the production volume of waste glass pane in burnable frame in proportion to the respective output amounts.
  properties: dry mass 1 kg, wet mass 1 kg, heating value, net 0.05 MJ
  note on heating value, net: Value extracted from "treatment of waste glass, open dump, very wet infiltration class (1000mm)"
- electricity, low voltage: 2.29674e-5, 4.18192e-6, 9.44017e-5, 0.000329818, 6.73341e-5, 0.00103379, 0.00016725, 0.000480254 kWh (8 entries); lognormal variance with pedigree 0.052, pedigree (1,1,5,5,1)
  demand in sorting plant. Uncertainty from range in literature
  EcoSpold01Location=CH
- waste glass: -0.094531, -0.00871272, -0.000197662, -0.000812884, -0.00123441, -0.00363736, -0.890874 kg (7 entries); lognormal variance with pedigree 0.042, pedigree (1,1,5,5,1)
  (same comment as for waste glass)
  production volume 2138.56 kg

## Sampling procedure
waste-specific calculation based on literature data

## Extrapolations
none This dataset has been copied from an original dataset covering the geography CH. The uncertainty has been adjusted accordingly.

## Review by Niels Jungbluth 2003-05-22
Passed. Calculation for standard deviation 95 of transport services differs from standard Pedigree approach in this project and figure obtained by this procedure (2.09). Uncertainty for estimation of distance is not included.
