# maintenance, passenger car

Dataset: EcoSpold 2, unit process
Geography: RoW
Time period: 2000-01-01 to 2021-12-31
Technology level: current
Classification: EcoSpold01Categories: transport systems/road
Classification: ISIC rev.4 ecoinvent: 4520:Maintenance and repair of motor vehicles
Scenario: Business-as-Usual
System model: Allocation, cut-off by classification
Generated by: Andrew Simons
Published in: Spielmann M. 2007
Database: ecoinvent
isCopyrightProtected: true
accessRestrictedTo: 1

## General comment
This dataset represents the service of passenger car maintenance, meaning the maintenance demands over the complete lifetime of a vehicle. The exchanges represent the replacement of regular components and substances such as tyres, motor oil, coolant and battery. Disposal of these materials is also accounted for. Data are based on an LCI analysis of the Golf A4 which has a vehicle mass of 1240kg. The dataset can therefore be scaled to match the mass of the vehicle fulfilling the transport service. For use in transport datasets it is assumed that a passenger car achieves a total transport performance of 150 000 km which corresponds to approximately 10 years at an average annual use of 15 000 km.
[This dataset was already contained in the ecoinvent database version 2. It was not individually updated during the transfer to ecoinvent version 3. Life Cycle Impact Assessment results may still have changed, as they are affected by changes in the supply chain, i.e. in other datasets. This dataset was generated following the ecoinvent quality guidelines for version 2. It may have been subject to central changes described in the ecoinvent version 3 change report (http://www.ecoinvent.org/database/ecoinvent-version-3/reports-of-changes/), and the results of the central updates were reviewed extensively. The changes added e.g. consistent water flows and other information throughout the database. The documentation of this dataset can be found in the ecoinvent reports of version 2, which are still available via the ecoinvent website. The change report linked above covers all central changes that were made during the conversion process.]

## Included activities start
From replacement of vehicle components.

## Included activities end
This dataset includes electricity use at the garage, the replacement of tyres, motor oil, coolant, battery and sundry items.

The dataset does not include garage infrastructure.

## Geography
Data represent German conditions

## Technology
no technologies are specified

## Time period
Data represents maintenance of a modern vehicle

## Parameters
- annual european passenger car km: 3.14e12 km; name annual_eu_car_km
  Annual total passenger car vehicle km, taken from TREMOVE model 2.7b (2009)
- weight of the basis vehicle: 1240 kg/unit; name basis_vehicle_weight
- european to global total vkm scaling factor: 5.7 dimensionless; name global_scaling_factor

## Reference product
- passenger car maintenance: 1 unit; name RP_amount_1; By-product classification allocatable product; CPC 87141: Maintenance and repair services of motor vehicles
  production volume 9.83867e7 unit; name RP_PV_1; = (annual_eu_car_km/150000)*global_scaling_factor
    Total annual vkm in Europe (TREMOVE, 2009) divided by 150 000km per car lifetime, multiplied by RER to GLO sclaing factor for vkm.
  property price 404.562 EUR2005
    Calculated based on inputs: The price of the product has been calculated as a sum of the values of the material and energy inputs for this product. This value is therefore a rough estimation. It may underestimate the real price since there are additional expenses when producing any product. These expences can include for example labour costs, treatment of waste materials and profit for the producer. Please consider carefully whether this level of data quality is acceptable for your application.

## By-products
- scrap lead acid battery: 0 kg; source Spielmann M. 2007; By-product classification Recyclable; CPC 39364: Waste and scrap of lead; pedigree (1,1,1,1,1)
  LCI of one car
  Uncertainty: LCI of one car
  production volume 0 kg; = RP_PV_1 * (BP_amount_4 / RP_amount_1)
    Calculated from production volume of reference product using the relative outputs.
  properties: price 0 EUR2005

## Inputs from technosphere
- sulfuric acid: 1.4 kg; name acid; source Spielmann M. 2007; lognormal variance with pedigree 0.054, pedigree (1,4,5,5,1)
  EcoSpold01Location=RER
  LCI of one car
  Uncertainty: LCI of one car
  properties: wet mass 1 kg, dry mass 1 kg
- ethylene: 0 kg; name coolant; source Spielmann M. 2007; pedigree (1,1,1,1,1)
  EcoSpold01Location=RER
  LCI of one car
  Uncertainty: LCI of one car
  properties: wet mass 1 kg, dry mass 1 kg, carbon content, fossil 0.857143, heating value, net 43.22 MJ
- ethylene glycol: 2 kg; name coolant2; source Spielmann M. 2007; lognormal variance with pedigree 0.054, pedigree (1,4,5,5,1)
  EcoSpold01Location=RER
  LCI of one car
  Uncertainty: LCI of one car
  properties: heating value, net 23.44 MJ, carbon content, fossil 0.387097, wet mass 1 kg, dry mass 1 kg
- waste polyethylene: 0 kg; name BP_amount_2; source Spielmann M. 2007; pedigree (1,1,1,1,1)
  LCI of one car
  Uncertainty: LCI of one car
  production volume 0 kg
    Calculated from production volume of reference product using the relative outputs.
  property price 0 EUR2005; name BP_amount_2_price_EUR2005
  properties: heating value, net 42.47 MJ, carbon content, fossil 0.825301, dry mass 0.996 kg, water content 0.00401606, wet mass 1 kg
  note on heating value, net: Value taken from the general comment of the treatment dataset.
- steel, low-alloyed, hot rolled: 11 kg; name steel; source Spielmann M. 2007; lognormal variance with pedigree 0.054, pedigree (1,4,5,5,1)
  LCI of one car
  EcoSpold01Location=RER
  Uncertainty: LCI of one car
  properties: carbon content, fossil 0.005, dry mass 1 kg, wet mass 1 kg
  note on carbon content, fossil: Low alloyed steel composition given in Tab. 3.2 ecoinvent v2.2 report 10_partII. Steel assumed to have a C content of 0.5%
- synthetic rubber: 116 kg; name rubber; source Spielmann M. 2007; lognormal variance with pedigree 0.054, pedigree (1,4,5,5,1)
  LCI of one car
  EcoSpold01Location=RER
  Uncertainty: LCI of one car
  properties: heating value, net 26.42 MJ, wet mass 1 kg, carbon content, fossil 0.871949, dry mass 1 kg
  note on carbon content, fossil: EPDM (Ethylene-propene-diene terpolymer) rubber is a terpolymer of ethylene, propene, and a diene with the residual unsaturated portion of the diene in the side chain (ecoinvent v2.2 report 7-part XX & Ullmann). Chemical formula (deduced from Evidences of Solvent-Induced Miscibility in Polychloroprene-co-Ethylene-Propene Diene Terpolymer Blends, Dubey et al., Journal of Applied Polymer Science, 2009, 111:1884–1891): C20H35
- electricity, low voltage: 0 kWh; source Spielmann M. 2007; pedigree (1,1,1,1,1)
  LCI of one car
  EcoSpold01Location=UCTE
  Uncertainty: LCI of one car
- polyethylene terephthalate, granulate, amorphous: 5 kg; name plastic3; source Spielmann M. 2007; lognormal variance with pedigree 0.054, pedigree (1,4,5,5,1)
  Calculations of vehicle maintenance.
  5 kg of polyethylene, HDPE, granulate, at plant used per vehicle unit on the entire vehicle lifetime.
  Extrapolations: Data for Germany used as estimation for Europe.
  Uncertainty: LCI of one car
  properties: heating value, net 22.95 MJ, dry mass 1 kg, wet mass 1 kg, carbon content, fossil 0.625
- lead: 25 kg; source Spielmann M. 2007; lognormal variance with pedigree 0.054, pedigree (1,4,5,5,1)
  EcoSpold01Location=RER
  LCI of one car
  Uncertainty: LCI of one car
  properties: dry mass 1 kg, wet mass 1 kg
- waste mineral oil: -32.4 kg; name BP_amount_3; = (oil)*-1; lognormal variance with pedigree 0.0433, pedigree (2,2,5,5,1)
  4 litres per oil change. Oil change every 15000km (9 changes). 0.9 kg/litre. Information from relevant internet sites.
  production volume 3.18773e9 kg; = RP_PV_1 * (BP_amount_3 / RP_amount_1)
    Calculated from production volume of reference product using the relative outputs.
  property price 0 EUR2005; name BP_amount_3_price_EUR2005
  property wet mass 1 kg; name WM
  property dry mass 0.9 kg; name DM
  properties: carbon content, fossil 0.864444, water content 0.111111, heating value, net 34.7 MJ
  note on carbon content, fossil: Tab A.6, ecoinvent v2.2 report 13_I. C content has been calculated after data in the tables, and then referred to 1 kg DM
- polypropylene, granulate: 6 kg; name plastic2; source Spielmann M. 2007; lognormal variance with pedigree 0.054, pedigree (1,4,5,5,1)
  LCI of one car
  EcoSpold01Location=RER
  Uncertainty: LCI of one car
  properties: dry mass 1 kg, wet mass 1 kg, carbon content, fossil 0.857143, heating value, net 32.78 MJ
  note on carbon content, fossil: Polypropylene is formed by the polymerisation of propylene, C3H6 (ecoinvent v2.2 report 11_II)
  note on heating value, net: Value extracted from "treatment of waste polypropylene, open burning"
- lubricating oil: 32.4 kg; name oil; = 4*0.9*9; lognormal variance with pedigree 0.0433, pedigree (2,2,5,5,1)
  (same comment as for waste mineral oil)
  properties: heating value, net 40.2 MJ, dry mass 1 kg, wet mass 1 kg, carbon content, fossil 0.75
  note on heating value, net: Literature value, Source: IPCC 2006, 2006 IPCC Guidelines for National Greenhouse Gas Inventories, Prepared by the National Greenhouse Gas Inventories Programme, Eggleston H.S., Buendia L., Miwa K., Ngara T. and Tanabe K. (eds). Published: IGES, Japan
  note on carbon content, fossil: Lubricating oil is produced from diesel. C-content/dry mass of fats and oils considered 75%, from: ecoinvent v2.2 report, n 15a, pg 40
- used tyre: -127 kg; name usedtyre; = (steel+rubber)*-1; source Spielmann M. 2007; lognormal variance with pedigree 0.0446, pedigree (1,4,5,5,1)
  LCI of one car
  Uncertainty: LCI of one car
  production volume 1.24951e10 kg; = RP_PV_1 * (usedtyre / RP_amount_1)
    Calculated from production volume of reference product using the relative outputs.
  property price 0 EUR2005; name usedtyre_price_EUR2005
  properties: heating value, net 24.85 MJ, wet mass 1 kg, carbon content, fossil 0.82, dry mass 1 kg
  note on carbon content, fossil: http://www.calrecycle.ca.gov/publications/Tires/62095001.pdf.
- waste polyethylene/polypropylene product: -16 kg; name BP_amount_1; = (plastic+plastic2+plastic3)*-1; source Spielmann M. 2007; lognormal variance with pedigree 0.0446, pedigree (1,4,5,5,1)
  LCI of one car
  Uncertainty: LCI of one car
  production volume 1.57419e9 kg; = RP_PV_1 * (BP_amount_1 / RP_amount_1)
    Calculated from production volume of reference product using the relative outputs.
  property price 0 EUR2005; name BP_amount_1_price_EUR2005
  properties: wet mass 1 kg, dry mass 0.847 kg, heating value, net 42.47 MJ, water content 0.180638, carbon content, fossil 0.748045
- copper, cathode: 0.3 kg; name copper; source Spielmann M. 2007; lognormal variance with pedigree 0.054, pedigree (1,4,5,5,1)
  EcoSpold01Location=RER
  LCI of one car
  Uncertainty: LCI of one car
  properties: dry mass 1 kg, wet mass 1 kg
- polyethylene, high density, granulate: 5 kg; name plastic; source Spielmann M. 2007; lognormal variance with pedigree 0.054, pedigree (1,4,5,5,1)
  LCI of one car
  EcoSpold01Location=RER
  Uncertainty: LCI of one car
  properties: heating value, net 42.47 MJ, dry mass 1 kg, wet mass 1 kg, carbon content, fossil 0.857143
  note on carbon content, fossil: Polyethylene is formed out of a huge amount of ethylene monomers (C2H4) (ecoinvent v2.2 report 11_II). MW=28 g/mol
- scrap copper: -0.3 kg; name BP_amount_5; = (copper)*-1; source Spielmann M. 2007; lognormal variance with pedigree 0.0446, pedigree (1,4,5,5,1)
  LCI of one car
  Uncertainty: LCI of one car
  production volume 2.9516e7 kg; = RP_PV_1 * (BP_amount_5 / RP_amount_1)
    Calculated from production volume of reference product using the relative outputs.
  property price 0 EUR2005; name BP_amount_5_price_EUR2005
  property water content 0; name water_content
  property carbon content, non-fossil 0; name C_content_non_fossil
  property water in wet mass 0 kg; name WWM
  property carbon content, fossil 0; name C_content_fossil
  properties: dry mass 1 kg, wet mass 1 kg
- scrap lead acid battery: -26.4 kg; source Spielmann M. 2007; lognormal variance with pedigree 0.0446, pedigree (1,4,5,5,1)
  LCI of one car
  Uncertainty: LCI of one car
  production volume 2.59741e9 kg
- ethylene: 0.600073, 37.3999 kg (2 entries); source Spielmann M. 2007; lognormal variance with pedigree 0.054, pedigree (1,4,5,5,1)
  EcoSpold01Location=RER
  LCI of one car
  Uncertainty: LCI of one car
- waste polyethylene: -4.91559, -0.328441, -0.0248394, -0.135658, -0.0548042, -0.12882, -34.4118 kg (7 entries); source Spielmann M. 2007; lognormal variance with pedigree 0.0446, pedigree (1,4,5,5,1)
  LCI of one car
  Uncertainty: LCI of one car
  production volume 3.93547e9 kg
- electricity, low voltage: 7.54033, 1.37295, 22.1062, 339.401, 54.9091, 157.671 kWh (6 entries); source Spielmann M. 2007; lognormal variance with pedigree 0.054, pedigree (1,4,5,5,1)
  LCI of one car
  EcoSpold01Location=UCTE
  Uncertainty: LCI of one car

## Sampling procedure
Data is taken from LCI analysis of a Golf A4.

## Extrapolations
Data for Germany is used as an first estimate for Europe

## Review by Christian Bauer 2012-09-10
passed
