# single superphosphate production

Dataset: EcoSpold 2, unit process
Geography: RoW
Time period: 1999-01-01 to 2021-12-31
Technology level: current
Classification: ISIC rev.4 ecoinvent: 2012:Manufacture of fertilizers and nitrogen compounds
Synonyms: SSP; Superphosphat
Tags: ConvertedDataset
Scenario: Business-as-Usual
System model: Allocation, cut-off by classification
Generated by: Angelika Heil
Published in: Nemecek, T. 2007
Database: ecoinvent
isCopyrightProtected: true
accessRestrictedTo: 1

## General comment
The dataset has been scaled to represent a single superphosphate production with a P2O5 content equal to 21%.
Single superphosphate is the product of the reaction between phosphate rock and sulphuric acid. The phosphate must be converted to water-soluble monocalcium, as this process allows retention of the calcium phosphate in the product.
References: Davis J. and Haglund C. (1999) Life Cycle Inventory (LCI) of Fertiliser Production - fertiliser products used in Sweden and Western Europe. Chalmers University of Technology, Gothenburg, Sweden, SIK-report no. 654.
Nemecek T. & Kägi T. (2007) Life Cycle Inventories of Swiss and European Agricultural Production Systems. Final report ecoinvent V2.0 No. 15a. Agroscope Reckenholz-Taenikon Research Station ART, Swiss Centre for Life Cycle Inventories, Zurich and Dübendorf, CH, retrieved from: www.ecoinvent.ch.

## Included activities end
The unit process inventory takes into account the production of single superphosphate from sulphuric acid and rock phosphate. Transports of raw materials and intermediate products to the fertiliser plant were included as well as the transport of the fertiliser product from the factory to the regional department store. Production and waste treatment of catalysts, coating and packaging of the final fertiliser products were not included. Infrastructure was included by means of a proxy module.

## Geography
This dataset is a weighted average built from the following geographies: RER.

## Time period
Year when reference used for this inventory was published.

## Reference product
- single superphosphate: 1 kg; CPC 34621: Superphosphate; By-product classification allocatable product; CAS 8011-76-5
  The exchange has been scaled to represent the production of single superphosphate instead of a pure form of P2O5. The exchange has been divided with the scaling key of circa 4.76 kg of single superphosphate per kg of P2O5. Original amount of the exchange was: 1 kg of inorganic phosphorus fertiliser, as P2O5.
  production volume 8.97912e9 kg; = 12300158.72*1000
    Estimated value. Based on data from FAO, the global agricultural use of 'Superphosphates, other' amounts to 12300158.72 t.
    References: Fertilizers by Product, FAOSTAT, 2020, Food and Agricultural Organization of the United Nations. Accessed at: http://www.fao.org/faostat/en/#data/RFB, on 12 of May 2020.
  property price 0.304849 EUR2005
    Calculated based on inputs: The price of the product has been calculated as a sum of the values of the material and energy inputs for this product. This value is therefore a rough estimation. It may underestimate the real price since there are additional expenses when producing any product. These expences can include for example labour costs, treatment of waste materials and profit for the producer. Please consider carefully whether this level of data quality is acceptable for your application.
  property carbon content 0
    carbon content on a dry matter basis (reserved; not for manual entry)
  properties: carbon content, fossil 0, water content 0, phosphorus content 0.0916484, carbon content, non-fossil 0, dry mass 1 kg, water in wet mass 0 kg, wet mass 1 kg, carbon allocation 0 kg

## Inputs from technosphere
- electricity, medium voltage: 0 kWh; pedigree (1,1,1,1,1)
  The exchange has been scaled to represent the production of single superphosphate instead of a pure form of P2O5. The exchange has been divided with the scaling key of circa 4.76 kg of single superphosphate per kg of P2O5. Original amount of the exchange was: 1.85 kWh
- chemical factory, organics: 3.99e-10 unit; lognormal variance with pedigree 0.3426, pedigree (2,1,5,5,1)
  The exchange has been scaled to represent the production of single superphosphate instead of a pure form of P2O5. The exchange has been divided with the scaling key of circa 4.76 kg of single superphosphate per kg of P2O5. Original amount of the exchange was: 0.0000000019 unit
- sulfuric acid: 0.3675 kg; lognormal variance with pedigree 0.0426, pedigree (2,1,5,5,1)
  The exchange has been scaled to represent the production of single superphosphate instead of a pure form of P2O5. The exchange has been divided with the scaling key of circa 4.76 kg of single superphosphate per kg of P2O5. Original amount of the exchange was: 1.75 kg
  properties: wet mass 1 kg, dry mass 1 kg
- phosphate rock, beneficiated: 0 kg; pedigree (1,1,1,1,1)
  The exchange has been scaled to represent the production of single superphosphate instead of a pure form of P2O5. The exchange has been scaled to provide the sufficient amount of P in the phosphorus rock, beneficiated.
  properties: dry mass 1 kg, wet mass 1 kg
- electricity, medium voltage: 0.00489712, 0.000939056, 0.0157648, 0.229285, 0.0323178, 0.105296 kWh (6 entries); lognormal variance with pedigree 0.0426, pedigree (2,1,5,5,1)
  (same comment as for electricity, medium voltage)
- phosphate rock, beneficiated: 0.00848692, 0.00848692, 0.639276 kg (3 entries); lognormal variance with pedigree 0.0426, pedigree (2,1,5,5,1)
  (same comment as for phosphate rock, beneficiated)

## Emissions to nature
- Cadmium, ion [water, surface water]: 9.24e-7 kg; lognormal variance with pedigree 0.7112, pedigree (2,3,5,5,3)
  The exchange has been scaled to represent the production of single superphosphate instead of a pure form of P2O5. The exchange has been divided with the scaling key of circa 4.76 kg of single superphosphate per kg of P2O5. Original amount of the exchange was: 0.0000044 kg
- Chromium, ion [water, surface water]: 4.62e-6 kg; lognormal variance with pedigree 0.7112, pedigree (2,3,5,5,3)
  The exchange has been scaled to represent the production of single superphosphate instead of a pure form of P2O5. The exchange has been divided with the scaling key of circa 4.76 kg of single superphosphate per kg of P2O5. Original amount of the exchange was: 0.000022 kg
- Lead [water, surface water]: 3.99e-6 kg; lognormal variance with pedigree 0.7112, pedigree (2,3,5,5,3)
  The exchange has been scaled to represent the production of single superphosphate instead of a pure form of P2O5. The exchange has been divided with the scaling key of circa 4.76 kg of single superphosphate per kg of P2O5. Original amount of the exchange was: 0.000019 kg
- Particulates, < 2.5 um [air, urban air close to ground]: 0.00012999 kg; lognormal variance with pedigree 0.3712, pedigree (2,3,5,5,3)
  The exchange has been scaled to represent the production of single superphosphate instead of a pure form of P2O5. The exchange has been divided with the scaling key of circa 4.76 kg of single superphosphate per kg of P2O5. Original amount of the exchange was: 0.000619 kg
- Nickel, ion [water, surface water]: 3.57e-6 kg; lognormal variance with pedigree 0.7112, pedigree (2,3,5,5,3)
  The exchange has been scaled to represent the production of single superphosphate instead of a pure form of P2O5. The exchange has been divided with the scaling key of circa 4.76 kg of single superphosphate per kg of P2O5. Original amount of the exchange was: 0.000017 kg
- Hydrogen fluoride [air, urban air close to ground]: 2.205e-5 kg; lognormal variance with pedigree 0.1112, pedigree (2,3,5,5,3)
  The exchange has been scaled to represent the production of single superphosphate instead of a pure form of P2O5. The exchange has been divided with the scaling key of circa 4.76 kg of single superphosphate per kg of P2O5. Original amount of the exchange was: 0.000105 kg
- Zinc, ion [water, surface water]: 5.46e-6 kg; lognormal variance with pedigree 0.7112, pedigree (2,3,5,5,3)
  The exchange has been scaled to represent the production of single superphosphate instead of a pure form of P2O5. The exchange has been divided with the scaling key of circa 4.76 kg of single superphosphate per kg of P2O5. Original amount of the exchange was: 0.000026 kg
- Particulates, > 10 um [air, urban air close to ground]: 0.0002604 kg; lognormal variance with pedigree 0.1112, pedigree (2,3,5,5,3)
  The exchange has been scaled to represent the production of single superphosphate instead of a pure form of P2O5. The exchange has been divided with the scaling key of circa 4.76 kg of single superphosphate per kg of P2O5. Original amount of the exchange was: 0.00124 kg
- Arsenic, ion [water, surface water]: 9.24e-7 kg; lognormal variance with pedigree 0.7112, pedigree (2,3,5,5,3)
  (same comment as for Cadmium, ion)
- Copper, ion [water, surface water]: 4.62e-6 kg; lognormal variance with pedigree 0.7112, pedigree (2,3,5,5,3)
  (same comment as for Chromium, ion)
- Particulates, > 2.5 um, and < 10um [air, urban air close to ground]: 0.0002604 kg; lognormal variance with pedigree 0.1812, pedigree (2,3,5,5,3)
  (same comment as for Particulates, > 10 um)
- Phosphate [water, surface water]: 0.0009282 kg; lognormal variance with pedigree 0.1112, pedigree (2,3,5,5,3)
  The exchange has been scaled to represent the production of single superphosphate instead of a pure form of P2O5. The exchange has been divided with the scaling key of circa 4.76 kg of single superphosphate per kg of P2O5. Original amount of the exchange was: 0.00442 kg
- Mercury [water, surface water]: 8.82e-7 kg; lognormal variance with pedigree 0.7112, pedigree (2,3,5,5,3)
  The exchange has been scaled to represent the production of single superphosphate instead of a pure form of P2O5. The exchange has been divided with the scaling key of circa 4.76 kg of single superphosphate per kg of P2O5. Original amount of the exchange was: 0.0000042 kg

## Sampling procedure
Values given in the reference originate from manufacturers and/or other data sources which in turn refer to the real situation and hence are largely secured. However, the emissions factors may be somewhat uncertain. When no information on the speciation of P- and F -emissions was given in the reference, the most likely speciation was assessed by an expert. For particulate emissions factors into the air specified only as the total particle mass in the reference, particle size distribution was assessed based on an expert's guess.

## Extrapolations
This dataset has been copied from an original dataset covering the geography RER. The uncertainty has been adjusted accordingly.
