# sulfite production

Dataset: EcoSpold 2, unit process
Geography: RER
Time period: 1997-01-01 to 2021-12-31
Technology level: current
Classification: ISIC rev.4 ecoinvent: 2011:Manufacture of basic chemicals
Classification: EcoSpold01Categories: chemicals/inorganics
Tags: ConvertedDataset
Scenario: Business-as-Usual
System model: Allocation, cut-off by classification
Generated by: Mike Chudacoff
Published in: Althaus H.-J. 2007
Database: ecoinvent
isCopyrightProtected: true
accessRestrictedTo: 1

## General comment
This inventory is based on industry sources and is meant as a rough approximation. Precursors, transports and infrastructure are included.
[This dataset was already contained in the ecoinvent database version 2. It was not individually updated during the transfer to ecoinvent version 3. Life Cycle Impact Assessment results may still have changed, as they are affected by changes in the supply chain, i.e. in other datasets. This dataset was generated following the ecoinvent quality guidelines for version 2. It may have been subject to central changes described in the ecoinvent version 3 change report (http://www.ecoinvent.org/database/ecoinvent-version-3/reports-of-changes/), and the results of the central updates were reviewed extensively. The changes added e.g. consistent water flows and other information throughout the database. The documentation of this dataset can be found in the ecoinvent reports of version 2, which are still available via the ecoinvent website. The change report linked above covers all central changes that were made during the conversion process.]

## Included activities end
includes precursors, transports and infrastructure

## Geography
RER

## Technology
represents a current cross-section of actual plants in Europe

## Reference product
- sulfite: 1 kg; CPC 34: Basic chemicals; By-product classification allocatable product; CAS 14265-45-3
  EcoSpold01Location=RER
  production volume 1.32237 kg
    This is a placeholder value that does not reflect real-world production volumes. This dataset does not currently require a real-world production volume to work in the database framework, and no actual data were collected yet. This has no negative effect on the results of the ecoinvent database. The placeholder value of this activity was scaled according to the nominal GDP of 2005 (source: United Nations, http://data.un.org/Glossary.aspx?q=GDP+%28current+US%24%29, accessed 20130726) to reflect an appropriate share of the global production volume, which is also a placeholder value.
  property price 0.458997 EUR2005
    Calculated based on inputs: The price of the product has been calculated as a sum of the values of the material and energy inputs for this product. This value is therefore a rough estimation. It may underestimate the real price since there are additional expenses when producing any product. These expences can include for example labour costs, treatment of waste materials and profit for the producer. Please consider carefully whether this level of data quality is acceptable for your application.
  property carbon content 0
    carbon content on a dry matter basis (reserved; not for manual entry)
  properties: carbon content, non-fossil 0, dry mass 1 kg, water in wet mass 0 kg, water content 0, carbon content, fossil 0, wet mass 1 kg, carbon allocation 0 kg

## Inputs from technosphere
- electricity, medium voltage: 0.298584 kWh; lognormal variance with pedigree 0.1561, pedigree (4,5,5,3,4)
  EcoSpold01Location=UCTE
  Electricity
  Uncertainty: electricity
- sulfur dioxide, liquid: 0.51 kg; lognormal variance with pedigree 0.1561, pedigree (4,5,5,3,4)
  EcoSpold01Location=RER
  Precursor
  Uncertainty: precursor
  properties: wet mass 1 kg, dry mass 1 kg
- sodium hydroxide, without water, in 50% solution state: 0.64 kg; lognormal variance with pedigree 0.1561, pedigree (4,5,5,3,4)
  Precursor
  EcoSpold01Location=RER
  Uncertainty: precursor
  properties: wet mass 1 kg, heating value, net 3.03 MJ, dry mass 1 kg
- heat, district or industrial, natural gas: 1.748 MJ; lognormal variance with pedigree 0.1561, pedigree (4,5,5,3,4)
  Uncertainty: heat
  properties: heating value, net 1 MJ
- chemical factory, organics: 4e-10 unit; lognormal variance with pedigree 0.0508, pedigree (2,2,5,3,1)
  EcoSpold01Location=RER
  Infrastructure
  Uncertainty: infrastructure
- heat, district or industrial, other than natural gas: 0.97566 MJ; lognormal variance with pedigree 0.1561, pedigree (4,5,5,3,4)
  Uncertainty: heat
  properties: heating value, net 1 MJ

## Extrapolations
This dataset has been extrapolated from year 2000 to the year of the calculation (2021). The uncertainty has been adjusted accordingly.

## Review by Heiko Kunst 2003-07-06
Passed.
