# tin plating, pieces

Dataset: EcoSpold 2, unit process
Geography: RoW
Time period: 2001-01-01 to 2021-12-31
Technology level: current
Classification: ISIC rev.4 ecoinvent: 2592:Treatment and coating of metals; machining
Classification: EcoSpold01Categories: metals/processing
Tags: ConvertedDataset
Scenario: Business-as-Usual
System model: Allocation, cut-off by classification
Generated by: Martin Lehmann
Published in: Kellenberger D. 2007
Database: ecoinvent
isCopyrightProtected: true
accessRestrictedTo: 1

## General comment
The dataset can be applied for the tin plating process of steel, preferably of chromium steel (18/8).
[This dataset was already contained in the ecoinvent database version 2. It was not individually updated during the transfer to ecoinvent version 3. Life Cycle Impact Assessment results may still have changed, as they are affected by changes in the supply chain, i.e. in other datasets. This dataset was generated following the ecoinvent quality guidelines for version 2. It may have been subject to central changes described in the ecoinvent version 3 change report (http://www.ecoinvent.org/database/ecoinvent-version-3/reports-of-changes/), and the results of the central updates were reviewed extensively. The changes added e.g. consistent water flows and other information throughout the database. The documentation of this dataset can be found in the ecoinvent reports of version 2, which are still available via the ecoinvent website. The change report linked above covers all central changes that were made during the conversion process.]

## Included activities end
The dataset describes the tin plating process of chromium steel. Included processes are degreasing, electrolytic degreasing, pickling, stripping, fluxing and rinsing. The treatment of the resulting waste water is also inventoried, as well as the transportation of materials by a 32t lorry. The infrastructure is approximated with a steel rolling mill.

## Geography
Data from an established galvanising company in Central Europe. Data applicable for Europe.

## Technology
Tin plating of chromium steel sheet, including processes of tin plating and sheet rolling.

## Parameters
- fraction, process water, to air: 0.15 dimensionless; name fraction_PW_to_air; lognormal variance with pedigree 0.092025, pedigree (4,4,3,2,4)
  Literature value (Statistics Canada, 2007 & Shaffer, K.H., 2008, Consumptive water use in the Great Lakes Basin, USGS) (Vionnet, S., Quantis Water Database - Technical Report, 2012).
- fraction, water, deionised, to air: 0.15 dimensionless; name fraction_WDI_to_air; = fraction_PW_to_air; lognormal variance with pedigree 0.092025, pedigree (4,4,3,2,4)
  Calculated value. See comment in the other parametres present in this dataset. Deionised water is considered to be always used as process water, thus process water fractions to air are applied to all deionised water input flows to calculate the amount of water consumed in the processes.

## Reference product
- tin plating, pieces: 1 m2; CPC 88731: Metal treatment and coating services; By-product classification allocatable product
  EcoSpold01Location=RER
  production volume 2.67763 m2
    This is a placeholder value that does not reflect real-world production volumes. This dataset does not currently require a real-world production volume to work in the database framework, and no actual data were collected yet. This has no negative effect on the results of the ecoinvent database.
  property price 0.870245 EUR2005
    Calculated based on inputs: The price of the product has been calculated as a sum of the values of the material and energy inputs for this product. This value is therefore a rough estimation. It may underestimate the real price since there are additional expenses when producing any product. These expences can include for example labour costs, treatment of waste materials and profit for the producer. Please consider carefully whether this level of data quality is acceptable for your application.

## Inputs from technosphere
- water, deionised: 3.33 kg; name water_deionised_input; lognormal variance with pedigree 0.0606, pedigree (2,5,5,5,1)
  EcoSpold01Location=CH
  properties: wet mass 1 kg
- waste mineral oil: -0.00267 kg; lognormal variance with pedigree 0.1, pedigree (1,5,5,5,1)
  EcoSpold01Location=CH
  production volume 0.00801 kg
    Calculated from the production volume of tin plating, pieces in proportion to the respective output amounts.
  properties: heating value, net 34.7 MJ, water content 0.111111, dry mass 0.9 kg, carbon content, fossil 0.864444, wet mass 1 kg
  note on heating value, net: Value taken from the general comment of the treatment dataset.
  note on carbon content, fossil: Tab A.6, ecoinvent v2.2 report 13_I. C content has been calculated after data in the tables, and then referred to 1 kg DM
- sodium hydroxide, without water, in 50% solution state: 0.00633 kg; lognormal variance with pedigree 0.162, pedigree (1,1,5,5,1)
  calculated from max value assuming lognormal distribution
  EcoSpold01Location=RER
  properties: dry mass 1 kg, wet mass 1 kg, heating value, net 3.03 MJ
- hydrochloric acid, without water, in 30% solution state: 0.42 kg; lognormal variance with pedigree 0.142, pedigree (1,1,5,5,1)
  composite
  EcoSpold01Location=RER
  properties: wet mass 1 kg, heating value, net 3.32 MJ, dry mass 1 kg
- rolling mill: 2.71e-12 unit; lognormal variance with pedigree 0.386, pedigree (4,5,5,5,3)
  EcoSpold01Location=RER
- electricity, medium voltage: 0 kWh; pedigree (1,1,1,1,1)
  composite
  EcoSpold01Location=UCTE
- nickel, class 1: 1.78e-5 kg; lognormal variance with pedigree 0.0546, pedigree (2,4,5,5,1)
  EcoSpold01Location=GLO
  properties: wet mass 1 kg, dry mass 1 kg
- sludge from steel rolling: -0.00151 kg; lognormal variance with pedigree 0.0606, pedigree (2,5,5,5,1)
  EcoSpold01Location=CH
  production volume 0.00453 kg
    (same comment as for waste mineral oil)
  properties: water content 0.25, carbon content, fossil 0.0123943, dry mass 0.8 kg, wet mass 1 kg
- aluminium sulfate, powder: 1.51e-5 kg; lognormal variance with pedigree 0.0606, pedigree (2,5,5,5,1)
  EcoSpold01Location=RER
  properties: dry mass 1 kg, wet mass 1 kg
- heat, district or industrial, other than natural gas: 0 MJ; pedigree (1,1,1,1,1)
  composite
  EcoSpold01Location=RER
  properties: heating value, net 1 MJ
- chemical, organic: 0.00167 kg; lognormal variance with pedigree 0.162, pedigree (1,1,5,5,1)
  calculated from max value assuming lognormal distribution
  EcoSpold01Location=GLO
  properties: carbon content, fossil 0.628, wet mass 1 kg, dry mass 1 kg, heating value, net 19.03 MJ
  note on carbon content, fossil: This dataset is an unweighted average of 20 organic substances (listed in Tab 88.1, ecoinvent v2.2 report 8, part II), being part of the top100 chemicals included in this database. The C-content has also been calculated as an unweighted average of the C content of the substances composing this dataset.
- chemical, inorganic: 0.025 kg; lognormal variance with pedigree 0.056, pedigree (3,4,5,5,1)
  EcoSpold01Location=GLO
  properties: carbon content, fossil 0.003, dry mass 1 kg, wet mass 1 kg
  note on carbon content, fossil: This dataset is an unweighted average of 20 inorganic substances (listed in Tab 88.1, ecoinvent v2.2 report 8, part II), being part of the top100 chemicals included in this database. The C-content has also been calculated as an unweighted average of the C content of the substances composing this dataset.
- ammonia, anhydrous, liquid: 0 kg; pedigree (1,1,1,1,1)
  EcoSpold01Location=RER
  properties: dry mass 1 kg, wet mass 1 kg
- tin: 0.0365 kg; lognormal variance with pedigree 0.0546, pedigree (2,4,5,5,1)
  EcoSpold01Location=RER
  properties: dry mass 1 kg, wet mass 1 kg
- heat, district or industrial, natural gas: 0 MJ; pedigree (1,1,1,1,1)
  calculated from max value assuming lognormal distribution
  EcoSpold01Location=RER
  properties: heating value, net 1 MJ
- soda ash, light, crystalline, heptahydrate: 0.00167 kg; lognormal variance with pedigree 0.18, pedigree (1,5,5,5,1)
  EcoSpold01Location=RER
  properties: heating value, net 3.43 MJ, carbon content, fossil 0.0517241, wet mass 1 kg, dry mass 1 kg
- electricity, medium voltage: 0.00430728, 0.000825951, 0.013866, 0.201668, 0.0284253, 0.0926138 kWh (6 entries); lognormal variance with pedigree 0.262, pedigree (1,1,5,5,1)
  composite
  EcoSpold01Location=UCTE
- heat, district or industrial, other than natural gas: 0.00524602, 12.9369 MJ (2 entries); lognormal variance with pedigree 0.222, pedigree (1,1,5,5,1)
  composite
  EcoSpold01Location=RER
- ammonia, anhydrous, liquid: 0.000106903, 9.18956e-6, 1.42966e-5, 2.83266e-5, 2.77526e-5, 2.90877e-6, 1.30033e-5, 0.00030762 kg (8 entries); lognormal variance with pedigree 0.06, pedigree (1,5,5,5,1)
  EcoSpold01Location=RER
- heat, district or industrial, natural gas: 0.18919, 12.2754 MJ (2 entries); lognormal variance with pedigree 0.222, pedigree (1,1,5,5,1)
  calculated from max value assuming lognormal distribution
  EcoSpold01Location=RER

## Inputs from nature
- Water, unspecified natural origin [natural resource, in water]: 0.00085 m3; name water_UNO_input; lognormal variance with pedigree 0.162, pedigree (1,1,5,5,1)
  composite

## Emissions to nature
- NMVOC, non-methane volatile organic compounds, unspecified origin [air, unspecified]: 2.5e-5 kg; lognormal variance with pedigree 0.176, pedigree (3,4,5,5,1)
- Nickel, ion [water, unspecified]: 1.67e-8 kg; lognormal variance with pedigree 0.7006, pedigree (2,5,5,5,1)
- Cadmium [air, unspecified]: 2.18e-8 kg; lognormal variance with pedigree 0.1, pedigree (1,5,5,5,1)
- Chromium VI [water, unspecified]: 1.67e-8 kg; lognormal variance with pedigree 0.7006, pedigree (2,5,5,5,1)
- Water [water, unspecified]: 0.003553 m3; name water_to_water_unspecified; lognormal variance with pedigree 0.0827, pedigree (2,2,5,5,1)
  Calculated value based on literature values and expert opinion. See comments in the parametres' comment field.
  property carbon content, non-fossil 0; name C_content_non_fossil
  property carbon content, fossil 0; name C_content_fossil
  property fraction, origin: fresh water 0.796651; name fraction_origin_fresh_water_Ww
  property fraction, origin: salt water 0; name fraction_origin_salt_water_Ww
  property fraction, origin: unspecified 0.203349; name fraction_origin_unspecified_Ww
  property wet mass 1000 kg; name WM
  property water in wet mass 1000 kg; name WWM
  property dry mass 0 kg; name DM
- Lead [water, unspecified]: 2.51e-8 kg; lognormal variance with pedigree 0.7006, pedigree (2,5,5,5,1)
- Water [air, unspecified]: 0.000627 m3; name water_to_air_unspecified; lognormal variance with pedigree 0.0827, pedigree (2,2,5,5,1)
  (same comment as for Water)
  property fraction, origin: unspecified 0.203349; name fraction_origin_unspecified
  property fraction, origin: fresh water 0.796651; name fraction_origin_fresh_water
  property fraction, origin: salt water 0; name fraction_origin_salt_water
- Hydrocarbons, unspecified [water, unspecified]: 1.98e-6 kg; lognormal variance with pedigree 0.3606, pedigree (2,5,5,5,1)
- Particulates, > 2.5 um, and < 10um [air, unspecified]: 7.72e-5 kg; lognormal variance with pedigree 0.18, pedigree (1,5,5,5,1)
- Arsenic [air, unspecified]: 3.16e-9 kg; lognormal variance with pedigree 0.1, pedigree (1,5,5,5,1)
- Suspended solids, unspecified [water, unspecified]: 3.74e-6 kg; lognormal variance with pedigree 0.1006, pedigree (2,5,5,5,1)
- Oils, unspecified [water, unspecified]: 1.73e-6 kg; lognormal variance with pedigree 0.1006, pedigree (2,5,5,5,1)
- Iron [air, unspecified]: 2.33e-5 kg; lognormal variance with pedigree 0.1, pedigree (1,5,5,5,1)
- Phosphorus [water, unspecified]: 1.5e-6 kg; lognormal variance with pedigree 0.1006, pedigree (2,5,5,5,1)
- Tin, ion [water, unspecified]: 1.1e-7 kg; lognormal variance with pedigree 0.7006, pedigree (2,5,5,5,1)
- Zinc, ion [water, unspecified]: 3.16e-5 kg; lognormal variance with pedigree 0.092, pedigree (1,1,5,5,1)
  composite
- Lead [air, unspecified]: 5.67e-8 kg; lognormal variance with pedigree 0.1, pedigree (1,5,5,5,1)
- Hydrogen chloride [air, unspecified]: 0.000205 kg; lognormal variance with pedigree 0.172, pedigree (1,1,5,5,1)
  composite
- Particulates, > 10 um [air, unspecified]: 2.58e-5 kg; lognormal variance with pedigree 0.1, pedigree (1,5,5,5,1)
- Iron, ion [water, unspecified]: 9.42e-5 kg; lognormal variance with pedigree 0.092, pedigree (1,1,5,5,1)
  composite
- Hydrogen [air, unspecified]: 5e-5 kg; lognormal variance with pedigree 0.162, pedigree (1,1,5,5,1)
  calculated from max value assuming lognormal distribution
- TOC, Total Organic Carbon [water, unspecified]: 4.95e-6 kg; lognormal variance with pedigree 0.1006, pedigree (2,5,5,5,1)
- Zinc [air, unspecified]: 1.12e-5 kg; lognormal variance with pedigree 0.1, pedigree (1,5,5,5,1)
- COD, Chemical Oxygen Demand [water, unspecified]: 0.00022 kg; lognormal variance with pedigree 0.1006, pedigree (2,5,5,5,1)
- Chloride [water, unspecified]: 3.13e-5 kg; lognormal variance with pedigree 0.1, pedigree (1,5,5,5,1)
- Chromium, ion [water, unspecified]: 1.1e-7 kg; lognormal variance with pedigree 0.7006, pedigree (2,5,5,5,1)
- DOC, Dissolved Organic Carbon [water, unspecified]: 4.95e-6 kg; lognormal variance with pedigree 0.36, pedigree (5,5,5,5,5)
- Ammonia [air, unspecified]: 0.000727 kg; lognormal variance with pedigree 0.18, pedigree (1,5,5,5,1)
- BOD5, Biological Oxygen Demand [water, unspecified]: 0.00022 kg; lognormal variance with pedigree 0.37, pedigree (5,5,5,5,5)

## Sampling procedure
Literature mainly

## Extrapolations
see Geography This dataset has been copied from an original dataset covering the geography RER. The uncertainty has been adjusted accordingly.

## Review by Rolf Frischknecht 2007-11-07
passed
