# butene production, mixed

Dataset: EcoSpold 2, unit process
Geography: RER
Time period: 1997-01-01 to 2021-12-31
Technology level: current
Classification: ISIC rev.4 ecoinvent: 1920:Manufacture of refined petroleum products
Classification: EcoSpold01Categories: plastics/monomers
Synonyms: 1-butene; isobutene; cis-2-butene; trans-2-butene; Isobutan; cis-2-Butan; 1-Butan; trans-2-Butan
Tags: ConvertedDataset
Scenario: Business-as-Usual
System model: Allocation, cut-off by classification
Generated by: Roland Hischier
Published in: Hischier R. 2007
Database: ecoinvent
isCopyrightProtected: true
accessRestrictedTo: 1

## General comment
Data are derived from the Eco-profiles of the European plastics industry (PlasticsEurope). Not included are the values reported for: recyclable wastes, amount of air / N2 / O2 consumed, unspecified metal emission to air and to water, mercaptan emission to air, unspecified CFC/HCFC emission to air, dioxin to water. The amount of "sulphur (bonded)" is assumed to be included into the amount of raw oil.
[This dataset was already contained in the ecoinvent database version 2. It was not individually updated during the transfer to ecoinvent version 3. Life Cycle Impact Assessment results may still have changed, as they are affected by changes in the supply chain, i.e. in other datasets. This dataset was generated following the ecoinvent quality guidelines for version 2. It may have been subject to central changes described in the ecoinvent version 3 change report (http://www.ecoinvent.org/database/ecoinvent-version-3/reports-of-changes/), and the results of the central updates were reviewed extensively. The changes added e.g. consistent water flows and other information throughout the database. The documentation of this dataset can be found in the ecoinvent reports of version 2, which are still available via the ecoinvent website. The change report linked above covers all central changes that were made during the conversion process.]

## Included activities end
Aggregated data for all processes from raw material extraction until delivery at plant

## Geography
19 European production sites

## Technology
product out of steam cracking of naphtha

## Time period
time to which data refer

## Parameters
- fraction, process water, to air: 0.205 dimensionless; name fraction_PW_to_air; lognormal variance with pedigree 0.092025, pedigree (4,4,3,2,4)
  Literature value (Statistics Canada, 2007 & Shaffer, K.H., 2008, Consumptive water use in the Great Lakes Basin, USGS) (Vionnet, S., Quantis Water Database - Technical Report, 2012).
- fraction, cooling water, to air: 0.3875 dimensionless; name fraction_CW_to_air; = (0.5*fraction_CW_OT_to_air)+(0.5*fraction_CW_R_to_air); lognormal variance with pedigree 0.092025, pedigree (4,4,3,2,4)
  Calculated value based on literature value (see comments of the other parametres present in this dataset) and expert opinion. In the case when no industry/literature data are available about the type of cooling or directly fraction, cooling water, to air specific for the process a default assumption is applied. It is assumed that the once-through cooling system is used in 50% of all cases and recirculating system is used in another 50% of all cases.
- fraction, cooling water, recirculating system, to air: 0.771 dimensionless; name fraction_CW_R_to_air; lognormal variance with pedigree 0.0413, pedigree (2,3,1,3,1)
  Calculated based on literature value (Scown, C.D., 2011, Water Footprint of U.S. Transportation Fuels and supplying information of the article) (Vionnet, S., Quantis Water Database - Technical Report, 2012).
- fraction, cooling water, once-through system, to air: 0.004 dimensionless; name fraction_CW_OT_to_air; lognormal variance with pedigree 0.0413, pedigree (2,3,1,3,1)
  (same comment as for fraction, cooling water, recirculating system, to air)
- fraction, cooling water, cooling pond system, to air: 0.032 dimensionless; name fraction_CW_CP_to_air; lognormal variance with pedigree 0.0413, pedigree (2,3,1,3,1)
  (same comment as for fraction, cooling water, recirculating system, to air)

## Reference product
- butene, mixed: 1 kg; name butane_RP; CPC 33421: Ethylene, propylene, butylene, butadiene; By-product classification allocatable product; CAS 106-98-9
  EcoSpold01Location=RER
  production volume 1.32237 kg; name butane_RP_PV
    This is a placeholder value that does not reflect real-world production volumes. This dataset does not currently require a real-world production volume to work in the database framework, and no actual data were collected yet. This has no negative effect on the results of the ecoinvent database. The placeholder value of this activity was scaled according to the nominal GDP of 2005 (source: United Nations, http://data.un.org/Glossary.aspx?q=GDP+%28current+US%24%29, accessed 20130726) to reflect an appropriate share of the global production volume, which is also a placeholder value.
  property carbon content, fossil 0.857143
    With mixed butenes, the four isomers 1-butene, cis-2-butene, trans-2-butene and isobutene are summed up. They are unsaturated olefinic hydrocarbons with the formula C4H8 (ecoinvent v2.2 report 11_II). MW=56
  property price 0.65 EUR2005
    From UN trade database. http://data.un.org/ Commodity: 'Butene (butylene) and isomers thereof' Import data from the largest economies of the world are used (Brazil, India, USA, China, Japan and EU-27).
  property heating value, net 45.3 MJ
    Indicative value. Reference: Fuels - Higher and Lower Calorific Values, available at: https://www.engineeringtoolbox.com/fuels-higher-calorific-values-d_169.html
  property carbon content 0.857143
    carbon content on a dry matter basis (reserved; not for manual entry)
  properties: dry mass 1 kg, carbon content, non-fossil 0, water in wet mass 0 kg, wet mass 1 kg, water content 0, carbon allocation 0.857143 kg

## Inputs from technosphere
- average incineration residue: -0.0047039 kg; name ByP_01
  Uncertainty for LCI results cannot be determined
  EcoSpold01Location=CH
  production volume 0.00622029 kg; = ByP_01/ butane_RP* butane_RP_PV
    Calculated from the production volume of butene, mixed in proportion to the respective output amounts.
  property price 0 EUR2005; name ByP_01_price_EUR2005
  properties: carbon content, non-fossil 0.0511208, dry mass 1 kg, wet mass 1 kg, carbon content, fossil 0.0325466
  note on carbon content, non-fossil: Tab A.1, ecoinvent v2.2 report 13_I. It is considered that 61.1% of the C has a biogenic origin
- municipal solid waste: -0.0016687 kg; name ByP_08
  Uncertainty for LCI results cannot be determined
  EcoSpold01Location=CH
  production volume 0.00220664 kg; = ByP_08/ butane_RP* butane_RP_PV
    (same comment as for average incineration residue)
  properties: wet mass 1 kg, heating value, net 11.74 MJ, carbon content, fossil 0.171549, carbon content, non-fossil 0.261655, water content 0.297017, dry mass 0.771 kg
  note on heating value, net: Value taken from the general comment of the treatment dataset.
  note on carbon content, fossil: MSW composition in tab 4.1, ecoinvent v2.2 report 13_I. C content referred to 1 kg DM
- hazardous waste, for incineration: 0 kg; name ByP_07
  EcoSpold01Location=CH
  Uncertainty for LCI results cannot be determined
  production volume 0 kg
    (same comment as for average incineration residue)
  property price 0 EUR2005; name ByP_07_price_EUR2005
  properties: heating value, net 17 MJ, water content 0.333333, carbon content, fossil 0.554667, wet mass 1 kg, dry mass 0.75 kg
  note on carbon content, fossil: Tab A.6, ecoinvent v2.2 report 13_I. C content has been calculated after data in the tables, and then referred to 1 kg DM
- decommissioned chemical production facilities: -7.7507e-10 kg; name ByP_06
  EcoSpold01Location=RER
  Uncertainty for LCI results cannot be determined
  production volume 1.02493e-9 kg; = ByP_06/ butane_RP* butane_RP_PV
    (same comment as for average incineration residue)
  property price 0 EUR2005; name ByP_06_price_EUR2005
  properties: wet mass 1 kg, carbon content, fossil 0.0169382, dry mass 1 kg, carbon content, non-fossil 5.78006e-6
  note on carbon content, fossil: Calculated from C content in input materials in the infrastructure
- spoil from hard coal mining: -0.010101 kg; name ByP_05
  EcoSpold01Location=GLO
  Uncertainty for LCI results cannot be determined
  production volume 0.0133573 kg; = ByP_05/ butane_RP* butane_RP_PV
    (same comment as for average incineration residue)
  property price 0 EUR2005; name ByP_05_price_EUR2005
  properties: dry mass 1 kg, carbon content, fossil 0.007879, wet mass 1 kg
  note on carbon content, fossil: Composition of coal spoil is adopted by proxy from lignite spoil (pg 19, Doka G. (2009) Life Cycle Inventory of the disposal of lignite spoil, coal spoil and coal tailings. Doka Life Cycle Assessments, Zurich. Commissioned by the Swiss Centre for Life Cycle Inventories ecoinvent Centre)
- waste plastic, mixture: -7.227e-7 kg; name ByP_04
  Uncertainty for LCI results cannot be determined
  EcoSpold01Location=CH
  production volume 9.55676e-7 kg; = ByP_04/ butane_RP* butane_RP_PV
    (same comment as for average incineration residue)
  property price 0 EUR2005; name ByP_04_price_EUR2005
  properties: heating value, net 30.79 MJ, dry mass 0.847 kg, water content 0.180638, carbon content, fossil 0.747344, wet mass 1 kg
  note on carbon content, fossil: C content in 1 kg DM was calculated using data in Tab A.2, ecoinvent v2.2 report 13_I
- coal slurry: -8.0913e-7 kg; name ByP_03
  Uncertainty for LCI results cannot be determined
  EcoSpold01Location=GLO
  production volume 1.06997e-6 kg; = ByP_03/ butane_RP* butane_RP_PV
    (same comment as for average incineration residue)
  property price 0 EUR2005; name ByP_03_price_EUR2005
  properties: carbon content, fossil 0.124, wet mass 1 kg, dry mass 1 kg
  note on carbon content, fossil: Coal tailings composition in Tab 3.4, (Doka G. (2009) Life Cycle Inventory of the disposal of lignite spoil, coal spoil and coal tailings. Doka Life Cycle Assessments, Zurich. Commissioned by the Swiss Centre for Life Cycle Inventories ecoinvent Centre)
- waste wood, untreated: -2.6417e-8 kg; name ByP_02
  EcoSpold01Location=CH
  Uncertainty for LCI results cannot be determined
  production volume 3.4933e-8 kg; = ByP_02/ butane_RP* butane_RP_PV
    (same comment as for average incineration residue)
  property price 0 EUR2005; name ByP_02_price_EUR2005
  properties: carbon content, non-fossil 0.48632, wet mass 1 kg, water content 0.25, dry mass 0.8 kg, heating value, net 13.99 MJ
  note on carbon content, non-fossil: Tab A.4, ecoinvent v2.2 report 13_I. C content has been referred to 1 kg DM,
- hazardous waste, for incineration: -0.00198433, -5.18692e-5 kg (2 entries)
  EcoSpold01Location=CH
  Uncertainty for LCI results cannot be determined
  production volume 0.00269261 kg

## Inputs from nature
- Mercury, in ground [natural resource, in ground]: 4.2582e-10 kg
  Uncertainty for LCI results cannot be determined
- Gravel, in ground [natural resource, in ground]: 7.8694e-7 kg
  Uncertainty for LCI results cannot be determined
- Oil, crude, in ground [natural resource, in ground]: 0.82677 kg
  Uncertainty for LCI results cannot be determined
- Dolomite, in ground [natural resource, in ground]: 2.6183e-6 kg
  Uncertainty for LCI results cannot be determined
- Sodium nitrate, in ground [natural resource, in ground]: 0 kg
  Uncertainty for LCI results cannot be determined
- Olivine, in ground [natural resource, in ground]: 2.001e-6 kg
  Uncertainty for LCI results cannot be determined
- Gas, natural, in ground [natural resource, in ground]: 0.66516 m3
  Uncertainty for LCI results cannot be determined
- Titanium, in ground [natural resource, in ground]: 0 kg
  95% TiO2 in rutile; 0.4% TiO2 in ore; Uncertainty for LCI results cannot be determined
- Chromium, in ground [natural resource, in ground]: 4.1919e-13 kg
  25.5% Cr in chromite; 11.6% in ore; Uncertainty for LCI results cannot be determined
- Coal, hard, unspecified, in ground [natural resource, in ground]: 0.050829 kg
  Uncertainty for LCI results cannot be determined
- Clay, bentonite, in ground [natural resource, in ground]: 5.7934e-5 kg
  Uncertainty for LCI results cannot be determined
- Sand, unspecified, in ground [natural resource, in ground]: 6.8784e-5 kg
  Uncertainty for LCI results cannot be determined
- Energy, gross calorific value, in biomass [natural resource, biotic]: 0.12687 MJ
- Energy, potential (in hydropower reservoir), converted [natural resource, in water]: 0.063348 MJ
- Iron, in ground [natural resource, in ground]: 0.00021329 kg
  46% Fe in siderite; 25% Fe in ore; Uncertainty for LCI results cannot be determined
- Wood, unspecified, standing [natural resource, biotic]: 2.0085e-9 m3
  Uncertainty for LCI results cannot be determined
- Anhydrite, in ground [natural resource, in ground]: 5.7777e-6 kg
  Uncertainty for LCI results cannot be determined
- Sylvite, in ground [natural resource, in ground]: 3.1412e-9 kg
  25% Sylvite in sylvinite; Uncertainty for LCI results cannot be determined
- Peat, in ground [natural resource, biotic]: 0.00029195 kg
  Uncertainty for LCI results cannot be determined
- Water, salt, ocean [natural resource, in water]: 0.00035788 m3; name water_salt_ocean_input; lognormal variance with pedigree 1.21, pedigree (5,5,5,5,5)
  Uncertainty for LCI results cannot be determined
- Water, unspecified natural origin [natural resource, in water]: 0.0006969 m3; name water_UNO_input; lognormal variance with pedigree 1.21, pedigree (5,5,5,5,5)
  Uncertainty for LCI results cannot be determined
- Nickel, in ground [natural resource, in ground]: 3.4128e-13 kg
  1.98% Ni in silicates; 1.04% Ni in ore; Uncertainty for LCI results cannot be determined
- Water, well, in ground [natural resource, in water]: 1.0218e-10 m3; name water_well_in_ground_input; lognormal variance with pedigree 1.21, pedigree (5,5,5,5,5)
  Uncertainty for LCI results cannot be determined
- Clay, unspecified, in ground [natural resource, in ground]: 1.5372e-10 kg
  Uncertainty for LCI results cannot be determined
- Water, cooling, unspecified natural origin [natural resource, in water]: 0.040085 m3; name water_cooling_UNO_input; lognormal variance with pedigree 1.21, pedigree (5,5,5,5,5)
  Uncertainty for LCI results cannot be determined
- Shale, in ground [natural resource, in ground]: 1.6357e-5 kg
  Uncertainty for LCI results cannot be determined
- Sulfur, in ground [natural resource, in ground]: 4.8075e-5 kg
  Uncertainty for LCI results cannot be determined
- Calcite, in ground [natural resource, in ground]: 0.00020068 kg
  Uncertainty for LCI results cannot be determined
- Zinc, in ground [natural resource, in ground]: 7.5691e-9 kg
  9.0% Zn in sulfide; 5.3% Zn in ore; Uncertainty for LCI results cannot be determined
- Manganese, in ground [natural resource, in ground]: 2.7509e-7 kg
  35.7% Mn in sedimentary deposit; 14.2% Mn in ore; Uncertainty for LCI results cannot be determined
- Lead, in ground [natural resource, in ground]: 2.0727e-7 kg
  5.0% Pb in sulfide; 3.0% Pb in ore; Uncertainty for LCI results cannot be determined
- Granite, in ground [natural resource, in ground]: 1.8571e-15 kg
  Uncertainty for LCI results cannot be determined
- Barium, in ground [natural resource, in ground]: 2.4722e-8 kg
  15% BaSO4 in ore; Uncertainty for LCI results cannot be determined
- Copper, in ground [natural resource, in ground]: 1.1315e-11 kg
  0.99% Cu in sulfide; 0.36% Cu and 82 ppm Mo in ore; Uncertainty for LCI results cannot be determined
- Fluorspar, in ground [natural resource, in ground]: 2.2461e-7 kg
  92% CaF2 in ore; Uncertainty for LCI results cannot be determined
- Talc, in ground [natural resource, in ground]: 0 kg
  Uncertainty for LCI results cannot be determined
- Water, river [natural resource, in water]: 0.00050385 m3; name water_river_input; lognormal variance with pedigree 1.21, pedigree (5,5,5,5,5)
  Uncertainty for LCI results cannot be determined
- Uranium, in ground [natural resource, in ground]: 2.9389e-6 kg
  Uncertainty for LCI results cannot be determined
- Feldspar, in ground [natural resource, in ground]: 0 kg
  Uncertainty for LCI results cannot be determined
- Phosphorus, in ground [natural resource, in ground]: 6.9724e-13 kg
  18% P in apatite; 12% in ore; Uncertainty for LCI results cannot be determined
- Coal, brown, in ground [natural resource, in ground]: 2.2388e-8 kg
  Uncertainty for LCI results cannot be determined
- Magnesite, in ground [natural resource, in ground]: 0 kg
  60% Magnesite in ore; Uncertainty for LCI results cannot be determined
- Sodium chloride, in ground [natural resource, in ground]: 0.00026582 kg
  Uncertainty for LCI results cannot be determined
- Aluminium, in ground [natural resource, in ground]: 2.0923e-7 kg
  24% Al in bauxite; 11% Al in ore; Uncertainty for LCI results cannot be determined

## Emissions to nature
- Carbon dioxide, non-fossil [air, urban air close to ground]: 0.0034719 kg
  Uncertainty for LCI results cannot be determined
- Zinc, ion [water, surface water]: 7.0643e-8 kg
  Uncertainty for LCI results cannot be determined
- Carbon monoxide, fossil [air, urban air close to ground]: 0.002073 kg
  Uncertainty for LCI results cannot be determined
- Sulfur dioxide [air, urban air close to ground]: 0.0023368 kg
  Uncertainty for LCI results cannot be determined
- Sulfate [air, urban air close to ground]: 1.9806e-15 kg
  Uncertainty for LCI results cannot be determined
- Ammonium, ion [water, surface water]: 1.9443e-6 kg
  Uncertainty for LCI results cannot be determined
- Lead [water, surface water]: 1.5179e-10 kg
  Uncertainty for LCI results cannot be determined
- Potassium, ion [water, surface water]: 9.2769e-11 kg
  Uncertainty for LCI results cannot be determined
- Methane, non-fossil [air, urban air close to ground]: 4.2861e-5 kg
  Uncertainty for LCI results cannot be determined
- Arsenic, ion [water, surface water]: 4.1862e-10 kg
  Uncertainty for LCI results cannot be determined
- Nitrogen oxides [air, urban air close to ground]: 0.0021329 kg
  Uncertainty for LCI results cannot be determined
- Methane, fossil [air, urban air close to ground]: 0.014367 kg
  Uncertainty for LCI results cannot be determined
- Ethene, chloro- [water, surface water]: 3.7469e-12 kg
  Uncertainty for LCI results cannot be determined
- Acidity, unspecified [water, surface water]: 1.1958e-6 kg
  Uncertainty for LCI results cannot be determined
- Ammonia [air, urban air close to ground]: 9.6164e-11 kg
  Uncertainty for LCI results cannot be determined
- Chloride [water, surface water]: 6.4308e-5 kg
  Uncertainty for LCI results cannot be determined
- Fluoride [water, surface water]: 7.8124e-10 kg
  Uncertainty for LCI results cannot be determined
- Ethane, 1,2-dichloro- [air, urban air close to ground]: 9.01e-12 kg
  Uncertainty for LCI results cannot be determined
- Particulates, < 2.5 um [air, urban air close to ground]: 0.00010864 kg
  Uncertainty for LCI results cannot be determined
- Water [water, unspecified]: 0.0257912 m3; name water_to_water_unspecified; = water_cooling_UNO_input*(1-fraction_CW_to_air)+water_river_input*(1-fraction_PW_to_air)+water_salt_ocean_input*(1-fraction_PW_to_air)+water_UNO_input*(1-fraction_PW_to_air)+water_well_in_ground_input*(1-fraction_PW_to_air); lognormal variance with pedigree 0.0807, pedigree (2,2,5,1,1)
  Calculated value based on literature values and expert opinion. See comments in the parametres' comment field.
  property carbon content, fossil 0; name C_content_fossil
  property water in wet mass 1000 kg; name WWM
  property wet mass 1000 kg; name WM
  property dry mass 0 kg; name DM
  property carbon content, non-fossil 0; name C_content_non_fossil
  property fraction, origin: salt water 0.0110315; name fraction_origin_salt_water_Ww
  property fraction, origin: fresh water 0.0155309; name fraction_origin_fresh_water_Ww
  property fraction, origin: unspecified 0.973438; name fraction_origin_unspecified_Ww
- Carbon monoxide, non-fossil [air, urban air close to ground]: 6.1843e-6 kg
  Uncertainty for LCI results cannot be determined
- Water [air, unspecified]: 0.0158525 m3; name water_to_air_unspecified; = (water_cooling_UNO_input*fraction_CW_to_air)+(water_river_input*fraction_PW_to_air)+(water_salt_ocean_input*fraction_PW_to_air)+(water_UNO_input*fraction_PW_to_air)+(water_well_in_ground_input*fraction_PW_to_air); lognormal variance with pedigree 0.0807, pedigree (2,2,5,1,1)
  (same comment as for Water)
  property fraction, origin: fresh water 0.00651566; name fraction_origin_fresh_water
  property fraction, origin: salt water 0.00462801; name fraction_origin_salt_water
  property fraction, origin: unspecified 0.988856; name fraction_origin_unspecified
- Phenol [water, surface water]: 1.0563e-6 kg
  Uncertainty for LCI results cannot be determined
- TOC, Total Organic Carbon [water, surface water]: 2.3094e-5 kg
  Uncertainty for LCI results cannot be determined
- Suspended solids, unspecified [water, surface water]: 5.4169e-5 kg
  Uncertainty for LCI results cannot be determined
- Hydrocarbons, aromatic [air, urban air close to ground]: 1.3711e-5 kg
  Uncertainty for LCI results cannot be determined
- Ethane, 1,2-dichloro- [water, surface water]: 2.0512e-13 kg
  Uncertainty for LCI results cannot be determined
- COD, Chemical Oxygen Demand [water, surface water]: 0.00014021 kg
  Uncertainty for LCI results cannot be determined
- Bromate [water, surface water]: 3.3216e-10 kg
  Uncertainty for LCI results cannot be determined
- Oils, unspecified [water, surface water]: 1.4629e-5 kg
  Uncertainty for LCI results cannot be determined
- Carbon disulfide [air, urban air close to ground]: 4.0325e-11 kg
  Uncertainty for LCI results cannot be determined
- Ethene [air, urban air close to ground]: 2.3895e-6 kg
  Uncertainty for LCI results cannot be determined
- Sulfide [water, surface water]: 2.2826e-13 kg
  Uncertainty for LCI results cannot be determined
- Hydrogen [air, urban air close to ground]: 2.949e-5 kg
  Uncertainty for LCI results cannot be determined
- Copper [air, urban air close to ground]: 3.1604e-14 kg
  Uncertainty for LCI results cannot be determined
- Nitrate [water, surface water]: 2.868e-6 kg
  Uncertainty for LCI results cannot be determined
- Particulates, > 10 um [air, urban air close to ground]: 0.00013905 kg
  Uncertainty for LCI results cannot be determined
- Hydrogen chloride [air, urban air close to ground]: 2.3312e-5 kg
  Uncertainty for LCI results cannot be determined
- Magnesium [water, surface water]: 3.0675e-10 kg
  Uncertainty for LCI results cannot be determined
- BOD5, Biological Oxygen Demand [water, surface water]: 2.7231e-5 kg
  Uncertainty for LCI results cannot be determined
- Chlorate [water, surface water]: 5.9747e-8 kg
  Uncertainty for LCI results cannot be determined
- Phosphorus [water, surface water]: 4.839e-8 kg
  Uncertainty for LCI results cannot be determined
- Iron, ion [water, surface water]: 9.1154e-9 kg
  Uncertainty for LCI results cannot be determined
- Chlorine [air, urban air close to ground]: 1.2819e-11 kg
  Uncertainty for LCI results cannot be determined
- Cyanide [water, surface water]: 2.0214e-11 kg
  Uncertainty for LCI results cannot be determined
- Cadmium [air, urban air close to ground]: 2.2703e-11 kg
  Uncertainty for LCI results cannot be determined
- Manganese [water, surface water]: 1.1257e-14 kg
  Uncertainty for LCI results cannot be determined
- Nitrogen [water, surface water]: 2.0528e-6 kg
  Uncertainty for LCI results cannot be determined
- Dissolved solids [water, surface water]: 1.4123e-5 kg
  Uncertainty for LCI results cannot be determined
- Methane, dichloro-, HCC-30 [air, urban air close to ground]: 2.582e-15 kg
  Uncertainty for LCI results cannot be determined
- Zinc [air, urban air close to ground]: 4.631e-11 kg
  Uncertainty for LCI results cannot be determined
- Copper, ion [water, surface water]: 7.5445e-9 kg
  Uncertainty for LCI results cannot be determined
- Hydrocarbons, chlorinated [air, urban air close to ground]: 2.6299e-9 kg
  Uncertainty for LCI results cannot be determined
- Aluminium [water, surface water]: 7.2873e-7 kg
  Uncertainty for LCI results cannot be determined
- Strontium [water, surface water]: 6.351e-12 kg
  Uncertainty for LCI results cannot be determined
- Lead [air, urban air close to ground]: 9.098e-10 kg
  Uncertainty for LCI results cannot be determined
- Particulates, > 2.5 um, and < 10um [air, urban air close to ground]: 0.00018685 kg
  Uncertainty for LCI results cannot be determined
- Chlorinated solvents, unspecified [water, surface water]: 3.4664e-9 kg
  Uncertainty for LCI results cannot be determined
- Dinitrogen monoxide [air, urban air close to ground]: 3.1306e-13 kg
  Uncertainty for LCI results cannot be determined
- Mercury [water, surface water]: 2.8235e-10 kg
  Uncertainty for LCI results cannot be determined
- Carbonate [water, surface water]: 7.8866e-5 kg
  Uncertainty for LCI results cannot be determined
- Carbon dioxide, fossil [air, urban air close to ground]: 1.1638 kg
  Uncertainty for LCI results cannot be determined
- AOX, Adsorbable Organic Halogen as Cl [water, surface water]: 4.8311e-13 kg
  Uncertainty for LCI results cannot be determined
- Chromium, ion [water, surface water]: 8.372e-14 kg
  Uncertainty for LCI results cannot be determined
- Nickel, ion [water, surface water]: 2.2198e-10 kg
  Uncertainty for LCI results cannot be determined
- Nickel [air, urban air close to ground]: 5.6627e-14 kg
  Uncertainty for LCI results cannot be determined
- Ethene, chloro- [air, urban air close to ground]: 2.0207e-10 kg
  Uncertainty for LCI results cannot be determined
- Hydrocarbons, unspecified [water, surface water]: 1.3236e-5 kg
  Uncertainty for LCI results cannot be determined
- Chlorine [water, surface water]: 6.4276e-10 kg
  Uncertainty for LCI results cannot be determined
- Cadmium, ion [water, surface water]: 2.4627e-15 kg
  Uncertainty for LCI results cannot be determined
- Sodium, ion [water, surface water]: 8.0484e-5 kg
  Uncertainty for LCI results cannot be determined
- Arsenic [air, urban air close to ground]: 1.3919e-10 kg
  Uncertainty for LCI results cannot be determined
- DOC, Dissolved Organic Carbon [water, surface water]: 2.3094e-5 kg
  Calculated as equal to TOC.
- Fluorine [air, urban air close to ground]: 1.3796e-11 kg
  Uncertainty for LCI results cannot be determined
- Mercury [air, urban air close to ground]: 1.9504e-9 kg
  Uncertainty for LCI results cannot be determined
- Sulfate [water, surface water]: 0.00041036 kg
  Uncertainty for LCI results cannot be determined
- Antimony [air, urban air close to ground]: 1.156e-15 kg
  Uncertainty for LCI results cannot be determined
- NMVOC, non-methane volatile organic compounds, unspecified origin [air, urban air close to ground]: 0.0019125 kg
  Uncertainty for LCI results cannot be determined
- Calcium, ion [water, surface water]: 1.6369e-8 kg
  Uncertainty for LCI results cannot be determined
- Propene [air, urban air close to ground]: 1.77e-6 kg
  Uncertainty for LCI results cannot be determined
- Chromium [air, urban air close to ground]: 6.3434e-10 kg
  Uncertainty for LCI results cannot be determined
- Hydrogen sulfide [air, urban air close to ground]: 7.1734e-9 kg
  Uncertainty for LCI results cannot be determined
- Hydrogen fluoride [air, urban air close to ground]: 8.758e-7 kg
  Uncertainty for LCI results cannot be determined
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
## Sampling procedure
literature values based on company survey

## Extrapolations
This dataset has been extrapolated from year 2001 to the year of the calculation (2021). The uncertainty has been adjusted accordingly.

## Review by Jürgen Sutter 2010-04-06
passed.
