# sawnwood production, softwood, raw, dried (u=20%)

Dataset: EcoSpold 2, unit process
Geography: CH
Time period: 2014-01-01 to 2021-12-31
Technology level: current
Classification: ISIC rev.4 ecoinvent: 1610:Sawmilling and planing of wood
Scenario: Business-as-Usual
System model: Allocation, cut-off by classification
Generated by: Frank Werner
Database: ecoinvent
isCopyrightProtected: true
accessRestrictedTo: 1

## General comment
This activity is providing a more generic sawnwood product, combining inputs from the specific products issued from drying in the sawmil. The relative contribution is based in their Production Volumes.

## Included activities start
Entry of the specific products issued of the drying activity

## Included activities end
Delivery of the generic planed product

## Reference product
- sawnwood, softwood, raw, dried (u=20%): 1 m3; By-product classification allocatable product; CPC 31101: Wood, sawn or chipped lengthwise, sliced or peeled, of a thickness exceeding 6 mm, of coniferous wood
  production volume 32556 m3; = 2713000*0.6*0.2*0.1
    10% of the Production Volume issued from the planing has been made accesible as this generic product.
    The Production Volumes have been estimated from input of sawlogs, 60% yield, 20% drying to u=20% (80% drying to u=10%), and planing of 80%.
  property price 160 EUR2005
    Expert judgement (Urs Luginbühl, Swiss Sawmilling industry, personal communication in June 2014). Cross-reference; FAOSTAT (accessed 20140428). The price is calculated by using data on total world import quantity (m3) and import value (1000 USD), year 2005. 109432798 m3 of Sawnwood (C) - coniferous was imported in the world in 2005. The import value was 22249842000 USD. The calculated price is thus (22249842000/109432798=203*0.8=) 164 Euro.
  property heating value, net 6514.84 MJ
    LHV is calculated based on the Carbon content of the product. More details can be found on the respective documentation.The property is based on a value of 12.06MJ/kg
  property carbon content 0.494
    carbon content on a dry matter basis (reserved; not for manual entry)
  properties: wet mass 485.76 kg, water in wet mass 80.96 kg, carbon content, fossil 0, dry mass 404.8 kg, water content 0.2, carbon content, non-fossil 0.494, carbon allocation 199.971 kg

## Inputs from technosphere
All rows: lognormal variance with pedigree 0.104, pedigree (3,1,3,1,1)
- sawnwood, lath, softwood, raw, dried (u=20%): 0.0319664 m3
  based on estimated production volumes; see activity datasets
  properties: heating value, net 5860.46 MJ, carbon content, non-fossil 0.494, dry mass 404.8 kg, wet mass 485.76 kg, water content 0.2
- sawnwood, board, softwood, raw, dried (u=20%): 0.090018 m3
  based on estimated production volumes; see activity datasets
  properties: water content 0.2, wet mass 485.76 kg, carbon content, non-fossil 0.494, heating value, net 5860.46 MJ, dry mass 404.8 kg
- sawnwood, beam, softwood, raw, dried (u=20%): 0.0780156 m3
  based on estimated production volumes; see activity datasets
  properties: wet mass 485.76 kg, dry mass 404.8 kg, carbon content, non-fossil 0.494, heating value, net 5860.46 MJ, water content 0.2
- sawnwood, board, softwood, raw, dried (u=20%): 0.360072 m3
  based on estimated production volumes; see activity datasets
  properties: carbon content, non-fossil 0.494, wet mass 485.76 kg, dry mass 404.8 kg, water content 0.2, heating value, net 5860.46 MJ
- sawnwood, beam, softwood, raw, dried (u=20%): 0.312062 m3
  based on estimated production volumes; see activity datasets
  properties: dry mass 404.8 kg, wet mass 485.76 kg, carbon content, non-fossil 0.494, water content 0.2, heating value, net 5860.46 MJ
- sawnwood, lath, softwood, raw, dried (u=20%): 0.127866 m3
  based on estimated production volumes; see activity datasets
  properties: heating value, net 5860.46 MJ, carbon content, non-fossil 0.494, wet mass 485.76 kg, water content 0.2, dry mass 404.8 kg

## Extrapolations
This dataset has been extrapolated from year 2014 to the year of the calculation (2021). The uncertainty has been adjusted accordingly.
