# photovoltaic module production, building-integrated, for slanted-roof installation

Dataset: EcoSpold 2, unit process
Geography: RER
Time period: 1992-01-01 to 2021-12-31
Technology level: current
Classification: ISIC rev.4 ecoinvent: 4390:Other specialized construction activities
Classification: EcoSpold01Categories: photovoltaic/production of components
Tags: ConvertedDataset
Scenario: Business-as-Usual
System model: Allocation, cut-off by classification
Share of production covered: 10 %
Generated by: Niels Jungbluth
Published in: Jungbluth, N. 2008
Database: ecoinvent
isCopyrightProtected: true
accessRestrictedTo: 1

## General comment
Production of the additional components necessary for the mounting of 1 m2 PV panel or laminate.
[This dataset was already contained in the ecoinvent database version 2. It was not individually updated during the transfer to ecoinvent version 3. Life Cycle Impact Assessment results may still have changed, as they are affected by changes in the supply chain, i.e. in other datasets. This dataset was generated following the ecoinvent quality guidelines for version 2. It may have been subject to central changes described in the ecoinvent version 3 change report (http://www.ecoinvent.org/database/ecoinvent-version-3/reports-of-changes/), and the results of the central updates were reviewed extensively. The changes added e.g. consistent water flows and other information throughout the database. The documentation of this dataset can be found in the ecoinvent reports of version 2, which are still available via the ecoinvent website. The change report linked above covers all central changes that were made during the conversion process.]

## Included activities end
Materials and packaging for the production and estimation for metal processing. Disposal of the product after use. Energy use for the construction process must be included in data for the PV-plant.

## Geography
Production in CH.

## Technology
Construction parts for a photovoltaic system.

## Time period
Date of data investigation. Actual weight of materials updated in 2008.

## Reference product
- photovoltaic module, building-integrated, for slanted-roof installation: 1 m2; By-product classification allocatable product; CPC 87360: Installation services of electrical machinery and apparatus n.e.c.
  EcoSpold01Location=RER
  production volume 607.905 m2
    Not known.
    Estimated from total installed capacity of 3kWp PV plant in 2000: GLO installed PV-power 711MWp (Tab 11.3, ecoinvent v2 report 6_XII). It was assumed that Europe produces 36% of PV capacities (info obtained from Fig 8.1, ecoinvent v2 report 6_XII). An average surface of 28.5 m2 was estimated using information in Tab 11.2 from the same report. And the share between the different types of installation was obtained from Tab 12.7 of the same report. RER shares were used for GLO.
  property price 5.63305 EUR2005
    Calculated based on inputs: The price of the product has been calculated as a sum of the values of the material and energy inputs for this product. This value is therefore a rough estimation. It may underestimate the real price since there are additional expenses when producing any product. These expences can include for example labour costs, treatment of waste materials and profit for the producer. Please consider carefully whether this level of data quality is acceptable for your application.

## By-products
- waste paperboard, unsorted: 0 kg; By-product classification Recyclable; CPC 39240: Waste and scrap of paper or paperboard; pedigree (1,1,1,1,1)
  EcoSpold01Location=CH
  Calculated with use
  Uncertainty: Calculated with use
  production volume 0 kg
    Calculated from the production volume of photovoltaic slanted-roof construction, integrated, on roof in proportion to the respective output amounts.
  property carbon content, non-fossil 0.483259
    C content was calculated for 1 kg DM, using data in Tab A.3, ecoinvent v2.2 report 13_I.
  property price 0.03924 EUR2005
    Temporary price data. Calculated as 90% of purchasers price based on: Assumed to be 10% less than for sorted waste paperboard
  property carbon content 0.483259
    carbon content on a dry matter basis (reserved; not for manual entry)
  properties: dry mass 0.804 kg, water in wet mass 0.196 kg, wet mass 1 kg, heating value, net 15.92 MJ, carbon content, fossil 0, water content 0.243781, carbon allocation 0.38854 kg

## Inputs from technosphere
- polyurethane, flexible foam: 0.01838 kg; lognormal variance with pedigree 0.1701, pedigree (1,2,5,1,1)
  EcoSpold01Location=RER
  Literature and own estimations
  Uncertainty: Literature and own estimations
  properties: carbon content, fossil 0.633827, dry mass 1 kg, wet mass 1 kg, heating value, net 30.67 MJ
  note on carbon content, fossil: Polyurethanes (PUR) is the collective name for an extensive group of polymers with very different compositions and correspondingly varied property profiles, though their molecule chain contains all a urethane group (-NH-CO-O-). All PURs are built on a common principle : they are produced by the diisocyanate polyaddition process, that links polyols and (di)isocyanates. In this dataset, an example of typical polyurethane mixture is described (Ullmann, Polyurethanes, Dieterich et al. & ecoinvent v2 report 11_II). C content was calculated as an addition of C contents in its components.
- polyethylene, high density, granulate: 0.028183 kg; lognormal variance with pedigree 0.1701, pedigree (1,2,5,1,1)
  EcoSpold01Location=RER
  Literature and own estimations, recycled PE
  Uncertainty: Literature and own estimations, recycled PE
  properties: heating value, net 42.47 MJ, wet mass 1 kg, dry mass 1 kg, carbon content, fossil 0.857143
  note on carbon content, fossil: Polyethylene is formed out of a huge amount of ethylene monomers (C2H4) (ecoinvent v2.2 report 11_II). MW=28 g/mol
- synthetic rubber: 1.244 kg; lognormal variance with pedigree 0.1701, pedigree (1,2,5,1,1)
  Literature and own estimations
  EcoSpold01Location=RER
  Uncertainty: Literature and own estimations
  properties: carbon content, fossil 0.871949, dry mass 1 kg, wet mass 1 kg, heating value, net 26.42 MJ
  note on carbon content, fossil: EPDM (Ethylene-propene-diene terpolymer) rubber is a terpolymer of ethylene, propene, and a diene with the residual unsaturated portion of the diene in the side chain (ecoinvent v2.2 report 7-part XX & Ullmann). Chemical formula (deduced from Evidences of Solvent-Induced Miscibility in Polychloroprene-co-Ethylene-Propene Diene Terpolymer Blends, Dubey et al., Journal of Applied Polymer Science, 2009, 111:1884–1891): C20H35
- aluminium, wrought alloy: 2.2482 kg; lognormal variance with pedigree 0.1701, pedigree (1,2,5,1,1)
  (same comment as for synthetic rubber)
  properties: wet mass 1 kg, dry mass 1 kg
- section bar extrusion, aluminium: 2.2482 kg; lognormal variance with pedigree 0.202, pedigree (3,4,5,1,3)
  Estimation
  EcoSpold01Location=RER
  Uncertainty: Estimation
- section bar rolling, steel: 0.20047 kg; lognormal variance with pedigree 0.202, pedigree (3,4,5,1,3)
  EcoSpold01Location=RER
  Brunschweiler 1993
  Uncertainty: Brunschweiler 1993
- corrugated board box: 0.11429 kg; lognormal variance with pedigree 0.202, pedigree (3,4,5,1,3)
  EcoSpold01Location=RER
  Schwarz et al. 1992
  Uncertainty: Schwarz et al. 1992
  properties: carbon content, fossil 0.000656085, carbon content, non-fossil 0.432275, water content 0.0582011, wet mass 1 kg, dry mass 0.945 kg, heating value, net 12.86 MJ
  note on carbon content, fossil: Fossil C content was calculated after fossil C contents of chemicals used in the production of board (Tab 10-15 & 10.16 ecoinvent v2.2 report 11_III, part 10)
  note on carbon content, non-fossil: Biogenic C content was calculated after biogenic C contents of chemicals used in the production of board (Tab 10.15 & 10.16, ecoinvent v2.2 report 11_III, part 10).
- polystyrene, high impact: 0.0060154 kg; lognormal variance with pedigree 0.202, pedigree (3,4,5,1,3)
  EcoSpold01Location=RER
  Schwarz et al. 1992
  Uncertainty: Schwarz et al. 1992
  properties: dry mass 1 kg, carbon content, fossil 0.923077, wet mass 1 kg, heating value, net 38.67 MJ
  note on carbon content, fossil: Chemical formula of polystyrene is (C8H8)n (ecoinvent v2.2 report 11_II)
- waste polystyrene isolation, flame-retardant: 0 kg; pedigree (1,1,1,1,1)
  EcoSpold01Location=CH
  Disposal of plastics parts at end of life
  Uncertainty: Disposal of plastics parts at end of life
  production volume 0 kg
    (same comment as for waste paperboard, unsorted)
  properties: carbon content, fossil 0.918145, water content 0.00199232, wet mass 1 kg, heating value, net 38.67 MJ, dry mass 0.998012 kg
  note on carbon content, fossil: Polystyrene isolation (EPS) is flame-retarded with hexa-bromo-cyclo-dodecan (C12H18Br6) and contains 0.67 w% bromine (ecoinvent v2.2 report 13_I, pg 39). The rest is polystyrene: (C8H8)n.
- steel, low-alloyed, hot rolled: 0.20047 kg; lognormal variance with pedigree 0.1701, pedigree (1,2,5,1,1)
  (same comment as for synthetic rubber)
  properties: carbon content, fossil 0.005, wet mass 1 kg, dry mass 1 kg
  note on carbon content, fossil: Low alloyed steel composition given in Tab. 3.2 ecoinvent v2.2 report 10_partII. Steel assumed to have a C content of 0.5%
- waste polyethylene/polypropylene product: 0 kg; pedigree (1,1,1,1,1)
  (same comment as for waste polystyrene isolation, flame-retardant)
  production volume 0 kg
    (same comment as for waste paperboard, unsorted)
  properties: carbon content, fossil 0.748045, water content 0.180638, wet mass 1 kg, dry mass 0.847 kg, heating value, net 42.47 MJ
  note on carbon content, fossil: Mixed various plastics was used to estimate the C content of this waste (Tab A.2, ecoinvent v2.2 report 13_I)
- waste paperboard, unsorted: -0.11429 kg; lognormal variance with pedigree 0.202, pedigree (3,4,5,1,3)
  EcoSpold01Location=CH
  Calculated with use
  Uncertainty: Calculated with use
  production volume 69.4775 kg
  properties: carbon content, non-fossil 0.483259, dry mass 0.804 kg, wet mass 1 kg, heating value, net 15.92 MJ, price 0.03924 EUR2005, water content 0.243781
  note on carbon content, non-fossil: C content was calculated for 1 kg DM, using data in Tab A.3, ecoinvent v2.2 report 13_I.
- waste polystyrene isolation, flame-retardant: -0.00584015, -0.000175248 kg (2 entries); lognormal variance with pedigree 0.202, pedigree (3,4,5,1,3)
  (same comment as for waste polystyrene isolation, flame-retardant)
  production volume 3.65679 kg
- waste polyethylene/polypropylene product: -1.2529, -0.0375964 kg (2 entries); lognormal variance with pedigree 0.202, pedigree (3,4,5,1,3)
  (same comment as for waste polystyrene isolation, flame-retardant)
  production volume 784.501 kg

## Sampling procedure
Detailed analysis of materials for one product in a diploma thesis.

## Extrapolations
This dataset has been extrapolated from year 2008 to the year of the calculation (2021). The uncertainty has been adjusted accordingly.

## Review by Christian Bauer 2009-02-15
Passed.
none
