# o-aminophenol production

Dataset: EcoSpold 2, unit process
Geography: RER
Time period: 2010-01-01 to 2021-12-31
Technology level: current
Classification: ISIC rev.4 ecoinvent: 2011:Manufacture of basic chemicals
Synonyms: C6H7NO
Scenario: Business-as-Usual
System model: Allocation, cut-off by classification
Share of production covered: 100 %
Generated by: Jürgen Sutter
Database: ecoinvent
isCopyrightProtected: true
accessRestrictedTo: 1

## General comment
The process “o-aminophenol, at plant, RER” is modelled for the production of o-aminophenol from o-nitrophenol in Europe. Raw materials are modelled with a stoechiometric calculation. Emissions are estimated. Energy consumptions, infrastructure and transports are calculated with standard values.
o-Aminophenol (C6H7NO; CAS 95-55-6, 2-aminophenol, 2-hydroxyaniline, 2-amino-1-hydroxybenzene, C.I. Oxidation Base 17, C.I. 76520) forms white orthorhombic bipyramidal needles when crystallized from water or benzene. Acid – base dissociation constants are pK1 4.72 (water at 21 °C), 4.66 (1 vol % ethyl alcohol in water at 25 °C); pK2 9.66 (water at 15 °C), 9.71 (water at 22 °C) Aminophenols are made either by reduction of nitrophenols or by substitution. Reduction is accomplished with iron or with hydrogen in the presence of a catalyst. The last mentioned is the method of choice today for the production of 2- and 4-aminophenol.

Reduction
Iron Reduction
The reduction of nitrophenols with iron turnings takes place in weakly acidic solution or suspension. Before the iron – iron oxide sludge is separated from the solution the product aminophenol must be made water soluble by adding sodium hydroxide. The resulting sodium aminophenolate is very susceptible to oxidation in aqueous solution; various methods are recommended for its purification (see Section Purification). Subsequent to this, the aminophenols are precipitated from acidic solution by neutralization with base and in the absence of air; reducing agents usually must be added during this procedure.

When 2-nitrophenol is reduced with iron, red insoluble colour lakes are formed as byproducts that decrease the yield. Therefore, the iron reduction of 2-nitrophenol is of minor industrial importance today.

Catalytic Reduction
Catalytic reduction usually takes place in solution, emulsion, or suspension in autoclaves or pressurized vessels; after the catalyst is added, the vessel is pressurized with hydrogen. Water and methanol are the preferred solvents; in water the addition of alkali hydroxide, alkali carbonate, or acid has been recommended. Nickel – preferably Raney nickel – or supported precious metals, such as platinum or palladium on activated carbon, or the oxides of these metals are used as catalysts. The catalyst life can be extended, the catalyst consumption decreased, and the product quality enhanced by adding organic solvents that are not miscible with water. The preferred hydrogen pressure is 2 MPa; the hydrogenation can also be performed at atmospheric pressure or at higher pressure up to 6 MPa. The reaction temperature does not exceed 100 – 110 °C.

Reduction of Nitrobenzene
When reducing nitrobenzene in acidic medium, the intermediate phenylhydroxylamine rearranges to 2- and 4-aminophenol before it is further reduced to aniline. The main product of this reaction is 4-aminophenol; byproducts are 2-aminophenol, aniline, and 4,4′-diaminodiphenyl ether:

In the past, metals in dilute sulfuric acid were used as reducing agents. Today, the reducing agent is hydrogen in the presence of precious-metal catalysts, e.g., palladium or platinum. Other catalysts have been suggested: molybdenum and platinum sulfide, and a platinum – ruthenium mixed catalyst. Either the catalysts are used as their oxides, or they are supported on activated carbon.
Dilute aqueous mineral acid is used as reaction medium, for example, dilute sulfuric acid; acidic salts also can be added to the reduction medium.
In a two-step process, nitrobenzene first is selectively reduced to phenylhydroxylamine with hydrogen in the presence of Raney copper and in an organic solvent, such as 2-propanol. The product rearranges to 4-aminophenol after addition of dilute sulfuric acid.
The addition of wetting agents increases the aminophenol yield; these agents must be water soluble and stable in the presence of sulfuric acid. Quaternary ammonium salts that contain at least one alkyl group with at least ten carbon atoms are suitable, e.g., dodecyltrimethylammonium chloride. The reaction usually is performed below 100 °C, either at atmospheric or at higher pressure. Hydrogen is added during the reaction as consumed. The addition of inert organic solvents further increases the yield of 4-aminophenol and the product quality.
In another variant, only 88 % of the nitrobenzene is reduced; after that, the reaction mixture consists of two phases with the precious-metal catalyst (palladium on activated carbon) remaining in the unreacted nitrobenzene phase. Therefore, phase separation is sufficient as workup, and the nitrobenzene phase can be recycled directly to the next batch. The aqueous sulfuric acid phase contains 4-aminophenol and byproduct aniline. After neutralization, the aniline is stripped, and 4-aminophenol is obtained by crystallization after the aqueous phase is purified with activated carbon.
Electrolytic reduction also is possible; this method causes less concern over pollution than metal – acid reduction systems, but it has not yet found industrial application. Electrolysis of nitrobenzene or phenylhydroxylamine in the presence of sulfuric acid or of azoxybenzene in acid solution yields specifically 4-aminophenol.

Substitution
Substitution of various groups by amino or hydroxyl groups is industrially unimportant for the production of 2- and 4-aminophenol, but this type of reaction is used for the synthesis of 2- or 4-aminophenol derivatives.
However, 3-aminophenol cannot be obtained easily by reduction. It is made mainly by the reaction of 3-aminobenzenesulfonic acid with sodium hydroxide or by the reaction of resorcinol with ammonia. Substitution of the sulfonic acid group in 3-aminobenzenesulfonic acid is accomplished by caustic soda fusion (5 – 6 h; 240 – 245 °C). The product is purified by vacuum distillation.
Alternatively, resorcinol reacts with ammonia, for example, in the presence of diammonium phosphate and arsenic pentoxide or ammonium sulfite to form 3-aminophenol. The compound also may be made by hydrolysis of 3-aminoaniline.

Purification
Generally, aminophenols can be purified by sublimation at reduced pressure and higher temperature. 3-Aminophenol may be purified by vacuum distillation; to obtain a colourless product sulfur dioxide is added during distillation or the distillate is collected under a blanket of an unreactive liquid of lower density, such as water.
Another method for purifying aminophenols is the treatment of their aqueous solutions with activated carbon. During this treatment, sodium sulfite, sodium dithionite, or disodium ethylenediaminotetraacetate is added to increase the quality and stability of the products and to chelate heavy-metal ions that would catalyze oxidation. Addition of sodium dithionite, hydrazine, or sodium hydrosulfite also is recommended during precipitation or crystallization of aminophenols.
Contaminants, which are usually present in the 4-aminophenol made by catalytic reduction, can be reduced or even removed completely by a variety of procedures: treatment with 2-propanol7; with aliphatic, cycloaliphatic or aromatic ketones; with aromatic amines; with toluene or low molecular mass alkyl acetates; with phosphoric acid, hydroxyacetic acid, hydroxypropionic acid, or citric acid; or by extraction with methylene chloride, chloroform, or nitroenzene.
Both 2- and 4-aminophenols are strong reducing agents and are employed as photographic developers under the trade names of Atomal and Ortol (2-aminophenol); Activol, Azol, Certinal, Citol, Paranol, Rodinal, Unal, and Ursol P (4-aminophenol); they may be used alone or in combination with hydroquinone. The oxalate salt of 4-aminophenol is marketed under the name of Kodelon.
The aminophenols are versatile intermediates and are employed in the synthesis of virtually every class of stain and dye. In addition, 2-aminophenol is specifically used for shading leather, fur, and hair from grays and browns to yellowish brown. 3-Aminophenol has found application as a hair colorant and as a coupler molecule in hair dyes. 4-Aminophenol is used as an intermediate in the synthesis of pharmaceuticals, as a wood stain imparting a roselike colour to timber, and as a dyeing agent for fur and feathers.
As a result of the close proximity of the amino and hydroxyl groups on the benzene ring and their ease of condensation with suitable reagents, 2-aminophenol is a principal intermediate in the synthesis of such heterocyclic systems as oxyquinolines, phenoxamines, and benzoxazoles. The last-named compounds have been used as inflammation inhibitors. 3-Aminophenol has found use as a stabilizer of chlorine-containing thermoplastics, although its major use is as an intermediate in the production of 4-amino-2-hydroxybenzoic acid, a tuberculostat. Similarly, nitrogen-substituted 4-aminophenols have long been known as antipyretics and analgesics, and the production of these derivatives is a major use of 4-aminophenol.
Frischknecht R., Jungbluth N., Althaus H.-J., Doka G., Dones R., Heck T., Hellweg S., Hischier R., Nemecek T., Rebitzer G. and Spielmann M. (2007) Overview and Methodology. Final report ecoinvent v2.0 No. 1. Swiss Centre for Life Cycle Inventories, Dübendorf, CH, retrieved from: www.ecoinvent.org.

Gendorf (2000) Umwelterklärung 2000, Werk Gendorf. Werk Gendorf, Burgkirchen as pdf-File under: http://www.gendorf.de/pdf/umwelterklaerung2000.pdf

Stephen C. Mitchell/Rosemary H. Waring: Aminophenols. Published online: 2000. In: Ullmann's Encyclopedia of Industrial Chemistry, Seventh Edition, 2004 Electronic Release (ed. Fiedler E., Grossmann G., Kersebohm D., Weiss G. and Witte C.). 7 th Electronic Release Edition. Wiley InterScience, New York, Online-Version under: DOI: 10.1002/14356007.a02_099

## Included activities end
production of o-aminophenol including materials, energy uses, infrastructure, and emissions

## Geography
The inventory is modelled for Europe.

## Technology
reduction of o-nitrophenol

## Time period
Time of publications

## Parameters
- fraction, cooling water, once-through system, to air: 0.004 dimensionless; name fraction_CW_OT_to_air; lognormal variance with pedigree 0.0413, pedigree (2,3,1,3,1)
  Calculated based on literature value (Scown, C.D., 2011, Water Footprint of U.S. Transportation Fuels and supplying information of the article) (Vionnet, S., Quantis Water Database - Technical Report, 2012).
- fraction, cooling water, cooling pond system, to air: 0.032 dimensionless; name fraction_CW_CP_to_air; lognormal variance with pedigree 0.0413, pedigree (2,3,1,3,1)
  (same comment as for fraction, cooling water, once-through system, to air)
- fraction, cooling water, recirculating system, to air: 0.771 dimensionless; name fraction_CW_R_to_air; lognormal variance with pedigree 0.0413, pedigree (2,3,1,3,1)
  (same comment as for fraction, cooling water, once-through system, to air)
- fraction, cooling water, to air: 0.3875 dimensionless; name fraction_CW_to_air; = (0.5*fraction_CW_OT_to_air)+(0.5*fraction_CW_R_to_air); lognormal variance with pedigree 0.092025, pedigree (4,4,3,2,4)
  Calculated value based on literature value (see comments of the other parametres present in this dataset) and expert opinion. In the case when no industry/literature data are available about the type of cooling or directly fraction, cooling water, to air specific for the process a default assumption is applied. It is assumed that the once-through cooling system is used in 50% of all cases and recirculating system is used in another 50% of all cases.

## Reference product
- o-aminophenol: 1 kg; CPC 341: Basic organic chemicals; By-product classification allocatable product; CAS 95-55-6
  EcoSpold01Location=RER
  production volume 3.3e6 kg
    Expert judgment
  property carbon content, fossil 0.660382
    Calculated based on molecular structure. See tab "chemicals".
  property heating value, net 27.78 MJ
    LHV is calculated based on the elemental composition of the substance. Based on the name of the substance, the chemical formula of the substance is manually found to be: C6H7NO.
  property price 1.65967 EUR2005
    Calculated based on inputs: The price of the product has been calculated as a sum of the values of the material and energy inputs for this product. This value is therefore a rough estimation. It may underestimate the real price since there are additional expenses when producing any product. These expences can include for example labour costs, treatment of waste materials and profit for the producer. Please consider carefully whether this level of data quality is acceptable for your application.
  property carbon content 0.660382
    carbon content on a dry matter basis (reserved; not for manual entry)
  properties: water content 0, water in wet mass 0 kg, carbon content, non-fossil 0, wet mass 1 kg, dry mass 1 kg, carbon allocation 0.660382 kg

## Inputs from technosphere
- chemical factory, organics: 4e-10 unit; lognormal variance with pedigree 0.3184, pedigree (4,5,5,5,5)
  No information was readily available about infrastructure and land-use of production plants. Therefore, in this study, the infrastructure is estimated based on the module "chemical plant, organics". This module assumes a built area of about 4.2 ha, an average output of 50'000 t/a, and plant life of fifty years. For this study, the estimated value is 4.00 E-10 units per kg of produced chemical.
  EcoSpold01Location=RER
  Uncertainty: Estimation
- o-nitrophenol: 1.3423 kg; lognormal variance with pedigree 0.0335, pedigree (4,5,4,1,1)
  As there was no data available for the production of o-aminophenol, the values for the consumption of the raw materials are calculated with an assumed yield of 95 % (Frischknecht et al. 2007).
  EcoSpold01Location=RER
  Uncertainty: Stoechiometric calculation
  properties: wet mass 1 kg, carbon content, fossil 0.518048, dry mass 1 kg, heating value, net 20.05 MJ
  note on carbon content, fossil: Calculated based on molecular structure. See tab "chemicals".
- electricity, medium voltage: 0.333 kWh; lognormal variance with pedigree 0.1786, pedigree (4,5,5,5,5)
  There was no information available on the amount of energy used for the o-aminophenol production process. In order not to neglect the process energy demand those values were approximated with data from an large chemical plant site in Germany producing 2.05 Mt a-1 (intermediates included) of different chemicals (Gendorf (2000)). The values for the energy consumption per kg of product of this plant (3.2 MJ kg-1) were used as approximation for the energy consumption. This total energy demand contains a split of 50% natural gas, 38% electricity and 12% steam from external energy sources. For this inventory all energy used for heat or steam was assumed to be natural gas. For this inventory an amount of 2 MJ natural gas and 0.333 kW electricity per kg product was used.
  EcoSpold01Location=UCTE
  Uncertainty: Estimation
- heat, from steam, in chemical industry: 2 MJ; lognormal variance with pedigree 0.1786, pedigree (4,5,5,5,5)
  There was no information available on the amount of energy used for the o-aminophenol production process. In order not to neglect the process energy demand those values were approximated with data from an large chemical plant site in Germany producing 2.05 Mt a-1 (intermediates included) of different chemicals (Gendorf (2000)). The values for the energy consumption per kg of product of this plant (3.2 MJ kg-1) were used as approximation for the energy consumption. This total energy demand contains a split of 50% natural gas, 38% electricity and 12% steam from external energy sources. For this inventory all energy used for heat or steam was assumed to be natural gas. For this inventory an amount of 2 MJ natural gas and 0.333 kW electricity per kg product was used.
  EcoSpold01Location=RER
  Uncertainty: Estimation
  properties: heating value, net 1 MJ
- hydrogen, liquid: 0.057943 kg; lognormal variance with pedigree 0.0335, pedigree (4,5,4,1,1)
  EcoSpold01Location=RER
  As there was no data available for the production of o-aminophenol, the values for the consumption of the raw materials are calculated with an assumed yield of 95 % (Frischknecht et al. 2007).
  Uncertainty: Stoechiometric calculation
  properties: heating value, net 120.21 MJ, wet mass 1 kg, dry mass 1 kg

## Inputs from nature
- Water, cooling, unspecified natural origin [natural resource, in water]: 0.024 m3; name water_cooling_UNO_input; lognormal variance with pedigree 0.0335, pedigree (4,5,4,1,1)
  There was no information available on the amount of cooling water used within the plant. In order not to neglect the process cooling water demand this value was approximated with data from an large chemical plant site in Germany producing 2.05 Mt a-1 (intermediates included) of different chemicals (Gendorf 2000). In this plant in total an average 24 kg water per kg of product were used for. This value was used in this inventory as approximation for the cooling water consumption.
  There was no information available on the amount of cooling water used within the plant. In order not to neglect the process cooling water demand this value was approximated with data from an large chemical plant site in Germany producing 2.05 Mt a-1 (intermediates included) of different chemicals (Gendorf 2000). In this plant in total an average 24 kg water per kg of product were used for. This value was used in this inventory as approximation for the cooling water consumption.
  Uncertainty: Estimation

## Emissions to nature
- Hydrogen [air, urban air close to ground]: 0.12747 kg; lognormal variance with pedigree 0.1786, pedigree (4,5,5,5,5)
  There was no data available on process emissions to air for the production of o-aminophenol. As approximation the air emissions occurring from the purge vent, the distillation vent and fugitive emission sources were estimated to 0.2% of the hydrogen input. The remaining hydrogen is considered to be oxidated to water.
  Uncertainty: Estimation
- Water [air, unspecified]: 0.0093 m3; name water_to_air_unspecified; = water_cooling_UNO_input*fraction_CW_to_air; lognormal variance with pedigree 0.130025, pedigree (4,4,5,2,4)
  Calculated value based on literature values and expert opinion. See comments in the parametres' comment field.
  property fraction, origin: salt water 0; name fraction_origin_salt_water
  property fraction, origin: unspecified 1; name fraction_origin_unspecified
  property fraction, origin: fresh water 0; name fraction_origin_fresh_water
- Water [water, unspecified]: 0.0147 m3; name water_to_water_unspecified; = water_cooling_UNO_input*(1-fraction_CW_to_air); lognormal variance with pedigree 0.130025, pedigree (4,4,5,2,4)
  (same comment as for Water)
  property fraction, origin: unspecified 1; name fraction_origin_unspecified_Ww
  property fraction, origin: fresh water 0; name fraction_origin_fresh_water_Ww
  property fraction, origin: salt water 0; name fraction_origin_salt_water_Ww
- Carbon dioxide, fossil [air, urban air close to ground]: 0.12747 kg; lognormal variance with pedigree 0.1786, pedigree (4,5,5,5,5)
  The remaining amount of unreacted o-nitropohenol is assumed to leave the production process with the wastewater. Further it is assumed that this wastewater is treated in a internal wastewater plant. The removal efficiency for o-nitropohenol is assumed with 100%. The carbon contained in the removed o-nitropohenol is accounted as CO2 emissions to air. The nitrogen in the removed o-nitropohenol is accounted as nitrogen emission to air.
  Uncertainty: Estimation

## Sampling procedure
Literature data

## Extrapolations
This dataset has been extrapolated from year 2010 to the year of the calculation (2021). The uncertainty has been adjusted accordingly.

## Review by Roland Hischier 2011-04-12
automatic validation in Excel
none
