# electricity production, nuclear, pressure water reactor

Dataset: EcoSpold 2, unit process
Geography: DE
Time period: 1990-01-01 to 2021-12-31
Technology level: current
Classification: ISIC rev.4 ecoinvent: 3510:Electric power generation, transmission and distribution
Synonyms: PWR
Tags: nuclear power
Scenario: Business-as-Usual
System model: Allocation, cut-off by classification
Generated by: Karin Treyer
Published in: Dones, R. 2007
Database: ecoinvent
isCopyrightProtected: true
accessRestrictedTo: 1

## General comment
This dataset represents the production of high voltage electricity at a grid-connected nuclear pressure water reactor (PWR) in Germany in 2012.
It is a copy of the dataset "electricity production, nuclear, pressure water reactor, CH, 1995-2002", i.e. of a dataset with data for a Swiss nuclear PWR. The basic source for all exchanges is therefore the ecoinvent report "Kernenergie" (see Modelling and Administrative).
The average burnup 53 MWd/kg heavy metal of finally discharged fuel elements from the 2000/2002 fuel cycles has been assumed representative for the lifetime of the modeled plant (the burnup has increased from the initial about 33 MWd/kg heavy metal and may increase to 55 MWd/kg heavy metal in the future). The average burnup corresponds to an average enrichment of 4.2% U235 for fresh uranium fuel elements. Over the lifetime of the plant it can be assumed that 8% of the energy will be produced by MOX fuel elements. Of total fuel elements 92% are assumed to be from fresh U (thus burdened by the full upstream chain), and 8% MOX (burdened by reprocessing). For the calculation of the total net electricity delivered in 40 years lifetime, the sum of the actual production till 2002 and the prospective (8000 GWh/a) till end of life using is considered; this gives 3.11E11 kWh; the inverse gives the utilisation factor for the infrastructure. Partial information on material requirements during operation for 1991/1992 are available, which are integrated with relevant information for the modeled boiling water reactor. The diesel requirements for the yearly test of diesel emergency generators are accounted for. Radioactive emission species to air and water are weighted averages of the emissions of the nuclear power plants Gösgen and Beznau I+II from 1995 to 2002. Alpha aerosols emission to air have been described with "aerosols, unspecified". Considered radioactive waste streams are: spent fuel to reprocessing (40%) and conditioning (60%); operational low active waste for conditioning in the intermediate repository; and, contaminated waste from dismantling.
[This dataset is meant to replace the following datasets:]

## Included activities start
From the constructed power plant ready to produce electricity and from the fuel ready in the power plant.

## Included activities end
This activity ends with 1kWh of high voltage electricity produced at the power plant and arrived at the busbar.

The module includes fuel elements, chemicals, and diesel requirements as well as the relevant transport requirements. Water use for cooling is included, but no cooling tower infrastructure. Considered radioactive waste streams are: spent fuel to conditioning (no reprocessing); operational low active waste for conditioning in the intermediate repository; and, contaminated waste from dismantling. Non-radioactive wastes are accounted for.

## Geography
Swiss data of one specific plant for requirements and all German PWRs for emissions.

## Technology
Standard technology for commercial operation.

## Time period
The Annual Production Volume is valid for the year 2012

## Parameters
All rows: lognormal variance with pedigree 0.092025, pedigree (4,4,3,2,4)
- water consumption, electricity production, nuclear, once-T and coolingP CS: 0.00296 m3/kWh; name WConsumption_EP_nuclear_onceT_andCP_CS
- fraction, water, decarbonised, to air: 0.0380756 dimensionless; name fraction_WDC_to_air; = fraction_CW_to_air
  Calculated value. See comments in the other parametres present in this dataset. Decarbonised water is considered to be always used as cooling water, thus cooling water fractions to air are applied to all carbonised water input flows to calculate the amount of water consumed in the processes.
  nan
- water withdrawal, electricity production, nuclear, recirculating CS: 0.0042 m3/kWh; name WWithdrawal_EP_nuclear_recirculating_CS
- recirculating cooling system as a fraction of all cooling systems: 0.27 dimensionless; name recirculating_CS_fraction_from_allCS
  Calculated as an average of data available for Europe (Floerke, 2008, Future changes of freshwater needs in the electricity production sector) and USA (NERL, 2011, Estimating freshwater needs to meet future thermoelectric generation requirements).
  nan
- once-through and cooling pond cooling systems as a fraction of all cooling syste: 0.73 dimensionless; name once_through_andCP_CS_fractio_from_allCS
  (same comment as for recirculating cooling system as a fraction of all cooling systems)
- water consumption, electricity production, nuclear, recirculating CS: 0.0024 m3/kWh; name WConsumption_EP_nuclear_recirculatingCS
- water withdrawal, electricity production, nuclear, once-T and coolingP CS: 0.0995 m3/kWh; name WWithdrawal_EP_nuclear_onceT_andCP_CS
- fraction, cooling water, to air: 0.0380756 dimensionless; name fraction_CW_to_air; = (WConsumption_EP_nuclear_recirculatingCS*recirculating_CS_fraction_from_allCS+WConsumption_EP_nuclear_onceT_andCP_CS*once_through_andCP_CS_fractio_from_allCS)/(WWithdrawal_EP_nuclear_recirculating_CS*recirculating_CS_fraction_from_allCS+WWithdrawal_EP_nuclear_onceT_andCP_CS*once_through_andCP_CS_fractio_from_allCS)
  Calculated value based on literature value (Scown, 2011 & Floerke, 2009, Future changes of freshwater needs in the electricity production sector & Stiegel, 2008, Estimating Freshwater Needs to Meet Future Thermoelectric Generation Requirements) (Vionnet, S., Quantis Water Database - Technical Report, 2012).
  nan

## Reference product
- electricity, high voltage: 1 kWh; By-product classification allocatable product; CPC 17100: Electrical energy
  production volume 7.35668e10 kWh; name apv_electricity
    Literature value/statistics. For both OECD and non-OECD countries, gross electricity production 2012 with nuclear plants was taken from the IEA electricity information 2014, table 1.2. For a split of this total value into electricity production in different types of nuclear plants (boiling water reactor, pressure water reactor and pressurised heavy water reactor), data from IEAE 2014 (PRIS database) were exploited. An own electricity use of 6% (losses between gross and net electricity production) has been applied to the gross data based on IEA 2014.
    IEA. 2014. Electricity Information 2014. ISBN 978-92-64-21692-1. International Energy Agency (IEA), Paris Cedex (FR).
    IAEA. 2014. PRIS (Power Reactor Information System) - The database on nuclear power reactors. Country statistics. Online database. International Atomic Energy Agency.
  property price 0.0977 EUR2005; name electricity_price_EUR2005
    Temporary price data. Calculated as 90% of purchasers price based on: 94% of the average price (to account for a 6% loss in transformation and transmission) for electricity for industrial consumersin 2005 (excluded taxes). From IEA.

## Inputs from technosphere
- nuclear fuel element, for pressure water reactor, UO2 4.0% & MOX: 2.53e-6 kg; lognormal variance with pedigree 0.002, pedigree (1,1,3,1,1)
  estimated variation over lifetime
  properties: dry mass 1 kg, wet mass 1 kg
- nuclear fuel element, for pressure water reactor, UO2 4.2% & MOX: 0 kg
  Literature value
  properties: wet mass 1 kg, dry mass 1 kg
- cast iron: 1.35e-7 kg; lognormal variance with pedigree 0.012, pedigree (1,1,3,1,1)
  extrapolation from another plant type
  properties: dry mass 1 kg, carbon content, fossil 0.04, wet mass 1 kg
  note on carbon content, fossil: Cast iron is made by remelting pig iron in small furnaces (e.g. cupola furnaces or electric arc furnaces) and poured into moulds to make castings. It usually contains 2% to 6% carbon (ecoinvent v2.2 report 10_partII). An average content of 4% was considered
- oxygen, liquid: 1.75e-5 kg; lognormal variance with pedigree 0.022, pedigree (1,1,3,1,1)
  own estimation
  properties: dry mass 1 kg, wet mass 1 kg
- pitch: 8.1e-7 kg; lognormal variance with pedigree 0.022, pedigree (1,1,3,1,1)
  own estimation
  properties: wet mass 1 kg, dry mass 1 kg, carbon content, fossil 0.83, heating value, net 28 MJ
- nuclear power plant, pressure water reactor, 1000MW: 3.22e-12 unit; lognormal variance with pedigree 0.0439, pedigree (2,2,5,5,2)
  Estimation. Total net electricity over a lifetime: 3.11E11 kWh
- low level radioactive waste: -1.8032e-9 m3; name low_level_waste; lognormal variance with pedigree 0.012, pedigree (1,1,3,1,1)
  own estimation
  production volume 132.656 m3; = low_level_waste * apv_electricity
    Calculated from the production volume of electricity, high voltage in proportion to the respective output amounts.
  property price 0 EUR2005; name low_level_waste_price_EUR2005
  properties: dry mass 2500 kg, wet mass 2500 kg
- argon, liquid: 2.74e-5 kg; lognormal variance with pedigree 0.022, pedigree (1,1,3,1,1)
  own estimation
  properties: dry mass 1 kg, wet mass 1 kg
- paper, woodfree, coated: 6.75e-7 kg; lognormal variance with pedigree 0.022, pedigree (1,1,3,1,1)
  own estimation
  properties: water content 0.0582011, dry mass 0.945 kg, heating value, net 14.11 MJ, carbon content, fossil 0.0590617, carbon content, non-fossil 0.22775, wet mass 1 kg
  note on carbon content, fossil: Fossil C content was calculated after fossil C contents of chemicals used in the production of the paper (in Tab 8.72 & 8.73 ecoinvent v2.2 report 11_III, part 8).
  note on carbon content, non-fossil: Biogenic C content was calculated after biogenic C contents of chemicals used in the production of the paper (in Tab 8.72 & 8.73 ecoinvent v2.2 report 11_III, part 8). The cellulose content in 1 kg of paper (on a wet mas basis) was estimated as (1-chemical content), C content of cellulose was considered 0.44 kgC/kg dry mass (ecoinvent v2.2 report, n 15a, pg 40)
- concrete, normal: 1.02e-8 m3; lognormal variance with pedigree 0.022, pedigree (1,1,3,1,1)
  own estimation
  properties: water content 0.086758, dry mass 2190 kg, wet mass 2380 kg
- cement, unspecified: 1e-6 kg; lognormal variance with pedigree 0.5507, pedigree (3,3,5,3,3)
  own estimation
  properties: dry mass 1 kg, wet mass 1 kg
- lubricating oil: 1.7e-6 kg; lognormal variance with pedigree 0.022, pedigree (1,1,3,1,1)
  own estimation
  properties: dry mass 1 kg, carbon content, fossil 0.75, heating value, net 40.2 MJ, wet mass 1 kg
  note on carbon content, fossil: Lubricating oil is produced from diesel. C-content/dry mass of fats and oils considered 75%, from: ecoinvent v2.2 report, n 15a, pg 40
  note on heating value, net: Literature value, Source: IPCC 2006, 2006 IPCC Guidelines for National Greenhouse Gas Inventories, Prepared by the National Greenhouse Gas Inventories Programme, Eggleston H.S., Buendia L., Miwa K., Ngara T. and Tanabe K. (eds). Published: IGES, Japan
- low level radioactive waste for final repository: -2.98e-8 m3; name low_level_waste_final; lognormal variance with pedigree 0.032, pedigree (1,1,3,1,1)
  own estimation
  production volume 2192.29 m3; = low_level_waste_final * apv_electricity
    (same comment as for low level radioactive waste)
  property price 0 EUR2005; name low_level_waste_final_price_EUR2005
  properties: wet mass 2500 kg, dry mass 2500 kg
- nuclear power plant, pressure water reactor, 1000MW: 0 unit
  Estimation. Total net electricity over a lifetime: 3.11E11 kWh
- reinforcing steel: 4.9e-7 kg; lognormal variance with pedigree 0.022, pedigree (1,1,3,1,1)
  own assumption
  properties: wet mass 1 kg, dry mass 1 kg, carbon content, fossil 0.004
- flat glass, coated: 4.59e-6 kg; lognormal variance with pedigree 0.022, pedigree (1,1,3,1,1)
  own estimation
  properties: dry mass 1 kg, wet mass 1 kg
- water, decarbonised: 2.83743 kg; name water_decarbonised_input; = 700/(7.78E9/(365*24*60*60)); lognormal variance with pedigree 0.012, pedigree (1,1,3,1,1)
  Estimated average net electricity production per year: 7.78E9 kWh/y (Tab. 9.3, p. 166)
  Water use in BWR see Tab. 9.17 p.196 in Dones et al. - decarbonised water use (700 kg/s)
  own estimation.
  It is estimated that all decarbonised water in the mentioned table is evaporated.
  In contrast to the literature reference and the datasets in ecoinvent version 2, this dataset only takes into account real water use, i.e. the water which is evaporated during the cooling process.
  properties: wet mass 1 kg
- sodium hypochlorite, without water, in 15% solution state: 1.81e-5 kg; lognormal variance with pedigree 0.022, pedigree (1,1,3,1,1)
  own estimation
  properties: dry mass 1 kg, wet mass 1 kg
- chemical, organic: 1.45e-6 kg; lognormal variance with pedigree 0.012, pedigree (1,1,3,1,1)
  own estimation
  properties: heating value, net 19.03 MJ, wet mass 1 kg, carbon content, fossil 0.628, dry mass 1 kg
  note on carbon content, fossil: This dataset is an unweighted average of 20 organic substances (listed in Tab 88.1, ecoinvent v2.2 report 8, part II), being part of the top100 chemicals included in this database. The C-content has also been calculated as an unweighted average of the C content of the substances composing this dataset.
- carbon dioxide, liquid: 1.75e-7 kg; lognormal variance with pedigree 0.022, pedigree (1,1,3,1,1)
  own estimation
  properties: dry mass 1 kg, wet mass 1 kg, carbon content, fossil 0.272727, heating value, net 8.27 MJ
- spent nuclear fuel: -2.53e-6 kg; name spent_nuclear_fuel; lognormal variance with pedigree 0.042, pedigree (1,1,3,1,1)
  own assumption
  production volume 186124 kg; = spent_nuclear_fuel * apv_electricity
    (same comment as for low level radioactive waste)
  property price 0 EUR2005; name spent_nuclear_price_EUR2005
  properties: dry mass 1 kg, wet mass 1 kg
- fly ash and scrubber sludge: -2.29e-6 kg; name fly_ash; lognormal variance with pedigree 0.022, pedigree (1,1,3,1,1)
  own estimation
  production volume 168468 kg; = fly_ash * apv_electricity
    (same comment as for low level radioactive waste)
  property price 0 EUR2005; name fly_ash_price_EUR2005
  properties: dry mass 0.1 kg, water content 9, carbon content, fossil 0.167, wet mass 1 kg
  note on carbon content, fossil: Tab A.6, ecoinvent v2.2 report 13_I. C content has been calculated after data in the tables, and then referred to 1 kg DM
- cement, Portland: 9.64e-7 kg; lognormal variance with pedigree 0.022, pedigree (1,1,3,1,1)
  Operator information. Cement use for conditioning of the hard waste. Extrapolation from a boiling water reactor.
  properties: dry mass 1 kg, wet mass 1 kg
- chemical, inorganic: 2.45e-6 kg; lognormal variance with pedigree 0.012, pedigree (1,1,3,1,1)
  own estimation
  properties: dry mass 1 kg, carbon content, fossil 0.003, wet mass 1 kg
  note on carbon content, fossil: This dataset is an unweighted average of 20 inorganic substances (listed in Tab 88.1, ecoinvent v2.2 report 8, part II), being part of the top100 chemicals included in this database. The C-content has also been calculated as an unweighted average of the C content of the substances composing this dataset.
- acetylene: 3.78e-8 kg; lognormal variance with pedigree 0.012, pedigree (1,1,3,1,1)
  own estimation
  properties: carbon content, fossil 0.923077, dry mass 1 kg, wet mass 1 kg, heating value, net 51.2 MJ
  note on carbon content, fossil: C2H2. ecoinvent v2.2 report n 8. Produced from partial oxidation of natural gas
  note on heating value, net: Based on literature, page 25 (Value may refer to HHV), Althaus H.-J., Chudacoff M., Hischier R., Jungbluth N., Osses M. and Primas A. (2007) Life Cycle Inventories of Chemicals. Final report ecoinvent data v2.0 No. 8. EMPA, Swiss Centre for Life Cycle Inventories, Dübendorf, CH, Online-Version under: www.ecoinvent.org.
- steel, low-alloyed, hot rolled: 1.7e-6 kg; lognormal variance with pedigree 0.062, pedigree (1,1,3,1,1)
  own assumption
  properties: dry mass 1 kg, carbon content, fossil 0.005, wet mass 1 kg
  note on carbon content, fossil: Low alloyed steel composition given in Tab. 3.2 ecoinvent v2.2 report 10_partII. Steel assumed to have a C content of 0.5%
- hazardous waste, for incineration: -1.02e-6 kg; name hazwaste; lognormal variance with pedigree 0.022, pedigree (1,1,3,1,1)
  own estimation
  production volume 75038.1 kg; = hazwaste * apv_electricity
    (same comment as for low level radioactive waste)
  property price 0 EUR2005; name hazwaste_price_EUR2005
  properties: heating value, net 17 MJ, wet mass 1 kg, carbon content, fossil 0.554667, dry mass 0.75 kg, water content 0.333333
  note on heating value, net: Value taken from the general comment of the treatment dataset.
- boric acid, anhydrous, powder: 6.74e-8 kg; lognormal variance with pedigree 0.002, pedigree (1,1,3,1,1)
  own estimation on data from utility
  properties: wet mass 1 kg, dry mass 1 kg
- anionic resin: 6.75e-8 kg; lognormal variance with pedigree 0.002, pedigree (1,1,3,1,1)
  own estimation
  properties: water content 1, carbon content, fossil 0.680721, heating value, net 9.09 MJ, wet mass 1 kg, dry mass 0.5 kg
  note on carbon content, fossil: Cross-linked polystyrene beads are treated with chloromethyl methyl ether under anhydrous conditions, with either aluminum chloride or tin(IV) chloride as catalyst. Chloromethylated polystyrene is obtained. In a second stage, the chlorine in the chloromethylated group can be replaced by an amine (Anion exchange resins, in Ullmann). In this case, Trimethylamine, C3H9N, is used (ecoinvent v2.2 report 8-part 93). That is, the resine can be formulated as C12H18NCl (after Ullmann, Anion exchange resins). The resine is hydrated (ecoinvent v2.2 report 8, part II, Tab 93.7)
- waste mineral oil: -1.71e-6 kg; name waste_oil; lognormal variance with pedigree 0.022, pedigree (1,1,3,1,1)
  own estimation
  production volume 125799 kg; = waste_oil* apv_electricity
    (same comment as for low level radioactive waste)
  property price 0 EUR2005; name waste_oil_price_EUR2005
  properties: water content 0.111111, carbon content, fossil 0.864444, wet mass 1 kg, dry mass 0.9 kg, heating value, net 34.7 MJ
- nitrogen, liquid: 6.48e-5 kg; lognormal variance with pedigree 0.022, pedigree (1,1,3,1,1)
  own estimation
  properties: dry mass 1 kg, wet mass 1 kg
- hydrogen, liquid: 1.08e-5 kg; lognormal variance with pedigree 0.022, pedigree (1,1,3,1,1)
  own estimation
  properties: wet mass 1 kg, dry mass 1 kg, heating value, net 120.21 MJ
- diesel, burned in diesel-electric generating set, 10MW: 0.000388 MJ; lognormal variance with pedigree 0.022, pedigree (1,1,3,1,1)
  own estimation
  properties: heating value, net 1 MJ
- cationic resin: 6.75e-8 kg; lognormal variance with pedigree 0.002, pedigree (1,1,3,1,1)
  own estimation
  properties: wet mass 1 kg, heating value, net 6.68 MJ, carbon content, fossil 0.521606, dry mass 0.5 kg, water content 1
  note on carbon content, fossil: Chemically inert polystyrene beads are treated with concentrated sulfuric or chlorosulfonic acid to give cross-linked polystyrene 3-sulfonic acid (Cation exchange resins, Ullmann). The resine was approximated as C8H8O3S (from Ullmann, Cation exchange resins). The resine is hydrated (ecoinvent v2.2 report 8, part II, Tab 93.5)

## Inputs from nature
- Water, cooling, unspecified natural origin [natural resource, in water]: 0.073769 m3; name water_cooling_UNO_input; source Scown, C.D., et al. 2011, p. p. 166/196; lognormal variance with pedigree 0.130025, pedigree (4,4,5,2,4)
  Calculated based on literature (Scown, C.D., et al., 2011, Water Footprint of U.S. Trasportation Fuels;Scown, C.D., et al., 2011, Water Footprint of U.S. Trasportation Fuels (SI); Stiegel, 2008, Estimating Freshwater Needs to Meet Future Thermoelectric Generation Requirements; Floerke, M., 2009, Future changes of freshwater needs in the electricity production sector), (Vionnet, S., Quantis Water Database - Technical Report, 2012). Water use in this process is modelled based on literature (see references). The process boundaries are given by the boundaries of the power plant. The process ends when the energy (MJ) is produced and ready to be used for electricity production (kWh).
  property carbon content, fossil 0.0104329; name C_content_fossil
  property dry mass 0.1101 kg; name DM
  property water content 9081.65; name water_content
  property water in wet mass 999.89 kg; name WWM
  property wet mass 1000 kg; name WM
  property carbon content, non-fossil 0; name C_content_non_fossil

## Emissions to nature
- Ruthenium-103 [water, surface water]: 0 kBq
  Operator data. Weighted radioactive emissions into water of Swiss nuclear power plants 1995-2002 (Weighting with net electricity production).
- Xenon-133 [air, non-urban air or from high stacks]: 0.148 kBq; lognormal variance with pedigree 0.042, pedigree (1,1,3,1,1)
  uncertainty declared in reports for radioactive releases
- Zirconium-95 [water, surface water]: 0 kBq
  (same comment as for Ruthenium-103)
- Radioactive species, other beta emitters [air, non-urban air or from high stacks]: 3.47e-7 kBq; lognormal variance with pedigree 0.042, pedigree (1,1,3,1,1)
  uncertainty declared in reports for radioactive releases
- Zirconium-95 [air, non-urban air or from high stacks]: 0 kBq
  Operator data. Weighted radioactive emissions into air of Swiss nuclear power plants 1995-2002 (Weighting with net electricity production).
- Iodine-131 [water, surface water]: 2.4e-7 kBq; lognormal variance with pedigree 0.042, pedigree (1,1,3,1,1)
  uncertainty declared in reports for radioactive releases
- Cobalt-58 [water, surface water]: 8.51e-7 kBq; lognormal variance with pedigree 0.042, pedigree (1,1,3,1,1)
  uncertainty declared in reports for radioactive releases
- Tellurium-132 [water, surface water]: 0 kBq
  (same comment as for Ruthenium-103)
- Antimony-124 [air, non-urban air or from high stacks]: 0 kBq
  (same comment as for Zirconium-95)
- Hydrogen-3, Tritium [air, non-urban air or from high stacks]: 0.07 kBq; lognormal variance with pedigree 0.042, pedigree (1,1,3,1,1)
  uncertainty declared in reports for radioactive releases
- Strontium-89 [water, surface water]: 1.14e-7 kBq; lognormal variance with pedigree 0.042, pedigree (1,1,3,1,1)
  uncertainty declared in reports for radioactive releases
- Krypton-85 [air, non-urban air or from high stacks]: 0.111 kBq; lognormal variance with pedigree 0.042, pedigree (1,1,3,1,1)
  uncertainty declared in reports for radioactive releases
- Hydrogen-3, Tritium [water, surface water]: 1.51 kBq; lognormal variance with pedigree 0.042, pedigree (1,1,3,1,1)
  uncertainty declared in reports for radioactive releases
- Krypton-87 [air, non-urban air or from high stacks]: 0.000175 kBq; lognormal variance with pedigree 0.042, pedigree (1,1,3,1,1)
  uncertainty declared in reports for radioactive releases
- Water [water, unspecified]: 0.0736896 m3; name water_to_water_unspecified; = (water_decarbonised_input/1000)*(1-fraction_WDC_to_air)+water_cooling_UNO_input*(1-fraction_CW_to_air); lognormal variance with pedigree 0.130025, pedigree (4,4,5,2,4)
  Calculated value based on literature values and expert opinion. See comments in the parametres" comment field.
  property fraction, origin: salt water 0; name fraction_origin_salt_water_Ww
  property fraction, origin: fresh water 0.0951915; name fraction_origin_fresh_water_Ww
  property fraction, origin: unspecified 0.904808; name fraction_origin_unspecified_Ww
- Xenon-137 [air, non-urban air or from high stacks]: 5.99e-6 kBq; lognormal variance with pedigree 0.042, pedigree (1,1,3,1,1)
  uncertainty declared in reports for radioactive releases
- Xenon-135 [air, non-urban air or from high stacks]: 0.0125 kBq; lognormal variance with pedigree 0.042, pedigree (1,1,3,1,1)
  uncertainty declared in reports for radioactive releases
- Radioactive species, alpha emitters [water, surface water]: 0 kBq
  (same comment as for Ruthenium-103)
- Cobalt-58 [air, non-urban air or from high stacks]: 0 kBq
  (same comment as for Zirconium-95)
- Cesium-137 [air, non-urban air or from high stacks]: 0 kBq
  (same comment as for Zirconium-95)
- Niobium-95 [water, surface water]: 1.13e-7 kBq; lognormal variance with pedigree 0.042, pedigree (1,1,3,1,1)
  uncertainty declared in reports for radioactive releases
- Manganese-54 [water, surface water]: 7.39e-8 kBq; lognormal variance with pedigree 0.042, pedigree (1,1,3,1,1)
  uncertainty declared in reports for radioactive releases
- Cesium-137 [water, surface water]: 1.76e-6 kBq; lognormal variance with pedigree 0.042, pedigree (1,1,3,1,1)
  uncertainty declared in reports for radioactive releases
- Technetium-99m [water, surface water]: 0 kBq
  (same comment as for Ruthenium-103)
- Water [air, unspecified]: 0.00291684 m3; name water_to_air_unspecified; = (water_decarbonised_input/1000)*fraction_WDC_to_air+water_cooling_UNO_input*fraction_CW_to_air; lognormal variance with pedigree 0.130025, pedigree (4,4,5,2,4)
  (same comment as for Water)
  property fraction, origin: unspecified 0.74438; name fraction_origin_unspecified
  property fraction, origin: fresh water 0.25562; name fraction_origin_fresh_water
  property fraction, origin: salt water 0; name fraction_origin_salt_water
- Radioactive species, Nuclides, unspecified [water, surface water]: 5.04e-6 kBq; lognormal variance with pedigree 0.042, pedigree (1,1,3,1,1)
  uncertainty declared in reports for radioactive releases
- Krypton-88 [air, non-urban air or from high stacks]: 0.000522 kBq; lognormal variance with pedigree 0.042, pedigree (1,1,3,1,1)
  uncertainty declared in reports for radioactive releases
- Carbon-14 [air, non-urban air or from high stacks]: 0 kBq
  (same comment as for Zirconium-95)
- Iodine-133 [water, surface water]: 0 kBq
  (same comment as for Ruthenium-103)
- Cesium-136 [water, surface water]: 0 kBq
  (same comment as for Ruthenium-103)
- Xenon-135m [air, non-urban air or from high stacks]: 0.000136 kBq; lognormal variance with pedigree 0.042, pedigree (1,1,3,1,1)
  uncertainty declared in reports for radioactive releases
- Cobalt-60 [air, non-urban air or from high stacks]: 0 kBq
  (same comment as for Zirconium-95)
- Barium-140 [air, non-urban air or from high stacks]: 0 kBq
  (same comment as for Zirconium-95)
- Sodium-24 [water, surface water]: 0 kBq
  (same comment as for Ruthenium-103)
- Strontium-90 [water, surface water]: 1.9e-8 kBq; lognormal variance with pedigree 0.042, pedigree (1,1,3,1,1)
  uncertainty declared in reports for radioactive releases
- Molybdenum-99 [water, surface water]: 0 kBq
  (same comment as for Ruthenium-103)
- Antimony-122 [water, surface water]: 0 kBq
  (same comment as for Ruthenium-103)
- Cobalt-60 [water, surface water]: 5.04e-6 kBq; lognormal variance with pedigree 0.042, pedigree (1,1,3,1,1)
  uncertainty declared in reports for radioactive releases
- Tellurium-123m [water, surface water]: 0 kBq
  (same comment as for Ruthenium-103)
- Iodine-133 [air, non-urban air or from high stacks]: 0 kBq
  (same comment as for Zirconium-95)
- Xenon-131m [air, non-urban air or from high stacks]: 0.00557 kBq; lognormal variance with pedigree 0.042, pedigree (1,1,3,1,1)
  uncertainty declared in reports for radioactive releases
- Lanthanum-140 [water, surface water]: 0 kBq
  (same comment as for Ruthenium-103)
- Silver-110 [air, non-urban air or from high stacks]: 0 kBq
  (same comment as for Zirconium-95)
- Chromium-51 [water, surface water]: 9.18e-8 kBq; lognormal variance with pedigree 0.042, pedigree (1,1,3,1,1)
  uncertainty declared in reports for radioactive releases
- Krypton-85m [air, non-urban air or from high stacks]: 0.000643 kBq; lognormal variance with pedigree 0.042, pedigree (1,1,3,1,1)
  uncertainty declared in reports for radioactive releases
- Zinc-65 [water, surface water]: 0 kBq
  (same comment as for Ruthenium-103)
- Cerium-141 [water, surface water]: 0 kBq
  (same comment as for Ruthenium-103)
- Xenon-138 [air, non-urban air or from high stacks]: 2.31e-5 kBq; lognormal variance with pedigree 0.042, pedigree (1,1,3,1,1)
  uncertainty declared in reports for radioactive releases
- Iodine-131 [air, non-urban air or from high stacks]: 3.54e-7 kBq; lognormal variance with pedigree 0.042, pedigree (1,1,3,1,1)
  uncertainty declared in reports for radioactive releases
- Xenon-133m [air, non-urban air or from high stacks]: 0.00097 kBq; lognormal variance with pedigree 0.042, pedigree (1,1,3,1,1)
  uncertainty declared in reports for radioactive releases
- Antimony-125 [water, surface water]: 5.62e-7 kBq; lognormal variance with pedigree 0.042, pedigree (1,1,3,1,1)
  uncertainty declared in reports for radioactive releases
- Cobalt-57 [water, surface water]: 0 kBq
  (same comment as for Ruthenium-103)
- Cerium-144 [water, surface water]: 0 kBq
  (same comment as for Ruthenium-103)
- Argon-41 [air, non-urban air or from high stacks]: 0.0372 kBq; lognormal variance with pedigree 0.042, pedigree (1,1,3,1,1)
  uncertainty declared in reports for radioactive releases
- Krypton-89 [air, non-urban air or from high stacks]: 4.92e-5 kBq; lognormal variance with pedigree 0.042, pedigree (1,1,3,1,1)
  uncertainty declared in reports for radioactive releases
- Aerosols, radioactive, unspecified [air, non-urban air or from high stacks]: 0 kBq
  (same comment as for Zirconium-95)
- Antimony-124 [water, surface water]: 3.85e-6 kBq; lognormal variance with pedigree 0.042, pedigree (1,1,3,1,1)
  uncertainty declared in reports for radioactive releases
- Silver-110 [water, surface water]: 1.23e-6 kBq; lognormal variance with pedigree 0.042, pedigree (1,1,3,1,1)
  uncertainty declared in reports for radioactive releases
- Niobium-95 [air, non-urban air or from high stacks]: 0 kBq
  (same comment as for Zirconium-95)
- Noble gases, radioactive, unspecified [air, non-urban air or from high stacks]: 0 kBq
  (same comment as for Zirconium-95)
- Antimony-125 [air, non-urban air or from high stacks]: 0 kBq
  (same comment as for Zirconium-95)
- Cesium-134 [water, surface water]: 4.51e-7 kBq; lognormal variance with pedigree 0.042, pedigree (1,1,3,1,1)
  uncertainty declared in reports for radioactive releases
- Iron-59 [water, surface water]: 0 kBq
  (same comment as for Ruthenium-103)

## Sampling procedure
Literature, statistics of radioactive emissions, and information from operators.

## Extrapolations
This dataset has been extrapolated from year 2015 to the year of the calculation (2021). The uncertainty has been adjusted accordingly.
