# palm oil mill operation

Dataset: EcoSpold 2, unit process
Geography: MY
Time period: 1995-01-01 to 2021-12-31
Technology level: current
Classification: ISIC rev.4 ecoinvent: 1040:Manufacture of vegetable and animal oils and fats
Classification: EcoSpold01Categories: biomass/fuels
Tags: ConvertedDataset
Scenario: Business-as-Usual
System model: Allocation, cut-off by classification
Share of production covered: 0 %
Generated by: Edgard Gnansounou
Published in: Jungbluth N. 2007
Database: ecoinvent
isCopyrightProtected: true
accessRestrictedTo: 1

## General comment
Inventory refers to the production of 1 kg palm oil, respectively palm kernel oil and palm kernel meal, from palm oil. The multioutput-process 'palm fruit bunches, in oil mill' delivers the co-products 'palm oil, at oil mill', 'palm kernel oil, at oil mill' and 'palm kernel meal, at oil mill'. Economic allocation with allocation factor of 81.3% to palm oil, 17.3% to palm kernel oil, and 1.4% to palm kernel meal. Allocation of CO2 emissions is done according to carbon balance.
[This dataset was already contained in the ecoinvent database version 2. It was not individually updated during the transfer to ecoinvent version 3. Life Cycle Impact Assessment results may still have changed, as they are affected by changes in the supply chain, i.e. in other datasets. This dataset was generated following the ecoinvent quality guidelines for version 2. It may have been subject to central changes described in the ecoinvent version 3 change report (http://www.ecoinvent.org/database/ecoinvent-version-3/reports-of-changes/), and the results of the central updates were reviewed extensively. The changes added e.g. consistent water flows and other information throughout the database. The documentation of this dataset can be found in the ecoinvent reports of version 2, which are still available via the ecoinvent website. The change report linked above covers all central changes that were made during the conversion process.]

## Included activities end
This process includes the extraction of palm oil, palm kernel oil and palm kernel meal, from palm fruit bunches. Energy supply from extracted solids (fibres, shells, digester solids and empty fruit bunches) and treatment of specific wastewater effluents are taken into account. System boundary is at the oil mill.

## Geography
Data from various literature references (incl. specific Malaysian and Indonesian industrial data)

## Technology
Typical palm oil mill designed for palm oil and palm kernel oil extraction, Malaysian context. Palm fuit bunches undergo sterilization, stripping, digestion, oil extraction, screening, settling and refining.

## Time period
Data from 1995 to 2006, current technology for palm oil mills in MY

## Parameters
- fraction, tap water, to air: 0.205 dimensionless; name fraction_TW_to_air; = fraction_PW_to_air; lognormal variance with pedigree 0.092025, pedigree (4,4,3,2,4)
  Calculated value. See comment in the other parametres present in this dataset. Tap water is considered to be always used as process water, thus process water fractions to air are applied to all tap water input flows to calculate the amount of water consumed in the processes.
- fraction, cooling water, to air: 0.3875 dimensionless; name fraction_CW_to_air; = (0.5*fraction_CW_OT_to_air)+(0.5*fraction_CW_R_to_air); lognormal variance with pedigree 0.092025, pedigree (4,4,3,2,4)
  Calculated value based on literature value (see comments of the other parametres present in this dataset) and expert opinion. In the case when no industry/literature data are available about the type of cooling or directly fraction, cooling water, to air specific for the process a default assumption is applied. It is assumed that the once-through cooling system is used in 50% of all cases and recirculating system is used in another 50% of all cases.
- fraction, cooling water, once-through system, to air: 0.004 dimensionless; name fraction_CW_OT_to_air; lognormal variance with pedigree 0.0413, pedigree (2,3,1,3,1)
  Calculated based on literature value (Scown, C.D., 2011, Water Footprint of U.S. Transportation Fuels and supplying information of the article) (Vionnet, S., Quantis Water Database - Technical Report, 2012).
- fraction, cooling water, cooling pond system, to air: 0.032 dimensionless; name fraction_CW_CP_to_air; lognormal variance with pedigree 0.0413, pedigree (2,3,1,3,1)
  (same comment as for fraction, cooling water, once-through system, to air)
- fraction, cooling water, recirculating system, to air: 0.771 dimensionless; name fraction_CW_R_to_air; lognormal variance with pedigree 0.0413, pedigree (2,3,1,3,1)
  (same comment as for fraction, cooling water, once-through system, to air)
- fraction, process water, to air: 0.205 dimensionless; name fraction_PW_to_air; lognormal variance with pedigree 0.092025, pedigree (4,4,3,2,4)
  Literature value (Statistics Canada, 2007 & Shaffer, K.H., 2008, Consumptive water use in the Great Lakes Basin, USGS) (Vionnet, S., Quantis Water Database - Technical Report, 2012).
- fraction, water, decarbonised, to air: 0.3875 dimensionless; name fraction_WDC_to_air; = fraction_CW_to_air; lognormal variance with pedigree 0.092025, pedigree (4,4,3,2,4)
  Calculated value. See comments in the other parametres present in this dataset. Decarbonised water is considered to be always used as cooling water, thus cooling water fractions to air are applied to all carbonised water input flows to calculate the amount of water consumed in the processes.

## Reference product
- palm kernel oil, crude: 1 kg; By-product classification allocatable product; CPC 21691: Other vegetable oils, crude or refined, n.e.c.; CAS 8023-79-8
  EcoSpold01Location=MY
  production volume 1.84407e9 kg
    Processing of fresh palm fruit bunches was 76 Mt in 2005 in MY
    Production volumes for 2005 calculated from Palm oil production volumes, using allocation factor in Tab 17.16 (ecoinvent report v2 17)
  property heating value, net 37 MJ
    Literature value, Source: Biograce, Condensed list of standard values, version 2 - Public. Available at: https://biograce.net/app/webroot/files/file/BioGrace_condensed_list_of_standard_values_-_version_2_-_Public.doc
  property carbon content, non-fossil 0.725581
    C13H27O2. Palm kernel oil (tab 17.4, ecoinvent v2.2 report 17-part 17)
  property carbon content, fossil 0
    C13H27O2. Palm kernel oil (tab 17.4, ecoinvent v2.2 report 17-part 17)
  property price 0.444 EUR2005
    Temporary price data. Calculated as 90% of purchasers price based on: 2004 World Import/Export prices (tonnes and US$) from FaoStat statistics (http://faostat.fao.org/site/535/default.aspx#ancor, TRADE)- [Accessed 24 May 2010].
  property carbon content 0.725581
    carbon content on a dry matter basis (reserved; not for manual entry)
  property true value 0.0118188
    allocation property applied in "true value" allocation // value calculated from revenue
  properties: EcoSpold01Allocation_undefined_26 17.27, EcoSpold01Allocation_undefined_2 0, EcoSpold01Allocation_undefined_67 17.27, EcoSpold01Allocation_undefined_21 17.27, EcoSpold01Allocation_undefined_61 17.27, EcoSpold01Allocation_undefined_16 17.27, EcoSpold01Allocation_undefined_18 17.27, EcoSpold01Allocation_undefined_41 17.27, EcoSpold01Allocation_undefined_17 17.27, EcoSpold01Allocation_undefined_54 17.27, EcoSpold01Allocation_undefined_64 17.27, EcoSpold01Allocation_undefined_37 17.27, EcoSpold01Allocation_undefined_24 17.27, EcoSpold01Allocation_undefined_58 17.27, EcoSpold01Allocation_undefined_44 17.27, EcoSpold01Allocation_undefined_34 17.27, EcoSpold01Allocation_undefined_71 2.56136, EcoSpold01Allocation_undefined_72 2.57652, water content 0, wet mass 1 kg, dry mass 1 kg, water in wet mass 0 kg, EcoSpold01Allocation_undefined_50 17.27, EcoSpold01Allocation_undefined_13 17.27, EcoSpold01Allocation_undefined_60 17.27, EcoSpold01Allocation_undefined_31 17.27, EcoSpold01Allocation_undefined_10 17.27, EcoSpold01Allocation_undefined_52 17.27, EcoSpold01Allocation_undefined_15 17.27, EcoSpold01Allocation_undefined_25 17.27, EcoSpold01Allocation_undefined_30 17.27, EcoSpold01Allocation_undefined_66 17.27, EcoSpold01Allocation_undefined_40 17.27, EcoSpold01Allocation_undefined_35 17.27, EcoSpold01Allocation_undefined_9 17.27, EcoSpold01Allocation_undefined_27 17.27, EcoSpold01Allocation_undefined_46 17.27, EcoSpold01Allocation_undefined_23 17.27, EcoSpold01Allocation_undefined_28 17.27, EcoSpold01Allocation_undefined_59 17.27, EcoSpold01Allocation_undefined_56 17.27, EcoSpold01Allocation_undefined_57 17.27, EcoSpold01Allocation_undefined_4 17.27, EcoSpold01Allocation_undefined_51 17.27, EcoSpold01Allocation_undefined_12 17.27, EcoSpold01Allocation_undefined_65 17.27, EcoSpold01Allocation_undefined_39 17.27, EcoSpold01Allocation_undefined_8 17.27, EcoSpold01Allocation_undefined_7 17.27, EcoSpold01Allocation_undefined_19 17.27, EcoSpold01Allocation_undefined_43 17.27, EcoSpold01Allocation_undefined_42 17.27, EcoSpold01Allocation_undefined_6 17.27, EcoSpold01Allocation_undefined_63 17.27, EcoSpold01Allocation_undefined_22 17.27, EcoSpold01Allocation_undefined_48 17.27, EcoSpold01Allocation_undefined_49 17.27, EcoSpold01Allocation_undefined_20 17.27, EcoSpold01Allocation_undefined_5 17.27, EcoSpold01Allocation_undefined_36 17.27, EcoSpold01Allocation_undefined_29 17.27, EcoSpold01Allocation_undefined_11 17.27, EcoSpold01Allocation_undefined_62 17.27, EcoSpold01Allocation_undefined_53 17.27, EcoSpold01Allocation_undefined_55 17.27, EcoSpold01Allocation_undefined_32 17.27, EcoSpold01Allocation_undefined_38 17.27, EcoSpold01Allocation_undefined_14 17.27, EcoSpold01Allocation_undefined_45 17.27, EcoSpold01Allocation_undefined_33 17.27, EcoSpold01Allocation_undefined_3 17.27, EcoSpold01Allocation_undefined_69 100, EcoSpold01Allocation_undefined_47 17.27, EcoSpold01Allocation_undefined_68 27.32, carbon allocation 0.725581 kg
- palm oil, crude: 0 kg; CPC 21651: Palm oil, crude; By-product classification allocatable product; CAS 8002-75-3
  EcoSpold01Location=MY
  production volume 1.49617e10 kg
    Processing of fresh palm fruit bunches was 76 Mt in 2005 in MY
    Production volumes for 2005 from FAOSTAT (Production).
  property carbon content, non-fossil 0.752881
    C49H97O6. Palm oil (tab 17.4, ecoinvent v2.2 report 17-part 17)
  property carbon content, fossil 0
    C49H97O6. Palm oil (tab 17.4, ecoinvent v2.2 report 17-part 17)
  property price 0.362 EUR2005
    (same comment as for palm kernel oil, crude)
  property heating value, net 37 MJ
    (same comment as for palm kernel oil, crude)
  property carbon content 0.752881
    carbon content on a dry matter basis (reserved; not for manual entry)
  property true value 0.078116
    allocation property applied in "true value" allocation // value calculated from revenue
  properties: EcoSpold01Allocation_undefined_71 97.1696, EcoSpold01Allocation_undefined_72 97.1532, water content 0, wet mass 1 kg, water in wet mass 0 kg, dry mass 1 kg, EcoSpold01Allocation_undefined_27 81.33, EcoSpold01Allocation_undefined_20 81.33, EcoSpold01Allocation_undefined_21 81.33, EcoSpold01Allocation_undefined_13 81.33, EcoSpold01Allocation_undefined_18 81.33, EcoSpold01Allocation_undefined_65 81.33, EcoSpold01Allocation_undefined_35 81.33, EcoSpold01Allocation_undefined_7 81.33, EcoSpold01Allocation_undefined_56 81.33, EcoSpold01Allocation_undefined_14 81.33, EcoSpold01Allocation_undefined_12 81.33, EcoSpold01Allocation_undefined_50 81.33, EcoSpold01Allocation_undefined_39 81.33, EcoSpold01Allocation_undefined_28 81.33, EcoSpold01Allocation_undefined_61 81.33, EcoSpold01Allocation_undefined_41 81.33, EcoSpold01Allocation_undefined_44 81.33, EcoSpold01Allocation_undefined_1 100, EcoSpold01Allocation_undefined_67 81.33, EcoSpold01Allocation_undefined_36 81.33, EcoSpold01Allocation_undefined_62 81.33, EcoSpold01Allocation_undefined_63 81.33, EcoSpold01Allocation_undefined_48 81.33, EcoSpold01Allocation_undefined_37 81.33, EcoSpold01Allocation_undefined_34 81.33, EcoSpold01Allocation_undefined_29 81.33, EcoSpold01Allocation_undefined_24 81.33, EcoSpold01Allocation_undefined_59 81.33, EcoSpold01Allocation_undefined_49 81.33, EcoSpold01Allocation_undefined_64 81.33, EcoSpold01Allocation_undefined_17 81.33, EcoSpold01Allocation_undefined_11 81.33, EcoSpold01Allocation_undefined_5 81.33, EcoSpold01Allocation_undefined_8 81.33, EcoSpold01Allocation_undefined_10 81.33, EcoSpold01Allocation_undefined_22 81.33, EcoSpold01Allocation_undefined_6 81.33, EcoSpold01Allocation_undefined_15 81.33, EcoSpold01Allocation_undefined_19 81.33, EcoSpold01Allocation_undefined_2 0, EcoSpold01Allocation_undefined_46 81.33, EcoSpold01Allocation_undefined_31 81.33, EcoSpold01Allocation_undefined_52 81.33, EcoSpold01Allocation_undefined_51 81.33, EcoSpold01Allocation_undefined_45 81.33, EcoSpold01Allocation_undefined_58 81.33, EcoSpold01Allocation_undefined_60 81.33, EcoSpold01Allocation_undefined_40 81.33, EcoSpold01Allocation_undefined_3 81.33, EcoSpold01Allocation_undefined_57 81.33, EcoSpold01Allocation_undefined_9 81.33, EcoSpold01Allocation_undefined_30 81.33, EcoSpold01Allocation_undefined_43 81.33, EcoSpold01Allocation_undefined_32 81.33, EcoSpold01Allocation_undefined_25 81.33, EcoSpold01Allocation_undefined_68 72.68, EcoSpold01Allocation_undefined_54 81.33, EcoSpold01Allocation_undefined_16 81.33, EcoSpold01Allocation_undefined_66 81.33, EcoSpold01Allocation_undefined_23 81.33, EcoSpold01Allocation_undefined_53 81.33, EcoSpold01Allocation_undefined_42 81.33, EcoSpold01Allocation_undefined_4 81.33, EcoSpold01Allocation_undefined_47 81.33, EcoSpold01Allocation_undefined_55 81.33, EcoSpold01Allocation_undefined_33 81.33, EcoSpold01Allocation_undefined_38 81.33, EcoSpold01Allocation_undefined_26 81.33, carbon allocation 0.752881 kg

## By-products
- palm kernel meal: 0 kg; CPC 23319: Preparations used in animal feeding n.e.c.; By-product classification allocatable product
  EcoSpold01Location=MY
  production volume 2.20528e9 kg
    (same comment as for palm kernel oil, crude)
  property carbon content, non-fossil 0.486591
    Composition data obtained from Table 1 in Palm Kernel Cake (PKC) as a Supplement for Fattening and Dairy Cattle in Malaysia, F.Y. Chin, FAO 7th Meeting of the Regional Working Group on Grazing and Feed Resources, 2001. First, composition data were refered to 1 kg dry mass. Then, C-contents were calculated considering a C-content/dry mass of 46% in carbohydrates (including fibres), 53% in proteins and 75% in fats. All data from "Evolutionary and Biochemical Aspects", A.D. Kay and T. Vrede (in Global Ecology, 2010, Elsevier B.V., S.E. Jørgensen Ed.).
  property price 0.061 EUR2005
    (same comment as for palm kernel oil, crude)
  property carbon content 0.486591
    carbon content on a dry matter basis (reserved; not for manual entry)
  property true value 0.00193205
    allocation property applied in "true value" allocation // value calculated from revenue
  properties: EcoSpold01Allocation_undefined_31 1.402, EcoSpold01Allocation_undefined_42 1.402, EcoSpold01Allocation_undefined_7 1.402, EcoSpold01Allocation_undefined_5 1.402, EcoSpold01Allocation_undefined_19 1.402, EcoSpold01Allocation_undefined_64 1.402, EcoSpold01Allocation_undefined_70 100, EcoSpold01Allocation_undefined_28 1.402, EcoSpold01Allocation_undefined_51 1.402, EcoSpold01Allocation_undefined_30 1.402, EcoSpold01Allocation_undefined_15 1.402, EcoSpold01Allocation_undefined_22 1.402, EcoSpold01Allocation_undefined_2 100, EcoSpold01Allocation_undefined_52 1.402, EcoSpold01Allocation_undefined_6 1.402, EcoSpold01Allocation_undefined_35 1.402, EcoSpold01Allocation_undefined_47 1.402, EcoSpold01Allocation_undefined_45 1.402, EcoSpold01Allocation_undefined_18 1.402, EcoSpold01Allocation_undefined_63 1.402, EcoSpold01Allocation_undefined_33 1.402, EcoSpold01Allocation_undefined_24 1.402, EcoSpold01Allocation_undefined_44 1.402, EcoSpold01Allocation_undefined_39 1.402, EcoSpold01Allocation_undefined_68 0, EcoSpold01Allocation_undefined_26 1.402, EcoSpold01Allocation_undefined_34 1.402, EcoSpold01Allocation_undefined_27 1.402, EcoSpold01Allocation_undefined_17 1.402, EcoSpold01Allocation_undefined_61 1.402, EcoSpold01Allocation_undefined_46 1.402, EcoSpold01Allocation_undefined_65 1.402, EcoSpold01Allocation_undefined_66 1.402, EcoSpold01Allocation_undefined_48 1.402, EcoSpold01Allocation_undefined_56 1.402, EcoSpold01Allocation_undefined_4 1.402, EcoSpold01Allocation_undefined_58 1.402, EcoSpold01Allocation_undefined_38 1.402, EcoSpold01Allocation_undefined_62 1.402, EcoSpold01Allocation_undefined_23 1.402, EcoSpold01Allocation_undefined_13 1.402, EcoSpold01Allocation_undefined_3 1.402, EcoSpold01Allocation_undefined_10 1.402, EcoSpold01Allocation_undefined_11 1.402, EcoSpold01Allocation_undefined_40 1.402, EcoSpold01Allocation_undefined_9 1.402, EcoSpold01Allocation_undefined_14 1.402, EcoSpold01Allocation_undefined_72 0.270237, EcoSpold01Allocation_undefined_71 0.26907, water content 0.0787487, water in wet mass 0.073 kg, carbon content, fossil 0, dry mass 0.927 kg, wet mass 1 kg, EcoSpold01Allocation_undefined_8 1.402, EcoSpold01Allocation_undefined_55 1.402, EcoSpold01Allocation_undefined_50 1.402, EcoSpold01Allocation_undefined_41 1.402, EcoSpold01Allocation_undefined_67 1.402, EcoSpold01Allocation_undefined_29 1.402, EcoSpold01Allocation_undefined_12 1.402, EcoSpold01Allocation_undefined_36 1.402, EcoSpold01Allocation_undefined_60 1.402, EcoSpold01Allocation_undefined_32 1.402, EcoSpold01Allocation_undefined_49 1.402, EcoSpold01Allocation_undefined_57 1.402, EcoSpold01Allocation_undefined_16 1.402, EcoSpold01Allocation_undefined_53 1.402, EcoSpold01Allocation_undefined_37 1.402, EcoSpold01Allocation_undefined_21 1.402, EcoSpold01Allocation_undefined_59 1.402, EcoSpold01Allocation_undefined_43 1.402, EcoSpold01Allocation_undefined_25 1.402, EcoSpold01Allocation_undefined_20 1.402, EcoSpold01Allocation_undefined_54 1.402, carbon allocation 0.45107 kg

## Inputs from technosphere
- oil mill: 1.06511e-9 unit; lognormal variance with pedigree 0.4221, pedigree (1,4,5,3,4)
  EcoSpold01Location=CH
  Calculation, according to production capacity and lifetime of the plant
  Uncertainty: Calculation, according to production capacity and lifetime of the plant
- phosphoric acid, industrial grade, without water, in 85% solution state: 0.000935249 kg; lognormal variance with pedigree 0.041225, pedigree (2,3,5,2,1)
  EcoSpold01Location=RER
  Literature data & biodiesel producer
  Uncertainty: Literature data & biodiesel producer
  properties: dry mass 1 kg, wet mass 1 kg
- water, decarbonised: 0.0136771 kg; name water_decarbonised_input; lognormal variance with pedigree 0.07, pedigree (4,4,5,1,1)
  EcoSpold01Location=RER
  Adapted from the dataset 'wood chips, in cogen 6400kWth, wood', according to actual water, carbon and energy content of the fuel (fibres, empty fruit bunch, shell, digester solids)
  Uncertainty: Adapted from the dataset 'wood chips, in cogen 6400kWth, wood', according to actual water, carbon and energy content of the fuel (fibres, empty fruit bunch, shell, digester solids)
  properties: wet mass 1 kg
- lubricating oil: 5.70014e-5 kg; lognormal variance with pedigree 0.07, pedigree (4,4,5,1,1)
  Adapted from the dataset 'wood chips, in cogen 6400kWth, wood', according to actual water, carbon and energy content of the fuel (fibres, empty fruit bunch, shell, digester solids)
  EcoSpold01Location=RER
  Uncertainty: Adapted from the dataset 'wood chips, in cogen 6400kWth, wood', according to actual water, carbon and energy content of the fuel (fibres, empty fruit bunch, shell, digester solids)
  properties: dry mass 1 kg, wet mass 1 kg, heating value, net 40.2 MJ, carbon content, fossil 0.75
  note on heating value, net: Literature value, Source: IPCC 2006, 2006 IPCC Guidelines for National Greenhouse Gas Inventories, Prepared by the National Greenhouse Gas Inventories Programme, Eggleston H.S., Buendia L., Miwa K., Ngara T. and Tanabe K. (eds). Published: IGES, Japan
  note on carbon content, fossil: Lubricating oil is produced from diesel. C-content/dry mass of fats and oils considered 75%, from: ecoinvent v2.2 report, n 15a, pg 40
- heat and power co-generation unit, 6400kW thermal, common components for heat+electricity: 1.67708e-8 unit; lognormal variance with pedigree 0.37, pedigree (4,4,5,1,1)
  EcoSpold01Location=CH
  Adapted from the dataset 'wood chips, in cogen 6400kWth, wood', according to actual water, carbon and energy content of the fuel (fibres, empty fruit bunch, shell, digester solids)
  Uncertainty: Adapted from the dataset 'wood chips, in cogen 6400kWth, wood', according to actual water, carbon and energy content of the fuel (fibres, empty fruit bunch, shell, digester solids)
- chemical, organic: 9.97548e-5 kg; lognormal variance with pedigree 0.07, pedigree (4,4,5,1,1)
  Adapted from the dataset 'wood chips, in cogen 6400kWth, wood', according to actual water, carbon and energy content of the fuel (fibres, empty fruit bunch, shell, digester solids)
  EcoSpold01Location=GLO
  Uncertainty: Adapted from the dataset 'wood chips, in cogen 6400kWth, wood', according to actual water, carbon and energy content of the fuel (fibres, empty fruit bunch, shell, digester solids)
  properties: carbon content, fossil 0.628, wet mass 1 kg, dry mass 1 kg, heating value, net 19.03 MJ
  note on carbon content, fossil: This dataset is an unweighted average of 20 organic substances (listed in Tab 88.1, ecoinvent v2.2 report 8, part II), being part of the top100 chemicals included in this database. The C-content has also been calculated as an unweighted average of the C content of the substances composing this dataset.
- heat and power co-generation unit, 6400kW thermal, components for electricity only: 1.67708e-8 unit; lognormal variance with pedigree 0.37, pedigree (4,4,5,1,1)
  (same comment as for heat and power co-generation unit, 6400kW thermal, common components f)
- hexane: 0.0032502 kg; lognormal variance with pedigree 0.0432, pedigree (2,3,5,5,1)
  EcoSpold01Location=RER
  Literature and industrial data
  Uncertainty: Literature and industrial data
  properties: carbon content, fossil 0.837209, wet mass 1 kg, dry mass 1 kg, heating value, net 45.02 MJ
- ammonia, anhydrous, liquid: 1.42508e-7 kg; lognormal variance with pedigree 0.07, pedigree (4,4,5,1,1)
  (same comment as for lubricating oil)
  properties: wet mass 1 kg, dry mass 1 kg
- municipal solid waste: -5.70014e-5 kg; lognormal variance with pedigree 0.07, pedigree (4,4,5,1,1)
  Adapted from the dataset 'wood chips, in cogen 6400kWth, wood', according to actual water, carbon and energy content of the fuel (fibres, empty fruit bunch, shell, digester solids)
  EcoSpold01Location=CH
  Uncertainty: Adapted from the dataset 'wood chips, in cogen 6400kWth, wood', according to actual water, carbon and energy content of the fuel (fibres, empty fruit bunch, shell, digester solids)
  production volume 817732 kg
    Calculated from the production volume of palm oil in proportion to the respective output amounts.
  properties: heating value, net 11.74 MJ, carbon content, fossil 0.171549, carbon content, non-fossil 0.261655, water content 0.297017, wet mass 1 kg, dry mass 0.771 kg
  note on heating value, net: Value taken from the general comment of the treatment dataset.
  note on carbon content, fossil: MSW composition in tab 4.1, ecoinvent v2.2 report 13_I. C content referred to 1 kg DM
- palm fruit bunch: 4.83308 kg; lognormal variance with pedigree 0.0501, pedigree (1,2,5,1,1)
  EcoSpold01Location=MY
  Literature and industrial data, cross-checking of various references
  Uncertainty: Literature and industrial data, cross-checking of various references
  properties: water content 0.886792, carbon content, non-fossil 0.590566, dry mass 0.53 kg, wet mass 1 kg
- wastewater, average: -1.36771e-5 m3; lognormal variance with pedigree 0.07, pedigree (4,4,5,1,1)
  (same comment as for heat and power co-generation unit, 6400kW thermal, common components f)
  production volume 196210 m3
    (same comment as for municipal solid waste)
  properties: wet mass 1000 kg, water content 2882.2, carbon content, non-fossil 0.194039, dry mass 0.346837 kg
  note on carbon content, non-fossil: 0.0673 kg TOC/m3 (Tab A.17, ecoinvent v2.2 report 13_I). TOC was considered as Total Carbon.
- heat and power co-generation unit, 6400kW thermal, building: 4.1883e-9 unit; lognormal variance with pedigree 0.37, pedigree (4,4,5,1,1)
  (same comment as for municipal solid waste)
- sodium chloride, powder: 7.12541e-5 kg; lognormal variance with pedigree 0.07, pedigree (4,4,5,1,1)
  (same comment as for lubricating oil)
  properties: wet mass 1 kg, dry mass 1 kg
- tap water: 14.7998 kg; name tap_water_input; source Subramaniam, V. 2008; lognormal variance with pedigree 0.052625, pedigree (3,3,5,2,1)
  EcoSpold01Location=RER
  Literature and industrial data
  Calculated based on literature, (Vionnet, S., Quantis Water Database - Technical Report, 2012). The process starts when fruit bunches enters the palm oil plant. It includes the main processes: sterilizing, stripping, screw press, vibrating screen, clarifier and purifier.
  Uncertainty: Literature and industrial data
  properties: carbon content, fossil 0.00178991, wet mass 1 kg, water content 2962.17, dry mass 0.000337476 kg
  note on carbon content, fossil: Bicarbonate content is 2.93 mol/m3. CO2 content is 0.1 mol/m3 (ecoinvent v2.2 report 8, Tab 93.1).
- wastewater, from residence: -0.00395264 m3; lognormal variance with pedigree 0.0406, pedigree (1,3,5,1,1)
  Calculation, to close mass balance of process
  EcoSpold01Location=CH
  Uncertainty: Calculation, to close mass balance of process
  production volume 5.67039e7 m3
    (same comment as for municipal solid waste)
  properties: water content 2962.17, wet mass 1000 kg, carbon content, non-fossil 0.199421, dry mass 0.337476 kg
- waste mineral oil: -5.70014e-5 kg; lognormal variance with pedigree 0.07, pedigree (4,4,5,1,1)
  (same comment as for heat and power co-generation unit, 6400kW thermal, common components f)
  production volume 817732 kg
    (same comment as for municipal solid waste)
  properties: water content 0.111111, dry mass 0.9 kg, carbon content, fossil 0.864444, wet mass 1 kg, heating value, net 34.7 MJ
  note on carbon content, fossil: Tab A.6, ecoinvent v2.2 report 13_I. C content has been calculated after data in the tables, and then referred to 1 kg DM
- wood ash mixture, pure: -0.00919344 kg; lognormal variance with pedigree 0.07, pedigree (4,4,5,1,1)
  (same comment as for heat and power co-generation unit, 6400kW thermal, common components f)
  production volume 1.31887e8 kg
    (same comment as for municipal solid waste)
  properties: carbon content, non-fossil 0.012, wet mass 1 kg, dry mass 1 kg
- chlorine, liquid: 5.70014e-6 kg; lognormal variance with pedigree 0.07, pedigree (4,4,5,1,1)
  (same comment as for lubricating oil)
  properties: wet mass 1 kg, dry mass 1 kg

## Inputs from nature
- Carbon dioxide, in air [natural resource, in air]: 0.172096 kg; lognormal variance with pedigree 0.040025, pedigree (1,1,5,2,1)
  Calculation, to close carbon balance
  Uncertainty: Calculation, to close carbon balance

## Emissions to nature
- Benzene [air, urban air close to ground]: 1.52706e-5 kg; lognormal variance with pedigree 0.11, pedigree (4,4,5,1,1)
  Adapted from the dataset 'wood chips, in cogen 6400kWth, wood', according to actual water, carbon and energy content of the fuel (fibres, empty fruit bunch, shell, digester solids)
  Uncertainty: Adapted from the dataset 'wood chips, in cogen 6400kWth, wood', according to actual water, carbon and energy content of the fuel (fibres, empty fruit bunch, shell, digester solids)
- Acetaldehyde [air, urban air close to ground]: 1.06009e-6 kg; lognormal variance with pedigree 0.11, pedigree (4,4,5,1,1)
  (same comment as for Benzene)
- Nickel [air, urban air close to ground]: 1.04274e-7 kg; lognormal variance with pedigree 0.71, pedigree (4,4,5,1,1)
  (same comment as for Benzene)
- Bromine [air, urban air close to ground]: 1.04274e-6 kg; lognormal variance with pedigree 0.71, pedigree (4,4,5,1,1)
  (same comment as for Benzene)
- m-Xylene [air, urban air close to ground]: 2.0137e-6 kg; lognormal variance with pedigree 0.11, pedigree (4,4,5,1,1)
  (same comment as for Benzene)
- Zinc [air, urban air close to ground]: 5.21344e-6 kg; lognormal variance with pedigree 0.71, pedigree (4,4,5,1,1)
  (same comment as for Benzene)
- Ammonia [air, urban air close to ground]: 3.02391e-5 kg; lognormal variance with pedigree 0.07, pedigree (4,4,5,1,1)
  (same comment as for Benzene)
- Nitrogen oxides [air, urban air close to ground]: 0.00152933 kg; lognormal variance with pedigree 0.11, pedigree (4,4,5,1,1)
  (same comment as for Benzene)
- Particulates, < 2.5 um [air, urban air close to ground]: 0.000753477 kg; lognormal variance with pedigree 0.37, pedigree (4,4,5,1,1)
  (same comment as for Benzene)
- Methane, non-fossil [air, urban air close to ground]: 7.28297e-6 kg; lognormal variance with pedigree 0.11, pedigree (4,4,5,1,1)
  (same comment as for Benzene)
- Sodium [air, urban air close to ground]: 2.25927e-5 kg; lognormal variance with pedigree 0.71, pedigree (4,4,5,1,1)
  (same comment as for Benzene)
- Hydrocarbons, aliphatic, unsaturated [air, urban air close to ground]: 5.20184e-5 kg; lognormal variance with pedigree 0.11, pedigree (4,4,5,1,1)
  (same comment as for Benzene)
- Carbon monoxide, non-fossil [air, urban air close to ground]: 0.000117468 kg; lognormal variance with pedigree 0.71, pedigree (4,4,5,1,1)
  (same comment as for Benzene)
- Hydrocarbons, aliphatic, alkanes, unspecified [air, urban air close to ground]: 1.52706e-5 kg; lognormal variance with pedigree 0.11, pedigree (4,4,5,1,1)
  (same comment as for Benzene)
- Toluene [air, urban air close to ground]: 5.03414e-6 kg; lognormal variance with pedigree 0.11, pedigree (4,4,5,1,1)
  (same comment as for Benzene)
- Calcium [air, urban air close to ground]: 0.000101669 kg; lognormal variance with pedigree 0.71, pedigree (4,4,5,1,1)
  (same comment as for Benzene)
- Hexane [air, urban air close to ground]: 0.0032502 kg; lognormal variance with pedigree 0.08, pedigree (1,1,5,1,1)
  Calculation, based on hexane input
  Uncertainty: Calculation, based on hexane input
- NMVOC, non-methane volatile organic compounds, unspecified origin [air, urban air close to ground]: 1.02365e-5 kg; lognormal variance with pedigree 0.11, pedigree (4,4,5,1,1)
  (same comment as for Benzene)
- Fluorine [air, urban air close to ground]: 8.6894e-7 kg; lognormal variance with pedigree 0.11, pedigree (4,4,5,1,1)
  (same comment as for Benzene)
- Chromium [air, urban air close to ground]: 6.88182e-8 kg; lognormal variance with pedigree 0.71, pedigree (4,4,5,1,1)
  (same comment as for Benzene)
- Dinitrogen monoxide [air, urban air close to ground]: 3.99715e-5 kg; lognormal variance with pedigree 0.11, pedigree (4,4,5,1,1)
  (same comment as for Benzene)
- Lead [air, urban air close to ground]: 4.32735e-7 kg; lognormal variance with pedigree 0.71, pedigree (4,4,5,1,1)
  (same comment as for Benzene)
- Benzene, ethyl- [air, urban air close to ground]: 5.03414e-7 kg; lognormal variance with pedigree 0.11, pedigree (4,4,5,1,1)
  (same comment as for Benzene)
- Phosphorus [air, urban air close to ground]: 5.21344e-6 kg; lognormal variance with pedigree 0.11, pedigree (4,4,5,1,1)
  (same comment as for Benzene)
- Cadmium [air, urban air close to ground]: 1.21653e-8 kg; lognormal variance with pedigree 0.71, pedigree (4,4,5,1,1)
  (same comment as for Benzene)
- Chlorine [air, urban air close to ground]: 3.12821e-6 kg; lognormal variance with pedigree 0.11, pedigree (4,4,5,1,1)
  (same comment as for Benzene)
- PAH, polycyclic aromatic hydrocarbons [air, urban air close to ground]: 1.8459e-7 kg; lognormal variance with pedigree 0.37, pedigree (4,4,5,1,1)
  (same comment as for Benzene)
- Water [air, unspecified]: 0.00303926 m3; name water_to_air_unspecified; = (tap_water_input/1000*fraction_TW_to_air)+(water_decarbonised_input/1000*fraction_WDC_to_air); lognormal variance with pedigree 0.0807, pedigree (2,2,5,1,1)
  Calculated value based on literature values and expert opinion. See comments in the parametres' comment field.
  property fraction, origin: salt water 0; name fraction_origin_salt_water
  property fraction, origin: unspecified 0; name fraction_origin_unspecified
  property fraction, origin: fresh water 1; name fraction_origin_fresh_water
- Arsenic [air, urban air close to ground]: 1.73788e-8 kg; lognormal variance with pedigree 0.71, pedigree (4,4,5,1,1)
  (same comment as for Benzene)
- Benzo(a)pyrene [air, urban air close to ground]: 8.39023e-9 kg; lognormal variance with pedigree 0.37, pedigree (4,4,5,1,1)
  (same comment as for Benzene)
- Water [water, unspecified]: 0.00775818 m3; name water_to_water_unspecified; = (tap_water_input/1000)*(1-fraction_TW_to_air)+(water_decarbonised_input/1000)*(1-fraction_WDC_to_air)-0.00081783-1.31141387460031E-05; lognormal variance with pedigree 0.0807, pedigree (2,2,5,1,1)
  (same comment as for Water)
  property dry mass 0 kg; name DM
  property carbon content, fossil 0; name C_content_fossil
  property water in wet mass 1000 kg; name WWM
  property carbon content, non-fossil 0; name C_content_non_fossil
  property fraction, origin: fresh water 1; name fraction_origin_fresh_water_Ww
  property fraction, origin: salt water 0; name fraction_origin_salt_water_Ww
  property fraction, origin: unspecified 0; name fraction_origin_unspecified_Ww
  property wet mass 1000 kg; name WM
- Phenol, pentachloro- [air, urban air close to ground]: 1.35926e-10 kg; lognormal variance with pedigree 0.11, pedigree (4,4,5,1,1)
  (same comment as for Benzene)
- Carbon dioxide, non-fossil [air, urban air close to ground]: 2.23946 kg; lognormal variance with pedigree 0.04, pedigree (1,1,5,1,1)
  Calculation, to close carbon balance
  Uncertainty: Calculation, to close carbon balance
- Manganese [air, urban air close to ground]: 2.97176e-6 kg; lognormal variance with pedigree 0.71, pedigree (4,4,5,1,1)
  (same comment as for Benzene)
- Potassium [air, urban air close to ground]: 0.000406665 kg; lognormal variance with pedigree 0.71, pedigree (4,4,5,1,1)
  (same comment as for Benzene)
- Magnesium [air, urban air close to ground]: 6.27382e-6 kg; lognormal variance with pedigree 0.71, pedigree (4,4,5,1,1)
  (same comment as for Benzene)
- Benzene, hexachloro- [air, urban air close to ground]: 1.20822e-13 kg; lognormal variance with pedigree 0.37, pedigree (4,4,5,1,1)
  (same comment as for Benzene)
- Mercury [air, urban air close to ground]: 5.21344e-9 kg; lognormal variance with pedigree 0.71, pedigree (4,4,5,1,1)
  (same comment as for Benzene)
- Sulfur dioxide [air, urban air close to ground]: 4.32735e-5 kg; lognormal variance with pedigree 0.07, pedigree (4,4,5,1,1)
  (same comment as for Benzene)
- Dioxins, measured as 2,3,7,8-tetrachlorodibenzo-p-dioxin [air, urban air close to ground]: 5.20184e-13 kg; lognormal variance with pedigree 0.37, pedigree (4,4,5,1,1)
  (same comment as for Benzene)
- Copper [air, urban air close to ground]: 3.82335e-7 kg; lognormal variance with pedigree 0.71, pedigree (4,4,5,1,1)
  (same comment as for Benzene)
- Chromium VI [air, urban air close to ground]: 6.95142e-10 kg; lognormal variance with pedigree 0.71, pedigree (4,4,5,1,1)
  (same comment as for Benzene)
- Formaldehyde [air, urban air close to ground]: 2.18151e-6 kg; lognormal variance with pedigree 0.11, pedigree (4,4,5,1,1)
  (same comment as for Benzene)

## Sampling procedure
Cross-checking of various literature sources from 1998 to 2006

## Extrapolations
Direct emissions (resulting from the combustion of sorghum bagasse) are based on the the combustion of wood chips (without emission control), according to the corresponding dry matter content, carbon content and energy content.

## Review by Niels Jungbluth 2006-08-15
Passed.
none
