# treatment of digester sludge, municipal incineration

Dataset: EcoSpold 2, unit process
Geography: GLO
Time period: 2006-01-01 to 2021-12-31
Technology level: current
Classification: ISIC rev.4 ecoinvent: 3821:Treatment and disposal of non-hazardous waste
Synonyms: Siedlungsabfallverbrennung; Kehrichtverbrennung; municipal waste incineration
Scenario: Business-as-Usual
System model: Allocation, cut-off by classification
Share of production covered: 1.8 %
Generated by: Gabor Doka
Published in: Doka G. 2013
Database: ecoinvent
isCopyrightProtected: true
accessRestrictedTo: 1

## General comment
This dataset represents the activity of waste disposal of digester sludge in a municipal solid waste incinerator (MSWI) // Recommended use of this dataset: for incineration of fermented (digested) sewage sludge from treatment of average municipal wastewater // // Waste composition (wet, in ppm): upper heating value 4.256 MJ/kg; lower heating value 2.42 MJ/kg; H2O 730020; O 51114; H 11617; C 92935; S 6170.5; N 5783.4; P 8623.3; B n.a.; Cl n.a.; Br n.a.; F n.a.; I n.a.; Ag n.a.; As 0.77875; Ba n.a.; Cd 0.55416; Co 3.1946; Cr 24.155; Cu 111.19; Hg 0.55416; Mn 104.66; Mo 1.8907; Ni 10.399; Pb 30.805; Sb n.a.; Se n.a.; Sn 7.9298; V n.a.; Zn 302.93; Be n.a.; Sc n.a.; Sr n.a.; Ti n.a.; Tl n.a.; W n.a.; Si 11783; Fe 53210; Ca 19995; Al 5906.7; K n.a.; Mg 2244.8; Na n.a.; // Share of carbon in waste that is biogenic 100%. // Share of metals in waste not oxidised and bulk-recyclable (exclude very small or thin parts) Iron: 0%; Alu: 0%; Copper: 0%. // One kg of this waste produces 0.188 kg of slag and 0.02373 kg of residues, which are landfilled. Additional solidification with 0.009494 kg of cement. // Net energy production: 0.16MJ/kg electric energy and 0.52MJ/kg thermal energy. // Recovery of metal scrap to recycling: 0g iron scrap, 0g aluminium scrap, 0g copper scrap.

## Included activities start
waste incineration from waste reception gate and delivery into waste bunker at incinerator plant site (without transports to the incinerator)

## Included activities end
Waste-specific short-term emissions to water from leachate. Long-term emissions from landfill to ground water.

## Geography
Specific to the technology mix encountered in Switzerland in 2010. Well applicable to modern incineration practices in Europe, North America or Japan.

## Technology
average Swiss MSWI plants in 2010 (grate incinerators) with electrostatic precipitator for fly ash (ESP), wet flue gas scrubber and 25% SNCR , 42.77% SCR-high dust , 32.68% SCR-low dust -DeNOx facilities and 0% without Denox (weighted according to mass of burnt waste, representing Swiss average). Efficiency of iron scrap separation from slag : 58%. Efficiency of non-ferrous scrap separation from slag : 31%. Gross electric efficiency technology mix 15.84% and Gross thermal efficiency technology mix 28.51%

## Time period
Waste composition as given in literature reference, theoretical data or other source. Transfer coefficients for modern MSWI.

## Reference product
- digester sludge: 0 kg; CPC 39920: Sewage sludge; By-product classification Recyclable
  Main reference product of this activity (supply of disposal service).
  production volume 0 kg
    based on qualified estimate on MSW in WTE globally and share of sewage sludge in Swiss MSWI (Binggeli et al. 2012) and unqualified split into 70% digester sludge and 30% raw sludge.
  property heating value, net 2.42 MJ
    Value taken from the general comment of the treatment dataset.
  property carbon content 0.3444
    carbon content on a dry matter basis (reserved; not for manual entry)
  properties: water content 19, carbon content, non-fossil 0.3444, price 0 EUR2005, carbon content, fossil 0, wet mass 1 kg, dry mass 0.05 kg, water in wet mass 0.95 kg, carbon allocation 0.01722 kg
- heat, for reuse in municipal waste incineration only: 1 MJ; name E_th_prod_MSWI; By-product classification allocatable product; CPC 17300: Steam and hot water; pedigree (1,1,1,1,1)
  Net electricity generated from this waste and used in internal MSWI plant energy redistribution.
  Uncertainty: uncertainty is calculated from uncertainties in waste composition and uncertainties in energy efficiency and the uncertainty in internal energy demand
  production volume 3.898e9 MJ
    calculated in proportion to reference product waste input to incinerator
  property exergy 0.1842 MJ; name E_th_prod_MSWI_exergy
    This exergy property is based on the exergy content of the product.
  property true value relation 0.1842; name E_th_prod_MSWI_true_value_relation
    property to calculate "true value" from
  property price 0.0106 EUR2005; name E_th_prod_MSWI_price_EUR2005
    Average European district heat price from Ecoheatcool and Euroheat 2005-2006, Ecoheat Work package 1: The European heat market. Final report. 10.6 EUR/GJ i s the price of district heat. http://www.solarthermalworld.org/files/Ecoheatcool%20WP1%20Web.pdf?download
  property true value 0.00374674; name E_th_prod_MSWI_true_value
    allocation property applied in "true value" allocation // value calculated from true value relation
- electricity, for reuse in municipal waste incineration only: 0 kWh; name E_el_prod_MSWI; CPC 17100: Electrical energy; By-product classification allocatable product; pedigree (1,1,1,1,1)
  (same comment as for heat, for reuse in municipal waste incineration only)
  production volume 3.2991e8 kWh
  property exergy 3.6 MJ; name E_el_prod_MSWI_exergy
  property true value relation 3.6; name E_el_prod_MSWI_true_value_relation
  property price 0.1 EUR2005; name E_el_prod_MSWI_price_EUR2005
  property true value 0.00619764; name E_el_prod_MSWI_true_value

## By-products
- electricity, for reuse in municipal waste incineration only: 0 kWh; CPC 17100: Electrical energy; By-product classification allocatable product; pedigree (1,1,1,1,1)
  (same comment as for heat, for reuse in municipal waste incineration only)
  production volume 0 kWh
    calculated in proportion to reference product waste input to incinerator

## Inputs from technosphere
- quicklime, milled, packed: 0 kg; pedigree (1,1,1,1,1)
  Auxilliary inputs for the flue gas treatment stage of the incinerator plant.
  Uncertainty: uncertainty calculated from uncertainty in average CaO input, of transfer coefficients in the incinerator, and the uncertainty of the waste composition of this waste
  properties: wet mass 1 kg, dry mass 0.99 kg, water content 0.010101
- transport, freight, lorry, unspecified: 0.00611265 metric ton*km; lognormal variance with pedigree 0.043173, pedigree (1,1,4,1,1)
  Transport services to transport incineration residues to landfills.
  Uncertainty: uncertainty calculated from uncertainty of the waste composition of this waste, uncertainty of transfer coefficients and the uncertainty in generic transportation distances
- chemical, inorganic: 4.56495e-5 kg; lognormal variance with pedigree 0.11029, pedigree (1,1,4,1,1)
  Auxilliary inputs for the wastewater treatment stage of the incinerator plant. Proxy for Polyelectrolyte.
  Uncertainty: uncertainty calculated from uncertainty in average Polyelectrolyte input, of transfer coefficients in the incinerator, and the uncertainty of the waste composition of this waste
  properties: dry mass 1 kg, wet mass 1 kg, carbon content, fossil 0.003
- municipal waste incineration facility: 1.8057e-10 unit
  Demands per kilogram waste.
- iron (III) chloride, without water, in 40% solution state: 5.99521e-6 kg; lognormal variance with pedigree 0.39776, pedigree (1,1,4,1,1)
  Auxilliary inputs for the wastewater treatment stage of the incinerator plant.
  Uncertainty: uncertainty calculated from uncertainty in average FeCl3 input, of transfer coefficients in the incinerator, and the uncertainty of the waste composition of this waste
  properties: wet mass 1 kg, dry mass 1 kg
- slag landfill: 2.41198e-10 unit; lognormal variance with pedigree 0.051773, pedigree (1,1,4,1,1)
  Landfill infrastructure required for landfilling of bottom ash.
  Uncertainty: uncertainty is calculated from uncertainties in waste composition and transfer coefficients in incinerator
- ammonia, anhydrous, liquid: 0 kg; pedigree (1,1,1,1,1)
  Input to DeNOx stage (100% NH3).
  Uncertainty: uncertainty calculated from uncertainty in average DeNOx input, uncertainty in the share of thermal NOx, uncertainty of nitrogen content in average municipal waste and the uncertainty in nitrogen content in *this* waste.
  properties: wet mass 1 kg, dry mass 1 kg
- hydrochloric acid, without water, in 30% solution state: 0 kg; pedigree (1,1,1,1,1)
  Auxilliary inputs for the wastewater treatment stage of the incinerator plant.
  Uncertainty: uncertainty calculated from uncertainty in average HCl input, of transfer coefficients in the incinerator, and the uncertainty of the waste composition of this waste
  properties: heating value, net 3.32 MJ, dry mass 1 kg, wet mass 1 kg
- residual material landfill: 3.57145e-11 unit; lognormal variance with pedigree 0.04827, pedigree (1,1,4,1,1)
  Landfill infrastructure required for landfilling of incineration residues.
  Uncertainty: uncertainty is calculated from uncertainties in waste composition and transfer coefficients in incinerator
- titanium dioxide: 0 kg; pedigree (1,1,1,1,1)
  Input to DeNOx stage (TiO2 catalyst carrier)
  Uncertainty: uncertainty calculated from uncertainty in average DeNOx input, uncertainty in the share of thermal NOx, uncertainty of nitrogen content in average municipal waste and the uncertainty in nitrogen content in *this* waste.
  properties: wet mass 1 kg, dry mass 1 kg
- process-specific burdens, residual material landfill: 0 kg; pedigree (1,1,1,1,1)
  Mass-specific expenditures required for landfilling of incineration residues.
  Uncertainty: uncertainty is calculated from uncertainties in waste composition and transfer coefficients in incinerator
- heat, district or industrial, natural gas: 0.101531 MJ; lognormal variance with pedigree 1.00271, pedigree (1,1,4,1,1)
  Input to DeNOx stage, to heat up flue gas in low-dust SCR.
  Uncertainty: uncertainty calculated from uncertainty in average DeNOx input, uncertainty in the share of thermal NOx, uncertainty of nitrogen content in average municipal waste and the uncertainty in nitrogen content in *this* waste.
  properties: heating value, net 1 MJ
- sodium hydroxide, without water, in 50% solution state: 0.00155471 kg; lognormal variance with pedigree 0.24732, pedigree (1,1,4,1,1)
  Auxilliary inputs for the flue gas treatment stage of the incinerator plant.
  Uncertainty: uncertainty calculated from uncertainty in average NaOH input, of transfer coefficients in the incinerator, and the uncertainty of the waste composition of this waste
  properties: wet mass 1 kg, dry mass 1 kg, heating value, net 3.03 MJ
- waste cement, hydrated: 0 kg; pedigree (1,1,1,1,1)
  Hydrated cement output for solidification of landfilled residual material.
  Uncertainty: Uncertainty calculated from uncertainty of the waste composition of this waste and transfer coefficients in the incinerator and of the solidification recipe.
  production volume 0 kg
    calculated in proportion to reference product waste input to incinerator
  properties: dry mass 1 kg, wet mass 1 kg
- cement, unspecified: 0.00685717 kg; lognormal variance with pedigree 0.057354, pedigree (1,1,4,1,1)
  Cement required for solidification of landfilled residual material.
  Uncertainty: Uncertainty calculated from uncertainty of the waste composition of this waste, of transfer coefficients in the incinerator and of the solidification recipe.
  properties: dry mass 1 kg, wet mass 1 kg
- chemical, organic: 6.73077e-6 kg; lognormal variance with pedigree 1.6283, pedigree (1,1,4,1,1)
  Auxilliary inputs for the wastewater treatment stage of the incinerator plant. Proxy for (pure) Trisodium-trimercapto-s-triazine (CAS 17766-26-6), used as 15% diluted solution, aka TMT15.
  Uncertainty: uncertainty calculated from uncertainty in average TMT15 input, of transfer coefficients in the incinerator, and the uncertainty of the waste composition of this waste
  properties: carbon content, fossil 0.628, wet mass 1 kg, dry mass 1 kg, heating value, net 19.03 MJ
- chromium oxide, flakes: 6.9424e-7 kg; lognormal variance with pedigree 1.4081, pedigree (1,1,4,1,1)
  Input to DeNOx stage.
  Uncertainty: uncertainty calculated from uncertainty in average DeNOx input, uncertainty in the share of thermal NOx, uncertainty of nitrogen content in average municipal waste and the uncertainty in nitrogen content in *this* waste.
  properties: wet mass 1 kg, dry mass 1 kg
- water, decarbonised: 0 kg; pedigree (1,1,1,1,1)
  Incinerator process water used in flue gas scrubber stage.
  Uncertainty: uncertainty calculated from uncertainty in average water input, and the uncertainty of the waste composition of this waste
  properties: wet mass 1 kg
- process-specific burdens, slag landfill: 0 kg; pedigree (1,1,1,1,1)
  Mass-specific expenditures required for landfilling of bottom ash.
  Uncertainty: uncertainty is calculated from uncertainties in waste composition and transfer coefficients in incinerator
- digester sludge: 0.722279 kg
  Main reference product of this activity (supply of disposal service).
  production volume 7.4726e9 kg
  properties: water content 19, carbon content, non-fossil 0.3444, heating value, net 2.42 MJ, wet mass 1 kg, dry mass 0.05 kg
  note on heating value, net: Value taken from the general comment of the treatment dataset.
- quicklime, milled, packed: 6.30488e-7, 7.42771e-5 kg (2 entries); lognormal variance with pedigree 0.32735, pedigree (1,1,4,1,1)
  (same comment as for quicklime, milled, packed)
- ammonia, anhydrous, liquid: 8.73185e-6, 5.83607e-5, 1.35845e-5, 2.63703e-5, 2.69157e-5, 1.23556e-5, 0.000101578, 2.76389e-6, 0.000292298 kg (9 entries); lognormal variance with pedigree 1.00271, pedigree (1,1,4,1,1)
  (same comment as for ammonia, anhydrous, liquid)
- hydrochloric acid, without water, in 30% solution state: 2.19239e-6, 9.80611e-6 kg (2 entries); lognormal variance with pedigree 0.11029, pedigree (1,1,4,1,1)
  (same comment as for hydrochloric acid, without water, in 30% solution state)
- titanium dioxide: 1.13393e-5, 2.26786e-5 kg (2 entries); lognormal variance with pedigree 1.4081, pedigree (1,1,4,1,1)
  (same comment as for titanium dioxide)
- process-specific burdens, residual material landfill: 0.00480838, 0.000144287, 0.0121899 kg (3 entries); lognormal variance with pedigree 0.04827, pedigree (1,1,4,1,1)
  (same comment as for process-specific burdens, residual material landfill)
- waste cement, hydrated: -0.00480838, -0.000144287, -0.0121899 kg (3 entries); lognormal variance with pedigree 0.057354, pedigree (1,1,4,1,1)
  (same comment as for waste cement, hydrated)
  production volume 1.7736e8 kg
- water, decarbonised: 0.0512085, 0.0125049, 0.00252092, 0.00828926, 0.00652094, 0.000623325, 0.00487958, 0.0126967, 7.9402e-6, 0.000457616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 kg (13 entries); lognormal variance with pedigree 0.39776, pedigree (1,1,4,1,1)
  (same comment as for water, decarbonised)
- process-specific burdens, slag landfill: 0.0380554, 0.00114194, 0.0964756 kg (3 entries); lognormal variance with pedigree 0.051773, pedigree (1,1,4,1,1)
  (same comment as for process-specific burdens, slag landfill)

## Inputs from nature
- Oxygen [natural resource, in air]: 0.306463 kg; lognormal variance with pedigree 0.076179, pedigree (1,1,4,1,1)
  Oxygen from ambient air needed to combust and oxidise this waste. Net demand, i.e. without O2 leaving the plant in flue gas uncombusted.
  Uncertainty: uncertainty is calculated from uncertainties in waste composition and transfer coefficients to flue gas and soild residues in incinerator

## Emissions to nature
- Arsenic, ion [water, ground-, long-term]: 1.68435e-7 kg; lognormal variance with pedigree 1.6104, pedigree (1,1,4,1,1)
  Long-term emissions from landfilling of incineration residues.
  Uncertainty: uncertainty is calculated from uncertainties in waste composition and transfer coefficients in incinerator and landfills.
- Benzene [air, urban air close to ground]: 3.10876e-8 kg; lognormal variance with pedigree 0.080597, pedigree (1,1,4,1,1)
  Incomplete combustion product emitted to air.
  Uncertainty: uncertainty calculated from uncertainty in average operation emissions, and the uncertainty of the flue gas volume from this waste.
- Particulates, > 2.5 um, and < 10um [air, urban air close to ground]: 1.86514e-8 kg; lognormal variance with pedigree 0.1788, pedigree (1,1,4,1,1)
  (same comment as for Benzene)
- Tin, ion [water, surface water]: 1.51527e-10 kg; lognormal variance with pedigree 1.9354, pedigree (1,1,4,1,1)
  Emissions to water from waste composition and transfer coefficients in incinerator and landfills.
  Uncertainty: uncertainty is calculated from uncertainties in waste composition and transfer coefficients in incinerator and landfills
- Sulfate [water, surface water]: 0.00226095 kg; lognormal variance with pedigree 0.20209, pedigree (1,1,4,1,1)
  (same comment as for Tin, ion)
- Aluminium [air, urban air close to ground]: 3.47842e-9 kg; lognormal variance with pedigree 0.50931, pedigree (1,1,4,1,1)
  Emission to air from waste composition and transfer coefficients.
  Uncertainty: uncertainty is calculated from uncertainties in waste composition and transfer coefficients in incinerator
- Cyanide [air, urban air close to ground]: 1.33853e-5 kg; lognormal variance with pedigree 1.216, pedigree (1,1,4,1,1)
  Nitrogen species emitted to air after DeNOx stage.
  Uncertainty: uncertainty calculated from uncertainty in average N-emissions and uncertainty in the share of thermal NOx and the uncertainty in nitrogen content in *this* waste.
- Manganese [air, urban air close to ground]: 1.44369e-8 kg; lognormal variance with pedigree 0.99455, pedigree (1,1,4,1,1)
  (same comment as for Aluminium)
- Mercury [water, surface water]: 4.34696e-10 kg; lognormal variance with pedigree 1.1743, pedigree (1,1,4,1,1)
  (same comment as for Tin, ion)
- Phenol, pentachloro- [air, urban air close to ground]: 1.35384e-11 kg; lognormal variance with pedigree 0.080597, pedigree (1,1,4,1,1)
  (same comment as for Benzene)
- Copper [air, urban air close to ground]: 7.35569e-9 kg; lognormal variance with pedigree 0.98719, pedigree (1,1,4,1,1)
  (same comment as for Aluminium)
- Magnesium [air, urban air close to ground]: 1.71021e-6 kg; lognormal variance with pedigree 0.57972, pedigree (1,1,4,1,1)
  (same comment as for Aluminium)
- Dioxins, measured as 2,3,7,8-tetrachlorodibenzo-p-dioxin [air, urban air close to ground]: 6.21709e-14 kg; lognormal variance with pedigree 0.38747, pedigree (1,1,4,1,1)
  (same comment as for Benzene)
- Aluminium [water, ground-, long-term]: 0.00308521 kg; lognormal variance with pedigree 0.39624, pedigree (1,1,4,1,1)
  (same comment as for Arsenic, ion)
- Cobalt [water, surface water]: 4.18048e-10 kg; lognormal variance with pedigree 1.7134, pedigree (1,1,4,1,1)
  (same comment as for Tin, ion)
- Lead [water, ground-, long-term]: 1.07576e-5 kg; lognormal variance with pedigree 4.2668, pedigree (1,1,4,1,1)
  (same comment as for Arsenic, ion)
- Mercury [water, ground-, long-term]: 2.54928e-8 kg; lognormal variance with pedigree 3.2015, pedigree (1,1,4,1,1)
  (same comment as for Arsenic, ion)
- Nitrate [water, surface water]: 5.32493e-5 kg; lognormal variance with pedigree 0.31247, pedigree (1,1,4,1,1)
  (same comment as for Tin, ion)
- Silicon [water, ground-, long-term]: 0.000859584 kg; lognormal variance with pedigree 5.0129, pedigree (1,1,4,1,1)
  (same comment as for Arsenic, ion)
- Manganese [water, surface water]: 1.17666e-8 kg; lognormal variance with pedigree 0.83574, pedigree (1,1,4,1,1)
  (same comment as for Tin, ion)
- TOC, Total Organic Carbon [water, surface water]: 3.42909e-5 kg; lognormal variance with pedigree 0.15387, pedigree (1,1,4,1,1)
  (same comment as for Tin, ion)
- Magnesium [water, ground-, long-term]: 0.00143589 kg; lognormal variance with pedigree 0.5407, pedigree (1,1,4,1,1)
  (same comment as for Arsenic, ion)
- Chromium [air, urban air close to ground]: 1.52343e-8 kg; lognormal variance with pedigree 1.1783, pedigree (1,1,4,1,1)
  (same comment as for Aluminium)
- Copper, ion [water, surface water]: 1.04066e-8 kg; lognormal variance with pedigree 0.87331, pedigree (1,1,4,1,1)
  (same comment as for Tin, ion)
- Nickel, ion [water, ground-, long-term]: 7.2095e-6 kg; lognormal variance with pedigree 1.2406, pedigree (1,1,4,1,1)
  (same comment as for Arsenic, ion)
- Nitrogen oxides [air, urban air close to ground]: 0.000202151 kg; lognormal variance with pedigree 1.0666, pedigree (1,1,4,1,1)
  Sum of fuel-Nox and thermal-NOx emitted to air after DeNOx stage.
  Uncertainty: uncertainty calculated from uncertainty in average N-emissions and uncertainty in the share of thermal NOx and the uncertainty in nitrogen content in *this* waste.
- DOC, Dissolved Organic Carbon [water, ground-, long-term]: 0.000199465 kg; lognormal variance with pedigree 0.088504, pedigree (1,1,4,1,1)
  (same comment as for Arsenic, ion)
- Tin, ion [water, ground-, long-term]: 2.19204e-6 kg; lognormal variance with pedigree 2.1549, pedigree (1,1,4,1,1)
  (same comment as for Arsenic, ion)
- Benzene, hexachloro- [air, urban air close to ground]: 6.50029e-11 kg; lognormal variance with pedigree 0.080597, pedigree (1,1,4,1,1)
  (same comment as for Benzene)
- DOC, Dissolved Organic Carbon [water, surface water]: 3.42909e-5 kg; lognormal variance with pedigree 0.15387, pedigree (1,1,4,1,1)
  (same comment as for Tin, ion)
- Molybdenum [air, urban air close to ground]: 1.79681e-9 kg; lognormal variance with pedigree 1.5128, pedigree (1,1,4,1,1)
  (same comment as for Aluminium)
- TOC, Total Organic Carbon [water, ground-, long-term]: 0.000199465 kg; lognormal variance with pedigree 0.088504, pedigree (1,1,4,1,1)
  (same comment as for Arsenic, ion)
- Heat, waste [water, surface water]: 0.807075 MJ; lognormal variance with pedigree 0.1125, pedigree (1,1,4,1,1)
  Waste heat generated from heating value of this waste plus any electricity required to process it.
  Uncertainty: uncertainty is calculated from uncertainties in waste composition and uncertainties in energy efficiency and the uncertainty in internal energy demand
- Magnesium [water, surface water]: 7.56515e-6 kg; lognormal variance with pedigree 0.74181, pedigree (1,1,4,1,1)
  (same comment as for Tin, ion)
- Benzo(a)pyrene [air, urban air close to ground]: 6.91799e-13 kg; lognormal variance with pedigree 0.38747, pedigree (1,1,4,1,1)
  (same comment as for Benzene)
- Zinc, ion [water, surface water]: 1.97406e-8 kg; lognormal variance with pedigree 0.69142, pedigree (1,1,4,1,1)
  (same comment as for Tin, ion)
- Arsenic [air, urban air close to ground]: 4.40605e-9 kg; lognormal variance with pedigree 1.6203, pedigree (1,1,4,1,1)
  (same comment as for Aluminium)
- Calcium, ion [water, ground-, long-term]: 0.0107569 kg; lognormal variance with pedigree 0.27642, pedigree (1,1,4,1,1)
  (same comment as for Arsenic, ion)
- Lead [water, surface water]: 2.12834e-9 kg; lognormal variance with pedigree 0.94712, pedigree (1,1,4,1,1)
  (same comment as for Tin, ion)
- Molybdenum [water, surface water]: 3.7297e-7 kg; lognormal variance with pedigree 1.0493, pedigree (1,1,4,1,1)
  (same comment as for Tin, ion)
- Iron, ion [water, surface water]: 1.01032e-6 kg; lognormal variance with pedigree 0.56646, pedigree (1,1,4,1,1)
  (same comment as for Tin, ion)
- Cobalt [air, urban air close to ground]: 4.19637e-9 kg; lognormal variance with pedigree 1.4407, pedigree (1,1,4,1,1)
  (same comment as for Aluminium)
- Dinitrogen monoxide [air, urban air close to ground]: 6.23023e-5 kg; lognormal variance with pedigree 1.216, pedigree (1,1,4,1,1)
  (same comment as for Cyanide)
- NMVOC, non-methane volatile organic compounds, unspecified origin [air, urban air close to ground]: 1.4148e-6 kg; lognormal variance with pedigree 0.080597, pedigree (1,1,4,1,1)
  (same comment as for Benzene)
- Phosphate [water, ground-, long-term]: 0.000834593 kg; lognormal variance with pedigree 4.4896, pedigree (1,1,4,1,1)
  (same comment as for Arsenic, ion)
- Heat, waste [air, urban air close to ground]: 2.3144 MJ; lognormal variance with pedigree 0.1125, pedigree (1,1,4,1,1)
  (same comment as for Heat, waste)
- Chromium, ion [water, surface water]: 1.35471e-9 kg; lognormal variance with pedigree 1.1948, pedigree (1,1,4,1,1)
  (same comment as for Tin, ion)
- Chromium VI [water, surface water]: 4.87603e-7 kg; lognormal variance with pedigree 1.2351, pedigree (1,1,4,1,1)
  (same comment as for Tin, ion)
- Sulfate [water, ground-, long-term]: 0.0110386 kg; lognormal variance with pedigree 0.23847, pedigree (1,1,4,1,1)
  (same comment as for Arsenic, ion)
- Chromium VI [water, ground-, long-term]: 1.60043e-6 kg; lognormal variance with pedigree 1.624, pedigree (1,1,4,1,1)
  (same comment as for Arsenic, ion)
- Nitrate [water, ground-, long-term]: 0.000150241 kg; lognormal variance with pedigree 0.449, pedigree (1,1,4,1,1)
  (same comment as for Arsenic, ion)
- BOD5, Biological Oxygen Demand [water, surface water]: 7.7515e-5 kg; lognormal variance with pedigree 0.15754, pedigree (1,1,4,1,1)
  (same comment as for Tin, ion)
- Methane, non-fossil [air, urban air close to ground]: 4.66318e-7 kg; lognormal variance with pedigree 0.080597, pedigree (1,1,4,1,1)
  (same comment as for Benzene)
- Toluene [air, urban air close to ground]: 6.21752e-8 kg; lognormal variance with pedigree 0.080597, pedigree (1,1,4,1,1)
  (same comment as for Benzene)
- Carbon monoxide, non-fossil [air, urban air close to ground]: 5.28455e-5 kg; lognormal variance with pedigree 0.76738, pedigree (1,1,4,1,1)
  (same comment as for Benzene)
- Particulates, < 2.5 um [air, urban air close to ground]: 3.71165e-6 kg; lognormal variance with pedigree 0.38747, pedigree (1,1,4,1,1)
  (same comment as for Benzene)
- Sulfur dioxide [air, urban air close to ground]: 4.7396e-5 kg; lognormal variance with pedigree 0.44589, pedigree (1,1,4,1,1)
  (same comment as for Aluminium)
- Silicon [air, urban air close to ground]: 1.3256e-8 kg; lognormal variance with pedigree 0.41998, pedigree (1,1,4,1,1)
  (same comment as for Aluminium)
- Cadmium, ion [water, ground-, long-term]: 2.92075e-8 kg; lognormal variance with pedigree 7.1068, pedigree (1,1,4,1,1)
  (same comment as for Arsenic, ion)
- COD, Chemical Oxygen Demand [water, ground-, long-term]: 0.000504086 kg; lognormal variance with pedigree 0.088504, pedigree (1,1,4,1,1)
  (same comment as for Arsenic, ion)
- Silicon [water, surface water]: 2.08666e-6 kg; lognormal variance with pedigree 0.62892, pedigree (1,1,4,1,1)
  (same comment as for Tin, ion)
- Copper, ion [water, ground-, long-term]: 7.1736e-5 kg; lognormal variance with pedigree 0.93857, pedigree (1,1,4,1,1)
  (same comment as for Arsenic, ion)
- Tin [air, urban air close to ground]: 3.74126e-12 kg; lognormal variance with pedigree 1.3827, pedigree (1,1,4,1,1)
  (same comment as for Aluminium)
- Cadmium [air, urban air close to ground]: 2.04015e-10 kg; lognormal variance with pedigree 1.6772, pedigree (1,1,4,1,1)
  (same comment as for Aluminium)
- Zinc [air, urban air close to ground]: 1.46659e-7 kg; lognormal variance with pedigree 0.84759, pedigree (1,1,4,1,1)
  (same comment as for Aluminium)
- Iron [air, urban air close to ground]: 6.88765e-8 kg; lognormal variance with pedigree 0.25272, pedigree (1,1,4,1,1)
  (same comment as for Aluminium)
- Phosphate [water, surface water]: 3.50168e-6 kg; lognormal variance with pedigree 0.36535, pedigree (1,1,4,1,1)
  (same comment as for Tin, ion)
- Phosphorus [air, urban air close to ground]: 6.32955e-6 kg; lognormal variance with pedigree 0.41323, pedigree (1,1,4,1,1)
  (same comment as for Aluminium)
- Ammonia [air, urban air close to ground]: 6.38379e-7 kg; lognormal variance with pedigree 1.0666, pedigree (1,1,4,1,1)
  (same comment as for Cyanide)
- Cadmium, ion [water, surface water]: 3.83631e-11 kg; lognormal variance with pedigree 1.3711, pedigree (1,1,4,1,1)
  (same comment as for Tin, ion)
- COD, Chemical Oxygen Demand [water, surface water]: 7.8519e-5 kg; lognormal variance with pedigree 0.1533, pedigree (1,1,4,1,1)
  (same comment as for Tin, ion)
- Molybdenum [water, ground-, long-term]: 9.90822e-7 kg; lognormal variance with pedigree 1.4928, pedigree (1,1,4,1,1)
  (same comment as for Arsenic, ion)
- Iron, ion [water, ground-, long-term]: 0.0193889 kg; lognormal variance with pedigree 0.3752, pedigree (1,1,4,1,1)
  (same comment as for Arsenic, ion)
- Aluminium [water, surface water]: 4.61702e-7 kg; lognormal variance with pedigree 0.82771, pedigree (1,1,4,1,1)
  (same comment as for Tin, ion)
- Lead [air, urban air close to ground]: 1.83307e-9 kg; lognormal variance with pedigree 1.1636, pedigree (1,1,4,1,1)
  (same comment as for Aluminium)
- Mercury [air, urban air close to ground]: 1.13492e-8 kg; lognormal variance with pedigree 1.6559, pedigree (1,1,4,1,1)
  (same comment as for Aluminium)
- Nickel, ion [water, surface water]: 5.04649e-9 kg; lognormal variance with pedigree 1.818, pedigree (1,1,4,1,1)
  (same comment as for Tin, ion)
- Benzene, pentachloro- [air, urban air close to ground]: 1.64246e-10 kg; lognormal variance with pedigree 0.080597, pedigree (1,1,4,1,1)
  (same comment as for Benzene)
- Manganese [water, ground-, long-term]: 4.66354e-5 kg; lognormal variance with pedigree 1.9557, pedigree (1,1,4,1,1)
  (same comment as for Arsenic, ion)
- Zinc, ion [water, ground-, long-term]: 6.65378e-5 kg; lognormal variance with pedigree 2.9466, pedigree (1,1,4,1,1)
  (same comment as for Arsenic, ion)
- Nickel [air, urban air close to ground]: 9.43513e-9 kg; lognormal variance with pedigree 1.2881, pedigree (1,1,4,1,1)
  (same comment as for Aluminium)
- Calcium, ion [water, surface water]: 0.000159876 kg; lognormal variance with pedigree 0.25177, pedigree (1,1,4,1,1)
  (same comment as for Tin, ion)
- Arsenic, ion [water, surface water]: 3.89633e-7 kg; lognormal variance with pedigree 1.4923, pedigree (1,1,4,1,1)
  (same comment as for Tin, ion)
- Carbon dioxide, non-fossil [air, urban air close to ground]: 0.244556 kg; lognormal variance with pedigree 0.13589, pedigree (1,1,4,1,1)
  (same comment as for Aluminium)
- Water [water, surface water]: 0.000336373 m3; lognormal variance with pedigree 1.6644, pedigree (1,1,4,1,1)
  Process water released to surface water.
  Uncertainty: uncertainty calculated from uncertainty in process water input and the uncertainty of fraction to surface water.
- BOD5, Biological Oxygen Demand [water, ground-, long-term]: 0.000164882 kg; lognormal variance with pedigree 0.088504, pedigree (1,1,4,1,1)
  (same comment as for Arsenic, ion)
- Cobalt [water, ground-, long-term]: 1.87959e-6 kg; lognormal variance with pedigree 1.3429, pedigree (1,1,4,1,1)
  (same comment as for Arsenic, ion)
- Water [air, urban air close to ground]: 0.00123914 m3; lognormal variance with pedigree 1.16, pedigree (1,1,4,1,1)
  Water vapour from waste humidity, hydrogen oxidation and part of the process water.
  Uncertainty: Uncertainty calculated from uncertainty in waste composition, process water input and the uncertainty of fraction to air.
- Calcium [air, urban air close to ground]: 0.000113658 kg; lognormal variance with pedigree 0.30212, pedigree (1,1,4,1,1)
  (same comment as for Aluminium)
