# sawnwood production, softwood, dried (u=10%), planed

Dataset: EcoSpold 2, unit process
Geography: RoW
Time period: 2014-01-01 to 2021-12-31
Technology level: current
Classification: ISIC rev.4 ecoinvent: 1610:Sawmilling and planing of wood
Classification: EcoSpold01Categories: wooden materials/extraction
Scenario: Business-as-Usual
System model: Allocation, cut-off by classification
Generated by: Emilia Moreno Ruiz
Database: ecoinvent
isCopyrightProtected: false
accessRestrictedTo: 1

## General comment
This activity is providing a more generic sawnwood product, combining inputs from the specific products issued from planing. The relative contribution is based on their Production Volumes.

## Included activities start
Entry of the specific products issued of the planing activity

## Included activities end
Delivery of the generic planed product

## Reference product
- sawnwood, softwood, dried (u=10%), planed: 1 m3; By-product classification allocatable product; CPC 31101: Wood, sawn or chipped lengthwise, sliced or peeled, of a thickness exceeding 6 mm, of coniferous wood
  production volume 6.23834e6 m3; = 94800000*0.1
    50% of the Production Volume issued from the planing has been made accesible as this generic product
  property heating value, net 6625.26 MJ
    LHV is calculated based on the Carbon content of the product. More details can be found on the respective documentation.The property is based on a value of 13.38MJ/kg
  property price 151 EUR2005
    Temporary price data. Calculated as 90% of purchasers price based on: 2004 export prices for the World+ according to: http://faostat.fao.org/site/626/DesktopDefault.aspx?PageID=626#ancor downloaded 28 April 2009; calculated as export value divided by export volume.
  property carbon content 0.494
    carbon content on a dry matter basis (reserved; not for manual entry)
  properties: wet mass 464.64 kg, dry mass 422.4 kg, water content 0.1, carbon content, fossil 0, water in wet mass 42.24 kg, carbon content, non-fossil 0.494, carbon allocation 208.666 kg

## Inputs from technosphere
- sawnwood, lath, softwood, dried (u=10%), planed: 0.16 m3; lognormal variance with pedigree 0.0026, pedigree (1,1,3,1,1)
  based on estimated production volumes; see activity datasets
  properties: carbon content, non-fossil 0.494, dry mass 422.4 kg, heating value, net 6218.91 MJ, wet mass 464.64 kg, water content 0.1
- sawnwood, beam, softwood, dried (u=10%), planed: 0.45 m3; lognormal variance with pedigree 0.0026, pedigree (1,1,3,1,1)
  based on estimated production volumes; see activity datasets
  properties: wet mass 464.64 kg, water content 0.1, carbon content, non-fossil 0.494, dry mass 422.4 kg, heating value, net 5700.67 MJ
- sawnwood, board, softwood, dried (u=10%), planed: 0.39 m3; lognormal variance with pedigree 0.0026, pedigree (1,1,3,1,1)
  based on estimated production volumes; see activity datasets
  properties: water content 0.1, heating value, net 6218.91 MJ, wet mass 464.64 kg, carbon content, non-fossil 0.494, dry mass 422.4 kg
