# electricity production, deep geothermal

Dataset: EcoSpold 2, unit process
Geography: KE
Time period: 2015-01-01 to 2021-12-31
Technology level: current
Classification: ISIC rev.4 ecoinvent: 3510:Electric power generation, transmission and distribution
Tags: geothermal power
Scenario: Business-as-Usual
System model: Allocation, cut-off by classification
Generated by: Florentine Brunner
Published in: S Hirchberg, S Wiemer, P Burgherr 2015
Database: ecoinvent
isCopyrightProtected: true
accessRestrictedTo: 1

## General comment
This dataset represents electricity production with a deep geothermal enhanced geothermal systems plant. The power generation unit is run on an Organic Rankine Cycle with Benzene as working fluid.
Detailed information on this dataset is presented in the book "Energy from the Earth. 2015. Hirschberg, Wiemer, Burgherr (eds.) (see field "Data Generator and Publication").

## Included activities start
This dataset starts from commissioned geothermal power plants ready to generate electricity.

## Included activities end
This activity ends with the high voltage electricity produced at the power plant.

## Geography
Represents installation of a deep geothermal power plant in Switzerland. Used as first approximation for this geography. Uncertainties adjusted accordingly.

## Time period
The Annual Production Volume is defined directly in the electricity market dataset, a placeholder value is used here.

## Reference product
- electricity, high voltage: 1 kWh; source S Hirchberg, S Wiemer, P Burgherr 2015; By-product classification allocatable product; CPC 17100: Electrical energy
  production volume 1 kWh
    Placeholder value. The production volume is defined directly in the electricity market dataset of this geography.
  property price 0.0977 EUR2005
    Temporary price data. Calculated as 90% of purchasers price based on: 94% of the average price (to account for a 6% loss in transformation and transmission) for electricity for industrial consumersin 2005 (excluded taxes). From IEA.

## Inputs from technosphere
- benzene: 3.05e-6 kg; source S Hirchberg, S Wiemer, P Burgherr 2015; lognormal variance with pedigree 0.1433, pedigree (2,2,5,5,2)
  Yearly loss of 8% of refrigerant
  properties: wet mass 1 kg, carbon content, fossil 0.923077, dry mass 1 kg, heating value, net 42.5 MJ
- geothermal power plant, 5.5MWel: 5.77701e-10 unit; = 1/(5.77E7*30); source S Hirchberg, S Wiemer, P Burgherr 2015; lognormal variance with pedigree 0.1433, pedigree (2,2,5,5,2)
  = 1 / (annual electricity production * lifetime)

## Inputs from nature
- Energy, geothermal, converted [natural resource, in ground]: 7.14286 MJ; = 1/0.14; source S Hirchberg, S Wiemer, P Burgherr 2015; lognormal variance with pedigree 0.2106, pedigree (5,5,5,5,5)
  The gross thermal efficiency of the power plant is modelled to be 0.14.

## Emissions to nature
- Benzene [air, unspecified]: 3.05e-6 kg; source S Hirchberg, S Wiemer, P Burgherr 2015; lognormal variance with pedigree 0.1433, pedigree (2,2,5,5,2)
  Yearly loss of 8% of refrigerant

## Sampling procedure
Literature

## Extrapolations
This dataset has been extrapolated from year 2015 to the year of the calculation (2021). The uncertainty has been adjusted accordingly.
