# sodium bicarbonate, to generic market for neutralising agent

Dataset: EcoSpold 2, unit process
Geography: GLO
Time period: 1999-01-01 to 2021-12-31
Technology level: current
Classification: ISIC rev.4 ecoinvent: 2011:Manufacture of basic chemicals
Classification: EcoSpold01Categories: chemicals/inorganics
Synonyms: Carbonic Acid Monosodium Salt; Sodium; Sodium Hydrogen Carbonate; Baking Soda; Hydrogen Carbonate; Bicarbonate
Scenario: Business-as-Usual
System model: Allocation, cut-off by classification
Generated by: Lucia Valsasina
Database: ecoinvent
isCopyrightProtected: true
accessRestrictedTo: 1

## General comment
This is a linking activity which links the product sodium bicarbonate to the generic market for neutralising agents. All chemicals that enter this market provide the function of neutralising agents.

## Included activities start
Activity starting with the reception of sodium bicarbonate

## Included activities end
Activity ends with the proper conversion of sodium bicarboante to neutralising agent in NaOH-equivalents.

## Geography
based on geographical validity of dataset soda production, solvay process

## Technology
based on techmology validity of dataset soda production, solvay process

## Time period
based on temporal validity of dataset soda production, solvay process

## Reference product
- neutralising agent, sodium hydroxide-equivalent: 1 kg; name neutralising_agent_output; By-product classification allocatable product; CPC 342: Basic inorganic chemicals n.e.c.
  production volume 1e8 kg; = 2E09*0.05
    Estimated value. Total amount of sodium bicarbonate produced in the world is 2 million tonnes (OECD SIDS 2002). The main production route of sodium bicarbonate is the Solvay process, followed by the other commercially available process, Trona ore mining. Sodium bicarbonate is used in a number of industries, it is used in cooking, commonly reffered to as baking soda, as a neutralising agent and in the medical industry. According to IHS MArkit (2016) the main industries where sodium bicarbonate is used are, in order, animal feed, food, flue gas treatment, personal care/pharmaceuticals, detergents/cleaning agents, hemodialysis, chemicals and other uses. Based on the graph reportes in IHS Markit (2016), we here assume that 5% of sodium bicarboante is used as neutralising agent.
    References:
    OECD SIDS, 2002. SODIUM BICARBONATE CAS N°: 144-55-8. Retrieved from: http://www.inchem.org/documents/sids/sids/sodbicarb.pdf, accessed 29 March 2018
    IHS Markit, 2016. Sodium Bicarbonate. Retrieved from: https://ihsmarkit.com/products/sodium-bicarbonate-chemical-economics-handbook.html, accessed 29 March 2018
  property price 0.376 EUR2005; name neutralising_agent_output_price_EUR2005
    Calculated value based on data from United Nations Commodity Trade Statistics Database (comtrade.un.org). UN comtrade category: 281511 Sodium hydroxide (caustic soda) solid. Year 2005. Using exchange rate of 1EURO = 1.209 USD. Average of price of import into 5 main markets (EU, US, JP, IN and CN).
  property carbon content 0
    carbon content on a dry matter basis (reserved; not for manual entry)
  properties: water in wet mass 0 kg, carbon content, fossil 0, carbon content, non-fossil 0, wet mass 1 kg, dry mass 1 kg, water content 0, carbon allocation 0 kg

## Inputs from technosphere
- sodium bicarbonate: 2.10032 kg; name NaHCO3; = 0.0840066/0.039997; lognormal variance with pedigree 0.2106, pedigree (5,5,5,5,5)
  For neutralisation purposes, it is considered that 1 mole of NaHCO3 can substitute 1 mole of NaOH for neutralisation purposes. The molar mass if NaHCO3 is 84.0066 g/mol, the molar mass of NaOH is 39.997.
  property carbon content, fossil 0; name NaHCO3_C_content_fossil
  property water content 0; name NaHCO3_water_content
  property wet mass 1 kg; name NaHCO3_WM
  property water in wet mass 0 kg; name NaHCO3_WWM
  property dry mass 1 kg; name NaHCO3_DM
  property carbon content, non-fossil 0.012011; name NaHCO3_C_content_non_fossil
  properties: heating value, net 5.77 MJ

## Extrapolations
This dataset has been extrapolated from year 1999 to the year of the calculation (2021). The uncertainty has been adjusted accordingly.
