# zinc coating, coils

Dataset: EcoSpold 2, unit process
Geography: RoW
Time period: 1996-01-01 to 2021-12-31
Technology level: current
Classification: EcoSpold01Categories: metals/processing
Classification: ISIC rev.4 ecoinvent: 2592:Treatment and coating of metals; machining
Synonyms: hot dip coating; galvanizing; sendzimir
Tags: ConvertedDataset
Scenario: Business-as-Usual
System model: Allocation, cut-off by classification
Share of production covered: 0 %
Generated by: Silvio Blaser
Published in: Classen M. 2009
Database: ecoinvent
isCopyrightProtected: true
accessRestrictedTo: 1

## General comment
This module is applicable, if continuous zinc coating (galvanising) of hot or cold rolled strip- or wire-coils has to be inventoried. Data given per tonne of coated product are transformed by dividing them by the mean surface area of 64 m2/t (corresponding to ca. 4.2 mm thickness). The zinc coating layer is between 20 to 45 um thick. The ecoinvent module "zinc coating, pieces, adjustment per um" can be used for adjustin for thiner or thicker zinc layers of coated coils, but it 1.53 um of it have to be inventoried per um layer thickness adjustment. This is because the zinc consumption per um is higher for coil coating than it is fo piece coating. For the chemicals and the zinc, 100 km of 32t lorry transport were invnetoried. The softened industrial water is assumed to be produced at the coating plant. Continuous wire coating can be approximated with this module.
[This dataset was already contained in the ecoinvent database version 2. It was not individually updated during the transfer to ecoinvent version 3. Life Cycle Impact Assessment results may still have changed, as they are affected by changes in the supply chain, i.e. in other datasets. This dataset was generated following the ecoinvent quality guidelines for version 2. It may have been subject to central changes described in the ecoinvent version 3 change report (http://www.ecoinvent.org/database/ecoinvent-version-3/reports-of-changes/), and the results of the central updates were reviewed extensively. The changes added e.g. consistent water flows and other information throughout the database. The documentation of this dataset can be found in the ecoinvent reports of version 2, which are still available via the ecoinvent website. The change report linked above covers all central changes that were made during the conversion process.]

## Included activities end
Includes the process steps surface cleaning (by means of chemical and/or thermal treatment), heat treatment, immersion in a bath of molten zinc and finishing treatment. Also includes zinc input and transportation to coiling plant. Does not include the steel strip or sheet beeing coated.

## Geography
Data-set is representive for European Union

## Technology
Average technique for EU.

## Parameters
- fraction, process water, to air: 0.15 dimensionless; name fraction_PW_to_air; lognormal variance with pedigree 0.092025, pedigree (4,4,3,2,4)
  Literature value (Statistics Canada, 2007 & Shaffer, K.H., 2008, Consumptive water use in the Great Lakes Basin, USGS) (Vionnet, S., Quantis Water Database - Technical Report, 2012).
- fraction, water, deionised, to air: 0.15 dimensionless; name fraction_WDI_to_air; = fraction_PW_to_air; lognormal variance with pedigree 0.092025, pedigree (4,4,3,2,4)
  Calculated value. See comment in the other parametres present in this dataset. Deionised water is considered to be always used as process water, thus process water fractions to air are applied to all deionised water input flows to calculate the amount of water consumed in the processes.

## Reference product
- zinc coat, coils: 1 m2; CPC 39365: Waste and scrap of zinc; By-product classification allocatable product
  EcoSpold01Location=RER
  production volume 2.67763 m2
    This is a placeholder value that does not reflect real-world production volumes. This dataset does not currently require a real-world production volume to work in the database framework, and no actual data were collected yet. This has no negative effect on the results of the ecoinvent database.
  property price 1.17575 EUR2005
    Calculated based on inputs: The price of the product has been calculated as a sum of the values of the material and energy inputs for this product. This value is therefore a rough estimation. It may underestimate the real price since there are additional expenses when producing any product. These expences can include for example labour costs, treatment of waste materials and profit for the producer. Please consider carefully whether this level of data quality is acceptable for your application.

## Inputs from technosphere
- heat, district or industrial, natural gas: 0 MJ; pedigree (1,1,1,1,1)
  EcoSpold01Location=RER
  calculated from max value assuming lognormal distribution
  properties: heating value, net 1 MJ
- aluminium sulfate, powder: 6.07e-5 kg; lognormal variance with pedigree 0.0606, pedigree (2,5,5,5,1)
  EcoSpold01Location=RER
  properties: wet mass 1 kg, dry mass 1 kg
- waste mineral oil: -0.00352 kg; lognormal variance with pedigree 0.1, pedigree (1,5,5,5,1)
  EcoSpold01Location=CH
  production volume 0.01056 kg
    Calculated from the production volume of zinc coat, coils in proportion to the respective output amounts.
  properties: heating value, net 34.7 MJ, carbon content, fossil 0.864444, wet mass 1 kg, dry mass 0.9 kg, water content 0.111111
  note on heating value, net: Value taken from the general comment of the treatment dataset.
  note on carbon content, fossil: Tab A.6, ecoinvent v2.2 report 13_I. C content has been calculated after data in the tables, and then referred to 1 kg DM
- water, deionised: 4.03 kg; name water_deionised_input; lognormal variance with pedigree 0.178, pedigree (4,5,5,5,5)
  EcoSpold01Location=CH
  properties: wet mass 1 kg
- electricity, medium voltage: 0 kWh; pedigree (1,1,1,1,1)
  calculated from max value assuming lognormal distribution
  EcoSpold01Location=UCTE
- hydrogen, liquid: 0.00192 kg; lognormal variance with pedigree 0.132, pedigree (1,1,5,5,1)
  calculated from max value assuming lognormal distribution
  EcoSpold01Location=RER
  properties: dry mass 1 kg, wet mass 1 kg, heating value, net 120.21 MJ
- nitrogen, liquid: 0.63 kg; lognormal variance with pedigree 0.252, pedigree (1,1,5,5,1)
  EcoSpold01Location=RER
  calculated from max value assuming lognormal distribution
  properties: dry mass 1 kg, wet mass 1 kg
- soda ash, light, crystalline, heptahydrate: 0.00167 kg; lognormal variance with pedigree 0.0506, pedigree (1,5,5,5,1)
  EcoSpold01Location=RER
  properties: heating value, net 3.43 MJ, carbon content, fossil 0.0517241, wet mass 1 kg, dry mass 1 kg
- hydrochloric acid, without water, in 30% solution state: 0.34 kg; lognormal variance with pedigree 0.0506, pedigree (1,5,5,5,1)
  EcoSpold01Location=RER
  properties: wet mass 1 kg, dry mass 1 kg, heating value, net 3.32 MJ
- sludge from steel rolling: -0.00951 kg; lognormal variance with pedigree 0.502, pedigree (1,1,5,5,1)
  EcoSpold01Location=CH
  calculated from max value assuming lognormal distribution
  production volume 0.02853 kg
    (same comment as for waste mineral oil)
  properties: carbon content, fossil 0.0123943, water content 0.25, wet mass 1 kg, dry mass 0.8 kg
- lubricating oil: 0.053 kg; lognormal variance with pedigree 0.072, pedigree (1,1,5,5,1)
  EcoSpold01Location=RER
  calculated from max value assuming lognormal distribution
  properties: wet mass 1 kg, carbon content, fossil 0.75, dry mass 1 kg, heating value, net 40.2 MJ
  note on carbon content, fossil: Lubricating oil is produced from diesel. C-content/dry mass of fats and oils considered 75%, from: ecoinvent v2.2 report, n 15a, pg 40
  note on heating value, net: Literature value, Source: IPCC 2006, 2006 IPCC Guidelines for National Greenhouse Gas Inventories, Prepared by the National Greenhouse Gas Inventories Programme, Eggleston H.S., Buendia L., Miwa K., Ngara T. and Tanabe K. (eds). Published: IGES, Japan
- ammonia, anhydrous, liquid: 0 kg; pedigree (1,1,1,1,1)
  EcoSpold01Location=RER
  calculated from max value assuming lognormal distribution
  properties: dry mass 1 kg, wet mass 1 kg
- heat, district or industrial, other than natural gas: 0 MJ; pedigree (1,1,1,1,1)
  properties: heating value, net 1 MJ
- zinc: 0.679 kg; lognormal variance with pedigree 0.122, pedigree (1,1,5,5,1)
  calculated from max value assuming lognormal distribution
  EcoSpold01Location=RER
  properties: wet mass 1 kg, dry mass 1 kg
- rolling mill: 2.54e-12 unit; lognormal variance with pedigree 0.362, pedigree (4,4,5,5,1)
  EcoSpold01Location=RER
- sodium hydroxide, without water, in 50% solution state: 0.00352 kg; lognormal variance with pedigree 0.162, pedigree (1,1,5,5,1)
  EcoSpold01Location=RER
  calculated from max value assuming lognormal distribution
  properties: heating value, net 3.03 MJ, dry mass 1 kg, wet mass 1 kg
- heat, district or industrial, natural gas: 0.270667, 17.562 MJ (2 entries); lognormal variance with pedigree 0.082, pedigree (1,1,5,5,1)
  EcoSpold01Location=RER
  calculated from max value assuming lognormal distribution
- electricity, medium voltage: 0.00434563, 0.000833304, 0.0139894, 0.203464, 0.0286784, 0.0934384 kWh (6 entries); lognormal variance with pedigree 0.122, pedigree (1,1,5,5,1)
  calculated from max value assuming lognormal distribution
  EcoSpold01Location=UCTE
- ammonia, anhydrous, liquid: 0.000641416, 5.51374e-5, 8.57796e-5, 0.00016996, 0.000166516, 1.74526e-5, 7.80197e-5, 0.00184572 kg (8 entries); lognormal variance with pedigree 0.452, pedigree (1,1,5,5,1)
  EcoSpold01Location=RER
  calculated from max value assuming lognormal distribution
- heat, district or industrial, other than natural gas: 7.97836e-5, 0.196749 MJ (2 entries); lognormal variance with pedigree 0.082, pedigree (1,1,5,5,1)

## Inputs from nature
- Water, unspecified natural origin [natural resource, in water]: 0.0118 m3; name water_UNO_input; lognormal variance with pedigree 0.06, pedigree (1,5,5,5,1)

## Emissions to nature
- COD, Chemical Oxygen Demand [water, unspecified]: 0.000428 kg; lognormal variance with pedigree 0.762, pedigree (1,1,5,5,1)
  calculated from max value assuming lognormal distribution
- Lead [air, unspecified]: 6.63e-8 kg; lognormal variance with pedigree 0.1, pedigree (1,5,5,5,1)
- Cadmium [air, unspecified]: 2.56e-8 kg; lognormal variance with pedigree 0.1, pedigree (1,5,5,5,1)
- Zinc, ion [water, unspecified]: 1.56e-6 kg; lognormal variance with pedigree 2.282, pedigree (1,1,5,5,1)
  calculated from max value assuming lognormal distribution
- Iron [soil, unspecified]: 0.00994 kg; lognormal variance with pedigree 0.732, pedigree (1,1,5,5,1)
  calculated from max value assuming lognormal distribution
- Sodium, ion [water, unspecified]: 0.00404 kg; lognormal variance with pedigree 0.1, pedigree (1,5,5,5,1)
- Chromium, ion [water, unspecified]: 1.44e-6 kg; lognormal variance with pedigree 0.162, pedigree (1,1,5,5,1)
  calculated from max value assuming lognormal distribution
- Particulates, > 2.5 um, and < 10um [air, unspecified]: 0.0171 kg; lognormal variance with pedigree 0.18, pedigree (1,5,5,5,1)
- TOC, Total Organic Carbon [water, unspecified]: 1.99e-5 kg; lognormal variance with pedigree 0.942, pedigree (1,1,5,5,1)
  calculated from max value assuming lognormal distribution
- Zinc [air, unspecified]: 1.31e-5 kg; lognormal variance with pedigree 0.1, pedigree (1,5,5,5,1)
- Particulates, > 10 um [air, unspecified]: 0.0057 kg; lognormal variance with pedigree 0.1, pedigree (1,5,5,5,1)
- Phosphorus [water, unspecified]: 1.17e-7 kg; lognormal variance with pedigree 1.292, pedigree (1,1,5,5,1)
  calculated from max value assuming lognormal distribution
- Nickel, ion [water, unspecified]: 1.98e-7 kg; lognormal variance with pedigree 0.372, pedigree (1,1,5,5,1)
  calculated from max value assuming lognormal distribution
- Chloride [water, unspecified]: 3.13e-5 kg; lognormal variance with pedigree 0.1, pedigree (1,5,5,5,1)
- Arsenic [air, unspecified]: 3.71e-9 kg; lognormal variance with pedigree 0.1, pedigree (1,5,5,5,1)
- Oils, unspecified [water, unspecified]: 6.94e-6 kg; lognormal variance with pedigree 0.852, pedigree (1,1,5,5,1)
  calculated from max value assuming lognormal distribution
- Hydrogen chloride [air, unspecified]: 0.0505 kg; lognormal variance with pedigree 0.1706, pedigree (2,5,5,5,1)
- Sodium [air, unspecified]: 4.49e-7 kg; lognormal variance with pedigree 0.18, pedigree (1,5,5,5,1)
- Lead [water, unspecified]: 1.31e-7 kg; lognormal variance with pedigree 0.7, pedigree (1,5,5,5,1)
- Iron, ion [water, unspecified]: 1.15e-5 kg; lognormal variance with pedigree 1.142, pedigree (1,1,5,5,1)
  calculated from max value assuming lognormal distribution
- Water [water, unspecified]: 0.0134555 m3; name water_to_water_unspecified; lognormal variance with pedigree 0.0827, pedigree (2,2,5,5,1)
  Calculated value based on literature values and expert opinion. See comments in the parametres' comment field.
  property carbon content, fossil 0; name C_content_fossil
  property fraction, origin: salt water 0; name fraction_origin_salt_water_Ww
  property water in wet mass 1000 kg; name WWM
  property dry mass 0 kg; name DM
  property fraction, origin: unspecified 0.74542; name fraction_origin_unspecified_Ww
  property fraction, origin: fresh water 0.25458; name fraction_origin_fresh_water_Ww
  property carbon content, non-fossil 0; name C_content_non_fossil
  property wet mass 1000 kg; name WM
- Iron [air, unspecified]: 2.73e-5 kg; lognormal variance with pedigree 0.1, pedigree (1,5,5,5,1)
- Hydrocarbons, unspecified [water, unspecified]: 1.16e-6 kg; lognormal variance with pedigree 0.36, pedigree (1,5,5,5,1)
- DOC, Dissolved Organic Carbon [water, unspecified]: 1.99e-5 kg; lognormal variance with pedigree 1.722, pedigree (1,1,5,5,1)
  Twice the uncertainty of TOC
- Water [air, unspecified]: 0.0023745 m3; name water_to_air_unspecified; lognormal variance with pedigree 0.0827, pedigree (2,2,5,5,1)
  (same comment as for Water)
  property fraction, origin: unspecified 0.74542; name fraction_origin_unspecified
  property fraction, origin: salt water 0; name fraction_origin_salt_water
  property fraction, origin: fresh water 0.25458; name fraction_origin_fresh_water
- Chromium VI [water, unspecified]: 6.72e-8 kg; lognormal variance with pedigree 0.162, pedigree (1,1,5,5,1)
  calculated from max value assuming lognormal distribution
- Ammonia [air, unspecified]: 0.109 kg; lognormal variance with pedigree 0.18, pedigree (1,5,5,5,1)
- Suspended solids, unspecified [water, unspecified]: 5.33e-6 kg; lognormal variance with pedigree 1.192, pedigree (1,1,5,5,1)
  calculated from max value assuming lognormal distribution
- BOD5, Biological Oxygen Demand [water, unspecified]: 0.000428 kg; lognormal variance with pedigree 1.482, pedigree (1,1,5,5,1)
  Twice the uncertainty of COD

## Sampling procedure
Literature

## Extrapolations
see technology This dataset has been copied from an original dataset covering the geography RER. The uncertainty has been adjusted accordingly.

## Review by Roland Hischier 2003-08-14
Passed.
