# clear-cutting, secondary forest to arable land, perennial crop

Dataset: EcoSpold 2, unit process
Geography: ID
Time period: 2010-01-01 to 2021-12-31
Technology level: current
Classification: ISIC rev.4 ecoinvent: 0161:Support activities for crop production
Tags: WFLDB
Scenario: Business-as-Usual
System model: Allocation, cut-off by classification
Generated by: Vincent Rossi
Database: ecoinvent
isCopyrightProtected: true
accessRestrictedTo: 1

## General comment
This dataset represents the interventions associated with the clear-cutting of secondary forest for the provision of arable land tenure. NPP (net primary productivity of a given land, in kg C / m2 and year) and VEG (above-ground biomass, below-ground biomass and dead organic matter) values are parameterized.
NPP values are reported by Haberl et al. (2007)
VEG values have the following sources:
- Forests: Global Forest Resources Assessment 2010: http://www.fao.org/forestry/fra/fra2010/en/
- Grassland: IPCC 2006 Guidelines, Volume 6, Table 6.4. All values in tonne C/ha, converted to carbon based on 47% carbon content of dry matter biomass (see for example section 6.2.1.4 of IPCC 2006).
- Crops: Cveg croplands, based on Table 11 of the European Commission decision.* All values in tonne C/ha.
* C(2010) 3751: COMMISSION DECISION of 10 June 2010 on guidelines for the calculation of land carbon stocks for the purpose of Annex V to Directive 2009/28/EC, Official Journal of the European Union, L 151/19. Exceptions based on the Table 12 of the EC decision: Coconuts, Jatropha, Jojoba Seeds, Oil palm fruit, Sugar cane
Distinction is made between primary and secondary forests. The respective land area of each type forest is known from FAOSTAT data. Based on empirical values, it is considered that the secondary VEG is 74% of the primary VEG. The same ratio is applied as the weighted average between primary and secondary forest is always equal to the GFRA 2010 value.

## Included activities start
This activity starts with the average state of secondary forest.

## Included activities end
The dataset includes the carbon stored in Above-Ground Biomas (AGB), Below-Ground Biomass (BGB) and Dead Organic Matter (DOM) pools. It includes the fluxes from these carbon pools in terms of CO2 and other trace gases caused by the burning of biomass. It also includes a rough estimation for the machine use required for the clear-cutting with European forestry data and the associated occupation impact.The loss/gain of Soil Organic Carbon (SOC) usually associated with a land tranformation is accounted for in the downstream activity using the arable land tenure, given that it depends on the subsequent land use practice.
This activity ends with the provision of arable land tenure, measured in unit kg carbon Potential Net Primary Production (NPP).

## Parameters
- NPP0, net primary productivity: 1.022 dimensionless; name NPP; lognormal variance with pedigree 0.022825, pedigree (2,5,2,2,3)
- LUC_crop_specific: 1 dimensionless
  This parameter allows to switch between a 'crop specific' and a 'country specific' approach when calculating the LUC of a crop. By default, the chosen approach is 'crop specific', so the value of the parameter is 1. If you want to apply a 'country specific' approach, turn the parameter to 0.
- Above and below ground biomass: 8.804 dimensionless; name VEG; lognormal variance with pedigree 0.017425, pedigree (2,5,2,2,3)

## Reference product
- land tenure, arable land, measured as carbon net primary productivity, perennial crop: 1 kg; CPC 7: Financial and related services; real estate services; and rental and leasing services; By-product classification allocatable product
  Yield = 1.0 kg/haLand that is made available for the cultivation of perennial crops, expressed in kg carbon net pripary productivity
  production volume 7.88377e7 kg
    This production volume has been estimated by decoupling the different land tenures contributing to the perennial land use change, per country, and multiplying by the national perennial land use change production volume. Land use change production volume is estimated based in FAO statistic and following the concept of Total Biomass Appropriation (TBA), developped by Krausmann et al., 2008. The ha of land devoted to perennial crops per country is multiplied by the share of TBA of the country, in order to weight the relative land use change of the country, in a Global context. The shares of TBA are calculated in relation to the total sum of TBA of the World.
    Additional source:
    Nemecek T., Bengoa X., Lansche J., Mouron P., Riedener E., Rossi V. & Humbert S. (2015) Methodological Guidelines for the Life Cycle Inventory of Agricultural Products. Version 3.0, July 2015. World Food LCA Database (WFLDB). Quantis and Agroscope, Lausanne and Zurich, Switzerland.
  property carbon content, non-fossil 1
    The flow is expressed in kg carbon Potential Net Primary Production (NPP0)
  property carbon content 1
    carbon content on a dry matter basis (reserved; not for manual entry)
  properties: price 0 EUR2005, wet mass 1 kg, dry mass 1 kg, water in wet mass 0 kg, water content 0, carbon allocation 1 kg

## Inputs from technosphere
- power sawing, without catalytic converter: 0.00565585 hour; = 0.238*VEG/NPP*0.72/0.45/580
  Calculated Value: 0.238 (hours/m3) * VEG / NPP * 0.72 (fraction of VEG not burned) / 0.45 (ratio C to biomass) / 580 (kg/m3). It is assumed that the share of VEG that is not burned (20%) or harvested (8%) (Houghton 2000) is clear-cut.
- diesel, burned in building machine: 2.40809 MJ; = 72.96*VEG/NPP/0.45/580
  Calculated Value: 72.96 (MJ/m3) * VEG / NPP / 0.45 (ratio C to biomass) / 580 (kg/m3).
  properties: heating value, net 1 MJ

## Inputs from nature
- Energy, gross calorific value, in biomass [natural resource, biotic]: 344.579 MJ; = VEG/NPP*40
  Calculated value: considering 15 MJ/kg (17% moisture wet basis) and 45% C in dry wood, 40 MJ/kg C in wood. 15 MJ is taken to reflect UHV rather than LHV.
- Transformation, from forest, secondary (non-use) [natural resource, land]: 0.978474 m2; = 1/NPP
  ; Corresponds to the reference flow.
- Carbon, organic, in soil or biomass stock [natural resource, in ground]: 8.61448 kg; = VEG/NPP
  Calculated Value: above and below ground biomass, in kg C per reference flow.
- Occupation, construction site [natural resource, land]: 6.7406e-6 m2*year; = 0.0124/1800*1/NPP
  Calculated Value: Occupation is estimated on the basis of the time required for power sawing assuming an eight-hour workday.
- Transformation, to permanent crop [natural resource, land]: 0.978474 m2; = 1/NPP
  ; Corresponds to the reference flow.

## Emissions to nature
- Carbon monoxide, from soil or biomass stock [air, non-urban air or from high stacks]: 0.39818 kg; = VEG/NPP/0.45*0.2*0.104
  Calculated Value: VEG / NPP / 0.45 (ratio C to biomass) * 0.2 (fraction burned) * EmissionFactor
  The share of VEG that is burned is multiplied with the emission factor.
- Particulates, > 2.5 um, and < 10um [air, non-urban air or from high stacks]: 0.0317779 kg; = VEG/NPP/0.45*0.2*0.0083
  (same comment as for Carbon monoxide, from soil or biomass stock)
- Furan [air, non-urban air or from high stacks]: 0.0183776 kg; = VEG/NPP/0.45*0.2*0.0048
  (same comment as for Carbon monoxide, from soil or biomass stock)
- Ammonia [air, non-urban air or from high stacks]: 0.00497726 kg; = VEG/NPP/0.45*0.2*0.0013; source EEA 2013
  (same comment as for Carbon monoxide, from soil or biomass stock)
- Particulates, < 2.5 um [air, non-urban air or from high stacks]: 0.0348408 kg; = VEG/NPP/0.45*0.2*0.0091
  (same comment as for Carbon monoxide, from soil or biomass stock)
- Propene [air, non-urban air or from high stacks]: 0.00210576 kg; = VEG/NPP/0.45*0.2*0.00055
  (same comment as for Carbon monoxide, from soil or biomass stock)
- Benzene, ethyl- [air, non-urban air or from high stacks]: 9.18878e-5 kg; = VEG/NPP/0.45*0.2*2.4E-05
  (same comment as for Carbon monoxide, from soil or biomass stock)
- Carbon dioxide, from soil or biomass stock [air, non-urban air or from high stacks]: 30.2464 kg; = VEG/NPP/0.45*1.58
  Calculated Value: The entire biomass (either burned or degraded) is multiplied with the emission factor. No wood from clear-cutting is considered harvested.
- Methane, from soil or biomass stock [air, non-urban air or from high stacks]: 0.0260349 kg; = VEG/NPP/0.45*0.2*0.0068
  (same comment as for Carbon monoxide, from soil or biomass stock)
- Propane [air, non-urban air or from high stacks]: 0.000574299 kg; = VEG/NPP/0.45*0.2*0.00015
  (same comment as for Carbon monoxide, from soil or biomass stock)
- Ethyne [air, non-urban air or from high stacks]: 0.000153146 kg; = VEG/NPP/0.45*0.2*4E-05
  (same comment as for Carbon monoxide, from soil or biomass stock)
- Phenol [air, non-urban air or from high stacks]: 2.2972e-5 kg; = VEG/NPP/0.45*0.2*6E-06
  (same comment as for Carbon monoxide, from soil or biomass stock)
- Dinitrogen monoxide [air, non-urban air or from high stacks]: 0.000765732 kg; = VEG/NPP/0.45*0.2*0.0002
  (same comment as for Carbon monoxide, from soil or biomass stock)
- Acetic acid [air, non-urban air or from high stacks]: 0.00804018 kg; = VEG/NPP/0.45*0.2*0.0021
  (same comment as for Carbon monoxide, from soil or biomass stock)
- Cyanide [air, non-urban air or from high stacks]: 0.0130174 kg; = VEG/NPP/0.45*0.2*0.0034
  (same comment as for Carbon monoxide, from soil or biomass stock)
- Xylene [air, non-urban air or from high stacks]: 0.00022972 kg; = VEG/NPP/0.45*0.2*6E-05
  (same comment as for Carbon monoxide, from soil or biomass stock)
- Formaldehyde [air, non-urban air or from high stacks]: 0.00536012 kg; = VEG/NPP/0.45*0.2*0.0014
  (same comment as for Carbon monoxide, from soil or biomass stock)
- Ethene [air, non-urban air or from high stacks]: 0.00746588 kg; = VEG/NPP/0.45*0.2*0.00195
  (same comment as for Carbon monoxide, from soil or biomass stock)
- Ethane [air, non-urban air or from high stacks]: 0.00459439 kg; = VEG/NPP/0.45*0.2*0.0012
  (same comment as for Carbon monoxide, from soil or biomass stock)
- Sulfur dioxide [air, non-urban air or from high stacks]: 0.00218234 kg; = VEG/NPP/0.45*0.2*0.00057
  (same comment as for Carbon monoxide, from soil or biomass stock)
- Formic acid [air, non-urban air or from high stacks]: 0.00421152 kg; = VEG/NPP/0.45*0.2*0.0011
  (same comment as for Carbon monoxide, from soil or biomass stock)
- Benzene [air, non-urban air or from high stacks]: 0.00153146 kg; = VEG/NPP/0.45*0.2*0.0004
  (same comment as for Carbon monoxide, from soil or biomass stock)
- Ethanol [air, non-urban air or from high stacks]: 6.89159e-5 kg; = VEG/NPP/0.45*0.2*1.8E-05
  (same comment as for Carbon monoxide, from soil or biomass stock)
- Acetaldehyde [air, non-urban air or from high stacks]: 0.00248863 kg; = VEG/NPP/0.45*0.2*0.00065
  (same comment as for Carbon monoxide, from soil or biomass stock)
- Isoprene [air, non-urban air or from high stacks]: 6.12585e-5 kg; = VEG/NPP/0.45*0.2*1.6E-05
  (same comment as for Carbon monoxide, from soil or biomass stock)
- Nitrogen oxides [air, non-urban air or from high stacks]: 0.00612585 kg; = VEG/NPP/0.45*0.2*0.0016; source EEA 2013
  (same comment as for Carbon monoxide, from soil or biomass stock)
- Methanol [air, non-urban air or from high stacks]: 0.00765732 kg; = VEG/NPP/0.45*0.2*0.002
  (same comment as for Carbon monoxide, from soil or biomass stock)
- PAH, polycyclic aromatic hydrocarbons [air, non-urban air or from high stacks]: 9.57165e-5 kg; = VEG/NPP/0.45*0.2*2.5E-05
  (same comment as for Carbon monoxide, from soil or biomass stock)
- Toluene [air, non-urban air or from high stacks]: 0.000957165 kg; = VEG/NPP/0.45*0.2*0.00025
  (same comment as for Carbon monoxide, from soil or biomass stock)
- Terpenes [air, non-urban air or from high stacks]: 0.000574299 kg; = VEG/NPP/0.45*0.2*0.00015
  (same comment as for Carbon monoxide, from soil or biomass stock)
- Acetonitrile [air, non-urban air or from high stacks]: 0.000689159 kg; = VEG/NPP/0.45*0.2*0.00018
  (same comment as for Carbon monoxide, from soil or biomass stock)
- Acetone [air, non-urban air or from high stacks]: 0.00237377 kg; = VEG/NPP/0.45*0.2*0.00062
  (same comment as for Carbon monoxide, from soil or biomass stock)

## Sampling procedure
Literature data
The reference product of the clear-cutting activitiy is Potential Net Primary Production (NPP0) measured in unit of kg carbon. It is up to the arable land-using activity to utilise the lands capacity to produce biomass

## Extrapolations
This dataset has been extrapolated from year 2015 to the year of the calculation (2021). The uncertainty has been adjusted accordingly.
