# treatment of metal scrap, mixed, for recycling, unsorted, sorting

Dataset: EcoSpold 2, unit process
Geography: CH
Time period: 2012-01-01 to 2021-12-31
Technology level: current
Classification: ISIC rev.4 ecoinvent: 3830:Materials recovery
Tags: combined production
Scenario: Business-as-Usual
System model: Allocation, cut-off by classification
Generated by: Melanie Haupt
Published in: Melanie Haupt 2018
Database: ecoinvent
isCopyrightProtected: true
accessRestrictedTo: 1

## General comment
This activity represents the treatment of mixed metal scrap from separate collection, i.e. a source-segregated municipal solid waste fraction, through sorting for recycling. Sorting of waste tinplate, ferrous metals and aluminium from residues and from each other in Switzerland, yielding individual material fractions for tinplate, ferrous scrap, and aluminium.

## Included activities start
The activity starts with 'metal scrap, mixed, unsorted' being available to the sorting facility.

## Included activities end
The activity ends with 'metal scrap, mixed, unsorted' being sorted and 'aluminium scrap, post-consumer, prepared for melting', 'iron scrap, sorted, pressed' and 'tinplate scrap, sorted' being available for transportation at the gates of the sorting facility.

## Geography
Data are sourced from plants located or activities taking place in Switzerland and/or relevant literature sources.

## Technology
Technology encountered in CH for the underlying time frame: The mixed metal scrap is sorted using magnetic and eddy current separators.

## Time period
Data mainly reflecting situation in Switzerland in 2012.

## Reference product
- tinplate, in mixed metal scrap: 0 kg; name RP1; CPC 39366: Waste and scrap of tin; By-product classification Recyclable
  production volume 0 kg; name PVRP1
    Total amount of collected tinplate wastes in Switzerland. Value reported in: Haupt, Melanie & Kägi, Thomas & Hellweg, Stefanie. (2018). Life Cycle Inventories of Waste Manageme nt Processes. Data in Brief. 19. 10.1016/j.dib.2018.05.067.
  property carbon content, fossil 0.0052906; = 0.04*0.771*0.17155
    fossil carbon content on a dry matter basis; estimated by assuming 4% impurities with composition as residual MSW with 77.1% dry matter and a fossil carbon content of 17.2% (on dry matter basis)
  property carbon content, non-fossil 0.00806929; = 0.04*0.771*0.26165
    non-fossil carbon content on a dry matter basis; estimated by assuming 4% impurities with composition as residual MSW with 77.1% dry matter and a non-fossil carbon content of 26.2% (on dry matter basis)
  property heating value, net 0 MJ
    Non combustible products are assumed to have an LHV equal to zero (0).
  property price 0.149 EUR2005; name RP1_price_EUR2005
    Assuming same price as stated for 'iron scrap, unsorted' (EUR2005 0.149 per kg)in ecoinvent 3.6. The original comment to this price estimate: "Temporary price data. Calculated as 90% of purchasers price based on: estimated at 85% of sorted scrap"
  property carbon content 0.0133599
    carbon content on a dry matter basis (reserved; not for manual entry)
  properties: water in wet mass 0.00916 kg, water content 0.00924468, wet mass 1 kg, dry mass 0.99084 kg, carbon allocation 0.0132375 kg
- aluminium, in mixed metal scrap: 0 kg; By-product classification Recyclable; CPC 39363: Waste and scrap of aluminium
  production volume 0 kg; name PVRP3
    Based on Haupt et al. (2017): The amount of aluminum (incl. UBCs) collected through mixed metal separate collection and entering sorting in Switzerland is estimated to 4'480 tonnes in 2012. This value is obtained from figure 4. Reference: Haupt, Melanie & Vadenbo, Carl & Hellweg, Stefanie. (2017). Do We Have the Right Performance Indicators for the Circular Economy?: Insight into the Swiss Waste Management System. Journal of Industrial Ecology. vol. 21, no. 3, pp. 615-627.
  property heating value, net 0 MJ
    Non combustible products are assumed to have an LHV equal to zero (0).
  property price 0.685 EUR2005; name RP3_price_EUR2005
    Assuming same price as stated for 'aluminium scrap, post-consumer' (EUR2005 0.685 per kg) in ecoinvent 3.6. The original comment to this price estimate: "Temporary price data. Calculated as 90% of purchasers price based on: estimated at 85% of sorted scrap"
  property carbon content, non-fossil 0.00403464; = 0.02*0.771*0.26165
    non-fossil carbon content on a dry matter basis; estimated by assuming 2% impurities with composition as residual MSW with 77.1% dry matter and a non-fossil carbon content of 26.2% (on dry matter basis)
  property carbon content, fossil 0.0026453; = 0.02*0.771*0.17155
    fossil carbon content on a dry matter basis; estimated by assuming 2% impurities with composition as residual MSW with 77.1% dry matter and a fossil carbon content of 17.2% (on dry matter basis)
  property carbon content 0.00667994
    carbon content on a dry matter basis (reserved; not for manual entry)
  properties: dry mass 0.99542 kg, water in wet mass 0.00458 kg, wet mass 1 kg, water content 0.00460107, carbon allocation 0.00664935 kg
- ferrous metal, in mixed metal scrap: 0 kg; name RP2; By-product classification Recyclable; CPC 39340: Ferrous waste and scrap
  production volume 0 kg; name PVRP2
    Based on Haupt et al. (2017): The amount of ferrous metal (iron scrap) collected through mixed metal separate collection and entering sorting in Switzerland is estimated to 1'990 tonnes in 2012. This value is obtained from figure 4. Reference: Haupt, Melanie & Vadenbo, Carl & Hellweg, Stefanie. (2017). Do We Have the Right Performance Indicators for the Circular Economy?: Insight into the Swiss Waste Management System. Journal of Industrial Ecology. vol. 21, no. 3, pp. 615-627.
  property heating value, net 0 MJ
    Non combustible products are assumed to have an LHV equal to zero (0).
  property price 0.149 EUR2005; name RP2_price_EUR2005
    Assuming same price as stated for 'iron scrap, unsorted' (EUR2005 0.149 per kg) in ecoinvent 3.6. The original comment to this price estimate: "Temporary price data. Calculated as 90% of purchasers price based on: estimated at 85% of sorted scrap"
  property carbon content, fossil 0.0052906; = 0.04*0.771*0.17155
    (same comment as for tinplate, in mixed metal scrap)
  property carbon content, non-fossil 0.00806929; = 0.04*0.771*0.26165
    (same comment as for tinplate, in mixed metal scrap)
  property carbon content 0.0133599
    carbon content on a dry matter basis (reserved; not for manual entry)
  properties: water content 0.00924468, wet mass 1 kg, water in wet mass 0.00916 kg, dry mass 0.99084 kg, carbon allocation 0.0132375 kg
- aluminium scrap, post-consumer, prepared for melting: 1 kg; name BP3; = 0*0.96*abs(RP1)+0*0.96*abs(RP2)+1*0.98*abs(RP3); By-product classification Recyclable; CPC 39363: Waste and scrap of aluminium; pedigree (1,1,1,1,1)
  Based on Haupt et al. (2017): 1 kg of "aluminium, in mixed metal scrap", yields 0.98 kg of "aluminium scrap, post consumer, prepared for melting" after the sorting process. The impurities are collected as municipal solid waste stream.
  production volume 4.3904e6 kg; name PVBP3; = Ref('78e497f5-e42b-4a4c-8e6b-c354b25f7bd2', 'ProductionVolume') * (ABS(Ref('cbe73e46-4b8f-4821-b556-cdebec5f3ac0')) / ABS(Ref('78e497f5-e42b-4a4c-8e6b-c354b25f7bd2'))
  property price 0.806 EUR2005; name BP3_price_EUR2005
  properties: wet mass 1 kg, water in wet mass 0 kg, carbon content, non-fossil 0, dry mass 1 kg, carbon content, fossil 0, water content 0, carbon content 0, carbon allocation 0 kg

## By-products
- iron scrap, sorted, pressed: 0 kg; name BP2; = 0*0.96*abs(RP1)+1*0.96*abs(RP2)+0*0.98*abs(RP3); CPC 39310: Slag, dross, scalings and other waste from the manufacture of iron or steel; By-product classification Recyclable; pedigree (1,1,1,1,1)
  Based on Haupt et al. (2017): 1 kg of "ferrous metal, in mixed metal scrap", yields 0.96 kg of "iron scrap, sorted, pressed" after the sorting process. The impurities are collected as municipal solid waste stream.
  production volume 1.9104e6 kg; name PVBP2; = PVRP2*BP2/abs(RP2)
    Calculated based on the production volume of the reference product.
  property price 0.175 EUR2005; name BP2_price_EUR2005
    Temporary price data. Calculated as 90% of purchasers price based on: 2005 import and export prices (total trades (USD) divided by total weight (kg) in biggest economies of the world: EU27, USA, Brasil, China, India, Japan and Russia) from UN Commodity Trade Statistics Database (http://data.un.org/Explorer.aspxDatabase [Accessed 2011.06.20]). Commodity: Waste or scrap, of cast iron
  property carbon content 0
    carbon content on a dry matter basis (reserved; not for manual entry)
  properties: carbon content, non-fossil 0, water content 0, dry mass 1 kg, wet mass 1 kg, carbon content, fossil 0, water in wet mass 0 kg, carbon allocation 0 kg
- aluminium scrap, post-consumer, prepared for melting: 0 kg; By-product classification Recyclable; CPC 39363: Waste and scrap of aluminium; pedigree (1,1,1,1,1)
  (same comment as for aluminium scrap, post-consumer, prepared for melting)
  production volume 0 kg; name PVBP3; = Ref('78e497f5-e42b-4a4c-8e6b-c354b25f7bd2', 'ProductionVolume') * (ABS(Ref('cbe73e46-4b8f-4821-b556-cdebec5f3ac0')) / ABS(Ref('78e497f5-e42b-4a4c-8e6b-c354b25f7bd2'))
    Calculated based on the production volume of the reference product.
  property carbon content 0
    carbon content on a dry matter basis (reserved; not for manual entry)
  properties: wet mass 1 kg, water in wet mass 0 kg, carbon content, non-fossil 0, dry mass 1 kg, carbon content, fossil 0, water content 0, carbon allocation 0 kg
- tinplate scrap, sorted: 0 kg; name BP1; = 1*0.96*abs(RP1)+0*0.96*abs(RP2)+0*0.98*abs(RP3); CPC 39366: Waste and scrap of tin; By-product classification Recyclable; pedigree (1,1,1,1,1)
  Based on Haupt et al. (2017): 1 kg of "tinplate, in mixed metal scrap", yields 0.96 kg of "tinplate scrap, sorted" after the sorting process. The impurities are collected as municipal solid waste stream.
  production volume 1.248e7 kg; name PVBP1; = PVRP1*BP1/abs(RP1)
    Calculated based on the production volume of the reference product.
  property price 0.175 EUR2005; name BP1_price_EUR2005
    Assuming same price as stated for 'iron scrap, sorted, pressed' (EUR2005 0.175 per kg) in ecoinvent 3.6. The original comment to this price estimate: "Temporary price data. Calculated as 90% of purchasers price based on: 2005 import and export prices (total trades (USD) divided by total weight (kg) in biggest economies of the world: EU27, USA, Brasil, China, India, Japan and Russia) from UN Commodity Trade Statistics Database (http://data.un.org/Explorer.aspxDatabase [Accessed 2011.06.20]). Commodity: Waste or scrap, of cast iron"
  property carbon content 0
    carbon content on a dry matter basis (reserved; not for manual entry)
  properties: water in wet mass 0 kg, water content 0, carbon content, fossil 0, carbon content, non-fossil 0, dry mass 1 kg, wet mass 1 kg, carbon allocation 0 kg

## Inputs from technosphere
- waste preparation facility: 2.04082e-9 unit; = (2.00E-09)*(abs(RP1)+abs(RP2)+abs(RP3)); lognormal variance with pedigree 0.69, pedigree (1,1,5,1,1)
  Exchange amount modeled based on relative proportions of recyclable fractions in the mixed input flow to allow for allocation among co-products during database linking.; Input of (immobile) infrastructure modelled with an activity link to the supplying activity (construction) of matching geography.
- diesel, burned in building machine: 0.0176531 MJ; = (1.73E-02)*(abs(RP1)+abs(RP2)+abs(RP3)); lognormal variance with pedigree 0.69, pedigree (1,1,5,1,1)
  Exchange amount modeled based on relative proportions of recyclable fractions in the mixed input flow to allow for allocation among co-products during database linking.
  properties: heating value, net 1 MJ
- municipal solid waste: -0.0204082 kg; name BP; = (0.04*abs(RP1)+0.04*abs(RP2)+0.02*abs(RP3))*-1; lognormal variance with pedigree 0.0493, pedigree (4,3,5,3,1)
  Based on Haupt et al. (2017): The impurities collected by the sorting process are collected as a municipal solid waste stream.
  production volume 689200 kg; = (PVRP1+PVRP2+PVRP3)-(PVBP1+PVBP2+PVBP3)
    Calculated based on the production volume of the reference product.
  property price 0 EUR2005; name BP_price_EUR2005
  properties: dry mass 0.771 kg, heating value, net 11.74 MJ, water content 0.297017, wet mass 1 kg, carbon content, non-fossil 0.261655, carbon content, fossil 0.171549
  note on heating value, net: Value taken from the general comment of the treatment dataset.
  note on carbon content, non-fossil: MSW composition in tab 4.1, ecoinvent v2.2 report 13_I. C content referred to 1 kg DM
- electricity, medium voltage: 0.0102041 kWh; = (1.00E-02)*(abs(RP1)+abs(RP2)+abs(RP3)); lognormal variance with pedigree 0.69, pedigree (1,1,5,1,1)
  (same comment as for diesel, burned in building machine)
- aluminium, in mixed metal scrap: 1.02041 kg
  production volume 4.48e6 kg
  properties: dry mass 0.99542 kg, carbon content, non-fossil 0.00403464, carbon content, fossil 0.0026453, wet mass 1 kg, water content 0.00460107
  note on carbon content, non-fossil: non-fossil carbon content on a dry matter basis; estimated by assuming 2% impurities with composition as residual MSW with 77.1% dry matter and a non-fossil carbon content of 26.2% (on dry matter basis)
  note on carbon content, fossil: fossil carbon content on a dry matter basis; estimated by assuming 2% impurities with composition as residual MSW with 77.1% dry matter and a fossil carbon content of 17.2% (on dry matter basis)

## Extrapolations
The sorting process was modeled from primary industrial data on the diesel consumption and assuming an electricity consumption of 0.01 kWh/kg (based on the existing ecoinvent dataset on the sorting of iron in Europe). The capital equipment (infrastructure) requirements were modeled based on a newly inventoried waste preparation facility in Switzerland.
