# contouring, bronze

Dataset: EcoSpold 2, unit process
Geography: RER
Time period: 1997-01-01 to 2021-12-31
Technology level: current
Classification: ISIC rev.4 ecoinvent: 2592:Treatment and coating of metals; machining
Classification: EcoSpold01Categories: metals/processing
Synonyms: rolling bronze
Tags: ConvertedDataset
Scenario: Business-as-Usual
System model: Allocation, cut-off by classification
Generated by: Hans-Jörg Althaus
Published in: Classen M. 2009
Database: ecoinvent
isCopyrightProtected: true
accessRestrictedTo: 1

## General comment
Most of the data used stem from processes similar to contouring bronze. Overall data quality is poor.
[This dataset was already contained in the ecoinvent database version 2. It was not individually updated during the transfer to ecoinvent version 3. Life Cycle Impact Assessment results may still have changed, as they are affected by changes in the supply chain, i.e. in other datasets. This dataset was generated following the ecoinvent quality guidelines for version 2. It may have been subject to central changes described in the ecoinvent version 3 change report (http://www.ecoinvent.org/database/ecoinvent-version-3/reports-of-changes/), and the results of the central updates were reviewed extensively. The changes added e.g. consistent water flows and other information throughout the database. The documentation of this dataset can be found in the ecoinvent reports of version 2, which are still available via the ecoinvent website. The change report linked above covers all central changes that were made during the conversion process.]

## Included activities end
Heating, rolling, degreasing / pickling and waste water treatment.

## Technology
Technique describes the average of European Union. Data are estimated basing on data of similar processes.

## Parameters
- fraction, tap water, to air: 0.15 dimensionless; name fraction_TW_to_air; = fraction_PW_to_air; lognormal variance with pedigree 0.092025, pedigree (4,4,3,2,4)
  Calculated value. See comment in the other parametres present in this dataset. Tap water is considered to be always used as process water, thus process water fractions to air are applied to all tap water input flows to calculate the amount of water consumed in the processes.
- fraction, process water, to air: 0.15 dimensionless; name fraction_PW_to_air; lognormal variance with pedigree 0.092025, pedigree (4,4,3,2,4)
  Literature value. In case when no industry/process specific data are available, default evaporation fraction value is used. This value is 15% and is based on literature (Statistics Canada, 2007 & Shaffer, K.H., 2008, Consumptive water use in the Great Lakes Basin, USGS & Shiklomanov, 2003, World Water Resources at the Beginning of the 21st Century) and has been approved by an expert.

## Reference product
- contouring, bronze: 1 kg; CPC 88731: Metal treatment and coating services; By-product classification allocatable product
  EcoSpold01Location=RER
  production volume 2.18842e7 kg
    Unknown
    Estimated at 25% of global production
  property price 0.233589 EUR2005
    Calculated based on inputs: The price of the product has been calculated as a sum of the values of the material and energy inputs for this product. This value is therefore a rough estimation. It may underestimate the real price since there are additional expenses when producing any product. These expences can include for example labour costs, treatment of waste materials and profit for the producer. Please consider carefully whether this level of data quality is acceptable for your application.
  property carbon content, fossil 0
    Bronze is a metal alloy consisting primarily of copper, usually with tin as the main additive, but sometimes with other elements such as phosphorus, manganese, aluminum, or silicon
  property carbon content, non-fossil 0
    (same comment as for contouring, bronze)
  property carbon content 0
    carbon content on a dry matter basis (reserved; not for manual entry)
  properties: water content 0, wet mass 0.039644 kg, dry mass 0.039644 kg, water in wet mass 0 kg, carbon allocation 0 kg

## Inputs from technosphere
- sludge from steel rolling: -0.016335 kg; lognormal variance with pedigree 0.38, pedigree (5,5,5,5,5)
  EcoSpold01Location=CH
  production volume 357479 kg
    Calculated from the production volume of contouring, bronze in proportion to the respective output amounts.
  properties: water content 0.25, wet mass 1 kg, dry mass 0.8 kg, carbon content, fossil 0.0123943
- electric arc furnace dust: -0.00044159 kg; lognormal variance with pedigree 0.38, pedigree (5,5,5,5,5)
  EcoSpold01Location=CH
  production volume 9663.85 kg
    (same comment as for sludge from steel rolling)
  properties: water content 0.182033, carbon content, fossil 0.01339, wet mass 1 kg, dry mass 0.846 kg
- tap water: 6 kg; name tap_water_input; lognormal variance with pedigree 0.18, pedigree (4,5,5,5,5)
  EcoSpold01Location=RER
  properties: water content 2962.17, carbon content, fossil 0.00178991, dry mass 0.000337476 kg, wet mass 1 kg
  note on carbon content, fossil: Bicarbonate content is 2.93 mol/m3. CO2 content is 0.1 mol/m3 (ecoinvent v2.2 report 8, Tab 93.1).
- sulfuric acid: 0.34 kg; lognormal variance with pedigree 0.318, pedigree (4,5,5,5,5)
  EcoSpold01Location=RER
  properties: dry mass 1 kg, wet mass 1 kg
- lubricating oil: 0.004 kg; lognormal variance with pedigree 0.318, pedigree (4,5,5,5,5)
  EcoSpold01Location=RER
  properties: carbon content, fossil 0.75, dry mass 1 kg, wet mass 1 kg, heating value, net 40.2 MJ
  note on carbon content, fossil: Lubricating oil is produced from diesel. C-content/dry mass of fats and oils considered 75%, from: ecoinvent v2.2 report, n 15a, pg 40
  note on heating value, net: Literature value, Source: IPCC 2006, 2006 IPCC Guidelines for National Greenhouse Gas Inventories, Prepared by the National Greenhouse Gas Inventories Programme, Eggleston H.S., Buendia L., Miwa K., Ngara T. and Tanabe K. (eds). Published: IGES, Japan
- rolling mill: 1.4286e-9 unit; lognormal variance with pedigree 0.68, pedigree (5,5,5,5,5)
  EcoSpold01Location=RER
  activityLink introduced to establish a direct link to the corresponding regional supply of this product
- heat, district or industrial, natural gas: 1.6 MJ; lognormal variance with pedigree 0.318, pedigree (4,5,5,5,5)
  EcoSpold01Location=RER
  properties: heating value, net 1 MJ
- electricity, medium voltage: 0.22333 kWh; lognormal variance with pedigree 0.38, pedigree (5,5,5,5,5)
  EcoSpold01Location=UCTE
- bronze: 0.039644 kg; lognormal variance with pedigree 0.318, pedigree (4,5,5,5,5)
  EcoSpold01Location=CH
  properties: dry mass 1 kg, wet mass 1 kg

## Emissions to nature
- Tin, ion [water, unspecified]: 1.5714e-7 kg; lognormal variance with pedigree 1.02, pedigree (5,5,5,5,5)
- Chromium, ion [water, unspecified]: 1.5086e-7 kg; lognormal variance with pedigree 1.02, pedigree (5,5,5,5,5)
- Arsenic, ion [water, unspecified]: 1.5714e-9 kg; lognormal variance with pedigree 1.02, pedigree (5,5,5,5,5)
- NMVOC, non-methane volatile organic compounds, unspecified origin [air, unspecified]: 4.5e-5 kg; lognormal variance with pedigree 0.358, pedigree (4,5,5,5,5)
- Water [water, unspecified]: 0.0051 m3; name water_to_water_unspecified; = (tap_water_input/1000)*(1-fraction_TW_to_air); lognormal variance with pedigree 0.0807, pedigree (2,2,5,1,1)
  Calculated value based on literature values and expert opinion. See comments in the parametres' comment field.
  property carbon content, non-fossil 0; name C_content_non_fossil
  property carbon content, fossil 0; name C_content_fossil
  property wet mass 1000 kg; name WM
  property fraction, origin: salt water 0; name fraction_origin_salt_water_Ww
  property fraction, origin: unspecified 0; name fraction_origin_unspecified_Ww
  property fraction, origin: fresh water 1; name fraction_origin_fresh_water_Ww
  property water in wet mass 1000 kg; name WWM
  property dry mass 0 kg; name DM
- Mercury [water, unspecified]: 1.5714e-9 kg; lognormal variance with pedigree 1.02, pedigree (5,5,5,5,5)
- Copper, ion [water, unspecified]: 1.7286e-6 kg; lognormal variance with pedigree 1.02, pedigree (5,5,5,5,5)
- Water [air, unspecified]: 0.0009 m3; name water_to_air_unspecified; = (tap_water_input/1000*fraction_TW_to_air); lognormal variance with pedigree 0.0807, pedigree (2,2,5,1,1)
  (same comment as for Water)
  property fraction, origin: salt water 0; name fraction_origin_salt_water
  property fraction, origin: fresh water 1; name fraction_origin_fresh_water
  property fraction, origin: unspecified 0; name fraction_origin_unspecified
- DOC, Dissolved Organic Carbon [water, unspecified]: 2.0551e-5 kg; lognormal variance with pedigree 0.42, pedigree (5,5,5,5,5)
- Cadmium, ion [water, unspecified]: 1.5714e-9 kg; lognormal variance with pedigree 1.02, pedigree (5,5,5,5,5)
- TOC, Total Organic Carbon [water, unspecified]: 2.0551e-5 kg; lognormal variance with pedigree 0.42, pedigree (5,5,5,5,5)
- COD, Chemical Oxygen Demand [water, unspecified]: 7.9e-5 kg; lognormal variance with pedigree 0.42, pedigree (5,5,5,5,5)
- Chromium VI [water, unspecified]: 6.2857e-9 kg; lognormal variance with pedigree 1.02, pedigree (5,5,5,5,5)
- BOD5, Biological Oxygen Demand [water, unspecified]: 7.9e-5 kg; lognormal variance with pedigree 0.42, pedigree (5,5,5,5,5)
- Nickel, ion [water, unspecified]: 4.7143e-7 kg; lognormal variance with pedigree 1.02, pedigree (5,5,5,5,5)
- Lead [water, unspecified]: 1.5714e-7 kg; lognormal variance with pedigree 1.02, pedigree (5,5,5,5,5)
- Zinc, ion [water, unspecified]: 3.9286e-6 kg; lognormal variance with pedigree 1.02, pedigree (5,5,5,5,5)

## Sampling procedure
Literature

## Extrapolations
This dataset has been extrapolated from year 2002 to the year of the calculation (2021). The uncertainty has been adjusted accordingly.

## Review by Roland Hischier 2010-02-07
Validated for v1.01
