# transport, freight, inland waterways, barge tanker

Dataset: EcoSpold 2, unit process
Geography: RER
Time period: 1998-01-01 to 2021-12-31
Technology level: current
Classification: ISIC rev.4 ecoinvent: 5022:Inland freight water transport
Classification: EcoSpold01Categories: transport systems/ship
Scenario: Business-as-Usual
System model: Allocation, cut-off by classification
Share of production covered: 0 %
Generated by: Michael Spielmann (obsolete)
Published in: Spielmann M. 2007
Database: ecoinvent
isCopyrightProtected: true
accessRestrictedTo: 1

## General comment
The dataset represents the entire transport life cycle including the production, operation and maintenance of the barge tanker; the construction of the port; and the construction of the canal. The energy use and combustion emissions data represent the transport of good with a barge tanker with a carrying capacity not less than 50 tonnes operating on inland waterways.

## Included activities start
Transport starting with the production of one barge tanker. Service of the energy use and combustion emissions starts with the consumption of fuel for propelling.

## Included activities end
The dataset ends with the service of transporting 1 ton over a distance of 1 km. The dataset includes the production, operation and maintenance of one barge tanker; the construction of one port; and the construction of one canal. The activity of energy use and combustion emisssions ends with the service of transporting 1 ton over a distance of 1 km. The dataset includes the consumption fo fuel, airborne gaseous emissions, particulate emissions, heay metal emissions and persistent organic compunds (POPs) emissions until and including the disposal of bilge oil.

## Geography
Data from one port in Netherlands is employed as an estimate for international water transportation. Canal inventories represent one German canal. Data of the energy use and combustion emissions is representative for the European Rhine-Fleet.

## Technology
The data of the barge tanker represents the current average total capacity for a barge tanker (1200 t/vessel). The data of the port represents the conditions at the Port of Rotterdam in Netherlands. The data of the canal are derived from the Main-Donau-Canal in Germany. The data of the energy use and combustion emissions represent a barge tanker navigates in inland waterways (strecht of water, not part of the sea) and with the capacity of not less than 50 tonnes. The fuel used is exclusively diesel. Exhaust emissions from inland waterway vessels - predominately powered by diesel engines - are characterized by similar emission profiles as diesel engines of heavy duty vehicles. For heavy metal emissions are employed the same figures as for hevy-duty vehicle diesel engines.

## Reference product
- transport, freight, inland waterways, barge tanker: 1 metric ton*km; name RP_amount_1; By-product classification allocatable product; CPC 65222: Inland water transport services of freight by tankers
  EcoSpold01Location=RER
  production volume 1.32237 metric ton*km; name RP_PV_1
    This is a placeholder value that does not reflect real-world production volumes. This dataset does not currently require a real-world production volume to work in the database framework, and no actual data were collected yet. This has no negative effect on the results of the ecoinvent database. The placeholder value of this activity was scaled according to the nominal GDP of 2005 (source: United Nations, http://data.un.org/Glossary.aspx?q=GDP+%28current+US%24%29, accessed 20130726) to reflect an appropriate share of the global production volume, which is also a placeholder value.
  property price 0.0105699 EUR2005
    Calculated based on inputs: The price of the product has been calculated as a sum of the values of the material and energy inputs for this product. This value is therefore a rough estimation. It may underestimate the real price since there are additional expenses when producing any product. These expences can include for example labour costs, treatment of waste materials and profit for the producer. Please consider carefully whether this level of data quality is acceptable for your application.

## Inputs from technosphere
- port facilities: 1.45e-14 unit; lognormal variance with pedigree 0.08, pedigree (1,1,5,1,1)
  EcoSpold01Location=RER
  Calculated value derived from other dataset.
- barge tanker: 1.28e-9 unit; lognormal variance with pedigree 0.05, pedigree (1,1,5,1,1)
  EcoSpold01Location=RER
  Calculated value derived from other dataset.
- diesel: 0.00874 kg; source Frischknecht R. 1996; lognormal variance with pedigree 0.07, pedigree (1,1,5,1,1)
  Estimation. Based in various literature values. The average fuel consumption is calculated by employing carrying capacity specific fuel consumption available from Dorland (2000) as quoted in Bickel (2001). The class specific fuel consumption is aggregated using the total carrying capacity of each class ZKR (2003) as allocation factor. Energy use and combustion emissions
  Further references:
  Dorland C. and Olsthoorn A. A. (2000) Inland shipping emission factors. Report for ExternE Core/Transport task 5.3, Amsterdam
  Bickel P. and Friedrich R. (2001) Environmental External Costs of Transport. Springer-Verlag Berlin and Heidelberg GmbH & Co. KG, Berlin - Germany
  ZKR (2003) Wirtschaftliche Entwicklung der Rheinschifffahrt 2000. Rhein und Binnenschifffahrtsstatistik. Download of June from mediaplan.ovh.net/~ccrzkr/Files/ra2001statde.pdf.
  Borken J., Patyk A. and Reinhardt G. A. (1999) Basisdaten für ökologische Bilanzierungen: Einsatz von Nutzfahrzeugen in Transport, Landwirtschaft und Bergbau. Vieweg, Braunschweig/Wiesbaden
  Bialonski W. (1990) Spezifischer Energieeinsatz im Verkehr - Ermittlung und Vergleich der spezifischen Energieverbräuche. Forschungsbericht FE Nr. 90 247/88, im Auftrag des Bundesministers für Verkehr (ausgeführt am Verkehrswissenschaftlichen Institut der Rheinisch-Westfälischen Technischen Hochschule Aachen), Bonn
  properties: heating value, net 42.8 MJ, carbon content, fossil 0.865, dry mass 1 kg, wet mass 1 kg
- canal: 0.000116 m*year; lognormal variance with pedigree 0.16, pedigree (1,1,5,1,1)
  EcoSpold01Location=RER
  Calculated value derived from other dataset.
- bilge oil: 0 kg; name BP_amount_1; pedigree (1,1,1,1,1)
  Estimation. Uncertainty range accounts for a factor between 0.4 and 0.9 % of the specific fuel consumption. Energy use and combustion emissions
  production volume 0 kg
    Calculated from production volume of reference product using the relative outputs.
  property wet mass 1 kg; name WM
  property water in wet mass 0.9 kg; name WWM
  property dry mass 0.1 kg; name DM
  property water content 9; name water_content
  property carbon content, fossil 0.84; name C_content_fossil
  property price 0 EUR2005; name BP_amount_1_price_EUR2005
  property carbon content, non-fossil 0; name C_content_non_fossil
  properties: heating value, net 1.92 MJ
  note on heating value, net: Value taken from the general comment of the treatment dataset.
- maintenance, barge: 1.28e-9 unit; lognormal variance with pedigree 0.05, pedigree (1,1,5,1,1)
  Calculated value derived from other dataset.
  EcoSpold01Location=RER
- bilge oil: -4.25868e-5, -1.11319e-6 kg (2 entries); lognormal variance with pedigree 0.08, pedigree (1,1,5,1,1)
  (same comment as for bilge oil)
  production volume 5.77875e-5 kg
  properties: wet mass 1 kg, dry mass 0.1 kg, water content 9, carbon content, fossil 0.84, heating value, net 1.92 MJ

## Emissions to nature
- Nitrogen oxides [air, non-urban air or from high stacks]: 0.000437 kg; source Dorland C. 2000; lognormal variance with pedigree 0.08, pedigree (1,1,5,1,1)
  Literature value. In this project it's employed the figures from Dorland (2000) as quoted in Bickel (2001). Energy use and combustion emissions
  Further references:
  Bickel P. and Friedrich R. (2001) Environmental External Costs of Transport. Springer-Verlag Berlin and Heidelberg GmbH & Co. KG, Berlin - Germany
- Particulates, > 10 um [air, non-urban air or from high stacks]: 3.45e-7 kg; source Dorland C. 2000; lognormal variance with pedigree 0.08, pedigree (1,1,5,1,1)
  Calculate value; split results from PM split of diesel road vehicle exhaust emissions. Dorland (2000) as quoted in Bickel (2001) reported a PM10 emission index of 1 g/kg fuel which is employed in this project. It's employed the same size distribution as for heavy-duty vehicle diesel engines. Energy use and combustion emissions
  Further references:
  Bickel P. and Friedrich R. (2001) Environmental External Costs of Transport. Springer-Verlag Berlin and Heidelberg GmbH & Co. KG, Berlin - Germany
- Copper [air, non-urban air or from high stacks]: 1.49e-8 kg; source Jungbluth, N. 2003; lognormal variance with pedigree 0.69, pedigree (1,1,5,1,1)
  Calculated value; standard basic uncertainty for heavy metals. In this project we use the same figures as we employed for heavy-duty vehicle diesel engines. Heavy metal emission indices of diesel fuels EEA (2000) and Jungbluth (2003) are applyed. Energy use and combustion emissions
  Further references:
  EEA (2000) Computer programme to calculate emissions from road transport. Methodology and emission factors (Version 2.1). 49. European Environment Agency, Copenhagen
  Jungbluth N. (2003) Erdöl. In: Sachbilanzen von Energiesystemen: Grundlagen für den ökologischen Vergleich von Energiesystemen und den Einbezug von Energiesystemen in Ökobilanzen für die Schweiz (ed. Dones R.). Final report ecoinvent 2000 No. 6, Paul Scherrer Institut Villigen, Swiss Centre for Life Cycle Inventories, Duebendorf, CH, Online-Version under: www.ecoinvent.ch <http://www.ecoinvent.ch>.
- Xylene [air, non-urban air or from high stacks]: 6.99e-8 kg; lognormal variance with pedigree 0.16, pedigree (1,1,5,1,1)
  Calculated value. It's calculated from VOC split of diesel engines. It's applied the fractions as employed for diesel concepts of heavy-duty vehicles. Energy use and combustion emissions
- Ammonia [air, non-urban air or from high stacks]: 4.53e-7 kg; lognormal variance with pedigree 0.16, pedigree (1,1,5,1,1)
  Estimation. Based on the emission of heavy fuel oil burned in industrial furnance. Energy use and combustion emissions
- Mercury [air, non-urban air or from high stacks]: 6.12e-13 kg; source Jungbluth, N. 2003; lognormal variance with pedigree 0.69, pedigree (1,1,5,1,1)
  (same comment as for Copper)
- Toluene [air, non-urban air or from high stacks]: 6.99e-8 kg; source Dorland C. 2000; lognormal variance with pedigree 0.16, pedigree (1,1,5,1,1)
  Calculated value. It's calculated from VOC split of diesel engines. It's applied the fractions as employed for diesel concepts of heavy-duty vehicles. In this project it's employed the figures from Dorland (2000) as quoted in Bickel (2001). Energy use and combustion emissions
  Further references:
  Bickel P. and Friedrich R. (2001) Environmental External Costs of Transport. Springer-Verlag Berlin and Heidelberg GmbH & Co. KG, Berlin - Germany
- Benzo(a)pyrene [air, non-urban air or from high stacks]: 6.73e-14 kg; source Borken J. 1999; lognormal variance with pedigree 0.34, pedigree (1,1,5,1,1)
  Literature value. In Jens Borken et al. (1999)emission indices for Persistent Organic Compounds (POPs) are reported and applied in this project and for Benzo(a)pyrene 7.70E-06 g/kg fuel (180 ng/MJ) is taken into account. Energy use and combustion emissions
  Further references:
  Borken J., Patyk A. and Reinhardt G. A. (1999) Basisdaten für ökologische Bilanzierungen: Einsatz von Nutzfahrzeugen in Transport, Landwirtschaft und Bergbau. Vieweg, Braunschweig/Wiesbaden
- Particulates, < 2.5 um [air, non-urban air or from high stacks]: 8.06e-6 kg; source Dorland C. 2000; lognormal variance with pedigree 0.34, pedigree (1,1,5,1,1)
  (same comment as for Particulates, > 10 um)
- Particulates, > 2.5 um, and < 10um [air, non-urban air or from high stacks]: 6.73e-7 kg; source Dorland C. 2000; lognormal variance with pedigree 0.16, pedigree (1,1,5,1,1)
  (same comment as for Particulates, > 10 um)
- NMVOC, non-methane volatile organic compounds, unspecified origin [air, non-urban air or from high stacks]: 8.74e-6 kg; lognormal variance with pedigree 0.08, pedigree (1,1,5,1,1)
  Literature value. Energy use and combustion emissions
- Chromium [air, non-urban air or from high stacks]: 4.37e-10 kg; source Jungbluth, N. 2003; lognormal variance with pedigree 0.69, pedigree (1,1,5,1,1)
  (same comment as for Copper)
- Carbon dioxide, fossil [air, non-urban air or from high stacks]: 0.0275 kg; source Jungbluth, N. 2003; lognormal variance with pedigree 0.04, pedigree (1,1,5,1,1)
  Calculated value from carbon content in diesel. The CO2 emission index is determined as 3172 g/kg, assuming a C-content of 86.5 M% in Jungbluth (2003). Energy use and combustion emissions
- Hydrogen chloride [air, non-urban air or from high stacks]: 9.25e-9 kg; lognormal variance with pedigree 0.08, pedigree (1,1,5,1,1)
  Calculated value from Cl content in heavy fuel oil. Energy use and combustion emissions
- Zinc [air, non-urban air or from high stacks]: 8.74e-9 kg; source Jungbluth, N. 2003; lognormal variance with pedigree 0.69, pedigree (1,1,5,1,1)
  (same comment as for Copper)
- Dinitrogen monoxide [air, non-urban air or from high stacks]: 2.89e-6 kg; source Dorland C. 2000; lognormal variance with pedigree 0.16, pedigree (1,1,5,1,1)
  (same comment as for Nitrogen oxides)
- Sulfur dioxide [air, non-urban air or from high stacks]: 5.24e-6 kg; source Jungbluth, N. 2003; lognormal variance with pedigree 0.08, pedigree (1,1,5,1,1)
  Calculated value from sulphur content in diesel fuel. In Jungbluth (2003) a S-content of 0.05 M% for diesel is reported, resulting in an emission index of 1 g/kg SO2. Energy use and combustion emissions
- Dioxins, measured as 2,3,7,8-tetrachlorodibenzo-p-dioxin [air, non-urban air or from high stacks]: 0 kg; source Borken J. 1999; pedigree (1,1,1,1,1)
  Literature value. In Jens Borken et al. (1999) emission indices for Persistent Organic Compounds (POPs) are reported and applied in this project. For Dioxin an emission index of 5.99E-11 TEQ ng/kg fuel. Energy use and combustion emissions
  Further references:
  Borken J., Patyk A. and Reinhardt G. A. (1999) Basisdaten für ökologische Bilanzierungen: Einsatz von Nutzfahrzeugen in Transport, Landwirtschaft und Bergbau. Vieweg, Braunschweig/Wiesbaden
- Benzene [air, non-urban air or from high stacks]: 1.66e-7 kg; source Dorland C. 2000; lognormal variance with pedigree 0.16, pedigree (1,1,5,1,1)
  Calculated value. It's calculated from VOC split of diesel engines. It's applied the fractions as employed for diesel concepts of heavy-duty vehicles.In this project it's employed the figures from Dorland (2000) as quoted in Bickel (2001). Energy use and combustion emissions
  Further references:
  Bickel P. and Friedrich R. (2001) Environmental External Costs of Transport. Springer-Verlag Berlin and Heidelberg GmbH & Co. KG, Berlin - Germany
- Lead [air, non-urban air or from high stacks]: 1.75e-10 kg; source Jungbluth, N. 2003; lognormal variance with pedigree 0.69, pedigree (1,1,5,1,1)
  (same comment as for Copper)
- Nickel [air, non-urban air or from high stacks]: 6.12e-10 kg; source Jungbluth, N. 2003; lognormal variance with pedigree 0.69, pedigree (1,1,5,1,1)
  (same comment as for Copper)
- Selenium [air, non-urban air or from high stacks]: 8.74e-11 kg; source Jungbluth, N. 2003; lognormal variance with pedigree 0.69, pedigree (1,1,5,1,1)
  (same comment as for Copper)
- Carbon monoxide, fossil [air, non-urban air or from high stacks]: 2.36e-5 kg; source Dorland C. 2000; lognormal variance with pedigree 0.16, pedigree (1,1,5,1,1)
  (same comment as for Nitrogen oxides)
- Cadmium [air, non-urban air or from high stacks]: 8.74e-11 kg; source Jungbluth, N. 2003; lognormal variance with pedigree 0.69, pedigree (1,1,5,1,1)
  (same comment as for Copper)
- Methane, fossil [air, non-urban air or from high stacks]: 2.1e-7 kg; source Dorland C. 2000; lognormal variance with pedigree 0.16, pedigree (1,1,5,1,1)
  (same comment as for Benzene)

## Sampling procedure
National statistics, literature studies

## Extrapolations
This dataset has been extrapolated from year 2000 to the year of the calculation (2021). The uncertainty has been adjusted accordingly.

## Review by Carl Vadenbo 2012-06-29
In preparation for the release of ecoinvent v3.0, the datasets 'operation, barge tanker, RER' and 'transport, barge tanker, RER' in ecoinvent v2.2 were merged into the dataset 'transport, freight, inland waterways, barge tanker, RER 1998-2000'. The amounts of the exchanges were reviewed and were found to correspond to the disaggregated datasets. The uncertainty information has only been adjusted for geographical representativeness in GLO, and consequently needs to be revised before subsequent releases of the database. Despite this shortcoming, the new dataset was accepted for inclusion into the ecoinvent database on 2012.07.04.

## Review by Roland Hischier 2011-09-23
Transfer of Documentation done.

## Review by Niels Jungbluth 2003-08-20
passed.
