# methanol factory construction

Dataset: EcoSpold 2, unit process
Geography: GLO
Time period: 2000-01-01 to 2021-12-31
Technology level: current
Classification: EcoSpold01Categories: chemicals/organics
Classification: ISIC rev.4 ecoinvent: 4100:Construction of buildings
Tags: ConvertedDataset
Scenario: Business-as-Usual
System model: Allocation, cut-off by classification
Generated by: Alex Primas
Published in: Althaus H.-J. 2007
Database: ecoinvent
isCopyrightProtected: true
accessRestrictedTo: 1

## General comment
Methanol plant with a daly production of 2700 t methanol. Life time of plant assumed with 30 years.
[This dataset was already contained in the ecoinvent database version 2. It was not individually updated during the transfer to ecoinvent version 3. Life Cycle Impact Assessment results may still have changed, as they are affected by changes in the supply chain, i.e. in other datasets. This dataset was generated following the ecoinvent quality guidelines for version 2. It may have been subject to central changes described in the ecoinvent version 3 change report (http://www.ecoinvent.org/database/ecoinvent-version-3/reports-of-changes/), and the results of the central updates were reviewed extensively. The changes added e.g. consistent water flows and other information throughout the database. The documentation of this dataset can be found in the ecoinvent reports of version 2, which are still available via the ecoinvent website. The change report linked above covers all central changes that were made during the conversion process.]

## Included activities end
Requirements for materials for the infrastructure. Estimates on energy use for construction. Transport of materials to construction site. Dismatnteling of plant and disposal. Land useand occupation for plant.

## Geography
Estimated data refers on a new plant built in Sibiria. Land use consideredwith different plant sites from different regions.

## Technology
Plant with modern design asessed. Only materials included but no production of the parts. Estimates for the energy used in building and dismantling.

## Reference product
- methanol factory: 1 unit; CPC 53269: Other constructions for manufacturing; By-product classification allocatable product
  Uncertainty not applicable for output
  production volume 1 unit
    Unknown
    Dummy value to be replaced by measured, estimated or calculated value
  property price 8.41609e6 EUR2005
    Calculated based on inputs: The price of the product has been calculated as a sum of the values of the material and energy inputs for this product. This value is therefore a rough estimation. It may underestimate the real price since there are additional expenses when producing any product. These expences can include for example labour costs, treatment of waste materials and profit for the producer. Please consider carefully whether this level of data quality is acceptable for your application.

## Inputs from technosphere
- zinc: 1.02e6 kg; lognormal variance with pedigree 0.3527, pedigree (2,4,5,3,1)
  Data from one plant
  Uncertainty: D
  properties: dry mass 1 kg, wet mass 1 kg
- waste concrete: 0 kg; pedigree (1,1,1,1,1)
  Data from one plant, process for CH
  Uncertainty: D
  production volume 0 kg
    Calculated from the production volume of methanol factory in proportion to the respective output amounts.
  properties: water content 1, dry mass 0.5 kg, wet mass 1 kg
- copper, cathode: 430000 kg; lognormal variance with pedigree 0.0527, pedigree (2,4,5,3,1)
  Data from one plant
  Uncertainty: D
  properties: dry mass 1 kg, wet mass 1 kg
- steel, chromium steel 18/8, hot rolled: 1.72e6 kg; lognormal variance with pedigree 0.0541, pedigree (3,4,5,3,1)
  Data from one plant, estimates
  Uncertainty: D
  properties: wet mass 1 kg, carbon content, fossil 0.0008, dry mass 1 kg
  note on carbon content, fossil: Stainless steel model is the grade 304 steel (18/8 stainless, 18% chromium 8% nickel; max. 0.08% C)
- nickel, class 1: 37700 kg; lognormal variance with pedigree 0.3527, pedigree (2,4,5,3,1)
  Data from one plant
  Uncertainty: D
  properties: wet mass 1 kg, dry mass 1 kg
- steel, low-alloyed, hot rolled: 1.99e6 kg; lognormal variance with pedigree 0.0527, pedigree (2,4,5,3,1)
  Data from one plant
  Uncertainty: D
  properties: dry mass 1 kg, carbon content, fossil 0.005, wet mass 1 kg
  note on carbon content, fossil: Low alloyed steel composition given in Tab. 3.2 ecoinvent v2.2 report 10_partII. Steel assumed to have a C content of 0.5%
- steel, low-alloyed: 4.68e6 kg; lognormal variance with pedigree 0.0541, pedigree (3,4,5,3,1)
  Data from one plant, estimates
  Uncertainty: D
  properties: wet mass 1 kg, carbon content, fossil 0.005, dry mass 1 kg
- electricity, medium voltage: 5.66e6 kWh; lognormal variance with pedigree 0.148, pedigree (4,5,5,5,4)
  Estimated from building construction
  Uncertainty: E
- concrete, normal: 489 m3; lognormal variance with pedigree 0.0527, pedigree (2,4,5,3,1)
  Data from one plant
  Uncertainty: D
  properties: dry mass 2190 kg, water content 0.086758, wet mass 2380 kg
- diesel, burned in building machine: 4.75e7 MJ; lognormal variance with pedigree 0.148, pedigree (4,5,5,5,4)
  Estimated from building construction
  Uncertainty: E
  properties: heating value, net 1 MJ
- waste concrete: -77210.1, -272.985, -1.05252e6 kg (3 entries); lognormal variance with pedigree 0.3707, pedigree (2,4,5,3,3)
  Data from one plant, process for CH
  Uncertainty: D
  production volume 1.13e6 kg

## Inputs from nature
- Occupation, industrial area [natural resource, land]: 1.29e7 m2*year; lognormal variance with pedigree 0.1121, pedigree (3,4,5,3,3)
  Estimated with data from several plants
  Uncertainty: E
- Transformation, from unspecified [natural resource, land]: 430000 m2; lognormal variance with pedigree 0.1921, pedigree (3,4,5,3,3)
  Estimated with data from several plants
  Uncertainty: E
- Occupation, construction site [natural resource, land]: 4.3e6 m2*year; lognormal variance with pedigree 0.1121, pedigree (3,4,5,3,3)
  Estimated with data from several plants
  Uncertainty: E
- Transformation, to industrial area [natural resource, land]: 430000 m2; lognormal variance with pedigree 0.1921, pedigree (3,4,5,3,3)
  Estimated with data from several plants
  Uncertainty: E

## Sampling procedure
Infrastructure data obtained from literature. Land use data from literature and porject data for recently built plants.

## Extrapolations
This dataset has been extrapolated from year 2002 to the year of the calculation (2021). The uncertainty has been adjusted accordingly.

## Review by Roland Hischier 2003-09-22
Passed.
