# sawnwood, paraná pine, dried (u=10%), import from BR

Dataset: EcoSpold 2, unit process
Geography: RER
Time period: 2000-01-01 to 2021-12-31
Technology level: current
Classification: ISIC rev.4 ecoinvent: 1610:Sawmilling and planing of wood
Synonyms: Araucaria angustifolia
Tags: ConvertedDataset
Scenario: Business-as-Usual
System model: Allocation, cut-off by classification
Generated by: Frank Werner (obsolete)
Published in: Althaus H.J. 2007
Database: ecoinvent
isCopyrightProtected: true
accessRestrictedTo: 1

## General comment
This dataset represents import of one m3 sawn Paraná pine timber from Brazil to European port. The imported wood is produced by (close to) sustainable forest management in Brazil.
It is assumed that the sawn timber is transported to a close harbour in Brazil by lorry. The main exportation port in Brazil is assumed in the dataset; this port is Sao Francisco in Santa Catarina, which directs 90% of the export production.
It is assumed that the imported wood arrives in one of the main ports in Europe (Rotterdam, Hamburg, Bremerhafen or Antwerpen).
Currently, there is an export ban in place for Brazilian Paraná pine; products might come from Argentina with slightly longer transport distances.

## Included activities start
Activity starts with the product leaving the factory gate, ready for shippment.

## Included activities end
This activity ends with imported Paraná pine sawn timber at European harbour. The dataset includes transportation of the sawn timber from the sawmill to a main harbour in Europe, first by truck and then by freight ship.

## Technology
The dataset represents average processes for transportation to Europe. However, transport distances can vary from this dataset.

## Reference product
- sawnwood, paraná pine, dried (u=10%): 1 m3; By-product classification allocatable product; CPC 31101: Wood, sawn or chipped lengthwise, sliced or peeled, of a thickness exceeding 6 mm, of coniferous wood
  Reference product. Parana pine logs at large maritime harbour in Europe. Parana pine logs produced from (close to) sustainable forest management in Brazil.The logs will be used in wooden products.
  production volume 3.22606e6 m3; = 12618353.17*(21908724538088.93/85693321610361.34)
    Estimated. The european production volume is extrapolated from the global production volume using the nominal GDP of 2018 (source: United Nations, http://data.un.org/Glossary.aspx?q=GDP+%28current+US%24%29, accessed 20200807).
    Gross domestic product (GDP) at current prices is GDP at prices of the current reporting period. Also known as nominal GDP.
  property price 160 EUR2005
    Expert judgement (Urs Luginbühl, Swiss Sawmilling industry, personal communication in June 2014). Cross-reference; FAOSTAT (accessed 20140428). The price is calculated by using data on total world import quantity (m3) and import value (1000 USD), year 2005. 109432798 m3 of Sawnwood (C) - coniferous was imported in the world in 2005. The import value was 22249842000 USD. The calculated price is thus (22249842000/109432798=203*0.8=) 164 Euro.
  property carbon content, non-fossil 0.494
    C content of dry mass is 0.494 kgC/kg dry wood (ecoinvent v2.2 report 21).
  property heating value, net 7300.06 MJ
    LHV is calculated based on the Carbon content of the product. More details can be found on the respective documentation.The property is based on a value of 12.7MJ/kg
  property carbon content 0.494
    carbon content on a dry matter basis (reserved; not for manual entry)
  properties: water in wet mass 75 kg, carbon content, fossil 0, wet mass 575 kg, water content 0.15, dry mass 500 kg, carbon allocation 247 kg

## Inputs from technosphere
- transport, freight, sea, bulk carrier for dry goods: 5180 metric ton*km; source Althaus H.J. 2007; lognormal variance with pedigree 0.1641, pedigree (3,4,5,3,1)
  literature value, ecoinvent report no. 21 Figure 5.13
- transport, freight, lorry, unspecified: 259 metric ton*km; source Althaus H.J. 2007; lognormal variance with pedigree 0.1641, pedigree (3,4,5,3,1)
  literature value, ecoinvent report no. 21 Figure 5.13
- sawnwood, paraná pine, dried (u=10%): 1 m3; source Alexandrido, S. 2000; lognormal variance with pedigree 0.0541, pedigree (3,4,5,3,1)
  Estimation. Calculation based on given source. Reference product at sawmill in Brazil.
  properties: carbon content, non-fossil 0.494, dry mass 500 kg, wet mass 575 kg, water content 0.15, heating value, net 7300.06 MJ
  note on carbon content, non-fossil: C content of dry mass is 0.494 kgC/kg dry wood (ecoinvent v2.2 report 21).

## Sampling procedure
literature

## Extrapolations
This dataset has been extrapolated from year 2005 to the year of the calculation (2021). The uncertainty has been adjusted accordingly.
