# drying of maize grain

Dataset: EcoSpold 2, unit process
Geography: BR
Time period: 2012-01-01 to 2021-12-31
Technology level: current
Classification: ISIC rev.4 ecoinvent: 0163:Post-harvest crop activities
Classification: EcoSpold01Categories: agricultural means of production/work processes
Synonyms: corn drying
Scenario: Business-as-Usual
System model: Allocation, cut-off by classification
Generated by: Marília I. S. Folegatti Matsuura
Published in: Folegatti-Matsuura M. 2018
Database: ecoinvent
isCopyrightProtected: true
accessRestrictedTo: 1

## General comment
The functional unit is one liter of water evaporated. This module should be used when evaluating drying of maize grain in an Easel Dryer.
The drying capacity corresponds to the reduction of moisture up to 4% in the Brazilian conditions when is found around 60% of moisture in air. Drying capacity is 80 tonnes of maize grains dried per hour.
Figure 1. Illustration of an Easel Dryer.

## Included activities start
From grains cleaned and wet inside silo.

## Included activities end
This activity ends with dried grains inside the silo before being storage.
The dataset is a service dataset. It includes the energy demand (supplied by consumption of electricity and firewood) for evaporating 1 liter of water. The data for energy demand are based on the drying at silo, in an Easel Dryer, of maize from 18% to 14% of moisture content. Also included in the inventory is the air emissions from firewood combustion at furnace, infrastructure (building and machinery) and land use. The whole process inside silo covers the reception, cleaning, drying and storage of maize grains. However, in this dataset just drying burdens are corvered. The dataset does not include waste and air emissions (like dust). Grain input, production of the wet educt and utilisation of the dried product are not included as well.

## Geography
Based on Brazilian maize producers.

## Technology
Data are based on smale scale of drying. Drying at silo, in Easel dryer, of grains like maize. Evaporation capacity is 80 tonnes.hour-1 of dried maize grain.

## Time period
Time period of the most of the data collected for this dataset.

## Parameters
- liter per kg: 0.0487805 l/kg; name liters_per_kg; = (0,14-0,18)/(0,18-1); lognormal variance with pedigree 0.0013, pedigree (2,2,1,1,1)
  Water evaporated per kg of dried maize grain.
  Moisture of fresh product: 18%
  Final moisture (after drying process): 14%
  From May et al. (2016).
- kg per liter: 20.5 kg/l; name kg_per_liter; = 1/liters_per_kg; lognormal variance with pedigree 0.0013, pedigree (2,2,1,1,1)
  Dried grains per liter of water evaporated.
- annual yield drying: 3.2e7 kg/year; name annual_yield; = evaporation_capacity*40*10; lognormal variance with pedigree 0.0013, pedigree (2,2,1,1,1)
  Annual yield of dried product. Drying process lasts 40 days with 10 hours of work time. From May et al. (2016).
- evaporation capacity: 80000 kg/hour; name evaporation_capacity; lognormal variance with pedigree 0.0013, pedigree (2,2,1,1,1)
  Kilogram of maize grains dried per hour. From May et al. (2016).

## Reference product
- drying of maize grain: 1 l; CPC 86111: Post-harvest crop services; By-product classification allocatable product
  The functional unit is one liter of water evaporated.This dataset is a service dataset. Grain input and utilisation of the dried product are not included.
  The grain input and the evaporated water and dried grain outputs need to be added in the dataset which is using this service.
  production volume 4 l
    This is a placeholder value that does not reflect real-world production volumes. This dataset does not currently require a real-world production volume to work in the database framework, and no actual data were collected yet. This has no negative effect on the results of the ecoinvent database. The placeholder value of this activity was scaled according to the nominal GDP of 2005 (source: United Nations, http://data.un.org/Glossary.aspx?q=GDP+%28current+US%24%29, accessed 20130726) to reflect an appropriate share of the global production volume, which is also a placeholder value.
  property price 0.0793901 EUR2005
    Calculated based on inputs: The price of the product has been calculated as a sum of the values of the material and energy inputs for this product. This value is therefore a rough estimation. It may underestimate the real price since there are additional expenses when producing any product. These expences can include for example labour costs, treatment of waste materials and profit for the producer. Please consider carefully whether this level of data quality is acceptable for your application.

## Inputs from technosphere
All rows: source Folegatti Matsuura M. 2017
- cleft timber, measured as dry mass: 0.286386 kg; name firewood; = (1.5/1.42*kg_per_liter/40000)*529; lognormal variance with pedigree 0.003325, pedigree (2,2,3,2,1)
  According to May et al. (2016), 1.5 steril meter of wood are consumed in drying of 40 tonnes of maize grains and it was estimated that 20.5 kg of dried grains (18% of initial moisture and 14% of final moisture) cause 1 liter of water evaporated. Wood density of 529 kg/m3.
  property apparent wood density 491.9 kg/m3; name cleft_timber_apparent_wood_d
  property dry wood density 430 kg/m3; name cleft_timber_dry_wood_d
  property carbon content, fossil 0; name cleft_timber_C_content_fossil
  property water in wet mass 0.3 kg; name cleft_timber_WWM
  property heating value, gross 20.4 MJ; name cleft_timber_Gross_Heat_Value
  property heating value, net 14.46 MJ; name cleft_timber_Net_Heat_Value
  property dry mass 1 kg; name cleft_timber_DM
  property basic wood density 378.4; name cleft_timber_basic_wood_d
  property wet mass 1.3 kg; name cleft_timber_WM
  property water content 0.3; name cleft_timber_water_content
  property carbon content, non-fossil 0.494; name cleft_timber_C_content_non_fossil
- building, hall, steel construction: 6.83333e-7 m2; = 160* kg_per_liter/annual_yield *(4/12)/50; lognormal variance with pedigree 0.302725, pedigree (2,2,3,2,1)
  The capacity utilization rate is 4/12 (4 months per year). The life time of the infraestructure was considered 50 years like "drying of maize grain GLO" dataset. The total building area is 160 m², according to May et al. (2016).
- electricity, low voltage: 0.0198 kWh; lognormal variance with pedigree 0.003325, pedigree (2,2,3,2,1)
  The total amount of electricity consumption was calculated by multiplying the power of machines involved by its time used to evaporate 1 liter of water. Data from May et al. (2016).
  EcoSpold01Location=CH
  Uncertainty: Calculated variable. Uncertainty will be determined from propagation of uncertainty factors of underlying variables.
- furnace, logs, 30kW: 2.5625e-8 unit; = (1/ 25)/ (annual_yield* liters_per_kg); lognormal variance with pedigree 0.302725, pedigree (2,2,3,2,1)
  The total amount of the furnace was calculated dividing by the annual yield of dried product, the water evaporated per kilogram of dried product and the lifetime of the infrastructure. The expected useful life of the machinery was extrapolated from "drying of maize grain, GLO" dataset, being 25 years. Construction and maintenance processes for the machinery were not included. Data from May et al. (2016).
- cast iron: 7.6875e-5 kg; = 3000/ annual_yield/ liters_per_kg/25; lognormal variance with pedigree 0.302725, pedigree (2,2,3,2,1)
  The total weight of the machines (3 tonnes for grain-drying equipments) was taked into account as cast iron. The total weight of the machinery, balanced as cast iron per liter of water evaporated, was calculated dividing the total weight by the annual yield of dried product, the water evaporated per kilogram of dried product and the lifetime of the infrastructure. The expected useful life of the machinery was extrapolated from "drying of maize grain, GLO" dataset, being 25 years. Construction and maintenance processes for the machinery were not included. Data from May et al. (2016).
  EcoSpold01Location=RER
  properties: wet mass 1 kg, carbon content, fossil 0.04, dry mass 1 kg
  note on carbon content, fossil: Cast iron is made by remelting pig iron in small furnaces (e.g. cupola furnaces or electric arc furnaces) and poured into moulds to make castings. It usually contains 2% to 6% carbon (ecoinvent v2.2 report 10_partII). An average content of 4% was considered

## Inputs from nature
- Transformation, from industrial area [natural resource, land]: 0.0001025 m2; = 160*kg_per_liter/ annual_yield; source Folegatti Matsuura M. 2017; lognormal variance with pedigree 0.010725, pedigree (2,2,3,2,1)
  The surface area occupied by equipments used for drying was determine by primary data from May et al. (2016). The transformation of the land calculated for one liter of water evaporated, is obtained by dividing this area by the annual yield of dried product and multiplying by drying capacity of the reference product.
- Transformation, to industrial area [natural resource, land]: 0.0001025 m2; = 160*kg_per_liter/ annual_yield; source Folegatti Matsuura M. 2017; lognormal variance with pedigree 0.010725, pedigree (2,2,3,2,1)
  (same comment as for Transformation, from industrial area)
- Occupation, industrial area [natural resource, land]: 3.41667e-5 m2*year; name occupation; = 160*4/12* kg_per_liter / annual_yield; source Folegatti Matsuura M. 2017; lognormal variance with pedigree 0.004725, pedigree (2,2,3,2,1)
  The surface area occupied by equipments used for drying was determine by primary data from May et al. (2016). The occupation of the land calculated for one liter of water evaporated, is obtained by dividing this area by the annual yield of dried product and multiplying by drying capacity of the reference product. 4 months is the time occupation of maize production in Brazil.

## Emissions to nature
- Dinitrogen monoxide [air, non-urban air or from high stacks]: 2.12499e-5 kg; = 7.42E-05* firewood; source Bauer, C. 2007; lognormal variance with pedigree 0.4126, pedigree (4,3,3,5,1)
  Proxy, emissions from firewood combustion in boilers were based on the ecoinvent dataset "heat production, mixed logs, at furnace 30kW".
- Hydrocarbons, aliphatic, alkanes, unspecified [air, non-urban air or from high stacks]: 4.83993e-6 kg; = 1.69E-05* firewood; source Bauer, C. 2007; lognormal variance with pedigree 0.4126, pedigree (4,3,3,5,1)
  (same comment as for Dinitrogen monoxide)
- Nitrogen oxides [air, non-urban air or from high stacks]: 0.000306843 kg; = 7.5E-04*firewood/(1- cleft_timber_water_content); source CETESB 2009; lognormal variance with pedigree 0.0507, pedigree (4,3,3,3,1)
  Potential emissions of CO2, NOx and SOx from firewood combustion in boilers were estimated according to the Environmental Company of the State of São Paulo (CETESB, 2009).
- Particulates, < 2.5 um [air, non-urban air or from high stacks]: 0.000239133 kg; = 8.35E-04* firewood; source Thomas Nussbaumer 2014; lognormal variance with pedigree 0.3126, pedigree (4,3,3,5,1)
  (same comment as for Dinitrogen monoxide)
- Benzene, ethyl- [air, non-urban air or from high stacks]: 1.59517e-7 kg; = 5.57E-07* firewood; source Bauer, C. 2007; lognormal variance with pedigree 0.4126, pedigree (4,3,3,5,1)
  (same comment as for Dinitrogen monoxide)
- Fluorine [air, non-urban air or from high stacks]: 2.65767e-7 kg; = 9.28E-07* firewood; source Bauer, C. 2007; lognormal variance with pedigree 0.6626, pedigree (4,3,3,5,1)
  (same comment as for Dinitrogen monoxide)
- Bromine [air, non-urban air or from high stacks]: 3.17889e-7 kg; = 1.11E-06* firewood; source Bauer, C. 2007; lognormal variance with pedigree 0.6626, pedigree (4,3,3,5,1)
  (same comment as for Dinitrogen monoxide)
- Formaldehyde [air, non-urban air or from high stacks]: 6.90191e-7 kg; = 2.41E-06* firewood; source Bauer, C. 2007; lognormal variance with pedigree 0.4126, pedigree (4,3,3,5,1)
  (same comment as for Dinitrogen monoxide)
- Particulates, > 2.5 um, and < 10um [air, non-urban air or from high stacks]: 1.32883e-5 kg; = 4.64E-05*firewood; source Thomas Nussbaumer 2014; lognormal variance with pedigree 0.1307, pedigree (4,3,3,3,1)
  (same comment as for Dinitrogen monoxide)
- Copper [air, non-urban air or from high stacks]: 1.16846e-7 kg; = 4.08E-07* firewood; source Bauer, C. 2007; lognormal variance with pedigree 0.6626, pedigree (4,3,3,5,1)
  (same comment as for Dinitrogen monoxide)
- Methane, non-fossil [air, non-urban air or from high stacks]: 7.96154e-5 kg; = 2.78E-04* firewood; source Thomas Nussbaumer 2014; lognormal variance with pedigree 0.4126, pedigree (4,3,3,5,1)
  (same comment as for Dinitrogen monoxide)
- Magnesium [air, non-urban air or from high stacks]: 1.91306e-6 kg; = 6.68E-06* firewood; source Bauer, C. 2007; lognormal variance with pedigree 0.6626, pedigree (4,3,3,5,1)
  (same comment as for Dinitrogen monoxide)
- m-Xylene [air, non-urban air or from high stacks]: 6.38642e-7 kg; = 2.23E-06* firewood; source Bauer, C. 2007; lognormal variance with pedigree 0.4126, pedigree (4,3,3,5,1)
  (same comment as for Dinitrogen monoxide)
- Acetaldehyde [air, non-urban air or from high stacks]: 3.23617e-7 kg; = 1.13E-06* firewood; source Bauer, C. 2007; lognormal variance with pedigree 0.6626, pedigree (4,3,3,5,1)
  (same comment as for Dinitrogen monoxide)
- Zinc [air, non-urban air or from high stacks]: 1.59517e-6 kg; = 5.57E-06* firewood; source Bauer, C. 2007; lognormal variance with pedigree 0.6626, pedigree (4,3,3,5,1)
  (same comment as for Dinitrogen monoxide)
- Dioxins, measured as 2,3,7,8-tetrachlorodibenzo-p-dioxin [air, non-urban air or from high stacks]: 1.64672e-13 kg; = 5.75E-13* firewood; source Bauer, C. 2007; lognormal variance with pedigree 0.6626, pedigree (4,3,3,5,1)
  (same comment as for Dinitrogen monoxide)
- Sulfur oxides [air, unspecified]: 1.51376e-5 kg; = 3.7E-05*firewood/(1- cleft_timber_water_content); source CETESB 2009; lognormal variance with pedigree 0.0113, pedigree (4,3,3,3,1)
  (same comment as for Nitrogen oxides)
- Chromium VI [air, non-urban air or from high stacks]: 2.12499e-10 kg; = 7.42E-10* firewood; source Bauer, C. 2007; lognormal variance with pedigree 0.6626, pedigree (4,3,3,5,1)
  (same comment as for Dinitrogen monoxide)
- Toluene [air, non-urban air or from high stacks]: 1.59517e-6 kg; = 5.57E-06* firewood; source Bauer, C. 2007; lognormal variance with pedigree 0.4126, pedigree (4,3,3,5,1)
  (same comment as for Dinitrogen monoxide)
- Carbon monoxide, non-fossil [air, non-urban air or from high stacks]: 0.00796154 kg; = 2.78E-02* firewood; source Thomas Nussbaumer 2014; lognormal variance with pedigree 0.6626, pedigree (4,3,3,5,1)
  (same comment as for Dinitrogen monoxide)
- Phenol, pentachloro- [air, non-urban air or from high stacks]: 4.2958e-11 kg; = 1.50E-10* firewood; source Bauer, C. 2007; lognormal variance with pedigree 0.4126, pedigree (4,3,3,5,1)
  (same comment as for Dinitrogen monoxide)
- Sodium [air, non-urban air or from high stacks]: 6.90191e-6 kg; = 2.41E-05* firewood; source Bauer, C. 2007; lognormal variance with pedigree 0.6626, pedigree (4,3,3,5,1)
  (same comment as for Dinitrogen monoxide)
- Benzo(a)pyrene [air, non-urban air or from high stacks]: 2.65767e-9 kg; = 9.28E-09* firewood; source Bauer, C. 2007; lognormal variance with pedigree 0.4126, pedigree (4,3,3,5,1)
  (same comment as for Dinitrogen monoxide)
- PAH, polycyclic aromatic hydrocarbons [air, non-urban air or from high stacks]: 5.89956e-8 kg; = 2.06E-07* firewood; source Bauer, C. 2007; lognormal variance with pedigree 0.3126, pedigree (4,3,3,5,1)
  (same comment as for Dinitrogen monoxide)
- Benzene, hexachloro- [air, non-urban air or from high stacks]: 3.83758e-14 kg; = 1.34E-13* firewood; source Bauer, C. 2007; lognormal variance with pedigree 0.4126, pedigree (4,3,3,5,1)
  (same comment as for Dinitrogen monoxide)
- Chromium [air, non-urban air or from high stacks]: 2.10494e-8 kg; = 7.35E-08* firewood; source Bauer, C. 2007; lognormal variance with pedigree 0.6626, pedigree (4,3,3,5,1)
  (same comment as for Dinitrogen monoxide)
- Chlorine [air, non-urban air or from high stacks]: 9.56531e-7 kg; = 3.34E-06* firewood; source Bauer, C. 2007; lognormal variance with pedigree 0.6626, pedigree (4,3,3,5,1)
  (same comment as for Dinitrogen monoxide)
- Potassium [air, non-urban air or from high stacks]: 0.000124292 kg; = 4.34E-04* firewood; source Bauer, C. 2007; lognormal variance with pedigree 0.6626, pedigree (4,3,3,5,1)
  (same comment as for Dinitrogen monoxide)
- Cadmium [air, non-urban air or from high stacks]: 3.72302e-9 kg; = 1.30E-08* firewood; source Bauer, C. 2007; lognormal variance with pedigree 0.6626, pedigree (4,3,3,5,1)
  (same comment as for Dinitrogen monoxide)
- Manganese [air, non-urban air or from high stacks]: 9.02117e-7 kg; = 3.15E-06* firewood; source Bauer, C. 2007; lognormal variance with pedigree 0.6626, pedigree (4,3,3,5,1)
  (same comment as for Dinitrogen monoxide)
- Arsenic [air, non-urban air or from high stacks]: 5.32679e-9 kg; = 1.86E-08* firewood; source Bauer, C. 2007; lognormal variance with pedigree 0.6626, pedigree (4,3,3,5,1)
  (same comment as for Dinitrogen monoxide)
- Hydrocarbons, aliphatic, unsaturated [air, non-urban air or from high stacks]: 1.64672e-5 kg; = 5.75E-05* firewood; source Bauer, C. 2007; lognormal variance with pedigree 0.4126, pedigree (4,3,3,5,1)
  (same comment as for Dinitrogen monoxide)
- Mercury [air, non-urban air or from high stacks]: 1.59517e-9 kg; = 5.57E-09* firewood; source Bauer, C. 2007; lognormal variance with pedigree 0.6626, pedigree (4,3,3,5,1)
  (same comment as for Dinitrogen monoxide)
- Nickel [air, non-urban air or from high stacks]: 3.17889e-8 kg; = 1.11E-07* firewood; source Bauer, C. 2007; lognormal variance with pedigree 0.6626, pedigree (4,3,3,5,1)
  (same comment as for Dinitrogen monoxide)
- Calcium [air, non-urban air or from high stacks]: 3.12161e-5 kg; = 1.09E-04* firewood; source Bauer, C. 2007; lognormal variance with pedigree 0.6626, pedigree (4,3,3,5,1)
  (same comment as for Dinitrogen monoxide)
- Lead [air, non-urban air or from high stacks]: 1.32883e-7 kg; = 4.64E-07* firewood; source Bauer, C. 2007; lognormal variance with pedigree 0.6626, pedigree (4,3,3,5,1)
  (same comment as for Dinitrogen monoxide)
- Ammonia [air, non-urban air or from high stacks]: 9.193e-6 kg; = 3.21E-05* firewood; source Bauer, C. 2007; lognormal variance with pedigree 0.4126, pedigree (4,3,3,5,1)
  (same comment as for Dinitrogen monoxide)
- NMVOC, non-methane volatile organic compounds, unspecified origin [air, non-urban air or from high stacks]: 0.000185865 kg; = 6.49E-04* firewood; source Thomas Nussbaumer 2014; lognormal variance with pedigree 0.4126, pedigree (4,3,3,5,1)
  (same comment as for Dinitrogen monoxide)
- Carbon dioxide, non-fossil [air, non-urban air or from high stacks]: 0.592169 kg; = 1.44741*firewood/(1- cleft_timber_water_content); source CETESB 2009; lognormal variance with pedigree 0.0113, pedigree (4,3,3,3,1)
  (same comment as for Nitrogen oxides)
- Benzene [air, non-urban air or from high stacks]: 4.83993e-6 kg; = 1.69E-05* firewood; source Bauer, C. 2007; lognormal variance with pedigree 0.4126, pedigree (4,3,3,5,1)
  (same comment as for Dinitrogen monoxide)
- Phosphorus [air, non-urban air or from high stacks]: 1.59517e-6 kg; = 5.57E-06* firewood; source Bauer, C. 2007; lognormal variance with pedigree 0.6626, pedigree (4,3,3,5,1)
  (same comment as for Dinitrogen monoxide)

## Sampling procedure
The main source of data are projects conducted by Embrapa Milho e Sorgo (CNPMS) and Embrapa Soja (CNPSO). Data are also provided by relevant experts related to maize sector in Brazil.

## Extrapolations
This dataset has been extrapolated from year 2016 to the year of the calculation (2021). The uncertainty has been adjusted accordingly.

## Review by Jens Lansche 2017-10-10
All review comments considered.
