# manganese(III) oxide production

Dataset: EcoSpold 2, unit process
Geography: CN
Time period: 2009-01-01 to 2021-12-31
Technology level: current
Classification: EcoSpold01Categories: chemicals/inorganics
Classification: ISIC rev.4 ecoinvent: 2011:Manufacture of basic chemicals
Synonyms: Manganese sesquioxide
Tags: ConvertedDataset
Scenario: Business-as-Usual
System model: Allocation, cut-off by classification
Generated by: Dominic Notter
Published in: Hischier, R. 2009
Database: ecoinvent
isCopyrightProtected: true
accessRestrictedTo: 1

## General comment
The dataset can be used for example as base material in the production of spinell type lithium manganese oxide Data are based on patents.
[This dataset was already contained in the ecoinvent database version 2. It was not individually updated during the transfer to ecoinvent version 3. Life Cycle Impact Assessment results may still have changed, as they are affected by changes in the supply chain, i.e. in other datasets. This dataset was generated following the ecoinvent quality guidelines for version 2. It may have been subject to central changes described in the ecoinvent version 3 change report (http://www.ecoinvent.org/database/ecoinvent-version-3/reports-of-changes/), and the results of the central updates were reviewed extensively. The changes added e.g. consistent water flows and other information throughout the database. The documentation of this dataset can be found in the ecoinvent reports of version 2, which are still available via the ecoinvent website. The change report linked above covers all central changes that were made during the conversion process.]

## Included activities end
This dataset includes rosting of manganese carbonate in a rotary kiln in a specified nitrogen/oxygen-atmosphere. Energy consumption, carbon monoxide and carbon dioxide emissions to air are calculated. For infrastructure, the ecoinvent dataset "chemical plant, organics" is accounted. Transportation efforts are based on ecoinvent standard estimates.

## Geography
Some Swiss or European datasets are used for global processes.

## Technology
This dataset includes rosting of manganese carbonate in a rotary kiln at temperatures around 500°C. Assumption: CO to the atmosphere is equal to the CO after thermal post-combustion (<20mgC/Nm3). No infrastructure for thermal post combustion an no heat through the burning process of CO is calculated.

## Reference product
- manganese(III) oxide: 1 kg; CPC 34220: Zinc oxide; zinc peroxide; chromium oxides and hydroxides; manganese oxides; iron oxides and hydroxides; earth[…]; By-product classification allocatable product; CAS 1317-34-6
  EcoSpold01Location=CN
  production volume 0.197488 kg
    This is a placeholder value that does not reflect real-world production volumes. This dataset does not currently require a real-world production volume to work in the database framework, and no actual data were collected yet. This has no negative effect on the results of the ecoinvent database. The placeholder value of this activity was scaled according to the nominal GDP of 2005 (source: United Nations, http://data.un.org/Glossary.aspx?q=GDP+%28current+US%24%29, accessed 20130726) to reflect an appropriate share of the global production volume, which is also a placeholder value.
  property price 0.41 EUR2005
    Calculated value based on data from United Nations Commodity Trade Statistics Database (comtrade.un.org). UN comtrade category: 282090 Manganese oxides other than manganese dioxide. Year 2005. Using exchange rate of 1EURO = 1.209 USD. Average of price of import into 5 main markets (EU, US, JP, IN and CN).
  property carbon content 0
    carbon content on a dry matter basis (reserved; not for manual entry)
  properties: carbon content, fossil 0, water in wet mass 0 kg, dry mass 1 kg, wet mass 1 kg, water content 0, carbon content, non-fossil 0, carbon allocation 0 kg

## Inputs from technosphere
- electricity, medium voltage: 0.005 kWh; lognormal variance with pedigree 0.096, pedigree (4,5,5,5,3)
  EcoSpold01Location=CN
- oxygen, liquid: 0.53721 kg; lognormal variance with pedigree 0.0201, pedigree (1,4,4,3,1)
  EcoSpold01Location=RER
  properties: dry mass 1 kg, wet mass 1 kg
- heat, district or industrial, natural gas: 4.129 MJ; lognormal variance with pedigree 0.0461, pedigree (4,4,4,3,3)
  EcoSpold01Location=RER
  properties: heating value, net 1 MJ
- inert waste, for final disposal: -0.25695 kg; lognormal variance with pedigree 0.0386, pedigree (2,4,4,1,3)
  EcoSpold01Location=CH
  production volume 0.25695 kg
    Calculated from the production volume of manganese(III) oxide in proportion to the respective output amounts.
  properties: water content 0.00502513, dry mass 0.995 kg, wet mass 1 kg
- chemical factory, organics: 4e-10 unit; lognormal variance with pedigree 0.4461, pedigree (5,5,5,3,3)
  EcoSpold01Location=RER
- manganese concentrate: 1.713 kg; lognormal variance with pedigree 0.0907, pedigree (2,4,4,3,4)
  EcoSpold01Location=GLO
  properties: dry mass 1 kg, wet mass 1 kg
- nitrogen, liquid: 2.5646 kg; lognormal variance with pedigree 0.0201, pedigree (1,4,4,3,1)
  EcoSpold01Location=RER
  properties: dry mass 1 kg, wet mass 1 kg

## Emissions to nature
- Carbon monoxide, fossil [air, unspecified]: 4.6667e-5 kg; lognormal variance with pedigree 0.7481, pedigree (4,4,4,3,4)
- Carbon dioxide, fossil [air, unspecified]: 0.55731 kg; lognormal variance with pedigree 0.028, pedigree (1,1,4,1,1)
  composite

## Sampling procedure
patent, ecoinvent

## Extrapolations
This dataset has been extrapolated from year 2010 to the year of the calculation (2021). The uncertainty has been adjusted accordingly.

## Review by Christian Bauer 2010-02-08
passed
