# treatment of waste mineral oil, hazardous waste incineration, with energy recovery

Dataset: EcoSpold 2, unit process
Geography: Europe without Switzerland
Time period: 1997-01-01 to 2021-12-31
Technology level: current
Classification: ISIC rev.4 ecoinvent: 3822:Treatment and disposal of hazardous waste
Tags: Treatment
Scenario: Business-as-Usual
System model: Allocation, cut-off by classification
Generated by: [System]
Database: ecoinvent
isCopyrightProtected: true
accessRestrictedTo: 1

## General comment
Inventoried waste contains 100% waste oil; . waste composition (wet, in ppm): upper heating value 41.8 MJ/kg; lower heating value 34.7 MJ/kg; H2O 100000; O n.a.; H 120000; C 778270; S n.a.; N n.a.; P 750; B n.a.; Cl n.a.; Br n.a.; F n.a.; I n.a.; Ag n.a.; As 1.2; Ba n.a.; Cd 0.8; Co n.a.; Cr 11.2; Cu 100; Hg 0.0012; Mn n.a.; Mo n.a.; Ni 3.2; Pb 184; Sb n.a.; Se n.a.; Sn n.a.; V n.a.; Zn 680; Be n.a.; Sc n.a.; Sr n.a.; Ti n.a.; Tl 0.6; W n.a.; Si n.a.; Fe n.a.; Ca n.a.; Al n.a.; K n.a.; Mg n.a.; Na n.a.; Share of carbon in waste that is biogenic 0%. Net energy produced in HWI: 25.82MJ/kg thermal energy and 2.44MJ/kg electric energy. Allocation of energy production: no substitution or expansion. 100% of burden allocated to waste disposal function of HWI. One kg of this waste produces 0.01143 kg of residues, which are landfilled. Additional solidification with 0.004571 kg of cement.

## Included activities end
waste-specific air and water emissions from incineration, auxiliary material consumption for flue gas cleaning. Short-term emissions to river water and long-term emissions to ground water from residual material landfill (from solidified fly ashes and scrubber slugde). Process energy demands for HWI.

## Geography
Specific to the technology encountered in Switzerland in 2000. Well applicable to modern incineration practices in Europe or North America or Japan.

## Technology
Swiss HWI plant in 2000 with wet flue gas scrubber and low-dust SCR DeNOx facility. Gross thermal efficiency 74.4% and gross electric efficiency 10%.

## Time period
Transfer coefficients for modern Swiss MSWI. Emission speciation based on early 90ies data.

## Reference product
- waste mineral oil: -1 kg; name RP; CPC 39990: Other wastes n.e.c.; By-product classification Waste
  production volume 4.1538e9 kg; name PV_RP; = 12900000000*0.322
    Calculated. Scaled from the global production volume using GDP. The GDP of Europe without Switzerland in 2005 was 32.2% of the global GDP. According to Bilitewski et al (2012), globally in 2009, 22.4 million tons of waste oil was generated after use, out of which 16.5 million tons (74%) was collected. The remaining 5.9 million tons (26%) of waste oil was npt recovered and it could not be recorded how this amount was used. Out of the amount recovered globally (16.5 million tons), 12.9 million tons (78%) was used for energy recovery through incineration, 2.6 million tons (16%) was recovered as feedstock and the remaining 1 million tons (6%) of waste oil was disposed. Bilitewski, B., Darbra, R. M., & Barceló, D. (Eds.). (2012). Global risk-based management of chemical additives I: Production, Usage and Environmental Occurrence (Vol. 1). Springer Science & Business Media.
  property price 0 EUR2005; name RP_price_EUR2005
    Waste products are assigned a price of zero as they are assumed to require further treatment.
  property carbon content, fossil 0.864444
    Tab A.6, ecoinvent v2.2 report 13_I. C content has been calculated after data in the tables, and then referred to 1 kg DM
  property heating value, net 34.7 MJ
    Value taken from the general comment of the treatment dataset.
  property carbon content 0.864444
    carbon content on a dry matter basis (reserved; not for manual entry)
  properties: carbon content, non-fossil 0, wet mass 1 kg, dry mass 0.9 kg, water in wet mass 0.1 kg, water content 0.111111, carbon allocation 0.778 kg

## By-products
- electricity, for reuse in municipal waste incineration only: 0 kWh; name BP3; CPC 17100: Electrical energy; By-product classification allocatable product; pedigree (1,1,1,1,1)
  production volume 2.81535e9 kWh; = BP3*PV_RP/ABS(RP)
    Calculated based on the production volume of the reference product.
  property price 0.1 EUR2005; name BP3_price_EUR2005
    Estimated to be the same price as in case of electricity, medium voltage.
- heat, for reuse in municipal waste incineration only: 0 MJ; name BP2; By-product classification allocatable product; CPC 17300: Steam and hot water; pedigree (1,1,1,1,1)
  production volume 1.07251e11 MJ; = BP2*PV_RP/ABS(RP)
    Calculated based on the production volume of the reference product.
  property price 0.0106 EUR2005; name BP2_price_EUR2005
    Average European district heat price from Ecoheatcool and Euroheat 2005-2006, Ecoheat Work package 1: The European heat market. Final report. 10.6 EUR/GJ i s the price of district heat. http://www.solarthermalworld.org/files/Ecoheatcool%20WP1%20Web.pdf?download

## Inputs from technosphere
- cement, unspecified: 0.0045705 kg; lognormal variance with pedigree 0.072, pedigree (1,1,5,5,1)
  Cement for solidification of landfilled residual material. Uncertainty calculated from unertainty of the waste composition of this waste, of transfer coefficients in the incinerator and of the solidification recipe.
  properties: dry mass 1 kg, wet mass 1 kg
- sodium hydroxide, without water, in 50% solution state: 0.0018215 kg; lognormal variance with pedigree 0.772, pedigree (1,1,5,5,1)
  uncertainty calculated from uncertainty in average auxiliary material input, and the unertainty of the waste composition of this waste
  properties: heating value, net 3.03 MJ, wet mass 1 kg, dry mass 1 kg
- residual material landfill: 2.3805e-11 unit; lognormal variance with pedigree 0.062, pedigree (1,1,5,5,1)
  uncertainty is calculated from uncertainties in waste composition and transfer coefficients in incinerator
- waste cement, hydrated: -0.011426 kg; name BP1; lognormal variance with pedigree 0.072, pedigree (1,1,5,5,1)
  Hydrated cement for solidification of landfilled residual material. Uncertainty calculated from unertainty of the waste composition of this waste and transfer coefficients in the incinerator and of the solidification recipe.
  production volume 4.74613e7 kg; name WC_BP_PV; = BP1*PV_RP/ABS(RP)
    Calculated from the production volume of waste mineral oil, 10% water in proportion to the respective output amounts.
  property price 0 EUR2005; name BP1_price_EUR2005
  properties: dry mass 1 kg, wet mass 1 kg
- hazardous waste incineration facility: 1.25e-9 unit; lognormal variance with pedigree 0.042, pedigree (1,1,5,5,1)
  demands per kilogram waste. uncertainty is heeded in the module
- quicklime, milled, packed: 0.00014112 kg; lognormal variance with pedigree 0.772, pedigree (1,1,5,5,1)
  (same comment as for sodium hydroxide, without water, in 50% solution state)
  properties: dry mass 0.99 kg, water content 0.010101, wet mass 1 kg
- calcium chloride: 0.0026007 kg; lognormal variance with pedigree 0.772, pedigree (1,1,5,5,1)
  (same comment as for sodium hydroxide, without water, in 50% solution state)
  properties: wet mass 1 kg, dry mass 1 kg
- iron (III) chloride, without water, in 40% solution state: 0.00056837 kg; lognormal variance with pedigree 0.512, pedigree (1,1,5,5,1)
  (same comment as for sodium hydroxide, without water, in 50% solution state)
  properties: wet mass 1 kg, dry mass 1 kg
- chemical, inorganic: 3.2692e-5 kg; lognormal variance with pedigree 0.122, pedigree (1,1,5,5,1)
  Proxy for Polyelectrolyte. uncertainty calculated from uncertainty in average auxiliary material input, and the unertainty of the waste composition of this waste
  properties: dry mass 1 kg, carbon content, fossil 0.003, wet mass 1 kg
  note on carbon content, fossil: This dataset is an unweighted average of 20 inorganic substances (listed in Tab 88.1, ecoinvent v2.2 report 8, part II), being part of the top100 chemicals included in this database. The C-content has also been calculated as an unweighted average of the C content of the substances composing this dataset.
- process-specific burdens, residual material landfill: 0.011426 kg; lognormal variance with pedigree 0.062, pedigree (1,1,5,5,1)
  uncertainty is calculated from uncertainties in waste composition and transfer coefficients in incinerator;activityLink introduced to establish a direct link to the corresponding regional supply of this product
- process-specific burdens, hazardous waste incineration plant: 1 kg; lognormal variance with pedigree 0.042, pedigree (1,1,5,5,1)
  demands per kilogram waste. uncertainty is heeded in the module
- chemical, organic: 5.0729e-6 kg; lognormal variance with pedigree 1.692, pedigree (1,1,5,5,1)
  Proxy for TMT15. uncertainty calculated from uncertainty in average auxiliary material input, and the unertainty of the waste composition of this waste
  properties: carbon content, fossil 0.628, wet mass 1 kg, heating value, net 19.03 MJ, dry mass 1 kg
  note on carbon content, fossil: This dataset is an unweighted average of 20 organic substances (listed in Tab 88.1, ecoinvent v2.2 report 8, part II), being part of the top100 chemicals included in this database. The C-content has also been calculated as an unweighted average of the C content of the substances composing this dataset.
- hydrochloric acid, without water, in 30% solution state: 1.9615e-5 kg; lognormal variance with pedigree 0.122, pedigree (1,1,5,5,1)
  (same comment as for sodium hydroxide, without water, in 50% solution state)
  properties: dry mass 1 kg, wet mass 1 kg, heating value, net 3.32 MJ

## Emissions to nature
- Thallium [water, ground-, long-term]: 2.1701e-7 kg; lognormal variance with pedigree 1.932, pedigree (1,1,5,5,1)
  Long-term emissions from landfilling of incineration residues. uncertainty is calculated from uncertainties in waste composition and transfer coefficients in incinerator and landfills.
- Copper, ion [water, ground-, long-term]: 3.6816e-6 kg; lognormal variance with pedigree 3.652, pedigree (1,1,5,5,1)
  (same comment as for Thallium)
- Nickel, ion [water, surface water]: 6.5594e-7 kg; lognormal variance with pedigree 1.452, pedigree (1,1,5,5,1)
  uncertainty is calculated from uncertainties in waste composition and transfer coefficients in incinerator and landfills
- Cadmium [air, urban air close to ground]: 4.4054e-11 kg; lognormal variance with pedigree 1.682, pedigree (1,1,5,5,1)
  (same comment as for residual material landfill)
- DOC, Dissolved Organic Carbon [water, ground-, long-term]: 0.005532 kg; lognormal variance with pedigree 0.102, pedigree (1,1,5,5,1)
  (same comment as for Thallium)
- Lead [water, ground-, long-term]: 9.5437e-7 kg; lognormal variance with pedigree 7.842, pedigree (1,1,5,5,1)
  (same comment as for Thallium)
- Carbon dioxide, fossil [air, urban air close to ground]: 2.8222 kg; lognormal variance with pedigree 0.042, pedigree (1,1,5,5,1)
  calculated from uncertainty in carbon in waste and transfer coefficients
- Lead [air, urban air close to ground]: 6.8299e-9 kg; lognormal variance with pedigree 0.962, pedigree (1,1,5,5,1)
  (same comment as for residual material landfill)
- Thallium [air, urban air close to ground]: 6e-10 kg; lognormal variance with pedigree 1.702, pedigree (1,1,5,5,1)
  (same comment as for residual material landfill)
- COD, Chemical Oxygen Demand [water, surface water]: 3.9106e-5 kg; lognormal variance with pedigree 0.342, pedigree (1,1,5,5,1)
  (same comment as for Nickel, ion)
- Mercury [water, ground-, long-term]: 5.6049e-11 kg; lognormal variance with pedigree 4.292, pedigree (1,1,5,5,1)
  (same comment as for Thallium)
- Carbon monoxide, fossil [air, urban air close to ground]: 1.2076e-5 kg; lognormal variance with pedigree 0.712, pedigree (1,4,5,5,3)
  1 plant for waste solvent incineration in Switzerland
- DOC, Dissolved Organic Carbon [water, surface water]: 1.7109e-5 kg; lognormal variance with pedigree 0.342, pedigree (1,1,5,5,1)
  (same comment as for Nickel, ion)
- Zinc, ion [water, ground-, long-term]: 8.2166e-6 kg; lognormal variance with pedigree 5.592, pedigree (1,1,5,5,1)
  (same comment as for Thallium)
- Phosphorus [air, urban air close to ground]: 5.25e-7 kg; lognormal variance with pedigree 0.762, pedigree (1,1,5,5,1)
  (same comment as for residual material landfill)
- Phosphate [water, ground-, long-term]: 0.00050554 kg; lognormal variance with pedigree 1.302, pedigree (1,1,5,5,1)
  (same comment as for Thallium)
- Arsenic, ion [water, surface water]: 1.2e-6 kg; lognormal variance with pedigree 1.592, pedigree (1,1,5,5,1)
  (same comment as for Nickel, ion)
- Copper, ion [water, surface water]: 4.2961e-6 kg; lognormal variance with pedigree 1.002, pedigree (1,1,5,5,1)
  (same comment as for Nickel, ion)
- Chromium VI [water, surface water]: 7.0681e-7 kg; lognormal variance with pedigree 1.392, pedigree (1,1,5,5,1)
  (same comment as for Nickel, ion)
- BOD5, Biological Oxygen Demand [water, ground-, long-term]: 0.012644 kg; lognormal variance with pedigree 0.102, pedigree (1,1,5,5,1)
  (same comment as for Thallium)
- Copper [air, urban air close to ground]: 7e-8 kg; lognormal variance with pedigree 1.022, pedigree (1,1,5,5,1)
  (same comment as for residual material landfill)
- BOD5, Biological Oxygen Demand [water, surface water]: 3.9106e-5 kg; lognormal variance with pedigree 0.342, pedigree (1,1,5,5,1)
  (same comment as for Nickel, ion)
- Nickel [air, urban air close to ground]: 2.24e-9 kg; lognormal variance with pedigree 1.482, pedigree (1,1,5,5,1)
  (same comment as for residual material landfill)
- Lead [water, surface water]: 5.0082e-9 kg; lognormal variance with pedigree 1.172, pedigree (1,1,5,5,1)
  (same comment as for Nickel, ion)
- TOC, Total Organic Carbon [water, surface water]: 1.7109e-5 kg; lognormal variance with pedigree 0.342, pedigree (1,1,5,5,1)
  (same comment as for Nickel, ion)
- COD, Chemical Oxygen Demand [water, ground-, long-term]: 0.012644 kg; lognormal variance with pedigree 0.102, pedigree (1,1,5,5,1)
  (same comment as for Thallium)
- Cadmium, ion [water, ground-, long-term]: 5.4284e-9 kg; lognormal variance with pedigree 7.872, pedigree (1,1,5,5,1)
  (same comment as for Thallium)
- Zinc, ion [water, surface water]: 9.1257e-6 kg; lognormal variance with pedigree 0.752, pedigree (1,1,5,5,1)
  (same comment as for Nickel, ion)
- Cadmium, ion [water, surface water]: 3.615e-10 kg; lognormal variance with pedigree 1.602, pedigree (1,1,5,5,1)
  (same comment as for Nickel, ion)
- Chromium VI [water, ground-, long-term]: 2.12e-6 kg; lognormal variance with pedigree 1.302, pedigree (1,1,5,5,1)
  (same comment as for Thallium)
- Nickel, ion [water, ground-, long-term]: 9.2079e-7 kg; lognormal variance with pedigree 1.722, pedigree (1,1,5,5,1)
  (same comment as for Thallium)
- Phosphate [water, surface water]: 3.6009e-5 kg; lognormal variance with pedigree 0.712, pedigree (1,1,5,5,1)
  (same comment as for Nickel, ion)
- Arsenic [air, urban air close to ground]: 1.224e-14 kg; lognormal variance with pedigree 1.702, pedigree (1,1,5,5,1)
  (same comment as for residual material landfill)
- Chromium [air, urban air close to ground]: 8.2814e-13 kg; lognormal variance with pedigree 1.392, pedigree (1,1,5,5,1)
  (same comment as for residual material landfill)
- Mercury [water, surface water]: 1.2653e-11 kg; lognormal variance with pedigree 1.952, pedigree (1,1,5,5,1)
  (same comment as for Nickel, ion)
- Zinc [air, urban air close to ground]: 4.76e-7 kg; lognormal variance with pedigree 0.772, pedigree (1,1,5,5,1)
  (same comment as for residual material landfill)
- Mercury [air, urban air close to ground]: 0 kg; pedigree (1,1,1,1,1)
  (same comment as for residual material landfill)
- Thallium [water, surface water]: 3.6228e-10 kg; lognormal variance with pedigree 2.392, pedigree (1,1,5,5,1)
  (same comment as for Nickel, ion)
- Arsenic, ion [water, ground-, long-term]: 1.1999e-15 kg; lognormal variance with pedigree 1.612, pedigree (1,1,5,5,1)
  (same comment as for Thallium)
- TOC, Total Organic Carbon [water, ground-, long-term]: 0.005532 kg; lognormal variance with pedigree 0.102, pedigree (1,1,5,5,1)
  (same comment as for Thallium)

## Sampling procedure
Extrapolated from the global dataset based on Swiss values. The 2 Swiss HWI plants, used as the inventory reference technology mix, have a total annual capacity of 53'000 tons of hazardous waste. This corresponds to 39% of the Swiss total installed capacity in 2000. Swiss average plants size is 20'000 t/a.

## Extrapolations
This dataset has been extrapolated from year 2000 to the year of the calculation (2021). The uncertainty has been adjusted accordingly.
