# operation, computer, desktop, with cathode ray tube display, active mode

Dataset: EcoSpold 2, unit process
Geography: CH
Time period: 2001-01-01 to 2021-12-31
Technology level: old
Classification: EcoSpold01Categories: electronics/services
Classification: ISIC rev.4 ecoinvent: 8219:Photocopying, document preparation and other specialized office support act
Synonyms: PC; CRT
Tags: Operation
Scenario: Business-as-Usual
System model: Allocation, cut-off by classification
Generated by: Martin Lehmann
Published in: Hischier R. 2007
Database: ecoinvent
isCopyrightProtected: false
accessRestrictedTo: 1

## General comment
The computer desktop use in the active mode includes the share of computer production (CPU, keyboard, mouse, CRT) as well as the energy consumption (use-phase) and the rail and road transport from factory to user. Energy consumption of computer CPUs and CRT monitors (use-phase) vary a lot depending on the computer looked at. Min.-Max. values are listed; the mean value is calculated via the most likely value according to the reference data. Due to relatively vague literature data for computer and CRT life span, assumptions had to be made.

## Included activities end
Describes the use of a desktop computer with a CRT monitor in the active mode. Calculated per 1 hour of computer use. Computer life span assumed to be 4 years, for the CRT monitor 6 years. Active mode 5.5 hours a day (office use), 240 days a year. Swiss supply mix applied for electricity consumption (low voltage).

## Geography
The data is based on information by international computer manufacturers and literature (active mode consumption).

## Technology
No technology involved, except for the production of the desktop computer (including CRT, keyboard and mouse), which is described in another dataset.

## Parameters
- fraction of computers (desktop) sold with cathode ray tube display: 0.36 % (obsolete); name fraction_computer_desktop_CRT_display; lognormal variance with pedigree 0.0566, pedigree (4,5,5,1,1)
  Literature value (ecoinvent report v2 no.18 IV).
- number of computers (desktop) sold in 2005 world: 1.304e8 dimensionless; name no_computer_desktop_sold_GLO_2005; = 130.4*1000000; lognormal variance with pedigree 0.0166, pedigree (4,5,1,1,1)
  Literature value (http://www.etforecasts.com/products/ES_pcww1203.htm). Number of computers (desktop, units) sold in 2005 in the whole world.
- number of days in a year computer desktop home use: 365 dimensionless; name no_days_computer_desktop_home_use; lognormal variance with pedigree 0.1786, pedigree (4,5,5,5,5)
  Estimation (based on assumptions made in ecoinvent report no.18 IV ecoinvent database v2). Number of days in the year when computer (desktop) is used in a home.
- number of days in a year computer desktop office use: 200 dimensionless; name no_days_computer_desktop_office_use; lognormal variance with pedigree 0.1786, pedigree (4,5,5,5,5)
  Estimation (based on assumptions made in ecoinvent report no.18 IV ecoinvent database v2). Number of days in the year when computer (desktop) is used in the office.
- fraction of computers desktop sold for home use: 0.1 dimensionless; name fraction_computer_desktop_home_use; lognormal variance with pedigree 0.2106, pedigree (5,5,5,5,5)
  Estimation
- number of hours in a day when computer (desktop) is in active mode - home use: 3.14 dimensionless; name no_hours_computer_desktop_AM_home_use; lognormal variance with pedigree 0.0127, pedigree (4,4,3,3,1)
  Literature value (Williams, 2005).
- number of hours in a day when computer (desktop) is in active mode - office use: 5.5 dimensionless; name no_hours_computer_desktop_AM_office_use; lognormal variance with pedigree 0.0127, pedigree (4,4,3,3,1)
  Literature value (Williams, 2005).
- fraction of computers desktop sold for office use: 0.9 dimensionless; name fraction_computer_desktop_office_use; lognormal variance with pedigree 0.2106, pedigree (5,5,5,5,5)
  Estimation
- number of computers (desktop) sold in 4 years: 4.79462e8 dimensionless; name no_computer_desktop_sold_4years; = no_computer_desktop_sold_GLO_2005+((123.109+116.226+109.727)*1000000); lognormal variance with pedigree 0.0166, pedigree (4,5,1,1,1)
  Calculated value. Number of computers (desktop) sold in 4 years (from 2002 - 2005 included). Using annual growth of 5.92%. Literature value (http://www.etforecasts.com/products/ES_pcww1203.htm); worldwide sales of desktop computers in millions in 2005 was 130.4 mill. units. Calculated values (using annual growth of 5.92%); 123.1 mil. (2004), 116.2 mil. (2003) and 109.7 mil. (2002).

## Reference product
- operation, computer, desktop, with cathode ray tube display, active mode: 1 hour; By-product classification allocatable product; CPC 85: Support services
  production volume 8.97633e8 hour; = ((no_computer_desktop_sold_4years*fraction_computer_desktop_CRT_display*fraction_computer_desktop_office_use* no_days_computer_desktop_office_use* no_hours_computer_desktop_AM_office_use)+( no_computer_desktop_sold_4years*fraction_computer_desktop_CRT_display*fraction_computer_desktop_home_use*no_days_computer_desktop_home_use* no_hours_computer_desktop_AM_home_use))*(2.66E+11/5.65E+13)
    Calculated value based on literature values and estimates. See comments of the parametres used to calculate this values. Computer (desktop) lifetime is estimated to be 4 years (based on ecoinvent report v2 18, IV). The amount of computers (desktop) sold in total in 4 years is calculated. 36% are sold with CRT screen and 64% with LCD screen. It is assumed that 90% of those computers are being used in an office and 10% in a home. The ones used in an office in active mode are used 200 days in a year, 5.5 hours a day. The ones used in a home in active mode are used 365 days in a year, 3.14 hours a day. The swiss production volume is extrapolated from the global one using GDP (IMF, 2012, http://www.imf.org/external/pubs/ft/weo/2010/01/weodata/index.aspx). GDP (PPP) world = 5.65E+13 USD in 2005, GDP (PPP) Switzerland = 2.66E+11 USD in 2005.
  property price 0.0328602 EUR2005
    Calculated based on inputs: The price of the product has been calculated as a sum of the values of the material and energy inputs for this product. This value is therefore a rough estimation. It may underestimate the real price since there are additional expenses when producing any product. These expences can include for example labour costs, treatment of waste materials and profit for the producer. Please consider carefully whether this level of data quality is acceptable for your application.

## Inputs from technosphere
- display, cathode ray tube, 17 inches: 1.9026e-5 unit; lognormal variance with pedigree 0.052625, pedigree (3,3,5,2,1)
  EcoSpold01Location=GLO
  properties: dry mass 19.86 kg, carbon content, non-fossil 0.00235652, carbon content, fossil 0.163203, wet mass 19.86 kg
  note on carbon content, non-fossil: Calculated as the addition of C contents in the product composition, then referred to 1 kg DM
- computer, desktop, without screen: 2.8539e-5 unit; name computer_desktop_input; lognormal variance with pedigree 0.052625, pedigree (3,3,5,2,1)
  EcoSpold01Location=GLO
  properties: wet mass 11.3 kg, carbon content, fossil 0.0877555, dry mass 11.3 kg, carbon content, non-fossil 0.000485011
- electricity, low voltage: 0.15 kWh; lognormal variance with pedigree 0.041225, pedigree (2,3,5,2,1)
- keyboard: 2.8539e-5 unit; lognormal variance with pedigree 0.052625, pedigree (3,3,5,2,1)
  EcoSpold01Location=GLO
  properties: dry mass 1.18 kg, carbon content, fossil 0.57577, wet mass 1.18 kg
- pointing device, optical mouse, with cable: 2.8539e-5 unit; lognormal variance with pedigree 0.052625, pedigree (3,3,5,2,1)
  EcoSpold01Location=GLO
  properties: dry mass 0.12 kg, carbon content, fossil 0.482336, wet mass 0.12 kg

## Sampling procedure
Manufacturers, literature and own assumptions.

## Extrapolations
This dataset has been extrapolated from year 2006 to the year of the calculation (2021). The uncertainty has been adjusted accordingly.

## Review by Jürgen Sutter 2007-09-14
passed
none
