# nutrient supply from calcium nitrate

Dataset: EcoSpold 2, unit process
Geography: GLO
Time period: 2016-01-01 to 2021-12-31
Technology level: current
Classification: ISIC rev.4 ecoinvent: 2012:Manufacture of fertilizers and nitrogen compounds
Scenario: Business-as-Usual
System model: Allocation, cut-off by classification
Generated by: Avraam Symeonidis
Database: ecoinvent
isCopyrightProtected: true
accessRestrictedTo: 1

## General comment
This inventory describes the supply of nutrients from ''calcium nitrate'' for fertiliser use.
No machinery expenditures or emissions to the environment are considered related to the actual application of this substance on soil during its agricultural use. The purpose of this activity is to connect the chemical production of ''calcium nitrate'' with its generic use as fertilizer. The product ''calcium nitrate'' is connected to the generic market for ''inorganic nitrogen fertiliser, as N'' through this supplying activity. In the agricultural context, ''calcium nitrate'' can be used directly as a fertilizer input to crop production, eventually with other chemicals; alternatively, a generic input of ''inorganic nitrogen fertiliser, as N'' can be used instead, and this will represent the regional consumption mix for his type of nutrient. A way in between is allowed by using the generic input ''inorganic nitrogen fertiliser, as N'' and link to the activity providing it from a specific chemical.
In all cases, emissions associated to the application of the fertilizer have to be calculated in the crop production activity.

## Technology
Inventory based on composition of ''calcium nitrate''.

## Reference product
- inorganic nitrogen fertiliser, as N: 1 kg; name RP; By-product classification allocatable product; CPC 3461: Mineral or chemical fertilizers, nitrogenous
  production volume 2.08413e9 kg; = (14515*1000*1000/0.1189*0.10)*0.170722015896368
    Estimation from production volume in the respective producing activity.
    Ammonium nitrate is produced in the second step of calcium nitrate production from nitric acid. Th reaction of nitric acid and ammonia is in fact the main production route for ammonium nitrate. Therefore it is estimated that both production volumes are linked. Here, we assume the same Production Volumes for both, since no data is availble for calcium nitrate. Moreover, the main production route for calcium nitrate is as a byproduct in the Odda-Process, therefore, the production of calcium nitrate by the present reaction is assumed to be 10% of the total production.
    Note: ammonium nitrate world production in 2012 is taken from IFA production and trade statistics http://www.fertilizer.org/ifa/Home-Page/STATISTICS/Production-and-trade
    The original production volume is expressed as thousands metric tonne nutrient. The N-content is 0.1189
  property nitrogen content 1
    Nitrogen content (on a dry matter basis) of inorganic nitrogen fertiliser, as N is calculated from the molecular formula of the substance (Nitrogen).
  property price 0.473 EUR2005; name RP_price_EUR2005
    Temporary price data. Calculated as 90% of purchasers price based on: 2004 prices are calculated on basis of Import/Export data (tonnes and US$) from UN Trade Statistics Database (http://data.un.org/Browse.aspx?d=ComTrade, accessed 7/7-2010). N, P2O5, or K2O content (http://www.fertilizer.org/ifa/Home-Page/STATISTICS/Conversions-factors)
  property carbon content, fossil 0
    Carbon content, fossil is calculated based on the chemical formula of the substance.
  property carbon content 0
    carbon content on a dry matter basis (reserved; not for manual entry)
  properties: wet mass 1 kg, carbon content, non-fossil 0, water content 0, water in wet mass 0 kg, dry mass 1 kg, carbon allocation 0 kg

## Inputs from technosphere
- calcium nitrate: 0 kg; pedigree (1,1,1,1,1)
  properties: nitrogen content 0.170722, oxygen content 0.585031, calcium content 0.244247, dry mass 1 kg, wet mass 1 kg
  note on nitrogen content: Nitrogen content (on a dry matter basis) of calcium nitrate is calculated from the molecular formula of the substance (Ca1N2O6).
  note on oxygen content: Oxygen content (on a dry matter basis) of calcium nitrate is calculated from the molecular formula of the substance (Ca1N2O6).
  note on calcium content: Calcium content (on a dry matter basis) of calcium nitrate is calculated from the molecular formula of the substance (Ca1N2O6).
- calcium nitrate: 3.12789, 2.72959 kg (2 entries); lognormal variance with pedigree 0.1702, pedigree (3,5,2,1,4)

## Extrapolations
This dataset has been extrapolated from year 2019 to the year of the calculation (2021). The uncertainty has been adjusted accordingly.
