# pyrethroid-compound production

Dataset: EcoSpold 2, unit process
Geography: RoW
Time period: 2000-01-01 to 2021-12-31
Technology level: current
Classification: ISIC rev.4 ecoinvent: 2021:Manufacture of pesticides and other agrochemical products
Classification: EcoSpold01Categories: agricultural means of production/pesticides
Tags: ConvertedDataset
Scenario: Business-as-Usual
System model: Allocation, cut-off by classification
Share of production covered: 100 %
Generated by: Jürgen Sutter
Published in: Nemecek, T. 2007
Database: ecoinvent
isCopyrightProtected: true
accessRestrictedTo: 1

## General comment
Production of pyrethroid-compounds including materials, energy uses, infrastructure and emissions.
[This dataset was already contained in the ecoinvent database version 2. It was not individually updated during the transfer to ecoinvent version 3. Life Cycle Impact Assessment results may still have changed, as they are affected by changes in the supply chain, i.e. in other datasets. This dataset was generated following the ecoinvent quality guidelines for version 2. It may have been subject to central changes described in the ecoinvent version 3 change report (http://www.ecoinvent.org/database/ecoinvent-version-3/reports-of-changes/), and the results of the central updates were reviewed extensively. The changes added e.g. consistent water flows and other information throughout the database. The documentation of this dataset can be found in the ecoinvent reports of version 2, which are still available via the ecoinvent website. The change report linked above covers all central changes that were made during the conversion process.]

## Geography
The inventory is modelled for Europe.

## Technology
pesticides

## Time period
Time of publications

## Parameters
- fraction, cooling water, cooling pond system, to air: 0.032 dimensionless; name fraction_CW_CP_to_air; lognormal variance with pedigree 0.0413, pedigree (2,3,1,3,1)
  Calculated based on literature value (Scown, C.D., 2011, Water Footprint of U.S. Transportation Fuels and supplying information of the article) (Vionnet, S., Quantis Water Database - Technical Report, 2012).
- fraction, water, decarbonised, to air: 0.3875 dimensionless; name fraction_WDC_to_air; lognormal variance with pedigree 0.092025, pedigree (4,4,3,2,4)
- fraction, process water, to air: 0.205 dimensionless; name fraction_PW_to_air; lognormal variance with pedigree 0.092025, pedigree (4,4,3,2,4)
- fraction, cooling water, once-through system, to air: 0.004 dimensionless; name fraction_CW_OT_to_air; lognormal variance with pedigree 0.0413, pedigree (2,3,1,3,1)
  (same comment as for fraction, cooling water, cooling pond system, to air)
- fraction, cooling water, to air: 0.3875 dimensionless; name fraction_CW_to_air; = (0.5*fraction_CW_OT_to_air)+(0.5*fraction_CW_R_to_air); lognormal variance with pedigree 0.092025, pedigree (4,4,3,2,4)
  Calculated value based on literature value (see comments of the other parametres present in this dataset) and expert opinion. In the case when no industry/literature data are available about the type of cooling or directly fraction, cooling water, to air specific for the process a default assumption is applied. It is assumed that the once-through cooling system is used in 50% of all cases and recirculating system is used in another 50% of all cases.
- fraction, cooling water, recirculating system, to air: 0.771 dimensionless; name fraction_CW_R_to_air; lognormal variance with pedigree 0.0413, pedigree (2,3,1,3,1)
  (same comment as for fraction, cooling water, cooling pond system, to air)

## Reference product
- pyrethroid-compound: 1 kg; By-product classification allocatable product; CPC 34661: Insecticides
  EcoSpold01Location=RER
  production volume 6.31257e6 kg
    The addition of the consumption volumes in the US in 2002 (from USGS, 2002 Pesticide use Maps) of the pyrethroid-compounds bifenthrin, cyfluthrin, cypermethrin, deltamethrin, esfenvalerate, fenpropathrin, lambdacyhalothrin, permethrin, tefluthrin, tralomethrin, z-cypermethrin has been used to estimate the production volumes of this type of pesticide in the world. For that, it has been extrapolated to a Global production mix using the ha of Arable land and Permanent crops of US versus the ha of Arable land and Permanent crops in the world in 2002 (1514/179 million ha; FAOSTAT).
  property price 5.78125 EUR2005
    Calculated based on inputs: The price of the product has been calculated as a sum of the values of the material and energy inputs for this product. This value is therefore a rough estimation. It may underestimate the real price since there are additional expenses when producing any product. These expences can include for example labour costs, treatment of waste materials and profit for the producer. Please consider carefully whether this level of data quality is acceptable for your application.
  property carbon content, fossil 0.623
    C content of pyrethroid-compounds was calculated as an unweigthed average of C content of the substances: cypermethrin, alpha-cypermethrin,beta-cyfluthrin, lambdacyhalothrin. Those substances are classified as pyrethroid-compounds in Tab 2.25, Sutter 2010
  property carbon content 0.623
    carbon content on a dry matter basis (reserved; not for manual entry)
  properties: water in wet mass 0 kg, water content 0, dry mass 1 kg, carbon content, non-fossil 0, wet mass 1 kg, carbon allocation 0.623 kg

## Inputs from technosphere
- formaldehyde: 0.81069 kg; lognormal variance with pedigree 0.046, pedigree (4,5,4,5,1)
  EcoSpold01Location=RER
  Stoechiometric calculation
  Uncertainty: Stoechiometric calculation
  properties: carbon content, fossil 0.4, wet mass 1 kg, dry mass 1 kg, heating value, net 20.19 MJ
- sodium hydroxide, without water, in 50% solution state: 0.86578 kg; lognormal variance with pedigree 0.046, pedigree (4,5,4,5,1)
  EcoSpold01Location=RER
  Stoechiometric calculation
  Uncertainty: Stoechiometric calculation
  properties: heating value, net 3.03 MJ, dry mass 1 kg, wet mass 1 kg
- acetonitrile: 0.051882 kg; lognormal variance with pedigree 0.046, pedigree (4,5,4,5,1)
  Stoechiometric calculation
  EcoSpold01Location=RER
  Uncertainty: Stoechiometric calculation
  properties: wet mass 1 kg, carbon content, fossil 0.585366, heating value, net 26.59 MJ, dry mass 1 kg
- chlorine, liquid: 0.8299 kg; lognormal variance with pedigree 0.046, pedigree (4,5,4,5,1)
  Stoechiometric calculation
  EcoSpold01Location=RER
  Uncertainty: Stoechiometric calculation
  properties: wet mass 1 kg, dry mass 1 kg
- heat, district or industrial, other than natural gas: 0 MJ; pedigree (1,1,1,1,1)
  Uncertainty: Estimation
  properties: heating value, net 1 MJ
- phenol: 0.36288 kg; lognormal variance with pedigree 0.046, pedigree (4,5,4,5,1)
  EcoSpold01Location=RER
  Stoechiometric calculation
  Uncertainty: Stoechiometric calculation
  properties: carbon content, fossil 0.765957, wet mass 1 kg, dry mass 1 kg, heating value, net 30.93 MJ
- electricity, medium voltage: 0 kWh; pedigree (1,1,1,1,1)
  EcoSpold01Location=UCTE
  Estimation
  Uncertainty: Estimation
- heat, district or industrial, natural gas: 0 MJ; pedigree (1,1,1,1,1)
  Uncertainty: Estimation
  properties: heating value, net 1 MJ
- carbon tetrachloride: 0.26217 kg; lognormal variance with pedigree 0.046, pedigree (4,5,4,5,1)
  Stoechiometric calculation
  EcoSpold01Location=RER
  Uncertainty: Stoechiometric calculation
  properties: heating value, net 2.37 MJ, carbon content, fossil 0.0789474, dry mass 1 kg, wet mass 1 kg
- butene, mixed: 0.06732 kg; lognormal variance with pedigree 0.046, pedigree (4,5,4,5,1)
  EcoSpold01Location=RER
  Stoechiometric calculation
  Uncertainty: Stoechiometric calculation
  properties: wet mass 1 kg, carbon content, fossil 0.857143, dry mass 1 kg, heating value, net 45.3 MJ
  note on carbon content, fossil: With mixed butenes, the four isomers 1-butene, cis-2-butene, trans-2-butene and isobutene are summed up. They are unsaturated olefinic hydrocarbons with the formula C4H8 (ecoinvent v2.2 report 11_II). MW=56
  note on heating value, net: Indicative value. Reference: Fuels - Higher and Lower Calorific Values, available at: https://www.engineeringtoolbox.com/fuels-higher-calorific-values-d_169.html
- hydrogen cyanide: 0.084896 kg; lognormal variance with pedigree 0.046, pedigree (4,5,4,5,1)
  Stoechiometric calculation
  EcoSpold01Location=RER
  Uncertainty: Stoechiometric calculation
  properties: wet mass 1 kg, heating value, net 17.95 MJ, carbon content, fossil 0.444444, dry mass 1 kg
- hydrogen fluoride: 0.016535 kg; lognormal variance with pedigree 0.046, pedigree (4,5,4,5,1)
  EcoSpold01Location=GLO
  Stoechiometric calculation
  Uncertainty: Stoechiometric calculation
  properties: wet mass 1 kg, heating value, net 6.06 MJ, dry mass 1 kg
- ammonia, anhydrous, liquid: 0 kg; pedigree (1,1,1,1,1)
  Stoechiometric calculation
  EcoSpold01Location=RER
  Uncertainty: Stoechiometric calculation
  properties: dry mass 1 kg, wet mass 1 kg
- toluene, liquid: 0.37785 kg; lognormal variance with pedigree 0.046, pedigree (4,5,4,5,1)
  EcoSpold01Location=RER
  Stoechiometric calculation
  Uncertainty: Stoechiometric calculation
  properties: dry mass 1 kg, carbon content, fossil 0.913043, wet mass 1 kg, heating value, net 38.17 MJ
- ethanol, without water, in 99.7% solution state, from ethylene: 0.25397 kg; lognormal variance with pedigree 0.046, pedigree (4,5,4,5,1)
  Stoechiometric calculation
  EcoSpold01Location=RER
  Uncertainty: Stoechiometric calculation
  properties: heating value, net 31.58 MJ, dry mass 1 kg, wet mass 1 kg, carbon content, fossil 0.521739
- water, decarbonised: 0 kg; name water_decarbonised_input; source Unger T A 1996; pedigree (1,1,1,1,1)
  EcoSpold01Location=RER
  Stoichiometric calculation, assuming an efficiency of 100%.
  Uncertainty: Stoechiometric calculation
  properties: wet mass 1 kg
- chemical factory, organics: 3.3018e-9 unit; lognormal variance with pedigree 0.448, pedigree (4,5,5,5,5)
  EcoSpold01Location=RER
  Estimation
  Uncertainty: Estimation
- hydrochloric acid, without water, in 30% solution state: 0.10355 kg; lognormal variance with pedigree 0.046, pedigree (4,5,4,5,1)
  Stoechiometric calculation
  EcoSpold01Location=RER
  Uncertainty: Stoechiometric calculation
  properties: heating value, net 3.32 MJ, wet mass 1 kg, dry mass 1 kg
- heat, district or industrial, other than natural gas: 0.0119297, 29.4191 MJ (2 entries); lognormal variance with pedigree 0.046, pedigree (4,5,4,5,1)
  Uncertainty: Estimation
- electricity, medium voltage: 0.0417445, 0.0080048, 0.134384, 1.95449, 0.275487, 0.897577 kWh (6 entries); lognormal variance with pedigree 0.046, pedigree (4,5,4,5,1)
  EcoSpold01Location=UCTE
  Estimation
  Uncertainty: Estimation
- heat, district or industrial, natural gas: 0.800327, 51.9285 MJ (2 entries); lognormal variance with pedigree 0.046, pedigree (4,5,4,5,1)
  Uncertainty: Estimation
- ammonia, anhydrous, liquid: 0.0784099, 0.00674027, 0.0104861, 0.0207767, 0.0203557, 0.0021335, 0.00953753, 0.22563 kg (8 entries); lognormal variance with pedigree 0.046, pedigree (4,5,4,5,1)
  Stoechiometric calculation
  EcoSpold01Location=RER
  Uncertainty: Stoechiometric calculation
- water, decarbonised: 0.00109552, 0.00285055, 0.0114969, 0.00146403, 0.021392, 0.000139944, 0.018159 kg (7 entries); source Unger T A 1996; lognormal variance with pedigree 0.046, pedigree (4,5,4,5,1)
  (same comment as for water, decarbonised)

## Inputs from nature
- Water, cooling, unspecified natural origin [natural resource, in water]: 0.19811 m3; name water_cooling_UNO_input; source Gendorf 2000; lognormal variance with pedigree 0.046, pedigree (4,5,4,5,1)
  Estimation (24 kg cooling water per kg produced chemical per step).
  Uncertainty: Estimation
- Bromine, in water [natural resource, in water]: 1.3832 kg; name bromine_input; lognormal variance with pedigree 0.046, pedigree (4,5,4,5,1)
  0.23% Br in water; Stoechiometric calculation
  Uncertainty: Stoechiometric calculation
- Water, salt, sole [natural resource, in water]: 0.601391 m3; name water_salt_sole_input; = ((bromine_input/0.0023))/1000; lognormal variance with pedigree 0.046, pedigree (4,5,4,5,1)
  There is an intermediate containing bromine in this process and this input is used as an input in the bromine production.
  The concentration of bromine in water, salt, sole is 0.23% = 0.0023kg/kg. Cross-referenced: 0.25% (Ullmann's encyclopedia), 0.4% (USGS). The concentration of iodine in water, salt, sole is 0.03% = 0.0003kg/kg. Cross-referenced: 0.015% - 0.12% (Ullmann's encyclopedia).
  There is an intermediate containing bromine in this process and this input is used as an input in the bromine production.
  The concentration of bromine in water, salt, sole is 0.23% = 0.0023kg/kg. Cross-referenced: 0.25% (Ullmann's encyclopedia), 0.4% (USGS). The concentration of iodine in water, salt, sole is 0.03% = 0.0003kg/kg. Cross-referenced: 0.015% - 0.12% (Ullmann's encyclopedia).
  Uncertainty: Stoechiometric calculation

## Emissions to nature
- Ammonium, ion [water, surface water]: 0.0017955 kg; lognormal variance with pedigree 0.188, pedigree (4,5,5,5,5)
  Estimation
  Uncertainty: Estimation
- Carbon dioxide, fossil [air, urban air close to ground]: 1.028 kg; lognormal variance with pedigree 0.1786, pedigree (4,5,5,5,5)
  Estimation
  Uncertainty: Estimation
- Phenol [air, urban air close to ground]: 0.00072575 kg; lognormal variance with pedigree 0.188, pedigree (4,5,5,5,5)
  Estimation
  Uncertainty: Estimation
- Phenol [water, surface water]: 0.0017418 kg; lognormal variance with pedigree 0.448, pedigree (4,5,5,5,5)
  Estimation
  Uncertainty: Estimation
- 2-Methyl-1-propanol [air, urban air close to ground]: 0.00013464 kg; lognormal variance with pedigree 0.188, pedigree (4,5,5,5,5)
  Estimation
  Uncertainty: Estimation
- Formaldehyde [water, surface water]: 0.0073753 kg; lognormal variance with pedigree 0.448, pedigree (4,5,5,5,5)
  Estimation
  Uncertainty: Estimation
- Formaldehyde [air, urban air close to ground]: 0.0016214 kg; lognormal variance with pedigree 0.188, pedigree (4,5,5,5,5)
  Estimation
  Uncertainty: Estimation
- Ethanol [air, urban air close to ground]: 0.00050794 kg; lognormal variance with pedigree 0.188, pedigree (4,5,5,5,5)
  Estimation
  Uncertainty: Estimation
- Fluoride [water, surface water]: 0.0038238 kg; lognormal variance with pedigree 0.188, pedigree (4,5,5,5,5)
  Estimation
  Uncertainty: Estimation
- Ethanol [water, surface water]: 0.0062351 kg; lognormal variance with pedigree 0.448, pedigree (4,5,5,5,5)
  Estimation
  Uncertainty: Estimation
- Ammonia [air, urban air close to ground]: 0.00074814 kg; lognormal variance with pedigree 0.218, pedigree (4,5,5,5,5)
  Estimation
  Uncertainty: Estimation
- Sodium, ion [water, surface water]: 0.3539 kg; lognormal variance with pedigree 0.798, pedigree (4,5,5,5,5)
  Estimation
  Uncertainty: Estimation
- Water [water, unspecified]: 0.599483 m3; name water_to_water_unspecified; lognormal variance with pedigree 0.0507, pedigree (2,2,4,5,1)
  Calculated value based on literature values and expert opinion. See comments in the parametres' comment field.
  property fraction, origin: salt water 0.797531; name fraction_origin_salt_water_Ww
  property fraction, origin: fresh water 5.78269e-5; name fraction_origin_fresh_water_Ww
  property fraction, origin: unspecified 0.202412; name fraction_origin_unspecified_Ww
  property dry mass 0 kg; name DM
  property carbon content, non-fossil 0; name C_content_non_fossil
  property water in wet mass 1000 kg; name WWM
  property wet mass 1000 kg; name WM
  property carbon content, fossil 0; name C_content_fossil
- Hydrogen [air, urban air close to ground]: 1.2577e-5 kg; lognormal variance with pedigree 0.188, pedigree (4,5,5,5,5)
  Estimation
  Uncertainty: Estimation
- 2-Methyl-1-propanol [water, surface water]: 0.00032314 kg; lognormal variance with pedigree 0.448, pedigree (4,5,5,5,5)
  Estimation
  Uncertainty: Estimation
- Toluene [water, surface water]: 0.0018137 kg; lognormal variance with pedigree 0.448, pedigree (4,5,5,5,5)
  Estimation
  Uncertainty: Estimation
- Water [air, unspecified]: 0.200075 m3; name water_to_air_unspecified; lognormal variance with pedigree 0.0507, pedigree (2,2,4,5,1)
  (same comment as for Water)
  property fraction, origin: fresh water 0.000109618; name fraction_origin_fresh_water
  property fraction, origin: salt water 0.616196; name fraction_origin_salt_water
  property fraction, origin: unspecified 0.383695; name fraction_origin_unspecified
- Bromide [water, surface water]: 1.3772 kg; lognormal variance with pedigree 0.798, pedigree (4,5,5,5,5)
  Estimation
  Uncertainty: Estimation
- Toluene [air, urban air close to ground]: 0.0007557 kg; lognormal variance with pedigree 0.188, pedigree (4,5,5,5,5)
  Estimation
  Uncertainty: Estimation
- Chloride [water, surface water]: 0.070672 kg; lognormal variance with pedigree 0.448, pedigree (4,5,5,5,5)
  Estimation
  Uncertainty: Estimation

## Sampling procedure
Literature data

## Extrapolations
Transports and emissions are modelled with standard methods. This dataset has been copied from an original dataset covering the geography RER. The uncertainty has been adjusted accordingly.

## Review by Thomas Nemecek 2010-03-11
Passed.
none
