# pipeline construction, natural gas, long distance, low capacity, onshore

Dataset: EcoSpold 2, unit process
Geography: GLO
Time period: 1990-01-01 to 2021-12-31
Technology level: current
Classification: EcoSpold01Categories: natural gas/production
Classification: ISIC rev.4 ecoinvent: 4220:Construction of utility projects
Tags: ConvertedDataset
Scenario: Business-as-Usual
System model: Allocation, cut-off by classification
Generated by: Mireille Faist Emmenegger (obsolete)
Published in: Faist Emmenegger, M. 2007
Database: ecoinvent
isCopyrightProtected: true
accessRestrictedTo: 1

## General comment
It is assumed that half of the pipelines are disposed in a discharge at the end of life, the other half stays in the soil. The life time of the pipeline is 40 years.
[This dataset was already contained in the ecoinvent database version 2. It was not individually updated during the transfer to ecoinvent version 3. Life Cycle Impact Assessment results may still have changed, as they are affected by changes in the supply chain, i.e. in other datasets. This dataset was generated following the ecoinvent quality guidelines for version 2. It may have been subject to central changes described in the ecoinvent version 3 change report (http://www.ecoinvent.org/database/ecoinvent-version-3/reports-of-changes/), and the results of the central updates were reviewed extensively. The changes added e.g. consistent water flows and other information throughout the database. The documentation of this dataset can be found in the ecoinvent reports of version 2, which are still available via the ecoinvent website. The change report linked above covers all central changes that were made during the conversion process.]

## Included activities end
This dataset describes the infrastructure needed for a long-distance pipeline onshore with a capacity from average 0.8e6 Sm3/h gas including material requirements, construction and disposal. Helicopter flights for inspection are included.

## Geography
The data represents an average European pipeline (capacity: 0.8 Mio. Nm3 gas per hour).

## Technology
The material quantities are calculated on the basis of the geometry of the pipeline (diameter 950mm, thickness 10 mm).

## Parameters
- fraction, process water, to air: 0.15 dimensionless; name fraction_PW_to_air; lognormal variance with pedigree 0.092025, pedigree (4,4,3,2,4)
  Literature value. In case when no industry/process specific data are available, default evaporation fraction value is used. This value is 15% and is based on literature (Statistics Canada, 2007 & Shaffer, K.H., 2008, Consumptive water use in the Great Lakes Basin, USGS & Shiklomanov, 2003, World Water Resources at the Beginning of the 21st Century) and has been approved by an expert.

## Reference product
- pipeline, natural gas, long distance, low capacity, onshore: 1 km; By-product classification allocatable product; CPC 53241: Long-distance pipelines
  EcoSpold01Location=GLO
  production volume 1 km
    Unknown
    Dummy value to be replaced by measured, estimated or calculated value
  property price 503437 EUR2005
    UNdata;(Average prices of EU27; 1.291 EUR/kg) http://data.un.org/Data.aspx?q=pipeline&d=ComTrade&f=_l1Code%3a74%3bcmdCode%3a730410. Pipes, line, iron or steel, for oil or gas pipelines. Weight 487 t (excl. sand).

## Inputs from technosphere
- municipal solid waste: 0 kg; pedigree (1,1,1,1,1)
  EcoSpold01Location=CH
  Environmental report
  Uncertainty: environmental report
  production volume 0 kg
    Calculated from the production volume of pipeline, natural gas, long distance, low capacity, onshore in proportion to the respective output amounts.
  properties: dry mass 0.771 kg, carbon content, fossil 0.171549, water content 0.297017, wet mass 1 kg, carbon content, non-fossil 0.261655, heating value, net 11.74 MJ
  note on carbon content, fossil: MSW composition in tab 4.1, ecoinvent v2.2 report 13_I. C content referred to 1 kg DM
  note on heating value, net: Value taken from the general comment of the treatment dataset.
- transport, helicopter: 26 hour; lognormal variance with pedigree 0.1792, pedigree (2,3,5,1,3)
  Estimates based on published data
  EcoSpold01Location=GLO
  Uncertainty: estimates based on published data
- waste bitumen: 0 kg; pedigree (1,1,1,1,1)
  Estimates
  EcoSpold01Location=CH
  Uncertainty: estimates
  production volume 0 kg
    (same comment as for municipal solid waste)
  properties: heating value, net 40.2 MJ, carbon content, fossil 0.842657, wet mass 1 kg, water content 0.0141988, dry mass 0.986 kg
  note on heating value, net: Literature value, Source: IPCC 2006, 2006 IPCC Guidelines for National Greenhouse Gas Inventories, Prepared by the National Greenhouse Gas Inventories Programme, Eggleston H.S., Buendia L., Miwa K., Ngara T. and Tanabe K. (eds). Published: IGES, Japan
- sand: 0 kg; pedigree (1,1,1,1,1)
  Estimates based on published data
  EcoSpold01Location=CH
  Uncertainty: estimates based on published data
  properties: wet mass 1 kg, dry mass 1 kg
- drawing of pipe, steel: 240000 kg; lognormal variance with pedigree 0.0506, pedigree (2,1,5,1,1)
  EcoSpold01Location=RER
  Estimates based on published data
  Uncertainty: estimates based on published data
- decommissioned pipeline, natural gas: 0 kg; pedigree (1,1,1,1,1)
  Estimates
  EcoSpold01Location=CH
  Uncertainty: estimates
  production volume 0 kg
    (same comment as for municipal solid waste)
  properties: dry mass 1 kg, wet mass 1 kg, carbon content, fossil 0.857143
  note on carbon content, fossil: Carbon content, fossil has been calculated from the carbon content from ethylene or polypropylene.
- hazardous waste, for incineration: 0 kg; pedigree (1,1,1,1,1)
  EcoSpold01Location=CH
  Environmental report
  Uncertainty: environmental report
  production volume 0 kg
    (same comment as for municipal solid waste)
  properties: wet mass 1 kg, carbon content, fossil 0.554667, dry mass 0.75 kg, water content 0.333333, heating value, net 17 MJ
  note on carbon content, fossil: Tab A.6, ecoinvent v2.2 report 13_I. C content has been calculated after data in the tables, and then referred to 1 kg DM
- waste plastic, mixture: 0 kg; pedigree (1,1,1,1,1)
  EcoSpold01Location=CH
  Estimates
  Uncertainty: estimates
  production volume 0 kg
    (same comment as for municipal solid waste)
  properties: carbon content, fossil 0.747344, water content 0.180638, dry mass 0.847 kg, wet mass 1 kg, heating value, net 30.79 MJ
  note on carbon content, fossil: C content in 1 kg DM was calculated using data in Tab A.2, ecoinvent v2.2 report 13_I
- polyethylene, low density, granulate: 4640 kg; lognormal variance with pedigree 0.0606, pedigree (2,1,5,1,1)
  Estimates based on published data
  EcoSpold01Location=RER
  Uncertainty: estimates based on published data
  properties: dry mass 1 kg, carbon content, fossil 0.857143, wet mass 1 kg, heating value, net 42.47 MJ
  note on carbon content, fossil: Polyethylene is formed out of a huge amount of ethylene monomers (C2H4) (ecoinvent v2.2 report 11_II). MW=28 g/mol
- reinforcing steel: 240000 kg; lognormal variance with pedigree 0.0506, pedigree (2,1,5,1,1)
  (same comment as for polyethylene, low density, granulate)
  properties: carbon content, fossil 0.004, wet mass 1 kg, dry mass 1 kg
- diesel, burned in building machine: 3.31e6 MJ; lognormal variance with pedigree 0.0412, pedigree (2,3,5,1,1)
  Environmental report
  EcoSpold01Location=GLO
  Uncertainty: environmental report
  properties: heating value, net 1 MJ
- pitch: 0 kg; pedigree (1,1,1,1,1)
  (same comment as for polyethylene, low density, granulate)
  properties: heating value, net 28 MJ, wet mass 1 kg, carbon content, fossil 0.83, dry mass 1 kg
- transport, helicopter, LTO cycle: 10.4 unit; lognormal variance with pedigree 0.1792, pedigree (2,3,5,1,3)
  (same comment as for transport, helicopter)
- municipal solid waste: -370.432, -2.27048, -1.58879, -6.30536, -4459.4 kg (5 entries); lognormal variance with pedigree 0.3412, pedigree (2,3,5,1,1)
  EcoSpold01Location=CH
  Environmental report
  Uncertainty: environmental report
  production volume 4840 kg
- waste bitumen: -373.52, -9.76359, -776.716 kg (3 entries); lognormal variance with pedigree 0.078, pedigree (3,5,5,1,3)
  Estimates
  EcoSpold01Location=CH
  Uncertainty: estimates
  production volume 1160 kg
- sand: 153.17, 29503.9, 353.257, 1.91999e6 kg (4 entries); lognormal variance with pedigree 0.0606, pedigree (2,1,5,1,1)
  (same comment as for sand)
- decommissioned pipeline, natural gas: -9258.57, -1.09074e6 kg (2 entries); lognormal variance with pedigree 0.078, pedigree (3,5,5,1,3)
  Estimates
  EcoSpold01Location=CH
  Uncertainty: estimates
  production volume 1.1e6 kg
- hazardous waste, for incineration: -1136.66, -29.7116, -2363.63 kg (3 entries); lognormal variance with pedigree 0.3412, pedigree (2,3,5,1,1)
  EcoSpold01Location=CH
  Environmental report
  Uncertainty: environmental report
  production volume 3530 kg
- waste plastic, mixture: -223.311, -17.216, -7.11081, -6.75237, -257.662, -2.87268, -1.30201, -1803.77 kg (8 entries); lognormal variance with pedigree 0.078, pedigree (3,5,5,1,3)
  EcoSpold01Location=CH
  Estimates
  Uncertainty: estimates
  production volume 2320 kg
- pitch: 352.101, 6.0556, 274.075, 17.5383, 106.254, 12.2852, 2.31503, 1549.38 kg (8 entries); lognormal variance with pedigree 0.0606, pedigree (2,1,5,1,1)
  (same comment as for polyethylene, low density, granulate)

## Inputs from nature
- Water, unspecified natural origin [natural resource, in water]: 187 m3; name water_UNO_input; lognormal variance with pedigree 0.0412, pedigree (2,3,5,1,1)
  Environmental report
  Uncertainty: environmental report
- Transformation, from forest, unspecified [natural resource, land]: 2000 m2; lognormal variance with pedigree 0.1886, pedigree (4,3,5,1,1)
  Qualified estimates
  Uncertainty: qualified estimates
- Transformation, to heterogeneous, agricultural [natural resource, land]: 2000 m2; lognormal variance with pedigree 0.1886, pedigree (4,3,5,1,1)
  Qualified estimates
  Uncertainty: qualified estimates
- Occupation, construction site [natural resource, land]: 3330 m2*year; lognormal variance with pedigree 0.1086, pedigree (4,3,5,1,1)
  Qualified estimates
  Uncertainty: qualified estimates

## Emissions to nature
- Water [water, unspecified]: 158.95 m3; name water_to_water_unspecified; = water_UNO_input*(1-fraction_PW_to_air); lognormal variance with pedigree 0.0807, pedigree (2,2,5,1,1)
  Calculated value based on literature values and expert opinion. See comments in the parametres' comment field.
  property dry mass 0 kg; name DM
  property fraction, origin: salt water 0; name fraction_origin_salt_water_Ww
  property carbon content, non-fossil 0; name C_content_non_fossil
  property fraction, origin: unspecified 1; name fraction_origin_unspecified_Ww
  property wet mass 1000 kg; name WM
  property water in wet mass 1000 kg; name WWM
  property carbon content, fossil 0; name C_content_fossil
  property fraction, origin: fresh water 0; name fraction_origin_fresh_water_Ww
- Water [air, unspecified]: 28.05 m3; name water_to_air_unspecified; = (water_UNO_input*fraction_PW_to_air); lognormal variance with pedigree 0.0807, pedigree (2,2,5,1,1)
  (same comment as for Water)
  property fraction, origin: fresh water 0; name fraction_origin_fresh_water
  property fraction, origin: salt water 0; name fraction_origin_salt_water
  property fraction, origin: unspecified 1; name fraction_origin_unspecified

## Sampling procedure
environmental report

## Extrapolations
This dataset has been extrapolated from year 2001 to the year of the calculation (2021). The uncertainty has been adjusted accordingly.

## Review by Michael Spielmann (obsolete) 2003-09-22
Passed.
