# glass fibre reinforced plastic production, polyamide, injection moulded

Dataset: EcoSpold 2, unit process
Geography: RER
Time period: 2000-01-01 to 2021-12-31
Technology level: current
Classification: EcoSpold01Categories: plastics/others
Classification: ISIC rev.4 ecoinvent: 2220:Manufacture of plastics products
Synonyms: GFK; GRP
Tags: ConvertedDataset
Scenario: Business-as-Usual
System model: Allocation, cut-off by classification
Generated by: Niels Jungbluth
Published in: Kellenberger D. 2007
Database: ecoinvent
isCopyrightProtected: true
accessRestrictedTo: 1

## General comment
Based on assumptions for material uses. Data for processing and infrastructure are assumed with generic inventory.
[This dataset was already contained in the ecoinvent database version 2. It was not individually updated during the transfer to ecoinvent version 3. Life Cycle Impact Assessment results may still have changed, as they are affected by changes in the supply chain, i.e. in other datasets. This dataset was generated following the ecoinvent quality guidelines for version 2. It may have been subject to central changes described in the ecoinvent version 3 change report (http://www.ecoinvent.org/database/ecoinvent-version-3/reports-of-changes/), and the results of the central updates were reviewed extensively. The changes added e.g. consistent water flows and other information throughout the database. The documentation of this dataset can be found in the ecoinvent reports of version 2, which are still available via the ecoinvent website. The change report linked above covers all central changes that were made during the conversion process.]

## Included activities end
Gate to gate inventory for the injection moulding of glass fibre with polyamide resin including material inputs, process and infrastructure.

## Geography
Information from one manufacturer.

## Technology
Injection moulding of glass fibre.

## Time period
Time of publication

## Reference product
- glass fibre reinforced plastic, polyamide, injection moulded: 1 kg; By-product classification allocatable product; CPC 36990: Articles of plastics n.e.c.
  EcoSpold01Location=RER
  production volume 1.32237 kg
    This is a placeholder value that does not reflect real-world production volumes. This dataset does not currently require a real-world production volume to work in the database framework, and no actual data were collected yet. This has no negative effect on the results of the ecoinvent database. The placeholder value of this activity was scaled according to the nominal GDP of 2005 (source: United Nations, http://data.un.org/Glossary.aspx?q=GDP+%28current+US%24%29, accessed 20130726) to reflect an appropriate share of the global production volume, which is also a placeholder value.
  property price 1.3 EUR2005
    Calculated after Made in China. Source: http://qianmiaonuo.en.made-in-china.com/product/BKonhlqbMSWV/China-Polyamide-PA6-30-Glass-Fiber-Reinforced-Plastic-Raw-Materials-Prices.html
  property carbon content, fossil 0.446018
    Polyamide resin assimilate to Nylon 66 (ecoinvent v2.2 report 7_XIII). Nylon 66 is derived from hexamethylene diamine and adipic acid and has the following structure: -(HN-(CH2)6-NH-CO-(CH2)4-CO)n- (ecoinvent v2.2 report 11_II), C12H22N2O2. MW=226 g/mol. Here Nylon 66 is – mainly for improved stiffness and stability – modified with glass fibres. The glass fibre content in the product is assumed of 30%. (ecoinvent v2.2 report 11_II)
  property carbon content 0.446018
    carbon content on a dry matter basis (reserved; not for manual entry)
  properties: water content 0, carbon content, non-fossil 0, water in wet mass 0 kg, wet mass 1 kg, dry mass 1 kg, carbon allocation 0.446018 kg

## Inputs from technosphere
- chemical, organic: 0.025 kg; lognormal variance with pedigree 0.0501, pedigree (4,4,5,3,1)
  EcoSpold01Location=GLO
  Estimation for extender, additives and peroxides
  Uncertainty: Estimation for extender, additives and peroxides
  properties: heating value, net 19.03 MJ, carbon content, fossil 0.628, dry mass 1 kg, wet mass 1 kg
  note on carbon content, fossil: This dataset is an unweighted average of 20 organic substances (listed in Tab 88.1, ecoinvent v2.2 report 8, part II), being part of the top100 chemicals included in this database. The C-content has also been calculated as an unweighted average of the C content of the substances composing this dataset.
- nylon 6-6, glass-filled: 1.05 kg; lognormal variance with pedigree 0.0681, pedigree (4,4,5,3,3)
  95% use efficiency, polyamide resin input approximated with nylon
  EcoSpold01Location=RER
  Uncertainty: 95% use efficiency, polyamide resin input approximated with nylon
  properties: heating value, net 30.9 MJ, carbon content, fossil 0.446018, wet mass 1 kg, dry mass 1 kg
  note on heating value, net: Assumed equal to Nylon-66. Reference: Walters, R. N., Hackett, S. M. and Lyon, R. E. (2000) ‘Heats of combustion of high temperature polymers’, Fire and Materials, 24(5), pp. 245–252. doi: 10.1002/1099-1018(200009/10)24:5<245::AID-FAM744>3.0.CO;2-7.
  note on carbon content, fossil: Nylon 66 is derived from hexamethylene diamine and adipic acid and has the following structure: -(HN-(CH2)6-NH-CO-(CH2)4-CO)n- (ecoinvent v2.2 report 11_II), C12H22N2O2. MW=226 g/mol. Here Nylon 66 is – mainly for improved stiffness and stability – modified with glass fibres. The glass fibre content in the product is assumed of 30%. (ecoinvent v2.2 report 11_II)
- injection moulding: 1 kg; lognormal variance with pedigree 0.056, pedigree (4,5,5,1,1)
  Estimation for process
  EcoSpold01Location=RER
  Uncertainty: Estimation for process
- waste mineral wool, for final disposal: 0 kg; pedigree (1,1,1,1,1)
  Estimation for losses
  EcoSpold01Location=CH
  Uncertainty: Estimation for losses
  production volume 0 kg
    Calculated from the production volume of glass fibre reinforced plastic, polyamide, injection moulded in proportion to the respective output amounts.
  properties: wet mass 1 kg, dry mass 1 kg
- waste mineral wool, for final disposal: -0.366001, -0.00199948 kg (2 entries); lognormal variance with pedigree 0.0501, pedigree (4,4,5,3,1)
  Estimation for losses
  EcoSpold01Location=CH
  Uncertainty: Estimation for losses
  production volume 0.368 kg

## Sampling procedure
Personal communication

## Extrapolations
This dataset has been extrapolated from year 2000 to the year of the calculation (2021). The uncertainty has been adjusted accordingly.

## Review by Hans-Jörg Althaus 2003-06-10
passed
