# treatment of used beverage cans, for recycling, unsorted, sorting

Dataset: EcoSpold 2, unit process
Geography: Europe without Switzerland
Time period: 2012-01-01 to 2021-12-31
Technology level: current
Classification: ISIC rev.4 ecoinvent: 3830:Materials recovery
Scenario: Business-as-Usual
System model: Allocation, cut-off by classification
Generated by: Avraam Symeonidis
Database: ecoinvent
isCopyrightProtected: true
accessRestrictedTo: 1

## General comment
This activity represents the treatment of used beverage cans (UBCs) from separate collection, i.e. a source-segregated municipal solid waste fraction, through sorting for recycling. The sorting of 'used beverage cans' yields 'aluminium scrap, post-consumer, prepared for recycling, at refiner'.

## Included activities start
The activity starts with 'used beverage cans' being available to the sorting facility. Collection of this 'used beverage cans, for recycling' is documented in the respective market for this waste.

## Included activities end
The activity ends with 'used beverage cans' being sorted and 'aluminium scrap, post-consumer, prepared for recycling, at refiner' being available for transportation at the gates of the sorting facility.

## Geography
Europe without Switzerland

## Technology
Technology encountered in Europe without Switzerland for the underlying time frame.

## Time period
Data assumed representative of the situation in Europe without Switzerland in 2012.

## Reference product
- used beverage cans: 0 kg; CPC 39363: Waste and scrap of aluminium; By-product classification Recyclable
  production volume 0 kg; name PVRP; = 5950000*28/0.8
    PV value is scaled from the CH value given that Switzerland accounts for 0.8% of the global GDP and Europe without Switzerland circa 28%.
  property carbon content, non-fossil 0.00403464; = 0.02*0.771*0.26165
    non-fossil carbon content on a dry matter basis; estimated by assuming 2% impurities with composition as residual MSW with 77.1% dry matter and a non-fossil carbon content of 26.2% (on dry matter basis)
  property carbon content, fossil 0.0026453; = 0.02*0.771*0.17155
    fossil carbon content on a dry matter basis; estimated by assuming 2% impurities with composition as residual MSW with 77.1% dry matter and a fossil carbon content of 17.2% (on dry matter basis)
  property heating value, net 0 MJ
    Non combustible products are assumed to have an LHV equal to zero (0).
  property price 0.685 EUR2005; name RP_price_EUR2005
    Assuming same price as stated for 'aluminium scrap, post-consumer' (EUR2005 0.685 per kg) in ecoinvent 3.6, although actually probably a bit higher (https://www.scrapmonster.com/european-scrap-prices). The original comment to this price estimate: "Temporary price data. Calculated as 90% of purchasers price based on: estimated at 85% of sorted scrap"
  property carbon content 0.00667994
    carbon content on a dry matter basis (reserved; not for manual entry)
  properties: water content 0.00460107, water in wet mass 0.00458 kg, wet mass 1 kg, dry mass 0.99542 kg, carbon allocation 0.00664935 kg
- aluminium scrap, post-consumer, prepared for melting: 1 kg; name RP1; By-product classification Recyclable; CPC 39363: Waste and scrap of aluminium; pedigree (1,1,1,1,1)
  production volume 2.04085e8 kg; = PVRP*RP1/abs(RP)
  property price 0.806 EUR2005; name RP1_price_EUR2005
  properties: carbon content, fossil 0, water content 0, dry mass 1 kg, wet mass 1 kg, carbon content, non-fossil 0, water in wet mass 0 kg, carbon content 0, carbon allocation 0 kg

## By-products
- aluminium scrap, post-consumer, prepared for melting: 0 kg; By-product classification Recyclable; CPC 39363: Waste and scrap of aluminium; pedigree (1,1,1,1,1)
  production volume 0 kg; = PVRP*RP1/abs(RP)
    Calculated from production volume of reference product using the relative outputs.
  property carbon content 0
    carbon content on a dry matter basis (reserved; not for manual entry)
  properties: carbon content, fossil 0, water content 0, dry mass 1 kg, wet mass 1 kg, carbon content, non-fossil 0, water in wet mass 0 kg, carbon allocation 0 kg

## Inputs from technosphere
- waste preparation facility: 2.04082e-9 unit; lognormal variance with pedigree 0.690025, pedigree (1,1,5,2,1)
- municipal solid waste: -0.0204082 kg; name BP; lognormal variance with pedigree 0.0498, pedigree (4,3,5,4,1)
  production volume 4.165e6 kg; = PVRP*BP/abs(RP)
    Calculated from production volume of reference product using the relative outputs.
  property price 0 EUR2005; name BP_price_EUR2005
  properties: dry mass 0.771 kg, carbon content, fossil 0.171549, heating value, net 11.74 MJ, wet mass 1 kg, water content 0.297017, carbon content, non-fossil 0.261655
  note on heating value, net: Value taken from the general comment of the treatment dataset.
- diesel, burned in building machine: 0.0176327 MJ; lognormal variance with pedigree 0.690025, pedigree (1,1,5,2,1)
  properties: heating value, net 1 MJ
- electricity, medium voltage: 0.0102041 kWh; lognormal variance with pedigree 0.690025, pedigree (1,1,5,2,1)
- used beverage cans: 1.02041 kg
  production volume 2.0825e8 kg
  properties: water content 0.00460107, carbon content, non-fossil 0.00403464, wet mass 1 kg, carbon content, fossil 0.0026453, dry mass 0.99542 kg
  note on carbon content, non-fossil: non-fossil carbon content on a dry matter basis; estimated by assuming 2% impurities with composition as residual MSW with 77.1% dry matter and a non-fossil carbon content of 26.2% (on dry matter basis)
  note on carbon content, fossil: fossil carbon content on a dry matter basis; estimated by assuming 2% impurities with composition as residual MSW with 77.1% dry matter and a fossil carbon content of 17.2% (on dry matter basis)

## Extrapolations
This dataset has been extrapolated from year 2012 to the year of the calculation (2021). The uncertainty has been adjusted accordingly.
