# sodium silicate production, furnace process, solid product

Dataset: EcoSpold 2, unit process
Geography: RoW
Time period: 1995-01-01 to 2021-12-31
Technology level: current
Classification: ISIC rev.4 ecoinvent: 2011:Manufacture of basic chemicals
Classification: EcoSpold01Categories: chemicals/inorganics
Tags: ConvertedDataset
Scenario: Business-as-Usual
System model: Allocation, cut-off by classification
Generated by: Roland Hischier
Published in: Zah R. 2007
Database: ecoinvent
isCopyrightProtected: true
accessRestrictedTo: 1

## General comment
data based on a EMPA study, commissioned by the CEES.
[This dataset was already contained in the ecoinvent database version 2. It was not individually updated during the transfer to ecoinvent version 3. Life Cycle Impact Assessment results may still have changed, as they are affected by changes in the supply chain, i.e. in other datasets. This dataset was generated following the ecoinvent quality guidelines for version 2. It may have been subject to central changes described in the ecoinvent version 3 change report (http://www.ecoinvent.org/database/ecoinvent-version-3/reports-of-changes/), and the results of the central updates were reviewed extensively. The changes added e.g. consistent water flows and other information throughout the database. The documentation of this dataset can be found in the ecoinvent reports of version 2, which are still available via the ecoinvent website. The change report linked above covers all central changes that were made during the conversion process.]

## Included activities end
This module contains material and energy input, production of waste and emissions for the production of sodium phosphate out of phosphoric aicd. Transport and infrastructure have been estimated. The input of 0.01 m3 air is not reported in the data according to the methodology of the study.

## Geography
average data from 6 Euroopean producers

## Technology
average technology used from these European producers

## Time period
date of published literature

## Parameters
- fraction, cooling water, recirculating system, to air: 0.771 dimensionless; name fraction_CW_R_to_air; lognormal variance with pedigree 0.0413, pedigree (2,3,1,3,1)
  Calculated based on literature value (Scown, C.D., 2011, Water Footprint of U.S. Transportation Fuels and supplying information of the article) (Vionnet, S., Quantis Water Database - Technical Report, 2012).
- fraction, cooling water, once-through system, to air: 0.004 dimensionless; name fraction_CW_OT_to_air; lognormal variance with pedigree 0.0413, pedigree (2,3,1,3,1)
  (same comment as for fraction, cooling water, recirculating system, to air)
- fraction, process water, to air: 0.205 dimensionless; name fraction_PW_to_air; lognormal variance with pedigree 0.092025, pedigree (4,4,3,2,4)
- fraction, cooling water, cooling pond system, to air: 0.032 dimensionless; name fraction_CW_CP_to_air; lognormal variance with pedigree 0.0413, pedigree (2,3,1,3,1)
  (same comment as for fraction, cooling water, recirculating system, to air)
- fraction, cooling water, to air: 0.3875 dimensionless; name fraction_CW_to_air; = (0.5*fraction_CW_OT_to_air)+(0.5*fraction_CW_R_to_air); lognormal variance with pedigree 0.092025, pedigree (4,4,3,2,4)
  Calculated value based on literature value (see comments of the other parametres present in this dataset) and expert opinion. In the case when no industry/literature data are available about the type of cooling or directly fraction, cooling water, to air specific for the process a default assumption is applied. It is assumed that the once-through cooling system is used in 50% of all cases and recirculating system is used in another 50% of all cases.

## Reference product
- sodium silicate, solid: 1 kg; By-product classification allocatable product; CPC 34270: Cyanides, cyanide oxides and complex cyanides; fulminates, cyanates and thiocyanates; silicates; borates; perb[…]; CAS 6834-92-0
  EcoSpold01Location=RER
  production volume 2.67763 kg
    This is a placeholder value that does not reflect real-world production volumes. This dataset does not currently require a real-world production volume to work in the database framework, and no actual data were collected yet. This has no negative effect on the results of the ecoinvent database.
  property price 0.22 EUR2005
    Calculated value based on data from United Nations Commodity Trade Statistics Database (comtrade.un.org). UN comtrade category: 283919 Silicates of sodium other than metasilicates. Year 2005. Using exchange rate of 1EURO = 1.209 USD. Average of price of import into 5 main markets (EU, US, JP, IN and CN).
  property carbon content 0
    carbon content on a dry matter basis (reserved; not for manual entry)
  properties: wet mass 1 kg, dry mass 1 kg, water content 0, carbon content, fossil 0, carbon content, non-fossil 0, water in wet mass 0 kg, carbon allocation 0 kg

## Inputs from technosphere
- soda ash, light, crystalline, heptahydrate: 0.4 kg; lognormal variance with pedigree 0.0427, pedigree (2,2,5,5,1)
  Average data from 6 European producers
  EcoSpold01Location=RER
  Uncertainty: Average data from 6 European producers
  properties: heating value, net 3.43 MJ, carbon content, fossil 0.0517241, dry mass 1 kg, wet mass 1 kg
- chemical, organic: 0.0001 kg; lognormal variance with pedigree 0.0427, pedigree (2,2,5,5,1)
  EcoSpold01Location=GLO
  Average data from 6 European producers
  Uncertainty: Average data from 6 European producers
  properties: heating value, net 19.03 MJ, carbon content, fossil 0.628, wet mass 1 kg, dry mass 1 kg
  note on carbon content, fossil: This dataset is an unweighted average of 20 organic substances (listed in Tab 88.1, ecoinvent v2.2 report 8, part II), being part of the top100 chemicals included in this database. The C-content has also been calculated as an unweighted average of the C content of the substances composing this dataset.
- heat, district or industrial, natural gas: 0 MJ; pedigree (1,1,1,1,1)
  (same comment as for soda ash, light, crystalline, heptahydrate)
  properties: heating value, net 1 MJ
- silica sand: 0.772 kg; lognormal variance with pedigree 0.0427, pedigree (2,2,5,5,1)
  EcoSpold01Location=DE
  Average data from 6 European producers
  Uncertainty: Average data from 6 European producers
  properties: wet mass 1 kg, dry mass 0.99 kg, water content 0.010101
- heat, district or industrial, other than natural gas: 0 MJ; pedigree (1,1,1,1,1)
  (same comment as for soda ash, light, crystalline, heptahydrate)
  properties: heating value, net 1 MJ
- chemical factory, organics: 4e-10 unit; lognormal variance with pedigree 0.588, pedigree (4,5,5,5,5)
  Estimation
  EcoSpold01Location=RER
  Uncertainty: estimation
- steam, in chemical industry: 0.0073 kg; lognormal variance with pedigree 0.0427, pedigree (2,2,5,5,1)
  (same comment as for soda ash, light, crystalline, heptahydrate)
  properties: wet mass 1 kg
- electricity, medium voltage: 0 kWh; pedigree (1,1,1,1,1)
  EcoSpold01Location=UCTE
  Average data from 6 European producers
  Uncertainty: Average data from 6 European producers
- average incineration residue: -0.00065 kg; lognormal variance with pedigree 0.0427, pedigree (2,2,5,5,1)
  EcoSpold01Location=CH
  Average data from 6 European producers
  Uncertainty: Average data from 6 European producers
  production volume 0.00195 kg
    Calculated from the production volume of sodium silicate, solid in proportion to the respective output amounts.
  properties: carbon content, fossil 0.0325466, carbon content, non-fossil 0.0511208, dry mass 1 kg, wet mass 1 kg
  note on carbon content, fossil: Tab A.1, ecoinvent v2.2 report 13_I. It is considered that 61.1% of the C has a biogenic origin
- heat, district or industrial, natural gas: 0.0335438, 2.17646 MJ (2 entries); lognormal variance with pedigree 0.0427, pedigree (2,2,5,5,1)
  (same comment as for soda ash, light, crystalline, heptahydrate)
- heat, district or industrial, other than natural gas: 0.000912026, 2.24909 MJ (2 entries); lognormal variance with pedigree 0.0427, pedigree (2,2,5,5,1)
  (same comment as for soda ash, light, crystalline, heptahydrate)
- electricity, medium voltage: 0.000418492, 8.02488e-5, 0.00134721, 0.019594, 0.00276178, 0.00899829 kWh (6 entries); lognormal variance with pedigree 0.0427, pedigree (2,2,5,5,1)
  (same comment as for electricity, medium voltage)

## Inputs from nature
- Water, cooling, unspecified natural origin [natural resource, in water]: 0.00094 m3; name water_cooling_UNO_input; source Fawer M. 1997; lognormal variance with pedigree 0.0427, pedigree (2,2,5,5,1)
  Literature Value.
  Uncertainty: Average data from 6 European producers
- Water, unspecified natural origin [natural resource, in water]: 0.00046 m3; name water_UNO_input; source Fawer M. 1997; lognormal variance with pedigree 0.0427, pedigree (2,2,5,5,1)
  Literature Value.
  Uncertainty: Average data from 6 European producers

## Emissions to nature
- COD, Chemical Oxygen Demand [water, surface water]: 3e-9 kg; lognormal variance with pedigree 0.0827, pedigree (2,2,5,5,1)
  Average data from 6 European producers
  Uncertainty: Average data from 6 European producers
- BOD5, Biological Oxygen Demand [water, surface water]: 1.7e-7 kg; lognormal variance with pedigree 0.0827, pedigree (2,2,5,5,1)
  Average data from 6 European producers
  Uncertainty: Average data from 6 European producers
- Suspended solids, unspecified [water, surface water]: 4.2e-6 kg; lognormal variance with pedigree 0.0827, pedigree (2,2,5,5,1)
  Average data from 6 European producers
  Uncertainty: Average data from 6 European producers
- Water [water, unspecified]: 0.00094145 m3; name water_to_water_unspecified; lognormal variance with pedigree 0.0827, pedigree (2,2,5,5,1)
  Calculated value based on literature values and expert opinion. See comments in the parametres' comment field.
  property fraction, origin: salt water 0; name fraction_origin_salt_water_Ww
  property fraction, origin: unspecified 1; name fraction_origin_unspecified_Ww
  property fraction, origin: fresh water 0; name fraction_origin_fresh_water_Ww
  property water in wet mass 1000 kg; name WWM
  property wet mass 1000 kg; name WM
  property dry mass 0 kg; name DM
  property carbon content, fossil 0; name C_content_fossil
  property carbon content, non-fossil 0; name C_content_non_fossil
- DOC, Dissolved Organic Carbon [water, surface water]: 1.11111e-9 kg; lognormal variance with pedigree 0.0827, pedigree (2,2,5,5,1)
  Calculated as equal to TOC.
  Uncertainty: Average data from 6 European producers
- TOC, Total Organic Carbon [water, surface water]: 1.11111e-9 kg; lognormal variance with pedigree 0.0827, pedigree (2,2,5,5,1)
  Calculated by default as TOC (gC) = COD/2.7 (COD measured in g O2). Should more correctly be calculated from the carbon content of the specified emissions to water.
  Uncertainty: Average data from 6 European producers
- Water [air, unspecified]: 0.00045855 m3; name water_to_air_unspecified; lognormal variance with pedigree 0.0827, pedigree (2,2,5,5,1)
  (same comment as for Water)
  property fraction, origin: salt water 0; name fraction_origin_salt_water
  property fraction, origin: fresh water 0; name fraction_origin_fresh_water
  property fraction, origin: unspecified 1; name fraction_origin_unspecified
- Carbon dioxide, fossil [air, urban air close to ground]: 0.165 kg; lognormal variance with pedigree 0.0427, pedigree (2,2,5,5,1)
  Average data from 6 European producers
  Uncertainty: Average data from 6 European producers

## Extrapolations
This dataset has been copied from an original dataset covering the geography RER. The uncertainty has been adjusted accordingly.

## Review by Heiko Kunst 2003-06-20
Passed
Passed
