# treatment of waste mineral plaster, collection for final disposal

Dataset: EcoSpold 2, unit process
Geography: RoW
Time period: 1994-01-01 to 2021-12-31
Technology level: current
Classification: EcoSpold01Categories: waste management/building demolition
Classification: ISIC rev.4 ecoinvent: 3821:Treatment and disposal of non-hazardous waste
Tags: Treatment; ConvertedDataset
Scenario: Business-as-Usual
System model: Allocation, cut-off by classification
Generated by: Gabor Doka (obsolete)
Published in: Doka G. 2007
Database: ecoinvent
isCopyrightProtected: true
accessRestrictedTo: 1

## General comment
The waste contains 1kg inert material (GSD=100%) Waste density is 2000 kg/m3.
[This dataset was already contained in the ecoinvent database version 2. It was not individually updated during the transfer to ecoinvent version 3. Life Cycle Impact Assessment results may still have changed, as they are affected by changes in the supply chain, i.e. in other datasets. This dataset was generated following the ecoinvent quality guidelines for version 2. It may have been subject to central changes described in the ecoinvent version 3 change report (http://www.ecoinvent.org/database/ecoinvent-version-3/reports-of-changes/), and the results of the central updates were reviewed extensively. The changes added e.g. consistent water flows and other information throughout the database. The documentation of this dataset can be found in the ecoinvent reports of version 2, which are still available via the ecoinvent website. The change report linked above covers all central changes that were made during the conversion process.]

## Included activities end
particulate matter emissions from dismantling and handling, transport to dismantling facilities, final disposal of waste material,

## Geography
Specific to the technology mix encountered in Switzerland in late 1990ies

## Technology
Building demolition with skid-steer loaders.

## Reference product
- waste mineral plaster: -1 kg; By-product classification Waste; CPC 39: Wastes or scraps
  EcoSpold01Location=CH
  production volume 5890.44 kg; = 118.8087851*50
    Production volume amount was scaled from the respective Swiss value. GDP scaling was employed with Switzerland accounting for roughly 0.8% of the global GDP.
  property heating value, net 0 MJ
    Non combustible products are assumed to have an LHV equal to zero (0).
  property price 0 EUR2005
    Waste products are assigned a price of zero as they are assumed to require further treatment.
  property carbon content 0
    carbon content on a dry matter basis (reserved; not for manual entry)
  properties: carbon content, fossil 0, carbon content, non-fossil 0, wet mass 1 kg, water in wet mass 0 kg, water content 0, dry mass 1 kg, carbon allocation 0 kg

## Inputs from technosphere
- inert waste, for final disposal: -1 kg; lognormal variance with pedigree 0.042, pedigree (1,1,5,5,1)
  disposed masses. Uncertainty calculated from uncertainty of waste composition
  EcoSpold01Location=CH
  production volume 5890.44 kg; = 118.8087851*50
    Calculated from the production volume of waste mineral plaster in proportion to the respective output amounts.
  properties: water content 0.00502513, wet mass 1 kg, dry mass 0.995 kg

## Emissions to nature
- Particulates, < 2.5 um [air, urban air close to ground]: 1.66e-5 kg; lognormal variance with pedigree 0.3632, pedigree (2,3,5,5,1)
  Emission from dismantling and handling. from one extrapolated PM10 emission factor and generic PM fractions from measurements
  Uncertainty: & basic uncertainty of 3; from one extrapolated PM10 emission factor and generic PM fractions from measurements
- Particulates, > 2.5 um, and < 10um [air, urban air close to ground]: 6.34e-5 kg; lognormal variance with pedigree 0.1832, pedigree (2,3,5,5,1)
  Emission from dismantling and handling. from one extrapolated PM10 emission factor and generic PM fractions from measurements
  Uncertainty: & basic uncertainty of 2; from one extrapolated PM10 emission factor and generic PM fractions from measurements
- Particulates, > 10 um [air, urban air close to ground]: 8.35e-5 kg; lognormal variance with pedigree 0.0932, pedigree (2,3,5,5,1)
  Emission from dismantling and handling. from one extrapolated PM10 emission factor and generic PM fractions from measurements
  Uncertainty: & basic uncertainty of 1.5; from one extrapolated PM10 emission factor and generic PM fractions from measurements

## Sampling procedure
waste-specific calculation based on literature data

## Extrapolations
none This dataset has been copied from an original dataset covering the geography CH. The uncertainty has been adjusted accordingly.

## Review by Niels Jungbluth 2003-05-22
Passed. Calculation for standard deviation 95 of infrastructure, land occupation, transport services and other services can differ from standard Pedigree approach used in this project and figures obtained by this procedure.
