# treatment of nickel smelter slag, residual material landfill

Dataset: EcoSpold 2, unit process
Geography: CH
Time period: 1994-01-01 to 2021-12-31
Technology level: current
Classification: ISIC rev.4 ecoinvent: 3822:Treatment and disposal of hazardous waste
Classification: EcoSpold01Categories: waste management/residual material landfill
Synonyms: slag from nickel, copper, platinum group metal, or manganese production; Schlacke aus Ni, Cu, Pt, Pd, Rh, oder Mn Hochofenproduktion
Tags: ConvertedDataset; Treatment
Scenario: Business-as-Usual
System model: Allocation, cut-off by classification
Generated by: Gabor Doka (obsolete)
Published in: Doka G. 2009
Database: ecoinvent
isCopyrightProtected: true
accessRestrictedTo: 1

## General comment
Inventoried waste contains 100% Nickel smelting slag; .
waste composition (wet, in ppm): H2O n.a.; O 432120; H n.a.; C 3450; S n.a.; N n.a.; P n.a.; B n.a.; Cl n.a.; Br n.a.; F n.a.; I n.a.; Ag n.a.; As n.a.; Ba n.a.; Cd n.a.; Co 1116.7; Cr n.a.; Cu 800; Hg n.a.; Mn n.a.; Mo n.a.; Ni 1900; Pb n.a.; Sb n.a.; Se n.a.; Sn n.a.; V n.a.; Zn n.a.; Be n.a.; Sc n.a.; Sr n.a.; Ti n.a.; Tl n.a.; W n.a.; Si 164110; Fe 385000; Ca 11500; Al n.a.; K n.a.; Mg n.a.; Na n.a.;
Share of carbon in waste that is biogenic 0%.
[This dataset was already contained in the ecoinvent database version 2. It was not individually updated during the transfer to ecoinvent version 3. Life Cycle Impact Assessment results may still have changed, as they are affected by changes in the supply chain, i.e. in other datasets. This dataset was generated following the ecoinvent quality guidelines for version 2. It may have been subject to central changes described in the ecoinvent version 3 change report (http://www.ecoinvent.org/database/ecoinvent-version-3/reports-of-changes/), and the results of the central updates were reviewed extensively. The changes added e.g. consistent water flows and other information throughout the database. The documentation of this dataset can be found in the ecoinvent reports of version 2, which are still available via the ecoinvent website. The change report linked above covers all central changes that were made during the conversion process.]

## Included activities end
Waste-specific short-term emissions to water from leachate. Long-term emissions from landfill to ground water.

## Geography
Technology encountered in Switzerland in 2000. Landfill includes base seal and leachate collection system.

## Technology
Swiss residual material landfill for polluted, inorganic waste. With base seal and leachate collection system. Recultivation after closure.

## Time period
Waste composition as given in literature reference, theoretical data or other source. Transfer coefficients from prospective model.

## Reference product
- nickel smelter slag: -1 kg; By-product classification Waste; CPC 39362: Waste and scrap of nickel
  EcoSpold01Location=CH
  production volume 6.53226e8 kg; = 0.008*81653236275
    Swiss production volume is scaled based on the Global GDP and the assumption that Switzerland amounts for circa 0.8% of the global GDP.
  property heating value, net 0 MJ
    Non combustible products are assumed to have an LHV equal to zero (0).
  property price 0 EUR2005
    Waste products are assigned a price of zero as they are assumed to require further treatment.
  property carbon content 0.00345
    carbon content on a dry matter basis (reserved; not for manual entry)
  properties: water content 0, dry mass 1 kg, wet mass 1 kg, carbon content, fossil 0.00345, water in wet mass 0 kg, carbon content, non-fossil 0, carbon allocation 0.00345 kg

## Inputs from technosphere
- residual material landfill: 2.0833e-9 unit; lognormal variance with pedigree 0.04, pedigree (1,1,5,1,1)
  EcoSpold01Location=CH
  demands per kilogram waste. uncertainty is heeded in the module
- process-specific burdens, residual material landfill: 1 kg; lognormal variance with pedigree 0.04, pedigree (1,1,5,1,1)
  demands per kilogram waste. uncertainty is heeded in the module;activityLink introduced to establish a direct link to the corresponding regional supply of this product
  EcoSpold01Location=CH

## Emissions to nature
- Copper, ion [water, ground-, long-term]: 3.0796e-5 kg; lognormal variance with pedigree 3.38, pedigree (1,1,5,1,1)
  uncertainty is calculated from uncertainties in waste composition and transfer coefficients in incinerator and landfills.
- Iron, ion [water, ground-, long-term]: 0.0019296 kg; lognormal variance with pedigree 7.08, pedigree (1,1,5,1,1)
  (same comment as for Copper, ion)
- COD, Chemical Oxygen Demand [water, surface water]: 9.4065e-6 kg; lognormal variance with pedigree 1.18, pedigree (1,1,5,1,1)
  uncertainty is calculated from uncertainties in waste composition and transfer coefficients in residual landfill
- BOD5, Biological Oxygen Demand [water, surface water]: 3.0768e-6 kg; lognormal variance with pedigree 1.18, pedigree (1,1,5,1,1)
  (same comment as for COD, Chemical Oxygen Demand)
- Calcium, ion [water, ground-, long-term]: 0.0010391 kg; lognormal variance with pedigree 1.84, pedigree (1,1,5,1,1)
  (same comment as for Copper, ion)
- Silicon [water, ground-, long-term]: 0.16374 kg; lognormal variance with pedigree 0.12, pedigree (1,1,5,1,1)
  (same comment as for Copper, ion)
- TOC, Total Organic Carbon [water, ground-, long-term]: 0.0022296 kg; lognormal variance with pedigree 0.59, pedigree (1,1,5,1,1)
  (same comment as for Copper, ion)
- BOD5, Biological Oxygen Demand [water, ground-, long-term]: 0.001843 kg; lognormal variance with pedigree 0.59, pedigree (1,1,5,1,1)
  (same comment as for Copper, ion)
- Nickel, ion [water, surface water]: 1.1484e-6 kg; lognormal variance with pedigree 1.33, pedigree (1,1,5,1,1)
  (same comment as for COD, Chemical Oxygen Demand)
- COD, Chemical Oxygen Demand [water, ground-, long-term]: 0.0056345 kg; lognormal variance with pedigree 0.59, pedigree (1,1,5,1,1)
  (same comment as for Copper, ion)
- Calcium, ion [water, surface water]: 1.7348e-6 kg; lognormal variance with pedigree 1.29, pedigree (1,1,5,1,1)
  (same comment as for COD, Chemical Oxygen Demand)
- Nickel, ion [water, ground-, long-term]: 0.00068787 kg; lognormal variance with pedigree 0.87, pedigree (1,1,5,1,1)
  (same comment as for Copper, ion)
- Silicon [water, surface water]: 0.00036908 kg; lognormal variance with pedigree 0.67, pedigree (1,1,5,1,1)
  (same comment as for COD, Chemical Oxygen Demand)
- Iron, ion [water, surface water]: 3.2214e-6 kg; lognormal variance with pedigree 1.35, pedigree (1,1,5,1,1)
  (same comment as for COD, Chemical Oxygen Demand)
- Cobalt [water, surface water]: 3.1871e-7 kg; lognormal variance with pedigree 1.5, pedigree (1,1,5,1,1)
  (same comment as for COD, Chemical Oxygen Demand)
- DOC, Dissolved Organic Carbon [water, ground-, long-term]: 0.0022296 kg; lognormal variance with pedigree 0.59, pedigree (1,1,5,1,1)
  (same comment as for Copper, ion)
- Cobalt [water, ground-, long-term]: 0.00019091 kg; lognormal variance with pedigree 1.46, pedigree (1,1,5,1,1)
  (same comment as for Copper, ion)
- DOC, Dissolved Organic Carbon [water, surface water]: 3.7222e-6 kg; lognormal variance with pedigree 1.18, pedigree (1,1,5,1,1)
  (same comment as for COD, Chemical Oxygen Demand)
- Copper, ion [water, surface water]: 5.1412e-8 kg; lognormal variance with pedigree 1.74, pedigree (1,1,5,1,1)
  (same comment as for COD, Chemical Oxygen Demand)
- TOC, Total Organic Carbon [water, surface water]: 3.7222e-6 kg; lognormal variance with pedigree 1.18, pedigree (1,1,5,1,1)
  (same comment as for COD, Chemical Oxygen Demand)

## Sampling procedure
Landfill model based on observed leachate concentrations in literature. Extrapolated to 60'000 years heeding chemical characteristics. Initial waste composition from various literature sources.

## Extrapolations
This dataset has been extrapolated from year 2000 to the year of the calculation (2021). The uncertainty has been adjusted accordingly.

## Review by Niels Jungbluth 2009-02-15
passed.
