# natural gas production, medium pressure, vehicle grade

Dataset: EcoSpold 2, unit process
Geography: CH
Time period: 2001-01-01 to 2021-12-31
Technology level: current
Classification: ISIC rev.4 ecoinvent: 3520:Manufacture of gas; distribution of gaseous fuels through mains
Classification: EcoSpold01Categories: natural gas/fuels
Tags: ConvertedDataset
Scenario: Business-as-Usual
System model: Allocation, cut-off by classification
Share of production covered: 0 %
Generated by: Mireille Faist Emmenegger (obsolete)
Published in: Jungbluth N. 2007
Database: ecoinvent
isCopyrightProtected: true
accessRestrictedTo: 1

## General comment
This data set includes electricity requirements of a service station as well as emissions from losses. The initial pressure of gas is from the medium pressure network (0.1-1 bar). VOC emissions are calculated from gas losses and composition of Swiss natural gas.
[This dataset was already contained in the ecoinvent database version 2. It was not individually updated during the transfer to ecoinvent version 3. Life Cycle Impact Assessment results may still have changed, as they are affected by changes in the supply chain, i.e. in other datasets. This dataset was generated following the ecoinvent quality guidelines for version 2. It may have been subject to central changes described in the ecoinvent version 3 change report (http://www.ecoinvent.org/database/ecoinvent-version-3/reports-of-changes/), and the results of the central updates were reviewed extensively. The changes added e.g. consistent water flows and other information throughout the database. The documentation of this dataset can be found in the ecoinvent reports of version 2, which are still available via the ecoinvent website. The change report linked above covers all central changes that were made during the conversion process.]

## Included activities end
This data set includes electricity requirements of a natural gas service station as well as emissions from losses.

## Geography
Data for Switzerland

## Technology
Service station with medium initial gas pressure (0.1-1 bar)

## Time period
personal communication

## Reference product
- natural gas, medium pressure, vehicle grade: 1 kg; By-product classification allocatable product; CPC 69120: Gas distribution through mains (on own account); CAS 14493-06-2
  production volume 0.0336675 kg
    This is a placeholder value that does not reflect real-world production volumes. This dataset does not currently require a real-world production volume to work in the database framework, and no actual data were collected yet. This has no negative effect on the results of the ecoinvent database. The placeholder value of this activity was scaled according to the nominal GDP of 2005 (source: United Nations, http://data.un.org/Glossary.aspx?q=GDP+%28current+US%24%29, accessed 20130726) to reflect an appropriate share of the global production volume, which is also a placeholder value.
  property carbon content, fossil 0.695187
    C content considered the same as in high pressure (consumption mix)
  property heating value, net 46.5 MJ
    Literature value, Source: United Nations Statistics Division (2018) International Recommendations for Energy Statistics (IRES). Available at: http://unstats.un.org/unsd/statcom/doc11/BG-IRES.pdf.
  property price 0.205 EUR2005
    Calculated value based on data from United Nations Commodity Trade Statistics Database (comtrade.un.org). UN comtrade category: 271121 Natural gas in gasesoues state. Year 2005. Using exchange rate of 1EURO = 1.209 USD. Average of price of import into 4 main markets (EU, US, JP, and CN).
  property carbon content 0.695187
    carbon content on a dry matter basis (reserved; not for manual entry)
  properties: dry mass 1 kg, water in wet mass 0 kg, wet mass 1 kg, water content 0, carbon content, non-fossil 0, carbon allocation 0.695187 kg

## Inputs from technosphere
- natural gas service station: 8.4821e-8 unit; lognormal variance with pedigree 0.3526, pedigree (2,4,5,1,1)
  Expert data for one service station
  This exchange has an activity link directly to the producing activity because the product is primarily consumed in the same geographical area where it is produced.
- electricity, medium voltage: 0.361 kWh; lognormal variance with pedigree 0.0401, pedigree (1,2,5,1,1)
  Model from industry expert
  Model from industry expert
- natural gas, high pressure: 1.22821 m3; lognormal variance with pedigree 0.0401, pedigree (1,2,5,1,1)
  Estimation from industry expert
  Estimation from industry expert
  properties: heating value, gross 39 MJ, wet mass 0.84 kg, carbon content, fossil 0.602381, dry mass 0.84 kg, heating value, net 39 MJ
  note on carbon content, fossil: An average C content of 0.506 kg C/ m3 has been assumed (this average has been calculated using data in Tab 3.5, ecoinvent v2.2 report 6_V
  note on heating value, net: Literature value, Source: United Nations Statistics Division (2018) International Recommendations for Energy Statistics (IRES). Available at: http://unstats.un.org/unsd/statcom/doc11/BG-IRES.pdf.

## Emissions to nature
All rows: lognormal variance with pedigree 0.1712, pedigree (2,3,5,1,1)
- Ethane [air, urban air close to ground]: 8.552e-6 kg
  Data from industry expert
- Propane [air, urban air close to ground]: 3.2616e-6 kg
  Data from industry expert
- Butane [air, urban air close to ground]: 1.4801e-6 kg
  Data from industry expert
- Carbon dioxide, fossil [air, urban air close to ground]: 2.8147e-6 kg
  Data from industry expert
- Methane, fossil [air, urban air close to ground]: 0.00017652 kg
  Data from industry expert
- NMVOC, non-methane volatile organic compounds, unspecified origin [air, urban air close to ground]: 8.1694e-7 kg
  Data from industry expert

## Extrapolations
This dataset has been extrapolated from year 2001 to the year of the calculation (2021). The uncertainty has been adjusted accordingly.

## Review by Arnaud Dauriat 2005-08-04
Passed.
