# tetrafluoroethane production

Dataset: EcoSpold 2, unit process
Geography: GLO
Time period: 1994-01-01 to 2021-12-31
Technology level: current
Classification: ISIC rev.4 ecoinvent: 2011:Manufacture of basic chemicals
Classification: EcoSpold01Categories: chemicals/inorganics
Synonyms: 1,1,1,2-tetrafluoroethane; 1,1,1,2-tetrafluoro-; freon 134a; refrigerant gas r-134a; halocarbon 134a; hfc-134a; difluoro-1-chloroethane; ethane; ethane,1-chloro-1,1-difluoro; 1,2,2,2-tetrafluoroethane; hcfc-134a
Scenario: Business-as-Usual
System model: Allocation, cut-off by classification
Generated by: Sofia Parada Tur
Published in: Ohno, H. 1994
Database: ecoinvent
isCopyrightProtected: true
accessRestrictedTo: 1

## General comment
Production of tetrafluoroethane in a two-step reaction by means of the fluorination of trichloroethylene with hydrofluoric acid. The reaction yield is assumed to be 95% due to lack of specific reaction data. Infrastructure, energy and cooling water inputs are estimated due to lack of data. The system includes the process with consumption of raw materials, energy and infrastructure. Since the emissions are of chemicals of some toxicity, and due to lack of process data, they are assumed to be recycled internally and have been not considered in the emissions.

## Included activities start
From the reception of trichloroethylene and hydrofluoric acid at the factory gate.

## Included activities end
This activity ends with the production of 1,1,1,2-tetrafluoroethane including materials, energy uses, infrastructure and emissions.

## Geography
the chemical reaction is valid in the global context

## Technology
First trichloroethylene reacts with hydrofluoric acid producing 1,1,1-trifluoro-2-chloroethane and hydrogen chloride. In the second step, 1,1,1-trifluoro-2-chloroethane reacts with hydrofluoric acid to produce tetrafluoroethane and hydrogen chloride. The reactions are the following: (1) C2HCl3 + 3HF = C2H2ClF3 + 2HCl (2) C2H2ClF3 + HF = CCH2FCF3 + HCl The products are recoverd with a distillation column and additional purification step to recover the 1,1,1,2-tetrafluoroethane fraction. The non-reacted reactants are recovered and recycled.

## Time period
Year of publication of patent

## Parameters
- fraction, cooling water, cooling pond system, to air: 0.032 dimensionless; name fraction_CW_CP_to_air; lognormal variance with pedigree 0.0413, pedigree (2,3,1,3,1)
  Calculated based on literature value (Scown, C.D., 2011, Water Footprint of U.S. Transportation Fuels and supplying information of the article) (Vionnet, S., Quantis Water Database - Technical Report, 2012).
- fraction, cooling water, recirculating system, to air: 0.771 dimensionless; name fraction_CW_R_to_air; lognormal variance with pedigree 0.0413, pedigree (2,3,1,3,1)
  (same comment as for fraction, cooling water, cooling pond system, to air)
- fraction, cooling water, to air: 0.3875 dimensionless; name fraction_CW_to_air; = (0.5*fraction_CW_OT_to_air)+(0.5*fraction_CW_R_to_air); lognormal variance with pedigree 0.092025, pedigree (4,4,3,2,4)
  Calculated value based on literature value (see comments of the other parametres present in this dataset) and expert opinion. In the case when no industry/literature data are available about the type of cooling or directly fraction, cooling water, to air specific for the process a default assumption is applied. It is assumed that the once-through cooling system is used in 50% of all cases and recirculating system is used in another 50% of all cases.
- fraction, cooling water, once-through system, to air: 0.004 dimensionless; name fraction_CW_OT_to_air; lognormal variance with pedigree 0.0413, pedigree (2,3,1,3,1)
  (same comment as for fraction, cooling water, cooling pond system, to air)

## Reference product
- tetrafluoroethane: 0 kg; name tetrafluoroethane_output; By-product classification allocatable product; CPC 34110: Hydrocarbons and their halogenated, sulphonated, nitrated or nitrosated derivatives; CAS 811-97-2
  production volume 169999 kg; name tetrafluoroethane_PV
    The production volume was obtained from AFEAS, for the reference year 2005.
  property price 7.38 EUR2005; name tetrafluoroethane_output_price_EUR2005
    Estimation. Average 2005 prices for EU27, USA, China, Japan and India from Import/Export data (US$ and tonnes) in UN Commodity Trade Statistics Database; Commodity: polytetrafluoroethylene in primary forms
  property molecular weight 102 g/mol; name tetrafluoroethane_output_MW
  property heating value, net 9.51 MJ
    LHV is calculated based on the elemental composition of the substance. Based on the CAS number of the substance (029759-38-4 ), which is found manually, the chemical formula of the substance is found to be: C2H2F4, (PubChem 2020).
    Reference: Kim, S., Chen, J., Cheng, T., Gindulyte, A., He, J., He, S., Li, Q., Shoemaker, B. A., Thiessen, P. A., Yu, B., Zaslavsky, L., Zhang, J., & Bolton, E. E. (2019). PubChem 2019 update: improved access to chemical data. Nucleic acids research, 47(D1), D1102–D1109. https://doi.org/10.1093/nar/gky1033
  property carbon content 0.23622
    carbon content on a dry matter basis (reserved; not for manual entry)
  property true value 7.38; name tetrafluoroethane_output_true_value
    allocation property applied in "true value" allocation // value calculated from revenue
  properties: water content 0, carbon content, non-fossil 0, dry mass 1 kg, carbon content, fossil 0.23622, water in wet mass 0 kg, wet mass 1 kg, carbon allocation 0.23622 kg
- hydrochloric acid, without water, in 30% solution state: 1 kg; name HCl_output; = (1/118.15*2* HCl_output_MW)+(1/102* HCl_output_MW); By-product classification allocatable product; CPC 34: Basic chemicals; CAS 7647-01-0; pedigree (1,1,1,1,1)
  based on stoichiometric reaction and molar weight. HCl is produced in both reaction steps (1) and (2). The total HCl is calculated based on the reaction yield for the intermediary output 1,1,1-trifluoro-2-chloroethane in the step 1 and the yield of tetrafluoroethane in the step 2.
  Note: molecular weight of 1,1,1-trifluoro-2-chloroethane is 118.15 g/mol
  production volume 165641 kg; = tetrafluoroethane_PV* HCl_output
    Calculated from production volume of reference product using the relative outputs.
  property molecular weight 36.45 g/mol; name HCl_output_MW
  property heating value, net 3.32 MJ
    LHV is calculated based on the elemental composition of the substance. Based on the CAS number of the substance (007647-01-0), the chemical formula of the substance is found to be: HCl, (PubChem 2020).
    Reference: Kim, S., Chen, J., Cheng, T., Gindulyte, A., He, J., He, S., Li, Q., Shoemaker, B. A., Thiessen, P. A., Yu, B., Zaslavsky, L., Zhang, J., & Bolton, E. E. (2019). PubChem 2019 update: improved access to chemical data. Nucleic acids research, 47(D1), D1102–D1109. https://doi.org/10.1093/nar/gky1033
  property price 0.127 EUR2005; name HCl_output_price_EUR2005
    Temporary price data. Calculated as 90% of purchasers price based on: 2004 Import/Export data (total trades (USD) divided by total weight (kg) in EU27, USA, China, Japan and India) from UN Commodity Trade Statistics Database (http://data.un.org/Explorer.aspxDatabase [Accessed 2 July 2010]). Commodity: Hydrogen chloride (hydrochloric acid).
  property carbon content 0
    carbon content on a dry matter basis (reserved; not for manual entry)
  property true value 0.123744; name HCl_output_true_value
    allocation property applied in "true value" allocation // value calculated from revenue
  properties: water content 0, carbon content, fossil 0, dry mass 1 kg, wet mass 1 kg, water in wet mass 0 kg, carbon content, non-fossil 0, carbon allocation 0 kg

## Inputs from technosphere
- trichloroethylene: 0.0241771 kg; name trichloroethylene_input; = (1/ 102*118.15*(1/0.95))/118.15* trichloroethylene_input_MW*(1/0.95); lognormal variance with pedigree 0.0518, pedigree (2,5,5,5,2)
  Based on stoichiometric reaction and molar weights.
  property molecular weight 131.5 g/mol; name trichloroethylene_input_MW
  properties: carbon content, fossil 0.184615, dry mass 1 kg, wet mass 1 kg, heating value, net 6.46 MJ
- electricity, medium voltage: 0.00563599 kWh; = 0.333* tetrafluoroethane_output; source Gendorf 2000; lognormal variance with pedigree 0.1706, pedigree (4,4,5,1,5)
  values for electricity and heat have been approximated with data from a large chemical site in Germany producing 2.05Mt/y (intermediates included) of different chemicals. This plant uses 3.2MJ per kg of product. All energy needed for heat or steam is assumed to be natural gas. Of the total energy input, it is assumed 2 MJ/kg as heat and 1.2 MJ/kg as electricity.
  Uncertainty: Chauvel 1989
- chemical factory, organics: 6.76995e-12 unit; = 4E-10* tetrafluoroethane_output; source Gendorf 2000; lognormal variance with pedigree 0.0833, pedigree (2,4,5,3,4)
  The value is approximated from the chemical plant sites in Gendorf (Germany) and from the BASF site of Ludwigshafen (Germany). On the Gendorf site 12 companies produce 1500 different end products with a total amount 1.25 Mt each year and in the BASF site 9.1 Mt per year. The production in both sites cover many different (mainly organic) chemical processes. The plant lifetime is considered 50 years and the production capacity 50,000 tones per year.
- hydrogen fluoride: 0 kg; name HF_input; pedigree (1,1,1,1,1)
  based on stoichiometric reaction and molar weights. HF is used in both reaction steps (1) and (2). The total HF use is calculated based on the reaction yield for the intermediary output 1,1,1-trifluoro-2-chloroethane in the step 1 and the yield of tetrafluoroethane in the step 2.
  Note: molecular weight of 1,1,1-trifluoro-2-chloroethane is 118.15 g/mol
  property molecular weight 19.9 g/mol; name HF_input_MW
  properties: heating value, net 6.06 MJ, dry mass 1 kg, wet mass 1 kg
- heat, district or industrial, natural gas: 0.0338498 MJ; = 2* tetrafluoroethane_output; source Gendorf 2000; lognormal variance with pedigree 0.0819, pedigree (2,3,5,3,4)
  values for electricity and heat have been approximated with data from a large chemical site in Germany producing 2.05Mt/y (intermediates included) of different chemicals. This plant uses 3.2MJ per kg of product. All energy needed for heat or steam is assumed to be natural gas. Of the total energy input, it is assumed 2 MJ/kg as heat and 1.2 MJ/kg as electricity.
  properties: heating value, net 1 MJ
- hydrogen fluoride: 0.003172, 0.00930587 kg (2 entries); lognormal variance with pedigree 0.0518, pedigree (2,5,5,5,2)
  (same comment as for hydrogen fluoride)
  properties: heating value, net 6.06 MJ, dry mass 1 kg, wet mass 1 kg, molecular weight 19.9 g/mol

## Inputs from nature
- Water, cooling, unspecified natural origin [natural resource, in water]: 0.000406197 m3; name water_cooling_UNO_input; = 0.024* tetrafluoroethane_output; source Gendorf 2000; lognormal variance with pedigree 0.1706, pedigree (4,4,5,1,5)
  The value is approximated with data from a large chemical plant site in Germany producing 2.05 Mt/y (intermediates included) of different chemicals. In this plant in total an average 24 kg water per kg of product are used.
  Uncertainty: Chauvel 1989

## Emissions to nature
- Water [air, unspecified]: 0.000157401 m3; name water_to_air_unspecified; = water_cooling_UNO_input*fraction_CW_to_air; lognormal variance with pedigree 0.130025, pedigree (4,4,5,2,4)
  Calculated value based on literature values and expert opinion. See comments in the parametres' comment field.
  property fraction, origin: salt water 0; name fraction_origin_salt_water
  property fraction, origin: unspecified 1; name fraction_origin_unspecified
  property fraction, origin: fresh water 0; name fraction_origin_fresh_water
- Water [water, unspecified]: 0.000248796 m3; name water_to_water_unspecified; = water_cooling_UNO_input*(1-fraction_CW_to_air); lognormal variance with pedigree 0.130025, pedigree (4,4,5,2,4)
  (same comment as for Water)
  property fraction, origin: salt water 0; name fraction_origin_salt_water_Ww
  property fraction, origin: fresh water 0; name fraction_origin_fresh_water_Ww
  property fraction, origin: unspecified 1; name fraction_origin_unspecified_Ww

## Sampling procedure
This dataset is an estimation based on literature data and basic principles of chemical engineering.

## Review by Bo Weidema 2012-02-29
This dataset has been reviewed by two editors: Eric Johnson and Bo Weidema.

## Review by Bo Weidema 2012-02-29
Passed
Reviewed for relevance of dataset structure, exchanges and quality of documentation and readability
