# printed wiring board production, through-hole mounted, unspecified, Pb free

Dataset: EcoSpold 2, unit process
Geography: GLO
Time period: 2005-01-01 to 2021-12-31
Technology level: current
Classification: ISIC rev.4 ecoinvent: 2610:Manufacture of electronic components and boards
Classification: EcoSpold01Categories: electronics/module
Tags: ConvertedDataset
Scenario: Business-as-Usual
System model: Allocation, cut-off by classification
Generated by: Roland Hischier
Published in: Hischier R. 2007
Database: ecoinvent
isCopyrightProtected: true
accessRestrictedTo: 1

## General comment
This dataset represents 1 kg of an unspecified, through-hole mounted, PWB used in electronic devices. Main data are based on literature and own dismantling activities, for the PWB of a television and of a power supply unit of a Intel PII desktop PC . Infrastructure and production efforts are based on own assumptions.
[This dataset was already contained in the ecoinvent database version 2. It was not individually updated during the transfer to ecoinvent version 3. Life Cycle Impact Assessment results may still have changed, as they are affected by changes in the supply chain, i.e. in other datasets. This dataset was generated following the ecoinvent quality guidelines for version 2. It may have been subject to central changes described in the ecoinvent version 3 change report (http://www.ecoinvent.org/database/ecoinvent-version-3/reports-of-changes/), and the results of the central updates were reviewed extensively. The changes added e.g. consistent water flows and other information throughout the database. The documentation of this dataset can be found in the ecoinvent reports of version 2, which are still available via the ecoinvent website. The change report linked above covers all central changes that were made during the conversion process.]

## Included activities start
From reception of solder materials at the factory gate.

## Included activities end
This dataset includes component input and production efforts (incl. PWB waste due to failure in mounting) for the production of an unspecified, through-hole mounted, PWB, using Pb-free solder material.

## Geography
Data represent a global valuable example for a unspecified, through-hole mounted, PWB.

## Technology
Average PWB mounting technology (wave soldering)

## Reference product
- printed wiring board, through-hole mounted, unspecified, Pb free: 1 kg; CPC 47130: Printed circuits; By-product classification allocatable product
  EcoSpold01Location=GLO
  Typically, a printed wiring board (PWB) consists of a number of electric current conducting and non-conducting layers which are sandwiched together. Printed wiring boards are the interconnective electrical framework and physical structure that hold together the various electronic components.
  production volume 1 kg
    Dummy value to be replaced by measured, estimated or calculated value
  property carbon content, non-fossil 0.00192028
    C content was calculated as the addition of C content in the PWB components
  property carbon content, fossil 0.255344
    C content was calculated as the addition of C content in the PWB components
  property price 44.0161 EUR2005
    Calculated based on inputs: The price of the product has been calculated as a sum of the values of the material and energy inputs for this product. This value is therefore a rough estimation. It may underestimate the real price since there are additional expenses when producing any product. These expences can include for example labour costs, treatment of waste materials and profit for the producer. Please consider carefully whether this level of data quality is acceptable for your application.
  property carbon content 0.257264
    carbon content on a dry matter basis (reserved; not for manual entry)
  properties: water content 0, water in wet mass 0 kg, wet mass 1 kg, dry mass 1 kg, carbon allocation 0.257264 kg

## Inputs from technosphere
- capacitor, film type, for through-hole mounting: 0.076429 kg; source Behrendt S 1998; lognormal variance with pedigree 0.0701, pedigree (3,5,5,3,1)
  EcoSpold01Location=GLO
  Estimation, based on literature and own dismantling activities.
  Uncertainty: own assumptions - from literature & dismantling
  properties: dry mass 1 kg, carbon content, fossil 0.278876, wet mass 1 kg
  note on carbon content, fossil: Calculated as the addition of C contents in the product composition, and referred to 1 kg capacitors, and then to 1 kg DM
- transistor, wired, small size, through-hole mounting: 0.00089592 kg; source Behrendt S 1998; lognormal variance with pedigree 0.0701, pedigree (3,5,5,3,1)
  Estimation, based on literature and own dismantling activities.
  EcoSpold01Location=GLO
  Uncertainty: own assumptions - from literature & dismantling
  properties: dry mass 1 kg, wet mass 1 kg, carbon content, fossil 0.080338
  note on carbon content, fossil: Calculated as the addition of C contents in the product composition, and referred to 1 kg DM transistor.
- capacitor, electrolyte type, < 2cm height: 0.021837 kg; source Behrendt S 1998; lognormal variance with pedigree 0.0701, pedigree (3,5,5,3,1)
  (same comment as for capacitor, film type, for through-hole mounting)
  properties: carbon content, fossil 0.189636, carbon content, non-fossil 0.0222053, wet mass 1 kg, dry mass 1 kg
- diode, glass-, for through-hole mounting: 0.0060816 kg; source Behrendt S 1998; lognormal variance with pedigree 0.0701, pedigree (3,5,5,3,1)
  (same comment as for transistor, wired, small size, through-hole mounting)
  properties: dry mass 1 kg, wet mass 1 kg, carbon content, fossil 0.0203273
  note on carbon content, fossil: Calculated as the addition of C contents in the product composition
- used printed wiring boards: -0.020408 kg; lognormal variance with pedigree 0.0527, pedigree (3,3,5,3,1)
  Estimation, based on a European PWB mounting company.
  EcoSpold01Location=GLO
  Uncertainty: data from literature plus own assumptions
  production volume 0.020408 kg
    Calculated from the production volume of printed wiring board, through-hole mounted, unspecified, Pb free in proportion to the respective output amounts.
  properties: carbon content, non-fossil 0.000960142, wet mass 1 kg, dry mass 1 kg, carbon content, fossil 0.193742
  note on carbon content, non-fossil: Composition of printed wiring boards used to calculate C content
- transformer, low voltage use: 0.030714 kg; source Behrendt S 1998; lognormal variance with pedigree 0.0701, pedigree (3,5,5,3,1)
  (same comment as for capacitor, film type, for through-hole mounting)
  properties: carbon content, fossil 0.11936, wet mass 1 kg, dry mass 1 kg
- printed wiring board, for through-hole mounting, Pb free surface: 0.058367 m2; source Behrendt S 1998; lognormal variance with pedigree 0.0701, pedigree (3,5,5,3,1)
  (same comment as for capacitor, film type, for through-hole mounting)
  properties: dry mass 3.08 kg, carbon content, fossil 0.210221, wet mass 3.08 kg
  note on carbon content, fossil: C content was calculated as the addition of C content in the PWB components, and then referred to 1 kg DM
- capacitor, electrolyte type, > 2cm height: 0.036939 kg; source Behrendt S 1998; lognormal variance with pedigree 0.0701, pedigree (3,5,5,3,1)
  (same comment as for transistor, wired, small size, through-hole mounting)
  properties: carbon content, fossil 0.16971, carbon content, non-fossil 0.0349727, dry mass 1 kg, wet mass 1 kg
- resistor, metal film type, through-hole mounting: 0.02051 kg; source Behrendt S 1998; lognormal variance with pedigree 0.0701, pedigree (3,5,5,3,1)
  (same comment as for transistor, wired, small size, through-hole mounting)
  properties: carbon content, fossil 0.029003, wet mass 1 kg, dry mass 1 kg
  note on carbon content, fossil: Calculated as the addition of C contents in the product composition, and referred to 1 kg DM resistor.
- capacitor, tantalum-, for through-hole mounting: 0.012551 kg; lognormal variance with pedigree 0.0701, pedigree (3,5,5,3,1)
  Estimation, based on literature and own dismantling activities.
  This flow replaces the old capacitor, production mix
  Uncertainty: own assumptions - from literature & dismantling
  property water content 0; name water_content
  property carbon content, non-fossil 0; name C_content_non_fossil
  property water in wet mass 0 kg; name WWM
  property carbon content, fossil 0.181224; name C_content_fossil
  properties: wet mass 1 kg, dry mass 1 kg
- integrated circuit, logic type: 0.017959 kg; source Behrendt S 1998; lognormal variance with pedigree 0.0701, pedigree (3,5,5,3,1)
  (same comment as for transistor, wired, small size, through-hole mounting)
  properties: wet mass 1 kg, dry mass 1 kg, carbon content, fossil 0.221701
- mounting, through-hole technology, Pb-free solder: 0.058367 m2; source Behrendt S 1998; lognormal variance with pedigree 0.0701, pedigree (3,5,5,3,1)
  (same comment as for capacitor, film type, for through-hole mounting)
- transformer, high voltage use: 0.096735 kg; source Behrendt S 1998; lognormal variance with pedigree 0.0701, pedigree (3,5,5,3,1)
  (same comment as for capacitor, film type, for through-hole mounting)
  properties: dry mass 1 kg, carbon content, fossil 0.262798, wet mass 1 kg
- section bar extrusion, aluminium: 0.16 kg; source Behrendt S 1998; lognormal variance with pedigree 0.0701, pedigree (3,5,5,3,1)
  EcoSpold01Location=RER
  Estimation, based on literature and own dismantling activities.
  Uncertainty: own assumptions - from literature & dismantling
- inductor, ring core choke type: 0.33061 kg; source Behrendt S 1998; lognormal variance with pedigree 0.0701, pedigree (3,5,5,3,1)
  (same comment as for transistor, wired, small size, through-hole mounting)
  properties: dry mass 1 kg, wet mass 1 kg, carbon content, fossil 0.445934
  note on carbon content, fossil: Calculated as the addition of C contents in the product composition, and referred to 1 kg DM inductor
- aluminium, wrought alloy: 0.16 kg; source Behrendt S 1998; lognormal variance with pedigree 0.0701, pedigree (3,5,5,3,1)
  Estimation, based on literature and own dismantling activities.
  EcoSpold01Location=RER
  Uncertainty: own assumptions - from literature & dismantling
  properties: dry mass 1 kg, wet mass 1 kg
- transistor, wired, big size, through-hole mounting: 0.026224 kg; source Behrendt S 1998; lognormal variance with pedigree 0.0701, pedigree (3,5,5,3,1)
  (same comment as for capacitor, film type, for through-hole mounting)
  properties: carbon content, fossil 0.0946006, wet mass 1 kg, dry mass 1 kg

## Sampling procedure
literature & own estimations

## Extrapolations
This dataset has been extrapolated from year 2005 to the year of the calculation (2021). The uncertainty has been adjusted accordingly.

## Review by Rolf Frischknecht 2007-09-21
passed.

## Review by Bo Weidema 2012-09-10
changed inputs of production mixes to specified inputs
