# treatment of used refrigerant R-600a, final disposal

Dataset: EcoSpold 2, unit process
Geography: GLO
Time period: 2010-01-01 to 2021-12-31
Technology level: current
Classification: ISIC rev.4 ecoinvent: 3822:Treatment and disposal of hazardous waste
Scenario: Business-as-Usual
System model: Allocation, cut-off by classification
Generated by: Avraam Symeonidis
Database: ecoinvent
isCopyrightProtected: true
accessRestrictedTo: 1

## General comment
This dataset represents treatment of used refrigerant R-600a by final disposal (incineration). Since specific treatment of R-600a refrigerant by incineration is not yet available in the database a proxy - treatment of average hazardous waste by incineration - is used.
The refrigerant R134a is widely used refrigerant (mainly in automobile air conditioning systems and othere refrigeration and cooling technologies). It can be treated by primary two different technologies; 1) venting and 2) final disposal.
Since the R134a causes global warming venting as a way of treatment is forbidden in some countries. For example in the US (US EPA, http://www.epa.gov/ozone/title6/608/faq.html, accessed 20141105).

## Included activities start
The activity starts, when the used refrigerant is accepted for treatment.

## Included activities end
There are no data on the amount of energy needed during this process.

## Technology
Final disposal of R-600a refers to the destruction of used refrigerant R-600a.

## Reference product
- used refrigerant R-600a: -1 kg; name used_refrigerant; By-product classification Waste; CPC 39990: Other wastes n.e.c.; CAS 75-28-5
  production volume 1.965e8 kg; name used_refrigerant_PV; = 0.3*0.5*1.31E+9
    Calculated based on literature and estimates.
    The amount of R-600a that isproduced annually is rather unknown. However, it is estimated that 1.31E+9 kg is the amount of refrigerant R-600a that is treated from used refrigerators. The amount derives after scaling the production volume of R-134a (3.4E+8 kg) with the relative presence of R-600a in an average refrigerator (An average refrigerator contains 7% R-134a, 27% R-600a and 66% R-12).
    It is estimated, that 70% of the refrigerant is vented already during the use phase. Estimated based on the information published by IPCC (http://www.ghgprotocol.org/files/ghgp/tools/hfc-pfc.xls, accessed 20150723).
    The shares of the three different technologies are estimated to be as follows;
    0.5 venting
    0.5 final disposal
  property price 0 EUR2005; name used_refrigerant_price_EUR2005
    Waste products are assigned a price of zero as they are assumed to require further treatment.
  property heating value, net 45.89 MJ
    LHV is calculated based on the elemental composition of the substance. Based on the name of the substance, the chemical formula of the substance is manually found to be: C6H15N.
  property carbon content 0.826588
    carbon content on a dry matter basis (reserved; not for manual entry)
  properties: carbon content, non-fossil 0, dry mass 1 kg, carbon content, fossil 0.826588, water in wet mass 0 kg, wet mass 1 kg, water content 0, carbon allocation 0.826588 kg

## Inputs from technosphere
- hazardous waste, for incineration: 0 kg; name waste_haz; pedigree (1,1,1,1,1)
  Calculated value.
  This exchange (average hazardous waste incineration) is a proxy to the specific incineration of the R-600a. When an incineration of R-12 is available in the database this product can be replaced by it.
  production volume 0 kg
    Calculated from production volume of reference product using the relative outputs.
  property price 0 EUR2005; name waste_haz_price_EUR2005
  properties: heating value, net 17 MJ, wet mass 1 kg, carbon content, fossil 0.554667, water content 0.333333, dry mass 0.75 kg
  note on heating value, net: Value taken from the general comment of the treatment dataset.
  note on carbon content, fossil: Tab A.6, ecoinvent v2.2 report 13_I. C content has been calculated after data in the tables, and then referred to 1 kg DM
- hazardous waste, for incineration: -0.321678, -0.00840847, -0.668914 kg (3 entries); lognormal variance with pedigree 0.0186, pedigree (4,5,3,1,1)
  (same comment as for hazardous waste, for incineration)
  production volume 1.96304e8 kg

## Emissions to nature
- Isobutane [air, urban air close to ground]: 0.001 kg; name refrigerant_to_air; = ABS(used_refrigerant)*0.001; lognormal variance with pedigree 0.042, pedigree (1,1,3,1,1)
  Estimated value. It is estimated, that during the final disposal 0.1% of the refrigerant is emitted to air.

## Extrapolations
This dataset has been extrapolated from year 2014 to the year of the calculation (2021). The uncertainty has been adjusted accordingly.

## Review by Gabor Doka 2018-04-04
Passed.
