# sugarcane processing, traditional autonomous plant

Dataset: EcoSpold 2, unit process
Geography: BR
Time period: 2012-01-01 to 2021-12-31
Technology level: current
Classification: ISIC rev.4 ecoinvent: 2011:Manufacture of basic chemicals
Synonyms: sugarcane biorefinery
Scenario: Business-as-Usual
System model: Allocation, cut-off by classification
Share of production covered: 100 %
Generated by: Mateus Chagas
Published in: Mateus F. Chagas 2015
Database: ecoinvent
isCopyrightProtected: true
accessRestrictedTo: 1

## General comment
This dataset represents a typical Brazilian sugarcane mill processing of 2 million metric tonnes kg of sugarcane stalks per year for the production of ethanol (anhydrous and hydrated) and surplus bagasse. The plant operates 200 days per season.
The industrial process diverts all sugarcane juice to ethanol production process. It considers high-pressure boilers (22 bar, 300°C), mechanical drives in the crushing mills and azeotropic distillation for anhydrous ethanol production.
Overall process efficiencies assumed were 96% for sugars extraction, 90% for ethanol fermentation and 76.5% for sugar recovery as raw sugar. Each 1000 kg of cane stalks yields 51,3 L of hydrated ethanol (93% w/w), 36.5 L of anhydrous ethanol (99.6% w/w); 4.1 kWh of surplus electricity; and 91.6 kg of surplus bagasse (50% moisture).

## Included activities start
This activity starts when sugarcane arrives at the industrial area.

## Included activities end
The dataset includes the sugarcane conversion into ethanol and surplus bagasse. Processing equipment, chemical inputs, industrial area, water use treatment, and emissions to air are included in the inventory. Sugarcane processed arrives with 5% of vegetal impurities (sugarcane straw) and 1% of mineral impurities (dirt). The dataset doesn't include the surplus electricity production in traditional mills. No additional sugarcane straw recovery and industrial use is considered.
The activity ends when products are available at factory gate.

## Geography
The inventory is modeled for Brazil.

## Technology
This dataset represents an typical medium-scale autonomous sugarcane mill facilitiy existing in Brazil.

## Time period
Time period where the technology is being implemented and used in Brazil.

## Reference product
- ethanol, without water, in 95% solution state, from fermentation: 0 kg; source Mateus F. Chagas 2015; CPC 35491: Biodiesel; By-product classification allocatable product; CAS 64-17-5
  Hydrated ethanol produced in traditional autonomous plants in Brazil.
  production volume 1.69807e9 kg
    Hydrated ethanol produced in traditional autonomous plants, based on total Brazilian production.
    It was considered the percentege of sugarcane crushed in autonomous mills related to total sugarcane crushed in annexed and autonomous plants (26.2%), based on CONAB (2017) data.
    The participation of traditional plants in the Brazilian sugarcane sector was estimated based on surplus electricity commercialization.Traditional plants were classified considering the plants without electricity commercialization or comercializing less than the national average (27.5 kWh per metric tonne of sugarcane in 2014). No surplus electricity was considered in this case.
  property heating value, net 31.58 MJ
    LHV is calculated based on the elemental composition of the substance. Based on the CAS number of the substance (000064-17-5), the chemical formula of the substance is found to be: C2H6O, (PubChem 2020).
    Reference: Kim, S., Chen, J., Cheng, T., Gindulyte, A., He, J., He, S., Li, Q., Shoemaker, B. A., Thiessen, P. A., Yu, B., Zaslavsky, L., Zhang, J., & Bolton, E. E. (2019). PubChem 2019 update: improved access to chemical data. Nucleic acids research, 47(D1), D1102–D1109. https://doi.org/10.1093/nar/gky1033
  property price 0.324 EUR2005
    Temporary price data. Calculated as 90% of purchasers price based on: 2005 prices from FAPRI2007, 2009. Agricultural outlook. (http://www.fapri.missouri.edu/outreach/publications/ag_outlook.asp?current_page=outreach; accessed 22/06/10). Unit conversion from US gallon to kg - 1 gallon = 3.7856 liter * 0.789 kg/liter (ethanol density) = 2.9868 kg
  property carbon content 0.521739
    carbon content on a dry matter basis (reserved; not for manual entry)
  property true value 12.3444
    allocation property applied in "true value" allocation // value calculated from revenue
  properties: wet mass 1 kg, water in wet mass 0 kg, dry mass 1 kg, carbon content, non-fossil 0.521739, carbon content, fossil 0, water content 0, carbon allocation 0.521739 kg
- ethanol, without water, in 99.7% solution state, from fermentation: 1 kg; source Mateus F. Chagas 2015; CPC 35491: Biodiesel; By-product classification allocatable product; CAS 64-17-5
  Anhydrous ethanol produced in traditional autonomous plants in Brazil.
  production volume 1.2753e9 kg
    Anhydrous ethanol produced in traditional autonomous plants, based on total Brazilian production.
    It was considered the percentege of sugarcane crushed in autonomous mills related to total sugarcane crushed in annexed and autonomous plants (26.2%), based on CONAB (2017) data.
    The participation of traditional plants in the Brazilian sugarcane sector was estimated based on surplus electricity commercialization.Traditional plants were classified considering the plants without electricity commercialization or comercializing less than the national average (27.5 kWh per metric tonne of sugarcane in 2014). No surplus electricity was considered in this case.
  property price 0.436 EUR2005
    Calculated using world prices in FAPRI2007, 2009. Agricultural outlook. The prices in 2003 and 2004 were assumed to be the same as the most recent year (2005). (http://www.fapri.missouri.edu/outreach/publications/ag_outlook.asp?current_page=outreach; accessed 22/06/10). Unit conversion from US gallon to kg - 1 gallon = 3.7856 liter * 0.789 kg/liter (ethanol density) = 2.9868 kg (from http://www.peteducation.com/category.cfm?c=0+1305 and http://en.wikipedia.org/wiki/Ethanol accessed 25/6/10).
  property heating value, net 31.58 MJ
    (same comment as for ethanol, without water, in 95% solution state, from fermentation)
  property carbon content 0.521739
    carbon content on a dry matter basis (reserved; not for manual entry)
  property true value 12.4696
    allocation property applied in "true value" allocation // value calculated from revenue
  properties: dry mass 1 kg, wet mass 1 kg, water in wet mass 0 kg, carbon content, non-fossil 0.521739, water content 0, carbon content, fossil 0, carbon allocation 0.521739 kg

## By-products
- bagasse, from sugarcane: 0 kg; source Mateus F. Chagas 2015; By-product classification allocatable product; CPC 39141: Bagasse
  Surplus bagasse generated in traditional autonomous plants in Brazil.
  production volume 4.08488e9 kg
    Bagasse produced in traditional autonomous plants.
  property price 0.01 EUR2005
    Temporary price data. Calculated as 90% of purchasers price based on: Source: ecoinvent report 17, page 380
  property carbon content 0.443
    carbon content on a dry matter basis (reserved; not for manual entry)
  property true value 0.916
    allocation property applied in "true value" allocation // value calculated from revenue
  properties: carbon content, fossil 0, water content 0.270648, water in wet mass 0.213 kg, carbon content, non-fossil 0.443, dry mass 0.787 kg, wet mass 1 kg, heating value, net 15.4 MJ, carbon allocation 0.348641 kg
- vinasse, from fermentation of sugarcane: 0 kg; source Mateus F. Chagas 2015; CPC 39149: Beet-pulp and other waste of sugar manufacture; By-product classification Recyclable; pedigree (1,1,1,1,1)
  Vinasse production (not including flegmasse). Based on computer simulation of the process validated using literature and industry data.
  production volume 0 kg
    Vinasse produced in traditional autonomous plants.
  property price 0.027 EUR2005
    Temporary price data. Calculated as 90% of purchasers price based on: Calculated relative to the price of sugar beet pulp based on the difference in dry matter content 5.54%/25%
  property carbon content 0.1288
    carbon content on a dry matter basis (reserved; not for manual entry)
  properties: dry mass 0.0554348 kg, water content 17.0392, water in wet mass 0.944565 kg, carbon content, fossil 0, carbon content, non-fossil 0.1288, wet mass 1 kg, carbon allocation 0.00714 kg
- ash, from combustion of bagasse from sugarcane: 0 kg; source Mateus F. Chagas 2015; CPC 86119: Other support services to crop production; By-product classification Recyclable; pedigree (1,1,1,1,1)
  Ash production. Based on computer simulation of the process validated using literature and industry data.
  production volume 0 kg
    Ash produced in traditional autonomous plants.
  property carbon content 0
    carbon content on a dry matter basis (reserved; not for manual entry)
  properties: carbon content, fossil 0, water in wet mass 0 kg, water content 0, carbon content, non-fossil 0, wet mass 1 kg, dry mass 1 kg, price 0 EUR2005, carbon allocation 0 kg
- filter cake, from sugarcane juice filtration: 0 kg; source Mateus F. Chagas 2015; By-product classification Recyclable; CPC 39149: Beet-pulp and other waste of sugar manufacture; pedigree (1,1,1,1,1)
  Filter cake production. Based on computer simulation of the process validated using literature and industry data. Value in wet basis (moisture content 65%).
  production volume 0 kg
    Filter cake produced in traditional autonomous plants.
  property price 0.03 EUR2005
    Estimated based on the prioce of "compost", comment: Temporary price data. Calculated as 90% of purchasers price based on: Estimation done using the following sources: <http://www.wmaa.asn.au/uploads/documents/MarkWinser_1May2007.pdf>; <http://www.swlf.ait.ac.th/UpdData/International/Composting%20and%20anaerobic%20digestion_%20comparions%20for%20Europe%20and%20Asia.pdf>; <http://www.epa.gov/osw/conserve/rrr/composting/basic.htm>, accessed 2011.06.16. This choice is made as both products end up in the same generic market and have similar characteristics.
  property carbon content 0.6514
    carbon content on a dry matter basis (reserved; not for manual entry)
  properties: carbon content, non-fossil 0.6514, water content 1.85714, dry mass 0.35 kg, wet mass 1 kg, water in wet mass 0.65 kg, carbon content, fossil 0, carbon allocation 0.22799 kg

## Inputs from technosphere
All rows: source Mateus F. Chagas 2015
- phosphane: 5.62581e-6 kg; lognormal variance with pedigree 0.0033, pedigree (2,2,3,1,1)
  Chemicals used for the water treatment in a typical Brazilian sugarcane processing plant (LDC Bioenergia, 2010). Treatment of captured water and recycled water in closed circuits (parameterized by water catchment) were considered.
  properties: wet mass 1 kg, dry mass 1 kg
- building, hall, steel construction: 6.16805e-7 m2; lognormal variance with pedigree 0.3426, pedigree (3,3,5,1,1)
  Economic investment was used to estimate the amount of equipment and infrastructure. Baseline values were taken from Macedo et al. (2004) and Macedo et al. (2008), using a scaling factor to adjust plant capacity.
- calcium chloride: 1.13702e-5 kg; lognormal variance with pedigree 0.0033, pedigree (2,2,3,1,1)
  (same comment as for phosphane)
  properties: wet mass 1 kg, dry mass 1 kg
- sugarcane: 16.9452 kg; lognormal variance with pedigree 0.0033, pedigree (2,2,3,1,1)
  Processed sugarcane. Based on computer simulation of the process validated using literature and industry data.
  properties: wet mass 1 kg, carbon content, non-fossil 0.533566, water content 2.9216, dry mass 0.255 kg
- chemical, organic: 1.02688e-6 kg; = 0.0000117+0.0000489; lognormal variance with pedigree 0.0033, pedigree (2,2,3,1,1)
  Chemicals used for the water treatment in a typical Brazilian sugarcane processing plant (LDC Bioenergia, 2010). Treatment of captured water and recycled water in closed circuits (parameterized by water catchment) were considered. The amount contains also an amount to approximate the substance of 2-bromo-2-nitropropane-1,3-diol. Amount of this substance was: 0.0000489 kg
  properties: wet mass 1 kg, carbon content, fossil 0.628, dry mass 1 kg, heating value, net 19.03 MJ
  note on carbon content, fossil: This dataset is an unweighted average of 20 organic substances (listed in Tab 88.1, ecoinvent v2.2 report 8, part II), being part of the top100 chemicals included in this database. The C-content has also been calculated as an unweighted average of the C content of the substances composing this dataset.
- phosphoric acid, industrial grade, without water, in 85% solution state: 0.00391434 kg; lognormal variance with pedigree 0.0033, pedigree (2,2,3,1,1)
  Phosphoric acid used for juice treatment. Based on computer simulation of the process validated using literature and industry data.
  properties: wet mass 1 kg, dry mass 1 kg
- paraffin: 4.84124e-5 kg; = 2.66E-03 + 1.97E-04; lognormal variance with pedigree 0.0033, pedigree (2,2,3,1,1)
  Flocculating polymer used for juice treatment and water treatment. Based on computer simulation of the process validated using literature and industry data. Treatment of captured water and recycled water in closed circuits (parameterized by water catchment) were considered.
  properties: carbon content, fossil 0.847059, dry mass 1 kg, wet mass 1 kg, heating value, net 41.5 MJ
  note on heating value, net: Indicative value. Reference: Fuels - Higher and Lower Calorific Values, available at: https://www.engineeringtoolbox.com/fuels-higher-calorific-values-d_169.html
- chemical, inorganic: 8.03202e-6 kg; lognormal variance with pedigree 0.0033, pedigree (2,2,3,1,1)
  Antibiotic for fermentation process. Based on computer simulation of the process validated using literature and industry data.
  properties: carbon content, fossil 0.003, dry mass 1 kg, wet mass 1 kg
  note on carbon content, fossil: This dataset is an unweighted average of 20 inorganic substances (listed in Tab 88.1, ecoinvent v2.2 report 8, part II), being part of the top100 chemicals included in this database. The C-content has also been calculated as an unweighted average of the C content of the substances composing this dataset.
- magnesium sulfate: 3.30431e-7 kg; lognormal variance with pedigree 0.0033, pedigree (2,2,3,1,1)
  (same comment as for phosphane)
  properties: dry mass 1 kg, wet mass 1 kg
- metal working, average for steel product manufacturing: 0.00220288 kg; lognormal variance with pedigree 0.3426, pedigree (3,3,5,1,1)
  (same comment as for building, hall, steel construction)
- sulfuric acid: 0.00889623 kg; = 4.20E-01 + 1.05E-01; lognormal variance with pedigree 0.0033, pedigree (2,2,3,1,1)
  Sulphuric acid used for yeast treatment in fermentation process and water treatment. Based on computer simulation of the process validated using literature and industry data. Treatment of captured water and recycled water in closed circuits (parameterized by water catchment) were considered.
  properties: wet mass 1 kg, dry mass 1 kg
- metal working, average for chromium steel product manufacturing: 0.000128614 kg; lognormal variance with pedigree 0.3426, pedigree (3,3,5,1,1)
  (same comment as for building, hall, steel construction)
- monoethanolamine: 3.13486e-6 kg; lognormal variance with pedigree 0.0033, pedigree (2,2,3,1,1)
  (same comment as for phosphane)
  properties: heating value, net 25.8 MJ, dry mass 1 kg, wet mass 1 kg, carbon content, fossil 0.393443
- lubricating oil: 0.000220288 kg; lognormal variance with pedigree 0.0033, pedigree (2,2,3,1,1)
  Lubrication oil for reception, preparation and milling equipments. Based on computer simulation of the process validated using literature and industry data.
  properties: dry mass 1 kg, wet mass 1 kg, carbon content, fossil 0.75, heating value, net 40.2 MJ
  note on carbon content, fossil: Lubricating oil is produced from diesel. C-content/dry mass of fats and oils considered 75%, from: ecoinvent v2.2 report, n 15a, pg 40
  note on heating value, net: Literature value, Source: IPCC 2006, 2006 IPCC Guidelines for National Greenhouse Gas Inventories, Prepared by the National Greenhouse Gas Inventories Programme, Eggleston H.S., Buendia L., Miwa K., Ngara T. and Tanabe K. (eds). Published: IGES, Japan
- dithiocarbamate-compound: 1.59115e-5 kg; lognormal variance with pedigree 0.0033, pedigree (2,2,3,1,1)
  (same comment as for phosphane)
  properties: dry mass 1 kg, carbon content, fossil 0.179339, wet mass 1 kg
- quicklime, milled, packed: 0.0107941 kg; lognormal variance with pedigree 0.0033, pedigree (2,2,3,1,1)
  Quicklime used for juice treatment. Based on computer simulation of the process validated using literature and industry data.
  properties: dry mass 0.99 kg, water content 0.010101, wet mass 1 kg
- sodium dichromate: 9.94683e-6 kg; lognormal variance with pedigree 0.0033, pedigree (2,2,3,1,1)
  (same comment as for phosphane)
  properties: wet mass 1 kg, dry mass 1 kg
- formaldehyde: 3.43988e-7 kg; lognormal variance with pedigree 0.0033, pedigree (2,2,3,1,1)
  (same comment as for phosphane)
  properties: dry mass 1 kg, carbon content, fossil 0.4, wet mass 1 kg, heating value, net 20.19 MJ
- sodium hydroxide, without water, in 50% solution state: 5.67664e-6 kg; lognormal variance with pedigree 0.0033, pedigree (2,2,3,1,1)
  (same comment as for phosphane)
  properties: wet mass 1 kg, dry mass 1 kg, heating value, net 3.03 MJ
- soda ash, dense: 0.000110313 kg; lognormal variance with pedigree 0.0033, pedigree (2,2,3,1,1)
  (same comment as for phosphane)
  properties: dry mass 1 kg, wet mass 1 kg, carbon content, fossil 0.113208, heating value, net 3.43 MJ
- hydrochloric acid, without water, in 30% solution state: 1.88092e-6 kg; lognormal variance with pedigree 0.0033, pedigree (2,2,3,1,1)
  (same comment as for phosphane)
  properties: dry mass 1 kg, heating value, net 3.32 MJ, wet mass 1 kg
- sodium metasilicate pentahydrate, 58% active substance, powder: 6.40529e-6 kg; lognormal variance with pedigree 0.0033, pedigree (2,2,3,1,1)
  (same comment as for phosphane)
  properties: dry mass 1 kg, wet mass 1 kg, heating value, net 5.71 MJ
- pesticide, unspecified: 3.30431e-7 kg; lognormal variance with pedigree 0.0033, pedigree (2,2,3,1,1)
  Chemicals (biocides) used for the water treatment in a typical Brazilian sugarcane processing plant (LDC Bioenergia, 2010). Treatment of captured water and recycled water in closed circuits (parameterized by water catchment) were considered.
  properties: wet mass 1 kg, dry mass 1 kg, carbon content, fossil 0.486978
- concrete, normal: 2.94846e-6 m3; lognormal variance with pedigree 0.3426, pedigree (3,3,5,1,1)
  (same comment as for building, hall, steel construction)
  properties: wet mass 2380 kg, water content 0.086758, dry mass 2190 kg
- cyclohexane: 0.000128784 kg; lognormal variance with pedigree 0.0033, pedigree (2,2,3,1,1)
  Replacement of cyclohexane in dehydration system. Based on computer simulation of the process validated using literature and industry data.
  properties: carbon content, fossil 0.857143, wet mass 1 kg, heating value, net 43.22 MJ, dry mass 1 kg
- sodium hypochlorite, without water, in 15% solution state: 0.00114888 kg; lognormal variance with pedigree 0.0033, pedigree (2,2,3,1,1)
  (same comment as for phosphane)
  properties: wet mass 1 kg, dry mass 1 kg
- sodium sulfate, anhydrite: 0.00156065 kg; lognormal variance with pedigree 0.0033, pedigree (2,2,3,1,1)
  (same comment as for phosphane)
  properties: dry mass 1 kg, wet mass 1 kg
- aluminium sulfate, powder: 0.00015454 kg; lognormal variance with pedigree 0.0033, pedigree (2,2,3,1,1)
  (same comment as for phosphane)
  properties: dry mass 1 kg, wet mass 1 kg
- iron (III) chloride, without water, in 40% solution state: 9.09957e-5 kg; lognormal variance with pedigree 0.0033, pedigree (2,2,3,1,1)
  (same comment as for phosphane)
  properties: dry mass 1 kg, wet mass 1 kg
- dimethylamine: 8.84539e-6 kg; lognormal variance with pedigree 0.0033, pedigree (2,2,3,1,1)
  (same comment as for phosphane)
  properties: carbon content, fossil 0.533333, dry mass 1 kg, heating value, net 13.47 MJ, wet mass 1 kg
- acetic acid, without water, in 98% solution state: 3.49071e-6 kg; lognormal variance with pedigree 0.0033, pedigree (2,2,3,1,1)
  (same comment as for phosphane)
  properties: carbon content, fossil 0.400016, wet mass 1 kg, dry mass 1 kg, heating value, net 14.6 MJ
  note on heating value, net: Based on literature, page 10, Althaus H.-J., Chudacoff M., Hischier R., Jungbluth N., Osses M. and Primas A. (2007) Life Cycle Inventories of Chemicals. Final report ecoinvent data v2.0 No. 8. EMPA, Swiss Centre for Life Cycle Inventories, Dübendorf, CH, Online-Version under: www.ecoinvent.org.
- vinasse, from fermentation of sugarcane: -13.6697 kg; lognormal variance with pedigree 0.0033, pedigree (2,2,3,1,1)
  (same comment as for vinasse, from fermentation of sugarcane)
  production volume 3.5957e10 kg
  properties: dry mass 0.0554348 kg, water content 17.0392, price 0.027 EUR2005, carbon content, non-fossil 0.1288, wet mass 1 kg
- ash, from combustion of bagasse from sugarcane: -0.0830315 kg; lognormal variance with pedigree 0.0033, pedigree (2,2,3,1,1)
  (same comment as for ash, from combustion of bagasse from sugarcane)
  production volume 2.20299e8 kg
  properties: wet mass 1 kg, dry mass 1 kg
- filter cake, from sugarcane juice filtration: -0.884539 kg; lognormal variance with pedigree 0.0033, pedigree (2,2,3,1,1)
  (same comment as for filter cake, from sugarcane juice filtration)
  production volume 2.32859e9 kg
  properties: carbon content, non-fossil 0.6514, price 0.03 EUR2005, water content 1.85714, dry mass 0.35 kg, wet mass 1 kg

## Inputs from nature
- Transformation, to industrial area [natural resource, land]: 1.08449e-6 m2; source Mateus F. Chagas 2015; lognormal variance with pedigree 0.1626, pedigree (3,3,5,1,1)
  Transformation of area occupied by the industrial plant based on data from MACEDO et al., 2008. The occupation was calculated considering a life span of 25 years.
- Transformation, from arable land, unspecified use [natural resource, land]: 1.08449e-6 m2; source Mateus F. Chagas 2015; lognormal variance with pedigree 0.1626, pedigree (3,3,5,1,1)
  (same comment as for Transformation, to industrial area)
- Occupation, industrial area [natural resource, land]: 5.52414e-5 m2*year; source Mateus F. Chagas 2015; lognormal variance with pedigree 0.0826, pedigree (3,3,5,1,1)
  Industrial area plant based on data from MACEDO et al., 2008.
- Water, well, in ground [natural resource, in water]: 0.0254178 m3; source Mateus F. Chagas 2015; lognormal variance with pedigree 0.0033, pedigree (2,2,3,1,1)
  Water catchment. Based on computer simulation of the process validated using literature and industry data.

## Emissions to nature
All rows: source Mateus F. Chagas 2015
- Nitrogen oxides [air, non-urban air or from high stacks]: 0.00189786 kg; lognormal variance with pedigree 0.0446, pedigree (3,3,3,1,1)
  Emissions from sugarcane bagasse combustion in the boilers of cogeneration units were estimated according to GREET (2010) emission factors, except carbon dioxide emissions, which are based on process simulation results.
- Ethanol [air, non-urban air or from high stacks]: 0.00220288 kg; lognormal variance with pedigree 0.0427, pedigree (2,2,3,1,1)
  Emissions from distillation process, based on process simulation results.
- Particulates, < 2.5 um [air, non-urban air or from high stacks]: 0.00107433 kg; lognormal variance with pedigree 0.3046, pedigree (3,3,3,1,1)
  (same comment as for Nitrogen oxides)
- Particulates, > 2.5 um, and < 10um [air, non-urban air or from high stacks]: 0.00215204 kg; lognormal variance with pedigree 0.1246, pedigree (3,3,3,1,1)
  (same comment as for Nitrogen oxides)
- NMVOC, non-methane volatile organic compounds, unspecified origin [air, non-urban air or from high stacks]: 0.000132511 kg; lognormal variance with pedigree 0.0446, pedigree (3,3,3,1,1)
  (same comment as for Nitrogen oxides)
- Dinitrogen monoxide [air, non-urban air or from high stacks]: 0.000104721 kg; lognormal variance with pedigree 0.0446, pedigree (3,3,3,1,1)
  (same comment as for Nitrogen oxides)
- Carbon monoxide, non-fossil [air, non-urban air or from high stacks]: 0.00189786 kg; lognormal variance with pedigree 0.0446, pedigree (3,3,3,1,1)
  (same comment as for Nitrogen oxides)
- Carbon dioxide, non-fossil [air, non-urban air or from high stacks]: 4.16564 kg; = 178.17 + 6.64E+01 + 1.26E+00; lognormal variance with pedigree 0.0033, pedigree (2,2,3,1,1)
  Emissions from sugarcane bagasse combustion, from fermentation and distillation process. Emissions from sugarcane bagasse combustion in the boilers of cogeneration units were estimated according to GREET (2010) emission factors, except carbon dioxide emissions, which are based on process simulation results. Emissions from fermentation and distillation process were based on process simulation results.
- Methane, non-fossil [air, non-urban air or from high stacks]: 0.000784563 kg; lognormal variance with pedigree 0.0446, pedigree (3,3,3,1,1)
  (same comment as for Nitrogen oxides)
- Sulfur oxides [air, unspecified]: 0.000101671 kg; lognormal variance with pedigree 0.0446, pedigree (3,3,3,1,1)
  (same comment as for Nitrogen oxides)

## Sampling procedure
The main source of information on inputs and unit operation parameters is based on literature. These data were validated using computer process simulation to check mass and energy balances. Further information is obtained in Bonomi et al. (2016).

## Extrapolations
Figures in the inventory represent average data for a traditional average-scale autonomous plant.
