# packaging glass production, brown

Dataset: EcoSpold 2, unit process
Geography: RoW
Time period: 2000-01-01 to 2021-12-31
Technology level: current
Classification: EcoSpold01Categories: glass/packaging
Classification: ISIC rev.4 ecoinvent: 2310:Manufacture of glass and glass products
Tags: ConvertedDataset
Scenario: Business-as-Usual
System model: Allocation, cut-off by classification
Generated by: Roland Hischier
Published in: Hischier R. 2007
Database: ecoinvent
isCopyrightProtected: true
accessRestrictedTo: 1

## General comment
A production site with a sorting capacity of 100 kt per year and a total life span of 50 a is assumed.
Dataset is extrapolated from European data.

## Included activities start
From the reception of precursors silica sand, soda, unsorted glass cullets, limestone, dolomite, feldspar, and chemicals inorganics at the factory gate.

## Included activities end
This activity ends with the production of 1 kg of brown packaging glass. The dataset includes material and energy inputs, water consumption, emissions to air and water, waste production and infrastructure.

## Geography
average European situation, based on information from EU-IPPC BAT document about the glass industry

## Technology
Mix of present used technologies in Europe

## Parameters
- emission factor formaldehyde from oil: 4.7e-7 dimensionless; name EF_formaldehyde_oil; lognormal variance with pedigree 1.0832, pedigree (2,1,1,5,2)
  Emission factor (kg/MJ fuel) corresponding to that used in datasets for combustion in industrial furnaces/boilers.
- fraction, process water, to air: 0.15 dimensionless; name fraction_PW_to_air; lognormal variance with pedigree 0.092025, pedigree (4,4,3,2,4)
  Literature value. In case when no industry/process specific data are available, default evaporation fraction value is used. This value is 15% and is based on literature (Statistics Canada, 2007 & Shaffer, K.H., 2008, Consumptive water use in the Great Lakes Basin, USGS & Shiklomanov, 2003, World Water Resources at the Beginning of the 21st Century) and has been approved by an expert.
- emission factor dioxins from gas: 3e-17 dimensionless; name EF_dioxin_gas; lognormal variance with pedigree 1.0832, pedigree (2,1,1,5,2)
  (same comment as for emission factor formaldehyde from oil)
- fraction, tap water, to air: 0.15 dimensionless; name fraction_TW_to_air; = fraction_PW_to_air; lognormal variance with pedigree 0.092025, pedigree (4,4,3,2,4)
  Calculated value. See comment in the other parametres present in this dataset. Tap water is considered to be always used as process water, thus process water fractions to air are applied to all tap water input flows to calculate the amount of water consumed in the processes.
- emission factor dioxins from oil: 4.7e-16 dimensionless; name EF_dioxin_oil; lognormal variance with pedigree 1.0832, pedigree (2,1,1,5,2)
  (same comment as for emission factor formaldehyde from oil)
- emission factor benzene from oil: 2e-8 dimensionless; name EF_benzene_oil; lognormal variance with pedigree 1.0832, pedigree (2,1,1,5,2)
  (same comment as for emission factor formaldehyde from oil)
- emission factor benzo(a)pyrene from gas: 1e-11 dimensionless; name EF_benzo_gas; lognormal variance with pedigree 1.0832, pedigree (2,1,1,5,2)
  (same comment as for emission factor formaldehyde from oil)
- emission factor methane from gas: 2e-6 dimensionless; name EF_CH4_gas; lognormal variance with pedigree 1.0832, pedigree (2,1,1,5,2)
  (same comment as for emission factor formaldehyde from oil)
- emission factor benzo(a)pyrene from oil: 3e-11 dimensionless; name EF_benzo_oil; lognormal variance with pedigree 1.0832, pedigree (2,1,1,5,2)
  (same comment as for emission factor formaldehyde from oil)
- emission factor N2O from oil: 7e-7 dimensionless; name EF_N2O_oil; lognormal variance with pedigree 1.0832, pedigree (2,1,1,5,2)
  (same comment as for emission factor formaldehyde from oil)
- emission factor N2O from gas: 1e-7 dimensionless; name EF_N2O_gas; lognormal variance with pedigree 1.0832, pedigree (2,1,1,5,2)
  (same comment as for emission factor formaldehyde from oil)
- emission factor formaldehyde from gas: 1e-7 dimensionless; name EF_formaldehyde_gas; lognormal variance with pedigree 1.0832, pedigree (2,1,1,5,2)
  (same comment as for emission factor formaldehyde from oil)
- emission factor methane from heavy fuel oil: 4.2e-6 dimensionless; name EF_CH4_heavy; lognormal variance with pedigree 1.0832, pedigree (2,1,1,5,2)
  (same comment as for emission factor formaldehyde from oil)
- emission factor benzene: 4e-7 dimensionless; name EF_benzene_gas; lognormal variance with pedigree 1.0832, pedigree (2,1,1,5,2)
  (same comment as for emission factor formaldehyde from oil)
- emission factor CO from oil: 7e-6 dimensionless; name EF_CO_oil; lognormal variance with pedigree 1.0832, pedigree (2,1,1,5,2)
  (same comment as for emission factor formaldehyde from oil)
- emission factor methane from light fuel oil: 1e-6 dimensionless; name EF_CH4_light; lognormal variance with pedigree 1.0832, pedigree (2,1,1,5,2)
  (same comment as for emission factor formaldehyde from oil)
- emission factor CO from gas: 2.2e-6 dimensionless; name EF_CO_gas; lognormal variance with pedigree 1.0832, pedigree (2,1,1,5,2)
  (same comment as for emission factor formaldehyde from oil)

## Reference product
- packaging glass, brown: 1 kg; name packaging_glass_RP; CPC 37191: Bottles, jars, phials and other containers, of glass, of a kind used for the conveyance or packing of goods, e[…]; By-product classification allocatable product
  production volume 7.4857e9 kg; name PV_glass
    Global market estimated at 3.7 times the European (the average of the glass industry according to http://www.waste-stream.eu/html/glass_market.html). Proportion 15% of brown glass, estimated from data in http://www.caregroup.org.uk/glassrep.pdf.
  property price 0.385942 EUR2005; name packaging_glass_RP_price_EUR2005
    Calculated based on inputs: The price of the product has been calculated as a sum of the values of the material and energy inputs for this product. This value is therefore a rough estimation. It may underestimate the real price since there are additional expenses when producing any product. These expences can include for example labour costs, treatment of waste materials and profit for the producer. Please consider carefully whether this level of data quality is acceptable for your application.
  property carbon content 0
    carbon content on a dry matter basis (reserved; not for manual entry)
  properties: carbon content, non-fossil 0, wet mass 1 kg, carbon content, fossil 0, water in wet mass 0 kg, dry mass 1 kg, water content 0, carbon allocation 0 kg

## Inputs from technosphere
- feldspar: 0.0375 kg; lognormal variance with pedigree 0.0601, pedigree (1,2,5,5,3)
  Literature value.
  EcoSpold01Location=RER
  properties: dry mass 1 kg, wet mass 1 kg
- wastewater from glass production: -0.00176 m3; name WW_ByP; lognormal variance with pedigree 0.0601, pedigree (1,2,5,5,3)
  EcoSpold01Location=CH
  average value from EU-IPPC report
  Uncertainty: average value from EU-IPPC report
  production volume 1.5224e7 m3; = WW_ByP/ packaging_glass_RP*PV_glass
    Calculated from production volume of reference product using the relative outputs.
  property price 0 EUR2005; name WW_ByP_price_EUR2005
  properties: carbon content, fossil 0.0455242, dry mass 1.09356 kg, wet mass 1000 kg, water content 913.443
  note on carbon content, fossil: COD= 0.115 kg/m3 (Tab A.18, ecoinvent v2.2 report 13_I). COD was converted to TOC, using conversion factors in Tab 4.10 (ecoinvent v2.2 report 13_IV). TOC was considered as Total Carbon.
- chemical, inorganic: 0.022 kg; name chemicals; lognormal variance with pedigree 0.0601, pedigree (1,2,5,5,3)
  average value from EU-IPPC report
  EcoSpold01Location=GLO
  Uncertainty: average value from EU-IPPC report
  properties: carbon content, fossil 0.003, dry mass 1 kg, wet mass 1 kg
  note on carbon content, fossil: This dataset is an unweighted average of 20 inorganic substances (listed in Tab 88.1, ecoinvent v2.2 report 8, part II), being part of the top100 chemicals included in this database. The C-content has also been calculated as an unweighted average of the C content of the substances composing this dataset.
- graphite: 1.941e-5 kg; lognormal variance with pedigree 0.0421, pedigree (1,2,5,5,1)
  EcoSpold01Location=RER
  Literature value.
  The original value (1.25E-6kg) was updated (1.941E-5kg) in order to reflect changes made in the regional datasets.
  Uncertainty: data from a German study (UBA)
  properties: dry mass 1 kg, wet mass 1 kg, carbon content, fossil 1, heating value, net 30.3 MJ
- portafer: 0.001 kg; lognormal variance with pedigree 0.0526, pedigree (1,3,5,5,1)
  EcoSpold01Location=RER
  Pigment. Order of magnitude estimate.
  Uncertainty: data from 1 Vetropack site
  properties: wet mass 1 kg, dry mass 1 kg
- polyethylene, high density, granulate: 0.0129 kg; lognormal variance with pedigree 0.054, pedigree (1,4,5,5,1)
  Literature value: average european value from literature source.
  EcoSpold01Location=RER
  properties: wet mass 1 kg, carbon content, fossil 0.857143, dry mass 1 kg, heating value, net 42.47 MJ
  note on carbon content, fossil: Polyethylene is formed out of a huge amount of ethylene monomers (C2H4) (ecoinvent v2.2 report 11_II). MW=28 g/mol
- lime: 0.049 kg; lognormal variance with pedigree 0.0601, pedigree (1,2,5,5,3)
  EcoSpold01Location=CH
  Estimated value to ensure - together with dolomite input - a CaO content of 10.5% in the glass, assuming the same content in the cullet.
  properties: wet mass 1 kg, dry mass 1 kg, carbon content, fossil 0.120005
- diesel: 0 kg; pedigree (1,1,1,1,1)
  Literature value.
  EcoSpold01Location=RER
  properties: carbon content, fossil 0.865, dry mass 1 kg, wet mass 1 kg, heating value, net 42.8 MJ
  note on carbon content, fossil: C-content of diesel is 86.5% (ecoinvent v2.2 report 6_IV, Tab 3.14)
- packaging glass factory: 1.25e-10 unit; lognormal variance with pedigree 0.494, pedigree (5,4,5,5,4)
  Estimation: infrastructure represents an average packaging glass factory in Europe.
  EcoSpold01Location=RER
  Uncertainty: own estimation
- natural gas, high pressure: 0 m3; name gas; pedigree (1,1,1,1,1)
  EcoSpold01Location=RER
  Estimation: reported total amount of energy required per glass melted from literature source. Average european mix of 50% fuel oil and 50% natural gas estimated based on literature source.
  Uncertainty: average value from EU-IPPC report
  property carbon content, fossil 0.602381; name C_in_gas
  properties: heating value, net 39 MJ, heating value, gross 39 MJ, dry mass 0.84 kg, wet mass 0.84 kg
  note on heating value, net: Literature value, Source: United Nations Statistics Division (2018) International Recommendations for Energy Statistics (IRES). Available at: http://unstats.un.org/unsd/statcom/doc11/BG-IRES.pdf.
  note on carbon content, fossil: An average C content of 0.506 kg C/ m3 has been assumed (this average has been calculated using data in Tab 3.5, ecoinvent v2.2 report 6_V
- refractory, fireclay, packed: 0.0143 kg; name clay; lognormal variance with pedigree 0.0601, pedigree (1,2,5,5,3)
  EcoSpold01Location=DE
  Estimation: it includes all minor raw materials. The total amount for european production is from literature source.
  Uncertainty: average value from EU-IPPC report
  properties: wet mass 1 kg, dry mass 1 kg
- silica sand: 0.236942 kg; = 1-ABS(cullet)-soda*62/106-lime*56/100-dolomite*127/215-feldspar-chemicals-clay-portafer+(MSW_ByP*-1); lognormal variance with pedigree 0.0601, pedigree (1,2,5,5,3)
  calculated as residual from the mass balance
  EcoSpold01Location=DE
  properties: dry mass 0.99 kg, wet mass 1 kg, water content 0.010101
- lime, hydrated, loose weight: 0.001 kg; lognormal variance with pedigree 0.0526, pedigree (1,3,5,5,1)
  Order of magnitude estimate
  EcoSpold01Location=CH
  properties: dry mass 0.997 kg, water content 0.00300903, wet mass 1 kg
- EUR-flat pallet: 0.000787 unit; lognormal variance with pedigree 0.054, pedigree (1,4,5,5,1)
  Literature value: average european value from literature value
  EcoSpold01Location=RER
  properties: dry mass 18.3333 kg, heating value, net 335.11 MJ, water content 0.2, carbon content, fossil 0.0311351, wet mass 22 kg, carbon content, non-fossil 0.58833
  note on carbon content, fossil: C content in components of the pallet (ecoinvent v2.2 report 7_part XVIII)
- electricity, medium voltage: 0 kWh; pedigree (1,1,1,1,1)
  average value from EU-IPPC report
  EcoSpold01Location=UCTE
  Uncertainty: average value from EU-IPPC report
- tap water: 0 kg; name tap_water_input; pedigree (1,1,1,1,1)
  Order of magnitude estimate
  EcoSpold01Location=RER
  properties: water content 2962.17, wet mass 1 kg, carbon content, fossil 0.00178991, dry mass 0.000337476 kg
  note on carbon content, fossil: Bicarbonate content is 2.93 mol/m3. CO2 content is 0.1 mol/m3 (ecoinvent v2.2 report 8, Tab 93.1).
- municipal solid waste: 0 kg; name MSW_ByP; pedigree (1,1,1,1,1)
  average value from EU-IPPC report
  EcoSpold01Location=CH
  Uncertainty: average value from EU-IPPC report
  production volume 0 kg
    Calculated from production volume of reference product using the relative outputs.
  properties: dry mass 0.771 kg, carbon content, non-fossil 0.261655, water content 0.297017, wet mass 1 kg, carbon content, fossil 0.171549, heating value, net 11.74 MJ
  note on carbon content, non-fossil: MSW composition in tab 4.1, ecoinvent v2.2 report 13_I. C content referred to 1 kg DM
  note on heating value, net: Value taken from the general comment of the treatment dataset.
- solid bleached and unbleached board carton: 0.0193 kg; lognormal variance with pedigree 0.054, pedigree (1,4,5,5,1)
  EcoSpold01Location=RER
  Literature value: average european value from literature source.
  properties: carbon content, non-fossil 0.327779, dry mass 0.945 kg, wet mass 1 kg, carbon content, fossil 0.0190874, water content 0.0582011, heating value, net 9.8 MJ
- dolomite: 0.068 kg; lognormal variance with pedigree 0.0601, pedigree (1,2,5,5,3)
  EcoSpold01Location=RER
  Estimated value to ensure - together with lime input - a CaO content of 10.5% in the glass, assuming the same content in the cullet.
  properties: dry mass 1 kg, wet mass 1 kg, carbon content, fossil 0.130435, heating value, net 3.95 MJ
- lubricating oil: 2.38e-5 kg; lognormal variance with pedigree 0.0421, pedigree (1,2,5,5,1)
  data from a German study (UBA)
  EcoSpold01Location=RER
  Uncertainty: data from a German study (UBA)
  properties: dry mass 1 kg, wet mass 1 kg, carbon content, fossil 0.75, heating value, net 40.2 MJ
  note on carbon content, fossil: Lubricating oil is produced from diesel. C-content/dry mass of fats and oils considered 75%, from: ecoinvent v2.2 report, n 15a, pg 40
  note on heating value, net: Literature value, Source: IPCC 2006, 2006 IPCC Guidelines for National Greenhouse Gas Inventories, Prepared by the National Greenhouse Gas Inventories Programme, Eggleston H.S., Buendia L., Miwa K., Ngara T. and Tanabe K. (eds). Published: IGES, Japan
- light fuel oil: 0 kg; name light_fuel; pedigree (1,1,1,1,1)
  EcoSpold01Location=RER
  Estimation: reported total amount of energy required per glass melted from literature source. Average european mix of 50% fuel oil and 50% natural gas estimated based on literature source. Light fuel oil and heavy fuel oil at equal parts.
  Uncertainty: average value from EU-IPPC report
  property carbon content, fossil 0.862; name C_in_light_fuel
  properties: wet mass 1 kg, dry mass 1 kg, heating value, net 42.6 MJ
- soda ash, light, crystalline, heptahydrate: 0.096 kg; name soda; lognormal variance with pedigree 0.0601, pedigree (1,2,5,5,3)
  EcoSpold01Location=RER
  Estimated value to ensure a Na2O content of 13% in the glass, assuming the same content in the cullet.
  properties: heating value, net 3.43 MJ, dry mass 1 kg, wet mass 1 kg, carbon content, fossil 0.0517241
- glass cullet, sorted: 0.57 kg; name cullet
  properties: dry mass 1 kg, wet mass 1 kg
- heavy fuel oil: 0 kg; name heavy_fuel; pedigree (1,1,1,1,1)
  (same comment as for light fuel oil)
  property carbon content, fossil 0.849; name C_in_heavy_fuel
  properties: heating value, net 41.2 MJ, dry mass 1 kg, wet mass 1 kg
- diesel: 7.58322e-5, 3.64557e-6, 0.000153047, 1.07203e-5, 1.54949e-5, 0.00151126 kg (6 entries); lognormal variance with pedigree 0.0526, pedigree (1,3,5,5,1)
  Literature value.
  EcoSpold01Location=RER
- natural gas, high pressure: 0.00121491, 0.00181539, 0.00302211, 0.0246751, 0.00416534, 0.0566457 m3 (6 entries); lognormal variance with pedigree 0.0601, pedigree (1,2,5,5,3)
  (same comment as for natural gas, high pressure)
  properties: heating value, net 39 MJ, heating value, gross 39 MJ, carbon content, fossil 0.602381, dry mass 0.84 kg, wet mass 0.84 kg
- electricity, medium voltage: 0.00307567, 0.00058978, 0.00990119, 0.144004, 0.0202974, 0.066132 kWh (6 entries); lognormal variance with pedigree 0.0601, pedigree (1,2,5,5,3)
  (same comment as for electricity, medium voltage)
- tap water: 0.0015566, 0.000187373, 0.000309665, 0.00780852, 0.000203137, 0.000577819, 0.0893569 kg (7 entries); lognormal variance with pedigree 0.0906, pedigree (5,3,5,1,1)
  Order of magnitude estimate
  EcoSpold01Location=RER
- municipal solid waste: -7.75903e-6, -1.95508e-6, -2.79393e-6, -0.00548749 kg (4 entries); lognormal variance with pedigree 0.0601, pedigree (1,2,5,5,3)
  (same comment as for municipal solid waste)
  production volume 4.1582e7 kg
- light fuel oil: 0.00175875, 0.00025364, 0.00354958, 0.000235546, 0.000341297, 0.0357612 kg (6 entries); lognormal variance with pedigree 0.0601, pedigree (1,2,5,5,3)
  (same comment as for light fuel oil)
  properties: wet mass 1 kg, dry mass 1 kg, carbon content, fossil 0.862, heating value, net 42.6 MJ
- heavy fuel oil: 0.00212189, 0.00055278, 0.00163643, 0.000321891, 0.000412939, 0.0382541 kg (6 entries); lognormal variance with pedigree 0.0601, pedigree (1,2,5,5,3)
  (same comment as for light fuel oil)
  properties: heating value, net 41.2 MJ, dry mass 1 kg, wet mass 1 kg, carbon content, fossil 0.849

## Inputs from nature
- Water, unspecified natural origin [natural resource, in water]: 0.00198 m3; name water_UNO_input; lognormal variance with pedigree 0.0601, pedigree (1,2,5,5,3)
  average value from EU-IPPC report
  Uncertainty: average value from EU-IPPC report

## Emissions to nature
- Antimony [air, urban air close to ground]: 6.74e-8 kg; lognormal variance with pedigree 0.704, pedigree (1,4,5,5,1)
  Literature value: average european value from literature source.
- Particulates, < 2.5 um [air, urban air close to ground]: 0.000252 kg; lognormal variance with pedigree 0.3701, pedigree (1,2,5,5,3)
  Calculated value: total amount based on literature value (EU Commission, 2000). Distribution of particulate mater was calculated according to the ratio for the paricle distribution of combustion processes present in the literature source assuming a mix of 32% secondary and 68% primary abatment technology.
  Uncertainty: total from EU-IPPC report, split up according to US-EPA
- Dinitrogen monoxide [air, urban air close to ground]: 2.85523e-6 kg; = EF_N2O_gas*39*gas+EF_N2O_oil*(41.2*heavy_fuel+42.6*light_fuel); lognormal variance with pedigree 0.0821, pedigree (1,2,5,5,1)
  Calculated from fuel input and emission factors in kg/MJ (lower heating value for gas, heavy fuel oil and light fuel oil, 39 MJ/m3, 41.2 MJ/kg and 42.6 MJ/kg, respectively)
  Uncertainty: data from a German study (UBA)
- Sulfur dioxide [air, urban air close to ground]: 0.00344 kg; lognormal variance with pedigree 0.0601, pedigree (1,2,5,5,3)
  Literature value: average european value from literature source. It includes a mix of 32% secondary and 68% primary abatment technology.
  Uncertainty: average value from EU-IPPC report
- Suspended solids, unspecified [water, surface water]: 1e-6 kg; lognormal variance with pedigree 0.0926, pedigree (1,3,5,5,1)
  Order of magnitude estimate
- Nickel [air, urban air close to ground]: 6.74e-8 kg; lognormal variance with pedigree 0.704, pedigree (1,4,5,5,1)
  Literature value: average european value from literature source.
- Carbon dioxide, fossil [air, urban air close to ground]: 0.55865 kg; = (gas* C_in_gas+heavy_fuel* C_in_heavy_fuel+light_fuel* C_in_light_fuel)*44/12+soda*44/106+lime*44/100+dolomite*88/215; lognormal variance with pedigree 0.0601, pedigree (1,2,5,5,3)
  Calculated from carbon in fuels and raw materials
- Dioxins, measured as 2,3,7,8-tetrachlorodibenzo-p-dioxin [air, urban air close to ground]: 1.78448e-15 kg; = EF_dioxin_gas*39*gas+EF_dioxin_oil*(41.2*heavy_fuel+42.6*light_fuel); lognormal variance with pedigree 0.0821, pedigree (1,2,5,5,1)
  (same comment as for Dinitrogen monoxide)
- Chromium [air, urban air close to ground]: 6.74e-8 kg; lognormal variance with pedigree 0.704, pedigree (1,4,5,5,1)
  Literature value: average european value from literature source.
- Methane, fossil [air, urban air close to ground]: 1.64176e-5 kg; = EF_CH4_gas*39*gas+EF_CH4_heavy*41.2*heavy_fuel+EF_CH4_light*42.6*light_fuel; lognormal variance with pedigree 0.0821, pedigree (1,2,5,5,1)
  (same comment as for Dinitrogen monoxide)
- Selenium [air, urban air close to ground]: 7.33e-6 kg; lognormal variance with pedigree 0.704, pedigree (1,4,5,5,1)
  Literature value: average european value from literature source.
- Copper [air, urban air close to ground]: 6.74e-8 kg; lognormal variance with pedigree 0.704, pedigree (1,4,5,5,1)
  Literature value: average european value from literature source.
- Ammonia [air, urban air close to ground]: 2.62e-8 kg; lognormal variance with pedigree 0.0821, pedigree (1,2,5,5,1)
  data from a German study (UBA)
  Uncertainty: data from a German study (UBA)
- Arsenic [air, urban air close to ground]: 6.74e-8 kg; lognormal variance with pedigree 0.704, pedigree (1,4,5,5,1)
  Literature value: average european value from literature source.
- AOX, Adsorbable Organic Halogen as Cl [water, surface water]: 1e-7 kg; lognormal variance with pedigree 0.1306, pedigree (5,3,5,1,1)
  Order of magnitude estimate
- Carbon monoxide, fossil [air, urban air close to ground]: 3.28363e-5 kg; = EF_CO_gas*39*gas+EF_CO_oil*(41.2*heavy_fuel+42.6*light_fuel); lognormal variance with pedigree 0.6921, pedigree (1,2,5,5,1)
  (same comment as for Dinitrogen monoxide)
- Hydrogen chloride [air, urban air close to ground]: 4.97e-5 kg; lognormal variance with pedigree 0.1101, pedigree (1,2,5,5,3)
  (same comment as for Sulfur dioxide)
- DOC, Dissolved Organic Carbon [water, surface water]: 1e-5 kg; lognormal variance with pedigree 0.0926, pedigree (1,3,5,5,1)
  Order of magnitude estimate
- Zinc, ion [water, surface water]: 1e-8 kg; lognormal variance with pedigree 0.7026, pedigree (1,3,5,5,1)
  Order of magnitude estimate
- Manganese [air, urban air close to ground]: 6.74e-8 kg; lognormal variance with pedigree 0.704, pedigree (1,4,5,5,1)
  Literature value: average european value from literature source.
- Nitrite [water, surface water]: 1e-7 kg; lognormal variance with pedigree 0.0926, pedigree (1,3,5,5,1)
  Order of magnitude estimate
- Oils, unspecified [water, surface water]: 1e-6 kg; lognormal variance with pedigree 0.0926, pedigree (1,3,5,5,1)
  Order of magnitude estimate
- Sulfate [water, surface water]: 1e-6 kg; lognormal variance with pedigree 0.0926, pedigree (1,3,5,5,1)
  Order of magnitude estimate
- Copper, ion [water, surface water]: 1e-9 kg; lognormal variance with pedigree 0.7026, pedigree (1,3,5,5,1)
  Order of magnitude estimate
- TOC, Total Organic Carbon [water, surface water]: 1e-5 kg; lognormal variance with pedigree 0.0926, pedigree (1,3,5,5,1)
  Order of magnitude estimate
- Lead [air, urban air close to ground]: 7.72e-7 kg; lognormal variance with pedigree 0.704, pedigree (1,4,5,5,1)
  Literature value: average european value from literature source.
- NMVOC, non-methane volatile organic compounds, unspecified origin [air, urban air close to ground]: 4.42e-6 kg; lognormal variance with pedigree 0.0821, pedigree (1,2,5,5,1)
  data from a German study (UBA)
  Uncertainty: data from a German study (UBA)
- Cadmium [air, urban air close to ground]: 6.74e-8 kg; lognormal variance with pedigree 0.704, pedigree (1,4,5,5,1)
  Literature value: average european value from literature source.
- Cobalt [air, urban air close to ground]: 6.74e-8 kg; lognormal variance with pedigree 0.704, pedigree (1,4,5,5,1)
  Literature value: average european value from literature source.
- Water [water, unspecified]: 8e-6 m3; name water_to_water_unspecified; = (tap_water_input/1000)*(1-fraction_TW_to_air)+water_UNO_input*(1-fraction_PW_to_air)-(WW_ByP*-1); lognormal variance with pedigree 0.130025, pedigree (4,4,5,2,4)
  Calculated value based on literature values and expert opinion. See comments in the parametres' comment field.
  property fraction, origin: unspecified 0.951923; name fraction_origin_unspecified_Ww
  property fraction, origin: salt water 0; name fraction_origin_salt_water_Ww
  property fraction, origin: fresh water 0.0480769; name fraction_origin_fresh_water_Ww
- BOD5, Biological Oxygen Demand [water, surface water]: 1e-5 kg; lognormal variance with pedigree 0.0926, pedigree (1,3,5,5,1)
  Order of magnitude estimate
- Benzene [air, urban air close to ground]: 1.49938e-6 kg; = EF_benzene_gas*39*gas+EF_benzene_oil*(41.2*heavy_fuel+42.6*light_fuel); lognormal variance with pedigree 0.1621, pedigree (1,2,5,5,1)
  (same comment as for Dinitrogen monoxide)
- Water [air, unspecified]: 0.000312 m3; name water_to_air_unspecified; = (tap_water_input/1000)*fraction_TW_to_air+water_UNO_input*fraction_PW_to_air; lognormal variance with pedigree 0.130025, pedigree (4,4,5,2,4)
  (same comment as for Water)
  property fraction, origin: unspecified 0.951923; name fraction_origin_unspecified
  property fraction, origin: salt water 0; name fraction_origin_salt_water
  property fraction, origin: fresh water 0.0480769; name fraction_origin_fresh_water
- Nitrogen oxides [air, urban air close to ground]: 0.0021 kg; lognormal variance with pedigree 0.1101, pedigree (1,2,5,5,3)
  (same comment as for Sulfur dioxide)
- Hydrocarbons, aliphatic, alkanes, unspecified [air, urban air close to ground]: 1.19e-5 kg; lognormal variance with pedigree 0.0821, pedigree (1,2,5,5,1)
  data from a German study (UBA)
  Uncertainty: data from a German study (UBA)
- Particulates, > 2.5 um, and < 10um [air, urban air close to ground]: 1.3e-5 kg; lognormal variance with pedigree 0.1901, pedigree (1,2,5,5,3)
  (same comment as for Particulates, < 2.5 um)
- Benzo(a)pyrene [air, urban air close to ground]: 1.42767e-10 kg; = EF_benzo_gas*39*gas+EF_benzo_oil*(41.2*heavy_fuel+42.6*light_fuel); lognormal variance with pedigree 0.1621, pedigree (1,2,5,5,1)
  (same comment as for Dinitrogen monoxide)
- Formaldehyde [air, urban air close to ground]: 2.03438e-6 kg; = EF_formaldehyde_gas*39*gas+EF_formaldehyde_oil*(41.2*heavy_fuel+42.6*light_fuel); lognormal variance with pedigree 0.1621, pedigree (1,2,5,5,1)
  (same comment as for Dinitrogen monoxide)
- COD, Chemical Oxygen Demand [water, surface water]: 1e-5 kg; lognormal variance with pedigree 0.0926, pedigree (1,3,5,5,1)
  Order of magnitude estimate
- Particulates, > 10 um [air, urban air close to ground]: 1.6e-5 kg; lognormal variance with pedigree 0.1101, pedigree (1,2,5,5,3)
  (same comment as for Particulates, < 2.5 um)
- Hydrogen fluoride [air, urban air close to ground]: 1.8e-5 kg; lognormal variance with pedigree 0.1101, pedigree (1,2,5,5,3)
  (same comment as for Sulfur dioxide)

## Extrapolations
Extrapolated from European data. The uncertainty has been adjusted accordingly.

## Review by Bo Weidema 2012-08-02
Manually extrapolated GLO dataset to replace the automatically extrapolated dataset, which was "resultsOnly" due to confidential Swiss data.

## Review by Hans-Jörg Althaus 2003-08-20
passed

## Review by Emilia Moreno Ruiz 2013-07-22
correction of the glass cullet, sorted supply chain
