# fluorescent whitening agent production, DAS1, triazinylaminostilben type

Dataset: EcoSpold 2, unit process
Geography: RoW
Time period: 1997-01-01 to 2021-12-31
Technology level: current
Classification: ISIC rev.4 ecoinvent: 2011:Manufacture of basic chemicals
Classification: EcoSpold01Categories: washing agents/auxiliary agents
Tags: ConvertedDataset
Scenario: Business-as-Usual
System model: Allocation, cut-off by classification
Share of production covered: 40 %
Generated by: Rainer Zah
Published in: Zah R. 2004
Database: ecoinvent
isCopyrightProtected: true
accessRestrictedTo: 1

## General comment
data based on company information for a former detergent study of EMPA
[This dataset was already contained in the ecoinvent database version 2. It was not individually updated during the transfer to ecoinvent version 3. Life Cycle Impact Assessment results may still have changed, as they are affected by changes in the supply chain, i.e. in other datasets. This dataset was generated following the ecoinvent quality guidelines for version 2. It may have been subject to central changes described in the ecoinvent version 3 change report (http://www.ecoinvent.org/database/ecoinvent-version-3/reports-of-changes/), and the results of the central updates were reviewed extensively. The changes added e.g. consistent water flows and other information throughout the database. The documentation of this dataset can be found in the ecoinvent reports of version 2, which are still available via the ecoinvent website. The change report linked above covers all central changes that were made during the conversion process.]

## Included activities end
This module contains material and energy input, production of waste and emissions for the production of the mentioned FWA (fluorescent whitening agent). Transport and infrastructure have been estimated.

## Geography
data from European main producer, used as European average

## Technology
Typcial production process for end of 90s

## Time period
year of reported data

## Parameters
- fraction, process water, to air: 0.4 dimensionless; name fraction_PW_to_air; lognormal variance with pedigree 0.092025, pedigree (4,4,3,2,4)

## Reference product
- fluorescent whitening agent, DAS1, triazinylaminostilben type: 1 kg; CPC 34310: Synthetic organic colouring matter and preparations based thereon; synthetic organic products of a kind used a[…]; By-product classification allocatable product; CAS 16090-02-1
  EcoSpold01Location=RER
  production volume 2.67763 kg
    This is a placeholder value that does not reflect real-world production volumes. This dataset does not currently require a real-world production volume to work in the database framework, and no actual data were collected yet. This has no negative effect on the results of the ecoinvent database.
  property carbon content, non-fossil 0
    4,4'-bis-[(4-anilino-6-morpholino-1,3,5-triazin-2-ly)amino]stilbene-2,2'-disulfonate (DAS-1, C40 H38 N12 Na2O8 S2) has a MW of 925 g/mol, (FWA-1, SIDS Publications, UNEP).
  property heating value, net 20.72 MJ
    LHV is calculated based on the elemental composition of the substance. Based on the CAS number of the substance (016090-02-1), the chemical formula of the substance is found to be: C40H38N12Na2O8S2, (PubChem 2020).
    Reference: Kim, S., Chen, J., Cheng, T., Gindulyte, A., He, J., He, S., Li, Q., Shoemaker, B. A., Thiessen, P. A., Yu, B., Zaslavsky, L., Zhang, J., & Bolton, E. E. (2019). PubChem 2019 update: improved access to chemical data. Nucleic acids research, 47(D1), D1102–D1109. https://doi.org/10.1093/nar/gky1033
  property carbon content, fossil 0.518919
    4,4'-bis-[(4-anilino-6-morpholino-1,3,5-triazin-2-ly)amino]stilbene-2,2'-disulfonate (DAS-1) has a MW of 925 g/mol, and 40 C atoms in its structure (FWA-1, SIDS Publications, UNEP).
  property carbon content 0.518919
    carbon content on a dry matter basis (reserved; not for manual entry)
  properties: water content 0, water in wet mass 0 kg, price 1.57 EUR2005, wet mass 1 kg, dry mass 1 kg, carbon allocation 0.518919 kg

## Inputs from technosphere
- chemical factory, organics: 1.2e-9 unit; lognormal variance with pedigree 0.3532, pedigree (2,3,5,5,1)
  EcoSpold01Location=RER
  Uncertainty: ;
- inert waste, for final disposal: -0.178 kg; lognormal variance with pedigree 0.0532, pedigree (2,3,5,5,1)
  EcoSpold01Location=CH
  Uncertainty: ;
  production volume 0.476618 kg
    Calculated from the production volume of fluorescent whitening agent, DAS1, triazinylaminostilben type in proportion to the respective output amounts.
  properties: water content 0.00502513, dry mass 0.995 kg, wet mass 1 kg
- average incineration residue: -0.0695 kg; lognormal variance with pedigree 0.0532, pedigree (2,3,5,5,1)
  EcoSpold01Location=CH
  Uncertainty: ;
  production volume 0.186095 kg
    (same comment as for inert waste, for final disposal)
  properties: carbon content, non-fossil 0.0511208, carbon content, fossil 0.0325466, dry mass 1 kg, wet mass 1 kg
  note on carbon content, non-fossil: Tab A.1, ecoinvent v2.2 report 13_I. It is considered that 61.1% of the C has a biogenic origin
- municipal solid waste: 0 kg; pedigree (1,1,1,1,1)
  EcoSpold01Location=CH
  Uncertainty: ;
  production volume 0 kg
    (same comment as for inert waste, for final disposal)
  properties: carbon content, fossil 0.171549, water content 0.297017, carbon content, non-fossil 0.261655, dry mass 0.771 kg, wet mass 1 kg, heating value, net 11.74 MJ
  note on carbon content, fossil: MSW composition in tab 4.1, ecoinvent v2.2 report 13_I. C content referred to 1 kg DM
  note on heating value, net: Value taken from the general comment of the treatment dataset.
- hazardous waste, for incineration: -1.51e-9 kg; lognormal variance with pedigree 0.0532, pedigree (2,3,5,5,1)
  EcoSpold01Location=CH
  Uncertainty: ;
  production volume 4.04322e-9 kg
    (same comment as for inert waste, for final disposal)
  properties: heating value, net 17 MJ, water content 0.333333, carbon content, fossil 0.554667, wet mass 1 kg, dry mass 0.75 kg
  note on carbon content, fossil: Tab A.6, ecoinvent v2.2 report 13_I. C content has been calculated after data in the tables, and then referred to 1 kg DM
- municipal solid waste: -7.61795e-5, -1.91953e-5, -2.74313e-5, -0.0538772 kg (4 entries); lognormal variance with pedigree 0.0532, pedigree (2,3,5,5,1)
  EcoSpold01Location=CH
  Uncertainty: ;
  production volume 0.144592 kg

## Inputs from nature
- Energy, potential (in hydropower reservoir), converted [natural resource, in water]: 4.62 MJ
- Gas, natural, in ground [natural resource, in ground]: 1.68 m3; lognormal variance with pedigree 0.0532, pedigree (2,3,5,5,1)
  Uncertainty: ;
- Phosphorus, in ground [natural resource, in ground]: 0.00612 kg; lognormal variance with pedigree 0.0532, pedigree (2,3,5,5,1)
  18% P in apatite; 12% in ore
  Uncertainty: ;
- Water, unspecified natural origin [natural resource, in water]: 2.335 m3; name water_UNO_input; source EMPA - Swiss Federal Laboratories for Ma 1999; lognormal variance with pedigree 0.0546, pedigree (3,3,5,5,1)
  Calculated based on literature, (Vionnet, S., Quantis Water Database - Technical Report, 2012). Via 4.4 - Dinitrostilbene-2.2-disulphonic acid (produced with Hypochlorite-Oxidation) and 4.4_Di-aminostilbene-2.2-di-sulphonic acid, produced with Bechamps reduction.
  property carbon content, non-fossil 0; name C_content_non_fossil
  property carbon content, fossil 0.0104329; name C_content_fossil
  property dry mass 0.1101 kg; name DM
  property water in wet mass 999.89 kg; name WWM
  property water content 9081.65; name water_content
  property wet mass 1000 kg; name WM
- Uranium, in ground [natural resource, in ground]: 7.53e-5 kg; lognormal variance with pedigree 0.0532, pedigree (2,3,5,5,1)
  Uncertainty: ;
- Wood, unspecified, standing [natural resource, biotic]: 1.17e-5 m3; lognormal variance with pedigree 0.0532, pedigree (2,3,5,5,1)
  Uncertainty: ;
- Sand, unspecified, in ground [natural resource, in ground]: 0.00216 kg; lognormal variance with pedigree 0.0532, pedigree (2,3,5,5,1)
  Uncertainty: ;
- Sylvite, in ground [natural resource, in ground]: 4.39e-5 kg; lognormal variance with pedigree 0.0532, pedigree (2,3,5,5,1)
  25% Sylvite in sylvinite
  Uncertainty: ;
- Oil, crude, in ground [natural resource, in ground]: 1.54 kg; lognormal variance with pedigree 0.0532, pedigree (2,3,5,5,1)
  Uncertainty: ;
- Calcite, in ground [natural resource, in ground]: 0.382 kg; lognormal variance with pedigree 0.0532, pedigree (2,3,5,5,1)
  Uncertainty: ;
- Iron, in ground [natural resource, in ground]: 0.286 kg; lognormal variance with pedigree 0.0532, pedigree (2,3,5,5,1)
  46% Fe in siderite; 25% Fe in ore
  Uncertainty: ;
- Coal, hard, unspecified, in ground [natural resource, in ground]: 1.23 kg; lognormal variance with pedigree 0.0532, pedigree (2,3,5,5,1)
  Uncertainty: ;
- Aluminium, in ground [natural resource, in ground]: 0.00122 kg; lognormal variance with pedigree 0.0532, pedigree (2,3,5,5,1)
  24% Al in bauxite; 11% Al in ore
  Uncertainty: ;
- Sodium chloride, in ground [natural resource, in ground]: 2.27 kg; lognormal variance with pedigree 0.0532, pedigree (2,3,5,5,1)
  Uncertainty: ;
- Coal, brown, in ground [natural resource, in ground]: 0.85 kg; lognormal variance with pedigree 0.0532, pedigree (2,3,5,5,1)
  Uncertainty: ;

## Emissions to nature
- Lead [air, urban air close to ground]: 3.22e-6 kg; lognormal variance with pedigree 0.7032, pedigree (2,3,5,5,1)
  Uncertainty: ;
- Carbon monoxide, fossil [air, urban air close to ground]: 0.00521 kg; lognormal variance with pedigree 0.7032, pedigree (2,3,5,5,1)
  Uncertainty: ;
- PAH, polycyclic aromatic hydrocarbons [air, urban air close to ground]: 3.41e-7 kg; lognormal variance with pedigree 0.1732, pedigree (2,3,5,5,1)
  Uncertainty: ;
- Manganese [air, urban air close to ground]: 1.46e-6 kg; lognormal variance with pedigree 0.0932, pedigree (2,3,5,5,1)
  Uncertainty: ;
- Nickel [air, urban air close to ground]: 1.84e-5 kg; lognormal variance with pedigree 0.7032, pedigree (2,3,5,5,1)
  Uncertainty: ;
- Toluene [water, surface water]: 5.38e-6 kg; lognormal variance with pedigree 0.3532, pedigree (2,3,5,5,1)
  Uncertainty: ;
- BOD5, Biological Oxygen Demand [water, surface water]: 2.05e-5 kg; lognormal variance with pedigree 0.0932, pedigree (2,3,5,5,1)
  Uncertainty: ;
- Chlorinated solvents, unspecified [water, surface water]: 5.38e-8 kg; lognormal variance with pedigree 0.3532, pedigree (2,3,5,5,1)
  Uncertainty: ;
- DOC, Dissolved Organic Carbon [water, surface water]: 0.0976 kg; lognormal variance with pedigree 0.0932, pedigree (2,3,5,5,1)
  Uncertainty: ;
- Barium [water, surface water]: 0.000256 kg; lognormal variance with pedigree 0.7032, pedigree (2,3,5,5,1)
  Uncertainty: ;
- Aluminium [water, surface water]: 0.00185 kg; lognormal variance with pedigree 0.7032, pedigree (2,3,5,5,1)
  Uncertainty: ;
- Arsenic, ion [water, surface water]: 3.73e-6 kg; lognormal variance with pedigree 0.7032, pedigree (2,3,5,5,1)
  Uncertainty: ;
- Cyanide [water, surface water]: 1.92e-6 kg; lognormal variance with pedigree 0.0932, pedigree (2,3,5,5,1)
  Uncertainty: ;
- Hydrogen fluoride [air, urban air close to ground]: 8.24e-5 kg; lognormal variance with pedigree 0.0932, pedigree (2,3,5,5,1)
  Uncertainty: ;
- Particulates, < 2.5 um [air, urban air close to ground]: 0.003125 kg; lognormal variance with pedigree 0.0932, pedigree (2,3,5,5,1)
  Uncertainty: ;
- Water [air, unspecified]: 0.934 m3; name water_to_air_unspecified; lognormal variance with pedigree 0.0827, pedigree (2,2,5,5,1)
  Calculated value based on literature values and expert opinion. See comments in the parametres' comment field.
  property fraction, origin: salt water 0; name fraction_origin_salt_water
  property fraction, origin: fresh water 0; name fraction_origin_fresh_water
  property fraction, origin: unspecified 1; name fraction_origin_unspecified
- Phosphate [water, surface water]: 0.00218 kg; lognormal variance with pedigree 0.0932, pedigree (2,3,5,5,1)
  Uncertainty: ;
- Phenol [water, surface water]: 9.22e-6 kg; lognormal variance with pedigree 0.3532, pedigree (2,3,5,5,1)
  Uncertainty: ;
- Water [water, unspecified]: 1.401 m3; name water_to_water_unspecified; lognormal variance with pedigree 0.0827, pedigree (2,2,5,5,1)
  (same comment as for Water)
  property fraction, origin: unspecified 1; name fraction_origin_unspecified_Ww
  property fraction, origin: fresh water 0; name fraction_origin_fresh_water_Ww
  property fraction, origin: salt water 0; name fraction_origin_salt_water_Ww
- Hydrocarbons, chlorinated [air, urban air close to ground]: 2.09e-9 kg; lognormal variance with pedigree 0.1732, pedigree (2,3,5,5,1)
  Uncertainty: ;
- Copper, ion [water, surface water]: 9.67e-6 kg; lognormal variance with pedigree 0.7032, pedigree (2,3,5,5,1)
  Uncertainty: ;
- Antimony [water, surface water]: 2.05e-8 kg; lognormal variance with pedigree 0.7032, pedigree (2,3,5,5,1)
  Uncertainty: ;
- Nitrogen oxides [air, urban air close to ground]: 0.0326 kg; lognormal variance with pedigree 0.0932, pedigree (2,3,5,5,1)
  Uncertainty: ;
- Hydrocarbons, unspecified [water, surface water]: 0.00125 kg; lognormal variance with pedigree 0.3532, pedigree (2,3,5,5,1)
  Uncertainty: ;
- Radioactive species, Nuclides, unspecified [water, surface water]: 59.4 kBq; lognormal variance with pedigree 0.3532, pedigree (2,3,5,5,1)
  Uncertainty: ;
- Chromium, ion [water, surface water]: 1.91e-5 kg; lognormal variance with pedigree 0.7032, pedigree (2,3,5,5,1)
  Uncertainty: ;
- Iron, ion [water, surface water]: 0.00185 kg; lognormal variance with pedigree 0.7032, pedigree (2,3,5,5,1)
  Uncertainty: ;
- Nitrogen [water, surface water]: 0.015 kg; lognormal variance with pedigree 0.0932, pedigree (2,3,5,5,1)
  Uncertainty: ;
- Chloride [water, surface water]: 0.922 kg; lognormal variance with pedigree 0.0932, pedigree (2,3,5,5,1)
  Uncertainty: ;
- NMVOC, non-methane volatile organic compounds, unspecified origin [air, urban air close to ground]: 0.019 kg; lognormal variance with pedigree 0.1732, pedigree (2,3,5,5,1)
  Uncertainty: ;
- Particulates, > 10 um [air, urban air close to ground]: 0.004 kg; lognormal variance with pedigree 0.0932, pedigree (2,3,5,5,1)
  Uncertainty: ;
- Hydrocarbons, aromatic [water, surface water]: 3.92e-5 kg; lognormal variance with pedigree 0.3532, pedigree (2,3,5,5,1)
  Uncertainty: ;
- Zinc, ion [water, surface water]: 2.06e-5 kg; lognormal variance with pedigree 0.7032, pedigree (2,3,5,5,1)
  Uncertainty: ;
- Methane, bromotrifluoro-, Halon 1301 [air, urban air close to ground]: 2.1e-7 kg; lognormal variance with pedigree 0.1732, pedigree (2,3,5,5,1)
  Uncertainty: ;
- Mercury [water, surface water]: 5.3e-9 kg; lognormal variance with pedigree 0.7032, pedigree (2,3,5,5,1)
  Uncertainty: ;
- Sulfur dioxide [air, urban air close to ground]: 0.0715 kg; lognormal variance with pedigree 0.0532, pedigree (2,3,5,5,1)
  Uncertainty: ;
- Ammonia [air, urban air close to ground]: 0.0213 kg; lognormal variance with pedigree 0.0932, pedigree (2,3,5,5,1)
  Uncertainty: ;
- Lead [water, surface water]: 1.08e-5 kg; lognormal variance with pedigree 0.7032, pedigree (2,3,5,5,1)
  Uncertainty: ;
- Nitrate [water, surface water]: 0.00339 kg; lognormal variance with pedigree 0.0932, pedigree (2,3,5,5,1)
  Uncertainty: ;
- Hydrocarbons, aromatic [air, urban air close to ground]: 5.06e-5 kg; lognormal variance with pedigree 0.3532, pedigree (2,3,5,5,1)
  Uncertainty: ;
- TOC, Total Organic Carbon [water, surface water]: 0.0989 kg; lognormal variance with pedigree 0.0932, pedigree (2,3,5,5,1)
  Uncertainty: ;
- Chlorine [air, urban air close to ground]: 2.15e-10 kg; lognormal variance with pedigree 0.0932, pedigree (2,3,5,5,1)
  Uncertainty: ;
- Methane, fossil [air, urban air close to ground]: 0.0171 kg; lognormal variance with pedigree 0.0932, pedigree (2,3,5,5,1)
  Uncertainty: ;
- Zinc [air, urban air close to ground]: 4.67e-6 kg; lognormal variance with pedigree 0.7032, pedigree (2,3,5,5,1)
  Uncertainty: ;
- Cadmium [air, urban air close to ground]: 7.63e-7 kg; lognormal variance with pedigree 0.7032, pedigree (2,3,5,5,1)
  Uncertainty: ;
- Fluoride [water, surface water]: 2.04e-5 kg; lognormal variance with pedigree 0.0932, pedigree (2,3,5,5,1)
  Uncertainty: ;
- Ammonium, ion [water, surface water]: 0.00208 kg; lognormal variance with pedigree 0.0932, pedigree (2,3,5,5,1)
  Uncertainty: ;
- Nickel, ion [water, surface water]: 1.04e-5 kg; lognormal variance with pedigree 0.7032, pedigree (2,3,5,5,1)
  Uncertainty: ;
- Sulfide [water, surface water]: 3e-6 kg; lognormal variance with pedigree 0.0932, pedigree (2,3,5,5,1)
  Uncertainty: ;
- Particulates, > 2.5 um, and < 10um [air, urban air close to ground]: 0.005375 kg; lognormal variance with pedigree 0.0932, pedigree (2,3,5,5,1)
  Uncertainty: ;
- Cadmium, ion [water, surface water]: 1.52e-7 kg; lognormal variance with pedigree 0.7032, pedigree (2,3,5,5,1)
  Uncertainty: ;
- COD, Chemical Oxygen Demand [water, surface water]: 0.000122 kg; lognormal variance with pedigree 0.0932, pedigree (2,3,5,5,1)
  Uncertainty: ;
- Radioactive species, other beta emitters [air, urban air close to ground]: 6490 kBq; lognormal variance with pedigree 0.3532, pedigree (2,3,5,5,1)
  Uncertainty: ;
- Dinitrogen monoxide [air, urban air close to ground]: 0.000203 kg; lognormal variance with pedigree 0.0932, pedigree (2,3,5,5,1)
  Uncertainty: ;
- Benzene [air, urban air close to ground]: 2.35e-5 kg; lognormal variance with pedigree 0.3532, pedigree (2,3,5,5,1)
  Uncertainty: ;
- Mercury [air, urban air close to ground]: 1.6e-7 kg; lognormal variance with pedigree 0.7032, pedigree (2,3,5,5,1)
  Uncertainty: ;
- Carbon dioxide, fossil [air, urban air close to ground]: 10.1 kg; lognormal variance with pedigree 0.0532, pedigree (2,3,5,5,1)
  Uncertainty: ;
- Sulfate [water, surface water]: 0.152 kg; lognormal variance with pedigree 0.0932, pedigree (2,3,5,5,1)
  Uncertainty: ;
- Hydrogen chloride [air, urban air close to ground]: 0.00163 kg; lognormal variance with pedigree 0.1732, pedigree (2,3,5,5,1)
  Uncertainty: ;
- Solids, inorganic [water, surface water]: 1.32 kg; lognormal variance with pedigree 0.0932, pedigree (2,3,5,5,1)
  Uncertainty: ;
- PAH, polycyclic aromatic hydrocarbons [water, surface water]: 5.76e-7 kg; lognormal variance with pedigree 0.3532, pedigree (2,3,5,5,1)
  Uncertainty: ;
- Nitrogen, organic bound [water, surface water]: 5.89e-6 kg; lognormal variance with pedigree 0.0932, pedigree (2,3,5,5,1)
  Uncertainty: ;

## Sampling procedure
aggregated data, calculated by the producing company itself

## Extrapolations
see geography and technology This dataset has been copied from an original dataset covering the geography RER. The uncertainty has been adjusted accordingly.

## Review by Heiko Kunst 2007-11-15
passed.
