# ethoxylated alcohol (AE3) production, petrochemical

Dataset: EcoSpold 2, unit process
Geography: RER
Time period: 1992-01-01 to 2021-12-31
Technology level: current
Classification: ISIC rev.4 ecoinvent: 2023:Manufacture of soap and detergents, cleaning and polishing preparations, pe
Classification: EcoSpold01Categories: washing agents/tensides
Tags: ConvertedDataset
Scenario: Business-as-Usual
System model: Allocation, cut-off by classification
Share of production covered: 40 %
Generated by: Rainer Zah
Published in: Zah R. 2007
Database: ecoinvent
isCopyrightProtected: true
accessRestrictedTo: 1

## General comment
data based on the ECOSOL study of the European surfactant industry. Allocations in multioutput processes were made, using the relative mass outputs of products.
[This dataset was already contained in the ecoinvent database version 2. It was not individually updated during the transfer to ecoinvent version 3. Life Cycle Impact Assessment results may still have changed, as they are affected by changes in the supply chain, i.e. in other datasets. This dataset was generated following the ecoinvent quality guidelines for version 2. It may have been subject to central changes described in the ecoinvent version 3 change report (http://www.ecoinvent.org/database/ecoinvent-version-3/reports-of-changes/), and the results of the central updates were reviewed extensively. The changes added e.g. consistent water flows and other information throughout the database. The documentation of this dataset can be found in the ecoinvent reports of version 2, which are still available via the ecoinvent website. The change report linked above covers all central changes that were made during the conversion process.]

## Included activities end
This module contains material and energy input, transport efforts, production of waste and emissions for the production of alcohol etoxylate out of fatty alcohols and ethylene oxide. Infrastructure has been estimated. No water consumption included.

## Geography
Data based on the European ethoxylated alcohols production

## Technology
Alcohol ethoxylates (AE) are produced by the reaction of fatty alcohols with ethylene oxide leading to a condensation of polyethylene glycolether groups on the alcohol chains. The fatty alcohols can be derived from petrochemical, palm kernel, or coconut oil. The reaction takes place at temperatures ranging from 150°C to 200°C. The grade of ethoxylation, e.g. the specific number of polyether units condensed to the alcohol chains, is controlled by the concentration of ethylene oxide in the ethoxylation process.
This is an average technology for the production of AE representing typical European production mix in the mid 90s.
Reference:
Schul W. (1995) A Life-Cycle Inventory for the Production of Detergent Range Alcohol Ethoxylates in Europe. In: Tenside, Surfactants, Detergents, 32(2), pp. 171-192.
Stalmans M., Berenbold H., Berna J. L., Cavalli L., Dillarstone A., Franke M., Hirsinger F., Janzen D., Kosswig K., Postlethwaite D., Rappert T., Renta C., Scharer D., Schick K.-P., Schul W., Thomas H. and Sloten R. V. (1995) European Life-Cycle Inventory for Detergent Surfactants Production. In: Tenside, Surfactants, Detergents, 32(2), pp. 84-109

## Time period
data of published literature

## Reference product
- ethoxylated alcohol (AE3): 1 kg; By-product classification allocatable product; CPC 353: Soap, cleaning preparations, perfumes and toilet preparations
  EcoSpold01Location=RER
  production volume 1.5138e6 kg; = 17.4%*50%*6%*290000000
    Estimated value. The European production volume is estimated based on information from Cefic (European Chemical Industry Council) and the American Chemistry Council.
    According to Cefic (2016) the global sales of chemicals in the year 2015 was 3 534 billion euros. The reported share of sales per region are: EU28 14.7%; Other Europe (Switzerland, Norway, Turkey, Russia and Ukraine) 2.7%; NAFTA (US, Canada and Mexico) 16.5%; Latin America 3.8%; China 39.9%; Japan 3.9%; Republic of Korea 3.2%; India 2.2%; Rest of Asia 11.9%; Rest of the World 1.3%, Switzerland 1%. Cefic also reports the US total sales, which amount to 518.7 billion euros out of the global 3 534 billion euros (14.7%). The same share is reported by the American Chemistry Council (2016), according to which the USA sales account for 15% of global sales for the year 2016.
    Estimated value. According to HERA (2009) the global production volume is estimated to be 290000000 kg for the year of 2003. Moreover, it is assumed that 50% of ethoxylated alcohols originate from vegetable oil sources whilst the remaining 50% comes from petrochemical origins. It is furthermore assumed that the amount of it, that is produced from palm coconut oil is relative to the actual share of palm oil in the vegetable oil market, a value calculated from FAOSTAT assuming that palm (51%), palm kernel (6%), coconut (3%) and soybean oil (41%) formulate the market of vegatable oils. In addition, according to HERA 2009, the distribution of AE3 on household products is 6%.
    Reference:
    HERA 2009, Human & Environmental Risk Assessment on ingredients of European household cleaning products, Alcohol Ethoxylates, September 2009.
    FAOSTAT, 2017, Food and Agricultural Organization of the United Nations. Accessible at: http://www.fao.org/faostat/en/#data/QD
    Cefic 2016. Facts and figures 2016 of the European chemical industry. Accessible at: http://www.cefic.org/Facts-and-Figures/Chemicals-Industry-Profile/
    American Chemistry Council 2016. Outlook: U.S. Chemical Industry Continues to Outpace Industrial Output; Accounts for More Than One-Half of Construction Spending by Manufacturing Sector. Accessible at: https://www.americanchemistry.com/Media/PressReleasesTranscripts/ACC-news-releases/US-Chemical-Industry-Continues-to-Outpace-Industrial-Output.html
  property carbon content, non-fossil 0
    The generic chemical structure of AE is: CH3-(CH2)n-CHR-CH2-(O-CH2-CH2)m-OH (n = 5-15, m = 2-100, R = H or n-alkyl). AE are produced by the reaction of fatty alcohols with ethylene oxide leading to a condensation of polyethylene glycolether groups on the alcohol chains (ecoinvent report 12-part 4). Fatty alcohols were considered to have an average length of C14. Ethoxylated alcohol (AE3) has an average value of three polyether units (AE3) (ecoinvent report 12-part 4). The formula that has then been used to calculate the C content of the products is CH3-(CH2)11-CH2-CH2-(O-CH2-CH2)3-OH. In this molecule, all C has a fossile origin, as fatty alcohols are produced from petrochemical oil
  property price 1.87833 EUR2005
    Calculated based on inputs: The price of the product has been calculated as a sum of the values of the material and energy inputs for this product. This value is therefore a rough estimation. It may underestimate the real price since there are additional expenses when producing any product. These expences can include for example labour costs, treatment of waste materials and profit for the producer. Please consider carefully whether this level of data quality is acceptable for your application.
  property carbon content, fossil 0.693173
    (same comment as for ethoxylated alcohol (AE3))
  property heating value, net 21 MJ
    LHV is calculated based on the Carbon content of the product. More details can be found on the respective documentation.
  property carbon content 0.693173
    carbon content on a dry matter basis (reserved; not for manual entry)
  properties: dry mass 1 kg, water in wet mass 0 kg, water content 0, wet mass 1 kg, carbon allocation 0.693173 kg

## Inputs from technosphere
- heat, district or industrial, other than natural gas: 0.46 MJ; lognormal variance with pedigree 0.051225, pedigree (2,3,5,2,1)
  EcoSpold01Location=RER
  properties: heating value, net 1 MJ
- heat, district or industrial, natural gas: 0.24 MJ; lognormal variance with pedigree 0.051225, pedigree (2,3,5,2,1)
  EcoSpold01Location=RER
  properties: heating value, net 1 MJ
- electricity, medium voltage: 0.0624 kWh; lognormal variance with pedigree 0.051225, pedigree (2,3,5,2,1)
  EcoSpold01Location=UCTE
- fatty alcohol: 0.615 kg; lognormal variance with pedigree 0.051225, pedigree (2,3,5,2,1)
  EcoSpold01Location=RER
  Literature Value.
  properties: heating value, net 41.01 MJ, carbon content, non-fossil 0.743434, carbon content, fossil 0.0408973, dry mass 1 kg, wet mass 1 kg
  note on carbon content, non-fossil: The generic chemical structure of AE is: CH3-(CH2)n-CHR-CH2-(O-CH2-CH2)m-OH (n = 5-15, m = 2-100, R = H or n-alkyl). AE are produced by the reaction of fatty alcohols with ethylene oxide leading to a condensation of polyethylene glycolether groups on the alcohol chains (ecoinvent report 12-part 4). Fatty alcohols were considered to have an average length of C14. Ethoxylated alcohol (AE3) has an average value of three polyether units (AE3) (ecoinvent report 12-part 4). The formula that has then been used to calculate the C content of the products is CH3-(CH2)11-CH2-CH2-(O-CH2-CH2)3-OH. In this molecule, all C has a fossile origin, as fatty alcohols are produced from petrochemical oil Fatty alcohols have chain lengths between C6 and C22, their chemical formula is CH3(CH2)nCH2OH (ecoinvent v2.2 report 12, pg 16). As an average, C14 was used. The dataset represents a mix of 27% produced from fatty acid splitting and 73% produced from methyl ester (ecoinvent v2.2 report 12, pg 21). In the methyl esterification, methanol (CH3OH) has a fossil origin
- ethylene oxide: 0.388 kg; lognormal variance with pedigree 0.051225, pedigree (2,3,5,2,1)
  EcoSpold01Location=RER
  properties: dry mass 1 kg, wet mass 1 kg, carbon content, fossil 0.545455, heating value, net 27.53 MJ
  note on carbon content, fossil: The generic chemical structure of AE is: CH3-(CH2)n-CHR-CH2-(O-CH2-CH2)m-OH (n = 5-15, m = 2-100, R = H or n-alkyl). AE are produced by the reaction of fatty alcohols with ethylene oxide leading to a condensation of polyethylene glycolether groups on the alcohol chains (ecoinvent report 12-part 4). Fatty alcohols were considered to have an average length of C14. Ethoxylated alcohol (AE3) has an average value of three polyether units (AE3) (ecoinvent report 12-part 4). The formula that has then been used to calculate the C content of the products is CH3-(CH2)11-CH2-CH2-(O-CH2-CH2)3-OH. In this molecule, all C has a fossile origin, as fatty alcohols are produced from petrochemical oil C2H4O
- nitrogen, liquid: 0.018 kg; lognormal variance with pedigree 0.051225, pedigree (2,3,5,2,1)
  EcoSpold01Location=RER
  properties: dry mass 1 kg, wet mass 1 kg
- chemical factory, organics: 4e-10 unit; lognormal variance with pedigree 0.351225, pedigree (2,3,5,2,1)
  EcoSpold01Location=RER
  activityLink introduced to establish a direct link to the corresponding regional supply of this product

## Emissions to nature
- NMVOC, non-methane volatile organic compounds, unspecified origin [air, urban air close to ground]: 0.002 kg; lognormal variance with pedigree 0.091225, pedigree (2,3,5,2,1)
- Ammonia [air, urban air close to ground]: 6.93e-6 kg; lognormal variance with pedigree 0.091225, pedigree (2,3,5,2,1)
- Nitrogen oxides [air, urban air close to ground]: 7.68e-5 kg; lognormal variance with pedigree 0.091225, pedigree (2,3,5,2,1)
- Carbon dioxide, fossil [air, urban air close to ground]: 0.00444 kg; lognormal variance with pedigree 0.051225, pedigree (2,3,5,2,1)
- TOC, Total Organic Carbon [water, surface water]: 0.000448148 kg; lognormal variance with pedigree 0.091225, pedigree (2,3,5,2,1)
  Calculated by default as TOC (gC) = COD/2.7 (COD measured in g O2). Should more correctly be calculated from the carbon content of the specified emissions to water.
- Carbon monoxide, fossil [air, urban air close to ground]: 5.86e-5 kg; lognormal variance with pedigree 0.701225, pedigree (2,3,5,2,1)
- Particulates, > 10 um [air, urban air close to ground]: 6.14e-6 kg; lognormal variance with pedigree 0.091225, pedigree (2,3,5,2,1)
- Zinc, ion [water, surface water]: 2.07e-8 kg; lognormal variance with pedigree 0.701225, pedigree (2,3,5,2,1)
- DOC, Dissolved Organic Carbon [water, surface water]: 0.000448148 kg; lognormal variance with pedigree 0.091225, pedigree (2,3,5,2,1)
  Calculated as equal to TOC.
- BOD5, Biological Oxygen Demand [water, surface water]: 0.000899 kg; lognormal variance with pedigree 0.091225, pedigree (2,3,5,2,1)
- Suspended solids, unspecified [water, surface water]: 5.16e-6 kg; lognormal variance with pedigree 0.091225, pedigree (2,3,5,2,1)
- Phenol [water, surface water]: 6.42e-10 kg; lognormal variance with pedigree 0.351225, pedigree (2,3,5,2,1)
- Sulfur dioxide [air, urban air close to ground]: 0.000189 kg; lognormal variance with pedigree 0.051225, pedigree (2,3,5,2,1)
- Chromium, ion [water, surface water]: 4.01e-7 kg; lognormal variance with pedigree 0.701225, pedigree (2,3,5,2,1)
- COD, Chemical Oxygen Demand [water, surface water]: 0.00121 kg; lognormal variance with pedigree 0.091225, pedigree (2,3,5,2,1)

## Sampling procedure
data out of ECOSOL study of European Surfactant Industry. Common translation rules used, reported in Chemical report (Althaus et al. 2003).

## Extrapolations
This dataset has been extrapolated from year 1995 to the year of the calculation (2021). The uncertainty has been adjusted accordingly.

## Review by Emilia Moreno Ruiz 2017-08-09
This dataset was additionally reviewed in a separate review process by Eric Johnson of Atlantic Consulting as well as Emilia Moreno Ruiz and Gregor Wernet of ecoinvent.

## Review by Heiko Kunst 2003-08-06
Passed.
