# polyethylene terephthalate production, granulate, amorphous, recycled

Dataset: EcoSpold 2, unit process
Geography: Europe without Switzerland
Time period: 2010-01-01 to 2021-12-31
Technology level: current
Classification: ISIC rev.4 ecoinvent: 3830:Materials recovery
Scenario: Business-as-Usual
System model: Allocation, cut-off by classification
Generated by: Thomas Kägi
Published in: Franklin Associates 2011
Database: ecoinvent
isCopyrightProtected: true
accessRestrictedTo: 1

## General comment
The functional unit represents the production of 1 kg of polyethylene terephthalate granulate, recycled, amorphous. This process delivers the byproduct waste polethylene, unsorted, for recycling.
Energy demand and auxiliary materials of recycling process was extrapolated from the production of recycled PET granulate in the USA
Most of the reporting facilities receive postconsumer PET as individual resin bales. The bales must be broken down and the material sorted to remove foreign material. The sorted materials may or may not go through a pre-washing stage before they are granulated to flake. Some amount of reclaimed resin is received at the facility already in flake form. This flake may be clean or dirty, but all reclaimed flake is washed to market specifications as part of the reclaimer processing operations. This is most often achieved with a caustic wash, but different reclaimers reported using a variety of washing chemicals including surfactants, defoamers, and wetting agents. Even though the incoming material has undergone some presorting before it is received, other materials are mixed in with the PET. About 80 percent of the weight of incoming
material ends up as recycled PET resin. Unusable contaminants represent over 200 pounds of solid wastes per thousand pounds of useful output
The additional energy required to convert 1,000 pounds of recycled PET flake to resin pellets (218 kWh) is already included in the inventory.
The PET recycling data do not include solid stating to convert the resin to a bottle-ready state. If the recycled resin data are being used in a life cycle inventory for the production of bottles, the practitioner constructing the model may need to add energy for solid stating of the recycled PET resin.

## Included activities start
Service is starting with the receipt of bales of sorted waste PET

## Included activities end
This module includes all processes of the production of recycled PET granulate, amorphous up to the factory gate. Machinery infrastructure is excluded

## Allocation
no allocation involved

## Reference product
- polyethylene terephthalate, granulate, amorphous, recycled: 1 kg; name RP_amount; source Franklin Associates 2011; By-product classification allocatable product; CPC 34710: Polymers of ethylene, in primary forms; CAS 25038-59-9
  production volume 2.5e9 kg; name RP_PV
    Assumption: 5 mio tonnes of plastic recycling in Europe, half of it PET; waste input material (for treatment) and by-product/waste generated scaled accordingly
  property heating value, net 22.95 MJ
    Assumed equal to "polyethylene terephthalate, granulate, amorphous"
  property carbon content 0.625
    carbon content on a dry matter basis (reserved; not for manual entry)
  properties: water in wet mass 0 kg, carbon content, non-fossil 0, carbon content, fossil 0.625, dry mass 1 kg, wet mass 1 kg, price 0.84 EUR2005, water content 0, carbon allocation 0.625 kg

## Inputs from technosphere
All rows: source Franklin Associates 2011
- waste preparation facility: 2e-9 unit; lognormal variance with pedigree 0.1712, pedigree (4,3,5,5,5)
  properties: lifetime 50 year, lifetime capacity [kg] 5e8 kg
- wastewater, average: -0.0003947 m3; name BP_ww; lognormal variance with pedigree 0.0898, pedigree (5,5,5,4,2)
  production volume 986750 m3; = ABS(BP_ww/RP_amount*RP_PV)
    (same comment as for polyethylene terephthalate, granulate, amorphous, recycled)
  property price 0 EUR2005; name BP_ww_price_EUR2005
  properties: dry mass 0.346837 kg, water content 2882.2, carbon content, non-fossil 0.194039, wet mass 1000 kg
  note on carbon content, non-fossil: 0.0673 kg TOC/m3 (Tab A.17, ecoinvent v2.2 report 13_I). TOC was considered as Total Carbon.
- propane, burned in building machine: 2.82e-5 MJ; lognormal variance with pedigree 0.0898, pedigree (5,5,5,4,2)
  properties: heating value, net 1 MJ
- waste polyethylene terephthalate, for recycling, sorted: 1.25 kg; lognormal variance with pedigree 0.0898, pedigree (5,5,5,4,2)
  properties: wet mass 1 kg, dry mass 0.986 kg, water content 0.0141988, carbon content, fossil 0.624, heating value, net 22.95 MJ
- municipal solid waste: -0.22 kg; name BP_MSW; lognormal variance with pedigree 0.0898, pedigree (5,5,5,4,2)
  production volume 5.5e8 kg; = ABS(BP_MSW/RP_amount*RP_PV)
    (same comment as for polyethylene terephthalate, granulate, amorphous, recycled)
  property price 0 EUR2005; name BP_MSW_price_EUR2005
  properties: water content 0.297017, carbon content, non-fossil 0.261655, dry mass 0.771 kg, heating value, net 11.74 MJ, carbon content, fossil 0.171549, wet mass 1 kg
  note on carbon content, non-fossil: MSW composition in tab 4.1, ecoinvent v2.2 report 13_I. C content referred to 1 kg DM
  note on heating value, net: Value taken from the general comment of the treatment dataset.
- electricity, low voltage: 0.939162 kWh; lognormal variance with pedigree 0.0898, pedigree (5,5,5,4,2)
- sodium hydroxide, without water, in 50% solution state: 0.0238 kg; lognormal variance with pedigree 0.0898, pedigree (5,5,5,4,2)
  properties: dry mass 1 kg, wet mass 1 kg, heating value, net 3.03 MJ
- chemical, organic: 0.00673 kg; lognormal variance with pedigree 0.0898, pedigree (5,5,5,4,2)
  Proxy for cleaning chemicals
  properties: heating value, net 19.03 MJ, wet mass 1 kg, dry mass 1 kg, carbon content, fossil 0.628
  note on carbon content, fossil: This dataset is an unweighted average of 20 organic substances (listed in Tab 88.1, ecoinvent v2.2 report 8, part II), being part of the top100 chemicals included in this database. The C-content has also been calculated as an unweighted average of the C content of the substances composing this dataset.
- heat, district or industrial, natural gas: 2.71262 MJ; lognormal variance with pedigree 0.0898, pedigree (5,5,5,4,2)
  properties: heating value, net 1 MJ

## Inputs from nature
- Water, unspecified natural origin [natural resource, in water]: 0.0003947 m3; source Franklin Associates 2011; lognormal variance with pedigree 0.0898, pedigree (5,5,5,4,2)

## Emissions to nature
- VOC, volatile organic compounds, unspecified origin [air, unspecified]: 3.7e-5 kg; source Franklin Associates 2011; lognormal variance with pedigree 0.0898, pedigree (5,5,5,4,2)
- Particulates, > 2.5 um, and < 10um [air, unspecified]: 3.9e-5 kg; source Franklin Associates 2011; lognormal variance with pedigree 0.0898, pedigree (5,5,5,4,2)

## Sampling procedure
Uncertainty estimation according to the pedigree matrix

## Extrapolations
This dataset has been extrapolated from year 2010 to the year of the calculation (2021). The uncertainty has been adjusted accordingly.
