# chromite ore concentrate production

Dataset: EcoSpold 2, unit process
Geography: RoW
Time period: 1994-01-01 to 2021-12-31
Technology level: current
Classification: EcoSpold01Categories: metals/extraction
Classification: ISIC rev.4 ecoinvent: 0729:Mining of other non-ferrous metal ores
Scenario: Business-as-Usual
System model: Allocation, cut-off by classification
Share of production covered: 74 %
Generated by: Eleonora Crenna
Published in: Althaus H.-J. 2000
Database: ecoinvent
isCopyrightProtected: true
accessRestrictedTo: 1

## General comment
This dataset describes the production of 1 kg of chromite ore concentrate in 1994 for a worldwide production average. It is designed for the use of chromite as intermediary product in the production of ferrochromium, dichromate and refractories. Process data is taken mainly from a material flow analysis for the consumption of chromium compounds in Germany.
[This dataset is meant to replace the following datasets:]

## Included activities start
Mining process starting from chromite ore, in ground.

## Included activities end
The activity ends with the gravity concentration of the material, at the beneficiation facility.

The dataset includes the crushing, grounding and screening of mined ore, the production infrastructure for mining and beneficiation,and the disposal of overburden and tailings.

## Geography
This module relates to the global situation.

## Technology
Mining is done 21% open pit and 79% underground, followed by a benefication of the ore trough classification. Overburden and tailings are disposed near the mining site.
MINING:
Chromite ores are usually mined underground. An estimated share of 71% underground mining has been reported for activities in the mine production in 1994. This represents 78% of the total production. Of a surveyed part of 52% of the total world production, 69% of the chromite originated from stratiform deposits.
Emissions and waste: The major emissions are due to mineral born pollutants in the effluents. Open cut mining generates large quantities of dust, which contains elevated contents of metals. Rain percolates through overburden and leads to metal emissions to groundwater. Overburden is deposed close to the mine.
BENEFICIATION:
After mining, the ore is first crushed in several stages with jaw and / or cone crushers, and then subsequently ground with rod and or ball mills and finally screened for classification. In a second step the classified material is subjected to gravity concentration to separate the metal-bearing particles from the unwanted minerals. For this drum separators and de-watering screens for lumps are used and cone separators and a high-gradient magnetic separator for fine material. No flotation is done. The separated gangue is disposed in tailings ponds, the concentrated ore is fed to the metallurgy, which is on-site. Chromite yields vary in a range from 65% to 85%. There's no treatment of wastewater.
Emissions and waste: Ore handling and processing produce large amounts of dust, containing PM10 and several metals from the ore itself. Tailings are deposed as piles and in ponds. Since the tailings are not sulphidic, no acid rock drainage (ARD) occurs. In the tailings material the most significant contents are Cr and Ni, which occur as insoluble compounds and are considered not to cause any negative effects.
References:
Adelhardt W. and Antrekowitsch H. (1998) Stoffmengenflüsse und Energie-bedarf bei der Gewinnung ausgewählter mineralischer Rohstoffe; Teilstudie Chrom. In: Geologisches Jahrbuch, Vol. Sonderhefte SH 3. Bundesanstalt für Geowissenschaften und Rohstoffe, Hannover. ISBN 3-510-95831-4.
IPPC (2002) Integrated Pollution Prevention and Control (IPPC); Draft Refer-ence Document on Best Available Techniques for Management of Tailings and Waste-Rock in Mining Activities. European Commission. Retrieved at 01.03.2003 from http://www.jrc.es/pub/english.cgi/0/733169

## Time period
Data are considered valid from 1994 to 2017 (year of the production volume)

## Parameters
- fraction, process water, to air: 0.15 dimensionless; name fraction_PW_to_air; lognormal variance with pedigree 0.092025, pedigree (4,4,3,2,4)
  Literature value. In case when no industry/process specific data are available, default evaporation fraction value is used. This value is 15% and is based on literature (Statistics Canada, 2007 & Shaffer, K.H., 2008, Consumptive water use in the Great Lakes Basin, USGS & Shiklomanov, 2003, World Water Resources at the Beginning of the 21st Century) and has been approved by an expert.

## Reference product
- chromite ore concentrate: 1 kg; name RefProd; source Adelhardt W. 1998; By-product classification allocatable product; CPC 14290: Other non-ferrous metal ores and concentrates (other than uranium or thorium ores and concentrates)
  The world-wide average calculated chromite (25.5% Cr) content of raw ores is 37.3%. Chromite ore rarely contains more than 50 % Cr2O3; other minerals such as SiO2 can also be present.Chromite is a spinel FeO · Cr2O3. It contains 44.9% Chromium.
  Uses: Chromite ore is the central intermediary product in the chromium industry. From it the three main product groups are made: ferrochromium, chromium chemicals and refractories. Chromite is used directly in the refractory industry to make bricks, mortar, and ramming and gunning mixes. Chromite enhances thermal shock and slag resistance, volume stability, strength and is used mainly in the ferrous and non-ferrous industry, cement industry and glass manufacturing. In foundries for certain applications chromite is used as moulding sand, for which chromite sand with more specific properties is applied.
  EcoSpold01Location=GLO
  production volume 3.99112e10 kg; name PV_RP; = 46600000*1000
    According to USGS (2021), 46'600'000 metric tons of chromite ore were produced globally in 2018.
    Reference:
    USGS (2021). Chromium Statistics and Information, Advance Data Release of the 2019 Annual Tables. https://prd-wret.s3.us-west-2.amazonaws.com/assets/palladium/production/atoms/files/myb1-2019-chrom-adv.xlsx
  property iron content 0.249494; name RefProd_Fe_content; = 55.845/223.833
    iron content on a dry matter basis. Calculated value based on stoichiometry. Fe MW= 55.845 g/mol; FeOCr2O3 MW= 223.833 g/mol
  property chromium content 0.307; name RefProd_Cr_content
    chromium content on a dry matter basis. See comment to "chromite ore concentrate" exchange.
  property price 0.16 EUR2005
    Calculated value based on data from United Nations Commodity Trade Statistics Database (comtrade.un.org). UN comtrade category: 261000 Chromium ores and concentrates. Year 2005. Using exchange rate of 1EURO = 1.209 USD. Average of price of import into 5 main markets (EU, US, JP, IN and CN).
  property carbon content, non-fossil 0
    Chromite [53293-42-8] is a spinel FeO · Cr2O3. In nature it is a mixture described by the formula (Fe2+, Mg)O · (Cr, Al, Fe3+)2O3 (ecoinvent v2.2 report 10-part VI)
  property carbon content, fossil 0
    (same comment as for chromite ore concentrate)
  property carbon content 0
    carbon content on a dry matter basis (reserved; not for manual entry)
  properties: water content 0, wet mass 1 kg, water in wet mass 0 kg, dry mass 1 kg, carbon allocation 0 kg

## Inputs from technosphere
- electricity, high voltage: 0.0225 kWh; source Adelhardt W. 1998; lognormal variance with pedigree 0.0121, pedigree (3,2,4,5,1)
  Estimation: There's a share of 60% hydroelectricity due to the operations high and constant energy demand, as in the case of nickel mining.
  Further references:
  Hilbrans H. and Hinrichs W. (1999) Stoffmengenflüsse und Energiebedarf bei der Gewinnung ausgewählter mineralischer Rohstoffe; Teilstudie Nickel. In: Geologisches Jahrbuch, Vol. Sonderhefte SH 7. Bundesanstalt für Geowissenschaften und Rohstoffe, Hannover. ISBN 3-510-95829-2.
- aluminium hydroxide factory: 3.12e-15 unit; lognormal variance with pedigree 0.402, pedigree (5,5,3,5,1)
  Estimation from dataset author.
  Proxy: "aluminium hydroxide factory" is used as a proxy for the infrastructure for chromite ore beneficiation.
  EcoSpold01Location=RER
  Uncertainty: rough estimate
- mine infrastructure, open cast, non-ferrous metal: 2.15e-11 unit; lognormal variance with pedigree 0.402, pedigree (5,5,3,5,1)
  Estimation from dataset author: Mine has a lifetime of 51 years. 400 000 t / year --> 5E-11 units/ kg ore mined.
  EcoSpold01Location=GLO
  Uncertainty: rough estimate
- mine infrastructure, underground, non-ferrous metal: 5.27e-11 unit; lognormal variance with pedigree 0.402, pedigree (5,5,3,5,1)
  Estimation from dataset author: Mine has a lifetime of 50 years. 400 000 t / year --> 5E-11 units/ kg ore mined.
  EcoSpold01Location=GLO
  Uncertainty: rough estimate
- steel, chromium steel 18/8, hot rolled: 0.000446 kg; source IPPC 2002; lognormal variance with pedigree 0.0152, pedigree (2,3,3,5,1)
  Estimation: The steel input (abrasion) for milling is documented for a single Finnish chromite mine (Kula) and amounts to 300 g / t ground ore.
  Proxy: The mill (jaws, balls, etc.) consists of special austenitic manganese steel of Hadfield grade, which is approximated with chromium steel in the inventory.
  EcoSpold01Location=RER
  properties: carbon content, fossil 0.0008, dry mass 1 kg, wet mass 1 kg
  note on carbon content, fossil: Stainless steel model is the grade 304 steel (18/8 stainless, 18% chromium 8% nickel; max. 0.08% C)
- blasting: 0.00149 kg; source Adelhardt W. 1998; lognormal variance with pedigree 0.0107, pedigree (2,2,4,5,1)
  EcoSpold01Location=RER
  Literature value.
- non-sulfidic overburden, off-site: -1.77 kg; name overburden_amount; source Adelhardt W. 1998; lognormal variance with pedigree 0.0121, pedigree (3,2,4,5,1)
  Estimation: The overburden is disposed in piles near the mine. No overburden is refilled.
  EcoSpold01Location=GLO
  production volume 7.06428e10 kg; = PV_RP/RefProd*overburden_amount
    Calculated from the production volume of chromite ore concentrate in proportion to the respective output amounts.
  property price 0 EUR2005; name overburden_amount_price_EUR2005
  properties: dry mass 1 kg, wet mass 1 kg
- electricity, medium voltage: 0 kWh; source Adelhardt W. 1998; pedigree (1,1,1,1,1)
  Estimation: There's a share of 40% electricity from the grid, as in the case of nickel mining.
  Further references:
  Hilbrans H. and Hinrichs W. (1999) Stoffmengenflüsse und Energiebedarf bei der Gewinnung ausgewählter mineralischer Rohstoffe; Teilstudie Nickel. In: Geologisches Jahrbuch, Vol. Sonderhefte SH 7. Bundesanstalt für Geowissenschaften und Rohstoffe, Hannover. ISBN 3-510-95829-2.
  EcoSpold01Location=UCTE
- conveyor belt: 6.42e-8 m; lognormal variance with pedigree 0.402, pedigree (5,5,3,5,1)
  Estimation from dataset author.
  Modelled, based on “ISIC 0729” - pdf-document on the dedicated talk page of ecoinvent (www.ecoinvent.org/documentation).
  See part Regarding “chromite ore concentrate production, GLO 2003” dataset.
  EcoSpold01Location=RER
  Uncertainty: rough estimate
- diesel, burned in building machine: 0.0807 MJ; source Adelhardt W. 1998; lognormal variance with pedigree 0.0107, pedigree (2,2,4,5,1)
  EcoSpold01Location=GLO
  Estimation: Diesel consumption for functioning of mobile equipment used for exploration like drilling machines, scoop trams and underground trucks.
  properties: heating value, net 1 MJ
- non-sulfidic tailing, off-site: -0.486 kg; name tailing_amount; source Adelhardt W. 1998; lognormal variance with pedigree 0.0121, pedigree (3,2,4,5,1)
  EcoSpold01Location=GLO
  Estimation: No tailings are refilled.
  Uncertainty: reported values
  production volume 1.93968e10 kg; = PV_RP/RefProd*tailing_amount
    (same comment as for non-sulfidic overburden, off-site)
  property price 0 EUR2005; name tailing_amount_price_EUR2005
  property dry mass 0.7 kg; name DM_tailing
  property chromium content 0.62537; name tailing_amount_Cr_content; = ((RefProd*RefProd_Cr_content-chromium_input* chromium_input)/DM_tailing)/0.486
  property iron content 0.702551; name tailing_amount_Fe_content; = ((RefProd*RefProd_Fe_content-iron_input*iron_input)/DM_tailing)/0.486
  properties: water content 0.428571, wet mass 1 kg
  note on chromium content: chromium content on a dry matter basis. Calculated value to obtain balance, based on the chromium content of ores and chromite. 0.486 kg = tailing amount
- electricity, medium voltage: 4.14183e-6, 0.000152841, 1.41066e-5, 4.29706e-5, 1.21679e-5, 2.46893e-6, 3.21647e-6, 8.00951e-6, 3.29873e-5, 0.0001182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 kWh (46 entries); source Adelhardt W. 1998; lognormal variance with pedigree 0.0107, pedigree (2,2,4,5,1)
  (same comment as for electricity, medium voltage)

## Inputs from nature
- Gangue, in ground [natural resource, in ground]: 2.8466 kg; = RefProd+(tailing_amount*-1)+(overburden_amount*-1)-chromium_input-iron_input; lognormal variance with pedigree 0.0113, pedigree (2,2,4,5,1)
  Calculated to obtain mass balance considering 1.48 kg of ore and 1.74 kg of overburden per kg of chromite. See comment to "Chromium, in ground" exchange
- Transformation, to mineral extraction site [natural resource, land]: 1.08e-6 m2; source Martens P. N. 2002; lognormal variance with pedigree 0.1321, pedigree (3,2,4,5,1)
  Estimation: No direct land use for underground mining (71%) is inventoried. Land use for open pit mining (29%) per tonne of ore is assessed with 0.0025m2/t. Thus the average land transformation for mining (underground and open pit) is 0.000725 m2/t ore and the occupation is 0.0218 m2a/t ore (a lifetime of 30 years is assumed).
  Uncertainty: calculation based on reported value
- Transformation, from unspecified [natural resource, land]: 1.08e-6 m2; source Martens P. N. 2002; lognormal variance with pedigree 0.1321, pedigree (3,2,4,5,1)
  (same comment as for Transformation, to mineral extraction site)
- Iron, in ground [natural resource, in ground]: 0.102402 kg; name iron_input; = chromium_input/(AVERAGE(1.43;3.20;3.81;3.42;3.13)); lognormal variance with pedigree 0.0113, pedigree (2,2,4,5,1)
  Calculated based on the ratio Cr/Fe in chromite, according to Table 3.1, Part IV - Chromium in Classen et al. (2009). The average of the available ratios has been considered as representative of chromite at global level.
  Reference:
  Classen, M., Althaus, H.-J., Blaser, S., Tuchschmid, M., Jungbluth, N., Doka, G., Faist Emmenegger, M., Scharnhorst, W. (2009). Life Cycle Inventories of Metals. Final report ecoinvent data v2.1, No 10. EMPA Dübendorf, Swiss Centre for Life Cycle Inventories, Dübendorf, CH, Online-Version under: www.ecoinvent.ch
- Water, river [natural resource, in water]: 0.00269 m3; name water_river_input; source Adelhardt W. 1998; lognormal variance with pedigree 0.0107, pedigree (2,2,4,5,1)
  Estimation: In the beneficiation step, water is inventoried as originating from river without pumping activities.
- Occupation, mineral extraction site [natural resource, land]: 3.23e-5 m2*year; source Martens P. N. 2002; lognormal variance with pedigree 0.0521, pedigree (3,2,4,5,1)
  (same comment as for Transformation, to mineral extraction site)
- Chromium, in ground [natural resource, in ground]: 0.307 kg; name chromium_input; source Adelhardt W. 1998; lognormal variance with pedigree 0.0107, pedigree (2,2,4,5,1)
  25.5% Cr in chromite; 11.6% in ore; Estimation: The world average chromium content after beneficiation amounts to 30.7% (44.9% Cr2O3), a yield from mining and beneficiation of 81% can be calculated. 1.48 kg of ore and 1.77 kg of overburden are extracted per kg of chromite.

## Emissions to nature
- Water [air, unspecified]: 0.0004035 m3; name water_to_air_unspecified; = (water_river_input*fraction_PW_to_air); lognormal variance with pedigree 0.0447, pedigree (2,2,3,5,1)
  Calculated value based on literature values and expert opinion. See comments in the parametres' comment field.
  property fraction, origin: fresh water 1; name fraction_origin_fresh_water
  property fraction, origin: unspecified 0; name fraction_origin_unspecified
  property fraction, origin: salt water 0; name fraction_origin_salt_water
- COD, Chemical Oxygen Demand [water, surface water]: 1.8e-7 kg; source Adelhardt W. 1998; lognormal variance with pedigree 1.334, pedigree (1,1,3,5,1)
  Modelled. Details are reported in Classen M., Althaus H.-J., Blaser S., Doka G., Jungbluth N. and Tuchschmid M. (2009) Life Cycle Inventories of Metals. Final report ecoinvent data v2.1 No.10. Swiss Centre for Life Cycle Inventories, Dübendorf, CH.
- Iron [air, non-urban air or from high stacks]: 8.13e-6 kg; source NPI 2001; lognormal variance with pedigree 0.1241, pedigree (5,2,3,5,1)
  (same comment as for COD, Chemical Oxygen Demand)
- Chromium, ion [water, surface water]: 5.93e-11 kg; source Adelhardt W. 1998; lognormal variance with pedigree 1.334, pedigree (1,1,3,5,1)
  (same comment as for COD, Chemical Oxygen Demand)
- DOC, Dissolved Organic Carbon [water, surface water]: 7.04e-8 kg; source Weidema B. P. 2011; lognormal variance with pedigree 1.334, pedigree (1,1,3,5,1)
  Calculated value: Values for TOC are calculated by approximating the unknown organic matter with the simplified formula for organic matter C6H12O6. This gives 58.7 mg / l TOC and DOC respectively.
- Chromium [air, non-urban air or from high stacks]: 5.36e-8 kg; source NPI 2001; lognormal variance with pedigree 0.7341, pedigree (5,2,3,5,1)
  (same comment as for COD, Chemical Oxygen Demand)
- Dissolved solids [water, surface water]: 6e-8 kg; source Adelhardt W. 1998; lognormal variance with pedigree 1.334, pedigree (1,1,3,5,1)
  (same comment as for COD, Chemical Oxygen Demand)
- Particulates, > 2.5 um, and < 10um [air, non-urban air or from high stacks]: 7.41e-8 kg; source NPI 2001; lognormal variance with pedigree 0.2041, pedigree (5,2,3,5,1)
  (same comment as for COD, Chemical Oxygen Demand)
- Aluminium [air, non-urban air or from high stacks]: 8.57e-9 kg; source NPI 2001; lognormal variance with pedigree 0.1241, pedigree (5,2,3,5,1)
  (same comment as for COD, Chemical Oxygen Demand)
- Magnesium [air, non-urban air or from high stacks]: 1.74e-8 kg; source NPI 2001; lognormal variance with pedigree 0.1241, pedigree (5,2,3,5,1)
  (same comment as for COD, Chemical Oxygen Demand)
- BOD5, Biological Oxygen Demand [water, surface water]: 1.2e-7 kg; source Zimmermann P. 1996; lognormal variance with pedigree 1.334, pedigree (1,1,3,5,1)
  Estimation: 150 mg / l COD is assumed to amount to 150% of BOD.
- Silicon [air, non-urban air or from high stacks]: 5.63e-9 kg; source NPI 2001; lognormal variance with pedigree 0.1241, pedigree (5,2,3,5,1)
  (same comment as for COD, Chemical Oxygen Demand)
- Iron, ion [water, surface water]: 8.25e-9 kg; source Adelhardt W. 1998; lognormal variance with pedigree 1.334, pedigree (1,1,3,5,1)
  (same comment as for COD, Chemical Oxygen Demand)
- TOC, Total Organic Carbon [water, surface water]: 7.04e-8 kg; source Weidema B. P. 2011; lognormal variance with pedigree 1.334, pedigree (1,1,3,5,1)
  (same comment as for DOC, Dissolved Organic Carbon)
- Calcium, ion [water, surface water]: 1.43e-7 kg; source Adelhardt W. 1998; lognormal variance with pedigree 1.334, pedigree (1,1,3,5,1)
  (same comment as for COD, Chemical Oxygen Demand)
- Particulates, < 2.5 um [air, non-urban air or from high stacks]: 8.24e-9 kg; source NPI 2001; lognormal variance with pedigree 0.3841, pedigree (5,2,3,5,1)
  (same comment as for COD, Chemical Oxygen Demand)
- Water [water, unspecified]: 0.0022865 m3; name water_to_water_unspecified; = water_river_input*(1-fraction_PW_to_air); lognormal variance with pedigree 0.0447, pedigree (2,2,3,5,1)
  (same comment as for Water)
  property carbon content, non-fossil 0; name C_content_non_fossil
  property carbon content, fossil 0; name C_content_fossil
  property fraction, origin: salt water 0; name fraction_origin_salt_water_Ww
  property water in wet mass 1000 kg; name WWM
  property wet mass 1000 kg; name WM
  property fraction, origin: fresh water 1; name fraction_origin_fresh_water_Ww
  property dry mass 0 kg; name DM
  property fraction, origin: unspecified 0; name fraction_origin_unspecified_Ww
- Particulates, > 10 um [air, non-urban air or from high stacks]: 8.52e-8 kg; source NPI 2001; lognormal variance with pedigree 0.1241, pedigree (5,2,3,5,1)
  (same comment as for COD, Chemical Oxygen Demand)
- Oils, unspecified [water, surface water]: 1.2e-8 kg; source Adelhardt W. 1998; lognormal variance with pedigree 1.334, pedigree (1,1,3,5,1)
  (same comment as for COD, Chemical Oxygen Demand)

## Sampling procedure
Literature. Amount of iron in ground and gangue were added to the original dataset for the sake of mass balance.

## Extrapolations
see Geography and Technology

## Review by Carl Vadenbo 2021-04-29
Accepted on 2021-06-29 after issues raised during cc-review had been addressed satisfactorily.
