# weaned calves production on pasture

Dataset: EcoSpold 2, unit process
Geography: ZA
Time period: 2016-01-01 to 2021-12-31
Technology level: current
Classification: ISIC rev.4 ecoinvent: 0141:Raising of cattle and buffaloes
Scenario: Business-as-Usual
System model: Allocation, cut-off by classification
Generated by: Philippa Notten
Published in: Russo, V, 2017
Database: ecoinvent
isCopyrightProtected: true
accessRestrictedTo: 1

## General comment
This dataset represents the production of 1 kg of live weight of weaned calves for beef production in South Africa. The weaned calves are sold at seven months old, predominantly to feedlots for fattening. Feedlots account for the majority of beef produced in South Africa (65-75%, with free-range beef accounting for less than 5%, and the balance supplied by lower-grade beef from culled dairy and breeding cattle). In this dataset, weaned calves are the primary product, with culled breeding cattle and excess heifers considered by-products. A breeding cycle is considered to be one year (i.e. one year of breeding herd is required to produce the weaners). A portion of the female calves are retained to replace the culled cows, with an average herd replacement rate of of circa 16% applied in the dataset. Excess heifers are female calves raised to one year, but that do not calve, and are subsequently sold (primarily to feedlots).
Direct emissions from the cattle (enteric methane), as well as direct and indirect emissions from manure (ammonia, nitrous oxide and methane), are calculated using best available methods (IPCC) with regional adaptations. All manure is deposited on pasture and is not collected (i.e. cattle manure as an organic fertiliser of the pasture is only accounted for in terms of field emissions). Cattle are predominantly raised on natural pasture, thus there is no irrigation nor fertiliser, seed etc. included in the dataset. Emissions of heavy metals to soil and surface water estimated from manure left on pasture during grazing is after Nemecek and Schnetzer (2012). The factors applied in the equations are not South African specific and the calculated emissions are thus highly uncertain (especially leached emissions where South African conditions are likely to be very different).

## Included activities start
This activity starts at the start of the cattle breeding season.

## Included activities end
This activity ends with the provision of weaned calves at the farm gate, ready to be sold for finishing at feedlots, as live weight. Culled breeding cattle and excess heifers are produced as by-products. Emissions from cattle and field emissions are included, as are their requirements (feed supplements and water). Pasture is natural, thus minimal maintenance is assumed to be required (some tractor and trailer use is included, but no fertiliser, seed etc.).

## Geography
South African values: Not applicable worldwide.

## Technology
Data and assumptions reflect current farming practices in South Africa

## Time period
Period indicated in the reference.

## Parameters
- fraction, process water to water, to surface water: 0.85 dimensionless; name fraction_PWtoW_to_surface_water
- fraction, process water, to air: 0.15 dimensionless; name fraction_PW_to_air

## Reference product
- weaned heifers, live weight: 1 kg; name weaned_heifer_byproduct; EcoSpold01Categories agricultural production/animal production; By-product classification allocatable product; CPC 02111: Cattle
  Sufficient heifer calves are retained to replace cows that do not conceive (cull cows), with an overmating rate of 25% assumed (beef herd overmating ranges between 20% to 30% (KZN DARD, 2012). It is assumed that all cows that do not conceive are slaughtered. Calving rate varies between 77% and 96%, depending on the farm (compares to a literature conception rate of 85% (Banga et al., 2014)).Surplus heifers sold/slaughtered are assumed to weigh 365 kg (live weight) (Du Toit et al., 2013). Reference(s): Banga C.B, Neser F.W.C. and Garrick D.J. (2014) Breeding Objectives for Holstein cattle in South Africa, South African Journal of Animal Science, Volume 44 (3), pp. 199-214; du Toit C.J.L., Meissner H.H. and van Niekerk W.A. (2013) Direct Methane and Nitrous Oxide Emissions of South African Dairy and Beef Cattle, South African Journal of Animal Science, Volume 43 (3), pp 320-339.
  production volume 4.33125e7 kg; = weaned_heifer_byproduct* ref_product_PV
    Calculated from production volume of reference product using the relative outputs.
  property price 2.1 EUR2005; name weaned_heifer_byproduct_price_EUR2005
    Current price for weaners is R 35/kg. Suggested price [7]: 2.1 /kg
    Suggest to use the same price for heifers.Source: http://www.mpo.co.za/wp-content/uploads/2018/04/Agri-Trends-23-April-2018-GrainsOilseedsLlivestock-Fibre-.pdf
  property carbon content 0.4928
    carbon content on a dry matter basis (reserved; not for manual entry)
  property true value 0.2205; name weaned_heifer_byproduct_true_value
    allocation property applied in "true value" allocation // value calculated from revenue
  properties: water in wet mass 0.4 kg, dry mass 0.6 kg, water content 0.666667, carbon content, non-fossil 0.4928, carbon content, fossil 0, wet mass 1 kg, carbon allocation 0.29568 kg
- weaned calves, live weight: 0 kg; By-product classification allocatable product; CPC 02111: Cattle; EcoSpold01Categories agricultural production/animal production
  Weaned calves sold to feedlot for fattening prior to slaughter.
  production volume 4.125e8 kg; name ref_product_PV
    National total based on cattle slaughter figures for 2015/2016 reported by Levy Admin (2016). The Levy Admin claims that they collect 98.8% of levy fees due. The breakdown in the source of cattle slaughtered is based on the breakdown in cattle grades reported by members of the Red Meat Abattoirs Association of South Africa (2017). It is assumed that the members are representative of the national average. It is further assumed that feedlot cattle are all A-grade cattle, and cull cows are all C-grade (Strydom et al., 2015 and Strydom, 2015).
    Reference(s): Levy Admin (2016) MSMS Data Nov. 2015 to 2016. Available at: http://levyadmin.co.za/wp-content/uploads/1610-4LevySlaugteringsFinal.pdf. (Accessed September 2017); RMAA (2017) Price Information Report - Red Meat Abattoir Association. Available at: http://rvav.co.za/priceinformationreport/. (Accessed September 2017); Strydom, P.E., Frylinck, L., van Heerden, S.M., Hope-Jones, M., Hugo, A., Webb, E.C., Moholisa, E., Liebenberg, B.E. & Sehoole, O.C. (2015) Sources of variation in quality of South African beef: case studies in relation to the red meat classification system, South African Journal of Animal Science (45) 289-301; Strydom, P.E. (2015) The SA beef classification system in 2015 - a critical review of age classification, Red Meat Research and Development South Africa. Available at: http://www.rmrdsa.co.za/Portals/0/Carcass%20Classification/SA%20Classification%20Critical%20review.pdf.
  property price 2.1 EUR2005
    (same comment as for weaned heifers, live weight)
  property carbon content 0.4928
    carbon content on a dry matter basis (reserved; not for manual entry)
  property true value 2.1
    allocation property applied in "true value" allocation // value calculated from revenue
  properties: energy content 14.937 MJ, water in wet mass 0.4 kg, wet mass 1 kg, water content 0.66667, carbon content, non-fossil 0.4928, dry mass 0.6 kg, carbon content, fossil 0, carbon allocation 0.29568 kg

## By-products
- cattle for slaughtering, live weight: 0 kg; name cull_cow_byproduct; CPC 02111: Cattle; By-product classification allocatable product
  Cows that fail to conceive are replaced with retained heifers and sold for slaughter. Herd replacement varied from 9% to 26%, depending on the farm, with a rate of 15.8% applied to those farms that did not provide data on numbers of heifers retained (applying a literature conception rate of 85% (Banga et al., 2014) and assuming all cows that do not conceive are culled). The cow is assumed to have a live weight of 450-500kg (depending on the farm/breed) when it leaves the farm to be slaughtered. Reference(s): Banga C.B, Neser F.W.C. and Garrick D.J. (2014) Breeding Objectives for Holstein cattle in South Africa, South African Journal of Animal Science, Volume 44 (3), pp. 199-214
  production volume 2.17388e8 kg; = cull_cow_byproduct* ref_product_PV
    Calculated from production volume of reference product using the relative outputs.
  property price 2.8 EUR2005; name cull_cow_byproduct_price_EUR2005
    Current price for A Grade cattle (feedlot) is R 48/kg and for C Grade (cull cows) R 41/kg. Suggested price [7]: 2.8 /kg. Source: http://www.mpo.co.za/wp-content/uploads/2018/04/Agri-Trends-23-April-2018-GrainsOilseedsLlivestock-Fibre-.pdf
  property carbon content, non-fossil 0.4928
    Calculated from live weight empty body composition in fat and protein (
    Johnson, I.R. et al. (2012). J. Anim. Sci. 90(13):4741-475 ; Williams, C.B. (2005). J. Anim. Sci. 83(6):1262-1266) and from C content of nutrients (protein, fat) according to A.D. Kay and T. Vrede ("Evolutionary and Biochemical Aspects", in Global Ecology, 2010, Elsevier B.V., S.E. Jørgensen Ed.).
  property energy content 14.9367 MJ
    Energy content calculated from animal fat and protein composition and energy content for animal fat and protein of 39.3 and 23.6 MJ/kg, respectively.
    Johnson, I.R. et al. (2012). J. Anim. Sci. 90(13):4741-475.
    Williams, C.B. (2005). J. Anim. Sci. 83(6):1262-1266.
  property carbon content 0.4928
    carbon content on a dry matter basis (reserved; not for manual entry)
  property true value 1.4756; name cull_cow_byproduct_true_value
    allocation property applied in "true value" allocation // value calculated from revenue
  properties: water in wet mass 0.4 kg, water content 0.666667, dry mass 0.6 kg, carbon content, fossil 0, wet mass 1 kg, carbon allocation 0.29568 kg

## Inputs from technosphere
- urea: 0.147722 kg; lognormal variance with pedigree 0.0098, pedigree (2,3,4,1,1)
  The exchange has been updated from 'urea, as N' into 'urea' and therefore its amount has been scaled (multiplied) from 0.1246 kg by 2.1438 kg of 'urea' per kg of 'urea, as N'. Original comment of the exchange is: Component of feed supplement. Feed supplementation required by cattle taken from requirements for farming in the KwaZulu-Natal region of South Africa (industry data), with few natural pastures in South Africa of sufficient quality to support year-round grazing. Supplementation changes with the season (typically winter and summer) and amounts required differ with animal type (herd broken down into weaners, cows and bulls). Farmers either purchase pre-mixed supplements and licks, or make up their own. Supplements are predominantly salt, urea and a roughage component (bagasse or maize). For the roughage component, some farmers use brown grass or silage saved over from the good season. The composition of mineral licks and pre-mixed supplements was provided by various farmers and suppliers in the region.
  properties: carbon content, fossil 0.2, wet mass 1 kg, dry mass 1 kg
- inorganic phosphorus fertiliser, as P2O5: 0.0646801 kg; lognormal variance with pedigree 0.0098, pedigree (2,3,4,1,1)
  Component of feed supplement (triple superphosphate). Feed supplementation required by cattle taken from requirements for farming in the KwaZulu-Natal region of South Africa (industry data), with most natural pastures in South Africa of insufficient quality to support year-round grazing. Supplementation changes with the season (typically winter and summer) and amounts required differ with animal type (herd broken down into weaners, cows and bulls). Farmers either purchase pre-mixed supplements and licks, or make up their own. Supplements are predominantly salt, urea and a roughage component (bagasse or maize). For the roughage component, some farmers use brown grass or silage saved over from the good season. The composition of mineral licks and pre-mixed supplements was provided by various farmers and suppliers in the region.
  properties: wet mass 1 kg, dry mass 1 kg
- sulfur: 0.00344643 kg; lognormal variance with pedigree 0.0098, pedigree (2,3,4,1,1)
  Component of feed supplement (sulfur). Feed supplementation required by cattle taken from requirements for farming in the KwaZulu-Natal region of South Africa (industry data), with most natural pastures in South Africa of insufficient quality to support year-round grazing. Supplementation changes with the season (typically winter and summer) and amounts required differ with animal type (herd broken down into weaners, cows and bulls). Farmers either purchase pre-mixed supplements and licks, or make up their own. Supplements are predominantly salt, urea and a roughage component (bagasse or maize). For the roughage component, some farmers use brown grass or silage saved over from the good season. The composition of mineral licks and pre-mixed supplements was provided by various farmers and suppliers in the region.
  properties: dry mass 1 kg, wet mass 1 kg
- molasses, from sugar beet: 0.110004 kg; lognormal variance with pedigree 0.0098, pedigree (2,3,4,1,1)
  Component of feed supplement (substrate). The substrate is typically sugar cane bagasse and/or molasses. As neither of these substances are in the ecoinvent database, sugar beet molasses is used as an approximation. Feed supplementation required by cattle taken from requirements for farming in the KwaZulu-Natal region of South Africa (industry data), with most natural pastures in South Africa of insufficient quality to support year-round grazing. Supplementation changes with the season (typically winter and summer) and amounts required differ with animal type (herd broken down into weaners, cows and bulls). Farmers either purchase pre-mixed supplements and licks, or make up their own. Supplements are predominantly salt, urea and a roughage component (bagasse or maize). For the roughage component, some farmers use brown grass or silage saved over from the good season. The composition of mineral licks and pre-mixed supplements was provided by various farmers and suppliers in the region.
  properties: wet mass 1 kg, water content 0.219512, carbon content, non-fossil 0.39592, dry mass 0.82 kg
- maize grain: 0.0826867 kg; lognormal variance with pedigree 0.0098, pedigree (2,3,4,1,1)
  Component of feed supplement. Feed supplementation required by cattle taken from requirements for farming in the KwaZulu-Natal region of South Africa (industry data), with most natural pastures in South Africa of insufficient quality to support year-round grazing. Supplementation changes with the season (typically winter and summer) and amounts required differ with animal type (herd broken down into weaners, cows and bulls). Farmers either purchase pre-mixed supplements and licks, or make up their own. Supplements are predominantly salt, urea and a roughage component (bagasse or maize). For the roughage component, some farmers use brown grass or silage saved over from the good season. The composition of mineral licks and pre-mixed supplements was provided by various farmers and suppliers in the region.
  properties: carbon content, non-fossil 0.46957, water content 0.162791, dry mass 0.86 kg, wet mass 1 kg
- transport, tractor and trailer, agricultural: 0.354048 metric ton*km; lognormal variance with pedigree 0.1292, pedigree (2,3,4,1,1)
  There is no cultivation as the pasture for grazing is natural. Diesel use on the farm is thus for general production activities, such as maintenance, feeding and fence checking. It is assumed that the field work is carried out in a tractor and trailer. Diesel consumption on the farm is estimated at 4,000 litres per year. The equivalent tonnes.km were calculated using the diesel consumption of the dataset: transport, tractor and trailer, agricultural (43.6g diesel/tonne*km)
- sodium chloride, powder: 0.250953 kg; lognormal variance with pedigree 0.0098, pedigree (2,3,4,1,1)
  (same comment as for maize grain)
  properties: dry mass 1 kg, wet mass 1 kg

## Inputs from nature
- Transformation, from grassland, natural, for livestock grazing [natural resource, land]: 195.833 m2; lognormal variance with pedigree 0.0172, pedigree (2,3,4,1,1)
  Natural pasture for grazing. Stocking rate reported by farms varied from 3.0 to 11 hectares per live unit (adult herd excluding calved), with an average value of 5.1 ha/live unit. Beef farming occurs predominantly in the grassland regions of SA, so this is taken as the pre-farming land use.
- Occupation, grassland, natural, for livestock grazing [natural resource, land]: 160.981 m2*year; lognormal variance with pedigree 0.0112, pedigree (2,3,4,1,1)
  Natural pasture for grazing. Stocking rate reported by farms varied from 3.0 to 11 hectares per live unit (adult herd excluding calved), with an average value of 5.1 ha/live unit. Beef farming occurs predominantly in the grassland regions of SA, so this is taken as the pre-farming land use. A nominal farm life of 30 years is assumed.
- Water, unspecified natural origin [natural resource, in ground]: 0.0780011 m3; name drinking_water; lognormal variance with pedigree 0.0098, pedigree (2,3,4,1,1)
  Drinking water for cattle. The daily water requirement for cattle varied from 30 to 95 litres/head/day depending on the farm (average of 54 litres/head/day). Water is sourced from rivers, farm dams or boreholes, depending on the region.
- Transformation, to grassland, natural, for livestock grazing [natural resource, land]: 195.833 m2; lognormal variance with pedigree 0.0172, pedigree (2,3,4,1,1)
  (same comment as for Transformation, from grassland, natural, for livestock grazing)

## Emissions to nature
- Cadmium [soil, agricultural]: 2.50046e-7 kg; lognormal variance with pedigree 0.0492, pedigree (2,3,4,1,1)
  Emissions of heavy metals to soil and surface water estimated from manure left on pasture during grazing based on Nemecek and Schnetzer (2012). The factors applied in the equations are not South African specific and the calculated emissions are thus highly uncertain (especially leached emissions where South African conditions are likely to be very different). A manure generation rate of 1.82 tonnes/(head.year) for commercial cattle in field is applied in the dataset (DEA, 2017). As the pasture is natural, there are no associated fertiliser, seed and pesticide applications. There is however removal of biomass through grazing. Reference(s): Nemecek and Schnetzer (2012) Methods of Assessment of Direct Field Emissions for LCIs of Agricultural Production Systems, Life cycle inventories of Swiss and European agricultural production systems. Reference(s): DEA (2017) Unlocking Barriers and Opportunities for Land-use Based Climate-Change Mitigation Activities in South Africa, Department of Environmental Affairs of South Africa, Available at: https://www.environment.gov.za/sites/default/files/reports/unlockingbarriers_land-usebasedclimatechangemitigation.pdf. (Accessed September 2017),
- Phosphate [water, surface water]: 0.00929375 kg; lognormal variance with pedigree 0.0492, pedigree (2,3,4,1,1)
  Emissions of phosphates through run-off from manure deposited on pasture is from on Nemecek and Schnetzer (2012). The factors applied in the equations are not South African specific and the calculated emissions are thus highly uncertain (especially run-off emissions where South African conditions are likely to be very different). A manure generation rate of 1.82 tonnes/(head.year) for commercial cattle in field is applied in the dataset (DEA, 2017). As the pasture is natural there are no associated fertiliser applications. Reference(s): Nemecek and Schnetzer (2012) Methods of Assessment of Direct Field Emissions for LCIs of Agricultural Production Systems, Life cycle inventories of Swiss and European agricultural production systems. Reference(s): DEA (2017) Unlocking Barriers and Opportunities for Land-use Based Climate-Change Mitigation Activities in South Africa, Department of Environmental Affairs of South Africa, Available at: https://www.environment.gov.za/sites/default/files/reports/unlockingbarriers_land-usebasedclimatechangemitigation.pdf. (Accessed September 2017)
- Copper, ion [water, surface water]: 2.95962e-5 kg; lognormal variance with pedigree 0.0992, pedigree (2,3,4,1,1)
  (same comment as for Cadmium)
- Ammonia [air, non-urban air or from high stacks]: 0.120321 kg; lognormal variance with pedigree 0.0172, pedigree (2,3,4,1,1)
  Ammonia emissions from manure left in field during grazing. Calculations following the IPCC guidelines using a combination of default IPCC and country specific input values. Emission factor per animal (bull, calving cows, oxen and calves), taking into account field types and digestibilities, pasture feed characteristics, and livestock weight and weight gain, from du Toit et al., (2013). Herd composition from six sample farms. Weaners are on pasture for 7 months, whilst 12 months of breeding cattle are required to complete a breeding cycle. Reference(s): IPCC Guidelines for National Greenhouse Gas Inventories‚ Prepared by the National Greenhouse Gas Inventories Programme‚ IGES, Japan; du Toit C.J.L., Meissner H.H. and van Niekerk W.A. (2013) Direct Methane and Nitrous Oxide Emissions of South African Dairy and Beef Cattle, South African Journal of Animal Science, Volume 43 (3), pp 320-339
- Nickel [soil, agricultural]: 5.97455e-6 kg; lognormal variance with pedigree 0.0492, pedigree (2,3,4,1,1)
  (same comment as for Cadmium)
- Chromium, ion [water, surface water]: 2.96515e-5 kg; lognormal variance with pedigree 0.0992, pedigree (2,3,4,1,1)
  (same comment as for Cadmium)
- Lead [water, surface water]: 1.68726e-7 kg; lognormal variance with pedigree 0.0992, pedigree (2,3,4,1,1)
  (same comment as for Cadmium)
- Water [air, unspecified]: 0.0117002 m3; = drinking_water* fraction_PW_to_air
- Lead [soil, agricultural]: 5.31071e-6 kg; lognormal variance with pedigree 0.0492, pedigree (2,3,4,1,1)
  (same comment as for Cadmium)
- Copper [soil, agricultural]: 1.60981e-5 kg; lognormal variance with pedigree 0.0492, pedigree (2,3,4,1,1)
  (same comment as for Cadmium)
- Phosphorus [water, surface water]: 0.0173151 kg; lognormal variance with pedigree 0.0492, pedigree (2,3,4,1,1)
  Emissions of phosphorous through soil erosion is from Nemecek and Schnetzer (2012). The factors applied in the equations are not South African specific and the calculated emissions are thus highly uncertain. A manure generation rate of 1.82 tonnes/(head.year) for commercial cattle in field is applied in the dataset (DEA, 2017). As the pasture is natural there are no associated fertiliser applications. Reference(s): Nemecek and Schnetzer (2012) Methods of Assessment of Direct Field Emissions for LCIs of Agricultural Production Systems, Life cycle inventories of Swiss and European agricultural production systems. Reference(s): DEA (2017) Unlocking Barriers and Opportunities for Land-use Based Climate-Change Mitigation Activities in South Africa, Department of Environmental Affairs of South Africa, Available at: https://www.environment.gov.za/sites/default/files/reports/unlockingbarriers_land-usebasedclimatechangemitigation.pdf. (Accessed September 2017)
- Cadmium, ion [water, surface water]: 1.7813e-8 kg; lognormal variance with pedigree 0.0992, pedigree (2,3,4,1,1)
  (same comment as for Cadmium)
- Mercury [water, surface water]: 9.34907e-9 kg; lognormal variance with pedigree 0.0992, pedigree (2,3,4,1,1)
  (same comment as for Cadmium)
- Water [water, surface water]: 0.0663009 m3; = drinking_water *fraction_PWtoW_to_surface_water
- Dinitrogen monoxide [air, non-urban air or from high stacks]: 0.00486262 kg; source du Toit C.J.L. 2013; lognormal variance with pedigree 0.0122, pedigree (2,3,4,1,1)
  Direct and indirect emissions of N2O from manure deposited on pasture during grazing. Calculations following the IPCC guidelines using a combination of default IPCC and country specific input values. Emission factor per animal (bull, calving cows, oxen and calves), taking into account field types and digestibilities, pasture feed characteristics, and livestock weight and weight gain, from du Toit et al., (2013). Herd composition from six sample farms. Indirect N2O includes only that from deposition of N following volatilisation as ammonia and nitrates, i.e. does not include that from leaching or run-off of N, as this is assumed to be zero (no irrigation and grazing in generally dry areas). Reference(s): IPCC Guidelines for National Greenhouse Gas Inventories‚ Prepared by the National Greenhouse Gas Inventories Programme‚ IGES, Japan; du Toit C.J.L., Meissner H.H. and van Niekerk W.A. (2013) Direct Methane and Nitrous Oxide Emissions of South African Dairy and Beef Cattle, South African Journal of Animal Science, Volume 43 (3), pp 320-339
- Mercury [soil, agricultural]: 4.82943e-7 kg; lognormal variance with pedigree 0.0492, pedigree (2,3,4,1,1)
  (same comment as for Cadmium)
- Methane, non-fossil [air, non-urban air or from high stacks]: 0.467542 kg; source du Toit C.J.L. 2013; lognormal variance with pedigree 0.0172, pedigree (2,3,4,1,1)
  Methane from enteric fermentation and manure management. Emission factor per animal (bull, calving cows, oxen and calves), taking into account field types and digestibilities, pasture feed characteristics, and livestock weight and weight gain, from du Toit et al., (2013). Herd composition from six sample farms. Reference: du Toit C.J.L., Meissner H.H. and van Niekerk W.A. (2013) Direct Methane and Nitrous Oxide Emissions of South African Dairy and Beef Cattle, South African Journal of Animal Science, Volume 43 (3), pp 320-339
- Zinc, ion [water, surface water]: 5.58731e-5 kg; lognormal variance with pedigree 0.0992, pedigree (2,3,4,1,1)
  (same comment as for Cadmium)
- Zinc [soil, agricultural]: 0.000157109 kg; lognormal variance with pedigree 0.0492, pedigree (2,3,4,1,1)
  (same comment as for Cadmium)
- Chromium [soil, agricultural]: 3.26388e-6 kg; lognormal variance with pedigree 0.0492, pedigree (2,3,4,1,1)
  (same comment as for Cadmium)

## Sampling procedure
Data from six sample farms provide the majority of activity data for the dataset. However, where more representative data are avaialable (such as emission factors for methane and nitrous oxide developed for South Africa's national greenhouse gas inventory) these are applied instead. Other literature, national statistics, and discussions with industry experts are used to fill various data gaps. Emissions of phosphates and heavy metals from manure are estimated according to Nemecek and Schnetzer (2011).
