# steam production, as energy carrier, in chemical industry

Dataset: EcoSpold 2, unit process
Geography: RoW
Time period: 2010-01-01 to 2021-12-31
Technology level: current
Classification: ISIC rev.4 ecoinvent: 3530:Steam and air conditioning supply
Scenario: Business-as-Usual
System model: Allocation, cut-off by classification
Generated by: David FitzGerald
Published in: Althaus H.-J. 2007
Database: ecoinvent
isCopyrightProtected: true
accessRestrictedTo: 1

## General comment
This dataset represents the production of 1 MJ of steam used for heating in the chemical and petrochemical industry. It is to be used for heat energy production in an average chemical plant, in case no information is available about the source of the heat energy. The inventory represents the average fuel mix used for steam production in the chemical and petrochemical industry.
The total energy required for the production of 1 MJ of steam is 1.31 MJ and is based on a study on steam production in the European chemical industry (Boustead 1999). The shares of the fuel mix used for heating are based on expert judgment for the situation in 2017. The water consumption is based on data collected from 11 chemical plants in Europe (Zah & Hischier 2007).
The energy content of the steam is 2.75 MJ/kg. The overall efficiency is 74% when taking into account the input of recovered energy (0.047 MJ per MJ of steam).
References:
Althaus H.-J., Chudacoff M., Hischier R., Jungbluth N., Osses M. and Primas A. (2007) Life Cycle Inventories of Chemicals. ecoinvent report No. 8, v2.0. EMPA Dübendorf, Swiss Centre for Life Cycle Inventories, Dübendorf, CH.
Boustead I. (1999) Ecoprofiles of plastics and related intermediates, Steam (on-site average). European Centre for Plastics in the Environment (APME), Brussels.
Zah R., Hischier R. (2007) Life Cycle Inventories of Detergents. ecoinvent report No.
12. Swiss Centre for Life Cycle Inventories, Dübendorf, 2007.

## Included activities start
The activity starts with the input of heat, electricity and water.

## Included activities end
The activity ends with the production of 1 MJ heat (=0.3636 kg) steam from cold water. The activity includes water losses, but does not include the use of additives.

## Geography
Based on world energy consumption in the chemical and petrochemical industry.

## Technology
Average technology used in the chemical and petrochemical industry.
Two types of boilers are commonly used:
1) fired tube boilers, which are cylinder-shaped, and closed at both ends by tubular plates enclosing the following items: a large diameter furnace tube passing longitudinally through the cylindrical body, and in which combustion occurs; flue gas tubes (or smoke tubes) in which the flue gas circulate.
Schematic view of a fire tube boiler:
These boilers produce steam and high pressure hot water, and their power ranges from 3 to 20 MWt. They are currently most often equipped with low NOx type burners, which use primary measures for the reduction of NOx emissions (natural gas staging technique or/and flue gas recirculation).
2) water tube boiler, which comprises many tubes connected to 1 or 2 tanks; the upper tank containing the water-steam emulsion, and the lower tank containing water.
Schematic view of a water tube boiler:
Most often this type of boiler is built specifically according to the power and specifications required. The range of powers starts at 15 or 20 MWt, up to several hundreds of MWth, and even beyond. They are currently most often equipped with low NOx type burners, that use natural gas staging technique or/and internal flue gas recirculation.
Reference:
Zah R., Hischier R. (2007) Life Cycle Inventories of Detergents. ecoinvent report No.
12. Swiss Centre for Life Cycle Inventories, Dübendorf, 2007.

## Parameters
- fraction, tap water, to air: 0.15 dimensionless; name fraction_TW_to_air; = fraction_PW_to_air; lognormal variance with pedigree 0.092025, pedigree (4,4,3,2,4)
  Calculated value. See comment in the other parametres present in this dataset. Tap water is considered to be always used as process water, thus process water fractions to air are applied to all tap water input flows to calculate the amount of water consumed in the processes.
- fraction, process water, to air: 0.15 dimensionless; name fraction_PW_to_air; lognormal variance with pedigree 0.092025, pedigree (4,4,3,2,4)
  Literature value. In case when no industry/process specific data are available, default evaporation fraction value is used. This value is 15% and is based on literature (Statistics Canada, 2007 & Shaffer, K.H., 2008, Consumptive water use in the Great Lakes Basin, USGS & Shiklomanov, 2003, World Water Resources at the Beginning of the 21st Century) and has been approved by an expert.

## Reference product
- heat, from steam, in chemical industry: 1 MJ; CPC 17300: Steam and hot water; By-product classification allocatable product
  Energy content of steam = 2.75 MJ/kg or 2.4 MJ/kg (latter if condensed steam is reheated).
  production volume 5.10069e12 MJ; = 15000000000000000000*0.4/1000000
    According to the IEA, the current "global energy demand for the chemical industry is 15 EJ per year (EJ/yr) excluding feedstock" (IEA, 2013). Roughly 40% of the energy is assumed to be delivered in the form of steam, based on data for the United States (JISEA, 2016).
    References:
    International Energy Agency (2013). Technology Roadmap: Energy and GHG Reductions in the Chemical Industry via Catalytic Processes. IEA Publications, Paris, France.
    The Joint Institute for Strategic Energy Analysis (JISEA) (2016). Generation and Use of Thermal Energy in the U.S. Industrial Sector and Opportunities to Reduce its Carbon Emissions. National Renewable Energy Laboratory (NREL), www.nrel.gov/publications.
  property price 0.0144102 EUR2005
    Calculated based on inputs: The price of the product has been calculated as a sum of the values of the material and energy inputs for this product. This value is therefore a rough estimation. It may underestimate the real price since there are additional expenses when producing any product. These expences can include for example labour costs, treatment of waste materials and profit for the producer. Please consider carefully whether this level of data quality is acceptable for your application.
  properties: heating value, net 1 MJ

## Inputs from technosphere
- electricity, medium voltage: 0 kWh; name electricity; source Althaus H.-J. 2007; pedigree (1,1,1,1,1)
  Literature value, based on the study by Boustead (1999) regarding the European chemical sector.
  The total energy required for producing 1 MJ of steam is 1.31 MJ (total energy mix) (Boustead, 1999), corresponding to an overall efficiency of 74% (when taking into account the input of 0.047 MJ of recovered energy). In the same source, the value of 0.00808 KWh electricity input for producing 1.31 MJ is given. These values are used as an estimation in the present global inventory, due to lack of more accurate data.
  1 KWh is equal to 3.6MJ.
- heat, district or industrial, other than natural gas: 0.384274 MJ; = (1.31-(electricity*3.6))*0.3; lognormal variance with pedigree 0.0112, pedigree (4,3,3,1,1)
  Estimated value based on literature.
  Calculated from the energy consumption mix for the chemical and petrochemical industry based on expert judgement. The fraction of natural gas corresponds to 0.5. The fraction of fuel oil is 0.3. The fraction of inputs of coal & peat is 0.2.
  The total energy required for producing 1 MJ of steam is 1.31 MJ (total energy mix) (Boustead, 1999), corresponding to an overall efficiency of 74% (when taking into account the input of 0.047 MJ of recovered energy). This study is based on the European chemical sector. In the same source, the value of 0.00808 KWh electricity input for producing 1.31 MJ is given. These values are used as an estimation in the present global inventory, due to lack of more accurate data.
  1 KWh is equal to 3.6 MJ.
  properties: heating value, net 1 MJ
- heat, district or industrial, natural gas: 0.640456 MJ; = (1.31-(electricity*3.6))*0.5; lognormal variance with pedigree 0.0112, pedigree (4,3,3,1,1)
  (same comment as for heat, district or industrial, other than natural gas)
  properties: heating value, net 1 MJ
- tap water: 0 kg; name tap_water_input; source Dall'Acqua S. 1995; pedigree (1,1,1,1,1)
  Value based on data from 11 chemical plants in Europe. 1.17 kg of tap water is required for the production of 1 kg of steam, therefore 0.17 kg of water is lost per kg of steam produced, while the rest is recirculated. Based on the energy content of steam of 2.75 MJ/kg, 0.062 kg of water is lost per MJ of steam produced.
  Uncertainty: average from 11 data sets
  properties: dry mass 0.000337476 kg, wet mass 1 kg, water content 2962.17, carbon content, fossil 0.00178991
  note on carbon content, fossil: Bicarbonate content is 2.93 mol/m3. CO2 content is 0.1 mol/m3 (ecoinvent v2.2 report 8, Tab 93.1).
- heat, district or industrial, other than natural gas: 0.256182 MJ; = (1.31-(electricity*3.6))*0.2; lognormal variance with pedigree 0.0112, pedigree (4,3,3,1,1)
  (same comment as for heat, district or industrial, other than natural gas)
- electricity, medium voltage: 0.00010185, 1.95304e-5, 0.000327875, 0.00476865, 0.000672144, 0.00218995 kWh (6 entries); source Althaus H.-J. 2007; lognormal variance with pedigree 0.0112, pedigree (4,3,3,1,1)
  (same comment as for electricity, medium voltage)
- tap water: 0.000962263, 0.000115831, 0.000191429, 0.00482709, 0.000125575, 0.000357197, 0.0552388 kg (7 entries); source Dall'Acqua S. 1995; lognormal variance with pedigree 0.0212, pedigree (2,3,4,5,1)
  (same comment as for tap water)

## Emissions to nature
- Water [water, unspecified]: 5.25455e-5 m3; = (tap_water_input/1000)*(1-fraction_TW_to_air); lognormal variance with pedigree 0.098025, pedigree (4,4,4,2,4)
  Calculated value based on literature values and expert opinion. See comments in the parametres' comment field.
- Water [air, unspecified]: 9.27273e-6 m3; = (tap_water_input/1000)*fraction_TW_to_air; lognormal variance with pedigree 0.098025, pedigree (4,4,4,2,4)
  (same comment as for Water)

## Sampling procedure
The data is based on literature and statistics.
The fuel consumption mix used for the production of heat is estimated based on expert judgement. The total energy (1.31 MJ) and electricity required for the production of 1 MJ of heat in the form of steam is based on the dataset covering the geography RER.
The water consumption is based on data on steam production from 11 European plants that produce sodium silicates or percarbonate (Zah & Hischier 2007).

References:
Althaus H.-J., Chudacoff M., Hischier R., Jungbluth N., Osses M. and Primas A. (2007) Life Cycle Inventories of Chemicals. ecoinvent report No. 8, v2.0. EMPA Dübendorf, Swiss Centre for Life Cycle Inventories, Dübendorf, CH.
Zah R., Hischier R. (2007) Life Cycle Inventories of Detergents. ecoinvent report No. 12. Swiss Centre for Life Cycle Inventories, Dübendorf, 2007.
