# sulfuric acid production

Dataset: EcoSpold 2, unit process
Geography: RoW
Time period: 2000-01-01 to 2021-12-31
Technology level: current
Classification: ISIC rev.4 ecoinvent: 2012:Manufacture of fertilizers and nitrogen compounds
Synonyms: Sulphuric acid; Dipping acid; Dihydrogen sulfate; Vitriol; Oil of vitriol; Battery acid
Scenario: Business-as-Usual
System model: Allocation, cut-off by classification
Generated by: Anna Kounina
Database: ecoinvent
isCopyrightProtected: true
accessRestrictedTo: 1

## General comment
This dataset is a weighted average from the respective regional datasets.
This dataset represents the production of 1 kg of sulfuric acid. Sulfuric acid (formula H2SO4) is a colorless to yellow, oily, dense liquid with a sharp, acrid odor.
Sulfuric acid is used in nearly all industrial sectors and is a vital commodity in any national economy. Most of its uses are actually indirect, in that the sulfuric acid is used as a reagent rather than an ingredient. The largest single sulfuric acid consumer by far is the fertilizer industry. There, sulfuric acid is used with phosphate rock in the manufacture of phosphate fertilizers and smaller amounts are also used in the production of ammonium and potassium sulfate. Substantial quantities are used as an acidic dehydrating agent in organical chemical and petrochemical processes, as well as in oil refining. In the metal processing industry, sulfuric acid is used for pickling and descaling steel; for the extraction of copper, uranium and vanadium from ores; and in non-ferrous metal purification and plating. In the inorganic chemical industry, it is used most notably in the production of titanium dioxide.
Certain wood pulping processes for paper also require sulfuric acid, as do some textile and fiber processes (such as rayon and cellulose manufacture) and leather tanning. Other end uses for sulfuric acid include effluent/water treatment, plasticisers, dyestuffs, explosives, silicate for toothpaste, adhesives, rubbers, edible oils, lubricants and the manufacture of food acids such as citric acid and lactic acid. Probably the largest use of sulfuric acid in which this chemical becomes incorporated into the final product is in organic sulphonation processes, particularly for the production of detergents. Many pharmaceuticals are also made by sulphonation processes.
There are several sources of sulfur in order to produce sulphuric acid: sulfur originating from crude oil or natural gas industry, sulfur originating from the metal industry and sulphur from pyrite mining. Besides, sulfuric acid can be produced by recycling, i.e. reusing, existing sulfuric acid. Sulfuric acid is produced from sulfur dioxide, its conversion into sulfur trioxide and flowingly, the adsorption of sulfur trioxide by water, resulting in sulfuric acid. Reactions are strongly exothermic, however depending on the production process of the sulfur dioxide. The production of sulfur dioxide from metal sulphate roasting and the regeneration of sulfuric acid is not exothermic. The production of sulphur dioxide is conducted on different ways, depending on the sulphuric acid production route: combustion of sulphur, combustion of sulfur containing gases, metal sulfide roasting, roasting of pyrite and sulfuric acid regeneration. For the use of sulfuric acid as an auxiliary product in the fertiliser production process it is assumed, that the sulfur enters the system from the oil and gas industry. This assumption is confirmed by the oil and gas industry. Most crude oil and gas deposits found around the globe contain a varying proportion of sulfurous compounds. At a refinery, the sulfur is stripped from the feedstock to ensure that the fuel products produced from the refining operations can meet government requirements for allowable sulfur content (typically <10 ppm for road transport fuels in many jurisdictions). Thus, it can be said that: Refineries would not produce elemental sulfur if they did not have to. The same amount of sulphur would be produced even if no application existed for it. All the refinery emissions and the cost of desulphurisation are currently allocated to the hydrocarbon products. Sulfur in crude gas streams is generally in the form of hydrogen sulfide and is removed at the wellhead before transport. Environmental regulations prevent its incineration and so it is extracted as elemental sulfur.
Co-products: steam is produced as co-product.
The main data sources for this dataset are Fertilizers Europe (2016) and Althaus et al (2007). Additional data sources are listed as follows.
References:
Kongshaug G. (1998): Energy Consumption and Greenhouse Gas Emissions in Fertilizer Production. IFA 20th July 1998
Davies J., Haglund C. (1999): Life Cycle Inventory of Fertiliser Production. SIK-Report No 654 1999. Chalmers University of Technology, Sweden.
Patyk R., Reinhardt, G.A. (1997): Düngemittel - Energie- und Stoffstrombilanzen. Vieweg Verlag, Braunschweig.
Fertilizers Europe (2000): Best Available Techniques for Pollution Prevention and Control in the European Fertilizer Industry. Booklet No. 4 of 8: Production of sulfuric acid. Fertilizers Europe, Brussels.
European Sulphuric Acid Association (2016): personal communication
Fertilizers Europe (2016): Carbon Footprint Calculator for Fertilizer Production. Specification. Version 2.1
Fertilizers Europe (2016): Average Emissions Year 2014. Fertilizers Europe Environmental report (internal). Used for updated energy and GHG emission in Carbon Footprint Calculator
Althaus H.-J., Chudacoff M., Hischier R., Jungbluth N., Osses M. and Primas A. (2007) Life Cycle Inventories of Chemicals. ecoinvent report No. 8, v2.0. EMPA Dübendorf, Swiss Centre for Life Cycle Inventories, Dübendorf, CH.

## Included activities start
The activity includes all the raw and processed materials necessary to produce this product. Sulfur, water and electricity are included. Direct emissions of sufate, sufure dioxide and sufur trioxide to air and sulfate to water are included.

## Included activities end
The activity ends with the final product being ready for transportation at the production site.

## Technology
Average techlogy from the regional counterparts as given in the geography comment.

## Time period
Primary data were collected on fertiliser production for the year 2011. These data were based on annual average data for the year 2011.

## Reference product
- sulfuric acid: 1 kg; name RP; CPC 34231: Chemical elements n.e.c.; inorganic acids except phosphoric, nitric and sulphonitric; inorganic oxygen compoun[…]; By-product classification allocatable product; CAS 7664-93-9
  production volume 9.66956e10 kg; name PVRP
    Estimated value in kg/y. Source: http://pubs.acs.org/cen/coverstory/84/8428factsandfigures.html (Chemical & Engineering News, 2006 vol 84).
  property price 0.063 EUR2005; name RP_price_EUR2005
    Data related to the price of sulfuric acid were provided by Yara International (https://www.yara.com/)
  property carbon content 0
    carbon content on a dry matter basis (reserved; not for manual entry)
  property true value 0.063; name RP_true_value
    allocation property applied in "true value" allocation // value calculated from revenue
  properties: carbon content, fossil 0, water content 0, dry mass 1 kg, wet mass 1 kg, water in wet mass 0 kg, carbon content, non-fossil 0, carbon allocation 0 kg

## By-products
- steam, in chemical industry: 0 kg; name BPS; CPC 17300: Steam and hot water; By-product classification allocatable product; CAS 7732-18-5; pedigree (1,1,1,1,1)
  This flow is weighted averages using the exchanges in the corresponding regional data.
  production volume 1.12519e11 kg; = PVRP*BPS/RP
    Calculated based on the production volume of the reference product.
  property price 0.015 EUR2005; name BPS_price_EUR2005
    Data related to the price of steam were provided by Yara International (https://www.yara.com/)
  property carbon content 0
    carbon content on a dry matter basis (reserved; not for manual entry)
  property true value 0.0174545; name BPS_true_value
    allocation property applied in "true value" allocation // value calculated from revenue
  properties: dry mass 1 kg, carbon content, fossil 0, water in wet mass 0 kg, carbon content, non-fossil 0, wet mass 1 kg, water content 0, carbon allocation 0 kg

## Inputs from technosphere
- tap water: 0 kg; pedigree (1,1,1,1,1)
  This flow is weighted averages using the exchanges in the corresponding regional data.
  properties: wet mass 1 kg, water content 2962.17, dry mass 0.000337476 kg, carbon content, fossil 0.00178991
  note on carbon content, fossil: Bicarbonate content is 2.93 mol/m3. CO2 content is 0.1 mol/m3 (ecoinvent v2.2 report 8, Tab 93.1).
- chemical factory, organics: 2.03593e-10 unit; lognormal variance with pedigree 0.3107, pedigree (2,2,4,5,1)
  This flow is weighted averages using the exchanges in the corresponding regional data.
- municipal solid waste: 0 kg; name BP; pedigree (1,1,1,1,1)
  This flow is weighted averages using the exchanges in the corresponding regional data.
  production volume 0 kg
    Calculated based on the production volume of the reference product.
  property price 0 EUR2005; name BP_price_EUR2005
  properties: water content 0.297017, carbon content, non-fossil 0.261655, wet mass 1 kg, carbon content, fossil 0.171549, heating value, net 11.74 MJ, dry mass 0.771 kg
  note on carbon content, non-fossil: MSW composition in tab 4.1, ecoinvent v2.2 report 13_I. C content referred to 1 kg DM
  note on heating value, net: Value taken from the general comment of the treatment dataset.
- sulfur: 0.256058 kg; lognormal variance with pedigree 0.0113, pedigree (2,2,4,5,1)
  This flow is weighted averages using the exchanges in the corresponding regional data.
  properties: dry mass 1 kg, wet mass 1 kg
- electricity, low voltage: 0 kWh; pedigree (1,1,1,1,1)
  This flow is weighted averages using the exchanges in the corresponding regional data.
- tap water: 0.00219402, 0.000264101, 0.00043647, 0.011006, 0.00028632, 0.000814431, 0.125948 kg (7 entries); lognormal variance with pedigree 0.0113, pedigree (2,2,4,5,1)
  This flow is weighted averages using the exchanges in the corresponding regional data.
- municipal solid waste: -1.09915e-6, -2.76959e-7, -3.95791e-7, -0.000777364 kg (4 entries); lognormal variance with pedigree 0.0113, pedigree (2,2,4,5,1)
  This flow is weighted averages using the exchanges in the corresponding regional data.
  production volume 9.62121e7 kg
- electricity, low voltage: 0.000562651, 0.000102448, 0.00164954, 0.0253257, 0.00409726, 0.0117652 kWh (6 entries); lognormal variance with pedigree 0.0113, pedigree (2,2,4,5,1)
  This flow is weighted averages using the exchanges in the corresponding regional data.

## Inputs from nature
- Water, unspecified natural origin [natural resource, in ground]: 0.00031322 m3; lognormal variance with pedigree 0.0113, pedigree (2,2,4,5,1)
  This flow is weighted averages using the exchanges in the corresponding regional data.
- Water, cooling, unspecified natural origin [natural resource, in water]: 0.0516814 m3; lognormal variance with pedigree 0.0113, pedigree (2,2,4,5,1)
  This flow is weighted averages using the exchanges in the corresponding regional data.

## Emissions to nature
All rows: lognormal variance with pedigree 0.0507, pedigree (2,2,4,5,1)
- Sulfate [water, surface water]: 0.000301475 kg
  This flow is weighted averages using the exchanges in the corresponding regional data.
- Sulfur dioxide [air, urban air close to ground]: 0.00528559 kg
  This flow is weighted averages using the exchanges in the corresponding regional data.
- Water [water, surface water]: 0.0319038 m3
  This flow is weighted averages using the exchanges in the corresponding regional data.
- Sulfate [air, urban air close to ground]: 0.00329664 kg
  This flow is weighted averages using the exchanges in the corresponding regional data.
- Water [air, unspecified]: 0.0201244 m3
  This flow is weighted averages using the exchanges in the corresponding regional data.
- Sulfur trioxide [air, urban air close to ground]: 0.000234915 kg
  This flow is weighted averages using the exchanges in the corresponding regional data.

## Extrapolations
Deleted extrapolations from Europe.
