# lath, softwood, raw, kiln drying to u=10%

Dataset: EcoSpold 2, unit process
Geography: Europe without Switzerland
Time period: 2011-01-01 to 2021-12-31
Technology level: current
Classification: ISIC rev.4 ecoinvent: 1610:Sawmilling and planing of wood
Tags: Swiss brush-up completed
Scenario: Business-as-Usual
System model: Allocation, cut-off by classification
Generated by: Frank Werner
Published in: Bauer, C. 2007
Database: ecoinvent
isCopyrightProtected: true
accessRestrictedTo: 1

## General comment
This dataset represents the service of kiln drying of one m3 sawn softwood beam. The wood chip used in the process is considered to be supplied internally which are generated from slabs and sidings when sawing. Characteristics of the of wood chips to be burned: Dry wood density 440 kg/m3; the low heating value 3007 MJ/m3, humidity when burned is estimated to be around 50%, which is achieved after some weeks of drying in the storage. Air emission factors as well as the boiler efficiency represent average annual operation including start and stop (warm-up and shut-down). The boiler used is considered to be 300 kW and emission profile refers to the facility. Shrinkage ratio of between the moisture content of u=30% - 0% is 0.004 %/%.
The data was provided by and approved by the Swiss forest industry (Holzindustrie Schweiz HIS).
Within ecoinvent, three products - boards, beams and laths - are distinguished:

## Included activities start
Kiln drying process starting from sawn softwood, at the sawmill site, assumed to lose some water before the start of the kiln drying process.

## Included activities end
This activity ends with kiln dried softwood beam, at sawmill. The dataset includes kiln drying of wet wood assumed as u=60% down to u=10%, shrinkage and emissions associated with wood chip incineration. The dataset does not include air emissions released from the wood, as the emissions are assumed to be comparable to emissions from natural drying during decompostion/rotting.

## Geography
Represents average Swiss conditions assumed to be represenative for Europe

## Parameters
- emission of calcium: 7.8e-6 kg/MJ; name calcium; = 0.00000585*scaling_factor
  updated emission profile based on personal communication, PSI, 2014
- emission of dioxin measured as 2,3,7,8-tetrachlorodibenzo-p-dioxin: 4.13333e-14 kg/MJ; name tetrachloro; = 0.000000000000031*scaling_factor
  updated emission profile based on personal communication, PSI, 2014
- emission of arsenic: 1.33333e-9 kg/MJ; name arsenic; = 0.000000001*scaling_factor
  updated emission profile based on personal communication, PSI, 2014
- emission of dinitrogen monoxide: 3.06667e-6 kg/MJ; name N2O; = 0.0000023*scaling_factor
  updated emission profile based on personal communication, PSI, 2014
- emission of Magnesium: 4.8e-7 kg/MJ; name magnesium; = 0.00000036*scaling_factor
  updated emission profile based on personal communication, PSI, 2014
- emission of Nitrogen oxides: 0.00024 kg/MJ; name no2; = 0.00018*scaling_factor
  updated emission profile based on personal communication, PSI, 2014
- emission of acetaldehyde: 8.13333e-8 kg/MJ; name acet; = 0.000000061*scaling_factor
  updated emission profile based on personal communication, PSI, 2014
- emission of Particulates >2.5 to <10: 6.66667e-6 kg/MJ; name Particulates2_5_to_10; = 5E-06 * scaling_factor
  updated emission profile based on personal communication, PSI, 2014
- emission of benzene, ethyl: 4e-8 kg/MJ; name ben_ethyl; = 0.00000003*scaling_factor
  updated emission profile based on personal communication, PSI, 2014
- wood ash: 0.000634667 kg/MJ; name woodash; = 0.000476*scaling_factor
  generation of sawdusts per MJ
- emission of cadmium: 9.33333e-10 kg/MJ; name cadmium; = 0.0000000007*scaling_factor
  updated emission profile based on personal communication, PSI, 2014
- emission of Particulates 2.5: 0.00012 kg/MJ; name Particulate2_5; = 90E-06*scaling_factor
  updated emission profile based on personal communication, PSI, 2014
- emission of chromium 4: 5.33333e-11 kg/MJ; name chroIV; = 0.00000000004*scaling_factor
  updated emission profile based on personal communication, PSI, 2014
- emission of Methane, non-fossil: 5.33333e-7 kg/MJ; name Methane_nonfossil; = 0.0000004*scaling_factor
  updated emission profile based on personal communication, PSI, 2014
- emission of Fluorine: 6.66667e-8 kg/MJ; name Fluorine; = 0.00000005*scaling_factor
  updated emission profile based on personal communication, PSI, 2014
- emission of Phosphorus: 4e-7 kg/MJ; name Phosphorus; = 0.0000003*scaling_factor
  updated emission profile based on personal communication, PSI, 2014
- emission of sulfur dioxide: 3.33333e-6 kg/MJ; name so2; = 0.0000025*scaling_factor
  updated emission profile based on personal communication, PSI, 2014
- emission of Potassium: 3.12e-5 kg/MJ; name Potassium; = 0.0000234*scaling_factor
  updated emission profile based on personal communication, PSI, 2014
- emission of Formaldehyde: 1.73333e-7 kg/MJ; name Formaldehyde; = 0.00000013*scaling_factor
  updated emission profile based on personal communication, PSI, 2014
- emission of benzene, hexachloro: 9.6e-15 kg/MJ; name ben_hexa; = 0.0000000000000072*scaling_factor
  updated emission profile based on personal communication, PSI, 2014
- wood density, dry: 440 kg/m3; name dry_wood_d
  kg oven-dry matter/oven-dry volume
- emission of copper: 2.93333e-8 kg/MJ; name copper; = 0.000000022*scaling_factor
  updated emission profile based on personal communication, PSI, 2014
- emission of ammonia: 2.30667e-6 kg/MJ; name ammonia; = 0.00000173*scaling_factor
  updated emission profile based on personal communication, PSI, 2014
- emission of zinc: 4e-7 kg/MJ; name zinc; = 0.0000003*scaling_factor
  updated emission profile based on personal communication, PSI, 2014
- emission of benzene: 1.21333e-6 kg/MJ; name benzene; = 0.00000091*scaling_factor
  updated emission profile based on personal communication, PSI, 2014
- emission of non-methane volatile organic compounds, unspecified origin: 1.4e-5 kg/MJ; name nmvoc; = 10.5E-06 * scaling_factor
  updated emission profile based on personal communication, PSI, 2014
- emission of m-Xylene: 1.6e-7 kg/MJ; name mxylene; = 0.00000012*scaling_factor
  updated emission profile based on personal communication, PSI, 2014
- emission of Hydrocarbons, aliphatic, unsaturated: 4.13333e-6 kg/MJ; name Hydrocarbons_aliphatic; = 0.0000031*scaling_factor
  updated emission profile based on personal communication, PSI, 2014
- emission of chlorine: 2.4e-7 kg/MJ; name ch; = 0.00000018*scaling_factor
  updated emission profile based on personal communication, PSI, 2014
- emission of sodium: 1.73333e-6 kg/MJ; name sodium; = 0.0000013*scaling_factor
  updated emission profile based on personal communication, PSI, 2014
- emission of chromium: 5.28e-9 kg/MJ; name chromium; = 0.00000000396*scaling_factor
  updated emission profile based on personal communication, PSI, 2014
- emission of Manganese: 2.26667e-7 kg/MJ; name manganese; = 0.00000017*scaling_factor
  updated emission profile based on personal communication, PSI, 2014
- emission of Particulates >10: 6.66667e-6 kg/MJ; name Particulates_higher_10; = 5E-06 * scaling_factor
  updated emission profile based on personal communication, PSI, 2014
- scaling factor: 1.33333 dimensionless; name scaling_factor; = 1/0.75; lognormal variance with pedigree 0.0016, pedigree (2,1,1,1,1)
  The scaling factor corresponds to the inverse of the average annual efficiency of the heating system, including start/stop (warm up and cool down). Therefore, this efficiency will be lower than figures provided by manufacturers. The estimated value was provided by T.Nussbaumer, Verenum, and represents the average installed boiler in this size category in Switzerland.
- shrinkage ratio (u=30% - 0%): 0.004 dimensionless; name shrinkage_ratio
  shrinkage in % of volume per % of change in moisture content between u=30% to 0%
- emission of polycyclic aromatic hydrocarbons: 1.48e-8 kg/MJ; name pah; = 0.0000000111*scaling_factor
  updated emission profile based on personal communication, PSI, 2014
- emission of Hydrocarbons, aliphatic, alkanes, unspecified: 1.21333e-6 kg/MJ; name Hydrocarbons_aliphatic_alkanes; = 0.00000091*scaling_factor
  updated emission profile based on personal communication, PSI, 2014
- emission of benzo(a)pyrene: 6.66667e-10 kg/MJ; name benzo; = 0.0000000005*scaling_factor
  updated emission profile based on personal communication, PSI, 2014
- emission of carbon monoxide, non-fossil: 0.0004 kg/MJ; name co; = 0.0003*scaling_factor
  updated emission profile based on personal communication, PSI, 2014
- moisture content wood chip: 50 dimensionless; name moisture_woodchip
  moisture content of wood chip
- emission of toluene: 4e-7 kg/MJ; name toluene; = 0.0000003*scaling_factor
  updated emission profile based on personal communication, PSI, 2014
- emission of Nickel: 8e-9 kg/MJ; name nickel; = 0.000000006*scaling_factor
  updated emission profile based on personal communication, PSI, 2014
- emission of lead: 3.33333e-8 kg/MJ; name lead; = 0.000000025*scaling_factor
  updated emission profile based on personal communication, PSI, 2014
- emission of Mercury: 4e-10 kg/MJ; name mercury; = 0.0000000003*scaling_factor
  updated emission profile based on personal communication, PSI, 2014
- emission of Phenol, pentachloro-: 1.08e-11 kg/MJ; name Phenol_pentachloro; = 0.0000000000081*scaling_factor
  updated emission profile based on personal communication, PSI, 2014
- emission of bromine: 8e-8 kg/MJ; name bro; = 0.00000006*scaling_factor
  updated emission profile based on personal communication, PSI, 2014
- moisture content lath: 10 dimensionless; name moisture_lath
  moisture content of lath
- wood density, basic: 422.4 kg/m3; name basic_wood_d; = dry_wood_d*(1-moisture_lath*shrinkage_ratio)
  kg oven-dry matter/wet volume
- total heat: 702 MJ; name heat_woodchip
  total thermal energy required for the drying process per m3 of output
- furnace, wood chip: 2.31481e-8 unit/MJ; name furnace_energy; = 1/(300*20*2000*3.6)
  inventory of furnace over MJ heating demand

## Reference product
- sawnwood, lath, softwood, raw, dried (u=10%): 1 m3; name lath_kiln_raw; CPC 31101: Wood, sawn or chipped lengthwise, sliced or peeled, of a thickness exceeding 6 mm, of coniferous wood; By-product classification allocatable product
  production volume 1.79101e7 m3; name p_sawnwood_dried; = 230041.728/1250*(98570-1250)
    Scaled from the PV estimates of the Swiss sawmilling chain based UNECE data for 2013 for the production volumes of Switzerland (1'250'000 m3) and the production volume of Europe without Switzerland ( 97'570'000 m3 - 1'250'000 m3).
  property price 160 EUR2005
    Expert judgement (Urs Luginbühl, Swiss Sawmilling industry, personal communication in June 2014). Cross-reference; FAOSTAT (accessed 20140428). The price is calculated by using data on total world import quantity (m3) and import value (1000 USD), year 2005. 109432798 m3 of Sawnwood (C) - coniferous was imported in the world in 2005. The import value was 22249842000 USD. The calculated price is thus (22249842000/109432798=203*0.8=) 164 Euro.
  property water in wet mass 42.24 kg; name WWM_dried; = basic_wood_d* water_content
  property water content 0.1; name water_content
  property wet mass 464.64 kg; = basic_wood_d*(1+ water_content)
  property dry mass 422.4 kg; = basic_wood_d
  property heating value, net 6218.91 MJ
    LHV is calculated based on the Carbon content of the product. More details can be found on the respective documentation.The property is based on a value of 13.38MJ/kg
  property carbon content 0.494
    carbon content on a dry matter basis (reserved; not for manual entry)
  properties: carbon content, non-fossil 0.494, carbon content, fossil 0, carbon allocation 208.666 kg

## Inputs from technosphere
- electricity, medium voltage: 20 kWh; name elec_midvol; lognormal variance with pedigree 0.0337, pedigree (2,1,4,3,1)
  electricity consumption of the drying facility
  properties: UVEK_relative_amount_1 1, UVEK_link_1 1779
  note on UVEK_relative_amount_1: to be used only in special submissions in coordination with ecoinvent and the Swiss FOEN
- wood chips, wet, measured as dry mass: 50.2685 kg; name woodchip_soft; = heat_woodchip/woodchip_soft_Net_Heat_Value/(1+moisture_woodchip/100)* scaling_factor; lognormal variance with pedigree 0.0342, pedigree (2,1,4,4,1)
  used for heat generation; measured data from industry
  property wet mass 1.5 kg; name woodchip_soft_WM; = woodchip_soft_DM + woodchip_soft_WWM
  property dry mass 1 kg; name woodchip_soft_DM
  property water content 0.5; name woodchip_soft_water_content; = moisture_woodchip/100
  property water in wet mass 0.5 kg; name woodchip_soft_WWM; = woodchip_soft_DM*woodchip_soft_water_content
  property heating value, net 12.4133 MJ; name woodchip_soft_Net_Heat_Value; = woodchip_soft_Gross_Heat_Value - 1.32 - 20* woodchip_soft_water_content/(1+ woodchip_soft_water_content)
  property carbon content, non-fossil 0.494; name woodchip_soft_C_content_non_fossil
  property heating value, gross 20.4 MJ; name woodchip_soft_Gross_Heat_Value
  note on heating value, net: Value based on the dataset 'softwood forestry, mixed species, sustainable forest management'
  note on heating value, gross: gross (upper) heating (calorific) value according to ecoinvent guidelines 2.2
- sawnwood, softwood, raw: 1.08696 m3; name sawnwood_raw; = lath_kiln_raw/(1- (30-moisture_lath)*shrinkage_ratio); source Rudi Wagenführ 2000; lognormal variance with pedigree 0.0336, pedigree (1,1,4,4,1)
  Processed internally within the sawmill
  property water in wet mass 271.04 kg; name WWM_raw
  properties: carbon content, non-fossil 0.494, wet mass 658.24 kg, dry mass 387.2 kg, water content 0.7, heating value, net 5130.57 MJ
- furnace, wood chips, with silo, 300kW: 1.625e-5 unit; name furnace; = furnace_energy* heat_woodchip; lognormal variance with pedigree 0.5592, pedigree (2,1,4,4,1)
  data taken from ecoinvent 2.2 report Bauer, C. (2007): Holzenergie. In: R. Dones (ed.): Sachbilanzen von Energiesystemen: Grundlagen für den ökologischen Vergleich von Energiesystemen und den Einbezug von Energiesystemen in Ökobilanzen für die Schweiz, Final report ecoinvent 2000 No. 6, Paul Scherrer Institut Villigen, Swiss Centre for Life Cycle Inventories, Duebendorf, CH.
  properties: UVEK_link_1 999999, UVEK_relative_amount_1 1
- wood ash mixture, pure: -0.445536 kg; name w_wood_ash; = (woodash* heat_woodchip)*-1; lognormal variance with pedigree 0.0337, pedigree (2,1,4,3,1)
  calculated from the input wood chips for heat production, based on an updated profile for industrial wood combustion according to PSI (CH)
  production volume 7.97961e6 kg; = 102491.871326208/1250*(98570-1250)
    (same comment as for sawnwood, lath, softwood, raw, dried (u=10%))
  properties: UVEK_link_2 1127, UVEK_link_1 1128, UVEK_relative_amount_3 -1, wet mass 1 kg, carbon content, non-fossil 0.012, dry mass 1 kg, UVEK_link_3 1129
- technical wood drying facility: 3.66e-6 unit; name wooddrying; lognormal variance with pedigree 0.5587, pedigree (2,1,4,3,1)
  data taken from ecoinvent 2.2

## Emissions to nature
- Chromium VI [air, urban air close to ground]: 3.744e-8 kg; = chroIV* heat_woodchip; lognormal variance with pedigree 0.8087, pedigree (2,1,4,3,1)
  (same comment as for wood ash mixture, pure)
- Particulates, < 2.5 um [air, urban air close to ground]: 0.08424 kg; = Particulate2_5* heat_woodchip; lognormal variance with pedigree 0.5587, pedigree (2,1,4,3,1)
  (same comment as for wood ash mixture, pure)
- Nickel [air, urban air close to ground]: 5.616e-6 kg; = nickel* heat_woodchip; lognormal variance with pedigree 0.8087, pedigree (2,1,4,3,1)
  (same comment as for wood ash mixture, pure)
- Water [air, unspecified]: 0.252369 m3; = (sawnwood_raw*WWM_raw-lath_kiln_raw*WWM_dried)/1000; lognormal variance with pedigree 0.2081, pedigree (1,1,4,3,1)
  difference in water in wet mass in kg, converted to m3
- Phenol, pentachloro- [air, urban air close to ground]: 7.5816e-9 kg; = Phenol_pentachloro* heat_woodchip; lognormal variance with pedigree 0.3587, pedigree (2,1,4,3,1)
  calculated from parameters according to the input wood chips for heat production
- Copper [air, urban air close to ground]: 2.0592e-5 kg; = copper* heat_woodchip; lognormal variance with pedigree 0.2087, pedigree (2,1,4,3,1)
  (same comment as for wood ash mixture, pure)
- Carbon monoxide, non-fossil [air, urban air close to ground]: 0.2808 kg; = co* heat_woodchip; lognormal variance with pedigree 0.2087, pedigree (2,1,4,3,1)
  (same comment as for wood ash mixture, pure)
- Methane, non-fossil [air, urban air close to ground]: 0.0003744 kg; = Methane_nonfossil* heat_woodchip; lognormal variance with pedigree 0.2087, pedigree (2,1,4,3,1)
  (same comment as for wood ash mixture, pure)
- Fluorine [air, urban air close to ground]: 4.68e-5 kg; = Fluorine* heat_woodchip; lognormal variance with pedigree 0.2087, pedigree (2,1,4,3,1)
  (same comment as for wood ash mixture, pure)
- Chlorine [air, urban air close to ground]: 0.00016848 kg; = ch* heat_woodchip; lognormal variance with pedigree 0.2087, pedigree (2,1,4,3,1)
  (same comment as for wood ash mixture, pure)
- Dioxins, measured as 2,3,7,8-tetrachlorodibenzo-p-dioxin [air, urban air close to ground]: 2.9016e-11 kg; = tetrachloro* heat_woodchip; lognormal variance with pedigree 0.5587, pedigree (2,1,4,3,1)
  (same comment as for wood ash mixture, pure)
- Benzene, ethyl- [air, urban air close to ground]: 2.808e-5 kg; = ben_ethyl* heat_woodchip; lognormal variance with pedigree 0.2087, pedigree (2,1,4,3,1)
  (same comment as for wood ash mixture, pure)
- Calcium [air, urban air close to ground]: 0.0054756 kg; = calcium* heat_woodchip; lognormal variance with pedigree 0.2087, pedigree (2,1,4,3,1)
  (same comment as for wood ash mixture, pure)
- Sulfur dioxide [air, urban air close to ground]: 0.00234 kg; = so2* heat_woodchip; lognormal variance with pedigree 0.0337, pedigree (2,1,4,3,1)
  (same comment as for wood ash mixture, pure)
- Benzo(a)pyrene [air, urban air close to ground]: 4.68e-7 kg; = benzo* heat_woodchip; lognormal variance with pedigree 0.5587, pedigree (2,1,4,3,1)
  (same comment as for wood ash mixture, pure)
- Nitrogen oxides [air, urban air close to ground]: 0.16848 kg; = no2* heat_woodchip; lognormal variance with pedigree 0.2087, pedigree (2,1,4,3,1)
  (same comment as for wood ash mixture, pure)
- Dinitrogen monoxide [air, urban air close to ground]: 0.0021528 kg; = N2O* heat_woodchip; lognormal variance with pedigree 0.2087, pedigree (2,1,4,3,1)
  (same comment as for wood ash mixture, pure)
- Potassium [air, urban air close to ground]: 0.0219024 kg; = Potassium* heat_woodchip; lognormal variance with pedigree 0.2087, pedigree (2,1,4,3,1)
  (same comment as for wood ash mixture, pure)
- Carbon dioxide, non-fossil [air, urban air close to ground]: 91.0531 kg; = woodchip_soft*0.494/12*44; lognormal variance with pedigree 0.0337, pedigree (2,1,4,3,1)
  calculated from parameters based on wood input oven-dry x carbon content x molar relationship of CO2/C
- NMVOC, non-methane volatile organic compounds, unspecified origin [air, urban air close to ground]: 0.009828 kg; = nmvoc* heat_woodchip; lognormal variance with pedigree 0.2087, pedigree (2,1,4,3,1)
  (same comment as for wood ash mixture, pure)
- Acetaldehyde [air, urban air close to ground]: 5.7096e-5 kg; = acet* heat_woodchip; lognormal variance with pedigree 0.2087, pedigree (2,1,4,3,1)
  (same comment as for wood ash mixture, pure)
- Toluene [air, urban air close to ground]: 0.0002808 kg; = toluene* heat_woodchip; lognormal variance with pedigree 0.3587, pedigree (2,1,4,3,1)
  (same comment as for wood ash mixture, pure)
- Benzene, hexachloro- [air, urban air close to ground]: 6.7392e-12 kg; = ben_hexa* heat_woodchip; lognormal variance with pedigree 0.2087, pedigree (2,1,4,3,1)
  (same comment as for wood ash mixture, pure)
- Manganese [air, urban air close to ground]: 0.00015912 kg; = manganese* heat_woodchip; lognormal variance with pedigree 0.2087, pedigree (2,1,4,3,1)
  (same comment as for wood ash mixture, pure)
- Benzene [air, urban air close to ground]: 0.00085176 kg; = benzene* heat_woodchip; lognormal variance with pedigree 0.2087, pedigree (2,1,4,3,1)
  (same comment as for wood ash mixture, pure)
- Hydrocarbons, aliphatic, alkanes, unspecified [air, urban air close to ground]: 0.00085176 kg; = Hydrocarbons_aliphatic_alkanes* heat_woodchip; lognormal variance with pedigree 0.2087, pedigree (2,1,4,3,1)
  (same comment as for wood ash mixture, pure)
- Chromium [air, urban air close to ground]: 3.70656e-6 kg; = chromium* heat_woodchip; lognormal variance with pedigree 0.8087, pedigree (2,1,4,3,1)
  (same comment as for wood ash mixture, pure)
- PAH, polycyclic aromatic hydrocarbons [air, urban air close to ground]: 1.03896e-5 kg; = pah* heat_woodchip; lognormal variance with pedigree 0.5587, pedigree (2,1,4,3,1)
  (same comment as for wood ash mixture, pure)
- Formaldehyde [air, urban air close to ground]: 0.00012168 kg; = Formaldehyde* heat_woodchip; lognormal variance with pedigree 0.2087, pedigree (2,1,4,3,1)
  (same comment as for wood ash mixture, pure)
- Lead [air, urban air close to ground]: 2.34e-5 kg; = lead* heat_woodchip; lognormal variance with pedigree 0.8087, pedigree (2,1,4,3,1)
  (same comment as for wood ash mixture, pure)
- Bromine [air, urban air close to ground]: 5.616e-5 kg; = bro* heat_woodchip; lognormal variance with pedigree 0.8087, pedigree (2,1,4,3,1)
  (same comment as for wood ash mixture, pure)
- Magnesium [air, urban air close to ground]: 0.00033696 kg; = magnesium* heat_woodchip; lognormal variance with pedigree 0.2087, pedigree (2,1,4,3,1)
  (same comment as for wood ash mixture, pure)
- Cadmium [air, urban air close to ground]: 6.552e-7 kg; = cadmium* heat_woodchip; lognormal variance with pedigree 0.8087, pedigree (2,1,4,3,1)
  (same comment as for wood ash mixture, pure)
- Sodium [air, urban air close to ground]: 0.0012168 kg; = sodium* heat_woodchip; lognormal variance with pedigree 0.2087, pedigree (2,1,4,3,1)
  (same comment as for wood ash mixture, pure)
- Ammonia [air, urban air close to ground]: 0.00161928 kg; = ammonia* heat_woodchip; lognormal variance with pedigree 0.2087, pedigree (2,1,4,3,1)
  (same comment as for wood ash mixture, pure)
- Phosphorus [air, urban air close to ground]: 0.0002808 kg; = Phosphorus* heat_woodchip; lognormal variance with pedigree 0.2087, pedigree (2,1,4,3,1)
  (same comment as for wood ash mixture, pure)
- Zinc [air, urban air close to ground]: 0.0002808 kg; = zinc* heat_woodchip; lognormal variance with pedigree 0.8087, pedigree (2,1,4,3,1)
  (same comment as for wood ash mixture, pure)
- Particulates, > 2.5 um, and < 10um [air, unspecified]: 0.00468 kg; = Particulates2_5_to_10*heat_woodchip; lognormal variance with pedigree 0.3587, pedigree (2,1,4,3,1)
  (same comment as for wood ash mixture, pure)
- Mercury [air, urban air close to ground]: 2.808e-7 kg; = mercury* heat_woodchip; lognormal variance with pedigree 0.8087, pedigree (2,1,4,3,1)
  (same comment as for wood ash mixture, pure)
- Arsenic [air, urban air close to ground]: 9.36e-7 kg; = arsenic* heat_woodchip; lognormal variance with pedigree 0.2087, pedigree (2,1,4,3,1)
  (same comment as for wood ash mixture, pure)
- m-Xylene [air, urban air close to ground]: 0.00011232 kg; = mxylene* heat_woodchip; lognormal variance with pedigree 0.3587, pedigree (2,1,4,3,1)
  (same comment as for wood ash mixture, pure)
- Hydrocarbons, aliphatic, unsaturated [air, urban air close to ground]: 0.0029016 kg; = Hydrocarbons_aliphatic* heat_woodchip; lognormal variance with pedigree 0.2087, pedigree (2,1,4,3,1)
  (same comment as for wood ash mixture, pure)

## Sampling procedure
complementary literature and sampling from sawmills; CH data used to approximate European processes

## Extrapolations
This dataset has been extrapolated from year 2013 to the year of the calculation (2021). The uncertainty has been adjusted accordingly.
