# treatment of used tram

Dataset: EcoSpold 2, unit process
Geography: RoW
Time period: 1990-01-01 to 2021-12-31
Technology level: current
Classification: EcoSpold01Categories: transport systems/road
Classification: ISIC rev.4 ecoinvent: 3830:Materials recovery
Tags: ConvertedDataset; Treatment
Scenario: Business-as-Usual
System model: Allocation, cut-off by classification
Generated by: Michael Spielmann (obsolete)
Published in: Spielmann M. 2004
Database: ecoinvent
isCopyrightProtected: true
accessRestrictedTo: 1

## General comment
For the disposal of steel, aluminium and cooper a cut off allocation is applied.
[This dataset was already contained in the ecoinvent database version 2. It was not individually updated during the transfer to ecoinvent version 3. Life Cycle Impact Assessment results may still have changed, as they are affected by changes in the supply chain, i.e. in other datasets. This dataset was generated following the ecoinvent quality guidelines for version 2. It may have been subject to central changes described in the ecoinvent version 3 change report (http://www.ecoinvent.org/database/ecoinvent-version-3/reports-of-changes/), and the results of the central updates were reviewed extensively. The changes added e.g. consistent water flows and other information throughout the database. The documentation of this dataset can be found in the ecoinvent reports of version 2, which are still available via the ecoinvent website. The change report linked above covers all central changes that were made during the conversion process.]

## Included activities end
The inventory includes disposal processes for non-metal bulk materials. For the disposal standard transport distances are employed.

## Geography
Data represent Swiss conditions

## Technology
no technologies are specified

## Time period
Data represents conditions of the 1990ties

## Reference product
- used tram: -1 unit; By-product classification Waste; CPC 39990: Other wastes n.e.c.
  EcoSpold01Location=CH
  production volume 3.96633 unit
    This is a placeholder value that does not reflect real-world production volumes. This dataset does not currently require a real-world production volume to work in the database framework, and no actual data were collected yet. This has no negative effect on the results of the ecoinvent database.
  property price 0 EUR2005
    Waste products are assigned a price of zero as they are assumed to require further treatment.
  property carbon content, fossil 0.0485113
    Calculated from C content in input materials in the infrastructure
  property carbon content, non-fossil 0.00352812
    Calculated from C content in input materials in the infrastructure
  property carbon content 0.0520394
    carbon content on a dry matter basis (reserved; not for manual entry)
  properties: water content 0, wet mass 20992 kg, dry mass 20992 kg, water in wet mass 0 kg, carbon allocation 1092.41 kg

## Inputs from technosphere
- waste glass: 0 kg; pedigree (1,1,1,1,1)
  Data is derived from material composition of a tram
  EcoSpold01Location=CH
  Uncertainty: Data is derived from material composition of a tram
  production volume 0 kg
    Calculated from the production volume of used tram in proportion to the respective output amounts.
  properties: wet mass 1 kg, dry mass 1 kg, heating value, net 0.05 MJ
  note on heating value, net: Value extracted from "treatment of waste glass, open dump, very wet infiltration class (1000mm)"
- waste emulsion paint: 0 kg; pedigree (1,1,1,1,1)
  EcoSpold01Location=CH
  Data is derived from material composition of a tram
  Uncertainty: Data is derived from material composition of a tram
  production volume 0 kg
    (same comment as for waste glass)
  properties: dry mass 1 kg, wet mass 1 kg, heating value, net 8.18 MJ, carbon content, fossil 0.27
  note on carbon content, fossil: Tab A.4, ecoinvent v2.2 report 13_I. C content has been calculated after data in the tables, and then referred to 1 kg DM
- waste plastic, mixture: 0 kg; pedigree (1,1,1,1,1)
  (same comment as for waste emulsion paint)
  production volume 0 kg
    (same comment as for waste glass)
  properties: carbon content, fossil 0.747344, water content 0.180638, wet mass 1 kg, dry mass 0.847 kg, heating value, net 30.79 MJ
  note on carbon content, fossil: C content in 1 kg DM was calculated using data in Tab A.2, ecoinvent v2.2 report 13_I
  note on heating value, net: Value taken from the general comment of the treatment dataset.
- waste glass: -61.24, -5.64436, -0.128052, -0.526611, -0.799688, -2.35639, -115.17, -577.135 kg (8 entries); lognormal variance with pedigree 0.046, pedigree (3,4,5,5,1)
  (same comment as for waste glass)
  production volume 2289 kg
- waste emulsion paint: -12.7493, -135.251 kg (2 entries); lognormal variance with pedigree 0.046, pedigree (3,4,5,5,1)
  (same comment as for waste emulsion paint)
  production volume 444 kg
- waste plastic, mixture: -94.5556, -6.31784, -0.477808, -2.60949, -1.05421, -2.47796, -80.5657, -661.941 kg (8 entries); lognormal variance with pedigree 0.046, pedigree (3,4,5,5,1)
  (same comment as for waste emulsion paint)
  production volume 2550 kg

## Sampling procedure
Data is based on the material consumption of vehicles.

## Extrapolations
none This dataset has been copied from an original dataset covering the geography CH. The uncertainty has been adjusted accordingly.
