# water pump production, 22kW

Dataset: EcoSpold 2, unit process
Geography: GLO
Time period: 2007-01-01 to 2021-12-31
Technology level: current
Classification: ISIC rev.4 ecoinvent: 2812:Manufacture of fluid power equipment
Classification: EcoSpold01Categories: solar collector systems/production of components
Scenario: Business-as-Usual
System model: Allocation, cut-off by classification
Generated by: David FitzGerald
Database: ecoinvent
isCopyrightProtected: true
accessRestrictedTo: 1

## General comment
This dataset represents the production of a water pump with a power of 22 kW. The inventory is approximated based on the dataset "pump production, 40W, CH" (for the input materials) and the dataset "heat pump production, brine-water, 10kW, CH" (for the energy inputs). This dataset should only be used in cases where its contribution to the overall impacts of the studied system is expected to be small.
The assumed characteristics of the pump are based on Nemecek et al. (2007), and correspond to an average pump used for agricultural irrigation: the total mass of the pump is 300 kg and the engine nominal power is 22 kW with a volumetric capacity of 30 m3/h for a delivery pressure of 7 to 8 bar.
This water pump is meant to be used as a generic irrigation pump (both for surface water and groundwater).
Reference:
Nemecek T., Kägi T. and Blaser S. (2007) Life Cycle Inventories of Agricultural Production Systems. Final report ecoinvent v2.0 No.15. Swiss Centre for Life Cycle Inventories, Dübendorf, CH.

## Included activities start
This activity starts with the supply of the input materials at the factory gate.

## Included activities end
This activity ends with the assembled pump at the exit of the factory. The treatment and disposal of the pump is taken into account through the waste outputs.
Due to lack of data, the energy required to assemble the pump, as well as the infrastructure use, are roughly approximated.

## Geography
This dataset does not have a specific geographical location. It is assumed to be valid at the global scale.

## Technology
Unkown.

## Time period
The materials listed in the inventory are assumed to be those used currently for the production of water pumps.

## Reference product
- water pump, 22kW: 1 unit; name RP_amount; CPC 43220: Pumps for liquids; liquid elevators; By-product classification allocatable product
  production volume 8.4193e6 unit; name RP_PV; = 5.86638390199093E-06 * 430553152517.161 + 7.82184520265457E-06 * 753468016905.032
    Calculated based on the amount of pumps used in the datasets "water pump operation, diesel, GLO" and "water pump operation, electric, GLO" and their respective production volumes.
    This is a rough estimation, as it is based on the assumption that this type of pump is used exclusively for irrigation, and that all irrigation uses this type of pump. It is therefore likely overestimating the quantity of this type of pump that is actually produced yearly globally.
  property lifetime capacity in m3 317442 m3; = 2.67264E+12 / (252579046.13 * 10000) * 3 * 10000 * lifetime
    The lifetime capacity is calculated based on the lifetime of the pump and the amount of water supplied per year to a field of 3 hectares. The amount of water supplied per year was calculated by dividing the amount of water used for irrigation globally by the global irrigated area. The amount of water used for irrigation globally is equal to 2.67E+12 m3 and corresponds to the World irrigation water withdrawal given in Table 5 of Frenken & Gillet (2012). The global irrigated area is equal to 2.53E+8 ha and corresponds to the area actually irrigated published in the Global Map of Irrigation Areas (Siebert et al. 2013).
    The average area supplied by one pump unit (3 ha) is taken from Nemecek & Gillet (2007).
    The lifetime capacity is highly uncertain as it is directly related to the lifetime of the pump, which depends on many different factors.
    References:
    Frenken, K. & Gillet, V. (2012) Irrigation water requirement and water withdrawal by country, FAO AQUASTAT Reports.
    Siebert, S., Henrich, V., Frenken, K., Burke, J. (2013) Update of the Digital Global Map of Irrigation Areas to Version 5, FAO 2013. Excel file last accessed on 2018-03-12: http://www.fao.org/nr/water/aquastat/irrigationmap/index20.stm
    Nemecek T. & Kägi T. (2007) Life Cycle Inventories of Swiss and European Agricultural Production Systems. Final report ecoinvent V2.0 No. 15a. Agroscope Reckenholz-Taenikon Research Station ART, Swiss Centre for Life Cycle Inventories, Zurich and Dübendorf, CH, retrieved from: www.ecoinvent.ch.
  property lifetime 10 year; name lifetime
  property price 360.067 EUR2005; name RP_amount_price_EUR2005
    Calculated based on inputs: The price of the product has been calculated as a sum of the values of the material and energy inputs for this product. This value is therefore a rough estimation. It may underestimate the real price since there are additional expenses when producing any product. These expences can include for example labour costs, treatment of waste materials and profit for the producer. Please consider carefully whether this level of data quality is acceptable for your application.

## By-products
- aluminium scrap, post-consumer: 0 kg; CPC 39363: Waste and scrap of aluminium; By-product classification Recyclable; pedigree (1,1,1,1,1)
  Calculated based on the input of aluminium.
  production volume 0 kg; = RP_PV * (aluminium_scrap / RP_amount)
    Calculated from production volume of reference product using the relative outputs.
  property price 0.685 EUR2005; name aluminium_scrap_price_EUR2005
    Temporary price data. Calculated as 90% of purchasers price based on: estimated at 85% of new scrap
  property carbon content 0
    carbon content on a dry matter basis (reserved; not for manual entry)
  properties: carbon content, fossil 0, wet mass 1 kg, carbon content, non-fossil 0, water content 0, dry mass 1 kg, water in wet mass 0 kg, carbon allocation 0 kg
- iron scrap, unsorted: 0 kg; CPC 39310: Slag, dross, scalings and other waste from the manufacture of iron or steel; By-product classification Recyclable; pedigree (1,1,1,1,1)
  Calculated based on the input of iron.
  production volume 0 kg; = RP_PV * (iron_scrap / RP_amount)
    Calculated from production volume of reference product using the relative outputs.
  property price 0.149 EUR2005; name iron_scrap_price_EUR2005
    Temporary price data. Calculated as 90% of purchasers price based on: estimated at 85% of sorted scrap
  property carbon content 0
    carbon content on a dry matter basis (reserved; not for manual entry)
  properties: dry mass 1 kg, wet mass 1 kg, water content 0, water in wet mass 0 kg, carbon content, non-fossil 0, carbon content, fossil 0, carbon allocation 0 kg

## Inputs from technosphere
- scrap copper: 0 kg; name scrap_copper; pedigree (1,1,1,1,1)
  Calculated based on the input of copper.
  production volume 0 kg
    Calculated from production volume of reference product using the relative outputs.
  property price 0 EUR2005; name scrap_copper_price_EUR2005
  properties: wet mass 1 kg, dry mass 1 kg
- waste polyvinylchloride product: 0 kg; name waste_PVC; pedigree (1,1,1,1,1)
  Calculated based on the input of PVC.
  production volume 0 kg
    Calculated from production volume of reference product using the relative outputs.
  property price 0 EUR2005; name waste_PVC_price_EUR2005
  properties: heating value, net 21.51 MJ, wet mass 1 kg, water content 0.00200401, dry mass 0.998 kg, carbon content, fossil 0.440882
- electricity, medium voltage: 140 kWh; lognormal variance with pedigree 0.2106, pedigree (5,5,5,5,5)
  Proxy value, taken from the dataset "heat pump production, brine-water, 10kW, CH" (accessed on the 2017-11-14).
- aluminium, wrought alloy: 2.47 kg; name aluminium_input; lognormal variance with pedigree 0.0192, pedigree (2,5,4,5,1)
  Extrapolated value based on the dataset "pump production, 40W, CH" (accessed on the 2017-11-14).
  properties: wet mass 1 kg, dry mass 1 kg
- waste rubber, unspecified: 0 kg; name waste_rubber; pedigree (1,1,1,1,1)
  Calculated based on the input of rubber.
  production volume 0 kg
    Calculated from production volume of reference product using the relative outputs.
  property price 0 EUR2005; name waste_rubber_price_EUR2005
  properties: heating value, net 27.19 MJ, wet mass 1 kg, dry mass 1 kg, carbon content, fossil 0.853
  note on heating value, net: Value taken from the general comment of the treatment dataset.
- polyvinylchloride, suspension polymerised: 3.23488 kg; name PVC_susp_pol; lognormal variance with pedigree 0.0192, pedigree (2,5,4,5,1)
  (same comment as for aluminium, wrought alloy)
  properties: dry mass 1 kg, carbon content, fossil 0.387097, heating value, net 21.5 MJ, wet mass 1 kg
  note on carbon content, fossil: Monomer is vynyl chloride, C2H3Cl (ecoinvent v2.2 report 11_II). MW=62 g/mol
- steel, chromium steel 18/8, hot rolled: 113.72 kg; name steel_input; lognormal variance with pedigree 0.0192, pedigree (2,5,4,5,1)
  (same comment as for aluminium, wrought alloy)
  properties: wet mass 1 kg, dry mass 1 kg, carbon content, fossil 0.0008
  note on carbon content, fossil: Stainless steel model is the grade 304 steel (18/8 stainless, 18% chromium 8% nickel; max. 0.08% C)
- copper, cathode: 30.9 kg; name copper_input; lognormal variance with pedigree 0.0192, pedigree (2,5,4,5,1)
  (same comment as for aluminium, wrought alloy)
  properties: dry mass 1 kg, wet mass 1 kg
- cast iron: 148.3 kg; name iron_input; lognormal variance with pedigree 0.0192, pedigree (2,5,4,5,1)
  (same comment as for aluminium, wrought alloy)
  properties: carbon content, fossil 0.04, wet mass 1 kg, dry mass 1 kg
  note on carbon content, fossil: Cast iron is made by remelting pig iron in small furnaces (e.g. cupola furnaces or electric arc furnaces) and poured into moulds to make castings. It usually contains 2% to 6% carbon (ecoinvent v2.2 report 10_partII). An average content of 4% was considered
- heat, district or industrial, natural gas: 1330 MJ; lognormal variance with pedigree 0.2106, pedigree (5,5,5,5,5)
  (same comment as for electricity, medium voltage)
  properties: heating value, net 1 MJ
- synthetic rubber: 0.865 kg; name rubber_input; lognormal variance with pedigree 0.0192, pedigree (2,5,4,5,1)
  (same comment as for aluminium, wrought alloy)
  properties: carbon content, fossil 0.871949, dry mass 1 kg, wet mass 1 kg, heating value, net 26.42 MJ
  note on carbon content, fossil: EPDM (Ethylene-propene-diene terpolymer) rubber is a terpolymer of ethylene, propene, and a diene with the residual unsaturated portion of the diene in the side chain (ecoinvent v2.2 report 7-part XX & Ullmann). Chemical formula (deduced from Evidences of Solvent-Induced Miscibility in Polychloroprene-co-Ethylene-Propene Diene Terpolymer Blends, Dubey et al., Journal of Applied Polymer Science, 2009, 111:1884–1891): C20H35
- hot water tank factory: 2e-7 unit; lognormal variance with pedigree 0.478, pedigree (5,5,4,5,5)
  Value copied from the dataset "pump production, 40W, CH" (accessed on the 2017-11-14).
- scrap steel: 0 kg; name scrap_steel; pedigree (1,1,1,1,1)
  Calculated based on the input of steel.
  production volume 0 kg
    Calculated from production volume of reference product using the relative outputs.
  property price 0 EUR2005; name scrap_steel_price_EUR2005
  properties: dry mass 1 kg, wet mass 1 kg
- polyvinylchloride, emulsion polymerised: 0.4734 kg; name PVC_emul_pol; lognormal variance with pedigree 0.0192, pedigree (2,5,4,5,1)
  (same comment as for aluminium, wrought alloy)
  properties: heating value, net 21.5 MJ, wet mass 1 kg, carbon content, fossil 0.387097, dry mass 1 kg
- aluminium scrap, post-consumer: -2.47 kg; lognormal variance with pedigree 0.0192, pedigree (2,5,4,5,1)
  Calculated based on the input of aluminium.
  production volume 2.07957e7 kg
  properties: wet mass 1 kg, dry mass 1 kg
- iron scrap, unsorted: -148.3 kg; lognormal variance with pedigree 0.0192, pedigree (2,5,4,5,1)
  Calculated based on the input of iron.
  production volume 1.24858e9 kg
  properties: dry mass 1 kg, wet mass 1 kg
- scrap copper: -9.80172, -0.459875, -20.6384 kg (3 entries); lognormal variance with pedigree 0.0192, pedigree (2,5,4,5,1)
  Calculated based on the input of copper.
  production volume 2.60156e8 kg
- waste polyvinylchloride product: -1.02905, -0.0312122, -2.64802 kg (3 entries); lognormal variance with pedigree 0.0192, pedigree (2,5,4,5,1)
  Calculated based on the input of PVC.
  production volume 3.12211e7 kg
- waste rubber, unspecified: -0.423608, -0.017783, -0.423608 kg (3 entries); lognormal variance with pedigree 0.0192, pedigree (2,5,4,5,1)
  Calculated based on the input of rubber.
  production volume 7.28269e6 kg
- scrap steel: -27.6903, -0.0350826, -85.9946 kg (3 entries); lognormal variance with pedigree 0.0192, pedigree (2,5,4,5,1)
  Calculated based on the input of steel.
  production volume 9.57443e8 kg

## Sampling procedure
The inventory is extrapolated based on the dataset "pump production, 40W, CH". The total mass of the pump is 300 kg, which is the assumed mass of an average pump used for agricultural irrigation (Nemecek et al., 2007). This mass was used to extrapolate the amounts of the input materials.
The energy consumption is approximated with the energy inputs of the dataset "heat pump production, brine-water, 10kW, CH".

Reference:
Nemecek T., Kägi T. and Blaser S. (2007) Life Cycle Inventories of Agricultural Production Systems. Final report ecoinvent v2.0 No.15. Swiss Centre for Life Cycle Inventories, Dübendorf, CH.

## Extrapolations
This dataset has been extrapolated from year 2018 to the year of the calculation (2021). The uncertainty has been adjusted accordingly.
