# polyethylene terephthalate production, granulate, bottle grade

Dataset: EcoSpold 2, unit process
Geography: RER
Time period: 2015-01-01 to 2021-12-31
Technology level: current
Classification: ISIC rev.4 ecoinvent: 2013:Manufacture of plastics and synthetic rubber in primary forms
Synonyms: PET
Scenario: Business-as-Usual
System model: Allocation, cut-off by classification
Share of production covered: 85 %
Generated by: Thomas Fröhlich
Published in: PlasticsEurope 2017
Database: ecoinvent
isCopyrightProtected: true
accessRestrictedTo: 1

## General comment
The dataset represents the production mix of commercial bottle grade PET production technologies. PET production covered by this study is by esterification of ethylene glycol and terephthalic acid (PTA). The esterification process is carried out under moderate pressure (2.5-5.5 bar) and at high temperature (230-270 °C) whilst the water formed during the reaction is continuously removed via distillation.
The monomers of PET production, purified terephthalic acid (PTA) and mono ethylene glycol (MEG) are polymerised in the liquid phase to produce amorphous PET. This form of the polymer is suitable for the production of fibres and film. Most bottle grade PET today is a copolyester slightly modified through addition of 1-2% Benzene-1,3-dicarboxylic acid (isophthalic acid, IPA) or 4(hydroxymethyl)cyclohexyl-methanol (cyclohexanedimethanol, CHDM) during polymerisation.
The first step of PET production is the esterification of PTA and MEG to bishydroxyethyl terepthalate (BHET) with water as a by-product at around 220-260 °C in the presence of an anti-mony catalyst (usually Sb2O3). Water forming from the esterification reaction is continuously removed by distillation. Formation of the undesired side product diethylene glycol is suppressed by maintaining low molar ratios of MEG:PTA (less than 2 or even 1.5). BHET is then sent to Pre-polycondensation in a second reactor under a vacuum and further to a melt polycondensation reactor at higher temperatures and still under vacuum. Vacuum is required to remove water and other side products and to drive the reaction equilibrium towards the polymer.
As melt polymerisation does not produce high molecular weight, a subsequent polymerisation step, solid state polymerisation (SSP) is required for bottle grade PET. During SSP the polymer chain lengths are increased by heat in the absence of oxygen and water, by means of either vacuum or purging with an inert gas to drive off the by-products of reactions. The reaction is driven by temperature, pressure, and the diffusion of by-products from the interior of the pellet to the surface. The product of SSP is a partially crystalline resin that can be used to produce bottles via injection moulding and stretch blow moulding.

## Included activities start
Acitivity starts with PTA entering the polymerisation plant. Both amorphous and bottle grade PET produciton are included. Energy supply is included in terms of heat production inside the battery limits of the plant. Steam and electricity supply is outside the activity.

## Included activities end
Activity ends with polymer granulate leaving the factory.

## Allocation
Within the foreground system economic allocation was applied for off-spec PET (<0.2 % of total PET output).

## Geography
EU27 including Norway and Switzerland

## Technology
Coverage of production capacity in Europe: 85%

## Time period
Data was collected for the year 2015, processed in 2016 and published in 2017

## Reference product
- polyethylene terephthalate, granulate, bottle grade: 1 kg; By-product classification allocatable product; CPC 34710: Polymers of ethylene, in primary forms; CAS 25038-59-9
  Reference Product
  production volume 3.4e9 kg; name RP_PV
    Production Capacity in 2015 in EU27+NOR+CH, Source: PlasticsEurope
  property carbon content 0.625
    carbon content on a dry matter basis (reserved; not for manual entry)
  properties: wet mass 1 kg, dry mass 1 kg, water in wet mass 0 kg, carbon content, non-fossil 0, carbon content, fossil 0.625, water content 0, heating value, net 22.95 MJ, price 1.29 EUR2005, carbon allocation 0.625 kg

## Inputs from technosphere
- compressed air, 600 kPa gauge: 0.0750977 m3; lognormal variance with pedigree 0.0033, pedigree (2,2,3,1,1)
  Weighted average of reported input
- waste plastic, mixture: -0.00065119 kg; name BP_amount4; lognormal variance with pedigree 0.0047, pedigree (3,2,3,1,1)
  Weighted average of reported waste
  production volume 2.21405e6 kg; = BP_amount4*RP_PV
    calculated with production volume of reference product
  property price 0 EUR2005; name BP_amount4_price_EUR2005
  properties: heating value, net 30.79 MJ, dry mass 0.847 kg, carbon content, fossil 0.747344, water content 0.180638, wet mass 1 kg
  note on heating value, net: Value taken from the general comment of the treatment dataset.
- hazardous waste, for incineration: 0 kg; name BP_amount2; pedigree (1,1,1,1,1)
  Weighted average of reported waste
  production volume 0 kg
    calculated with production volume of reference product
  property price 0 EUR2005; name BP_amount2_price_EUR2005
  properties: dry mass 0.75 kg, wet mass 1 kg, heating value, net 17 MJ, carbon content, fossil 0.554667, water content 0.333333
  note on carbon content, fossil: Tab A.6, ecoinvent v2.2 report 13_I. C content has been calculated after data in the tables, and then referred to 1 kg DM
- wastewater, unpolluted: -6.7476e-5 m3; name BP_amount1; lognormal variance with pedigree 0.0047, pedigree (3,2,3,1,1)
  Weighted average of reported waste
  production volume 229418 m3; = BP_amount1*RP_PV
    calculated with production volume of reference product
  property price 0 EUR2005; name BP_amount1_price_EUR2005
  properties: water content 2962.17, dry mass 0.337476 kg, carbon content, fossil 0.00178991, wet mass 1000 kg, carbon content, non-fossil 0.00178991
  note on carbon content, fossil: Assumed to be like in tap water. Bicarbonate content is 2.93 mol/m3. CO2 content is 0.1 mol/m3 (ecoinvent v2.2 report 8, Tab 93.1).
- antimony: 0.000268011 kg; lognormal variance with pedigree 0.0033, pedigree (2,2,3,1,1)
  Weighted average of reported input
  properties: wet mass 1 kg, dry mass 1 kg
- wastewater, average: 0 m3; name BP_amount3; pedigree (1,1,1,1,1)
  Weighted average of reported waste
  production volume 0 m3
    calculated with production volume of reference product
  property price 0 EUR2005; name BP_amount3_price_EUR2005
  properties: dry mass 0.346837 kg, water content 2882.2, wet mass 1000 kg, carbon content, non-fossil 0.194039
  note on carbon content, non-fossil: 0.0673 kg TOC/m3 (Tab A.17, ecoinvent v2.2 report 13_I). TOC was considered as Total Carbon.
- ethylene glycol: 0.334943 kg; lognormal variance with pedigree 0.0033, pedigree (2,2,3,1,1)
  Weighted average of reported input
  properties: wet mass 1 kg, dry mass 1 kg, heating value, net 23.44 MJ, carbon content, fossil 0.387097
- phosphoric acid, industrial grade, without water, in 85% solution state: 2.7427e-5 kg; lognormal variance with pedigree 0.0033, pedigree (2,2,3,1,1)
  Weighted average of reported input
  properties: wet mass 1 kg, dry mass 1 kg
- natural gas, high pressure: 0 m3; pedigree (1,1,1,1,1)
  Weighted average of reported input
  properties: wet mass 1 kg, dry mass 1 kg, heating value, net 39 MJ, carbon content, fossil 0.695187
  note on heating value, net: Literature value, Source: United Nations Statistics Division (2018) International Recommendations for Energy Statistics (IRES). Available at: http://unstats.un.org/unsd/statcom/doc11/BG-IRES.pdf.
- purified terephthalic acid: 0.862765 kg; lognormal variance with pedigree 0.0033, pedigree (2,2,3,1,1)
  Weighted average of reported input
  properties: dry mass 1 kg, heating value, net 21.9 MJ, wet mass 1 kg, carbon content, fossil 0.578313
- chemical, organic: 2.1083e-5 kg; lognormal variance with pedigree 0.0033, pedigree (2,2,3,1,1)
  Sum input parameter covering partly confidential information on additives, solvents, catalysts. Weighted average of reported input materials.
  properties: wet mass 1 kg, carbon content, fossil 0.628, heating value, net 19.03 MJ, dry mass 1 kg
  note on carbon content, fossil: This dataset is an unweighted average of 20 organic substances (listed in Tab 88.1, ecoinvent v2.2 report 8, part II), being part of the top100 chemicals included in this database. The C-content has also been calculated as an unweighted average of the C content of the substances composing this dataset.
- electricity, medium voltage: 0.198505 kWh; lognormal variance with pedigree 0.0033, pedigree (2,2,3,1,1)
  Weighted average of reported input
- diethylene glycol: 0.00411825 kg; lognormal variance with pedigree 0.0033, pedigree (2,2,3,1,1)
  Weighted average of reported input
  properties: carbon content, fossil 0.45283, dry mass 1 kg, heating value, net 25.14 MJ, wet mass 1 kg
- nitrogen, liquid: 0.0220013 kg; lognormal variance with pedigree 0.0033, pedigree (2,2,3,1,1)
  Weighted average of reported input
  properties: wet mass 1 kg, dry mass 1 kg
- heat, from steam, in chemical industry: 0.387656 MJ; lognormal variance with pedigree 0.0033, pedigree (2,2,3,1,1)
  Weighted average of reported input
  properties: heating value, net 1 MJ
- chemical, inorganic: 9.30791e-6 kg; lognormal variance with pedigree 0.0033, pedigree (2,2,3,1,1)
  (same comment as for chemical, organic)
  properties: wet mass 1 kg, carbon content, fossil 0.003, dry mass 1 kg
  note on carbon content, fossil: This dataset is an unweighted average of 20 inorganic substances (listed in Tab 88.1, ecoinvent v2.2 report 8, part II), being part of the top100 chemicals included in this database. The C-content has also been calculated as an unweighted average of the C content of the substances composing this dataset.
- spent solvent mixture: 0 kg; name BP_amount5; pedigree (1,1,1,1,1)
  Weighted average of reported waste
  production volume 0 kg
    calculated with production volume of reference product
  property price 0 EUR2005; name BP_amount5_price_EUR2005
  properties: carbon content, fossil 0.571257, heating value, net 21.7 MJ, wet mass 1 kg, water content 0.197605, dry mass 0.835 kg
  note on carbon content, fossil: Tab A.7, ecoinvent v2.2 report 13_I. C content has been calculated after data in the tables, and then referred to 1 kg DM
- chemical factory, organics: 4e-10 unit; lognormal variance with pedigree 0.309425, pedigree (2,3,2,2,3)
  Calculated based on literature data published by the industry. For this activity, no information was readily available concerning infrastructure and land-use. Therefore, the infrastructure is estimated based on data from two chemical factories, the BASF site of Ludwigshafen and the chemical factory in Gendorf (which are both located in Germany), which produce a wide range of chemical substances. Based on this data, the following assumptions are made: the built area amounts to about 4.2 ha, the plant has an average output of 50"000 t/a and a lifespan of fifty years. The estimated infrastructure amount is therefore 4.00 E-10 units per kg of produced chemical.
  References:
  Althaus H.-J., Chudacoff M., Hischier R., Jungbluth N., Osses M. and Primas A. (2007) Life Cycle Inventories of Chemicals. ecoinvent report No. 8, v2.0. EMPA Dübendorf, Swiss Centre for Life Cycle Inventories, Dübendorf, CH.
  Gendorf (2000) Umwelterklärung 2000, Werk Gendorf. Werk Gendorf, Burgkirchen.
- hazardous waste, for incineration: -6.58013e-5, -1.72001e-6 kg (2 entries); lognormal variance with pedigree 0.0047, pedigree (3,2,3,1,1)
  Weighted average of reported waste
  production volume 229572 kg
- wastewater, average: -0.000379188, -4.1021e-5 m3 (2 entries); lognormal variance with pedigree 0.0047, pedigree (3,2,3,1,1)
  Weighted average of reported waste
  production volume 1.42871e6 m3
- natural gas, high pressure: 0.0606563, 0.000391632 m3 (2 entries); lognormal variance with pedigree 0.0033, pedigree (2,2,3,1,1)
  Weighted average of reported input
- spent solvent mixture: -0.00111082, -2.60249e-5 kg (2 entries); lognormal variance with pedigree 0.0047, pedigree (3,2,3,1,1)
  Weighted average of reported waste
  production volume 3.86529e6 kg

## Inputs from nature
- Water, river [natural resource, in water]: 4.96321e-5 m3; lognormal variance with pedigree 0.0047, pedigree (3,2,3,1,1)
  Weighted average of reported input
- Water, lake [natural resource, in water]: 5.66495e-5 m3; lognormal variance with pedigree 0.0047, pedigree (3,2,3,1,1)
  Weighted average of reported input
- Water, well, in ground [natural resource, in water]: 0.000258976 m3; lognormal variance with pedigree 0.0047, pedigree (3,2,3,1,1)
  Weighted average of reported input
- Water, cooling, unspecified natural origin [natural resource, in water]: 0.000623954 m3; lognormal variance with pedigree 0.0047, pedigree (3,2,3,1,1)
  Weighted average of reported input

## Emissions to nature
- Sulfur dioxide [air, unspecified]: 1.88849e-5 kg; lognormal variance with pedigree 0.0038, pedigree (2,3,3,1,1)
  Weighted average of reported emissions
- Benzene [air, unspecified]: 6.42001e-8 kg; lognormal variance with pedigree 0.1232, pedigree (2,3,3,1,1)
  Weighted average of reported emissions
- NMVOC, non-methane volatile organic compounds, unspecified origin [air, unspecified]: 1.97627e-5 kg; lognormal variance with pedigree 0.0427, pedigree (2,2,3,1,1)
  Weighted average of reported emissions
- Zinc, ion [water, unspecified]: 2.78841e-8 kg; lognormal variance with pedigree 0.6532, pedigree (2,3,3,1,1)
  Weighted average of reported emissions
- Acetaldehyde [air, unspecified]: 1.27595e-5 kg; lognormal variance with pedigree 0.1232, pedigree (2,3,3,1,1)
  Weighted average of reported emissions
- Antimony [water, unspecified]: 7.24536e-7 kg; lognormal variance with pedigree 0.6532, pedigree (2,3,3,1,1)
  Weighted average of reported emissions
- Cadmium, ion [water, unspecified]: 1.23539e-10 kg; lognormal variance with pedigree 0.6532, pedigree (2,3,3,1,1)
  Weighted average of reported emissions
- Aluminium [water, unspecified]: 2.30131e-9 kg; lognormal variance with pedigree 0.6532, pedigree (2,3,3,1,1)
  Weighted average of reported emissions
- Suspended solids, unspecified [water, unspecified]: 0.000845734 kg; lognormal variance with pedigree 0.0427, pedigree (2,2,3,1,1)
  Weighted average of reported emissions
- Lead [water, unspecified]: 1.11658e-9 kg; lognormal variance with pedigree 0.6532, pedigree (2,3,3,1,1)
  Weighted average of reported emissions
- Carbon dioxide, fossil [air, unspecified]: 0.112817 kg; lognormal variance with pedigree 0.0033, pedigree (2,2,3,1,1)
  Weighted average of reported emissions
- Dinitrogen monoxide [air, unspecified]: 2.78686e-7 kg; lognormal variance with pedigree 0.0427, pedigree (2,2,3,1,1)
  Weighted average of reported emissions
- Nitrogen oxides [air, unspecified]: 8.95435e-5 kg; lognormal variance with pedigree 0.0427, pedigree (2,2,3,1,1)
  Weighted average of reported emissions
- Phosphorus [water, unspecified]: 1.19257e-6 kg; lognormal variance with pedigree 0.0432, pedigree (2,3,3,1,1)
  Weighted average of reported emissions
- Particulates, > 2.5 um, and < 10um [air, unspecified]: 1.20244e-5 kg; lognormal variance with pedigree 0.1232, pedigree (2,3,3,1,1)
  Weighted average of reported emissions
- Carbon monoxide, fossil [air, unspecified]: 0.000254865 kg; lognormal variance with pedigree 0.6532, pedigree (2,3,3,1,1)
  Weighted average of reported emissions
- Nickel, ion [water, unspecified]: 1.70401e-9 kg; lognormal variance with pedigree 0.6532, pedigree (2,3,3,1,1)
  Weighted average of reported emissions
- Copper, ion [water, unspecified]: 5.79754e-10 kg; lognormal variance with pedigree 0.6532, pedigree (2,3,3,1,1)
  Weighted average of reported emissions
- Mercury [water, unspecified]: 6.03955e-12 kg; lognormal variance with pedigree 0.6532, pedigree (2,3,3,1,1)
  Weighted average of reported emissions
- Chromium, ion [water, unspecified]: 5.30471e-10 kg; lognormal variance with pedigree 0.6532, pedigree (2,3,3,1,1)
  Weighted average of reported emissions
- Water [air, unspecified]: 0.000610241 m3; lognormal variance with pedigree 0.0047, pedigree (3,2,3,1,1)
  Weighted average of reported emissions
- Nitrogen, organic bound [water, unspecified]: 3.32894e-6 kg; lognormal variance with pedigree 0.0432, pedigree (2,3,3,1,1)
  Weighted average of reported emissions

## Sampling procedure
Questionnaires sent out to all production units in Europe operated by PlasticEurope/ECVM member companies.

## Extrapolations
This dataset has been extrapolated from year 2020 to the year of the calculation (2021). The uncertainty has been adjusted accordingly.
