# cement production, alternative constituents 21-35%

Dataset: EcoSpold 2, unit process
Geography: CH
Time period: 2009-01-01 to 2021-12-31
Technology level: current
Classification: ISIC rev.4 ecoinvent: 2394:Manufacture of cement, lime and plaster
Synonyms: Portland composite cement; CEM II/B
Tags: combined production
Scenario: Business-as-Usual
System model: Allocation, cut-off by classification
Share of production covered: 100 %
Generated by: Frank Werner
Published in: Werner F. 2014
Database: ecoinvent
isCopyrightProtected: true
accessRestrictedTo: 1

## General comment
The dataset describes the production of cement (CEM II/B) in Switzerland and covers the representative production mix of CEM II/B-M (T-LL), CEM II/B-LL, CEM II/B-M (V-LL) and CEM II/B-T according to EN 197-1.

## Included activities start
The activity starts with the clinker in the silo to be used for cement production and with the additional ingredients of the cement at the gate of the cement plant.

## Included activities end
The activity includes also the electricy used for the grinding of the clinker, griding aids, heat for the drying of additions etc. and ends with the cement produced in the cement mill. The dataset does not include packaging and administration.

## Reference product
- hard coal ash: 0 kg; name flyash; source Werner F. 2014; By-product classification Waste; CPC 39: Wastes or scraps
  value provided by cemsuisse as an average from all cement producting plants in Switzerland
  production volume 0 kg
    Amount relative to produced amount of reference product
  property price 0 EUR2005; name flyash_price_EUR2005
    Waste products are assigned a price of zero as they are assumed to require further treatment.
  property carbon content 0
    carbon content on a dry matter basis (reserved; not for manual entry)
  properties: water content 0, wet mass 1 kg, carbon content, fossil 0, water in wet mass 0 kg, carbon content, non-fossil 0, dry mass 1 kg, carbon allocation 0 kg
- cement, alternative constituents 21-35%: 1 kg; name cement; source Werner F. 2014; CPC 374: Plaster, lime and cement; By-product classification allocatable product
  value provided by cemsuisse as an average from all cement producting plants in Switzerland
  production volume 1.2e8 kg; name APV_cement
    Estimated 3% marketshare
  property price 0.0615 EUR2005; name cement_price_EUR2005
    2005 import and export prices (total trades (USD) divided by total weight (kg) in China, India, USA, Japan, Russia and Europe, major producers and consumers (http://www.cementchina.net/freport/showfre.asp?id=749) from UN Commodity Trade Statistics Database (http://data.un.org/Explorer.aspxDatabase [Accessed 2 July 2010]). Commodity: Cement (portland, aluminious, slag or hydraulic)
  property carbon content 0
    carbon content on a dry matter basis (reserved; not for manual entry)
  properties: water in wet mass 0 kg, carbon content, fossil 0, carbon content, non-fossil 0, wet mass 1 kg, water content 0, dry mass 1 kg, carbon allocation 0 kg

## Inputs from technosphere
All rows: source Werner F. 2014
- limestone, crushed, for mill: 0.151 kg; name limestone; = 0.151*cement; lognormal variance with pedigree 0.0406, pedigree (1,1,5,1,1)
  value provided by cemsuisse as an average from all cement producting plants in Switzerland
  properties: carbon content, fossil 0.117492, dry mass 0.998 kg, water content 0.00200401, wet mass 1 kg
- electricity, medium voltage: 0.0342 kWh; = 0.0342*cement; lognormal variance with pedigree 0.0406, pedigree (1,1,5,1,1)
  value provided by cemsuisse as an average from all cement producting plants in Switzerland
- clinker: 0 kg; pedigree (1,1,1,1,1)
  value provided by cemsuisse as an average from all cement producting plants in Switzerland
  properties: wet mass 1 kg, dry mass 1 kg
- steel, low-alloyed: 4e-5 kg; name steel; = 4E-05*cement; lognormal variance with pedigree 0.0406, pedigree (1,1,5,1,1)
  value provided by cemsuisse as an average from all cement producting plants in Switzerland
  properties: wet mass 1 kg, dry mass 1 kg, carbon content, fossil 0.005
- gypsum, mineral: 0.0211 kg; = 0.0211*cement; lognormal variance with pedigree 0.0406, pedigree (1,1,5,1,1)
  value provided by cemsuisse as an average from all cement producting plants in Switzerland
  properties: dry mass 1 kg, wet mass 1 kg
- burnt shale: 0.136 kg; = 0.136*cement; lognormal variance with pedigree 0.0406, pedigree (1,1,5,1,1)
  value provided by cemsuisse as an average from all cement producting plants in Switzerland
  properties: wet mass 1 kg, dry mass 1 kg
- ethylene glycol: 0.00021 kg; = 0.00021*cement; lognormal variance with pedigree 0.0406, pedigree (1,1,5,1,1)
  Ancillary product for grinding; value provided by cemsuisse as an average from all cement producting plants in Switzerland
  properties: heating value, net 23.44 MJ, wet mass 1 kg, carbon content, fossil 0.387097, dry mass 1 kg
- cement factory: 2.73e-11 unit; = 2.73E-11*cement+flyash*0; lognormal variance with pedigree 0.3406, pedigree (2,1,5,1,1)
  value provided by cemsuisse as an average from all cement producting plants in Switzerland
  This exchange has an activity link directly to the producing activity because the product is primarily consumed in the same geographical area where it is produced.
- clinker: 0.688 kg; lognormal variance with pedigree 0.0406, pedigree (1,1,5,1,1)
  value provided by cemsuisse as an average from all cement producting plants in Switzerland

## Sampling procedure
Data represents the average Swiss production of the 6 cement plants that were operational in 2009 - 2010
