# treatment of used tram

Dataset: EcoSpold 2, unit process
Geography: CH
Time period: 1990-01-01 to 2021-12-31
Technology level: current
Classification: ISIC rev.4 ecoinvent: 3830:Materials recovery
Classification: EcoSpold01Categories: transport systems/road
Tags: Treatment; ConvertedDataset
Scenario: Business-as-Usual
System model: Allocation, cut-off by classification
Generated by: Michael Spielmann (obsolete)
Published in: Spielmann M. 2004
Database: ecoinvent
isCopyrightProtected: true
accessRestrictedTo: 1

## General comment
The dataset represents the treatment and disposal of one used tram.
[This dataset was already contained in the ecoinvent database version 2. It was not individually updated during the transfer to ecoinvent version 3. Life Cycle Impact Assessment results may still have changed, as they are affected by changes in the supply chain, i.e. in other datasets. This dataset was generated following the ecoinvent quality guidelines for version 2. It may have been subject to central changes described in the ecoinvent version 3 change report (http://www.ecoinvent.org/database/ecoinvent-version-3/reports-of-changes/), and the results of the central updates were reviewed extensively. The changes added e.g. consistent water flows and other information throughout the database. The documentation of this dataset can be found in the ecoinvent reports of version 2, which are still available via the ecoinvent website. The change report linked above covers all central changes that were made during the conversion process.]

## Included activities start
The activity starts with the disposal of the used tram.

## Included activities end
The dataset ends with the disposal of the emulsion paint. The dataset includes the disposal of plastics, glass and until and including the disposal of emulsion paint. The dataset does not include the disposal of the bulk material (steel, aluminium and copper) because they are fully recycled and a cut off allocation was made.

## Geography
Data represent Swiss conditions

## Technology
no technologies are specified

## Time period
For the disposal of vehicle we merely have taken into account the bulk material used in the vehicle and make a number of assumptions as follows:
- Steel, aluminium and copper are fully recycled and thus we make a cut off allocation
- for the remaining materials a complete disposal is assumed.

## Reference product
- used tram: -1 unit; By-product classification Waste; CPC 39990: Other wastes n.e.c.
  EcoSpold01Location=CH
  production volume 0.0336675 unit
    This is a placeholder value that does not reflect real-world production volumes. This dataset does not currently require a real-world production volume to work in the database framework, and no actual data were collected yet. This has no negative effect on the results of the ecoinvent database. The placeholder value of this activity was scaled according to the nominal GDP of 2005 (source: United Nations, http://data.un.org/Glossary.aspx?q=GDP+%28current+US%24%29, accessed 20130726) to reflect an appropriate share of the global production volume, which is also a placeholder value.
  property price 0 EUR2005
    Waste products are assigned a price of zero as they are assumed to require further treatment.
  property carbon content, fossil 0.0485113
    Calculated from C content in input materials in the infrastructure
  property carbon content, non-fossil 0.00352812
    Calculated from C content in input materials in the infrastructure
  property carbon content 0.0520394
    carbon content on a dry matter basis (reserved; not for manual entry)
  properties: water content 0, water in wet mass 0 kg, dry mass 20992 kg, wet mass 20992 kg, carbon allocation 1092.41 kg

## Inputs from technosphere
- waste glass: -763 kg; lognormal variance with pedigree 0.0441, pedigree (3,4,5,3,1)
  EcoSpold01Location=CH
  Estimated value. Data is derived from material composition of a tram.
  Uncertainty: Data is derived from material composition of a tram
  production volume 763 kg
    Calculated from the production volume of used tram in proportion to the respective output amounts.
  properties: heating value, net 0.05 MJ, wet mass 1 kg, dry mass 1 kg
  note on heating value, net: Value extracted from "treatment of waste glass, open dump, very wet infiltration class (1000mm)"
- waste emulsion paint: -148 kg; lognormal variance with pedigree 0.0441, pedigree (3,4,5,3,1)
  Estimated value. Data is derived from material composition of a tram
  EcoSpold01Location=CH
  Uncertainty: Data is derived from material composition of a tram
  production volume 148 kg
    (same comment as for waste glass)
  properties: carbon content, fossil 0.27, wet mass 1 kg, dry mass 1 kg, heating value, net 8.18 MJ
  note on carbon content, fossil: Tab A.4, ecoinvent v2.2 report 13_I. C content has been calculated after data in the tables, and then referred to 1 kg DM
- waste plastic, mixture: -850 kg; lognormal variance with pedigree 0.0441, pedigree (3,4,5,3,1)
  (same comment as for waste glass)
  production volume 850 kg
    (same comment as for waste glass)
  properties: heating value, net 30.79 MJ, water content 0.180638, carbon content, fossil 0.747344, dry mass 0.847 kg, wet mass 1 kg
  note on heating value, net: Value taken from the general comment of the treatment dataset.
  note on carbon content, fossil: C content in 1 kg DM was calculated using data in Tab A.2, ecoinvent v2.2 report 13_I

## Sampling procedure
Data is based on the material consumption of vehicles.

## Extrapolations
This dataset has been extrapolated from year 2000 to the year of the calculation (2021). The uncertainty has been adjusted accordingly.

## Review by Emilia Moreno Ruiz 2012-03-15
trainee DS, ok, Liliane Klemann
