# land already in use, annual cropland to annual crop

Dataset: EcoSpold 2, unit process
Geography: TH
Time period: 2010-01-01 to 2021-12-31
Technology level: current
Classification: ISIC rev.4 ecoinvent: 0161:Support activities for crop production
Tags: WFLDB
Scenario: Business-as-Usual
System model: Allocation, cut-off by classification
Generated by: Vincent Rossi
Database: ecoinvent
isCopyrightProtected: true
accessRestrictedTo: 1

## General comment
This dataset represents the interventions associated with the provision of 1 kg NPP (Net Primary Productivity of a given land, in kg C / m2 and year) by land that is already in use as arable land. NPP values are parameterized and reported by Haberl et al. (2007)

## Included activities start
Starts with the land already in use.

## Included activities end
The dataset includes all interventions associated with the provision of 1 kg NPP0 from land already in use.
This activity ends with the provision of arable land tenure, measured in unit kg carbon Potential Net Primary Production (NPP).

## Parameters
- NPP0, net primary productivity: 1.022 dimensionless; name NPP; lognormal variance with pedigree 0.022825, pedigree (2,5,2,2,3)
- LUC_crop_specific: 1 dimensionless
  This parameter allows to switch between a 'crop specific' and a 'country specific' approach when calculating the LUC of a crop. By default, the chosen approach is 'crop specific', so the value of the parameter is 1. If you want to apply a 'country specific' approach, turn the parameter to 0.

## Reference product
- land tenure, arable land, measured as carbon net primary productivity, annual crop: 1 kg; CPC 7: Financial and related services; real estate services; and rental and leasing services; By-product classification allocatable product
  Yield = 1.0 kg/haLand that is made available for the cultivation of annual crops, expressed in kg carbon net pripary productivity
  production volume 3.24634e7 kg
    This production volume has been estimated by decoupling the different land tenures contributing to the annual land use change (for annual crops and paddy rice), per country, and multiplying by the national annual land use change production volumes for annual crops and paddy rice, respectively. Land use change production volume is estimated based in FAO statistic and following the concept of Total Biomass Appropriation (TBA), developped by Krausmann et al., 2008. The ha of land devoted to annual crops per country is multiplied by the share of TBA of the country, in order to weight the relative land use change of the country, in a Global context. The shares of TBA are calculated in relation to the total sum of TBA of the World. The same is done to estimate land use change associated to paddy rice. Additional source: Nemecek T., Bengoa X., Lansche J., Mouron P., Riedener E., Rossi V. & Humbert S. (2015) Methodological Guidelines for the Life Cycle Inventory of Agricultural Products. Version 3.0, July 2015. World Food LCA Database (WFLDB). Quantis and Agroscope, Lausanne and Zurich, Switzerland.
  property carbon content, non-fossil 1
    The flow is expressed in kg carbon Potential Net Primary Production (NPP0)
  property carbon content 1
    carbon content on a dry matter basis (reserved; not for manual entry)
  properties: price 0 EUR2005, dry mass 1 kg, wet mass 1 kg, water content 0, water in wet mass 0 kg, carbon allocation 1 kg

## Inputs from nature
- Transformation, from arable land, unspecified use [natural resource, land]: 0.978474 m2; = 1/NPP
  Calculated value: m2 required per unit land tenure, arable land.
- Transformation, to arable land, unspecified use [natural resource, land]: 0.978474 m2; = 1/NPP
  Calculated value: m2 required per unit land tenure, arable land.

## Sampling procedure
Literature value: Taken from Haberl (2010). Refers to the amount of NPP0 measured in kg carbon extracted from existing arable land.
This dataset has been extrapolated from year 2009 to the year of the calculation (2013). The uncertainty has been adjusted accordingly.
For further information see WFLDB Methodological Guidelines for the Life Cycle Inventory of Agricultural Products version 3.0, available at: (Report section: https://v30.ecoquery.ecoinvent.org/File/Reports).

## Extrapolations
This dataset has been extrapolated from year 2015 to the year of the calculation (2021). The uncertainty has been adjusted accordingly.
