# polyvinylchloride production, suspension polymerisation

Dataset: EcoSpold 2, unit process
Geography: RER
Time period: 2013-01-01 to 2021-12-31
Technology level: current
Classification: ISIC rev.4 ecoinvent: 2013:Manufacture of plastics and synthetic rubber in primary forms
Synonyms: S-PVC
Scenario: Business-as-Usual
System model: Allocation, cut-off by classification
Share of production covered: 88 %
Generated by: Thomas Fröhlich
Published in: PlasticsEurope 2016
Database: ecoinvent
isCopyrightProtected: true
accessRestrictedTo: 1

## General comment
The dataset represents the production mix of commercial S-PVC production technologies
Polyvinyl chloride (PVC) is manufactured by polymerisation of vinyl chloride monomer (VCM). Polymerisation of PVC is an exothermic reaction. The pressure in the reactor is usually in the range of 0.4 - 1.2 MPa and the reaction temperature is between 35 - 70°C. During the polymerisation reaction 85 - 97% of the VCM is converted into PVC. Residual VCM is removed by stripping the polymer suspension or latex. The unreacted monomer is recovered, liquefied, and returned to polymerisation
For the polymerisation process certain process chemicals are required. Surfactants, emulsifiers and protective colloids are used to prepare and stabilize the dispersion of monomer and PVC in process water (typically around 1 kg/t VCM in suspension and around 10-20 kg/t in emulsion). Organic peroxides or peresters are used as initiators (typically 1 kg/t VCM) for the production of suspension and microsuspension PVC, while e.g. hindered phenols are used to stop the reaction (typically < 1 kg/t VCM). For the production of emulsion PVC inorganic peroxides are common.
PVC resin resulting from the suspension process (S-PVC) has a mean particle size of 50 - 200 μm. The essential differences between S-PVC grades result from the average length of polymer chains and from the porosity of the particles. Suspension PVC is always produced batch wise in a stirred vessel. The monomer is dispersed in demineralised water by the combination of mechanical stirring and surfactants. The polymerisation takes place inside the VCM droplets under the influence of VCM soluble initiators such as peresters, percarbonates, or peroxides.

## Included activities start
Acitivity starts with monomers entering the polymerisation plant. Energy supply is included in terms of heat production inside the battery limits of the plant. Steam and electricity supply is outside the activity.

## Included activities end
Activity ends with polymer granulate leaving the factory.

## Allocation
The PVC production itself is regarded as a single-output process since only one polymer type is produced by one installation. All other products of this installation, e.g. monomers being recycled internally, or hydrocarbons being used thermally, are treated as internal flows replacing the respective input materials (i.e. monomers or energy carriers). Hence, no allocation is needed for the PVC production process.

## Geography
EU27 including Norway and Switzerland

## Technology
Coverage of production capacity in Europe: 88%

## Time period
Data was collected for the year 2013, processed in 2014 and published in 2015

## Reference product
- polyvinylchloride, suspension polymerised: 1 kg; CPC 34730: Polymers of vinyl chloride or other halogenated olefins, in primary forms; By-product classification allocatable product; CAS 9002-86-2
  Reference Product
  production volume 3.4e9 kg; name RP_PV
    Production Capacity in 2014 in EU27+NOR+CH, Source: PlasticsEurope
  property carbon content 0.387097
    carbon content on a dry matter basis (reserved; not for manual entry)
  properties: dry mass 1 kg, water in wet mass 0 kg, wet mass 1 kg, carbon content, non-fossil 0, carbon content, fossil 0.387097, heating value, net 21.5 MJ, water content 0, price 1.29 EUR2005, carbon allocation 0.387097 kg

## Inputs from technosphere
- sodium hydroxide, without water, in 50% solution state: 0.000970815 kg; lognormal variance with pedigree 0.0033, pedigree (2,2,3,1,1)
  Weighted average of reported input
  properties: heating value, net 3.03 MJ, wet mass 1 kg, dry mass 1 kg
- wastewater, average: 0 m3; name BP_amount5; pedigree (1,1,1,1,1)
  Weighted average of reported waste
  production volume 0 m3
    calculated with production volume of reference product
  property price 0 EUR2005; name BP_amount5_price_EUR2005
  properties: carbon content, non-fossil 0.194039, water content 2882.2, dry mass 0.346837 kg, wet mass 1000 kg
  note on carbon content, non-fossil: 0.0673 kg TOC/m3 (Tab A.17, ecoinvent v2.2 report 13_I). TOC was considered as Total Carbon.
- chemical, organic: 0.00706751 kg; lognormal variance with pedigree 0.0033, pedigree (2,2,3,1,1)
  Sum input parameter covering partly confidential information on additives, solvents, catalysts. Weighted average of reported input materials.
  properties: dry mass 1 kg, heating value, net 19.03 MJ, carbon content, fossil 0.628, wet mass 1 kg
  note on carbon content, fossil: This dataset is an unweighted average of 20 organic substances (listed in Tab 88.1, ecoinvent v2.2 report 8, part II), being part of the top100 chemicals included in this database. The C-content has also been calculated as an unweighted average of the C content of the substances composing this dataset.
- spent solvent mixture: 0 kg; name BP_amount1; pedigree (1,1,1,1,1)
  Weighted average of reported waste
  production volume 0 kg
    calculated with production volume of reference product
  property price 0 EUR2005; name BP_amount1_price_EUR2005
  properties: water content 0.197605, wet mass 1 kg, carbon content, fossil 0.571257, heating value, net 21.7 MJ, dry mass 0.835 kg
  note on carbon content, fossil: Tab A.7, ecoinvent v2.2 report 13_I. C content has been calculated after data in the tables, and then referred to 1 kg DM
  note on heating value, net: Value taken from the general comment of the treatment dataset.
- chemical, inorganic: 0.000259734 kg; lognormal variance with pedigree 0.0033, pedigree (2,2,3,1,1)
  (same comment as for chemical, organic)
  properties: wet mass 1 kg, carbon content, fossil 0.003, dry mass 1 kg
  note on carbon content, fossil: This dataset is an unweighted average of 20 inorganic substances (listed in Tab 88.1, ecoinvent v2.2 report 8, part II), being part of the top100 chemicals included in this database. The C-content has also been calculated as an unweighted average of the C content of the substances composing this dataset.
- electricity, medium voltage: 0.193178 kWh; lognormal variance with pedigree 0.0033, pedigree (2,2,3,1,1)
  Weighted average of reported input
- wastewater, unpolluted: -0.0144095 m3; name BP_amount6; lognormal variance with pedigree 0.0047, pedigree (3,2,3,1,1)
  Weighted average of reported waste
  production volume 4.89924e7 m3; = BP_amount6*RP_PV
    calculated with production volume of reference product
  property price 0 EUR2005; name BP_amount6_price_EUR2005
  properties: carbon content, fossil 0.00178991, wet mass 1000 kg, dry mass 0.337476 kg, carbon content, non-fossil 0.00178991, water content 2962.17
  note on carbon content, fossil: Assumed to be like in tap water. Bicarbonate content is 2.93 mol/m3. CO2 content is 0.1 mol/m3 (ecoinvent v2.2 report 8, Tab 93.1).
- vinyl chloride: 0.999161 kg; lognormal variance with pedigree 0.0033, pedigree (2,2,3,1,1)
  Weighted average of reported input
  properties: wet mass 1 kg, carbon content, fossil 0.387097, dry mass 1 kg, heating value, net 17.46 MJ
- waste paperboard: -0.00105063 kg; name BP_amount4; lognormal variance with pedigree 0.0047, pedigree (3,2,3,1,1)
  Weighted average of reported waste
  production volume 3.57213e6 kg; = BP_amount4*RP_PV
    calculated with production volume of reference product
  property price 0 EUR2005; name BP_amount4_price_EUR2005
  properties: heating value, net 15.92 MJ, carbon content, non-fossil 0.483259, dry mass 0.804 kg, water content 0.243781, wet mass 1 kg
  note on carbon content, non-fossil: C content was calculated for 1 kg DM, using data in Tab A.3, ecoinvent v2.2 report 13_I.
- hazardous waste, for incineration: 0 kg; name BP_amount2; pedigree (1,1,1,1,1)
  Weighted average of reported waste
  production volume 0 kg
    calculated with production volume of reference product
  property price 0 EUR2005; name BP_amount2_price_EUR2005
  properties: heating value, net 17 MJ, water content 0.333333, wet mass 1 kg, carbon content, fossil 0.554667, dry mass 0.75 kg
  note on carbon content, fossil: Tab A.6, ecoinvent v2.2 report 13_I. C content has been calculated after data in the tables, and then referred to 1 kg DM
- compressed air, 600 kPa gauge: 0.0975011 m3; lognormal variance with pedigree 0.0033, pedigree (2,2,3,1,1)
  Weighted average of reported input
- natural gas, high pressure: 0 m3; pedigree (1,1,1,1,1)
  Weighted average of reported input
  properties: wet mass 1 kg, dry mass 1 kg, carbon content, fossil 0.695187, heating value, net 39 MJ
  note on heating value, net: Literature value, Source: United Nations Statistics Division (2018) International Recommendations for Energy Statistics (IRES). Available at: http://unstats.un.org/unsd/statcom/doc11/BG-IRES.pdf.
- ammonia, anhydrous, liquid: 7.76889e-5 kg; lognormal variance with pedigree 0.0033, pedigree (2,2,3,1,1)
  Weighted average of reported input
  properties: dry mass 1 kg, wet mass 1 kg
- sewage sludge, dried: -0.00044818 kg; name BP_amount3; lognormal variance with pedigree 0.0047, pedigree (3,2,3,1,1)
  Weighted average of reported waste
  production volume 1.52381e6 kg; = BP_amount3*RP_PV
    calculated with production volume of reference product
  property price 0 EUR2005; name BP_amount3_price_EUR2005
  properties: water content 0.010101, carbon content, non-fossil 0.4096, dry mass 0.99 kg, wet mass 1 kg
- heat, from steam, in chemical industry: 1.92696 MJ; lognormal variance with pedigree 0.0033, pedigree (2,2,3,1,1)
  Weighted average of reported input
  properties: heating value, net 1 MJ
- nitrogen, liquid: 0.00233595 kg; lognormal variance with pedigree 0.0033, pedigree (2,2,3,1,1)
  Weighted average of reported input
  properties: dry mass 1 kg, wet mass 1 kg
- chemical factory, organics: 4e-10 unit; lognormal variance with pedigree 0.309425, pedigree (2,3,2,2,3)
  Calculated based on literature data published by the industry. For this activity, no information was readily available concerning infrastructure and land-use. Therefore, the infrastructure is estimated based on data from two chemical factories, the BASF site of Ludwigshafen and the chemical factory in Gendorf (which are both located in Germany), which produce a wide range of chemical substances. Based on this data, the following assumptions are made: the built area amounts to about 4.2 ha, the plant has an average output of 50"000 t/a and a lifespan of fifty years. The estimated infrastructure amount is therefore 4.00 E-10 units per kg of produced chemical.
  References:
  Althaus H.-J., Chudacoff M., Hischier R., Jungbluth N., Osses M. and Primas A. (2007) Life Cycle Inventories of Chemicals. ecoinvent report No. 8, v2.0. EMPA Dübendorf, Swiss Centre for Life Cycle Inventories, Dübendorf, CH.
  Gendorf (2000) Umwelterklärung 2000, Werk Gendorf. Werk Gendorf, Burgkirchen.
- wastewater, average: -0.00479745, -0.000518994 m3 (2 entries); lognormal variance with pedigree 0.0047, pedigree (3,2,3,1,1)
  Weighted average of reported waste
  production volume 1.80759e7 m3
- spent solvent mixture: -1.07135e-5, -2.51e-7 kg (2 entries); lognormal variance with pedigree 0.0047, pedigree (3,2,3,1,1)
  Weighted average of reported waste
  production volume 37279.2 kg
- hazardous waste, for incineration: -9.80619e-5, -2.56328e-6 kg (2 entries); lognormal variance with pedigree 0.0047, pedigree (3,2,3,1,1)
  Weighted average of reported waste
  production volume 342126 kg
- natural gas, high pressure: 0.0112729, 7.27844e-5 m3 (2 entries); lognormal variance with pedigree 0.0033, pedigree (2,2,3,1,1)
  Weighted average of reported input

## Inputs from nature
- Water, well, in ground [natural resource, in water]: 0.00177909 m3; lognormal variance with pedigree 0.0047, pedigree (3,2,3,1,1)
  Weighted average of reported input
- Water, cooling, unspecified natural origin [natural resource, in water]: 0.015475 m3; lognormal variance with pedigree 0.0047, pedigree (3,2,3,1,1)
  Weighted average of reported input
- Water, lake [natural resource, in water]: 6.41276e-5 m3; lognormal variance with pedigree 0.0047, pedigree (3,2,3,1,1)
  Weighted average of reported input
- Water, river [natural resource, in water]: 0.000649827 m3; lognormal variance with pedigree 0.0047, pedigree (3,2,3,1,1)
  Weighted average of reported input

## Emissions to nature
- Sulfate [water, unspecified]: 2.98314e-6 kg; lognormal variance with pedigree 0.0432, pedigree (2,3,3,1,1)
  Weighted average of reported emissions
- Suspended solids, unspecified [water, unspecified]: 2.0451e-5 kg; lognormal variance with pedigree 0.0427, pedigree (2,2,3,1,1)
  Weighted average of reported emissions
- Sodium, ion [water, unspecified]: 0.000181709 kg; lognormal variance with pedigree 0.0432, pedigree (2,3,3,1,1)
  Weighted average of reported emissions
- Carbon monoxide, fossil [air, unspecified]: 1.70981e-5 kg; lognormal variance with pedigree 0.6532, pedigree (2,3,3,1,1)
  Weighted average of reported emissions
- Ethene, chloro- [air, unspecified]: 2.35388e-5 kg; lognormal variance with pedigree 0.1232, pedigree (2,3,3,1,1)
  Weighted average of reported emissions
- Nitrogen, organic bound [water, unspecified]: 6.78994e-6 kg; lognormal variance with pedigree 0.0432, pedigree (2,3,3,1,1)
  Weighted average of reported emissions
- Ethane, 1,2-dichloro- [water, unspecified]: 4.38861e-10 kg; lognormal variance with pedigree 0.3027, pedigree (2,2,3,1,1)
  Weighted average of reported emissions
- Carbon dioxide, fossil [air, unspecified]: 0.0108319 kg; lognormal variance with pedigree 0.0033, pedigree (2,2,3,1,1)
  Weighted average of reported emissions
- Particulates, < 2.5 um [air, unspecified]: 2.57528e-6 kg; lognormal variance with pedigree 0.3032, pedigree (2,3,3,1,1)
  Weighted average of reported emissions
- Ethene, chloro- [water, unspecified]: 3.25229e-7 kg; lognormal variance with pedigree 0.3032, pedigree (2,3,3,1,1)
  Weighted average of reported emissions
- Particulates, > 2.5 um, and < 10um [air, unspecified]: 6.41826e-6 kg; lognormal variance with pedigree 0.1232, pedigree (2,3,3,1,1)
  Weighted average of reported emissions
- Ammonia [air, unspecified]: 2.00077e-5 kg; lognormal variance with pedigree 0.0432, pedigree (2,3,3,1,1)
  Weighted average of reported emissions
- NMVOC, non-methane volatile organic compounds, unspecified origin [air, unspecified]: 7.71409e-6 kg; lognormal variance with pedigree 0.0427, pedigree (2,2,3,1,1)
  Weighted average of reported emissions
- AOX, Adsorbable Organic Halogen as Cl [water, unspecified]: 1.43429e-6 kg; lognormal variance with pedigree 0.0427, pedigree (2,2,3,1,1)
  Weighted average of reported emissions
- Chloride [water, unspecified]: 0.000273062 kg; lognormal variance with pedigree 0.0432, pedigree (2,3,3,1,1)
  Weighted average of reported emissions
- Particulates, > 10 um [air, unspecified]: 2.21913e-5 kg; lognormal variance with pedigree 0.0432, pedigree (2,3,3,1,1)
  Weighted average of reported emissions
- Ammonium, ion [water, unspecified]: 1.27497e-5 kg; lognormal variance with pedigree 0.0432, pedigree (2,3,3,1,1)
  Weighted average of reported emissions
- Nitrogen oxides [air, unspecified]: 5.30454e-6 kg; lognormal variance with pedigree 0.0427, pedigree (2,2,3,1,1)
  Weighted average of reported emissions
- Phosphorus [water, unspecified]: 4.50763e-7 kg; lognormal variance with pedigree 0.0432, pedigree (2,3,3,1,1)
  Weighted average of reported emissions
- Zinc, ion [water, unspecified]: 1.08588e-9 kg; lognormal variance with pedigree 0.6532, pedigree (2,3,3,1,1)
  Weighted average of reported emissions

## Sampling procedure
Questionnaires sent out to all production units in Europe operated by PlasticEurope/ECVM member companies.

## Extrapolations
This dataset has been extrapolated from year 2018 to the year of the calculation (2021). The uncertainty has been adjusted accordingly.
