# transport, pipeline, onshore, petroleum

Dataset: EcoSpold 2, unit process
Geography: RER
Time period: 1976-01-01 to 2021-12-31
Technology level: current
Classification: EcoSpold01Categories: oil/production
Classification: ISIC rev.4 ecoinvent: 4930:Transport via pipeline
Tags: ConvertedDataset
Scenario: Business-as-Usual
System model: Allocation, cut-off by classification
Generated by: Niels Jungbluth
Published in: Jungbluth, N. 2007
Database: ecoinvent
isCopyrightProtected: true
accessRestrictedTo: 1

## General comment
Calculation for energy use. There are differences depending on diameter and difference of height.
[This dataset was already contained in the ecoinvent database version 2. It was not individually updated during the transfer to ecoinvent version 3. Life Cycle Impact Assessment results may still have changed, as they are affected by changes in the supply chain, i.e. in other datasets. This dataset was generated following the ecoinvent quality guidelines for version 2. It may have been subject to central changes described in the ecoinvent version 3 change report (http://www.ecoinvent.org/database/ecoinvent-version-3/reports-of-changes/), and the results of the central updates were reviewed extensively. The changes added e.g. consistent water flows and other information throughout the database. The documentation of this dataset can be found in the ecoinvent reports of version 2, which are still available via the ecoinvent website. The change report linked above covers all central changes that were made during the conversion process.]

## Included activities end
Energy use for pumping and emissions of oil due to accidents.

## Geography
Data investigated in RER

## Technology
Operation of crude oil pipelines by electricity.

## Time period
Emissions published in 1992. Transport modes investigated for 1994.

## Reference product
- transport, pipeline, onshore, petroleum: 1 metric ton*km; CPC 65131: Transport services via pipeline of petroleum and natural gas; By-product classification allocatable product
  EcoSpold01Location=RER
  production volume 1.32237 metric ton*km
    This is a placeholder value that does not reflect real-world production volumes. This dataset does not currently require a real-world production volume to work in the database framework, and no actual data were collected yet. This has no negative effect on the results of the ecoinvent database. The placeholder value of this activity was scaled according to the nominal GDP of 2005 (source: United Nations, http://data.un.org/Glossary.aspx?q=GDP+%28current+US%24%29, accessed 20130726) to reflect an appropriate share of the global production volume, which is also a placeholder value.
  property price 0.0047382 EUR2005
    Calculated based on inputs: The price of the product has been calculated as a sum of the values of the material and energy inputs for this product. This value is therefore a rough estimation. It may underestimate the real price since there are additional expenses when producing any product. These expences can include for example labour costs, treatment of waste materials and profit for the producer. Please consider carefully whether this level of data quality is acceptable for your application.

## Inputs from technosphere
- electricity, medium voltage: 0.02 kWh; lognormal variance with pedigree 0.08, pedigree (1,1,5,1,1)
  Range in literature and older data
  EcoSpold01Location=UCTE
- pipeline, petroleum: 9.46e-9 km; lognormal variance with pedigree 0.16, pedigree (1,1,5,1,1)
  Performance of European pipelines
  EcoSpold01Location=RER
  Uncertainty: Performance of European pipelines

## Emissions to nature
- Oils, unspecified [soil, unspecified]: 1.07e-5 kg; lognormal variance with pedigree 0.08, pedigree (1,1,5,1,1)
  Literature
  Uncertainty: Literature

## Sampling procedure
Literature.

## Extrapolations
This dataset has been extrapolated from year 2002 to the year of the calculation (2021). The uncertainty has been adjusted accordingly.

## Review by Michael Spielmann (obsolete) 2003-07-04
passed.
