# treatment of lignite ash, opencast refill

Dataset: EcoSpold 2, unit process
Geography: HU
Time period: 1996-01-01 to 2021-12-31
Technology level: current
Classification: ISIC rev.4 ecoinvent: 3822:Treatment and disposal of hazardous waste
Classification: EcoSpold01Categories: waste management/others
Synonyms: ashes form lignite incineration disposed as backfill in opencast lignite mines
Tags: ConvertedDataset; Treatment
Scenario: Business-as-Usual
System model: Allocation, cut-off by classification
Generated by: Gabor Doka (obsolete)
Published in: Doka G. 2008
Database: ecoinvent
isCopyrightProtected: true
accessRestrictedTo: 1

## General comment
backfilled waste composition is (in ppm): H2O n.a.; O n.a.; H n.a.; C n.a.; S 24338; N n.a.; P 82.673; B 435.17; Cl 2.0695; Br 3.3113; F 10.348; I 0.41391; Ag n.a.; As 10.235; Ba 206.95; Cd 1.2525; Co 31.043; Cr 28.974; Cu 12.396; Hg 0.020723; Mn 41.391; Mo 14.468; Ni 30.949; Pb 10.28; Sb 8.2455; Se 3.482; Sn 3.3113; V 72.339; Zn 57.49; Be 2.0695; Sc 1.0348; Sr 144.77; Ti 206.95; Tl 0.041282; W 2.0695; Si 99338; Fe 11175; Ca 41391; Al 9726.8; K 1241.7; Mg 6208.6; Na 1862.6;
[This dataset was already contained in the ecoinvent database version 2. It was not individually updated during the transfer to ecoinvent version 3. Life Cycle Impact Assessment results may still have changed, as they are affected by changes in the supply chain, i.e. in other datasets. This dataset was generated following the ecoinvent quality guidelines for version 2. It may have been subject to central changes described in the ecoinvent version 3 change report (http://www.ecoinvent.org/database/ecoinvent-version-3/reports-of-changes/), and the results of the central updates were reviewed extensively. The changes added e.g. consistent water flows and other information throughout the database. The documentation of this dataset can be found in the ecoinvent reports of version 2, which are still available via the ecoinvent website. The change report linked above covers all central changes that were made during the conversion process.]

## Included activities end
This module contains only direct emissions from lignite ash used as backfill in opencast lignite mines: short-term emissions (0-100a) and long-term emissions (>100a) both to ground water. E.g. land-use and energy consumption is *not* included.

## Geography
Ash composition calculated from country-specific coal composition (HU) and technology-specific transfer coefficients in power plant.

## Technology
Lignite ash as backfill in lignite opencast mine (together with tailings)

## Reference product
- lignite ash: -1 kg; CPC 39: Wastes or scraps; By-product classification Waste
  EcoSpold01Location=HU
  production volume 2.01689e9 kg
    Estimated. Electricity and synthetic natural gas production are responsible for more than 90% of lignite use (https://www.lignite.com/about-lignite/lignite-uses/, accessed 20151008) . The production volume is calculated as the sum of lignite ashes resulting from electricity and heat and power co-generation production from lignite, in the respective country.
  property price 0 EUR2005
    Waste products are assigned a price of zero as they are assumed to require further treatment.
  property carbon content 0
    carbon content on a dry matter basis (reserved; not for manual entry)
  properties: wet mass 1 kg, carbon content, fossil 0, water in wet mass 0 kg, dry mass 1 kg, carbon content, non-fossil 0, heating value, net 0 MJ, water content 0, carbon allocation 0 kg

## Emissions to nature
- Chloride [water, ground-, long-term]: 8.8877e-7 kg; lognormal variance with pedigree 1.53, pedigree (1,1,5,1,1)
  Long-term emission from lignite ash backfill. Uncertainty derived from uncertainty in ash composition and uncertainty in transfer coefficients.
- Molybdenum [water, ground-, long-term]: 1.9687e-11 kg; lognormal variance with pedigree 1.28, pedigree (1,1,5,1,1)
  (same comment as for Chloride)
- Tin, ion [water, ground-, long-term]: 3.311e-6 kg; lognormal variance with pedigree 1.45, pedigree (1,1,5,1,1)
  (same comment as for Chloride)
- Copper, ion [water, ground-, long-term]: 1.2394e-5 kg; lognormal variance with pedigree 1.28, pedigree (1,1,5,1,1)
  (same comment as for Chloride)
- Cobalt [water, ground-, long-term]: 3.1021e-5 kg; lognormal variance with pedigree 1.16, pedigree (1,1,5,1,1)
  (same comment as for Chloride)
- Molybdenum [water, ground-]: 1.4468e-5 kg; lognormal variance with pedigree 1.26, pedigree (1,1,5,1,1)
  Short-term emission from lignite ash backfill. Uncertainty derived from uncertainty in ash composition and uncertainty in transfer coefficients.
- Cadmium, ion [water, ground-]: 3.5615e-11 kg; lognormal variance with pedigree 2.7, pedigree (1,1,5,1,1)
  (same comment as for Molybdenum)
- Barium [water, ground-, long-term]: 0.00020695 kg; lognormal variance with pedigree 0.91, pedigree (1,1,5,1,1)
  (same comment as for Chloride)
- Magnesium [water, ground-]: 2.9548e-6 kg; lognormal variance with pedigree 1.21, pedigree (1,1,5,1,1)
  (same comment as for Molybdenum)
- Nickel, ion [water, ground-, long-term]: 3.0902e-5 kg; lognormal variance with pedigree 1.16, pedigree (1,1,5,1,1)
  (same comment as for Chloride)
- Iron, ion [water, ground-]: 9.3508e-8 kg; lognormal variance with pedigree 1.68, pedigree (1,1,5,1,1)
  (same comment as for Molybdenum)
- Beryllium [water, ground-]: 3.1383e-9 kg; lognormal variance with pedigree 2.11, pedigree (1,1,5,1,1)
  (same comment as for Molybdenum)
- Fluoride [water, ground-, long-term]: 8.9977e-6 kg; lognormal variance with pedigree 1.3, pedigree (1,1,5,1,1)
  (same comment as for Chloride)
- Manganese [water, ground-]: 1.4321e-9 kg; lognormal variance with pedigree 2.22, pedigree (1,1,5,1,1)
  (same comment as for Molybdenum)
- Nickel, ion [water, ground-]: 4.6932e-8 kg; lognormal variance with pedigree 1.76, pedigree (1,1,5,1,1)
  (same comment as for Molybdenum)
- Barium [water, ground-]: 7.1604e-9 kg; lognormal variance with pedigree 2, pedigree (1,1,5,1,1)
  (same comment as for Molybdenum)
- Zinc, ion [water, ground-, long-term]: 5.7487e-5 kg; lognormal variance with pedigree 1.08, pedigree (1,1,5,1,1)
  (same comment as for Chloride)
- Thallium [water, ground-, long-term]: 4.1219e-8 kg; lognormal variance with pedigree 2.01, pedigree (1,1,5,1,1)
  (same comment as for Chloride)
- Beryllium [water, ground-, long-term]: 2.0664e-6 kg; lognormal variance with pedigree 1.52, pedigree (1,1,5,1,1)
  (same comment as for Chloride)
- Copper, ion [water, ground-]: 1.9987e-9 kg; lognormal variance with pedigree 2.17, pedigree (1,1,5,1,1)
  (same comment as for Molybdenum)
- Phosphate [water, ground-, long-term]: 0.00014209 kg; lognormal variance with pedigree 1.11, pedigree (1,1,5,1,1)
  (same comment as for Chloride)
- Mercury [water, ground-]: 4.0971e-12 kg; lognormal variance with pedigree 2.97, pedigree (1,1,5,1,1)
  (same comment as for Molybdenum)
- Cadmium, ion [water, ground-, long-term]: 1.2524e-6 kg; lognormal variance with pedigree 1.58, pedigree (1,1,5,1,1)
  (same comment as for Chloride)
- Sulfate [water, ground-, long-term]: 0.053359 kg; lognormal variance with pedigree 0.31, pedigree (1,1,5,1,1)
  (same comment as for Chloride)
- Selenium [water, ground-]: 1.3429e-6 kg; lognormal variance with pedigree 1.47, pedigree (1,1,5,1,1)
  (same comment as for Molybdenum)
- Sulfate [water, ground-]: 0.019654 kg; lognormal variance with pedigree 0.35, pedigree (1,1,5,1,1)
  (same comment as for Molybdenum)
- Antimony [water, ground-]: 3.1799e-6 kg; lognormal variance with pedigree 1.36, pedigree (1,1,5,1,1)
  (same comment as for Molybdenum)
- Chromium VI [water, ground-, long-term]: 2.8736e-6 kg; lognormal variance with pedigree 1.23, pedigree (1,1,5,1,1)
  (same comment as for Chloride)
- Tungsten [water, ground-]: 7.9813e-7 kg; lognormal variance with pedigree 1.54, pedigree (1,1,5,1,1)
  (same comment as for Molybdenum)
- Vanadium, ion [water, ground-]: 4.446e-7 kg; lognormal variance with pedigree 1.47, pedigree (1,1,5,1,1)
  (same comment as for Molybdenum)
- Scandium [water, ground-, long-term]: 7.4233e-7 kg; lognormal variance with pedigree 1.61, pedigree (1,1,5,1,1)
  (same comment as for Chloride)
- Vanadium, ion [water, ground-, long-term]: 3.8908e-5 kg; lognormal variance with pedigree 1.14, pedigree (1,1,5,1,1)
  (same comment as for Chloride)
- Arsenic, ion [water, ground-, long-term]: 1.0235e-14 kg; lognormal variance with pedigree 1.33, pedigree (1,1,5,1,1)
  (same comment as for Chloride)
- Fluoride [water, ground-]: 1.3499e-6 kg; lognormal variance with pedigree 1.4, pedigree (1,1,5,1,1)
  (same comment as for Molybdenum)
- Chloride [water, ground-]: 1.1808e-6 kg; lognormal variance with pedigree 1.52, pedigree (1,1,5,1,1)
  (same comment as for Molybdenum)
- Potassium, ion [water, ground-]: 0.0007007 kg; lognormal variance with pedigree 0.68, pedigree (1,1,5,1,1)
  (same comment as for Molybdenum)
- Mercury [water, ground-, long-term]: 2.0718e-8 kg; lognormal variance with pedigree 2.1, pedigree (1,1,5,1,1)
  (same comment as for Chloride)
- Tin, ion [water, ground-]: 2.6282e-10 kg; lognormal variance with pedigree 2.44, pedigree (1,1,5,1,1)
  (same comment as for Molybdenum)
- Thallium [water, ground-]: 6.2601e-11 kg; lognormal variance with pedigree 2.61, pedigree (1,1,5,1,1)
  (same comment as for Molybdenum)
- Phosphate [water, ground-]: 2.3721e-7 kg; lognormal variance with pedigree 1.69, pedigree (1,1,5,1,1)
  (same comment as for Molybdenum)
- Antimony [water, ground-, long-term]: 5.0656e-6 kg; lognormal variance with pedigree 1.34, pedigree (1,1,5,1,1)
  (same comment as for Chloride)
- Sodium, ion [water, ground-, long-term]: 0.00057213 kg; lognormal variance with pedigree 0.63, pedigree (1,1,5,1,1)
  (same comment as for Chloride)
- Iodide [water, ground-]: 4.1391e-7 kg; lognormal variance with pedigree 1.72, pedigree (1,1,5,1,1)
  (same comment as for Molybdenum)
- Selenium [water, ground-, long-term]: 2.1392e-6 kg; lognormal variance with pedigree 1.45, pedigree (1,1,5,1,1)
  (same comment as for Chloride)
- Magnesium [water, ground-, long-term]: 0.0062057 kg; lognormal variance with pedigree 0.46, pedigree (1,1,5,1,1)
  (same comment as for Chloride)
- Aluminium [water, ground-]: 1.2094e-5 kg; lognormal variance with pedigree 1.04, pedigree (1,1,5,1,1)
  (same comment as for Molybdenum)
- Cobalt [water, ground-]: 2.223e-8 kg; lognormal variance with pedigree 1.85, pedigree (1,1,5,1,1)
  (same comment as for Molybdenum)
- Chromium VI [water, ground-]: 4.3698e-6 kg; lognormal variance with pedigree 1.25, pedigree (1,1,5,1,1)
  (same comment as for Molybdenum)
- Iron, ion [water, ground-, long-term]: 0.0074682 kg; lognormal variance with pedigree 0.43, pedigree (1,1,5,1,1)
  (same comment as for Chloride)
- Sodium, ion [water, ground-]: 0.0012904 kg; lognormal variance with pedigree 0.62, pedigree (1,1,5,1,1)
  (same comment as for Molybdenum)
- Silicon [water, ground-]: 0.00056052 kg; lognormal variance with pedigree 0.6, pedigree (1,1,5,1,1)
  (same comment as for Molybdenum)
- Calcium, ion [water, ground-]: 1.5665e-5 kg; lognormal variance with pedigree 1.03, pedigree (1,1,5,1,1)
  (same comment as for Molybdenum)
- Scandium [water, ground-]: 2.9244e-7 kg; lognormal variance with pedigree 1.65, pedigree (1,1,5,1,1)
  (same comment as for Molybdenum)
- Bromine [water, ground-]: 3.2553e-6 kg; lognormal variance with pedigree 1.45, pedigree (1,1,5,1,1)
  (same comment as for Molybdenum)
- Titanium, ion [water, ground-]: 2.5733e-7 kg; lognormal variance with pedigree 1.53, pedigree (1,1,5,1,1)
  (same comment as for Molybdenum)
- Iodide [water, ground-, long-term]: 4.1391e-14 kg; lognormal variance with pedigree 1.75, pedigree (1,1,5,1,1)
  (same comment as for Chloride)
- Aluminium [water, ground-, long-term]: 0.0097147 kg; lognormal variance with pedigree 0.41, pedigree (1,1,5,1,1)
  (same comment as for Chloride)
- Titanium, ion [water, ground-, long-term]: 0.0002067 kg; lognormal variance with pedigree 0.91, pedigree (1,1,5,1,1)
  (same comment as for Chloride)
- Bromine [water, ground-, long-term]: 5.5996e-8 kg; lognormal variance with pedigree 1.48, pedigree (1,1,5,1,1)
  (same comment as for Chloride)
- Lead [water, ground-, long-term]: 1.0279e-5 kg; lognormal variance with pedigree 1.3, pedigree (1,1,5,1,1)
  (same comment as for Chloride)
- Potassium, ion [water, ground-, long-term]: 0.00054103 kg; lognormal variance with pedigree 0.68, pedigree (1,1,5,1,1)
  (same comment as for Chloride)
- Strontium [water, ground-, long-term]: 0.00014455 kg; lognormal variance with pedigree 0.95, pedigree (1,1,5,1,1)
  (same comment as for Chloride)
- Calcium, ion [water, ground-, long-term]: 0.041375 kg; lognormal variance with pedigree 0.25, pedigree (1,1,5,1,1)
  (same comment as for Chloride)
- Strontium [water, ground-]: 2.1954e-7 kg; lognormal variance with pedigree 1.55, pedigree (1,1,5,1,1)
  (same comment as for Molybdenum)
- Boron [water, ground-, long-term]: 0.00027198 kg; lognormal variance with pedigree 0.86, pedigree (1,1,5,1,1)
  (same comment as for Chloride)
- Lead [water, ground-]: 2.2334e-10 kg; lognormal variance with pedigree 2.46, pedigree (1,1,5,1,1)
  (same comment as for Molybdenum)
- Silicon [water, ground-, long-term]: 0.070835 kg; lognormal variance with pedigree 0.19, pedigree (1,1,5,1,1)
  (same comment as for Chloride)
- Zinc, ion [water, ground-]: 2.9513e-9 kg; lognormal variance with pedigree 2.12, pedigree (1,1,5,1,1)
  (same comment as for Molybdenum)
- Manganese [water, ground-, long-term]: 4.1389e-5 kg; lognormal variance with pedigree 1.12, pedigree (1,1,5,1,1)
  (same comment as for Chloride)
- Boron [water, ground-]: 3.4096e-6 kg; lognormal variance with pedigree 1.2, pedigree (1,1,5,1,1)
  (same comment as for Molybdenum)
- Tungsten [water, ground-, long-term]: 1.2714e-6 kg; lognormal variance with pedigree 1.52, pedigree (1,1,5,1,1)
  (same comment as for Chloride)
- Arsenic, ion [water, ground-]: 1.0235e-5 kg; lognormal variance with pedigree 1.3, pedigree (1,1,5,1,1)
  (same comment as for Molybdenum)

## Sampling procedure
country-specific calculation based on literature data

## Extrapolations
This dataset has been extrapolated from year 2000 to the year of the calculation (2021). The uncertainty has been adjusted accordingly.

## Review by Niels Jungbluth 2009-01-22
passed.
