# cement production, limestone 21-35%

Dataset: EcoSpold 2, unit process
Geography: PE
Time period: 2014-01-01 to 2021-12-31
Technology level: current
Classification: ISIC rev.4 ecoinvent: 2394:Manufacture of cement, lime and plaster
Synonyms: type ICo
Tags: combined production
Scenario: Business-as-Usual
System model: Allocation, cut-off by classification
Share of production covered: 67 %
Generated by: Lucia Valsasina
Published in: Silva, F. B. 2017
Database: ecoinvent
isCopyrightProtected: true
accessRestrictedTo: 1

## General comment
The dataset describes the production of cement type ICo according to NTP 334.009 / ASTM C150 for Portland cements.
The cement density is 3g/ml and the resitance is 32MPa according to the NTP 334.090 standard (product description of cement ICo of Pacasmayo).
The weight composition of the cement is: 70% clinker, 4% gypsum and 26%limestone and 0.2% flyash.

## Included activities start
This activity starts with the reception of raw materials.

## Included activities end
This activity ends with the cement produced in the cement mill. The dataset includes packaging in cement bags.

## Geography
Representative production of cement type ICo in Peru. Data based from main cement producers and personal comunications with local experts.

## Technology
Represent the current technology for cement production in Peru.

## Time period
The production volume of 2016 is considered. Data from sustainability reports of 2014 to 2017 is used.

## Reference product
- cement, limestone 21-35%: 1 kg; name cement; CPC 374: Plaster, lime and cement; By-product classification allocatable product
  Refernce product with a density between 3-3.15 g/ml.
  production volume 1.11034e9 kg; name cement_PV
    Calculated value.
    The total production of cement for Peru was 10’094’000 tons in 2016 (ASOCEM, 2016) provided by 8 integrated clinker and cement plants (GCR, 2016).
    The most produced cements in Peru are portland cement (42%), type IP (26%) and type ICo (11%).
  property price 0.0615 EUR2005; name cement_price_EUR2005
    2005 import and export prices (total trades (USD) divided by total weight (kg) in China, India, USA, Japan, Russia and Europe, major producers and consumers (http://www.cementchina.net/freport/showfre.asp?id=749) from UN Commodity Trade Statistics Database (http://data.un.org/Explorer.aspxDatabase [Accessed 2 July 2010]). Commodity: Cement (portland, aluminious, slag or hydraulic)
  property water in wet mass 0 kg; name cement_WWM
  property wet mass 1 kg; name cement_WM
  property dry mass 1 kg; name cement_DM
  property water content 0; name cement_water_content
- hard coal ash: 0 kg; name ash; By-product classification Waste; CPC 39: Wastes or scraps
  Calculated Value. In Colombia, according to ASOCRETO, the most common additions are crushed limestone, slags and fly ashes. An equal repartition by mass of principal supplementary cementitious material used in Colombia.The mathematical relation used to calculate the value is: -(1-clinker-gypsum-lime)
  production volume 0 kg
    Calculated from production volume of reference product using the relative outputs.
  property price 0 EUR2005; name ash_price_EUR2005
    Waste products are assigned a price of zero as they are assumed to require further treatment.
  property carbon content 0
    carbon content on a dry matter basis (reserved; not for manual entry)
  properties: wet mass 1 kg, dry mass 1 kg, carbon content, fossil 0, carbon content, non-fossil 0, water in wet mass 0 kg, water content 0, carbon allocation 0 kg

## Inputs from technosphere
- clinker: 0.7 kg; = 0.7*cement+ash*0; source Nicholas Myers 2017; lognormal variance with pedigree 0.0052, pedigree (3,3,3,1,1)
  Estimated value. Cement type ICo with 30% addition according to standard NTP-334.090 / ASTM C595
  Uncertainty: Variance of log-transformed data was taken from ecoinvent report no 1, table 10.3. Value represents demand of products, electricity etc. for input/output group c.
  properties: dry mass 1 kg, wet mass 1 kg
- cement factory: 5.36e-11 unit; = 0.0000000000536*cement; lognormal variance with pedigree 0.0146, pedigree (3,5,3,5,1)
  Literature Value. From the global dataset " alternative constituents 21-35%" (retrieved 2018/01/04)
  Uncertainty: Variance of log-transformed data was taken from ecoinvent report no 1, table 10.3. Value represents demand of products, electricity etc. for input/output group c.
- electricity, medium voltage: 0.037 kWh; name electricity; = 0.037*cement; lognormal variance with pedigree 0.0113, pedigree (3,3,4,3,1)
  Literature value. the electricity considered for cement production is 37kWh per ton of cement, which is aligned with the current ecoinvent datasets.
  Source: Boesch & Hellweg 2010, 2010, Boesch, M.E., Hellweg, S., Identifying Improvement Potentials in Cement Production with Life Cycle Assessment, Environmental Science & Technology, 44, 23, 9143-9149, 1 - Article, Supporting information is available via http://pubs.acs.org (accessed on october 15th 2017)
  Uncertainty: Variance of log-transformed data was taken from ecoinvent report no 1, table 10.3. Value represents demand of products, electricity etc. for input/output group c.
- gypsum, mineral: 0.0385 kg; name gypsum; = 0.0385*cement; source Manuel Lascarro 2017; lognormal variance with pedigree 0.0052, pedigree (3,3,3,1,1)
  Literature Value. 5.5% of gypsum per clinker mass is used according to Gypsum (Pacasmayo, 2014). The value was calculated based on the following mathematical relation: clinker*0.055
  Uncertainty: Variance of log-transformed data was taken from ecoinvent report no 1, table 10.3. Value represents demand of products, electricity etc. for input/output group c.
  properties: wet mass 1 kg, dry mass 1 kg
- limestone, crushed, for mill: 0.26 kg; name lime; = 0.26*cement; lognormal variance with pedigree 0.0052, pedigree (3,3,3,1,1)
  Estimated value. Cement type ICo with 30% addition according to standard NTP-334.090 / ASTM C595
  properties: dry mass 0.998 kg, wet mass 1 kg, water content 0.00200401, carbon content, fossil 0.117492
- steel, low-alloyed: 0.00011 kg; name steel; = 0.00011*cement; source Kellenberger D. 2007; lognormal variance with pedigree 0.0132, pedigree (3,3,4,5,1)
  Literature value. As no data from Peruvian producer was founded, the value of Global datastet (cement production, alternative constituents 21-35%) has been used.
  Source: 2007, Kellenberger D., Althaus H.-J., Jungbluth N., Künniger T., Life Cycle Inventories of Building Products, Final report ecoinvent data v2.0, 7, Dübendorf, CH, Swiss Centre for LCI, Empa - TSL, 3 - SeparatePublication, CD-ROM (Accessed on october 15th 2017)
  Uncertainty: Variance of log-transformed data was taken from ecoinvent report no 1, table 10.3. Value represents demand of products, electricity etc. for input/output group c.
  properties: wet mass 1 kg, carbon content, fossil 0.005, dry mass 1 kg
- ethylene glycol: 0.00031 kg; = 0.00031*cement; source Kellenberger D. 2007; lognormal variance with pedigree 0.0132, pedigree (3,3,4,5,1)
  Literature value. Ancillary product for grinding. As no data from Colombian producer was founded, the value of Global datastet (cement production, alternative constituents 21-35%) has been used.
  Source: 2007, Kellenberger D., Althaus H.-J., Jungbluth N., Künniger T., Life Cycle Inventories of Building Products, Final report ecoinvent data v2.0, 7, Dübendorf, CH, Swiss Centre for LCI, Empa - TSL, 3 - SeparatePublication, CD-ROM (Accessed on october 15th 2017)
  Uncertainty: Variance of log-transformed data was taken from ecoinvent report no 1, table 10.3. Value represents demand of products, electricity etc. for input/output group c.
  properties: heating value, net 23.44 MJ, dry mass 1 kg, carbon content, fossil 0.387097, wet mass 1 kg

## Sampling procedure
The data is compiled based on different data sources, including sustainability reports, literature values and expert judgements. Most data is derived from sustainability reports of two principal cement producers of Peru (Pacasmayo and UNACEM). The data is checked, completed and validated by local experts. In total, it is estimated that the data considered is representative for 67% of cement production in all the country (market share of the three main cement producers).

Unit flows were calculated by dividing the amounts of inputs and outputs by the total clinker production in mass.

The amount of the exchanges were calculated considering the arithmetic [weighted] average of the sample. No conversion to the geometric mean of the lognormal distribution was done, for consistency reasons with other Ecoinvent datasets.

## Extrapolations
The life cycle inventory model is based on the PCR for cement and concrete (Environdec, 2010), as well as on the LCA core model of the WBCSD-CSI EPD tool (Dauriat et al., 2014).

Dauriat, A., Porté, C., Delerce, C., Guignard, C., & Adams, A. (2014). WBCSD CSI tool for EPDs of concrete and cement: LCA core model and database report.

Environdec. (2010). Product category rules of UN CPC 3744 Cement.
