# battery cell production, Li-ion, NCA

Dataset: EcoSpold 2, unit process
Geography: RoW
Time period: 2017-01-01 to 2021-12-31
Technology level: current
Classification: ISIC rev.4 ecoinvent: 2720:Manufacture of batteries and accumulators
Synonyms: battery cell, nickel-cobalt-aluminium, Li-ion
Scenario: Business-as-Usual
System model: Allocation, cut-off by classification
Generated by: Eleonora Crenna
Published in: Dai, Q. 2017
Database: ecoinvent
isCopyrightProtected: true
accessRestrictedTo: 1

## General comment
This dataset represents the production of 1 kg of Li-ion battery cell with nickel manganese aluminium (NCA) cathode and silicon coated graphite based anode. The specific energy capacity of a cell is 0.224 kWh/kg cell, calculated based on the information reported in Dai et al. (2017, 2018, 2019). The inventory is modelled according to the publication of Dai et al. (2017) and expert judgement. Infrastructure is included as well. This dataset is a copy of the corresponding regional dataset. Production volume was adjusted.
Reference:
Dai, Q., Dunn, J., Kelly, J. C., & Elgowainy, A. Update of Life Cycle Analysis of Lithium-Ion Batteries in the GREET Model. 2017. Argonne National Laboratory.
Dai, Q., Kelly, J., Dunn, J., & Benavides, P. (2018). Update of bill-of-materials and cathode materials production for lithium-ion batteries in the GREET model. Energy Systems Division, Argonne National Laboratory (ANL), IL, US.
Dai, Q., Kelly, J. C., Gaines, L., & Wang, M. (2019). Life cycle analysis of lithium-ion batteries for automotive applications. Batteries, 5(2), 48.

## Included activities start
The activity starts with the battery cell components and the materials for additional components (esternal case, tabs, etc.) entering the factory gate.

## Included activities end
The activity ends with the production of Li-ion battery cells.

## Geography
This dataset covers the geography China, which is the leader country of Li-ion battery cell production. Data have been partly collected form a Chinese company.

## Technology
This dataset includes a method of producing Li-ion cell. Lithium ions move from the cathode (NCA) into the electrolyte through the micropores of the separator into the silicon coated graphite anode during the charging phase. During the discharge of the battery, the Li+-ions move back into the cathode.

## Time period
The time period is from 2017 (year of the collection of data) and 2020 (year of the dataset)

## Reference product
- battery cell, Li-ion, NCA: 1 kg; name RefProd; By-product classification allocatable product; CPC 46410: Primary cells and primary batteries
  production volume 1.1956e8 kg
    The PV is expressed in kg. According to UN Comtrade (https://comtrade.un.org/data/, HS code: 850760) 1317479226 kg Li-ion batteries were traded worldwide in 2019. Approximately 15% are NCA Li-ion batteries (Benchmark Mineral Intelligence, 2019. The Current Position of Li-ion Raw Material Supply and the Role of Recycling), of which NCA cells represent approximately 71% weight of a battery pack.
  property price 14.6877 EUR2005; name RefProd_price_EUR2005; = 79*0.224*0.83
    Price infromation from: https://thedeepdive.ca/lithium-ion-battery-cells-cathodes-and-costs/
  property carbon content 0.274851
    carbon content on a dry matter basis (reserved; not for manual entry)
  properties: water in wet mass 0 kg, wet mass 1 kg, water content 0, carbon content, fossil 0.272818, dry mass 1 kg, copper content 0.034895, carbon content, non-fossil 0.00203306, carbon allocation 0.274851 kg

## Inputs from technosphere
- aluminium, wrought alloy: 0.0297 kg; name Al_input; source Dai, Q. 2018; lognormal variance with pedigree 0.0068, pedigree (3,4,2,5,1)
  Literature. Material for cell container (0.0189 kg) and positive terminal (0.0108 kg)
  properties: dry mass 1 kg, wet mass 1 kg
- cathode, NCA, for Li-ion battery: 0.3738 kg; lognormal variance with pedigree 0.0068, pedigree (3,4,2,5,1)
  Adapted from the origina literaturel amount, based on expert judgement.
  properties: dry mass 1 kg, carbon content, fossil 0.02125, wet mass 1 kg
- heat, district or industrial, natural gas: 0 MJ; pedigree (1,1,1,1,1)
  Literature. Original value of 56-71 MJ/kWh cell taken from Dai et al. (2017), representing the energy demand for cell assembly in dry room. It includes cell stacking, terminal welding, electrode fillind and cell closing, and refers to 43Ah, 3.7 V NMC cells. This value is calculated considering the average energy demand and the storage capacity per NCA cell (0.162 kWh/cell calculated from Dai et al., 2018 assuming 140 cells per battery pack as in Dai et al. 2019)
  Reference:
  Dai et al. (2017). Update of Life Cycle Analysis of Lithium-Ion Batteries in the GREET Model. ArgonneNational Laboratory.
  Dai, Q., Kelly, J. C., Dunn, J., & Benavides, P. (2018). Update of Bill-of-Materials and Cathode Materials Production for Lithium-Ion Batteries in the GREET Model. 2018. Argonne National Laboratory.
  Dai et al. (2019). Life cycle analysis of lithium-ion batteries for automotive applications. Batteries, 5(2), 48.
  properties: heating value, net 1 MJ
- chemical factory, organics: 4e-10 unit; lognormal variance with pedigree 0.478, pedigree (4,5,5,5,5)
  Calculated based on literature data published by the industry. For this activity, no information was readily available concerning infrastructure and land-use. Therefore, the infrastructure is estimated based on data from two chemical factories, the BASF site of Ludwigshafen and the chemical factory in Gendorf (which are both located in Germany), which produce a wide range of chemical substances. Based on this data, the following assumptions are made: the built area amounts to about 4.2 ha, the plant has an average output of 50'000 t/a and a lifespan of fifty years. The estimated infrastructure amount is therefore 4.00 E-10 units per kg of produced chemical.
  References:
  Althaus H.-J., Chudacoff M., Hischier R., Jungbluth N., Osses M. and Primas A. (2007) Life Cycle Inventories of Chemicals. ecoinvent report No. 8, v2.0. EMPA Dübendorf, Swiss Centre for Life Cycle Inventories, Dübendorf, CH.
  Gendorf (2000) Umwelterklärung 2000, Werk Gendorf. Werk Gendorf, Burgkirchen.om ecoinvent)
- polypropylene, granulate: 0.0013 kg; name PP_input; source Dai, Q. 2018; lognormal variance with pedigree 0.0068, pedigree (3,4,2,5,1)
  Literature. Plastic component of the cell container.
  properties: wet mass 1 kg, dry mass 1 kg, carbon content, fossil 0.857143, heating value, net 32.78 MJ
  note on heating value, net: Value extracted from "treatment of waste polypropylene, open burning"
- aluminium collector foil, for Li-ion battery: 0.0281 kg; lognormal variance with pedigree 0.0068, pedigree (3,4,2,5,1)
  Adapted from the origina literaturel amount, based on expert judgement.
  properties: dry mass 1 kg, aluminium content 1, wet mass 1 kg
- electricity, medium voltage: 0 kWh; pedigree (1,1,1,1,1)
  Literature. Electricity demand for cell assembly in dry room (1.027 kWh, average value from Dai et al. 2017) and for final cell forming & charging (0.324 kW, from Dai et al., 2019). Specific energy capacity: 0.224 kWh/kg cells (calculated from Dai et al., 2018).
  References:
  Dai, Q., Dunn, J., Kelly, J. C., & Elgowainy, A. (2017). Update of Life Cycle Analysis of Lithium-Ion Batteries in the GREET Model. Argonne National Laboratory
  Dai, Q., Kelly, J. C., Dunn, J., & Benavides, P. (2018). Update of Bill-of-Materials and Cathode Materials Production for Lithium-Ion Batteries in the GREET Model. Argonne National Laboratory.
  Dai, Q., Kelly, J. C., Gaines, L., & Wang, M. (2019). Life cycle analysis of lithium-ion batteries for automotive applications. Batteries, 5(2), 48.
- sheet rolling, aluminium: 0.0297 kg; = Al_input; lognormal variance with pedigree 0.0068, pedigree (3,4,2,5,1)
  Proxy for the production of the aluminium products (i.e. cell container and positive terminal)
- electrolyte, for Li-ion battery: 0.1484 kg; source Dai, Q. 2018; lognormal variance with pedigree 0.0054, pedigree (2,4,2,5,1)
  Literature.
  properties: carbon content, fossil 0.183946, dry mass 1 kg, wet mass 1 kg
- copper, anode: 0.035 kg; name Cu_input; source Dai, Q. 2018; lognormal variance with pedigree 0.0068, pedigree (3,4,2,5,1)
  Literature. Material for the negative terminal
  properties: wet mass 1 kg, dry mass 1 kg, copper content 0.997
- extrusion, plastic film: 0.0043 kg; = PP_input+ PET_input; lognormal variance with pedigree 0.0068, pedigree (3,4,2,5,1)
  Proxy for the production of plastic parts of cell container
- battery separator: 0.0184 kg; lognormal variance with pedigree 0.0054, pedigree (2,4,2,5,1)
  Literature.
  properties: wet mass 1 kg, carbon content, fossil 0.603377, dry mass 1 kg
- sheet rolling, copper: 0.035 kg; = Cu_input; lognormal variance with pedigree 0.0068, pedigree (3,4,2,5,1)
  Proxy for the production of the negative terminal
- anode, silicon coated graphite, for Li-ion battery: 0.2306 kg; source Dai, Q. 2018; lognormal variance with pedigree 0.0054, pedigree (2,4,2,5,1)
  Literature.
  properties: wet mass 1 kg, carbon content, non-fossil 0.0088164, dry mass 1 kg, carbon content, fossil 0.948898
- copper collector foil, for Li-ion battery: 0.1317 kg; source Dai, Q. 2018; lognormal variance with pedigree 0.0054, pedigree (2,4,2,5,1)
  Literature.
  properties: copper content 1, wet mass 1 kg, dry mass 1 kg
- polyethylene terephthalate, granulate, amorphous: 0.003 kg; name PET_input; source Dai, Q. 2018; lognormal variance with pedigree 0.0068, pedigree (3,4,2,5,1)
  Literature. Plastic component of the cell container.
  properties: heating value, net 22.95 MJ, dry mass 1 kg, carbon content, fossil 0.625, wet mass 1 kg
- heat, district or industrial, natural gas: 0.569398, 13.6553 MJ (2 entries); lognormal variance with pedigree 0.0054, pedigree (2,4,2,5,1)
  (same comment as for heat, district or industrial, natural gas)
- electricity, medium voltage: 0.0260895, 0.00500285, 0.114873, 0.0839874, 0.387204, 0.172174, 0.560969 kWh (7 entries); lognormal variance with pedigree 0.0054, pedigree (2,4,2,5,1)
  (same comment as for electricity, medium voltage)

## Sampling procedure
From Literature and expert judgement.

## Extrapolations
The dataset is extrapolated from CN data; the uncertainty has been adjusted accordingly.
