# sugarcane loading, by loader

Dataset: EcoSpold 2, unit process
Geography: RoW
Time period: 2012-01-01 to 2021-12-31
Technology level: current
Classification: ISIC rev.4 ecoinvent: 0161:Support activities for crop production
Classification: EcoSpold01Categories: agricultural means of production/work processes
Scenario: Business-as-Usual
System model: Allocation, cut-off by classification
Generated by: Mateus Chagas
Published in: Cavalett O. 2016
Database: ecoinvent
isCopyrightProtected: true
accessRestrictedTo: 1

## General comment
This dataset represents the manually harvested sugarcane loading operation in one hectare (ha). This operation only occurs when the sugarcane is manually harvested. Functional unit (FU) is one hectare of sugarcane loading. The operation time is about 3.88 hours per ha (75.8% of this time is effectively worked, discounting time for maintenance, waiting in the field and re-allocations between the plots).
Dataset authors:
Mateus Ferreira Chagas, CTBE, mateus.chagas@bioetanol.org.br; Otávio Cavalett, CTBE, otavio.cavalett@bioetanol.org.br; Terezinha de Fátima Cardoso, CTBE, terezinha.cardoso@bioetanol.org.br; Antonio Bonomi, CTBE, antonio.bonommi@bioetanol.org.br
References:
1. Cavalett, O., Chagas, M.F., Magalhães, P.S.G., Carvalho, J.L.N. Cardoso, T.F., Franco, HC.J., Braunbeck, O.A., Bonomi, A., 2016a. The Agricultural Produciton Model. In: Bonomi, A., Cavalett, O., Pereira da Cunha, M., Lima, M.A.P. (Eds.). Virtual Biorefinery: An Optimization Strategy for Renewable Carbon Valorization. 13-52.
2. Nemecek T, Kagi T (2007) Life Cycle Inventories of Agricultural Production Systems – Data v2.0, Zurich and Dubendorf: 2007

## Included activities start
From manually harvested sugarcane in the agricultural field to be loaded.

## Included activities end
This activity includes the sugarcane loading into the transport truck, and ends with sugarcane transfered to the transport trucks. The dataset includes the diesel fuel consumption (9.62 L of diesel per hour of effective operation) and the amount of agricultural machinery and shed. Also taken into consideration is the amount of emissions to the air from diesel combustion and the emission to the soil from tyre abrasion during the work process.

## Geography
The global dataset is modeled based on information from sugarcane production system in Brazilian South-Cental region.

## Technology
This activity is performed with a sugarcane grab loader (power 90 hp; weight 3400 kg). Life spam of the machinery is considered as 8000 operating hours. Machinery used, fuel consumption and operation efficiencies were based on data from sugarcane mills in Brazil, expert's informations and unpublished data.

## Time period
Most of the data used to modelling this activity were collected in the last few years (2012-2014).

## Reference product
- sugarcane loading, by loader: 1 ha; CPC 86119: Other support services to crop production; By-product classification allocatable product
  production volume 1.85825e6 ha; = 27045769*0.112
    Estimated based global sugarcane production area, year 2014, according to the FAOSTAT data. This operation is assumed to occur in the 11.2% of non-mecanized harvesting area, taken into account the technology from sugarcane production area in the South-Central Brazilian region.
  property price 15.5122 EUR2005
    Calculated based on inputs: The price of the product has been calculated as a sum of the values of the material and energy inputs for this product. This value is therefore a rough estimation. It may underestimate the real price since there are additional expenses when producing any product. These expences can include for example labour costs, treatment of waste materials and profit for the producer. Please consider carefully whether this level of data quality is acceptable for your application.

## Inputs from technosphere
- diesel: 0 kg; source Otávio Cavalett 2016; pedigree (1,1,1,1,1)
  Proxy, based on data from sugarcane mills in Brazil, expert's informations and unpublished data. The main source of data for agricultural inputs and operations modelling prodedures is detailed in Cavalett et al., 2016.
  properties: wet mass 1 kg, heating value, net 42.8 MJ, carbon content, fossil 0.865, dry mass 1 kg
  note on carbon content, fossil: C-content of diesel is 86.5% (ecoinvent v2.2 report 6_IV, Tab 3.14)
- shed: 0.002 m2; lognormal variance with pedigree 0.0146, pedigree (3,3,3,5,3)
  Proxy, based on ecoinvent database.
- tractor, 4-wheel, agricultural: 1.64723 kg; source Otávio Cavalett 2016; lognormal variance with pedigree 0.0052, pedigree (2,3,3,5,1)
  (same comment as for diesel)
- diesel: 0.0313879, 1.31772, 0.0923006, 0.13341, 2.7535, 13.0118 kg (6 entries); source Otávio Cavalett 2016; lognormal variance with pedigree 0.0052, pedigree (2,3,3,5,1)
  (same comment as for diesel)

## Emissions to nature
All rows: source Nemecek, T. 2007
- NMVOC, non-methane volatile organic compounds, unspecified origin [air, non-urban air or from high stacks]: 0.05202 kg; lognormal variance with pedigree 0.0641, pedigree (3,2,3,5,3)
  Proxy, based on 'Agricultural Field Work Processes'from Nemecek and Kagi, 2007. Emissions of CO, NOx and NMVOC were estimated based on avarege of the agricultural process used in sugarcane production.
- Sulfur dioxide [air, non-urban air or from high stacks]: 0.0175 kg; lognormal variance with pedigree 0.0241, pedigree (3,2,3,5,3)
  Proxy, based on 'Agricultural Field Work Processes'from Nemecek and Kagi, 2007.
- Chromium [air, non-urban air or from high stacks]: 8.67e-7 kg; lognormal variance with pedigree 0.6641, pedigree (3,2,3,5,3)
  Proxy, based on 'Agricultural Field Work Processes'from Nemecek and Kagi, 2007.
- Cadmium [air, non-urban air or from high stacks]: 1.73e-7 kg; lognormal variance with pedigree 0.6641, pedigree (3,2,3,5,3)
  Proxy, based on 'Agricultural Field Work Processes'from Nemecek and Kagi, 2007.
- Zinc [air, non-urban air or from high stacks]: 1.73e-5 kg; lognormal variance with pedigree 0.6641, pedigree (3,2,3,5,3)
  Proxy, based on 'Agricultural Field Work Processes'from Nemecek and Kagi, 2007.
- Copper [air, non-urban air or from high stacks]: 2.95e-5 kg; lognormal variance with pedigree 0.6641, pedigree (3,2,3,5,3)
  Proxy, based on 'Agricultural Field Work Processes'from Nemecek and Kagi, 2007.
- Benzene [air, non-urban air or from high stacks]: 0.000127 kg; lognormal variance with pedigree 0.0641, pedigree (3,2,3,5,3)
  Proxy, based on 'Agricultural Field Work Processes'from Nemecek and Kagi, 2007.
- Zinc [soil, agricultural]: 0.0013 kg; lognormal variance with pedigree 0.048, pedigree (3,4,3,5,1)
  Proxy, based on 'Agricultural Field Work Processes'from Nemecek and Kagi, 2007.
- Dinitrogen monoxide [air, non-urban air or from high stacks]: 0.00208 kg; lognormal variance with pedigree 0.0641, pedigree (3,2,3,5,3)
  Proxy, based on 'Agricultural Field Work Processes'from Nemecek and Kagi, 2007.
- Cadmium [soil, agricultural]: 5e-5 kg; lognormal variance with pedigree 0.048, pedigree (3,4,3,5,1)
  Proxy, based on 'Agricultural Field Work Processes'from Nemecek and Kagi, 2007.
- Ammonia [air, non-urban air or from high stacks]: 0.000347 kg; lognormal variance with pedigree 0.0641, pedigree (3,2,3,5,3)
  Proxy, based on 'Agricultural Field Work Processes'from Nemecek and Kagi, 2007.
- Methane, fossil [air, non-urban air or from high stacks]: 0.00224 kg; lognormal variance with pedigree 0.0641, pedigree (3,2,3,5,3)
  Proxy, based on 'Agricultural Field Work Processes'from Nemecek and Kagi, 2007.
- Nickel [air, non-urban air or from high stacks]: 1.21e-6 kg; lognormal variance with pedigree 0.6641, pedigree (3,2,3,5,3)
  Proxy, based on 'Agricultural Field Work Processes'from Nemecek and Kagi, 2007.
- Nitrogen oxides [air, non-urban air or from high stacks]: 0.73695 kg; lognormal variance with pedigree 0.0541, pedigree (3,2,3,5,3)
  (same comment as for NMVOC, non-methane volatile organic compounds, unspecified origin)
- PAH, polycyclic aromatic hydrocarbons [air, non-urban air or from high stacks]: 5.7e-5 kg; lognormal variance with pedigree 0.3241, pedigree (3,2,3,5,3)
  Proxy, based on 'Agricultural Field Work Processes'from Nemecek and Kagi, 2007.
- Carbon dioxide, fossil [air, non-urban air or from high stacks]: 54.1 kg; lognormal variance with pedigree 0.0241, pedigree (3,2,3,5,3)
  Proxy, based on 'Agricultural Field Work Processes'from Nemecek and Kagi, 2007.
- Benzo(a)pyrene [air, non-urban air or from high stacks]: 5.2e-7 kg; lognormal variance with pedigree 0.6641, pedigree (3,2,3,5,3)
  Proxy, based on 'Agricultural Field Work Processes'from Nemecek and Kagi, 2007.
- Selenium [air, non-urban air or from high stacks]: 1.73e-7 kg; lognormal variance with pedigree 0.0641, pedigree (3,2,3,5,3)
  Proxy, based on 'Agricultural Field Work Processes'from Nemecek and Kagi, 2007.
- Particulates, < 2.5 um [air, non-urban air or from high stacks]: 0.14056 kg; lognormal variance with pedigree 0.0641, pedigree (3,2,3,5,3)
  Proxy, based on 'Agricultural Field Work Processes'from Nemecek and Kagi, 2007.
- Carbon monoxide, fossil [air, non-urban air or from high stacks]: 0.09364 kg; lognormal variance with pedigree 0.6641, pedigree (3,2,3,5,3)
  (same comment as for NMVOC, non-methane volatile organic compounds, unspecified origin)
- Lead [soil, agricultural]: 0.00021 kg; lognormal variance with pedigree 0.048, pedigree (3,4,3,5,1)
  Proxy, based on 'Agricultural Field Work Processes'from Nemecek and Kagi, 2007.

## Sampling procedure
The main source of data for agricultural inputs and operations modelling procedures is detailed in Cavalett et al., 2016. Emissions from the agricultural process are estimated according to Nemecek and Kagi, 2007.

## Extrapolations
Extrapolated from Brazilian data, uncertainty adjusted accordingly.

## Review by Jens Lansche 2018-02-23
All review comments considered
