# treatment of used printer, laser, manual dismantling

Dataset: EcoSpold 2, unit process
Geography: CH
Time period: 2005-01-01 to 2021-12-31
Technology level: current
Classification: EcoSpold01Categories: waste management/recycling
Classification: ISIC rev.4 ecoinvent: 3830:Materials recovery
Tags: Treatment; ConvertedDataset
Scenario: Business-as-Usual
System model: Allocation, cut-off by classification
Share of production covered: 100 %
Generated by: Roland Hischier
Published in: Hischier R. 2007
Database: ecoinvent
isCopyrightProtected: true
accessRestrictedTo: 1

## General comment
manual dismantling in various fractions based on common transfer coefficients for this type of treatment. Data from own experiences in Switzerland.
[This dataset was already contained in the ecoinvent database version 2. It was not individually updated during the transfer to ecoinvent version 3. Life Cycle Impact Assessment results may still have changed, as they are affected by changes in the supply chain, i.e. in other datasets. This dataset was generated following the ecoinvent quality guidelines for version 2. It may have been subject to central changes described in the ecoinvent version 3 change report (http://www.ecoinvent.org/database/ecoinvent-version-3/reports-of-changes/), and the results of the central updates were reviewed extensively. The changes added e.g. consistent water flows and other information throughout the database. The documentation of this dataset can be found in the ecoinvent reports of version 2, which are still available via the ecoinvent website. The change report linked above covers all central changes that were made during the conversion process.]

## Included activities end
This dataset represents the manual dismantling of a WEEE devices in Switzerland.

## Geography
data of situation in Switzerland

## Technology
current manual dismantling activities in Switzerland.

## Reference product
- used printer, laser: -1 kg; name RP_amount_1; By-product classification Waste; CPC 39990: Other wastes n.e.c.
  EcoSpold01Location=CH
  production volume 72130 kg; name RP_PV_1; = 7.213E+06*0.01
    Assumed: 1% of global value is taking place in Switzerland.
  property price 0 EUR2005; name RP_amount_1_price_EUR2005
    Waste products are assigned a price of zero as they are assumed to require further treatment.
  property carbon content, non-fossil 0
    Composition data from laser jet printer, divided by its weight 5.87 kg (Tab 4.12, ecoinvent v2.2 report 18_V)
  property carbon content, fossil 0.583701
    (same comment as for used printer, laser)
  property carbon content 0.583701
    carbon content on a dry matter basis (reserved; not for manual entry)
  properties: dry mass 1 kg, water in wet mass 0 kg, wet mass 1 kg, water content 0, carbon allocation 0.583701 kg

## Inputs from technosphere
- manual treatment facility, waste electric and electronic equipment: 1.6e-8 unit; lognormal variance with pedigree 0.5761, pedigree (4,5,5,3,5)
  Rough estimation of infrastructure
  EcoSpold01Location=GLO
  Uncertainty: rough estimation of infrastructure
- used printed wiring boards: -0.0252 kg; name BP_amount_4; lognormal variance with pedigree 0.054, pedigree (3,4,5,1,1)
  EcoSpold01Location=GLO
  Calculated - based on composition data
  Uncertainty: calculated - based on composition data
  production volume 1817.68 kg; = ABS( BP_amount_4/ RP_amount_1* RP_PV_1)
    Calculated from the production volume of used printer, laser in proportion to the respective output amounts.
  property price 0 EUR2005; name BP_amount_4_price_EUR2005
  properties: dry mass 1 kg, carbon content, fossil 0.193742, wet mass 1 kg, carbon content, non-fossil 0.000960142
  note on carbon content, fossil: Composition of printed wiring boards used to calculate C content
- waste plastic, consumer electronics: -0.4992 kg; name BP_amount_1; lognormal variance with pedigree 0.054, pedigree (3,4,5,1,1)
  EcoSpold01Location=CH
  Calculated - based on composition data
  Uncertainty: calculated - based on composition data
  production volume 36007.3 kg; = ABS(BP_amount_1/ RP_amount_1* RP_PV_1)
    (same comment as for used printed wiring boards)
  property price 0 EUR2005; name BP_amount_1_price_EUR2005
  properties: heating value, net 34.78 MJ, carbon content, fossil 0.830215, wet mass 1 kg, water content 0.180638, dry mass 0.847 kg
  note on heating value, net: Assumed equal to "waste plastic, consumer electronics, sorted".
  note on carbon content, fossil: C content in 1 kg DM was calculated using data in Tab A.2, ecoinvent v2.2 report 13_I
- waste polystyrene: -0.1551 kg; name BP_amount_3; lognormal variance with pedigree 0.054, pedigree (3,4,5,1,1)
  (same comment as for waste plastic, consumer electronics)
  production volume 11187.4 kg; = ABS( BP_amount_3/ RP_amount_1* RP_PV_1)
    (same comment as for used printed wiring boards)
  property price 0 EUR2005; name BP_amount_3_price_EUR2005
  properties: heating value, net 38.67 MJ, wet mass 1 kg, carbon content, fossil 0.922579, dry mass 0.998 kg, water content 0.00200401
  note on heating value, net: Value taken from the general comment of the treatment dataset.
- used cable: -0.0199 kg; name BP_amount_2; lognormal variance with pedigree 0.054, pedigree (3,4,5,1,1)
  Calculated - based on composition data
  Uncertainty: calculated - based on composition data
  production volume 1435.39 kg; = ABS(RP_PV_1 * (BP_amount_2 / RP_amount_1))
    Calculated from production volume of reference product using the relative outputs.
  property price 0 EUR2005; name BP_amount_2_price_EUR2005
  properties: carbon content, fossil 0.27472, wet mass 1 kg, dry mass 1 kg
  note on carbon content, fossil: According to the European company, 1 kg cable is split up into 0.66 kg of copper and 0.34 kg of plastics (ecoinvent v2.2 report 18_V, pg 97). Plastic C content (0.808) was calculated using data in Tab A.2, ecoinvent v2.2 report 13_I.

## Sampling procedure
own experiences

## Extrapolations
This dataset has been extrapolated from year 2005 to the year of the calculation (2021). The uncertainty has been adjusted accordingly.

## Review by Jürgen Sutter 2007-08-31
passed.
