# polysulfide production, sealing compound

Dataset: EcoSpold 2, unit process
Geography: RER
Time period: 1996-01-01 to 2021-12-31
Technology level: current
Classification: ISIC rev.4 ecoinvent: 2013:Manufacture of plastics and synthetic rubber in primary forms
Classification: EcoSpold01Categories: plastics/others
Tags: ConvertedDataset
Scenario: Business-as-Usual
System model: Allocation, cut-off by classification
Generated by: Martin Lehmann
Published in: Kellenberger D. 2007
Database: ecoinvent
isCopyrightProtected: true
accessRestrictedTo: 1

## General comment
This dataset is primarily used in the glazing production.
[This dataset was already contained in the ecoinvent database version 2. It was not individually updated during the transfer to ecoinvent version 3. Life Cycle Impact Assessment results may still have changed, as they are affected by changes in the supply chain, i.e. in other datasets. This dataset was generated following the ecoinvent quality guidelines for version 2. It may have been subject to central changes described in the ecoinvent version 3 change report (http://www.ecoinvent.org/database/ecoinvent-version-3/reports-of-changes/), and the results of the central updates were reviewed extensively. The changes added e.g. consistent water flows and other information throughout the database. The documentation of this dataset can be found in the ecoinvent reports of version 2, which are still available via the ecoinvent website. The change report linked above covers all central changes that were made during the conversion process.]

## Included activities end
The dataset describes the raw materials and processes required to produce a polysulphide sealing compound. Included is heat, electricity, and the infrastructure, but no extra transport activities apart from the ones related to the raw materials. Input materials are crushed limestone (filling material), chemicals, a hardening paste and rigid foam (polyurethane).

## Geography
Data based on a number of confidential reports.

## Technology
Polysulphide sealing compound is produced by heating a mixture of filling material, chemicals, polyurethane and a hardening paste.

## Reference product
- polysulfide, sealing compound: 1 kg; By-product classification allocatable product; CPC 347: Plastics in primary forms
  EcoSpold01Location=RER
  production volume 1.32237 kg
    This is a placeholder value that does not reflect real-world production volumes. This dataset does not currently require a real-world production volume to work in the database framework, and no actual data were collected yet. This has no negative effect on the results of the ecoinvent database. The placeholder value of this activity was scaled according to the nominal GDP of 2005 (source: United Nations, http://data.un.org/Glossary.aspx?q=GDP+%28current+US%24%29, accessed 20130726) to reflect an appropriate share of the global production volume, which is also a placeholder value.
  property carbon content, fossil 0.1564
    Calculated as the addition of C content in its components (ecoinvent v2 report_7)
  property heating value, net 4.74 MJ
    LHV is calculated based on the Carbon content of the product. More details can be found on the respective documentation.
  property price 3.2 EUR2005
    Calculated value based on data from United Nations Commodity Trade Statistics Database (comtrade.un.org). UN comtrade category: 283090 Sulphides of metals nes, polysulphides of metals. Year 2005. Using exchange rate of 1EURO = 1.209 USD. Average of price of import into 5 main markets (EU, US, JP, IN and CN).
  property carbon content 0.1564
    carbon content on a dry matter basis (reserved; not for manual entry)
  properties: water in wet mass 0 kg, wet mass 1 kg, carbon content, non-fossil 0, dry mass 1 kg, water content 0, carbon allocation 0.1564 kg

## Inputs from technosphere
- chemical factory, organics: 4e-10 unit; lognormal variance with pedigree 0.3527, pedigree (2,4,5,3,1)
  activityLink introduced to establish a direct link to the corresponding regional supply of this product
  EcoSpold01Location=RER
- chemical, inorganic: 0.37 kg; lognormal variance with pedigree 0.0507, pedigree (1,3,5,3,1)
  EcoSpold01Location=GLO
  properties: carbon content, fossil 0.003, dry mass 1 kg, wet mass 1 kg
  note on carbon content, fossil: This dataset is an unweighted average of 20 inorganic substances (listed in Tab 88.1, ecoinvent v2.2 report 8, part II), being part of the top100 chemicals included in this database. The C-content has also been calculated as an unweighted average of the C content of the substances composing this dataset.
- manganese: 0.015 kg; lognormal variance with pedigree 0.0507, pedigree (1,3,5,3,1)
  EcoSpold01Location=RER
  properties: dry mass 1 kg, wet mass 1 kg
- electricity, medium voltage: 0.164 kWh; lognormal variance with pedigree 0.0507, pedigree (1,3,5,3,1)
  EcoSpold01Location=UCTE
- heat, district or industrial, other than natural gas: 0.363 MJ; lognormal variance with pedigree 0.0507, pedigree (1,3,5,3,1)
  EcoSpold01Location=RER
  properties: heating value, net 1 MJ
- polyurethane, rigid foam: 0.145 kg; lognormal variance with pedigree 0.0507, pedigree (1,3,5,3,1)
  EcoSpold01Location=RER
  properties: heating value, net 30.67 MJ, carbon content, fossil 0.69089, dry mass 1 kg, wet mass 1 kg
  note on carbon content, fossil: Polyurethanes (PUR) is the collective name for an extensive group of polymers with very different compositions and correspondingly varied property profiles, though their molecule chain contains all a urethane group (-NH-CO-O-). All PURs are built on a common principle : they are produced by the diisocyanate polyaddition process, that links polyols and (di)isocyanates. In this dataset, an example of typical polyurethane mixture is described (Ullmann, Polyurethanes, Dieterich et al. & ecoinvent v2 report 11_II). C content was calculated as an addition of C contents in its components.
- lime, packed: 0 kg; pedigree (1,1,1,1,1)
  EcoSpold01Location=CH
  properties: water content 0.00200401, dry mass 0.998 kg, carbon content, fossil 0.117492, wet mass 1 kg
  note on carbon content, fossil: Table 3.1, ecoinvent v2.2 report 7, part VII, pg 3. MW CaCO3=100, MW MgCO3=84
- lime, packed: 0.458331, 0.0116691 kg (2 entries); lognormal variance with pedigree 0.0507, pedigree (1,3,5,3,1)
  EcoSpold01Location=CH

## Sampling procedure
Company documentation

## Extrapolations
This dataset has been extrapolated from year 2003 to the year of the calculation (2021). The uncertainty has been adjusted accordingly.

## Review by Rolf Frischknecht 2007-11-07
passed
