# mandarin production

Dataset: EcoSpold 2, unit process
Geography: ZA
Time period: 2008-01-01 to 2021-12-31
Technology level: current
Classification: ISIC rev.4 ecoinvent: 0123:Growing of citrus fruits
Synonyms: Clementine, Tangerine, Satsumas, Soft citrus
Scenario: Business-as-Usual
System model: Allocation, cut-off by classification
Share of production covered: 42 %
Generated by: Russo
Published in: Russo, V. 2017
Database: ecoinvent
isCopyrightProtected: true
accessRestrictedTo: 1

## General comment
This datasets represents the growing of mandarin inSouth Africa, high density planting (1600 tree/ha). This configuration would have a potential yield of 75 ton/ha, an average yield of 45 ton/ha, a conservative yield of 35 ton/ha. The dataset represent the production over a year of 1 kg of mandarin. For the year of reference a yield of 53,48 ton/ha has been produced. The data came from Commercial Enterprise Budget (Combuds) for mandarin cultivation from the Western Cape Department of Agriculture. Mandarin growing areas in South Africa are: Western Cape (42%), Eastern Cape (31%) and Limpopo (20%), with some minor production in Mpumalanga (4%). The dataset represent the WC province, althought the citrus farming practices are quite standardised throughout the country.
The transport in the dataset refers to the transport in the farm stage.

## Included activities start
This activity starts with the nursery producing tree seedlings, i.e. grafted young trees to be planted.

## Included activities end
This activity ends with the waste treatment after the clearing of the orchard. The dataset includes all activities of a year in a year in the productive phase of the orchard including the establishment phase per year of lifetime (25 years, 1600 trees/ha planted), the clearing of the orchard including waste treatment.
The establishment phase of the orchard includes tree nursery, soil cultivation, planting trees, sowing grass, and irrigation. Fertiliser and pesticide use in a year of the establishment phase is assumed to be half of the amount of a year in the productive phase.
The productive phase of the orchard includes machine operations, corresponding infrastructure, fuel use and sheds. Machine operations in the productive phase are: soil cultivation (hoeing), fertiliser and pesticide application, harvesting and irrigation. Further, direct field emissions and land use change are included. At the end of the productive phase the orchard is cleared by rooting up the trees and this is represented by the exchange waste wood, untreated.
Heavy metal uptake by the crop is considered.
The inputs of seedlings, fertilisers (mineral) and pesticides as well as packaging of fertilisers and pesticides are considered.

## Parameters
- LUC_crop_specific: 1 dimensionless
  This parameter allows to switch between a 'crop specific' and a 'country specific' approach when calculating the LUC of a crop. By default, the chosen approach is 'crop specific', so the value of the parameter is 1. If you want to apply a 'country specific' approach, turn the parameter to 0.
- fraction, irrigation water to surface water: 0.2 dimensionless; name fraction_IW_to_surface_water
- fraction, irrigation water, to ground water: 0.8 dimensionless; name fraction_IW_to_ground_water
- fraction, irrigation water, to air: 0.72 dimensionless; name fraction_IW_to_air
  Country specific. Literature value (Siebert, 2010) (Vionnet, S. Quantis Water Database - Technical report, 2012).

## Reference product
- mandarin: 1 kg; CPC 01324: Tangerines, mandarins, clementines; By-product classification allocatable product; pedigree (1,1,1,1,1)
  Mandarin production, South Africa. The 1337 ton represents the total production of 1ha over 25 years using the yield data (53,48 ton) of the year of reference (2008). According to the ComBuds (Companies Budget reports) the yield may vary widely from a max of 75 ton/year to min of 35 ton/year. The expected value is around 45 ton/year, whilst the average is around 55 ton/year. The yield of the referce year is closer to the avearage than the expected value.
  production volume 1.337e6 kg
    The 1337 ton represents the total production of 1ha over 25 years using the yield data (53,48 ton) of the year of reference (2008). According to the ComBuds (Companies Budget reports) the yield may vary widely from a max of 75 ton/year to min of 35 ton/year. The expected value is around 45 ton/year, whilst the average is around 55 ton/year. The yield of the referce year is closer to the avearage than the expected value.
  property price 0.4 EUR2005
    Personal communication with the Technical Head of Citrus at Core Fruit, South Africa on 26.04.2018
  property carbon content, non-fossil 0.384123
    calculation: C-content of components according to ecoinvent report No. 15a. Source of composition: Souci, S.W., Fachmann, W., Kraut, H. (Hg.: Bundesminsiterium fur Ernahrung, Landwirtschaft und Forsten, Bonn) 'Die Zusammensetzung der Lebensmittel - Nahrwerttabellen', medpharm Scientific Publishers Stuttgart, CRC Press; 2000.
  property carbon content 0.384123
    carbon content on a dry matter basis (reserved; not for manual entry)
  properties: dry mass 0.52974 kg, water content 0.887719, carbon content, fossil 0, water in wet mass 0.47026 kg, wet mass 1 kg, carbon allocation 0.203485 kg

## Inputs from technosphere
- magnesium: 3.10458e-5 kg; lognormal variance with pedigree 0.0412, pedigree (2,3,5,1,1)
  The Mg and NO3 inputs from the fertilizer MgNO3 were modelled using synthetically produced Mg and KNO3 as proxies. Total amount 1.71 kg/ha.
  properties: dry mass 1 kg, wet mass 1 kg
- fruit tree seedling, for planting: 0.0012 unit; lognormal variance with pedigree 0.158177, pedigree (2,1,5,5,1)
  Proxy: Similar crop and country used. This is the number of trees per ha divided by the lifetime years of the orchard.
  properties: dry mass 0.578035 kg, carbon content, non-fossil 0.439481, water content 0.73, wet mass 1 kg
  note on carbon content, non-fossil: calculation: C-content of components according to ecoinvent report No. 15a. Source of composition: https://ndb.nal.usda.gov/ndb/search/. Unspecific seedling used as proxy.
- waste wood, untreated: -0.128 kg; lognormal variance with pedigree 0.156777, pedigree (2,3,5,1,1)
  Wood from trees after 1-2 years of sorrage at the field (20% water) per lifetime year (25 years) of the orchard. Calculated value per kg of produced mandarin: considering the volume of pruning residues of HD mandarin orchard ranges between 10-15 m3 or 5.6 - 8.4 ton/ha, a wood density of about 0.56 (g/cm3 or ton/m3) and a production yield of 53,48 ton/ha.
  production volume 171000 kg
    Calculated from reference product production volume, reference product amount and byproduct amount.
  properties: carbon content, non-fossil 0.48632, wet mass 1 kg, water content 0.190476, dry mass 0.84 kg, heating value, net 13.99 MJ
  note on heating value, net: Value taken from the general comment of the treatment dataset.
- [thio]carbamate-compound: 1.00478e-5 kg; lognormal variance with pedigree 0.0412, pedigree (2,3,5,1,1)
  Synthetically produced [thio]carbamate-compound was modelled assuming it is directly equivalent, on a mass basis, 2 wt% of Snailnailkombat and to 3 wt% Snailban pesticides
  properties: dry mass 1 kg, carbon content, fossil 0.626349, wet mass 1 kg
- application of plant protection product, by field sprayer: 1.64547e-5 ha; lognormal variance with pedigree 0.158664, pedigree (2,2,5,5,1)
  the activity represents the pesticied and herbicides application
- metaldehyde: 7.39579e-6 kg; lognormal variance with pedigree 0.0412, pedigree (2,3,5,1,1)
  Synthetically produced metalhyde was modelled assuming it is directly equivalent, on a mass basis, to 3 wt% of Snailnailkomba and to 2 wt% of Snailban pesticides. Total amount 0.40736 kg/ha.
  properties: carbon content, fossil 0.545455, dry mass 1 kg, wet mass 1 kg
- organophosphorus-compound, unspecified: 6.22658e-5 kg; lognormal variance with pedigree 0.0412, pedigree (2,3,5,1,1)
  Synthetically produced organophosphorus compound was modelled by assuming that is direclty equivalent, on a mass basiss, to 40 wt% of Azodrin and to 95 wt& of Dipterex pesticides
  properties: carbon content, fossil 0.260898, dry mass 1 kg, wet mass 1 kg
- inorganic nitrogen fertiliser, as N: 0.00597821 kg; lognormal variance with pedigree 0.158177, pedigree (2,1,5,5,1)
  The N input from the fertilizer was modelled by assuming that 28 wt% of ‘LAN 28 %’ is directly equivalent, on a mass basis, to synthetically produced mineral N. Total amount 329,28 kg/ha
  properties: dry mass 1 kg, wet mass 1 kg
- urea: 3.96035e-5 kg; lognormal variance with pedigree 0.158177, pedigree (2,1,5,5,1)
  The exchange has been updated from 'urea, as N' into 'urea' and therefore its amount has been scaled (multiplied) from 0 kg by 2.1438 kg of 'urea' per kg of 'urea, as N'. Original comment of the exchange is: The N input from the fertilizer was modelled by assuming that 46 wt% of ‘Spray Urea’ is directly equivalent, on a mass basis, to synthetically produced mineral N. Total amount 1.10752 kg/ha
  properties: wet mass 1 kg, dry mass 1 kg, carbon content, fossil 0.2
- atrazine: 1.99709e-6 kg; lognormal variance with pedigree 0.0412, pedigree (2,3,5,1,1)
  Synthetically produced atrazine compound was modelled assuming it was directly equivalent, on a mass basis, to 97 wt% of Atrasien herbicides. Total amount 0.1067 kg/ha.
  properties: wet mass 1 kg, dry mass 1 kg, carbon content, fossil 0.446512
- diesel, burned in agricultural machinery: 0.0993 MJ; lognormal variance with pedigree 0.0412, pedigree (2,3,5,1,1)
  Diesel use represents the summation of all the diesel use associated with onsite processes within the farm stage. The following assumptions were used in the conversion of the inputs to MJ of diesel
  - Estimated diesel input per hectare (assuming average cost per L = R6.11) this excludes cross-ploughing & delivery of irrigation & drainage material.
  - Assumed 43.1 MJ/ kg of diesel according to (Wikipedia, 2014)
  - Fuel emissions were not disaggregated into activities (hoeing, fence and trellis building, fertilizing and ploughing).
- captan: 1.84895e-7 kg; lognormal variance with pedigree 0.0412, pedigree (2,3,5,1,1)
  Synthetically produced captan was modelled assuming it was directly equivalent, on a mass basis, to 0.05 wt% of Snailban pesticide. Total amount 0.010184 kg/ha.
  properties: dry mass 1 kg, wet mass 1 kg, carbon content, fossil 0.358804
- packaging, for fertilisers: 0.0312895 kg; lognormal variance with pedigree 0.0912, pedigree (4,3,5,5,4)
  Total amount of active substance/s of fertilisers needed for the production of 'mandarin' is calculated to be circa 1.56E-02 kg. Fertiliser/s used in this dataset is/are: 'lime', 'nitrogen fertiliser, as N', 'phosphate fertiliser, as P2O5', 'potassium chloride, as K2O', 'potassium nitrate', 'sodium borates', 'urea, as N'. The total amount of active substance/s is doubled in order to account for the packaging of the dilluted product of fertiliser/s that is/are applied. Therefore, 3.13E-02 kg of packaging for fertilisers is justified with this exchange.
  properties: dry mass 1 kg, heating value, net 25.01 MJ, wet mass 1 kg, carbon content, fossil 0.825301, price 0.0642 EUR2005
  note on carbon content, fossil: Considering a chemical formula (C2H4)n for polyethylene, carbon content-fossil is calculated to be 0.856286 kg of Carbon per kg of dry mass.
- zinc oxide: 3.75454e-6 kg; lognormal variance with pedigree 0.0412, pedigree (2,3,5,1,1)
  Synthetically produced ZnO2 fertilizer was modelled as being directly equivalent, on a mass basis, to Sinkoksied fertilizer. Total amount 0.2068 kg/ha
  properties: dry mass 1 kg, wet mass 1 kg
- glyphosate: 1.95418e-5 kg; lognormal variance with pedigree 0.0478498, pedigree (2,2,5,5,1)
  Proxy: Source for total amount of pesticides: extrapolated with MEXALCA from similar crop. Active ingredient is calculated based on Ecoinvent dataset Apricot FR. For calculations see supporting documentation 'WFLDB-Documentation.pdf' (https://ecoquery.ecoinvent.org/File/Reports). Total amoun 1.0746 kh/ha.
  properties: dry mass 1 kg, carbon content, fossil 0.214286, wet mass 1 kg
- establishing orchard: 0.0012 unit; lognormal variance with pedigree 0.158177, pedigree (2,1,5,5,1)
  (same comment as for fruit tree seedling, for planting)
- packaging, for pesticides: 0.00331625 kg; lognormal variance with pedigree 0.0912, pedigree (4,3,5,5,4)
  Total amount of active substance/s of pesticides needed for the production of mandarin is calculated to be circa 1.66E-03 kg. Pesticide/s used in this dataset is/are: '[thio]carbamate-compound', 'atrazine', 'captan', 'copper oxide', 'glyphosate', 'magnesium', 'magnesium sulfate', 'metaldehyde', 'organophosphorus-compound, unspecified', 'pesticide, unspecified', 'triazine-compound, unspecified', 'zinc oxide'. The total amount of active substance/s is doubled in order to account for the packaging of the dilluted product of pesticide/s that is/are applied. Therefore, 3.32E-03 kg of packaging for pesticides is justified with this exchange.
  properties: wet mass 1 kg, heating value, net 25.97 MJ, price 0.0642 EUR2005, dry mass 1 kg, carbon content, fossil 0.85714
- fertilising, by broadcaster: 1.64547e-5 ha; lognormal variance with pedigree 0.158177, pedigree (2,1,5,5,1)
  Proxy: Extrapolated using a modified MEXALCA-approach (Roches et al. 2010; Nemecek et al. 2012). See supporting documentation 'WFLDB-Documentation.pdf' chapter 'Machinery processes' for L1 data (https://ecoquery.ecoinvent.org/File/Reports). Corresponds to 2.24 applications per year.
- inorganic phosphorus fertiliser, as P2O5: 0.000945534 kg; lognormal variance with pedigree 0.158177, pedigree (2,1,5,5,1)
  The P205 input was modelled by assuming that 21 wt% of SSP (Supers 10.5 %) fertilizer is directly equivalent, on a mass basis, to synthetically produced mineral P205. Total amount 52,08 kg/ha
  properties: wet mass 1 kg, dry mass 1 kg
- irrigation: 0.391 m3; name water_irrigation_input; lognormal variance with pedigree 0.158177, pedigree (2,1,5,5,1)
  This represent the input water that needs to be withdrawn for irrigation (blue water) Iw= ETirr/(Ea*Ec) considering that the Etirr = 352,92m3 per ton, Ea=0,9(-) and Ec=1 (-); the water stemming from precipitation is estimated in 82.6m3 per ton (green water); the latter has been calculated based on green water footprint for mandarin in Clanwilliam (WC).
  properties: water content 9089.91, wet mass 1000 kg, dry mass 0.11 kg
- lime: 0.00363108 kg
  Lime is added to soil in the first year in a quantity of 5000 kg/ha
  properties: wet mass 1 kg, dry mass 1 kg, carbon content, fossil 0.120005
- land use change, perennial crop: 1.138e-5 ha; = (0.6086/53480)*LUC_crop_specific+0.0000*(1-LUC_crop_specific)
  Calculated value. Land use change (LUC) combines land transformation areas calculated with the adapted 'Direct Land Use Change Assessment Tool' version 2014 developed by Blonk Consultants and the carbon losses from soil organic carbon (SOC) and vegetation (VEG) as calculated in ecoinvent v3. See 'WFLDB-Guidelines.pdf', available at https://ecoquery.ecoinvent.org/File/Reports.
- planting tree: 0.0012 unit; lognormal variance with pedigree 0.158177, pedigree (2,1,5,5,1)
  (same comment as for fruit tree seedling, for planting)
- triazine-compound, unspecified: 4.59859e-5 kg; lognormal variance with pedigree 0.0412, pedigree (2,3,5,1,1)
  Triazine compound are given by: 3% Atrasien (1,10 g/cm3 density) plus Simazine 500 C (1L of Simazine 500 c is equivalent to 500 g os synthetically produced triazine compound with a density of 1,15 kg/L). Total amount 2,53 kg/ha.
  properties: dry mass 1 kg, wet mass 1 kg, carbon content, fossil 0.475616
- trellis system, wooden poles, soft wood, tar impregnated: 3.76e-5 ha; lognormal variance with pedigree 0.0412, pedigree (2,3,5,1,1)
  Trellies and poles for the orchrds. Calculated based on a tree density of 1600 tre/ha
- magnesium sulfate: 0.00145243 kg; lognormal variance with pedigree 0.0412, pedigree (2,3,5,1,1)
  Synthetically produced MgSO4 was modelled as being directly equivalent, on a mass basis, to The Magnes sulphur fertilizer. Total amount 80 kg/ha.
  properties: wet mass 1 kg, dry mass 1 kg
- copper oxide: 2.55628e-6 kg; lognormal variance with pedigree 0.0412, pedigree (2,3,5,1,1)
  Synthetically produced CuO fertilizer was modelled as being directly equivalent, on a mass basis, to CuOCl fertilizer. Total amount 0.2068 kg/ha.
  properties: wet mass 1 kg, dry mass 1 kg
- sodium borates: 6.58606e-7 kg; lognormal variance with pedigree 0.0412, pedigree (2,3,5,1,1)
  Used to represent Solbur application (it's an herbicide); Solbur comprises of sodium borates, of which 20.5% is boron (active ingredient); it is equivalen to 40% active ingredient in Solbur on a mass basis. Total amount 0,0528 kg/ha.
  properties: wet mass 1 kg, dry mass 1 kg
- pesticide, unspecified: 2.09152e-5 kg; lognormal variance with pedigree 0.0412, pedigree (2,3,5,1,1)
  Syntheticall produced generic pesticide was modelled assuming the following:
  it is directly equivalent, on a mass basis, to 41 wt% of Roundup herbicide by assuming a density of 1,172 kg/L;
  it is directly equivalent, on a mass basis, to 20,5 wt% of Solubur herbicide by assuming a density of 0.4 kg/L
  it is directly equivalent, on a mass basis, to 30 wt% of Chlorodosal herbicide by by assuming a density of 1.6 kg/L
  properties: dry mass 1 kg, carbon content, fossil 0.486978, wet mass 1 kg
- potassium chloride: 0.00793172 kg; lognormal variance with pedigree 0.158177, pedigree (2,1,5,5,1)
  The exchange has been updated from 'potassium chloride, as K2O' into 'potassium chloride' and therefore its amount has been scaled (multiplied) from 0.005 kg by 1.5829 kg of 'potassium chloride' per kg of 'potassium chloride, as K2O'. Original comment of the exchange is: The K2O input was modelled by assuming that 60 wt% of the KCI fertilizer is directly equivalent, on a mass basis, to synthetically produced mineral K2O. Data from ComBuds for 2008 reports the following quantities of Potassium Cloride, as K2O applied: year 1 60 kg/ha; year 2 and 3 120 kg/ha per year; years 4 kg 300 kg/ha: years 5-6 300 kg/ha per year; and year 7-25 300 kg/ha per year. Total amount 276 kg/ha.
  properties: wet mass 1 kg, dry mass 1 kg
- potassium nitrate: 5.99129e-5 kg; lognormal variance with pedigree 0.0412, pedigree (2,3,5,1,1)
  The NO3 input was modelled by assuming that 11 wt% of ‘Magnesium Nitrate (clear liquid) 5.7 fertilizer is directly equivalent, on a mass basis, to synthetically produced mineral KNO3. Total amount 3,3 kg/ha.
  properties: wet mass 1 kg, dry mass 1 kg

## Inputs from nature
- Carbon dioxide, in air [natural resource, in air]: 0.222433 kg; lognormal variance with pedigree 0.0478498, pedigree (2,2,5,5,1)
  CO2 uptake by biomass.
- Occupation, permanent crop, irrigated [natural resource, land]: 0.00747943 m2*year; = land_used*25; lognormal variance with pedigree 0.0540616, pedigree (2,1,5,5,1)
  Related to the duration from harvest date of previous crop to harvest date of main crop.
- Transformation, to permanent crop, irrigated [natural resource, land]: 0.000299177 m2; name land_used; = (10000/25)/1337000; lognormal variance with pedigree 0.0782144, pedigree (2,1,5,5,1)
  10000 m2 divided by the life time of the perennial crop (25 years) and the total yield over lifetime 1337 tonne.
- Energy, gross calorific value, in biomass [natural resource, biotic]: 2.54984 MJ; lognormal variance with pedigree 0.0478498, pedigree (2,2,5,5,1)
  Gross energy content is related to MJ/kg dry matter of product. Source: ecoinvent data
- Transformation, from permanent crop, irrigated [natural resource, land]: 0.000299177 m2; = (10000/25)/1337000; lognormal variance with pedigree 0.0782144, pedigree (2,1,5,5,1)
  10000 m2 divided by the life time of the perennial crop (25 years).

## Emissions to nature
- Boron [soil, agricultural]: 1.96514e-7 kg; lognormal variance with pedigree 0.0412, pedigree (2,3,5,1,1)
  Boron emission to soil represents emission from Sodium Borate (20,5 % of active ingredient in Solbur: 0,4 kg/L density)
- Water [water, surface water]: 0.021896 m3; name water_to_water_surface; = water_irrigation_input*(1-fraction_IW_to_air)*fraction_IW_to_surface_water; lognormal variance with pedigree 0.156777, pedigree (2,3,5,1,1)
  Calculated value - Emission calculated from water balance. See 'WFLDB-Guidelines.pdf', available at https://ecoquery.ecoinvent.org/File/Reports.
- Monocrotophos [soil, agricultural]: 2.65795e-5 kg; lognormal variance with pedigree 0.0412, pedigree (2,3,5,1,1)
  Monocrotophos emission to represent the the application of organophosphorus compound (Azodrin 40); 40% of active ingredient on a mass basis
- Metaldehyde [soil, agricultural]: 7.39579e-6 kg; lognormal variance with pedigree 0.0412, pedigree (2,3,5,1,1)
  Metaldehyde emission to represent [thio]carbamante compound application: 2% of active ingredient of Snailkombat on a mass basis
- Nitrate [water, ground-]: 0.000340624 kg; lognormal variance with pedigree 0.208366, pedigree (2,3,5,1,1)
  Nitrate emission to water (surface)
- Phosphorus [water, surface water]: 0.000173728 kg; lognormal variance with pedigree 0.208366, pedigree (2,3,5,1,1)
  Calculated value - Prasuhn (2006) and SQCB-Erosion. See 'WFLDB-Guidelines.pdf', available at https://ecoquery.ecoinvent.org/File/Reports.
- Captan [soil, agricultural]: 1.84895e-7 kg; lognormal variance with pedigree 0.0772216, pedigree (2,3,5,1,1)
  Calculated value - 100% emission in soil. See 'WFLDB-Guidelines.pdf', available at https://ecoquery.ecoinvent.org/File/Reports.
- Atrazine [soil, agricultural]: 1.99709e-6 kg; lognormal variance with pedigree 0.0412, pedigree (2,3,5,1,1)
  Atrazine emission to soil represents emission from Atrasien
- Copper [soil, agricultural]: 1.34599e-6 kg; lognormal variance with pedigree 0.0412, pedigree (2,3,5,1,1)
  Comment on mathematicalRelation:
  2.73447934702e-06 from Calculated value - Freiermuth (2006). See 'WFLDB-Guidelines.pdf', available at https://ecoquery.ecoinvent.org/File/Reports.
  -1.04706003463e-06 from Crop, default, heavy metals uptake model
  Heavy metal uptake can be excluded by setting the parameter heavyMetalUptakeSwitch to zero.
- Nitrogen oxides [air, non-urban air or from high stacks]: 4.15223e-5 kg; lognormal variance with pedigree 0.157164, pedigree (2,3,5,1,1)
  Calculated value - EEA/EMEP (2013). See 'WFLDB-Guidelines.pdf', available at https://ecoquery.ecoinvent.org/File/Reports. and from Dinitrogen monoxide / nitrous oxide emissions to air calculated according to Nemecek and Schnetzer (2011).
- Ammonia [air, non-urban air or from high stacks]: 0.00104586 kg; lognormal variance with pedigree 0.0772216, pedigree (2,3,5,1,1)
  The ammonia emissions resulting from the application of LAN 28 % Spray Urea were estimated using emission factors detailed in EMEP/EEA guidelines (2013);
  LAN 28 %: The ammonia emission factor for calcium ammonium nitrate, as specified by EMEP/EEA (2013) is 0.18 kg N/ kg CAN applied.
  Spray Urea: The ammonia emission factor for urea, as specified by EMEP/EEA (2013) is 0.20 kg N/ kg Urea applied.
  Soil pH between 6 and 6.5.
- Dinitrogen monoxide [air, non-urban air or from high stacks]: 0.000192813 kg; lognormal variance with pedigree 0.157164, pedigree (2,3,5,1,1)
  Dinitrogen monoxide / nitrous oxide emissions to the air arising from fertilisers use were calculated according to Nemecek and Schnetzer (2011).
- Water [water, ground-]: 0.087584 m3; name water_to_water_ground; = water_irrigation_input*(1-fraction_IW_to_air)*fraction_IW_to_ground_water; lognormal variance with pedigree 0.156777, pedigree (2,3,5,1,1)
  (same comment as for Water)
- Carbon dioxide, fossil [air, non-urban air or from high stacks]: 0.00116116 kg; lognormal variance with pedigree 0.0412, pedigree (2,3,5,1,1)
  Two inputs were considered to determin the carbon dioxide emissions associated with the farm stage of the Western Cape Mandarin: ‘Calcite-Bredrp’ and ‘Spray Urea’. The methodology used to ascertain the value of carbon dioxide released to the air from the application of two aforementioned inputs was in accord with worst case scenario approach put forward by the IPCC (2006): Calcite-Bredrp: The carbon dioxide emission factor for limestone, as specified by IPCC (2006), was applied to this input. The value of said emission factor is 0.44 kg CO2/ kg limestone. Spray Urea: The carbon dioxide emission factor for urea, as specified by IPCC (2006), was applied to this input. The value of said emission factor is 0.73 kg CO2/ kg N.
- Glyphosate [soil, agricultural]: 1.95418e-5 kg; lognormal variance with pedigree 0.0772216, pedigree (2,3,5,1,1)
  (same comment as for Captan)
- Simazine [soil, agricultural]: 4.59332e-5 kg; lognormal variance with pedigree 0.0412, pedigree (2,3,5,1,1)
  Simazine emission to represent the application of triazine compound (Simazine 500 C); 1 L di simazine 500 C is equivalent on a mass basis to 500 g of synthetically produced triazine compound with a density of 1,15 kg/L
- Phosphate [water, ground-]: 1.12191e-6 kg; lognormal variance with pedigree 0.208366, pedigree (2,3,5,1,1)
  Calculated value - Prasuhn (2006). See 'WFLDB-Guidelines.pdf', available at https://ecoquery.ecoinvent.org/File/Reports. This emission might be overestimated in case of basic soils.
- Water [air, unspecified]: 0.28152 m3; name water_to_air_unspecified; = water_irrigation_input*fraction_IW_to_air; lognormal variance with pedigree 0.158177, pedigree (2,1,5,5,1)
  (same comment as for Water)
- Trichlorfon [soil, agricultural]: 9.10675e-6 kg; lognormal variance with pedigree 0.0412, pedigree (2,3,5,1,1)
  Trichlorfon emission to represent the application of Dipeterex: 85% of organophosphorus compound on a mass basis
- Pesticides, unspecified [soil, agricultural]: 2.0915e-5 kg; lognormal variance with pedigree 0.0412, pedigree (2,3,5,1,1)
  Pesticied unspecified emission to represent Chlorodosal application
- Carbaryl [soil, agricultural]: 1.0937e-5 kg; lognormal variance with pedigree 0.0412, pedigree (2,3,5,1,1)
  Cabaryl emission to represent [thio]carbamante compound application: 3% of active ingredient of Snailban on a mass basis
- Phosphate [water, surface water]: 3.16997e-6 kg; lognormal variance with pedigree 0.208366, pedigree (2,3,5,1,1)
  Calculated value - Prasuhn (2006). See 'WFLDB-Guidelines.pdf', available at https://ecoquery.ecoinvent.org/File/Reports.

## Sampling procedure
The data came from Commercial Enterprise Budget (Combuds) for mandarin cultivation from the Western Cape Department of Agriculture. Mandarin growing areas in South Africa are: Western Cape (42%), Eastern Cape (31%) and Limpopo (20%), with some minor production in Mpumalanga (4%) - CGA 2016. The dataset represent the WC province, althought the citrus farming practices are quite standardised throughout the country.

## Extrapolations
This dataset has been extrapolated from year 2008 to the year of the calculation (2021). The uncertainty has been adjusted accordingly.
