# ventilation of dwellings, central, 1 x 720 m3/h, polyethylene ducts, with earth tube heat exchanger

Dataset: EcoSpold 2, unit process
Geography: CH
Time period: 2003-01-01 to 2021-12-31
Technology level: current
Classification: EcoSpold01Categories: ventilation/ventilation systems
Classification: ISIC rev.4 ecoinvent: 4322:Plumbing, heat and air-conditioning installation
Tags: ConvertedDataset
Scenario: Business-as-Usual
System model: Allocation, cut-off by classification
Generated by: Alex Primas
Published in: Hässig, W. 2007
Database: ecoinvent
isCopyrightProtected: true
accessRestrictedTo: 1

## General comment
Life time of system and ducts 50 years. Life time of ventilation unit 20 years. Life time of filters 1 year. Ventilation system for a multi family house. The house considered in the investigation includes 6 flats with 130 m2 floor area each and a ventilation rate of 120 m3/h. The influence of a smaller concrete demand due to embedment of ventilation tubes in the concrete of the floor (-4.86 kg concrete per m2 floor area) is not included.
[This dataset was already contained in the ecoinvent database version 2. It was not individually updated during the transfer to ecoinvent version 3. Life Cycle Impact Assessment results may still have changed, as they are affected by changes in the supply chain, i.e. in other datasets. This dataset was generated following the ecoinvent quality guidelines for version 2. It may have been subject to central changes described in the ecoinvent version 3 change report (http://www.ecoinvent.org/database/ecoinvent-version-3/reports-of-changes/), and the results of the central updates were reviewed extensively. The changes added e.g. consistent water flows and other information throughout the database. The documentation of this dataset can be found in the ecoinvent reports of version 2, which are still available via the ecoinvent website. The change report linked above covers all central changes that were made during the conversion process.]

## Included activities end
Materials used for the construction and renewal of the ventilation system. Electricity for the operation of the system on 12 month per year included. Transport of the components to the construction site. Disposal of the components included. Influence of ventilation ducts on building construction not included.

## Geography
Data representative for a building in Zurich, Switzerland

## Technology
Electricity demand of ventilator (0.4 Wh/m3) representative for DC- or EC-motors and a system design with low pressure drops. Electricity demand of control unit 10 W. Central ventilation system including 4 parallel polyethylene ground heat exchanger tubes (200 mm diameter). Air distribution from the central ventilation unit with a galvanised steel tube (400 mm diameter) to the distribution housings in the 6 flats. Distribution of fresh- and exhaust-air within the flat with polyethylene tubes (75 mm diameter). Exhaust air from the air collection housings in the 6 flats with a galvanised steel tube (400 mm diameter) to the central ventilation unit. Exhaust air from the ventilation unit to the outside air with a galvanised steel tube (400 mm diameter).

## Time period
Amount of material investigated in 2003

## Reference product
- ventilation of dwellings, central, 1 x 720 m3/h: 1 m2*year; CPC 44815: Fans and ventilating or recycling hoods of the domestic type; By-product classification allocatable product
  EcoSpold01Location=CH
  production volume 0.0336675 m2*year
    This is a placeholder value that does not reflect real-world production volumes. This dataset does not currently require a real-world production volume to work in the database framework, and no actual data were collected yet. This has no negative effect on the results of the ecoinvent database. The placeholder value of this activity was scaled according to the nominal GDP of 2005 (source: United Nations, http://data.un.org/Glossary.aspx?q=GDP+%28current+US%24%29, accessed 20130726) to reflect an appropriate share of the global production volume, which is also a placeholder value.
  property price 0.527181 EUR2005
    Calculated based on inputs: The price of the product has been calculated as a sum of the values of the material and energy inputs for this product. This value is therefore a rough estimation. It may underestimate the real price since there are additional expenses when producing any product. These expences can include for example labour costs, treatment of waste materials and profit for the producer. Please consider carefully whether this level of data quality is acceptable for your application.

## Inputs from technosphere
- used blower and heat exchange unit central, 600-1200 m3/h: -5.13e-5 unit; lognormal variance with pedigree 0.044, pedigree (3,4,5,1,1)
  EcoSpold01Location=CH
  Questionnaire, Data related to building considered
  Uncertainty: Questionnaire, Data related to building considered
  production volume 5.13e-5 unit
    Calculated from the production volume of ventilation of dwellings, central, 1 x 720 m3/h in proportion to the respective output amounts.
  properties: carbon content, fossil 0.00852676, wet mass 143 kg, dry mass 143 kg, carbon content, non-fossil 5.13903e-7
- flexible duct, aluminium/PET, DN of 125: 0.000513 m; lognormal variance with pedigree 0.044, pedigree (3,4,5,1,1)
  Questionnaire, Data related to building considered
  EcoSpold01Location=RER
  Uncertainty: Questionnaire, Data related to building considered
  properties: carbon content, fossil 0.436512, wet mass 0.205 kg, dry mass 0.205 kg
  note on carbon content, fossil: C content was calculated as an addition of C content in the product components (Flexible tube made of PET, laminated with aluminium foil and strengthened with galvanised steel spiral wire)
- blower and heat exchange unit, central, 600-1200 m3/h: 5.13e-5 unit; lognormal variance with pedigree 0.044, pedigree (3,4,5,1,1)
  (same comment as for flexible duct, aluminium/PET, DN of 125)
  properties: carbon content, fossil 0.00852676, carbon content, non-fossil 5.13903e-7, dry mass 143 kg, wet mass 143 kg
  note on carbon content, fossil: C content was calculated as an addition of C content in the product components
- used air filter in exhaust air valve: -0.0226 unit; lognormal variance with pedigree 0.044, pedigree (3,4,5,1,1)
  (same comment as for used blower and heat exchange unit central, 600-1200 m3/h)
  production volume 0.0226 unit
    (same comment as for used blower and heat exchange unit central, 600-1200 m3/h)
  properties: wet mass 0.04 kg, carbon content, fossil 0.65625, dry mass 0.04 kg
- used air filter central unit, 600 m3/h: -0.00251 unit; lognormal variance with pedigree 0.044, pedigree (3,4,5,1,1)
  (same comment as for used blower and heat exchange unit central, 600-1200 m3/h)
  production volume 0.00251 unit
    (same comment as for used blower and heat exchange unit central, 600-1200 m3/h)
  properties: wet mass 0.4 kg, carbon content, fossil 0.085325, dry mass 0.4 kg
- used silencer steel, DN 315: -0.000103 unit; lognormal variance with pedigree 0.044, pedigree (3,4,5,1,1)
  (same comment as for used blower and heat exchange unit central, 600-1200 m3/h)
  production volume 0.000103 unit
    (same comment as for used blower and heat exchange unit central, 600-1200 m3/h)
  properties: dry mass 20 kg, wet mass 20 kg, carbon content, fossil 0.00451943
- electricity, low voltage: 3.35 kWh; lognormal variance with pedigree 0.0412, pedigree (2,3,5,1,1)
  Questionnaire, tecnical informations, related to system used
  EcoSpold01Location=CH
  Uncertainty: Questionnaire, tecnical informations, related to system used
- air filter, central unit, 600 m3/h: 0.00251 unit; lognormal variance with pedigree 0.044, pedigree (3,4,5,1,1)
  (same comment as for flexible duct, aluminium/PET, DN of 125)
  properties: carbon content, fossil 0.085325, dry mass 0.4 kg, wet mass 0.4 kg
  note on carbon content, fossil: C content was calculated as an addition of C content in the product components (Bag filter made of polyester fleece, frame galvanised steel). Then, it was referred to 1 kg DM
- silencer, steel, DN 125: 0.000615 unit; lognormal variance with pedigree 0.044, pedigree (3,4,5,1,1)
  (same comment as for used blower and heat exchange unit central, 600-1200 m3/h)
  properties: dry mass 8.3 kg, carbon content, fossil 0.00483456, wet mass 8.3 kg
- air filter, in exhaust air valve: 0.0226 unit; lognormal variance with pedigree 0.044, pedigree (3,4,5,1,1)
  EcoSpold01Location=RER
  Questionnaire, Data related to building considered
  Uncertainty: Questionnaire, Data related to building considered
  properties: carbon content, fossil 0.65625, dry mass 0.04 kg, wet mass 0.04 kg
  note on carbon content, fossil: C content was calculated as an addition of C content in the product components (Mat filter made of polyester fleece). Then, it was referred to 1 kg DM
- ventilation system, central, 1 x 720 m3/h, polyethylene ducts, with earth tube heat exchanger: 2.56e-5 unit; lognormal variance with pedigree 0.044, pedigree (3,4,5,1,1)
  Questionnaire, Data related to building considered
  EcoSpold01Location=CH
  Uncertainty: Questionnaire, Data related to building considered
- silencer, steel, DN 315, 50 mm: 0.000103 unit; lognormal variance with pedigree 0.044, pedigree (3,4,5,1,1)
  (same comment as for used blower and heat exchange unit central, 600-1200 m3/h)
  properties: carbon content, fossil 0.00451943, dry mass 20 kg, wet mass 20 kg
- used flexible duct aluminium/PET, DN of 125: -0.000513 m; lognormal variance with pedigree 0.044, pedigree (3,4,5,1,1)
  (same comment as for used blower and heat exchange unit central, 600-1200 m3/h)
  production volume 0.000513 m
    (same comment as for used blower and heat exchange unit central, 600-1200 m3/h)
  properties: carbon content, fossil 0.436512, wet mass 0.205 kg, dry mass 0.205 kg
- used ventilation control and wiring central unit: -5.13e-5 unit; lognormal variance with pedigree 0.044, pedigree (3,4,5,1,1)
  (same comment as for ventilation system, central, 1 x 720 m3/h, polyethylene ducts, with ea)
  production volume 5.13e-5 unit
    (same comment as for used blower and heat exchange unit central, 600-1200 m3/h)
  properties: carbon content, non-fossil 1.68025e-5, wet mass 4.8 kg, dry mass 4.8 kg, carbon content, fossil 0.262305
- used silencer steel, DN 125: -0.000615 unit; lognormal variance with pedigree 0.044, pedigree (3,4,5,1,1)
  (same comment as for ventilation system, central, 1 x 720 m3/h, polyethylene ducts, with ea)
  production volume 0.000615 unit
    (same comment as for used blower and heat exchange unit central, 600-1200 m3/h)
  properties: carbon content, fossil 0.00483456, dry mass 8.3 kg, wet mass 8.3 kg
- ventilation control and wiring, central unit: 5.13e-5 unit; lognormal variance with pedigree 0.044, pedigree (3,4,5,1,1)
  (same comment as for air filter, in exhaust air valve)
  properties: carbon content, non-fossil 1.68025e-5, dry mass 4.8 kg, carbon content, fossil 0.262305, wet mass 4.8 kg
  note on carbon content, non-fossil: C content was calculated as an addition of C content in the product components, then it was referred to 1 kg DM

## Sampling procedure
Questionnaire, technical information and assumptions. Data valid for example building used.

## Extrapolations
This dataset has been extrapolated from year 2003 to the year of the calculation (2021). The uncertainty has been adjusted accordingly.

## Review by Rolf Frischknecht 2007-08-16
passed
none
