# treatment of waste polyethylene, open burning

Dataset: EcoSpold 2, unit process
Geography: GLO
Time period: 2006-01-01 to 2021-12-31
Technology level: current
Classification: ISIC rev.4 ecoinvent: 3821:Treatment and disposal of non-hazardous waste
Synonyms: open, uncontrolled burning
Scenario: Business-as-Usual
System model: Allocation, cut-off by classification
Share of production covered: 1 %
Generated by: Avraam Symeonidis
Database: ecoinvent
isCopyrightProtected: true
accessRestrictedTo: 1

## General comment
This dataset represents the activity of waste disposal of waste polyethylene in uncontrolled, open burning. Recommended use of this dataset: For PE, which goes to disposal as part of unmanaged communal waste mixture.Waste composition (wet, in ppm): upper heating value 42.82 MJ/kg; lower heating value 42.47 MJ/kg; H2O 4000; O 38435; H 122490; C 822050; S 426.9; N 1297.2; P n.a.; B n.a.; Cl 1461.5; Br 9.5896; F 14.384; I n.a.; Ag n.a.; As 1.822; Ba 239.74; Cd 33.946; Co 1.6782; Cr 12.466; Cu 41.367; Hg 0.047948; Mn 30.047; Mo n.a.; Ni 0.95896; Pb 22.596; Sb 10.069; Se 2.0138; Sn 3.814; V 2205.6; Zn 342.01; Be 0.47948; Sc n.a.; Sr 84.868; Ti 958.96; Tl 0.38358; W n.a.; Si n.a.; Fe 1534.3; Ca 2589.2; Al 191.79; K n.a.; Mg 95.896; Na 1405.4; . Share of carbon in waste that is biogenic 0%. // Recycling rates for metallic iron = 0% for metallic aluminium = 0% for metallic copper = 0% . A mass of 0.0284kg residues are left on ground.

## Included activities start
open burning starting from waste placement on burning site (without transports to the site)

## Included activities end
Waste-specific emissions to air and soil from open burning.

## Geography
Generic open burning without any geographical distinction.

## Technology
This is an inventory for open burning of solid waste. Informal or uncontrolled burning. No flue gas treatment. Suitable for informal recycling (e.g. burning of e-waste). Based on Municipal waste incineration without any pollution control. Residues (minus any actually recycled metals) are left on site. Assumption of share of thermal NOx to total NOx in average waste burning process is 30%. Contribution from thermal NOx is 810mg per kg waste. Recycling rates for metallic iron = 0% for metallic aluminium = 0% for metallic copper = 0% .

## Time period
generic open burning without any temporal distinction

## Reference product
- waste polyethylene: -1 kg; By-product classification Waste; CPC 39270: Waste, parings and scrap of plastics; CAS 9002-88-4; pedigree (1,1,1,1,1)
  main reference product of this activity (supply of disposal service).
  Uncertainty: Uncertainty is not adjusted, as this is the refence product
  production volume 1 kg
    The amount of the annual production volume is a placeholder value. The contribution of this technology to the different local markets can be found in the markets themselves.
  property heating value, net 42.47 MJ
    Value taken from the general comment of the treatment dataset.
  property price 0 EUR2005
    Waste products are assigned a price of zero as they are assumed to require further treatment.
  property carbon content 0.82535
    carbon content on a dry matter basis (reserved; not for manual entry)
  properties: sodium content 0.001411, water in wet mass 0.004 kg, magnesium content 9.6281e-5, titanium content 0.00096281, dry mass 0.996 kg, beryllium content 4.8141e-7, wet mass 1 kg, strontium content 8.5209e-5, water content 0.0040161, thallium content 3.8512e-7, iron content 0.0015405, carbon content, fossil 0.82535, aluminium content 0.00019256, oxygen content 0.03859, arsenic content 1.8293e-6, copper content 4.1533e-5, manganese content 3.0168e-5, chlorine content 0.0014674, nickel content 9.6281e-7, vanadium content 0.0022145, chromium content 1.2517e-5, cadmium content 3.4082e-5, bromine content 9.6281e-6, cobalt content 1.6849e-6, lead content 2.2687e-5, nitrogen content 0.0013024, antimony content 1.011e-5, fluorine content 1.4442e-5, barium content 0.0002407, hydrogen content 0.12298, sulfur content 0.00042861, heating value, gross 42.823 MJ, mercury content 4.8141e-8, tin content 3.8294e-6, selenium content 2.0219e-6, calcium content 0.0025996, zinc content 0.00034338, carbon allocation 0.822049 kg

## Inputs from nature
- Oxygen [natural resource, in air]: 3.1118 kg; lognormal variance with pedigree 0.019886, pedigree (1,1,4,1,1)
  oxygen from ambient air needed to combust and oxidise this waste. Net demand, i.e. without air O2 leaving the process uncombusted.
  Uncertainty: uncertainty is calculated from uncertainties in waste composition and transfer coefficients to flue gas and soild residues

## Emissions to nature
- Strontium [soil, industrial]: 8.4783e-5 kg; lognormal variance with pedigree 0.99187, pedigree (1,1,4,1,1)
  Emissions from open burning to residues left on ground.
  Uncertainty: Uncertainty calculated depending on waste input and uncertainty of transfer coefficents in incineration model.
- Titanium [air, urban air close to ground]: 1.0168e-5 kg; lognormal variance with pedigree 0.72024, pedigree (1,1,4,1,1)
  Emissions to air from open burning.
  Uncertainty: Uncertainty calculated depending on waste input and uncertainty of transfer coefficents in incineration model.
- Tin [soil, industrial]: 3.814e-6 kg; lognormal variance with pedigree 1.4029, pedigree (1,1,4,1,1)
  (same comment as for Strontium)
- Thallium [air, urban air close to ground]: 7.6717e-10 kg; lognormal variance with pedigree 1.7863, pedigree (1,1,4,1,1)
  (same comment as for Titanium)
- Vanadium [soil, industrial]: 0.0020353 kg; lognormal variance with pedigree 0.56334, pedigree (1,1,4,1,1)
  (same comment as for Strontium)
- Strontium [air, urban air close to ground]: 8.4868e-8 kg; lognormal variance with pedigree 1.0943, pedigree (1,1,4,1,1)
  (same comment as for Titanium)
- Zinc [soil, industrial]: 0.00033946 kg; lognormal variance with pedigree 0.8067, pedigree (1,1,4,1,1)
  (same comment as for Strontium)
- Beryllium [air, urban air close to ground]: 9.0624e-10 kg; lognormal variance with pedigree 1.759, pedigree (1,1,4,1,1)
  (same comment as for Titanium)
- Selenium [soil, industrial]: 1.8393e-6 kg; lognormal variance with pedigree 1.4864, pedigree (1,1,4,1,1)
  (same comment as for Strontium)
- Vanadium [air, urban air close to ground]: 0.00017029 kg; lognormal variance with pedigree 0.58046, pedigree (1,1,4,1,1)
  (same comment as for Titanium)
- Lead [soil, industrial]: 2.2406e-5 kg; lognormal variance with pedigree 1.1679, pedigree (1,1,4,1,1)
  (same comment as for Strontium)
- Tin [air, urban air close to ground]: 7.4741e-12 kg; lognormal variance with pedigree 1.6955, pedigree (1,1,4,1,1)
  (same comment as for Titanium)
- Antimony [soil, industrial]: 1.0069e-5 kg; lognormal variance with pedigree 1.275, pedigree (1,1,4,1,1)
  (same comment as for Strontium)
- Zinc [air, urban air close to ground]: 2.5445e-6 kg; lognormal variance with pedigree 0.86292, pedigree (1,1,4,1,1)
  (same comment as for Titanium)
- Mercury [soil, industrial]: 1.8889e-8 kg; lognormal variance with pedigree 1.9323, pedigree (1,1,4,1,1)
  (same comment as for Strontium)
- Selenium [air, urban air close to ground]: 1.7453e-7 kg; lognormal variance with pedigree 1.5021, pedigree (1,1,4,1,1)
  (same comment as for Titanium)
- Manganese [soil, industrial]: 2.9792e-5 kg; lognormal variance with pedigree 1.13, pedigree (1,1,4,1,1)
  (same comment as for Strontium)
- Antimony [air, urban air close to ground]: 2.4198e-11 kg; lognormal variance with pedigree 1.5606, pedigree (1,1,4,1,1)
  (same comment as for Titanium)
- Nickel [soil, industrial]: 9.5759e-7 kg; lognormal variance with pedigree 1.5828, pedigree (1,1,4,1,1)
  (same comment as for Strontium)
- Nickel [air, urban air close to ground]: 1.3681e-9 kg; lognormal variance with pedigree 1.6764, pedigree (1,1,4,1,1)
  (same comment as for Titanium)
- Copper [soil, industrial]: 4.1322e-5 kg; lognormal variance with pedigree 1.0875, pedigree (1,1,4,1,1)
  (same comment as for Strontium)
- Manganese [air, urban air close to ground]: 2.5577e-7 kg; lognormal variance with pedigree 1.1835, pedigree (1,1,4,1,1)
  (same comment as for Titanium)
- Chromium [soil, industrial]: 1.2448e-5 kg; lognormal variance with pedigree 1.2467, pedigree (1,1,4,1,1)
  (same comment as for Strontium)
- Lead [air, urban air close to ground]: 1.8988e-7 kg; lognormal variance with pedigree 1.2217, pedigree (1,1,4,1,1)
  (same comment as for Titanium)
- Cobalt [soil, industrial]: 1.6105e-6 kg; lognormal variance with pedigree 1.5102, pedigree (1,1,4,1,1)
  (same comment as for Strontium)
- Chromium [air, urban air close to ground]: 1.859e-8 kg; lognormal variance with pedigree 1.3392, pedigree (1,1,4,1,1)
  (same comment as for Titanium)
- Cadmium [soil, industrial]: 3.3754e-5 kg; lognormal variance with pedigree 1.1138, pedigree (1,1,4,1,1)
  (same comment as for Strontium)
- Mercury [air, urban air close to ground]: 2.9059e-8 kg; lognormal variance with pedigree 1.9305, pedigree (1,1,4,1,1)
  (same comment as for Titanium)
- Barium [soil, industrial]: 0.00022986 kg; lognormal variance with pedigree 0.85378, pedigree (1,1,4,1,1)
  (same comment as for Strontium)
- Copper [air, urban air close to ground]: 4.5466e-8 kg; lognormal variance with pedigree 1.1876, pedigree (1,1,4,1,1)
  (same comment as for Titanium)
- Fluoride [soil, industrial]: 1.2851e-5 kg; lognormal variance with pedigree 1.2278, pedigree (1,1,4,1,1)
  (same comment as for Strontium)
- Cobalt [air, urban air close to ground]: 6.7686e-8 kg; lognormal variance with pedigree 1.5363, pedigree (1,1,4,1,1)
  (same comment as for Titanium)
- Arsenic [soil, industrial]: 1.8065e-6 kg; lognormal variance with pedigree 1.4995, pedigree (1,1,4,1,1)
  (same comment as for Strontium)
- Barium [air, urban air close to ground]: 9.8812e-6 kg; lognormal variance with pedigree 0.87954, pedigree (1,1,4,1,1)
  (same comment as for Titanium)
- Nitrogen [soil, industrial]: 1.2988e-5 kg; lognormal variance with pedigree 0.68204, pedigree (1,1,4,1,1)
  (same comment as for Strontium)
- Cadmium [air, urban air close to ground]: 1.9206e-7 kg; lognormal variance with pedigree 1.1757, pedigree (1,1,4,1,1)
  (same comment as for Titanium)
- Sulfur [soil, industrial]: 0.00036561 kg; lognormal variance with pedigree 0.77746, pedigree (1,1,4,1,1)
  (same comment as for Strontium)
- Hydrogen fluoride [air, urban air close to ground]: 1.6142e-6 kg; lognormal variance with pedigree 1.2411, pedigree (1,1,4,1,1)
  (same comment as for Titanium)
- Bromine [soil, industrial]: 6.5144e-6 kg; lognormal variance with pedigree 1.2819, pedigree (1,1,4,1,1)
  (same comment as for Strontium)
- Bromine [air, urban air close to ground]: 3.0752e-6 kg; lognormal variance with pedigree 1.2851, pedigree (1,1,4,1,1)
  (same comment as for Titanium)
- Chloride [soil, industrial]: 0.00048653 kg; lognormal variance with pedigree 0.6197, pedigree (1,1,4,1,1)
  (same comment as for Strontium)
- Arsenic [air, urban air close to ground]: 1.5529e-8 kg; lognormal variance with pedigree 1.5529, pedigree (1,1,4,1,1)
  (same comment as for Titanium)
- Carbon [soil, industrial]: 0.0041227 kg; lognormal variance with pedigree 0.073711, pedigree (1,1,4,1,1)
  (same comment as for Strontium)
- Nitrogen oxides [air, urban air close to ground]: 0.0023874 kg; lognormal variance with pedigree 0.38341, pedigree (1,1,4,1,1)
  (same comment as for Titanium)
- Polychlorinated biphenyls [air, urban air close to ground]: 1.1189e-7 kg; lognormal variance with pedigree 0.0491, pedigree (1,1,4,1,1)
  Process-specific (constant) emissions to air from open burning.
  Uncertainty: uncertainty generic estimate
- Hydrogen chloride [air, urban air close to ground]: 0.0010025 kg; lognormal variance with pedigree 0.61678, pedigree (1,1,4,1,1)
  (same comment as for Titanium)
- Acetaldehyde [air, urban air close to ground]: 0.0004284 kg; lognormal variance with pedigree 0.0491, pedigree (1,1,4,1,1)
  (same comment as for Polychlorinated biphenyls)
- Dinitrogen monoxide [air, urban air close to ground]: 0.00011625 kg; lognormal variance with pedigree 0.0491, pedigree (1,1,4,1,1)
  (same comment as for Titanium)
- Benzene, ethyl- [air, urban air close to ground]: 0.00032746 kg; lognormal variance with pedigree 0.0491, pedigree (1,1,4,1,1)
  (same comment as for Polychlorinated biphenyls)
- Methane, fossil [air, urban air close to ground]: 0.0059 kg; lognormal variance with pedigree 0.0491, pedigree (1,1,4,1,1)
  (same comment as for Polychlorinated biphenyls)
- PAH, polycyclic aromatic hydrocarbons [air, urban air close to ground]: 0.0003443 kg; lognormal variance with pedigree 0.30974, pedigree (1,1,4,1,1)
  (same comment as for Polychlorinated biphenyls)
- Sulfur dioxide [air, urban air close to ground]: 0.00018386 kg; lognormal variance with pedigree 0.78753, pedigree (1,1,4,1,1)
  (same comment as for Titanium)
- Formaldehyde [air, urban air close to ground]: 0.00044365 kg; lognormal variance with pedigree 0.0491, pedigree (1,1,4,1,1)
  (same comment as for Polychlorinated biphenyls)
- Carbon dioxide, fossil [air, urban air close to ground]: 2.9222 kg; lognormal variance with pedigree 0.0092766, pedigree (1,1,4,1,1)
  Emissions to air from open burning.
  Uncertainty: Uncertainty calculated depending on waste input, uncertainty of transfer coefficents in incineration model,and uncertainty in CO and CH4 emissions.
- Styrene [air, urban air close to ground]: 0.0005275 kg; lognormal variance with pedigree 0.0491, pedigree (1,1,4,1,1)
  (same comment as for Polychlorinated biphenyls)
- Carbon monoxide, fossil [air, urban air close to ground]: 0.0386 kg; lognormal variance with pedigree 0.65557, pedigree (1,1,4,1,1)
  (same comment as for Polychlorinated biphenyls)
- Toluene [air, urban air close to ground]: 0.000372 kg; lognormal variance with pedigree 0.0491, pedigree (1,1,4,1,1)
  (same comment as for Polychlorinated biphenyls)
- Water [air, urban air close to ground]: 0.00098394 m3; lognormal variance with pedigree 0.11077, pedigree (1,1,4,1,1)
  water vapour from waste humidity, hydrogen oxidation.
  Uncertainty: Uncertainty calculated from uncertainty in waste composition and the uncertainty of fraction to air.
- Benzene [air, urban air close to ground]: 0.00097975 kg; lognormal variance with pedigree 0.0491, pedigree (1,1,4,1,1)
  (same comment as for Polychlorinated biphenyls)
- Sodium [soil, industrial]: 0.0013707 kg; lognormal variance with pedigree 0.62137, pedigree (1,1,4,1,1)
  (same comment as for Strontium)
- Phenol [air, urban air close to ground]: 1.4799e-5 kg; lognormal variance with pedigree 0.0491, pedigree (1,1,4,1,1)
  (same comment as for Polychlorinated biphenyls)
- Dioxins, measured as 2,3,7,8-tetrachlorodibenzo-p-dioxin [air, urban air close to ground]: 2.1402e-11 kg; lognormal variance with pedigree 1.0968, pedigree (1,1,4,1,1)
  Process-specific (constant) emissions to air from open burning.
  Uncertainty: Uncertainty calculated from uncetainty in Chlorine content in waste and estimation formula
- Dioxins, measured as 2,3,7,8-tetrachlorodibenzo-p-dioxin [soil, industrial]: 5.9451e-12 kg; lognormal variance with pedigree 1.5772, pedigree (1,1,4,1,1)
  (same comment as for Dioxins, measured as 2,3,7,8-tetrachlorodibenzo-p-dioxin)
- Particulates, > 2.5 um, and < 10um [air, urban air close to ground]: 0.00053058 kg; lognormal variance with pedigree 0.40599, pedigree (1,1,4,1,1)
  (same comment as for Titanium)
- Magnesium [soil, industrial]: 9.5609e-5 kg; lognormal variance with pedigree 0.9756, pedigree (1,1,4,1,1)
  (same comment as for Strontium)
- Particulates, < 2.5 um [air, urban air close to ground]: 0.00098537 kg; lognormal variance with pedigree 0.40599, pedigree (1,1,4,1,1)
  (same comment as for Titanium)
- Aluminium [soil, industrial]: 0.00019163 kg; lognormal variance with pedigree 0.88341, pedigree (1,1,4,1,1)
  (same comment as for Strontium)
- Aluminium [air, urban air close to ground]: 1.5809e-7 kg; lognormal variance with pedigree 0.99076, pedigree (1,1,4,1,1)
  (same comment as for Titanium)
- Iron [soil, industrial]: 0.0015316 kg; lognormal variance with pedigree 0.61001, pedigree (1,1,4,1,1)
  (same comment as for Strontium)
- Particulates, > 10 um [air, urban air close to ground]: 0.00037899 kg; lognormal variance with pedigree 0.40599, pedigree (1,1,4,1,1)
  (same comment as for Titanium)
- Thallium [soil, industrial]: 3.8282e-7 kg; lognormal variance with pedigree 1.7009, pedigree (1,1,4,1,1)
  (same comment as for Strontium)
- Magnesium [air, urban air close to ground]: 2.8729e-7 kg; lognormal variance with pedigree 1.0515, pedigree (1,1,4,1,1)
  (same comment as for Titanium)
- Calcium [soil, industrial]: 0.0025281 kg; lognormal variance with pedigree 0.54285, pedigree (1,1,4,1,1)
  (same comment as for Strontium)
- Sodium [air, urban air close to ground]: 3.4615e-5 kg; lognormal variance with pedigree 0.65529, pedigree (1,1,4,1,1)
  (same comment as for Titanium)
- Titanium [soil, industrial]: 0.00094879 kg; lognormal variance with pedigree 0.67108, pedigree (1,1,4,1,1)
  (same comment as for Strontium)
- Calcium [air, urban air close to ground]: 6.113e-5 kg; lognormal variance with pedigree 0.57748, pedigree (1,1,4,1,1)
  (same comment as for Titanium)
- Beryllium [soil, industrial]: 4.7857e-7 kg; lognormal variance with pedigree 1.6723, pedigree (1,1,4,1,1)
  (same comment as for Strontium)
- Iron [air, urban air close to ground]: 2.78e-6 kg; lognormal variance with pedigree 0.69773, pedigree (1,1,4,1,1)
  (same comment as for Titanium)

## Extrapolations
This dataset has been extrapolated from year 2012 to the year of the calculation (2021). The uncertainty has been adjusted accordingly.
