# hardwood forestry, beech, sustainable forest management

Dataset: EcoSpold 2, unit process
Geography: RoW
Time period: 2010-01-01 to 2021-12-31
Technology level: current
Classification: ISIC rev.4 ecoinvent: 0220:Logging
Classification: EcoSpold01Categories: wooden materials/extraction
Tags: combined production
Scenario: Business-as-Usual
System model: Allocation, cut-off by classification
Generated by: [System]
Database: ecoinvent
isCopyrightProtected: true
accessRestrictedTo: 1

## General comment
Extrapolated dataset.
This dataset covers the production and harvesting of 1 m3 of stemwood, beech, solid, under bark, plus the relative share of enery wood from slash from sustainable forest management as the prevailing management practices in Germany.
For Germany forestry processes for the 4 main tree species are modelled:
• hardwood: beech
• hardwood: oak
• softwood: spruce
• softwood: pine
Table 1-1 lists the parameters of the inventoried tree species and their sources:
The inventories largely rely on data from Albrecht et al. (2009); however, they have been modeled as multi-output unlinked Unit Process, according to the ecoinvent Data Quality Guidelines. Therefore, it was not possible to implement some of the methodological settings in Albrecht et al. (2009), particularly those related to the co-product allocation of some sub-processes.
The datasets cover in particular (for details, see Albrecht et al., 2009):
• stand establishment with planting, including the use of a planting device mounted on a tractor and – in a separate dataset - the production of seedlings in an unheated greenhouse according to Aldentun (2002). The number of seedlings required varies between 3000 seedlings/ha for spruce up to 10‘000 seedlings/ha for oak (see Table5-2);
• tending, including the use of a brush cutters in one intervention for all tree species;
• young growth tending, including the use of a brush cutters in two interventions for beech and oak, and in one intervention for pine;
• cleaning, including one intervention as selective cleaning with a small power saw and one systematic cleaning with a mulching device or similar for all tree species;
• maintenance of forest road, whereas – deviating from Albrecht et al. (2009) – the distribution of a new gravel layer every ten years has been inventoried.
• thinning, whereas it has been assumed that all thinning are made as mechanical thinnings with a harvester and a forwarder. The range for the use of harvesters is assumed to lay between 10 and 32 cm of average DBH of the exiting stand. For spruce and pine, the development of the average diameters of the exiting stand allows the use of harvesters up to the years ‘rotation period minus 30 years’. In the case of beech and oak harvesters can only be used up to the ages of 110 and 105 years respectively, due to the increasing DBH in older stands.
• final harvest, whereas motor-manual wood harvesting and skidding has been inventoried for the final harvesting as the predominant harvesting method for large-sized timber in Germany.
Table 1-2 compiles the parameters used for the inventorying of the stand establishment and maintenance over one rotation period for each tree species:
The total harvesting over one rotation period have been derived from the following yield tables over the assumed rotation periods as listed in Table 1-2:
• beech: Wiedemann "yield class II.0“, plus 20% of the commercial volume as wood chips (Wittkopf 2005)
• oak: Jüttner "yield class II.0", plus 22% of the commercial volume as wood chips (Wittkopf 2005)
• spruce: Assmann/Franz. "dominant height site index 36", plus 13% of the commercial volume as wood chips (Wittkopf 2005)
• pine: Wiedemann "yield class II.0", plus 19% of the commercial volume as wood chips (Wittkopf 2005)
The relative distribution of the total harvest corresponds to the situation of wood harvesting in 2011 (see Table 1-5) and has been derived from the sources listed there (Table 1-3).
As mentioned above, it has been assumed as a simplification that all wood from thinnings is harvested with a harvester and a forwarder; wood from final harvest is harvested motor-manually with a power saw and skidded with a forest tractor. In Table 1-4 the harvesting effort for an average m3 harvested over one rotation period from thinnings and final harvest is derived, taking into account the different productivities of the two harvesting methods:
For the chipping in the stand a productivity of 25 m3bulked/PMH is assumed (based on Cremer & Velazquesz 2007, referring to Lechner et al. 2007)). For wood chips chipped in the stand a productivity of the forwarding of 70 Sm3 bulked/PMH with a diesel consumption of 9.5 l/h of the forwarder is assumed.
Losses of biomass during the production chain are disregarded due to the relatively rough estimates within the production chain of wood chips and bundles (see Erikkson & Gustavsson 2008 for more information).
The data on harvesting in the reference year 2011 has been taken from the German Statistical Yearbook (Anonymous 2012) . The assortment „industrial wood/energy wood“ has been split into industrial wood and energy wood respectively according to the Statistical Yearbook for Nutrition, Agriculture and Forestry of the Federal Republic Germany (Anonymous 2010) based on the situation in 2009. Due to the lack of data on federal level, the share of wood chips and cleft timber as energy wood has been approximated based on a survey of forest owners in Bavaria, which has been published by the Bavarian Institute for Forests and Forestry.
Due to a lack of information, it has been assumed that no bundles of energy wood are produced in Germany.
The production volumes for the assortments of energy wood are converted to kg dry mass within the dataset for ecoinvent 3.
The global production volumes of the inventoried tree species are extrapolated via the Gross Domestic Product of Germany and the world respectively (GDP global 70210920 Mio. US $ / GDP Germany 3,604,061 Mio. US $= 19.48) . This estimate is not really meaningful; the corresponding dataset is, however, required as a technical precondition of the ecoinvent 3 software.
References:
Albrecht, S., S. Rüter, J. Welling, M. Knauf, U. Mantau, A. Braune, M. Baitz, H. Weimar, S. Sörgel, J. Kreissig, J. Deimling and S. Hellwig (2009): ÖkoPot - Ökologische Potenziale durch Holznutzung gezielt fördern. Abschlussbericht zum BMBF-Projekt FKZ 0330545. Universität Stuttgart, Universität Hamburg, Hamburg.
Anonymous (2010): Statistisches Jahrbuch über Ernährung, Landwirtschaft und Forsten der Bundesrepublick Deutschland. 54. Jahrgang, Wirtschaftsverlag NW GmbH, Bremerhaven.
Anonymous (2013): 19 Land- und Forstwirtschaft. In: Statistisches Jahrbuch 2012, Statistisches Bundesamt, Berlin, 471-500.
Cremer, T. and B. Velazques-Marti (2007): Evaluation of two harvesting systems for the supply of wood-chips in Norway spurce forest affected by bark beetle. Croation Journal of Forest Engineering, 28(2): 145-155.
Eriksson, L. N. and L. Gustavsson (2008): Biofuels from stumps and small roundwood - costs and CO2 benefits. Biomass and Bioenergy, 32: 897-902.
Schweinle, J. (2000): Analyse und Bewertung der forstlichen Produktion als Grundlage für weiterführende forst- und holzwirtschaftliche Produktlinien-Analysen. Mitteilungen der Bundesforschungsanstalt für Forst- und Holzwirtschaft Hamburg, Komissionsverl. Max Wiedebusch, Hamburg.
Schweinle, J. and C. Thoroe (2001): Vergleichende Ökobilanzierung der Rohholzproduktion in verschiedenen Forstbetrieben. Mitteilungen der Bundesforschungsanstalt für Forst- und Holzwirtschaft Nr. 204, Kommissionsverlag Max Wiedebusch, Hamburg.
Werner, F., T. Künniger, H.-J. Althaus and K. Richter (2007): Life cycle inventories of wood as fuel and construction material, Duebendorf, November 2002. Centre for life cycle inventories in the ETH domain, Duebendorf.
Wittkopf, S. (2005): Bereitstellung von Hackgut zur thermischen Verwertung durch Forstbetriebe in Bayern; Dissertation. Technische Universität München, München.

## Included activities start
The activity starts with site preparation assuming establishment of the forest via planting, including seedling production and covers all process related to forest management, including site preparation, planting, tending, young growth tending, clearing, thinnings and harvesting operations including the processing of wood fuel to chips, bundles and chopped wood (logs for energy) over one rotation period. It covers also the maintenance and construction of forest roads.

## Included activities end
This activity ends with the assortments at the forest road and includes eventual drying before transportation.

## Parameters
- skidding with skidder per m3: 0.0852 PMH/m3; name skidding; lognormal variance with pedigree 0.2506, pedigree (2,1,1,1,1)
  referring to stemwood; IMPROTANT NOTE: When considering several harvesting systems, e.g. in datasets on national forestry, this parameter is NOT the productivity of the harvesting system but the productivity of the system weighted with the share of the amount harvested by the respective system. This has to be calculated outside EcoEditor. Own calculations based on Klvac & Skoupy 2009, Skogforsk 2006, Berg & Karjalainen 2003
- shrinkage ratio: 0.006 dimensionless; name shrinkage_ratio; lognormal variance with pedigree 0.25, pedigree (1,1,1,1,1)
  for wood: % of volume lost per % of humidity lowered; usually applicable for humidity u < 30%; as oak according to Kollmann 1982
- productivity forwarding wood chips from terrain chipper: 70 m3/PMH; name productivity_forwarding_chips_in_stand; lognormal variance with pedigree 0.2506, pedigree (2,1,1,1,1)
  as m3 bulked/ productive machine hour
- share of pulpwood of total wood harvest: 0.3 dimensionless; name share_pulpwood; lognormal variance with pedigree 0.2506, pedigree (2,1,1,1,1)
  Share of pulpwood of total wood harvest (referring to volume below bark); share_sawlogs + share_pulpwood + share_wood_fuel = 100%; calculated based on Anonymous (2010): Statistisches Jahrbuch über Ernährung, Landwirtschaft und Forsten der Bundesrepublick Deutschland. 54. Jahrgang, Wirtschaftsverlag NW GmbH, Bremerhaven.
  Anonymous (2013): 19 Land- und Forstwirtschaft. In: Statistisches Jahrbuch 2012, Statistisches Bundesamt, Berlin, 471-500.
- share of chips of total wood fuel: 0.23 dimensionless; name share_chips; lognormal variance with pedigree 0.2506, pedigree (2,1,1,1,1)
  Share of chips of total wood fuel harvested (referring consistently to volume under bark or volume over bark for all types of wood fuel)share_bundles + share_chopped_wood+share_chips = 100% wood fuel; calculated based onAnonymous (2010): Statistisches Jahrbuch über Ernährung, Landwirtschaft und Forsten der Bundesrepublick Deutschland. 54. Jahrgang, Wirtschaftsverlag NW GmbH, Bremerhaven.
  Anonymous (2013): 19 Land- und Forstwirtschaft. In: Statistisches Jahrbuch 2012, Statistisches Bundesamt, Berlin, 471-500.
- area forest road per m3 wood: 0.262774 m2/m3; name a_transformation_road; = a_forest_road/yield_wood_ub
  area of forest road per ha divided by total harvest over one rotation period per hectare; Albrecht, S., S. Rüter, J. Welling, M. Knauf, U. Mantau, A. Braune, M. Baitz, H. Weimar, S. Sörgel, J. Kreissig, J. Deimling and S. Hellwig (2009): ÖkoPot - Ökologische Potenziale durch Holznutzung gezielt fördern. Abschlussbericht zum BMBF-Projekt FKZ 0330545. Universität Stuttgart, Universität Hamburg, Hamburg.
- share, revenues wood production: 1 dimensionless; name share_revenues_wood; lognormal variance with pedigree 0.252, pedigree (3,1,1,1,1)
  Used to determine the share of land used for the productive function of forestry covered in this dataset
- productivity mobile chipper: 120 m3/PMH; name productivity_mobile_chipper; lognormal variance with pedigree 0.2506, pedigree (2,1,1,1,1)
  as m3 bulked/ productive machine hour
- share of cleft timber of total wood fuel: 0.77 dimensionless; name share_cleft_timber; lognormal variance with pedigree 0.2506, pedigree (2,1,1,1,1)
  Share of cleft timber as wood fuel of total wood fuel harvested (referring consistently to volume under bark or volume over bark for all types of wood fuel); share_bundles + share_cleft_timber+share_chips = 100% wood fuel; calculated based on Anonymous (2010): Statistisches Jahrbuch über Ernährung, Landwirtschaft und Forsten der Bundesrepublick Deutschland. 54. Jahrgang, Wirtschaftsverlag NW GmbH, Bremerhaven.
  Anonymous (2013): 19 Land- und Forstwirtschaft. In: Statistisches Jahrbuch 2012, Statistisches Bundesamt, Berlin, 471-500.
- planting density: 8000 unit; name planting_density; lognormal variance with pedigree 0.2506, pedigree (2,1,1,1,1)
  number of trees per hectare
- share of planted area: 1 dimensionless; name share_area_planted; lognormal variance with pedigree 0.2506, pedigree (2,1,1,1,1)
  Share of forest area that is planted instead of being restocked by natural regeneration
- moisture content wood chips: 0.8 dimensionless; name moisture_wood_chips; lognormal variance with pedigree 0.2506, pedigree (2,1,1,1,1)
  kg water/kg dry mass. Based on Schweinle, J. and C. Thoroe (2001): Vergleichende Ökobilanzierung der Rohholzproduktion in verschiedenen Forstbetrieben. Mitteilungen der Bundesforschungsanstalt für Forst- und Holzwirtschaft Nr. 204, Kommissionsverlag Max Wiedebusch, Hamburg.
- rotation period: 140 year; name rotation_period; lognormal variance with pedigree 0.2506, pedigree (2,1,1,1,1)
  number of years from planting to final harvest. Source: Schweinle & Thoroe (2001)
- gravel for maintenance of forest roads: 117.723 kg/m3; name m_gravel; = thickness_new_gravel*a_forest_road_gravel*d_gravel*rotation_period/interval_road_maintenance/yield_wood_ub
  adding up all gravel input over one rotation period per m3 of total yield of wood
- productivity, clefting device: 5.26 m3/PMH; name productivity_clefting_device; lognormal variance with pedigree 0.2506, pedigree (2,1,1,1,1)
  as m3 bulked/ productive machine hour
- Bark ratio: 0.1 dimensionless; name bark; lognormal variance with pedigree 0.025, pedigree (1,1,1,1,1)
  share of bark of total volume of trunk (solid wood + bark) for hardwood; U. Luginbühl, personal written communication, HIS
- ratio bulk density / solid density of chips: 2.8 dimensionless; name ratio_bulk_solid_chips; lognormal variance with pedigree 0.2506, pedigree (2,1,1,1,1)
  as m3 bulked / m3 solid
- share of chips processed in stand (from above-ground biomass): 0.02 dimensionless; name share_chips_in_stand; lognormal variance with pedigree 0.252, pedigree (3,1,1,1,1)
  Share of chips processed in the stand of total amount of chips processed in the fores; share_chips_at _forest_road+share_chips_in_stand = 100% chips from forestry;calculated based on Anonymous (2010): Statistisches Jahrbuch über Ernährung, Landwirtschaft und Forsten der Bundesrepublick Deutschland. 54. Jahrgang, Wirtschaftsverlag NW GmbH, Bremerhaven.
  Anonymous (2013): 19 Land- und Forstwirtschaft. In: Statistisches Jahrbuch 2012, Statistisches Bundesamt, Berlin, 471-500.
- periodicity of maintenance of forest roads: 10 year; name interval_road_maintenance; lognormal variance with pedigree 0.2506, pedigree (2,1,1,1,1)
  interval between two events of maintenance of forest roads
- productivity terrain chipper: 25 m3/PMH; name productivity_terrain_chipper; lognormal variance with pedigree 0.2506, pedigree (2,1,1,1,1)
  as m3 bulked/ productive machine hour; based on Cremer, T. and B. Velazques-Marti (2007): Evaluation of two harvesting systems for the supply of wood-chips in Norway spurce forest affected by bark beetle. Croation Journal of Forest Engineering, 28(2): 145-155; referring to Lechner et al 2007
- share of wood fuel of total wood harvest: 0.44 dimensionless; name share_wood_fuel; lognormal variance with pedigree 0.2506, pedigree (2,1,1,1,1)
  Share of wood fuel of total wood harvest (referring to volume below bark); share_sawlogs + share_pulpwood + share_wood_fuel = 100%; calculated based on Anonymous (2010): Statistisches Jahrbuch über Ernährung, Landwirtschaft und Forsten der Bundesrepublick Deutschland. 54. Jahrgang, Wirtschaftsverlag NW GmbH, Bremerhaven.
  Anonymous (2013): 19 Land- und Forstwirtschaft. In: Statistisches Jahrbuch 2012, Statistisches Bundesamt, Berlin, 471-500.
- share of chips processed at forest road (from above-ground biomass): 0.98 dimensionless; name share_chips_at_forest_road; lognormal variance with pedigree 0.252, pedigree (3,1,1,1,1)
  Share of chips processed at forest road of total amount of chips processed in the forest; share_chips_at _forest_road+share_chips_in_stand = 100% chips from forestry; calculated based on Anonymous (2010): Statistisches Jahrbuch über Ernährung, Landwirtschaft und Forsten der Bundesrepublick Deutschland. 54. Jahrgang, Wirtschaftsverlag NW GmbH, Bremerhaven.
  Anonymous (2013): 19 Land- und Forstwirtschaft. In: Statistisches Jahrbuch 2012, Statistisches Bundesamt, Berlin, 471-500.
- yield wood over rotation period: 822 m3; name yield_wood_ub; lognormal variance with pedigree 0.2506, pedigree (2,1,1,1,1)
  yield of wood under bark per ha over one rotation period
- share of sawlogs and veneer logs of total wood harvest: 0.26 dimensionless; name share_sawlogs; lognormal variance with pedigree 0.2506, pedigree (2,1,1,1,1)
  Share of sawlogs and veneer logs of total wood harvest (referring to volume below bark); share_sawlogs + share_pulpwood + share_wood_fuel = 100%; calculated based on Anonymous (2010): Statistisches Jahrbuch über Ernährung, Landwirtschaft und Forsten der Bundesrepublick Deutschland. 54. Jahrgang, Wirtschaftsverlag NW GmbH, Bremerhaven.
  Anonymous (2013): 19 Land- und Forstwirtschaft. In: Statistisches Jahrbuch 2012, Statistisches Bundesamt, Berlin, 471-500.
- thickness of new gravel layer: 0.02 m; name thickness_new_gravel; lognormal variance with pedigree 0.252, pedigree (3,1,1,1,1)
  thickness of layer of gravel that is added during a maintenance operation of forest roads
- wood density, basic: 541.2 kg/m3; name basic_wood_d; = dry_wood_d*(1-30*shrinkage_ratio); lognormal variance with pedigree 0.2506, pedigree (2,1,1,1,1)
  kg oven-dry matter/wet volume
- area forest road: 216 m2/ha; name a_forest_road; = 54*4; lognormal variance with pedigree 0.2506, pedigree (2,1,1,1,1)
  Schweinle, J. and C. Thoroe (2001): Vergleichende Ökobilanzierung der Rohholzproduktion in verschiedenen Forstbetrieben. Mitteilungen der Bundesforschungsanstalt für Forst- und Holzwirtschaft Nr. 204, Kommissionsverlag Max Wiedebusch, Hamburg.
- moisture content pulpwood: 0.8 dimensionless; name moisture_pulpwood; lognormal variance with pedigree 0.2506, pedigree (2,1,1,1,1)
  kg water/kg dry mass. Schweinle, J. and C. Thoroe (2001): Vergleichende Ökobilanzierung der Rohholzproduktion in verschiedenen Forstbetrieben. Mitteilungen der Bundesforschungsanstalt für Forst- und Holzwirtschaft Nr. 204, Kommissionsverlag Max Wiedebusch, Hamburg.
- area forest per m3 wood: 11.9027 m2/m3; name a_transformation_forest; = (10000-a_forest_road)*share_revenues_wood/yield_wood_ub
  area of forest per ha divided by total harvest over one rotation period per hectare
- area forest road in gravel: 216 m2/ha; name a_forest_road_gravel; = a_forest_road; lognormal variance with pedigree 0.2506, pedigree (2,1,1,1,1)
  assumed
- moisture content sawlogs and veneer logs: 0.7 dimensionless; name moisture_sawlogs; lognormal variance with pedigree 0.2506, pedigree (2,1,1,1,1)
  (same comment as for moisture content pulpwood)
- sum of reference products in volume: 1 m3; name sum_RP_m3; lognormal variance with pedigree 0.005, pedigree (1,1,1,1,1)
  as solid under bark; DO NOT CHANGE; dataset might calculate misleading results
- share of seedlings from heated greenhouses: 0 dimensionless; name seedlings_heated
  share of seedlings from heated greenhouses of total amount of seedlings used in replanting%; Albrecht, S., S. Rüter, J. Welling, M. Knauf, U. Mantau, A. Braune, M. Baitz, H. Weimar, S. Sörgel, J. Kreissig, J. Deimling and S. Hellwig (2009): ÖkoPot - Ökologische Potenziale durch Holznutzung gezielt fördern. Abschlussbericht zum BMBF-Projekt FKZ 0330545. Universität Stuttgart, Universität Hamburg, Hamburg.
- harvesting with forestry harvester: 0.0156 year; name harvesting; lognormal variance with pedigree 0.2506, pedigree (2,1,1,1,1)
  referring to stemwood; IMPORTANT NOTE: When considering several harvesting systems, e.g. in datasets on national forestry, this parameter is NOT the inverse productivity of the harvesting system but the inverse productivity of the system weighted with the share of the amount harvested by the respective system. This has to be calculated outside EcoEditor. Own calculations based on Klvac, R. and A. Skoupy (2009): Characteristic fuel consumption and exhaust emissions in fully mechanized logging operations. Journal of Forest Research, 14(6): 328-334: referring to Freitas 2004; Skogforsk (2006): Fuel consumption in forestry continues to fall. Results from Skogforsk, Skogforsk, Uppsala; Berg, S. and T. Karjalainen (2003): Comparison of greenhouse gas emissions from forest operations in Finand and Sweden. Forestry, 76(3): 271-284.
- ratio bulk density / solid density of cleft timber: 1.4 dimensionless; name ratio_bulk_solid_cleft_timber; lognormal variance with pedigree 0.2506, pedigree (2,1,1,1,1)
  as m3 bulked / m3 solid
- forwarding with forwarder per m3: 0.0195 PMH/m3; name forwarding_forwarder; lognormal variance with pedigree 0.2506, pedigree (2,1,1,1,1)
  (same comment as for harvesting with forestry harvester)
- wood density, dry: 660 kg/m3; name dry_wood_d; lognormal variance with pedigree 0.25, pedigree (1,1,1,1,1)
  kg oven-dry matter/dry volume; Oenorm B3012
- diesel consumption per kg of gravel used for maintenance of forest roads: 0.043 MJ/kg; name diesel_per_gravel; lognormal variance with pedigree 0.2506, pedigree (2,1,1,1,1)
  diesel consumption of building machines used to maintaine road and distribute new layer of gravel
- power sawing without catalytic converter per m3: 0.383 PMH/m3; name power_sawing; lognormal variance with pedigree 0.2506, pedigree (2,1,1,1,1)
  referring to stemwod; IMPORTANT NOTE: When considering several harvesting systems, e.g. in datasets on national forestry, this parameter is NOT the inverse productivity of the harvesting system but the inverse productivity of the system weighted with the share of the amount harvested by the respective system. This has to be calculated outside EcoEditor. Own calculations based on Klvac, R. and A. Skoupy (2009): Characteristic fuel consumption and exhaust emissions in fully mechanized logging operations. Journal of Forest Research, 14(6): 328-334: referring to Freitas 2004; Skogforsk (2006): Fuel consumption in forestry continues to fall. Results from Skogforsk, Skogforsk, Uppsala; Berg, S. and T. Karjalainen (2003): Comparison of greenhouse gas emissions from forest operations in Finand and Sweden. Forestry, 76(3): 271-284.
- moisture content cleft timber: 0.35 dimensionless; name moisture_cleft_timber; lognormal variance with pedigree 0.2506, pedigree (2,1,1,1,1)
  kg water/kg dry mass.
- bulk density gravel: 1600 kg/m3; name d_gravel; lognormal variance with pedigree 0.2506, pedigree (2,1,1,1,1)
  kg gravel / m3 bulked material

## Reference product
- pulpwood, hardwood, measured as solid wood under bark: 0 m3; name pulpwood; By-product classification allocatable product; CPC 031: Wood in the rough
  average composition of 1 m3 solid wood under bark, harvested in Germany; see general comment for details
  production volume 0 m3
    extrapolated from GE data to GLO data via ratio of GDP
  property basic wood density 541.2; name pulpwood_basic_wood_d; = dry_wood_d*(1-30*shrinkage_ratio)
    dry mass/wet volume
  property price 250 EUR2005; name pulpwood_price_EUR2005
    Temporary price data. Calculated as 90% of purchasers price based on: 2004 prices for World Import/Export (USD/kg) from FaoStat (http://faostat.fao.org/site/626/default.aspx#ancor, [accessed 14th June 2010]) Commodity: 'Wood Pulp +'. A density of 670 kg/m3 was assumed.
  property wet mass 1082.4 kg; name pulpwood_WM; = wood_DM_pulp+wood_WWM_pulp
  property heating value, gross 19.6 MJ; name pulpwood_Gross_Heat_Value
    gross (upper) heating (calorific) value
  property water in wet mass 481.067 kg; name wood_WWM_pulp; = water_content_pulp*wood_DM_pulp
  property apparent wood density 974.16 kg/m3; name pulpwood_apparent_wood_d; = pulpwood_basic_wood_d*(1+moisture_pulpwood)
    wet mass/wet volume
  property dry wood density 660 kg/m3; name pulpwood_dry_wood_d; = dry_wood_d
    kg dry matter/ dry volume
  property water content 0.8; name water_content_pulp; = moisture_pulpwood
  property heating value, net 5082.47 MJ; name pulpwood_Net_Heat_Value; = (pulpwood_Gross_Heat_Value-1.32-(20*moisture_pulpwood/(1+moisture_pulpwood)))*pulpwood_basic_wood_d
    net (lower) heating (calorific) value. The property is based on a value of 9.391 MJ/kg
  property carbon content, non-fossil 0.494; name pulpwood_C_content_non_fossil
  property dry mass 601.333 kg; name wood_DM_pulp
  property carbon content 0.494
    carbon content on a dry matter basis (reserved; not for manual entry)
  properties: carbon content, fossil 0, carbon allocation 297.059 kg
- wood chips, wet, measured as dry mass: 1 kg; name wood_chips; = share_wood_fuel*basic_wood_d/(1-bark)*share_chips; By-product classification allocatable product; CPC 31230: Wood in chips or particles
  (same comment as for pulpwood, hardwood, measured as solid wood under bark)
  production volume 1.35798e10 kg
    extrapolated from GE data to GLO data via ratio of GDP
  property heating value, gross 19.6 MJ; name wood_chips_Gross_Heat_Value
    gross (upper) heating (calorific) value
  property dry mass 1 kg; name wood_chips_DM
  property heating value, net 9.39111 MJ; name wood_chips_Net_Heat_Value; = wood_chips_Gross_Heat_Value-1.32-(20*moisture_wood_chips/(1+moisture_wood_chips))
    net (lower) heating (calorific) value
  property dry wood density 660 kg/m3; name wood_chips_dry_wood_d; = dry_wood_d
    kg dry matter/ dry volume
  property water in wet mass 0.8 kg; = wood_chips_WM-wood_chips_DM
  property apparent wood density 974.16 kg/m3; name wood_chips_apparent_wood_d; = wood_chips_basic_wood_d*(1+moisture_wood_chips)
    wet mass/wet volume
  property carbon content, non-fossil 0.494; name chips_C_content_non_fossil
  property price 0.107 EUR2005; name wood_chips_price_EUR2005
    Expert judgement (Urs Luginbühl, Swiss Sawmilling industry, personal communication in June 2014). Wood chips from softwood should have a price of 0.101 EUR/kg. Woodchips from hardwood should have a price of 0.112 EUR/kg. Average of these two values is used. Cross-reference; FAOSTAT database; http://faostat.fao.org/site/626/DesktopDefault.aspx?PageID=626#ancor; Average import/export prices of EU for 'chips and particles'. Price: 48.76 Euro/m3. The density of the wood chips is 650 kg/m3. The price is recalculated accordingly.
  property water content 0.8; = moisture_wood_chips
  property basic wood density 541.2; name wood_chips_basic_wood_d; = dry_wood_d*(1-30*shrinkage_ratio)
    dry mass/wet volume
  property wet mass 1.8 kg; name wood_chips_WM; = wood_chips_DM*(1+moisture_wood_chips)
  property carbon content 0.494
    carbon content on a dry matter basis (reserved; not for manual entry)
  properties: carbon content, fossil 0, carbon allocation 0.494 kg
- cleft timber, measured as dry mass: 0 kg; name cleft_timber; CPC 031: Wood in the rough; By-product classification allocatable product
  Average composition of 1 m3 solid wood under bark, harvested in Germany; see general comment for details; calculated as the share of wood fuel from the total amount of wood harvested, of which a share is cleft timber, converted from wet volume to dry matter via basic wood density, including the percentage of bark (as share of wood fuel relates to 1 m3 under bark)
  production volume 0 kg
    extrapolated from GE data to GLO data via ratio of GDP
  property heating value, net 13.0948 MJ; name cleft_timber_Net_Heat_Value; = cleft_timber_Gross_Heat_Value-1.32-(20*moisture_cleft_timber/(1+moisture_cleft_timber))
    net (lower) heating (calorific) value
  property heating value, gross 19.6 MJ; name cleft_timber_Gross_Heat_Value
    gross (upper) heating (calorific) value
  property price 0.073 EUR2005; name cleft_timber_price_EUR2005
    Calculated based on data from FAOSTAT (accessed 20140429). The price is calculated by using data on total world import quantity (m3) and import value (1000 USD), year 2005. 3411751 m3 of Wood Fuel Trd was imported in the world in 2005. The import value was 161229000 USD. The calculated price is thus (161229000/3411751=47.3*0.8=) 38.1 Euro/m3. The density of cleft timber, measured as dry mass is 541.2 kg/m3. The recalculated price is (1/541.2*38.1=) 0.07 Euro/kg. Using the same approach the calculated price for 2010 was 0.112 Euro/kg.
  property wet mass 1.35 kg; name cleft_timber_WM; = 1+moisture_cleft_timber
  property dry mass 1 kg; name cleft_timber_DM
  property apparent wood density 730.62 kg/m3; name cleft_timber_apparent_wood_d; = cleft_timber_basic_wood_d*(1+moisture_cleft_timber)
    wet mass/wet volume
  property water in wet mass 0.35 kg; name cleft_timber_WWM; = cleft_timber_WM-cleft_timber_DM
  property basic wood density 541.2; name cleft_timber_basic_wood_d; = dry_wood_d*(1-30*shrinkage_ratio)
    dry mass/wet volume
  property water content 0.35; name cleft_timber_water_content; = moisture_cleft_timber
  property dry wood density 660 kg/m3; name cleft_timber_dry_wood_d; = dry_wood_d
    kg dry matter/ dry volume
  property carbon content, non-fossil 0.494; name cleft_timber_C_content_non_fossil
    biogene carbon content on a dry matter basis
  property carbon content, fossil 0; name cleft_timber_C_content_fossil
    fossil carbon content on a dry matter basis
  property carbon content 0.494
    carbon content on a dry matter basis (reserved; not for manual entry)
  properties: carbon allocation 0.494 kg
- sawlog and veneer log, hardwood, measured as solid wood under bark: 0 m3; name saw_veneer_logs; CPC 031: Wood in the rough; By-product classification allocatable product
  (same comment as for pulpwood, hardwood, measured as solid wood under bark)
  production volume 0 m3
    extrapolated from GE data to GLO data via ratio of GDP
  property heating value, gross 19.6 MJ; name saw_veneer_logs_Gross_Heat_Value
    gross (upper) heating (calorific) value
  property carbon content, non-fossil 0.494; name saw_veneer_logs_C_content_non_fossil
  property heating value, net 5436.19 MJ; name saw_veneer_logs_Net_Heat_Value; = (saw_veneer_logs_Gross_Heat_Value-1.32-(20*moisture_sawlogs/(1+moisture_sawlogs)))*saw_veneer_logs_basic_wood_d
    net (lower) heating (calorific) value. The property is based on a value of 10.045 MJ/kg
  property price 85 EUR2005; name saw_veneer_logs_price_EUR2005
    Expert judgement (Urs Luginbühl, Swiss Sawmilling industry, personal communication in June 2014). Cross-reference; Calculated as 90% of purchasers price based on: 2004 prices for World Import/Export data (USD/m3) from UN Commodity Trade Statistics Database (http://data.un.org/Data.aspx?d=ComTrade&f=_l1Code%3a45, [accessed 10th June 2010]) Commodity: 'Logs, poles, coniferous not treated or painted'.
  property dry wood density 660 kg/m3; name saw_veneer_logs_dry_wood_d; = dry_wood_d
    kg dry matter/ dry volume
  property water content 0.7; name water_content_saw; = moisture_sawlogs
  property wet mass 1022.27 kg; name saw_veneer_logs_WM; = wood_DM_saw+wood_WWM_saw
  property basic wood density 541.2; name saw_veneer_logs_basic_wood_d; = dry_wood_d*(1-30*shrinkage_ratio)
    dry mass/wet volume
  property apparent wood density 920.04 kg/m3; name saw_veneer_logs_apparent_wood_d; = saw_veneer_logs_basic_wood_d*(1+moisture_sawlogs)
    wet mass/wet volume
  property water in wet mass 420.933 kg; name wood_WWM_saw; = water_content_saw*wood_DM_saw
  property dry mass 601.333 kg; name wood_DM_saw
  property carbon content 0.494
    carbon content on a dry matter basis (reserved; not for manual entry)
  properties: carbon content, fossil 0, carbon allocation 297.059 kg

## Inputs from technosphere
- skidding, skidder: 0.000138851 hour; = saw_veneer_logs*skidding/sum_RP_m3+pulpwood*skidding/sum_RP_m3+wood_chips*share_chips_at_forest_road*(1-bark)/basic_wood_d*skidding/sum_RP_m3+cleft_timber*(1-bark)/ cleft_timber_basic_wood_d*skidding/sum_RP_m3; lognormal variance with pedigree 0.306, pedigree (5,5,4,1,1)
  average input per m3; see general comment for details
- wood chipping, forwarder with terrain chipper, in forest: 4.13895e-6 hour; name chipping_terrain; = wood_chips*share_chips_in_stand/basic_wood_d*ratio_bulk_solid_chips/productivity_terrain_chipper; lognormal variance with pedigree 0.306, pedigree (5,5,4,1,1)
  no comment
- tree seedling, for planting: 0.0161846 unit; = saw_veneer_logs*(share_area_planted*planting_density*(1-seedlings_heated)/yield_wood_ub)/sum_RP_m3+pulpwood*(share_area_planted*planting_density*(1-seedlings_heated)/yield_wood_ub)/sum_RP_m3+wood_chips*(1-bark)/basic_wood_d*(share_area_planted*planting_density*(1-seedlings_heated)/yield_wood_ub)/sum_RP_m3+cleft_timber*(1-bark)/ cleft_timber_basic_wood_d*(share_area_planted*planting_density*(1-seedlings_heated)/yield_wood_ub)/sum_RP_m3; lognormal variance with pedigree 0.306, pedigree (5,5,4,1,1)
  calculated as 100% of the seedlings coming from unheated greenhouses in Germany
- wood chipping, chipper, mobile, diesel, at forest road: 4.22518e-5 hour; name chipping_mobile; = wood_chips*share_chips_at_forest_road/basic_wood_d*ratio_bulk_solid_chips/productivity_mobile_chipper; lognormal variance with pedigree 0.306, pedigree (5,5,4,1,1)
  no comment
- harvesting, forestry harvester: 2.59424e-5 hour; = saw_veneer_logs*harvesting/sum_RP_m3+pulpwood*harvesting/sum_RP_m3+wood_chips*(1-bark)/basic_wood_d*harvesting/sum_RP_m3+cleft_timber*(1-bark)/ cleft_timber_basic_wood_d*harvesting/sum_RP_m3; lognormal variance with pedigree 0.306, pedigree (5,5,4,1,1)
  average input per m3; see general comment for details
- gravel, crushed: 0 kg; pedigree (1,1,1,1,1)
  gravel for maintenance of forest road over rotation period
  properties: wet mass 1 kg, dry mass 1 kg
- power sawing, without catalytic converter: 0.00075628 hour; = saw_veneer_logs*power_sawing/sum_RP_m3+pulpwood*power_sawing/sum_RP_m3+wood_chips*(1-bark)/basic_wood_d*power_sawing/sum_RP_m3+ cleft_timber*(1-bark)/cleft_timber_basic_wood_d*power_sawing/sum_RP_m3+saw_veneer_logs*(1*14+2*15+1*15)/yield_wood_ub/sum_RP_m3+pulpwood*(1*14+2*15+1*15)/yield_wood_ub/sum_RP_m3+wood_chips*(1-bark)/basic_wood_d*(1*14+2*15+1*15)/yield_wood_ub/sum_RP_m3+ cleft_timber*(1-bark)/cleft_timber_basic_wood_d*(1*14+2*15+1*15)/yield_wood_ub/sum_RP_m3; lognormal variance with pedigree 0.306, pedigree (5,5,4,1,1)
  average input per m3 covering hand-held gasoline-driven equipment used for site preparation, tending and pruning (attributing per ha values to total amount of wood harvested) as well as the amount of power sawing per harvested m3 of stemwood; see general comment for details
- forwarding, forwarder: 3.3056e-5 hour; = saw_veneer_logs*forwarding_forwarder/sum_RP_m3+pulpwood*forwarding_forwarder/sum_RP_m3+wood_chips*share_chips_at_forest_road*(1-bark)/basic_wood_d*forwarding_forwarder/sum_RP_m3+cleft_timber*(1-bark)/ cleft_timber_basic_wood_d*forwarding_forwarder/sum_RP_m3+wood_chips*share_chips_in_stand/basic_wood_d/(productivity_forwarding_chips_in_stand/ ratio_bulk_solid_chips)/11*9.5/sum_RP_m3; lognormal variance with pedigree 0.306, pedigree (5,5,4,1,1)
  average input per m3; see general comment for details; covers the forwarding of stemwood PLUS the forwarding of chips chipped in the stand
- tree seedling, for planting: 0 unit; = saw_veneer_logs*(share_area_planted*planting_density*seedlings_heated/yield_wood_ub)/sum_RP_m3+pulpwood*(share_area_planted*planting_density*seedlings_heated/yield_wood_ub)/sum_RP_m3+wood_chips*(1-bark)/basic_wood_d*(share_area_planted*planting_density*seedlings_heated/yield_wood_ub)/sum_RP_m3+cleft_timber*(1-bark)/ cleft_timber_basic_wood_d*(share_area_planted*planting_density*seedlings_heated/yield_wood_ub)/sum_RP_m3
  calculated as 0% of the seedlings coming from heated greenhouses in Germany
- diesel, burned in building machine: 0.0230416 MJ; = saw_veneer_logs*(diesel_per_gravel*m_gravel)/sum_RP_m3+pulpwood*(diesel_per_gravel*m_gravel)/sum_RP_m3+wood_chips*(1-bark)/basic_wood_d*(diesel_per_gravel*m_gravel)/sum_RP_m3+cleft_timber*(1-bark)/cleft_timber_basic_wood_d*(diesel_per_gravel*m_gravel)/sum_RP_m3+saw_veneer_logs*planting_density/500*7*0.84*42.6/yield_wood_ub/sum_RP_m3+pulpwood*planting_density/500*7*0.84*42.6/yield_wood_ub/sum_RP_m3+wood_chips*(1-bark)/basic_wood_d*planting_density/500*7*0.84*42.6/yield_wood_ub/sum_RP_m3+cleft_timber*(1-bark)/ cleft_timber_basic_wood_d*planting_density/500*7*0.84*42.6/yield_wood_ub/sum_RP_m3+saw_veneer_logs*1*15*6*0.84*42.6/yield_wood_ub/sum_RP_m3+pulpwood*1*15*6*0.84*42.6/yield_wood_ub/sum_RP_m3+wood_chips*(1-bark)/basic_wood_d*1*15*6*0.84*42.6/yield_wood_ub/sum_RP_m3+cleft_timber*(1-bark)/ cleft_timber_basic_wood_d*1*15*6*0.84*42.6/yield_wood_ub/sum_RP_m3; lognormal variance with pedigree 0.306, pedigree (5,5,4,1,1)
  for distribution of gravel for maintenance of forest road over rotation period PLUS diesel for planting activities, productivity 500 seedlings/PMH, diesel consumption 7l/PMH, converted to MJ PLUS the diesel consumption used in mechanical clearing (1 intervention, 15 PMH per ha, 6 l/PMH, converted to MJ)
  properties: heating value, net 1 MJ
- clefting of energy wood: 0 hour; name clefting; = cleft_timber/cleft_timber_basic_wood_d* ratio_bulk_solid_cleft_timber/productivity_clefting_device; pedigree (1,1,1,1,1)
  no comment
- gravel, crushed: 0.0344934, 0.00315786, 0.00020849, 0.15791 kg (4 entries); lognormal variance with pedigree 0.306, pedigree (5,5,4,1,1)
  gravel for maintenance of forest road over rotation period

## Inputs from nature
- Occupation, traffic area, rail/road embankment [natural resource, land]: 0.0611779 m2*year; = saw_veneer_logs*a_transformation_road*rotation_period/sum_RP_m3+pulpwood*a_transformation_road*rotation_period/sum_RP_m3+wood_chips*(1-bark)/basic_wood_d*a_transformation_road*rotation_period/sum_RP_m3+cleft_timber*(1-bark)/ cleft_timber_basic_wood_d*a_transformation_road*rotation_period/sum_RP_m3; lognormal variance with pedigree 0.256, pedigree (5,5,4,1,1)
  Area occupied by forest roads over one roation period
- Occupation, forest, intensive [natural resource, land]: 2.77113 m2*year; = saw_veneer_logs*(a_transformation_forest*rotation_period)/sum_RP_m3+pulpwood*(a_transformation_forest*rotation_period)/sum_RP_m3+wood_chips*(1-bark)/basic_wood_d*(a_transformation_forest*rotation_period)/sum_RP_m3+cleft_timber*(1-bark)/ cleft_timber_basic_wood_d*(a_transformation_forest*rotation_period)/sum_RP_m3; lognormal variance with pedigree 0.256, pedigree (5,5,4,1,1)
  Area occupied for the production of wood over one rotation period
- Transformation, to traffic area, rail/road embankment [natural resource, land]: 0.000436985 m2; = saw_veneer_logs*a_forest_road/yield_wood_ub/sum_RP_m3+pulpwood*a_forest_road/yield_wood_ub/sum_RP_m3+wood_chips*(1-bark)/basic_wood_d*a_forest_road/yield_wood_ub/sum_RP_m3+cleft_timber*(1-bark)/ cleft_timber_basic_wood_d*a_forest_road/yield_wood_ub/sum_RP_m3; lognormal variance with pedigree 0.406, pedigree (5,5,4,1,1)
  no comment
- Transformation, from traffic area, rail/road embankment [natural resource, land]: 0.000436985 m2; = saw_veneer_logs*a_forest_road/yield_wood_ub/sum_RP_m3+pulpwood*a_forest_road/yield_wood_ub/sum_RP_m3+wood_chips*(1-bark)/basic_wood_d*a_forest_road/yield_wood_ub/sum_RP_m3+cleft_timber*(1-bark)/ cleft_timber_basic_wood_d*a_forest_road/yield_wood_ub/sum_RP_m3; lognormal variance with pedigree 0.406, pedigree (5,5,4,1,1)
  Area of forest roads per ha
- Transformation, from forest, intensive [natural resource, land]: 0.0197938 m2; = saw_veneer_logs*a_transformation_forest/sum_RP_m3+pulpwood*a_transformation_forest/sum_RP_m3+wood_chips*(1-bark)/basic_wood_d*a_transformation_forest/sum_RP_m3+cleft_timber*(1-bark)/ cleft_timber_basic_wood_d*a_transformation_forest/sum_RP_m3; lognormal variance with pedigree 0.406, pedigree (5,5,4,1,1)
  Area of forest, excluding forest roads per ha
- Transformation, to forest, intensive [natural resource, land]: 0.0197938 m2; = saw_veneer_logs*a_transformation_forest/sum_RP_m3+pulpwood*a_transformation_forest/sum_RP_m3+wood_chips*(1-bark)/basic_wood_d*a_transformation_forest/sum_RP_m3+cleft_timber*(1-bark)/ cleft_timber_basic_wood_d*a_transformation_forest/sum_RP_m3; lognormal variance with pedigree 0.406, pedigree (5,5,4,1,1)
  no comment
- Energy, gross calorific value, in biomass [natural resource, biotic]: 19.6 MJ; = saw_veneer_logs/(1-bark)*saw_veneer_logs_basic_wood_d*saw_veneer_logs_Gross_Heat_Value/sum_RP_m3+pulpwood/(1-bark)*pulpwood_basic_wood_d*pulpwood_Gross_Heat_Value/sum_RP_m3+wood_chips*wood_chips_Gross_Heat_Value/sum_RP_m3+cleft_timber*cleft_timber_Gross_Heat_Value/sum_RP_m3
  Energy content of wood
- Wood, hard, standing [natural resource, biotic]: 0.00166297 m3; name v_wood_standing; = saw_veneer_logs/sum_RP_m3+pulpwood/sum_RP_m3+wood_chips*(1-bark)/basic_wood_d/sum_RP_m3+cleft_timber*(1-bark)/ cleft_timber_basic_wood_d/sum_RP_m3; lognormal variance with pedigree 0.081, pedigree (5,5,4,1,1)
  Resource input, referring to wood under bark
- Carbon dioxide, in air [natural resource, in air]: 1.81133 kg; = saw_veneer_logs/(1-bark)*basic_wood_d* saw_veneer_logs_C_content_non_fossil/12*44/sum_RP_m3+pulpwood/(1-bark)*basic_wood_d* pulpwood_C_content_non_fossil/12*44/sum_RP_m3+wood_chips* chips_C_content_non_fossil/12*44/sum_RP_m3+cleft_timber* cleft_timber_C_content_non_fossil/12*44/sum_RP_m3; lognormal variance with pedigree 0.033, pedigree (1,1,4,1,1)
  Resource input, referring to total biomass harvested, i.e. wood including bark

## Sampling procedure
Literature

## Extrapolations
see Geography and Technology
