# electricity production, hard coal

Dataset: EcoSpold 2, unit process
Geography: PE
Time period: 2012-01-01 to 2021-12-31
Technology level: current
Classification: EcoSpold01Categories: hard coal/power plants
Classification: ISIC rev.4 ecoinvent: 3510:Electric power generation, transmission and distribution
Synonyms: anthracite; coking coal; other bituminous coal
Tags: fossil fuels; coal power; hard coal power
Scenario: Business-as-Usual
System model: Allocation, cut-off by classification
Generated by: Alfredo Pro Castaneyra
Published in: Suppen N. 2017
Database: ecoinvent
isCopyrightProtected: true
accessRestrictedTo: 1

## General comment
This dataset represents the production of high voltage electricity in an average hard coal power plant Peru in 2017. 'Hard coal' includes anthracite, coking coal and other bituminous coal according to the definition of the IEA electricity information 2014. This dataset is based on the GLO dataset, "electricity, high voltage electricity production, hard coal, GLO" (accesed October 2017), with adjustments to the peruvian context in year 2014. .The efficiency and net electricity production parameters updated using 2014 data fromr one plant in Peru, the ILO2 TV1. The ILO2 TV1 plant has a simple steam cycle and is located in the south of the country; this plant was built due to the unreliability of the Central - South connection of the country, which is why it enters into operation when the southern demand increases and the transmission lines can not meet the existing demand. This plant is being removed from operations as per the new transmission projects that have started implementation in 2017 (COES, 2014 and MINEM, 2014).
Comments on the inventory data of emissions:
The fuel consumption per kWh considered in this dataset was obtained for one plant in Peru.

The emissions of CO, CO2, CH4, SO2, NOx and particulates were estimated by using emisions factors from
United States Environmental Protection Agency | US EPA (EPA, 1996), as per the recommendations found in OSINERGMIN, supervisory body for energy and mining investment (OSINERGMIN, 2017). (Ministerio de Energía y Minas, 2014; Subdirección de Gestión de la Información. COES, 2014)
Other emissions were obtained from dataset "electricity, high voltage electricity production, hard coal, PE, 2008-2008" (accesed October 2017).
Net production of electricity : 163208370 kWh.
Sources: COES, 2014. Sub Dirección de Gestión de la Información. RA-SGI-0115. ESTADISTICA RELEVANTE DEL SISTEMA ELÉCTRICO INTERCONECTADO NACIONAL, (2014). Cap. 06 PRODUCCIÓN TERMOELÉCTRICA Y CONSUMO DE COMBUSTIBLE. Retrieved online from http://www.coes.org.pe/Portal/Publicaciones/Estadisticas/ 2014/PDF/06_PRODUCCION TERMOELECTRICA Y CONSUMO DE COMBUSTIBLE ,CUADRO N° 6.2 RENDIMIENTO PROMEDIO ANUAL - 2014 and CUADRO N° 5.6 PRODUCCIÓN DE ENERGÍA ELECTRICA ANUAL POR CENTRAL Y TIPO DE GENERACIÓN 2014 (GW.h). November 14, 2017.
MINEM, 2014.Ministerio de Energía y Minas. Anuario Ejecutivo de Electricidad 2014. Dirección General de Electricidad. Retrieved online from http://www.minem.gob.pe/_estadisticaSector.php?idSector=6
OSINERGMIN, 2015. Oganismo Supervisor de la Energía y Mineria. La industria de los hidrocarburos líquidos en el Perú: 20 años de aporte al desarrollo del país, pp.36 (2015 )http://www.osinergmin.gob.pe/seccion/centro_documental/Institucional/Estudios_Economicos/Libros/anexo-industria-hidrocarburos-liquidos-Peru.pdf. Retrieved online 24 august 2017.
EPA, 1996. US Environmental Protection Agency (1996). AP 42 -Compilation of Air Pollutant Emission Factors, Volume 1: Stationary Point and Area Sources Compilation of Air Pollutant Emission Factors, AP-42, AP 42, Fifth Edition. Fuel Oil Combustion, F1.2
Anthracite Coal Combustion Final Section - Supplement B, October 1996 . https://www3.epa.gov/ttn/chief/ap42/ch01/index.html. Retrieved online 24 august 2017.
IEA. 2014. Electricity Information 2014. ISBN 978-92-64-21692-1. International Energy Agency (IEA), Paris Cedex (FR)
European Environment Agency (1991) CORINAIR Inventory; VOC's Default Emission Factors

## Included activities start
From the constructed hard coal power plant ready to produce electricity.
From reception of hard coal and operating materials at power plant gate.

## Included activities end
This activity ends with 1kWh of high voltage electricity produced at the power plant and arrived at the busbar.

This dataset includes:
- all operation and maintenance activities and materials of the power plants.
- Use of fuel oil for startup
- Particle removal (dedusting of the flue gas)

- Desulfurisation and denitrification. These processes are described in separate modules; it can be decided by changing the values of NOx and SOx retained whether and how much DeNOx and DeSOx are installed.
- Cooling: It is assumed that all plants use wet cooling with a cooling tower. No cooling tower is included in this dataset (will be implemented in future versions)
- Loss of feed water

This dataset doesn't include
- raw materials extraction, decommissioning and waste treatment as these activities are already included in the infrastructure datasets
- transformation of the electricity produced
- The disposal of non-recycled ashes is modelled separately.

## Geography
In Peru, the Economic Operation Committee of the National Interconnected System (COES) is divided in three operation areas, north, central and south. The power plant used to model this dataset is located in the south operation area.

## Technology
POWER PLANT:
As reported in "electricity, high voltage electricity production, hard coal, PE, 2008-2008" (accesed October 2017): Hard coal power plant input is a market mix of 100MWe power plants (representing all power plants with a capacity <250MWe and 7% of the installed capacity) and 500MWe power plants (representing all power plants with a capacity >250MWe and 93% of the installed capacity). The plants are used for middle load with 4000 hours of operation at full capacity per year. The plants are assumed to operate 150000 hours during its lifetime.
OTHER DATA:
- Share of installed capacity with desulfurisation 2% (rough estimation based on sulfur mass balance
- Average efficiency of desulfurisation installations: 92% (rough estimation based on Dones et al. 27
- Share of installed capacity with denitrification (primary and/or secondary installations): 73% (figure based on IEA 212 )
- Average efficiency of denitrification installations: 8% (estimation based on Dones et al. 27, p.128. Valid for selective catalytic reaction systems)
- Share of installed capacity with particle filters: 98% (figure based on IEA 212 )
- Average efficiency of particle filters: 98% (figure based on IEA 212 )
- IEA 2012. Coal Power Database. International Energy Agency Clean Coal Centre, London
- IEA/OECD. 2010. Electricity Information 2010. International Energy Agency (IEA), Paris Cedex (FR). Part IV. Detailed OECD Electricity And Heat Data.
- Dones, R., Bauer, C., Röder, A. (2007) Kohle. In: Dones, R. (Ed.) et al., Sachbilanzen von Energiesystemen: Grundlagen für den ökologischen Vergleich von Energiesystemen und den Einbezug von Energiesystemen in Ökobilanzen für die Schweiz. Final report ecoinvent No.

## Time period
The Annual Production Volume is valid for the year 2012.

## Parameters
- fraction, cooling water, to air: 0.0299662 dimensionless; name fraction_CW_to_air; = (WConsumption_EP_HC_recirculatingCS*recirculating_CS_fraction_from_allCS+WConsumption_EP_HC_once_through_andCP_CS*once_through_andCP_CS_fractio_from_allCS)/(WWithdrawal_EP_HC_recirculating_CS*recirculating_CS_fraction_from_allCS+WWithdrawal_EP_HC_once_through_andCP_CS*once_through_andCP_CS_fractio_from_allCS); lognormal variance with pedigree 0.092025, pedigree (4,4,3,2,4)
  Calculated as in the dataset "electricity, high voltage electricity production, hard coal, PE, 2008-2008" (accesed October 2017),
- fraction, water, decarbonised, to air: 0.0299662 dimensionless; name fraction_WDC_to_air; = fraction_CW_to_air; lognormal variance with pedigree 0.092025, pedigree (4,4,3,2,4)
  Calculated value as in "electricity, high voltage electricity production, hard coal, PE, 2008-2008" (accesed October 2017). See comments in the other parametres present in this dataset. Decarbonised water is considered to be always used as cooling water, thus cooling water fractions to air are applied to all carbonised water input flows to calculate the amount of water consumed in the processes.
- water consumption, electricity production from hard coal, recirculating CS: 0.0018 m3/kWh; name WConsumption_EP_HC_recirculatingCS; lognormal variance with pedigree 0.092025, pedigree (4,4,3,2,4)
  Estimated based on literature as per "electricity, high voltage electricity production, hard coal, PE, 2008-2008" (accesed October 2017). (Scown, 2011, Water Footprint of U.S. Transportation Fuels, SI). The amount of water consumed while burning lignite and peat is assumed to be the same as in case of coal.
- factor: input of MJ for the production of 1 kWh: 10.9157 MJ/kWh; name factor_MJ_kWh; = 1*3.6/efficiency; undefined min 11.1801, max 11.1801, standardDeviation95 0, pedigree (1,1,1,1,1)
  Calculated value. 3.6 MJ = 1kWh.
- losses from gross electricity production: 0.07 dimensionless; name losses_gross_net; lognormal variance with pedigree 0.017225, pedigree (4,3,1,2,3)
  Literature value taken from "electricity, high voltage electricity production, hard coal, PE, 2008-2008" (accesed October 2017). Own use of electricity plants in this country in 2012. The default loss as described by the IEA in the electricity statistic is applied, which is 0.07 (IEA electricity information 2014: The difference between gross and net electricity production is generally observed to be about 7% for conventional thermal stations, 1% for hydro stations and 6% for nuclear.)
  IEA. 2014. Electricity Information 2014. ISBN 978-92-64-21692-1. International Energy Agency (IEA), Paris Cedex (FR).
  Uncertainty: Generic IEA value used.
- once-through and cooling pond cooling systems as a fraction of all cooling syste: 0.625 dimensionless; name once_through_andCP_CS_fractio_from_allCS; lognormal variance with pedigree 0.092025, pedigree (4,4,3,2,4)
  Calculated as reported in "electricity, high voltage electricity production, hard coal, PE, 2008-2008" (accesed October 2017), as an average of data available for Europe (Floerke, 2008, Future changes of freshwater needs in the electricity production sector) and USA (NERL, 2011, Estimating freshwater needs to meet future thermoelectric generation requirements).
- gross electricity production: 1.75493e8 kWh; name gross_electricity; lognormal variance with pedigree 0.0012, pedigree (2,1,1,1,1)
  Calculated value.
  Annual production volume (Net production) (kWh) and the amount of losses (gross to net). The production values as reported in COES, 2014. Sub Dirección de Gestión de la Información. RA-SGI-0115. ESTADISTICA RELEVANTE DEL SISTEMA ELÉCTRICO INTERCONECTADO NACIONAL, (2014). Cap. 06 PRODUCCIÓN TERMOELÉCTRICA Y CONSUMO DE COMBUSTIBLE. Retrieved online from http://www.coes.org.pe/Portal/Publicaciones/Estadisticas/ 2014/PDF/06_PRODUCCION TERMOELECTRICA Y CONSUMO DE COMBUSTIBLE, ,CUADRO N° 6.2 RENDIMIENTO PROMEDIO ANUAL - 2014. November 14, 2017.
- efficiency: 0.3298 dimensionless; lognormal variance with pedigree 0.003325, pedigree (3,2,1,2,2)
  Literature value/calculated value. Net production (kWh) divided by coal consumption (kWh).
  Conversion factor from kcal to MJ=238.846, The calorific value used was (7053.75 kcal/kg).
  Source: <http://sisbib.unmsm.edu.pe/bibvirtualdata/publicaciones/geologia/vol11_n22/a03vol11n22.pdf> consulted 24 august 2017.
  Data on net electricity production (kWh) and hard coal consumption (MBTU), for the year 2014 in Peru, were used for the calculations (COES, 2014).
  Source:
  COES, 2014. Sub Dirección de Gestión de la Información. RA-SGI-0115. ESTADISTICA RELEVANTE DEL SISTEMA ELÉCTRICO INTERCONECTADO NACIONAL, (2014). Cap. 06 PRODUCCIÓN TERMOELÉCTRICA Y CONSUMO DE COMBUSTIBLE. Retrieved online from http://www.coes.org.pe/Portal/Publicaciones/Estadisticas/ 2014/PDF/06_PRODUCCION TERMOELECTRICA Y CONSUMO DE COMBUSTIBLE, CUADRO N° 6.3 CONSUMO DE COMBUSTIBLE EN LAS CENTRALES TERMOELÉCTRICAS 2014,CUADRO N° 6.2 RENDIMIENTO PROMEDIO ANUAL - 2014. November 14, 2017.
- water withdrawal, electricity production from hard coal, recirculating CS: 0.0021 m3/kWh; name WWithdrawal_EP_HC_recirculating_CS; lognormal variance with pedigree 0.092025, pedigree (4,4,3,2,4)
  Estimated based on literature as per "electricity, high voltage electricity production, hard coal, PE, 2008-2008" (accesed October 2017). (Scown, 2011, Water Footprint of U.S. Transportation Fuels, SI). The amount of water withdrawn while burning lignite and peat is assumed to be the same as in case of coal.
- water withdrawal, electricity production from hard coal, once-through and coolin: 0.0815 m3/kWh; name WWithdrawal_EP_HC_once_through_andCP_CS; lognormal variance with pedigree 0.092025, pedigree (4,4,3,2,4)
  (same comment as for water withdrawal, electricity production from hard coal, recirculating)
- fraction, water, completely softened, to air: 0.15 dimensionless; name fraction_WCS_to_air; = fraction_PW_to_air; lognormal variance with pedigree 0.092025, pedigree (4,4,3,2,4)
  Calculated value as per "electricity, high voltage electricity production, hard coal, PE, 2008-2008" (accesed October 2017). See comment in the other parametres present in this dataset. Water, completely softened is considered to be always used as process water, thus process water fractions to air are applied to all water, completely softened input flows to calculate the amount of water consumed in the processes.
- fraction, process water, to air: 0.15 dimensionless; name fraction_PW_to_air; lognormal variance with pedigree 0.092025, pedigree (4,4,3,2,4)
  Literature value reported in dataset, "electricity, high voltage electricity production, hard coal, PE, 2008-2008" (accesed October 2017). In case when no industry/process specific data are available, default evaporation fraction value is used. This value is 15% and is based on literature (Statistics Canada, 2007 & Shaffer, K.H., 2008, Consumptive water use in the Great Lakes Basin, USGS & Shiklomanov, 2003, World Water Resources at the Beginning of the 21st Century) and has been approved by an expert.
- recirculating cooling system as a fraction of all cooling systems: 0.375 dimensionless; name recirculating_CS_fraction_from_allCS; lognormal variance with pedigree 0.092025, pedigree (4,4,3,2,4)
  Calculated as in "electricity, high voltage electricity production, hard coal, PE, 2008-2008" (accesed October 2017), as an average of data available for Europe (Floerke, 2008, Future changes of freshwater needs in the electricity production sector) and USA (NERL, 2011, Estimating freshwater needs to meet future thermoelectric generation requirements).
- water consumption, electricity production from hard coal, once-through and cooli: 0.0014 m3/kWh; name WConsumption_EP_HC_once_through_andCP_CS; lognormal variance with pedigree 0.092025, pedigree (4,4,3,2,4)
  Estimated based on literature as reported in "electricity, high voltage electricity production, hard coal, PE, 2008-2008" (accesed October 2017). (Scown, 2011, Water Footprint of U.S. Transportation Fuels, SI). The amount of water consumed while burning lignite and peat is assumed to be the same as in case of coal.

## Reference product
- electricity, high voltage: 1 kWh; name electricity; By-product classification allocatable product; CPC 17100: Electrical energy
  production volume 1.63208e8 kWh; name electricity_apv; = gross_electricity*(1- losses_gross_net)
    Data from year 2014 from the ILO2 TV1 power plant. (Subdirección de Gestión de la Información. COES, 2014). Sources: COES, 2014. Sub Dirección de Gestión de la Información. RA-SGI-0115. ESTADISTICA RELEVANTE DEL SISTEMA ELÉCTRICO INTERCONECTADO NACIONAL, (2014). Cap. 06 PRODUCCIÓN TERMOELÉCTRICA Y CONSUMO DE COMBUSTIBLE. Retrieved online from http://www.coes.org.pe/Portal/Publicaciones/Estadisticas/ 2014/PDF/06_PRODUCCION TERMOELECTRICA Y CONSUMO DE COMBUSTIBLE ,CUADRO N° 6.2 RENDIMIENTO PROMEDIO ANUAL - 2014 and CUADRO N° 5.6 PRODUCCIÓN DE ENERGÍA ELECTRICA ANUAL POR CENTRAL Y TIPO DE GENERACIÓN 2014 (GW.h). November 14, 2017.
  property price 0.0977 EUR2005
    Temporary price data. Calculated as 90% of purchasers price based on: 94% of the average price (to account for a 6% loss in transformation and transmission) for electricity for industrial consumersin 2005 (excluded taxes). From IEA.

## Inputs from technosphere
- transport, freight, sea, bulk carrier for dry goods: 0 metric ton*km; pedigree (1,1,3,1,1)
  Exchange present due to parent child relationship
- water, completely softened: 0.0147017 kg; name water_completely_softened; = factor_MJ_kWh*0.00134684; lognormal variance with pedigree 0.054, pedigree (4,5,4,5,3)
  Literature value/calculated value. Value taken from the PE dataset, "electricity, high voltage electricity production, hard coal, PE, 2008-2008" (accesed October 2017), with adjustments to the peruvian context in year 2014 from the ILO2 TV1 power plant. (Subdirección de Gestión de la Información. COES, 2014). Sources: COES, 2014. Sub Dirección de Gestión de la Información. RA-SGI-0115. ESTADISTICA RELEVANTE DEL SISTEMA ELÉCTRICO INTERCONECTADO NACIONAL, (2014). Cap. 06 PRODUCCIÓN TERMOELÉCTRICA Y CONSUMO DE COMBUSTIBLE. Retrieved online from http://www.coes.org.pe/Portal/Publicaciones/Estadisticas/ 2014/PDF/06_PRODUCCION TERMOELECTRICA Y CONSUMO DE COMBUSTIBLE, CUADRO N° 6.3 CONSUMO DE COMBUSTIBLE EN LAS CENTRALES TERMOELÉCTRICAS 2014,CUADRO N° 6.2 RENDIMIENTO PROMEDIO ANUAL - 2014. November 14, 2017.
  properties: wet mass 1 kg
- chlorine, liquid: 0 kg; pedigree (1,1,3,1,1)
  Exchange present due to parent child relationship
- hard coal ash: -0.0816495 kg; name amount_ash; = (factor_MJ_kWh*0.00748)*-1; lognormal variance with pedigree 0.0986, pedigree (5,3,4,5,3)
  Literature value/calculated value. Hard coal ash produced when producing 1kWh of electricity from hard coal, based on the value for burning 1MJ of hard coal. Weighted average with electricity production data (Itten&Frischknecht 2012) and values of 12 countries
  (AT, BE, ES, FR, IT, NL, PT, DE, CZ, HR, PL, SK). These values were valid for the ash being disposed off. Now, total amount of ash has been calculated (disposed+recycled) with the data in Tab. 9.69 p. 165 in Röder et al. 2007. Globally, 74% of the lignite ash are recycled, 26% go to disposal.
  Source:
  Itten R. and Frischknecht R. (2012) Life Cycle Inventories of Electricity Mixes and Grid. ESU-services Ltd., Uster, Switzerland.
  production volume 1.33259e7 kg; = amount_ash/electricity*electricity_apv
    Calculated from the production volume of hard coal, burned in power plant in proportion to the respective output amounts.
  property price 0 EUR2005; name amount_ash_price_EUR2005
  properties: wet mass 1 kg, dry mass 1 kg
- NOx retained, by selective catalytic reduction: 0.00073 kg; name nox_retained; lognormal variance with pedigree 0.093, pedigree (4,4,5,5,4)
  Calculated value. Weighted average from all figures from countries in ecoinvent version 2 (AT, BE, BR, CN, CZ, DE, DK, ES, FI, FR, GB, ES, FI, FR, GB, HR, HU, IE, IT, JP, NL, NO, PL, PT, RO, SE, SI, SK) and the new countries for version 3.0 (AU, CA regions, CL, IN, KR, MX, MY, PE, RU, TH, TR, TW, TZ, UA, US regions, ZA). Weighting was made with net electricity production 2008 in these countries (Itten&Frischknecht 2012).
  The v2 countries BA and BG were not included in the calculation of the GLO average as they inherit all GLO values at the moment.
  properties: wet mass 1 kg, dry mass 1 kg
- light fuel oil: 0.000185567 kg; name light_fuel_oil; = factor_MJ_kWh*0.000017; lognormal variance with pedigree 0.024, pedigree (3,4,4,5,1)
  Literature value/calculated value. Light fuel oil use per 1MJ of hard coal burned, use for start-up of the power plant after shut down. Weighted average with electricity production data (Itten&Frischknecht 2012) and ight fuel oil use values of 14 countries
  (AT, BE, ES, FR, IT, NL, PT, DE, CZ, HR, PL, SK, CN, US) (Röder et al. 2007)
  Country values are typical values for hard coal plants.
  Source:
  Itten R. and Frischknecht R. (2012) Life Cycle Inventories of Electricity Mixes and Grid. ESU-services Ltd., Uster, Switzerland.
  properties: heating value, net 42.6 MJ, wet mass 1 kg, dry mass 1 kg, carbon content, fossil 0.862
- residue from cooling tower: -6.00364e-5 kg; name amount_residue; = (factor_MJ_kWh*0.000005*1.1)*-1; lognormal variance with pedigree 0.0812, pedigree (5,3,4,5,2)
  Literature value/calculated value. Amount of cooling tower needed for producing 1kWh of electricity from hard coal, based on the value for burning 1MJ of hard coal. Weighted average with electricity production data (Itten&Frischknecht 2012) and values of 14 countries
  (AT, BE, ES, FR, IT, NL, PT, DE, CZ, HR, PL, SK, CN, US) (Röder et al. 2007) .
  Country values calculated from mass balance.
  Source:
  Itten R. and Frischknecht R. (2012) Life Cycle Inventories of Electricity Mixes and Grid. ESU-services Ltd., Uster, Switzerland.
  production volume 9798.44 kg; = amount_residue/electricity*electricity_apv
    (same comment as for hard coal ash)
  property price 0 EUR2005; name amount_residue_price_EUR2005
  properties: water content 0.428571, dry mass 0.7 kg, wet mass 1 kg, carbon content, fossil 0.0544233
- SOx retained, in hard coal flue gas desulfurisation: 0.00201 kg; name sox_retained; lognormal variance with pedigree 0.093, pedigree (4,4,5,5,4)
  Calculated value. Weighted average from all figures from countries in ecoinvent version 2 (AT, BE, BR, CN, CZ, DE, DK, ES, FI, FR, GB, ES, FI, FR, GB, HR, HU, IE, IT, JP, NL, NO, PL, PT, RO, SE, SI, SK) and the new countries for version 3 (AU, CA regions, CL, IN, KR, MX, MY, PE, RU, TH, TR, TW, TZ, UA, US regions, ZA). Weighting was made with net electricity production 2008 in these countries (Itten&Frischknecht 2012).
  BA and BG were not included in the calculation of the GLO average as they inherit all GLO values at the moment.
  properties: dry mass 1 kg, wet mass 1 kg
- water, decarbonised: 0.490055 kg; name water_decarbonised_user; = factor_MJ_kWh*0.04489451; lognormal variance with pedigree 0.054, pedigree (4,5,4,5,3)
  (same comment as for water, completely softened)
  properties: wet mass 1 kg
- hard coal power plant: 1.33333e-11 unit; name hard_coal_power_plant; = 1/ (150000*500*1000); source Röder, A. 2007; lognormal variance with pedigree 0.3686, pedigree (5,3,4,5,3)
  Calculated value. At the moment, the hard coal power plant input consists of a market mix of a 100MWe power plant and a 500MWe power plant
  .
  For this calculation, 4000 load hours per year are assumed. It is assumed that a total of 150'000h is reached during the lifetime. A capacity of 500MW is taken for the calculation.
- hard coal: 0.369595 kg; name hard_coal; = factor_MJ_kWh*0.0338590; lognormal variance with pedigree 0.0212, pedigree (3,3,4,5,3)
  (same comment as for water, completely softened)
  properties: water content 0.0638298, carbon content, fossil 0.845, heating value, net 27.91 MJ, dry mass 0.94 kg, wet mass 1 kg
  note on carbon content, fossil: C content 75-94% (specified in Tab 1.1, report 6, part VI). A mean content of 0.845 kg C/ kg dry hard coal was considered
  note on heating value, net: Based on the Characterization factor of Hard coal in the CED method

## Inputs from nature
- Water, cooling, unspecified natural origin [natural resource, in water]: 0.0499217 m3; name water_cooling_UNO_input; = ((recirculating_CS_fraction_from_allCS*WWithdrawal_EP_HC_recirculating_CS)+(once_through_andCP_CS_fractio_from_allCS*WWithdrawal_EP_HC_once_through_andCP_CS))/11.31*factor_MJ_kWh; lognormal variance with pedigree 0.098025, pedigree (4,4,4,2,4)
  Calculated based on literature data.

## Emissions to nature
- Dioxins, measured as 2,3,7,8-tetrachlorodibenzo-p-dioxin [air, non-urban air or from high stacks]: 1.15706e-13 kg; name dioxins; = factor_MJ_kWh*1.06E-14; lognormal variance with pedigree 0.34, pedigree (3,5,4,5,1)
  Literature value/calculated value. Emissions when producing 1kWh of electricity from hard coal, based on the value for burning 1MJ of hard coal. Weighted average with electricity production data (Itten&Frischknecht 2012) and emission values of 14 countries
  (AT, BE, ES, FR, IT, NL, PT, DE, CZ, HR, PL, SK, CN, US) (Röder et al. 2007)
  Country emissions values based on literature.
  Source:
  Itten R. and Frischknecht R. (2012) Life Cycle Inventories of Electricity Mixes and Grid. ESU-services Ltd., Uster, Switzerland.
- Thorium-228 [air, non-urban air or from high stacks]: 3.60218e-5 kBq; name throium_228; = factor_MJ_kWh*0.0000033; lognormal variance with pedigree 0.3986, pedigree (5,3,4,5,3)
  Literature value/calculated value. Emissions when producing 1kWh of electricity from hard coal, based on the value for burning 1MJ of hard coal. Weighted average with electricity production data (Itten&Frischknecht 2012) and emission values of 14 countries
  (AT, BE, ES, FR, IT, NL, PT, DE, CZ, HR, PL, SK, CN, US) (Röder et al. 2007)
  Country emissions values calculated from trace element balance, input uncertain
  Source:
  Itten R. and Frischknecht R. (2012) Life Cycle Inventories of Electricity Mixes and Grid. ESU-services Ltd., Uster, Switzerland.
- Strontium [air, non-urban air or from high stacks]: 6.4621e-7 kg; name strontium; = factor_MJ_kWh*0.0000000592; lognormal variance with pedigree 0.7486, pedigree (5,3,4,5,3)
  (same comment as for Thorium-228)
- Cobalt [air, non-urban air or from high stacks]: 3.64585e-8 kg; name cobalt; = factor_MJ_kWh*0.00000000334; lognormal variance with pedigree 0.7486, pedigree (5,3,4,5,3)
  (same comment as for Thorium-228)
- Pentane [air, non-urban air or from high stacks]: 9.49666e-7 kg; name pentane; = factor_MJ_kWh*0.000000087; lognormal variance with pedigree 0.08, pedigree (3,5,4,5,1)
  (same comment as for Dioxins, measured as 2,3,7,8-tetrachlorodibenzo-p-dioxin)
- Carbon disulfide [air, non-urban air or from high stacks]: 1.16798e-8 kg; name carbon_disulfide; = factor_MJ_kWh*0.00000000107; lognormal variance with pedigree 0.3206, pedigree (3,3,4,5,3)
  Literature value/calculated value. Emissions when producing 1kWh of electricity from hard coal, based on the value for burning 1MJ of hard coal. Weighted average with electricity production data (Itten&Frischknecht 2012) and emission values of 14 countries
  (AT, BE, ES, FR, IT, NL, PT, DE, CZ, HR, PL, SK, CN, US) (Röder et al. 2007)
  Source:
  Itten R. and Frischknecht R. (2012) Life Cycle Inventories of Electricity Mixes and Grid. ESU-services Ltd., Uster, Switzerland.
- Propane [air, non-urban air or from high stacks]: 2.25955e-7 kg; name propane; = factor_MJ_kWh*0.0000000207; lognormal variance with pedigree 0.08, pedigree (3,5,4,5,1)
  (same comment as for Dioxins, measured as 2,3,7,8-tetrachlorodibenzo-p-dioxin)
- Methane, monochloro-, R-40 [air, non-urban air or from high stacks]: 4.77016e-8 kg; name methane_monochloro; = factor_MJ_kWh*0.00000000437; lognormal variance with pedigree 0.1406, pedigree (3,3,4,5,3)
  (same comment as for Dioxins, measured as 2,3,7,8-tetrachlorodibenzo-p-dioxin)
- Bromine [air, non-urban air or from high stacks]: 3.41662e-6 kg; name bromine; = factor_MJ_kWh*0.000000313; lognormal variance with pedigree 0.1806, pedigree (3,3,4,5,3)
  (same comment as for Thorium-228)
- Particulates, > 10 um [air, non-urban air or from high stacks]: 0.000591304 kg; name particulates_gt10; = factor_MJ_kWh*0.00005417; lognormal variance with pedigree 0.093, pedigree (4,4,5,5,4)
  Calculated Emissions when producing 1kWh of electricity, based on the value for burning hard coal. Electricity production data of one plant of hard coal type in Peru ILO2 TV1 (Subdirección de Gestión de la Información. COES, 2014) and emission values estimated with EPA emissions factor for particulates, (1.6 kg PM>10/tonne coal.) (EPA, 1996). PM removal has not been assumed.
  The calorific value used was (7053.75 kcal/kg). Source: <http://sisbib.unmsm.edu.pe/bibvirtualdata/publicaciones/geologia/vol11_n22/a03vol11n22.pdf> consulted 24 august 2017.
  Source:
  COES, 2014. Sub Dirección de Gestión de la Información. RA-SGI-0115. ESTADISTICA RELEVANTE DEL SISTEMA ELÉCTRICO INTERCONECTADO NACIONAL, (2014). Cap. 06 PRODUCCIÓN TERMOELÉCTRICA Y CONSUMO DE COMBUSTIBLE. Retrieved online from http://www.coes.org.pe/Portal/Publicaciones/Estadisticas/ 2014/PDF/06_PRODUCCION TERMOELECTRICA Y CONSUMO DE COMBUSTIBLE ,CUADRO N° 6.2 RENDIMIENTO PROMEDIO ANUAL - 2014 and CUADRO N° 5.6 PRODUCCIÓN DE ENERGÍA ELECTRICA ANUAL POR CENTRAL Y TIPO DE GENERACIÓN 2014 (GW.h). November 14, 2017. EPA, 1996. US Environmental Protection Agency (1996). AP 42 -Compilation of Air Pollutant Emission Factors, Volume 1: Stationary Point and Area Sources Compilation of Air Pollutant Emission Factors, AP-42, AP 42, Fifth Edition. Fuel Oil Combustion, F1.2
  Anthracite Coal Combustion Final Section - Supplement B, October 1996 . https://www3.epa.gov/ttn/chief/ap42/ch01/index.html. Retrieved online 24 august 2017.
- Hydrocarbons, chlorinated [air, non-urban air or from high stacks]: 1.82292e-8 kg; name hydrocarbons_chlorinated; = factor_MJ_kWh*0.00000000167; lognormal variance with pedigree 0.1786, pedigree (5,3,4,5,3)
  (same comment as for Dioxins, measured as 2,3,7,8-tetrachlorodibenzo-p-dioxin)
- Cadmium [air, non-urban air or from high stacks]: 1.13523e-8 kg; name cadmium; = factor_MJ_kWh*0.00000000104; lognormal variance with pedigree 0.7486, pedigree (5,3,4,5,3)
  (same comment as for Thorium-228)
- Zinc [air, non-urban air or from high stacks]: 4.54093e-7 kg; name zinc; = factor_MJ_kWh*0.0000000416; lognormal variance with pedigree 0.7486, pedigree (5,3,4,5,3)
  (same comment as for Thorium-228)
- Hydrocarbons, aliphatic, unsaturated [air, non-urban air or from high stacks]: 1.39721e-6 kg; name hydrocarbons_aliphatic_unsaturated; = factor_MJ_kWh*0.000000128; lognormal variance with pedigree 0.08, pedigree (3,5,4,5,1)
  (same comment as for Dioxins, measured as 2,3,7,8-tetrachlorodibenzo-p-dioxin)
- Formaldehyde [air, non-urban air or from high stacks]: 3.9624e-7 kg; name formaldehyde; = factor_MJ_kWh*0.0000000363; lognormal variance with pedigree 0.08, pedigree (3,5,4,5,1)
  (same comment as for Dioxins, measured as 2,3,7,8-tetrachlorodibenzo-p-dioxin)
- Acenaphthene [air, non-urban air or from high stacks]: 4.5846e-11 kg; name acenaphthene; = factor_MJ_kWh*0.0000000000042; lognormal variance with pedigree 0.1406, pedigree (3,3,4,5,3)
  (same comment as for Dioxins, measured as 2,3,7,8-tetrachlorodibenzo-p-dioxin)
- Hexane [air, non-urban air or from high stacks]: 6.05822e-9 kg; name hexane; = factor_MJ_kWh*0.000000000555; lognormal variance with pedigree 0.1786, pedigree (5,3,4,5,3)
  (same comment as for Dioxins, measured as 2,3,7,8-tetrachlorodibenzo-p-dioxin)
- Chromium [air, non-urban air or from high stacks]: 8.95088e-8 kg; name chromium; = factor_MJ_kWh*0.0000000082; lognormal variance with pedigree 0.7486, pedigree (5,3,4,5,3)
  (same comment as for Thorium-228)
- Lead-210 [air, non-urban air or from high stacks]: 0.000756458 kBq; name lead_210; = factor_MJ_kWh*0.0000693; lognormal variance with pedigree 0.3986, pedigree (5,3,4,5,3)
  (same comment as for Thorium-228)
- Arsenic [air, non-urban air or from high stacks]: 1.0883e-7 kg; name arsenic; = factor_MJ_kWh*0.00000000997; lognormal variance with pedigree 0.7486, pedigree (5,3,4,5,3)
  (same comment as for Thorium-228)
- Toluene [air, non-urban air or from high stacks]: 7.25894e-7 kg; name toluene; = factor_MJ_kWh*0.0000000665; lognormal variance with pedigree 0.08, pedigree (3,5,4,5,1)
  (same comment as for Dioxins, measured as 2,3,7,8-tetrachlorodibenzo-p-dioxin)
- Nitrogen oxides [air, non-urban air or from high stacks]: 0.00166323 kg; name nitrogen_oxides; = factor_MJ_kWh*0.00015237; lognormal variance with pedigree 0.093, pedigree (4,4,5,5,4)
  Calculated Emissions when producing 1kWh of electricity, based on the value for burning hard coal. Electricity production data of one plant of hard coal type in Peru ILO2 TV1 (Subdirección de Gestión de la Información. COES, 2014) and emission values estimated with EPA emissions factor for nitrogen oxide (4.5 kg NOx/tonne coal) (EPA, 1996).
  The calorific value used was (7053.75 kcal/kg). Source: <http://sisbib.unmsm.edu.pe/bibvirtualdata/publicaciones/geologia/vol11_n22/a03vol11n22.pdf> consulted 24 august 2017.
  NOx treatment was not considered.
  Sources:
  COES, 2014. Sub Dirección de Gestión de la Información. RA-SGI-0115. ESTADISTICA RELEVANTE DEL SISTEMA ELÉCTRICO INTERCONECTADO NACIONAL, (2014). Cap. 06 PRODUCCIÓN TERMOELÉCTRICA Y CONSUMO DE COMBUSTIBLE. Retrieved online from http://www.coes.org.pe/Portal/Publicaciones/Estadisticas/ 2014/PDF/06_PRODUCCION TERMOELECTRICA Y CONSUMO DE COMBUSTIBLE ,CUADRO N° 6.2 RENDIMIENTO PROMEDIO ANUAL - 2014 and CUADRO N° 5.6 PRODUCCIÓN DE ENERGÍA ELECTRICA ANUAL POR CENTRAL Y TIPO DE GENERACIÓN 2014 (GW.h). November 14, 2017. EPA, 1996. US Environmental Protection Agency (1996). AP 42 -Compilation of Air Pollutant Emission Factors, Volume 1: Stationary Point and Area Sources Compilation of Air Pollutant Emission Factors, AP-42, AP 42, Fifth Edition. Fuel Oil Combustion, F1.2
  Anthracite Coal Combustion Final Section - Supplement B, October 1996 . https://www3.epa.gov/ttn/chief/ap42/ch01/index.html. Retrieved online 24 august 2017.
- Uranium-238 [air, non-urban air or from high stacks]: 0.00017356 kBq; name uranium_238; = factor_MJ_kWh*0.0000159; lognormal variance with pedigree 0.3986, pedigree (5,3,4,5,3)
  (same comment as for Thorium-228)
- Mercury [air, non-urban air or from high stacks]: 2.94724e-8 kg; name mercury; = factor_MJ_kWh*0.0000000027; lognormal variance with pedigree 0.7486, pedigree (5,3,4,5,3)
  (same comment as for Thorium-228)
- Polonium-210 [air, non-urban air or from high stacks]: 0.00134263 kBq; name polonium_210; = factor_MJ_kWh*0.000123; lognormal variance with pedigree 0.3986, pedigree (5,3,4,5,3)
  (same comment as for Thorium-228)
- Propene [air, non-urban air or from high stacks]: 1.03372e-7 kg; name propene; = factor_MJ_kWh*0.00000000947; lognormal variance with pedigree 0.08, pedigree (3,5,4,5,1)
  (same comment as for Dioxins, measured as 2,3,7,8-tetrachlorodibenzo-p-dioxin)
- Hydrogen chloride [air, non-urban air or from high stacks]: 0.000289266 kg; name hydrogen_chloride; = factor_MJ_kWh*0.0000265; lognormal variance with pedigree 0.2186, pedigree (5,3,4,5,3)
  (same comment as for Thorium-228)
- Molybdenum [air, non-urban air or from high stacks]: 1.25531e-8 kg; name molybdenum; = factor_MJ_kWh*0.00000000115; lognormal variance with pedigree 0.7486, pedigree (5,3,4,5,3)
  (same comment as for Thorium-228)
- PAH, polycyclic aromatic hydrocarbons [air, non-urban air or from high stacks]: 8.17586e-8 kg; name pah; = factor_MJ_kWh*0.00000000749; lognormal variance with pedigree 0.34, pedigree (3,5,4,5,1)
  (same comment as for Dioxins, measured as 2,3,7,8-tetrachlorodibenzo-p-dioxin)
- Thorium-232 [air, non-urban air or from high stacks]: 5.27229e-5 kBq; name thorium_232; = factor_MJ_kWh*0.00000483; lognormal variance with pedigree 0.3986, pedigree (5,3,4,5,3)
  (same comment as for Thorium-228)
- Lead [air, non-urban air or from high stacks]: 4.04973e-7 kg; name lead; = factor_MJ_kWh*0.0000000371; lognormal variance with pedigree 0.7486, pedigree (5,3,4,5,3)
  (same comment as for Thorium-228)
- Vanadium [air, non-urban air or from high stacks]: 1.61552e-7 kg; name vanadium; = factor_MJ_kWh*0.0000000148; lognormal variance with pedigree 0.7486, pedigree (5,3,4,5,3)
  (same comment as for Thorium-228)
- Antimony [air, non-urban air or from high stacks]: 1.30988e-8 kg; name antimony; = factor_MJ_kWh*0.0000000012; lognormal variance with pedigree 0.7486, pedigree (5,3,4,5,3)
  (same comment as for Thorium-228)
- Butane [air, non-urban air or from high stacks]: 1.22256e-7 kg; name butane; = factor_MJ_kWh*0.0000000112; lognormal variance with pedigree 0.08, pedigree (3,5,4,5,1)
  (same comment as for Dioxins, measured as 2,3,7,8-tetrachlorodibenzo-p-dioxin)
- Radium-226 [air, non-urban air or from high stacks]: 0.000199757 kBq; name radium_226; = factor_MJ_kWh*0.0000183; lognormal variance with pedigree 0.3907, pedigree (3,3,5,3,3)
  (same comment as for Thorium-228)
- Sulfur dioxide [air, non-urban air or from high stacks]: 0.00412002 kg; name sulfur_dioxide; = factor_MJ_kWh*0.00037744; lognormal variance with pedigree 0.093, pedigree (4,4,5,5,4)
  Literature value. Value taken from the PE dataset, "electricity, high voltage electricity production, hard coal, PE, 2012"
- Radium-228 [air, non-urban air or from high stacks]: 6.45118e-5 kBq; name radium_228; = factor_MJ_kWh*0.00000591; lognormal variance with pedigree 0.3986, pedigree (5,3,4,5,3)
  (same comment as for Thorium-228)
- Hydrocarbons, aliphatic, alkanes, cyclic [air, non-urban air or from high stacks]: 5.20679e-8 kg; name hydrocarbons_al_al_cyclic; = factor_MJ_kWh*0.00000000477; lognormal variance with pedigree 0.1406, pedigree (3,3,4,5,3)
  (same comment as for Dioxins, measured as 2,3,7,8-tetrachlorodibenzo-p-dioxin)
- Nickel [air, non-urban air or from high stacks]: 2.18314e-7 kg; name nickel; = factor_MJ_kWh*0.00000002; lognormal variance with pedigree 0.7486, pedigree (5,3,4,5,3)
  (same comment as for Thorium-228)
- Manganese [air, non-urban air or from high stacks]: 3.90782e-7 kg; name manganese; = factor_MJ_kWh*0.0000000358; lognormal variance with pedigree 0.7486, pedigree (5,3,4,5,3)
  (same comment as for Thorium-228)
- Selenium [air, non-urban air or from high stacks]: 1.80109e-7 kg; name selenium; = factor_MJ_kWh*0.0000000165; lognormal variance with pedigree 0.7486, pedigree (5,3,4,5,3)
  (same comment as for Thorium-228)
- Thorium-230 [air, non-urban air or from high stacks]: 1.12432e-5 kBq; name thorium_230; = factor_MJ_kWh*0.00000103; lognormal variance with pedigree 0.3586, pedigree (5,3,4,5,3)
  (same comment as for Dioxins, measured as 2,3,7,8-tetrachlorodibenzo-p-dioxin)
- Furan [air, non-urban air or from high stacks]: 4.49727e-13 kg; name furan; = factor_MJ_kWh*4.12E-14; lognormal variance with pedigree 0.1406, pedigree (3,3,4,5,3)
  (same comment as for Dioxins, measured as 2,3,7,8-tetrachlorodibenzo-p-dioxin)
- Benzo(a)pyrene [air, non-urban air or from high stacks]: 4.70467e-12 kg; name benzo_a_pyrene; = factor_MJ_kWh*0.000000000000431; lognormal variance with pedigree 0.08, pedigree (3,5,4,5,1)
  (same comment as for Dioxins, measured as 2,3,7,8-tetrachlorodibenzo-p-dioxin)
- Cumene [air, non-urban air or from high stacks]: 4.90115e-10 kg; name cumene; = factor_MJ_kWh*0.0000000000449; lognormal variance with pedigree 0.124, pedigree (1,1,3,5,1)
  (same comment as for Carbon disulfide)
- Xylene [air, non-urban air or from high stacks]: 5.95998e-6 kg; name xylene; = factor_MJ_kWh*0.000000546; lognormal variance with pedigree 0.08, pedigree (3,5,4,5,1)
  (same comment as for Dioxins, measured as 2,3,7,8-tetrachlorodibenzo-p-dioxin)
- Water [water, unspecified]: 0.0489136 m3; name water_to_water_unspecified; = (water_completely_softened/1000)*(1-fraction_WCS_to_air)+(water_decarbonised_user/1000)*(1-fraction_WDC_to_air)+water_cooling_UNO_input*(1-fraction_CW_to_air); lognormal variance with pedigree 0.098025, pedigree (4,4,4,2,4)
  Calculated value based on literature values and expert opinion. See comments in the parametres' comment field.
  property fraction, origin: salt water 0; name fraction_origin_salt_water_Ww
  property fraction, origin: unspecified 0.957054; name fraction_origin_unspecified_Ww
  property fraction, origin: fresh water 0.0429463; name fraction_origin_fresh_water_Ww
- Thorium-234 [air, non-urban air or from high stacks]: 1.12432e-5 kBq; name thorium_234; = factor_MJ_kWh*0.00000103; lognormal variance with pedigree 0.3206, pedigree (3,3,4,5,3)
  (same comment as for Dioxins, measured as 2,3,7,8-tetrachlorodibenzo-p-dioxin)
- Water [air, unspecified]: 0.00151285 m3; name water_to_air_unspecified; = (water_completely_softened/1000)*fraction_WCS_to_air+(water_decarbonised_user/1000)*fraction_WDC_to_air+water_cooling_UNO_input*fraction_CW_to_air; lognormal variance with pedigree 0.098025, pedigree (4,4,4,2,4)
  (same comment as for Water)
  property fraction, origin: fresh water 0.047882; name fraction_origin_fresh_water
  property fraction, origin: unspecified 0.952118; name fraction_origin_unspecified
  property fraction, origin: salt water 0; name fraction_origin_salt_water
- Ethane [air, non-urban air or from high stacks]: 2.65252e-7 kg; name ethane; = factor_MJ_kWh*0.0000000243; lognormal variance with pedigree 0.08, pedigree (3,5,4,5,1)
  (same comment as for Dioxins, measured as 2,3,7,8-tetrachlorodibenzo-p-dioxin)
- Protactinium-234 [air, non-urban air or from high stacks]: 1.12432e-5 kBq; name protactinium_234; = factor_MJ_kWh*0.00000103; lognormal variance with pedigree 0.3206, pedigree (3,3,4,5,3)
  (same comment as for Dioxins, measured as 2,3,7,8-tetrachlorodibenzo-p-dioxin)
- Magnesium [air, non-urban air or from high stacks]: 9.88963e-7 kg; name magnesium; = factor_MJ_kWh*0.0000000906; lognormal variance with pedigree 0.7086, pedigree (5,3,4,5,3)
  (same comment as for Dioxins, measured as 2,3,7,8-tetrachlorodibenzo-p-dioxin)
- Potassium-40 [air, non-urban air or from high stacks]: 0.000251061 kBq; name potassium_40; = factor_MJ_kWh*0.000023; lognormal variance with pedigree 0.3986, pedigree (5,3,4,5,3)
  (same comment as for Thorium-228)
- Particulates, > 2.5 um, and < 10um [air, non-urban air or from high stacks]: 0.000850115 kg; name particulates_2_5_to_10; = factor_MJ_kWh*0.00007788; lognormal variance with pedigree 0.093, pedigree (4,4,5,5,4)
  Calculated Emissions when producing 1kWh of electricity, based on the value for burning hard coal. Electricity production data of one plant of hard coal type in Peru ILO2 TV1 (Subdirección de Gestión de la Información. COES, 2014) and emission values estimated with EPA emissions factor for particulates, PM>2.5<10 (2.3 kg particles/tonne coal) (EPA, 1996). PM removal has not been assumed.
  The calorific value used was (7053.75 kcal/kg). Source: <http://sisbib.unmsm.edu.pe/bibvirtualdata/publicaciones/geologia/vol11_n22/a03vol11n22.pdf> consulted 24 august 2017.
  Source:
  COES, 2014. Sub Dirección de Gestión de la Información. RA-SGI-0115. ESTADISTICA RELEVANTE DEL SISTEMA ELÉCTRICO INTERCONECTADO NACIONAL, (2014). Cap. 06 PRODUCCIÓN TERMOELÉCTRICA Y CONSUMO DE COMBUSTIBLE. Retrieved online from http://www.coes.org.pe/Portal/Publicaciones/Estadisticas/ 2014/PDF/06_PRODUCCION TERMOELECTRICA Y CONSUMO DE COMBUSTIBLE ,CUADRO N° 6.2 RENDIMIENTO PROMEDIO ANUAL - 2014 and CUADRO N° 5.6 PRODUCCIÓN DE ENERGÍA ELECTRICA ANUAL POR CENTRAL Y TIPO DE GENERACIÓN 2014 (GW.h). November 14, 2017. EPA, 1996. US Environmental Protection Agency (1996). AP 42 -Compilation of Air Pollutant Emission Factors, Volume 1: Stationary Point and Area Sources Compilation of Air Pollutant Emission Factors, AP-42, AP 42, Fifth Edition. Fuel Oil Combustion, F1.2
  Anthracite Coal Combustion Final Section - Supplement B, October 1996 . https://www3.epa.gov/ttn/chief/ap42/ch01/index.html. Retrieved online 24 august 2017.
- Carbon dioxide, fossil [air, non-urban air or from high stacks]: 1.04965 kg; name carbon_dioxide_fossil; = factor_MJ_kWh*0.09615944; lognormal variance with pedigree 0.0206, pedigree (3,3,4,5,3)
  Calculated Emissions when producing 1kWh of electricity, in a hard coal power plant. The electricity production data and fuel consumption correspond to one hard coal power plant in Peru called "ILO2 TV1". The power plant consumed 60320.91 tonnes of coal producing 1.6321E+08 kWh of electricity (Subdirección de Gestión de la Información. COES, 2014).
  The emission values were estimated with EPA emissions factor for carbon dioxide (2840 kg CO2/tonne coal) (EPA, 1996).
  The calorific value used was (7053.75 kcal/kg). Source: <http://sisbib.unmsm.edu.pe/bibvirtualdata/publicaciones/geologia/vol11_n22/a03vol11n22.pdf> consulted 24 august 2017.
  The coal type was defined as anthracite because 83.15% of the coal consumed in Peru is anthracite. Source: <http://sisbib.unmsm.edu.pe/bibvirtualdata/publicaciones/geologia/vol11_n22/a03vol11n22.pdf> consulted 24 august 2017 .
  Sources:
  COES, 2014. Sub Dirección de Gestión de la Información. RA-SGI-0115. ESTADISTICA RELEVANTE DEL SISTEMA ELÉCTRICO INTERCONECTADO NACIONAL, (2014). Cap. 06 PRODUCCIÓN TERMOELÉCTRICA Y CONSUMO DE COMBUSTIBLE. Retrieved online from http://www.coes.org.pe/Portal/Publicaciones/Estadisticas/ 2014/PDF/06_PRODUCCION TERMOELECTRICA Y CONSUMO DE COMBUSTIBLE ,CUADRO N° 6.2 RENDIMIENTO PROMEDIO ANUAL - 2014 and CUADRO N° 5.6 PRODUCCIÓN DE ENERGÍA ELECTRICA ANUAL POR CENTRAL Y TIPO DE GENERACIÓN 2014 (GW.h). November 14, 2017. EPA, 1996. US Environmental Protection Agency (1996). AP 42 -Compilation of Air Pollutant Emission Factors, Volume 1: Stationary Point and Area Sources Compilation of Air Pollutant Emission Factors, AP-42, AP 42, Fifth Edition. Fuel Oil Combustion, F1.2
  Anthracite Coal Combustion Final Section - Supplement B, October 1996 . https://www3.epa.gov/ttn/chief/ap42/ch01/index.html. Retrieved online 24 august 2017
- Iodine [air, non-urban air or from high stacks]: 1.7356e-6 kg; name iodine; = factor_MJ_kWh*0.000000159; lognormal variance with pedigree 0.2186, pedigree (5,3,4,5,3)
  (same comment as for Thorium-228)
- Phenol [air, non-urban air or from high stacks]: 1.44087e-9 kg; name phenol; = factor_MJ_kWh*0.000000000132; lognormal variance with pedigree 0.1406, pedigree (3,3,4,5,3)
  (same comment as for Dioxins, measured as 2,3,7,8-tetrachlorodibenzo-p-dioxin)
- Cyanide [air, non-urban air or from high stacks]: 2.24864e-7 kg; name cyanide; = factor_MJ_kWh*0.0000000206; lognormal variance with pedigree 0.1786, pedigree (5,3,4,5,3)
  (same comment as for Carbon disulfide)
- Ethane, 1,2-dichloro- [air, non-urban air or from high stacks]: 3.59127e-9 kg; name ethane_dichloro; = factor_MJ_kWh*0.000000000329; lognormal variance with pedigree 0.1786, pedigree (5,3,4,5,3)
  (same comment as for Dioxins, measured as 2,3,7,8-tetrachlorodibenzo-p-dioxin)
- NMVOC, non-methane volatile organic compounds, unspecified origin [air, non-urban air or from high stacks]: 1.01516e-5 kg; name nmvoc; = factor_MJ_kWh*0.00000093; lognormal variance with pedigree 0.1406, pedigree (3,3,4,5,3)
  (same comment as for Dioxins, measured as 2,3,7,8-tetrachlorodibenzo-p-dioxin)
- Benzene, ethyl- [air, non-urban air or from high stacks]: 8.45967e-9 kg; name benzene_ethyl; = factor_MJ_kWh*0.000000000775; lognormal variance with pedigree 0.1406, pedigree (3,3,4,5,3)
  (same comment as for Carbon disulfide)
- Dinitrogen monoxide [air, non-urban air or from high stacks]: 1.44087e-5 kg; name dinitrogen_monoxide; = factor_MJ_kWh*0.00000132; lognormal variance with pedigree 0.074, pedigree (3,4,4,5,1)
  (same comment as for Dioxins, measured as 2,3,7,8-tetrachlorodibenzo-p-dioxin)
- Beryllium [air, non-urban air or from high stacks]: 1.88842e-9 kg; name beryllium; = factor_MJ_kWh*0.000000000173; lognormal variance with pedigree 0.6706, pedigree (3,3,4,5,3)
  (same comment as for Carbon disulfide)
- Actinides, radioactive, unspecified [air, non-urban air or from high stacks]: 0.000186659 kBq; name actinides_radioactive_unspecified; = factor_MJ_kWh*0.0000171; lognormal variance with pedigree 0.3206, pedigree (3,3,4,5,3)
  (same comment as for Dioxins, measured as 2,3,7,8-tetrachlorodibenzo-p-dioxin)
- Radon-220 [air, non-urban air or from high stacks]: 0.00553426 kBq; name radon_220; = factor_MJ_kWh*0.000507; lognormal variance with pedigree 0.3986, pedigree (5,3,4,5,3)
  (same comment as for Thorium-228)
- Sulfate [air, non-urban air or from high stacks]: 4.30079e-9 kg; name sulfate; = factor_MJ_kWh*0.000000000394; lognormal variance with pedigree 0.1786, pedigree (5,3,4,5,3)
  (same comment as for Dioxins, measured as 2,3,7,8-tetrachlorodibenzo-p-dioxin)
- Styrene [air, non-urban air or from high stacks]: 2.2268e-9 kg; name styrene; = factor_MJ_kWh*0.000000000204; lognormal variance with pedigree 0.1406, pedigree (3,3,4,5,3)
  (same comment as for Dioxins, measured as 2,3,7,8-tetrachlorodibenzo-p-dioxin)
- Benzene [air, non-urban air or from high stacks]: 1.51728e-6 kg; name benzene; = factor_MJ_kWh*0.000000139; lognormal variance with pedigree 0.088, pedigree (3,5,4,5,3)
  (same comment as for Dioxins, measured as 2,3,7,8-tetrachlorodibenzo-p-dioxin)
- Radon-222 [air, non-urban air or from high stacks]: 0.00543602 kBq; name radon_222; = factor_MJ_kWh*0.000498; lognormal variance with pedigree 0.3986, pedigree (5,3,4,5,3)
  (same comment as for Thorium-228)
- Copper [air, non-urban air or from high stacks]: 8.9618e-8 kg; name copper; = factor_MJ_kWh*0.00000000821; lognormal variance with pedigree 0.7486, pedigree (5,3,4,5,3)
  (same comment as for Thorium-228)
- Carbon monoxide, fossil [air, non-urban air or from high stacks]: 0.000110904 kg; name carbon_monoxide_fossil; = factor_MJ_kWh*0.00001016; lognormal variance with pedigree 0.674, pedigree (3,4,4,5,1)
  Calculated Emissions when producing 1kWh of electricity, based on the value for burning hard coal. Electricity production data of one plant of hard coal type in Peru ILO2 TV1 (Subdirección de Gestión de la Información. COES, 2014) and emission values estimated with EPA emissions factor for carbon monoxide (0.3 kg CO/tonne coal) (EPA, 1996).
  The calorific value used was (7053.75 kcal/kg). Source: <http://sisbib.unmsm.edu.pe/bibvirtualdata/publicaciones/geologia/vol11_n22/a03vol11n22.pdf> consulted 24 august 2017.
  Source:
  COES, 2014. Sub Dirección de Gestión de la Información. RA-SGI-0115. ESTADISTICA RELEVANTE DEL SISTEMA ELÉCTRICO INTERCONECTADO NACIONAL, (2014). Cap. 06 PRODUCCIÓN TERMOELÉCTRICA Y CONSUMO DE COMBUSTIBLE. Retrieved online from http://www.coes.org.pe/Portal/Publicaciones/Estadisticas/ 2014/PDF/06_PRODUCCION TERMOELECTRICA Y CONSUMO DE COMBUSTIBLE ,CUADRO N° 6.2 RENDIMIENTO PROMEDIO ANUAL - 2014 and CUADRO N° 5.6 PRODUCCIÓN DE ENERGÍA ELECTRICA ANUAL POR CENTRAL Y TIPO DE GENERACIÓN 2014 (GW.h). November 14, 2017. EPA, 1996. US Environmental Protection Agency (1996). AP 42 -Compilation of Air Pollutant Emission Factors, Volume 1: Stationary Point and Area Sources Compilation of Air Pollutant Emission Factors, AP-42, AP 42, Fifth Edition. Fuel Oil Combustion, F1.2
  Anthracite Coal Combustion Final Section - Supplement B, October 1996 . https://www3.epa.gov/ttn/chief/ap42/ch01/index.html. Retrieved online 24 august 2017
- Ethane, 1,1,1-trichloro-, HCFC-140 [air, non-urban air or from high stacks]: 1.80109e-9 kg; name ethane_trichloro; = factor_MJ_kWh*0.000000000165; lognormal variance with pedigree 0.1406, pedigree (3,3,4,5,3)
  (same comment as for Dioxins, measured as 2,3,7,8-tetrachlorodibenzo-p-dioxin)
- Chromium VI [air, non-urban air or from high stacks]: 1.5282e-8 kg; name chromium_vi; = factor_MJ_kWh*0.0000000014; lognormal variance with pedigree 0.5006, pedigree (3,3,4,5,3)
  Literature value/calculated value. Emissions when producing 1kWh of electricity from hard coal, based on the value for burning 1MJ of hard coal. Weighted average with electricity production data (Itten&Frischknecht 2012) and emission values of 14 countries
  (AT, BE, ES, FR, IT, NL, PT, DE, CZ, HR, PL, SK, CN, US) (Röder et al. 2007)
  Country emissions values based on range of data.
  Source:
  Itten R. and Frischknecht R. (2012) Life Cycle Inventories of Electricity Mixes and Grid. ESU-services Ltd., Uster, Switzerland.
- Methane, fossil [air, non-urban air or from high stacks]: 0.00147842 kg; name methane_fossil; = factor_MJ_kWh*0.00013544; lognormal variance with pedigree 0.074, pedigree (3,4,4,5,1)
  Calculated Emissions when producing 1kWh of electricity, based on the value for burning hard coal. Electricity production data of one plant of hard coal type in Peru ILO2 TV1 (Subdirección de Gestión de la Información. COES, 2014) and emission values estimated with EPA emissions factor for methane (4 kg CH4/tonne coal) (EPA, 1996).
  The calorific value used was (7053.75 kcal/kg). Source: <http://sisbib.unmsm.edu.pe/bibvirtualdata/publicaciones/geologia/vol11_n22/a03vol11n22.pdf> consulted 24 august 2017.
  Source:
  COES, 2014. Sub Dirección de Gestión de la Información. RA-SGI-0115. ESTADISTICA RELEVANTE DEL SISTEMA ELÉCTRICO INTERCONECTADO NACIONAL, (2014). Cap. 06 PRODUCCIÓN TERMOELÉCTRICA Y CONSUMO DE COMBUSTIBLE. Retrieved online from http://www.coes.org.pe/Portal/Publicaciones/Estadisticas/ 2014/PDF/06_PRODUCCION TERMOELECTRICA Y CONSUMO DE COMBUSTIBLE ,CUADRO N° 6.2 RENDIMIENTO PROMEDIO ANUAL - 2014 and CUADRO N° 5.6 PRODUCCIÓN DE ENERGÍA ELECTRICA ANUAL POR CENTRAL Y TIPO DE GENERACIÓN 2014 (GW.h). November 14, 2017. EPA, 1996. US Environmental Protection Agency (1996). AP 42 -Compilation of Air Pollutant Emission Factors, Volume 1: Stationary Point and Area Sources Compilation of Air Pollutant Emission Factors, AP-42, AP 42, Fifth Edition. Fuel Oil Combustion, F1.2
  Anthracite Coal Combustion Final Section - Supplement B, October 1996 . https://www3.epa.gov/ttn/chief/ap42/ch01/index.html. Retrieved online 24 august 2017.
- Hydrogen fluoride [air, non-urban air or from high stacks]: 3.08914e-5 kg; name hydrogen_fluoride; = factor_MJ_kWh*0.00000283; lognormal variance with pedigree 0.2186, pedigree (5,3,4,5,3)
  (same comment as for Thorium-228)
- Aldehydes, unspecified [air, non-urban air or from high stacks]: 8.547e-8 kg; name aldehydes_unspecified; = factor_MJ_kWh*0.00000000783; lognormal variance with pedigree 0.1406, pedigree (3,3,4,5,3)
  (same comment as for Dioxins, measured as 2,3,7,8-tetrachlorodibenzo-p-dioxin)
- Barium [air, non-urban air or from high stacks]: 7.08429e-7 kg; name barium; = factor_MJ_kWh*0.0000000649; lognormal variance with pedigree 0.7486, pedigree (5,3,4,5,3)
  (same comment as for Thorium-228)
- Ethene, tetrachloro- [air, non-urban air or from high stacks]: 3.86416e-9 kg; name ethene_tetrachloro; = factor_MJ_kWh*0.000000000354; lognormal variance with pedigree 0.1786, pedigree (5,3,4,5,3)
  (same comment as for Dioxins, measured as 2,3,7,8-tetrachlorodibenzo-p-dioxin)
- Chloroform [air, non-urban air or from high stacks]: 8.81989e-9 kg; name chloroform; = factor_MJ_kWh*0.000000000808; lognormal variance with pedigree 0.1406, pedigree (3,3,4,5,3)
  (same comment as for Carbon disulfide)
- Uranium-234 [air, non-urban air or from high stacks]: 2.20497e-5 kBq; name uranium_234; = factor_MJ_kWh*0.00000202; lognormal variance with pedigree 0.3586, pedigree (5,3,4,5,3)
  (same comment as for Dioxins, measured as 2,3,7,8-tetrachlorodibenzo-p-dioxin)
- Methane, dichloro-, HCC-30 [air, non-urban air or from high stacks]: 2.60885e-8 kg; name methane_dichloro; = factor_MJ_kWh*0.00000000239; lognormal variance with pedigree 0.1786, pedigree (5,3,4,5,3)
  (same comment as for Dioxins, measured as 2,3,7,8-tetrachlorodibenzo-p-dioxin)
- Particulates, < 2.5 um [air, non-urban air or from high stacks]: 9.23469e-5 kg; name particulates_lt2_5; = factor_MJ_kWh*0.00000846; lognormal variance with pedigree 0.093, pedigree (4,4,5,5,4)
  Calculated Emissions when producing 1kWh of electricity, based on the value for burning hard coal. Electricity production data of one plant of hard coal type in Peru ILO2 TV1 (Subdirección de Gestión de la Información. COES, 2014) and emission values estimated with EPA emissions factor for particulates, (0.25 kg PM<2.5/tonne coal) (EPA, 1996). PM removal has not been assumed.
  The calorific value used was (7053.75 kcal/kg). Source: <http://sisbib.unmsm.edu.pe/bibvirtualdata/publicaciones/geologia/vol11_n22/a03vol11n22.pdf> consulted 24 august 2017.
  Source:
  COES, 2014. Sub Dirección de Gestión de la Información. RA-SGI-0115. ESTADISTICA RELEVANTE DEL SISTEMA ELÉCTRICO INTERCONECTADO NACIONAL, (2014). Cap. 06 PRODUCCIÓN TERMOELÉCTRICA Y CONSUMO DE COMBUSTIBLE. Retrieved online from http://www.coes.org.pe/Portal/Publicaciones/Estadisticas/ 2014/PDF/06_PRODUCCION TERMOELECTRICA Y CONSUMO DE COMBUSTIBLE ,CUADRO N° 6.2 RENDIMIENTO PROMEDIO ANUAL - 2014 and CUADRO N° 5.6 PRODUCCIÓN DE ENERGÍA ELECTRICA ANUAL POR CENTRAL Y TIPO DE GENERACIÓN 2014 (GW.h). November 14, 2017. EPA, 1996. US Environmental Protection Agency (1996). AP 42 -Compilation of Air Pollutant Emission Factors, Volume 1: Stationary Point and Area Sources Compilation of Air Pollutant Emission Factors, AP-42, AP 42, Fifth Edition. Fuel Oil Combustion, F1.2
  Anthracite Coal Combustion Final Section - Supplement B, October 1996 . https://www3.epa.gov/ttn/chief/ap42/ch01/index.html. Retrieved online 24 august 2017.
- Hydrocarbons, aliphatic, alkanes, unspecified [air, non-urban air or from high stacks]: 1.47362e-6 kg; name hydrocarbons_al_al_unspec; = factor_MJ_kWh*0.000000135; lognormal variance with pedigree 0.08, pedigree (3,5,4,5,1)
  (same comment as for Dioxins, measured as 2,3,7,8-tetrachlorodibenzo-p-dioxin)
- Boron [air, non-urban air or from high stacks]: 4.18072e-6 kg; name boron; = factor_MJ_kWh*0.000000383; lognormal variance with pedigree 0.7486, pedigree (5,3,4,5,3)
  (same comment as for Thorium-228)
- Acrolein [air, non-urban air or from high stacks]: 2.60885e-8 kg; name acrolein; = factor_MJ_kWh*0.00000000239; lognormal variance with pedigree 0.3586, pedigree (5,3,4,5,3)
  (same comment as for Dioxins, measured as 2,3,7,8-tetrachlorodibenzo-p-dioxin)

## Sampling procedure
Statistical data for one power plant in Peru.

## Extrapolations
This dataset has been extrapolated from year 2017 to the year of the calculation (2021). The uncertainty has been adjusted accordingly.

## Review by Christopher Oberschelp 2018-01-16
Documentation, key values and data format seem reasonable. Individual deviations may be spotted by comparison with reference datasets. Uncertainties might have to be adjusted later (as agreed upon with ecoinvent).
