# treatment of spent activated carbon, granular from hard coal, reactivation

Dataset: EcoSpold 2, unit process
Geography: RER
Time period: 2005-01-01 to 2021-12-31
Technology level: current
Classification: ISIC rev.4 ecoinvent: 2029:Manufacture of other chemical products n.e.c.
Classification: EcoSpold01Categories: hard coal/heating systems
Scenario: Business-as-Usual
System model: Allocation, cut-off by classification
Generated by: Lucia Valsasina
Published in: Bayer 2005
Database: ecoinvent
isCopyrightProtected: true
accessRestrictedTo: 1

## General comment
This dataset represents the treatment of 1 kg of spent granular activated carbon (GAC) from hard coal. GAC can be reactivated through the same process with which it is produced (http://www.calgoncarbon.com/wp-content/uploads/2015/02/Reactivation_Services_FAQ.pdf, accessed 20151209). Spent activated carbon is first heated to temperatures over 700 degrees Celsius. The activation stage, in this dataset, is achieved through vaporisation at temperatures between 800 and 1000 degrees Celsius. Activation is the key step in producing GAC. The main energy requirements are taken from "activated carbon production, granular from hard coal" dataset, in which for the burning of 3 kg of coal the requirements are: 1.6 kWh electricity and 0.33 m3 of natural gas to heat 12 kg of water. The main source of data is Bayer et al. (2005) "Economical and ecological comparison of granular activated carbon (GAC) absorber refill strategies" and Munoz et al. (2007) Life-Cycle Assessment of a Coupled Advanced Oxidation-Biological Process for Wastewater Treatment: Comparison with Granular Activated Carbon Adsorption. Environmental Engineering Science, 24(5): 638-651.
The result of this activity is 0.9 kg of reactivated carbon from 1 kg of spent activated carbon. To include the emissions for the carbonization, the datasets for "heat production, at hard coal industrial furnace 1-10MW, GLO 1992" was taken as a reference to model emissions and energy requirements. The original datasets represented: "the production of heat from a 1-10 MW hard coal industrial furnace filled with 1 MJ of egg coal. The stoker-boiler furnace fires egg coals with hard coal quality between long-flame coal and fat coal. As there is no module for egg coal, the hard coal supply mix is used. The lifetime of the furnace is 20 years, which corresponds to 5000 fully load hours per year. The heating value is 28.9 MJ/kg and the efficiency factor is 80%".
Note. The emissions from the reactivation of spent activated carbon depend on the adsorbed contaminants. This dataset does not include any contaminants but only the emissions from the reactivation process itself.

## Included activities start
From reception of spent activated carbon.

## Included activities end
This activity ends with the production of 0.9 kg of reactivated granular activated carbon. The datasets includes electricity consumption, the burning of natural gas for the vaporisation of water, water and the emissions from reactivation.

## Geography
GAC from hard coal is common practice in Central Europe (Bayer et al. 2005)

## Technology
Reref to: Bayer et al. 2005. Economical and ecological comparison of granular activated carbon (GAC) absorber refill strategies. Water research (39), 1719-1728
Refer to: Munoz et al. 2007. Life-Cycle Assessment of a Coupled Advanced Oxidation-Biological Process for Wastewater Treatment: Comparison with Granular Activated Carbon Adsorption. Environmental Engineering Science. 5 (24), 638-651

## Parameters
- fraction, process water, to air: 0.15 dimensionless; name fraction_PW_to_air; lognormal variance with pedigree 0.092025, pedigree (4,4,3,2,4)
  Literature value. In case when no industry/process specific data are available, default evaporation fraction value is used. This value is 15% and is based on literature (Statistics Canada, 2007 & Shaffer, K.H., 2008, Consumptive water use in the Great Lakes Basin, USGS & Shiklomanov, 2003, World Water Resources at the Beginning of the 21st Century) and has been approved by an expert.
- scaling factor: 2.89017 dimensionless; name scaling_factor; = 1.25/0.04325*0.1
  Calculated value. The value 1.25 is the lower heating value used as scaling factor in the dataset for "hard coal industrial furnace 1-10MW, Europe without Swizterland 1992", for an input of (0.0346*1.25) 0.04325 kg of hard coal. This is scaled to the amount of spent GAC (0.1kg) which is carbonised during the reactivation.
- fraction, water, completely softened, to air: 0.15 dimensionless; name fraction_WCS_to_air; = fraction_PW_to_air; lognormal variance with pedigree 0.092025, pedigree (4,4,3,2,4)
  Calculated value. See comment in the other parametres present in this dataset. Water, completely softened is considered to be always used as process water, thus process water fractions to air are applied to all water, completely softened input flows to calculate the amount of water consumed in the processes.

## Reference product
- spent activated carbon, granular: 0 kg; source Munoz 2007; CPC 39: Wastes or scraps; By-product classification Recyclable; CAS 7440-44-0
  Literature value. Dry mass for spent activated carbon is 30% of wet mass (see page 644 of article below). The reference product is expressed on a dry matter basis (1kg), meaning that wet weight of spent GAC treated is 3.33(see product properties).
  Munoz et al. (2007) Life-Cycle Assessment of a Coupled Advanced Oxidation-Biological Process for Wastewater Treatment: Comparison with Granular Activated Carbon Adsorption. Environmental Engineering Science, 24(5): 638-651.
  production volume 0 kg; name RP_PV_1; = BP_PV_1*ABS( RP_amount_1)/ GAC
    Calculated from the production volume of the activated carbon, granular in proportion to the respective output amounts.
  property price 0.846 EUR2005
    Calculated value based on data from United Nations Commodity Trade Statistics Database (comtrade.un.org). UN comtrade category: 380210 Activated Carbon. Year 2005. Using exchange rate of 1EURO = 1.209 USD. Average of price of import into 5 main markets (EU, US, JP, IN and CN). The price of "spent activated carbon" is estimated to be 90% lower than the price of virgin activated carbon.
  property carbon content, fossil 0.81
    Literature value. From Biomass and Bioenergy: Processing and Properties (2014) edited by Khalid Rehman Hakeem, Mohammad Jawaid, Umer Rashid (pg. 252). Carbon content is in the range of 72-90%, an average value of 81% is taken.
  property dry mass 1 kg; name spentGAC_DM
  property water content 2.33333; name spentGAC_water_content
  property wet mass 3.33333 kg; name spentGAC_WM
  property water in wet mass 2.33333 kg; name spentGAC_WWM
  property heating value, net 5.65 MJ
    LHV is calculated based on the Carbon content of the product. More details can be found on the respective documentation.
  property carbon content 0.81
    carbon content on a dry matter basis (reserved; not for manual entry)
  properties: carbon content, non-fossil 0, carbon allocation 0.81 kg
- activated carbon, granular: 1 kg; name GAC; source Bayer 2005; CPC 35499: Other chemical products n.e.c.; By-product classification allocatable product; CAS 7440-44-0; pedigree (1,1,1,1,1)
  Literature value. Bayer et al. (2005) estimate 10% loss during reactivation
  production volume 3.48246e8 kg; name BP_PV_1; = 1.0534E+09*0.330592352
  property price 0.94 EUR2005; name GAC_price_EUR2005
  property water content 0.030928; name GAC_water_content
  property water in wet mass 0.03 kg; name GAC_WWM
  property wet mass 1 kg; name GAC_WM
  property dry mass 0.97 kg; name GAC_DM
  properties: heating value, net 30.23 MJ, carbon content, fossil 0.81, carbon content, non-fossil 0, carbon content 0.81, carbon allocation 0.7857 kg

## By-products
- activated carbon, granular: 0 kg; source Bayer 2005; CPC 35499: Other chemical products n.e.c.; By-product classification allocatable product; CAS 7440-44-0; pedigree (1,1,1,1,1)
  Literature value. Bayer et al. (2005) estimate 10% loss during reactivation
  production volume 0 kg; name BP_PV_1; = 1.0534E+09*0.330592352
    Estimated. The european production volume is extrapolated from the global production volume using the nominal GDP of 2005 (source: United Nations, http://data.un.org/Glossary.aspx?q=GDP+%28current+US%24%29, accessed 20130726 and 20130312). Where Europe GDP is 0.33059 of global.
    Gross domestic product (GDP) at current prices is GDP at prices of the current reporting period. Also known as nominal GDP.
  property heating value, net 30.23 MJ
    LHV is calculated based on the elemental composition of the substance. Based on the CAS number of the substance (007440-44-0), the chemical formula of the substance is found to be: C, (PubChem 2020).
    Reference: Kim, S., Chen, J., Cheng, T., Gindulyte, A., He, J., He, S., Li, Q., Shoemaker, B. A., Thiessen, P. A., Yu, B., Zaslavsky, L., Zhang, J., & Bolton, E. E. (2019). PubChem 2019 update: improved access to chemical data. Nucleic acids research, 47(D1), D1102–D1109. https://doi.org/10.1093/nar/gky1033
  property carbon content, fossil 0.81
    Literature value. From Biomass and Bioenergy: Processing and Properties (2014) edited by Khalid Rehman Hakeem, Mohammad Jawaid, Umer Rashid (p. 252). Carbon content is in the range of 72-90%, an average value of 81% is taken.
  property carbon content 0.81
    carbon content on a dry matter basis (reserved; not for manual entry)
  properties: carbon content, non-fossil 0, carbon allocation 0.7857 kg

## Inputs from technosphere
- water, completely softened: 4.46853 kg; name water_softened_input; = 0.0075 * scaling_factor + 12/3; source Bayer 2005; lognormal variance with pedigree 0.076625, pedigree (2,5,5,2,3)
  Estimation. It is assumed that 2% of the feed water is additionally required as decarbonised water (6t per TJin). For wet purification 1.5t per TJin of water is needed. Due to the lack of information the water used for cleaning can not be considered.
  Amount was scaled to the amount of reference product.
  Estimation. It is assumed that 2% of the feed water is additionally required as decarbonised water (6t per TJin). For wet purification 1.5t per TJin of water is needed. Due to the lack of information the water used for cleaning can not be considered. Source (Fritsche et al. 1992) in the process for heat production, at hard coal industrial furnace 1-10MW, Europe without Swizterland 1992.
  Amount was scaled to the amount of reference product. To the amount required for carbonisation, 4 kg of water are added as an estimated requirement for the generation of vapour for the activation step (Bayer 2005). 4 kg were derived from the requirements for the dataset "granular activated carbon production", in which 12 kg of vapour are required for 3 kg of hard coal. This was scaled to the reference product of 1 kg.
  EcoSpold01Location=RER
  Uncertainty: rough estimate
  properties: wet mass 1 kg
- heat, district or industrial, natural gas: 4.92593 MJ; = 13.3/3; source Bayer 2005; lognormal variance with pedigree 0.1638, pedigree (2,3,5,5,5)
  Calculated. According to Bayer et al. (2005) 0.33m3 of natural gas are burned in order to produce 12 kg of water vapour required for activation. This activity is used as a proxy to represent this process. 4.43 kg were derived from the requirements for the dataset "granular activated carbon production", in which 13.3 MJ of heat are required to heat 12 kg of vapour. This was scaled to the 4 kg of vapour required for the reactivation of GAC.
  properties: heating value, net 1 MJ
- industrial furnace, coal, 1-10MW: 1.78548e-9 unit; = 5.56E-10 * scaling_factor; lognormal variance with pedigree 0.3612, pedigree (2,3,5,5,3)
  Amount was scaled to the amount of reference product.
  EcoSpold01Location=RER
  Uncertainty: infrastructure
- electricity, medium voltage: 0.606016 kWh; = 0.00418 * scaling_factor + (1.6/3); source Bayer 2005; lognormal variance with pedigree 0.066125, pedigree (4,2,5,2,3)
  Estimation. To estimate the electricity consumption, data of the heating plant in Bern is evaluated. At full load 1.13% of the input energy is consumed as electricity. The installed capacity in auxiliary units is divided into induced draft fan (31%), primary air fan (13%), feed pump (39%), electric filter (11.8%), rust (0.8%), feeding (1.8%), slag chain (0.2%), oil supply control (0.9%) and secondary air (1.4%). It is assumed that the electricity consumption increases through part load operation. Additionally it must be considered that the observed heating plant has a capacity of about 38 MW. Therefore, it is assumed that 1.5% of the input energy is consumed as electricity.
  Amount was scaled to the amount of reference product. Source (Fritsche et al. 1992) in the process for heat production, at hard coal industrial furnace 1-10MW, Europe without Swizterland 1992.
  To the amount required for carbonisation, a values of (1.6/3) kWh is summed to account for the energy for reactivation. This values was derived from the dataset for "activated carbon production, granular from hard coal", in which 1.6 kWh are required for 3kg of coal.
  EcoSpold01Location=UCTE
  Uncertainty: generic electricity consumption
- hard coal ash: -0.00931278 kg; name hard_coal_ash; = (0.0029 * scaling_factor)*-1; source Bayer 2005; lognormal variance with pedigree 0.0801, pedigree (3,1,5,3,3)
  Estimation. Stoker-boiler furnaces emit between 300kg and 1000kg of particles per TJin if there is no particle separation. With an average of 650kg per TJin, 600kg of fly ash and 2300kg of bottom ash occurs. It is assumed that 100% of the ash is disposed (worst-case-scenario). In individual cases a 100% recycling rate is possible as well.
  Amount was scaled to the amount of reference product.
  EcoSpold01Location=PL
  Uncertainty: assumption: no reuse
  production volume 3.24314e6 kg; = hard_coal_ash* RP_PV_1/ABS( RP_amount_1)
    Calculated from the production volume of the reference product in proportion to the respective output amounts.
  property price 0 EUR2005; name hard_coal_ash_price_EUR2005
  properties: wet mass 1 kg, dry mass 1 kg
- spent activated carbon, granular: 1.11111 kg; source Munoz 2007
  (same comment as for spent activated carbon, granular)
  production volume 3.8694e8 kg
  properties: price 0.846 EUR2005, carbon content, fossil 0.81, heating value, net 5.65 MJ
  note on carbon content, fossil: Literature value. From Biomass and Bioenergy: Processing and Properties (2014) edited by Khalid Rehman Hakeem, Mohammad Jawaid, Umer Rashid (pg. 252). Carbon content is in the range of 72-90%, an average value of 81% is taken.

## Emissions to nature
- Ethyne [air, urban air close to ground]: 1.60565e-6 kg; = 5E-07 * scaling_factor; lognormal variance with pedigree 0.1012, pedigree (2,3,5,5,3)
  Modeled, based on “heat production, coal, emissions to air” - pdf-document on the dedicated talk page of ecoinvent (www.ecoinvent.org/documentation). The emission data are taken from the literature reporting measurements performed at the end of the 1980s in Germany and are based on the composition of the coal.
  Amount was scaled to the amount of reference product.
  Uncertainty: total NMVOC and profile estimate
- Ethene [air, urban air close to ground]: 9.63391e-6 kg; = 3E-06 * scaling_factor; lognormal variance with pedigree 0.1012, pedigree (2,3,5,5,3)
  (same comment as for Ethyne)
- Propane [air, urban air close to ground]: 3.2113e-6 kg; = 1E-06 * scaling_factor; lognormal variance with pedigree 0.1012, pedigree (2,3,5,5,3)
  (same comment as for Ethyne)
- Tin [air, urban air close to ground]: 2.02954e-9 kg; = 6.32E-10 * scaling_factor; lognormal variance with pedigree 0.736, pedigree (4,5,5,5,3)
  Modeled, based on “heat production, coal, emissions to air” - pdf-document on the dedicated talk page of ecoinvent (www.ecoinvent.org/documentation). Emissions of trace elements were calculated using the ash content in the coal and average transfer coefficients for coal power plants with ash retention of 98 %.
  Amount was scaled to the amount of reference product.
  Uncertainty: from trace element balance; see report for details
- Carbon dioxide, fossil [air, urban air close to ground]: 0.293834 kg; = 0.0915 * scaling_factor; lognormal variance with pedigree 0.0507, pedigree (2,2,5,5,3)
  Modeled, based on “heat production, coal, emissions to air” - pdf-document on the dedicated talk page of ecoinvent (www.ecoinvent.org/documentation). The emission data are taken from the literature reporting measurements performed at the end of the 1980s in Germany and are based on the composition of the coal.
  Amount was scaled to the amount of reference product.
  Uncertainty: from carbon balance
- Uranium [air, urban air close to ground]: 8.1246e-9 kg; = 2.53E-09 * scaling_factor; lognormal variance with pedigree 0.736, pedigree (4,5,5,5,3)
  (same comment as for Tin)
- Cadmium [air, urban air close to ground]: 5.07386e-9 kg; = 1.58E-09 * scaling_factor; lognormal variance with pedigree 0.736, pedigree (4,5,5,5,3)
  (same comment as for Tin)
- Potassium-40 [air, urban air close to ground]: 4.33526e-5 kBq; = 1.35E-05 * scaling_factor; lognormal variance with pedigree 0.736, pedigree (4,5,5,5,3)
  Modeled, based on “heat production, coal, emissions to air” - pdf-document on the dedicated talk page of ecoinvent (www.ecoinvent.org/documentation). From radioactivity of the elements.
  Amount was scaled to the amount of reference product.
  Uncertainty: from radioactivity of the elements; see report for details
- Cobalt [air, urban air close to ground]: 1.01477e-8 kg; = 3.16E-09 * scaling_factor; lognormal variance with pedigree 0.736, pedigree (4,5,5,5,3)
  (same comment as for Tin)
- Manganese [air, urban air close to ground]: 7.09698e-8 kg; = 2.21E-08 * scaling_factor; lognormal variance with pedigree 0.736, pedigree (4,5,5,5,3)
  (same comment as for Tin)
- Arsenic [air, urban air close to ground]: 8.1246e-8 kg; = 2.53E-08 * scaling_factor; lognormal variance with pedigree 0.736, pedigree (4,5,5,5,3)
  (same comment as for Tin)
- Radium-228 [air, urban air close to ground]: 0.000208735 kBq; = 6.5E-05 * scaling_factor; lognormal variance with pedigree 0.736, pedigree (4,5,5,5,3)
  (same comment as for Potassium-40)
- Hydrocarbons, aliphatic, alkanes, unspecified [air, urban air close to ground]: 1.60565e-6 kg; = 5E-07 * scaling_factor; lognormal variance with pedigree 0.1012, pedigree (2,3,5,5,3)
  (same comment as for Ethyne)
- Lead-210 [air, urban air close to ground]: 0.000149326 kBq; = 4.65E-05 * scaling_factor; lognormal variance with pedigree 0.736, pedigree (4,5,5,5,3)
  (same comment as for Potassium-40)
- Thorium-232 [air, urban air close to ground]: 1.12396e-5 kBq; = 3.5E-06 * scaling_factor; lognormal variance with pedigree 0.736, pedigree (4,5,5,5,3)
  (same comment as for Potassium-40)
- Phosphorus [air, urban air close to ground]: 2.02954e-7 kg; = 6.32E-08 * scaling_factor; lognormal variance with pedigree 0.736, pedigree (4,5,5,5,3)
  (same comment as for Tin)
- Ethane [air, urban air close to ground]: 4.81696e-6 kg; = 1.5E-06 * scaling_factor; lognormal variance with pedigree 0.1012, pedigree (2,3,5,5,3)
  (same comment as for Ethyne)
- Vanadium [air, urban air close to ground]: 1.21708e-7 kg; = 3.79E-08 * scaling_factor; lognormal variance with pedigree 0.736, pedigree (4,5,5,5,3)
  (same comment as for Tin)
- Selenium [air, urban air close to ground]: 3.04432e-8 kg; = 9.48E-09 * scaling_factor; lognormal variance with pedigree 0.736, pedigree (4,5,5,5,3)
  (same comment as for Tin)
- Benzene [air, urban air close to ground]: 1.60565e-6 kg; = 5E-07 * scaling_factor; lognormal variance with pedigree 0.1012, pedigree (2,3,5,5,3)
  (same comment as for Ethyne)
- Dinitrogen monoxide [air, urban air close to ground]: 3.2113e-6 kg; = 1E-06 * scaling_factor; lognormal variance with pedigree 0.1012, pedigree (2,3,5,5,3)
  Modeled, based on “heat production, coal, emissions to air” - pdf-document on the dedicated talk page of ecoinvent (www.ecoinvent.org/documentation). The emission data are taken from the literature reporting measurements performed at the end of the 1980s in Germany and are based on the composition of the coal.
  Amount was scaled to the amount of reference product.
  Uncertainty: typical value
- Aluminium [air, urban air close to ground]: 3.4361e-5 kg; = 1.07E-05 * scaling_factor; lognormal variance with pedigree 0.736, pedigree (4,5,5,5,3)
  (same comment as for Tin)
- Particulates, < 2.5 um [air, urban air close to ground]: 6.42261e-5 kg; = 2E-05 * scaling_factor; lognormal variance with pedigree 0.386, pedigree (4,5,5,5,3)
  Modeled, based on “heat production, coal, emissions to air” - pdf-document on the dedicated talk page of ecoinvent (www.ecoinvent.org/documentation). Size distribution of particles has been estimated on the basis of recent information from U.S. Environmental Protection Agency (EPA).
  Amount was scaled to the amount of reference product.
  Uncertainty: total PM and profile estimates
- Sulfur dioxide [air, urban air close to ground]: 0.00160565 kg; = 0.0005 * scaling_factor; lognormal variance with pedigree 0.086, pedigree (4,5,5,5,3)
  Modeled, based on “heat production, coal, emissions to air” - pdf-document on the dedicated talk page of ecoinvent (www.ecoinvent.org/documentation). The emission data are taken from the literature reporting measurements performed at the end of the 1980s in Germany and are based on the composition of the coal.
  Amount was scaled to the amount of reference product.
  Uncertainty: from S-balance
- Potassium [air, urban air close to ground]: 4.04624e-6 kg; = 1.26E-06 * scaling_factor; lognormal variance with pedigree 0.736, pedigree (4,5,5,5,3)
  (same comment as for Tin)
- Particulates, > 2.5 um, and < 10um [air, urban air close to ground]: 6.42261e-5 kg; = 2E-05 * scaling_factor; lognormal variance with pedigree 0.206, pedigree (4,5,5,5,3)
  (same comment as for Particulates, < 2.5 um)
- Lead [air, urban air close to ground]: 2.43417e-7 kg; = 7.58E-08 * scaling_factor; lognormal variance with pedigree 0.736, pedigree (4,5,5,5,3)
  (same comment as for Tin)
- Chromium [air, urban air close to ground]: 7.22543e-8 kg; = 2.25E-08 * scaling_factor; lognormal variance with pedigree 0.736, pedigree (4,5,5,5,3)
  (same comment as for Tin)
- Thorium [air, urban air close to ground]: 6.10148e-9 kg; = 1.9E-09 * scaling_factor; lognormal variance with pedigree 0.736, pedigree (4,5,5,5,3)
  (same comment as for Tin)
- Dioxins, measured as 2,3,7,8-tetrachlorodibenzo-p-dioxin [air, urban air close to ground]: 6.42261e-14 kg; = 2E-14 * scaling_factor; lognormal variance with pedigree 0.3612, pedigree (2,3,5,5,3)
  Modeled, based on “heat production, coal, emissions to air” - pdf-document on the dedicated talk page of ecoinvent (www.ecoinvent.org/documentation). The emission data are taken from the literature reporting measurements performed at the end of the 1980s in Germany and are based on the composition of the coal.
  Amount was scaled to the amount of reference product.
- Radon-220 [air, urban air close to ground]: 3.2113e-6 kBq; = 1E-06 * scaling_factor; lognormal variance with pedigree 0.736, pedigree (4,5,5,5,3)
  (same comment as for Potassium-40)
- Water [water, unspecified]: 0.00379825 m3; name water_to_water_unspecified; = (((water_softened_input/scaling_factor)/1000)*(1-fraction_WCS_to_air)) * scaling_factor; lognormal variance with pedigree 0.0527, pedigree (2,2,3,5,3)
  Calculated value based on literature values and expert opinion. See comments in the parametres' comment field.
  Amount was scaled to the amount of reference product.
  property fraction, origin: fresh water 1; name fraction_origin_fresh_water_Ww
  property fraction, origin: unspecified 0; name fraction_origin_unspecified_Ww
  property dry mass 0 kg; name DM
  property carbon content, non-fossil 0; name C_content_non_fossil
  property fraction, origin: salt water 0; name fraction_origin_salt_water_Ww
  property carbon content, fossil 0; name C_content_fossil
  property wet mass 1000 kg; name WM
  property water in wet mass 1000 kg; name WWM
- Thorium-228 [air, urban air close to ground]: 1.76622e-5 kBq; = 5.5E-06 * scaling_factor; lognormal variance with pedigree 0.736, pedigree (4,5,5,5,3)
  (same comment as for Potassium-40)
- Mercury [air, urban air close to ground]: 9.1201e-9 kg; = 2.84E-09 * scaling_factor; lognormal variance with pedigree 0.736, pedigree (4,5,5,5,3)
  (same comment as for Tin)
- Antimony [air, urban air close to ground]: 5.07386e-9 kg; = 1.58E-09 * scaling_factor; lognormal variance with pedigree 0.736, pedigree (4,5,5,5,3)
  (same comment as for Tin)
- Toluene [air, urban air close to ground]: 3.2113e-7 kg; = 1E-07 * scaling_factor; lognormal variance with pedigree 0.1012, pedigree (2,3,5,5,3)
  (same comment as for Ethyne)
- Sodium [air, urban air close to ground]: 2.02954e-6 kg; = 6.32E-07 * scaling_factor; lognormal variance with pedigree 0.768, pedigree (4,5,5,5,4)
  (same comment as for Tin)
- Polonium-210 [air, urban air close to ground]: 0.000272961 kBq; = 8.5E-05 * scaling_factor; lognormal variance with pedigree 0.736, pedigree (4,5,5,5,3)
  (same comment as for Potassium-40)
- Hydrocarbons, aliphatic, unsaturated [air, urban air close to ground]: 1.60565e-6 kg; = 5E-07 * scaling_factor; lognormal variance with pedigree 0.1332, pedigree (2,3,5,5,4)
  (same comment as for Ethyne)
- Calcium [air, urban air close to ground]: 4.04624e-6 kg; = 1.26E-06 * scaling_factor; lognormal variance with pedigree 0.736, pedigree (4,5,5,5,3)
  (same comment as for Tin)
- Copper [air, urban air close to ground]: 5.33076e-8 kg; = 1.66E-08 * scaling_factor; lognormal variance with pedigree 0.768, pedigree (4,5,5,5,4)
  (same comment as for Tin)
- Benzo(a)pyrene [air, urban air close to ground]: 3.2113e-11 kg; = 1E-11 * scaling_factor; lognormal variance with pedigree 0.1012, pedigree (2,3,5,5,3)
  (same comment as for Ethyne)
- Zinc [air, urban air close to ground]: 1.01477e-8 kg; = 3.16E-09 * scaling_factor; lognormal variance with pedigree 0.768, pedigree (4,5,5,5,4)
  (same comment as for Tin)
- Hydrogen fluoride [air, urban air close to ground]: 4.04624e-6 kg; = 1.26E-06 * scaling_factor; lognormal variance with pedigree 0.126, pedigree (4,5,5,5,3)
  (same comment as for Tin)
- Iron [air, urban air close to ground]: 1.4194e-5 kg; = 4.42E-06 * scaling_factor; lognormal variance with pedigree 0.768, pedigree (4,5,5,5,4)
  (same comment as for Tin)
- Molybdenum [air, urban air close to ground]: 1.52216e-8 kg; = 4.74E-09 * scaling_factor; lognormal variance with pedigree 0.736, pedigree (4,5,5,5,3)
  (same comment as for Tin)
- Chromium VI [air, urban air close to ground]: 8.92742e-9 kg; = 2.78E-09 * scaling_factor; lognormal variance with pedigree 0.492, pedigree (1,1,3,5,3)
  (same comment as for Dioxins, measured as 2,3,7,8-tetrachlorodibenzo-p-dioxin)
- Thallium [air, urban air close to ground]: 5.07386e-9 kg; = 1.58E-09 * scaling_factor; lognormal variance with pedigree 0.736, pedigree (4,5,5,5,3)
  (same comment as for Tin)
- Formaldehyde [air, urban air close to ground]: 2.56904e-7 kg; = 8E-08 * scaling_factor; lognormal variance with pedigree 0.1012, pedigree (2,3,5,5,3)
  (same comment as for Ethyne)
- Carbon monoxide, fossil [air, urban air close to ground]: 0.00032113 kg; = 0.0001 * scaling_factor; lognormal variance with pedigree 0.7012, pedigree (2,3,5,5,3)
  (same comment as for Dinitrogen monoxide)
- Magnesium [air, urban air close to ground]: 1.21708e-5 kg; = 3.79E-06 * scaling_factor; lognormal variance with pedigree 0.736, pedigree (4,5,5,5,3)
  (same comment as for Tin)
- Scandium [air, urban air close to ground]: 4.04624e-9 kg; = 1.26E-09 * scaling_factor; lognormal variance with pedigree 0.736, pedigree (4,5,5,5,3)
  (same comment as for Tin)
- NMVOC, non-methane volatile organic compounds, unspecified origin [air, urban air close to ground]: 5.52344e-6 kg; = 1.72E-06 * scaling_factor; lognormal variance with pedigree 0.1012, pedigree (2,3,5,5,3)
  (same comment as for Ethyne)
- Boron [air, urban air close to ground]: 1.52216e-6 kg; = 4.74E-07 * scaling_factor; lognormal variance with pedigree 0.728, pedigree (4,5,5,5,1)
  (same comment as for Tin)
- Strontium [air, urban air close to ground]: 6.10148e-7 kg; = 1.9E-07 * scaling_factor; lognormal variance with pedigree 0.736, pedigree (4,5,5,5,3)
  (same comment as for Tin)
- Propene [air, urban air close to ground]: 1.60565e-6 kg; = 5E-07 * scaling_factor; lognormal variance with pedigree 0.0932, pedigree (2,3,5,5,1)
  (same comment as for Ethyne)
- Radon-222 [air, urban air close to ground]: 3.2113e-6 kBq; = 1E-06 * scaling_factor; lognormal variance with pedigree 0.736, pedigree (4,5,5,5,3)
  (same comment as for Potassium-40)
- Titanium [air, urban air close to ground]: 1.21708e-6 kg; = 3.79E-07 * scaling_factor; lognormal variance with pedigree 0.728, pedigree (4,5,5,5,1)
  (same comment as for Tin)
- Beryllium [air, urban air close to ground]: 4.04624e-9 kg; = 1.26E-09 * scaling_factor; lognormal variance with pedigree 0.1012, pedigree (2,3,5,5,3)
  (same comment as for Ethyne)
- Radium-226 [air, urban air close to ground]: 3.85356e-5 kBq; = 1.2E-05 * scaling_factor; lognormal variance with pedigree 0.728, pedigree (4,5,5,5,1)
  (same comment as for Potassium-40)
- Iodine [air, urban air close to ground]: 3.66089e-8 kg; = 1.14E-08 * scaling_factor; lognormal variance with pedigree 0.728, pedigree (4,5,5,5,1)
  (same comment as for Tin)
- Particulates, > 10 um [air, urban air close to ground]: 3.2113e-5 kg; = 1E-05 * scaling_factor; lognormal variance with pedigree 0.118, pedigree (4,5,5,5,1)
  (same comment as for Particulates, < 2.5 um)
- Nitrogen oxides [air, urban air close to ground]: 0.000642261 kg; = 0.0002 * scaling_factor; lognormal variance with pedigree 0.1012, pedigree (2,3,5,5,3)
  (same comment as for Dinitrogen monoxide)
- Silicon [air, urban air close to ground]: 5.07386e-5 kg; = 1.58E-05 * scaling_factor; lognormal variance with pedigree 0.736, pedigree (4,5,5,5,3)
  (same comment as for Tin)
- Methane, fossil [air, urban air close to ground]: 3.2113e-5 kg; = 1E-05 * scaling_factor; lognormal variance with pedigree 0.1012, pedigree (2,3,5,5,3)
  (same comment as for Dinitrogen monoxide)
- Bromine [air, urban air close to ground]: 3.04432e-8 kg; = 9.48E-09 * scaling_factor; lognormal variance with pedigree 0.736, pedigree (4,5,5,5,3)
  (same comment as for Tin)
- Nickel [air, urban air close to ground]: 6.10148e-8 kg; = 1.9E-08 * scaling_factor; lognormal variance with pedigree 0.736, pedigree (4,5,5,5,3)
  (same comment as for Tin)
- Water [air, unspecified]: 0.00322851 m3; name water_to_air_unspecified; = ((((water_softened_input/scaling_factor)/1000*fraction_WCS_to_air)) * scaling_factor)+(( spentGAC_WWM- GAC_water_content)/1000); lognormal variance with pedigree 0.0513, pedigree (2,2,3,4,3)
  Calculated value based on literature values and expert opinion. See comments in the parametres' comment field.
  Amount was scaled to the amount of reference product.
  To the evaporation amount of the input "water, completely softened, from decarbonised water, at user", the water from drying of spent GAC is added. Spent GAC has a dry mass of 30%, it is assumed that after reactivation the dry mass would be of 97% (taken from the properties set in the dataset "activated carbon production, granular from hard coal", with comment: literature value. From: <http://www.desotec.com/activated-carbon/properties/>, accessed 20151207). The water removed is calculated as in Wilhelm, Luther R., Dwayne A. Suter, and Gerald H. Brusewitz. 2004. Drying and Dehydration. Chapter 10 in Food & Process Engineering Technology, 259-284. St. Joseph, Michigan: ASAE.
  © American Society of Agricultural Engineers. (Rev. Aug. 2005.) Retrieved from https://www.asabe.org/media/184966/chapter_10_in_wilhelm_food_proc._eng._tech.pdf, accessed 19 April 2016.
  property fraction, origin: salt water 0; name fraction_origin_salt_water
  property fraction, origin: unspecified 0; name fraction_origin_unspecified
  property fraction, origin: fresh water 1; name fraction_origin_fresh_water
- Barium [air, urban air close to ground]: 4.04624e-7 kg; = 1.26E-07 * scaling_factor; lognormal variance with pedigree 0.736, pedigree (4,5,5,5,3)
  (same comment as for Tin)
- Hydrogen chloride [air, urban air close to ground]: 0.000130058 kg; = 4.05E-05 * scaling_factor; lognormal variance with pedigree 0.126, pedigree (4,5,5,5,3)
  (same comment as for Tin)
- Uranium-238 [air, urban air close to ground]: 3.2113e-5 kBq; = 1E-05 * scaling_factor; lognormal variance with pedigree 0.736, pedigree (4,5,5,5,3)
  (same comment as for Potassium-40)
- Xylene [air, urban air close to ground]: 3.2113e-7 kg; = 1E-07 * scaling_factor; lognormal variance with pedigree 0.1012, pedigree (2,3,5,5,3)
  (same comment as for Ethyne)

## Sampling procedure
Based on literature data:
Bayer et al. (2005) Economical and ecological comparison of granular activated carbonn (GAC) adsorber refill strategies. Water research, 39: 1719-1728
Munoz et al. (2007) Life-Cycle Assessment of a Coupled Advanced Oxidation-Biological Process for Wastewater Treatment: Comparison with Granular Activated Carbon Adsorption. Environmental Engineering Science, 24(5): 638-651.

## Extrapolations
This dataset has been extrapolated from year 2015 to the year of the calculation (2021). The uncertainty has been adjusted accordingly.

## Review by Ivan Muñoz Ortiz 2015-12-09
Thanks Lucia for the revision. I think everything is in order now.
Regards,
Ivan
