# selective coating, aluminium sheet, nickel pigmented aluminium oxide

Dataset: EcoSpold 2, unit process
Geography: RoW
Time period: 1993-01-01 to 2021-12-31
Technology level: current
Classification: EcoSpold01Categories: metals/refinement
Classification: ISIC rev.4 ecoinvent: 2592:Treatment and coating of metals; machining
Tags: ConvertedDataset
Scenario: Business-as-Usual
System model: Allocation, cut-off by classification
Generated by: Niels Jungbluth
Published in: Althaus H.-J. 2000
Database: ecoinvent
isCopyrightProtected: true
accessRestrictedTo: 1

## General comment
Inventory for selective coatings of solar absorbers (a=0.85~0.91, e=0.23~0.40).
[This dataset was already contained in the ecoinvent database version 2. It was not individually updated during the transfer to ecoinvent version 3. Life Cycle Impact Assessment results may still have changed, as they are affected by changes in the supply chain, i.e. in other datasets. This dataset was generated following the ecoinvent quality guidelines for version 2. It may have been subject to central changes described in the ecoinvent version 3 change report (http://www.ecoinvent.org/database/ecoinvent-version-3/reports-of-changes/), and the results of the central updates were reviewed extensively. The changes added e.g. consistent water flows and other information throughout the database. The documentation of this dataset can be found in the ecoinvent reports of version 2, which are still available via the ecoinvent website. The change report linked above covers all central changes that were made during the conversion process.]

## Included activities end
Gate to gate inventory for the process including infrastructure and relevant materials and emissions. Not including wastes and packages.

## Geography
Production plant in SK.

## Technology
Highly selective, aluminium oxide-based layer pigmented with colloidal nickel

## Time period
Date of information.

## Parameters
- fraction, process water, to air: 0.15 dimensionless; name fraction_PW_to_air; lognormal variance with pedigree 0.092025, pedigree (4,4,3,2,4)
- fraction, tap water, to air: 0.15 dimensionless; name fraction_TW_to_air; lognormal variance with pedigree 0.092025, pedigree (4,4,3,2,4)

## Reference product
- selective coat, aluminium sheet, nickel pigmented aluminium oxide: 1 m2; CPC 4153: Semi-finished products of aluminium or aluminium alloys; By-product classification allocatable product
  EcoSpold01Location=SK
  production volume 436000 m2
    Upscaled with a factor 3.18 from the EU production volume of 1.2 Mio. m2 per year according to Ecoinvent v.2 report 10, section 8.2. Equally distributed over the 6 types of 'selective coating'.
  property price 1.01616 EUR2005
    Calculated based on inputs: The price of the product has been calculated as a sum of the values of the material and energy inputs for this product. This value is therefore a rough estimation. It may underestimate the real price since there are additional expenses when producing any product. These expences can include for example labour costs, treatment of waste materials and profit for the producer. Please consider carefully whether this level of data quality is acceptable for your application.

## Inputs from technosphere
- nickel, class 1: 0.0218 kg; lognormal variance with pedigree 0.0427, pedigree (2,2,5,5,1)
  EcoSpold01Location=GLO
  Questionnaire
  Uncertainty: Questionnaire
  properties: dry mass 1 kg, wet mass 1 kg
- tap water: 0 kg; name tap_water_input; source NREL - National Renewable Energy Laborat 2005; pedigree (1,1,1,1,1)
  Questionnaire
  Calculated based on literature, (Vionnet, S., Quantis Water Database - Technical Report, 2012). The process starts when untreated surface enters the coating plant. It includes the processes: pre-treatment (cleaning) and coating itself. The source presents data on general "Automotive painting, electrocoating, per m2", without specification of what kind of surface is being coated and what kind of coat is used. It is assumed (expert opinion) that this data are more likely to be right then the original - ecoivent values.
  EcoSpold01Location=RER
  Uncertainty: Questionnaire
  properties: carbon content, fossil 0.00178991, water content 2962.17, dry mass 0.000337476 kg, wet mass 1 kg
  note on carbon content, fossil: Bicarbonate content is 2.93 mol/m3. CO2 content is 0.1 mol/m3 (ecoinvent v2.2 report 8, Tab 93.1).
- heat, district or industrial, other than natural gas: 0 MJ; pedigree (1,1,1,1,1)
  EcoSpold01Location=RER
  Questionnaire
  Uncertainty: Questionnaire
  properties: heating value, net 1 MJ
- nitric acid, without water, in 50% solution state: 0 kg; pedigree (1,1,1,1,1)
  EcoSpold01Location=RER
  Questionnaire
  Uncertainty: Questionnaire
  properties: dry mass 1 kg, wet mass 1 kg
- boric acid, anhydrous, powder: 0.018 kg; lognormal variance with pedigree 0.0427, pedigree (2,2,5,5,1)
  Questionnaire
  EcoSpold01Location=RER
  Uncertainty: Questionnaire
  properties: dry mass 1 kg, wet mass 1 kg
- phosphoric acid, fertiliser grade, without water, in 70% solution state: 0.269 kg; lognormal variance with pedigree 0.0427, pedigree (2,2,5,5,1)
  EcoSpold01Location=GLO
  Questionnaire
  Uncertainty: Questionnaire
  properties: dry mass 1 kg, wet mass 1 kg
- electricity, medium voltage: 0 kWh; pedigree (1,1,1,1,1)
  Questionnaire, electricity use for the process
  EcoSpold01Location=SK
  Uncertainty: Questionnaire, electricity use for the process
- metal coating facility: 3.33e-7 unit; lognormal variance with pedigree 0.0427, pedigree (2,2,5,5,1)
  Estimation
  EcoSpold01Location=RER
  Uncertainty: Estimation
- sodium hydroxide, without water, in 50% solution state: 0.164 kg; lognormal variance with pedigree 0.0427, pedigree (2,2,5,5,1)
  EcoSpold01Location=RER
  Questionnaire
  Uncertainty: Questionnaire
  properties: wet mass 1 kg, dry mass 1 kg, heating value, net 3.03 MJ
- tap water: 0.112479, 0.0135395, 0.0100626, 0.0223762, 0.564239, 0.0146785, 0.0417528, 6.45687 kg (8 entries); source NREL - National Renewable Energy Laborat 2005; lognormal variance with pedigree 0.0546, pedigree (3,3,5,5,1)
  (same comment as for tap water)
- heat, district or industrial, other than natural gas: 0.0157865, 0.00409986, 38.9301 MJ (3 entries); lognormal variance with pedigree 0.0427, pedigree (2,2,5,5,1)
  EcoSpold01Location=RER
  Questionnaire
  Uncertainty: Questionnaire
- nitric acid, without water, in 50% solution state: 0.0194339, 0.00474211, 0.0117927, 0.0360052, 0.00512342, 0.00565046, 0.00319152, 0.00472455, 0.0153361 kg (9 entries); lognormal variance with pedigree 0.0427, pedigree (2,2,5,5,1)
  EcoSpold01Location=RER
  Questionnaire
  Uncertainty: Questionnaire
- electricity, medium voltage: 0.000695411, 0.00585519, 0.0183836, 0.00110221, 0.006638, 0.00289252, 0.00266206, 0.00484728, 0.00480197, 0.0395179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 kWh (46 entries); lognormal variance with pedigree 0.0427, pedigree (2,2,5,5,1)
  (same comment as for electricity, medium voltage)

## Emissions to nature
- Aluminium [water, surface water]: 0.0016 kg; lognormal variance with pedigree 0.6927, pedigree (2,2,5,5,1)
  Questionnaire
  Uncertainty: Questionnaire
- Nickel, ion [water, surface water]: 0.0005 kg; lognormal variance with pedigree 0.6927, pedigree (2,2,5,5,1)
  Questionnaire
  Uncertainty: Questionnaire
- Water [air, unspecified]: 0.0010854 m3; name water_to_air_unspecified; lognormal variance with pedigree 0.0827, pedigree (2,2,5,5,1)
  Calculated value based on literature values and expert opinion. See comments in the parametres' comment field.
  property fraction, origin: unspecified 0; name fraction_origin_unspecified
  property fraction, origin: salt water 0; name fraction_origin_salt_water
  property fraction, origin: fresh water 1; name fraction_origin_fresh_water
- Suspended solids, unspecified [water, surface water]: 0.016 kg; lognormal variance with pedigree 0.0827, pedigree (2,2,5,5,1)
  Questionnaire
  Uncertainty: Questionnaire
- Water [water, unspecified]: 0.0061506 m3; name water_to_water_unspecified; lognormal variance with pedigree 0.0827, pedigree (2,2,5,5,1)
  (same comment as for Water)
  property wet mass 1000 kg; name WM
  property carbon content, non-fossil 0; name C_content_non_fossil
  property carbon content, fossil 0; name C_content_fossil
  property dry mass 0 kg; name DM
  property fraction, origin: salt water 0; name fraction_origin_salt_water_Ww
  property fraction, origin: unspecified 0; name fraction_origin_unspecified_Ww
  property fraction, origin: fresh water 1; name fraction_origin_fresh_water_Ww
  property water in wet mass 1000 kg; name WWM

## Sampling procedure
Personal communication.

## Extrapolations
This dataset has been copied from an original dataset covering the geography SK. The uncertainty has been adjusted accordingly.

## Review by Hans-Jörg Althaus 2003-09-22
Passed.
