# pig iron production

Dataset: EcoSpold 2, unit process
Geography: RER
Time period: 2005-01-01 to 2021-12-31
Technology level: current
Classification: ISIC rev.4 ecoinvent: 2410:Manufacture of basic iron and steel
Synonyms: hot metal
Scenario: Business-as-Usual
System model: Allocation, cut-off by classification
Share of production covered: 90 %
Generated by: Johannes Müller
Published in: Classen M. 2009
Database: ecoinvent
isCopyrightProtected: true
accessRestrictedTo: 1

## General comment
"Background:
This activity produces hot metal (pig iron) for use in steelmaking and cast iron production. Iron-bearing materials, additives and reducing agents are continuously fed into a charging chamber from a shaft above. A hot, oxygen-rich air blast is injected on the tuyère level and reacts with the reducing agents to produce (inter alia) carbon monoxide that in turn reduces iron oxides to molten, metallic iron. The liquid iron is collected in a hearth, along with the slag, and continually cast prior to transport to the steelmaking plant. The slag is typically processed to produce aggregate, graulate, or pellet for use in cement manufacture. Gases are collected at the top of the furnace and treated through wet scrubbing, with the resultant sludge typically returned to the sinter plant or disposed of in a landfill.

Modelling approach:
Data on were mostly taken from the IPPC Best Available Technology report from the European Commission (Remus et al., 2013); note that where only data ranges were provided, the geometric mean of reported values was used here. Additionally, 33% of dust and sludge by-products were assumed to be recycled internally (i.e. returned as an input to the process after it has been produced) based on measured data from plants worldwide reported by worldsteel (2010).

References:
Remus, R., Aguado-Monsonet, M. A., Roudier, S. & Samcho, L. D. (2013). JRC reference report - Best available techniques (BAT) reference document for iron and steel production. Joint Research Centre - European Commission, Luxemboug.
Worldsteel (2010). Steel industry by-products. World Steel Association: Brussels, Belgium."

## Included activities start
With the charge prepared and ready at the gate of the blast furnace plant.

## Included activities end
At the gate of the blast furnace plant, with pig iron (hot metal) ready for transport to the steelmaking plant.

## Geography
Data are taken from blast furnace plants across Europe and are considered representative of the average situation in Europe.

## Technology
Typical blast furnace process

## Time period
Data are mostly compiled from reports published between 2005 and 2010 but are considered representative of modern operations.

## Parameters
- fraction, cooling water, once-through system, to air: 0.004 dimensionless; name fraction_CW_OT_to_air; lognormal variance with pedigree 0.0413, pedigree (2,3,1,3,1)
  Calculated based on literature value (Scown, C.D., 2011, Water Footprint of U.S. Transportation Fuels and supplying information of the article) (Vionnet, S., Quantis Water Database - Technical Report, 2012). Calculated based on literature value (Scown, C.D., 2011, Water Footprint of U.S. Transportation Fuels and supplying information of the article) (Vionnet, S., Quantis Water Database - Technical Report, 2012).
- fraction, cooling water, recirculating system, to air: 0.771 dimensionless; name fraction_CW_R_to_air; lognormal variance with pedigree 0.0413, pedigree (2,3,1,3,1)
  (same comment as for fraction, cooling water, once-through system, to air)
- fraction, process water, to air: 0.2 dimensionless; name fraction_PW_to_air; lognormal variance with pedigree 0.092025, pedigree (4,4,3,2,4)
  Literature value (Statistics Canada, 2007 & Shaffer, K.H., 2008, Consumptive water use in the Great Lakes Basin, USGS) (Vionnet, S., Quantis Water Database - Technical Report, 2012).
- fraction, cooling water, to air: 0.3875 dimensionless; name fraction_CW_to_air; = (0.5*fraction_CW_OT_to_air)+(0.5*fraction_CW_R_to_air); lognormal variance with pedigree 0.092025, pedigree (4,4,3,2,4)
  Calculated value based on literature value (see comments of the other parametres present in this dataset) and expert opinion. In the case when no industry/literature data are available about the type of cooling or directly fraction, cooling water, to air specific for the process a default assumption is applied. It is assumed that the once-through cooling system is used in 50% of all cases and recirculating system is used in another 50% of all cases. Calculated value based on literature value (see comments of the other parametres present in this dataset) and expert opinion. In the case when no industry/literature data are available about the type of cooling or directly fraction, cooling water, to air specific for the process a default assumption is applied. It is assumed that the once-through cooling system is used in 50% of all cases and recirculating system is used in another 50% of all cases.

## Reference product
- pig iron: 1 kg; name RP; By-product classification allocatable product; CPC 41111: Pig iron and spiegeleisen in pigs, blocks or other primary forms
  production volume 1.08151e11 kg; name PV
    Source: worldsteel, 2020; data for 2019.
    References
    worldsteel (2020). Steel Statistical Yearbook 2020 [online].Available from: https://www.worldsteel.org/en/dam/jcr:5001dac8-0083-46f3-aadd-35aa357acbcc/Steel%2520Statistical%2520Yearbook%25202020%2520%2528concise%2520version%2529.pdf (accessed 20.07.2021).
  property carbon content, fossil 0.045
    Pig iron is the iron produced in the blast furnace. It is an alloy of 94% Fe and more than 2% C (world average 4.5%). (ecoinvent v2.2 report 10_partII)
  property heating value, net 0 MJ
    Non combustible products are assumed to have an LHV equal to zero (0).
  property price 0.243 EUR2005
    From Undata http://data.un.org/Data.aspx?q=pig+iron&d=ComTrade&f=_l1Code%3a73%3bcmdCode%3a720120; assumed to be pig iron non-alloy with >0.5% phosphorus because there is no refining process involved in this product. 2003 data includes only EU, China and India - no data from USA and Japan in the UN database for this year.
  property carbon content 0.045
    carbon content on a dry matter basis (reserved; not for manual entry)
  properties: water content 0, dry mass 1 kg, water in wet mass 0 kg, carbon content, non-fossil 0, wet mass 1 kg, carbon allocation 0.045 kg

## By-products
- blast furnace slag: 0 kg; By-product classification Recyclable; CPC 39310: Slag, dross, scalings and other waste from the manufacture of iron or steel; pedigree (1,1,1,1,1)
  Amount reported by worldsteel (2010) and is representative of the average global situation in 2009. Also based on worldsteel (2010), an internal recovery (recycling) rate of 0% is assumed. Source: Worldsteel (2010). Steel industry by-products. World Steel Association: Brussels, Belgium.
  production volume 0 kg; = PV * BF_slag_amount / RP
    Calculated from production volume of reference product using the relative outputs.
  property price 0 EUR2005; name BF_slag_amount_price_EUR2005
    Assumed without economic value
  property selenium content 3.9e-6
    The value of 'selenium content' is documented in Turner & Symeonidis, 2020.
    Reference: Turner David & Symeonidis Avraam, 2020, Life cycle inventories of the treatment of iron and steelmaking by-products, ecoinvent association, Zürich, Switzerland
  property phosphorus content 0.00022
    The value of 'phosphorus content' is documented in Turner & Symeonidis, 2020.
    Reference: Turner David & Symeonidis Avraam, 2020, Life cycle inventories of the treatment of iron and steelmaking by-products, ecoinvent association, Zürich, Switzerland
  property chromium content 0.000132
    The value of 'chromium content' is documented in Turner & Symeonidis, 2020.
    Reference: Turner David & Symeonidis Avraam, 2020, Life cycle inventories of the treatment of iron and steelmaking by-products, ecoinvent association, Zürich, Switzerland
  property vanadium content 5.4e-5
    The value of 'vanadium content' is documented in Turner & Symeonidis, 2020.
    Reference: Turner David & Symeonidis Avraam, 2020, Life cycle inventories of the treatment of iron and steelmaking by-products, ecoinvent association, Zürich, Switzerland
  property zinc content 2e-5
    The value of 'zinc content' is documented in Turner & Symeonidis, 2020.
    Reference: Turner David & Symeonidis Avraam, 2020, Life cycle inventories of the treatment of iron and steelmaking by-products, ecoinvent association, Zürich, Switzerland
  property oxygen content 0.402495
    The value of 'oxygen content' is documented in Turner & Symeonidis, 2020.
    Reference: Turner David & Symeonidis Avraam, 2020, Life cycle inventories of the treatment of iron and steelmaking by-products, ecoinvent association, Zürich, Switzerland
  property tin content 1.6e-6
    The value of 'tin content' is documented in Turner & Symeonidis, 2020.
    Reference: Turner David & Symeonidis Avraam, 2020, Life cycle inventories of the treatment of iron and steelmaking by-products, ecoinvent association, Zürich, Switzerland
  property molybdenum content 8e-7
    The value of 'molybdenum content' is documented in Turner & Symeonidis, 2020.
    Reference: Turner David & Symeonidis Avraam, 2020, Life cycle inventories of the treatment of iron and steelmaking by-products, ecoinvent association, Zürich, Switzerland
  property carbon content, fossil 0.00230251
    The value of 'carbon content, fossil' is documented in Turner & Symeonidis, 2020.
    Reference: Turner David & Symeonidis Avraam, 2020, Life cycle inventories of the treatment of iron and steelmaking by-products, ecoinvent association, Zürich, Switzerland
  property sulfur content 0.00861246
    The value of 'sulfur content' is documented in Turner & Symeonidis, 2020.
    Reference: Turner David & Symeonidis Avraam, 2020, Life cycle inventories of the treatment of iron and steelmaking by-products, ecoinvent association, Zürich, Switzerland
  property titanium content 0.00461494
    The value of 'titanium content' is documented in Turner & Symeonidis, 2020.
    Reference: Turner David & Symeonidis Avraam, 2020, Life cycle inventories of the treatment of iron and steelmaking by-products, ecoinvent association, Zürich, Switzerland
  property heating value, net 0 MJ
    Non combustible products are assumed to have an LHV equal to zero (0).
  property copper content 5.3e-6
    The value of 'copper content' is documented in Turner & Symeonidis, 2020.
    Reference: Turner David & Symeonidis Avraam, 2020, Life cycle inventories of the treatment of iron and steelmaking by-products, ecoinvent association, Zürich, Switzerland
  property beryllium content 8.2e-6
    The value of 'beryllium content' is documented in Turner & Symeonidis, 2020.
    Reference: Turner David & Symeonidis Avraam, 2020, Life cycle inventories of the treatment of iron and steelmaking by-products, ecoinvent association, Zürich, Switzerland
  property magnesium content 0.0737591
    The value of 'magnesium content' is documented in Turner & Symeonidis, 2020.
    Reference: Turner David & Symeonidis Avraam, 2020, Life cycle inventories of the treatment of iron and steelmaking by-products, ecoinvent association, Zürich, Switzerland
  property carbon content, non-fossil 0
    The value of 'carbon content, non-fossil' is documented in Turner & Symeonidis, 2020.
    Reference: Turner David & Symeonidis Avraam, 2020, Life cycle inventories of the treatment of iron and steelmaking by-products, ecoinvent association, Zürich, Switzerland
  property potassium content 0.00385818
    The value of 'potassium content' is documented in Turner & Symeonidis, 2020.
    Reference: Turner David & Symeonidis Avraam, 2020, Life cycle inventories of the treatment of iron and steelmaking by-products, ecoinvent association, Zürich, Switzerland
  property barium content 0.000273
    The value of 'barium content' is documented in Turner & Symeonidis, 2020.
    Reference: Turner David & Symeonidis Avraam, 2020, Life cycle inventories of the treatment of iron and steelmaking by-products, ecoinvent association, Zürich, Switzerland
  property aluminium content 0.0566966
    The value of 'aluminium content' is documented in Turner & Symeonidis, 2020.
    Reference: Turner David & Symeonidis Avraam, 2020, Life cycle inventories of the treatment of iron and steelmaking by-products, ecoinvent association, Zürich, Switzerland
  property iron content 0.00562504
    The value of 'iron content' is documented in Turner & Symeonidis, 2020.
    Reference: Turner David & Symeonidis Avraam, 2020, Life cycle inventories of the treatment of iron and steelmaking by-products, ecoinvent association, Zürich, Switzerland
  property manganese content 0.00534032
    The value of 'manganese content' is documented in Turner & Symeonidis, 2020.
    Reference: Turner David & Symeonidis Avraam, 2020, Life cycle inventories of the treatment of iron and steelmaking by-products, ecoinvent association, Zürich, Switzerland
  property sodium content 0.0025965
    The value of 'sodium content' is documented in Turner & Symeonidis, 2020.
    Reference: Turner David & Symeonidis Avraam, 2020, Life cycle inventories of the treatment of iron and steelmaking by-products, ecoinvent association, Zürich, Switzerland
  property silicon content 0.168354
    The value of 'silicon content' is documented in Turner & Symeonidis, 2020.
    Reference: Turner David & Symeonidis Avraam, 2020, Life cycle inventories of the treatment of iron and steelmaking by-products, ecoinvent association, Zürich, Switzerland
  property lead content 3.57e-6
    The value of 'lead content' is documented in Turner & Symeonidis, 2020.
    Reference: Turner David & Symeonidis Avraam, 2020, Life cycle inventories of the treatment of iron and steelmaking by-products, ecoinvent association, Zürich, Switzerland
  property nickel content 1.4e-6
    The value of 'nickel content' is documented in Turner & Symeonidis, 2020.
    Reference: Turner David & Symeonidis Avraam, 2020, Life cycle inventories of the treatment of iron and steelmaking by-products, ecoinvent association, Zürich, Switzerland
  property calcium content 0.26003
    The value of 'calcium content' is documented in Turner & Symeonidis, 2020.
    Reference: Turner David & Symeonidis Avraam, 2020, Life cycle inventories of the treatment of iron and steelmaking by-products, ecoinvent association, Zürich, Switzerland
  property cobalt content 3e-6
    The value of 'cobalt content' is documented in Turner & Symeonidis, 2020.
    Reference: Turner David & Symeonidis Avraam, 2020, Life cycle inventories of the treatment of iron and steelmaking by-products, ecoinvent association, Zürich, Switzerland
  property carbon content 0.00230251
    carbon content on a dry matter basis (reserved; not for manual entry)
  properties: water content 0.00502513, wet mass 1 kg, dry mass 0.995 kg, water in wet mass 0.005 kg, carbon allocation 0.002291 kg

## Inputs from technosphere
- inert waste, for final disposal: -0.00133041 kg; name BP_4; lognormal variance with pedigree 0.0034, pedigree (2,3,2,5,1)
  geometric mean of Remus et al. (2013) data range
  production volume 1.43886e8 kg; = PV*(BP_4/abs(RP))
    Calculated from the production volume of pig iron in proportion to the respective output amounts.
  property price 0 EUR2005; name BP_4_price_EUR2005
  properties: dry mass 0.995 kg, water content 0.00502513, wet mass 1 kg
- blast furnace sludge: 0 kg; name BF_sludge_amount; pedigree (1,1,1,1,1)
  Amount reported by worldsteel (2010) and is representative of the average global situation in 2009. Also based on worldsteel (2010), an internal recovery (recycling) rate of 33% is assumed. Source: Worldsteel (2010). Steel industry by-products. World Steel Association: Brussels, Belgium.
  production volume 0 kg
    Calculated from production volume of reference product using the relative outputs.
  property price 0 EUR2005; name BF_sludge_amount_price_EUR2005
  properties: zinc content 0.0102173, oxygen content 0.159046, magnesium content 0.0145544, calcium content 0.0359238, aluminium content 0.0110581, dry mass 0.68 kg, sulfur content 0.00689046, wet mass 1 kg, carbon content, fossil 0.304046, silicon content 0.0279247, water content 0.470588, iron content 0.193985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
  note on zinc content: The value of 'zinc content' is documented in Turner & Symeonidis, 2020. Reference: Turner David & Symeonidis Avraam, 2020, Life cycle inventories of the treatment of iron and steelmaking by-products, ecoinvent association, Zürich, Switzerland
  note on oxygen content: The value of 'oxygen content' is documented in Turner & Symeonidis, 2020. Reference: Turner David & Symeonidis Avraam, 2020, Life cycle inventories of the treatment of iron and steelmaking by-products, ecoinvent association, Zürich, Switzerland
  note on magnesium content: The value of 'magnesium content' is documented in Turner & Symeonidis, 2020. Reference: Turner David & Symeonidis Avraam, 2020, Life cycle inventories of the treatment of iron and steelmaking by-products, ecoinvent association, Zürich, Switzerland
  note on calcium content: The value of 'calcium content' is documented in Turner & Symeonidis, 2020. Reference: Turner David & Symeonidis Avraam, 2020, Life cycle inventories of the treatment of iron and steelmaking by-products, ecoinvent association, Zürich, Switzerland
  note on aluminium content: The value of 'aluminium content' is documented in Turner & Symeonidis, 2020. Reference: Turner David & Symeonidis Avraam, 2020, Life cycle inventories of the treatment of iron and steelmaking by-products, ecoinvent association, Zürich, Switzerland
  note on sulfur content: The value of 'sulfur content' is documented in Turner & Symeonidis, 2020. Reference: Turner David & Symeonidis Avraam, 2020, Life cycle inventories of the treatment of iron and steelmaking by-products, ecoinvent association, Zürich, Switzerland
  note on carbon content, fossil: The value of 'carbon content, fossil' is documented in Turner & Symeonidis, 2020. Reference: Turner David & Symeonidis Avraam, 2020, Life cycle inventories of the treatment of iron and steelmaking by-products, ecoinvent association, Zürich, Switzerland
  note on silicon content: The value of 'silicon content' is documented in Turner & Symeonidis, 2020. Reference: Turner David & Symeonidis Avraam, 2020, Life cycle inventories of the treatment of iron and steelmaking by-products, ecoinvent association, Zürich, Switzerland
  note on iron content: The value of 'iron content' is documented in Turner & Symeonidis, 2020. Reference: Turner David & Symeonidis Avraam, 2020, Life cycle inventories of the treatment of iron and steelmaking by-products, ecoinvent association, Zürich, Switzerland
- wastewater from pig iron production: 0 m3; name BP_5; pedigree (1,1,1,1,1)
  geometric mean of Remus et al. (2013) data range
  production volume 0 m3
    (same comment as for inert waste, for final disposal)
  property price 0 EUR2005; name BP_5_price_EUR2005
  properties: dry mass 0.337476 kg, wet mass 1000 kg, carbon content, fossil 1.2149e-5, water content 2962.17
- refractory, fireclay, packed: 0.002 kg; lognormal variance with pedigree 0.0002, pedigree (1,2,1,3,1)
  Average value of measured data from plants in Europe. Source: Remus, R., Aguado-Monsonet, M. A., Roudier, S. & Samcho, L. D. (2013). JRC reference report - Best available techniques (BAT) reference document for iron and steel production. Joint Research Centre - European Commission, Luxemboug.
  properties: dry mass 1 kg, wet mass 1 kg
- blast furnace: 1.3333e-11 unit; lognormal variance with pedigree 0.5, pedigree (5,5,5,5,5)
  (same comment as for refractory, fireclay, packed)
- blast furnace dust: -0.0100574 kg; name BF_dust_amount; lognormal variance with pedigree 0.0439, pedigree (2,3,3,3,2)
  (same comment as for blast furnace sludge)
  production volume 1.08772e9 kg; = PV * BF_dust_amount / RP
    Calculated from production volume of reference product using the relative outputs.
  property price 0 EUR2005; name BF_dust_amount_price_EUR2005
  properties: carbon content, fossil 0.344336, oxygen content 0.257407, iron content 0.309177, wet mass 1 kg, calcium content 0.0233333, silicon content 0.029133, potassium content 0.00371216, magnesium content 0.00820361, aluminium content 0.0112796, sulfur content 0.0045155, dry mass 0.999 kg, manganese content 0.00213301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
  note on potassium content: The value of 'potassium content' is documented in Turner & Symeonidis, 2020. Reference: Turner David & Symeonidis Avraam, 2020, Life cycle inventories of the treatment of iron and steelmaking by-products, ecoinvent association, Zürich, Switzerland
  note on manganese content: The value of 'manganese content' is documented in Turner & Symeonidis, 2020. Reference: Turner David & Symeonidis Avraam, 2020, Life cycle inventories of the treatment of iron and steelmaking by-products, ecoinvent association, Zürich, Switzerland
- iron pellet: 0.4 kg; lognormal variance with pedigree 0.0001, pedigree (1,2,1,1,1)
  (same comment as for refractory, fireclay, packed)
  properties: dry mass 1 kg, wet mass 1 kg
- iron sinter: 1.05 kg; lognormal variance with pedigree 0.0001, pedigree (1,2,1,1,1)
  (same comment as for refractory, fireclay, packed)
  properties: wet mass 1 kg, dry mass 1 kg
- coke: 9.724 MJ; lognormal variance with pedigree 0.0002, pedigree (1,2,1,3,1)
  (same comment as for refractory, fireclay, packed)
  properties: carbon content, fossil 0.869149, water content 0.0638298, wet mass 0.034965 kg, dry mass 0.0328671 kg, heating value, net 28.6 MJ
  note on carbon content, fossil: 81.7% C and 6% water in wet mass (ecoinvent v2.1 report 6_VI Table 7.1)
- iron ore concentrate: 0.15 kg; lognormal variance with pedigree 0.0001, pedigree (1,2,1,1,1)
  (same comment as for refractory, fireclay, packed)
  properties: dry mass 1 kg, wet mass 1 kg
- limestone, unprocessed: 0.01 kg; lognormal variance with pedigree 0.0002, pedigree (1,2,1,3,1)
  (same comment as for refractory, fireclay, packed)
  properties: carbon content, fossil 0.117257, wet mass 1 kg, water content 0.00200401, dry mass 0.998 kg
  note on carbon content, fossil: Table 3.1, ecoinvent v2.2 report 7, part VII, pg 3. MW CaCO3=100, MW MgCO3=84. C content of limestone is 0.117257 kg/kg DM
- hard coal: 0.15 kg; lognormal variance with pedigree 0.0002, pedigree (1,2,1,3,1)
  (same comment as for refractory, fireclay, packed)
  properties: wet mass 1 kg, carbon content, fossil 0.845, heating value, net 27.91 MJ, dry mass 0.94 kg, water content 0.0638298
  note on carbon content, fossil: C content 75-94% (specified in Tab 1.1, report 6, part VI). A mean content of 0.845 kg C/ kg dry hard coal was considered
  note on heating value, net: Based on the Characterization factor of Hard coal in the CED method
- natural gas, high pressure: 0 m3; pedigree (1,1,1,1,1)
  (same comment as for refractory, fireclay, packed)
  properties: heating value, gross 39 MJ, wet mass 0.84 kg, heating value, net 39 MJ, carbon content, fossil 0.602381, dry mass 0.84 kg
  note on heating value, net: Literature value, Source: United Nations Statistics Division (2018) International Recommendations for Energy Statistics (IRES). Available at: http://unstats.un.org/unsd/statcom/doc11/BG-IRES.pdf.
  note on carbon content, fossil: An average C content of 0.506 kg C/ m3 has been assumed (this average has been calculated using data in Tab 3.5, ecoinvent v2.2 report 6_V
- blast furnace slag: -0.275 kg; lognormal variance with pedigree 0.0439, pedigree (2,3,3,3,2)
  (same comment as for blast furnace slag)
  production volume 2.97415e10 kg
  properties: oxygen content 0.402495, sulfur content 0.00861246, water content 0.00502513, titanium content 0.00461494, wet mass 1 kg, magnesium content 0.0737591, aluminium content 0.0566966, iron content 0.00562504, dry mass 0.995 kg, manganese content 0.00534032, silicon content 0.168354, calcium content 0.26003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
  note on titanium content: The value of 'titanium content' is documented in Turner & Symeonidis, 2020. Reference: Turner David & Symeonidis Avraam, 2020, Life cycle inventories of the treatment of iron and steelmaking by-products, ecoinvent association, Zürich, Switzerland
- blast furnace sludge: -0.00129275, -0.00221024 kg (2 entries); lognormal variance with pedigree 0.0439, pedigree (2,3,3,3,2)
  (same comment as for blast furnace sludge)
  production volume 3.78852e8 kg
- wastewater from pig iron production: -9.36302e-5, -2.80128e-5 m3 (2 entries); lognormal variance with pedigree 0.0434, pedigree (2,3,2,5,1)
  geometric mean of Remus et al. (2013) data range
  production volume 1.31558e7 m3
- natural gas, high pressure: 0.00305718, 1.9739e-5 m3 (2 entries); lognormal variance with pedigree 0.0002, pedigree (1,2,1,3,1)
  (same comment as for refractory, fireclay, packed)

## Inputs from nature
- Water, cooling, unspecified natural origin [natural resource, in water]: 0.00105698 m3; name water_cooling_UNO_input; source Byers, W. 2003; lognormal variance with pedigree 0.012825, pedigree (3,3,2,2,1)
  Calculated based on literature, (Vionnet, S., Quantis Water Database - Technical Report, 2012).
  property carbon content, non-fossil 0; name C_content_non_fossil
  property water in wet mass 999.89 kg; name WWM
  property carbon content, fossil 0.0104329; name C_content_fossil
  property wet mass 1000 kg; name WM
  property dry mass 0.1101 kg; name DM
- Water, unspecified natural origin [natural resource, in water]: 0.000403572 m3; name water_UNO_input; source Byers, W. 2003; lognormal variance with pedigree 0.012825, pedigree (3,3,2,2,1)
  Based on literature, (Vionnet, S., Quantis Water Database - Technical Report, 2012). based on literature, (Vionnet, S., Quantis Water Database - Technical Report, 2012).

## Emissions to nature
- Carbon monoxide, fossil [air, unspecified]: 0.0013404 kg; lognormal variance with pedigree 0.6515, pedigree (2,3,2,3,1)
  (same comment as for refractory, fireclay, packed)
- Particulates, < 2.5 um [air, unspecified]: 2.8723e-5 kg; lognormal variance with pedigree 0.3015, pedigree (2,3,2,3,1)
  (same comment as for refractory, fireclay, packed)
- Nitrogen oxides [air, unspecified]: 7.9787e-5 kg; lognormal variance with pedigree 0.0415, pedigree (2,3,2,3,1)
  (same comment as for refractory, fireclay, packed)
- Water [air, unspecified]: 0.000490292 m3; name water_to_air_unspecified; = (water_cooling_UNO_input*fraction_CW_to_air)+(water_UNO_input*fraction_PW_to_air); lognormal variance with pedigree 0.0407, pedigree (2,2,1,1,1)
  Calculated value based on literature values and expert opinion. See comments in the parametres' comment field.
  property fraction, origin: unspecified 1; name fraction_origin_unspecified
  property fraction, origin: fresh water 0; name fraction_origin_fresh_water
  property fraction, origin: salt water 0; name fraction_origin_salt_water
- Particulates, > 2.5 um, and < 10um [air, unspecified]: 1.5957e-6 kg; lognormal variance with pedigree 0.1215, pedigree (2,3,2,3,1)
  (same comment as for refractory, fireclay, packed)
- Sulfur dioxide [air, unspecified]: 0.00013298 kg; lognormal variance with pedigree 0.0015, pedigree (2,3,2,3,1)
  (same comment as for refractory, fireclay, packed)
- Particulates, > 10 um [air, unspecified]: 1.5957e-6 kg; lognormal variance with pedigree 0.0415, pedigree (2,3,2,3,1)
  (same comment as for refractory, fireclay, packed)
- Hydrogen sulfide [air, unspecified]: 1.0745e-5 kg; lognormal variance with pedigree 0.0415, pedigree (2,3,2,3,1)
  (same comment as for refractory, fireclay, packed)
- Lead [air, unspecified]: 6.9149e-8 kg; lognormal variance with pedigree 0.6515, pedigree (2,3,2,3,1)
  (same comment as for refractory, fireclay, packed)
- Dioxins, measured as 2,3,7,8-tetrachlorodibenzo-p-dioxin [air, unspecified]: 2.6596e-15 kg; lognormal variance with pedigree 0.3015, pedigree (2,3,2,3,1)
  (same comment as for refractory, fireclay, packed)
- Carbon dioxide, fossil [air, unspecified]: 0.84908 kg; lognormal variance with pedigree 0.0015, pedigree (2,3,2,3,1)
  (same comment as for refractory, fireclay, packed)
- Manganese [air, unspecified]: 7.4468e-8 kg; lognormal variance with pedigree 0.6515, pedigree (2,3,2,3,1)
  (same comment as for refractory, fireclay, packed)
- Nickel [air, unspecified]: 1.5957e-8 kg; lognormal variance with pedigree 0.6515, pedigree (2,3,2,3,1)
  (same comment as for refractory, fireclay, packed)
- Water [water, unspecified]: 0.000970255 m3; name water_to_water_unspecified; = water_cooling_UNO_input*(1-fraction_CW_to_air)+water_UNO_input*(1-fraction_PW_to_air); lognormal variance with pedigree 0.092025, pedigree (4,4,3,2,4)
  (same comment as for Water)
  property fraction, origin: unspecified 1; name fraction_origin_unspecified_Ww
  property fraction, origin: fresh water 0; name fraction_origin_fresh_water_Ww
  property fraction, origin: salt water 0; name fraction_origin_salt_water_Ww

## Sampling procedure
Data were taken from direct measurements at blast furnace plants across Europe.

## Extrapolations
see Geography
