# glycerine production, from epichlorohydrin

Dataset: EcoSpold 2, unit process
Geography: RER
Time period: 1998-01-01 to 2021-12-31
Technology level: current
Classification: EcoSpold01Categories: chemicals/organics
Classification: ISIC rev.4 ecoinvent: 2011:Manufacture of basic chemicals
Tags: ConvertedDataset
Scenario: Business-as-Usual
System model: Allocation, cut-off by classification
Generated by: Mike Chudacoff
Published in: Jungbluth N. 2007
Database: ecoinvent
isCopyrightProtected: true
accessRestrictedTo: 1

## General comment
Glycerine is produced by reacting epichlorohydrin with a 10% sodium hydroxide aqueous solution
[This dataset was already contained in the ecoinvent database version 2. It was not individually updated during the transfer to ecoinvent version 3. Life Cycle Impact Assessment results may still have changed, as they are affected by changes in the supply chain, i.e. in other datasets. This dataset was generated following the ecoinvent quality guidelines for version 2. It may have been subject to central changes described in the ecoinvent version 3 change report (http://www.ecoinvent.org/database/ecoinvent-version-3/reports-of-changes/), and the results of the central updates were reviewed extensively. The changes added e.g. consistent water flows and other information throughout the database. The documentation of this dataset can be found in the ecoinvent reports of version 2, which are still available via the ecoinvent website. The change report linked above covers all central changes that were made during the conversion process.]

## Included activities end
cradle-to-gate, including all precursors, ancillary materials and transports

## Geography
RER

## Technology
based on industry data in the US and Europe

## Parameters
- fraction, water, completely softened, to air: 0.205 dimensionless; name fraction_WCS_to_air; = fraction_PW_to_air; lognormal variance with pedigree 0.092025, pedigree (4,4,3,2,4)
  Calculated value. See comment in the other parametres present in this dataset. Water, completely softened is considered to be always used as process water, thus process water fractions to air are applied to all water, completely softened input flows to calculate the amount of water consumed in the processes.
- fraction, process water, to air: 0.205 dimensionless; name fraction_PW_to_air; lognormal variance with pedigree 0.092025, pedigree (4,4,3,2,4)
  Literature value (Statistics Canada, 2007 & Shaffer, K.H., 2008, Consumptive water use in the Great Lakes Basin, USGS) (Vionnet, S., Quantis Water Database - Technical Report, 2012).

## Reference product
- glycerine: 1 kg; CPC 34570: Glycerol; By-product classification allocatable product; CAS 56-81-5
  EcoSpold01Location=RER
  production volume 1.6e8 kg
    Estimated to 1/3 of global amount
  property price 0.792 EUR2005
    Temporary price data. Calculated as 90% of purchasers price based on: 2004 import and export prices (total trades (USD) divided by total weight (kg) in EU27, USA, China, Japan and India) from UN data - Glycerol (glycerine), nes including synthetic glycerol (http://data.un.org/Data.aspx?q=glycerine&d=ComTrade&f=_l1Code%3a16%3bcmdCode%3a152090; accessed 1 July 10)
  property heating value, net 22.38 MJ
    LHV is calculated based on the elemental composition of the substance. Based on the CAS number of the substance (000056-81-5), the chemical formula of the substance is found to be: C3H8O3, (PubChem 2020).
    Reference: Kim, S., Chen, J., Cheng, T., Gindulyte, A., He, J., He, S., Li, Q., Shoemaker, B. A., Thiessen, P. A., Yu, B., Zaslavsky, L., Zhang, J., & Bolton, E. E. (2019). PubChem 2019 update: improved access to chemical data. Nucleic acids research, 47(D1), D1102–D1109. https://doi.org/10.1093/nar/gky1033
  property carbon content 0.391304
    carbon content on a dry matter basis (reserved; not for manual entry)
  properties: water content 0, carbon content, non-fossil 0, wet mass 1 kg, water in wet mass 0 kg, dry mass 1 kg, carbon content, fossil 0.391304, carbon allocation 0.391304 kg

## Inputs from technosphere
- heat, district or industrial, other than natural gas: 3.93233 MJ; lognormal variance with pedigree 0.0408, pedigree (2,2,5,3,1)
  Uncertainty: industry source
  properties: heating value, net 1 MJ
- electricity, medium voltage: 0.0815016 kWh; lognormal variance with pedigree 0.0408, pedigree (2,2,5,3,1)
  Literature
  EcoSpold01Location=UCTE
  Uncertainty: literature
- chemical factory, organics: 4e-10 unit; lognormal variance with pedigree 0.1786, pedigree (4,5,5,5,5)
  EcoSpold01Location=RER
  Infrastructure of a typical plant
  Uncertainty: infrastructure of a typical plant
- sodium hydroxide, without water, in 50% solution state: 0.44 kg; lognormal variance with pedigree 0.0408, pedigree (2,2,5,3,1)
  EcoSpold01Location=RER
  Literature
  Uncertainty: literature
  properties: wet mass 1 kg, dry mass 1 kg, heating value, net 3.03 MJ
- epichlorohydrin: 1.015 kg; lognormal variance with pedigree 0.0408, pedigree (2,2,5,3,1)
  EcoSpold01Location=RER
  Literature
  Uncertainty: literature
  properties: dry mass 1 kg, wet mass 1 kg, carbon content, fossil 0.391304, heating value, net 18.35 MJ
- heat, district or industrial, natural gas: 7.0452 MJ; lognormal variance with pedigree 0.0408, pedigree (2,2,5,3,1)
  Uncertainty: industry source
  properties: heating value, net 1 MJ
- wastewater, average: 0 m3; pedigree (1,1,1,1,1)
  EcoSpold01Location=CH
  Approximation
  Uncertainty: approximation
  production volume 0 m3
    Calculated from the production volume of glycerine in proportion to the respective output amounts.
  properties: carbon content, non-fossil 0.194039, water content 2882.2, dry mass 0.346837 kg, wet mass 1000 kg
  note on carbon content, non-fossil: C3H8O3 0.0673 kg TOC/m3 (Tab A.17, ecoinvent v2.2 report 13_I). TOC was considered as Total Carbon.
- water, completely softened: 3.9 kg; name water_softened_input; lognormal variance with pedigree 0.0408, pedigree (2,2,5,3,1)
  Literature
  EcoSpold01Location=RER
  Uncertainty: literature
  properties: wet mass 1 kg
- wastewater, average: -0.00338392, -0.000366077 m3 (2 entries); lognormal variance with pedigree 0.0582, pedigree (4,2,5,3,1)
  EcoSpold01Location=CH
  Approximation
  Uncertainty: approximation
  production volume 600000 m3

## Emissions to nature
- Sodium, ion [water, surface water]: 0.023 kg; lognormal variance with pedigree 0.0582, pedigree (4,2,5,3,1)
  Approximation
  Uncertainty: approximation
- COD, Chemical Oxygen Demand [water, surface water]: 0.00192 kg; lognormal variance with pedigree 0.0408, pedigree (2,2,5,3,1)
  Literature
  Uncertainty: literature
- BOD5, Biological Oxygen Demand [water, surface water]: 0.00192 kg; lognormal variance with pedigree 0.0408, pedigree (2,2,5,3,1)
  Literature
  Uncertainty: literature
- TOC, Total Organic Carbon [water, surface water]: 0.0006 kg; lognormal variance with pedigree 0.0408, pedigree (2,2,5,3,1)
  Literature
  Uncertainty: literature
- Chloride [water, surface water]: 0.382 kg; lognormal variance with pedigree 0.0582, pedigree (4,2,5,3,1)
  Calculation
  Uncertainty: calculation
- Water [air, unspecified]: 0.0007995 m3; name water_to_air_unspecified; = (water_softened_input/1000*fraction_WCS_to_air); lognormal variance with pedigree 0.0807, pedigree (2,2,5,1,1)
  Calculated value based on literature values and expert opinion. See comments in the parametres' comment field.
  property fraction, origin: salt water 0; name fraction_origin_salt_water
  property fraction, origin: fresh water 1; name fraction_origin_fresh_water
  property fraction, origin: unspecified 0; name fraction_origin_unspecified
- AOX, Adsorbable Organic Halogen as Cl [water, surface water]: 0.00078 kg; lognormal variance with pedigree 0.0408, pedigree (2,2,5,3,1)
  Calculated
  Uncertainty: calculated
- DOC, Dissolved Organic Carbon [water, surface water]: 0.0006 kg; lognormal variance with pedigree 0.0582, pedigree (4,2,5,3,1)
  Calculation
  Uncertainty: calculation

## Extrapolations
This dataset has been extrapolated from year 2004 to the year of the calculation (2021). The uncertainty has been adjusted accordingly.

## Review by Niels Jungbluth 2005-12-02
Passed.
