# molecular sieve separation of naphtha

Dataset: EcoSpold 2, unit process
Geography: RoW
Time period: 1998-01-01 to 2021-12-31
Technology level: current
Classification: EcoSpold01Categories: chemicals/organics
Classification: ISIC rev.4 ecoinvent: 1920:Manufacture of refined petroleum products
Scenario: Business-as-Usual
System model: Allocation, cut-off by classification
Share of production covered: 0 %
Generated by: Tereza Levova
Published in: Jungbluth N. 2007
Database: ecoinvent
isCopyrightProtected: true
accessRestrictedTo: 1

## General comment
The multioutput-process "naphta, to melecular sieve separations" delivers the co-products hexane, heptane, 2,3-dimethylbutane, 2-methylpentane, methylcyclopentane, 1,1-dimethylcyclopentane, methylcyclohexane, fraction 1 from naphta, fraction 7 from naphta, and fraction 8 from naphta. The allocation is based on mass balance.

## Included activities end
Molecular sieve separation of naphta including materials, energy uses, infrastructure and emissions.

## Geography
The inventory is modelled with data from plants in the USA.

## Technology
Separation of naphta with a zeolith 5a molecular sieve.

## Time period
Time of publications.

## Parameters
- fraction, cooling water, recirculating system, to air: 0.771 dimensionless; name fraction_CW_R_to_air; lognormal variance with pedigree 0.0413, pedigree (2,3,1,3,1)
  Calculated based on literature value (Scown, C.D., 2011, Water Footprint of U.S. Transportation Fuels and supplying information of the article) (Vionnet, S., Quantis Water Database - Technical Report, 2012).
- fraction, cooling water, to air: 0.3875 dimensionless; name fraction_CW_to_air; = (0.5*fraction_CW_OT_to_air)+(0.5*fraction_CW_R_to_air); lognormal variance with pedigree 0.092025, pedigree (4,4,3,2,4)
  Calculated value based on literature value (see comments of the other parametres present in this dataset) and expert opinion. In the case when no industry/literature data are available about the type of cooling or directly fraction, cooling water, to air specific for the process a default assumption is applied. It is assumed that the once-through cooling system is used in 50% of all cases and recirculating system is used in another 50% of all cases.
- fraction, cooling water, once-through system, to air: 0.004 dimensionless; name fraction_CW_OT_to_air; lognormal variance with pedigree 0.0413, pedigree (2,3,1,3,1)
  (same comment as for fraction, cooling water, recirculating system, to air)
- fraction, cooling water, cooling pond system, to air: 0.032 dimensionless; name fraction_CW_CP_to_air; lognormal variance with pedigree 0.0413, pedigree (2,3,1,3,1)
  (same comment as for fraction, cooling water, recirculating system, to air)

## Reference product
- hexane: 0 kg; name RP_amount_1; By-product classification allocatable product; CPC 333: Petroleum oils and oils obtained from bituminous materials, other than crude; preparations n.e.c. containing by […]; CAS 110-54-3
  production volume 3.4375e8 kg; name RP_PV_1; = 171875000*3
    Estimated. 1.718E+08 kg is the amount of hexane produced in Europe. Which is assumed to be 1/3 of global production.
  property heating value, net 45.02 MJ
    LHV is calculated based on the elemental composition of the substance. Based on the CAS number of the substance (000110-54-3), the chemical formula of the substance is found to be: C6H14, (PubChem 2020).
    Reference: Kim, S., Chen, J., Cheng, T., Gindulyte, A., He, J., He, S., Li, Q., Shoemaker, B. A., Thiessen, P. A., Yu, B., Zaslavsky, L., Zhang, J., & Bolton, E. E. (2019). PubChem 2019 update: improved access to chemical data. Nucleic acids research, 47(D1), D1102–D1109. https://doi.org/10.1093/nar/gky1033
  property price 0.326 EUR2005
    Temporary price data. Calculated as 90% of purchasers price based on: Source: 28 August 2006 issue of Chemical Market Reporter (ICIS) in USD/gal (conversion 3.7854 litre/gal; density 0.6548 kg/litre)
  property carbon content 0.837209
    carbon content on a dry matter basis (reserved; not for manual entry)
  property true value 0.0475569; name RP_amount_1_true_value
    allocation property applied in "true value" allocation // value calculated from revenue
  properties: water content 0, wet mass 1 kg, dry mass 1 kg, carbon content, non-fossil 0, carbon content, fossil 0.837209, water in wet mass 0 kg, carbon allocation 0.837209 kg
- heptane: 1 kg; name BP_amount_3; CPC 333: Petroleum oils and oils obtained from bituminous materials, other than crude; preparations n.e.c. containing by […]; By-product classification allocatable product; CAS 142-82-5
  production volume 3.35126e8 kg; = RP_PV_1 * (BP_amount_3 / RP_amount_1)
    Calculated from production volume of reference product using the relative outputs.
  property price 0.374 EUR2005
    Temporary price data. Calculated as 90% of purchasers price based on: Source: 28 August 2006 issue of Chemical Market Reporter (ICIS) in USD/gal (conversion 3.7854 litre/gal; density 0.684 kg/litre)
  property heating value, net 44.77 MJ
    LHV is calculated based on the elemental composition of the substance. Based on the CAS number of the substance (000142-82-5), the chemical formula of the substance is found to be: C7H16, (PubChem 2020).
    Reference: Kim, S., Chen, J., Cheng, T., Gindulyte, A., He, J., He, S., Li, Q., Shoemaker, B. A., Thiessen, P. A., Yu, B., Zaslavsky, L., Zhang, J., & Bolton, E. E. (2019). PubChem 2019 update: improved access to chemical data. Nucleic acids research, 47(D1), D1102–D1109. https://doi.org/10.1093/nar/gky1033
  property carbon content 0.84
    carbon content on a dry matter basis (reserved; not for manual entry)
  property true value 0.0531903; name BP_amount_3_true_value
    allocation property applied in "true value" allocation // value calculated from revenue
  properties: water in wet mass 0 kg, dry mass 1 kg, wet mass 1 kg, carbon content, non-fossil 0, water content 0, carbon content, fossil 0.84, carbon allocation 0.84 kg

## By-products
All rows: By-product classification allocatable product
- fraction 1 from naphtha separation: 0 kg; name BP_amount_1; CPC 341: Basic organic chemicals
  EcoSpold01Location=RER
  production volume 3.35314e7 kg; = RP_PV_1 * (BP_amount_1 / RP_amount_1)
    Calculated from production volume of reference product using the relative outputs.
  property price 0.522 EUR2005
    Temporary price data. Calculated as 90% of purchasers price based on: Same price as for methylcyclohexane has been assumed
  property carbon content, non-fossil 0
    Mixture of cyclopentane (C5H10) and 2,2-dimethylbutane ((CH3)3CCH2CH3, condensated C6H14) (ecoinvent v2.2 report 17-part 28). Equal quantity of the substances considered in the mix
  property carbon content, fossil 0.847176
    (same comment as for fraction 1 from naphtha separation)
  property carbon content 0.847176
    carbon content on a dry matter basis (reserved; not for manual entry)
  property true value 0.00742806; name BP_amount_1_true_value
    allocation property applied in "true value" allocation // value calculated from revenue
  properties: wet mass 1 kg, dry mass 1 kg, water in wet mass 0 kg, water content 0, heating value, net 45 MJ, carbon allocation 0.847176 kg
- 2-methylpentane: 0 kg; name BP_amount_2; CPC 341: Basic organic chemicals; CAS 107-83-5
  EcoSpold01Location=RER
  production volume 1.12588e8 kg; = RP_PV_1 * (BP_amount_2 / RP_amount_1)
    Calculated from production volume of reference product using the relative outputs.
  property price 0.522 EUR2005
    (same comment as for fraction 1 from naphtha separation)
  property heating value, net 45.02 MJ
    LHV is calculated based on the elemental composition of the substance. Based on the CAS number of the substance (000107-83-5), the chemical formula of the substance is found to be: C6H14, (PubChem 2020).
    Reference: Kim, S., Chen, J., Cheng, T., Gindulyte, A., He, J., He, S., Li, Q., Shoemaker, B. A., Thiessen, P. A., Yu, B., Zaslavsky, L., Zhang, J., & Bolton, E. E. (2019). PubChem 2019 update: improved access to chemical data. Nucleic acids research, 47(D1), D1102–D1109. https://doi.org/10.1093/nar/gky1033
  property carbon content 0.837209
    carbon content on a dry matter basis (reserved; not for manual entry)
  property true value 0.0249412; name BP_amount_2_true_value
    allocation property applied in "true value" allocation // value calculated from revenue
  properties: water content 0, dry mass 1 kg, carbon content, fossil 0.837209, carbon content, non-fossil 0, water in wet mass 0 kg, wet mass 1 kg, carbon allocation 0.837209 kg
- fraction 8 from naphtha separation: 0 kg; name BP_amount_4; CPC 341: Basic organic chemicals
  EcoSpold01Location=RER
  production volume 6.73833e8 kg; = RP_PV_1 * (BP_amount_4 / RP_amount_1)
    Calculated from production volume of reference product using the relative outputs.
  property carbon content, fossil 0.843588
    Mixture of 2-methylpentane (C6H14), 2,3-dimethylpentane (C7H16), trans-1,2-dimethylcyclopentane (C7H14) and 3-methylhexane (C7H16) (ecoinvent v2.2 report 17-part 28). Equal quantity of the substances considered in the mix
  property carbon content, non-fossil 0
    (same comment as for fraction 8 from naphtha separation)
  property price 0.522 EUR2005
    (same comment as for fraction 1 from naphtha separation)
  property carbon content 0.843588
    carbon content on a dry matter basis (reserved; not for manual entry)
  property true value 0.149271; name BP_amount_4_true_value
    allocation property applied in "true value" allocation // value calculated from revenue
  properties: dry mass 1 kg, wet mass 1 kg, water content 0, water in wet mass 0 kg, heating value, net 45 MJ, carbon allocation 0.843588 kg
- 1,1-dimethylcyclopentane: 0 kg; name BP_amount_5; CPC 341: Basic organic chemicals; CAS 1638-26-2
  EcoSpold01Location=RER
  production volume 3.77258e7 kg; = RP_PV_1 * (BP_amount_5 / RP_amount_1)
    Calculated from production volume of reference product using the relative outputs.
  property price 0.522 EUR2005
    (same comment as for fraction 1 from naphtha separation)
  property heating value, net 43.22 MJ
    LHV is calculated based on the elemental composition of the substance. Based on the CAS number of the substance (028729-52-4), the chemical formula of the substance is found to be: C7H14, (PubChem 2020).
    Reference: Kim, S., Chen, J., Cheng, T., Gindulyte, A., He, J., He, S., Li, Q., Shoemaker, B. A., Thiessen, P. A., Yu, B., Zaslavsky, L., Zhang, J., & Bolton, E. E. (2019). PubChem 2019 update: improved access to chemical data. Nucleic acids research, 47(D1), D1102–D1109. https://doi.org/10.1093/nar/gky1033
  property carbon content 0.857143
    carbon content on a dry matter basis (reserved; not for manual entry)
  property true value 0.00835722; name BP_amount_5_true_value
    allocation property applied in "true value" allocation // value calculated from revenue
  properties: water content 0, wet mass 1 kg, dry mass 1 kg, carbon content, non-fossil 0, water in wet mass 0 kg, carbon content, fossil 0.857143, carbon allocation 0.857143 kg
- methylcyclohexane: 0 kg; name BP_amount_6; CPC 34110: Hydrocarbons and their halogenated, sulphonated, nitrated or nitrosated derivatives; CAS 108-87-2
  EcoSpold01Location=RER
  production volume 3.94884e8 kg; = RP_PV_1 * (BP_amount_6 / RP_amount_1)
    Calculated from production volume of reference product using the relative outputs.
  property price 0.522 EUR2005
    Temporary price data. Calculated as 90% of purchasers price based on: Source: 28 August 2006 issue of Chemical Market Reporter (ICIS) in USD/gal (conversion 3.7854 litre/gal; density 0.77 kg/litre). For comparison, UN Commodity Trade Statistics Database (http://data.un.org/Explorer.aspxDatabase [Accessed 2 July 2010]) has import and export prices (total trades (USD) divided by total weight (kg) in EU27, USA, China, Japan and India) for 'Cyclohexane' resulting in a price of 0.88 USD/kg.
  property heating value, net 43.22 MJ
    LHV is calculated based on the elemental composition of the substance. Based on the CAS number of the substance (000108-87-2), the chemical formula of the substance is found to be: C7H14, (PubChem 2020).
    Reference: Kim, S., Chen, J., Cheng, T., Gindulyte, A., He, J., He, S., Li, Q., Shoemaker, B. A., Thiessen, P. A., Yu, B., Zaslavsky, L., Zhang, J., & Bolton, E. E. (2019). PubChem 2019 update: improved access to chemical data. Nucleic acids research, 47(D1), D1102–D1109. https://doi.org/10.1093/nar/gky1033
  property carbon content 0.857143
    carbon content on a dry matter basis (reserved; not for manual entry)
  property true value 0.0874768; name BP_amount_6_true_value
    allocation property applied in "true value" allocation // value calculated from revenue
  properties: wet mass 1 kg, water content 0, water in wet mass 0 kg, carbon content, non-fossil 0, dry mass 1 kg, carbon content, fossil 0.857143, carbon allocation 0.857143 kg
- fraction 7 from naphtha separation: 0 kg; name BP_amount_7; CPC 341: Basic organic chemicals
  EcoSpold01Location=RER
  production volume 1.98785e8 kg; = RP_PV_1 * (BP_amount_7 / RP_amount_1)
    Calculated from production volume of reference product using the relative outputs.
  property carbon content, fossil 0.845657
    Mixture of 2,2,-dimethylpentane (C7H16), 2,4-dimethylpentane (C7H16) and cyclohexane (C6H12) (ecoinvent v2.2 report 17-part 28). Equal quantity of the substances considered in the mix
  property price 0.522 EUR2005
    (same comment as for fraction 1 from naphtha separation)
  property carbon content, non-fossil 0
    (same comment as for fraction 7 from naphtha separation)
  property carbon content 0.845657
    carbon content on a dry matter basis (reserved; not for manual entry)
  property true value 0.0440359; name BP_amount_7_true_value
    allocation property applied in "true value" allocation // value calculated from revenue
  properties: heating value, net 45 MJ, dry mass 1 kg, wet mass 1 kg, water content 0, water in wet mass 0 kg, carbon allocation 0.845657 kg
- methylcyclopentane: 0 kg; name BP_amount_8; CPC 341: Basic organic chemicals; CAS 96-37-7
  EcoSpold01Location=RER
  production volume 1.37307e8 kg; = RP_PV_1 * (BP_amount_8 / RP_amount_1)
    Calculated from production volume of reference product using the relative outputs.
  property heating value, net 43.22 MJ
    LHV is calculated based on the elemental composition of the substance. Based on the CAS number of the substance (000096-37-7), the chemical formula of the substance is found to be: C6H12, (PubChem 2020).
    Reference: Kim, S., Chen, J., Cheng, T., Gindulyte, A., He, J., He, S., Li, Q., Shoemaker, B. A., Thiessen, P. A., Yu, B., Zaslavsky, L., Zhang, J., & Bolton, E. E. (2019). PubChem 2019 update: improved access to chemical data. Nucleic acids research, 47(D1), D1102–D1109. https://doi.org/10.1093/nar/gky1033
  property price 0.522 EUR2005
    (same comment as for fraction 1 from naphtha separation)
  property carbon content 0.857143
    carbon content on a dry matter basis (reserved; not for manual entry)
  property true value 0.0304169; name BP_amount_8_true_value
    allocation property applied in "true value" allocation // value calculated from revenue
  properties: carbon content, fossil 0.857143, carbon content, non-fossil 0, wet mass 1 kg, dry mass 1 kg, water content 0, water in wet mass 0 kg, carbon allocation 0.857143 kg
- 2,3-dimethylbutan: 0 kg; name BP_amount_9; CPC 341: Basic organic chemicals; CAS 79-29-8
  EcoSpold01Location=RER
  production volume 2.28805e7 kg; = RP_PV_1 * (BP_amount_9 / RP_amount_1)
    Calculated from production volume of reference product using the relative outputs.
  property heating value, net 45.02 MJ
    LHV is calculated based on the elemental composition of the substance. Based on the CAS number of the substance (000079-29-8), the chemical formula of the substance is found to be: C6H14, (PubChem 2020).
    Reference: Kim, S., Chen, J., Cheng, T., Gindulyte, A., He, J., He, S., Li, Q., Shoemaker, B. A., Thiessen, P. A., Yu, B., Zaslavsky, L., Zhang, J., & Bolton, E. E. (2019). PubChem 2019 update: improved access to chemical data. Nucleic acids research, 47(D1), D1102–D1109. https://doi.org/10.1093/nar/gky1033
  property price 0.522 EUR2005
    (same comment as for fraction 1 from naphtha separation)
  property carbon content 0.837209
    carbon content on a dry matter basis (reserved; not for manual entry)
  property true value 0.00506862; name BP_amount_9_true_value
    allocation property applied in "true value" allocation // value calculated from revenue
  properties: dry mass 1 kg, water content 0, water in wet mass 0 kg, carbon content, non-fossil 0, carbon content, fossil 0.837209, wet mass 1 kg, carbon allocation 0.837209 kg

## Inputs from technosphere
- heat, district or industrial, natural gas: 0 MJ; pedigree (1,1,1,1,1)
  Uncertainty: Overcash 1998 - 2004
  properties: heating value, net 1 MJ
- heat, district or industrial, other than natural gas: 0 MJ; pedigree (1,1,1,1,1)
  Uncertainty: Overcash 1998 - 2004
  properties: heating value, net 1 MJ
- naphtha: 0 kg; pedigree (1,1,1,1,1)
  Overcash 1998 - 2004
  EcoSpold01Location=RER
  Uncertainty: Overcash 1998 - 2004
  properties: wet mass 1 kg, carbon content, fossil 0.919743, dry mass 1 kg, heating value, net 45 MJ
  note on carbon content, fossil: C-content was calculated using data from Tab 3.20, ecoinvent v2.2 report 6_IV CO2 emmissions and High heating value.
- chemical factory, organics: 3.26821e-10 unit; lognormal variance with pedigree 0.448, pedigree (4,5,5,5,5)
  Estimation
  EcoSpold01Location=RER
  Uncertainty: Estimation
- electricity, medium voltage: 0 kWh; pedigree (1,1,1,1,1)
  EcoSpold01Location=UCTE
  Overcash 1998 - 2004
  Uncertainty: Overcash 1998 - 2004
- heat, district or industrial, natural gas: 0.0293241, 1.90267 MJ (2 entries); lognormal variance with pedigree 0.0427, pedigree (2,2,5,5,1)
  Uncertainty: Overcash 1998 - 2004
- heat, district or industrial, other than natural gas: 0.000437107, 1.07792 MJ (2 entries); lognormal variance with pedigree 0.0427, pedigree (2,2,5,5,1)
  Uncertainty: Overcash 1998 - 2004
- naphtha: 0.0140216, 0.00462021, 0.107208, 0.0290786, 0.00111952, 0.661005 kg (6 entries); lognormal variance with pedigree 0.0427, pedigree (2,2,5,5,1)
  Overcash 1998 - 2004
  EcoSpold01Location=RER
  Uncertainty: Overcash 1998 - 2004
- electricity, medium voltage: 0.000259015, 4.96679e-5, 0.000833821, 0.0121272, 0.00170933, 0.00556926 kWh (6 entries); lognormal variance with pedigree 0.0427, pedigree (2,2,5,5,1)
  EcoSpold01Location=UCTE
  Overcash 1998 - 2004
  Uncertainty: Overcash 1998 - 2004

## Inputs from nature
- Water, cooling, unspecified natural origin [natural resource, in water]: 0.020557 m3; name water_cooling_UNO_input; lognormal variance with pedigree 0.0427, pedigree (2,2,5,5,1)
  Overcash 1998 - 2004
  Uncertainty: Overcash 1998 - 2004

## Emissions to nature
- TOC, Total Organic Carbon [water, surface water]: 0.00387283 kg; lognormal variance with pedigree 0.0827, pedigree (2,2,5,5,1)
  Calculated from water emissions
  Uncertainty: Calculated from water emissions
- Water [air, unspecified]: 0.00796585 m3; name water_to_air_unspecified; = water_cooling_UNO_input*fraction_CW_to_air; lognormal variance with pedigree 0.130025, pedigree (4,4,5,2,4)
  Calculated value based on literature values and expert opinion. See comments in the parametres' comment field.
  property fraction, origin: fresh water 0; name fraction_origin_fresh_water
  property fraction, origin: unspecified 1; name fraction_origin_unspecified
  property fraction, origin: salt water 0; name fraction_origin_salt_water
- Hydrocarbons, unspecified [water, surface water]: 0.00114387 kg; lognormal variance with pedigree 0.0827, pedigree (2,2,5,5,1)
  Overcash 1998 - 2004
  Uncertainty: Overcash 1998 - 2004
- Hexane [air, urban air close to ground]: 0.00137265 kg; lognormal variance with pedigree 0.0827, pedigree (2,2,5,5,1)
  Overcash 1998 - 2004
  Uncertainty: Overcash 1998 - 2004
- COD, Chemical Oxygen Demand [water, surface water]: 0.00387283 kg; lognormal variance with pedigree 0.0827, pedigree (2,2,5,5,1)
  Calculated from water emissions
  Uncertainty: Calculated from water emissions
- Water [water, unspecified]: 0.0125912 m3; name water_to_water_unspecified; = water_cooling_UNO_input*(1-fraction_CW_to_air); lognormal variance with pedigree 0.130025, pedigree (4,4,5,2,4)
  (same comment as for Water)
  property fraction, origin: fresh water 0; name fraction_origin_fresh_water_Ww
  property fraction, origin: salt water 0; name fraction_origin_salt_water_Ww
  property fraction, origin: unspecified 1; name fraction_origin_unspecified_Ww
- DOC, Dissolved Organic Carbon [water, surface water]: 0.015475 kg; lognormal variance with pedigree 0.0827, pedigree (2,2,5,5,1)
  Calculated from water emissions
  Uncertainty: Calculated from water emissions
- Hydrocarbons, aliphatic, alkanes, cyclic [air, urban air close to ground]: 0.00841564 kg; lognormal variance with pedigree 0.0827, pedigree (2,2,5,5,1)
  Overcash 1998 - 2004
  Uncertainty: Overcash 1998 - 2004
- Carbon dioxide, fossil [air, urban air close to ground]: 0.0452647 kg; lognormal variance with pedigree 0.0601, pedigree (4,2,5,5,1)
  Estimation
  Uncertainty: Estimation
- BOD5, Biological Oxygen Demand [water, surface water]: 0.015475 kg; lognormal variance with pedigree 0.0827, pedigree (2,2,5,5,1)
  Calculated from water emissions
  Uncertainty: Calculated from water emissions
- Heptane [air, urban air close to ground]: 0.00164473 kg; lognormal variance with pedigree 0.0827, pedigree (2,2,5,5,1)
  Overcash 1998 - 2004
  Uncertainty: Overcash 1998 - 2004

## Sampling procedure
Literature data

## Extrapolations
This dataset has been extrapolated from european data. The uncertainty has been adjusted accordingly. Some data are derived from other or unknown plants or have been estimated.
