# wheat grain processing, dry milling

Dataset: EcoSpold 2, unit process
Geography: RoW
Time period: 2016-01-01 to 2021-12-31
Technology level: current
Classification: EcoSpold01Categories: agricultural means of production/feed
Classification: ISIC rev.4 ecoinvent: 1061:Manufacture of grain mill products
Scenario: Business-as-Usual
System model: Allocation, cut-off by classification
Generated by: [System]
Published in: Russo, V 2017
Database: ecoinvent
isCopyrightProtected: true
accessRestrictedTo: 1

## General comment
This dataset represents the production of 1 kg of wheat flour for human consumption, and secondary products of wheat bran and wheat screenings for animal feed production from global dry milling practices. The wheat flour represents all milled products intended for human consumption i.e. cake flour, self-raising flour, white bread flour, brown bread flour, whole wheat meal, and semolina. Flours and meals are typically used for baking bread and other baked goods, while semolina the coarse, purified wheat middlings of durum wheat is used mainly in the making of pasta and couscous. The module includes the receiving of wheat and processing thereof through multiple grinding and sieving steps. Activities that have been considered in this dataset are the inputs of wheat, water and electricity.
Boundary with exchanges for wheat grain processing, dry milling, GLO 2017

## Included activities start
This activity starts with the wheat received at the gate of the dry milling plant.

## Included activities end
This activity ends with the delivery of 1 kg of milled wheat products and by-product(s) at the factory gate of the milling plant.

## Geography
The inventory is based on calculations made for South Africa.

## Technology
The data are intended to reflect current equipment and processes.

## Time period
The production data represented in this dataset are based on International Grain Council (IGC) supply and demand data for the 2016/2017 marketing season retrieved online. Reference(s): IGC (2017) Market Information - Supply and Demand, International Grain Council, Available at: https://www.igc.int/en/markets/marketinfo-sd.aspx. (Accessed November 2017); IGC (2014) Five-Year Global Supply and Demand Projections, International Grain Council, Available at: http://www.igc.int/en/downloads/grainsupdate/igc_5yrprojections2014.pdf. (Accessed November 2017).

## Parameters
- fraction, tap water, to air: 0.9 dimensionless; lognormal variance with pedigree 0.092025, pedigree (4,4,3,2,4)
- fraction, process water, to air: 0.9 dimensionless; lognormal variance with pedigree 0.092025, pedigree (4,4,3,2,4)
- fraction, material rejected: 0.02 dimensionless; name reject_material

## Reference product
- wheat bran: 1 kg; name by_product; By-product classification allocatable product; CPC 23130: Groats, meal and pellets of wheat and other cereals; pedigree (1,1,1,1,1)
  Bran produced from dry milling of wheat for human consumption. Excludes the portion of bran added back into flour to produce whole wheat meal (which is included with the flour products).The bran fraction is calculated from the annual average output of products from dry milling for human consumption in South Africa reported by SAGIS (South African Grain Information Service) on a monthly basis (July 2015 - June 2016). Essentially all wheat in South Africa is milled to produce products for human consumption (cake flour, self-raising flour, white bread flour, brown bread flour, industrial flour, whole wheat meal and semolina), and bran, sold primarily as an animal feed Less than 1% of wheat is milled for animal consumption. Reference(s): SAGIS (2016) Maize Products per Month Manufactured - July 2015 to June 2016, South African Grain Information Service. Available at: www.sagis.org.za. (Accessed April 2017)
  production volume 9.93921e10 kg; = ref_product_flour* by_product
    Calculated from production volume of reference product using the relative outputs.
  property carbon content, non-fossil 0.475
    Assumed carbon content, on a dry mass basis according to FAOSTAT.
    Reference: http://www.fao.org/forestry/17111/en
  property price 0.21 EUR2005; name by_product_price_EUR2005
    Estimated value. Estimate based on the values reported in the websites Alibaba.com, Bran: 0.21 /kg (Range 120 - 300 USD/tonne)
  property water in wet mass 0.13 kg; name wheat_bran_WWM
  property gross energy, feed per kg of dry mass 18.9 MJ/kg
    Average gross energy of 18.9 MJ/kg dry matter applied in this dataset. Feedipedia (2015) Animal Feed Resources Information System: Wheat Bran, Available at: https://www.feedipedia.org/node/726. (Accessed October 2017).
  property carbon content 0.475
    carbon content on a dry matter basis (reserved; not for manual entry)
  property true value 0.05229; name by_product_true_value
    allocation property applied in "true value" allocation // value calculated from revenue
  properties: carbon content, fossil 0, water content 0.149425, dry mass 0.87 kg, wet mass 1 kg, carbon allocation 0.41325 kg
- wheat flour: 0 kg; name ref_product; By-product classification allocatable product; CPC 23110: Wheat and meslin flour
  This product covers all grades of flour from the milling of wheat (cake flour, bread flour, whole wheat meal and semolina). The product fraction is calculated from the annual average output of products from dry milling for human consumption in South Africa reported by SAGIS (South African Grain Information Service) on a monthly basis (July 2015 - June 2016). Essentially all wheat in South Africa is milled to produce products for human consumption (cake flour, self-raising flour, white bread flour, brown bread flour, industrial flour, whole wheat meal and semolina), and bran, sold primarily as an animal feed. Less than 1% of wheat is milled for animal consumption. Reference(s): SAGIS (2016) Maize Products per Month Manufactured - July 2015 to June 2016, South African Grain Information Service. Available at: www.sagis.org.za. (Accessed April 2017)
  production volume 3.99165e11 kg; name ref_product_flour
    Calculated from the annual consumption of wheat grain for food (498.5 million tonnes) and the fraction of total product that is wheat flour. This production figure represents the wheat consumed for food forecast for 2016/2017 marketing season by the International Grain Council (IGC, 2017). Food category assumed to refer to dry milling only as in the case of maize grain consumption the industrial use of grains includes starch production (wet milling) and ethanol production (IGC, 2014). It was further assumed that the breakdown of the milled products would be the same as that for South Africa, i.e. about 80% for products for human consumption and the remaining 20% for wheat bran for animal consumption (SAGIS, 2017). Reference(s): IGC (2017) Market Information - Supply and Demand, International Grain Council, Available at: https://www.igc.int/en/markets/marketinfo-sd.aspx. (Accessed November 2017); IGC (2014) Five-Year Global Supply and Demand Projections, International Grain Council, Available at: http://www.igc.int/en/downloads/grainsupdate/igc_5yrprojections2014.pdf. (Accessed November 2017); SAGIS (2017) Supply and Demand: Marketing Year March 2016 to February 2017, South African Grain Information Service. Available at: http://www.sagis.org.za/sd_marketing_year.html. (Accessed August 2017).
  property digestable energy content 15.12 MJ/kg
    Weighted average based on breakdown of different wheat products produced for human consumption in South Africa and properties of each product (i.e. cake flour, self-raising flour, white bread flour, brown bread flour, industrial flour, whole wheat meal, and semolina). Breakdown calculated from the production figures from the SAGIS monthly production tables, retrieved online and properties for US consumer products also retrieved online (USDA, 2017). Reference(s): SAGIS (2017) Wheaten Products Manufactured per Month since July 2015, South African Grain Information Service. Available at: www.sagis.org.za. (Accessed Sept 2017); USDA (2017) USDA National Nutrient Database, United States Department of Agriculture Agricultural Research Service, Available at: https://ndb.nal.usda.gov/ndb/search/list. (Accessed October 2017).
  property water in wet mass 0.13 kg; name wheat_flour_WWM
  property carbon content, fossil 0
    Carbon content fossil is considered zero in all agricultural products and by-products.
  property carbon content, non-fossil 0.475
    Biogenic carbon content of vegetation and vegetation processed products on a dry mass basis (47.5% DM) derived from FAOSTAT.
    Reference: http://www.fao.org/forestry/17111/en
  property price 0.47 EUR2005; name ref_product_price_EUR2005
    Estimated value. Estimate based on the values reported in the websites Alibaba.com, Flour: 0.47 /kg (Range 300 - 600 USD/tonne)
  property carbon content 0.475
    carbon content on a dry matter basis (reserved; not for manual entry)
  property true value 0.47; name ref_product_true_value
    allocation property applied in "true value" allocation // value calculated from revenue
  properties: water content 0.149425, wet mass 1 kg, dry mass 0.87 kg, carbon allocation 0.41325 kg

## By-products
- energy feed, gross: 0 MJ; name reject_product; CPC 23319: Preparations used in animal feeding n.e.c.; By-product classification allocatable product; pedigree (1,1,1,1,1)
  Wheat screenings: 2% of maize received is estimated to be reject material (foreign matter and defective kernels), representative of a high grade of wheat (see comment on wheat grain from technosphere for references). Defective kernels and foreign matter (wheat screenings) are assumed to be mixed in with the bran and sold as an animal feed product (personal communication with mill operator). Wheat screenings used as energy source. Gross energy of wheat screenings of 18.1 MJ/kg dry matter (DM) and a DM content of 88.2% (Feedipedia, 2013). Reference(s): Feedipedia (2013) Animal Feed Resources Information System: Wheat Screenings, Available at: https://www.feedipedia.org/node/12757. (Accessed October 2017).
  production volume 1.6243e11 MJ; = ref_product_flour* reject_product
    Calculated from production volume of reference product using the relative outputs.
  property price 0.0108 EUR2005; name reject_product_price_EUR2005
    Based on energy feed, gross content in soybean meal and prices per kg of soybean meal. Assumed soybean meal is the most used feed. Soybean meal 2004 prices for World import/export data (tonnes and US$) from FaoStat statistics (http://faostat.fao.org/site/535/default.aspx#ancor, TRADE)- [Accessed 24 May 2010]. See calculations for protein /energy content
  property gross energy, feed per kg of dry mass 18.1 MJ/kg
    Average gross energy of 18.1 MJ/kg dry matter applied in this dataset. Reference(s): Feedipedia (2013) Animal Feed Resources Information System: Wheat Screenings, Available at: https://www.feedipedia.org/node/12757. (Accessed October 2017).
  property dry mass 0.0487293 kg; name energy_feed_DM
  property water in wet mass 0.00651934 kg; name energy_feed_WWM
  property true value 0.00439478; name reject_product_true_value
    allocation property applied in "true value" allocation // value calculated from revenue
  properties: wet mass 0.0552486 kg, water content 0.133787

## Inputs from technosphere
- tap water: 0 kg; name water_input; source Salzgeber Ch. 1996; pedigree (1,1,1,1,1)
  Average water use of two dry milling facilities in South Africa: a combined wheat & maize mill, and a dedicated wheat mill. Water is used to condition the wheat and is all absorbed by the grain, i.e. no wastewater is produced (personal communication by mill operator).
  properties: carbon content, fossil 0.00178991, wet mass 1 kg, water content 2962.17, dry mass 0.000337476 kg
  note on carbon content, fossil: Bicarbonate content is 2.93 mol/m3. CO2 content is 0.1 mol/m3 (ecoinvent v2.2 report 8, Tab 93.1).
- building, multi-storey: 4.22644e-6 m3; lognormal variance with pedigree 0.33, pedigree (5,5,5,5,5)
  Estimation. Not geography specific. Value and comment from "maize grain, feed production, GLO": The typical storage capacity of the cereal silo found in some feed processing centres in Switzerland is 10,000 tonnes, with an effective storage volume of about 80% of the building volume. With an average grain specific weight of 750 kg/m3, this gives a building volume of about 16,650 m3. Assuming that these feed processing centres process 25,000 tonnes of grain per year, the cereals will be stored for about three months before being processed. The largest feed processing centre in Switzerland (UFA-Biblis) has a feedstuff storage compound of 29,440 m3 (80 m length * 23 m * 16 m height) with an effective storage capacity of 4,140 tonnes (5520 palettes of 750 kg), or about 150 kg/m3 (UFA 2002). This centre processes 275,000 tonnes of concentrate feeds yearly. After processing, the feedstuff must therefore be stored for approx. one week in the processing centre before being sent to the regional storehouse. The average length of storage of the raw materials is set at 3 months in the calculations. The storage volume required was estimated as 1.7 m3/tonne of raw material (grain specific weight 750 kg/m3 and 80% of the building volume used for storage). The lifetime of the storage silo was assumed to be 50 years, the length of the construction phase 2 years. Land use was estimated from the height of Biblis’s storage silo (UFA 2002). Taking the height of 16 m, the area used is 0.1 m2/tonne of feedstuff for 3 months.
- electricity, low voltage: 0 kWh; source InfoMil  1996; pedigree (1,1,1,1,1)
  EcoSpold01Location=CH
  Average electricity use of two dry milling facilities in South Africa: a combined wheat & maize mill, and a dedicated wheat mill.
- industrial machine, heavy, unspecified: 6.49914e-6 kg; lognormal variance with pedigree 0.1306, pedigree (5,5,5,5,4)
  Estimate from industrial machinery used in "Limestone, crushed, for mill production" (annual production of 195,000 tonnes), which is assumed to provide a good proxy for flour milling. Value adapted on the basis of annual production, which was estimated to be an average of 415,000 tonnes per year, based on the production figures of two dry milling facilities in South Africa. The estimated life span of the machines is 25 years.
- wheat grain: 0.508165 kg; name wheat_received; lognormal variance with pedigree 0.0058, pedigree (2,3,3,5,1)
  This figure represents wheat received at the gate of the dry milling plant to produce 1 kg milled wheat products. An average of 2% of wheat received is estimated to be reject material based on data from a single mill (value for combined bran and screenings produced). Maximum permissable levels of deviations (screenings, other grains and gravel, turf etcl) for all grades of wheat is 5%. Reference: Department of Agriculture (2016). Regulations relating to the grading, packing and marking of bread wheat intended for sale in the Republic of South Africa. Government gazette, 29 January 20016.
  property water in wet mass 0.15 kg; name wheat_grain_WWM
  properties: wet mass 1 kg, dry mass 0.85 kg, water content 0.176471, carbon content, non-fossil 0.464601
- tap water: 3.22377e-6, 3.88055e-7, 6.41325e-7, 1.61717e-5, 4.20702e-7, 0.000138189, 0.000185061 kg (7 entries); source Salzgeber Ch. 1996; lognormal variance with pedigree 0.0452, pedigree (2,3,3,5,1)
  (same comment as for tap water)
- electricity, low voltage: 3.48519e-6, 7.58673e-5, 4.46271e-7, 1.17475e-6, 3.00394e-6, 2.67772e-7, 2.3667e-6, 1.52297e-6, 2.04836e-5, 5.32145e-5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 kWh (36 entries); source InfoMil  1996; lognormal variance with pedigree 0.0152, pedigree (2,3,3,5,1)
  (same comment as for electricity, low voltage)

## Inputs from nature
- Occupation, construction site [natural resource, land]: 9.96801e-7 m2*year; source UFA 2002; lognormal variance with pedigree 0.132, pedigree (3,5,5,5,4)
  Estimation. Not geography specific.Value and comment from "maize grain, feed production, GLO": Corresponds to land use Transformation*2 years (the length of the construction phase is 2 years).
- Transformation, to industrial area [natural resource, land]: 4.98401e-7 m2; source UFA 2002; lognormal variance with pedigree 0.212, pedigree (3,5,5,5,4)
  Estimation. Not geography specific. Value and comment from "maize grain, feed production, GLO": Corresponds to occupation industrial area/50 years (the lifetime of the storage silo was assumed to be 50 years).
- Transformation, from unspecified [natural resource, land]: 4.98401e-7 m2; source UFA 2002; lognormal variance with pedigree 0.212, pedigree (3,5,5,5,4)
  (same comment as for Transformation, to industrial area)
- Occupation, industrial area [natural resource, land]: 2.48802e-5 m2*year; source UFA 2002; lognormal variance with pedigree 0.132, pedigree (3,5,5,5,4)
  Estimation. Not geography specific.Value and comment from "maize grain, feed production, GLO": Corresponds to 0.2m2/tonne (because the total area occupied as “industrial area” was estimated as twice as high, namely 0.2 m2/tonne) multiplied by 3 months (because the average length of storage of the raw materials is set at 3 months in the calculations).

## Emissions to nature
- Water [air, unspecified]: 1.07709e-5 m3; lognormal variance with pedigree 0.21, pedigree (5,5,5,5,5)
  Calculated value: water balance over process. Assumed all water loss from wheat during the grinding process, which produces heat, is lost to air.

## Sampling procedure
Production volumes are based on annual data published by the International Grain Council (IGC, 2017). The product fractions are calculated from monthly data published by the South African Grain Information Service (SAGIS, 2017). Electricity and water use data are from two dry milling facilities in South Africa. Infrastucure and land use are estimated values, not specific to South Africa. Reference(s): IGC (2017) Market Information - Supply and Demand, International Grain Council, Available at: https://www.igc.int/en/markets/marketinfo-sd.aspx. (Accessed November 2017); SAGIS (2017) Supply and Demand: Marketing Year March 2016 to February 2017, South African Grain Information Service. Available at: http://www.sagis.org.za/sd_marketing_year.html. (Accessed August 2017).

## Extrapolations
Inventory is based on calculations for average South African wheat dry mill. Only the production volumes are adapted to global estimates.
