# 1-propanol production

Dataset: EcoSpold 2, unit process
Geography: RoW
Time period: 1998-01-01 to 2021-12-31
Technology level: current
Classification: ISIC rev.4 ecoinvent: 2011:Manufacture of basic chemicals
Synonyms: Propyl alcohol; Propanol; 1-propanol; N-propanol; Propan-1-ol; Ethylcarbinol
Scenario: Business-as-Usual
System model: Allocation, cut-off by classification
Share of production covered: 100 %
Generated by: Jürgen Sutter
Published in: Sutter, J. 2007
Database: ecoinvent
isCopyrightProtected: true
accessRestrictedTo: 1

## General comment
This dataset represents the production of 1 kg of 1-propanol from propanal. 1-Propanol is a clear, colourless, flammable liquid with a slight odor resembling that of ethanol. It is completely miscible with water and readily soluble in a variety of common organic solvents (e.g., ethers, esters, acids, ketones, and other alcohols). 1-Propanol is used mainly as a solvent for coatings; in antifreeze compositions and household and personal products; and as chemical intermediate for the production of esters, amines, and other organic derivatives.
In this dataset, the raw materials, auxiliaries, energy consumption and emissions are modelled with data from several US production plants collected between 1998 and 2004 and is considered to be valid for the geography of this dataset. The infrastructure is included with a default value.
References:
Sutter, J. (2007) Life Cycle Inventories of Petrochemical Solvents. ecoinvent report No. 22. Swiss Centre for Life Cycle Inventories, Dübendorf, 2007.
Overcash, M. (1998 - 2004) Chemical life cycle database, Chemical and Biomolecular Engineering, North Carolina State University, Raleigh, NC 27695-7905.
Papa, A. J. 2011. Propanols. Ullmann's Encyclopedia of Industrial Chemistry.

## Included activities start
From the reception of propanal at the factory gate.

## Included activities end
This activity ends with the production of 1 kg of 1-propanol. The dataset includes the processing of input materials, the consumption of energy, infrastructure use and emissions.

## Geography
The inventory is modelled for Europe but is based on data from the US. It is assumed to be representative of the global production.

## Technology
1-Propanol is manufactured by the hydrogenation of propanal derived from hydroformylation of ethylene.
Hydroformylation of Ethylene (not included in this dataset):
Union Carbide Chemicals and Plastics Company, Inc., and Hoechst Celanese practice the two-step oxo process based on rhodium-substituted phosphine-catalyzed low-pressure hydroformylation technology, while Eastman Kodak Company uses a higher-pressure cobalt-based process for production of the intermediate propanal. Typical oxo conditions employed in the low-pressure rhodium-catalyzed oxo process are 90 – 130 °C, <2.8 MPa total pressure, with CO at <380 kPa, H2 at <1.4 MPa, and <500 ppm rhodium. Conditions of the cobalt oxo process are 110 –180 °C, 20 – 30 MPa (200 – 300 atm), 1: 1 to 1: 2 H2: CO ratios, and 0.1 – 1.0 wt % cobalt based on ethylene. The crude propanal is removed by vapor stripping with excess synthesis gas, and the rhodium – triphenylphosphine catalyst is recycled. Traces of CO are removed in a stripping column from the crude, condensed propanal before hydrogenation to prevent poisoning of the hydrogenation catalyst in the second step. The higher selectivity and milder conditions of the rhodium-catalyzed process provide crude 1-propanol for hydrogenation containing fewer impurities, such as higher aldol-condensation products and aldehyde trimers (Tischenko esters).
Hydrogenation of propanal:
The hydrogenation of propanal is conventionally carried out as a heterogeneous process in either the vapor or liquid phase over a variety of metal catalysts. Heterogeneous vapor-phase processes are effective at ca. 110 – 150 °C, and 0.14 –1.0 MPa at a 20: 1 mole ratio of hydrogen to propanal. Reductions are accomplished in excess hydrogen, and the heat of reaction is removed by circulating the vapor through external heat exchangers or by cooling the reactor internally.
Hydrogen efficiencies are >90 %, with aldehyde conversions as high as 99.9 % and alcohol yields >99 %. The commonly used commercial hydrogenation catalysts include combinations of copper, zinc, nickel, and chromium compounds. Major impurities at vapor-phase process temperatures are dipropyl ether, ethane, and propyl propionate. In addition to reduced zinc oxide and copper oxide catalysts, selectivity enhancers such as alkali and transition metals can be added to significantly reduce the formation of esters (by Tischenko reaction of the starting aldehyde) and ethers . Addition of 1 – 10 % water to the reactor feed also suppresses ether formation.
The propyl propionate byproduct formed in the catalytic hydrogenation can be separated and hydrogenolyzed in the presence of reduced CuO – ZnO catalyst at 75 – 300 °C and 9.8 kPa –9.8 MPa to give 1-propanol as the major product. Liquid-phase heterogeneous processes are conducted at higher pressures. For example, hydrogenation at 95 – 120 °C and 3.5 MPa of hydrogen gives 1-propanol with >99.9 % purity. Nickel- and copperbased catalysts containing molybdenum, manganese, and sodium promoters are preferred. The catalysts are usually supported on alumina.
References:
Sutter, J. (2007) Life Cycle Inventories of Petrochemical Solvents. ecoinvent report No. 22. Swiss Centre for Life Cycle Inventories, Dübendorf, 2007.
Papa, A. J. 2011. Propanols. Ullmann's Encyclopedia of Industrial Chemistry.

## Time period
Time of publications.

## Parameters
- fraction, cooling water, once-through system, to air: 0.004 dimensionless; name fraction_CW_OT_to_air; lognormal variance with pedigree 0.0413, pedigree (2,3,1,3,1)
  Calculated based on literature value (Scown, C.D., 2011, Water Footprint of U.S. Transportation Fuels and supplying information of the article) (Vionnet, S., Quantis Water Database - Technical Report, 2012).
- fraction, cooling water, recirculating system, to air: 0.771 dimensionless; name fraction_CW_R_to_air; lognormal variance with pedigree 0.0413, pedigree (2,3,1,3,1)
  (same comment as for fraction, cooling water, once-through system, to air)
- fraction, cooling water, cooling pond system, to air: 0.032 dimensionless; name fraction_CW_CP_to_air; lognormal variance with pedigree 0.0413, pedigree (2,3,1,3,1)
  (same comment as for fraction, cooling water, once-through system, to air)
- fraction, cooling water, to air: 0.3875 dimensionless; name fraction_CW_to_air; = (0.5*fraction_CW_OT_to_air)+(0.5*fraction_CW_R_to_air); lognormal variance with pedigree 0.092025, pedigree (4,4,3,2,4)
  Calculated value based on literature value (see comments of the other parametres present in this dataset) and expert opinion. In the case when no industry/literature data are available about the type of cooling or directly fraction, cooling water, to air specific for the process a default assumption is applied. It is assumed that the once-through cooling system is used in 50% of all cases and recirculating system is used in another 50% of all cases.

## Reference product
- 1-propanol: 1 kg; name RP; By-product classification allocatable product; CPC 34139: Other alcohols, phenols, phenol-alcohols, and their halogenated, sulphonated, nitrated or nitrosated derivativ[…]; CAS 71-23-8
  Propanol is a clear, colourless, flammable liquid with a slight odor resembling that of ethanol.
  1-Propanol is used mainly as solvent for coatings; in antifreeze compositions and household and personal products; and as chemical intermediate for the production of esters, amines, and other organic derivatives.
  1-Propanol is also used commercially to produce glycol ethers. These are characterized by dual functionality, which imparts high solvency, chemical stability, and water compatibility. Glycol ethers such as ethylene glycol monopropyl ether, diethylene glycol monopropyl ether, propylene glycol monopropyl ether, and dipropylene glycol monopropyl ether are marketed by Union Carbide Chemicals and Plastics and Eastman Chemical Products.
  production volume 2.87201e8 kg; name RP_PV
    Estimated value. The global production volume is extrapolated from the European production volume based on reports from Cefic (European Chemical Industry Council), and the American Chemistry Council.
    According to Cefic (2016a) the global sales of chemicals in the year 2015 was 3 534 billion euros. The reported share of sales per region are: EU28 14.7%; Other Europe (Switzerland, Norway, Turkey, Russia and Ukraine) 2.7%; NAFTA (US, Canada and Mexico) 16.5%; Latin America 3.8%; China 39.9%; Japan 3.9%; Republic of Korea 3.2%; India 2.2%; Rest of Asia 11.9%; Rest of the World 1.3%. Cefic also reports the US total sales, which amount to 518.7 billion euros out of the global 3 534 billion euros (14.7%). The same share is reported by the American Chemistry Council (2016), according to which the USA sales account for 15% of global sales for the year 2016.
    European production volume:
    Estimated value. According to the European Chemical Agency, the consumption of Propan-1-ol for the year of 2016 is estimated to be 55000000 kg. The aforementioned value is the average of the range given in the literature. According to the European Chemical Industry Council (Cefic, 2016a), the total sales of chemicals of the European Union in 2016 amounted to 519 billion euros. Chemical imports were valued at 91 billion euros for the first 11 months of 2016. Based on this, the value for the total imports for the year 2016 was extrapolated, yielding a value of 99.3 billion euros. Furthermore, Cefic (2016b) reports a trade surplus (exports-imports) of 46.4 billion euros (once again extrapolated for the whole year using the value of 42 billion euros for the first 11 months of 2016). Considering all the aforementioned information, the total chemical consumption in the EU is calculated to be 472.6 billion euros (total sales-exports+imports). It is therefore calculated that production is 110% of consumption. This value is used to scale the information on chemical consumption to production. The European production volume is therefore 60500000 kg. Since no data were found for the global production this value was scaled accordingly.
    Since no data were found for the global production this value was scaled accordingly.
    References:
    American Chemistry Council 2016. Outlook: U.S. Chemical Industry Continues to Outpace Industrial Output; Accounts for More Than One-Half of Construction Spending by Manufacturing Sector. Accessible at: https://www.americanchemistry.com/Media/PressReleasesTranscripts/ACC-news-releases/US-Chemical-Industry-Continues-to-Outpace-Industrial-Output.html
    European Chemical Agency, Brief profile of Propan-1-ol, Accessible at: https://echa.europa.eu/brief-profile/-/briefprofile/100.000.679
    Cefic 2016a. Facts and figures 2016 of the European chemical industry. Accessible at: http://www.cefic.org/Facts-and-Figures/Chemicals-Industry-Profile/
    Cefic 2016b. 2016: EU chemicals output posts positive growth for third year running. Accessible at: http://www.cefic.org/Documents/RESOURCES/Chemical%20Trends%20Report/March-2017-Cefic-Chemicals-Trends-Report.pdf
  property price 0.83 EUR2005
    Calculated value based on data from United Nations Commodity Trade Statistics Database (comtrade.un.org). UN comtrade category: 290512 Propyl alcohol and isopropyl alcohol. Year 2005. Using exchange rate of 1EURO = 1.209 USD. Average of price of import into 5 main markets (EU, US, JP, IN and CN).
  property heating value, net 34.3 MJ
    LHV is calculated based on the elemental composition of the substance. Based on the CAS number of the substance (000071-23-8), the chemical formula of the substance is found to be: C3H8O, (PubChem 2020).
    Reference: Kim, S., Chen, J., Cheng, T., Gindulyte, A., He, J., He, S., Li, Q., Shoemaker, B. A., Thiessen, P. A., Yu, B., Zaslavsky, L., Zhang, J., & Bolton, E. E. (2019). PubChem 2019 update: improved access to chemical data. Nucleic acids research, 47(D1), D1102–D1109. https://doi.org/10.1093/nar/gky1033
  property carbon content 0.6
    carbon content on a dry matter basis (reserved; not for manual entry)
  properties: wet mass 1 kg, water in wet mass 0 kg, dry mass 1 kg, water content 0, carbon content, non-fossil 0, carbon content, fossil 0.6, carbon allocation 0.6 kg

## Inputs from technosphere
- propanal: 0.99556 kg; lognormal variance with pedigree 0.0421, pedigree (1,2,5,5,1)
  Literature value (Overcash 1998 - 2004).
  Uncertainty: O
  properties: heating value, net 31.32 MJ, dry mass 1 kg, wet mass 1 kg, carbon content, fossil 0.62069
- electricity, medium voltage: 0 kWh; pedigree (1,1,1,1,1)
  Literature value (Overcash 1998 - 2004).
  Uncertainty: O
- hydrogen, liquid: 0.036854 kg; lognormal variance with pedigree 0.0421, pedigree (1,2,5,5,1)
  Literature value (Overcash 1998 - 2004).
  Uncertainty: O
  properties: dry mass 1 kg, heating value, net 120.21 MJ, wet mass 1 kg
- chemical factory, organics: 4e-10 unit; lognormal variance with pedigree 0.3498, pedigree (2,3,5,4,3)
  Calculated based on literature data published by the industry. For this activity, no information was readily available concerning infrastructure and land-use. Therefore, the infrastructure is estimated based on data from two chemical factories, the BASF site of Ludwigshafen and the chemical factory in Gendorf (which are both located in Germany), which produce a wide range of chemical substances. Based on this data, the following assumptions are made: the built area amounts to about 4.2 ha, the plant has an average output of 50'000 t/a and a lifespan of fifty years. The estimated infrastructure amount is therefore 4.00 E-10 units per kg of produced chemical.
  References:
  Althaus H.-J., Chudacoff M., Hischier R., Jungbluth N., Osses M. and Primas A. (2007) Life Cycle Inventories of Chemicals. ecoinvent report No. 8, v2.0. EMPA Dübendorf, Swiss Centre for Life Cycle Inventories, Dübendorf, CH.
  Gendorf (2000) Umwelterklärung 2000, Werk Gendorf. Werk Gendorf, Burgkirchen.
- heat, district or industrial, other than natural gas: 0 MJ; pedigree (1,1,1,1,1)
  Literature value (Overcash 1998 - 2004).
  Uncertainty: O
  properties: heating value, net 1 MJ
- heat, district or industrial, natural gas: 0 MJ; pedigree (1,1,1,1,1)
  Literature value (Overcash 1998 - 2004).
  Uncertainty: O
  properties: heating value, net 1 MJ
- electricity, medium voltage: 0.00793602, 0.00152179, 0.0255476, 0.371568, 0.0523726, 0.170638 kWh (6 entries); lognormal variance with pedigree 0.0421, pedigree (1,2,5,5,1)
  Literature value (Overcash 1998 - 2004).
  Uncertainty: O
- heat, district or industrial, other than natural gas: 6.77473e-5, 0.167067 MJ (2 entries); lognormal variance with pedigree 0.0421, pedigree (1,2,5,5,1)
  Literature value (Overcash 1998 - 2004).
  Uncertainty: O
- heat, district or industrial, natural gas: 0.00454495, 0.294895 MJ (2 entries); lognormal variance with pedigree 0.0421, pedigree (1,2,5,5,1)
  Literature value (Overcash 1998 - 2004).
  Uncertainty: O

## Inputs from nature
- Water, cooling, unspecified natural origin [natural resource, in water]: 0.018852 m3; name water_cooling_UNO_input; lognormal variance with pedigree 0.0421, pedigree (1,2,5,5,1)
  Literature value (Overcash 1998 - 2004).
  Uncertainty: O

## Emissions to nature
- Propanal [air, urban air close to ground]: 0.00992 kg; lognormal variance with pedigree 0.0821, pedigree (1,2,5,5,1)
  Literature value (Overcash 1998 - 2004).
  Uncertainty: O
- Water [water, unspecified]: 0.0115469 m3; = water_cooling_UNO_input*(1-fraction_CW_to_air); lognormal variance with pedigree 0.0827, pedigree (2,2,5,5,1)
  Calculated as a fraction of the input of water. For more details, refer to the mathematical relation and the parameters.
  property fraction, origin: fresh water 0; name fraction_origin_fresh_water_Ww
  property fraction, origin: salt water 0; name fraction_origin_salt_water_Ww
  property carbon content, fossil 0; name C_content_fossil
  property water in wet mass 1000 kg; name WWM
  property wet mass 1000 kg; name WM
  property carbon content, non-fossil 0; name C_content_non_fossil
  property fraction, origin: unspecified 1; name fraction_origin_unspecified_Ww
  property dry mass 0 kg; name DM
- Hydrogen [air, urban air close to ground]: 0.00319 kg; lognormal variance with pedigree 0.0821, pedigree (1,2,5,5,1)
  Literature value (Overcash 1998 - 2004).
  Uncertainty: O
- Water [air, unspecified]: 0.00730515 m3; = (water_cooling_UNO_input*fraction_CW_to_air); lognormal variance with pedigree 0.0827, pedigree (2,2,5,5,1)
  (same comment as for Water)
  property fraction, origin: fresh water 0; name fraction_origin_fresh_water
  property fraction, origin: salt water 0; name fraction_origin_salt_water
  property fraction, origin: unspecified 1; name fraction_origin_unspecified
- Propanol [air, urban air close to ground]: 0.0193 kg; lognormal variance with pedigree 0.0421, pedigree (1,2,5,5,1)
  Literature value (Overcash 1998 - 2004).
  Uncertainty: O

## Sampling procedure
Literature data.

## Extrapolations
This dataset has been copied from an original dataset covering the geography RER. The uncertainty has been adjusted accordingly.

## Review by Emilia Moreno Ruiz 2017-08-08
This dataset was additionally reviewed in a separate review process by Eric Johnson of Atlantic Consulting as well as Emilia Moreno Ruiz and Gregor Wernet of ecoinvent.
