# treatment of low level radioactive waste, surface or trench deposit

Dataset: EcoSpold 2, unit process
Geography: CH
Time period: 2000-01-01 to 2021-12-31
Technology level: current
Classification: ISIC rev.4 ecoinvent: 3822:Treatment and disposal of hazardous waste
Classification: EcoSpold01Categories: nuclear power/waste treatment
Tags: Treatment; ConvertedDataset
Scenario: Business-as-Usual
System model: Allocation, cut-off by classification
Generated by: Roberto Dones
Published in: Dones, R. 2007
Database: ecoinvent
isCopyrightProtected: true
accessRestrictedTo: 1

## General comment
The module is oversimplified and shall be considered only as a preliminary description of the storage of low radioactive waste in surface or trench depositories. (The current version of the study has given priority to nuclear depositories for high and intermediate level as well as long-lived radioactive waste.) No leackage is accounted for. Hence, this module may not reflect specific situations. There have been reported leakages from surface depositories, which are continuously monitored. These cases should be rapidly taken care of by removing the leaking object and seal the waste again. A careful modelling of these waste depositories shall be accomplished together with the expected completion of the waste modelling in the next edition of ecoinvent.
[This dataset was already contained in the ecoinvent database version 2. It was not individually updated during the transfer to ecoinvent version 3. Life Cycle Impact Assessment results may still have changed, as they are affected by changes in the supply chain, i.e. in other datasets. This dataset was generated following the ecoinvent quality guidelines for version 2. It may have been subject to central changes described in the ecoinvent version 3 change report (http://www.ecoinvent.org/database/ecoinvent-version-3/reports-of-changes/), and the results of the central updates were reviewed extensively. The changes added e.g. consistent water flows and other information throughout the database. The documentation of this dataset can be found in the ecoinvent reports of version 2, which are still available via the ecoinvent website. The change report linked above covers all central changes that were made during the conversion process.]

## Included activities end
The module includes only the land use and the energy used for digging.

## Geography
Generic.

## Reference product
- low level radioactive waste: -1 m3; CPC 33690: Other radioactive elements and isotopes and compounds; alloys, dispersions, ceramic products and mixtures cont[…]; By-product classification Waste
  EcoSpold01Location=CH
  production volume 1 m3
    estimated proportion; source: ecoinvent v2; value to be replaced by value to be calculated from the demand for this treatment activity
  property price 0 EUR2005
    Waste products are assigned a price of zero as they are assumed to require further treatment.
  property carbon content 0
    carbon content on a dry matter basis (reserved; not for manual entry)
  properties: carbon content, non-fossil 0, water content 0, carbon content, fossil 0, wet mass 2500 kg, water in wet mass 0 kg, dry mass 2500 kg, carbon allocation 0 kg

## Inputs from technosphere
- excavation, hydraulic digger: 3 m3; lognormal variance with pedigree 0.16, pedigree (1,1,5,1,1)
  own preliminary estimation
  EcoSpold01Location=RER
- excavation, skid-steer loader: 3 m3; lognormal variance with pedigree 0.16, pedigree (1,1,5,1,1)
  own preliminary estimation;activityLink introduced to establish a direct link to the corresponding regional supply of this product
  EcoSpold01Location=RER

## Inputs from nature
- Transformation, from pasture, man made [natural resource, land]: 2 m2; lognormal variance with pedigree 0.16, pedigree (1,1,5,1,1)
  own preliminary estimation
- Transformation, to industrial area [natural resource, land]: 2 m2; lognormal variance with pedigree 0.16, pedigree (1,1,5,1,1)
  own preliminary estimation
- Transformation, to unspecified [natural resource, land]: 2 m2; lognormal variance with pedigree 0.16, pedigree (1,1,5,1,1)
  own preliminary estimation
- Occupation, industrial area [natural resource, land]: 140 m2*year; lognormal variance with pedigree 0.34, pedigree (1,1,5,1,1)
  own preliminary estimation
- Transformation, from industrial area [natural resource, land]: 2 m2; lognormal variance with pedigree 0.16, pedigree (1,1,5,1,1)
  own preliminary estimation

## Sampling procedure
Literature

## Extrapolations
This dataset has been extrapolated from year 2000 to the year of the calculation (2021). The uncertainty has been adjusted accordingly.

## Review by Roberto Dones 2003-08-27
passed
for final run August 2003
