# petroleum and gas production, on-shore

Dataset: EcoSpold 2, unit process
Geography: CA-AB
Time period: 1999-01-01 to 2021-12-31
Technology level: current
Classification: ISIC rev.4 ecoinvent: 0610:Extraction of crude petroleum
Classification: EcoSpold01Categories: oil/production
Tags: combined production; Combined Production
Scenario: Business-as-Usual
System model: Allocation, cut-off by classification
Share of production covered: 57 %
Generated by: Gregor Wernet
Published in: Jungbluth, N. 2007
Database: ecoinvent
isCopyrightProtected: true
accessRestrictedTo: 1

## General comment
The multioutput-process 'combined gas and oil production' delivers the co-products crude oil and natural gas. Allocation for co-products is based on heating value.

## Included activities end
Production of oil and gas including energy use, infrastructure and emissions.

## Technology
Data source is mainly onshore production in the Niger delta, unless otherwise noted.

## Time period
Most data could be found for 1999-2000.

## Reference product
- natural gas, high pressure: 0 m3; name natural_gas; CPC 12020: Natural gas, liquefied or in the gaseous state; By-product classification allocatable product; CAS 14493-06-2
  production volume 0 m3; name natural_gas_PV
    m3 of NG produced in Canada in 2012, according to BP (2014) 156.0495E9 m3. It is estimated that 70% of Canadian production is located in Alberta and that 27% is associated to petroleum production.. Value converted from BP LHV (1 cubic meter natural gas in (BP, 2014) corresponds to 0.9 kg oil equivalent. 1 kg oil equivalent corresponds to 42 MJ) to ecoinvent standard LHV of 39MJ/m3. (The source does not specify if the cubic meters are standard or norm cubic meters. See 2015, Faist Emmenegger, Mireille, Del Duce, Andrea; Zah, Rainer, Update and extension of the inventory data for energy gases, 3 - SeparatePublication.)Refrence(s): BP (2014). Statistical Review of World Energy, June 2014. Retrieved online from http://www.bp.com/content/dam/bp/excel/energy-economics/statistical-review-2015/bp-statistical-review-of-world-energy-2015-workbook.xlsx, 30 August, 2017
  property price 0.166 EUR2005; name natural_gas_price_EUR2005
    Temporary price data. Calculated as 90% of purchasers price based on: 2005 price for Europe-27 Import (US$ and kg) in UN Commodity Trade Statistics Database - Natural gas in gaseous state (http://data.un.org/Data.aspx?q=natural+gas&d=ComTrade&f=_l1Code%3a28%3bcmdCode%3a271121; accessed 4 January 2011), using density of natural gas of 0.8 kg/m3 for unit conversion.
  property amount in multioutput activity_m3 1.35e10 m3; name natural_gas_amount_MO_m3
  property heating value, net 39 MJ
    Literature value, Source: United Nations Statistics Division (2018) International Recommendations for Energy Statistics (IRES). Available at: http://unstats.un.org/unsd/statcom/doc11/BG-IRES.pdf.
  property carbon content, fossil 0.602381
    An average C content of 0.506 kg C/ m3 has been assumed (this average has been calculated using data in Tab 3.5, ecoinvent v2.2 report 6_V
  property carbon content 0.602381
    carbon content on a dry matter basis (reserved; not for manual entry)
  properties: water in wet mass 0 kg, wet mass 0.84 kg, water content 0, dry mass 0.84 kg, carbon content, non-fossil 0, heating value, gross 0 MJ, carbon allocation 0.506 kg
- petroleum: 1 kg; CPC 12010: Petroleum oils and oils obtained from bituminous minerals, crude; By-product classification allocatable product; CAS 8002-05-9
  EcoSpold01Location=NG
  production volume 6.82872e10 kg; name petroleum_PV
    Calculated based on literature values and estimates. The Canadian production of petroleum was 182.6E9 kg in 2012 (BP, 2014). From data in The Canadian Association of Petroleum Producers' (CAPP) Statistical Handbook 2014, it was estimated that 37.4% of the petroleum produced in Canada in 2010 was extracted in Alberta (The Canadian Association of Petroleum Producers' (CAPP), Statistical Handbook for Canada’s Upstream Petroleum Industry, May 2014 (http://www.capp.ca/GetDoc.aspx?DocId=241200&DT=NTV ).
  property price 0.192 EUR2005
    Temporary price data. Calculated as 90% of purchasers price based on: Crude oil prices from U.S. energy information administration_Independent statistics and analysis: Weekly All Countries Spot Price FOB Weighted by Estimated Export Volume (Dollars per Barrel) (http://tonto.eia.doe.gov/dnav/pet/pet_pri_wco_k_w.htm; accessed 06072010). Conversion factors - 0.159 m3/barrel with crude oil density of 853 kg/m3
  property amount in multioutput activity_kg 1.07e11 kg; name petroleum_amount_MO_kg
  property carbon content, fossil 0.85
    C-content of crude oil is 83-87% (ecoinven report 6_IV, Tab 3.2). An average C-content of 0.85 kg C/kg crude oil was considered
  property carbon content 0.85
    carbon content on a dry matter basis (reserved; not for manual entry)
  properties: water content 0, carbon content, non-fossil 0, water in wet mass 0 kg, wet mass 1 kg, dry mass 1 kg, heating value, net 43.2 MJ, carbon allocation 0.85 kg

## Inputs from technosphere
- low level radioactive waste: -1.99425e-9 m3; name low_level_waste; = (low_level_waste_amount_MO_m3*(0.5* petroleum +0.5*natural_gas *0.84)/(0.5* 107000000000 +0.5*13500000000 *0.84))*-1; lognormal variance with pedigree 0.37, pedigree (3,5,5,5,3)
  Generic value, basic uncertainty estimated = 3
  EcoSpold01Location=CH
  Uncertainty: Generic value, basic uncertainty estimated = 3. Uncertainty has been increased to reflect the extrapolation from a different region.
  production volume 184.068 m3; = low_level_waste_amount_MO_m3*(0.5* petroleum_PV +0.5*natural_gas_PV *0.84)/(0.5* 107000000000 +0.5*13500000000 *0.84)
    Calculated from the production volume of reference products
  property price 0 EUR2005; name low_level_waste_price_EUR2005
  property amount in multioutput activity_m3 236 m3; name low_level_waste_amount_MO_m3
  properties: wet mass 2500 kg, dry mass 2500 kg
- onshore well, oil/gas: 4.07301e-6 m; name onshore_well; = onshore_well_amount_MO_m*(0.5* petroleum +0.5*natural_gas *0.84)/(0.5* 107000000000 +0.5*13500000000 *0.84); lognormal variance with pedigree 0.4632, pedigree (2,3,5,5,5)
  EcoSpold01Location=GLO
  Environmental report
  Uncertainty: Environmental report. Uncertainty has been increased to reflect the extrapolation from a different region.
  property amount in multioutput activity_m 482000 m; name onshore_well_amount_MO_m
- sweet gas, burned in gas turbine: 1.36049 MJ; name sweet_gas_burned; = sweet_gas_burned_amount_MO_MJ*(0.5* petroleum +0.5*natural_gas *0.84)/(0.5* 107000000000 +0.5*13500000000 *0.84); lognormal variance with pedigree 0.1932, pedigree (2,3,5,5,5)
  Environmental report + questionnaire
  EcoSpold01Location=NO
  Uncertainty: Environmental report + questionnaire. Uncertainty has been increased to reflect the extrapolation from a different region.
  property amount in multioutput activity_MJ 1.61e11 MJ; name sweet_gas_burned_amount_MO_MJ
  properties: heating value, net 1 MJ, carbon content, fossil 0.589286, wet mass 0.0247059 kg, dry mass 0.0247059 kg
- chemical, organic: 8.95724e-7 kg; name chem_org; = chem_org_amount_MO_kg*(0.5* petroleum +0.5*natural_gas *0.84)/(0.5* 107000000000 +0.5*13500000000 *0.84); lognormal variance with pedigree 0.4632, pedigree (2,3,5,5,5)
  Generic value
  EcoSpold01Location=GLO
  Uncertainty: . Uncertainty has been increased to reflect the extrapolation from a different region.
  property amount in multioutput activity_kg 106000 kg; name chem_org_amount_MO_kg
  properties: heating value, net 19.03 MJ, carbon content, fossil 0.628, wet mass 1 kg, dry mass 1 kg
  note on carbon content, fossil: This dataset is an unweighted average of 20 organic substances (listed in Tab 88.1, ecoinvent v2.2 report 8, part II), being part of the top100 chemicals included in this database. The C-content has also been calculated as an unweighted average of the C content of the substances composing this dataset.
- pipeline, petroleum: 6.94609e-9 km; name pipeline; = pipeline_amount_MO_km*(0.5* petroleum +0.5*natural_gas *0.84)/(0.5* 107000000000 +0.5*13500000000 *0.84); lognormal variance with pedigree 0.4632, pedigree (2,3,5,5,5)
  Environmental report
  EcoSpold01Location=RER
  Uncertainty: Environmental report. Uncertainty has been increased to reflect the extrapolation from a different region.
  property amount in multioutput activity_km 822 km; name pipeline_amount_MO_km
- onshore petroleum field infrastructure: 1.24218e-10 unit; name onshore_petr_field; = onshore_petr_field_amount_MO_unit*(0.5* petroleum +0.5*natural_gas *0.84)/(0.5* 107000000000 +0.5*13500000000 *0.84); lognormal variance with pedigree 0.4632, pedigree (2,3,5,5,5)
  EcoSpold01Location=GLO
  Questionnaire
  Uncertainty: Questionnaire. Uncertainty has been increased to reflect the extrapolation from a different region.
  property amount in multioutput activity_unit 14.7 unit; name onshore_petr_field_amount_MO_unit
- water discharge from petroleum/natural gas extraction, onshore: -0.424299 kg; name water_discharge; = (water_discharge_amount_MO_kg*(1* petroleum +0*natural_gas *0.84)/(1* 107000000000 +0*13500000000 *0.84))*-1; lognormal variance with pedigree 0.1627, pedigree (2,2,5,5,5)
  (same comment as for onshore well, oil/gas)
  production volume 2.89742e10 kg; = water_discharge_amount_MO_kg*(1* petroleum_PV +0*natural_gas_PV *0.84)/(1* 107000000000 +0*13500000000 *0.84)
    Calculated from the production volume of reference products
  property amount in multioutput activity_kg 4.54e10 kg; name water_discharge_amount_MO_kg
  property price 0 EUR2005; name water_discharge_price_EUR2005
  properties: carbon content, fossil 0.00168491, wet mass 1 kg, water content 10.784, carbon content, non-fossil 0.00101223, dry mass 0.0848608 kg
- waste natural gas, sweet: -0.231536 MJ; name waste_NG_sweet; = (waste_NG_sweet_amount_MO_MJ*(0.5* petroleum +0.5*natural_gas *0.84)/(0.5* 107000000000 +0.5*13500000000 *0.84))*-1; lognormal variance with pedigree 0.128, pedigree (5,5,5,5,3)
  Estimation based on average global conditions.
  EcoSpold01Location=GLO
  Uncertainty: Estimation for average global conditions. Uncertainty adapted to reflect this.
  production volume 2.13707e10 MJ; = waste_NG_sweet_amount_MO_MJ*(0.5* petroleum_PV +0.5*natural_gas_PV *0.84)/(0.5* 107000000000 +0.5*13500000000 *0.84)
    Calculated from the production volume of reference products
  property price 0 EUR2005; name waste_NG_sweet_price_EUR2005
  property amount in multioutput activity_MJ 2.74e10 MJ; name waste_NG_sweet_amount_MO_MJ
  properties: carbon content, fossil 0.589286, dry mass 0.0247059 kg, wet mass 0.0247059 kg
- natural gas, vented: 0.00109853 m3; name nat_gas_vented; = nat_gas_vented_amount_MO_m3*(0.5* petroleum +0.5*natural_gas *0.84)/(0.5* 107000000000 +0.5*13500000000 *0.84); lognormal variance with pedigree 0.54, pedigree (5,5,5,5,5)
  Estimated to reflect global average conditions. Uncertainty has been adjusted to reflect that.
  EcoSpold01Location=GLO
  Uncertainty: Based on an estimation of global average conditions, uncertainty is high to reflect that.
  property amount in multioutput activity_m3 1.3e8 m3; name nat_gas_vented_amount_MO_m3
  properties: dry mass 0.84 kg, carbon content, fossil 0.602381, heating value, net 39 MJ, wet mass 0.84 kg
  note on carbon content, fossil: An average C content of 0.506 kg C/ m3 has been assumed (this average has been calculated using data in Tab 3.5, ecoinvent v2.2 report 6_V
  note on heating value, net: Literature value, Source: United Nations Statistics Division (2018) International Recommendations for Energy Statistics (IRES). Available at: http://unstats.un.org/unsd/statcom/doc11/BG-IRES.pdf.
- offshore platform, petroleum: 4.14906e-11 unit; name offshore_plattform; = offshore_plattform_amount_MO_unit*(0.5* petroleum +0.5*natural_gas *0.84)/(0.5* 107000000000 +0.5*13500000000 *0.84); lognormal variance with pedigree 0.4632, pedigree (2,3,5,5,5)
  EcoSpold01Location=OCE
  Questionnaire
  Uncertainty: Questionnaire. Uncertainty has been increased to reflect the extrapolation from a different region.
  property amount in multioutput activity_unit 4.91 unit; name offshore_plattform_amount_MO_unit
- municipal solid waste: -0.000362515 kg; name MSW; = (MSW_amount_MO_kg*(0.5* petroleum +0.5*natural_gas *0.84)/(0.5* 107000000000 +0.5*13500000000 *0.84))*-1; lognormal variance with pedigree 0.1641, pedigree (3,2,5,5,5)
  Environmental report
  EcoSpold01Location=CH
  Uncertainty: Environmental report. Uncertainty has been increased to reflect the extrapolation from a different region.
  production volume 3.34599e7 kg; = MSW_amount_MO_kg*(0.5* petroleum_PV +0.5*natural_gas_PV *0.84)/(0.5* 107000000000 +0.5*13500000000 *0.84)
    Calculated from the production volume of reference porducts
  property amount in multioutput activity_kg 4.29e7 kg; name MSW_amount_MO_kg
  properties: wet mass 1 kg, heating value, net 11.74 MJ, carbon content, non-fossil 0.261655, carbon content, fossil 0.171549, dry mass 0.771 kg, water content 0.297017
  note on heating value, net: Value taken from the general comment of the treatment dataset.
  note on carbon content, non-fossil: MSW composition in tab 4.1, ecoinvent v2.2 report 13_I. C content referred to 1 kg DM
- chemical, inorganic: 1.19993e-6 kg; name chem_inorg; = chem_inorg_amount_MO_kg*(0.5* petroleum +0.5*natural_gas *0.84)/(0.5* 107000000000 +0.5*13500000000 *0.84); lognormal variance with pedigree 0.4632, pedigree (2,3,5,5,5)
  EcoSpold01Location=GLO
  Generic value
  Uncertainty: . Uncertainty has been increased to reflect the extrapolation from a different region.
  property amount in multioutput activity_kg 142000 kg; name chem_inorg_amount_MO_kg
  properties: dry mass 1 kg, carbon content, fossil 0.003, wet mass 1 kg
  note on carbon content, fossil: This dataset is an unweighted average of 20 inorganic substances (listed in Tab 88.1, ecoinvent v2.2 report 8, part II), being part of the top100 chemicals included in this database. The C-content has also been calculated as an unweighted average of the C content of the substances composing this dataset.

## Inputs from nature
- Oil, crude, in ground [natural resource, in ground]: 1 kg; name oil_ground; = oil_ground_amount_MO_kg*(1* petroleum +0*natural_gas *0.84)/(1* 107000000000 +0*13500000000 *0.84); lognormal variance with pedigree 0.04, pedigree (1,1,5,1,1)
  Statistic
  Uncertainty: Statistic
  property amount in multioutput activity_kg 1.07e11 kg; name oil_ground_amount_MO_kg
- Gas, natural, in ground [natural resource, in ground]: 0 m3; name gas_ground; = gas_ground_amount_MO_m3*(0* petroleum +1*natural_gas *0.84)/(0* 107000000000 +1*13500000000 *0.84); pedigree (1,1,1,1,1)
  Production
  Uncertainty: Production
  property amount in multioutput activity_m3 1.35e10 m3; name gas_ground_amount_MO_m3

## Emissions to nature
- DOC, Dissolved Organic Carbon [water, surface water]: 5.52645e-5 kg; name DOC; = DOC_amount_MO_kg*(0.5* petroleum +0.5*natural_gas *0.84)/(0.5* 107000000000 +0.5*13500000000 *0.84); lognormal variance with pedigree 0.212, pedigree (3,5,5,5,5)
  Extrapolation for sum parameter
  Uncertainty: Extrapolation for sum parameter. Uncertainty has been increased to reflect the extrapolation from a different region.
  property amount in multioutput activity_kg 6.54e6 kg; name DOC_amount_MO_kg
- Nitrogen [water, surface water]: 4.93493e-8 kg; name N2; = N2_amount_MO_kg*(0.5* petroleum +0.5*natural_gas *0.84)/(0.5* 107000000000 +0.5*13500000000 *0.84); lognormal variance with pedigree 0.212, pedigree (3,5,5,5,5)
  (same comment as for DOC, Dissolved Organic Carbon)
  property amount in multioutput activity_kg 5840 kg; name N2_amount_MO_kg
- AOX, Adsorbable Organic Halogen as Cl [water, surface water]: 6.58273e-10 kg; name AOX; = AOX_amount_MO_kg*(0.5* petroleum +0.5*natural_gas *0.84)/(0.5* 107000000000 +0.5*13500000000 *0.84); lognormal variance with pedigree 0.212, pedigree (3,5,5,5,5)
  (same comment as for DOC, Dissolved Organic Carbon)
  property amount in multioutput activity_kg 77.9 kg; name AOX_amount_MO_kg
- BOD5, Biological Oxygen Demand [water, surface water]: 0.000201115 kg; name BOD; = BOD_amount_MO_kg*(0.5* petroleum +0.5*natural_gas *0.84)/(0.5* 107000000000 +0.5*13500000000 *0.84); lognormal variance with pedigree 0.212, pedigree (3,5,5,5,5)
  (same comment as for DOC, Dissolved Organic Carbon)
  property amount in multioutput activity_kg 2.38e7 kg; name BOD_amount_MO_kg
- Methane, bromotrifluoro-, Halon 1301 [air, non-urban air or from high stacks]: 5.81376e-8 kg; name halon; = halon_amount_MO_kg*(0.5* petroleum +0.5*natural_gas *0.84)/(0.5* 107000000000 +0.5*13500000000 *0.84); lognormal variance with pedigree 0.8127, pedigree (2,2,5,5,5)
  Environmental report
  Uncertainty: Environmental report. Uncertainty has been increased to reflect the extrapolation from a different region.
  property amount in multioutput activity_kg 6880 kg; name halon_amount_MO_kg
- TOC, Total Organic Carbon [water, surface water]: 5.52645e-5 kg; name TOC; = TOC_amount_MO_kg*(0.5* petroleum +0.5*natural_gas *0.84)/(0.5* 107000000000 +0.5*13500000000 *0.84); lognormal variance with pedigree 0.212, pedigree (3,5,5,5,5)
  (same comment as for DOC, Dissolved Organic Carbon)
  property amount in multioutput activity_kg 6.54e6 kg; name TOC_amount_MO_kg
- Oils, unspecified [water, surface water]: 6.38837e-5 kg; name oils; = oils_amount_MO_kg*(0.5* petroleum +0.5*natural_gas *0.84)/(0.5* 107000000000 +0.5*13500000000 *0.84); lognormal variance with pedigree 0.4632, pedigree (2,3,5,5,5)
  (same comment as for Methane, bromotrifluoro-, Halon 1301)
  property amount in multioutput activity_kg 7.56e6 kg; name oils_amount_MO_kg
- COD, Chemical Oxygen Demand [water, surface water]: 0.000201115 kg; name COD; = COD_amount_MO_kg*(0.5* petroleum +0.5*natural_gas *0.84)/(0.5* 107000000000 +0.5*13500000000 *0.84); lognormal variance with pedigree 0.212, pedigree (3,5,5,5,5)
  (same comment as for DOC, Dissolved Organic Carbon)
  property amount in multioutput activity_kg 2.38e7 kg; name COD_amount_MO_kg
- Sulfur [water, surface water]: 1.7154e-7 kg; name S2; = S2_amount_MO_kg*(0.5* petroleum +0.5*natural_gas *0.84)/(0.5* 107000000000 +0.5*13500000000 *0.84); lognormal variance with pedigree 0.212, pedigree (3,5,5,5,5)
  (same comment as for DOC, Dissolved Organic Carbon)
  property amount in multioutput activity_kg 20300 kg; name S2_amount_MO_kg

## Sampling procedure
Environmental report and questionnaire.

## Extrapolations
Emission data are calculated with generic assumptions. Generic assumptions also applied for chemical uses and some other exchanges.

The conditions of productions in different regions were used to extrapolate the production conditions in Alberta. Unless otherwise noted, the existing dataset for Nigerian production (for which the source is given in the source field) was used as the basis for the extrapolation.

## Review by Emilia Moreno Ruiz 2017-09-06
PV adjusted
