# sheep production, for meat

Dataset: EcoSpold 2, unit process
Geography: RoW
Time period: 2001-01-01 to 2021-12-31
Technology level: current
Classification: ISIC rev.4 ecoinvent: 0144:Raising of sheep and goats
Classification: EcoSpold01Categories: agricultural production/animal production
Scenario: Business-as-Usual
System model: Allocation, cut-off by classification
Share of production covered: 99 %
Generated by: Bo Weidema
Published in: Nemecek, T. 2007
Database: ecoinvent
isCopyrightProtected: true
accessRestrictedTo: 1

## General comment
This unit process represents average sheep production for meat with the outputs of 62.8 kg of sheep for slaughtering, live weight and a by-product of 4.2 kg of sheep fleece in the grease (average output of husbandry of one sheep during one year).
[This dataset was already contained in the ecoinvent database version 2. It was not individually updated during the transfer to ecoinvent version 3. Life Cycle Impact Assessment results may still have changed, as they are affected by changes in the supply chain, i.e. in other datasets. This dataset was generated following the ecoinvent quality guidelines for version 2. It may have been subject to central changes described in the ecoinvent version 3 change report (http://www.ecoinvent.org/database/ecoinvent-version-3/reports-of-changes/), and the results of the central updates were reviewed extensively. The changes added e.g. consistent water flows and other information throughout the database. The documentation of this dataset can be found in the ecoinvent reports of version 2, which are still available via the ecoinvent website. The change report linked above covers all central changes that were made during the conversion process.]
[This dataset is meant to replace the following datasets:
- sheep production, US, 2001 - 2006]

## Included activities start
This activity represents the expenditures and emissions of the husbandry of 1 sheep during 1 year. It includes the processes and inputs of sheep husbandry on pasture land (20% intensive and 80% extensive pasture land). Inputs of fertilisers, feedstuffs, pesticides and irrigation are considered.

## Included activities end
Machine infrastructure and a shed for machine sheltering and shearing is included. The direct emissions on the field are also included. The system boundary is at the farm gate. The products of sheep husbandry are wool and sheep live weight. All further processes after the farm gate like transport to the slaughterhouse, slaughtering, cooling, etc. are excluded.
The output of sheepskin (3.4 kg per sheep per year) is not recorded as a by-product.

## Geography
Refers to an average production in the USA

## Technology
Conventional production typical for the country. Water for irrigation is pumped from 48 meter depth by electric pumps.

## Time period
The yield data have been collected for the years 2001-2006.

## Parameters
- fraction, irrigation water, to air: 0.586986 dimensionless; name fraction_IW_to_air; lognormal variance with pedigree 0.0409, pedigree (2,2,2,1,1)
  Literature value (Siebert, 2010) (Vionnet, S., Quantis Water Database - Technical Report, 2012).
- fraction, irrigation water, to ground water: 0.8 dimensionless; name fraction_IW_to_ground_water; lognormal variance with pedigree 0.0886, pedigree (4,3,1,1,4)
  Literature value (Döll, 2011) cross referenced with expert opinion.
- fraction, irrigation water to surface water: 0.2 dimensionless; name fraction_IW_to_surface_water; lognormal variance with pedigree 0.0886, pedigree (4,3,1,1,4)
  Literature value (Döll, 2011) cross referenced with expert opinion.

## Reference product
- sheep for slaughtering, live weight: 1 kg; name live_weight; CPC 02122: Sheep; By-product classification allocatable product
  EcoSpold01Location=US
  Value taken from the respective dataset with a US geography.
  production volume 1.19857e10 kg; name PV_live_weight; = 8300000000*2*(1-0.085-0.185)
    Global production 8.3 million metric ton of sheep meat (carcass weight) in 2006 (FAOSTAT, accessed 2012.07.17). Subtracted 8.5% which is estimated to be produced as by-product from wool sheep and 18.5% from milk sheep. Conversion factor 2 from carcass weight to live weight based on information in ecoinvent v2 report 15.
  property price 1.85 EUR2005
    Temporary price data. Calculated as 90% of purchasers price based on: 2005 import prices (total trades (USD) divided by total weight (kg) in biggest economies of the world: EU27, USA, Brasil, China, India, Japan and Russia) from UN Commodity Trade Statistics Database (http://data.un.org/Explorer.aspxDatabase [Accessed 2011.06.23]). Commodity: Sheep, live
  property carbon content, non-fossil 0.4375
    C content in live meat was considered 43.75% (DM basis). Data from Weidema B.P., Wesnaes M., Hermansen J., Kristensen T., Halberg N. (2007a). Environmental Improvement Potentials of Meat and Dairy Products. Report to the European Commission, Institute for Prospective Technological Studies. In press.
  property carbon content 0.4375
    carbon content on a dry matter basis (reserved; not for manual entry)
  property true value 116.18; name live_weight_true_value
    allocation property applied in "true value" allocation // value calculated from revenue
  properties: dry mass 0.5 kg, wet mass 1 kg, carbon content, fossil 0, water content 1, water in wet mass 0.5 kg, carbon allocation 0.21875 kg

## By-products
- sheep fleece in the grease: 0 kg; By-product classification allocatable product; CPC 02942: Pulled wool, greasy, including fleece-washed pulled wool; coarse animal hair
  Original value as reported in ecoinvent v2 report No 15.
  production volume 4.9129e8 kg; name PV_fleece; = 2250000000*0.22
    22% of wool, greasy (for 2006) in FAOSTAT (accessed 2012.07.17) is assumed to be produced by meat sheep (medium wools according to the International Wool Textile Organization)
  property dry mass 0.869565 kg; name DM
  property water in wet mass 0.130435 kg; name WWM
  property price 2.82 EUR2005
    Temporary price data. Calculated as 90% of purchasers price based on: 2005 import values of Wool, greasy for the World+ divided by import volumes, according to FAOSTAT (accessed 2011.06.23)
  property carbon content, non-fossil 0.53; name C_content_non_fossil
  property water content 0.15; name water_content
  property carbon content, fossil 0; name C_content_fossil
  property wet mass 1 kg; name WM
  property carbon content 0.53
    carbon content on a dry matter basis (reserved; not for manual entry)
  property true value 11.7182
    allocation property applied in "true value" allocation // value calculated from revenue
  properties: carbon allocation 0.46087 kg

## Inputs from technosphere
- lime: 0.264124 kg; lognormal variance with pedigree 0.0532, pedigree (2,3,5,5,1)
  Value from NREL (2006) assumes only intensive pastures. According to Wells et. al (2000) 80% of sheep pastures are extensive (with reduced or no cultivation). Value from NREL (2006) is multiplied by 0.2 in order to account for the share of extensive pastures. --- Source: Wells A., Gegner L.E. & Earles R. 2000. Sustainable Sheep Production - Livestock Production Guide, Appropriate Technology Transfer for Rural Areas (ATTRA), retrieved 6.6.2007 from http://www.attra.ncat.org/attra-pub/PDF/sheep.pdf
  EcoSpold01Location=CH
  properties: wet mass 1 kg, dry mass 1 kg, carbon content, fossil 0.120005
- shed: 0.000578585 m2; lognormal variance with pedigree 0.0546, pedigree (3,3,5,5,1)
  EcoSpold01Location=CH
- sodium chloride, powder: 0.0561227 kg; lognormal variance with pedigree 0.0532, pedigree (2,3,5,5,1)
  For nutrition
  EcoSpold01Location=RER
  properties: wet mass 1 kg, dry mass 1 kg
- maize grain: 0 kg; pedigree (1,1,1,1,1)
  properties: wet mass 1 kg, water content 0.162791, dry mass 0.86 kg, carbon content, non-fossil 0.46957
- irrigation: 0 m3; name water_irrigation_input; pedigree (1,1,1,1,1)
  Average irrigation of irrigated and non-irrigated pastures; calculations based on USDA (2004) for irrigation volumes and on NCFAP (1997) for pasture land area. --- Sources: USDA - United States Department of Agriculture (2004). 2002 Census of Agriculture - Farm and Ranch Irrigation Survey 2003, Volume 3, Special Studies Part 1. --- NCFAP - National Centre for Food & Agricultural Policy (1997) National Pesticide Use Database 1997. Retrieved on 10 Jan 2007 from http://www.ncfap.org/database/national/default.asp.
  EcoSpold01Location=US
  properties: dry mass 0.11 kg, wet mass 1000 kg, water content 9089.91
- lime, packed: 0 kg; pedigree (1,1,1,1,1)
  For nutrition
  EcoSpold01Location=CH
  properties: water content 0.00200401, carbon content, fossil 0.117492, dry mass 0.998 kg, wet mass 1 kg
  note on carbon content, fossil: Table 3.1, ecoinvent v2.2 report 7, part VII, pg 3. MW CaCO3=100, MW MgCO3=84
- fertilising, by broadcaster: 0.000936151 ha; lognormal variance with pedigree 0.0546, pedigree (3,3,5,5,1)
  Value from Nemecek et al. (2004) represents intensive pastures. According to Wells et. al (2000) 80% of sheep pastures are extensive (with reduced or no cultivation). Value from Nemecek et al. (2004) is multiplied by 0.2 in order to account for the share of extensive pastures and divided by stocking density (12.4 sheep per hectare according to AVNA 2007). --- Sources: Wells A., Gegner L.E. & Earles R. 2000. Sustainable Sheep Production - Livestock Production Guide, Appropriate Technology Transfer for Rural Areas (ATTRA), retrieved 6.6.2007 from http://www.attra.ncat.org/attra-pub/PDF/sheep.pdf ---- AVNA - American Veterinary Naturopathic Association (2007) Forage Needs for Meat Goats and Sheep. Retrieved on 25 June 2007 from http://avna.us/14.htm.
  EcoSpold01Location=CH
- inorganic phosphorus fertiliser, as P2O5: 0 kg; pedigree (1,1,1,1,1)
  Value from NREL (2006) assumes only intensive pastures. According to Wells et. al (2000) 80% of sheep pastures are extensive (with reduced or no cultivation). Value from NREL (2006) is multiplied by 0.2 in order to account for the share of extensive pastures. --- Source: Wells A., Gegner L.E. & Earles R. 2000. Sustainable Sheep Production - Livestock Production Guide, Appropriate Technology Transfer for Rural Areas (ATTRA), retrieved 6.6.2007 from http://www.attra.ncat.org/attra-pub/PDF/sheep.pdf
  EcoSpold01Location=RER
  properties: dry mass 1 kg, wet mass 1 kg
- soybean meal: 0.393438 kg; lognormal variance with pedigree 0.0532, pedigree (2,3,5,5,1)
  EcoSpold01Location=US
  properties: dry mass 0.89 kg, water content 0.123596, carbon content, non-fossil 0.475627, wet mass 1 kg
  note on carbon content, non-fossil: Composition data obtained from Table 2 in Uses of Canola Meal, J. Bonnardeaux, Department of Agriculture and Food, Western Australia, 2007. First, composition data were refered to 1 kg dry mass. Then, C-contents were calculated considering a C-content/dry mass of 46% in carbohydrates (including fibres), 53% in proteins and 75% in fats. All data from "Evolutionary and Biochemical Aspects", A.D. Kay and T. Vrede (in Global Ecology, 2010, Elsevier B.V., S.E. Jørgensen Ed.).
- ammonium nitrate: 0 kg; pedigree (1,1,1,1,1)
  The exchange has been updated from 'ammonium nitrate, as N' into 'ammonium nitrate' and therefore its amount has been scaled (multiplied) from 1.37 kg by 2.8573 kg of 'ammonium nitrate' per kg of 'ammonium nitrate, as N'. Original comment of the exchange is: Value from NREL (2006) assumes only intensive pastures. According to Wells et. al (2000) 80% of sheep pastures are extensive (with reduced or no cultivation). Value from NREL (2006) is multiplied by 0.2 in order to account for the share of extensive pastures. --- Source: Wells A., Gegner L.E. & Earles R. 2000. Sustainable Sheep Production - Livestock Production Guide, Appropriate Technology Transfer for Rural Areas (ATTRA), retrieved 6.6.2007 from http://www.attra.ncat.org/attra-pub/PDF/sheep.pdf
  EcoSpold01Location=RER
  properties: dry mass 1 kg, wet mass 1 kg
- potassium chloride: 0.0157067 kg; lognormal variance with pedigree 0.0532, pedigree (2,3,5,5,1)
  The exchange has been updated from 'potassium chloride, as K2O' into 'potassium chloride' and therefore its amount has been scaled (multiplied) from 0.686 kg by 1.5829 kg of 'potassium chloride' per kg of 'potassium chloride, as K2O'. Original comment of the exchange is: Value from NREL (2006) assumes only intensive pastures. According to Wells et. al (2000) 80% of sheep pastures are extensive (with reduced or no cultivation). Value from NREL (2006) is multiplied by 0.2 in order to account for the share of extensive pastures. --- Source: Wells A., Gegner L.E. & Earles R. 2000. Sustainable Sheep Production - Livestock Production Guide, Appropriate Technology Transfer for Rural Areas (ATTRA), retrieved 6.6.2007 from http://www.attra.ncat.org/attra-pub/PDF/sheep.pdf
  EcoSpold01Location=RER
  properties: wet mass 1 kg, dry mass 1 kg
- tillage, rolling: 0.000234038 ha; lognormal variance with pedigree 0.0546, pedigree (3,3,5,5,1)
  EcoSpold01Location=CH
  Value from Nemecek et al. (2004) represents intensive pastures. According to Wells et. al (2000) 80% of sheep pastures are extensive (with reduced or no cultivation). Value from Nemecek et al. (2004) is multiplied by 0.2 in order to account for the share of extensive pastures and divided by stocking density (12.4 sheep per hectare according to AVNA 2007). --- Sources: Wells A., Gegner L.E. & Earles R. 2000. Sustainable Sheep Production - Livestock Production Guide, Appropriate Technology Transfer for Rural Areas (ATTRA), retrieved 6.6.2007 from http://www.attra.ncat.org/attra-pub/PDF/sheep.pdf ---- AVNA - American Veterinary Naturopathic Association (2007) Forage Needs for Meat Goats and Sheep. Retrieved on 25 June 2007 from http://avna.us/14.htm.
- maize grain: 0.571538, 0.0272975 kg (2 entries); lognormal variance with pedigree 0.0532, pedigree (2,3,5,5,1)
- irrigation: 0.000789681, 3.35195e-5, 1.34078e-6, 0.00705921, 0.000115682, 5.78456e-6, 0.000328463, 5.34633e-5, 0.0135656, 0.000260762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 m3 (16 entries); lognormal variance with pedigree 0.0546, pedigree (3,3,5,5,1)
  (same comment as for irrigation)
- lime, packed: 0.00237742, 0.0933784 kg (2 entries); lognormal variance with pedigree 0.0532, pedigree (2,3,5,5,1)
  For nutrition
  EcoSpold01Location=CH
- inorganic phosphorus fertiliser, as P2O5: 4.93169e-5, 6.39845e-5, 5.12345e-5, 0.000401165, 8.45299e-5, 3.48295e-6, 9.18089e-6, 0.000947064, 1.70703e-5, 1.86279e-6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 kg (29 entries); lognormal variance with pedigree 0.0532, pedigree (2,3,5,5,1)
  (same comment as for inorganic phosphorus fertiliser, as P2O5)
- ammonium nitrate: 0.00902966, 0.0169394, 0.0306531 kg (3 entries); lognormal variance with pedigree 0.0532, pedigree (2,3,5,5,1)
  (same comment as for ammonium nitrate)

## Inputs from nature
- Transformation, from pasture, man made [natural resource, land]: 11.7019 m2; lognormal variance with pedigree 0.1746, pedigree (3,3,5,5,1)
- Occupation, pasture, man made [natural resource, land]: 11.7019 m2*year; lognormal variance with pedigree 0.1746, pedigree (3,3,5,5,1)
- Transformation, to pasture, man made [natural resource, land]: 11.7019 m2; lognormal variance with pedigree 0.1746, pedigree (3,3,5,5,1)

## Emissions to nature
- Lead [soil, agricultural]: -2.62663e-9 kg
- Cadmium [soil, agricultural]: -2.34457e-10 kg
- Ammonia [air, non-urban air or from high stacks]: 0.0496889 kg; lognormal variance with pedigree 0.0532, pedigree (2,3,5,5,1)
  Emissions from enteric fermentation and manure according to Taipale (2006). Emissions from fertilisers according to Goolsby (1999). --- Sources: Taipale C., 2006 Colorado 2002 Ammonia Emission Inventory. Colorado Department of Public Health & Environment. --- Goolsby D.A., Battaglin W.A., Lawrence G.B., Artz R.S., Aulenbach B.T., Hooper R.P., Keeney D.R. & Stensland G.J. (1999) Flux and Sources of Nutrients in the Mississippi-Atchafalaya River Basin - Topic 3 Report for the integrated Assessment on Hypoxia in the Gulf of Mexico. Decision Analysis Series No. 17, National Oceanic and Atmospheric Administration, U.S. Department of Commerce, p. 159.
- Lead [water, surface water]: 3.2502e-9 kg; lognormal variance with pedigree 0.1327, pedigree (2,2,5,5,1)
- Chromium, ion [water, surface water]: 1.14055e-6 kg; lognormal variance with pedigree 0.1327, pedigree (2,2,5,5,1)
- Phosphate [water, ground-]: 0.000867878 kg; lognormal variance with pedigree 0.0827, pedigree (2,2,5,5,1)
- Copper [soil, agricultural]: -1.08994e-6 kg
- Methane, non-fossil [air, non-urban air or from high stacks]: 0.125404 kg; lognormal variance with pedigree 0.0727, pedigree (2,2,5,5,1)
  Emissions from enteric fermentation and manure according to EPA (2006). Sources: Environmental Protection Agency (EPA), (2006) US Emissions Inventory 2006 - INVENTORY OF U.S. GREENHOUSE GAS EMISSIONS AND SINKS: 1990-2004, retrieved on 10 Jan 2007 from http://yosemite.epa.gov/oar/globalwarming.nsf/content/ResourceCenterPublicationsGHGEmissionsUSEmissionsInventory2006.html.
- Water [air, unspecified]: 0.0290937 m3; name water_to_air_unspecified; = water_irrigation_input*fraction_IW_to_air; lognormal variance with pedigree 0.0807, pedigree (2,2,5,1,1)
  Calculated value based on literature values and expert opinion. See comments in the parametres' comment field.
  property fraction, origin: unspecified 0; name fraction_origin_unspecified
  property fraction, origin: fresh water 1; name fraction_origin_fresh_water
  property fraction, origin: salt water 0; name fraction_origin_salt_water
- Copper, ion [water, ground-]: 3.98356e-8 kg; lognormal variance with pedigree 0.1327, pedigree (2,2,5,5,1)
- Water [water, surface water]: 0.00409417 m3; name water_to_water_surface; = water_irrigation_input*(1-fraction_IW_to_air)*fraction_IW_to_surface_water; lognormal variance with pedigree 0.1286, pedigree (4,3,5,1,4)
  Calculated value. See the parameters and their comments to understand the calculation.
  property fraction, origin: salt water 0; name fraction_origin_salt_water_Wsw
  property fraction, origin: fresh water 1; name fraction_origin_fresh_water_Wsw
- Water [water, ground-]: 0.0163767 m3; name water_to_water_ground; = water_irrigation_input*(1-fraction_IW_to_air)*fraction_IW_to_ground_water; lognormal variance with pedigree 0.1286, pedigree (4,3,5,1,4)
  Calculated value. See the parameters and their comments to understand the calculation.
  property fraction, origin: unspecified 0; name fraction_origin_unspecified_Wgw
  property fraction, origin: fresh water 1; name fraction_origin_fresh_water_Wgw
  property fraction, origin: salt water 0; name fraction_origin_salt_water_Wgw
- Dinitrogen monoxide [air, non-urban air or from high stacks]: 0.00372074 kg; lognormal variance with pedigree 0.0727, pedigree (2,2,5,5,1)
  Emissions from fertilisers according to Nemecek et al. (2004). Emissions from manure according to EPA (2006). Sources: Environmental Protection Agency (EPA), (2006) US Emissions Inventory 2006 - INVENTORY OF U.S. GREENHOUSE GAS EMISSIONS AND SINKS: 1990-2004, retrieved on 10 Jan 2007 from http://yosemite.epa.gov/oar/globalwarming.nsf/content/ResourceCenterPublicationsGHGEmissionsUSEmissionsInventory2006.html.
- Chromium [soil, agricultural]: -1.312e-6 kg
- Nitrogen oxides [air, non-urban air or from high stacks]: 0.000781365 kg; lognormal variance with pedigree 0.0727, pedigree (2,2,5,5,1)
- Nickel [soil, agricultural]: -1.94752e-7 kg
- Phosphate [water, surface water]: 0.000929164 kg; lognormal variance with pedigree 0.0827, pedigree (2,2,5,5,1)
  Calculated according to Goolsby et al. (1999) and Litke (999). --- Sources: Litke, D.W. (1999) Review of Phosphorus Control Measures in the United States and Their Effects on Water Quality. Water-Resources Investigations Report 99-4007, U.S. GEOLOGICAL SURVEY, Denver, Colorado.
- Chromium, ion [water, ground-]: 2.07466e-7 kg; lognormal variance with pedigree 0.1327, pedigree (2,2,5,5,1)
- Phosphorus [water, surface water]: 0.000687619 kg; lognormal variance with pedigree 0.0827, pedigree (2,2,5,5,1)
  (same comment as for Phosphate)
- Nitrate [water, ground-]: 0.0717605 kg; lognormal variance with pedigree 0.0827, pedigree (2,2,5,5,1)
  Calculated after Goolsby et al. (1999): emission factor of 61% of the N-input (fertilisers and N fixation). Originally estimated for the nitrate leaching in the Mississipi region. Extrapolated to the whole USA.
- Copper, ion [water, surface water]: 1.07559e-6 kg; lognormal variance with pedigree 0.1327, pedigree (2,2,5,5,1)
- Cadmium, ion [water, surface water]: 5.32544e-10 kg; lognormal variance with pedigree 0.1327, pedigree (2,2,5,5,1)
- Nickel, ion [water, surface water]: 2.30783e-7 kg; lognormal variance with pedigree 0.1327, pedigree (2,2,5,5,1)
- Zinc, ion [water, ground-]: 4.37801e-7 kg; lognormal variance with pedigree 0.1327, pedigree (2,2,5,5,1)
- Cadmium, ion [water, ground-]: 2.29423e-11 kg; lognormal variance with pedigree 0.1327, pedigree (2,2,5,5,1)
- Lead [water, ground-]: 2.06801e-11 kg; lognormal variance with pedigree 0.1327, pedigree (2,2,5,5,1)
- Zinc, ion [water, surface water]: 3.18222e-6 kg; lognormal variance with pedigree 0.1327, pedigree (2,2,5,5,1)
- Zinc [soil, agricultural]: -2.43223e-6 kg

## Sampling procedure
Data come from the NREL database and from varoius U.S database. Data were compiled from statistics, literature, farm survey reports, documents from extension services, and expert knowledge.

## Extrapolations
Extrapolated from US data. Uncertainty has been adjusted accordingly.
