# battery production, NaCl, rechargeable

Dataset: EcoSpold 2, unit process
Geography: CH
Time period: 2012-01-01 to 2021-12-31
Technology level: current
Classification: EcoSpold01Categories: electronics/module
Classification: ISIC rev.4 ecoinvent: 2720:Manufacture of batteries and accumulators
Scenario: Business-as-Usual
System model: Allocation, cut-off by classification
Generated by: Andrew Simons
Published in: Bauer, C. 2010
Database: ecoinvent
isCopyrightProtected: true
accessRestrictedTo: 1

## General comment
This dataset represents the production of 1kg of a high temperature sodium salt battery having an overall energy density of 116Wh/kg. It is commonly known as the ZEBRA battery due to the research programme which developed it. The cell chemistry is NaCl+Ni in its discharged state and NiCl2+Na in the charged state. Due to their high temperature of operation (>270°C) the cells must be assembled as a sealed battery unit in order that they can be used which is why the production data is represented in one dataset rather than different datasets for cell and battery components. The batteries are currently produced by a single manufacturer in the south of Switzerland, so the global production volume is the same as that for Switzerland. Data for the battery production is taken from various publicly available sources and literature which have been published by the manufacturing company.

The ZEBRA batteries are suitable for the propulsion of electric vehicles or for stationary power applications.

The relative quantities for 1kg battery have been derived from a reference product of 182kg and 21kWh storage capacity and containing 216 individual cells. A product description can be found at: http://www.axu.it/index.php?option=com_docman&task=doc_view&gid=56&Itemid=&lang=it

and an overview of the battery at:
http://cebinew.kicms.de/cebi/easyCMS/FileManager/Files/MES-DEA/Electric_Energy_storage.pdf

The inventory data for the present dataset are mainly taken from Galloway & Dustmann (2003) ZEBRA Battery - Material cost, Availability and recycling. EVS-20, Long-Beach, CA.

The cell consists of an outer vessel, (also the negative pole) which contains a sodium electrode. The electrolyte and separator is a ceramic of ß-alumina which is conductive to positively charged sodium ions (Na+ ion) but not to electrons. The current collector at the positive electrode is a solid but porous combination of nickel (Ni) and salt (NaCl) in the discharged state and nickelchloride (NiCl2) and Na in the charged state. It is impregnated with a sodium aluminiumchloride (NaAlCl4) salt which becomes liquid at 154°C (hence the classification as a high temperature battery). It is in this state that it too becomes conductive to Na+ ions, thereby allowing the entire electrode to be available for energy storage. As the cell is manufactured in the discharged state it is with these basic substances that the cell is initially constructed. There are no side-reactions produced which means that the charge and discharge efficiency inside the cell is 100%. Furthermore, the reactions described only take place if there is an equal flow of electrons in the negative pole as Na+ ions conducted inside the cell, meaning that the NaCl+Ni batteries do not suffer from self-discharge which can be the case for other cell chemistries.

The operating temperature of the cells starts at 270°C and achieving this from cold requires a heating period of up to 24 hours. When not in use the internal temperature of the cells is maintained at around 300°C which necessarily results in a power demand of approximately 100W either from the battery itself or from the grid if plugged in. During discharge of the cells the battery requires cooling which, together with internal electrical resistances, reduces the effective overall charge efficiency. To ensure a long battery life, the depth of discharge of a ZEBRA battery is recommended to be limited to 80%. This means that a 21kWh battery, if fully charged, would have an effective storage capacity of almost 17kWh and become discharged after 7 days if unused and not plugged in via the charger to the electricity grid.

## Included activities start
From reception of raw materials at the factory gate.

## Included activities end
This activity ends with the production of 1kg high temperature sodium salt battery.

The dataset includes the production of the cells and the assembly into a battery, complete with casing, battery management interface (control unit) and activation of the cells. Infrastructures are included in the form of a demand for metal working facilities. The entries are based on a simplified model taken from the reference sources and takes into account the main materials without going into the detail of each specific production step.

The dataset doesn't include any emissions or wastes because relevant information was not found.

## Geography
Produced exclusively in Switzerland.

## Technology
Technical descriptions of the battery can be found in
Dustmann C.-H. (2004) Advances in ZEBRA batteries. Journal of Power Sources 127, 85-93.

Turconi, A. (2007) Developments and Improvements in Zebra Nickel Sodium Chloride Batteries. EVS-23, Dec. 2-5, Anaheim, DE.

Documentation of materials, resources and recycling in Galloway, R.C. and dustmann, C.-H. (2003) ZEBRA Battery - Material cost, availability and recycling. EVS-20, Nov. 15-19, Long Beach, US.

A description of the production processes can be found in: Manzoni, R., Metzger, M. and crugnola, G. (2008) ZEBRA energy storage system: from R&D to market. HTE hi.tech.expo, Nov. 25-28, Milan, IT.

## Reference product
- battery, NaCl: 1 kg; CPC 46420: Electric accumulators; By-product classification allocatable product
  production volume 858491 kg; = (100000/21.2)*182
    90MWh production capacity in 2010 with significant investment made to enable growth. http://www.fiamm.com/news.php?s=1258 "Read the announcement"
    Therefore assume 100MWh (100 000 kWh) in 2012.
    21.2 kWh per battery.
    182 kg/battery
  property price 29.8 EUR2005
    Price of kwh produced by sodium batteries in 2011 based on [http://www.greentechmedia.com/articles/read/is-sodium-the-future-formula-for-energy-storage] and kwh produced by kg of battery based on [http://www.eurobat.org/battery-technologies#Sodium_based].
  property carbon content, fossil 0.0411947
    Calculated as the addition of C contents in the product composition
  property carbon content 0.0411947
    carbon content on a dry matter basis (reserved; not for manual entry)
  properties: water content 0, carbon content, non-fossil 0, wet mass 1 kg, dry mass 1 kg, water in wet mass 0 kg, carbon allocation 0.0411947 kg

## Inputs from technosphere
- pig iron: 0.166154 kg; = (0.14*216)/182; source Galloway, R.C. 2003; lognormal variance with pedigree 0.0406, pedigree (1,1,5,1,1)
  Calculation, according to the material contents of an individual cell. Table 1 in reference source.
  Positive electrode
  0.14 kg Fe/cell
  216 cells/battery (21kWh)
  182 kg total battery weight with battery management interface
  properties: carbon content, fossil 0.045, wet mass 1 kg, dry mass 1 kg
- sodium chloride, powder: 0.261099 kg; = (0.22*216)/182; source Galloway, R.C. 2003; lognormal variance with pedigree 0.0406, pedigree (1,1,5,1,1)
  Calculation, according to the material contents of an individual cell. Table 1 in reference source.
  Negative electrode (NaCl) and cathode electrolyte (NaAlCl4)
  0.22 kg NaCl/cell
  216 cells/battery (21kWh)
  182 kg total battery weight with battery management interface
  properties: dry mass 1 kg, wet mass 1 kg
- silicone product: 0.0412088 kg; = 7.5/182; source Galloway, R.C. 2003; lognormal variance with pedigree 0.0406, pedigree (1,1,5,1,1)
  Calculation, according to the material contents of the battery casing. Table 2 in reference source.
  SiO2 foam insulation
  7.5 kg insulation/battery
  182 kg total battery weight with battery management interface
  property dry mass 1 kg; name DM
  property carbon content, fossil 0.324324; name C_content_fossil
  property wet mass 1 kg; name WM
  property water in wet mass 0 kg; name WWM
  property water content 0; name water_content
  property carbon content, non-fossil 0; name C_content_non_fossil
  properties: heating value, net 9.83 MJ
- steel, chromium steel 18/8: 0.0989011 kg; = 18/182; source Galloway, R.C. 2003; lognormal variance with pedigree 0.0406, pedigree (1,1,5,1,1)
  Calculation, according to the material contents of the battery casing. Table 2 in reference source.
  External battery casing
  7.5 kg stainless steel/battery
  182 kg total battery weight with battery management interface
  properties: wet mass 1 kg, carbon content, fossil 0.0008, dry mass 1 kg
- polyethylene, high density, granulate: 0.021978 kg; = 4/182; source Galloway, R.C. 2003
  Calculation, according to the material contents of the battery casing. Table 2 in reference source.
  Miscellaneous material
  4kg miscellaneous material/battery
  182 kg total battery weight with battery management interface
  properties: wet mass 1 kg, carbon content, fossil 0.857143, dry mass 1 kg, heating value, net 42.47 MJ
- steel, low-alloyed: 0.0412088 kg; = 7.5/182; source Galloway, R.C. 2003; lognormal variance with pedigree 0.0406, pedigree (1,1,5,1,1)
  Calculation, according to the material contents of the battery casing. Table 2 in reference source.
  Cooling system
  7.5 kg battery cooling system/battery
  182 kg total battery weight with battery management interface
  properties: wet mass 1 kg, dry mass 1 kg, carbon content, fossil 0.005
- aluminium oxide, non-metallurgical: 0.166154 kg; = (0.14*216)/182; source Galloway, R.C. 2003; lognormal variance with pedigree 0.0406, pedigree (1,1,5,1,1)
  Calculation, for beta alumina, according to the material contents of an individual cell. Table 1 in reference source.
  Ceramic electrolyte (Al2O3) and cathode electrolyte (NaAlCl4).
  0.14 kg Al2O3/cell
  216 cells/battery (21kWh)
  182 kg total battery weight with battery management interface
  properties: dry mass 1 kg, wet mass 1 kg
- electricity, low voltage: 2.34396 kWh; = (((1/0.15)*1.69*36)+21)/182; source Galloway, R.C. 2003; lognormal variance with pedigree 0.0412, pedigree (2,1,5,1,1)
  Calculation, 36$ in energy costs per battery in 2003. Table 3 in reference source.
  $ to CHF exchange rate in 2003 of 1.69 CHF/$ http://en.wikipedia.org/wiki/Tables_of_historical_exchange_rates_to_the_United_States_dollar
  15 Swiss Rp./kWh http://www.strompreis.elcom.admin.ch/ShowCat.aspx?placeNumber=5266&OpID=8&Period=2012
  = 6.67 kWh/CHF
  = 11.27 kWh/$
  = 405 kWh/battery for production plus 21kWh for activating (first charge)
  = 426 kWh/battery
  Battery mass of 182kg including battery management system.
  = 2.34 kWh/kg battery
- helium: 5.5728e-5 kg; = (0.0365*0.0365*0.235)*0.178; source Manzoni, R. 2008; lognormal variance with pedigree 0.0426, pedigree (3,1,5,1,1)
  Calculation, cell dimensions: 36.5mm square and 235mm high http://cebinew.kicms.de/cebi/easyCMS/FileManager/Files/MES-DEA/Electric_Energy_storage.pdf.
  Density of helium 0.178g/L (0.178kg/m3) http://en.wikipedia.org/wiki/Helium
  Helium quantity calculated using the volume of the cell and only 1bar pressure in order to allow for the other cell contents.
  properties: wet mass 1 kg, dry mass 1 kg
- copper, cathode: 0.0356044 kg; = (0.03*216)/182; source Galloway, R.C. 2003; lognormal variance with pedigree 0.0406, pedigree (1,1,5,1,1)
  Calculation, according to the material contents of an individual cell. Table 1 in reference source.
  0.03kg copper/cell
  216 cells/battery (21kWh)
  182 kg total battery weight with battery management interface
  properties: dry mass 1 kg, wet mass 1 kg
- nickel, class 1: 0.178022 kg; = (0.15*216)/182; source Galloway, R.C. 2003; lognormal variance with pedigree 0.0406, pedigree (1,1,5,1,1)
  Calculation, according to the material contents of an individual cell. Table 1 in reference source.
  Positive electrode, sealing rings and outer cell casing
  0.15 kg Ni/cell
  216 cells/battery (21kWh)
  182 kg total battery weight with battery management interface
  properties: dry mass 1 kg, wet mass 1 kg
- electronics, for control units: 0.00549451 kg; = 1/182; source Manzoni, R. 2008; lognormal variance with pedigree 0.0426, pedigree (3,1,5,1,1)
  Estimation, battery management interface (BMI). See Figure on pg 5 in reference source.
  1 kg electronics/battery (estimate)
  216 cells/battery (21kWh)
  182 kg total battery weight with battery management interface
  properties: wet mass 1 kg, dry mass 1 kg, carbon content, fossil 0.337146, carbon content, non-fossil 0.00013442
- metal working, average for metal product manufacturing: 1 kg
  activityLink introduced to establish a direct link to the corresponding regional supply of this product

## Sampling procedure
Literature and communication with experts. Data taken from the only manufacturer of this product.

## Extrapolations
This dataset has been extrapolated from year 2012 to the year of the calculation (2021). The uncertainty has been adjusted accordingly.

## Review by Andrea Del Duce 2012-07-24
A dataset for the treatment of the used battery is required.
