# assembly of generator and motor, auxilliaries and energy use, for mini CHP plant

Dataset: EcoSpold 2, unit process
Geography: RoW
Time period: 1997-01-01 to 2021-12-31
Technology level: current
Classification: ISIC rev.4 ecoinvent: 2811:Manufacture of engines and turbines, except aircraft, vehicle and cycle eng
Classification: EcoSpold01Categories: natural gas/cogeneration
Tags: ConvertedDataset
Scenario: Business-as-Usual
System model: Allocation, cut-off by classification
Generated by: Thomas Heck
Published in: Heck, T. 2007
Database: ecoinvent
isCopyrightProtected: true
accessRestrictedTo: 1

## General comment
Inventory based on information from manufacturer (Ecopower 1997; Ecopower 2001).
[This dataset was already contained in the ecoinvent database version 2. It was not individually updated during the transfer to ecoinvent version 3. Life Cycle Impact Assessment results may still have changed, as they are affected by changes in the supply chain, i.e. in other datasets. This dataset was generated following the ecoinvent quality guidelines for version 2. It may have been subject to central changes described in the ecoinvent version 3 change report (http://www.ecoinvent.org/database/ecoinvent-version-3/reports-of-changes/), and the results of the central updates were reviewed extensively. The changes added e.g. consistent water flows and other information throughout the database. The documentation of this dataset can be found in the ecoinvent reports of version 2, which are still available via the ecoinvent website. The change report linked above covers all central changes that were made during the conversion process.]

## Included activities end
The module includes the most important materials used for production. It includes also the transport of these materials and the energy and water needed for production.

## Geography
Could be used for central European conditions.

## Technology
Specific manufacturer (Ecopower in Switzerland)

## Parameters
- fraction, process water, to air: 0.15 dimensionless; name fraction_PW_to_air; lognormal variance with pedigree 0.092025, pedigree (4,4,3,2,4)

## Reference product
- assembly of generator and motor, auxilliaries and energy use, for mini CHP plant: 1 unit; CPC 88761: Engines and turbine manufacturing services; By-product classification allocatable product
  EcoSpold01Location=CH
  production volume 3.96633 unit
    This is a placeholder value that does not reflect real-world production volumes. This dataset does not currently require a real-world production volume to work in the database framework, and no actual data were collected yet. This has no negative effect on the results of the ecoinvent database.
  property price 370 EUR2005
    EU27 I/O database-66 Machinery and equipment (5.71 EURO2003/kg dry soilds) in the 'EU & DK Input Output Database' (available in SimaPro);65 kg

## Inputs from technosphere
- stone wool: 5 kg; lognormal variance with pedigree 0.188, pedigree (4,5,5,5,1)
  Basic uncertainty:2
  EcoSpold01Location=CH
  properties: dry mass 1 kg, wet mass 1 kg, carbon content, fossil 0.015401
  note on carbon content, fossil: The chemical composition of the glass fibres used in the rock wool production is similar to the composition of naturally cooled volcano basalt and has a composition listed in Tab. 3.1 and 3.2 in ecoinvent v2.2 report 16, part XIV. Rock wool contains: a minimum of 96% mineral fibres,between 0.5 and 3.0 weight percent of phenolic resin depending on the specific product characteristics, and about 0.2 percent mineral oil (ecoinvent v2.2 report 16, part XIV). An average composition of 1.8% phenolic resin, 0.2% mineral oil, and 98% mineral fibres has been assumed and used to calculate C content of the rock wool
- electricity, medium voltage: 0 kWh; pedigree (1,1,1,1,1)
  EcoSpold01Location=UCTE
- wastewater from pig iron production: 0 m3; pedigree (1,1,1,1,1)
  EcoSpold01Location=CH
  rough estimate, uncertainty refers to amount of water only; not quantified here: composition of waste water unkown, therefore high uncertainty of applicability of modul.
  production volume 0 m3
    Calculated from the production volume of generator and motor, for mini CHP plant in proportion to the respective output amounts.
  properties: water content 2962.17, dry mass 0.337476 kg, wet mass 1000 kg, carbon content, fossil 1.2149e-5
  note on carbon content, fossil: TOC = 0.0000041 kg/m3 (Tab A.19, ecoinvent v2.2 report 13_I). TOC was considered as Total Carbon.
- heat, district or industrial, natural gas: 0 MJ; pedigree (1,1,1,1,1)
  EcoSpold01Location=RER
  properties: heating value, net 1 MJ
- reinforcing steel: 10 kg; lognormal variance with pedigree 0.188, pedigree (4,5,5,5,1)
  EcoSpold01Location=RER
  Basic uncertainty:2
  properties: carbon content, fossil 0.004, dry mass 1 kg, wet mass 1 kg
- glass fibre reinforced plastic, polyester resin, hand lay-up: 50 kg; lognormal variance with pedigree 0.188, pedigree (4,5,5,5,1)
  EcoSpold01Location=RER
  Basic uncertainty:2
  properties: carbon content, fossil 0.246639, wet mass 1 kg, dry mass 1 kg
  note on carbon content, fossil: C content was calculated as an addition of C content in the product components (60% glass fibre, 40% polyester resin)
- heat, district or industrial, other than natural gas: 0 MJ; pedigree (1,1,1,1,1)
  EcoSpold01Location=CH
  properties: heating value, net 1 MJ
- electricity, medium voltage: 0.0116973, 0.00224304, 0.0515038, 0.17052, 0.037656, 0.547673, 0.0771948, 0.251512 kWh (8 entries); lognormal variance with pedigree 0.1246, pedigree (3,3,5,5,4)
  EcoSpold01Location=UCTE
- wastewater from pig iron production: -0.00139757, -0.0106024 m3 (2 entries); lognormal variance with pedigree 0.342, pedigree (1,1,5,5,1)
  (same comment as for wastewater from pig iron production)
  production volume 0.047596 m3
- heat, district or industrial, natural gas: 0.592124, 14.1884, 38.4194 MJ (3 entries); lognormal variance with pedigree 0.1246, pedigree (3,3,5,5,4)
  EcoSpold01Location=RER
- heat, district or industrial, other than natural gas: 0.0210491, 1.27105, 51.9079 MJ (3 entries); lognormal variance with pedigree 0.1246, pedigree (3,3,5,5,4)
  EcoSpold01Location=CH

## Inputs from nature
- Water, unspecified natural origin [natural resource, in water]: 0.015 m3; name water_UNO_input; lognormal variance with pedigree 0.342, pedigree (1,1,5,5,1)
  rough estimate

## Emissions to nature
- Water [air, unspecified]: 0.00225 m3; name water_to_air_unspecified; lognormal variance with pedigree 0.0827, pedigree (2,2,5,5,1)
  Calculated value based on literature values and expert opinion. See comments in the parametres' comment field.
  property fraction, origin: salt water 0; name fraction_origin_salt_water
  property fraction, origin: unspecified 1; name fraction_origin_unspecified
  property fraction, origin: fresh water 0; name fraction_origin_fresh_water
- Water [water, unspecified]: 0.00075 m3; name water_to_water_unspecified; lognormal variance with pedigree 0.0827, pedigree (2,2,5,5,1)
  (same comment as for Water)
  property fraction, origin: salt water 0; name fraction_origin_salt_water_Ww
  property fraction, origin: fresh water 0; name fraction_origin_fresh_water_Ww
  property fraction, origin: unspecified 1; name fraction_origin_unspecified_Ww
  property dry mass 0 kg; name DM
  property carbon content, non-fossil 0; name C_content_non_fossil
  property carbon content, fossil 0; name C_content_fossil
  property water in wet mass 1000 kg; name WWM
  property wet mass 1000 kg; name WM

## Sampling procedure
Operator and manufacturer information

## Extrapolations
none This dataset has been copied from an original dataset covering the geography CH. The uncertainty has been adjusted accordingly.

## Review by Gerald Rebitzer (obsolete) 2003-08-27
had passed
