# treatment of residue from shredder fraction from manual dismantling, municipal waste incineration

Dataset: EcoSpold 2, unit process
Geography: CH
Time period: 1994-01-01 to 2021-12-31
Technology level: outdated
Classification: ISIC rev.4 ecoinvent: 3821:Treatment and disposal of non-hazardous waste
Classification: EcoSpold01Categories: waste management/municipal incineration
Tags: ConvertedDataset; Treatment
Scenario: Business-as-Usual
System model: Allocation, cut-off by classification
Generated by: Roland Hischier
Published in: Hischier R. 2007
Database: ecoinvent
isCopyrightProtected: true
accessRestrictedTo: 1

## General comment
Inventoried waste contains 1.9% rubber; 46.5% Plastics from electronic consumer goods; 46.5% Plastics from electronic industrial goods; 1.57% MSWI iron scrap; 0.35% Alu in MSW; 1.04% Glass; 0.35% wiring copper; 0.05% Pb in ASR inert; 0.01% silver; .
waste composition (wet, in ppm): upper heating value 34.31 MJ/kg; lower heating value 32.89 MJ/kg; H2O 8744.7; O 54864; H 70906; C 774350; S 408; N 12380; P 477.96; B n.a.; Cl 6321.2; Br 5119.4; F 232.7; I n.a.; Ag 100; As 6.981; Ba 164.75; Cd 140.3; Co 27.438; Cr 70.865; Cu 6686.3; Hg 0.7912; Mn 44.103; Mo 2.7924; Ni 482.82; Pb 643.68; Sb 4466.7; Se 1.824; Sn 199.47; V 4.6231; Zn 717.27; Be 0.43428; Sc n.a.; Sr 76.868; Ti 4167.2; Tl 0.34742; W n.a.; Si 6980.3; Fe 14269; Ca 3654; Al 5874; K 108.9; Mg n.a.; Na 800.35;
Share of carbon in waste that is biogenic 0%.
Share of iron in waste that is metallic/recyclable 89.7%.
Net energy produced in MSWI: 3.76MJ/kg waste electric energy and 7.57MJ/kg waste thermal energy
Allocation of energy production: no substitution or expansion. Total burden allocated to waste disposal function of MSWI.
One kg of this waste produces 0.06281 kg of slag and 0.0173 kg of residues, which are landfilled. Additional solidification with 0.006922 kg of cement.
[This dataset was already contained in the ecoinvent database version 2. It was not individually updated during the transfer to ecoinvent version 3. Life Cycle Impact Assessment results may still have changed, as they are affected by changes in the supply chain, i.e. in other datasets. This dataset was generated following the ecoinvent quality guidelines for version 2. It may have been subject to central changes described in the ecoinvent version 3 change report (http://www.ecoinvent.org/database/ecoinvent-version-3/reports-of-changes/), and the results of the central updates were reviewed extensively. The changes added e.g. consistent water flows and other information throughout the database. The documentation of this dataset can be found in the ecoinvent reports of version 2, which are still available via the ecoinvent website. The change report linked above covers all central changes that were made during the conversion process.]

## Included activities end
waste-specific air and water emisions from incineration, auxiliary material consumption for flue gas cleaning. Short-term emissions to river water and long-term emisisons to ground water from slag compartment (from bottom slag) and residual material landfill (from solidified fly ashes and scrubber slugde). Process energy demands for MSWI.

## Geography
Specific to the technology mix encountered in Switzerland in 2000. Well applicable to modern incineration practices in Europe, North America or Japan.

## Technology
replaced by newer incineration technology with fly ash extraction. Average Swiss MSWI plants in 2000 (grate incinerators) with electrostatic precipitator for fly ash (ESP), wet flue gas scrubber and 29.4% SNCR , 32.2% SCR-high dust , 24.6% SCR-low dust -DeNOx facilities and 13.8% without Denox (by burnt waste, according to Swiss average). Share of waste incinerated in plants with magnetic scrap separation from slag : 50%. Gross electric efficiency technology mix 12.997% and Gross thermal efficiency technology mix 25.57%

## Time period
Waste composition as given in literature reference, theoretical data or other source. Transfer coefficients for modern Swiss MSWI. Emission speciation based on early 90ies data.

## Reference product
- residue from shredder fraction from manual dismantling: -1 kg; By-product classification Waste; CPC 39: Wastes or scraps
  EcoSpold01Location=CH
  production volume 0 kg; name RP_PV_1
    outdated. Replaced by newer incineration technology with fly ash extraction.
  property price 0 EUR2005
    Waste products are assigned a price of zero as they are assumed to require further treatment.
  property carbon content, fossil 0.664925
    Tab 4.47, ecoinvent v2.2 report 18_V, for details in fraction composition. Carbon content in plastic was calculated using data in Tab A.2, ecoinvent v2.2 report 13_I. Others was also considered plastic, and calculated the same way (from pg 70, ecoinvent v2.2 report 18_V). Ferro was assumed to have a C content of 0.012 kg C/ kg (C content of steel, calculated out of emission factors published in Commission Decision of 18 July 2007 establishing guidelines for the monitoring and reporting of greenhouse gas emissions pursuant to Directive 2003/87/EC of the European Parliament and of the Council (notified under document number C(2007) 3416)). The other component of the fraction were considered to content no C.
  property carbon content 0.664925
    carbon content on a dry matter basis (reserved; not for manual entry)
  properties: heating value, net 0 MJ, water in wet mass 0 kg, wet mass 1 kg, dry mass 1 kg, carbon content, non-fossil 0, water content 0, carbon allocation 0.664925 kg

## Inputs from technosphere
- process-specific burdens, slag landfill: 0.062815 kg; lognormal variance with pedigree 0.08, pedigree (1,1,5,1,1)
  EcoSpold01Location=CH
  uncertainty is calculated from uncertainties in waste composition and transfer coefficients in incinerator;activityLink introduced to establish a direct link to the corresponding regional supply of this product
- chemical, inorganic: 2.1762e-5 kg; lognormal variance with pedigree 0.36, pedigree (1,1,5,1,1)
  Proxy for Polyelectrolyte. uncertainty calculated from uncertainty in average auxiliary material input, and the unertainty of the waste composition of this waste
  EcoSpold01Location=GLO
  properties: wet mass 1 kg, dry mass 1 kg, carbon content, fossil 0.003
  note on carbon content, fossil: This dataset is an unweighted average of 20 inorganic substances (listed in Tab 88.1, ecoinvent v2.2 report 8, part II), being part of the top100 chemicals included in this database. The C-content has also been calculated as an unweighted average of the C content of the substances composing this dataset.
- process-specific burdens, municipal waste incineration: 1 kg; lognormal variance with pedigree 0.04, pedigree (1,1,5,1,1)
  demands per kilogram waste. uncertainty is heeded in the module;activityLink introduced to establish a direct link to the corresponding regional supply of this product
  EcoSpold01Location=CH
- municipal waste incineration facility: 2.5e-10 unit; lognormal variance with pedigree 0.04, pedigree (1,1,5,1,1)
  EcoSpold01Location=CH
  demands per kilogram waste. uncertainty is heeded in the module
- heat, district or industrial, natural gas: 0.0548172 MJ; lognormal variance with pedigree 1.3, pedigree (1,1,5,1,1)
  EcoSpold01Location=RER
  uncertainty calculated from uncertainty in average DeNOx input, uncertainty in the share of thermal NOx, uncertainty of nitrogen content in average municipal waste and the unertainty in nitrogen content in *this* waste.
  properties: heating value, net 1 MJ
- hydrochloric acid, without water, in 30% solution state: 1.3057e-5 kg; lognormal variance with pedigree 0.36, pedigree (1,1,5,1,1)
  uncertainty calculated from uncertainty in average auxiliary material input, and the unertainty of the waste composition of this waste
  EcoSpold01Location=RER
  properties: dry mass 1 kg, wet mass 1 kg, heating value, net 3.32 MJ
- titanium dioxide: 1.7878e-5 kg; lognormal variance with pedigree 2.01, pedigree (1,1,5,1,1)
  (same comment as for heat, district or industrial, natural gas)
  properties: wet mass 1 kg, dry mass 1 kg
- waste cement, hydrated: -0.017305 kg; name BP_amount_1; lognormal variance with pedigree 0.12, pedigree (1,1,5,1,1)
  EcoSpold01Location=CH
  Hydrated cement for solidification of landfilled residual material. Uncertainty calculated from unertainty of the waste composition of this waste and transfer coefficients in the incinerator and of the solidification recipe.
  production volume 0 kg; = RP_PV_1* BP_amount_1
    Calculated from the production volume of residue from shredder fraction from manual dismantling in proportion to the respective output amounts.
  property price 0 EUR2005; name BP_amount_1_price_EUR2005
  properties: dry mass 1 kg, wet mass 1 kg
- process-specific burdens, residual material landfill: 0.017305 kg; lognormal variance with pedigree 0.11, pedigree (1,1,5,1,1)
  uncertainty is calculated from uncertainties in waste composition and transfer coefficients in incinerator;activityLink introduced to establish a direct link to the corresponding regional supply of this product
  EcoSpold01Location=CH
- quicklime, milled, packed: 0.0010974 kg; lognormal variance with pedigree 0.46, pedigree (1,1,5,1,1)
  EcoSpold01Location=CH
  uncertainty calculated from uncertainty in average auxiliary material input, and the unertainty of the waste composition of this waste
  properties: water content 0.010101, dry mass 0.99 kg, wet mass 1 kg
- iron (III) chloride, without water, in 40% solution state: 0.00053692 kg; lognormal variance with pedigree 0.32, pedigree (1,1,5,1,1)
  (same comment as for quicklime, milled, packed)
  properties: dry mass 1 kg, wet mass 1 kg
- cement, unspecified: 0.0069219 kg; lognormal variance with pedigree 0.12, pedigree (1,1,5,1,1)
  Cement for solidification of landfilled residual material. Uncertainty calculated from unertainty of the waste composition of this waste, of transfer coefficients in the incinerator and of the solidification recipe.
  EcoSpold01Location=CH
  properties: wet mass 1 kg, dry mass 1 kg
- sodium hydroxide, without water, in 50% solution state: 0.0063381 kg; lognormal variance with pedigree 0.44, pedigree (1,1,5,1,1)
  (same comment as for hydrochloric acid, without water, in 30% solution state)
  properties: wet mass 1 kg, heating value, net 3.03 MJ, dry mass 1 kg
- residual material landfill: 3.6051e-11 unit; lognormal variance with pedigree 0.11, pedigree (1,1,5,1,1)
  EcoSpold01Location=CH
  uncertainty is calculated from uncertainties in waste composition and transfer coefficients in incinerator
- slag landfill: 1.1167e-10 unit; lognormal variance with pedigree 0.08, pedigree (1,1,5,1,1)
  (same comment as for residual material landfill)
- ammonia, anhydrous, liquid: 0.00062456 kg; lognormal variance with pedigree 1.3, pedigree (1,1,5,1,1)
  uncertainty calculated from uncertainty in average DeNOx input, uncertainty in the share of thermal NOx, uncertainty of nitrogen content in average municipal waste and the unertainty in nitrogen content in *this* waste.
  EcoSpold01Location=CH
  properties: wet mass 1 kg, dry mass 1 kg
- chromium oxide, flakes: 3.6485e-7 kg; lognormal variance with pedigree 2.01, pedigree (1,1,5,1,1)
  EcoSpold01Location=RER
  Proxy for vanadium pentoxide V2O5 in SCR catalyst, uncertainty calculated from uncertainty in average DeNOx input, uncertainty in the share of thermal NOx, uncertainty of nitrogen content in average municipal waste and the unertainty in nitrogen content in *this* waste.
  properties: dry mass 1 kg, wet mass 1 kg
- chemical, organic: 0.00055953 kg; lognormal variance with pedigree 0.96, pedigree (1,1,5,1,1)
  EcoSpold01Location=GLO
  Proxy for TMT15. uncertainty calculated from uncertainty in average auxiliary material input, and the unertainty of the waste composition of this waste
  properties: wet mass 1 kg, dry mass 1 kg, carbon content, fossil 0.628, heating value, net 19.03 MJ
  note on carbon content, fossil: This dataset is an unweighted average of 20 organic substances (listed in Tab 88.1, ecoinvent v2.2 report 8, part II), being part of the top100 chemicals included in this database. The C-content has also been calculated as an unweighted average of the C content of the substances composing this dataset.

## Emissions to nature
- Antimony [air, urban air close to ground]: 1.7362e-11 kg; lognormal variance with pedigree 0.63, pedigree (1,1,5,1,1)
  uncertainty is calculated from uncertainties in waste composition and transfer coefficients in incinerator
- Vanadium, ion [water, ground-, long-term]: 5.0336e-7 kg; lognormal variance with pedigree 2.65, pedigree (1,1,5,1,1)
  Long-term emissions from landfilling of incineration residues. uncertainty is calculated from uncertainties in waste composition and transfer coefficients in incinerator and landfills.
- Tin, ion [water, ground-, long-term]: 0.00010544 kg; lognormal variance with pedigree 1.23, pedigree (1,1,5,1,1)
  (same comment as for Vanadium, ion)
- Iron [air, urban air close to ground]: 4.9036e-8 kg; lognormal variance with pedigree 0.43, pedigree (1,1,5,1,1)
  (same comment as for Antimony)
- Cobalt [air, urban air close to ground]: 8.7115e-13 kg; lognormal variance with pedigree 1.28, pedigree (1,1,5,1,1)
  (same comment as for Antimony)
- Arsenic [air, urban air close to ground]: 7.1207e-14 kg; lognormal variance with pedigree 1.47, pedigree (1,1,5,1,1)
  (same comment as for Antimony)
- Chloride [water, surface water]: 0.0061685 kg; lognormal variance with pedigree 0.41, pedigree (1,1,5,1,1)
  uncertainty is calculated from uncertainties in waste composition and transfer coefficients in incinerator and landfills
- Thallium [air, urban air close to ground]: 3.4742e-10 kg; lognormal variance with pedigree 1.77, pedigree (1,1,5,1,1)
  (same comment as for Antimony)
- Cobalt [water, surface water]: 4.6937e-9 kg; lognormal variance with pedigree 1.62, pedigree (1,1,5,1,1)
  (same comment as for Chloride)
- Arsenic, ion [water, surface water]: 3.1472e-6 kg; lognormal variance with pedigree 1.13, pedigree (1,1,5,1,1)
  (same comment as for Chloride)
- Lead [water, surface water]: 1.3067e-8 kg; lognormal variance with pedigree 1.56, pedigree (1,1,5,1,1)
  (same comment as for Chloride)
- Zinc, ion [water, ground-, long-term]: 1.4383e-5 kg; lognormal variance with pedigree 5.3, pedigree (1,1,5,1,1)
  (same comment as for Vanadium, ion)
- Silicon [water, surface water]: 7.4054e-7 kg; lognormal variance with pedigree 0.75, pedigree (1,1,5,1,1)
  (same comment as for Chloride)
- Phosphorus [air, urban air close to ground]: 4.654e-7 kg; lognormal variance with pedigree 0.81, pedigree (1,1,5,1,1)
  (same comment as for Antimony)
- Silicon [water, ground-, long-term]: 0.00027576 kg; lognormal variance with pedigree 5.75, pedigree (1,1,5,1,1)
  (same comment as for Vanadium, ion)
- BOD5, Biological Oxygen Demand [water, surface water]: 2.8978e-5 kg; lognormal variance with pedigree 0.16, pedigree (1,1,5,1,1)
  (same comment as for Chloride)
- Strontium [water, ground-, long-term]: 7.6767e-5 kg; lognormal variance with pedigree 1.04, pedigree (1,1,5,1,1)
  (same comment as for Vanadium, ion)
- Iron, ion [water, ground-, long-term]: 0.0040519 kg; lognormal variance with pedigree 0.5, pedigree (1,1,5,1,1)
  (same comment as for Vanadium, ion)
- Cyanide [air, urban air close to ground]: 1.1142e-5 kg; lognormal variance with pedigree 1.41, pedigree (1,1,5,1,1)
  uncertainty calculated from uncertainty in average N-emissions, uncertainty in the share of thermal NOx, uncertainty of nitrogen content in average municipal waste and the unertainty in nitrogen content in *this* waste.
- Titanium [air, urban air close to ground]: 4.1672e-6 kg; lognormal variance with pedigree 0.53, pedigree (1,1,5,1,1)
  (same comment as for Antimony)
- Hydrogen chloride [air, urban air close to ground]: 6.9843e-8 kg; lognormal variance with pedigree 0.51, pedigree (1,1,5,1,1)
  (same comment as for Antimony)
- Selenium [water, ground-, long-term]: 1.2264e-6 kg; lognormal variance with pedigree 1.04, pedigree (1,1,5,1,1)
  (same comment as for Vanadium, ion)
- Nitrate [water, ground-, long-term]: 0.00044472 kg; lognormal variance with pedigree 0.39, pedigree (1,1,5,1,1)
  (same comment as for Vanadium, ion)
- DOC, Dissolved Organic Carbon [water, ground-, long-term]: 0.0075615 kg; lognormal variance with pedigree 0.05, pedigree (1,1,5,1,1)
  (same comment as for Vanadium, ion)
- Beryllium [air, urban air close to ground]: 4.3428e-10 kg; lognormal variance with pedigree 1.74, pedigree (1,1,5,1,1)
  (same comment as for Antimony)
- Zinc, ion [water, surface water]: 1.3136e-7 kg; lognormal variance with pedigree 0.67, pedigree (1,1,5,1,1)
  (same comment as for Chloride)
- Strontium [water, surface water]: 4.8398e-8 kg; lognormal variance with pedigree 1.75, pedigree (1,1,5,1,1)
  (same comment as for Chloride)
- Chloride [water, ground-, long-term]: 0.00015261 kg; lognormal variance with pedigree 0.23, pedigree (1,1,5,1,1)
  (same comment as for Vanadium, ion)
- Tin, ion [water, surface water]: 7.1788e-9 kg; lognormal variance with pedigree 1.09, pedigree (1,1,5,1,1)
  (same comment as for Chloride)
- Calcium, ion [water, ground-, long-term]: 0.0032748 kg; lognormal variance with pedigree 0.52, pedigree (1,1,5,1,1)
  (same comment as for Vanadium, ion)
- Thallium [water, ground-, long-term]: 2.0273e-7 kg; lognormal variance with pedigree 1.32, pedigree (1,1,5,1,1)
  (same comment as for Vanadium, ion)
- Sodium, ion [water, surface water]: 0.0001099 kg; lognormal variance with pedigree 0.67, pedigree (1,1,5,1,1)
  (same comment as for Chloride)
- Mercury [water, surface water]: 8.461e-9 kg; lognormal variance with pedigree 1.61, pedigree (1,1,5,1,1)
  (same comment as for Chloride)
- COD, Chemical Oxygen Demand [water, surface water]: 5.1755e-5 kg; lognormal variance with pedigree 0.28, pedigree (1,1,5,1,1)
  (same comment as for Chloride)
- Lead [water, ground-, long-term]: 0.00051623 kg; lognormal variance with pedigree 1.58, pedigree (1,1,5,1,1)
  (same comment as for Vanadium, ion)
- Nitrate [water, surface water]: 0.00015835 kg; lognormal variance with pedigree 0.28, pedigree (1,1,5,1,1)
  (same comment as for Chloride)
- Copper, ion [water, surface water]: 2.4965e-7 kg; lognormal variance with pedigree 1.33, pedigree (1,1,5,1,1)
  (same comment as for Chloride)
- Carbon dioxide, fossil [air, urban air close to ground]: 2.8077 kg; lognormal variance with pedigree 0.04, pedigree (1,1,5,1,1)
  (same comment as for Antimony)
- COD, Chemical Oxygen Demand [water, ground-, long-term]: 0.019109 kg; lognormal variance with pedigree 0.05, pedigree (1,1,5,1,1)
  (same comment as for Vanadium, ion)
- Chromium VI [water, surface water]: 1.5928e-6 kg; lognormal variance with pedigree 1, pedigree (1,1,5,1,1)
  (same comment as for Chloride)
- DOC, Dissolved Organic Carbon [water, surface water]: 2.1228e-5 kg; lognormal variance with pedigree 0.27, pedigree (1,1,5,1,1)
  (same comment as for Chloride)
- Sulfate [water, surface water]: 0.00019558 kg; lognormal variance with pedigree 0.41, pedigree (1,1,5,1,1)
  (same comment as for Chloride)
- Vanadium [air, urban air close to ground]: 6.981e-11 kg; lognormal variance with pedigree 1.46, pedigree (1,1,5,1,1)
  (same comment as for Antimony)
- BOD5, Biological Oxygen Demand [water, ground-, long-term]: 0.0062505 kg; lognormal variance with pedigree 0.05, pedigree (1,1,5,1,1)
  (same comment as for Vanadium, ion)
- Cadmium [air, urban air close to ground]: 7.7226e-9 kg; lognormal variance with pedigree 1, pedigree (1,1,5,1,1)
  (same comment as for Antimony)
- Potassium, ion [water, surface water]: 1.8885e-5 kg; lognormal variance with pedigree 0.62, pedigree (1,1,5,1,1)
  (same comment as for Chloride)
- Copper, ion [water, ground-, long-term]: 0.0061163 kg; lognormal variance with pedigree 0.45, pedigree (1,1,5,1,1)
  (same comment as for Vanadium, ion)
- Aluminium [air, urban air close to ground]: 3.4847e-6 kg; lognormal variance with pedigree 0.49, pedigree (1,1,5,1,1)
  (same comment as for Antimony)
- Silver, ion [water, ground-, long-term]: 9.9997e-5 kg; lognormal variance with pedigree 1, pedigree (1,1,5,1,1)
  (same comment as for Vanadium, ion)
- Beryllium [water, surface water]: 2.6987e-10 kg; lognormal variance with pedigree 1.96, pedigree (1,1,5,1,1)
  (same comment as for Chloride)
- Nitrogen oxides [air, urban air close to ground]: 0.00039387 kg; lognormal variance with pedigree 1.41, pedigree (1,1,5,1,1)
  (same comment as for Cyanide)
- Bromine [water, ground-, long-term]: 0.00089521 kg; lognormal variance with pedigree 0.5, pedigree (1,1,5,1,1)
  (same comment as for Vanadium, ion)
- Chromium [air, urban air close to ground]: 3.6133e-12 kg; lognormal variance with pedigree 1.14, pedigree (1,1,5,1,1)
  (same comment as for Antimony)
- Silicon [air, urban air close to ground]: 6.425e-6 kg; lognormal variance with pedigree 0.47, pedigree (1,1,5,1,1)
  (same comment as for Antimony)
- Zinc [air, urban air close to ground]: 1.1664e-8 kg; lognormal variance with pedigree 0.79, pedigree (1,1,5,1,1)
  (same comment as for Antimony)
- Selenium [water, surface water]: 5.9408e-7 kg; lognormal variance with pedigree 1.22, pedigree (1,1,5,1,1)
  (same comment as for Chloride)
- Manganese [air, urban air close to ground]: 3.4971e-14 kg; lognormal variance with pedigree 1.25, pedigree (1,1,5,1,1)
  (same comment as for Antimony)
- Calcium [air, urban air close to ground]: 4.8288e-6 kg; lognormal variance with pedigree 0.55, pedigree (1,1,5,1,1)
  (same comment as for Antimony)
- Sodium [air, urban air close to ground]: 1.2217e-6 kg; lognormal variance with pedigree 0.74, pedigree (1,1,5,1,1)
  (same comment as for Antimony)
- Strontium [air, urban air close to ground]: 7.6868e-9 kg; lognormal variance with pedigree 1.07, pedigree (1,1,5,1,1)
  (same comment as for Antimony)
- Cadmium, ion [water, surface water]: 6.363e-8 kg; lognormal variance with pedigree 0.93, pedigree (1,1,5,1,1)
  (same comment as for Chloride)
- Chromium, ion [water, surface water]: 1.5575e-7 kg; lognormal variance with pedigree 1.06, pedigree (1,1,5,1,1)
  (same comment as for Chloride)
- Titanium, ion [water, surface water]: 2.0084e-8 kg; lognormal variance with pedigree 1.87, pedigree (1,1,5,1,1)
  (same comment as for Chloride)
- Molybdenum [water, surface water]: 4.7693e-7 kg; lognormal variance with pedigree 0.97, pedigree (1,1,5,1,1)
  (same comment as for Chloride)
- Cobalt [water, ground-, long-term]: 2.4023e-5 kg; lognormal variance with pedigree 1.12, pedigree (1,1,5,1,1)
  (same comment as for Vanadium, ion)
- Methane, fossil [air, urban air close to ground]: 6.3821e-6 kg; lognormal variance with pedigree 0.091225, pedigree (2,3,5,2,1)
  Confidential data from 5 plants in Switzerland and Germany
  Uncertainty: & basic uncertainty of 1.5; confidential data from 5 plants in Switzerland and Germany
- Manganese [water, surface water]: 2.2879e-9 kg; lognormal variance with pedigree 2.11, pedigree (1,1,5,1,1)
  (same comment as for Chloride)
- Manganese [water, ground-, long-term]: 4.3209e-5 kg; lognormal variance with pedigree 1.11, pedigree (1,1,5,1,1)
  (same comment as for Vanadium, ion)
- Calcium, ion [water, surface water]: 1.4255e-5 kg; lognormal variance with pedigree 0.99, pedigree (1,1,5,1,1)
  (same comment as for Chloride)
- Bromine [water, surface water]: 0.0042191 kg; lognormal variance with pedigree 0.39, pedigree (1,1,5,1,1)
  (same comment as for Chloride)
- Beryllium [water, ground-, long-term]: 3.4975e-7 kg; lognormal variance with pedigree 1.49, pedigree (1,1,5,1,1)
  (same comment as for Vanadium, ion)
- Sulfur dioxide [air, urban air close to ground]: 1.6873e-6 kg; lognormal variance with pedigree 0.83, pedigree (1,1,5,1,1)
  (same comment as for Antimony)
- Mercury [water, ground-, long-term]: 4.1165e-8 kg; lognormal variance with pedigree 3.41, pedigree (1,1,5,1,1)
  (same comment as for Vanadium, ion)
- Barium [air, urban air close to ground]: 1.6475e-7 kg; lognormal variance with pedigree 0.95, pedigree (1,1,5,1,1)
  (same comment as for Antimony)
- Molybdenum [air, urban air close to ground]: 5.5848e-9 kg; lognormal variance with pedigree 1.49, pedigree (1,1,5,1,1)
  (same comment as for Antimony)
- Nickel, ion [water, ground-, long-term]: 0.00045309 kg; lognormal variance with pedigree 0.76, pedigree (1,1,5,1,1)
  (same comment as for Vanadium, ion)
- Nickel [air, urban air close to ground]: 2.0126e-11 kg; lognormal variance with pedigree 0.89, pedigree (1,1,5,1,1)
  (same comment as for Antimony)
- Fluoride [water, surface water]: 1.7888e-5 kg; lognormal variance with pedigree 0.62, pedigree (1,1,5,1,1)
  (same comment as for Chloride)
- Carbon monoxide, fossil [air, urban air close to ground]: 0.0002229 kg; lognormal variance with pedigree 0.690625, pedigree (1,3,5,2,1)
  Literature data from switzerland and germany adapted to plant age distribution in switzerland
  Uncertainty: & basic uncertainty of 5; literature data from switzerland and germany adapted to plant age distribution in switzerland
- Chromium VI [water, ground-, long-term]: 5.317e-6 kg; lognormal variance with pedigree 1.9, pedigree (1,1,5,1,1)
  (same comment as for Vanadium, ion)
- Thallium [water, surface water]: 2.1284e-10 kg; lognormal variance with pedigree 1.92, pedigree (1,1,5,1,1)
  (same comment as for Chloride)
- Antimony [water, ground-, long-term]: 0.0028531 kg; lognormal variance with pedigree 0.4, pedigree (1,1,5,1,1)
  (same comment as for Vanadium, ion)
- Fluoride [water, ground-, long-term]: 0.00020758 kg; lognormal variance with pedigree 0.58, pedigree (1,1,5,1,1)
  (same comment as for Vanadium, ion)
- Copper [air, urban air close to ground]: 2.1947e-8 kg; lognormal variance with pedigree 0.51, pedigree (1,1,5,1,1)
  (same comment as for Antimony)
- Molybdenum [water, ground-, long-term]: 2.3099e-6 kg; lognormal variance with pedigree 1.48, pedigree (1,1,5,1,1)
  (same comment as for Vanadium, ion)
- Silver, ion [water, surface water]: 3.4719e-9 kg; lognormal variance with pedigree 2.1, pedigree (1,1,5,1,1)
  (same comment as for Chloride)
- Aluminium [water, ground-, long-term]: 0.0046269 kg; lognormal variance with pedigree 0.47, pedigree (1,1,5,1,1)
  (same comment as for Vanadium, ion)
- Aluminium [water, surface water]: 2.3348e-7 kg; lognormal variance with pedigree 0.88, pedigree (1,1,5,1,1)
  (same comment as for Chloride)
- Mercury [air, urban air close to ground]: 2.7326e-14 kg; lognormal variance with pedigree 1.75, pedigree (1,1,5,1,1)
  (same comment as for Antimony)
- Hydrogen fluoride [air, urban air close to ground]: 1.2247e-7 kg; lognormal variance with pedigree 0.91, pedigree (1,1,5,1,1)
  (same comment as for Antimony)
- Dinitrogen monoxide [air, urban air close to ground]: 5.2277e-5 kg; lognormal variance with pedigree 1.41, pedigree (1,1,5,1,1)
  (same comment as for Cyanide)
- Iron, ion [water, surface water]: 5.5675e-7 kg; lognormal variance with pedigree 0.4, pedigree (1,1,5,1,1)
  (same comment as for Chloride)
- Tin [air, urban air close to ground]: 2.5065e-7 kg; lognormal variance with pedigree 0.93, pedigree (1,1,5,1,1)
  (same comment as for Antimony)
- Potassium [air, urban air close to ground]: 3.2833e-7 kg; lognormal variance with pedigree 1, pedigree (1,1,5,1,1)
  (same comment as for Antimony)
- Cadmium, ion [water, ground-, long-term]: 1.4647e-6 kg; lognormal variance with pedigree 6.8, pedigree (1,1,5,1,1)
  (same comment as for Vanadium, ion)
- Selenium [air, urban air close to ground]: 9.173e-15 kg; lognormal variance with pedigree 1.65, pedigree (1,1,5,1,1)
  (same comment as for Antimony)
- Nickel, ion [water, surface water]: 3.0287e-7 kg; lognormal variance with pedigree 1.38, pedigree (1,1,5,1,1)
  (same comment as for Chloride)
- TOC, Total Organic Carbon [water, surface water]: 2.1228e-5 kg; lognormal variance with pedigree 0.27, pedigree (1,1,5,1,1)
  (same comment as for Chloride)
- Barium [water, ground-, long-term]: 0.00014627 kg; lognormal variance with pedigree 0.98, pedigree (1,1,5,1,1)
  (same comment as for Vanadium, ion)
- Vanadium, ion [water, surface water]: 2.2123e-9 kg; lognormal variance with pedigree 2.04, pedigree (1,1,5,1,1)
  (same comment as for Chloride)
- Phosphate [water, surface water]: 9.1843e-8 kg; lognormal variance with pedigree 1.11, pedigree (1,1,5,1,1)
  (same comment as for Chloride)
- Sulfate [water, ground-, long-term]: 0.0010259 kg; lognormal variance with pedigree 0.5, pedigree (1,1,5,1,1)
  (same comment as for Vanadium, ion)
- Bromine [air, urban air close to ground]: 1.5358e-5 kg; lognormal variance with pedigree 0.51, pedigree (1,1,5,1,1)
  (same comment as for Antimony)
- Ammonia [air, urban air close to ground]: 9.8092e-6 kg; lognormal variance with pedigree 1.41, pedigree (1,1,5,1,1)
  (same comment as for Cyanide)
- Arsenic, ion [water, ground-, long-term]: 3.8338e-6 kg; lognormal variance with pedigree 1.36, pedigree (1,1,5,1,1)
  (same comment as for Vanadium, ion)
- Lead [air, urban air close to ground]: 5.0937e-9 kg; lognormal variance with pedigree 0.81, pedigree (1,1,5,1,1)
  (same comment as for Antimony)
- Potassium, ion [water, ground-, long-term]: 8.9691e-5 kg; lognormal variance with pedigree 0.7, pedigree (1,1,5,1,1)
  (same comment as for Vanadium, ion)
- Phosphate [water, ground-, long-term]: 5.5014e-5 kg; lognormal variance with pedigree 5.02, pedigree (1,1,5,1,1)
  (same comment as for Vanadium, ion)
- Antimony [water, surface water]: 0.0015492 kg; lognormal variance with pedigree 0.43, pedigree (1,1,5,1,1)
  (same comment as for Chloride)
- Titanium, ion [water, ground-, long-term]: 0.0012486 kg; lognormal variance with pedigree 0.88, pedigree (1,1,5,1,1)
  (same comment as for Vanadium, ion)
- Barium [water, surface water]: 2.2654e-8 kg; lognormal variance with pedigree 1.81, pedigree (1,1,5,1,1)
  (same comment as for Chloride)
- Sodium, ion [water, ground-, long-term]: 0.00068923 kg; lognormal variance with pedigree 0.69, pedigree (1,1,5,1,1)
  (same comment as for Vanadium, ion)
- TOC, Total Organic Carbon [water, ground-, long-term]: 0.0075615 kg; lognormal variance with pedigree 0.05, pedigree (1,1,5,1,1)
  (same comment as for Vanadium, ion)

## Sampling procedure
waste-specific calculation based on literature data

## Extrapolations
This dataset has been extrapolated from year 2000 to the year of the calculation (2021). The uncertainty has been adjusted accordingly.

## Review by Jürgen Sutter 2007-08-31
passed.
