# cement production, pozzolana and fly ash 36-55%

Dataset: EcoSpold 2, unit process
Geography: RoW
Time period: 2014-01-01 to 2021-12-31
Technology level: current
Classification: ISIC rev.4 ecoinvent: 2394:Manufacture of cement, lime and plaster
Synonyms: Portland cement with additions; type IP
Tags: combined production
Scenario: Business-as-Usual
System model: Allocation, cut-off by classification
Share of production covered: 67 %
Generated by: Simon Gmünder
Published in: Silva, F. B. 2017
Database: ecoinvent
isCopyrightProtected: true
accessRestrictedTo: 1

## General comment
The dataset describes the production of cement type IP according to NTP 334.009 / ASTM C150 for Portland cements.
This dataset is a copy of the corresponding PE dataset.
The weight composition of the cement is: 60% clinker, 2.4% gypsum and 37.6% pozzolana.
The cement density is 3g/ml and the resitance is 35MPa according to the NTP 334.090 standard (product description of cement IP of UNACEM).

## Included activities start
This activity starts with the reception of raw materials.

## Included activities end
This activity ends with the cement produced in the cement mill. Packaging is not included and no production waste is assumed.

## Geography
This dataset is a copy of the corresponding PE dataset. Uncertainty has been adjusted accordingly.

## Technology
This dataset is a copy of the corresponding PE dataset. Technology is considered valid worldwide.

## Time period
The production volume of 2016 is considered. Data from sustainability reports of 2014 to 2017 is used.

## Reference product
- hard coal ash: 0 kg; name flyash; By-product classification Waste; CPC 39: Wastes or scraps
  Calculated value. Calculated based on the production volume, with comment: Production volume set equal to the sum of the production volume of the respective dataset for Europe without Switzerland and Austria and the dataset for Switzerland to avoid the creation of the Rest of the World.
  production volume 0 kg; name flyash_PV
    Value has been set to zero because it was not significant and below 0.05% of the production volume of this product in the GLO dataset.
  property price 0 EUR2005; name flyash_price_EUR2005
    Waste products are assigned a price of zero as they are assumed to require further treatment.
  property carbon content 0
    carbon content on a dry matter basis (reserved; not for manual entry)
  properties: dry mass 1 kg, wet mass 1 kg, water content 0, carbon content, non-fossil 0, carbon content, fossil 0, water in wet mass 0 kg, carbon allocation 0 kg
- cement, pozzolana and fly ash 36-55%: 1 kg; name cement; By-product classification allocatable product; CPC 37440: Portland cement, aluminous cement, slag cement and similar hydraulic cements, except in the form of clinkers
  Refernce product with a density between 3-3.15 g/ml.
  production volume 5.89792e9 kg; name cement_PV
    The global production volume was calculated as follows:
    1) The total production volume of each country was calculated
    2) The production volume was scaled based construction output (*)
    3) The average of the results was assumed to be the GLO PV
    4) The share of each different technology per country was calculated
    5) The weighted average of the shares for each country was used to split the GLO PV into different technologies
    (*)
    Construction output assumed per country
    Country Share
    CO 1%
    PE 0%
    BR 2%
    ZA 1%
    IN 10%
    US 8%
    CA-QC 0%
    CH 0%
    Europe without Switzerland 20%
    Source:
    OECD. 2018. Input-Output Tables. http://www.oecd.org/trade/input-outputtables.htm.
    United Nations Statistics Division. 2019. UN data. A world of information. http://data.un.org/.
    Timmer, M.P., E. Dietzenbacher, B. Los, R. Stehrer, and G.J. de Vries. 2015. An Illustrated User Guide to the World Input-Output Database: the Case of Global Automotive Production. Review of International Economics 23(3): 575-605. http://doi.wiley.com/10.1111/roie.12178.
    The data was adjusted based on PPP, data from:
    The World Bank. 2019. World Bank Open Data. https://data.worldbank.org/
  property price 0.0615 EUR2005; name cement_price_EUR2005
    2005 import and export prices (total trades (USD) divided by total weight (kg) in China, India, USA, Japan, Russia and Europe, major producers and consumers (http://www.cementchina.net/freport/showfre.asp?id=749) from UN Commodity Trade Statistics Database (http://data.un.org/Explorer.aspxDatabase [Accessed 2 July 2010]). Commodity: Cement (portland, aluminious, slag or hydraulic)
  property carbon content 0
    carbon content on a dry matter basis (reserved; not for manual entry)
  properties: carbon content, non-fossil 0, carbon content, fossil 0, water content 0, water in wet mass 0 kg, dry mass 1 kg, wet mass 1 kg, carbon allocation 0 kg

## By-products
- inert filler: 0 kg; name inert_filler; = ABS(flyash)*0; CPC 37410: Plasters; By-product classification allocatable product
  In accordance with the ecoinvent centre, the link between waste treatment and cement production shall not be established here. Therefore the inert filler value is set to zero (cut-off approach)
  production volume 0 kg; = cement_PV* inert_filler/abs( cement)
    Amount relative to produced amount of reference product
  property carbon content, fossil 0; name inert_filler_C_content_fossil
  property water in wet mass 0 kg; name inert_filler_WWM
  property dry mass 1 kg; name inert_filler_DM
  property price 0.004 EUR2005; name inert_filler_price_EUR2005
    Temporary price data. Calculated as 90% of purchasers price based on: 2004 market prices are estimated to be equal to USA prices, which are given according to http://minerals.usgs.gov/minerals/pubs/commodity/sand_&_gravel_construction/myb1-2007-sandc.xls, table 1, downloaded 21 April 2009. Same price for gravel and sand.
  property wet mass 1 kg; name inert_filler_WM
  property carbon content, non-fossil 0; name inert_filler_C_content_non_fossil
  property water content 0; name inert_filler_water_content
  property carbon content 0
    carbon content on a dry matter basis (reserved; not for manual entry)
  properties: carbon allocation 0 kg

## Inputs from technosphere
- electricity, medium voltage: 0 kWh; name electricity; pedigree (1,1,1,1,1)
  Literature value. the electricity considered for cement production is 37kWh per ton of cement, which is aligned with the current ecoinvent datasets.
  Source: Boesch & Hellweg 2010, 2010, Boesch, M.E., Hellweg, S., Identifying Improvement Potentials in Cement Production with Life Cycle Assessment, Environmental Science & Technology, 44, 23, 9143-9149, 1 - Article, Supporting information is available via http://pubs.acs.org (accessed on october 15th 2017)
  Uncertainty: Variance of log-transformed data was taken from ecoinvent report no 1, table 10.3. Value represents demand of products, electricity etc. for input/output group c.
- steel, low-alloyed: 0.00011 kg; name steel; = 0.00011*cement; source Kellenberger D. 2007; lognormal variance with pedigree 0.0146, pedigree (3,5,3,5,1)
  Literature value. The value of Global datastet (cement production, alternative constituents 21-35%) has been used.
  Source: 2007, Kellenberger D., Althaus H.-J., Jungbluth N., Künniger T., Life Cycle Inventories of Building Products, Final report ecoinvent data v2.0, 7, Dübendorf, CH, Swiss Centre for LCI, Empa - TSL, 3 - SeparatePublication, CD-ROM (Accessed on october 15th 2017)
  Uncertainty: Variance of log-transformed data was taken from ecoinvent report no 1, table 10.3. Value represents demand of products, electricity etc. for input/output group c.
  properties: dry mass 1 kg, carbon content, fossil 0.005, wet mass 1 kg
- ethylene glycol: 0.00031 kg; = 0.00031*cement; source Kellenberger D. 2007; lognormal variance with pedigree 0.0132, pedigree (3,3,4,5,1)
  Literature value. Ancillary product for grinding. As no data from Colombian producer was founded, the value of Global datastet (cement production, alternative constituents 21-35%) has been used.
  Source: 2007, Kellenberger D., Althaus H.-J., Jungbluth N., Künniger T., Life Cycle Inventories of Building Products, Final report ecoinvent data v2.0, 7, Dübendorf, CH, Swiss Centre for LCI, Empa - TSL, 3 - SeparatePublication, CD-ROM (Accessed on october 15th 2017)
  Uncertainty: Variance of log-transformed data was taken from ecoinvent report no 1, table 10.3. Value represents demand of products, electricity etc. for input/output group c.
  properties: dry mass 1 kg, carbon content, fossil 0.387097, wet mass 1 kg, heating value, net 23.44 MJ
- clinker: 0 kg; source Nicholas Myers 2017; pedigree (1,1,1,1,1)
  Estimated value. The most sold cement of Yura is TIPO IP according to NTP 334.090 / ASTM C595. The blending is 40% of highly reactive pozzolanas (Ing. Guerra, 2017)
  Uncertainty: Variance of log-transformed data was taken from ecoinvent report no 1, table 10.3. Value represents demand of products, electricity etc. for input/output group c.
  properties: wet mass 1 kg, dry mass 1 kg
- cement factory: 5.36e-11 unit; = 0.0000000000536*cement; lognormal variance with pedigree 0.0146, pedigree (3,5,3,5,1)
  Literature Value. From the global dataset " alternative constituents 21-35%" (retrieved 2018/01/04)
  Uncertainty: Variance of log-transformed data was taken from ecoinvent report no 1, table 10.3. Value represents demand of products, electricity etc. for input/output group c.
- gypsum, mineral: 0 kg; name gypsum; source Manuel Lascarro 2017; pedigree (1,1,1,1,1)
  Literature Value. 4% of gypsum per clinker mass (2.4% of total weight).
  Uncertainty: Variance of log-transformed data was taken from ecoinvent report no 1, table 10.3. Value represents demand of products, electricity etc. for input/output group c.
  properties: wet mass 1 kg, dry mass 1 kg
- clay: 0.376 kg; = 0.376*cement; lognormal variance with pedigree 0.0146, pedigree (3,5,3,5,1)
  Literature value. Approximation for Pozzolana.
  properties: water content 0.0362694, wet mass 1 kg, dry mass 0.965 kg
- electricity, medium voltage: 3.90037e-5, 0.000276889, 0.000467719, 1.8748e-5, 0.000148498, 0.000145278, 2.29984e-5, 3.81208e-5, 1.46642e-6, 3.1663e-5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 kWh (28 entries); lognormal variance with pedigree 0.0132, pedigree (3,3,4,5,1)
  (same comment as for electricity, medium voltage)
- clinker: 0.0297003, 0.00688912, 0.131779, 0.00883158, 0.4228 kg (5 entries); source Nicholas Myers 2017; lognormal variance with pedigree 0.0072, pedigree (3,3,3,5,1)
  (same comment as for clinker)
- gypsum, mineral: 0.0195983, 0.00440171 kg (2 entries); source Manuel Lascarro 2017; lognormal variance with pedigree 0.0132, pedigree (3,3,4,5,1)
  (same comment as for gypsum, mineral)

## Sampling procedure
The data is compiled based on different data sources, including sustainability reports, literature values and expert judgements. Most data is derived from sustainability reports of two principal cement producers of Peru (Pacasmayo and UNACEM). The data is checked, completed and validated by local experts. In total, it is estimated that the data considered is representative for 67% of cement production in Peru (market share of the three main clinker producers).
Unit flows were calculated by dividing the amounts of inputs and outputs by the total clinker production in mass.
The amount of the exchanges were calculated considering the arithmetic [weighted] average of the sample. No conversion to the geometric mean of the lognormal distribution was done, for consistency reasons with other Ecoinvent datasets.

## Extrapolations
This dataset is a copy of the corresponding PE dataset. The life cycle inventory model is based on the PCR for cement and concrete (Environdec, 2010), as well as on the LCA core model of the WBCSD-CSI EPD tool (Dauriat et al., 2014).

Dauriat, A., Porté, C., Delerce, C., Guignard, C., & Adams, A. (2014). WBCSD CSI tool for EPDs of concrete and cement: LCA core model and database report.

Environdec. (2010). Product category rules of UN CPC 3744 Cement.
