# concentrated solar power plant construction, solar thermal parabolic trough, 50 MW

Dataset: EcoSpold 2, unit process
Geography: RoW
Time period: 2010-01-01 to 2021-01-01
Technology level: current
Classification: ISIC rev.4 ecoinvent: 4220:Construction of utility projects
Tags: CSP; Concentrated Solar Power
Scenario: Business-as-Usual
System model: Allocation, cut-off by classification
Generated by: Karin Treyer
Published in: Telsnig, Thomas 2015
Database: ecoinvent
isCopyrightProtected: true
accessRestrictedTo: 1

## General comment
This activity represents theconstruction of a 50MW CSP parabolic trough power plant in Upington, South Africa ready for electricity production by combination of necessary components and surrounding preparation. The construction of the solar power plant requires four different units in order to produce electricity. The four key units are a collector field area, thermal storage unit, heat transport fluid system and a power block unit. Further, site preparation activities are also included in the dataset (e.g. clearing shrubs, construction of roads, fences, providing water connectivity).
This dataset is entirely based on the detailed life cycle inventory as presented in the dissertation report by
Telsnig, Thomas. 2015. Standortabhängige Analyse und Bewertung solarthermischer Kraftwerke am Beispiel Südafrikas. Forschungsbericht. Band 123. ISSN 0938-1228. Institut für Energiewirtschaft und Rationelle Energieanwendung, Universität Stuttgart, Germany.

## Included activities start
The activity starts with the preparation of the site (land use, access roads, buildings, water supply, clearing shrubs, construction of roads, fences, etc.)

## Included activities end
The activity ends when all the main units are constructed and assembled for running the power plant.

## Geography
This dataset has been extrapolated from a dataset modelled for the location Upington, South Africa. Uncertainty has not been adjusted as it is assumed that the modelled 50 MW parabolic trough power plant would be very similar in other parts of the world.

## Reference product
- concentrated solar power plant, solar thermal parabolic trough, 50 MW: 1 unit; name RP_amount_1; By-product classification allocatable product; CPC 54262: General construction services of power plants; pedigree (1,1,1,1,1)
  Reference product unit for construction of a concentrated solar plant.
  production volume 7 unit; name RP_PV_1
    Data about concentrating solar power plants in operation, construction and development globally are available from SolarPACES (https://solarpaces.nrel.gov/, accessed April 2019). On average 8 parabolic through concentrating solar power plants per year went in operation worldwide between 2010 and 2019. This includes plants with an installed capacity other than 50MW and is used as approximate annual production volume for this dataset.
  property price 3.4975e8 EUR2005; name RP_amount_1_price_EUR2005
    Telsnig 2015: Investment cost for a 50MW CSP solar thermal parabolic trough plant in South Africa (EUR2010) with limited storage capacity (see Table 4-4 in Telsnig, 2015). Apart from the cost of the components this includes about 64 million Euros of indirect cost and owner's cost.
    Reference(s): Telsnig, Thomas. 2015. Standortabhängige Analyse und Bewertung solarthermischer Kraftwerke am Beispiel Südafrikas. Forschungsbericht. Band 123. ISSN 0938-1228. Institut für Energiewirtschaft und Rationelle Energieanwendung, Universität Stuttgart, Germany.
  property lifetime 30 year; name lifetime
    The economic lifetime of the plant is assumed to be 30 years.

## Inputs from technosphere
- heat transport fluid system, solar thermal parabolic trough, 50 MW: 1 unit; lognormal variance with pedigree 0.0197, pedigree (4,4,4,3,2)
  heat transport fluid system unit input for construction of 50MW solar thermal parabolic trough plant.
- thermal storage system, solar thermal parabolic trough, 50 MW: 1 unit; lognormal variance with pedigree 0.0197, pedigree (4,4,4,3,2)
  Thermal storage unit input for construction of 50MW solar thermal parabolic trough plant.
- decommissioned road: -43193 m*year; name BP_amount_1; = (road)*-1; lognormal variance with pedigree 0.0197, pedigree (4,4,4,3,2)
  End of life treatment for roads constructed
  production volume 302351 m*year; = RP_PV_1 * (BP_amount_1 / RP_amount_1)
    Calculated from production volume of reference product using the relative outputs.
  property price 0 EUR2005; name BP_amount_1_price_EUR2005
  properties: wet mass 122 kg, carbon content, fossil 0.0220896, dry mass 122 kg
- excavation, hydraulic digger: 22936 m3; lognormal variance with pedigree 0.0197, pedigree (4,4,4,3,2)
  Piping- yardpiping backfill and excavation. It is assumed that the whole excavated volume also has to be put back again once the pipes have been set. This activity does not have to be accounted in the waste
- waste reinforcement steel: 0 kg; name BP_amount_2; pedigree (1,1,1,1,1)
  All steel masses combined. Treatment of reinforced steel is used as a proxy for all steel types.
  production volume 0 kg
    Calculated from production volume of reference product using the relative outputs.
  property price 0 EUR2005; name BP_amount_2_price_EUR2005
  properties: dry mass 1 kg, wet mass 1 kg
- wire drawing, steel: 6391 kg; = steel; lognormal variance with pedigree 0.0197, pedigree (4,4,4,3,2)
  Process done to draw wires from steel
- collector field area, solar thermal parabolic trough, 50 MW: 1 unit; lognormal variance with pedigree 0.0197, pedigree (4,4,4,3,2)
  collector field area unit input for construction of 50MW solar thermal parabolic trough plant.
- road: 43193 m*year; lognormal variance with pedigree 0.0197, pedigree (4,4,4,3,2)
  Roads primarily constructed for transport of construction materials, ease of operational and maintenance, transport of oil etc
- building, hall, wood construction: 943 m2; lognormal variance with pedigree 0.0197, pedigree (4,4,4,3,2)
  Includes warehouse maintenance, electrical control of building and security
- power block, solar thermal parabolic trough, 50 MW: 1 unit; lognormal variance with pedigree 0.0197, pedigree (4,4,4,3,2)
  power block installation unit input for construction of 50MW solar thermal parabolic trough plant.
- water supply network: 4 km; lognormal variance with pedigree 0.0197, pedigree (4,4,4,3,2)
  For sanitary sewers and drains
- steel, unalloyed: 6391 kg; name steel; lognormal variance with pedigree 0.0197, pedigree (4,4,4,3,2)
  Used for construction of site fences. The fences are 2m tall and 2.4Kg in mass. Therefore for construction of 8Km of site fences 6391Kg of steel is used
  properties: carbon content, fossil 0.0025, wet mass 1 kg, dry mass 1 kg
- waste reinforcement steel: -4.43455, -6386.57 kg (2 entries); lognormal variance with pedigree 0.0197, pedigree (4,4,4,3,2)
  (same comment as for waste reinforcement steel)
  production volume 51128 kg

## Inputs from nature
- Occupation, industrial area [natural resource, land]: 3.83631e7 m2*year; = transformation_from*lifetime; lognormal variance with pedigree 0.0197, pedigree (4,4,4,3,2)
  Area occupied by CSP plant over the lifetime of the plant.
- Transformation, to industrial area [natural resource, land]: 1.27877e6 m2; = transformation_from; lognormal variance with pedigree 0.0197, pedigree (4,4,4,3,2)
  Process of transforming unused area to industrial sector
- Transformation, from grassland, natural (non-use) [natural resource, land]: 1.27877e6 m2; name transformation_from; lognormal variance with pedigree 0.0202, pedigree (4,4,4,4,2)
  Process of transforming unused area to industrial sector. Note that this dataset has been copied from a dataset valid for South Africa, where the country size allows conversion of unused grassland to area used for the CSP plant. However, in other countries it might be the case that the needed area competes with agricultural area.

## Sampling procedure
This dataset is entirely based on the detailed life cycle inventory as presented in the dissertation report by
Telsnig, Thomas. 2015. Standortabhängige Analyse und Bewertung solarthermischer Kraftwerke am Beispiel Südafrikas. Forschungsbericht. Band 123. ISSN 0938-1228. Institut für Energiewirtschaft und Rationelle Energieanwendung, Universität Stuttgart, Germany.

Further, data in Telsnig 2015 are not shown explicitely for the downscaled 50 MW parabolic trough power plant. This gap is filled in the ecoinvent report.

## Extrapolations
This dataset has been extrapolated from a dataset modelled for the location Upington, South Africa.
The original data modelling a 250 MW power plant have been scaled down with parameter specific linear and non-linear equations to represent a 50 MW plant design.
Uncertainty has not been adjusted as it is assumed that the modelled 50 MW parabolic trough plant would be very similar in other parts of the world.

## Review by Christopher Oberschelp 2017-03-06
Very detailed and well-structured dataset with in-depth documentation. Key exchanges have been found reasonable. Comparison of impacts with other technologies might now help to spot any unusual or unexpected exchanges.
