# capacitor production, film type, for through-hole mounting

Dataset: EcoSpold 2, unit process
Geography: GLO
Time period: 1994-01-01 to 2021-12-31
Technology level: current
Classification: ISIC rev.4 ecoinvent: 2610:Manufacture of electronic components and boards
Classification: EcoSpold01Categories: electronics/component
Synonyms: film condenser
Scenario: Business-as-Usual
System model: Allocation, cut-off by classification
Generated by: Roland Hischier
Published in: Hischier R. 2007
Database: ecoinvent
isCopyrightProtected: true
accessRestrictedTo: 1

## General comment
This dataset represents the production of 1 kg of film type capacitors for the through-hole mounting technology. It is based on the assumption that a typical film capacitor in electronic modules has an average weight of 0.7 g.The data represent a typical film type capacitor for hole-through mounting, used in the information and communication technology. Material data are taken from datasheets of producers of such capacitors and from the literature. Infrastructure and production efforts are based on own assumptions. The production efforts represent not a specific capacitor type and have thus, accordingly higher uncertainties.
Silver exchange was removed based on expert assumption.

## Included activities start
From reception of metals and plastics at the factory gate.

## Included activities end
This dataset includes raw material input and production efforts for the production of currently used film capacitors for hole-through mounting technology.

## Geography
Data represent a global valuable composition of film type capacitors.

## Technology
average production composed of: formulation; build-up process; cutting; bisquing; Pre-Firing; Firing; Tumbling; Termination (SMT) resp. metallization; slitting; winding; metal spray; heat treatment; sawing; lead welding; epoxy filling (THT)

## Reference product
- capacitor, film type, for through-hole mounting: 1 kg; source EPCOS 2006; CPC 47110: Electrical capacitors; By-product classification allocatable product
  Film type capacitors have almost unlimited selfhealing capability. Short circuits are thus largely nonexistent. They exhibit high pulse handling and ripple current capability. Typical applications are mobile phones, television, automobiles, PCs and lamp ballasts.
  EcoSpold01Location=GLO
  production volume 1 kg
    Dummy value to be replaced by measured, estimated or calculated value
  property carbon content, non-fossil 0
    Calculated as the addition of C contents in the product composition, and referred to 1 kg capacitors, and then to 1 kg DM
  property price 27.9636 EUR2005
    Calculated based on inputs: The price of the product has been calculated as a sum of the values of the material and energy inputs for this product. This value is therefore a rough estimation. It may underestimate the real price since there are additional expenses when producing any product. These expences can include for example labour costs, treatment of waste materials and profit for the producer. Please consider carefully whether this level of data quality is acceptable for your application.
  property carbon content, fossil 0.278876
    (same comment as for capacitor, film type, for through-hole mounting)
  property carbon content 0.278876
    carbon content on a dry matter basis (reserved; not for manual entry)
  properties: water content 0, dry mass 1 kg, water in wet mass 0 kg, wet mass 1 kg, carbon allocation 0.278876 kg

## Inputs from technosphere
- polypropylene, granulate: 0.074074 kg; source Behrendt S 1998; lognormal variance with pedigree 0.052, pedigree (1,4,5,1,1)
  EcoSpold01Location=RER
  Calculated Value. The production of 1 kg of capacitors lead to a waste amount of 0.48 kg unused raw materials. Hence, this dataset here has an input of 1.48 kg of raw materials per kg of capacitor. The split to the different raw materials (metals, plastics, etc.) is based on the reported material specifications.
  Further references
  ZVEI (2006) Umbrella Specs. Download of December 21 from <http://www.zvei.org/index.php?id=1158>.
  Uncertainty: average from literature & company information
  properties: dry mass 1 kg, wet mass 1 kg, heating value, net 32.78 MJ, carbon content, fossil 0.857143
  note on heating value, net: Value extracted from "treatment of waste polypropylene, open burning"
  note on carbon content, fossil: Polypropylene is formed by the polymerisation of propylene, C3H6 (ecoinvent v2.2 report 11_II)
- polyphenylene sulfide: 0.25996 kg; source Behrendt S 1998; lognormal variance with pedigree 0.052, pedigree (1,4,5,1,1)
  EcoSpold01Location=GLO
  Calculated Value. The production of 1 kg of capacitors lead to a waste amount of 0.48 kg unused raw materials. Hence, this dataset here has an input of 1.48 kg of raw materials per kg of capacitor. The split to the different raw materials (metals, plastics, etc.) is based on the reported material specifications.
  Further references
  ZVEI (2006) Umbrella Specs. Download of December 21 from <http://www.zvei.org/index.php?id=1158>.
  Uncertainty: average from literature & company information
  properties: wet mass 1 kg, heating value, net 24.67 MJ, dry mass 1 kg, carbon content, fossil 0.666667
  note on carbon content, fossil: Poly(phenylene sulphide) (PPS, poly(thio-1,4-phenylene) is a repeating aromatic monomer unit (a benzene structure), joint by sulphur bridges (ecoinvent v2.2 report 11_II), C6H4S, MW=108 g/mol
- pig iron: 0 kg; source Behrendt S 1998; pedigree (1,1,1,1,1)
  Calculated Value. The production of 1 kg of capacitors lead to a waste amount of 0.48 kg unused raw materials. Hence, this dataset here has an input of 1.48 kg of raw materials per kg of capacitor. The split to the different raw materials (metals, plastics, etc.) is based on the reported material specifications.
  Further references
  ZVEI (2006) Umbrella Specs. Download of December 21 from <http://www.zvei.org/index.php?id=1158>.
  EcoSpold01Location=GLO
  Uncertainty: average from literature & company information
  properties: dry mass 1 kg, wet mass 1 kg, carbon content, fossil 0.045
  note on carbon content, fossil: Pig iron is the iron produced in the blast furnace. It is an alloy of 94% Fe and more than 2% C (world average 4.5%). (ecoinvent v2.2 report 10_partII)
- epoxy resin, liquid: 0 kg; source Behrendt S 1998; pedigree (1,1,1,1,1)
  (same comment as for polypropylene, granulate)
  properties: dry mass 1 kg, carbon content, fossil 0.42325, wet mass 1 kg, heating value, net 12.82 MJ
- tin: 0.033892 kg; source Behrendt S 1998; lognormal variance with pedigree 0.052, pedigree (1,4,5,1,1)
  Calculated Value. The production of 1 kg of capacitors lead to a waste amount of 0.48 kg unused raw materials. Hence, this dataset here has an input of 1.48 kg of raw materials per kg of capacitor. The split to the different raw materials (metals, plastics, etc.) is based on the reported material specifications.
  Further references
  ZVEI (2006) Umbrella Specs. Download of December 21 from <http://www.zvei.org/index.php?id=1158>.
  EcoSpold01Location=RER
  Uncertainty: average from literature & company information
  properties: wet mass 1 kg, dry mass 1 kg
- aluminium, wrought alloy: 0.046472 kg; source Behrendt S 1998; lognormal variance with pedigree 0.052, pedigree (1,4,5,1,1)
  (same comment as for polypropylene, granulate)
  properties: wet mass 1 kg, dry mass 1 kg
- polyethylene terephthalate, granulate, amorphous: 0.03515 kg; source Behrendt S 1998; lognormal variance with pedigree 0.052, pedigree (1,4,5,1,1)
  (same comment as for polypropylene, granulate)
  properties: dry mass 1 kg, wet mass 1 kg, heating value, net 22.95 MJ, carbon content, fossil 0.625
  note on carbon content, fossil: Polymer of the ethylen terephtalate monomer (C10H8O4)n (ecoinvent v2.2 report 11_II), MW=192 g/mol
- nickel, class 1: 0.01332 kg; source Behrendt S 1998; lognormal variance with pedigree 0.052, pedigree (1,4,5,1,1)
  (same comment as for pig iron)
  properties: wet mass 1 kg, dry mass 1 kg
- zinc: 0.12432 kg; source Behrendt S 1998; lognormal variance with pedigree 0.052, pedigree (1,4,5,1,1)
  (same comment as for tin)
  properties: dry mass 1 kg, wet mass 1 kg
- capacitor, auxilliaries and energy use: 1 kg; lognormal variance with pedigree 0.134, pedigree (3,4,5,1,4)
  EcoSpold01Location=GLO
  Estimation - details see this other activity dataset
  Uncertainty: rough estimation
- lead: 0.006068 kg; source Behrendt S 1998; lognormal variance with pedigree 0.052, pedigree (1,4,5,1,1)
  (same comment as for polypropylene, granulate)
  properties: wet mass 1 kg, dry mass 1 kg
- phosphorus, white, liquid: 0.01554 kg; source Behrendt S 1998; lognormal variance with pedigree 0.052, pedigree (1,4,5,1,1)
  (same comment as for polypropylene, granulate)
  properties: dry mass 1 kg, wet mass 1 kg
- copper, cathode: 0.36423 kg; source Behrendt S 1998; lognormal variance with pedigree 0.052, pedigree (1,4,5,1,1)
  (same comment as for polypropylene, granulate)
  properties: dry mass 1 kg, wet mass 1 kg
- phenolic resin: 0 kg; source Behrendt S 1998; pedigree (1,1,1,1,1)
  (same comment as for tin)
  properties: carbon content, fossil 0.772277, wet mass 1 kg, dry mass 1 kg, heating value, net 33.57 MJ
  note on carbon content, fossil: (C6H5OH)-CH2-(C6H5OH) was considered to be the basic structure in phenolic resin (ecoinvent v2.2 report 8-part 61). C13H14O2, MW=202 g/mol
- pig iron: 0.00991139, 0.107009 kg (2 entries); source Behrendt S 1998; lognormal variance with pedigree 0.052, pedigree (1,4,5,1,1)
  (same comment as for pig iron)
- epoxy resin, liquid: 0.05999, 0.28478 kg (2 entries); source Behrendt S 1998; lognormal variance with pedigree 0.052, pedigree (1,4,5,1,1)
  (same comment as for polypropylene, granulate)
- phenolic resin: 0.000618048, 0.00293395 kg (2 entries); source Behrendt S 1998; lognormal variance with pedigree 0.052, pedigree (1,4,5,1,1)
  (same comment as for tin)

## Sampling procedure
literature

## Extrapolations
This dataset has been extrapolated from year 2007 to the year of the calculation (2021). The uncertainty has been adjusted accordingly.

## Review by Rolf Frischknecht 2007-09-20
passed.
