# mine infrastructure construction, underground, uranium

Dataset: EcoSpold 2, unit process
Geography: RNA
Time period: 1980-01-01 to 2021-12-31
Technology level: current
Classification: EcoSpold01Categories: nuclear power/production
Classification: ISIC rev.4 ecoinvent: 0721:Mining of uranium and thorium ores
Tags: ConvertedDataset
Scenario: Business-as-Usual
System model: Allocation, cut-off by classification
Generated by: Roberto Dones
Published in: Dones, R. 2007
Database: ecoinvent
isCopyrightProtected: true
accessRestrictedTo: 1

## General comment
This infrastructure module is based on the definition given in the US DOE reference for a model mine representing US conditions: U3O8 grade 0.2%; capcity 2.4E5 kg uranium per year. It was not possible to differenciate materials used for fixed infrastructure and materials used during mining activities. The data available on energy use are attributed to operation, see module "uranium natural, at underground mine". All materials are assumed to be transported 700 km for consistency with the transport distance assumed for diesel during operation. This module may not reflect specific conditions in different regions of the world; nevertheless it should capture the orders of magnitude of the material requirements for uranium mining.
[This dataset was already contained in the ecoinvent database version 2. It was not individually updated during the transfer to ecoinvent version 3. Life Cycle Impact Assessment results may still have changed, as they are affected by changes in the supply chain, i.e. in other datasets. This dataset was generated following the ecoinvent quality guidelines for version 2. It may have been subject to central changes described in the ecoinvent version 3 change report (http://www.ecoinvent.org/database/ecoinvent-version-3/reports-of-changes/), and the results of the central updates were reviewed extensively. The changes added e.g. consistent water flows and other information throughout the database. The documentation of this dataset can be found in the ecoinvent reports of version 2, which are still available via the ecoinvent website. The change report linked above covers all central changes that were made during the conversion process.]

## Included activities end
This module includes the material requirements for the entire lifetime of the mine. Also the transport of these materials and the land use of the mine are included.

## Geography
North American data.

## Technology
Average conditions in early 1980s.

## Reference product
- mine infrastructure, underground, uranium: 1 unit; CPC 53261: Mining constructions; By-product classification allocatable product
  EcoSpold01Location=RNA
  production volume 1.19921 unit
    This is a placeholder value that does not reflect real-world production volumes. This dataset does not currently require a real-world production volume to work in the database framework, and no actual data were collected yet. This has no negative effect on the results of the ecoinvent database. The placeholder value of this activity was scaled according to the nominal GDP of 2005 (source: United Nations, http://data.un.org/Glossary.aspx?q=GDP+%28current+US%24%29, accessed 20130726) to reflect an appropriate share of the global production volume, which is also a placeholder value.
  property price 1.24667e6 EUR2005
    Calculated based on inputs: The price of the product has been calculated as a sum of the values of the material and energy inputs for this product. This value is therefore a rough estimation. It may underestimate the real price since there are additional expenses when producing any product. These expences can include for example labour costs, treatment of waste materials and profit for the producer. Please consider carefully whether this level of data quality is acceptable for your application.

## Inputs from technosphere
All rows: lognormal variance with pedigree 0.16, pedigree (1,1,5,1,1)
- cast iron: 30200 kg
  EcoSpold01Location=RER
  own estimation, based on range of data
  properties: wet mass 1 kg, carbon content, fossil 0.04, dry mass 1 kg
  note on carbon content, fossil: Cast iron is made by remelting pig iron in small furnaces (e.g. cupola furnaces or electric arc furnaces) and poured into moulds to make castings. It usually contains 2% to 6% carbon (ecoinvent v2.2 report 10_partII). An average content of 4% was considered
- copper, cathode: 8990 kg
  own estimation, based on range of data
  EcoSpold01Location=RER
  properties: dry mass 1 kg, wet mass 1 kg
- aluminium, wrought alloy: 5868.4 kg
  EcoSpold01Location=RER
  own estimation, based on range of data
  properties: dry mass 1 kg, wet mass 1 kg
- manganese: 11200 kg
  own estimation, based on range of data
  EcoSpold01Location=RER
  properties: dry mass 1 kg, wet mass 1 kg
- aluminium, cast alloy: 2761.6 kg
  own estimation, based on range of data
  EcoSpold01Location=RER
  properties: wet mass 1 kg, dry mass 1 kg
- steel, low-alloyed, hot rolled: 2.16e6 kg
  own estimation, based on range of data
  EcoSpold01Location=RER
  properties: carbon content, fossil 0.005, wet mass 1 kg, dry mass 1 kg
  note on carbon content, fossil: Low alloyed steel composition given in Tab. 3.2 ecoinvent v2.2 report 10_partII. Steel assumed to have a C content of 0.5%
- concrete, normal: 1440 m3
  own estimation, based on range of data
  EcoSpold01Location=CH
  properties: wet mass 2380 kg, water content 0.086758, dry mass 2190 kg

## Inputs from nature
- Transformation, to unspecified [natural resource, land]: 10000 m2; lognormal variance with pedigree 0.16, pedigree (1,1,5,1,1)
  own estimation, based on range of data
- Transformation, from industrial area [natural resource, land]: 10000 m2; lognormal variance with pedigree 0.16, pedigree (1,1,5,1,1)
  own estimation, based on range of data
- Transformation, to industrial area [natural resource, land]: 10000 m2; lognormal variance with pedigree 0.16, pedigree (1,1,5,1,1)
  own estimation, based on range of data
- Transformation, from unspecified [natural resource, land]: 10000 m2; lognormal variance with pedigree 0.16, pedigree (1,1,5,1,1)
  own estimation, based on range of data
- Occupation, industrial area [natural resource, land]: 200000 m2*year; lognormal variance with pedigree 0.25, pedigree (1,1,5,1,1)
  own estimation, based on range of data

## Sampling procedure
Literature

## Extrapolations
This dataset has been extrapolated from year 1983 to the year of the calculation (2021). The uncertainty has been adjusted accordingly.

## Review by Roberto Dones 2003-08-19
passed
for final calculation August 2003
