# kaolin production

Dataset: EcoSpold 2, unit process
Geography: RoW
Time period: 2000-01-01 to 2021-12-31
Technology level: current
Classification: ISIC rev.4 ecoinvent: 0810:Quarrying of stone, sand and clay
Synonyms: China clay; kaolin; Alphagloss; 1332-58-7; Altowhites; Hydrated aluminum silicate
Scenario: Business-as-Usual
System model: Allocation, cut-off by classification
Generated by: Roland Hischier
Published in: Hischier R. 2007
Database: ecoinvent
isCopyrightProtected: true
accessRestrictedTo: 1

## General comment
This dataset represents the production of 1 kg of kaolin using the wet process. Kaolin is a clay mineral, more precisly an aluminium hydroxide silicate which corresponds to the chemical formula Al2O3.2SiO2.2H2O. It is a naturally occurring weathered product of granite, sold for its whiteness, purity and physical and chemical properties. In the United States, about 70% of all kaolin produced by the wet process are used as filler or coating in the paper industry. Other industries using this mineral are, for example, the ceramics industry (for whiteware, sanitary ware, insulators, refractories), the paints and inks producers (extender pigment) or the rubber and plastics industry (functional filler material).
This dataset is based on information provided by one European producer in a filled in questionnaire. This dataset assumes that the output kaolin is used as filler and coating material within the paper industry.
References:
Hischier R. (2007) Life Cycle Inventories of Packagings & Graphical Papers. ecoinvent report No. 11. Swiss Centre for Life Cycle Inventories, Dübendorf, 2007.

## Included activities start
The activity starts when the raw materials enter the process.

## Included activities end
This activity ends with the production of kaolin. The dataset includes the processing of raw materials and auxiliaries used for production, the energy consumption, as well as emissions to air and water from production, and an estimation of the infrastructure of the site (approximation based on a limestone mine). No waste reported to external sites.

## Geography
Data used are from one single company in Europe. They are assumed to be representative of the global production.

## Technology
There exist two different processes for the production of market kaolin - a dry and a wet process. The first one - the dry process - is relatively simple but yields therefore also a lower quality product, reflecting the quality found in the crude kaolin.
The wet process on the other hand side is used to produce filler and coating grades. It is this process that is modeled in this dataset.
The most important four steps of the wet process are the following:
- Mining: Nowadays most of kaolin mining is done in open pit mining. Depending on the composi-tion, either mining with shovels, draglines, motorized scrapers and front-end loaders is done (e.g. Georgia, USA) or mining with high-pressure hydraulic monitors (e.g. Cornwall, UK) is done. In the second case, a stream of water is washing out the fine particle kaolin and is leaving the coarse quartz and mica residues within the soil.
- Mineral separation (degritting): Kaolin beeing a mineral, it is obvious that there are always also other minerals (the grit) in the kaolin deposits, which have to be separated. To separate two miner-als, either physical or chemical differences between the two substances are taken as base. In gen-eral, the mined kaolin is mixed therefore with water and a dispersing chemical to form a slurry that is then degritted (by e.g. rake classifiers, hydrocyclones or screens).
- Kaolin benefication: When the separated kaolin fullfills not the specification asked a benefication process is added to improve e.g. the brightness (either by magnetic separation or by bleaching with ozone or hydrogen peroxide), the rheology (by blending different kaolins), the purity (either by blending or by magnetic separation) or the grain size distribution (again blending as a possibility). In this step, the producer is also deciding the form of delivery (bulk, powder, slurry).
- Storage & transport: The storage is done either in silos (bulk and powder) or in tanks (slurries). Due to the fact that customers more and more apply for the 'just in time' principle, the storage ca-pacities of the producers are increasing and the transports are done more and more by lorry to the customer (more flexible than other means of transport).
References:
Hischier R. (2007) Life Cycle Inventories of Packagings & Graphical Papers. ecoinvent report No. 11. Swiss Centre for Life Cycle Inventories, Dübendorf, 2007.

## Parameters
- fraction, process water, to air: 0.205 dimensionless; name fraction_PW_to_air; lognormal variance with pedigree 0.092025, pedigree (4,4,3,2,4)
  Literature value (Statistics Canada, 2007 & Shaffer, K.H., 2008, Consumptive water use in the Great Lakes Basin, USGS) (Vionnet, S., Quantis Water Database - Technical Report, 2012).

## Reference product
- kaolin: 1 kg; name RP; By-product classification allocatable product; CPC 15400: Clays; CAS 1332-58-7
  Kaolin is a clay mineral, more precisly an aluminium hydroxide silicate which corresponds to the chemical formula Al2O3.2SiO2.2H2O. It is a naturally occurring weathered product of granite, sold for its whiteness, purity and physical and chemical properties. In the United States, about 70% of all kaolin produced by the wet process are used as filler or coating in the paper industry. Other industries using this mineral are, for example, the ceramics industry (for whiteware, sanitary ware, insulators, refractories), the paints and inks producers (extender pigment) or the rubber and plastics industry (functional filler material).
  production volume 1.72768e10 kg; name RP_PV; = 9100000000/0.345
    Estimated value. According to Elzea Kogel, J, Trivedi, N.C., Barker, J.M. & Krukowski, S. T. (editors) (2006) Industrial Minerals and Rocks: Commodities, Markets and Uses, 7th edition, no precise estimates have been made so far on clay production, problems in these estimates are the exclusion of China and India in the majority of statistical references and the inclusion of different types of clays in different categories depending on the reporting geography. Kogel et al. estimate for 2002 World production of common clay to be hundreds of Mt, for refractory more than 20Mt , Kaolin 43 Mt mined and 26 Mt sold, Bentonite 10.3 Mt, Fuller’s earth uncertain 10Mt, ball clay 15.5 Mt and Hormites 2.1 Mt. As no precise estimate was found the World production volume for clay and kaolin production are estimated from European production volumes. For Bentonite and Kaolin World values are available from the European mineral statistics 2009-2013 (http://www.bgs.ac.uk/mineralsuk/statistics/europeanStatistics.html, accessed 08.02.2016) for which Eu production for Kaolin is 34.5% of World’s production and for Bentonite is the 16.4%. The remaining World values are scaled assuming that EU represents the 26% of World’s production, based on the average between Kaolin and Bentonite. Following the commodities are listed with their Prodcom codes, Prodcom name and production volume for EU 28 in tons: 08122210 “Bentonite” 2216788 tons, 08122230 “Fireclay” 2542435 tons, 08122250 “Common clays and shales for construction use (excluding bentonite, fireclay, expanded clays, kaolin and kaolinic clays); andalusite, kyanite and sillimanite; mullite; chamotte or dinas earths” 32000000 tons, and 08122160 “Kaolinitic clays (ball and plastic clays)” 2997294 tons. According to the European mineral statistics 2009-2013 (<http://www.bgs.ac.uk/mineralsuk/statistics/europeanStatistics.html>, accessed 08.02.2016), Europe (EU36) produces 9.1Mt of Kaolin, which is 34.5% of World production, of which 47.8% (16% of all World production) comes from Germany. The largest producer in 2013 was US with 23%, China represented the 12%, Brazil 8%, and Iran 6%. The European mineral statistics values are used for both Europe and the World estimates. The same source reports for EU36 Bentonite production of 2.73 Mt for 2013, which represents the 16.4% of World production. The values for Europe matches the values indicated from Eurostat and it used to estimate World’s production. Germany produces 13.1% of Europe’s bentonite 358844 tons. The volume of produced clay is assigned to the different activities based on USGS (2015) estimates of uses in the USA (<http://minerals.usgs.gov/minerals/pubs/commodity/clays/mcs-2015-clays.pdf>, accessed 08.02.2016) and according to input of clay per reference product. Of common clay, 39% is used for brick (for which 50% is assumed to be used for clay bricks and 50% light clay bricks), 23% lightweight aggregate, 31% cement, and 7% other uses (USGS specifies that 9% of common clay is used for lightweight concrete block production in the 2013 Minerals yearbook http://minerals.usgs.gov/minerals/pubs/commodity/clays/myb1-2013-clays.pdf, accessed 08.02.2016). Of ball clay, 39% is used for floor and wall tiles, 17% sanitary ware, and 44% other uses. Of bentonite 26% absorbents, 24% drilling mud, 15% foundry sand bond (assumed to represent plaster clay), 11% iron ore pelletising, and 24% other uses. Of fire clay, 34% for heavy clay products, and 66% for refractory and other products. Of fuller’s earth, 70% absorbents, and 30% for other uses. The US produce 15 to 25 % of refined clays (without common clay and shale). Comparing the estimated global values with the data for USGS (2015) for the production in USA, the US is responsible for 20% of Kaolin products, 34% of Bentonite and more than 10% of common clays. USGS (2015) reports USA to “probably” represent 15% to 25% of World production of refined clays excluding common clays.
  property price 0.13 EUR2005
    Calculated value based on data from United Nations Commodity Trade Statistics Database (comtrade.un.org). UN comtrade category: 250700 Kaolin and other kaolinic clays. Year 2005. Using exchange rate of 1EURO = 1.209 USD. Average of price of import into 5 main markets (EU, US, JP, IN and CN).
  property carbon content 0
    carbon content on a dry matter basis (reserved; not for manual entry)
  properties: dry mass 1 kg, water in wet mass 0 kg, water content 0, wet mass 1 kg, carbon content, fossil 0, carbon content, non-fossil 0, carbon allocation 0 kg

## Inputs from technosphere
- heat, district or industrial, other than natural gas: 0 MJ; pedigree (1,1,1,1,1)
  According to information from 1 producer
  Uncertainty: a
  properties: heating value, net 1 MJ
- recultivation, limestone mine: 6.52e-6 m2; lognormal variance with pedigree 0.3686, pedigree (4,3,5,5,3)
  Approximation with data from lime production
  Uncertainty: a
- sodium silicate, solid: 0.00025 kg; lognormal variance with pedigree 0.0546, pedigree (2,4,5,5,1)
  According to information from 1 producer
  Uncertainty: a
  properties: dry mass 1 kg, wet mass 1 kg
- heat, district or industrial, natural gas: 0 MJ; pedigree (1,1,1,1,1)
  According to information from 1 producer
  Uncertainty: a
  properties: heating value, net 1 MJ
- limestone quarry infrastructure: 5.25e-11 unit; lognormal variance with pedigree 0.3686, pedigree (4,3,5,5,3)
  Approximation with data from lime production
  Uncertainty: a
- sodium hydroxide, without water, in 50% solution state: 0.0123 kg; lognormal variance with pedigree 0.0546, pedigree (2,4,5,5,1)
  According to information from 1 producer
  Uncertainty: a
  properties: wet mass 1 kg, dry mass 1 kg, heating value, net 3.03 MJ
- electricity, medium voltage: 0 kWh; pedigree (1,1,1,1,1)
  According to information from 1 producer
  Uncertainty: a
- hydrogen peroxide, without water, in 50% solution state: 0.0006 kg; lognormal variance with pedigree 0.0546, pedigree (2,4,5,5,1)
  According to information from 1 producer
  Uncertainty: a
  properties: wet mass 1 kg, dry mass 1 kg, heating value, net 7.13 MJ
- soda ash, light, crystalline, heptahydrate: 0.00025 kg; lognormal variance with pedigree 0.0546, pedigree (2,4,5,5,1)
  According to information from 1 producer
  Uncertainty: a
  properties: heating value, net 3.43 MJ, dry mass 1 kg, wet mass 1 kg, carbon content, fossil 0.0517241
- aluminium sulfate, powder: 1e-5 kg; lognormal variance with pedigree 0.0546, pedigree (2,4,5,5,1)
  According to information from 1 producer
  Uncertainty: a
  properties: wet mass 1 kg, dry mass 1 kg
- sulfuric acid: 0.0177 kg; lognormal variance with pedigree 0.0546, pedigree (2,4,5,5,1)
  According to information from 1 producer
  Uncertainty: a
  properties: wet mass 1 kg, dry mass 1 kg
- heat, district or industrial, other than natural gas: 0.000120793, 0.297879 MJ (2 entries); lognormal variance with pedigree 0.0546, pedigree (2,4,5,5,1)
  According to information from 1 producer
  Uncertainty: a
- heat, district or industrial, natural gas: 0.0133264, 0.864674 MJ (2 entries); lognormal variance with pedigree 0.0546, pedigree (2,4,5,5,1)
  According to information from 1 producer
  Uncertainty: a
- electricity, medium voltage: 0.00226893, 0.000435084, 0.00730415, 0.106232, 0.0149735, 0.0487859 kWh (6 entries); lognormal variance with pedigree 0.0546, pedigree (2,4,5,5,1)
  According to information from 1 producer
  Uncertainty: a

## Inputs from nature
- Water, unspecified natural origin [natural resource, in water]: 0.00757 m3; name water_UNO_input; source Byers, W. 2003; lognormal variance with pedigree 0.0546, pedigree (3,3,5,5,1)
  According to information from 1 producer
  Calculated based on literature, (Vionnet, S., Quantis Water Database - Technical Report, 2012). The process does not includes the water used during mine's operation, but includes the basic processing of raw kaolin. It includes the processes: suspension (or dispersion), screening, drit removal (gravity separation, centrifugation), flotation, brightening, flocculation, filtration, drying and packaging. The finished, refined kaolin leaves the plant usually in the form of slurry (70% water, 30% kaolin), so the data on the amount of water incorporated in the product are valid only if the kaolin leaves the plant in the form of slurry.
  Uncertainty: a
- Kaolinite, in ground [natural resource, in ground]: 1.11 kg; lognormal variance with pedigree 0.0432, pedigree (2,3,5,5,1)
  24% Kaolinite in ore; Calculated from output of kaoline & by-products
  Uncertainty: c
- Transformation, to mineral extraction site [natural resource, land]: 6.52e-6 m2; lognormal variance with pedigree 0.2086, pedigree (4,3,5,5,3)
  Approximation with data from lime production
  Uncertainty: a
- Transformation, from forest, unspecified [natural resource, land]: 6.52e-6 m2; lognormal variance with pedigree 0.2086, pedigree (4,3,5,5,3)
  Approximation with data from lime production
  Uncertainty: a
- Occupation, mineral extraction site [natural resource, land]: 6.52e-5 m2*year; lognormal variance with pedigree 0.1286, pedigree (4,3,5,5,3)
  Approximation with data from lime production
  Uncertainty: a

## Emissions to nature
- COD, Chemical Oxygen Demand [water, surface water]: 2e-5 kg; lognormal variance with pedigree 0.0832, pedigree (2,3,5,5,1)
  According to data in Habersatter 1998
  Uncertainty: a
- TOC, Total Organic Carbon [water, surface water]: 7.40741e-6 kg; lognormal variance with pedigree 0.0832, pedigree (2,3,5,5,1)
  Calculated by default as TOC (gC) = COD/2.7 (COD measured in g O2). Should more correctly be calculated from the carbon content of the specified emissions to water.
  Uncertainty: a
- BOD5, Biological Oxygen Demand [water, surface water]: 2e-5 kg; lognormal variance with pedigree 0.0832, pedigree (2,3,5,5,1)
  According to data in Habersatter 1998
  Uncertainty: a
- Suspended solids, unspecified [water, surface water]: 0.00031 kg; lognormal variance with pedigree 0.0946, pedigree (2,4,5,5,1)
  According to information from 1 producer
  Uncertainty: a
- Water [water, unspecified]: 0.00601815 m3; = water_UNO_input*(1-fraction_PW_to_air); lognormal variance with pedigree 0.0827, pedigree (2,2,5,5,1)
  Calculated as a fraction of the input of water. For more details, refer to the mathematical relation and the parameters.
  property carbon content, fossil 0; name C_content_fossil
  property wet mass 1000 kg; name WM
  property fraction, origin: unspecified 1; name fraction_origin_unspecified_Ww
  property water in wet mass 1000 kg; name WWM
  property fraction, origin: salt water 0; name fraction_origin_salt_water_Ww
  property dry mass 0 kg; name DM
  property carbon content, non-fossil 0; name C_content_non_fossil
  property fraction, origin: fresh water 0; name fraction_origin_fresh_water_Ww
- DOC, Dissolved Organic Carbon [water, surface water]: 7.40741e-6 kg; lognormal variance with pedigree 0.0832, pedigree (2,3,5,5,1)
  Calculated as equal to TOC.
  Uncertainty: a
- Water [air, unspecified]: 0.00155185 m3; = (water_UNO_input*fraction_PW_to_air); lognormal variance with pedigree 0.0827, pedigree (2,2,5,5,1)
  (same comment as for Water)
  property fraction, origin: fresh water 0; name fraction_origin_fresh_water
  property fraction, origin: unspecified 1; name fraction_origin_unspecified
  property fraction, origin: salt water 0; name fraction_origin_salt_water

## Sampling procedure
The data is based on a questionnaire filled in by one single company - expanded with data from literature as well as general data from mining activities.

## Extrapolations
This dataset has been copied from an original dataset covering the geography RER. The uncertainty has been adjusted accordingly.

## Review by Emilia Moreno Ruiz 2017-08-10
This dataset was additionally reviewed in a separate review process by Eric Johnson of Atlantic Consulting as well as Emilia Moreno Ruiz and Gregor Wernet of ecoinvent.
