# transport, freight train, diesel

Dataset: EcoSpold 2, unit process
Geography: CN
Time period: 1999-01-01 to 2021-12-31
Technology level: current
Classification: ISIC rev.4 ecoinvent: 4912:Freight rail transport
Scenario: Business-as-Usual
System model: Allocation, cut-off by classification
Generated by: Frédéric Gindroz
Published in: Spielmann M. 2007
Database: ecoinvent
isCopyrightProtected: true
accessRestrictedTo: 1

## General comment
The dataset represents the entire transport life cycle of a diesel freight train in China. The data of the energy used and operation emissions are based on "transport, freight train, diesel" dataset for RER and represents a diesel goods train with a weight of 1000 Gt. Variation in the geography of different countries have been taken into account by classifying 15 European countries into 3 regions (flat, hilly, mountain). Diesel use per tkm is from CN 2004 statistics (very low rate compared to European statistics), adjusted by a factor of two assuming that the original data are referring to gross tkm. This dataset should not be used for comparisons of locomotive types nor of transport means across different countries but only when transport is not a major contributor to total environmental burdens of a process or product being analyzed.
[This dataset is meant to replace the following datasets: - transport, freight train, CN, 1999 - 2004]

## Included activities start
The dataset starts with the production of a locomotive.

## Included activities end
The dataset ends with the service of transporting 1 ton over a distance of 1 km by a freight train. The dataset includes the production and the maintenance of the locomotive and the goods wagon, the construction of the railway track and the energy use and operation emissions of a freight train using diesel. The data of the energy used and operation emissions are based on "transport, freight train, diesel" dataset for RER but with specific Chinese diesel consumption.

## Geography
RER model and operation model with specific CN diesel intensity. The 2004 China official statistics on the number of locomotives in operation in all railway Companies (national and local) give the shares 69.7%, 28.7% and 1.5% for diesel, electricity and steam , respectively. The diesel technology is identical as described in the corresponding dataset for RER but assuming the consumption of diesel per tkm derived from Chinese statistics. However, the original diesel consumption per tkm has been corrected because it is most likely incompatible being only one quarter of the value taken from European statistics assumed in ecoinvent. The correction factor of 2.67 for fuel intensity is the product of two separate sub-factors: 2 to take into account of the fact that coal is transported only one way, and 1/3 to consider the weight of the freight car. In fact the Chinese statistics give on the same page the energy use per tkm, the “Utilization Rate of Loading Capacity of Freight Cars” at an astonishing 98% (definitively unrealistic because coal makes 40% of the total transported goods), and the total mass of loaded freight car “Static Load of Freight Cars (Standard Gauge)” of nearly 60 tonnes of which roughly 20 tonnes must be the car itself. With this correction, also applied to the electric and steam locomotive, the fuel utilization factor comes closer to the RER data. The uncertainly in the value due to the mentioned discrepancy has been signalled with an increased uncertainty factor compared to the corresponding item in the corresponding European dataset.
References:
Spielmann M., Kägi T., Stadler P. and Tietje O. (2004) Life cycle inventoriesof transport services. Final report ecoinvent 2000 No. 14. UNS, ETH-Zurich,Swiss Centre for Life Cycle Inventories, Duebendorf, CH, retrieved from:www.ecoinvent.ch.

## Technology
The dataset transport of coal by train in China is based on “transport, freight train, diesel (RER)” but instead of “operation, freight train (RER)” the input is defined to reflect the use of diesel locomotives in the coal industry and in China in general. Demand factors of various transport components (as described in the previous sections) required to fulfill the functional unit of one tkm fright transport are presented. In order to account for the fact that the same rail tracks are used for both passenger and goods transportation are applied allocation factors.

## Reference product
- transport, freight train: 1 metric ton*km; CPC 6512: Railway transport services of freight; By-product classification allocatable product
  production volume 1.56019e12 metric ton*km; = 2238435000000*0.697
    Literature data. Total production volume for the country is taken from 2019 Railway Statistics Synopsis (https://uic.org/IMG/pdf/uic-statistics-synopsis-2019.pdf). Share of fuel type from ecoinvent v2 report 14 citing official Chinese statistics for 2004.
  properties: price 0.026 EUR2005

## Inputs from technosphere
- railway track: 9.3e-5 m*year; lognormal variance with pedigree 0.11, pedigree (1,1,5,1,1)
  Calculated value, required to fulfill the functional unit of one tkm fright transport.
- maintenance, goods wagon: 4.59e-8 unit; lognormal variance with pedigree 0.11, pedigree (1,1,5,1,1)
  Calculated value, required to fulfill the functional unit of one tkm fright transport.
- goods wagon: 4.59e-8 unit; lognormal variance with pedigree 0.11, pedigree (1,1,5,1,1)
  Calculated value, required to fulfill the functional unit of one tkm fright transport.
- maintenance, locomotive: 7.11e-10 unit; lognormal variance with pedigree 0.11, pedigree (1,1,5,1,1)
  Calculated value, required to fulfill the functional unit of one tkm fright transport.
- locomotive: 7.11e-10 unit; lognormal variance with pedigree 0.11, pedigree (1,1,5,1,1)
  Calculated value, required to fulfill the functional unit of one tkm fright transport.
- diesel: 0.00666 kg; lognormal variance with pedigree 0.1613, pedigree (2,3,5,3,1)
  Estimated value. The diesel technology is identical as described in the corresponding dataset for RER but assuming the consumption of diesel per tkm derived from Chinese statistics. However, the original diesel consumption per tkm has been corrected because it is most likely incompatible being only one quarter of the value taken from European statistics assumed in ecoinvent. The correction factor of 2.67 for fuel intensity is the product of two separate sub-factors: 2 to take into account of the fact that coal is transported only one way, and 1/3 to consider the weight of the freight car. In fact the Chinese statistics give on the same page the energy use per tkm, the "Utilization Rate of Loading Capacity of Freight Cars" at an astonishing 98% (definitively unrealistic because coal makes 40% of the total transported goods), and the total mass of loaded freight car "Static Load of Freight Cars (Standard Gauge)" of nearly 60 tonnes of which roughly 20 tonnes must be the car itself.
  Uncertainty: International Rail study
  properties: heating value, net 42.8 MJ, carbon content, fossil 0.865, wet mass 1 kg, dry mass 1 kg
  note on carbon content, fossil: C-content of diesel is 86.5% (ecoinvent v2.2 report 6_IV, Tab 3.14)

## Emissions to nature
- Particulates, > 2.5 um, and < 10um [air, unspecified]: 2.64e-5 kg; lognormal variance with pedigree 0.1627, pedigree (3,3,5,3,1)
  Literature value. Particle size distributions of exhaust emissions and exhaust emission factors [g/kg] for diesel locomotives without particle filters from EU-Norm IIIa. Energy use and operation emissions
  Uncertainty: own calculation base on PM figures of int. Rail study
- Mercury [air, unspecified]: 1.33e-13 kg; source Jungbluth N. 2003; lognormal variance with pedigree 0.716025, pedigree (4,5,5,2,1)
  Literature value from Jungbluth (2003). Energy use and operation emissions
  Uncertainty: expert estimate quoted from literature
- NMVOC, non-methane volatile organic compounds, unspecified origin [air, unspecified]: 3.37e-5 kg; source INFRAS 1999; lognormal variance with pedigree 0.0993, pedigree (2,3,5,3,3)
  Literature value. Average emission factors for Swiss heavy good vehicles (HGV) for urban traffic conditions in 2000 derived from INFRAS (1999). the presented figures of NMVOC emissions still contain emissions of Benzene, Toulol and Xylol. Energy use and operation emissions
  Uncertainty: handbook emission factors for HGV
- Nickel [air, unspecified]: 4.65e-10 kg; source EEA 2000; lognormal variance with pedigree 0.716025, pedigree (4,5,5,2,1)
  Literature value provided by Expert Panel on Heavy Metals and POPs of the UNECE Task Force on Emission Inventories EEA (2000). However, these emission factors have to be considered as preliminary estimates only. More measurements are needed in order to confirm these values. Energy use and operation emissions
  Uncertainty: expert estimate quoted from literature
- Toluene [air, unspecified]: 2.66e-7 kg; source INFRAS 1999; lognormal variance with pedigree 0.1807, pedigree (3,3,5,3,3)
  Literature value. Average emission factors for Swiss heavy good vehicles (HGV) for urban traffic conditions in 2000 derived from INFRAS (1999). Energy use and operation emissions
  Uncertainty: handbook emission factors for HGV
- Sulfur dioxide [air, unspecified]: 3.99e-6 kg; lognormal variance with pedigree 0.0413, pedigree (2,3,5,3,1)
  Estimated value.In this project SO2 indice is estimated assuming that all sulphur in the fuel is transformed completely into SO2. In line with assumptions made for road transport is assumed a sulphur content of 300 ppm resulting in a emission index of 0.6 g/kg. Energy use and operation emissions
  Uncertainty: International Rail study
- Methane, fossil [air, unspecified]: 8.66e-7 kg; source INFRAS 1999; lognormal variance with pedigree 0.0993, pedigree (2,3,5,3,3)
  (same comment as for Toluene)
- Lead [air, unspecified]: 7.29e-13 kg; source Jungbluth N. 2003; lognormal variance with pedigree 0.716025, pedigree (4,5,5,2,1)
  (same comment as for Mercury)
- Particulates, > 10 um [air, unspecified]: 1.92e-5 kg; lognormal variance with pedigree 0.0827, pedigree (3,3,5,3,1)
  (same comment as for Particulates, > 2.5 um, and < 10um)
- Xylene [air, unspecified]: 2.66e-7 kg; source INFRAS 1999; lognormal variance with pedigree 0.1807, pedigree (3,3,5,3,3)
  (same comment as for Toluene)
- Iron [soil, unspecified]: 3.75e-5 kg; lognormal variance with pedigree 0.46, pedigree (5,5,5,5,5)
  Estimated value. Abrasion (from braking lining, rail and wheel) is predominately composed of iron and mineral components BUWAL (2002). In this study is assumed that all non-airborne emissions are emitted as iron to soil. In consequence, is assumed a yearly load of 191.8 t/a iron emitted to soil. Emission of lubricates due to traction are not accounted for, since measures are in operation to avoid such emissions. Energy use and operation emissions Further references: BUWAL (2002) PM10-Emissionen des Verkehrs. Statusbericht; Teil Schienenverkehr. 144. Bundesamt fuer Umwelt, Wald und Landschaft, Bern
  Uncertainty: own calculation based on literature
- Nitrogen oxides [air, unspecified]: 0.000366 kg; source Knörr W. 2000; lognormal variance with pedigree 0.0813, pedigree (2,3,5,3,1)
  Literature value. Figures represent shunting specific emission indices Knörr et al. (2000) and average emission indices for diesel traction J. Borken et al. (2003) Energy use and operation emissions Further references: Borken J., Patyk A. and Reinhardt G. A. (1999) Basisdaten für ökologische Bilanzierungen: Einsatz von Nutzfahrzeugen in Transport, Landwirtschaft und Bergbau. Vieweg, Braunschweig/Wiesbaden
  Uncertainty: International Rail study
- Ammonia [air, unspecified]: 1.33e-7 kg; source INFRAS 1999; lognormal variance with pedigree 0.0993, pedigree (2,3,5,3,3)
  (same comment as for Toluene)
- Copper [air, unspecified]: 1.13e-8 kg; source EEA 2000; lognormal variance with pedigree 0.716025, pedigree (4,5,5,2,1)
  (same comment as for Nickel)
- Particulates, < 2.5 um [air, unspecified]: 8.53e-6 kg; lognormal variance with pedigree 0.3527, pedigree (3,3,5,3,1)
  (same comment as for Particulates, > 2.5 um, and < 10um)
- Benzene [air, unspecified]: 6.66e-7 kg; source INFRAS 1999; lognormal variance with pedigree 0.1793, pedigree (2,3,5,3,3)
  (same comment as for Toluene)
- Cadmium [air, unspecified]: 6.67e-11 kg; source EEA 2000; lognormal variance with pedigree 0.716025, pedigree (4,5,5,2,1)
  (same comment as for Nickel)
- Carbon dioxide, fossil [air, unspecified]: 0.0209 kg; lognormal variance with pedigree 0.0413, pedigree (2,3,5,3,1)
  Estimated value. In this project CO2 indice is estimated assuming that all carbon in the fuel is transformed completely into CO2. For CO2 is employed an emission index of 73.5 g/MJ or 3146 g/kg.Energy use and operation emissions
  Uncertainty: International Rail study
- Zinc [air, unspecified]: 6.67e-9 kg; source EEA 2000; lognormal variance with pedigree 0.716025, pedigree (4,5,5,2,1)
  (same comment as for Nickel)
- Selenium [air, unspecified]: 6.67e-11 kg; source EEA 2000; lognormal variance with pedigree 0.716025, pedigree (4,5,5,2,1)
  (same comment as for Nickel)
- Chromium [air, unspecified]: 3.33e-10 kg; source EEA 2000; lognormal variance with pedigree 0.716025, pedigree (4,5,5,2,1)
  (same comment as for Nickel)
- Carbon monoxide, fossil [air, unspecified]: 0.000105 kg; source Knörr W. 2000; lognormal variance with pedigree 0.6913, pedigree (2,3,5,3,1)
  Literature value. Figures represent shunting specific emission indices from Knörr et al. (2000). Energy use and operation emissions
  Uncertainty: International Rail study
- Dinitrogen monoxide [air, unspecified]: 6.66e-7 kg; source INFRAS 1999; lognormal variance with pedigree 0.0993, pedigree (2,3,5,3,3)
  (same comment as for Toluene)

## Extrapolations
This dataset has been extrapolated from year 2004 to the year of the calculation (2021). The uncertainty has been adjusted accordingly.
