# residential sewer grid construction, 0.087 km

Dataset: EcoSpold 2, unit process
Geography: RoW
Time period: 1996-01-01 to 2021-12-31
Technology level: current
Classification: ISIC rev.4 ecoinvent: 4220:Construction of utility projects
Classification: EcoSpold01Categories: waste management/wastewater treatment
Synonyms: sewer infrastructure for residential building area
Tags: ConvertedDataset
Scenario: Business-as-Usual
System model: Allocation, cut-off by classification
Generated by: Gabor Doka (obsolete)
Published in: Doka G. 2007
Database: ecoinvent
isCopyrightProtected: true
accessRestrictedTo: 1

## General comment
Sewer system for residential building area. Average length 0.087 km. The lifetime is 100 years including a renovation after 70 years.
[This dataset was already contained in the ecoinvent database version 2. It was not individually updated during the transfer to ecoinvent version 3. Life Cycle Impact Assessment results may still have changed, as they are affected by changes in the supply chain, i.e. in other datasets. This dataset was generated following the ecoinvent quality guidelines for version 2. It may have been subject to central changes described in the ecoinvent version 3 change report (http://www.ecoinvent.org/database/ecoinvent-version-3/reports-of-changes/), and the results of the central updates were reviewed extensively. The changes added e.g. consistent water flows and other information throughout the database. The documentation of this dataset can be found in the ecoinvent reports of version 2, which are still available via the ecoinvent website. The change report linked above covers all central changes that were made during the conversion process.]

## Included activities end
Infrastructure materials for private, residential sewer system, transports, dismantling.

## Geography
Specific to the technology mix and human settlement structure encountered in Switzerland around 1996.

## Technology
Underground sewer system with pipes

## Parameters
- fraction, process water, to air: 0.15 dimensionless; name fraction_PW_to_air; lognormal variance with pedigree 0.092025, pedigree (4,4,3,2,4)
- fraction, tap water, to air: 0.15 dimensionless; name fraction_TW_to_air; lognormal variance with pedigree 0.092025, pedigree (4,4,3,2,4)

## Reference product
- residential sewer grid, 0.087 km: 1 km; CPC 53253: Sewage and water treatment plants; By-product classification allocatable product
  production volume 3.96633 km
    This is a placeholder value that does not reflect real-world production volumes. This dataset does not currently require a real-world production volume to work in the database framework, and no actual data were collected yet. This has no negative effect on the results of the ecoinvent database.
  property price 122300 EUR2005
    Calculated based on literature value (PE-80 Pipe Systems: 17 Years of Successful Application in teh Public Sewer Network System of Göttingen, Pipeline Technology 2006 Conferece, http://www.pipeline-conference.com/sites/default/files/papers/124%20Fiedler.pdf). In general the costs for construction and maintenance of sewer grid varies significantly from region to region. In Göttingen app. 700 km of sewers are being managed. The annual investments in maintenance, renewal and construction of new sewer grid are 16 mio. Euro. With a lifetime of 100 years the cost of 1km of sewer grid is estimated to be (16000000*100/700=) 2.29E+06 Euro/km.

## Inputs from technosphere
- gravel, round: 252800 kg; lognormal variance with pedigree 0.3627, pedigree (2,2,5,5,1)
  Data from one inventory study (Labhardt 1996)
  properties: dry mass 1 kg, wet mass 1 kg
- gravel, crushed: 0 kg; pedigree (1,1,1,1,1)
  Data from one inventory study (Labhardt 1996)
  properties: wet mass 1 kg, dry mass 1 kg
- cement, unspecified: 0 kg; pedigree (1,1,1,1,1)
  Data from one inventory study (Labhardt 1996)
  properties: dry mass 1 kg, wet mass 1 kg
- polyvinylchloride, suspension polymerised: 6193.61 kg; lognormal variance with pedigree 0.3627, pedigree (2,2,5,5,1)
  Data from one inventory study (Labhardt 1996)
  properties: carbon content, fossil 0.387097, heating value, net 21.5 MJ, wet mass 1 kg, dry mass 1 kg
  note on carbon content, fossil: Monomer is vynyl chloride, C2H3Cl (ecoinvent v2.2 report 11_II). MW=62 g/mol
- polyethylene, high density, granulate: 19300 kg; lognormal variance with pedigree 0.3627, pedigree (2,2,5,5,1)
  Data from one inventory study (Labhardt 1996)
  properties: dry mass 1 kg, wet mass 1 kg, carbon content, fossil 0.857143, heating value, net 42.47 MJ
  note on carbon content, fossil: Polyethylene is formed out of a huge amount of ethylene monomers (C2H4) (ecoinvent v2.2 report 11_II). MW=28 g/mol
- polyvinylchloride, emulsion polymerised: 906.386 kg; lognormal variance with pedigree 0.3627, pedigree (2,2,5,5,1)
  Data from one inventory study (Labhardt 1996)
  properties: dry mass 1 kg, wet mass 1 kg, carbon content, fossil 0.387097, heating value, net 21.5 MJ
- concrete, normal: 0 m3; pedigree (1,1,1,1,1)
  Data from one inventory study (Labhardt 1996)
  properties: water content 0.086758, wet mass 2380 kg, dry mass 2190 kg
- waste polyethylene: 0 kg; pedigree (1,1,1,1,1)
  Data from one inventory study (Labhardt 1996)
  production volume 0 kg
    Calculated from the production volume of residential sewer grid, 0.087 km in proportion to the respective output amounts.
  properties: dry mass 0.996 kg, water content 0.00401606, wet mass 1 kg, carbon content, fossil 0.825301, heating value, net 42.47 MJ
  note on carbon content, fossil: C content in 1 kg DM was calculated using data in Tab A.1, ecoinvent v2.2 report 13_I
  note on heating value, net: Value taken from the general comment of the treatment dataset.
- electricity, medium voltage: 0 kWh; pedigree (1,1,1,1,1)
  Data from one inventory study (Labhardt 1996)
- waste concrete, not reinforced: 0 kg; pedigree (1,1,1,1,1)
  Data from one inventory study (Labhardt 1996)
  production volume 0 kg
    (same comment as for waste polyethylene)
  properties: wet mass 1 kg, dry mass 1 kg
- sand: 0 kg; pedigree (1,1,1,1,1)
  Data from one inventory study (Labhardt 1996)
  properties: dry mass 1 kg, wet mass 1 kg
- excavation, hydraulic digger: 6450 m3; lognormal variance with pedigree 0.3627, pedigree (2,2,5,5,1)
  Data from one inventory study (Labhardt 1996)
- waste polyvinylchloride: 0 kg; pedigree (1,1,1,1,1)
  Data from one inventory study (Labhardt 1996)
  production volume 0 kg
    (same comment as for waste polyethylene)
  properties: water content 0.00200401, dry mass 0.998 kg, wet mass 1 kg, carbon content, fossil 0.440882, heating value, net 21.51 MJ
- cast iron: 5130 kg; lognormal variance with pedigree 0.3627, pedigree (2,2,5,5,1)
  Data from one inventory study (Labhardt 1996)
  properties: carbon content, fossil 0.04, dry mass 1 kg, wet mass 1 kg
  note on carbon content, fossil: Cast iron is made by remelting pig iron in small furnaces (e.g. cupola furnaces or electric arc furnaces) and poured into moulds to make castings. It usually contains 2% to 6% carbon (ecoinvent v2.2 report 10_partII). An average content of 4% was considered
- diesel, burned in building machine: 42200 MJ; lognormal variance with pedigree 0.3627, pedigree (2,2,5,5,1)
  Data from one inventory study (Labhardt 1996)
  properties: heating value, net 1 MJ
- tap water: 0 kg; name tap_water_input; pedigree (1,1,1,1,1)
  Data from one inventory study (Labhardt 1996)
  properties: dry mass 0.000337476 kg, wet mass 1 kg, water content 2962.17, carbon content, fossil 0.00178991
  note on carbon content, fossil: Bicarbonate content is 2.93 mol/m3. CO2 content is 0.1 mol/m3 (ecoinvent v2.2 report 8, Tab 93.1).
- gravel, crushed: 2891.39, 264.706, 13236.7, 50807.2 kg (4 entries); lognormal variance with pedigree 0.3627, pedigree (2,2,5,5,1)
  Data from one inventory study (Labhardt 1996)
- cement, unspecified: 3754.29, 781.156, 57.2143, 163.08, 3688.1, 108.551, 1192.22, 144.245, 16111.2 kg (9 entries); lognormal variance with pedigree 0.3627, pedigree (2,2,5,5,1)
  Data from one inventory study (Labhardt 1996)
- concrete, normal: 5.97091, 0.622161, 5.03683, 2.83322, 11.9979, 0.404681, 237.134 m3 (7 entries); lognormal variance with pedigree 0.3627, pedigree (2,2,5,5,1)
  Data from one inventory study (Labhardt 1996)
- waste polyethylene: -2146.97, -143.452, -10.8491, -59.2509, -23.9367, -56.2642, -1829.32, -15030 kg (8 entries); lognormal variance with pedigree 0.3627, pedigree (2,2,5,5,1)
  Data from one inventory study (Labhardt 1996)
  production volume 57900 kg
- electricity, medium voltage: 59.9106, 11.4883, 263.789, 873.358, 192.864, 2805.04, 395.372, 1288.18 kWh (8 entries); lognormal variance with pedigree 0.3627, pedigree (2,2,5,5,1)
  Data from one inventory study (Labhardt 1996)
- waste concrete, not reinforced: -60634.9, -865365 kg (2 entries); lognormal variance with pedigree 0.3627, pedigree (2,2,5,5,1)
  Data from one inventory study (Labhardt 1996)
  production volume 2.778e6 kg
- sand: 3041.72, 15.7912, 197942 kg (3 entries); lognormal variance with pedigree 0.3627, pedigree (2,2,5,5,1)
  Data from one inventory study (Labhardt 1996)
- waste polyvinylchloride: -789.817, -52.7725, -3.9911, -21.7969, -8.80572, -20.6982, -672.961, -5529.16 kg (8 entries); lognormal variance with pedigree 0.3627, pedigree (2,2,5,5,1)
  Data from one inventory study (Labhardt 1996)
  production volume 21300 kg
- tap water: 29527.5, 3554.32, 5874.1, 1.26308e6, 148122, 3853.34, 10960.8, 1.69503e6 kg (8 entries); lognormal variance with pedigree 0.3627, pedigree (2,2,5,5,1)
  Data from one inventory study (Labhardt 1996)

## Emissions to nature
- Water [water, unspecified]: 2686 m3; name water_to_water_unspecified; lognormal variance with pedigree 0.0827, pedigree (2,2,5,5,1)
  Calculated value based on literature values and expert opinion. See comments in the parametres' comment field.
  property wet mass 1000 kg; name WM
  property water in wet mass 1000 kg; name WWM
  property dry mass 0 kg; name DM
  property fraction, origin: salt water 0; name fraction_origin_salt_water_Ww
  property carbon content, fossil 0; name C_content_fossil
  property fraction, origin: unspecified 0; name fraction_origin_unspecified_Ww
  property carbon content, non-fossil 0; name C_content_non_fossil
  property fraction, origin: fresh water 1; name fraction_origin_fresh_water_Ww
- Water [air, unspecified]: 474 m3; name water_to_air_unspecified; lognormal variance with pedigree 0.0827, pedigree (2,2,5,5,1)
  (same comment as for Water)
  property fraction, origin: fresh water 1; name fraction_origin_fresh_water
  property fraction, origin: salt water 0; name fraction_origin_salt_water
  property fraction, origin: unspecified 0; name fraction_origin_unspecified

## Sampling procedure
data from literature

## Extrapolations
This dataset has been copied from an original dataset covering the geography CH. The uncertainty has been adjusted accordingly.

## Review by Niels Jungbluth 2003-06-11
Passed.
