# glucose production

Dataset: EcoSpold 2, unit process
Geography: GLO
Time period: 2015-01-01 to 2021-12-31
Technology level: current
Classification: ISIC rev.4 ecoinvent: 1062:Manufacture of starches and starch products
Synonyms: Glucopyranose, alpha-D-; 492-62-6; Alpha-D-Glucopyranose; Alpha-D-glucose; Alpha-glucose; Alpha-Dextrose
Scenario: Business-as-Usual
System model: Allocation, cut-off by classification
Generated by: Lucia Valsasina
Database: ecoinvent
isCopyrightProtected: true
accessRestrictedTo: 1

## General comment
This activity represents the production of 1 kg of glucose. Input data to formulate this activity originate from Martin Chaplin (2004) and Dunn et al. (2012).
Glucose is a monosaccharides with chemical formula is C6H12O6.
Glucose is
References:
Jennifer B. Dunn, Steffen Mueller, Michael Wang and Jeongwoo Han, 2012, Energy consumption and greenhouse gas emissions from enzyme and yeast manufacture for corn and cellulosic ethanol production. Biotechnology letters, DOI 10.1007/s10529-012-1057-6
Martin Chaplin, 2004, Enzyme Technology - The use of enzymes in starch hydrolysis. Retrieved from: http://www1.lsbu.ac.uk/water/enztech/starch.html on 15 of July 2017.
For more information on the model please refer to the dedicate ecoinvent report, access it in the Report section of ecoQuery (http://www.ecoinvent.org/login-databases.html)

## Included activities start
The activity starts when the raw materials enter the process.

## Included activities end
Materials entering the process are included as well as energy uses, infrastructure and emissions.

## Geography
The inputs of heat, electricity, water, factory and nitrogen are mostly taken as average of industry data. Industry data values are a 5-year average of data (2011 - 2015) published by the Gendorf factory (Gendorf, 2016, Umwelterklärung, www.gendorf.de), (Gendorf, 2015, Umwelterklärung, www.gendorf.de), (Gendorf, 2014, Umwelterklärung, www.gendorf.de). The Gendorf factory is based in Germany, it produces a wide range of chemical substances. The factory produced 1657400 tonnes of chemical substances in the year 2015 (Gendorf, 2016, Umwelterklärung, www.gendorf.de) and 740000 tonnes of intermediate products. Given the range of chemicals produced by the german site, the values are used for the GLO geography, with uncertainty adjusted accordingly.

## Technology
This activity represents the production of glucose in a total enzymatic process. Starch is sacharified in 60 degrees celcius and pH 4.5. The main enzyme present in this proces is glucoamylase in a concentration of 0.61 kg of enzyme per kg of dry matter substrate. The fermentation needs approximately 72 hours. The process consumes heat and electricity mostly to create ideal conditions for the enzymes.
Reference:
Jennifer B. Dunn, Steffen Mueller, Michael Wang and Jeongwoo Han, 2012, Energy consumption and greenhouse gas emissions from enzyme and yeast manufacture for corn and cellulosic ethanol production. Biotechnology letters, DOI 10.1007/s10529-012-1057-6
Martin Chaplin, 2004, Enzyme Technology - The use of enzymes in starch hydrolysis. Retrieved from: http://www1.lsbu.ac.uk/water/enztech/starch.html on 15 of July 2017.
For more information on the model please refer to the dedicate ecoinvent report, access it in the Report section of ecoQuery (http://www.ecoinvent.org/login-databases.html)

## Time period
The activity is based on literature data from the year 2014 and it is therefore considered to be valid for the indicated time period (2015-2020). The inputs of heat, electricity, water, factory and nitrogen are mostly taken as average of industry data. Industry data values are a 5-year average of data (2011 - 2015) published by the Gendorf factory (Gendorf, 2016, Umwelterklärung, www.gendorf.de), (Gendorf, 2015, Umwelterklärung, www.gendorf.de), (Gendorf, 2014, Umwelterklärung, www.gendorf.de). The Gendorf factory is based in Germany, it produces a wide range of chemical substances. The factory produced 1657400 tonnes of chemical substances in the year 2015 (Gendorf, 2016, Umwelterklärung, www.gendorf.de) and 740000 tonnes of intermediate products. The time period is therefore set based on the years from Gendorf reference.

## Reference product
- glucose: 1 kg; name RP; CPC 23210: Glucose and glucose syrup; fructose and fructose syrup; lactose and lactose syrup; invert sugar; sugars and su[…]; By-product classification allocatable product
  Glucose is a monosaccharides with chemical formula is C6H12O6.
  production volume 2.17687e10 kg; name RP_PV; = 3200000000/0.147
    Estimated value. The Global production volume is extrapolated from the United States production volume based on reports from Cefic (European Chemical Industry Council), and the American Chemistry Council.
    According to Cefic (2016) the Global sales of chemicals in the year 2015 was 3 534 billion euros. The reported share of sales per regions are: EU28 14.7%; Other Europe (Switzerland, Norway, Turkey, Russia and Ukraine) 2.7%; NAFTA (US, Canada and Mexico) 16.5%; Latin America 3.8%; China 39.9%; Japan 3.9%; Republic of Korea 3.2%; India 2.2%; Rest of Asia 11.9%; Rest of the World 1.3%. Cefic also reports the US total sales, 518.7 billion euros of the global 3 534 billion euros (14.7%). The same share is reported from the American Chemistry Council (2016), according to this source the USA sales account for 15% of global sales for the year 2016.
    According to 'Ullmann's encyclopedia of industrial chemistry' the US production of glucose in 1996 was 3 200 000 tonnes. Since no data were found for the global production this value was scaled accordingly.
    Reference(s):
    Cefic 2016. Facts and figures 2016 of the European chemical industry. Accessible at: http://www.cefic.org/Facts-and-Figures/Chemicals-Industry-Profile/
    American Chemistry Council 2016. Outlook: U.S. Chemical Industry Continues to Outpace Industrial Output; Accounts for More Than One-Half of Construction Spending by Manufacturing Sector. Accessible at: https://www.americanchemistry.com/Media/PressReleasesTranscripts/ACC-news-releases/US-Chemical-Industry-Continues-to-Outpace-Industrial-Output.html
    Schenck, F. W. 2006. Glucose and Glucose-Containing Syrups. Ullmann's Encyclopedia of Industrial Chemistry.
  property heating value, net 20.19 MJ
    LHV is calculated based on the elemental composition of the substance. Based on the CAS number of the substance (000050-99-7), the chemical formula of the substance is found to be: C6H12O6, (PubChem 2020).
    Reference: Kim, S., Chen, J., Cheng, T., Gindulyte, A., He, J., He, S., Li, Q., Shoemaker, B. A., Thiessen, P. A., Yu, B., Zaslavsky, L., Zhang, J., & Bolton, E. E. (2019). PubChem 2019 update: improved access to chemical data. Nucleic acids research, 47(D1), D1102–D1109. https://doi.org/10.1093/nar/gky1033
  property price 0.55 EUR2005; name RP_price_EUR2005
    Estimated value. This price is averaged from 3 different suppliers available in the commercial webstore of alibaba. The price refers to a bulk quantity purchase. All websites were retrieved on the 19th Sept 2017. THe exchange rate used is from 2010 when 1 USD - 0.755 EUR.
    Price range:
    supplier 1: 500-800 $ per ton, https://www.alibaba.com/product-detail/Made-in-China-white-powder-D_60722176880.html?spm=a2700.7724838.2017115.1.3c93b095noQeHG
    supplier 2: 0.1-1,080 $ per ton, https://www.alibaba.com/product-detail/Chemical-reagent-high-purity-Glucose_60726433628.html?spm=a2700.7724838.2017115.33.3c93b095noQeHG&s=p
    supplier 3: 400-600 $ per ton, https://www.alibaba.com/product-detail/Beverage-industry-pure-glucose_60680201154.html?spm=a2700.7724838.2017115.41.3c93b095noQeHG&s=p
  property carbon content 0.400016
    carbon content on a dry matter basis (reserved; not for manual entry)
  properties: water content 0, water in wet mass 0 kg, dry mass 1 kg, carbon content, fossil 0, carbon content, non-fossil 0.400016, wet mass 1 kg, carbon allocation 0.400016 kg

## Inputs from technosphere
- heat, district or industrial, natural gas: 2.15 MJ; lognormal variance with pedigree 0.0106, pedigree (2,3,2,4,3)
  Calculated based on literature data published by the industry. This value is a 5-year average of data (2011 - 2015) published by the Gendorf factory (Gendorf, 2016, Umwelterklärung, www.gendorf.de), (Gendorf, 2015, Umwelterklärung, www.gendorf.de), (Gendorf, 2014, Umwelterklärung, www.gendorf.de). The amount of heat used per kg of chemical substance produced is calculated using literature data published by the Gendorf factory based in Germany, which produces a wide range of chemical substances. The factory produced 1657400 tonnes of chemical substances in the year 2015 (Gendorf, 2016, Umwelterklärung, www.gendorf.de) and 740000 tonnes of intermediate products. The amount of heat in the year 2015 was 523500 GJ (Gendorf, 2016, Umwelterklärung, www.gendorf.de) of which 90% was obtained from natural gas and 10% from steam. The resulting amount of heat from natural gas is 2.02 MJ/kg of chemical product produced. The 5-year average (2011 - 2015, weighted by production volume) is 2.15 MJ/kg. Cross-reference: the amount of chemicals produced (excluding intermediate products) in the EU-28 in the year 2011 was 327 million tonnes (Eurostat, http://ec.europa.eu/eurostat/statistics-explained/index.php/Chemicals_production_statistics, accessed 20170126). The chemical and petrochemical industry sector consumed 2.33 EJ of energy in 2011 (European Commission - Joint Research Centre, 2014, BAT on Common Waste water and Waste Gas Treatment/Management Systems in the Chemical Sector). The resulting energy (both heat and electricity) consumed per kg of chemicals produced in 2011 is thus 7.13 MJ/kg. This is higher than the value calculated using data published by Gendorf – 3.85 MJ/kg, but that is to be expected as the intermediate products are not accounted for.
  properties: heating value, net 1 MJ
- chemical factory, organics: 4e-10 unit; lognormal variance with pedigree 0.31, pedigree (2,3,2,4,3)
  Calculated based on literature data published by the industry. For this activity, no information was readily available concerning infrastructure and land-use. Therefore, the infrastructure is estimated based on data from two chemical factories, the BASF site of Ludwigshafen and the chemical factory in Gendorf (which are both located in Germany), which produce a wide range of chemical substances. Based on this data, the following assumptions are made: the built area amounts to about 4.2 ha, the plant has an average output of 50'000 t/a and a lifespan of fifty years. The estimated infrastructure amount is therefore 4.00 E-10 units per kg of produced chemical.
  References:
  Althaus H.-J., Chudacoff M., Hischier R., Jungbluth N., Osses M. and Primas A. (2007) Life Cycle Inventories of Chemicals. ecoinvent report No. 8, v2.0. EMPA Dübendorf, Swiss Centre for Life Cycle Inventories, Dübendorf, CH.
  Gendorf (2000) Umwelterklärung 2000, Werk Gendorf. Werk Gendorf, Burgkirchen.
- maize starch: 0.9 kg; lognormal variance with pedigree 0.0106, pedigree (2,3,2,4,3)
  Literature value. Value from Ana C. A. Lages, Steven R. Tannenbaum, 2006, Production of Glucose from Tapioca (Cassava Starch) and Farinha de Mandioca (Cassava Meal). Journal of Food Science, DOI: 10.1111/j.1365-2621.1978.tb02474.x
  properties: dry mass 0.86 kg, water content 0.162791, wet mass 1 kg, carbon content, non-fossil 0.46, heating value, net 11.64 MJ
  note on carbon content, non-fossil: C-content of starch is considered 46% on dry mass basis (from 'Evolutionary and Biochemical Aspects', A.D. Kay and T. Vrede (in Global Ecology, 2010, Elsevier B.V., S.E. Jørgensen Ed.)).
- electricity, medium voltage: 0.416 kWh; lognormal variance with pedigree 0.0106, pedigree (2,3,2,4,3)
  Calculated based on literature data published by the industry. This value is a 5-year average of data (2011 - 2015) published by the Gendorf factory (Gendorf, 2016, Umwelterklärung, www.gendorf.de), (Gendorf, 2015, Umwelterklärung, www.gendorf.de), (Gendorf, 2014, Umwelterklärung, www.gendorf.de). The amount of electricity per kg of chemical substance produced is calculated using literature data published by the Gendorf factory based in Germany, which produces a wide range of chemical substances. The factory produced 1657400 tonnes of chemical substances in the year 2015 (Gendorf, 2016, Umwelterklärung, www.gendorf.de) and 740000 tonnes of intermediate products. The amount of electricity consumed in the year 2015 was 3498800 GJ (Gendorf, 2016, Umwelterklärung, www.gendorf.de). The resulting amount of electricity is 0.406 kWh/kg (year 2015) of chemical substance produced. The 5-year average (2011 - 2015, weighted by production volume) is 0.416 kWh/kg (1.5 MJ/kg). Cross-reference: the amount of chemicals produced (excluding intermediate products) in the EU-28 in the year 2011 was 327 million tonnes (Eurostat, http://ec.europa.eu/eurostat/statistics-explained/index.php/Chemicals_production_statistics, accessed 20170126). The chemical and petrochemical industry sector consumed 2.33 EJ of energy in 2011 (European Commission - Joint Research Centre, 2014, BAT on Common Waste water and Waste Gas Treatment/Management Systems in the Chemical Sector). The resulting energy (both heat and electricity) consumed per kg of chemicals produced in 2011 is thus 7.13 MJ/kg. This is higher than the value calculated using data published by Gendorf – 3.85 MJ/kg, but that is to be expected as the intermediate products are not accounted for.
- heat, from steam, in chemical industry: 0 MJ; pedigree (1,1,1,1,1)
  Calculated based on literature data published by the industry. This value is a 5-year average of data (2011 - 2015) published by the Gendorf factory (Gendorf, 2016, Umwelterklärung, www.gendorf.de), (Gendorf, 2015, Umwelterklärung, www.gendorf.de), (Gendorf, 2014, Umwelterklärung, www.gendorf.de). The amount of heat used per kg of chemical substance produced is calculated using literature data published by the Gendorf factory based in Germany, which produces a wide range of chemical substances. The factory produced 1657400 tonnes of chemical substances in the year 2015 (Gendorf, 2016, Umwelterklärung, www.gendorf.de) and 740000 tonnes of intermediate products. The amount of heat in the year 2015 was 523500 GJ (Gendorf, 2016, Umwelterklärung, www.gendorf.de) of which 90% was obtained from natural gas and 10% from steam. The resulting amount of heat from steam is 0.22 MJ/kg of chemical product produced. The 5-year average (2011 - 2015, weighted by production volume) is 0.20 MJ/kg. Cross-reference: the amount of chemicals produced (excluding intermediate products) in the EU-28 in the year 2011 was 327 million tonnes (Eurostat, http://ec.europa.eu/eurostat/statistics-explained/index.php/Chemicals_production_statistics, accessed 20170126). The chemical and petrochemical industry sector consumed 2.33 EJ of energy in 2011 (European Commission - Joint Research Centre, 2014, BAT on Common Waste water and Waste Gas Treatment/Management Systems in the Chemical Sector). The resulting energy (both heat and electricity) consumed per kg of chemicals produced in 2011 is thus 7.13 MJ/kg. This is higher than the value calculated using data published by Gendorf – 3.85 MJ/kg, but that is to be expected as the intermediate products are not accounted for.
  properties: heating value, net 1 MJ
- enzymes: 0.00033 kg; lognormal variance with pedigree 0.0106, pedigree (2,3,2,4,3)
  Calculated value. According to Chaplin (2004), enzyme dose is 0.5-0.6 kg tonne-1 (about 1500 U kg-1 dry matter) of starch.
  Reference:
  Martin Chaplin, 2004, Enzyme Technology - The use of enzymes in starch hydrolysis. Retrieved from: http://www1.lsbu.ac.uk/water/enztech/starch.html on 15 of July 2017.
  properties: dry mass 1 kg, wet mass 1 kg
- wastewater, average: 0 m3; name BP_wastewater_average; pedigree (1,1,1,1,1)
  Calculated based on literature data published by the industry. This value is a 5-year average of data (2011 - 2015) published by the Gendorf factory (Gendorf, 2016, Umwelterklärung, www.gendorf.de), (Gendorf, 2015, Umwelterklärung, www.gendorf.de), (Gendorf, 2014, Umwelterklärung, www.gendorf.de). The amount of wastewater (which is later on treated in the municipal WWTP) per kg of chemical substance produced is calculated using literature data published by the Gendorf factory based in Germany, which produces a wide range of chemical substances. The factory produced 1657400 tonnes of chemical substances in the year 2015 (Gendorf, 2016, Umwelterklärung, www.gendorf.de) and 740000 tonnes of intermediate products. The amount of wastewater which is later on treated in the municipal WWTP in the year 2015 was 1200 tonnes (Gendorf, 2016, Umwelterklärung, www.gendorf.de). The resulting amount of wastewater is 2.7E-06 m3/kg of chemical product produced.
  production volume 0 m3
    Calculated from the production volume of the reference product in proportion to the respective output amounts.
  property price 0 EUR2005; name BP_wastewater_average_price_EUR2005
  properties: water content 2882.2, wet mass 1000 kg, dry mass 0.346837 kg, carbon content, non-fossil 0.194039
  note on carbon content, non-fossil: 0.0673 kg TOC/m3 (Tab A.17, ecoinvent v2.2 report 13_I). TOC was considered as Total Carbon.
- tap water: 0.315 kg; name tap_w; lognormal variance with pedigree 0.0106, pedigree (2,3,2,4,3)
  (same comment as for maize starch)
  properties: wet mass 1 kg, carbon content, fossil 0.00178991, water content 2962.17, dry mass 0.000337476 kg
  note on carbon content, fossil: Bicarbonate content is 2.93 mol/m3. CO2 content is 0.1 mol/m3 (ecoinvent v2.2 report 8, Tab 93.1).
- heat, from steam, in chemical industry: 0.0299772, 0.170023 MJ (2 entries); lognormal variance with pedigree 0.0106, pedigree (2,3,2,4,3)
  (same comment as for heat, from steam, in chemical industry)
- wastewater, average: -8.43646e-7, -9.12666e-8, -1.76509e-6 m3 (3 entries); lognormal variance with pedigree 0.0106, pedigree (2,3,2,4,3)
  (same comment as for wastewater, average)
  production volume 58775.5 m3

## Inputs from nature
- Water, cooling, unspecified natural origin [natural resource, in water]: 0.0164 m3; name water_c; lognormal variance with pedigree 0.0106, pedigree (2,3,2,4,3)
  Calculated based on literature data published by the industry. This value is a 5-year average of data (2011 - 2015) published by the Gendorf factory (Gendorf, 2016, Umwelterklärung, www.gendorf.de), (Gendorf, 2015, Umwelterklärung, www.gendorf.de), (Gendorf, 2014, Umwelterklärung, www.gendorf.de). The amount of water for cooling extracted per kg of chemical substance produced is calculated using literature data published by the Gendorf factory based in Germany, which produces a wide range of chemical substances. The factory produced 1657400 tonnes of chemical substances in the year 2015 (Gendorf, 2016, Umwelterklärung, www.gendorf.de) and 740000 tonnes of intermediate products. The reported amounts of water extracted as groundwater and surface water (river) are assumed to be used entirely for cooling purposes.
- Water, river [natural resource, in water]: 0.00086 m3; name water_r; lognormal variance with pedigree 0.0106, pedigree (2,3,2,4,3)
  Calculated based on literature data published by the industry. This value is a 5-year average of data (2011 - 2015) published by the Gendorf factory (Gendorf, 2016, Umwelterklärung, www.gendorf.de), (Gendorf, 2015, Umwelterklärung, www.gendorf.de), (Gendorf, 2014, Umwelterklärung, www.gendorf.de). The amount of groundwater and surface water (river) extracted per kg of chemical substance produced is calculated using literature data published by the Gendorf factory based in Germany, which produces a wide range of chemical substances. The factory produced 1657400 tonnes of chemical substances in the year 2015 (Gendorf, 2016, Umwelterklärung, www.gendorf.de) and 740000 tonnes of intermediate products. The amount of groundwater and surface water (river) extracted in the year 2015 was 19950000 tonnes and 21488100 tonnes respectively (Gendorf, 2016, Umwelterklärung, www.gendorf.de).
- Water, well, in ground [natural resource, in water]: 0.00083 m3; name water_w; lognormal variance with pedigree 0.0106, pedigree (2,3,2,4,3)
  (same comment as for Water, river)

## Emissions to nature
- Water [water, unspecified]: 0.00147218 m3; = (( water_c+ water_r+ water_w)+( tap_w/1000)- (BP_wastewater_average*-1))*8%; lognormal variance with pedigree 0.0106, pedigree (2,3,2,4,3)
  Calculated value. The value is calculated as the sum of water input minus wastewater, times fraction going to ait (8%) or to water (92%). Assumption of amount of wastewater and of fraction goinf to air and water are from a generic model. The basic principles of the model have been published in literature (Hischier 2005, Establishing Life Cycle Inventories of Chemicals Based on Differing Data Availability). The model has been updated and extended with newly available data from the chemical industry. Find more information in the dedicated report on the ecoinvent website.
  Reference(s):
  Hischier, R. (2005) Establishing Life Cycle Inventories of Chemicals Based on Differing Data Availability (9 pp). The International Journal of Life Cycle Assessment, Volume 10, Issue 1, pp 59–67. 10.1065/lca2004.10.181.7
- Nitrogen [air, unspecified]: 0.019 kg; lognormal variance with pedigree 0.0106, pedigree (2,3,2,4,3)
  Calculated value. The amount of nitrogen released to air is equal to the amount of nitrogen entering the activity.
- Water [air, unspecified]: 0.0169301 m3; = (( water_c+ water_r+ water_w)+( tap_w/1000)- (BP_wastewater_average*-1))*92%; lognormal variance with pedigree 0.0106, pedigree (2,3,2,4,3)
  (same comment as for Water)

## Sampling procedure
Literature data.

## Extrapolations
This dataset has been extrapolated from year 2020 to the year of the calculation (2021). The uncertainty has been adjusted accordingly.

## Review by Emilia Moreno Ruiz 2017-08-10
This dataset was additionally reviewed in a separate review process by Eric Johnson of Atlantic Consulting as well as Emilia Moreno Ruiz and Gregor Wernet of ecoinvent.
