# peach production

Dataset: EcoSpold 2, unit process
Geography: ES
Time period: 2009-01-01 to 2021-12-31
Technology level: current
Classification: ISIC rev.4 ecoinvent: 0124:Growing of pome fruits and stone fruits
Tags: WFLDB
Scenario: Business-as-Usual
System model: Allocation, cut-off by classification
Generated by: Tuija Waldvogel
Published in: Nemecek T. 2015
Database: ecoinvent
isCopyrightProtected: true
accessRestrictedTo: 1

## General comment
This dataset represents the production of 1 kg of peach. The average yield from 2009-2012 is 27 t/ha. The data are representative for peach production in Spain used for the export market. Mineral NPK fertiliser input is 14-55-90 kg/ha. No organic fertilisers are applied. Total active ingredients (a.i.) applied as pesticides amount to 12.71 kg a.i./ha.
The dataset was modelled within the project 'World Food LCA database (WFLDB)'. The aim of this project was to provide inventories of a broad variety of agricultural products and processes and to cover for each product at least 50% of the global export market. The export share of peaches produced in Spain amounts to 34% of the global export (tonnage exported in 2010). The production system regarded in this dataset aimed at representing peaches produced in Spain for the export market.
PEF-Quality: data quality rating (DQR) = 2.8 (i.e. good quality). This dataset refers to an average situation; for specific situations exchanges might differ substantially due to site specific parameters

## Included activities start
This activity starts with the nursery producing fruit tree seedlings, i.e. grafted young trees to be planted.

## Included activities end
This activity ends with the waste treatment after the clearing of the orchard (rooting up the trees). The dataset includes all activities of a year in the productive phase of the orchard including the establishment phase per year of lifetime (19 years, 1500 trees/ha planted), the clearing of the orchard including waste treatment.
The establishment phase of the orchard includes tree nursery, soil cultivation, planting trees, sowing grass, installation of trellis system (posts and wires) and irrigation. Fertiliser and pesticide use in a year of the establishment phase is assumed to be half of the amount of a year in the productive phase.
The productive phase of the orchard includes machine operations, corresponding infrastructure, fuel use and sheds. Machine operations in the productive phase are: soil cultivation (mulching, mowing), fertiliser and pesticide application, harvesting and irrigation. Further, direct field emissions and land use change are included. At the end of the productive phase the orchard is cleared by rooting up the trees.
Heavy metal uptake by the crop is considered.
The inputs of seedlings, fertilisers and pesticides as well as packaging of fertilisers and pesticides are considered.

## Technology
Conventional production

## Parameters
- heavyMetalUptakeSwitch: 1 dimensionless
- LUC_crop_specific: 1 dimensionless
  This parameter allows to switch between a 'crop specific' and a 'country specific' approach when calculating the LUC of a crop. By default, the chosen approach is 'crop specific', so the value of the parameter is 1. If you want to apply a 'country specific' approach, turn the parameter to 0.

## Reference product
- peach: 1 kg; CPC 01345: Peaches and nectarines; By-product classification allocatable product
  Reference flow: Yield = 27000 kg/ha table fruit quality
  production volume 1.25725e9 kg
    Source: FAOSTAT. Average, 2009-2012
  property price 1.04 EUR2005
    Calculated value based on data from United Nations Commodity Trade Statistics Database (comtrade.un.org). UN comtrade category: 80930 Peaches, nectarines, fresh. Year: 2005. Using exchange rate of 1EURO = 1.209 USD. Average of price of import into 5 main markets (EU, US, JP, IN and CN).
  property carbon content, non-fossil 0.412732
    calculation: C-content of components according to ecoinvent report No. 15a. Source of composition: Souci, S.W., Fachmann, W., Kraut, H. (Hg.: Bundesminsiterium fur Ernahrung, Landwirtschaft und Forsten, Bonn) 'Die Zusammensetzung der Lebensmittel - Nahrwerttabellen', medpharm Scientific Publishers Stuttgart, CRC Press; 2000.
  property carbon content 0.412732
    carbon content on a dry matter basis (reserved; not for manual entry)
  properties: water content 0.873, dry mass 0.533903 kg, carbon content, fossil 0, wet mass 1 kg, water in wet mass 0.466097 kg, carbon allocation 0.220359 kg

## Inputs from technosphere
- potassium sulfate: 0.0017994 kg; source Luis Angel Lopez 2015; lognormal variance with pedigree 0.124177, pedigree (2,1,4,1,1)
  The exchange has been updated from 'potassium sulfate, as K2O' into 'potassium sulfate' and therefore its amount has been scaled (multiplied) from 0.001 kg by 1.85 kg of 'potassium sulfate' per kg of 'potassium sulfate, as K2O'. Original comment of the exchange is: Calculated based on literature values or expert estimation: The total amount of nutrient (Personal written communication, Luis Angel Lopez, Yara, 2015) multiplied by the share of fertiliser type (Personal written communication, Luis Angel Lopez, Yara, 2015). See supporting documentation 'WFLDB-Documentation.pdf' chapter 'Fertiliser application' for L3 and L4 data (https://ecoquery.ecoinvent.org/File/Reports).
  Corresponds to 26.3 kg/ha
  properties: wet mass 1 kg, dry mass 1 kg
- application of plant protection product, by field sprayer: 0.000259259 ha; lognormal variance with pedigree 0.124664, pedigree (2,2,4,1,1)
  Proxy from Apricot FR. Field sprayer used as a proxy for pesticide application in orchards. Corresponds to 7 applications per year.
- mowing, by motor mower: 0.000148148 ha; lognormal variance with pedigree 0.124177, pedigree (2,1,4,1,1)
  Proxy from Apricot FR
- mulching: 3.7037e-5 ha; lognormal variance with pedigree 0.124177, pedigree (2,1,4,1,1)
  Proxy from Apricot FR
- transport, tractor and trailer, agricultural: 0.002 metric ton*km; lognormal variance with pedigree 0.162439, pedigree (4,1,4,1,1)
  On-farm transport: Yield (in tonnes) multiplied by the average distance from field to farm. The distance was assumed to be 2 km (proxy).
- cyclic N-compound: 0.000144528 kg; lognormal variance with pedigree 0.0138498, pedigree (2,2,4,1,1)
  Proxy: Source for total amount of pesticides: extrapolated with MEXALCA. Active ingredient is calculated based on Ecoinvent dataset Apricots FR. For calculations see supporting documentation 'WFLDB-Documentation.pdf' (https://ecoquery.ecoinvent.org/File/Reports).
  properties: dry mass 1 kg, carbon content, fossil 0.641962, wet mass 1 kg
- phthalimide-compound: 0.000297803 kg; lognormal variance with pedigree 0.0138498, pedigree (2,2,4,1,1)
  (same comment as for cyclic N-compound)
  properties: carbon content, fossil 0.361204, wet mass 1 kg, dry mass 1 kg
- phenoxy-compound: 5.26367e-6 kg; lognormal variance with pedigree 0.0138498, pedigree (2,2,4,1,1)
  (same comment as for cyclic N-compound)
  properties: wet mass 1 kg, carbon content, fossil 0.532559, dry mass 1 kg
- glyphosate: 2.32204e-5 kg; lognormal variance with pedigree 0.0138498, pedigree (2,2,4,1,1)
  (same comment as for cyclic N-compound)
  properties: carbon content, fossil 0.214286, dry mass 1 kg, wet mass 1 kg
- planting tree: 0.00292396 unit; lognormal variance with pedigree 0.124177, pedigree (2,1,4,1,1)
  Proxy: Similar crop and country used. This is the number of trees per ha divided by the lifetime years of the orchard.
- land use change, perennial crop: 3.37037e-6 ha; = 3.37037037037e-06*LUC_crop_specific+0.0*(1-LUC_crop_specific)
  Calculated value. Land use change (LUC) combines land transformation areas calculated with the adapted 'Direct Land Use Change Assessment Tool' version 2014 developed by Blonk Consultants and the carbon losses from soil organic carbon (SOC) and vegetation (VEG) as calculated in ecoinvent v3. See 'WFLDB-Guidelines.pdf', available at https://ecoquery.ecoinvent.org/File/Reports.
- ammonium nitrate: 0.000276313 kg; source Luis Angel Lopez 2015; lognormal variance with pedigree 0.124177, pedigree (2,1,4,1,1)
  The exchange has been updated from 'ammonium nitrate, as N' into 'ammonium nitrate' and therefore its amount has been scaled (multiplied) from 0.0001 kg by 2.8573 kg of 'ammonium nitrate' per kg of 'ammonium nitrate, as N'. Original comment of the exchange is: Calculated based on literature values or expert estimation: The total amount of nutrient (Personal written communication, Luis Angel Lopez, Yara, 2015) multiplied by the share of fertiliser type (Personal written communication, Luis Angel Lopez, Yara, 2015). See supporting documentation 'WFLDB-Documentation.pdf' chapter 'Fertiliser application' for L3 and L4 data (https://ecoquery.ecoinvent.org/File/Reports).
  Corresponds to 2.61 kg/ha
  properties: wet mass 1 kg, dry mass 1 kg
- fruit tree seedling, for planting: 0.00292396 unit; lognormal variance with pedigree 0.124177, pedigree (2,1,4,1,1)
  (same comment as for planting tree)
  properties: carbon content, non-fossil 0.439481, wet mass 1 kg, dry mass 0.578035 kg, water content 0.73
  note on carbon content, non-fossil: calculation: C-content of components according to ecoinvent report No. 15a. Source of composition: https://ndb.nal.usda.gov/ndb/search/. Unspecific seedling used as proxy.
- ammonium sulfate: 0.000100281 kg; source Luis Angel Lopez 2015; lognormal variance with pedigree 0.124177, pedigree (2,1,4,1,1)
  Calculated based on literature values or expert estimation: The total amount of nutrient (Personal written communication, Luis Angel Lopez, Yara, 2015) multiplied by the share of fertiliser type (Personal written communication, Luis Angel Lopez, Yara, 2015). See supporting documentation 'WFLDB-Documentation.pdf' chapter 'Fertiliser application' for L3 and L4 data (https://ecoquery.ecoinvent.org/File/Reports).
  Corresponds to 2.71 kg/ha
  properties: wet mass 1 kg, dry mass 1 kg
- establishing orchard: 0.00292396 unit; lognormal variance with pedigree 0.124177, pedigree (2,1,4,1,1)
  (same comment as for planting tree)
- urea: 0.000102712 kg; source Luis Angel Lopez 2015; lognormal variance with pedigree 0.124177, pedigree (2,1,4,1,1)
  The exchange has been updated from 'urea, as N' into 'urea' and therefore its amount has been scaled (multiplied) from 0 kg by 2.1438 kg of 'urea' per kg of 'urea, as N'. Original comment of the exchange is: Calculated based on literature values or expert estimation: The total amount of nutrient (Personal written communication, Luis Angel Lopez, Yara, 2015) multiplied by the share of fertiliser type (Personal written communication, Luis Angel Lopez, Yara, 2015). See supporting documentation 'WFLDB-Documentation.pdf' chapter 'Fertiliser application' for L3 and L4 data (https://ecoquery.ecoinvent.org/File/Reports).
  Corresponds to 1.29 kg/ha
  properties: dry mass 1 kg, wet mass 1 kg, carbon content, fossil 0.2
- irrigation: 0.287719 m3; lognormal variance with pedigree 0.124177, pedigree (2,1,4,1,1)
  Calculated value: The total amount of water used for irrigation (calculated from evapotranspiration, Pfister et al. 2011) multiplied by the country-share of irrigation technique (WFLDB-Guidelines.pdf, Appendix 6.1). See supporting documentation 'WFLDB-Documentation.pdf' chapter 'Water use for irrigation' for L2 data (https://ecoquery.ecoinvent.org/File/Reports).
  properties: wet mass 1000 kg, water content 9089.91, dry mass 0.11 kg
- phosphate rock, beneficiated: 0.0010026 kg; source Luis Angel Lopez 2015; lognormal variance with pedigree 0.124177, pedigree (2,1,4,1,1)
  The exchange has been updated from 'phosphate rock, as P2O5, beneficiated, dry' into 'phosphate rock, beneficiated' and therefore its amount has been scaled (multiplied) from 0.0003 kg by 3.125 kg of 'phosphate rock, beneficiated' per kg of 'phosphate rock, as P2O5, beneficiated, dry'. Original comment of the exchange is: Calculated based on literature values or expert estimation: The total amount of nutrient (Personal written communication, Luis Angel Lopez, Yara, 2015) multiplied by the share of fertiliser type (Personal written communication, Luis Angel Lopez, Yara, 2015). See supporting documentation 'WFLDB-Documentation.pdf' chapter 'Fertiliser application' for L3 and L4 data (https://ecoquery.ecoinvent.org/File/Reports).
  Corresponds to 8.66 kg/ha
  properties: dry mass 1 kg, wet mass 1 kg
- inorganic nitrogen fertiliser, as N: 0.000273622 kg; source Luis Angel Lopez 2015; lognormal variance with pedigree 0.124177, pedigree (2,1,4,1,1)
  Calculated based on literature values or expert estimation: The total amount of nutrient (Personal written communication, Luis Angel Lopez, Yara, 2015) multiplied by the share of fertiliser type (Personal written communication, Luis Angel Lopez, Yara, 2015). See supporting documentation 'WFLDB-Documentation.pdf' chapter 'Fertiliser application' for L3 and L4 data (https://ecoquery.ecoinvent.org/File/Reports).
  Corresponds to 1.4 kg/ha
  properties: dry mass 1 kg, wet mass 1 kg
- potassium chloride: 0.00162616 kg; source Luis Angel Lopez 2015; lognormal variance with pedigree 0.124177, pedigree (2,1,4,1,1)
  The exchange has been updated from 'potassium chloride, as K2O' into 'potassium chloride' and therefore its amount has been scaled (multiplied) from 0.001 kg by 1.5829 kg of 'potassium chloride' per kg of 'potassium chloride, as K2O'. Original comment of the exchange is: Calculated based on literature values or expert estimation: The total amount of nutrient (Personal written communication, Luis Angel Lopez, Yara, 2015) multiplied by the share of fertiliser type (Personal written communication, Luis Angel Lopez, Yara, 2015). See supporting documentation 'WFLDB-Documentation.pdf' chapter 'Fertiliser application' for L3 and L4 data (https://ecoquery.ecoinvent.org/File/Reports).
  Corresponds to 27.7 kg/ha
  properties: dry mass 1 kg, wet mass 1 kg
- inorganic phosphorus fertiliser, as P2O5: 0.0017162 kg; source Luis Angel Lopez 2015; lognormal variance with pedigree 0.124177, pedigree (2,1,4,1,1)
  Calculated based on literature values or expert estimation: The total amount of nutrient (Personal written communication, Luis Angel Lopez, Yara, 2015) multiplied by the share of fertiliser type (Personal written communication, Luis Angel Lopez, Yara, 2015). See supporting documentation 'WFLDB-Documentation.pdf' chapter 'Fertiliser application' for L3 and L4 data (https://ecoquery.ecoinvent.org/File/Reports).
  Corresponds to 8.25 kg/ha
  properties: wet mass 1 kg, dry mass 1 kg
- inorganic potassium fertiliser, as K2O: 0.00133333 kg; source Luis Angel Lopez 2015; lognormal variance with pedigree 0.124177, pedigree (2,1,4,1,1)
  Calculated based on literature values or expert estimation: The total amount of nutrient (Personal written communication, Luis Angel Lopez, Yara, 2015) multiplied by the share of fertiliser type (Personal written communication, Luis Angel Lopez, Yara, 2015). See supporting documentation 'WFLDB-Documentation.pdf' chapter 'Fertiliser application' for L3 and L4 data (https://ecoquery.ecoinvent.org/File/Reports).
  Corresponds to 36.0 kg/ha
  properties: dry mass 1 kg, wet mass 1 kg
- waste wood, untreated: -0.0493704 kg; lognormal variance with pedigree 0.124177, pedigree (2,1,4,1,1)
  Wood from trees after 1-2 years of sorrage at the field (20% water) per lifetime year (20 years) of the orchard
  production volume 6.20709e7 kg
    Calculated from the reference product amount and production volume
  properties: heating value, net 13.99 MJ, wet mass 1 kg, water content 0.25, dry mass 0.8 kg, carbon content, non-fossil 0.48632
  note on heating value, net: Value taken from the general comment of the treatment dataset.
- trellis system, wooden poles, soft wood, tar impregnated: 3.7037e-5 ha; lognormal variance with pedigree 0.124177, pedigree (2,1,4,1,1)
  Used to attach trees in orchards with a tree density of more than 500 trees per ha.
- packaging, for fertilisers: 0.0117778 kg; lognormal variance with pedigree 0.0592, pedigree (4,3,4,5,4)
  Total amount of active substance/s of fertilisers needed for the production of 'peach' is calculated to be circa 5.89E-03 kg. Fertiliser/s used in this dataset is/are: 'ammonium nitrate, as N', 'ammonium sulfate, as N', 'nitrogen fertiliser, as N', 'phosphate fertiliser, as P2O5', 'phosphate rock, as P2O5, beneficiated, dry', 'potassium chloride, as K2O', 'potassium fertiliser, as K2O', 'potassium sulfate, as K2O', 'urea, as N'. The total amount of active substance/s is doubled in order to account for the packaging of the dilluted product of fertiliser/s that is/are applied. Therefore, 1.18E-02 kg of packaging for fertilisers is justified with this exchange.
  properties: heating value, net 25.01 MJ, wet mass 1 kg, price 0.0642 EUR2005, carbon content, fossil 0.825301, dry mass 1 kg
  note on carbon content, fossil: Considering a chemical formula (C2H4)n for polyethylene, carbon content-fossil is calculated to be 0.856286 kg of Carbon per kg of dry mass.
- fertilising, by broadcaster: 7.40741e-5 ha; lognormal variance with pedigree 0.124177, pedigree (2,1,4,1,1)
  Proxy from Apricot FR. Corresponds to 2 applications per year.
- packaging, for pesticides: 0.00094163 kg; lognormal variance with pedigree 0.0592, pedigree (4,3,4,5,4)
  Total amount of active substance/s of pesticides needed for the production of peach is calculated to be circa 4.71E-04 kg. Pesticide/s used in this dataset is/are: 'cyclic N-compound', 'glyphosate', 'phenoxy-compound', 'phthalimide-compound'. The total amount of active substance/s is doubled in order to account for the packaging of the dilluted product of pesticide/s that is/are applied. Therefore, 9.42E-04 kg of packaging for pesticides is justified with this exchange.
  properties: dry mass 1 kg, heating value, net 25.97 MJ, carbon content, fossil 0.85714, price 0.0642 EUR2005, wet mass 1 kg

## Inputs from nature
- Transformation, from permanent crop, irrigated [natural resource, land]: 0.0185185 m2; lognormal variance with pedigree 0.0442144, pedigree (2,1,4,1,1)
  10000 m2 divided by the life time of the perennial crop (20 years).
- Transformation, to permanent crop, irrigated [natural resource, land]: 0.0185185 m2; lognormal variance with pedigree 0.0442144, pedigree (2,1,4,1,1)
  10000 m2 divided by the life time of the perennial crop (20 years).
- Carbon dioxide, in air [natural resource, in air]: 0.191915 kg; lognormal variance with pedigree 0.0138498, pedigree (2,2,4,1,1)
  CO2 uptake by biomass
- Energy, gross calorific value, in biomass [natural resource, biotic]: 2.16344 MJ; lognormal variance with pedigree 0.0138498, pedigree (2,2,4,1,1)
  Gross energy content is related to MJ/kg dry matter of product. Source: ecoinvent data
- Occupation, permanent crop, irrigated [natural resource, land]: 0.37137 m2*year; lognormal variance with pedigree 0.0200616, pedigree (2,1,4,1,1)
  Related to the duration from harvest date of previous crop to harvest date of main crop.

## Emissions to nature
- Phosphate [water, surface water]: 3.23652e-5 kg; source Prasuhn V.  2006; lognormal variance with pedigree 0.175866, pedigree (2,2,4,1,1)
  Calculated value - Prasuhn (2006). See 'WFLDB-Guidelines.pdf', available at https://ecoquery.ecoinvent.org/File/Reports.
- Water [water, ground-]: 0.0153811 m3; lognormal variance with pedigree 0.124177, pedigree (2,1,4,1,1)
  Calculated value - Emission calculated from water balance. See 'WFLDB-Guidelines.pdf', available at https://ecoquery.ecoinvent.org/File/Reports.
- Phosphorus [water, surface water]: 3.26507e-6 kg; source Prasuhn V.  2006; lognormal variance with pedigree 0.175866, pedigree (2,2,4,1,1)
  Calculated value - Prasuhn (2006) and SQCB-Erosion. See 'WFLDB-Guidelines.pdf', available at https://ecoquery.ecoinvent.org/File/Reports.
- Cadmium [soil, agricultural]: 9.38044e-8 kg; = 1.067e-07 + ( - 1.289558e-08)*heavyMetalUptakeSwitch; source Freiermuth R.  2006
  Comment on mathematicalRelation:
  1.067e-07 from Calculated value - Freiermuth (2006). See 'WFLDB-Guidelines.pdf', available at https://ecoquery.ecoinvent.org/File/Reports.
  -1.289558e-08 from Crop, default, heavy metals uptake model
  Heavy metal uptake can be excluded by setting the parameter heavyMetalUptakeSwitch to zero.
- Chromium [soil, agricultural]: 3.48415e-7 kg; = 4.1762962963e-07 + ( - 6.9215e-08)*heavyMetalUptakeSwitch; source Freiermuth R.  2006
  Comment on mathematicalRelation:
  4.1762962963e-07 from Calculated value - Freiermuth (2006). See 'WFLDB-Guidelines.pdf', available at https://ecoquery.ecoinvent.org/File/Reports.
  -6.9215e-08 from Crop, default, heavy metals uptake model
  Heavy metal uptake can be excluded by setting the parameter heavyMetalUptakeSwitch to zero.
- Copper [soil, agricultural]: -7.97483e-7 kg; = 4.41333333333e-08 + ( - 8.416163e-07)*heavyMetalUptakeSwitch; source Freiermuth R.  2006
  Comment on mathematicalRelation:
  4.41333333333e-08 from Calculated value - Freiermuth (2006). See 'WFLDB-Guidelines.pdf', available at https://ecoquery.ecoinvent.org/File/Reports.
  -8.416163e-07 from Crop, default, heavy metals uptake model
  Heavy metal uptake can be excluded by setting the parameter heavyMetalUptakeSwitch to zero.
- Cadmium, ion [water, surface water]: 1.21363e-9 kg; source Freiermuth R.  2006; lognormal variance with pedigree 0.356938, pedigree (2,2,4,1,1)
  Calculated value - Freiermuth (2006). See 'WFLDB-Guidelines.pdf', available at https://ecoquery.ecoinvent.org/File/Reports.
- Phosphate [water, ground-]: 6.82852e-6 kg; source Prasuhn V.  2006; lognormal variance with pedigree 0.175866, pedigree (2,2,4,1,1)
  (same comment as for Phosphate)
- Chromium, ion [water, surface water]: 1.19263e-7 kg; source Freiermuth R.  2006; lognormal variance with pedigree 0.356938, pedigree (2,2,4,1,1)
  (same comment as for Cadmium, ion)
- Copper, ion [water, surface water]: 1.46507e-7 kg; source Freiermuth R.  2006; lognormal variance with pedigree 0.356938, pedigree (2,2,4,1,1)
  (same comment as for Cadmium, ion)
- Lead [water, surface water]: 2.61378e-8 kg; source Freiermuth R.  2006; lognormal variance with pedigree 0.356938, pedigree (2,2,4,1,1)
  (same comment as for Cadmium, ion)
- Lead [soil, agricultural]: 9.01407e-8 kg; = 1.58818518519e-07 + ( - 6.867779e-08)*heavyMetalUptakeSwitch; source Freiermuth R.  2006
  Comment on mathematicalRelation:
  1.58818518519e-07 from Calculated value - Freiermuth (2006). See 'WFLDB-Guidelines.pdf', available at https://ecoquery.ecoinvent.org/File/Reports.
  -6.867779e-08 from Crop, default, heavy metals uptake model
  Heavy metal uptake can be excluded by setting the parameter heavyMetalUptakeSwitch to zero.
- Mercury [soil, agricultural]: -3.8085e-9 kg; = 1.34211111111e-09 + ( - 5.150612e-09)*heavyMetalUptakeSwitch; source Freiermuth R.  2006
  Comment on mathematicalRelation:
  1.34211111111e-09 from Calculated value - Freiermuth (2006). See 'WFLDB-Guidelines.pdf', available at https://ecoquery.ecoinvent.org/File/Reports.
  -5.150612e-09 from Crop, default, heavy metals uptake model
  Heavy metal uptake can be excluded by setting the parameter heavyMetalUptakeSwitch to zero.
- Mercury [water, surface water]: 1.67696e-10 kg; source Freiermuth R.  2006; lognormal variance with pedigree 0.356938, pedigree (2,2,4,1,1)
  (same comment as for Cadmium, ion)
- Zinc [soil, agricultural]: -2.71318e-6 kg; = 1.35374074074e-06 + ( - 4.066921e-06)*heavyMetalUptakeSwitch; source Freiermuth R.  2006
  Comment on mathematicalRelation:
  1.35374074074e-06 from Calculated value - Freiermuth (2006). See 'WFLDB-Guidelines.pdf', available at https://ecoquery.ecoinvent.org/File/Reports.
  -4.066921e-06 from Crop, default, heavy metals uptake model
  Heavy metal uptake can be excluded by setting the parameter heavyMetalUptakeSwitch to zero.
- Captan [soil, agricultural]: 0.000297803 kg; lognormal variance with pedigree 0.0447216, pedigree (2,2,4,1,1)
  Calculated value - 100% emission in soil. See 'WFLDB-Guidelines.pdf', available at https://ecoquery.ecoinvent.org/File/Reports.
- Nickel, ion [water, surface water]: 6.44481e-8 kg; source Freiermuth R.  2006; lognormal variance with pedigree 0.356938, pedigree (2,2,4,1,1)
  (same comment as for Cadmium, ion)
- Iprodion [soil, agricultural]: 0.000134167 kg; lognormal variance with pedigree 0.0447216, pedigree (2,2,4,1,1)
  (same comment as for Captan)
- Zinc, ion [water, surface water]: 1.28626e-7 kg; source Freiermuth R.  2006; lognormal variance with pedigree 0.356938, pedigree (2,2,4,1,1)
  (same comment as for Cadmium, ion)
- 2,4-D [soil, agricultural]: 5.26367e-6 kg; lognormal variance with pedigree 0.0447216, pedigree (2,2,4,1,1)
  (same comment as for Captan)
- Cadmium, ion [water, ground-]: 1.50104e-9 kg; source Freiermuth R.  2006; lognormal variance with pedigree 0.356938, pedigree (2,2,4,1,1)
  (same comment as for Cadmium, ion)
- Glyphosate [soil, agricultural]: 2.32204e-5 kg; lognormal variance with pedigree 0.0447216, pedigree (2,2,4,1,1)
  (same comment as for Captan)
- Chromium, ion [water, ground-]: 7.10148e-7 kg; source Freiermuth R.  2006; lognormal variance with pedigree 0.356938, pedigree (2,2,4,1,1)
  (same comment as for Cadmium, ion)
- Nickel [soil, agricultural]: 3.4158e-8 kg; = 1.66822222222e-07 + ( - 1.326642e-07)*heavyMetalUptakeSwitch; source Freiermuth R.  2006
  Comment on mathematicalRelation:
  1.66822222222e-07 from Calculated value - Freiermuth (2006). See 'WFLDB-Guidelines.pdf', available at https://ecoquery.ecoinvent.org/File/Reports.
  -1.326642e-07 from Crop, default, heavy metals uptake model
  Heavy metal uptake can be excluded by setting the parameter heavyMetalUptakeSwitch to zero.
- Indoxacarb [soil, agricultural]: 1.03611e-5 kg; lognormal variance with pedigree 0.0447216, pedigree (2,2,4,1,1)
  (same comment as for Captan)
- Copper, ion [water, ground-]: 1.033e-7 kg; source Freiermuth R.  2006; lognormal variance with pedigree 0.356938, pedigree (2,2,4,1,1)
  (same comment as for Cadmium, ion)
- Carbon dioxide, fossil [air, non-urban air or from high stacks]: 4.47741e-5 kg; lognormal variance with pedigree 0.0138498, pedigree (2,2,4,1,1)
  Calculated value - CO2 emissions from urea and lime. See 'WFLDB-Guidelines.pdf', available at https://ecoquery.ecoinvent.org/File/Reports.
- Lead [water, ground-]: 4.78704e-9 kg; source Freiermuth R.  2006; lognormal variance with pedigree 0.356938, pedigree (2,2,4,1,1)
  (same comment as for Cadmium, ion)
- Ammonia [air, non-urban air or from high stacks]: 5.21111e-5 kg; source EEA 2013; lognormal variance with pedigree 0.0447216, pedigree (2,2,4,1,1)
  Calculated value - EMEP/EEA (2013). See 'WFLDB-Guidelines.pdf', available at https://ecoquery.ecoinvent.org/File/Reports.
- Mercury [water, ground-]: 2.09144e-10 kg; source Freiermuth R.  2006; lognormal variance with pedigree 0.356938, pedigree (2,2,4,1,1)
  (same comment as for Cadmium, ion)
- Nitrogen oxides [air, non-urban air or from high stacks]: 2.04444e-5 kg; source EEA 2013; lognormal variance with pedigree 0.124664, pedigree (2,2,4,1,1)
  Calculated value - EEA/EMEP (2013). See 'WFLDB-Guidelines.pdf', available at https://ecoquery.ecoinvent.org/File/Reports.
- Nickel, ion [water, ground-]: 4.79926e-11 kg; source Freiermuth R.  2006; lognormal variance with pedigree 0.356938, pedigree (2,2,4,1,1)
  (same comment as for Cadmium, ion)
- Dinitrogen monoxide [air, non-urban air or from high stacks]: 1.97457e-5 kg; source IPCC 2006; lognormal variance with pedigree 0.124664, pedigree (2,2,4,1,1)
  Calculated value - IPCC (2006). See 'WFLDB-Guidelines.pdf', available at https://ecoquery.ecoinvent.org/File/Reports.
- Zinc, ion [water, ground-]: 4.44185e-7 kg; source Freiermuth R.  2006; lognormal variance with pedigree 0.356938, pedigree (2,2,4,1,1)
  (same comment as for Cadmium, ion)
- Water [air, non-urban air or from high stacks]: 0.210815 m3; lognormal variance with pedigree 0.124177, pedigree (2,1,4,1,1)
  (same comment as for Water)
- Water [water, surface water]: 0.0615259 m3; lognormal variance with pedigree 0.124177, pedigree (2,1,4,1,1)
  (same comment as for Water)

## Sampling procedure
WFLDB Methodological Guidelines for the Life Cycle Inventory of Agricultural Products in the latest version, available at: (Report section: https://v30.ecoquery.ecoinvent.org/File/Reports). Data sources: Data were categorised from level 0 (L0) to level (L4) as follows: L0 = estimate, proxy; L1 = statistical data (e.g. FAOSTAT); L2 = L1 adapted to crop and country;L3 = literature data or L1 resp. L2 data approved by experts; medium detailing (i.e. kg of total N-fertiliser); L4 = L3 data of high detailing (i.e. portion N-fertiliser types).In this dataset data were obtained for yield: L3; Fertilisers: L4; Pesticides: L1; Machinery: L0; Irrigation: L2. For information regarding the calculation of individual exchanges see supporting documentation WFLDB-Documentation.pdf.

## Extrapolations
This dataset has been extrapolated from year 2012 to the year of the calculation (2021). The uncertainty has been adjusted accordingly.

## Review by Assumpció ANTON 2016-05-30
Be aware that the use of statistics in input calculations could provide some specific inputs not common for specific crops, this should be corrected if better information is available and better reflexed in DQR . Currently, I would dissent for some of good marks provided, being a revision of criteria applied advisable.

Pesticides will need to be amended periodically checking for update of pesticides' ban.
