# activated carbon production, granular from hard coal

Dataset: EcoSpold 2, unit process
Geography: RER
Time period: 2005-01-01 to 2021-12-31
Technology level: current
Classification: EcoSpold01Categories: hard coal/heating systems
Classification: ISIC rev.4 ecoinvent: 2029:Manufacture of other chemical products n.e.c.
Scenario: Business-as-Usual
System model: Allocation, cut-off by classification
Generated by: Lucia Valsasina
Published in: Bayer 2005
Database: ecoinvent
isCopyrightProtected: true
accessRestrictedTo: 1

## General comment
This dataset represents the production of 1 kg of granular activated carbon (GAC) from hard coal. Hard coal produced GAC is typical for Central Europe. To produce GAC, hard coal undergoes carbonisation and partial gasification (activation). Hard coal is first heated to temperatures over 700 degrees Celsius. The activation stage, in this dataset, is achieved through vaporisation at temperatures between 800 and 1000 degrees Celsius. Activation is the key step in producing GAC. The main energy requirements are 1.6 kWh electricity and 0.33 m3 of natural gas to heat 12 kg of water. The main source of data is Bayer et al. (2005) "Economical and ecological comparison of granular activated carbon (GAC) absorber refill strategies" and This dataset represents the treatment of 1 kg of spent granular activated carbon (GAC) from hard coal. GAC can be reactivated through the same process with which it is produced (http://www.calgoncarbon.com/wp-content/uploads/2015/02/Reactivation_Services_FAQ.pdf, accessed 20151209). Spent activated carbon is first heated to temperatures over 700 degrees Celsius. The activation stage, in this dataset, is achieved through vaporisation at temperatures between 800 and 1000 degrees Celsius. Activation is the key step in producing GAC. The main energy requirements are taken from "activated carbon production, granular from hard coal" dataset, in which for the burning of 3 kg of coal the requirements are: 1.6 kWh electricity and 0.33 m3 of natural gas to heat 12 kg of water. The main source of data is Bayer et al. (2005) "Economical and ecological comparison of granular activated carbon (GAC) absorber refill strategies" and Munoz et al. (2007) Life-Cycle Assessment of a Coupled Advanced Oxidation-Biological Process for Wastewater Treatment: Comparison with Granular Activated Carbon Adsorption. Environmental Engineering Science, 24(5): 638-651.
The result of this activity is 1 kg of activated carbon from 3 kg of hard coal. To include the emissions for the carbonization of 2 kg of hard coal, the datasets for "heat production, at hard coal industrial furnace 1-10MW, GLO 1992" was taken as a reference to model emissions and energy requirements. The original datasets represented: "the production of heat from a 1-10 MW hard coal industrial furnace filled with 1 MJ of egg coal. The stoker-boiler furnace fires egg coals with hard coal quality between long-flame coal and fat coal. As there is no module for egg coal, the hard coal supply mix is used. The lifetime of the furnace is 20 years, which corresponds to 5000 fully load hours per year. The heating value is 28.9 MJ/kg and the efficiency factor is 80%".

## Included activities start
From reception of hard coal.

## Included activities end
This activity ends with produced 1 kg of granular activated carbon from 3 kg of hard coal. The datasets includes electricity consumption, the burning of natural gas for the vaporisation of water, water and the emissions from hard coal combustion.

## Geography
GAC from hard coal is common practice in Central Europe (Bayer et al. 2005)

## Technology
Reref to: Bayer et al. 2005. Economical and ecological comparison of granular activated carbon (GAC) absorber refill strategies. Water research (39), 1719-1728
Refer to: Munoz et al. 2007. Life-Cycle Assessment of a Coupled Advanced Oxidation-Biological Process for Wastewater Treatment: Comparison with Granular Activated Carbon Adsorption. Environmental Engineering Science. 5 (24), 638-651

## Parameters
- fraction, process water, to air: 0.15 dimensionless; name fraction_PW_to_air; lognormal variance with pedigree 0.092025, pedigree (4,4,3,2,4)
  Literature value. In case when no industry/process specific data are available, default evaporation fraction value is used. This value is 15% and is based on literature (Statistics Canada, 2007 & Shaffer, K.H., 2008, Consumptive water use in the Great Lakes Basin, USGS & Shiklomanov, 2003, World Water Resources at the Beginning of the 21st Century) and has been approved by an expert.
- fraction, water, completely softened, to air: 0.15 dimensionless; name fraction_WCS_to_air; = fraction_PW_to_air; lognormal variance with pedigree 0.092025, pedigree (4,4,3,2,4)
  Calculated value. See comment in the other parametres present in this dataset. Water, completely softened is considered to be always used as process water, thus process water fractions to air are applied to all water, completely softened input flows to calculate the amount of water consumed in the processes.
- scaling factor: 57.8035 dimensionless; name scaling_factor; = 1.25/0.04325*2
  Calculated value. The value 1.25 is the lower heating value used as scaling factor in the dataset for "hard coal industrial furnace 1-10MW, Europe without Swizterland 1992", for an input of (0.0346*1.25) 0.04325 kg of hard coal. This is scaled to the amount of hard coal (2kg) which is carbonised during the production of GAC.

## Reference product
- activated carbon, granular: 1 kg; name GAC; CPC 35499: Other chemical products n.e.c.; By-product classification allocatable product; CAS 7440-44-0
  The main sources of information used to create the dataset are:
  Bayer et al. 2005. Economical and ecological comparison of granular activated carbon (GAC) absorber refill strategies. Water research (39), 1719-1728
  Munoz et al. 2007. Life-Cycle Assessment of a Coupled Advanced Oxidation-Biological Process for Wastewater Treatment: Comparison with Granular Activated Carbon Adsorption. Environmental Engineering Science. 5 (24), 638-651
  production volume 1.60878e8 kg; name RP_PV_1; = 4.8664E+08*0.33059
    Estimated. The european production volume is extrapolated from the global production volume using the nominal GDP of 2005 (source: United Nations, http://data.un.org/Glossary.aspx?q=GDP+%28current+US%24%29, accessed 20130726 and 20130312). Where Europe GDP is 0.33059 of global.
    Gross domestic product (GDP) at current prices is GDP at prices of the current reporting period. Also known as nominal GDP.
  property carbon content, fossil 0.81; name GAC_C_content_fossil
    Literature value. From Biomass and Bioenergy: Processing and Properties (2014) edited by Khalid Rehman Hakeem, Mohammad Jawaid, Umer Rashid (p. 252). Carbon content is in the range of 72-90%, an average value of 81% is taken.
  property carbon content, non-fossil 0; name GAC_C_content_non_fossil
    biogene carbon content on a dry matter basis
  property water content 0.030928; name GAC_water_content
  property wet mass 1 kg; name GAC_WM
  property water in wet mass 0.03 kg; name GAC_WWM
  property dry mass 0.97 kg; name GAC_DM
  property heating value, net 30.23 MJ
    LHV is calculated based on the elemental composition of the substance. Based on the CAS number of the substance (007440-44-0), the chemical formula of the substance is found to be: C, (PubChem 2020).
    Reference: Kim, S., Chen, J., Cheng, T., Gindulyte, A., He, J., He, S., Li, Q., Shoemaker, B. A., Thiessen, P. A., Yu, B., Zaslavsky, L., Zhang, J., & Bolton, E. E. (2019). PubChem 2019 update: improved access to chemical data. Nucleic acids research, 47(D1), D1102–D1109. https://doi.org/10.1093/nar/gky1033
  property price 0.94 EUR2005; name GAC_price_EUR2005
    Calculated value based on data from United Nations Commodity Trade Statistics Database (comtrade.un.org). UN comtrade category: 380210 Activated Carbon. Year 2005. Using exchange rate of 1EURO = 1.209 USD. Average of price of import into 5 main markets (EU, US, JP, IN and CN).
  property carbon content 0.81
    carbon content on a dry matter basis (reserved; not for manual entry)
  properties: carbon allocation 0.7857 kg

## Inputs from technosphere
- electricity, medium voltage: 1.84162 kWh; = 0.00418 * scaling_factor + 1.6; source Bayer 2005; lognormal variance with pedigree 0.066125, pedigree (4,2,5,2,3)
  EcoSpold01Location=UCTE
  Estimation. To estimate the electricity consumption, data of the heating plant in Bern is evaluated. At full load 1.13% of the input energy is consumed as electricity. The installed capacity in auxiliary units is divided into induced draft fan (31%), primary air fan (13%), feed pump (39%), electric filter (11.8%), rust (0.8%), feeding (1.8%), slag chain (0.2%), oil supply control (0.9%) and secondary air (1.4%). It is assumed that the electricity consumption increases through part load operation. Additionally it must be considered that the observed heating plant has a capacity of about 38 MW. Therefore, it is assumed that 1.5% of the input energy is consumed as electricity.
  Amount was scaled to the amount of reference product. Source (Fritsche et al. 1992) in the process for heat production, at hard coal industrial furnace 1-10MW, Europe without Swizterland 1992.
  To the amount required for carbonisation, 1.6 kWh of electricity are added as an estimated requirement for activation (Bayer 2005).
  Uncertainty: generic electricity consumption
- industrial furnace, coal, 1-10MW: 3.21387e-8 unit; = 5.56E-10 * scaling_factor; lognormal variance with pedigree 0.3612, pedigree (2,3,5,5,3)
  Amount was scaled to the amount of reference product.
  EcoSpold01Location=RER
  Uncertainty: infrastructure
- hard coal ash: -0.16763 kg; name hard_coal_ash; = (0.0029 * scaling_factor)*-1; source Vernon J.L. 1991; lognormal variance with pedigree 0.114, pedigree (3,1,5,5,4)
  Estimation. Stoker-boiler furnaces emit between 300kg and 1000kg of particles per TJin if there is no particle separation. With an average of 650kg per TJin, 600kg of fly ash and 2300kg of bottom ash occurs. It is assumed that 100% of the ash is disposed (worst-case-scenario). In individual cases a 100% recycling rate is possible as well.
  Amount was scaled to the amount of reference product.
  EcoSpold01Location=PL
  Uncertainty: assumption: no reuse
  production volume 2.6968e7 kg; = hard_coal_ash* RP_PV_1/ABS( GAC)
    Calculated from the production volume of the reference product in proportion to the respective output amounts.
  property price 0 EUR2005; name hard_coal_ash_price_EUR2005
  properties: wet mass 1 kg, dry mass 1 kg
- heat, district or industrial, natural gas: 13.3 MJ; source Bayer 2005; lognormal variance with pedigree 0.1638, pedigree (2,3,5,5,5)
  Calculated. According to Bayer et al. (2005) 0.33m3 of natural gas are burned in order to produce 12 kg of water vapour required for activation. This activity is used as a proxy to represent this process.
  properties: heating value, net 1 MJ
- water, completely softened: 12.4335 kg; name water_softened_input; = 0.0075 * scaling_factor + 12; source Bayer 2005; lognormal variance with pedigree 0.076625, pedigree (2,5,5,2,3)
  EcoSpold01Location=RER
  Estimation. It is assumed that 2% of the feed water is additionally required as decarbonised water (6t per TJin). For wet purification 1.5t per TJin of water is needed. Due to the lack of information the water used for cleaning can not be considered.
  Amount was scaled to the amount of reference product.
  Estimation. It is assumed that 2% of the feed water is additionally required as decarbonised water (6t per TJin). For wet purification 1.5t per TJin of water is needed. Due to the lack of information the water used for cleaning can not be considered. Source (Fritsche et al. 1992) in the process for heat production, at hard coal industrial furnace 1-10MW, Europe without Swizterland 1992.
  Amount was scaled to the amount of reference product. To the amount required for carbonisation, 12 kg of water are added as an estimated requirement for the generation of vapour for the activation step (Bayer 2005).
  Uncertainty: rough estimate
  properties: wet mass 1 kg
- hard coal: 3 kg; source Bayer 2005; lognormal variance with pedigree 0.058125, pedigree (4,2,5,2,1)
  EcoSpold01Location=UCTE
  Literature value. Bayer et al. (2005)
  Uncertainty: fuel input
  properties: water content 0.0638298, carbon content, fossil 0.845, wet mass 1 kg, dry mass 0.94 kg, heating value, net 27.91 MJ
  note on carbon content, fossil: C content 75-94% (specified in Tab 1.1, report 6, part VI). A mean content of 0.845 kg C/ kg dry hard coal was considered
  note on heating value, net: Based on the Characterization factor of Hard coal in the CED method

## Emissions to nature
- Benzo(a)pyrene [air, urban air close to ground]: 5.78035e-10 kg; = 1E-11 * scaling_factor; lognormal variance with pedigree 0.1012, pedigree (2,3,5,5,3)
  Modeled, based on “heat production, coal, emissions to air” - pdf-document on the dedicated talk page of ecoinvent (www.ecoinvent.org/documentation). The emission data are taken from the literature reporting measurements performed at the end of the 1980s in Germany and are based on the composition of the coal.
  Amount was scaled to the amount of reference product.
  Uncertainty: total NMVOC and profile estimate
- Zinc [air, urban air close to ground]: 1.82659e-7 kg; = 3.16E-09 * scaling_factor; lognormal variance with pedigree 0.736, pedigree (4,5,5,5,3)
  Modeled, based on “heat production, coal, emissions to air” - pdf-document on the dedicated talk page of ecoinvent (www.ecoinvent.org/documentation). Emissions of trace elements were calculated using the ash content in the coal and average transfer coefficients for coal power plants with ash retention of 98 %.
  Amount was scaled to the amount of reference product.
  Uncertainty: from trace element balance; see report for details
- Hydrogen fluoride [air, urban air close to ground]: 7.28324e-5 kg; = 1.26E-06 * scaling_factor; lognormal variance with pedigree 0.126, pedigree (4,5,5,5,3)
  (same comment as for Zinc)
- Iron [air, urban air close to ground]: 0.000255491 kg; = 4.42E-06 * scaling_factor; lognormal variance with pedigree 0.736, pedigree (4,5,5,5,3)
  (same comment as for Zinc)
- Molybdenum [air, urban air close to ground]: 2.73988e-7 kg; = 4.74E-09 * scaling_factor; lognormal variance with pedigree 0.736, pedigree (4,5,5,5,3)
  (same comment as for Zinc)
- Chromium VI [air, urban air close to ground]: 1.60694e-7 kg; = 2.78E-09 * scaling_factor; lognormal variance with pedigree 0.492, pedigree (1,1,3,5,3)
  Modeled, based on “heat production, coal, emissions to air” - pdf-document on the dedicated talk page of ecoinvent (www.ecoinvent.org/documentation). The emission data are taken from the literature reporting measurements performed at the end of the 1980s in Germany and are based on the composition of the coal.
  Amount was scaled to the amount of reference product.
- Thallium [air, urban air close to ground]: 9.13295e-8 kg; = 1.58E-09 * scaling_factor; lognormal variance with pedigree 0.736, pedigree (4,5,5,5,3)
  (same comment as for Zinc)
- Formaldehyde [air, urban air close to ground]: 4.62428e-6 kg; = 8E-08 * scaling_factor; lognormal variance with pedigree 0.1012, pedigree (2,3,5,5,3)
  (same comment as for Benzo(a)pyrene)
- Carbon monoxide, fossil [air, urban air close to ground]: 0.00578035 kg; = 0.0001 * scaling_factor; lognormal variance with pedigree 0.7012, pedigree (2,3,5,5,3)
  Modeled, based on “heat production, coal, emissions to air” - pdf-document on the dedicated talk page of ecoinvent (www.ecoinvent.org/documentation). The emission data are taken from the literature reporting measurements performed at the end of the 1980s in Germany and are based on the composition of the coal.
  Amount was scaled to the amount of reference product.
  Uncertainty: typical value
- Magnesium [air, urban air close to ground]: 0.000219075 kg; = 3.79E-06 * scaling_factor; lognormal variance with pedigree 0.736, pedigree (4,5,5,5,3)
  (same comment as for Zinc)
- Scandium [air, urban air close to ground]: 7.28324e-8 kg; = 1.26E-09 * scaling_factor; lognormal variance with pedigree 0.736, pedigree (4,5,5,5,3)
  (same comment as for Zinc)
- NMVOC, non-methane volatile organic compounds, unspecified origin [air, urban air close to ground]: 9.9422e-5 kg; = 1.72E-06 * scaling_factor; lognormal variance with pedigree 0.1012, pedigree (2,3,5,5,3)
  (same comment as for Benzo(a)pyrene)
- Boron [air, urban air close to ground]: 2.73988e-5 kg; = 4.74E-07 * scaling_factor; lognormal variance with pedigree 0.728, pedigree (4,5,5,5,1)
  (same comment as for Zinc)
- Strontium [air, urban air close to ground]: 1.09827e-5 kg; = 1.9E-07 * scaling_factor; lognormal variance with pedigree 0.736, pedigree (4,5,5,5,3)
  (same comment as for Zinc)
- Propene [air, urban air close to ground]: 2.89017e-5 kg; = 5E-07 * scaling_factor; lognormal variance with pedigree 0.0932, pedigree (2,3,5,5,1)
  (same comment as for Benzo(a)pyrene)
- Radon-222 [air, urban air close to ground]: 5.78035e-5 kBq; = 1E-06 * scaling_factor; lognormal variance with pedigree 0.736, pedigree (4,5,5,5,3)
  Modeled, based on “heat production, coal, emissions to air” - pdf-document on the dedicated talk page of ecoinvent (www.ecoinvent.org/documentation). From radioactivity of the elements.
  Amount was scaled to the amount of reference product.
  Uncertainty: from radioactivity of the elements; see report for details
- Titanium [air, urban air close to ground]: 2.19075e-5 kg; = 3.79E-07 * scaling_factor; lognormal variance with pedigree 0.728, pedigree (4,5,5,5,1)
  (same comment as for Zinc)
- Beryllium [air, urban air close to ground]: 7.28324e-8 kg; = 1.26E-09 * scaling_factor; lognormal variance with pedigree 0.1012, pedigree (2,3,5,5,3)
  (same comment as for Benzo(a)pyrene)
- Radium-226 [air, urban air close to ground]: 0.000693642 kBq; = 1.2E-05 * scaling_factor; lognormal variance with pedigree 0.728, pedigree (4,5,5,5,1)
  (same comment as for Radon-222)
- Iodine [air, urban air close to ground]: 6.5896e-7 kg; = 1.14E-08 * scaling_factor; lognormal variance with pedigree 0.728, pedigree (4,5,5,5,1)
  (same comment as for Zinc)
- Particulates, > 10 um [air, urban air close to ground]: 0.000578035 kg; = 1E-05 * scaling_factor; lognormal variance with pedigree 0.118, pedigree (4,5,5,5,1)
  Modeled, based on “heat production, coal, emissions to air” - pdf-document on the dedicated talk page of ecoinvent (www.ecoinvent.org/documentation). Size distribution of particles has been estimated on the basis of recent information from U.S. Environmental Protection Agency (EPA).
  Amount was scaled to the amount of reference product.
  Uncertainty: total PM and profile estimates
- Nitrogen oxides [air, urban air close to ground]: 0.0115607 kg; = 0.0002 * scaling_factor; lognormal variance with pedigree 0.1012, pedigree (2,3,5,5,3)
  (same comment as for Carbon monoxide, fossil)
- Silicon [air, urban air close to ground]: 0.000913295 kg; = 1.58E-05 * scaling_factor; lognormal variance with pedigree 0.736, pedigree (4,5,5,5,3)
  (same comment as for Zinc)
- Methane, fossil [air, urban air close to ground]: 0.000578035 kg; = 1E-05 * scaling_factor; lognormal variance with pedigree 0.1012, pedigree (2,3,5,5,3)
  (same comment as for Carbon monoxide, fossil)
- Bromine [air, urban air close to ground]: 5.47977e-7 kg; = 9.48E-09 * scaling_factor; lognormal variance with pedigree 0.736, pedigree (4,5,5,5,3)
  (same comment as for Zinc)
- Nickel [air, urban air close to ground]: 1.09827e-6 kg; = 1.9E-08 * scaling_factor; lognormal variance with pedigree 0.736, pedigree (4,5,5,5,3)
  (same comment as for Zinc)
- Water [air, unspecified]: 0.00186503 m3; name water_to_air_unspecified; = (((water_softened_input/scaling_factor)/1000*fraction_WCS_to_air)) * scaling_factor; lognormal variance with pedigree 0.0513, pedigree (2,2,3,4,3)
  Calculated value based on literature values and expert opinion. See comments in the parametres' comment field.
  Amount was scaled to the amount of reference product.
  property fraction, origin: unspecified 0; name fraction_origin_unspecified
  property fraction, origin: salt water 0; name fraction_origin_salt_water
  property fraction, origin: fresh water 1; name fraction_origin_fresh_water
- Barium [air, urban air close to ground]: 7.28324e-6 kg; = 1.26E-07 * scaling_factor; lognormal variance with pedigree 0.736, pedigree (4,5,5,5,3)
  (same comment as for Zinc)
- Hydrogen chloride [air, urban air close to ground]: 0.00234104 kg; = 4.05E-05 * scaling_factor; lognormal variance with pedigree 0.126, pedigree (4,5,5,5,3)
  (same comment as for Zinc)
- Uranium-238 [air, urban air close to ground]: 0.000578035 kBq; = 1E-05 * scaling_factor; lognormal variance with pedigree 0.736, pedigree (4,5,5,5,3)
  (same comment as for Radon-222)
- Xylene [air, urban air close to ground]: 5.78035e-6 kg; = 1E-07 * scaling_factor; lognormal variance with pedigree 0.1012, pedigree (2,3,5,5,3)
  (same comment as for Benzo(a)pyrene)
- Ethyne [air, urban air close to ground]: 2.89017e-5 kg; = 5E-07 * scaling_factor; lognormal variance with pedigree 0.1012, pedigree (2,3,5,5,3)
  (same comment as for Benzo(a)pyrene)
- Ethene [air, urban air close to ground]: 0.00017341 kg; = 3E-06 * scaling_factor; lognormal variance with pedigree 0.1012, pedigree (2,3,5,5,3)
  (same comment as for Benzo(a)pyrene)
- Propane [air, urban air close to ground]: 5.78035e-5 kg; = 1E-06 * scaling_factor; lognormal variance with pedigree 0.1012, pedigree (2,3,5,5,3)
  (same comment as for Benzo(a)pyrene)
- Uranium [air, urban air close to ground]: 1.46243e-7 kg; = 2.53E-09 * scaling_factor; lognormal variance with pedigree 0.736, pedigree (4,5,5,5,3)
  (same comment as for Zinc)
- Carbon dioxide, fossil [air, urban air close to ground]: 5.28902 kg; = 0.0915 * scaling_factor; lognormal variance with pedigree 0.0507, pedigree (2,2,5,5,3)
  Modeled, based on “heat production, coal, emissions to air” - pdf-document on the dedicated talk page of ecoinvent (www.ecoinvent.org/documentation). The emission data are taken from the literature reporting measurements performed at the end of the 1980s in Germany and are based on the composition of the coal.
  Amount was scaled to the amount of reference product.
  Uncertainty: from carbon balance
- Tin [air, urban air close to ground]: 3.65318e-8 kg; = 6.32E-10 * scaling_factor; lognormal variance with pedigree 0.736, pedigree (4,5,5,5,3)
  (same comment as for Zinc)
- Cadmium [air, urban air close to ground]: 9.13295e-8 kg; = 1.58E-09 * scaling_factor; lognormal variance with pedigree 0.736, pedigree (4,5,5,5,3)
  (same comment as for Zinc)
- Potassium-40 [air, urban air close to ground]: 0.000780347 kBq; = 1.35E-05 * scaling_factor; lognormal variance with pedigree 0.736, pedigree (4,5,5,5,3)
  (same comment as for Radon-222)
- Cobalt [air, urban air close to ground]: 1.82659e-7 kg; = 3.16E-09 * scaling_factor; lognormal variance with pedigree 0.736, pedigree (4,5,5,5,3)
  (same comment as for Zinc)
- Manganese [air, urban air close to ground]: 1.27746e-6 kg; = 2.21E-08 * scaling_factor; lognormal variance with pedigree 0.736, pedigree (4,5,5,5,3)
  (same comment as for Zinc)
- Arsenic [air, urban air close to ground]: 1.46243e-6 kg; = 2.53E-08 * scaling_factor; lognormal variance with pedigree 0.736, pedigree (4,5,5,5,3)
  (same comment as for Zinc)
- Radium-228 [air, urban air close to ground]: 0.00375723 kBq; = 6.5E-05 * scaling_factor; lognormal variance with pedigree 0.736, pedigree (4,5,5,5,3)
  (same comment as for Radon-222)
- Hydrocarbons, aliphatic, alkanes, unspecified [air, urban air close to ground]: 2.89017e-5 kg; = 5E-07 * scaling_factor; lognormal variance with pedigree 0.1012, pedigree (2,3,5,5,3)
  (same comment as for Benzo(a)pyrene)
- Lead-210 [air, urban air close to ground]: 0.00268786 kBq; = 4.65E-05 * scaling_factor; lognormal variance with pedigree 0.736, pedigree (4,5,5,5,3)
  (same comment as for Radon-222)
- Thorium-232 [air, urban air close to ground]: 0.000202312 kBq; = 3.5E-06 * scaling_factor; lognormal variance with pedigree 0.736, pedigree (4,5,5,5,3)
  (same comment as for Radon-222)
- Phosphorus [air, urban air close to ground]: 3.65318e-6 kg; = 6.32E-08 * scaling_factor; lognormal variance with pedigree 0.736, pedigree (4,5,5,5,3)
  (same comment as for Zinc)
- Ethane [air, urban air close to ground]: 8.67052e-5 kg; = 1.5E-06 * scaling_factor; lognormal variance with pedigree 0.1012, pedigree (2,3,5,5,3)
  (same comment as for Benzo(a)pyrene)
- Vanadium [air, urban air close to ground]: 2.19075e-6 kg; = 3.79E-08 * scaling_factor; lognormal variance with pedigree 0.736, pedigree (4,5,5,5,3)
  (same comment as for Zinc)
- Selenium [air, urban air close to ground]: 5.47977e-7 kg; = 9.48E-09 * scaling_factor; lognormal variance with pedigree 0.736, pedigree (4,5,5,5,3)
  (same comment as for Zinc)
- Benzene [air, urban air close to ground]: 2.89017e-5 kg; = 5E-07 * scaling_factor; lognormal variance with pedigree 0.1012, pedigree (2,3,5,5,3)
  (same comment as for Benzo(a)pyrene)
- Dinitrogen monoxide [air, urban air close to ground]: 5.78035e-5 kg; = 1E-06 * scaling_factor; lognormal variance with pedigree 0.1012, pedigree (2,3,5,5,3)
  (same comment as for Carbon monoxide, fossil)
- Aluminium [air, urban air close to ground]: 0.000618497 kg; = 1.07E-05 * scaling_factor; lognormal variance with pedigree 0.736, pedigree (4,5,5,5,3)
  (same comment as for Zinc)
- Particulates, < 2.5 um [air, urban air close to ground]: 0.00115607 kg; = 2E-05 * scaling_factor; lognormal variance with pedigree 0.386, pedigree (4,5,5,5,3)
  (same comment as for Particulates, > 10 um)
- Sulfur dioxide [air, urban air close to ground]: 0.0289017 kg; = 0.0005 * scaling_factor; lognormal variance with pedigree 0.086, pedigree (4,5,5,5,3)
  Modeled, based on “heat production, coal, emissions to air” - pdf-document on the dedicated talk page of ecoinvent (www.ecoinvent.org/documentation). The emission data are taken from the literature reporting measurements performed at the end of the 1980s in Germany and are based on the composition of the coal.
  Amount was scaled to the amount of reference product.
  Uncertainty: from S-balance
- Potassium [air, urban air close to ground]: 7.28324e-5 kg; = 1.26E-06 * scaling_factor; lognormal variance with pedigree 0.736, pedigree (4,5,5,5,3)
  (same comment as for Zinc)
- Particulates, > 2.5 um, and < 10um [air, urban air close to ground]: 0.00115607 kg; = 2E-05 * scaling_factor; lognormal variance with pedigree 0.206, pedigree (4,5,5,5,3)
  (same comment as for Particulates, > 10 um)
- Lead [air, urban air close to ground]: 4.3815e-6 kg; = 7.58E-08 * scaling_factor; lognormal variance with pedigree 0.736, pedigree (4,5,5,5,3)
  (same comment as for Zinc)
- Chromium [air, urban air close to ground]: 1.30058e-6 kg; = 2.25E-08 * scaling_factor; lognormal variance with pedigree 0.736, pedigree (4,5,5,5,3)
  (same comment as for Zinc)
- Thorium [air, urban air close to ground]: 1.09827e-7 kg; = 1.9E-09 * scaling_factor; lognormal variance with pedigree 0.736, pedigree (4,5,5,5,3)
  (same comment as for Zinc)
- Dioxins, measured as 2,3,7,8-tetrachlorodibenzo-p-dioxin [air, urban air close to ground]: 1.15607e-12 kg; = 2E-14 * scaling_factor; lognormal variance with pedigree 0.3612, pedigree (2,3,5,5,3)
  (same comment as for Chromium VI)
- Radon-220 [air, urban air close to ground]: 5.78035e-5 kBq; = 1E-06 * scaling_factor; lognormal variance with pedigree 0.736, pedigree (4,5,5,5,3)
  (same comment as for Radon-222)
- Water [water, unspecified]: 0.0105685 m3; name water_to_water_unspecified; = (((water_softened_input/scaling_factor)/1000)*(1-fraction_WCS_to_air)) * scaling_factor; lognormal variance with pedigree 0.0513, pedigree (2,2,3,4,3)
  (same comment as for Water)
  property fraction, origin: fresh water 1; name fraction_origin_fresh_water_Ww
  property fraction, origin: salt water 0; name fraction_origin_salt_water_Ww
  property carbon content, fossil 0; name C_content_fossil
  property carbon content, non-fossil 0; name C_content_non_fossil
  property fraction, origin: unspecified 0; name fraction_origin_unspecified_Ww
  property dry mass 0 kg; name DM
  property wet mass 1000 kg; name WM
  property water in wet mass 1000 kg; name WWM
- Thorium-228 [air, urban air close to ground]: 0.000317919 kBq; = 5.5E-06 * scaling_factor; lognormal variance with pedigree 0.736, pedigree (4,5,5,5,3)
  (same comment as for Radon-222)
- Mercury [air, urban air close to ground]: 1.64162e-7 kg; = 2.84E-09 * scaling_factor; lognormal variance with pedigree 0.736, pedigree (4,5,5,5,3)
  (same comment as for Zinc)
- Antimony [air, urban air close to ground]: 9.13295e-8 kg; = 1.58E-09 * scaling_factor; lognormal variance with pedigree 0.736, pedigree (4,5,5,5,3)
  (same comment as for Zinc)
- Toluene [air, urban air close to ground]: 5.78035e-6 kg; = 1E-07 * scaling_factor; lognormal variance with pedigree 0.1012, pedigree (2,3,5,5,3)
  (same comment as for Benzo(a)pyrene)
- Sodium [air, urban air close to ground]: 3.65318e-5 kg; = 6.32E-07 * scaling_factor; lognormal variance with pedigree 0.736, pedigree (4,5,5,5,3)
  (same comment as for Zinc)
- Polonium-210 [air, urban air close to ground]: 0.00491329 kBq; = 8.5E-05 * scaling_factor; lognormal variance with pedigree 0.736, pedigree (4,5,5,5,3)
  (same comment as for Radon-222)
- Hydrocarbons, aliphatic, unsaturated [air, urban air close to ground]: 2.89017e-5 kg; = 5E-07 * scaling_factor; lognormal variance with pedigree 0.1012, pedigree (2,3,5,5,3)
  (same comment as for Benzo(a)pyrene)
- Calcium [air, urban air close to ground]: 7.28324e-5 kg; = 1.26E-06 * scaling_factor; lognormal variance with pedigree 0.736, pedigree (4,5,5,5,3)
  (same comment as for Zinc)
- Copper [air, urban air close to ground]: 9.59538e-7 kg; = 1.66E-08 * scaling_factor; lognormal variance with pedigree 0.736, pedigree (4,5,5,5,3)
  (same comment as for Zinc)

## Sampling procedure
Based on literature data:
Bayer et al. (2005) Economical and ecological comparison of granular activated carbonn (GAC) adsorber refill strategies. Water research, 39: 1719-1728
Munoz et al. (2007) Life-Cycle Assessment of a Coupled Advanced Oxidation-Biological Process for Wastewater Treatment: Comparison with Granular Activated Carbon Adsorption. Environmental Engineering Science, 24(5): 638-651.

## Extrapolations
This dataset has been extrapolated from year 2015 to the year of the calculation (2021). The uncertainty has been adjusted accordingly.

## Review by Ivan Muñoz Ortiz 2015-12-09
Thanks Lucia for the revision. I think everything is in order now.
Regards,
Ivan
