# furniture production, wooden

Dataset: EcoSpold 2, unit process
Geography: GLO
Time period: 2011-01-01 to 2021-12-31
Technology level: current
Classification: ISIC rev.4 ecoinvent: 3100:Manufacture of furniture
Synonyms: table; desk; bed; closet; drawer; shelf
Scenario: Business-as-Usual
System model: Allocation, cut-off by classification
Generated by: Marina Santa Rosa Rocha
Published in: González-García, Sara 2011
Database: ecoinvent
isCopyrightProtected: true
accessRestrictedTo: 1

## General comment
This activity aims at representing the production of an average kg of wooden furniture. To do so, the life cycle inventory data of three pieces of wooden furniture retrieved from González-García et al. (2011) have been averaged. The first piece of furniture is an office table made of laminated wood with an aluminium base and textile used as a divisor. The second piece of furniture is a livingroom cupboard made of medium-density fibreboard, particleboard, natural wood and carboard filling. The last piece of furniture is a group of items (drawers, shelf and a desk) mainly made of medium-density fibreboard, particleboard and beech panels. The inputs of metal (iron, steel and aluminium) represent part of the structure and account for screw and nails. Textile inputs are integral part of the furniture. This dataset is modelled as an infrastructure, meaning that the reference product is not assigned a mass, but it has the properties of “lifetime” and “lifetime capacity”. The inventory additionally accounts for disposal of all materials.
The data is extracted from a single source. The source refers to small to medium enterprises located in located in Galicia (Northwest
Spain) and Catalonia (Northeast Spain).
Source: González-García et al. (2011) Assessing the global warming potential of wooden products from the furniture sector
to improve their ecodesign. Science of the Total Environment 410-411 (2011) 16–25.

## Included activities start
The activity starts at the reception of the material at the factory. The activity includes the assembling and finishing of the final porduct.

## Included activities end
The activity ends with the production of 1kg of furniture. The inventory additionally accounts for disposal of all materials. Packaging is not included.

## Time period
The start date was sent to the year of publishing of the source of reference (González-García et al. 2011). The data is considered to be still valid for the year of 2017.

## Parameters
- diesel generator efficiency: 0.351 dimensionless; name diesel_generator_eff; = (1/42.735)/(240/1000/3.6)
  Calculated Value. Energy content of 42.735 MJ/kg diesel assumed.
  The diesel consumption of the diesel-electric generating set is usually reported in g/kWh.
  The efficiency of a diesel generator in a reefer is used:
  240g/kWh is the diesel consumption used in this dataset based on literature (http://www.thermoking.com/news-article.aspx?id=396, accessed 20141218).
  Cross reference;
  215k/kWh (http://univpower.en.made-in-china.com/product/AecEiQbUYdhI/China-30kVA-Carrier-Type-Reefer-Clip-on-Container-Diesel-Generator-Genset.html, accessed 20141218)
  205g/kWh (http://oripo.en.alibaba.com/product/1381890449-0/power_diesel_genset_for_reefer_container_with_wuxi_Stamford_generator.html, accessed 20141218)

## Reference product
- furniture, wooden: 0 kg; name furniture_w; CPC 381: Furniture; By-product classification allocatable product
  production volume 1.36741e10 kg; name PV; = 1747252240*0,36/(0,23*0,20)
    Estimated value. Italy exports to the World 1747252240 kg of furniture (UN commodity code 9403) of which 36% is wooden (calculated by summing amount of kg of Commodity codes 340330-40-50-60). The values for commodity codes are taken from COMTRADE (https://comtrade.un.org/data/, accessed 18Jan2018) data for the year 2016. Europe produces 23% of global furniture (CSIL 2017, The Furniture Industry in the European Union, Retrieved from: https://www.worldfurnitureonline.com/research-market/european-furniture-outlook-0065941.html, accessed 18Jan2018). Italy, by value, represent 20% of the furniture production for Europe (CEPS 2014, “THE EU FURNITURE MARKET SITUATION AND A POSSIBLE FURNITURE PRODUCTS INITIATIVE”, Retrieved from: https://www.ceps.eu/system/files/Final%20report_en.pdf, accessed 18Jan2018). We therefore assume that the production volume is 1747252240*36%/(23%*20%).
  property price 3.5 EUR2005; name furniture_w_price_EUR2005
    Estimated value. The price is taken from IKEA website(http://www.ikea.com/it/it/). IKEA provides the price and the weight of different types of wooden furniture. The price per kg of different types of wooden furniture have been calculated. Accountig for profit margin, the estimated price assumed here is 3.5 euros per kg of wooden furniture.
  property lifetime 15 year; name furniture_w_lifetime
    Source: JRC (2013) Wooden Furniture. BACKGROUND REPORT. Revision of Ecolabel and Green Public Procurement criteria for the product group. Retrieved from: http://susproc.jrc.ec.europa.eu/furniture/docs/Background_report_Furniture_September_2013.pdf, accessed 9Feb2018
  property lifetime capacity [h] 131400 hour; name furniture_w_lifetime_capacity_PMH; = 24*365*15
    Estimated value. We assumed that furniture can withstand 24 hours of use for the lifetime of 15 years (lifetime estimated by JRC (2013) Wooden Furniture. BACKGROUND REPORT. Revision of Ecolabel and Green Public Procurement criteria for the product group. Retrieved from: http://susproc.jrc.ec.europa.eu/furniture/docs/Background_report_Furniture_September_2013.pdf, accessed 9Feb2018
  property true value 3.5; name furniture_w_true_value
    allocation property applied in "true value" allocation // value calculated from revenue
- wood chips, dry, measured as dry mass: 1 kg; name wood_chips; = 0,1*(sawnwood* WM_sawnwood+ timber* WM_timber+ mdf* WM_MDF+ particle* WM_particle)/WM_chip; By-product classification allocatable product; CPC 31230: Wood in chips or particles; pedigree (1,1,1,1,1)
  Calculated value. Assumed 10% losses (expert judgement). The value was divided by the wet mass as the flow is represented as dry mass (see the properties section).
  production volume 1.0402e9 kg; = PV* (wood_chips/ furniture_w)
    Calculated from production volume of reference product using the relative outputs.
  property price 0.107 EUR2005; name wood_chips_price_EUR2005
    Expert judgement (Urs Luginbühl, Swiss Sawmilling industry, personal communication in June 2014). Wood chips from softwood should have a price of 0.101 EUR/kg. Woodchips from hardwood should have a price of 0.112 EUR/kg. Average of these two values is used. Cross-reference; FAOSTAT database; http://faostat.fao.org/site/626/DesktopDefault.aspx?PageID=626#ancor; Average import/export prices of EU for 'chips and particles'. Price: 48.76 Euro/m3. The density of the wood chips is 650 kg/m3. The price is recalculated accordingly.
  property carbon content, non-fossil 0.442739
    Calculated value. Based on carbon content, non-fossil of wood inputs.
  property wet mass 1.07795 kg; name WM_chip
  property heating value, net 9.99 MJ
    LHV is calculated based on the Carbon content of the product. More details can be found on the respective documentation.
  property carbon content 0.442739
    carbon content on a dry matter basis (reserved; not for manual entry)
  property true value 0.00813953; name wood_chips_true_value
    allocation property applied in "true value" allocation // value calculated from revenue
  properties: dry mass 1 kg, water in wet mass 0.0779488 kg, carbon content, fossil 0, water content 0.0779488, carbon allocation 0.442739 kg

## By-products
- iron scrap, unsorted: 0 kg; CPC 39310: Slag, dross, scalings and other waste from the manufacture of iron or steel; By-product classification Recyclable; pedigree (1,1,1,1,1)
  The amount is set equal to the input amount for the respective material
  production volume 0 kg; = PV* (iron_scrap/ furniture_w)
    Calculated from production volume of reference product using the relative outputs.
  property price 0.149 EUR2005; name iron_scrap_price_EUR2005
    Temporary price data. Calculated as 90% of purchasers price based on: estimated at 85% of sorted scrap
  property carbon content 0
    carbon content on a dry matter basis (reserved; not for manual entry)
  properties: water in wet mass 0 kg, water content 0, carbon content, non-fossil 0, wet mass 1 kg, carbon content, fossil 0, dry mass 1 kg, carbon allocation 0 kg
- waste wood, post-consumer: 0 kg; CPC 3928: Sawdust and wood waste and scrap; By-product classification Recyclable; pedigree (1,1,1,1,1)
  Calculated value. Sum of all wooden inputs minus the assumed wood loss (10%). The value was divided by the wet mass as the flow is represented as dry mass (see the properties section).
  production volume 0 kg; = PV* (waste_wood/ furniture_w)
    Calculated from production volume of reference product using the relative outputs.
  property wet mass 1.07795 kg; name WM_wastewood
  property heating value, net 9.99 MJ
    (same comment as for wood chips, dry, measured as dry mass)
  property price 0.079 EUR2005; name waste_wood_price_EUR2005
    Temporary price data. Calculated as 90% of purchasers price based on: 2005 import prices (total trades (USD) divided by total weight (kg) in biggest economies of the world: EU27, USA, Brasil, China, India, Japan and Russia) from UN Commodity Trade Statistics Database (http://data.un.org/Explorer.aspxDatabase [Accessed 2011.06.23]). Commodity: Sawdust, wood waste or scrap
  property carbon content, non-fossil 0.442739
    Calculated value. Based on carbon content, non-fossil of wood inputs.
  property carbon content 0.442739
    carbon content on a dry matter basis (reserved; not for manual entry)
  properties: water content 0.0779488, dry mass 1 kg, carbon content, fossil 0, water in wet mass 0.0779488 kg, carbon allocation 0.442739 kg

## Inputs from technosphere
- polyethylene terephthalate, granulate, amorphous: 0.000183003 kg; name polyeth; lognormal variance with pedigree 0.0246, pedigree (2,5,4,5,1)
  Literature value. The value derived from the average of the three pieces of furniture from González-García et al. 2011 is 0.006kg. The value represents "Fabrics" (0.006kg). PET is here used as a proxy for "Fabrics", which in the description for "textiles" are mentioned as "polyester and polyurethane".
  properties: carbon content, fossil 0.625, dry mass 1 kg, wet mass 1 kg, heating value, net 22.95 MJ
- wooden board factory, organic bonded boards: 1.57138e-12 unit; = 1/(30000000/(1/647)); lognormal variance with pedigree 0.51, pedigree (5,5,5,5,5)
  Estimated value. This infrastructure is taken as a proxy. According to the general comment of the dataset "wooden board factory construction, organic bonded boards, GLO" accessed 20170712: "The service life is assumed to be 50 years. Thus the life time output is 30'000'000 m3 board." Assuming an average density of 647 kg/m3, this density was calculated based on the weighted average of the sawnwood, laminated timber, MDF and particle board based on their inputs per kg of final product.
- waste paperboard: 0 kg; name waste_paper; pedigree (1,1,1,1,1)
  The amount is set equal to the input amount for the respectives materials.
  production volume 0 kg
    Calculated from production volume of reference product using the relative outputs.
  property price 0 EUR2005; name waste_paper_price_EUR2005
  properties: heating value, net 15.92 MJ, dry mass 0.804 kg, water content 0.243781, wet mass 1 kg, carbon content, non-fossil 0.483259
  note on heating value, net: Value taken from the general comment of the treatment dataset.
  note on carbon content, non-fossil: C content was calculated for 1 kg DM, using data in Tab A.3, ecoinvent v2.2 report 13_I.
- heat, district or industrial, natural gas: 0.0273589 MJ; = 0.023*39; lognormal variance with pedigree 0.0246, pedigree (2,5,4,5,1)
  Calculated value. The value derived from the average of the three pieces of furniture from González-García et al. 2011 is 0.023m3 of natural gas. Assuming a heating value of 39MJ/m3.
  properties: heating value, net 1 MJ
- steel, low-alloyed, hot rolled: 0.00233837 kg; name steel; = 0.230*1/3; lognormal variance with pedigree 0.0192, pedigree (2,5,4,5,1)
  Calculated value. The value derived from the average of the three pieces of furniture from González-García et al. 2011 is 0.230kg. The value represents "Metals", as in the product description, iron, steel and aluminium are mentioned for the production of screws, nail and part of the furniture, it is here assumed that the three metals are used in equal weight share.
  properties: carbon content, fossil 0.005, dry mass 1 kg, wet mass 1 kg
  note on carbon content, fossil: Low alloyed steel composition given in Tab. 3.2 ecoinvent v2.2 report 10_partII. Steel assumed to have a C content of 0.5%
- corrugated board box: 0 kg; name cardboard; pedigree (1,1,1,1,1)
  Literature value. The value derived from the average of the three pieces of furniture from González-García et al. 2011 is 0.019kg of corrugated board (used as part of the product, not as packaging).
  properties: heating value, net 12.86 MJ, carbon content, non-fossil 0.450248, dry mass 0.945 kg, carbon content, fossil 0.00365437, water content 0.0582011, wet mass 1 kg
- sawnwood, hardwood, dried (u=10%), planed: 0 m3; name sawnwood; pedigree (1,1,1,1,1)
  Calculated value. The value derived from the average of the three pieces of furniture from González-García et al. 2011 is 0.01kg. This is multiplied by the product density (see the properties section).
  property wet mass 715 kg; name WM_sawnwood
  properties: heating value, net 9569.82 MJ, dry mass 650 kg, carbon content, non-fossil 0.494, water content 0.1
- glued laminated timber, average glue mix: 0 m3; name timber; pedigree (1,1,1,1,1)
  Calculated value. The value derived from the average of the three pieces of furniture from González-García et al. 2011 is 0.17kg (proxy for high pressure laminate board). This is multiplied by the product density (see the properties section).
  property wet mass 444 kg; name WM_timber
  properties: price 298 EUR2005, carbon content, non-fossil 0.441932, carbon content, fossil 0.01791, dry mass 404.4 kg, water content 0.0979228, heating value, net 5537.41 MJ
- scrap aluminium: 0 kg; name scrap_alu; pedigree (1,1,1,1,1)
  The amount is set equal to the input amount for the respective material
  production volume 0 kg
    Calculated from production volume of reference product using the relative outputs.
  property price 0 EUR2005; name scrap_alu_price_EUR2005
  properties: dry mass 1 kg, wet mass 1 kg
- medium density fibreboard: 0 m3; name mdf; pedigree (1,1,1,1,1)
  Calculated value. The value derived from the average of the three pieces of furniture from González-García et al. 2011 is 0.15kg. This is multiplied by the product density (see the properties section).
  property wet mass 780 kg; name WM_MDF
  properties: dry mass 709.091 kg, carbon content, fossil 0.0558423, carbon content, non-fossil 0.443561, water content 0.1, heating value, net 10890.3 MJ
  note on heating value, net: Assumed equal to "fiberboard, hard".The property is based on a value of 13.96MJ/kg
- electricity, medium voltage: 0.0192763 kWh; lognormal variance with pedigree 0.0246, pedigree (2,5,4,5,1)
  Literature value. The value derived from the average of the three pieces of furniture from González-García et al. 2011 is 0.632kWh.
- diesel, burned in diesel-electric generating set, 18.5kW: 0.00130344 MJ; = 0.001 * 42.735; lognormal variance with pedigree 0.0246, pedigree (2,5,4,5,1)
  Calculated value. The value derived from the average of the three pieces of furniture from González-García et al. 2011 is 0.001kg diesel. The amount of MJ has been calculated by multiplying by the energy content of diesel 42.735 MJ/kg (see comment of parameter: diesel generator efficiency).
- heat, district or industrial, other than natural gas: 0.0212588 MJ; = 0.017*41; lognormal variance with pedigree 0.0246, pedigree (2,5,4,5,1)
  Calculated value. The value derived from the average of the three pieces of furniture from González-García et al. 2011 is 0.017kg of fuel oil. Assuming a heating value of 41MJ/kg based on the reference http://www.globalcombustion.com/oil-fuel-properties/.
  properties: heating value, net 1 MJ, corresponding fuel use, propane, furnace >100kW 1.05263 MJ
  note on corresponding fuel use, propane, furnace >100kW: Lower heating value of the fuel input related to the heat/electricity output, taken directly from ecoinvent v3.0 dataset "heat production, natural gas, at industrial furnace >100kW, GLO 2000".
- extrusion of plastic sheets and thermoforming, inline: 0.000854014 kg; = polyprop+polyeth; lognormal variance with pedigree 0.0246, pedigree (2,5,4,5,1)
  Calculated value. The value derived from the average of the three pieces of furniture from González-García et al. 2011 of "Plastics" (0.022kg) and . "Fabrics" (0.006kg). PET is here used as a proxy for "Fabrics", which in the description for "textiles" are mentioned as "polyester and polyurethane". Polypropylene is here used as a proxy as a plastic often used in the produciton of furniture (information retrieved from FurnitureLink https://www.furniturelinkca.com/plastics.htm, accessed 20171207).
- polypropylene, granulate: 0.000671011 kg; name polyprop; lognormal variance with pedigree 0.0246, pedigree (2,5,4,5,1)
  Literature value. The value derived from the average of the three pieces of furniture from González-García et al. 2011 is 0.022kg. The value represents "Plastics", Polypropylene is here used as a proxy as a plastic often used in the produciton of furniture (information retrieved from FurnitureLink https://www.furniturelinkca.com/plastics.htm, accessed 20171207)
  properties: dry mass 1 kg, wet mass 1 kg, heating value, net 32.78 MJ, carbon content, fossil 0.857143
  note on heating value, net: Value extracted from "treatment of waste polypropylene, open burning"
- scrap steel: 0 kg; name scrap_steel; pedigree (1,1,1,1,1)
  The amount is set equal to the input amount for the respective material
  production volume 0 kg
    Calculated from production volume of reference product using the relative outputs.
  property price 0 EUR2005; name scrap_steel_price_EUR2005
  properties: dry mass 1 kg, wet mass 1 kg
- particleboard, uncoated: 0 m3; name particle; pedigree (1,1,1,1,1)
  Calculated value. The value derived from the average of the three pieces of furniture from González-García et al. 2011 is 0.49kg. This is multiplied by the product density (see the properties section).
  property wet mass 637 kg; name WM_particle
  properties: dry mass 599.3 kg, carbon content, non-fossil 0.4416, water content 0.0629067, carbon content, fossil 0.045339, heating value, net 8749.71 MJ
- cast iron: 0.00233837 kg; name iron; = 0.230*1/3; lognormal variance with pedigree 0.0192, pedigree (2,5,4,5,1)
  (same comment as for steel, low-alloyed, hot rolled)
  properties: carbon content, fossil 0.04, wet mass 1 kg, dry mass 1 kg
  note on carbon content, fossil: Cast iron is made by remelting pig iron in small furnaces (e.g. cupola furnaces or electric arc furnaces) and poured into moulds to make castings. It usually contains 2% to 6% carbon (ecoinvent v2.2 report 10_partII). An average content of 4% was considered
- aluminium, cast alloy: 0.00233837 kg; name alu; = 0.230*1/3; lognormal variance with pedigree 0.0192, pedigree (2,5,4,5,1)
  (same comment as for steel, low-alloyed, hot rolled)
  properties: wet mass 1 kg, dry mass 1 kg
- chemical, organic: 0.000518508 kg; lognormal variance with pedigree 0.0246, pedigree (2,5,4,5,1)
  Literature value. The value derived from the average of the three pieces of furniture from González-García et al. 2011 is 0.017kg. The value is reported as "Chemicals", chemical, organic is used as a proxy.
  properties: carbon content, fossil 0.628, dry mass 1 kg, wet mass 1 kg, heating value, net 19.03 MJ
  note on carbon content, fossil: This dataset is an unweighted average of 20 organic substances (listed in Tab 88.1, ecoinvent v2.2 report 8, part II), being part of the top100 chemicals included in this database. The C-content has also been calculated as an unweighted average of the C content of the substances composing this dataset.
- waste polyethylene/polypropylene product: 0 kg; name waste_poly; pedigree (1,1,1,1,1)
  The amount is set equal to the input amount for the respectives materials.
  production volume 0 kg
    Calculated from production volume of reference product using the relative outputs.
  property price 0 EUR2005; name waste_poly_price_EUR2005
  properties: carbon content, fossil 0.748045, water content 0.180638, dry mass 0.847 kg, wet mass 1 kg, heating value, net 42.47 MJ
  note on carbon content, fossil: Mixed various plastics was used to estimate the C content of this waste (Tab A.2, ecoinvent v2.2 report 13_I)
- iron scrap, unsorted: -0.00233837 kg; lognormal variance with pedigree 0.216, pedigree (5,5,5,5,5)
  The amount is set equal to the input amount for the respective material
  production volume 1.04835e9 kg
  properties: wet mass 1 kg, dry mass 1 kg
- waste wood, post-consumer: -0.0208817 kg; lognormal variance with pedigree 0.216, pedigree (5,5,5,5,5)
  (same comment as for waste wood, post-consumer)
  production volume 9.36178e9 kg
  properties: water content 0.0779488, heating value, net 9.99 MJ, dry mass 1 kg, carbon content, non-fossil 0.442739
  note on carbon content, non-fossil: Calculated value. Based on carbon content, non-fossil of wood inputs.
- waste paperboard: -6.21382e-5, -3.86373e-6, -1.39613e-5, -2.51998e-6, -2.5302e-5, -1.36134e-6, -3.37848e-7, -0.000470025 kg (8 entries); lognormal variance with pedigree 0.216, pedigree (5,5,5,5,5)
  The amount is set equal to the input amount for the respectives materials.
  production volume 2.59809e8 kg
- corrugated board box: 0.000119658, 5.35e-6, 0.000454501 kg (3 entries); lognormal variance with pedigree 0.0246, pedigree (2,5,4,5,1)
  (same comment as for corrugated board box)
- sawnwood, hardwood, dried (u=10%), planed: 1.35502e-7, 3.33737e-7 m3 (2 entries); lognormal variance with pedigree 0.0246, pedigree (2,5,4,5,1)
  (same comment as for sawnwood, hardwood, dried (u=10%), planed)
  properties: heating value, net 9569.82 MJ, dry mass 650 kg, carbon content, non-fossil 0.494, water content 0.1, wet mass 715 kg
- glued laminated timber, average glue mix: 3.76922e-6, 8.18368e-6 m3 (2 entries); lognormal variance with pedigree 0.0246, pedigree (2,5,4,5,1)
  (same comment as for glued laminated timber, average glue mix)
  properties: price 298 EUR2005, carbon content, non-fossil 0.441932, carbon content, fossil 0.01791, dry mass 404.4 kg, wet mass 444 kg, water content 0.0979228, heating value, net 5537.41 MJ
- scrap aluminium: -0.00074175, -3.48012e-5, -0.00156182 kg (3 entries); lognormal variance with pedigree 0.216, pedigree (5,5,5,5,5)
  The amount is set equal to the input amount for the respective material
  production volume 1.04835e9 kg
- medium density fibreboard: 7.81593e-7, 5.00568e-6 m3 (2 entries); lognormal variance with pedigree 0.0246, pedigree (2,5,4,5,1)
  (same comment as for medium density fibreboard)
  properties: dry mass 709.091 kg, wet mass 780 kg, carbon content, fossil 0.0558423, carbon content, non-fossil 0.443561, water content 0.1, heating value, net 10890.3 MJ
- scrap steel: -0.000569382, -7.21387e-7, -0.00176827 kg (3 entries); lognormal variance with pedigree 0.216, pedigree (5,5,5,5,5)
  The amount is set equal to the input amount for the respective material
  production volume 1.04835e9 kg
- particleboard, uncoated: 7.59566e-6, 1.57226e-5 m3 (2 entries); lognormal variance with pedigree 0.0246, pedigree (2,5,4,5,1)
  (same comment as for particleboard, uncoated)
  properties: dry mass 599.3 kg, carbon content, non-fossil 0.4416, water content 0.0629067, wet mass 637 kg, carbon content, fossil 0.045339, heating value, net 8749.71 MJ
- waste polyethylene/polypropylene product: -0.000239545, -7.18814e-6, -0.00060728 kg (3 entries); lognormal variance with pedigree 0.216, pedigree (5,5,5,5,5)
  The amount is set equal to the input amount for the respectives materials.
  production volume 3.82876e8 kg

## Sampling procedure
Secondary literature research. Source: González-García et al. (2011) Assessing the global warming potential of wooden products from the furniture sector
to improve their ecodesign. Science of the Total Environment 410-411 (2011) 16–25.
