# butyl acrylate production

Dataset: EcoSpold 2, unit process
Geography: RoW
Time period: 1995-01-01 to 2021-12-31
Technology level: current
Classification: ISIC rev.4 ecoinvent: 2011:Manufacture of basic chemicals
Synonyms: 141-32-2; N-Butyl acrylate; Butyl prop-2-enoate; N-Butyl propenoate; Acrylic acid butyl ester
Scenario: Business-as-Usual
System model: Allocation, cut-off by classification
Generated by: Maggie Osses
Published in: Althaus H.-J. 2007
Database: ecoinvent
isCopyrightProtected: true
accessRestrictedTo: 1

## General comment
This dataset represents the production of 1 kg of butyl acrylate (100%) by means of esterification of acrylic acid with methanol. Butyl acrylate is a colourless liquid which is slightly soluble in water. It is used for the production of paints, coatings, caulks, sealants and adhesives. This dataset is based on a literature source (von Däniken et al. 1995).
References:
Althaus H.-J., Chudacoff M., Hischier R., Jungbluth N., Osses M. and Primas A. (2007) Life Cycle Inventories of Chemicals. ecoinvent report No. 8, v2.0. EMPA Dübendorf, Swiss Centre for Life Cycle Inventories, Dübendorf, CH.
CAMEO Chemicals. Chemical Datasheet, Butyl acrylate, https://cameochemicals.noaa.gov/chemical/2674 (last accessed on 2017-01-09).
von Däniken A. and Chudacoff M. (1995) Vergleichende ökologische Bewertung von Anstrichstoffen im Baubereich - Band 2: Daten. Buwal Schriftenreihe Umwelt Nr. 232. BUWAL, Bern.

## Included activities start
The activity starts when the raw materials enter the process.

## Included activities end
This activity ends with the production of 1 kg of butyl acrylate. The manufacturing process takes into account the consumption of raw materials, energy, infrastructure and land use, as well as the generation of solid wastes and emissions into air and water. No by-product is generated in the process. The consumption of auxiliaries is not included due to lack of data.

## Geography
Data concerning consumption of raw materials and energy are based on information provided by a coating manufacturing company (Akzo). It is not known how representative these values are for the European butyl acrylate industry. The inventory is assumed to be representative of the global production.

## Technology
This dataset represents the production of 1 kg of butyl acrylate (100%) by means of esterification of acrylic acid with methanol. According to von Däniken et al. (1995), 5.70 E-01 kg butanol and 5.90 E-01 kg acrylic acid are required for the manufacturing of 1 kg butyl acrylate.
Reference:
von Däniken A. and Chudacoff M. (1995) Vergleichende ökologische Bewertung von Anstrichstoffen im Baubereich - Band 2: Daten. Buwal Schriftenreihe Umwelt Nr. 232. BUWAL, Bern.

## Time period
The literature refers to data from the 1990s.

## Parameters
- fraction, cooling water, recirculating system, to air: 0.771 dimensionless; name fraction_CW_R_to_air; lognormal variance with pedigree 0.0413, pedigree (2,3,1,3,1)
  Calculated based on literature value (Scown, C.D., 2011, Water Footprint of U.S. Transportation Fuels and supplying information of the article) (Vionnet, S., Quantis Water Database - Technical Report, 2012).
- fraction, cooling water, to air: 0.3875 dimensionless; name fraction_CW_to_air; = (0.5*fraction_CW_OT_to_air)+(0.5*fraction_CW_R_to_air); lognormal variance with pedigree 0.092025, pedigree (4,4,3,2,4)
  Calculated value based on literature value (see comments of the other parametres present in this dataset) and expert opinion. In the case when no industry/literature data are available about the type of cooling or directly fraction, cooling water, to air specific for the process a default assumption is applied. It is assumed that the once-through cooling system is used in 50% of all cases and recirculating system is used in another 50% of all cases.
- fraction, cooling water, cooling pond system, to air: 0.032 dimensionless; name fraction_CW_CP_to_air; lognormal variance with pedigree 0.0413, pedigree (2,3,1,3,1)
  (same comment as for fraction, cooling water, recirculating system, to air)
- fraction, process water, to air: 0.205 dimensionless; name fraction_PW_to_air; lognormal variance with pedigree 0.092025, pedigree (4,4,3,2,4)
  Literature value (Statistics Canada, 2007 & Shaffer, K.H., 2008, Consumptive water use in the Great Lakes Basin, USGS) (Vionnet, S., Quantis Water Database - Technical Report, 2012).
- fraction, cooling water, once-through system, to air: 0.004 dimensionless; name fraction_CW_OT_to_air; lognormal variance with pedigree 0.0413, pedigree (2,3,1,3,1)
  (same comment as for fraction, cooling water, recirculating system, to air)

## Reference product
- butyl acrylate: 1 kg; name RP; CPC 341: Basic organic chemicals; By-product classification allocatable product; CAS 141-32-2
  Butyl acrylate is a colourless liquid which is slightly soluble in water. It is used for the production of paints, coatings, caulks, sealants and adhesives
  production volume 2.8497e9 kg; name RP_PV
    As reported by Aligoli Amir Nazmi Afshar the global production capacity for the year of 2013 was 3.45 million tonnes.
    Reference(s):
    Aligoli Amirnazmi Afshar, 2014, Chemical Profile: Butyl acrylate, TranTech Consultants, Inc., Retrieved on 15 of June 2017 from: http://chemplan.biz/chemplan_demo/sample_reports/BA_PROFILE.pdf
  property heating value, net 31.22 MJ
    LHV is calculated based on the elemental composition of the substance. Based on the CAS number of the substance (000141-32-2 ), which is found manually, the chemical formula of the substance is found to be: C7H12O2, (PubChem 2020).
    Reference: Kim, S., Chen, J., Cheng, T., Gindulyte, A., He, J., He, S., Li, Q., Shoemaker, B. A., Thiessen, P. A., Yu, B., Zaslavsky, L., Zhang, J., & Bolton, E. E. (2019). PubChem 2019 update: improved access to chemical data. Nucleic acids research, 47(D1), D1102–D1109. https://doi.org/10.1093/nar/gky1033
  property price 1.6 EUR2005
    From ICIS (http://www.icis.com/Articles/2004/03/04/560887/chemical-prices.html.). Commodity: '-Butyl acrylate tanks, frt. alld. E.'. Year 2004.
  property carbon content 0.756757
    carbon content on a dry matter basis (reserved; not for manual entry)
  properties: carbon content, non-fossil 0, carbon content, fossil 0.756757, water in wet mass 0 kg, wet mass 1 kg, water content 0, dry mass 1 kg, carbon allocation 0.756757 kg

## Inputs from technosphere
- electricity, medium voltage: 0 kWh; pedigree (1,1,1,1,1)
  Data from survey in literature (von Däniken et al. 1995)
  Uncertainty: d
- heat, district or industrial, natural gas: 0 MJ; pedigree (1,1,1,1,1)
  Data from survey in literature (von Däniken et al. 1995)
  Uncertainty: d
  properties: heating value, net 1 MJ
- acrylic acid: 0.59 kg; lognormal variance with pedigree 0.072, pedigree (3,5,5,5,1)
  Data from survey in literature (von Däniken et al. 1995)
  Uncertainty: d
  properties: heating value, net 21.88 MJ, wet mass 1 kg, dry mass 1 kg, carbon content, fossil 0.5
- heat, district or industrial, other than natural gas: 0 MJ; pedigree (1,1,1,1,1)
  Data from survey in literature (von Däniken et al. 1995)
  Uncertainty: d
  properties: heating value, net 1 MJ
- 1-butanol: 0.57 kg; lognormal variance with pedigree 0.072, pedigree (3,5,5,5,1)
  Data from survey in literature (von Däniken et al. 1995)
  Uncertainty: d
  properties: heating value, net 35.99 MJ, dry mass 1 kg, wet mass 1 kg, carbon content, fossil 0.648649
- chemical factory, organics: 4e-10 unit; lognormal variance with pedigree 0.3498, pedigree (2,3,5,4,3)
  Calculated based on literature data published by the industry. For this activity, no information was readily available concerning infrastructure and land-use. Therefore, the infrastructure is estimated based on data from two chemical factories, the BASF site of Ludwigshafen and the chemical factory in Gendorf (which are both located in Germany), which produce a wide range of chemical substances. Based on this data, the following assumptions are made: the built area amounts to about 4.2 ha, the plant has an average output of 50'000 t/a and a lifespan of fifty years. The estimated infrastructure amount is therefore 4.00 E-10 units per kg of produced chemical.
  References:
  Althaus H.-J., Chudacoff M., Hischier R., Jungbluth N., Osses M. and Primas A. (2007) Life Cycle Inventories of Chemicals. ecoinvent report No. 8, v2.0. EMPA Dübendorf, Swiss Centre for Life Cycle Inventories, Dübendorf, CH.
  Gendorf (2000) Umwelterklärung 2000, Werk Gendorf. Werk Gendorf, Burgkirchen.
- municipal solid waste: 0 kg; name BP_municipal_solid_waste; pedigree (1,1,1,1,1)
  Data from survey in literature (von Däniken et al. 1995)
  Uncertainty: d
  production volume 0 kg
    Calculated from the production volume of butyl acrylate in proportion to the respective output amounts.
  properties: wet mass 1 kg, water content 0.297017, carbon content, non-fossil 0.261655, carbon content, fossil 0.171549, dry mass 0.771 kg, heating value, net 11.74 MJ
  note on carbon content, non-fossil: MSW composition in tab 4.1, ecoinvent v2.2 report 13_I. C content referred to 1 kg DM
  note on heating value, net: Value taken from the general comment of the treatment dataset.
- electricity, medium voltage: 0.000378156, 7.2514e-5, 0.00121736, 0.0177054, 0.00249558, 0.00813099 kWh (6 entries); lognormal variance with pedigree 0.072, pedigree (3,5,5,5,1)
  Data from survey in literature (von Däniken et al. 1995)
  Uncertainty: d
- heat, district or industrial, natural gas: 0.110596, 7.1759 MJ (2 entries); lognormal variance with pedigree 0.072, pedigree (3,5,5,5,1)
  Data from survey in literature (von Däniken et al. 1995)
  Uncertainty: d
- heat, district or industrial, other than natural gas: 0.00316331, 7.80084 MJ (2 entries); lognormal variance with pedigree 0.072, pedigree (3,5,5,5,1)
  Data from survey in literature (von Däniken et al. 1995)
  Uncertainty: d
- municipal solid waste: -3.95005e-7, -9.95314e-8, -1.42236e-7, -0.000279363 kg (4 entries); lognormal variance with pedigree 0.222, pedigree (3,5,5,5,1)
  Data from survey in literature (von Däniken et al. 1995)
  Uncertainty: d
  production volume 797916 kg

## Inputs from nature
- Water, unspecified natural origin [natural resource, in water]: 0.015 m3; name water_UNO_input; lognormal variance with pedigree 0.072, pedigree (3,5,5,5,1)
  Data from survey in literature (Chauvet 1986)
  Uncertainty: d
- Water, cooling, unspecified natural origin [natural resource, in water]: 0.2 m3; name water_cooling_UNO_input; lognormal variance with pedigree 0.072, pedigree (3,5,5,5,1)
  Data from survey in literature (Chauvet 1986)
  Uncertainty: d

## Emissions to nature
- COD, Chemical Oxygen Demand [water, surface water]: 0.000887 kg; lognormal variance with pedigree 0.182, pedigree (3,5,5,5,4)
  Data from survey in literature (von Däniken et al. 1995)
  Uncertainty: d
- Sulfur dioxide [air, urban air close to ground]: 0.00195 kg; lognormal variance with pedigree 0.182, pedigree (3,5,5,5,4)
  Data from survey in literature (von Däniken et al. 1995)
  Uncertainty: d
- BOD5, Biological Oxygen Demand [water, surface water]: 0.00019 kg; lognormal variance with pedigree 0.182, pedigree (3,5,5,5,4)
  Data from survey in literature (von Däniken et al. 1995)
  Uncertainty: d
- Particulates, > 2.5 um, and < 10um [air, urban air close to ground]: 7.67e-5 kg; lognormal variance with pedigree 0.262, pedigree (3,5,5,5,4)
  Data from survey in literature (von Däniken et al. 1995)
  Uncertainty: d
- Particulates, > 10 um [air, urban air close to ground]: 7.67e-5 kg; lognormal variance with pedigree 0.182, pedigree (3,5,5,5,4)
  Data from survey in literature (von Däniken et al. 1995)
  Uncertainty: d
- Particulates, < 2.5 um [air, urban air close to ground]: 7.67e-5 kg; lognormal variance with pedigree 0.442, pedigree (3,5,5,5,4)
  Data from survey in literature (von Däniken et al. 1995)
  Uncertainty: d
- Water [water, unspecified]: 0.134425 m3; = water_cooling_UNO_input*(1-fraction_CW_to_air)+water_UNO_input*(1-fraction_PW_to_air); lognormal variance with pedigree 0.0827, pedigree (2,2,5,5,1)
  Calculated as a fraction of the input of water. For more details, refer to the mathematical relation and the parameters.
  property wet mass 1000 kg; name WM
  property water in wet mass 1000 kg; name WWM
  property dry mass 0 kg; name DM
  property fraction, origin: fresh water 0; name fraction_origin_fresh_water_Ww
  property carbon content, non-fossil 0; name C_content_non_fossil
  property fraction, origin: unspecified 1; name fraction_origin_unspecified_Ww
  property fraction, origin: salt water 0; name fraction_origin_salt_water_Ww
  property carbon content, fossil 0; name C_content_fossil
- Nitrogen oxides [air, urban air close to ground]: 0.00035 kg; lognormal variance with pedigree 0.182, pedigree (3,5,5,5,4)
  Data from survey in literature (von Däniken et al. 1995)
  Uncertainty: d
- Water [air, unspecified]: 0.080575 m3; = (water_cooling_UNO_input*fraction_CW_to_air)+(water_UNO_input*fraction_PW_to_air); lognormal variance with pedigree 0.0827, pedigree (2,2,5,5,1)
  (same comment as for Water)
  property fraction, origin: unspecified 1; name fraction_origin_unspecified
  property fraction, origin: fresh water 0; name fraction_origin_fresh_water
  property fraction, origin: salt water 0; name fraction_origin_salt_water
- Hydrocarbons, aliphatic, alkanes, unspecified [air, urban air close to ground]: 0.00303 kg; lognormal variance with pedigree 0.262, pedigree (3,5,5,5,4)
  Data from survey in literature (von Däniken et al. 1995)
  Uncertainty: d
- TOC, Total Organic Carbon [water, surface water]: 0.000328519 kg; lognormal variance with pedigree 0.182, pedigree (3,5,5,5,4)
  Calculated by default as TOC (gC) = COD/2.7 (COD measured in g O2). Should more correctly be calculated from the carbon content of the specified emissions to water.
  Uncertainty: d
- DOC, Dissolved Organic Carbon [water, surface water]: 0.000328519 kg; lognormal variance with pedigree 0.182, pedigree (3,5,5,5,4)
  Calculated as equal to TOC.
  Uncertainty: d
- Suspended solids, unspecified [water, surface water]: 0.00026 kg; lognormal variance with pedigree 0.182, pedigree (3,5,5,5,4)
  Data from survey in literature (von Däniken et al. 1995)
  Uncertainty: d

## Extrapolations
In the literature source used, the numbers for process emissions have been taken from the manufacture of dimetylerephthalate, as an approximation. This dataset has been copied from an original dataset covering the geography RER. The uncertainty has been adjusted accordingly.

## Review by Gregor Wernet 2017-08-04
This dataset was additionally reviewed in a separate review process by Eric Johnson of Atlantic Consulting as well as Emilia Moreno Ruiz and Gregor Wernet of ecoinvent.
