# fan production, for power supply unit, desktop computer

Dataset: EcoSpold 2, unit process
Geography: GLO
Time period: 2005-01-01 to 2021-12-31
Technology level: current
Classification: ISIC rev.4 ecoinvent: 2610:Manufacture of electronic components and boards
Classification: EcoSpold01Categories: electronics/module
Tags: ConvertedDataset
Scenario: Business-as-Usual
System model: Allocation, cut-off by classification
Generated by: Roland Hischier
Published in: Hischier R. 2007
Database: ecoinvent
isCopyrightProtected: true
accessRestrictedTo: 1

## General comment
This represents the production and assembly of1 unit of a fan for power supply unit (PSU) of a typical Desktop PC. It is based on a brushless rotary DC fan (12V, 0.15A). Main data about the composition and the weight are from dismantling activities of a PSU at Empa.
[This dataset was already contained in the ecoinvent database version 2. It was not individually updated during the transfer to ecoinvent version 3. Life Cycle Impact Assessment results may still have changed, as they are affected by changes in the supply chain, i.e. in other datasets. This dataset was generated following the ecoinvent quality guidelines for version 2. It may have been subject to central changes described in the ecoinvent version 3 change report (http://www.ecoinvent.org/database/ecoinvent-version-3/reports-of-changes/), and the results of the central updates were reviewed extensively. The changes added e.g. consistent water flows and other information throughout the database. The documentation of this dataset can be found in the ecoinvent reports of version 2, which are still available via the ecoinvent website. The change report linked above covers all central changes that were made during the conversion process.]

## Included activities start
From reception of metals and plastics at the factory gate.

## Included activities end
This dataset includes the material inputs that build up all together a fan, used in a power supply unit of a Desktop PC. Requirements and emissions of the assembly process (energy, emissions, waste) are not included.

## Geography
Data used has no specific geographical origin (see Sampling Procedure).

## Technology
Typical production of a fan, as used in PSU.

## Reference product
- fan, for power supply unit, desktop computer: 1 kg; CPC 4717: Parts for the goods of classes 4711, 4712 and 4714 to 4716; By-product classification allocatable product
  Each Desktop PC has a power supply unit that transforms the 220V electricity from the plug to the adequate voltage used within such a device. The main components of such a PSU are (i) the housing, (ii) a fan for cooling, (iii) the printed wiring board with all its components and a whole bunch of various cables.
  EcoSpold01Location=GLO
  production volume 1 kg
    Dummy value to be replaced by measured, estimated or calculated value
  property price 8.10335 EUR2005
    Calculated based on inputs: The price of the product has been calculated as a sum of the values of the material and energy inputs for this product. This value is therefore a rough estimation. It may underestimate the real price since there are additional expenses when producing any product. These expences can include for example labour costs, treatment of waste materials and profit for the producer. Please consider carefully whether this level of data quality is acceptable for your application.
  property carbon content, fossil 0.693687
    Calculated as the addition of C contents in the product composition
  property carbon content, non-fossil 0.000300198
    Calculated as the addition of C contents in the product composition
  property carbon content 0.693987
    carbon content on a dry matter basis (reserved; not for manual entry)
  properties: wet mass 1 kg, water in wet mass 0 kg, dry mass 1 kg, water content 0, carbon allocation 0.693987 kg

## Inputs from technosphere
- printed wiring board, through-hole mounted, unspecified, Pb containing: 0.046899 kg; = 0.15633*0.3; lognormal variance with pedigree 0.18, pedigree (1,1,5,1,1)
  Measured Value, based on dismantling activites at Empa.
  This original value from production mix has been replaced by 2 flows. Pb-containing has a share of 0.3, Pb-free has a share of 0.7.
  property water content 0; name water_content
  property water in wet mass 0 kg; name WWM
  property wet mass 1 kg; name WM
  property carbon content, fossil 0.254073; name C_content_fossil
  property carbon content, non-fossil 0.00192028; name C_content_non_fossil
  property dry mass 1 kg; name DM
- polyethylene, high density, granulate: 0.7628 kg; lognormal variance with pedigree 0.18, pedigree (1,1,5,1,1)
  EcoSpold01Location=RER
  Measured Value, based on dismantling activites at Empa.
  properties: heating value, net 42.47 MJ, wet mass 1 kg, dry mass 1 kg, carbon content, fossil 0.857143
  note on carbon content, fossil: Polyethylene is formed out of a huge amount of ethylene monomers (C2H4) (ecoinvent v2.2 report 11_II). MW=28 g/mol
- brass: 0 kg; pedigree (1,1,1,1,1)
  EcoSpold01Location=CH
  Measured Value, based on dismantling activites at Empa.
  properties: wet mass 1 kg, dry mass 1 kg
- casting, brass: 0.080863 kg; lognormal variance with pedigree 0.18, pedigree (1,1,5,1,1)
  Measured Value, based on dismantling activites at Empa.
  EcoSpold01Location=CH
- injection moulding: 0.7628 kg; lognormal variance with pedigree 0.18, pedigree (1,1,5,1,1)
  Measured Value, based on dismantling activites at Empa.
  EcoSpold01Location=RER
- printed wiring board, through-hole mounted, unspecified, Pb free: 0.109431 kg; = 0.15633*0.7; lognormal variance with pedigree 0.18, pedigree (1,1,5,1,1)
  (same comment as for printed wiring board, through-hole mounted, unspecified, Pb containing)
  properties: wet mass 1 kg, carbon content, fossil 0.255344, carbon content, non-fossil 0.00192028, dry mass 1 kg
- brass: 0.000404315, 0.0804587 kg (2 entries); lognormal variance with pedigree 0.18, pedigree (1,1,5,1,1)
  EcoSpold01Location=CH
  Measured Value, based on dismantling activites at Empa.

## Sampling procedure
own dismantling & estimation

## Extrapolations
This dataset has been extrapolated from year 2005 to the year of the calculation (2021). The uncertainty has been adjusted accordingly.

## Review by Roland Hischier 2011-09-28
Transfer of documentation done.

## Review by Rolf Frischknecht 2007-09-14
passed
