# printed wiring board mounting facility construction, through-hole mounting line

Dataset: EcoSpold 2, unit process
Geography: GLO
Time period: 2005-01-01 to 2021-12-31
Technology level: current
Classification: EcoSpold01Categories: electronics/module
Classification: ISIC rev.4 ecoinvent: 4290:Construction of other civil engineering projects
Tags: ConvertedDataset
Scenario: Business-as-Usual
System model: Allocation, cut-off by classification
Generated by: Roland Hischier
Published in: Hischier R. 2007
Database: ecoinvent
isCopyrightProtected: true
accessRestrictedTo: 1

## General comment
The data represent an example of a THT mounting line – with a manual insertion of the components, followed by a wave solder machine. Total weight data are taken from producer information of such machines. Composition, infrastructure and production efforts are based on own assumptions. The dataset represents a production line with a total weight of 1’600 kg.
[This dataset was already contained in the ecoinvent database version 2. It was not individually updated during the transfer to ecoinvent version 3. Life Cycle Impact Assessment results may still have changed, as they are affected by changes in the supply chain, i.e. in other datasets. This dataset was generated following the ecoinvent quality guidelines for version 2. It may have been subject to central changes described in the ecoinvent version 3 change report (http://www.ecoinvent.org/database/ecoinvent-version-3/reports-of-changes/), and the results of the central updates were reviewed extensively. The changes added e.g. consistent water flows and other information throughout the database. The documentation of this dataset can be found in the ecoinvent reports of version 2, which are still available via the ecoinvent website. The change report linked above covers all central changes that were made during the conversion process.]

## Included activities start
From reception of raw materials at the factory gate.

## Included activities end
This module includes material, production efforts (material treatment processes), transport efforts and the infrastructure for the production of all the machineries used for the mouning of through-hole mounted components onto a printed wiring board. No information about emissions (air, water) and waste are included.

## Geography
Data represent a global valid composition of a THT mounting line

## Technology
Typical data of current machines sold for the mounting of THT components (see general comments).

## Reference product
- printed wiring board mounting facility, through-hole mounting line: 1 unit; By-product classification allocatable product; CPC 53269: Other constructions for manufacturing
  EcoSpold01Location=GLO
  For a typical THT mounting line, usually just a wave solder machine is requested.
  production volume 1 unit
    Dummy value to be replaced by measured, estimated or calculated value
  property price 18142.8 EUR2005
    Calculated based on inputs: The price of the product has been calculated as a sum of the values of the material and energy inputs for this product. This value is therefore a rough estimation. It may underestimate the real price since there are additional expenses when producing any product. These expences can include for example labour costs, treatment of waste materials and profit for the producer. Please consider carefully whether this level of data quality is acceptable for your application.

## Inputs from technosphere
- road vehicle factory: 9.0909e-7 unit; lognormal variance with pedigree 0.5761, pedigree (4,5,5,3,5)
  Proxy, due to a lack of specific information, the infrastructure dataset established for the production of cars is used.
  EcoSpold01Location=RER
  Uncertainty: rough estimation of infrastructure
- printed wiring board, surface mounted, unspecified, Pb free: 28 kg; lognormal variance with pedigree 0.0761, pedigree (4,2,5,1,3)
  Estimation, based on machines from several producers. It is assumed a total weight of 1’600 kg for the wave solder machine (THT mounting line).
  EcoSpold01Location=GLO
  Uncertainty: estimation, based on partial information from a similar machine
  properties: dry mass 1 kg, carbon content, fossil 0.132522, wet mass 1 kg
  note on carbon content, fossil: C content was calculated as the addition of C content in the PWB components
- flat glass, uncoated: 0 kg; pedigree (1,1,1,1,1)
  Estimation, based on machines from several producers. It is assumed a total weight of 1’600 kg for the wave solder machine (THT mounting line).
  EcoSpold01Location=RER
  Uncertainty: estimation, based on partial information from a similar machine
  properties: dry mass 1 kg, wet mass 1 kg
- section bar rolling, steel: 960 kg; lognormal variance with pedigree 0.0761, pedigree (4,2,5,1,3)
  Estimation, based on machines from several producers. It is assumed a total weight of 1’600 kg for the wave solder machine (THT mounting line) and 1’200 kg of metals.
  EcoSpold01Location=RER
  Uncertainty: estimation, based on partial information from a similar machine
- steel, chromium steel 18/8, hot rolled: 240 kg; lognormal variance with pedigree 0.0761, pedigree (4,2,5,1,3)
  (same comment as for section bar rolling, steel)
  properties: dry mass 1 kg, carbon content, fossil 0.0008, wet mass 1 kg
  note on carbon content, fossil: Stainless steel model is the grade 304 steel (18/8 stainless, 18% chromium 8% nickel; max. 0.08% C)
- cable, network cable, category 5, without plugs: 555.56 m; lognormal variance with pedigree 0.0761, pedigree (4,2,5,1,3)
  (same comment as for printed wiring board, surface mounted, unspecified, Pb free)
  properties: wet mass 0.036 kg, dry mass 0.036 kg, carbon content, fossil 0.203917
  note on carbon content, fossil: Calculated as the addition of C contents in the product composition. Then referred to 1 kg DM
- printed wiring board, through-hole mounted, unspecified, Pb free: 28 kg; lognormal variance with pedigree 0.0761, pedigree (4,2,5,1,3)
  (same comment as for printed wiring board, surface mounted, unspecified, Pb free)
  properties: carbon content, fossil 0.132522, wet mass 1 kg, dry mass 1 kg
- polyethylene, high density, granulate: 100 kg; lognormal variance with pedigree 0.0761, pedigree (4,2,5,1,3)
  EcoSpold01Location=RER
  Estimation, based on machines from several producers. It is assumed a total weight of 1’600 kg for the wave solder machine (THT mounting line).
  Uncertainty: estimation, based on partial information from a similar machine
  properties: heating value, net 42.47 MJ, carbon content, fossil 0.857143, wet mass 1 kg, dry mass 1 kg
  note on carbon content, fossil: Polyethylene is formed out of a huge amount of ethylene monomers (C2H4) (ecoinvent v2.2 report 11_II). MW=28 g/mol
- printed wiring board, surface mounted, unspecified, Pb containing: 12 kg; lognormal variance with pedigree 0.0761, pedigree (4,2,5,1,3)
  EcoSpold01Location=GLO
  Estimation, based on machines from several producers. It is assumed a total weight of 1’600 kg for the wave solder machine (THT mounting line).
  Uncertainty: estimation, based on partial information from a similar machine
  properties: wet mass 1 kg, dry mass 1 kg, carbon content, fossil 0.132522
- injection moulding: 100 kg; lognormal variance with pedigree 0.0761, pedigree (4,2,5,1,3)
  (same comment as for flat glass, uncoated)
- sheet rolling, chromium steel: 240 kg; lognormal variance with pedigree 0.0761, pedigree (4,2,5,1,3)
  (same comment as for section bar rolling, steel)
- printed wiring board, through-hole mounted, unspecified, Pb containing: 12 kg; lognormal variance with pedigree 0.0761, pedigree (4,2,5,1,3)
  (same comment as for printed wiring board, surface mounted, unspecified, Pb containing)
  properties: carbon content, fossil 0.132522, wet mass 1 kg, dry mass 1 kg
- steel, low-alloyed, hot rolled: 960 kg; lognormal variance with pedigree 0.0761, pedigree (4,2,5,1,3)
  EcoSpold01Location=RER
  Estimation, based on machines from several producers. It is assumed a total weight of 1’600 kg for the wave solder machine (THT mounting line) and 1’200 kg of metals.
  Uncertainty: estimation, based on partial information from a similar machine
  properties: dry mass 1 kg, wet mass 1 kg, carbon content, fossil 0.005
  note on carbon content, fossil: Low alloyed steel composition given in Tab. 3.2 ecoinvent v2.2 report 10_partII. Steel assumed to have a C content of 0.5%
- flat glass, uncoated: 34.1524, 165.848 kg (2 entries); lognormal variance with pedigree 0.0761, pedigree (4,2,5,1,3)
  (same comment as for flat glass, uncoated)

## Sampling procedure
Literature & own estimations

## Extrapolations
This dataset has been extrapolated from year 2005 to the year of the calculation (2021). The uncertainty has been adjusted accordingly.

## Review by Rolf Frischknecht 2007-11-08
passed.
