# chlorodifluoromethane production

Dataset: EcoSpold 2, unit process
Geography: NL
Time period: 1999-01-01 to 2021-12-31
Technology level: current
Classification: EcoSpold01Categories: chemicals/organics
Classification: ISIC rev.4 ecoinvent: 2011:Manufacture of basic chemicals
Synonyms: Fluorocarbon 22; Fisherbrand histo freeze(TM)-22; Refrigerant R22; Monochlorodifluoromethane; Freon 22; Chlorodifluoromethane; R-22; Isotron 22; Freon R-22; HCFC-22; Halocarbon 22; Difluorochloromethane; chlorodifluoromethane (R-22); Algeon 22
Tags: ConvertedDataset
Scenario: Business-as-Usual
System model: Allocation, cut-off by classification
Generated by: Niels Jungbluth
Published in: Althaus H.-J. 2007
Database: ecoinvent
isCopyrightProtected: true
accessRestrictedTo: 1

## General comment
Inventory for a chemical. Emissions of HFC-23 are much higher in the world wide average.
[This dataset was already contained in the ecoinvent database version 2. It was not individually updated during the transfer to ecoinvent version 3. Life Cycle Impact Assessment results may still have changed, as they are affected by changes in the supply chain, i.e. in other datasets. This dataset was generated following the ecoinvent quality guidelines for version 2. It may have been subject to central changes described in the ecoinvent version 3 change report (http://www.ecoinvent.org/database/ecoinvent-version-3/reports-of-changes/), and the results of the central updates were reviewed extensively. The changes added e.g. consistent water flows and other information throughout the database. The documentation of this dataset can be found in the ecoinvent reports of version 2, which are still available via the ecoinvent website. The change report linked above covers all central changes that were made during the conversion process.]

## Included activities end
Gate to gate inventory for the production in the Netherlands, estimation for infrastructure and not including by-products.

## Geography
Plant e.g. in NL

## Technology
Chemical processing

## Time period
Publication date

## Parameters
- fraction, process water, to air: 0.205 dimensionless; name fraction_PW_to_air; lognormal variance with pedigree 0.092025, pedigree (4,4,3,2,4)
  Literature value (Statistics Canada, 2007 & Shaffer, K.H., 2008, Consumptive water use in the Great Lakes Basin, USGS) (Vionnet, S., Quantis Water Database - Technical Report, 2012).
- fraction, tap water, to air: 0.205 dimensionless; name fraction_TW_to_air; = fraction_PW_to_air; lognormal variance with pedigree 0.092025, pedigree (4,4,3,2,4)
  Calculated value. See comment in the other parametres present in this dataset. Tap water is considered to be always used as process water, thus process water fractions to air are applied to all tap water input flows to calculate the amount of water consumed in the processes.

## Reference product
- chlorodifluoromethane: 1 kg; CPC 34110: Hydrocarbons and their halogenated, sulphonated, nitrated or nitrosated derivatives; By-product classification allocatable product; CAS 75-45-6
  EcoSpold01Location=NL
  production volume 8.7125e7 kg
    The worldwide production capacity in 1987 for fluoroplastics was ca. 45 000t.
    According to the European Pollutant Release and Transfer Register, there are two producers in Europe (one in the Netherlands the other in Spain). Thus, the amount assumed to be produced in Europe (25% of the global production, which corresponds well with the feedstock of 254E6 kg trichloromethane estimated in EU risk assessment of chloroform http://echa.europa.eu/doc/trd_substances/chloroform/rar/trd_rar_env_france_chloroform.pdf page 11 Accessed 20 July 2011) is divided evenly between these two locations.
  property heating value, net 5.61 MJ
    LHV is calculated based on the elemental composition of the substance. Based on the CAS number of the substance (000075-45-6), the chemical formula of the substance is found to be: CHClF2, (PubChem 2020).
    Reference: Kim, S., Chen, J., Cheng, T., Gindulyte, A., He, J., He, S., Li, Q., Shoemaker, B. A., Thiessen, P. A., Yu, B., Zaslavsky, L., Zhang, J., & Bolton, E. E. (2019). PubChem 2019 update: improved access to chemical data. Nucleic acids research, 47(D1), D1102–D1109. https://doi.org/10.1093/nar/gky1033
  property carbon content 0.139535
    carbon content on a dry matter basis (reserved; not for manual entry)
  properties: water in wet mass 0 kg, carbon content, non-fossil 0, dry mass 1 kg, water content 0, price 1.57 EUR2005, carbon content, fossil 0.139535, wet mass 1 kg, carbon allocation 0.139535 kg

## By-products
- municipal solid waste: 0 kg; CPC 39910: Municipal waste; By-product classification Waste
  EcoSpold01Location=CH
  Other wastes, literature 1994
  production volume 0 kg
    Calculated from the production volume of chlorodifluoromethane in proportion to the respective output amounts.
    104550 if a flow of 0.0012 is used.
  property carbon content, non-fossil 0.261655
    MSW composition in tab 4.1, ecoinvent v2.2 report 13_I. C content referred to 1 kg DM
  property price 0 EUR2005
    Waste products are assigned a price of zero as they are assumed to require further treatment.
  property carbon content, fossil 0.171549
    MSW composition in tab 4.1, ecoinvent v2.2 report 13_I. C content referred to 1 kg DM
  property heating value, net 11.74 MJ
    Value taken from the general comment of the treatment dataset.
  property carbon content 0.433204
    carbon content on a dry matter basis (reserved; not for manual entry)
  properties: water in wet mass 0.229 kg, dry mass 0.771 kg, water content 0.297017, wet mass 1 kg, carbon allocation 0.334 kg

## Inputs from technosphere
- trichloromethane: 1.6 kg; lognormal variance with pedigree 0.0526, pedigree (3,3,5,1,1)
  Estimation based on literature values
  EcoSpold01Location=RER
  Uncertainty: Estimation based on literature values
  properties: dry mass 1 kg, heating value, net 4.06 MJ, carbon content, fossil 0.101695, wet mass 1 kg
- hydrogen fluoride: 0.55 kg; lognormal variance with pedigree 0.0526, pedigree (3,3,5,1,1)
  Estimation based on literature values
  EcoSpold01Location=GLO
  Uncertainty: Estimation based on literature values
  properties: heating value, net 6.06 MJ, wet mass 1 kg, dry mass 1 kg
- heat, district or industrial, natural gas: 1.9 MJ; lognormal variance with pedigree 0.0526, pedigree (3,3,5,1,1)
  EcoSpold01Location=RER
  Literature 1998
  Uncertainty: Literature 1998
  properties: heating value, net 1 MJ
- tap water: 0.953 kg; name tap_water_input; lognormal variance with pedigree 0.0601, pedigree (3,5,5,3,1)
  Calculation in literature
  EcoSpold01Location=RER
  Uncertainty: Calculation in literature
  properties: wet mass 1 kg, dry mass 0.000337476 kg, carbon content, fossil 0.00178991, water content 2962.17
  note on carbon content, fossil: Bicarbonate content is 2.93 mol/m3. CO2 content is 0.1 mol/m3 (ecoinvent v2.2 report 8, Tab 93.1).
- sodium hydroxide, without water, in 50% solution state: 0.0616 kg; lognormal variance with pedigree 0.0601, pedigree (3,5,5,3,1)
  Calculation in literature
  EcoSpold01Location=RER
  Uncertainty: Calculation in literature
  properties: heating value, net 3.03 MJ, dry mass 1 kg, wet mass 1 kg
- chemical factory, organics: 4e-10 unit; lognormal variance with pedigree 0.628, pedigree (5,5,5,1,5)
  EcoSpold01Location=RER
  Generic estimation
  Uncertainty: Generic estimation
- electricity, medium voltage: 0.5 kWh; lognormal variance with pedigree 0.0526, pedigree (3,3,5,1,1)
  EcoSpold01Location=NL
  Literature 1998
  Uncertainty: Literature 1998
- sulfuric acid: 0.213 kg; lognormal variance with pedigree 0.0601, pedigree (3,5,5,3,1)
  Calculation in literature
  EcoSpold01Location=RER
  Uncertainty: Calculation in literature
  properties: dry mass 1 kg, wet mass 1 kg
- refinery sludge: -0.0044 kg; lognormal variance with pedigree 0.0586, pedigree (4,3,5,1,1)
  Chemical wastes, literature 1994
  EcoSpold01Location=CH
  Uncertainty: Chemical wastes, literature 1994
  production volume 383350 kg
    Calculated from the production volume of chlorodifluoromethane in proportion to the respective output amounts.
  properties: dry mass 0.105 kg, water content 8.52381, carbon content, fossil 0.767857, wet mass 1 kg, heating value, net 2.45 MJ
  note on carbon content, fossil: Tab A.6, ecoinvent v2.2 report 13_I. C content has been calculated after data in the tables, and then referred to 1 kg DM
  note on heating value, net: Value taken from the general comment of the treatment dataset.

## Emissions to nature
- Methane, trifluoro-, HFC-23 [air, urban air close to ground]: 0.0035 kg; lognormal variance with pedigree 0.0941, pedigree (3,4,5,3,1)
  Range 0.35-1.5% of product, estimation for European plant.
  Uncertainty: Range 0.35-1.5% of product, estimation for European plant.
- Water [water, unspecified]: 0.000757635 m3; name water_to_water_unspecified; = (tap_water_input/1000)*(1-fraction_TW_to_air); lognormal variance with pedigree 0.0807, pedigree (2,2,5,1,1)
  Calculated value based on literature values and expert opinion. See comments in the parametres' comment field.
  property dry mass 0 kg; name DM
  property fraction, origin: unspecified 0; name fraction_origin_unspecified_Ww
  property fraction, origin: salt water 0; name fraction_origin_salt_water_Ww
  property fraction, origin: fresh water 1; name fraction_origin_fresh_water_Ww
  property wet mass 1000 kg; name WM
  property carbon content, non-fossil 0; name C_content_non_fossil
  property carbon content, fossil 0; name C_content_fossil
  property water in wet mass 1000 kg; name WWM
- Chloroform [air, urban air close to ground]: 0.0001 kg; lognormal variance with pedigree 0.0926, pedigree (3,3,5,1,1)
  Literature 1994
  Uncertainty: Literature 1994
- Chloroform [water, surface water]: 1.1e-5 kg; lognormal variance with pedigree 0.3626, pedigree (3,3,5,1,1)
  Literature 1994
  Uncertainty: Literature 1994
- Chloride [water, surface water]: 0.0983 kg; lognormal variance with pedigree 0.7101, pedigree (3,5,5,3,1)
  Calculation in literature
  Uncertainty: Calculation in literature
- Hydrogen fluoride [air, urban air close to ground]: 0.0031 kg; lognormal variance with pedigree 0.1001, pedigree (3,5,5,3,1)
  Calculation in literature
  Uncertainty: Calculation in literature
- Zinc, ion [water, surface water]: 4.3e-6 kg; lognormal variance with pedigree 0.7026, pedigree (3,3,5,1,1)
  Literature 1994
  Uncertainty: Literature 1994
- Methane, chlorodifluoro-, HCFC-22 [air, urban air close to ground]: 0.0038 kg; lognormal variance with pedigree 0.0941, pedigree (3,4,5,3,1)
  Range 0.38-5% of product, estimation for European plant.
  Uncertainty: Range 0.38-5% of product, estimation for European plant.
- Methane, dichlorodifluoro-, CFC-12 [air, urban air close to ground]: 0.00082 kg; lognormal variance with pedigree 0.0926, pedigree (3,3,5,1,1)
  Literature 1994
  Uncertainty: Literature 1994
- Hydrogen chloride [air, urban air close to ground]: 0.0056 kg; lognormal variance with pedigree 0.1001, pedigree (3,5,5,3,1)
  Calculation in literature
  Uncertainty: Calculation in literature
- Water [air, unspecified]: 0.000195365 m3; name water_to_air_unspecified; = (tap_water_input/1000*fraction_TW_to_air); lognormal variance with pedigree 0.0807, pedigree (2,2,5,1,1)
  (same comment as for Water)
  property fraction, origin: unspecified 0; name fraction_origin_unspecified
  property fraction, origin: salt water 0; name fraction_origin_salt_water
  property fraction, origin: fresh water 1; name fraction_origin_fresh_water
- Sodium, ion [water, surface water]: 0.0646 kg; lognormal variance with pedigree 0.7101, pedigree (3,5,5,3,1)
  Calculation in literature
  Uncertainty: Calculation in literature
- Methane, dichlorofluoro-, HCFC-21 [air, urban air close to ground]: 1.1e-5 kg; lognormal variance with pedigree 0.0926, pedigree (3,3,5,1,1)
  Data for European plant.
  Uncertainty: Data for European plant.
- Antimony [water, surface water]: 3.6e-5 kg; lognormal variance with pedigree 0.7026, pedigree (3,3,5,1,1)
  Literature 1994
  Uncertainty: Literature 1994
- Methane, trichlorofluoro-, CFC-11 [air, urban air close to ground]: 1.15e-5 kg; lognormal variance with pedigree 0.0926, pedigree (3,3,5,1,1)
  Literature 1994
  Uncertainty: Literature 1994
- Hydrocarbons, unspecified [water, surface water]: 1e-6 kg; lognormal variance with pedigree 0.3626, pedigree (3,3,5,1,1)
  Literature 1994
  Uncertainty: Literature 1994
- Sulfate [water, surface water]: 0.278 kg; lognormal variance with pedigree 0.7101, pedigree (3,5,5,3,1)
  Calculation in literature
  Uncertainty: Calculation in literature

## Sampling procedure
Literature, company information, stoichiometric calculations, assumptions.

## Extrapolations
This dataset has been extrapolated from year 1999 to the year of the calculation (2021). The uncertainty has been adjusted accordingly.

## Review by Roland Hischier 2003-05-28
Passed.
