# wood preservation, vacuum pressure method, inorganic salt, containing Cr, outdoor use, ground contact

Dataset: EcoSpold 2, unit process
Geography: RoW
Time period: 2012-01-01 to 2021-12-31
Technology level: current
Classification: EcoSpold01Categories: wooden materials/refinement
Classification: ISIC rev.4 ecoinvent: 1610:Sawmilling and planing of wood
Synonyms: saturation impregnation; full-cell process
Scenario: Business-as-Usual
System model: Allocation, cut-off by classification
Generated by: trainee ecoinvent
Published in: Künniger T. 2000
Database: ecoinvent
isCopyrightProtected: true
accessRestrictedTo: 1

## General comment
This dataset covers the treatment of dried timber with inorganic CCB (chromium, copper, boron) salt with the vacuum pressure method.
Wood is not included in the dataset.
Pressure processes have been used for more than 150 years for impregnating wood with preservatives. The choice of the pressure process depends on the intended use, the nature and quality of the preservative, and the moisture level of the wood at the time of treatment.
In the vacuum pressure process (also called full-cell process or saturation impregnation), air present in the dried wood is removed with a high initial vaccum, then the impregnation cylinder is filled with the preservative solution while the vaccum is maintained. Finally, after air is admitted to the cyclinder, an impregnation pressure is produced and maintained for a defined period, depending on the ease of impregnation of the wood. Generally pressures >0.9 MPa are applied. The pressure is maintanined until virtually no more liquid is absorbed by the wood. In some plants, this is controlled automatically via an end-phase counter, which determines the quantity of preservative that can still be absorbed by the wood. Application of a short final vacuum should decrease the extend of dripping of the impregnation solution from the wood after it is removed from the cyclinder. This process was introduced by Bréant in 1831 for impregnation with salts, and by Bethell in 1838 for impregnation with tar oils.
Depending on the use class envisaged for the treated timber, the following preservative inputs can be assumed (for softwood): use class 3: 7.5 kg/m3 for spruce and fir and 9 kg/m3 for pine; use class 4: 12 kg/m3 for spruce, fir and pine (according to requirements for the Swiss Lignum quality label for pressure impregnated wood (status 11/2011).
The basic equipment for a plant for the vaccum pressure method consists fo a impregnating cylinder with one or two seals, one or more storage vessel for various wood preservatives or solutions of different concentrations, a pressure pump, a vacuum pump, measuring and dissolving vessels, and a control device for maintaining impregnation conditions.
Most plants are now controlled automatically with fixed programs an can produce full impregnation protocols independently. The vacuum pressure method (or full-cell process) is applied mainly for water-soluble wood preservatives. Coal-tar oils and solvent-containing preparations are seldom used because preservative absorption is too high.
The process does not cause any waste water; preservatives from dripping or leaching during storage are recovered and recycled. Emissions into surface water from run-off water are calculated based on emission factors (EF) as determined in OECD (2000, part 1 p. 46ff), depending on the physical properties of the main componentes of the wood preservative. It is assumed in addition that all solvents (incl. water) are evaporated during drying and fixation. For acids and salts, no emissions into air are inventoried. The determination of emission factors is documented in the following table:
For detailed modelling and scenario assumptions, see dataset.
Sources: OECD (2000): Emission scenario document for wood preservatives, part 1. OECD series on emission scenario documents, number 2, Organisation for Economic Co-operation and Development, Paris.
Künniger, T. and K. Richter (2000): Ökobilanzen von Konstruktionen im Garten- und Landschaftsbau [Environmental assessment of constructions of garden and landscape architecture]. Eidg. Materialprüfungs- und Forschungsanstalt (EMPA), Dübendorf.
Personal written communications of several producers and/or researchers (see source fields for each exchange)

## Included activities start
Service starting with the reception of the wood preservative at the factory gate

## Included activities end
The data set contains the treatment service of dried wood with wood preservative based on inorganic CCB salts with the vacuum pressure method. It covers the necessary inputs of the wood preservative, electricity, ingredients for waste water/surface water treatment as well as some infrastructure. For the inventorying of emissions into surface water and air, see general comment.The dataset does not include wood. Also eventual waste streams (e.g. saw dust recollected from the pressure vessel) are not included.

## Parameters
- share of collected rainwater: 0.5 dimensionless; name share_collected_rainwater
  share of the rainwater that is colleced and lead into the sewer contrary to run-off water; default value according to OECD (2000, part 1)
- scaling factor: 3.96296 dimensionless; name scaling_factor
- efficiency of air filter: 0.75 dimensionless; name efficiency_air_filter
  According to EPA 1999 (p. 10.8-5) 'the result of one emission test on the incinerator-controlled facility indicated a VOC control efficiency of more than 99 percent'. Other emissions control devices such as knock-out tanks followed by a ventury scrubber are indicated to have a VOC control efficiency of 75% (same source).

## Reference product
- wood preservation, vacuum pressure method, inorganic salt, containing Cr, outdoor use, ground contact: 1 kg; = 0.252336895597944 * scaling_factor; By-product classification allocatable product; CPC 54730: Painting services
  Amount was scaled to 1.
  production volume 1.56236e8 kg; name p_preservation; = 3.65E09 * 0.5 *0.6 * 0.29 *0.5
    Using the GLO value of 3.65E09 kg preservative derived from Vlosky (2009), the distribution on waterborne (60%), 50% pressure methods, the 50% of oscillating pressure, and the 29% Cr-containing, we obtain: 3.65E09 kg * 0.5 (pressure) *0.6 (waterborne) * 0.29 (Cr)*0.5 (osc.) = 1.59E8kg
  property price 1.01314 EUR2005
    Calculated based on inputs: The price of the product has been calculated as a sum of the values of the material and energy inputs for this product. This value is therefore a rough estimation. It may underestimate the real price since there are additional expenses when producing any product. These expences can include for example labour costs, treatment of waste materials and profit for the producer. Please consider carefully whether this level of data quality is acceptable for your application.

## Inputs from technosphere
- sulfuric acid: 0.025 kg; = 0.0063084223899486 * scaling_factor; source Leuenberger H. 2012; lognormal variance with pedigree 0.0118, pedigree (2,3,4,5,1)
  used for treatment of wastewater, mainly from recollection of rainwater from storage area; consumption largely depending on annual rainfall, less on production volume. Normalized to 1 kg preservative, assumed as average input of 10 kg/m3.
  Amount was scaled to the amount of reference product.
  properties: wet mass 1 kg, dry mass 1 kg
- wood preservation facility, vacuum pressure method: 2.22222e-7 unit; = 5.60748656884319E-08 * scaling_factor; source Leuenberger H. 2012; lognormal variance with pedigree 0.38, pedigree (3,5,4,5,1)
  per 6000 m3/year over 75 years with an average input of 10 kg preservative/m3
  Amount was scaled to the amount of reference product.
- electricity, medium voltage: 0 kWh; source Künniger T. 2000; pedigree (1,1,1,1,1)
  Conversion from MJ to kWh; value confirmed personal communication by Mr. H. Leuenberger, Holzmprägnierwerk Waldkirch. Normalized to 1 kg preservative, assume an average input of 10 kg/m3. 15 MJ/m3 are representative for spruce, fir and douglas fir; 10.3 MJ/m3 can be assumed for pine.
  Amount was scaled to the amount of reference product.
- sodium hydroxide, without water, in 50% solution state: 0.010656 kg; = 0.00268890195949169 * scaling_factor; source Leuenberger H. 2012; lognormal variance with pedigree 0.0118, pedigree (2,3,4,5,1)
  used for treatment of wastewater, mainly from recollection of rainwater from storage area; consumption largely depending on annual rainfall, less on production volume; adaption to 32% concentration. Normalized to 1 kg preservative, assumed as average input of 10 kg/m3.
  Amount was scaled to the amount of reference product.
  properties: dry mass 1 kg, heating value, net 3.03 MJ, wet mass 1 kg
- tap water: 0 kg; name m_tapwater; source Leuenberger H. 2012; pedigree (1,1,1,1,1)
  used as process water. Normalized to 1 kg preservative, assume an average input of 10 kg/m3.
  Amount was scaled to the amount of reference product.
  property dry mass 0.000337476 kg; name DM
  property wet mass 1 kg; name WM
  property water in wet mass 0.999663 kg; name WWM
  property water content 2962.17; name water_content
  property carbon content, fossil 0.00178991; name C_content_fossil
  property carbon content, non-fossil 0; name C_content_non_fossil
- wood preservative, inorganic salt, containing Cr: 1 kg; = 0.252336895597944 * scaling_factor; source Künniger T. 2000; lognormal variance with pedigree 0.01, pedigree (1,1,4,5,1)
  input of preservative
  Amount was scaled to the amount of reference product.
  properties: dry mass 1 kg, wet mass 1 kg
- electricity, medium voltage: 0.00525216, 0.00100714, 0.0169078, 0.245908, 0.0346609, 0.11293 kWh (6 entries); source Künniger T. 2000; lognormal variance with pedigree 0.022, pedigree (1,4,4,5,1)
  (same comment as for electricity, medium voltage)
- tap water: 0.38915, 0.0468433, 0.0774162, 1.95213, 0.0507842, 0.144455, 22.3392 kg (7 entries); source Leuenberger H. 2012; lognormal variance with pedigree 0.0118, pedigree (2,3,4,5,1)
  (same comment as for tap water)
  properties: dry mass 0.000337476 kg, wet mass 1 kg, water content 2962.17, carbon content, fossil 0.00178991

## Emissions to nature
- Dichromate [water, unspecified]: 0.0034322 kg; = 0.000866071548450571 * scaling_factor; source OECD 2000; lognormal variance with pedigree 0.092, pedigree (3,5,5,5,1)
  from chromic acid, converted to equivalent of dichromate ([Cr2O2]2-) per chrome in chromic acid (molar relations).
  Amount was scaled to the amount of reference product.
- Borate [water, unspecified]: 0.00362656 kg; = 0.000915113957225378 * scaling_factor; source OECD 2000; lognormal variance with pedigree 0.092, pedigree (3,5,5,5,1)
  as octoborate ions from disodium octaborate and tetrahydroxy borate (B(OH4)) ions from boric acid
  Amount was scaled to the amount of reference product.
- Sodium, ion [water, unspecified]: 0.000167476 kg; = 4.22603053307237E-05 * scaling_factor; source OECD 2000; lognormal variance with pedigree 0.0105, pedigree (1,1,4,1,1)
  from disodium octaborate (molar relations)
  Amount was scaled to the amount of reference product.
- Copper, ion [water, unspecified]: 3.98734e-6 kg; = 1.00615344447281E-06 * scaling_factor; source OECD 2000; lognormal variance with pedigree 0.092, pedigree (3,5,5,5,1)
  proxy for copper (II)oxid solved in acids
  Amount was scaled to the amount of reference product.
- Water [air, unspecified]: 0.0252735 m3; = (m_tapwater+0.2735)/1000; lognormal variance with pedigree 0.0105, pedigree (1,1,4,1,1)
  tap water plus water in preservative
- Nitrite [water, unspecified]: 0.000375 kg; = 9.4626335849229E-05 * scaling_factor; source OECD 2000; lognormal variance with pedigree 0.092, pedigree (3,5,5,5,1)
  from nitric acid
  Amount was scaled to the amount of reference product.

## Sampling procedure
Plant measurements for input of energy, water, etc. Estimates based on literature for air-borne emissions and emissions into water.

## Extrapolations
Calculated as weighted average of existing local data
