# sawing, softwood

Dataset: EcoSpold 2, unit process
Geography: RoW
Time period: 2011-01-01 to 2021-12-31
Technology level: current
Classification: ISIC rev.4 ecoinvent: 1610:Sawmilling and planing of wood
Scenario: Business-as-Usual
System model: Allocation, cut-off by classification
Generated by: Frank Werner
Published in: BFS 2013
Database: ecoinvent
isCopyrightProtected: true
accessRestrictedTo: 1

## General comment
This dataset represents the service of sawing one m3 softwood at a sawmill.
The process chain in a sawmill is a net of interlinked processes; the process structure depends on the individual design and technologies in place for each sawmill. The structuring of the sawmilling processes is based on the identification of the core processes in a sawmill that are attributable to several co-products (such as upstream processes like forestry and transport of logs to the sawmill) sorting, storing and the sawing of the (debarked) log. Other processes are attributable directly to one of the co-products such as the chipping of residual wood (either after sawing or as part of the profile chipping), the chipping of the bark (the "debarking") or the suction of saw dust as collection and internal transport.
The following figure illustrates the general structure of the sawmilling processes before eventual drying and planing:
For the sawing, no distinction is made regarding different types of sawn wood products such as beams, boards and laths as sawing pattern largely depend on the diameter of the log and usually different types and sizes of sawn timber products are produced in the same cut. Further down the process chain i.e. for the drying and planing, beams, boards and laths are distinguised as their corresponding inputs in heat, electricity, etc. differ considerably in these process steps. The different sawnwood products (which will be discriminated later in the process chain) and the yields of the sawing process are indicated below:
The data was provided by and approved by the Swiss forest industry (Holzindustrie Schweiz HIS).

## Included activities start
The sawing process starts with the sorting of the log at the sawmill.

## Included activities end
This activity ends with sawn hardwood, at sawmill; the processing of all co-products form the sawing process are covered in separate datasets.The dataset does not include dust emissions to the environment because of lack of data.

## Geography
Represents average Swiss conditions.

## Parameters
- Bark ratio: 0.12 dimensionless; name bark
  ratio of the bark of the total stem volume
- wood density, basic: 387.2 kg/m3; name basic_wood_d; = dry_wood_d*(1-30*shrinkage_ratio)
  kg oven-dry matter/wet volume
- shrinkage ratio (u=30% - 0%): 0.004 dimensionless; name shrinkage_ratio
  shrinkage ratio between u=30% to 0%
- wood density, apparent: 658.24 kg/m3; name wood_d_apparent; = (1+moisture_sawnwood/100)* basic_wood_d
  kg wet matter/wet volume
- moisture content sawnwood: 70 dimensionless; name moisture_sawnwood
  moisture content of sawnwood
- share of sawnwood: 61 dimensionless; name share_sawnwood
  share of sawnwood produced from the debarked stem volume
- share of sawdust: 12 dimensionless; name share_sawdust
  share of sawdust produced from the debarked stem volume
- share of slab: 27 dimensionless; name share_slab
  share of slabs/sidings/cut-offs produced from the debarked stem volume
- moisture content slab: 70 dimensionless; name moisture_slab
  moisture content of slab
- moisture content saw dust: 70 dimensionless; name moisture_sawdust
  moisture content of sawdust
- wood density, dry: 440 kg/m3; name dry_wood_d
  kg oven-dry matter/oven-dry volume

## Reference product
- slab and siding, softwood, wet, measured as dry mass: 1 kg; name m_slab; = sawnwood_raw/(share_sawnwood/100)* share_slab/100* basic_wood_d; source BFS 2013; CPC 31600: Builders' joinery and carpentry of wood (including cellular wood panels, assembled parquet panels, shingles an[…]; By-product classification allocatable product; pedigree (1,1,1,1,1)
  calculated by the share and basic density as the moisture content is over 30%
  production volume 3.18551e10 kg; = m_slab*p_sawnwood/sawnwood_raw
    Calculated from production volume of reference product using the relative outputs.
  property dry mass 1 kg; name slab_DM
  property water in wet mass 0.7 kg; name slab_WWM
  property water content 0.7; name slab_water_content; = moisture_slab/100
  property price 0.055 EUR2005; name m_slab_price_EUR2005
    Expert judgement (Urs Luginbühl, Swiss Sawmilling industry, personal communication in June 2014). Cross-reference; FAOSTAT (accessed 20140429). The price is calculated by using data on total world import quantity (m3) and import value (1000 USD), year 2005. 40461924 m3 of Chips and Particles was imported in the world in 2005. The import value was 3022227000 USD. The calculated price is thus (3022227000/40461924=74.7*0.8=) 62.2 Euro/m3. It is estimated, that the chips and particles are half hardwood (of density 650 kg/m3) and half softwood (of density 450 kg/m3), thus the remaining mixture has a density of 550 kg/m3. The recalculated price is (1/550*62.2=) 0.11 Euro/kg.
  property heating value, net 7.79 MJ
    LHV is calculated based on the Carbon content of the product. More details can be found on the respective documentation.
  property wet mass 1.7 kg; name slab_WM
  property carbon content, fossil 0; name slab_C_content_fossil
    fossil carbon content on a dry matter basis
  property carbon content, non-fossil 0.494; name slab_C_content_non_fossil
    biogene carbon content on a dry matter basis
  property carbon content 0.494
    carbon content on a dry matter basis (reserved; not for manual entry)
  property true value 9.4261; name m_slab_true_value
    allocation property applied in "true value" allocation // value calculated from revenue
  properties: carbon allocation 0.494 kg
- sawnwood, softwood, raw: 0 m3; name sawnwood_raw; source BFS 2013; By-product classification allocatable product; CPC 31101: Wood, sawn or chipped lengthwise, sliced or peeled, of a thickness exceeding 6 mm, of coniferous wood
  production volume 1.97745e8 m3; name p_sawnwood
    Production volumes of sawntimber (NC) or (C) as applicable according to FAOStat
  property water in wet mass 271.04 kg; = WM- basic_wood_d
  property wet mass 658.24 kg; name WM; = basic_wood_d*(1+moisture_sawnwood/100)
  property water content 0.7; = moisture_sawnwood/100
  property dry mass 387.2 kg; = basic_wood_d
  property price 160 EUR2005; name sawnwood_raw_price_EUR2005
    Expert judgement (Urs Luginbühl, Swiss Sawmilling industry, personal communication in June 2014). Cross-reference; FAOSTAT (accessed 20140428). The price is calculated by using data on total world import quantity (m3) and import value (1000 USD), year 2005. 109432798 m3 of Sawnwood (C) - coniferous was imported in the world in 2005. The import value was 22249842000 USD. The calculated price is thus (22249842000/109432798=203*0.8=) 164 Euro.
  property heating value, net 5130.57 MJ
    LHV is calculated based on the Carbon content of the product. More details can be found on the respective documentation.The property is based on a value of 7.79MJ/kg
  property carbon content 0.494
    carbon content on a dry matter basis (reserved; not for manual entry)
  property true value 160; name sawnwood_raw_true_value
    allocation property applied in "true value" allocation // value calculated from revenue
  properties: carbon content, fossil 0, carbon content, non-fossil 0.494, carbon allocation 191.277 kg

## By-products
- bark: 0 kg; name m_bark; source BFS 2013; CPC 31230: Wood in chips or particles; By-product classification allocatable product; pedigree (1,1,1,1,1)
  calculated by the share and basic density as the moisture content is over 30%
  production volume 2.56783e10 kg; = m_bark*p_sawnwood/sawnwood_raw
    Calculated from production volume of reference product using the relative outputs.
  property price 0.034 EUR2005; name m_bark_price_EUR2005
    Data on Import/Export (USD/kg) from UN data has been used. (http://data.un.org/Data.aspx?d=ComTrade&f=_l1Code%3a45, [accessed 10th June 2010]) Commodity: 'Sawdust, wood waste or scrap'. A density of 250 kg/m3 was used to convert from M3 to kg (data on density: http://wiki.answers.com/Q/What_is_the_density_of_sawdust, [Accessed 13 June 2010]).
  property water content 0.7; = moisture_slab/100
  property heating value, net 7.37 MJ
    (same comment as for slab and siding, softwood, wet, measured as dry mass)
  property carbon content 0.494
    carbon content on a dry matter basis (reserved; not for manual entry)
  property true value 2.94295; name m_bark_true_value
    allocation property applied in "true value" allocation // value calculated from revenue
  properties: wet mass 1.7 kg, water in wet mass 0.7 kg, carbon content, fossil 0, dry mass 1 kg, carbon content, non-fossil 0.494, carbon allocation 0.494 kg
- sawdust, loose, wet, measured as dry mass: 0 kg; name m_sawdust; source BFS 2013; By-product classification allocatable product; CPC 3928: Sawdust and wood waste and scrap; pedigree (1,1,1,1,1)
  calculated by the share and basic density as the moisture content is over 30%
  production volume 2.25969e10 kg; = m_sawdust*p_sawnwood/sawnwood_raw
    Calculated from production volume of reference product using the relative outputs.
  property price 0.034 EUR2005; name m_sawdust_price_EUR2005
    Estimated to have the same price bark.
  property heating value, net 7.79 MJ
    (same comment as for slab and siding, softwood, wet, measured as dry mass)
  property water content 0.7; = moisture_sawdust/100
  property carbon content 0.494
    carbon content on a dry matter basis (reserved; not for manual entry)
  property true value 2.5898; name m_sawdust_true_value
    allocation property applied in "true value" allocation // value calculated from revenue
  properties: carbon content, fossil 0, wet mass 1.7 kg, dry mass 1 kg, water in wet mass 0.7 kg, carbon content, non-fossil 0.494, carbon allocation 0.494 kg

## Inputs from technosphere
- diesel, burned in building machine: 0.011008 MJ; = 0.822*42.6; source Rüter, S. 2012; lognormal variance with pedigree 0.1087, pedigree (1,3,4,3,1)
  Diesel for internal transport
  properties: heating value, net 1 MJ
- lubricating oil: 3.36365e-5 kg; = 0.091+0.016; source Rüter, S. 2012; lognormal variance with pedigree 0.1161, pedigree (1,5,4,3,1)
  Lubricating oil plus motor oil
  properties: dry mass 1 kg, wet mass 1 kg, heating value, net 40.2 MJ, carbon content, fossil 0.75
  note on heating value, net: Literature value, Source: IPCC 2006, 2006 IPCC Guidelines for National Greenhouse Gas Inventories, Prepared by the National Greenhouse Gas Inventories Programme, Eggleston H.S., Buendia L., Miwa K., Ngara T. and Tanabe K. (eds). Published: IGES, Japan
  note on carbon content, fossil: Lubricating oil is produced from diesel. C-content/dry mass of fats and oils considered 75%, from: ecoinvent v2.2 report, n 15a, pg 40
- waste mineral oil: -5.02975e-6 kg; name BP_amount_1; source Rüter, S. 2012; lognormal variance with pedigree 0.1161, pedigree (1,5,4,3,1)
  waste motor oil; the lubricating oil is used in a dissipative way
  production volume 1.47183e6 kg; = p_sawnwood * (BP_amount_1 / sawnwood_raw)
    Calculated from production volume of reference product using the relative outputs.
  property price 0 EUR2005; name BP_amount_1_price_EUR2005
  properties: wet mass 1 kg, heating value, net 34.7 MJ, dry mass 0.9 kg, carbon content, fossil 0.864444, water content 0.111111
  note on heating value, net: Value taken from the general comment of the treatment dataset.
  note on carbon content, fossil: Tab A.6, ecoinvent v2.2 report 13_I. C content has been calculated after data in the tables, and then referred to 1 kg DM
- sawlog and veneer log, softwood, measured as solid wood under bark: 0.000496467 m3; source BFS 2013; lognormal variance with pedigree 0.46, pedigree (5,5,5,5,5)
  input of the log, from which 1 m3 of sawnwood is produced
  properties: water content 0.7, wet mass 776.751 kg, carbon content, non-fossil 0.494, dry mass 456.912 kg, dry mass under bark 387.2 kg, heating value, net 4483.78 MJ
  note on heating value, net: Value based on the dataset "softwood forestry, mixed species, sustainable forest management"The property is based on a value of 11.58MJ/kg
- sawmill: 6.88448e-11 unit; source BFS 2013; lognormal variance with pedigree 0.46, pedigree (5,5,5,5,5)
  value taken from econvent 2.2
- electricity, medium voltage: 0 kWh; name elec_midvol; source BFS 2013; pedigree (1,1,1,1,1)
  data from industry, i.e. consumption of over-all electricity of the sawmill including the first sawing step, minus electricty consumed for the chipping of residual wood, the bark handling as well as for the suction of sawdust (i.e. processes that are covered in separate datasets).
- electricity, medium voltage: 7.88139e-5, 1.51131e-5, 0.000123198, 0.000253718, 0.0036901, 0.000520121, 0.00150239 kWh (7 entries); source BFS 2013; lognormal variance with pedigree 0.46, pedigree (5,5,5,5,5)
  (same comment as for electricity, medium voltage)

## Inputs from nature
- Carbon dioxide, non-fossil, resource correction [natural resource, in air]: 1.40117 kg; pedigree (1,1,1,1,1)
  This exchange has been added after economic allocation in order to re-balance the non-fossil carbon dioxide resource extraction.

## Sampling procedure
complementary literature and sampling from sawmills

## Extrapolations
Dataset is a copy of the Swiss dataset; uncertainties have been adjusted accordingly.

## Review by Emilia Moreno Ruiz 2017-03-06
Correction by the author
