# nutrient supply from thomas meal

Dataset: EcoSpold 2, unit process
Geography: GLO
Time period: 2016-01-01 to 2021-12-31
Technology level: current
Classification: ISIC rev.4 ecoinvent: 0161:Support activities for crop production
Scenario: Business-as-Usual
System model: Allocation, cut-off by classification
Generated by: Avraam Symeonidis
Database: ecoinvent
isCopyrightProtected: true
accessRestrictedTo: 1

## General comment
This inventory describes the supply of nutrients from ''thomas meal'' for fertiliser use.
No machinery expenditures or emissions to the environment are considered related to the actual application of this substance on soil during its agricultural use. The purpose of this activity is to connect the chemical production of ''thomas meal'' with its generic use as fertilizer. The product ''thomas meal'' is connected to the generic market for 'inorganic phosphorus fertiliser, as P2O5' through this supplying activity. In the agricultural context, ''thomas meal'' can be used directly as a fertilizer input to crop production, eventually with other chemicals; alternatively, a generic input of 'inorganic phosphorus fertiliser, as P2O5' can be used instead, and this will represent the regional consumption mix for his type of nutrient. A way in between is allowed by using the generic input 'inorganic phosphorus fertiliser, as P2O5' and link to the activity providing it from a specific chemical.
In all cases, emissions associated to the application of the fertilizer have to be calculated in the crop production activity.

## Technology
Inventory based on composition of ''thomas meal''.

## Reference product
- inorganic phosphorus fertiliser, as P2O5: 1 kg; By-product classification allocatable product; CPC 3462: Mineral or chemical fertilizers, phosphatic
  production volume 3.00537e8 kg; = 286242600+14294325.85
    Estimated 5.7% of basic slag is used for fertiliser (Slag: A sound choice in favour of ecology. http://www.fehs.de/_media/pdf/flyer/slag_english.pdf). P2O5 is 17% of slag. Slag amounts to 14% relative to steel produced (211 E9 kg in Europe). For comparison, the European use of basic slag was reported for year 1992 at 175 million kg with a decreasing trend due to changes in the steel industry (UNIDO Fertilizer manual. 1998. Kluwer).
  property oxygen content 0.563579
    Oxygen content (on a dry matter basis) of inorganic phosphorus fertiliser, as P2O5 is calculated from the molecular formula of the substance (Potassium).
  property price 0.241 EUR2005
    Temporary price data. Calculated as 90% of purchasers price based on: 2004 prices are calculated on basis of Import/Export data (tonnes and US$) from UN Trade Statistics Database (http://data.un.org/Browse.aspx?d=ComTrade, accessed 7/7-2010). N, P2O5, or K2O content (http://www.fertilizer.org/ifa/Home-Page/STATISTICS/Conversions-factors)
  property carbon content, fossil 0
    Carbon content, fossil is calculated based on the chemical formula of the substance.
  property phosphorus content 0.436421
    Phosphorus content (on a dry matter basis) of inorganic phosphorus fertiliser, as P2O5 is calculated from the molecular formula of the substance (Potassium).
  property carbon content 0
    carbon content on a dry matter basis (reserved; not for manual entry)
  properties: wet mass 1 kg, carbon content, non-fossil 0, water in wet mass 0 kg, water content 0, dry mass 1 kg, carbon allocation 0 kg

## Extrapolations
This dataset has been extrapolated from year 2019 to the year of the calculation (2021). The uncertainty has been adjusted accordingly.
