# treatment of used diesel-electric generating set, 18.5kW

Dataset: EcoSpold 2, unit process
Geography: GLO
Time period: 2010-01-01 to 2021-12-31
Technology level: current
Classification: ISIC rev.4 ecoinvent: 3830:Materials recovery
Classification: EcoSpold01Categories: transport systems/road
Scenario: Business-as-Usual
System model: Allocation, cut-off by classification
Generated by: Tereza Levova
Database: ecoinvent
isCopyrightProtected: true
accessRestrictedTo: 1

## General comment
This dataset represents the treatment of used diesel-electric generating set.

## Included activities start
The activity starts when the used diesel-electric generating set enters the waste treatment facility.

The data on energy needed during dismantling are unknown.

## Included activities end
The activity ends by different waste materials being ready for further treatment.

## Reference product
- used diesel-electric generating set, 18.5kW: -1 unit; name RP; CPC 39990: Other wastes n.e.c.; By-product classification Waste
  production volume 50000 unit; name RP_PV
    Estimated to be the same as the amount of diesel-electric generating set, 18.5kW produced.
  property price 0 EUR2005; name RP_price_EUR2005
    Waste products are assigned a price of zero as they are assumed to require further treatment.
  property carbon content, non-fossil 2.468e-6
    Calculated based on amount of materials and their carbon content entering the generation set production.
  property carbon content, fossil 0.020508
    (same comment as for used diesel-electric generating set, 18.5kW)
  property carbon content 0.0205105
    carbon content on a dry matter basis (reserved; not for manual entry)
  properties: water content 0, wet mass 817 kg, water in wet mass 0 kg, dry mass 817 kg, carbon allocation 16.7571 kg

## By-products
- electronics scrap: 0 kg; By-product classification Recyclable; CPC 39: Wastes or scraps; pedigree (1,1,1,1,1)
  production volume 0 kg; = ABS(RP_PV * (ByP_4 / RP))
    Calculated from production volume of reference product using the relative outputs.
  property carbon content, fossil 0.317311
    Carbon content assumed equal with the intermediate exchange of "electronic component, passive, unspecified"
  property carbon content, non-fossil 0.0045566
    (same comment as for electronics scrap)
  property price 16.1 EUR2005; name ByP_4_price_EUR2005
    Temporary price data. Calculated as 90% of purchasers price based on: 2005 import prices (total trades (USD) divided by total weight (kg) in biggest economies of the world: EU27, USA, Brasil, China, India, Japan and Russia) from UN Commodity Trade Statistics Database (http://data.un.org/Explorer.aspxDatabase [Accessed 2011.06.20]). Commodity: Waste/scrap, precious metals except pure gold/platinum
  property carbon content 0.321868
    carbon content on a dry matter basis (reserved; not for manual entry)
  properties: dry mass 1 kg, water content 0, water in wet mass 0 kg, wet mass 1 kg, carbon allocation 0.321868 kg

## Inputs from technosphere
- used Li-ion battery: -28.6 kg; name ByP_5; lognormal variance with pedigree 0.0186, pedigree (4,5,3,1,1)
  production volume 1.43e6 kg; = ABS(RP_PV * (ByP_5 / RP))
    Calculated from production volume of reference product using the relative outputs.
  property price 0 EUR2005; name ByP_5_price_EUR2005
  properties: carbon content, fossil 0.328011, dry mass 1 kg, wet mass 1 kg
- scrap copper: 0 kg; name ByP_3; pedigree (1,1,1,1,1)
  production volume 0 kg
    Calculated from production volume of reference product using the relative outputs.
  property price 0 EUR2005; name ByP_3_price_EUR2005
  properties: wet mass 1 kg, dry mass 1 kg
- scrap steel: 0 kg; name ByP_1; pedigree (1,1,1,1,1)
  production volume 0 kg
    Calculated from production volume of reference product using the relative outputs.
  property price 0 EUR2005; name ByP_1_price_EUR2005
  properties: dry mass 1 kg, wet mass 1 kg
- scrap aluminium: 0 kg; name ByP_2; pedigree (1,1,1,1,1)
  production volume 0 kg
    Calculated from production volume of reference product using the relative outputs.
  property price 0 EUR2005; name ByP_2_price_EUR2005
  properties: wet mass 1 kg, dry mass 1 kg
- electronics scrap: -15 kg; lognormal variance with pedigree 0.0186, pedigree (4,5,3,1,1)
  production volume 750000 kg
  properties: dry mass 1 kg, carbon content, fossil 0.317311, carbon content, non-fossil 0.0045566, wet mass 1 kg
  note on carbon content, fossil: Carbon content assumed equal with the intermediate exchange of "electronic component, passive, unspecified"
- scrap copper: -3.17208, -0.148827, -6.6791 kg (3 entries); lognormal variance with pedigree 0.0186, pedigree (4,5,3,1,1)
  production volume 500000 kg
- scrap steel: -112.836, -0.142959, -350.421 kg (3 entries); lognormal variance with pedigree 0.0186, pedigree (4,5,3,1,1)
  production volume 2.317e7 kg
- scrap aluminium: -95.1623, -4.4648, -200.373 kg (3 entries); lognormal variance with pedigree 0.0186, pedigree (4,5,3,1,1)
  production volume 1.5e7 kg

## Extrapolations
This dataset has been extrapolated from year 2014 to the year of the calculation (2021). The uncertainty has been adjusted accordingly.

## Review by Gabor Doka 2014-12-19
passed
