# metal working machine production, unspecified

Dataset: EcoSpold 2, unit process
Geography: RoW
Time period: 2006-01-01 to 2021-12-31
Technology level: current
Classification: EcoSpold01Categories: metals/general manufacturing
Classification: ISIC rev.4 ecoinvent: 2822:Manufacture of metal-forming machinery and machine tools
Tags: ConvertedDataset
Scenario: Business-as-Usual
System model: Allocation, cut-off by classification
Share of production covered: 0 %
Generated by: Roland Steiner
Published in: Steiner, R. 2007
Database: ecoinvent
isCopyrightProtected: true
accessRestrictedTo: 1

## General comment
1 kg of this process is needed for 1 kg of machine.
[This dataset was already contained in the ecoinvent database version 2. It was not individually updated during the transfer to ecoinvent version 3. Life Cycle Impact Assessment results may still have changed, as they are affected by changes in the supply chain, i.e. in other datasets. This dataset was generated following the ecoinvent quality guidelines for version 2. It may have been subject to central changes described in the ecoinvent version 3 change report (http://www.ecoinvent.org/database/ecoinvent-version-3/reports-of-changes/), and the results of the central updates were reviewed extensively. The changes added e.g. consistent water flows and other information throughout the database. The documentation of this dataset can be found in the ecoinvent reports of version 2, which are still available via the ecoinvent website. The change report linked above covers all central changes that were made during the conversion process.]

## Included activities end
This dataset is a rough estimation on the materials contained in a metal working machines.

## Geography
Material composition of machines from European producers.

## Technology
No specific technology assumed.

## Reference product
- metal working machine, unspecified: 1 kg; CPC 4421: Machine-tools for working metal; machine-tools for working any material by laser or similar process; By-product classification allocatable product
  EcoSpold01Location=RER
  production volume 2.67763 kg
    This is a placeholder value that does not reflect real-world production volumes. This dataset does not currently require a real-world production volume to work in the database framework, and no actual data were collected yet. This has no negative effect on the results of the ecoinvent database.
  property price 1.68 EUR2005
    Assumed to have the same price per kg as 'electronic component machinery, unspecified'. Weight of 'electronic component machinery, unspecified': 2500 kg

## Inputs from technosphere
- metal working, average for aluminium product manufacturing: 0.0232 kg; lognormal variance with pedigree 0.2, pedigree (5,5,5,5,4)
  Assumed type of processing
  EcoSpold01Location=RER
  Uncertainty: assumed type of processing
- waste polyurethane: 0 kg; pedigree (1,1,1,1,1)
  EcoSpold01Location=CH
  Assumed route of disposal
  Uncertainty: assumed route of disposal
  production volume 0 kg
    Calculated from the production volume of metal working machine, unspecified in proportion to the respective output amounts.
  properties: dry mass 0.998 kg, water content 0.00200401, wet mass 1 kg, carbon content, fossil 0.641283, heating value, net 30.67 MJ
  note on carbon content, fossil: C content was calculated for 1 kg DM, using data in Tab A.2, ecoinvent v2.2 report 13_I.
  note on heating value, net: Value taken from the general comment of the treatment dataset.
- printed wiring board, surface mounted, unspecified, Pb free: 2.58e-5 kg; = 5.16E-05*0.5; lognormal variance with pedigree 0.13, pedigree (1,5,5,5,4)
  average of 4 machines.
  This original value from production mix has been replaced by 2 flows. Each has 50% share in the production mix.
  Uncertainty: average of 4 machines
  properties: dry mass 1 kg, carbon content, fossil 0.132522, wet mass 1 kg
- steel, low-alloyed, hot rolled: 0.382 kg; lognormal variance with pedigree 0.13, pedigree (1,5,5,5,4)
  EcoSpold01Location=RER
  Average of 4 machines
  Uncertainty: average of 4 machines
  properties: wet mass 1 kg, dry mass 1 kg, carbon content, fossil 0.005
  note on carbon content, fossil: Low alloyed steel composition given in Tab. 3.2 ecoinvent v2.2 report 10_partII. Steel assumed to have a C content of 0.5%
- waste glass: 0 kg; pedigree (1,1,1,1,1)
  EcoSpold01Location=CH
  Assumed route of disposal
  Uncertainty: assumed route of disposal
  production volume 0 kg
    (same comment as for waste polyurethane)
  properties: heating value, net 0.05 MJ, dry mass 1 kg, wet mass 1 kg
  note on heating value, net: Value extracted from "treatment of waste glass, open dump, very wet infiltration class (1000mm)"
- printed wiring board, surface mounted, unspecified, Pb containing: 2.58e-5 kg; = 5.16E-05*0.5; lognormal variance with pedigree 0.13, pedigree (1,5,5,5,4)
  (same comment as for printed wiring board, surface mounted, unspecified, Pb free)
  properties: dry mass 1 kg, carbon content, fossil 0.132522, wet mass 1 kg
- electronics scrap from control units: -5.16e-5 kg; lognormal variance with pedigree 0.2, pedigree (5,5,5,5,4)
  Assumed route of disposal
  EcoSpold01Location=RER
  Uncertainty: assumed route of disposal
  production volume 0.0001548 kg
    (same comment as for waste polyurethane)
  properties: carbon content, non-fossil 0.00013442, wet mass 1 kg, dry mass 1 kg, carbon content, fossil 0.337146
- synthetic rubber: 0.00933 kg; lognormal variance with pedigree 0.13, pedigree (1,5,5,5,4)
  Average of 4 machines
  EcoSpold01Location=RER
  Uncertainty: average of 4 machines
  properties: wet mass 1 kg, carbon content, fossil 0.871949, dry mass 1 kg, heating value, net 26.42 MJ
  note on carbon content, fossil: EPDM (Ethylene-propene-diene terpolymer) rubber is a terpolymer of ethylene, propene, and a diene with the residual unsaturated portion of the diene in the side chain (ecoinvent v2.2 report 7-part XX & Ullmann). Chemical formula (deduced from Evidences of Solvent-Induced Miscibility in Polychloroprene-co-Ethylene-Propene Diene Terpolymer Blends, Dubey et al., Journal of Applied Polymer Science, 2009, 111:1884–1891): C20H35
- waste polyvinylchloride: 0 kg; pedigree (1,1,1,1,1)
  EcoSpold01Location=CH
  Assumed route of disposal
  Uncertainty: assumed route of disposal
  production volume 0 kg
    (same comment as for waste polyurethane)
  properties: dry mass 0.998 kg, wet mass 1 kg, carbon content, fossil 0.440882, heating value, net 21.51 MJ, water content 0.00200401
  note on carbon content, fossil: C content in 1 kg DM was calculated using data in Tab A.1, ecoinvent v2.2 report 13_I
- reinforcing steel: 0.171 kg; lognormal variance with pedigree 0.13, pedigree (1,5,5,5,4)
  EcoSpold01Location=RER
  Average of 4 machines
  Uncertainty: average of 4 machines
  properties: dry mass 1 kg, wet mass 1 kg, carbon content, fossil 0.004
- aluminium, cast alloy: 0.007424 kg; = 0.32*0.0232; lognormal variance with pedigree 0.0906, pedigree (1,5,5,5,4)
  this flow replaces aluminium, production mix
  properties: dry mass 1 kg, wet mass 1 kg
- polypropylene, granulate: 0.000567 kg; lognormal variance with pedigree 0.13, pedigree (1,5,5,5,4)
  Average of 4 machines
  EcoSpold01Location=RER
  Uncertainty: average of 4 machines
  properties: heating value, net 32.78 MJ, dry mass 1 kg, wet mass 1 kg, carbon content, fossil 0.857143
  note on heating value, net: Value extracted from "treatment of waste polypropylene, open burning"
  note on carbon content, fossil: Polypropylene is formed by the polymerisation of propylene, C3H6 (ecoinvent v2.2 report 11_II)
- aluminium, wrought alloy: 0.015776 kg; = 0.68*0.0232; lognormal variance with pedigree 0.0906, pedigree (1,5,5,5,4)
  this flow replaces aluminium, production mix
  properties: dry mass 1 kg, wet mass 1 kg
- injection moulding: 0.0578 kg; lognormal variance with pedigree 0.2, pedigree (5,5,5,5,4)
  Assumed type of processing
  EcoSpold01Location=RER
  Uncertainty: assumed type of processing
- metal working, average for steel product manufacturing: 0.613 kg; lognormal variance with pedigree 0.2, pedigree (5,5,5,5,4)
  EcoSpold01Location=RER
  Assumed type of processing
  Uncertainty: assumed type of processing
- polycarbonate: 0.000212 kg; lognormal variance with pedigree 0.13, pedigree (1,5,5,5,4)
  EcoSpold01Location=RER
  Average of 4 machines
  Uncertainty: average of 4 machines
  properties: dry mass 1 kg, wet mass 1 kg, carbon content, fossil 0.755906, heating value, net 29.57 MJ
  note on carbon content, fossil: Polycarbonate means here 2,2-bis(4-hydroxyphenyl)propane polycarbonate – also called bisphenol A polycarbonate ( -(O-C6H4-C(CH3)2-C6H4-O-CO)n- (ecoinvent v2.2 report 11_II), C16H14O3, MW=254 g/mol.
- polyurethane, flexible foam: 0.00847 kg; lognormal variance with pedigree 0.13, pedigree (1,5,5,5,4)
  Average of 4 machines
  EcoSpold01Location=RER
  Uncertainty: average of 4 machines
  properties: dry mass 1 kg, wet mass 1 kg, carbon content, fossil 0.633827, heating value, net 30.67 MJ
  note on carbon content, fossil: Polyurethanes (PUR) is the collective name for an extensive group of polymers with very different compositions and correspondingly varied property profiles, though their molecule chain contains all a urethane group (-NH-CO-O-). All PURs are built on a common principle : they are produced by the diisocyanate polyaddition process, that links polyols and (di)isocyanates. In this dataset, an example of typical polyurethane mixture is described (Ullmann, Polyurethanes, Dieterich et al. & ecoinvent v2 report 11_II). C content was calculated as an addition of C contents in its components.
- silicone product: 0.00431 kg; lognormal variance with pedigree 0.13, pedigree (1,5,5,5,4)
  Average of 4 machines
  EcoSpold01Location=RER
  Uncertainty: average of 4 machines
  properties: heating value, net 9.83 MJ, carbon content, fossil 0.324324, wet mass 1 kg, dry mass 1 kg
  note on carbon content, fossil: The term silicones is used for compounds in which silicon atoms are linked via oxygen atoms, each silicon atom bearing one or several organic groups. In industrially important silicones, these groups are usually methyl or phenyl (ecoinvent v2.2 report 8_part71 & Ullmann). The chemical formula was considered to be [Si(CH3)2O]n (Ullmann).
- cast iron: 0.06 kg; lognormal variance with pedigree 0.13, pedigree (1,5,5,5,4)
  EcoSpold01Location=RER
  Average of 4 machines
  Uncertainty: average of 4 machines
  properties: dry mass 1 kg, wet mass 1 kg, carbon content, fossil 0.04
  note on carbon content, fossil: Cast iron is made by remelting pig iron in small furnaces (e.g. cupola furnaces or electric arc furnaces) and poured into moulds to make castings. It usually contains 2% to 6% carbon (ecoinvent v2.2 report 10_partII). An average content of 4% was considered
- polymer foaming: 0.00847 kg; lognormal variance with pedigree 0.2, pedigree (5,5,5,5,4)
  Assumed type of processing
  EcoSpold01Location=RER
  Uncertainty: assumed type of processing
- copper, cathode: 0.0943 kg; lognormal variance with pedigree 0.13, pedigree (1,5,5,5,4)
  Average of 4 machines
  EcoSpold01Location=RER
  Uncertainty: average of 4 machines
  properties: wet mass 1 kg, dry mass 1 kg
- nylon 6: 0.00445 kg; lognormal variance with pedigree 0.13, pedigree (1,5,5,5,4)
  Average of 4 machines
  EcoSpold01Location=RER
  Uncertainty: average of 4 machines
  properties: heating value, net 30.9 MJ, carbon content, fossil 0.637168, wet mass 1 kg, dry mass 1 kg
  note on heating value, net: Assumed equal to Nylon-66. Reference: Walters, R. N., Hackett, S. M. and Lyon, R. E. (2000) ‘Heats of combustion of high temperature polymers’, Fire and Materials, 24(5), pp. 245–252. doi: 10.1002/1099-1018(200009/10)24:5<245::AID-FAM744>3.0.CO;2-7.
  note on carbon content, fossil: It is a chain of caprolactam molecules, originating from aminocarboxylic acids - here caproic acid or caprolactam. The structure of nylon 6 is -(NH-(CH2)5-CO)n-, C6H11NO (ecoinvent v2.2 report 11_II). MW=113 g/mol
- flat glass, uncoated: 0.00383 kg; lognormal variance with pedigree 0.13, pedigree (1,5,5,5,4)
  EcoSpold01Location=RER
  Average of 4 machines
  Uncertainty: average of 4 machines
  properties: wet mass 1 kg, dry mass 1 kg
- waste plastic, industrial electronics: -0.00954 kg; lognormal variance with pedigree 0.2, pedigree (5,5,5,5,4)
  EcoSpold01Location=CH
  Assumed route of disposal
  Uncertainty: assumed route of disposal
  production volume 0.02862 kg
    (same comment as for waste polyurethane)
  properties: heating value, net 34.78 MJ, wet mass 1 kg, dry mass 0.847 kg, carbon content, fossil 0.81386, water content 0.180638
  note on carbon content, fossil: C content in 1 kg DM was calculated using data in Tab A.2, ecoinvent v2.2 report 13_I
- waste rubber, unspecified: -0.00933 kg; lognormal variance with pedigree 0.2, pedigree (5,5,5,5,4)
  Assumed route of disposal
  EcoSpold01Location=CH
  Uncertainty: assumed route of disposal
  production volume 0.02799 kg
    (same comment as for waste polyurethane)
  properties: carbon content, fossil 0.853, dry mass 1 kg, wet mass 1 kg, heating value, net 27.19 MJ
- sheet rolling, copper: 0.0943 kg; lognormal variance with pedigree 0.2, pedigree (5,5,5,5,4)
  Assumed type of processing
  EcoSpold01Location=RER
  Uncertainty: assumed type of processing
- metal working, average for chromium steel product manufacturing: 0.185 kg; lognormal variance with pedigree 0.2, pedigree (5,5,5,5,4)
  Assumed type of processing
  EcoSpold01Location=RER
  Uncertainty: assumed type of processing
- waste polyethylene: 0 kg; pedigree (1,1,1,1,1)
  EcoSpold01Location=CH
  Assumed route of disposal
  Uncertainty: assumed route of disposal
  production volume 0 kg
    (same comment as for waste polyurethane)
  properties: heating value, net 42.47 MJ, carbon content, fossil 0.825301, wet mass 1 kg, water content 0.00401606, dry mass 0.996 kg
- polyvinylchloride, suspension polymerised: 0.000759495 kg; lognormal variance with pedigree 0.13, pedigree (1,5,5,5,4)
  Average of 4 machines
  EcoSpold01Location=RER
  Uncertainty: average of 4 machines
  properties: heating value, net 21.5 MJ, wet mass 1 kg, carbon content, fossil 0.387097, dry mass 1 kg
  note on carbon content, fossil: Monomer is vynyl chloride, C2H3Cl (ecoinvent v2.2 report 11_II). MW=62 g/mol
- steel, chromium steel 18/8, hot rolled: 0.185 kg; lognormal variance with pedigree 0.13, pedigree (1,5,5,5,4)
  EcoSpold01Location=RER
  Average of 4 machines
  Uncertainty: average of 4 machines
  properties: wet mass 1 kg, dry mass 1 kg, carbon content, fossil 0.0008
  note on carbon content, fossil: Stainless steel model is the grade 304 steel (18/8 stainless, 18% chromium 8% nickel; max. 0.08% C)
- alkyd paint, white, without solvent, in 60% solution state: 0.000497 kg; lognormal variance with pedigree 0.13, pedigree (1,5,5,5,4)
  Average of 4 machines
  EcoSpold01Location=RER
  Uncertainty: average of 4 machines
  properties: carbon content, fossil 0.140367, carbon content, non-fossil 0.199629, wet mass 1 kg, dry mass 1 kg, heating value, net 10.3 MJ
  note on carbon content, fossil: C content was calculated as an addition of C content in the raw materials.
- polyethylene, high density, granulate: 0.0457 kg; lognormal variance with pedigree 0.13, pedigree (1,5,5,5,4)
  Average of 4 machines
  EcoSpold01Location=RER
  Uncertainty: average of 4 machines
  properties: carbon content, fossil 0.857143, heating value, net 42.47 MJ, wet mass 1 kg, dry mass 1 kg
  note on carbon content, fossil: Polyethylene is formed out of a huge amount of ethylene monomers (C2H4) (ecoinvent v2.2 report 11_II). MW=28 g/mol
- waste polyurethane: -0.00104088, -6.95473e-5, -5.25975e-6, -2.87255e-5, -1.16048e-5, -2.72776e-5, -0.00728671 kg (7 entries); lognormal variance with pedigree 0.2, pedigree (5,5,5,5,4)
  EcoSpold01Location=CH
  Assumed route of disposal
  Uncertainty: assumed route of disposal
  production volume 0.02541 kg
- waste glass: -0.000362054, -3.33697e-5, -7.57047e-7, -3.11335e-6, -4.72779e-6, -1.39311e-5, -0.00341205 kg (7 entries); lognormal variance with pedigree 0.2, pedigree (5,5,5,5,4)
  EcoSpold01Location=CH
  Assumed route of disposal
  Uncertainty: assumed route of disposal
  production volume 0.01149 kg
- waste polyvinylchloride: -0.000838108, -5.59992e-5, -4.23512e-6, -2.31297e-5, -9.34412e-6, -2.19638e-5, -0.00586722 kg (7 entries); lognormal variance with pedigree 0.2, pedigree (5,5,5,5,4)
  EcoSpold01Location=CH
  Assumed route of disposal
  Uncertainty: assumed route of disposal
  production volume 0.02046 kg
- waste polyethylene: -0.00561606, -0.000375244, -2.83791e-5, -0.000154989, -6.26138e-5, -0.000147177, -0.0393155 kg (7 entries); lognormal variance with pedigree 0.2, pedigree (5,5,5,5,4)
  EcoSpold01Location=CH
  Assumed route of disposal
  Uncertainty: assumed route of disposal
  production volume 0.1371 kg

## Extrapolations
none This dataset has been copied from an original dataset covering the geography RER. The uncertainty has been adjusted accordingly.

## Review by Sébastien Humbert 2007-09-05
passed
none

## Review by Emilia Moreno Ruiz 2013-01-08
correction of exchange name to“printed wiring board, surface mounted, [...]"
