# treatment of waste wood, untreated, open dump, dry infiltration class (100mm)

Dataset: EcoSpold 2, unit process
Geography: GLO
Time period: 2006-01-01 to 2021-12-31
Technology level: current
Classification: ISIC rev.4 ecoinvent: 3821:Treatment and disposal of non-hazardous waste
Synonyms: municipal waste landfill
Scenario: Business-as-Usual
System model: Allocation, cut-off by classification
Share of production covered: 1 %
Generated by: Avraam Symeonidis
Database: ecoinvent
isCopyrightProtected: true
accessRestrictedTo: 1

## General comment
This dataset represents the activity of waste disposal of waste wood, untreated in a open dump. Recommended use of this dataset: For untreated waste wood, which goes to disposal as part of unmanaged communal waste mixture. // Waste composition (wet, in ppm): upper heating value 15.36 MJ/kg; lower heating value 13.99 MJ/kg; H2O 174080; O 372180; H 50163; C 401470; S 125.51; N 986.98; P 108.97; B 2.1107; Cl 330.95; Br n.a.; F 21.106; I n.a.; Ag n.a.; As 0.42213; Ba n.a.; Cd 0.20051; Co 0.086772; Cr 0.65782; Cu 4.1482; Hg 0.31976; Mn 53.118; Mo 0.8302; Ni 0.55581; Pb 27.868; Sb n.a.; Se n.a.; Sn n.a.; V n.a.; Zn 17.807; Be n.a.; Sc n.a.; Sr n.a.; Ti n.a.; Tl n.a.; W n.a.; Si n.a.; Fe 15.479; Ca 130.89; Al 6.3322; K 65.412; Mg 197.56; Na 14.071; . // Share of carbon in waste that is biogenic 100%. Share of metals in waste not oxidised and bulk-recyclable (exclude very small or thin parts) Iron: 0%; Alu: 0%; Copper: 0%. Overall degradability of waste during 100 years: 1.5%.

## Included activities start
from final waste deposition (without transports to the site)

## Included activities end
Waste-specific short-term emissions to air via landfill gas and landfill leachate. Waste-specific long-term emissions from landfill.

## Geography
Given name of landfill location is 'infiltration class 2 dry (2018)'. Landfill site with mean annual temperature (MAT) of 8 degC, mean annual precipitation (MAP) of 550 mm/year, and net infiltration of 100 mm/year.
Climate adjustments result in an alpha t (temperature) for permafrost areas of 0.999. Total climate adjustments with alpha pt of 0.999.

## Technology
This is an inventory for an open, uncontrolled waste dump for municipal solid waste. Ultimate average landfill height is 7 meters. Operation phase duration is 15 years.Percentage of landfill gas directly emitted is 100w%. A Methane Correction Factor (MCF) for landfill air emissions of 0.7057 is employed.
Leachate of the landfill is not treated. Based on average waste composition and climate data the end of carbonate phase is estimated to be reached 7789 years after waste deposition.

## Reference product
- waste wood, untreated: -1 kg; CPC 3928: Sawdust and wood waste and scrap; By-product classification Waste; pedigree (1,1,1,1,1)
  main reference product of this activity (supply of disposal service).
  Uncertainty: Uncertainty is not adjusted, as this is the refence product
  production volume 1 kg
    The amount of the annual production volume is a placeholder value. The contribution of this technology to the different local markets can be found in the markets themselves.
  property price 0 EUR2005
    Waste products are assigned a price of zero as they are assumed to require further treatment.
  property heating value, net 13.99 MJ
    Value taken from the general comment of the treatment dataset.
  property carbon content 0.48608
    carbon content on a dry matter basis (reserved; not for manual entry)
  properties: wet mass 1 kg, magnesium content 0.0002392, manganese content 6.4314e-5, aluminium content 7.6668e-6, molybdenum content 1.0052e-6, carbon content, non-fossil 0.48608, boron content 2.5556e-6, water in wet mass 0.17408 kg, dry mass 0.82592 kg, phosphorus content 0.00013193, nickel content 6.7295e-7, fluorine content 2.5555e-5, chromium content 7.9647e-7, lead content 3.3741e-5, arsenic content 5.111e-7, zinc content 2.156e-5, mercury content 3.8716e-7, copper content 5.0225e-6, calcium content 0.00015848, chlorine content 0.0004007, iron content 1.8741e-5, potassium content 7.9199e-5, cobalt content 1.0506e-7, water content 0.21077, sodium content 1.7037e-5, cadmium content 2.4277e-7, nitrogen content 0.001195, oxygen content 0.45062, hydrogen content 0.060736, sulfur content 0.00015197, heating value, gross 15.365 MJ, carbon allocation 0.401463 kg

## Inputs from nature
- Occupation, dump site [natural resource, land]: 0.0035714 m2*year; lognormal variance with pedigree 0.088256, pedigree (1,1,4,1,1)
  for landfill operation phase and spontaneous renaturation.
  Uncertainty: Uncertainty calculated from uncertainty in base parameters.

## Emissions to nature
- Phosphate [water, ground-, long-term]: 2.2436e-5 kg; lognormal variance with pedigree 0.70131, pedigree (1,1,4,1,1)
  Emissions from long-term leachate (>100a) directly from MSW landfill and indirectly via incineration of treatement sludge from leachate treatement.
  Uncertainty: Uncertainty calculated depending on waste input and uncertainty of long-term transfer coefficents in landfill.
- Potassium [air, non-urban air or from high stacks]: 1.7913e-10 kg; lognormal variance with pedigree 0.61998, pedigree (1,1,4,1,1)
  burden from direct release or incineration of landfill biogas; or windblown leachate evaporite in arid climates.
  Uncertainty: Uncertainty calculated from unertainty of the waste composition of this waste, uncertainty in waste decomposition and short-term leaching in landfill
- Chloride [water, ground-, long-term]: 0.00031829 kg; lognormal variance with pedigree 0.2088, pedigree (1,1,4,1,1)
  (same comment as for Phosphate)
- Calcium [air, non-urban air or from high stacks]: 6.3835e-11 kg; lognormal variance with pedigree 0.6526, pedigree (1,1,4,1,1)
  (same comment as for Potassium)
- Boron [water, ground-, long-term]: 1.8979e-6 kg; lognormal variance with pedigree 0.37625, pedigree (1,1,4,1,1)
  (same comment as for Phosphate)
- Lead [air, non-urban air or from high stacks]: 8.2002e-13 kg; lognormal variance with pedigree 0.79242, pedigree (1,1,4,1,1)
  (same comment as for Potassium)
- Nitrate [water, ground-, long-term]: 4.0739e-5 kg; lognormal variance with pedigree 0.17286, pedigree (1,1,4,1,1)
  (same comment as for Phosphate)
- Iron [air, non-urban air or from high stacks]: 7.9632e-13 kg; lognormal variance with pedigree 0.79459, pedigree (1,1,4,1,1)
  (same comment as for Potassium)
- Sodium, ion [water, ground-]: 8.7244e-7 kg; lognormal variance with pedigree 0.35485, pedigree (1,1,4,1,1)
  burden from short-term leachate to groundwater in uncontrolled landfill in moist cimate.
  Uncertainty: Uncertainty calculated from unertainty of the waste composition of this waste, uncertainty in waste decomposition and short-term leaching in landfill
- Nitrogen, organic bound [water, ground-, long-term]: 0.00063314 kg; lognormal variance with pedigree 0.17286, pedigree (1,1,4,1,1)
  (same comment as for Phosphate)
- Zinc [air, non-urban air or from high stacks]: 2.8085e-12 kg; lognormal variance with pedigree 0.75481, pedigree (1,1,4,1,1)
  (same comment as for Potassium)
- Magnesium [water, ground-]: 1.8265e-6 kg; lognormal variance with pedigree 0.31933, pedigree (1,1,4,1,1)
  (same comment as for Sodium, ion)
- Nitrite [water, ground-, long-term]: 2.1084e-5 kg; lognormal variance with pedigree 0.17286, pedigree (1,1,4,1,1)
  (same comment as for Phosphate)
- Mercury [air, non-urban air or from high stacks]: 1.3127e-10 kg; lognormal variance with pedigree 0.62933, pedigree (1,1,4,1,1)
  (same comment as for Potassium)
- Aluminium [water, ground-]: 4.7423e-9 kg; lognormal variance with pedigree 0.51266, pedigree (1,1,4,1,1)
  (same comment as for Sodium, ion)
- Ammonium, ion [water, ground-, long-term]: 0.00038738 kg; lognormal variance with pedigree 0.17286, pedigree (1,1,4,1,1)
  (same comment as for Phosphate)
- Molybdenum [air, non-urban air or from high stacks]: 3.2792e-13 kg; lognormal variance with pedigree 0.82616, pedigree (1,1,4,1,1)
  (same comment as for Potassium)
- Potassium, ion [water, ground-]: 7.1651e-7 kg; lognormal variance with pedigree 0.35106, pedigree (1,1,4,1,1)
  (same comment as for Sodium, ion)
- Hydrogen sulfide [water, ground-, long-term]: 9.0826e-6 kg; lognormal variance with pedigree 0.24095, pedigree (1,1,4,1,1)
  (same comment as for Phosphate)
- Copper [air, non-urban air or from high stacks]: 8.6952e-14 kg; lognormal variance with pedigree 0.86583, pedigree (1,1,4,1,1)
  (same comment as for Potassium)
- Iron, ion [water, ground-]: 3.1853e-9 kg; lognormal variance with pedigree 0.52554, pedigree (1,1,4,1,1)
  (same comment as for Sodium, ion)
- DOC, Dissolved Organic Carbon [water, ground-, long-term]: 0.39545 kg; lognormal variance with pedigree 0.0138471, pedigree (1,1,4,1,1)
  (same comment as for Phosphate)
- Nickel [air, non-urban air or from high stacks]: 1.2103e-13 kg; lognormal variance with pedigree 0.85804, pedigree (1,1,4,1,1)
  (same comment as for Potassium)
- Calcium, ion [water, ground-]: 2.5534e-7 kg; lognormal variance with pedigree 0.38126, pedigree (1,1,4,1,1)
  (same comment as for Sodium, ion)
- Sulfate [water, ground-, long-term]: 0.00034843 kg; lognormal variance with pedigree 0.24095, pedigree (1,1,4,1,1)
  (same comment as for Phosphate)
- Manganese [air, non-urban air or from high stacks]: 2.2787e-10 kg; lognormal variance with pedigree 0.61227, pedigree (1,1,4,1,1)
  (same comment as for Potassium)
- Molybdenum [water, ground-]: 1.3117e-9 kg; lognormal variance with pedigree 0.55483, pedigree (1,1,4,1,1)
  (same comment as for Sodium, ion)
- TOC, Total Organic Carbon [water, ground-, long-term]: 0.39545 kg; lognormal variance with pedigree 0.0138471, pedigree (1,1,4,1,1)
  (same comment as for Phosphate)
- Cobalt [air, non-urban air or from high stacks]: 1.0446e-13 kg; lognormal variance with pedigree 0.87245, pedigree (1,1,4,1,1)
  (same comment as for Potassium)
- Lead [water, ground-]: 2.4601e-9 kg; lognormal variance with pedigree 0.53403, pedigree (1,1,4,1,1)
  (same comment as for Sodium, ion)
- BOD5, Biological Oxygen Demand [water, ground-, long-term]: 0.10239 kg; lognormal variance with pedigree 0.0138471, pedigree (1,1,4,1,1)
  (same comment as for Phosphate)
- Chromium [air, non-urban air or from high stacks]: 2.8085e-14 kg; lognormal variance with pedigree 0.90376, pedigree (1,1,4,1,1)
  (same comment as for Potassium)
- Nickel, ion [water, ground-]: 4.8412e-10 kg; lognormal variance with pedigree 0.58701, pedigree (1,1,4,1,1)
  (same comment as for Sodium, ion)
- COD, Chemical Oxygen Demand [water, ground-, long-term]: 0.43253 kg; lognormal variance with pedigree 0.0138471, pedigree (1,1,4,1,1)
  (same comment as for Phosphate)
- Cadmium [air, non-urban air or from high stacks]: 3.524e-12 kg; lognormal variance with pedigree 0.74833, pedigree (1,1,4,1,1)
  (same comment as for Potassium)
- Zinc, ion [water, ground-]: 1.2638e-8 kg; lognormal variance with pedigree 0.48024, pedigree (1,1,4,1,1)
  (same comment as for Sodium, ion)
- Hydrogen chloride [air, non-urban air or from high stacks]: 1.7998e-7 kg; lognormal variance with pedigree 0.39273, pedigree (1,1,4,1,1)
  (same comment as for Potassium)
- Copper, ion [water, ground-]: 3.0433e-10 kg; lognormal variance with pedigree 0.6031, pedigree (1,1,4,1,1)
  (same comment as for Sodium, ion)
- Arsenic [air, non-urban air or from high stacks]: 1.5925e-11 kg; lognormal variance with pedigree 0.69931, pedigree (1,1,4,1,1)
  (same comment as for Potassium)
- Manganese [water, ground-]: 9.1146e-7 kg; lognormal variance with pedigree 0.34495, pedigree (1,1,4,1,1)
  (same comment as for Sodium, ion)
- Hydrogen fluoride [air, non-urban air or from high stacks]: 1.2605e-7 kg; lognormal variance with pedigree 0.40848, pedigree (1,1,4,1,1)
  (same comment as for Potassium)
- Mercury [water, ground-]: 3.2817e-10 kg; lognormal variance with pedigree 0.59942, pedigree (1,1,4,1,1)
  (same comment as for Sodium, ion)
- Arsenic, ion [water, ground-]: 1.136e-9 kg; lognormal variance with pedigree 0.55965, pedigree (1,1,4,1,1)
  (same comment as for Sodium, ion)
- Nitrogen oxides [air, non-urban air or from high stacks]: 2.0281e-8 kg; lognormal variance with pedigree 0.31884, pedigree (1,1,4,1,1)
  burden from direct release or incineration of landfill biogas.
  Uncertainty: Uncertainty calculated from unertainty of the waste composition of this waste, uncertainty in waste decomposition and short-term leaching in landfill
- Chromium VI [water, ground-]: 1.1234e-10 kg; lognormal variance with pedigree 0.63507, pedigree (1,1,4,1,1)
  (same comment as for Sodium, ion)
- Methane, non-fossil [air, non-urban air or from high stacks]: 0.0030742 kg; lognormal variance with pedigree 0.104996, pedigree (1,1,4,1,1)
  (same comment as for Nitrogen oxides)
- Cobalt [water, ground-]: 4.1786e-10 kg; lognormal variance with pedigree 0.60175, pedigree (1,1,4,1,1)
  (same comment as for Sodium, ion)
- Carbon dioxide, non-fossil [air, non-urban air or from high stacks]: 0.012958 kg; lognormal variance with pedigree 0.008, pedigree (1,1,4,1,1)
  (same comment as for Nitrogen oxides)
- Cadmium, ion [water, ground-]: 5.286e-10 kg; lognormal variance with pedigree 0.58408, pedigree (1,1,4,1,1)
  (same comment as for Sodium, ion)
- Sulfur dioxide [air, non-urban air or from high stacks]: 2.454e-7 kg; lognormal variance with pedigree 0.40489, pedigree (1,1,4,1,1)
  (same comment as for Nitrogen oxides)
- Chloride [water, ground-]: 1.2486e-5 kg; lognormal variance with pedigree 0.26251, pedigree (1,1,4,1,1)
  (same comment as for Sodium, ion)
- Sodium, ion [water, ground-, long-term]: 1.3199e-5 kg; lognormal variance with pedigree 0.31376, pedigree (1,1,4,1,1)
  (same comment as for Phosphate)
- Boron [water, ground-]: 2.1278e-7 kg; lognormal variance with pedigree 0.40595, pedigree (1,1,4,1,1)
  (same comment as for Sodium, ion)
- Potassium, ion [water, ground-, long-term]: 6.4695e-5 kg; lognormal variance with pedigree 0.26264, pedigree (1,1,4,1,1)
  (same comment as for Phosphate)
- Phosphate [water, ground-]: 2.7975e-7 kg; lognormal variance with pedigree 0.41461, pedigree (1,1,4,1,1)
  (same comment as for Sodium, ion)
- Magnesium [water, ground-, long-term]: 0.00019573 kg; lognormal variance with pedigree 0.22587, pedigree (1,1,4,1,1)
  (same comment as for Phosphate)
- Fluoride [water, ground-]: 2.3231e-8 kg; lognormal variance with pedigree 0.46034, pedigree (1,1,4,1,1)
  (same comment as for Sodium, ion)
- Zinc, ion [water, ground-, long-term]: 1.7794e-5 kg; lognormal variance with pedigree 0.30588, pedigree (1,1,4,1,1)
  (same comment as for Phosphate)
- Nitrite [water, ground-]: 7.6686e-7 kg; lognormal variance with pedigree 0.22855, pedigree (1,1,4,1,1)
  (same comment as for Sodium, ion)
- Calcium, ion [water, ground-, long-term]: 0.00013063 kg; lognormal variance with pedigree 0.23955, pedigree (1,1,4,1,1)
  (same comment as for Phosphate)
- Nitrogen, organic bound [water, ground-]: 2.3029e-5 kg; lognormal variance with pedigree 0.22855, pedigree (1,1,4,1,1)
  (same comment as for Sodium, ion)
- Aluminium [water, ground-, long-term]: 6.3274e-6 kg; lognormal variance with pedigree 0.34005, pedigree (1,1,4,1,1)
  (same comment as for Phosphate)
- Nitrate [water, ground-]: 1.4818e-6 kg; lognormal variance with pedigree 0.22855, pedigree (1,1,4,1,1)
  (same comment as for Sodium, ion)
- Iron, ion [water, ground-, long-term]: 1.5475e-5 kg; lognormal variance with pedigree 0.31052, pedigree (1,1,4,1,1)
  (same comment as for Phosphate)
- Sulfate [water, ground-]: 1.9568e-6 kg; lognormal variance with pedigree 0.3497, pedigree (1,1,4,1,1)
  (same comment as for Sodium, ion)
- Lead [water, ground-, long-term]: 2.7865e-5 kg; lognormal variance with pedigree 0.29101, pedigree (1,1,4,1,1)
  (same comment as for Phosphate)
- Ammonium, ion [water, ground-]: 1.409e-5 kg; lognormal variance with pedigree 0.22855, pedigree (1,1,4,1,1)
  (same comment as for Sodium, ion)
- Nickel, ion [water, ground-, long-term]: 5.5532e-7 kg; lognormal variance with pedigree 0.41932, pedigree (1,1,4,1,1)
  (same comment as for Phosphate)
- DOC, Dissolved Organic Carbon [water, ground-]: 0.00017519 kg; lognormal variance with pedigree 0.20411, pedigree (1,1,4,1,1)
  (same comment as for Sodium, ion)
- Molybdenum [water, ground-, long-term]: 4.6555e-7 kg; lognormal variance with pedigree 0.42726, pedigree (1,1,4,1,1)
  (same comment as for Phosphate)
- Hydrogen sulfide [water, ground-]: 5.101e-8 kg; lognormal variance with pedigree 0.3497, pedigree (1,1,4,1,1)
  (same comment as for Sodium, ion)
- Manganese [water, ground-, long-term]: 5.2207e-5 kg; lognormal variance with pedigree 0.26957, pedigree (1,1,4,1,1)
  (same comment as for Phosphate)
- TOC, Total Organic Carbon [water, ground-]: 0.00017519 kg; lognormal variance with pedigree 0.20411, pedigree (1,1,4,1,1)
  (same comment as for Sodium, ion)
- Copper, ion [water, ground-, long-term]: 4.1478e-6 kg; lognormal variance with pedigree 0.35396, pedigree (1,1,4,1,1)
  (same comment as for Phosphate)
- BOD5, Biological Oxygen Demand [water, ground-]: 4.5362e-5 kg; lognormal variance with pedigree 0.20411, pedigree (1,1,4,1,1)
  (same comment as for Sodium, ion)
- Mercury [water, ground-, long-term]: 3.193e-7 kg; lognormal variance with pedigree 0.43705, pedigree (1,1,4,1,1)
  (same comment as for Phosphate)
- Sodium [air, non-urban air or from high stacks]: 2.1811e-10 kg; lognormal variance with pedigree 0.61421, pedigree (1,1,4,1,1)
  (same comment as for Potassium)
- Chromium VI [water, ground-, long-term]: 4.8798e-9 kg; lognormal variance with pedigree 1.9168, pedigree (1,1,4,1,1)
  (same comment as for Phosphate)
- Magnesium [air, non-urban air or from high stacks]: 4.5662e-10 kg; lognormal variance with pedigree 0.58873, pedigree (1,1,4,1,1)
  (same comment as for Potassium)
- Cobalt [water, ground-, long-term]: 8.6354e-8 kg; lognormal variance with pedigree 0.48845, pedigree (1,1,4,1,1)
  (same comment as for Phosphate)
- Heat, waste [water, ground-, long-term]: 15.134 MJ; lognormal variance with pedigree 0.020755, pedigree (1,1,4,1,1)
  burden from long-term decomposition of waste (>100a).
  Uncertainty: Uncertainty calculated from unertainty of the waste composition of this waste, uncertainty in waste decomposition and short-term leaching in landfill
- Cadmium, ion [water, ground-, long-term]: 1.9998e-7 kg; lognormal variance with pedigree 0.45194, pedigree (1,1,4,1,1)
  (same comment as for Phosphate)
- COD, Chemical Oxygen Demand [water, ground-]: 0.00019161 kg; lognormal variance with pedigree 0.20411, pedigree (1,1,4,1,1)
  (same comment as for Sodium, ion)
- Arsenic, ion [water, ground-, long-term]: 4.2098e-7 kg; lognormal variance with pedigree 0.42816, pedigree (1,1,4,1,1)
  (same comment as for Phosphate)
- Heat, waste [soil, industrial]: 0.18165 MJ; lognormal variance with pedigree 0.060522, pedigree (1,1,4,1,1)
  burden from short-term decomposition of waste (0-100a).
  Uncertainty: Uncertainty calculated from unertainty of the waste composition of this waste, uncertainty in waste decomposition and short-term leaching in landfill
- Fluoride [water, ground-, long-term]: 2.0964e-5 kg; lognormal variance with pedigree 0.30024, pedigree (1,1,4,1,1)
  (same comment as for Phosphate)
- Aluminium [air, non-urban air or from high stacks]: 1.1856e-12 kg; lognormal variance with pedigree 0.78356, pedigree (1,1,4,1,1)
  (same comment as for Potassium)

## Extrapolations
This dataset has been extrapolated from year 2012 to the year of the calculation (2021). The uncertainty has been adjusted accordingly.
