# treatment of waste emulsion paint on wood, collection for final disposal

Dataset: EcoSpold 2, unit process
Geography: CH
Time period: 1994-01-01 to 2021-12-31
Technology level: current
Classification: ISIC rev.4 ecoinvent: 3821:Treatment and disposal of non-hazardous waste
Classification: EcoSpold01Categories: waste management/building demolition
Tags: ConvertedDataset; Treatment
Scenario: Business-as-Usual
System model: Allocation, cut-off by classification
Generated by: Gabor Doka (obsolete)
Published in: Doka G. 2007
Database: ecoinvent
isCopyrightProtected: true
accessRestrictedTo: 1

## General comment
The waste contains 1kg emulsion paint (GSD=100%) Waste density is 850 kg/m3. Allocation of energy production in waste incineration: no substitution or expansion. Total burden allocated to waste disposal function of waste incinerator.
[This dataset was already contained in the ecoinvent database version 2. It was not individually updated during the transfer to ecoinvent version 3. Life Cycle Impact Assessment results may still have changed, as they are affected by changes in the supply chain, i.e. in other datasets. This dataset was generated following the ecoinvent quality guidelines for version 2. It may have been subject to central changes described in the ecoinvent version 3 change report (http://www.ecoinvent.org/database/ecoinvent-version-3/reports-of-changes/), and the results of the central updates were reviewed extensively. The changes added e.g. consistent water flows and other information throughout the database. The documentation of this dataset can be found in the ecoinvent reports of version 2, which are still available via the ecoinvent website. The change report linked above covers all central changes that were made during the conversion process.]

## Included activities end
transport to dismantling facilities, final disposal of waste material,

## Geography
Specific to the technology mix encountered in Switzerland in late 1990ies

## Technology
Building demolition with skid-steer loaders.

## Reference product
- waste emulsion paint, on wood: -1 kg; name RP; By-product classification Waste; CPC 39: Wastes or scraps
  EcoSpold01Location=CH
  production volume 5271.02 kg; name RP_PV; = 139445*1000*0.5*0.15*0.28*0.06*0.0.03
    Estimated value. The market for paint and plasters was estimated to be 182854 tons, of which 139445 tons for paint products and plasters, 6107 tons wood coatings, 37302 tons for others (including printing inks, wood preservatives and industrial coatings) (Hincapié et al. 2015).
    From the same study we extrapolate the tons of wall, wood and metal in C&D waste, which is 1553tons (24% of total C&D), 415 tons (6% of total C&D), 354 tons (5% of total C&D), respectively.
    To estimate the production volume we assumed that paint is 50% of the paint and plaster for construction category (hence 139445 * 0.5). Additionally of this 50%, 72% is assumed to be paint and 28% to be emulsion paint (FOEN 2013). Waste production is assumed to be 15% (taken from the estimated value for gypsum (WRAP, n.d). This value is divided between wall, wood and metal accordingly to the percentage (found in Hincapié et al. 2015) of these materials in C&D waste.
    The treatment assumed in Hincapié et al. (2015) for paint products on wall is 77% recycling and 23% landfill; on concrete 90% recycling and 10% landfill; on wood 10% recycling and 90% incineration; on window glass 3% recycling and 97% landfill; on ferrous metal 98% recycling and 2% landfill; on non-ferrous metals 2% landfilled and 98%exported; on plastics 28% to recycling, 64% incineration and 8% landfill.
    Source: Ingrid Hincapié, Alejandro Caballero-Guzmán, Bernd Nowack (2015) Nanomaterials in Landfills Module 3: Nanomaterials in Construction Waste. EMPA, Swiss Federal Laboratories for Materials Science and Technology. St. Gallen, Switzerland
    FOEN (2013) Statistique des déchets spéciaux 2013. Retrieved from: <http://www.bfs.admin.ch/bfs/portal/fr/index/themen/02/22/lexi.html>, accessed 9th May 2016
    WRAP (n.d.) International practice in plasterboard recycling: Canada. Retrieved from: http://www.wrap.org.uk/sites/files/wrap/Case%20study%20-%20Plasterboard%20recycling%20in%20Canada.pdf, accessed 3 May 2016
  property price 0 EUR2005; name RP_price_EUR2005
    Waste products are assigned a price of zero as they are assumed to require further treatment.
  property heating value, net 8.18 MJ
    LHV is calculated based on the Carbon content of the product. More details can be found on the respective documentation.
  property carbon content 0.27
    carbon content on a dry matter basis (reserved; not for manual entry)
  properties: carbon content, fossil 0.27, carbon content, non-fossil 0, wet mass 1 kg, water in wet mass 0 kg, dry mass 1 kg, water content 0, carbon allocation 0.27 kg

## Inputs from technosphere
- waste emulsion paint: -1 kg; name waste_emulsion_paint; lognormal variance with pedigree 0.04, pedigree (1,1,5,1,1)
  EcoSpold01Location=CH
  disposed masses. Uncertainty calculated from uncertainty of waste composition
  production volume 5271.02 kg; = waste_emulsion_paint* RP_PV/ABS( RP)
    Calculated from the production volume of waste emulsion paint, on wood in proportion to the respective output amounts.
  property price 0 EUR2005; name waste_emulsion_paint_price_EUR2005
  properties: carbon content, fossil 0.27, heating value, net 8.18 MJ, dry mass 1 kg, wet mass 1 kg
  note on carbon content, fossil: Tab A.4, ecoinvent v2.2 report 13_I. C content has been calculated after data in the tables, and then referred to 1 kg DM

## Sampling procedure
waste-specific calculation based on literature data

## Extrapolations
This dataset has been extrapolated from year 2002 to the year of the calculation (2021). The uncertainty has been adjusted accordingly.

## Review by Niels Jungbluth 2003-05-22
Passed. Calculation for standard deviation 95 of infrastructure, land occupation, transport services and other services can differ from standard Pedigree approach used in this project and figures obtained by this procedure.
