# uranium production, diffusion, enriched 3.0%

Dataset: EcoSpold 2, unit process
Geography: US
Time period: 1980-01-01 to 2021-12-31
Technology level: current
Classification: EcoSpold01Categories: nuclear power/production
Classification: ISIC rev.4 ecoinvent: 2011:Manufacture of basic chemicals
Tags: ConvertedDataset
Scenario: Business-as-Usual
System model: Allocation, cut-off by classification
Generated by: [System]
Published in: Dones, R. 2007
Database: ecoinvent
isCopyrightProtected: true
accessRestrictedTo: 1

## General comment
This module does not use a full, consistent set of data specific for the only operational USEC plant in Paducah, for there is no available literature source on that. However the data on the US "model diffusion plants" available in the literature and used herewith were most likely developed on the basis of the existing US facilities. The electricity consumption per unit of SWU of 2600 kWh/SWU is an average value from the literature. Extrapolating direct information from the plant operators, the electricity is assumed to be supplied almost entirely by the Tennessee Valley Authority (base load). The used mix is made of nearly 69% hard coal, about 26% nuclear, and about 5% run-of-river hydropower. Hence, the indirect environmental burdens imported through the high electricity uses are fully represented. Only little information was available for emission species to air and water from the US model diffusion plants, but an average emission of CFC-114 estimated from 2002 data is accounted for. The factor for the infrastructure requirement is calculated using an average capacity of two USEC plants of 9600 t SWU for assumed 50 years operation.

## Included activities end
The module includes: input of UF6; electricity and light fuel oil used for operation; water use, lubricant oil, and wastewater treatment; transport requirements of operation materials, industrial wastes, and contaminated waste from decommissioning (25% of the reinforced concrete and the great part of metals according to the reference). Radioactive and non-radioactive emissions to air and to water from the operation are also included. The infrastructure requirements are accounted for, though construction and operation data partially refer to different plants rather than to one single unit.

## Geography
US data.

## Technology
US uranium enrichment facilities with diffusion process were installed in mid 1950s.

## Parameters
- fraction, cooling water, recirculating system, to air: 0.771 dimensionless; name fraction_CW_R_to_air; lognormal variance with pedigree 0.0413, pedigree (2,3,1,3,1)
  Calculated based on literature value (Scown, C.D., 2011, Water Footprint of U.S. Transportation Fuels and supplying information of the article) (Vionnet, S., Quantis Water Database - Technical Report, 2012).
- fraction, cooling water, cooling pond system, to air: 0.032 dimensionless; name fraction_CW_CP_to_air; lognormal variance with pedigree 0.0413, pedigree (2,3,1,3,1)
  (same comment as for fraction, cooling water, recirculating system, to air)
- fraction, cooling water, to air: 0.3875 dimensionless; name fraction_CW_to_air; = (0.5*fraction_CW_OT_to_air)+(0.5*fraction_CW_R_to_air); lognormal variance with pedigree 0.092025, pedigree (4,4,3,2,4)
  Calculated value based on literature value (see comments of the other parametres present in this dataset) and expert opinion. In the case when no industry/literature data are available about the type of cooling or directly fraction, cooling water, to air specific for the process a default assumption is applied. It is assumed that the once-through cooling system is used in 50% of all cases and recirculating system is used in another 50% of all cases.
- fraction, cooling water, once-through system, to air: 0.004 dimensionless; name fraction_CW_OT_to_air; lognormal variance with pedigree 0.0413, pedigree (2,3,1,3,1)
  (same comment as for fraction, cooling water, recirculating system, to air)
- fraction, water, decarbonised, to air: 0.3875 dimensionless; name fraction_WDC_to_air; = fraction_CW_to_air; lognormal variance with pedigree 0.092025, pedigree (4,4,3,2,4)
  Calculated value. See comments in the other parametres present in this dataset. Decarbonised water is considered to be always used as cooling water, thus cooling water fractions to air are applied to all carbonised water input flows to calculate the amount of water consumed in the processes.

## Reference product
- uranium, enriched 3.0%, per separative work unit: 1 unit; CPC 33620: Uranium enriched in U235 and its compounds; plutonium and its compounds; alloys, dispersions, ceramic products[…]; By-product classification allocatable product
  EcoSpold01Location=US
  production volume 0 unit
    Diffusion technology is not in use anymore for enrichment of uranium fuel since 2013. The production volume is therefore set to zero.
  property price 299.346 EUR2005
    Calculated based on inputs: The price of the product has been calculated as a sum of the values of the material and energy inputs for this product. This value is therefore a rough estimation. It may underestimate the real price since there are additional expenses when producing any product. These expences can include for example labour costs, treatment of waste materials and profit for the producer. Please consider carefully whether this level of data quality is acceptable for your application.
  property carbon content 0
    carbon content on a dry matter basis (reserved; not for manual entry)
  properties: water content 0, carbon content, non-fossil 0, dry mass 1 kg, carbon content, fossil 0, water in wet mass 0 kg, wet mass 1 kg, carbon allocation 0 kg

## Inputs from technosphere
- electricity, high voltage: 1780 kWh; lognormal variance with pedigree 0.04, pedigree (1,1,5,1,1)
  EcoSpold01Location=SERC
  data Paducah 2006
- uranium enrichment diffusion facility: 3.81e-9 unit; lognormal variance with pedigree 0.13, pedigree (1,1,5,1,1)
  own estimation;activityLink introduced to establish a direct link to the corresponding regional supply of this product
  EcoSpold01Location=US
- electricity, high voltage: 140 kWh; lognormal variance with pedigree 0.04, pedigree (1,1,5,1,1)
  data Paducah 2008. Electricity from reservoir hydropower plants in the United States. As a simplifying assumption, electricity from non-alpine reservoir hydropower plants in the US region FRCC is modelled here. Alpine reservoir plants are neglected.
- heat, district or industrial, other than natural gas: 340.1 MJ; lognormal variance with pedigree 0.06, pedigree (1,1,5,1,1)
  old reference
  EcoSpold01Location=CH
  properties: heating value, net 1 MJ
- uranium hexafluoride: 1.63 kg; lognormal variance with pedigree 0.04, pedigree (1,1,5,1,1)
  EcoSpold01Location=US
  calculated
  properties: dry mass 1 kg, wet mass 1 kg
- electricity, high voltage: 451.535 kWh; = 0.665*679; source Itten R. 2012; lognormal variance with pedigree 0.04, pedigree (1,1,5,1,1)
  data Paducah 2007. Electricity from nuclear plants is split into the origin from boiling water reactors (33.5%) and pressure water reactors (66.5%) according to Itten et al. 2012
- water, decarbonised: 3900 kg; name water_decarbonised_input; lognormal variance with pedigree 0.05, pedigree (1,1,5,1,1)
  own estimation
  EcoSpold01Location=RER
  properties: wet mass 1 kg
- low level radioactive waste: -0.00054 m3; lognormal variance with pedigree 0.16, pedigree (1,1,5,1,1)
  EcoSpold01Location=CH
  own estimation
  production volume 0 m3
    Calculated from the production volume of uranium, enriched 3.0%, per separative work unit in proportion to the respective output amounts.
  properties: dry mass 2500 kg, wet mass 2500 kg
- electricity, high voltage: 227.465 kWh; = 0.335*679; source Itten R. 2012; lognormal variance with pedigree 0.04, pedigree (1,1,5,1,1)
  (same comment as for electricity, high voltage)

## Emissions to nature
- Water [water, unspecified]: 2.38875 m3; name water_to_water_unspecified; = (water_decarbonised_input/1000)*(1-fraction_WDC_to_air); lognormal variance with pedigree 0.0807, pedigree (2,2,5,1,1)
  Calculated value based on literature values and expert opinion. See comments in the parametres' comment field.
  property fraction, origin: unspecified 0; name fraction_origin_unspecified_Ww
  property fraction, origin: fresh water 1; name fraction_origin_fresh_water_Ww
  property water in wet mass 1000 kg; name WWM
  property carbon content, non-fossil 0; name C_content_non_fossil
  property wet mass 1000 kg; name WM
  property fraction, origin: salt water 0; name fraction_origin_salt_water_Ww
  property dry mass 0 kg; name DM
  property carbon content, fossil 0; name C_content_fossil
- Nitrate [water, surface water]: 0.00327 kg; lognormal variance with pedigree 0.16, pedigree (1,1,5,1,1)
  old reference
- Phosphate [water, surface water]: 0.0004 kg; lognormal variance with pedigree 0.16, pedigree (1,1,5,1,1)
  old reference
- Uranium alpha [air, non-urban air or from high stacks]: 0.4 kBq; lognormal variance with pedigree 0.16, pedigree (1,1,5,1,1)
  old reference and range of data
- Ethane, 1,2-dichloro-1,1,2,2-tetrafluoro-, CFC-114 [air, non-urban air or from high stacks]: 0.036 kg; lognormal variance with pedigree 0.05, pedigree (1,1,5,1,1)
  range of data
- Aluminium [water, surface water]: 2.5e-5 kg; lognormal variance with pedigree 0.16, pedigree (1,1,5,1,1)
  old reference
- Zinc, ion [water, surface water]: 0.00027 kg; lognormal variance with pedigree 0.16, pedigree (1,1,5,1,1)
  old reference
- Hydrogen fluoride [air, non-urban air or from high stacks]: 0.0045 kg; lognormal variance with pedigree 0.16, pedigree (1,1,5,1,1)
  old reference
- Hydrocarbons, unspecified [water, surface water]: 2.28e-5 kg; lognormal variance with pedigree 0.16, pedigree (1,1,5,1,1)
  old reference
- Chlorine [water, surface water]: 0.00015 kg; lognormal variance with pedigree 0.16, pedigree (1,1,5,1,1)
  old reference
- Water [air, unspecified]: 1.51125 m3; name water_to_air_unspecified; = (water_decarbonised_input/1000*fraction_WDC_to_air); lognormal variance with pedigree 0.0807, pedigree (2,2,5,1,1)
  (same comment as for Water)
  property fraction, origin: unspecified 0; name fraction_origin_unspecified
  property fraction, origin: fresh water 1; name fraction_origin_fresh_water
  property fraction, origin: salt water 0; name fraction_origin_salt_water
- Uranium alpha [water, surface water]: 0.5 kBq; lognormal variance with pedigree 1.37, pedigree (1,1,5,1,1)
  old reference and range of data
- Chromium, ion [water, surface water]: 2.7e-5 kg; lognormal variance with pedigree 0.16, pedigree (1,1,5,1,1)
  old reference
- Fluoride [water, surface water]: 4e-5 kg; lognormal variance with pedigree 0.16, pedigree (1,1,5,1,1)
  old reference

## Sampling procedure
Literature

## Extrapolations
This dataset has been extrapolated from year 2000 to the year of the calculation (2021). The uncertainty has been adjusted accordingly.

## Review by Thomas Nemecek 2007-08-24
Passed.
