# packaging glass factory construction

Dataset: EcoSpold 2, unit process
Geography: RER
Time period: 2000-01-01 to 2021-12-31
Technology level: current
Classification: EcoSpold01Categories: glass/packaging
Classification: ISIC rev.4 ecoinvent: 4290:Construction of other civil engineering projects
Tags: ConvertedDataset
Scenario: Business-as-Usual
System model: Allocation, cut-off by classification
Generated by: Roland Hischier
Published in: Hischier R. 2007
Database: ecoinvent
isCopyrightProtected: true
accessRestrictedTo: 1

## General comment
This dataset represents the infrastructure of an average packaging glass production plant from occupied and unoccupied land with an annual production of 266 kt packaging glass.
It includes construction and dismatling of the different buildings and technical equipment, transport of technical equipment to the factory, land use, emissions and wastes from the replacement of the refractory material inside the furnace. Data are based on information of experts from a European container glass producer. The functional unit is 1 tonne of packaging glass per year.
The different parts of the packaging glass production plant considered in this dataset are as follow:
[This dataset was already contained in the ecoinvent database version 2. It was not individually updated during the transfer to ecoinvent version 3. Life Cycle Impact Assessment results may still have changed, as they are affected by changes in the supply chain, i.e. in other datasets. This dataset was generated following the ecoinvent quality guidelines for version 2. It may have been subject to central changes described in the ecoinvent version 3 change report (http://www.ecoinvent.org/database/ecoinvent-version-3/reports-of-changes/), and the results of the central updates were reviewed extensively. The changes added e.g. consistent water flows and other information throughout the database. The documentation of this dataset can be found in the ecoinvent reports of version 2, which are still available via the ecoinvent website. The change report linked above covers all central changes that were made during the conversion process.]

## Included activities start
From unoccupied and occupied industrial land forseen for the packaging glass factory.

## Included activities end
This activity ends with the dismanteling of the buildings. The dataset includes the land-use, the construction and dismantling of the buildings, the construction and dismanteling of technical equipment (3 melting furnaces, 3 forming machines, 3 cooling furnaces), the construction of street and parking surface, the transport of the technical equipment to the glass production site, the emissions and wastes from the replacement of the refractory material inside the furnace. The dataset doesn't include emissions and wastes from the production process.

## Geography
european production site, based on personal communication from experts of a European packaging glass producer

## Technology
Based on information from experts and literature sources the following technology was considered:
- annual production of 266 kt;
- specific land-use of 0.81 m2 per tonne and year;
- life-time of buildings, street and parking surface of 50 years;
- buildings include production and storage facilites (80%), administration (10%), internal streets and parking areas (10%)
- construction and dismanteling time of 1 year each;
- technical material comprising 3 melting furnaces, 3 forming machines, and 3 cooling furnaces. For all three machines, a foundation out of concrete was assumed with a life-time of 50 years.
Based on information from literature source and from experts the following technical materials were considered:
- Melting furnace: made out of steel (11.5%), refractory material (88%), and electronics (0.5%). Total weight of 3’400 t. Life time of 25 years. Refractory material's life time of 10 years. Energy consumption for construction of 12.5 MJ per kg of steel is assumed; 45% from oil, 45% from gas, and 10% from electricity. For the dismanteling, all metals go to recycling while electronic installations are disposed.
- Forming machine: made out of steel (50%), iron (47.5%), and electronics (2.5%). Total weight of 45 t. Life time of 20 years. Forming moulds (100% iron) with a life time of 1 day. Energy consumption for construction of 12.5 MJ per kg of steel is assumed; 45% from oil, 45% from gas, and 10% from electricity. For the dismanteling, all metals go to recycling while electronic installations are disposed.
- Cooling furnace: made out of chromium steel (85%), isolation material (12.5%), and electronics (2.5%). Total weight of 80 t. Life time of 25 years. Energy consumption for construction of 12.5 MJ per kg of steel is assumed; 45% from oil, 45% from gas, and 10% from electricity. For the dismanteling, all metals go to recycling while electronic installations are disposed.
Reference:
European Commission (2000) Integrated Pollution Prevention and Control (IPPC) - Reference Document on Best Available Techniques in the Glass Manu-facturing Industry. Institute for Prospective Technological Studies, Sevilla

## Reference product
- packaging glass factory: 1 unit; CPC 53269: Other constructions for manufacturing; By-product classification allocatable product
  production volume 1.32237 unit
    This is a placeholder value that does not reflect real-world production volumes. This dataset does not currently require a real-world production volume to work in the database framework, and no actual data were collected yet. This has no negative effect on the results of the ecoinvent database. The placeholder value of this activity was scaled according to the nominal GDP of 2005 (source: United Nations, http://data.un.org/Glossary.aspx?q=GDP+%28current+US%24%29, accessed 20130726) to reflect an appropriate share of the global production volume, which is also a placeholder value.
  property price 7.58288e8 EUR2005
    Convert from EU 27 price to the world by currency exchange rate.

## Inputs from technosphere
- heat, district or industrial, other than natural gas: 41230 MJ; source Frischknecht R. 1996; lognormal variance with pedigree 0.0513, pedigree (2,3,5,3,1)
  Calculated: energy consumption for the construction of the technical material (melting furnace, forming machines, cooling furnace) calcualted based on literature source. 45% of energy is from oil.
  Uncertainty: c
  properties: heating value, net 1 MJ
- road, company, internal: 1e6 m2*year; lognormal variance with pedigree 0.4921, pedigree (5,4,5,3,4)
  Estimantion: it was estimated - based on information of experts - that about 10% of the occupied area are internal streets and parking areas. Life-time of 50 years, the same as the packging glass factory. Dismanteling not included. It's assumed that all materials can be recycled.
  Uncertainty: o
- steel, low-alloyed, hot rolled: 3.07e6 kg; lognormal variance with pedigree 0.0513, pedigree (2,3,5,3,1)
  Calculated value: Based on information from specialists, the amount of steel low alloy in the technical material is as follow. Melting furnace: 11.5% w/w; Forming machine: 50% w/w; Forming mould: 0%; Cooling furnace: 0% w/w.
  Uncertainty: p
  properties: dry mass 1 kg, wet mass 1 kg, carbon content, fossil 0.005
  note on carbon content, fossil: Low alloyed steel composition given in Tab. 3.2 ecoinvent v2.2 report 10_partII. Steel assumed to have a C content of 0.5%
- cast iron: 4.24e6 kg; source European Commission 2000; lognormal variance with pedigree 0.0513, pedigree (2,3,5,3,1)
  Calculated value: Based on literature sources and information from specialists, the amount of iron in the technical material is as follow. Melting furnace: 0% w/w; Forming machine: 47.5% w/w; Forming mould: 100%; Cooling furnace: 0% w/w.
  Uncertainty: p
  properties: wet mass 1 kg, carbon content, fossil 0.04, dry mass 1 kg
  note on carbon content, fossil: Cast iron is made by remelting pig iron in small furnaces (e.g. cupola furnaces or electric arc furnaces) and poured into moulds to make castings. It usually contains 2% to 6% carbon (ecoinvent v2.2 report 10_partII). An average content of 4% was considered
- heat, district or industrial, natural gas: 39060 MJ; source Frischknecht R. 1996; lognormal variance with pedigree 0.0513, pedigree (2,3,5,3,1)
  Calculated: energy consumption for the construction of the technical material (melting furnace, forming machines, cooling furnace) calcualted based on literature source. 45% of energy is from natural gas.
  Uncertainty: c
  properties: heating value, net 1 MJ
- building, hall, steel construction: 160000 m2; lognormal variance with pedigree 0.4921, pedigree (5,4,5,3,4)
  Estimation: it was estimated - based on information of experts - that about 80% of the occupied area are production and storage facilities. Life-time of 50 years, the same as the packging glass factory.
  Uncertainty: o
- steel, chromium steel 18/8, hot rolled: 408000 kg; source European Commission 2000; lognormal variance with pedigree 0.0513, pedigree (2,3,5,3,1)
  Calculated value: Based on information from specialists, the amount of steel chromium 18/8 in the technical material is as follow. Melting furnace: 0% w/w; Forming machine: 0% w/w; Forming mould: 0%; Cooling furnace: 80% w/w.
  Uncertainty: p
  properties: carbon content, fossil 0.0008, dry mass 1 kg, wet mass 1 kg
  note on carbon content, fossil: Stainless steel model is the grade 304 steel (18/8 stainless, 18% chromium 8% nickel; max. 0.08% C)
- electronics scrap from control units: -150000 kg; source European Commission 2000; lognormal variance with pedigree 0.1921, pedigree (5,4,5,3,4)
  Calculated value: based on literature sources and information from specialists, the amount of electronics in the technical material is as follow. Melting furnace: 0.5% w/w; Forming machine: 2.5% w/w; Forming mould: 0%; Cooling furnace: 2.5% w/w. All electronics are disposed.
  Uncertainty: c
  production volume 150000 kg
    Calculated from the production volume of packaging glass factory in proportion to the respective output amounts.
  properties: wet mass 1 kg, carbon content, non-fossil 0.00013442, dry mass 1 kg, carbon content, fossil 0.337146
- stone wool: 60000 kg; source European Commission 2000; lognormal variance with pedigree 0.0513, pedigree (2,3,5,3,1)
  Calculated value: Based on literature sources and information from specialists, the amount of rock wall for isolation in the technical material is as follow. Melting furnace: 0% w/w; Forming machine: 0% w/w; Forming mould: 0%; Cooling furnace: 85% w/w.Life-time of isolation material is 1 day.
  Uncertainty: p
  properties: wet mass 1 kg, dry mass 1 kg, carbon content, fossil 0.015401
  note on carbon content, fossil: The chemical composition of the glass fibres used in the rock wool production is similar to the composition of naturally cooled volcano basalt and has a composition listed in Tab. 3.1 and 3.2 in ecoinvent v2.2 report 16, part XIV. Rock wool contains: a minimum of 96% mineral fibres,between 0.5 and 3.0 weight percent of phenolic resin depending on the specific product characteristics, and about 0.2 percent mineral oil (ecoinvent v2.2 report 16, part XIV). An average composition of 1.8% phenolic resin, 0.2% mineral oil, and 98% mineral fibres has been assumed and used to calculate C content of the rock wool
- waste concrete, not reinforced: 0 kg; pedigree (1,1,1,1,1)
  Estimation: waste from foundation out of concrete, buildings, and technical material.
  Uncertainty: o
  production volume 0 kg
    (same comment as for electronics scrap from control units)
  properties: dry mass 1 kg, wet mass 1 kg
- refractory, fireclay, packed: 4.49e7 kg; source European Commission 2000; lognormal variance with pedigree 0.0513, pedigree (2,3,5,3,1)
  Calculated value: Based on literature sources and information from specialists, the amount of refractory material in the technical material is as follow. Melting furnace: 88% w/w; Forming machine: 0% w/w; Forming mould: 0%; Cooling furnace: 0% w/w. Life-time of refractory material is 10 years.
  Uncertainty: p
  properties: dry mass 1 kg, wet mass 1 kg
- electronics, for control units: 150000 kg; source European Commission 2000; lognormal variance with pedigree 0.0513, pedigree (2,3,5,3,1)
  Calculated value: based on literature sources and information from specialists, the amount of electronics in the technical material is as follow. Melting furnace: 0.5% w/w; Forming machine: 2.5% w/w; Forming mould: 0%; Cooling furnace: 2.5% w/w.
  Uncertainty: p
  properties: wet mass 1 kg, carbon content, fossil 0.337146, carbon content, non-fossil 0.00013442, dry mass 1 kg
  note on carbon content, fossil: The control unit has a composition of 46% steel (housing), 32% plastics, 14% printed wiring boards and 8% cables (various types).;
- building, multi-storey: 200000 m3; lognormal variance with pedigree 0.4921, pedigree (5,4,5,3,4)
  Estimation: it was estimated - based on information of experts - that about 10% of the occupied area are buildings for the administration. It was assumed that the administration buildings have an average height of 10 m. Life-time of 50 years, the same as the packging glass factory.
  Uncertainty: o
- concrete, normal: 2310 m3; lognormal variance with pedigree 0.0781, pedigree (4,4,5,3,3)
  Estimation: based on information from experts, for all three machines (melting furnace, forming machine, cooling machine), a foundation out of concrete, weighting about 50% of the total weight of the machine is assumed. Its life-time is assumed to be 50 years, the same as the packaging glass factory. At the end of the life, it is assumed that 50% of this foundation is recycled while the remaining 50% are going to final disposal.
  Uncertainty: e
  properties: wet mass 2380 kg, water content 0.086758, dry mass 2190 kg
- electricity, medium voltage: 883 kWh; source Frischknecht R. 1996; lognormal variance with pedigree 0.0513, pedigree (2,3,5,3,1)
  Calculated: energy consumption for the construction of the technical material (melting furnace, forming machines, cooling furnace) calculated based on literature source. 10% of energy is from electricity.
  Uncertainty: c
- waste concrete, not reinforced: -5.46212e6, -57875.3 kg (2 entries); lognormal variance with pedigree 0.1921, pedigree (5,4,5,3,4)
  (same comment as for waste concrete, not reinforced)
  production volume 5.52e6 kg

## Inputs from nature
- Occupation, construction site [natural resource, land]: 400000 m2*year; lognormal variance with pedigree 0.1101, pedigree (4,4,5,3,1)
  Estimation: based on information from experts it was assumed a construction and dismanteling time of 1 year each.
  Uncertainty: e
- Transformation, to industrial area [natural resource, land]: 214800 m2; lognormal variance with pedigree 0.1901, pedigree (4,4,5,3,1)
  Estimantion: based on information from experts, a specific land-use of 0.81 m2 per tonne and year was calculated. Thereof 0.75 m2 (93%) of occupied industrial area.
  Uncertainty: e
- Transformation, from unspecified [natural resource, land]: 215000 m2; lognormal variance with pedigree 0.1901, pedigree (4,4,5,3,1)
  Estimantion: based on information from experts, a specific land-use of 0.81 m2 per tonne and year was calculated. Thereof 0.06 m2 (7%) of green industrial area.
  Uncertainty: e
- Occupation, industrial area [natural resource, land]: 1.074e7 m2*year; lognormal variance with pedigree 0.1101, pedigree (4,4,5,3,1)
  Estimation: based on information from experts it was assumed a life-time of 50 years.
  Uncertainty: e

## Extrapolations
This dataset has been extrapolated from year 2000 to the year of the calculation (2021). The uncertainty has been adjusted accordingly.

## Review by Hans-Jörg Althaus 2003-08-20
passed

## Review by Roland Hischier 2011-11-29
Transfer of documentation done.
