# glass fibre production

Dataset: EcoSpold 2, unit process
Geography: RER
Time period: 2000-01-01 to 2021-12-31
Technology level: current
Classification: ISIC rev.4 ecoinvent: 2310:Manufacture of glass and glass products
Classification: EcoSpold01Categories: glass/construction
Synonyms: fibrous glass filter media; fiberglass; fibreglass
Tags: ConvertedDataset
Scenario: Business-as-Usual
System model: Allocation, cut-off by classification
Share of production covered: 100 %
Generated by: Niels Jungbluth
Published in: Kellenberger D. 2007
Database: ecoinvent
isCopyrightProtected: true
accessRestrictedTo: 1

## General comment
Inventory based on a state of the art report for the European glass manufacturing industry. Data had to be estimated from ranges given for different parameters.
[This dataset was already contained in the ecoinvent database version 2. It was not individually updated during the transfer to ecoinvent version 3. Life Cycle Impact Assessment results may still have changed, as they are affected by changes in the supply chain, i.e. in other datasets. This dataset was generated following the ecoinvent quality guidelines for version 2. It may have been subject to central changes described in the ecoinvent version 3 change report (http://www.ecoinvent.org/database/ecoinvent-version-3/reports-of-changes/), and the results of the central updates were reviewed extensively. The changes added e.g. consistent water flows and other information throughout the database. The documentation of this dataset can be found in the ecoinvent reports of version 2, which are still available via the ecoinvent website. The change report linked above covers all central changes that were made during the conversion process.]

## Included activities end
Gate to gate inventory for the production of glass fibre.

## Geography
26 furnaces operating at 12 sites in Europe

## Technology
Recuperative or oxy-fuel fired furnaces.

## Time period
Time of publication

## Parameters
- fraction, process water, to air: 0.15 dimensionless; name fraction_PW_to_air; lognormal variance with pedigree 0.092025, pedigree (4,4,3,2,4)
  Literature value. In case when no industry/process specific data are available, default evaporation fraction value is used. This value is 15% and is based on literature (Statistics Canada, 2007 & Shaffer, K.H., 2008, Consumptive water use in the Great Lakes Basin, USGS & Shiklomanov, 2003, World Water Resources at the Beginning of the 21st Century) and has been approved by an expert.
- fraction, tap water, to air: 0.15 dimensionless; name fraction_TW_to_air; = fraction_PW_to_air; lognormal variance with pedigree 0.092025, pedigree (4,4,3,2,4)
  Calculated value. See comment in the other parametres present in this dataset. Tap water is considered to be always used as process water, thus process water fractions to air are applied to all tap water input flows to calculate the amount of water consumed in the processes.

## Reference product
- glass fibre: 1 kg; By-product classification allocatable product; CPC 3712: Glass fibres and articles thereof, except woven fabrics; CAS 65997-17-3
  EcoSpold01Location=RER
  production volume 1.32237 kg
    This is a placeholder value that does not reflect real-world production volumes. This dataset does not currently require a real-world production volume to work in the database framework, and no actual data were collected yet. This has no negative effect on the results of the ecoinvent database. The placeholder value of this activity was scaled according to the nominal GDP of 2005 (source: United Nations, http://data.un.org/Glossary.aspx?q=GDP+%28current+US%24%29, accessed 20130726) to reflect an appropriate share of the global production volume, which is also a placeholder value.
  property carbon content, fossil 0
    Tab 5.1, ecoinvent v2.2 report 7, part XIII, for Glass fibre composition.
  property carbon content, non-fossil 0
    Tab 5.1, ecoinvent v2.2 report 7, part XIII, for Glass fibre composition.
  property carbon content 0
    carbon content on a dry matter basis (reserved; not for manual entry)
  properties: water in wet mass 0 kg, water content 0, wet mass 1 kg, dry mass 1 kg, price 0.802 EUR2005, carbon allocation 0 kg

## Inputs from technosphere
- nylon 6: 0.0283 kg; lognormal variance with pedigree 0.07, pedigree (1,1,5,1,1)
  For polymers
  EcoSpold01Location=RER
  properties: heating value, net 30.9 MJ, carbon content, fossil 0.637168, dry mass 1 kg, wet mass 1 kg
  note on heating value, net: Assumed equal to Nylon-66. Reference: Walters, R. N., Hackett, S. M. and Lyon, R. E. (2000) ‘Heats of combustion of high temperature polymers’, Fire and Materials, 24(5), pp. 245–252. doi: 10.1002/1099-1018(200009/10)24:5<245::AID-FAM744>3.0.CO;2-7.
  note on carbon content, fossil: It is a chain of caprolactam molecules, originating from aminocarboxylic acids - here caproic acid or caprolactam. The structure of nylon 6 is -(NH-(CH2)5-CO)n-, C6H11NO (ecoinvent v2.2 report 11_II). MW=113 g/mol
- electricity, medium voltage: 1.61 kWh; lognormal variance with pedigree 0.042, pedigree (1,4,5,1,1)
  EcoSpold01Location=UCTE
  Forming, utilities and processes
  Uncertainty: Forming, utilities and processes
- waste paint: 0 kg; pedigree (1,1,1,1,1)
  Binder wastes
  EcoSpold01Location=CH
  production volume 0 kg
    Calculated from the production volume of glass fibre in proportion to the respective output amounts.
  properties: heating value, net 19.7 MJ, carbon content, fossil 0.65, dry mass 1 kg, wet mass 1 kg
  note on carbon content, fossil: Tab A.5, ecoinvent v2.2 report 13_I. C content has been calculated after data in the tables, and then referred to 1 kg DM
- chemical, organic: 0.00316 kg; lognormal variance with pedigree 0.37, pedigree (1,1,5,1,1)
  Other binders
  EcoSpold01Location=GLO
  properties: wet mass 1 kg, dry mass 1 kg, heating value, net 19.03 MJ, carbon content, fossil 0.628
  note on carbon content, fossil: This dataset is an unweighted average of 20 organic substances (listed in Tab 88.1, ecoinvent v2.2 report 8, part II), being part of the top100 chemicals included in this database. The C-content has also been calculated as an unweighted average of the C content of the substances composing this dataset.
- fluorspar, 97% purity: 0.00447 kg; lognormal variance with pedigree 0.6, pedigree (1,1,5,1,1)
  EcoSpold01Location=GLO
  IPPC 2000
  properties: dry mass 1 kg, wet mass 1 kg
- lime: 0.351 kg; lognormal variance with pedigree 0.05, pedigree (1,1,5,1,1)
  Calcium carbonate
  EcoSpold01Location=CH
  properties: dry mass 1 kg, carbon content, fossil 0.120005, wet mass 1 kg
- tap water: 8.94 kg; name tap_water_input; lognormal variance with pedigree 0.2, pedigree (1,1,5,1,1)
  EcoSpold01Location=RER
  IPPC 2000
  properties: water content 2962.17, carbon content, fossil 0.00178991, dry mass 0.000337476 kg, wet mass 1 kg
  note on carbon content, fossil: Bicarbonate content is 2.93 mol/m3. CO2 content is 0.1 mol/m3 (ecoinvent v2.2 report 8, Tab 93.1).
- lubricating oil: 0.00224 kg; lognormal variance with pedigree 0.2, pedigree (1,1,5,1,1)
  Binder
  EcoSpold01Location=RER
  properties: carbon content, fossil 0.75, dry mass 1 kg, wet mass 1 kg, heating value, net 40.2 MJ
  note on carbon content, fossil: Lubricating oil is produced from diesel. C-content/dry mass of fats and oils considered 75%, from: ecoinvent v2.2 report, n 15a, pg 40
  note on heating value, net: Literature value, Source: IPCC 2006, 2006 IPCC Guidelines for National Greenhouse Gas Inventories, Prepared by the National Greenhouse Gas Inventories Programme, Eggleston H.S., Buendia L., Miwa K., Ngara T. and Tanabe K. (eds). Published: IGES, Japan
- aluminium oxide, non-metallurgical: 0.0214 kg; lognormal variance with pedigree 1.01, pedigree (1,1,5,1,1)
  For other raw materials
  EcoSpold01Location=RER
  properties: wet mass 1 kg, dry mass 1 kg
- wastewater from glass production: -0.003 m3; name wastewater_output; lognormal variance with pedigree 0.16, pedigree (1,1,5,1,1)
  EcoSpold01Location=CH
  Sewage
  production volume 0.003 m3
    (same comment as for waste paint)
  property price 0 EUR2005; name wastewater_output_price_EUR2005
  properties: dry mass 1.09356 kg, wet mass 1000 kg, carbon content, fossil 0.0455242, water content 913.443
  note on carbon content, fossil: COD= 0.115 kg/m3 (Tab A.18, ecoinvent v2.2 report 13_I). COD was converted to TOC, using conversion factors in Tab 4.10 (ecoinvent v2.2 report 13_IV). TOC was considered as Total Carbon.
- silica sand: 0.37 kg; lognormal variance with pedigree 0.05, pedigree (1,1,5,1,1)
  IPPC 2000
  EcoSpold01Location=DE
  properties: water content 0.010101, dry mass 0.99 kg, wet mass 1 kg
- heat, district or industrial, natural gas: 14.4 MJ; lognormal variance with pedigree 0.07, pedigree (1,1,5,1,1)
  EcoSpold01Location=RER
  Melting
  properties: heating value, net 1 MJ
- waste mineral wool, for final disposal: 0 kg; pedigree (1,1,1,1,1)
  Fibre glas production waste
  EcoSpold01Location=CH
  production volume 0 kg
    (same comment as for waste paint)
  properties: wet mass 1 kg, dry mass 1 kg
- clay: 0.464 kg; lognormal variance with pedigree 0.05, pedigree (1,1,5,1,1)
  IPPC 2000
  EcoSpold01Location=CH
  properties: water content 0.0362694, dry mass 0.965 kg, wet mass 1 kg
- silicone product: 0.00141 kg; lognormal variance with pedigree 0.07, pedigree (1,1,5,1,1)
  EcoSpold01Location=RER
  Silane
  properties: dry mass 1 kg, carbon content, fossil 0.324324, wet mass 1 kg, heating value, net 9.83 MJ
  note on carbon content, fossil: The term silicones is used for compounds in which silicon atoms are linked via oxygen atoms, each silicon atom bearing one or several organic groups. In industrially important silicones, these groups are usually methyl or phenyl (ecoinvent v2.2 report 8_part71 & Ullmann). The chemical formula was considered to be [Si(CH3)2O]n (Ullmann).
- flat glass factory: 4e-10 unit; lognormal variance with pedigree 0.3508, pedigree (2,2,5,3,1)
  EcoSpold01Location=RER
  Estimation
  Uncertainty: Estimation
- waste mineral oil: 0 kg; pedigree (1,1,1,1,1)
  EcoSpold01Location=CH
  For other raw materials
  production volume 0 kg
    (same comment as for waste paint)
  properties: dry mass 0.9 kg, heating value, net 34.7 MJ, carbon content, fossil 0.864444, water content 0.111111, wet mass 1 kg
  note on heating value, net: Value taken from the general comment of the treatment dataset.
  note on carbon content, fossil: Tab A.6, ecoinvent v2.2 report 13_I. C content has been calculated after data in the tables, and then referred to 1 kg DM
- boric acid, anhydrous, powder: 0.188 kg; lognormal variance with pedigree 0.2106, pedigree (5,5,5,5,5)
  Estimation for colemanite CaB3O4(OH)3-H2O, Hydrated Calcium Borate Hydroxide
  EcoSpold01Location=RER
  Uncertainty: 3-H2O, Hydrated Calcium Borate Hydroxide
  properties: dry mass 1 kg, wet mass 1 kg
- waste paint: -0.0035992, -1.08006e-5 kg (2 entries); lognormal variance with pedigree 0.45, pedigree (1,1,5,1,1)
  Binder wastes
  EcoSpold01Location=CH
  production volume 0.00361 kg
- waste mineral wool, for final disposal: -0.121337, -0.000662872 kg (2 entries); lognormal variance with pedigree 0.17, pedigree (1,1,5,1,1)
  Fibre glas production waste
  EcoSpold01Location=CH
  production volume 0.122 kg
- waste mineral oil: -0.00218589, -5.41138e-5 kg (2 entries); lognormal variance with pedigree 1.01, pedigree (1,1,5,1,1)
  EcoSpold01Location=CH
  For other raw materials
  production volume 0.00224 kg

## Emissions to nature
- Water [water, unspecified]: 0.004599 m3; name water_to_water_unspecified; = (tap_water_input/1000)*(1-fraction_TW_to_air)-(wastewater_output*-1); lognormal variance with pedigree 0.0807, pedigree (2,2,5,1,1)
  Calculated value based on literature values and expert opinion. See comments in the parametres' comment field.
  property carbon content, fossil 0; name C_content_fossil
  property water in wet mass 1000 kg; name WWM
  property carbon content, non-fossil 0; name C_content_non_fossil
  property fraction, origin: fresh water 1; name fraction_origin_fresh_water_Ww
  property fraction, origin: salt water 0; name fraction_origin_salt_water_Ww
  property fraction, origin: unspecified 0; name fraction_origin_unspecified_Ww
  property wet mass 1000 kg; name WM
  property dry mass 0 kg; name DM
- Particulates, > 10 um [air, urban air close to ground]: 6.93e-6 kg; lognormal variance with pedigree 0.43, pedigree (1,1,5,1,1)
  Berdowski 2002, waste gas purification
- Particulates, < 2.5 um [air, urban air close to ground]: 4.85e-5 kg; lognormal variance with pedigree 0.43, pedigree (1,1,5,1,1)
  Berdowski 2002, waste gas purification
- Arsenic [air, urban air close to ground]: 2.1e-5 kg; lognormal variance with pedigree 0.0721, pedigree (1,4,5,3,1)
  Emission limit in Belgium
  Uncertainty: Emission limit in Belgium
- Hydrogen fluoride [air, urban air close to ground]: 3.46e-5 kg; lognormal variance with pedigree 0.16, pedigree (1,1,5,1,1)
  IPPC 2000
- Cadmium [air, urban air close to ground]: 7e-6 kg; lognormal variance with pedigree 0.0721, pedigree (1,4,5,3,1)
  Emission limit in Belgium
  Uncertainty: Emission limit in Belgium
- Sulfur dioxide [air, urban air close to ground]: 0.00283 kg; lognormal variance with pedigree 0.31, pedigree (1,1,5,1,1)
  IPPC 2000
- Nitrogen oxides [air, urban air close to ground]: 0.00417 kg; lognormal variance with pedigree 0.1, pedigree (1,1,5,1,1)
  IPPC 2000
- Particulates, > 2.5 um, and < 10um [air, urban air close to ground]: 1.39e-5 kg; lognormal variance with pedigree 0.43, pedigree (1,1,5,1,1)
  Berdowski 2002, waste gas purification
- NMVOC, non-methane volatile organic compounds, unspecified origin [air, urban air close to ground]: 0.000224 kg; lognormal variance with pedigree 0.2, pedigree (1,1,5,1,1)
  IPPC 2000
- Carbon dioxide, fossil [air, urban air close to ground]: 0.155 kg; lognormal variance with pedigree 0.06, pedigree (1,1,5,1,1)
  From raw material decomposition
- Hydrogen chloride [air, urban air close to ground]: 6e-5 kg; lognormal variance with pedigree 0.16, pedigree (1,1,5,1,1)
  IPPC 2000
- Water [air, unspecified]: 0.001341 m3; name water_to_air_unspecified; = (tap_water_input/1000*fraction_TW_to_air); lognormal variance with pedigree 0.0807, pedigree (2,2,5,1,1)
  (same comment as for Water)
  property fraction, origin: fresh water 1; name fraction_origin_fresh_water
  property fraction, origin: unspecified 0; name fraction_origin_unspecified
  property fraction, origin: salt water 0; name fraction_origin_salt_water
- Antimony [air, urban air close to ground]: 3.5e-5 kg; lognormal variance with pedigree 0.0721, pedigree (1,4,5,3,1)
  Emission limit in Belgium
  Uncertainty: Emission limit in Belgium

## Sampling procedure
Literature

## Extrapolations
This dataset has been extrapolated from year 2000 to the year of the calculation (2021). The uncertainty has been adjusted accordingly.

## Review by Daniel Kellenberger (obsolete) 2003-07-23
Passed.
