# washing machine production

Dataset: EcoSpold 2, unit process
Geography: GLO
Time period: 2004-01-01 to 2021-12-31
Technology level: current
Classification: ISIC rev.4 ecoinvent: 2750:Manufacture of domestic appliances
Synonyms: washer; laundry appliance; top-loaded washing machine
Scenario: Business-as-Usual
System model: Allocation, cut-off by classification
Generated by: Viachaslau Filimonau
Published in: Yuan, Z. 2016
Database: ecoinvent
isCopyrightProtected: true
accessRestrictedTo: 1

## General comment
This activity represents the production and disposal of an average washing machine which is 75 kg in mass. It has the envisaged lifetime of 10 years and is manufactured in China.The figures on material inputs from technosphere and electricity required to produce an average washing machine are taken from Yuan et al. 2016. The figure on the annual production volume is estimated via GDP scaling. This is based on the annual amount of washing machine sales in EU as taken from Michel et al. 2015.

## Included activities start
This activity starts with the reception of materials at the factory.

## Included activities end
The activity includes the processes of material and energy use in manufacturing an average washing machine. The inventory additionally accounts for disposal of all materials. Packaging is not included.

## Geography
Geography GLO was chosen because the dataset aims to represent the production of an average washing macine. The literature sources used refer to manufacturing in China.

## Time period
The literature sources used refer to primary data from 2004. Although the background study utilised in this project (Yuan et al. 2016) was published in 2016, it refers to technology described as being 'current'.

## Reference product
- washing machine: 1 unit; name RP_amount_1; source Michel, A. 2015; By-product classification allocatable product; CPC 971: Washing, cleaning and dyeing services
  production volume 6.387e7 unit; name RP_PV_1
    The figure on the annual world production volume is extrapolated from the annual volume of washing machines sold in EU as recorded by Michel et al. 2015.
  property price 400 EUR2005; name RP_amount_1_price_EUR2005
    Estimated value. The price is taken from MediaWorld, a shop for electronics, website (retrieved from: https://www.mediaworld.it/mw/SearchDisplay?searchTerm=aspirapolvere&categoryId=&search=WCS&storeId=20000&catalogId=20000&langId=-4&pageSize=25&beginIndex=0&sType=SimpleSearch&resultCatEntryType=2&showResultsPage=true&searchSource=Q&pageView=, accessed 13Feb2018). The range of prices varies greatly from 200 to over 1000 euros. A representative price of 400 was chosen. The choice is based on the most common price for an average appliance, and accounting for profit margins. According to an article from Blokhin "What profit margin is average for a company in the electronics sector?" (Source: Investopedia, retrieved from: https://www.investopedia.com/ask/answers/051215/what-profit-margin-average-company-electronics-sector.asp, 13Feb2018) the average profit margin made in the electronics sector in 2015 was of 9%.
  property lifetime capacity [h] 1995 hour; = 133*10*1.5
    Literature source assumed: "10 years lifespan with 133 washing cycles per year". Based on the estimate from Yuan et al. 2016. Source: Yuan et al. 2016, 2016, Yuan, Z., Zhang, Y., and Liu, X., Life cycle assessment of horizontal-axis washing machines in China, International Journal of Life Cycle Asse, 21, 15-28. A cycle is estimated to last 1.5hours.
  property weight 75 kg; name weight
    Based on the estimate from Yuan et al. 2016. Source: Yuan et al. 2016, 2016, Yuan, Z., Zhang, Y., and Liu, X., Life cycle assessment of horizontal-axis washing machines in China, International Journal of Life Cycle Asse, 21, 15-28, 1 - Article
  property lifetime 10 year
    (same comment as for washing machine)

## By-products
- iron scrap, unsorted: 0 kg; CPC 39310: Slag, dross, scalings and other waste from the manufacture of iron or steel; By-product classification Recyclable; pedigree (1,1,1,1,1)
  Data from Yuan et al. 2016. The amount is set equal to the input amount for the respective material.
  production volume 0 kg; = RP_PV_1 * (BP_amount_6 / RP_amount_1)
    Calculated from production volume of reference product using the relative outputs.
  property price 0.149 EUR2005; name BP_amount_6_price_EUR2005
    Temporary price data. Calculated as 90% of purchasers price based on: estimated at 85% of sorted scrap
  property carbon content 0
    carbon content on a dry matter basis (reserved; not for manual entry)
  properties: wet mass 1 kg, dry mass 1 kg, carbon content, fossil 0, water in wet mass 0 kg, water content 0, carbon content, non-fossil 0, carbon allocation 0 kg
- waste packaging paper: 0 kg; CPC 39240: Waste and scrap of paper or paperboard; By-product classification Recyclable; pedigree (1,1,1,1,1)
  Used here in place of kraft liner and paper. Data from Yuan et al. 2016. The amount is set equal to the input amount for the respective material.
  production volume 0 kg; = RP_PV_1 * (BP_amount_11 / RP_amount_1)
    Calculated from production volume of reference product using the relative outputs.
  property price 0.1 EUR2005; name BP_amount_11_price_EUR2005
    For paper and board waste the price, in 2005, according to [http://ec.europa.eu/eurostat] is about 1 EUR/kg corresponding to a purchase price of 0.099 similar to the price of UN comodittie: Waste, scrap of paper, board, nes (including unsorted).
  properties: heating value, net 14.11 MJ

## Inputs from technosphere
- tap water: 11.5 kg; name tap_water; lognormal variance with pedigree 0.003425, pedigree (1,4,2,2,2)
  Data from Yuan et al. 2016.
  properties: carbon content, fossil 0.00178991, wet mass 1 kg, water content 2962.17, dry mass 0.000337476 kg
  note on carbon content, fossil: Bicarbonate content is 2.93 mol/m3. CO2 content is 0.1 mol/m3 (ecoinvent v2.2 report 8, Tab 93.1).
- cable, unspecified: 0.63 kg; name cable; lognormal variance with pedigree 0.003425, pedigree (1,4,2,2,2)
  This product represents average, unspecified cable. Data from Yuan et al. 2016.
  properties: carbon content, fossil 0.28196, dry mass 1 kg, wet mass 1 kg, heating value, net 8.54 MJ
- metal working factory: 3.435e-8 unit; = 4.58E-10*75; lognormal variance with pedigree 0.302825, pedigree (1,4,2,2,2)
  Estimated value.The input of infrastructure is approximated with the exchange 'metal working factory', this was chosen as metal is the main material constituting the final product. The general comment for the activity 'metal working faculty, GLO' [accessed 19.01.2018] specifies: '4.58E-10 units of this process are needed to produce 1 kg of final product. Additionally, the dataset for 'metal working factory' needs to be used together with the 'energy and auxilliary inputs, metal working factory', 1 kg of this exchange is required per 1 kg of final product.
- flat glass, uncoated: 0 kg; name flat_glass; pedigree (1,1,1,1,1)
  Data from Yuan et al. 2016.
  properties: wet mass 1 kg, dry mass 1 kg
- nylon 6: 0 kg; name nylon; pedigree (1,1,1,1,1)
  Data from Yuan et al. 2016. In terms of outputs assumed to have gone to waste PE.
  properties: dry mass 1 kg, heating value, net 30.9 MJ, wet mass 1 kg, carbon content, fossil 0.637168
  note on heating value, net: Assumed equal to Nylon-66. Reference: Walters, R. N., Hackett, S. M. and Lyon, R. E. (2000) ‘Heats of combustion of high temperature polymers’, Fire and Materials, 24(5), pp. 245–252. doi: 10.1002/1099-1018(200009/10)24:5<245::AID-FAM744>3.0.CO;2-7.
  note on carbon content, fossil: It is a chain of caprolactam molecules, originating from aminocarboxylic acids - here caproic acid or caprolactam. The structure of nylon 6 is -(NH-(CH2)5-CO)n-, C6H11NO (ecoinvent v2.2 report 11_II). MW=113 g/mol
- waste polyethylene: 0 kg; name BP_amount_10; pedigree (1,1,1,1,1)
  Data from Yuan et al. 2016. The amount is set equal to the input amount for the respective material. Also includes waste nylon.
  production volume 0 kg
    Calculated from production volume of reference product using the relative outputs.
  property price 0 EUR2005; name BP_amount_10_price_EUR2005
  properties: carbon content, fossil 0.825301, dry mass 0.996 kg, wet mass 1 kg, heating value, net 42.47 MJ, water content 0.00401606
  note on carbon content, fossil: C content in 1 kg DM was calculated using data in Tab A.1, ecoinvent v2.2 report 13_I
  note on heating value, net: Value taken from the general comment of the treatment dataset.
- polyvinylchloride, bulk polymerised: 1.03 kg; name PVC; lognormal variance with pedigree 0.003425, pedigree (1,4,2,2,2)
  Data from Yuan et al. 2016.
  properties: carbon content, fossil 0.387097, heating value, net 21.5 MJ, wet mass 1 kg, dry mass 1 kg
  note on carbon content, fossil: Monomer is vynyl chloride, C2H3Cl (ecoinvent v2.2 report 11_II). MW=62 g/mol
- printed paper: 0.15 kg; name PVDC; lognormal variance with pedigree 0.003425, pedigree (1,4,2,2,2)
  Data from Yuan et al. 2016.
  properties: heating value, net 14.11 MJ
- wastewater, average: 0 m3; name BP_amount_12; pedigree (1,1,1,1,1)
  Converted from kg (1000 kg of water = 1 m3 of water). The amount is set equal to the input amount for the respective material. Data from Yuan et al. 2016.
  production volume 0 m3
    Calculated from production volume of reference product using the relative outputs.
  property price 0 EUR2005; name BP_amount_12_price_EUR2005
  properties: wet mass 1000 kg, dry mass 0.346837 kg, water content 2882.2, carbon content, non-fossil 0.194039
  note on carbon content, non-fossil: 0.0673 kg TOC/m3 (Tab A.17, ecoinvent v2.2 report 13_I). TOC was considered as Total Carbon.
- copper, cathode: 1.81 kg; name copper; lognormal variance with pedigree 0.003425, pedigree (1,4,2,2,2)
  Data from Yuan et al. 2016.
  properties: wet mass 1 kg, dry mass 1 kg
- waste rubber, unspecified: 0 kg; name BP_amount_8; pedigree (1,1,1,1,1)
  This includes scrap synthetic, natural rubber (seal) and epoxy resin. Data from Yuan et al. 2016. The amount is set equal to the input amount for the respective material.
  production volume 0 kg
    Calculated from production volume of reference product using the relative outputs.
  property price 0 EUR2005; name BP_amount_8_price_EUR2005
  properties: wet mass 1 kg, heating value, net 27.19 MJ, dry mass 1 kg, carbon content, fossil 0.853
- kraft paper: 0 kg; name kraft_paper; pedigree (1,1,1,1,1)
  Data from Yuan et al. 2016.
  properties: dry mass 0.945 kg, heating value, net 14.11 MJ, carbon content, fossil 0.0020219, wet mass 1 kg, water content 0.0582011, carbon content, non-fossil 0.41662
  note on carbon content, fossil: Fossil C content was calculated after fossil C contents of chemicals used in the production of the paper (in Tab 9.4 ecoinvent v2.2 report 11_III, part 9).
  note on carbon content, non-fossil: Biogenic C content was calculated after biogenic C contents of chemicals used in the production of the paper (in Tab 9.4 ecoinvent v2.2 report 11_III, part 9). The cellulose content in 1 kg of paper (on a wet mas basis) was estimated as (1-chemical content), C content of cellulose was considered 0.44 kgC/kg dry mass (ecoinvent v2.2 report, n 15a, pg 40)
- waste polystyrene: 0 kg; name BP_amount_13; pedigree (1,1,1,1,1)
  (same comment as for iron scrap, unsorted)
  production volume 0 kg
    Calculated from production volume of reference product using the relative outputs.
  property price 0 EUR2005; name BP_amount_13_price_EUR2005
  properties: heating value, net 38.67 MJ, wet mass 1 kg, dry mass 0.998 kg, water content 0.00200401, carbon content, fossil 0.922579
- synthetic rubber: 0.88 kg; name rubber; lognormal variance with pedigree 0.003425, pedigree (1,4,2,2,2)
  Data from Yuan et al. 2016.
  properties: dry mass 1 kg, carbon content, fossil 0.871949, heating value, net 26.42 MJ, wet mass 1 kg
  note on carbon content, fossil: EPDM (Ethylene-propene-diene terpolymer) rubber is a terpolymer of ethylene, propene, and a diene with the residual unsaturated portion of the diene in the side chain (ecoinvent v2.2 report 7-part XX & Ullmann). Chemical formula (deduced from Evidences of Solvent-Induced Miscibility in Polychloroprene-co-Ethylene-Propene Diene Terpolymer Blends, Dubey et al., Journal of Applied Polymer Science, 2009, 111:1884–1891): C20H35
- cast iron: 0.92 kg; name iron; lognormal variance with pedigree 0.003425, pedigree (1,4,2,2,2)
  Used here in place of iron. Data from Yuan et al. 2016.
  properties: carbon content, fossil 0.04, dry mass 1 kg, wet mass 1 kg
  note on carbon content, fossil: Cast iron is made by remelting pig iron in small furnaces (e.g. cupola furnaces or electric arc furnaces) and poured into moulds to make castings. It usually contains 2% to 6% carbon (ecoinvent v2.2 report 10_partII). An average content of 4% was considered
- compressed air, 1000 kPa gauge: 0 m3; pedigree (1,1,1,1,1)
  Data from Yuan et al. 2016.
- energy and auxilliary inputs, metal working factory: 0 kg; pedigree (1,1,1,1,1)
  (same comment as for metal working factory)
- scrap aluminium: 0 kg; name BP_amount_3; pedigree (1,1,1,1,1)
  (same comment as for iron scrap, unsorted)
  production volume 0 kg
    Calculated from production volume of reference product using the relative outputs.
  property price 0 EUR2005; name BP_amount_3_price_EUR2005
  properties: wet mass 1 kg, dry mass 1 kg
- heat, district or industrial, other than natural gas: 19.26 MJ; lognormal variance with pedigree 0.003425, pedigree (1,4,2,2,2)
  Data from Yuan et al. 2016. Converted from kg of oil used for heating (0.46) to MJ of heat (19.26) using 'heat production, heavy fuel oil, at industrial furnace 1MW, GLO' [accessed 20 January 2018].
  properties: heating value, net 1 MJ, corresponding fuel use, propane, furnace >100kW 1.05263 MJ
  note on corresponding fuel use, propane, furnace >100kW: Lower heating value of the fuel input related to the heat/electricity output, taken directly from ecoinvent v3.0 dataset "heat production, natural gas, at industrial furnace >100kW, GLO 2000".
- trisodium phosphate: 0.5204 kg; name phosphate; lognormal variance with pedigree 0.003425, pedigree (1,4,2,2,2)
  Used herein place of phosphating agent, degreaser and surface conditioning agent. In terms of outputs assumed to have gone to wastewater. Data from Yuan et al. 2016.
- epoxy resin, liquid: 0 kg; name resin; pedigree (1,1,1,1,1)
  Data from Yuan et al. 2016. In terms of outputs assumed to have gone to waste PVC.
  properties: wet mass 1 kg, dry mass 1 kg, heating value, net 12.82 MJ, carbon content, fossil 0.42325
- seal, natural rubber based: 0.01 kg; name seal; lognormal variance with pedigree 0.003425, pedigree (1,4,2,2,2)
  Data from Yuan et al. 2016.
  properties: wet mass 1 kg, carbon content, non-fossil 0.881625, heating value, net 26.71 MJ, dry mass 1 kg
- scrap steel: 0 kg; name BP_amount_1; pedigree (1,1,1,1,1)
  (same comment as for iron scrap, unsorted)
  production volume 0 kg
    Calculated from production volume of reference product using the relative outputs.
  property price 0 EUR2005; name BP_amount_1_price_EUR2005
  properties: dry mass 1 kg, wet mass 1 kg
- polypropylene, granulate: 7.47 kg; name PP; lognormal variance with pedigree 0.003425, pedigree (1,4,2,2,2)
  Data from Yuan et al. 2016.
  properties: wet mass 1 kg, dry mass 1 kg, carbon content, fossil 0.857143, heating value, net 32.78 MJ
  note on heating value, net: Value extracted from "treatment of waste polypropylene, open burning"
- aluminium, cast alloy: 5.76 kg; name aluminium; lognormal variance with pedigree 0.003425, pedigree (1,4,2,2,2)
  Data from Yuan et al. 2016.
  properties: wet mass 1 kg, dry mass 1 kg
- waste polypropylene: 0 kg; name BP_amount_2; pedigree (1,1,1,1,1)
  (same comment as for iron scrap, unsorted)
  production volume 0 kg
    Calculated from production volume of reference product using the relative outputs.
  property price 0 EUR2005; name BP_amount_2_price_EUR2005
  properties: heating value, net 32.78 MJ, carbon content, fossil 0.825208, wet mass 1 kg, water content 0.189061, dry mass 0.841 kg
  note on heating value, net: Value assumed for all polypropylene products. Source: Phyllis2, database for (treated) biomass, algae, feedstocks for biogas production and biochar, https://phyllis.nl/Biomass/View/1186, ECN.TNO
- waste polyvinylchloride: 0 kg; name BP_amount_4; pedigree (1,1,1,1,1)
  (same comment as for iron scrap, unsorted)
  production volume 0 kg
    Calculated from production volume of reference product using the relative outputs.
  property price 0 EUR2005; name BP_amount_4_price_EUR2005
  properties: dry mass 0.998 kg, water content 0.00200401, heating value, net 21.51 MJ, carbon content, fossil 0.440882, wet mass 1 kg
- scrap copper: 0 kg; name BP_amount_5; pedigree (1,1,1,1,1)
  (same comment as for iron scrap, unsorted)
  production volume 0 kg
    Calculated from production volume of reference product using the relative outputs.
  property price 0 EUR2005; name BP_amount_5_price_EUR2005
  properties: dry mass 1 kg, wet mass 1 kg
- polystyrene, general purpose: 0.5 kg; name PS; lognormal variance with pedigree 0.003425, pedigree (1,4,2,2,2)
  Data from Yuan et al. 2016.
  properties: wet mass 1 kg, heating value, net 38.67 MJ, dry mass 1 kg, carbon content, fossil 0.923077
- steam, in chemical industry: 0 kg; pedigree (1,1,1,1,1)
  Data from Yuan et al. 2016.
  properties: wet mass 1 kg, dry mass 1 kg
- waste glass: 0 kg; name BP_amount_7; pedigree (1,1,1,1,1)
  (same comment as for iron scrap, unsorted)
  production volume 0 kg
    Calculated from production volume of reference product using the relative outputs.
  property price 0 EUR2005; name BP_amount_7_price_EUR2005
  properties: wet mass 1 kg, heating value, net 0.05 MJ, dry mass 1 kg
  note on heating value, net: Value extracted from "treatment of waste glass, open dump, very wet infiltration class (1000mm)"
- steel, low-alloyed, hot rolled: 31.099 kg; name steel; lognormal variance with pedigree 0.003425, pedigree (1,4,2,2,2)
  Data from Yuan et al. 2016.
  properties: dry mass 1 kg, carbon content, fossil 0.005, wet mass 1 kg
  note on carbon content, fossil: Low alloyed steel composition given in Tab. 3.2 ecoinvent v2.2 report 10_partII. Steel assumed to have a C content of 0.5%
- waste plastic, mixture: 0 kg; name BP_amount_14; pedigree (1,1,1,1,1)
  Data from Yuan et al. 2016. Represents here waste ABS.
  production volume 0 kg
    Calculated from production volume of reference product using the relative outputs.
  property price 0 EUR2005; name BP_amount_14_price_EUR2005
  properties: dry mass 0.847 kg, carbon content, fossil 0.747344, water content 0.180638, wet mass 1 kg, heating value, net 30.79 MJ
- polyethylene, low density, granulate: 0.2 kg; name PE; lognormal variance with pedigree 0.003425, pedigree (1,4,2,2,2)
  Data from Yuan et al. 2016.
  properties: carbon content, fossil 0.857143, dry mass 1 kg, wet mass 1 kg, heating value, net 42.47 MJ
- acrylonitrile-butadiene-styrene copolymer: 21.25 kg; name ABS; lognormal variance with pedigree 0.003425, pedigree (1,4,2,2,2)
  Data from Yuan et al. 2016. In terms of outputs, assumed to have gone to 'waste plastic, mixture'.
  properties: dry mass 1 kg, wet mass 1 kg, heating value, net 35.58 MJ, carbon content, fossil 0.853081
- used cable: -0.63 kg; name BP_amount_9; = (cable)*-1; lognormal variance with pedigree 0.003425, pedigree (1,4,2,2,2)
  (same comment as for iron scrap, unsorted)
  production volume 4.02381e7 kg; = RP_PV_1 * (BP_amount_9 / RP_amount_1)
    Calculated from production volume of reference product using the relative outputs.
  property price 0 EUR2005; name BP_amount_9_price_EUR2005
  properties: carbon content, fossil 0.27472, wet mass 1 kg, dry mass 1 kg
  note on carbon content, fossil: According to the European company, 1 kg cable is split up into 0.66 kg of copper and 0.34 kg of plastics (ecoinvent v2.2 report 18_V, pg 97). Plastic C content (0.808) was calculated using data in Tab A.2, ecoinvent v2.2 report 13_I.
- electricity, high voltage: 134.41 kWh; lognormal variance with pedigree 0.003425, pedigree (1,4,2,2,2)
  Data from Yuan et al. 2016.
- concrete block: 0 kg; name concrete; pedigree (1,1,1,1,1)
  Data from Yuan et al. 2016. In terms of outputs assumed to have gone to inert waste.
  properties: dry mass 1 kg, wet mass 1 kg
- inert waste: 0 kg; name BP_amount_15; pedigree (1,1,1,1,1)
  Data from Yuan et al. 2016. The amount is set equal to the input amount for the respective material, concrete block.
  production volume 0 kg
    Calculated from production volume of reference product using the relative outputs.
  property price 0 EUR2005; name BP_amount_15_price_EUR2005
  properties: dry mass 1 kg, wet mass 1 kg
- iron scrap, unsorted: -0.92 kg; lognormal variance with pedigree 0.003425, pedigree (1,4,2,2,2)
  (same comment as for iron scrap, unsorted)
  production volume 5.87604e7 kg
  properties: wet mass 1 kg, dry mass 1 kg
- waste packaging paper: -1.45 kg; lognormal variance with pedigree 0.003425, pedigree (1,4,2,2,2)
  (same comment as for waste packaging paper)
  production volume 9.26115e7 kg
- flat glass, uncoated: 0.307371, 1.49263 kg (2 entries); lognormal variance with pedigree 0.003425, pedigree (1,4,2,2,2)
  Data from Yuan et al. 2016.
- nylon 6: 0.0330592, 0.0669408 kg (2 entries); lognormal variance with pedigree 0.003425, pedigree (1,4,2,2,2)
  Data from Yuan et al. 2016. In terms of outputs assumed to have gone to waste PE.
- waste polyethylene: -0.0288764, -0.0022262, -0.000919501, -0.000873152, -0.0333183, -0.000371468, -0.000168364, -0.233247 kg (8 entries); lognormal variance with pedigree 0.003425, pedigree (1,4,2,2,2)
  (same comment as for waste polyethylene)
  production volume 1.9161e7 kg
- wastewater, average: -0.00359331, -0.000388728, -0.00751797 m3 (3 entries); lognormal variance with pedigree 0.003425, pedigree (1,4,2,2,2)
  (same comment as for wastewater, average)
  production volume 734505 m3
- waste rubber, unspecified: -0.435852, -0.018297, -0.435852 kg (3 entries); lognormal variance with pedigree 0.003425, pedigree (1,4,2,2,2)
  (same comment as for waste rubber, unspecified)
  production volume 5.68443e7 kg
- kraft paper: 0.152286, 1.14771 kg (2 entries); lognormal variance with pedigree 0.003425, pedigree (1,4,2,2,2)
  Data from Yuan et al. 2016.
- waste polystyrene: -0.0481273, -0.00371034, -0.0015325, -0.00145525, -0.0555305, -0.000619113, -0.000280607, -0.388744 kg (8 entries); lognormal variance with pedigree 0.003425, pedigree (1,4,2,2,2)
  (same comment as for iron scrap, unsorted)
  production volume 3.1935e7 kg
- compressed air, 1000 kPa gauge: 1.07014, 2.62986 m3 (2 entries); lognormal variance with pedigree 0.003425, pedigree (1,4,2,2,2)
  Data from Yuan et al. 2016.
- energy and auxilliary inputs, metal working factory: 6.26328e-9, 2.80867e-8 kg (2 entries); lognormal variance with pedigree 0.003425, pedigree (1,4,2,2,2)
  (same comment as for metal working factory)
- scrap aluminium: -1.82712, -0.0857241, -3.84716 kg (3 entries); lognormal variance with pedigree 0.003425, pedigree (1,4,2,2,2)
  (same comment as for iron scrap, unsorted)
  production volume 3.67891e8 kg
- epoxy resin, liquid: 0.029058, 0.137942 kg (2 entries); lognormal variance with pedigree 0.003425, pedigree (1,4,2,2,2)
  Data from Yuan et al. 2016. In terms of outputs assumed to have gone to waste PVC.
- scrap steel: -7.57246, -0.00959403, -23.5169 kg (3 entries); lognormal variance with pedigree 0.003425, pedigree (1,4,2,2,2)
  (same comment as for iron scrap, unsorted)
  production volume 1.98629e9 kg
- waste polypropylene: -0.719022, -0.0554324, -0.0228956, -0.0217415, -0.829626, -0.00924955, -0.00419226, -5.80784 kg (8 entries); lognormal variance with pedigree 0.003425, pedigree (1,4,2,2,2)
  (same comment as for iron scrap, unsorted)
  production volume 4.77109e8 kg
- waste polyvinylchloride: -0.115217, -0.00888254, -0.00366881, -0.00348388, -0.13294, -0.00148216, -0.000671772, -0.930654 kg (8 entries); lognormal variance with pedigree 0.003425, pedigree (1,4,2,2,2)
  (same comment as for iron scrap, unsorted)
  production volume 7.64524e7 kg
- scrap copper: -0.574146, -0.0269377, -1.20892 kg (3 entries); lognormal variance with pedigree 0.003425, pedigree (1,4,2,2,2)
  (same comment as for iron scrap, unsorted)
  production volume 1.15605e8 kg
- steam, in chemical industry: 0.205343, 1.16466 kg (2 entries); lognormal variance with pedigree 0.003425, pedigree (1,4,2,2,2)
  Data from Yuan et al. 2016.
- waste glass: -0.274013, -0.0132955, -0.00124045, -0.00555056, -0.144253, -0.00188369, -0.00030163, -1.35946 kg (8 entries); lognormal variance with pedigree 0.003425, pedigree (1,4,2,2,2)
  (same comment as for iron scrap, unsorted)
  production volume 1.14966e8 kg
- waste plastic, mixture: -2.04541, -0.157689, -0.0651313, -0.0618483, -2.36005, -0.0263123, -0.0119258, -16.5216 kg (8 entries); lognormal variance with pedigree 0.003425, pedigree (1,4,2,2,2)
  Data from Yuan et al. 2016. Represents here waste ABS.
  production volume 1.35724e9 kg
- concrete block: 0.00154, 0.0034, 0.19506 kg (3 entries); lognormal variance with pedigree 0.003425, pedigree (1,4,2,2,2)
  Data from Yuan et al. 2016. In terms of outputs assumed to have gone to inert waste.
- inert waste: -0.0441162, -0.000379959, -0.155504 kg (3 entries); lognormal variance with pedigree 0.004025, pedigree (2,4,2,2,2)
  (same comment as for inert waste)
  production volume 1.2774e7 kg

## Sampling procedure
Manufacturing data are taken from Yuan et al. 2016. Data on the annual production volume are taken from Michel et al. 2015. Sources: Yuan, Z., Zhang, Y., and Liu, X., 2016. Life cycle assessment of horizontal-axis washing machines in China. International Journal of Life Cycle Assessment, 21, 15-28. Michel, A., Josephy, B., Bush, E., et al. 2015. Monitoring the washing machines market in Europe. Discussion paper. Available from: http://www.topten.eu/uploads/File/EEDAL15_Anette_Michel_Monitoring_washing_machines_market.pdf (Accessed 20 January 2018).

## Extrapolations
This dataset has been extrapolated from year 2018 to the year of the calculation (2021). The uncertainty has been adjusted accordingly.
