# nitrous dioxide production

Dataset: EcoSpold 2, unit process
Geography: RoW
Time period: 2010-01-01 to 2021-12-31
Technology level: current
Classification: ISIC rev.4 ecoinvent: 2011:Manufacture of basic chemicals
Synonyms: NO2
Scenario: Business-as-Usual
System model: Allocation, cut-off by classification
Share of production covered: 100 %
Generated by: Jürgen Sutter
Database: ecoinvent
isCopyrightProtected: true
accessRestrictedTo: 1

## General comment
The process “nitrous dioxide, at plant, GLO" is modelled for the production of nitrous dioxide from nitrous oxide. Raw materials are modelled with a stoechiometric calculation. Emissions are estimated. Energy consumptions, infrastructure and transports are calculated with standard values.
Nitrogen dioxide (NO2; CAS 10102-44-0) is a brownish red, toxic gas with a pungent odour. It is in equilibrium with its dimer, dinitrogen tetroxide, also called nitrogen peroxide, N2O4. The equilibrium is strongly temperature dependent; at higher temperature (ca. 100 °C), it is shifted almost all the way toward nitrogen dioxide. Industrial production of NO2 – N2O4 employs the Ostwald process (catalytic combustion of ammonia) and constitutes the initial step in the production of nitric acid.

Oxidation of the nitrogen monoxide product to nitrogen dioxide or dinitrogen tetroxide:
The way in which these three steps are implemented characterizes the various nitric acid processes. In monopressure (single-pressure) processes, ammonia combustion and NOx absorption take place at the same working pressure. These include medium-pressure (230 – 600 kPa) and high-pressure (700 – 1100 kPa) processes. Very few plants currently employ low pressure (100 – 220 kPa) for both combustion and absorption.
In dual-pressure (split-pressure) processes, the absorption pressure is higher than the combustion pressure. Modern dual-pressure plants feature combustion at 400 – 600 kPa and absorption at 900 – 1400 kPa. Some older plants still employ atmospheric combustion and medium-pressure absorption.
Intensive work on ammonia combustion as well as the oxidation and absorption of nitrogen oxides has been well documented since the early 1920s. Up to now the combustion of ammonia has been considered as a heterogeneous catalytic surface reaction with undesirable side reactions. The oxidation of nitrogen monoxide is a rare example of a homogeneous third-order gas-phase reaction. The absorption of NOx is a heterogeneous reaction between fluid (i.e., gas and liquid) phases.

Oxidation of Ammonia
Over a suitable catalyst, 93 – 98 % of the feed ammonia is converted to nitrogen monoxide. The remainder participates in undesirable side reactions leading to dinitrogen monoxide and to nitrogen. Other undesirable reactions are the decomposition of the nitrogen monoxide product and its reaction with ammonia.

Oxidation and Absorption of Nitrogen Oxides
After the combustion of ammonia, the nitrogen monoxide product gas is cooled en route to absorption and, if necessary, compressed. As a result, part of the nitrogen monoxide is oxidized to nitrogen dioxide or dinitrogen tetroxide, which is converted to nitric acid by absorption in water.
Absorption is usually performed in plate columns where the nitrous gases are converted to nitric acid in the liquid phase on the plates. Nitrogen monoxide is constantly reformed in this step and prevents complete absorption of the inlet gases. Oxidation of nitrogen monoxide occurs mainly in the gas phases between the plates, but also in the gas phase of the bubble layer on them.
The gas phase is the site of nitrogen monoxide oxidation as well as nitrogen dioxide dimerization and dinitrogen trioxide formation

Reaction of the oxidized nitrogen oxides with water vapor leads to formation of nitrous and nitric acids. These reactions are of secondary importance from an engineering standpoint.
High-purity NO2 – N2O4 is obtained in the production of sodium nitrate from sodium chloride and nitric acid. The dioxide and tetroxide are strong oxidizing agents, comparable in strength to elemental bromine. They form explosive mixtures with hydrogen; mixtures with ammonia explode even at low temperature.
Frischknecht R., Jungbluth N., Althaus H.-J., Doka G., Dones R., Heck T., Hellweg S., Hischier R., Nemecek T., Rebitzer G. and Spielmann M. (2007) Overview and Methodology. Final report ecoinvent v2.0 No. 1. Swiss Centre for Life Cycle Inventories, Dübendorf, CH, retrieved from: www.ecoinvent.org.

Gendorf (2000) Umwelterklärung 2000, Werk Gendorf. Werk Gendorf, Burgkirchen as pdf-File under: http://www.gendorf.de/pdf/umwelterklaerung2000.pdf

Kim 2003 Kim S., Overcash M.: Energy in chemical manufacturing processes: gate-to-gate information for life cycle assessment. In: Journal of Chemical Technology & Biotechnology vol. 78, no. 9: 995-1005(11). 2003

Michael Thiemann, Erich Scheibler, Karl Wilhelm Wiegand: Nitric Acid, Nitrous Acid, and Nitrogen OxidesPublished online: 2003. In: Ullmann's Encyclopedia of Industrial Chemistry, Seventh Edition, 2004 Electronic Release (ed. Fiedler E., Grossmann G., Kersebohm D., Weiss G. and Witte C.). 7 th Electronic Release Edition. Wiley InterScience, New York, Online-Version under: DOI: 10.1002/14356007.a17_293

## Included activities end
production of nitrous dioxide including materials, energy uses, infrastructure, and emissions

## Geography
The inventory is modelled for the world.

## Technology
oxidation of nitrous oxide

## Time period
Time of publications

## Parameters
- fraction, cooling water, to air: 0.3875 dimensionless; name fraction_CW_to_air; = (0.5*fraction_CW_OT_to_air)+(0.5*fraction_CW_R_to_air); lognormal variance with pedigree 0.092025, pedigree (4,4,3,2,4)
  Calculated value based on literature value (see comments of the other parametres present in this dataset) and expert opinion. In the case when no industry/literature data are available about the type of cooling or directly fraction, cooling water, to air specific for the process a default assumption is applied. It is assumed that the once-through cooling system is used in 50% of all cases and recirculating system is used in another 50% of all cases.
- fraction, cooling water, once-through system, to air: 0.004 dimensionless; name fraction_CW_OT_to_air; lognormal variance with pedigree 0.0413, pedigree (2,3,1,3,1)
  Calculated based on literature value (Scown, C.D., 2011, Water Footprint of U.S. Transportation Fuels and supplying information of the article) (Vionnet, S., Quantis Water Database - Technical Report, 2012).
- fraction, cooling water, recirculating system, to air: 0.771 dimensionless; name fraction_CW_R_to_air; lognormal variance with pedigree 0.0413, pedigree (2,3,1,3,1)
  (same comment as for fraction, cooling water, once-through system, to air)
- fraction, cooling water, cooling pond system, to air: 0.032 dimensionless; name fraction_CW_CP_to_air; lognormal variance with pedigree 0.0413, pedigree (2,3,1,3,1)
  (same comment as for fraction, cooling water, once-through system, to air)

## Reference product
- nitrous dioxide: 1 kg; CPC 342: Basic inorganic chemicals n.e.c.; By-product classification allocatable product; CAS 10102-44-0
  EcoSpold01Location=RER
  production volume 6.7e6 kg
    Expert judgement
  property price 0.754584 EUR2005
    Calculated based on inputs: The price of the product has been calculated as a sum of the values of the material and energy inputs for this product. This value is therefore a rough estimation. It may underestimate the real price since there are additional expenses when producing any product. These expences can include for example labour costs, treatment of waste materials and profit for the producer. Please consider carefully whether this level of data quality is acceptable for your application.
  property carbon content, fossil 0
    Calculated based on molecular structure. See tab "chemicals".
  property carbon content 0
    carbon content on a dry matter basis (reserved; not for manual entry)
  properties: water content 0, water in wet mass 0 kg, wet mass 1 kg, dry mass 1 kg, carbon content, non-fossil 0, carbon allocation 0 kg

## Inputs from technosphere
- heat, from steam, in chemical industry: 1.13 MJ; lognormal variance with pedigree 0.0416, pedigree (1,2,5,1,1)
  EcoSpold01Location=RER
  Kim (2003) reports values for the energy consumption of nitrogen dioxide production.
  Uncertainty: Kim 2003
  properties: heating value, net 1 MJ
- nitrous oxide: 0.66548 kg; lognormal variance with pedigree 0.0335, pedigree (4,5,4,1,1)
  EcoSpold01Location=RER
  Ullmanns 2004 reports a yield of 98% for the production of nitrogen dioxide based on nitrous oxide.
  Uncertainty: Stoechiometric calculation
  properties: wet mass 1 kg, dry mass 1 kg
- oxygen, liquid: 0.34783 kg; lognormal variance with pedigree 0.0335, pedigree (4,5,4,1,1)
  Stoechiometric calculation
  EcoSpold01Location=RER
  Uncertainty: Stoechiometric calculation
  properties: dry mass 1 kg, wet mass 1 kg
- electricity, medium voltage: 0 kWh; pedigree (1,1,1,1,1)
  EcoSpold01Location=UCTE
  Kim (2003) reports values for the energy consumption of nitrogen dioxide production.
  Uncertainty: Kim 2003
- chemical factory, organics: 4e-10 unit; lognormal variance with pedigree 0.3184, pedigree (4,5,5,5,5)
  EcoSpold01Location=RER
  No information was readily available about infrastructure and land-use of production plants. Therefore, in this study, the infrastructure is estimated based on the module "chemical plant, organics". This module assumes a built area of about 4.2 ha, an average output of 50'000 t/a, and plant life of fifty years. For this study, the estimated value is 4.00 E-10 units per kg of produced chemical.
  Uncertainty: Estimation
- electricity, medium voltage: 0.000518212, 9.93707e-5, 0.00166823, 0.0242629, 0.00341987, 0.0111424 kWh (6 entries); lognormal variance with pedigree 0.0416, pedigree (1,2,5,1,1)
  (same comment as for electricity, medium voltage)

## Inputs from nature
- Water, cooling, unspecified natural origin [natural resource, in water]: 0.024 m3; name water_cooling_UNO_input; lognormal variance with pedigree 0.0335, pedigree (4,5,4,1,1)
  There was no information available on the amount of cooling water used within the plant. In order not to neglect the process cooling water demand this value was approximated with data from an large chemical plant site in Germany producing 2.05 Mt a-1 (intermediates included) of different chemicals (Gendorf 2000). In this plant in total an average 24 kg water per kg of product were used for. This value was used in this inventory as approximation for the cooling water consumption.
  There was no information available on the amount of cooling water used within the plant. In order not to neglect the process cooling water demand this value was approximated with data from an large chemical plant site in Germany producing 2.05 Mt a-1 (intermediates included) of different chemicals (Gendorf 2000). In this plant in total an average 24 kg water per kg of product were used for. This value was used in this inventory as approximation for the cooling water consumption.
  Uncertainty: Estimation

## Emissions to nature
- Water [air, unspecified]: 0.0093 m3; name water_to_air_unspecified; = water_cooling_UNO_input*fraction_CW_to_air; lognormal variance with pedigree 0.130025, pedigree (4,4,5,2,4)
  Calculated value based on literature values and expert opinion. See comments in the parametres' comment field.
  property fraction, origin: salt water 0; name fraction_origin_salt_water
  property fraction, origin: unspecified 1; name fraction_origin_unspecified
  property fraction, origin: fresh water 0; name fraction_origin_fresh_water
- Water [water, unspecified]: 0.0147 m3; name water_to_water_unspecified; = water_cooling_UNO_input*(1-fraction_CW_to_air); lognormal variance with pedigree 0.130025, pedigree (4,4,5,2,4)
  (same comment as for Water)
  property fraction, origin: salt water 0; name fraction_origin_salt_water_Ww
  property fraction, origin: unspecified 1; name fraction_origin_unspecified_Ww
  property fraction, origin: fresh water 0; name fraction_origin_fresh_water_Ww
- Nitrogen oxides [air, urban air close to ground]: 0.001331 kg; lognormal variance with pedigree 0.1786, pedigree (4,5,5,5,5)
  There was no data available on process emissions to air for the nitrogen dioxide production. As approximation the air emissions occurring from the purge vent, the distillation vent and fugitive emission sources were estimated to 0.2% of the nitrous oxide input. The remaining amount of unreacted nitrous oxide is considered to be oxidated to nitrogen.
  Uncertainty: Estimation

## Sampling procedure
Literature data

## Extrapolations
Emissions are modelled with standard methods.
