# natural stone plate production, cut

Dataset: EcoSpold 2, unit process
Geography: CH
Time period: 2000-01-01 to 2021-12-31
Technology level: current
Classification: ISIC rev.4 ecoinvent: 2396:Cutting, shaping and finishing of stone
Classification: EcoSpold01Categories: construction materials/others
Tags: ConvertedDataset
Scenario: Business-as-Usual
System model: Allocation, cut-off by classification
Generated by: Daniel Kellenberger (obsolete)
Published in: Kellenberger D. 2007
Database: ecoinvent
isCopyrightProtected: true
accessRestrictedTo: 1

## General comment
The drilling for the mining process is assumed to be done with compressed air, which is produced with electricity. The sawing is assumed to be accomplished with diamond wires. The diamond losses are not taken into account even though they might be significant as no data on diamond production is available. The dust emissions are estimated based on the losses (volume of granite with a density of 2?750 kg/m3) by cutting a plate with the geometry 0.5 * 0.5 * 0.03 m and a weight of 20 kg. It is assumed that 95% of the dust is bound in the cooling water.
[This dataset was already contained in the ecoinvent database version 2. It was not individually updated during the transfer to ecoinvent version 3. Life Cycle Impact Assessment results may still have changed, as they are affected by changes in the supply chain, i.e. in other datasets. This dataset was generated following the ecoinvent quality guidelines for version 2. It may have been subject to central changes described in the ecoinvent version 3 change report (http://www.ecoinvent.org/database/ecoinvent-version-3/reports-of-changes/), and the results of the central updates were reviewed extensively. The changes added e.g. consistent water flows and other information throughout the database. The documentation of this dataset can be found in the ecoinvent reports of version 2, which are still available via the ecoinvent website. The change report linked above covers all central changes that were made during the conversion process.]

## Included activities end
Includes the raw material granite, the mining, sawing and cooling, the transports within the mine and to the regional storage in Switzerland and the infrastructure (machines). No administration, wastewater, wear and spare parts are included. Dust is accounted for.

## Geography
For some exchanges RER- and GLO-modules are used as proxy

## Technology
Typical technology for average Swiss production. Mining of boulders by direct separation from rock, whole to whole drilling, kerving wire saw, oxygen lance and water jet. Cutting by wire saw.

## Parameters
- weight: 20.625 kg; = volume_naturalstoneplate* density_naturalstoneplate
  Calculated value. Weight of the natural stone plate.
- volume: 0.0075 m3; name volume_naturalstoneplate; = 0.5*0.5*0.03
  Calculated value. Volume of the natural stone plate. The dimensions of natural stone plate are 0.5m*0.5m*0.03m.
- density: 2750 kg/m3; name density_naturalstoneplate
  Literature value. Density of the natural stone.
- fraction, process water, to air: 0.15 dimensionless; name fraction_PW_to_air; lognormal variance with pedigree 0.092025, pedigree (4,4,3,2,4)
  Literature value. In case when no industry/process specific data are available, default evaporation fraction value is used. This value is 15% and is based on literature (Statistics Canada, 2007 & Shaffer, K.H., 2008, Consumptive water use in the Great Lakes Basin, USGS & Shiklomanov, 2003, World Water Resources at the Beginning of the 21st Century) and has been approved by an expert.
- surface: 0.56 m2; name surface_naturalstoneplate; = (0.5*0.5*2)+(0.5*0.03*4)
  Calculated value. Surface of the natural stone plate. The dimensions of natural stone plate are 0.5m*0.5m*0.03m.

## Reference product
- natural stone plate, cut: 1 kg; By-product classification allocatable product; CPC 37690: Other worked monumental or building stone and articles thereof; other artificially coloured granules, chipping[…]
  production volume 0.0336675 kg
    This is a placeholder value that does not reflect real-world production volumes. This dataset does not currently require a real-world production volume to work in the database framework, and no actual data were collected yet. This has no negative effect on the results of the ecoinvent database. The placeholder value of this activity was scaled according to the nominal GDP of 2005 (source: United Nations, http://data.un.org/Glossary.aspx?q=GDP+%28current+US%24%29, accessed 20130726) to reflect an appropriate share of the global production volume, which is also a placeholder value.
  property price 0.148 EUR2005
    Calculated value based on data from United Nations Commodity Trade Statistics Database (comtrade.un.org). UN comtrade category: 251611 Granite, crude or roughly trimmed. Year 2005. Using exchange rate of 1EURO = 1.209 USD. Average of price of import into 5 main markets (EU, US, JP, IN and CN).
  property carbon content, non-fossil 0
    granite (Potassium feldspar, plagioclase feldspar, and quartz)
  property carbon content, fossil 0
    granite (Potassium feldspar, plagioclase feldspar, and quartz)
  property carbon content 0
    carbon content on a dry matter basis (reserved; not for manual entry)
  properties: dry mass 1 kg, wet mass 1 kg, water in wet mass 0 kg, water content 0, carbon allocation 0 kg

## Inputs from technosphere
- electricity, medium voltage: 0.56 kWh; lognormal variance with pedigree 0.07, pedigree (1,1,5,1,1)
  composite
- limestone quarry infrastructure: 2e-10 unit; lognormal variance with pedigree 0.378025, pedigree (3,5,5,2,3)
  This exchange has an activity link directly to the producing activity because the product is primarily consumed in the same geographical area where it is produced.
- diesel, burned in building machine: 1.071 MJ; lognormal variance with pedigree 0.078, pedigree (3,5,5,1,3)
  properties: heating value, net 1 MJ

## Inputs from nature
- Water, river [natural resource, in water]: 0.00373 m3; name water_river_input; lognormal variance with pedigree 0.0767, pedigree (2,5,5,3,3)
- Granite, in ground [natural resource, in ground]: 1.38 kg; lognormal variance with pedigree 0.146, pedigree (5,5,5,1,3)

## Emissions to nature
- Water [air, unspecified]: 0.0005595 m3; name water_to_air_unspecified; = (water_river_input*fraction_PW_to_air); lognormal variance with pedigree 0.0807, pedigree (2,2,5,1,1)
  Calculated value based on literature values and expert opinion. See comments in the parametres' comment field.
  property fraction, origin: fresh water 1; name fraction_origin_fresh_water
  property fraction, origin: salt water 0; name fraction_origin_salt_water
  property fraction, origin: unspecified 0; name fraction_origin_unspecified
- Particulates, > 10 um [air, unspecified]: 0.0028 kg; = 0.05*0.15*(1/ weight)* surface_naturalstoneplate*0.01*0.5* density_naturalstoneplate; lognormal variance with pedigree 0.3206, pedigree (2,5,5,5,5)
  Calculated value.
  0.5 m*0.5 m*0.03 m are the dimensions of the natural stone plate
  0.56 m2 is the calculated surface of one natural stone plate
  0.0075 m3 is the calculated volume of the natural stone plate
  2750 kg/m3 is the density of the natural stone plate
  20.625 kg is the weight of one natural stone plate
  Values related to dust emission calculations;
  0.01m is the slitting width of the cut
  0.5 - half of each cutting losses is allocated to one plate
  0.15 - 0.55 - 0.3 is the ratio between different sizes of particles (>10microm - 2.5microm><10microm - <2.5microm)
  0.95 - 0.05 is the ratio between emissions which are bound and released to the water and those which are emitted to air
- Water [water, unspecified]: 0.0031705 m3; name water_to_water_unspecified; = water_river_input*(1-fraction_PW_to_air); lognormal variance with pedigree 0.0807, pedigree (2,2,5,1,1)
  (same comment as for Water)
  property dry mass 0 kg; name DM
  property fraction, origin: unspecified 0; name fraction_origin_unspecified_Ww
  property carbon content, fossil 0; name C_content_fossil
  property water in wet mass 1000 kg; name WWM
  property carbon content, non-fossil 0; name C_content_non_fossil
  property fraction, origin: salt water 0; name fraction_origin_salt_water_Ww
  property fraction, origin: fresh water 1; name fraction_origin_fresh_water_Ww
  property wet mass 1000 kg; name WM
- Particulates, > 2.5 um, and < 10um [air, unspecified]: 0.0102667 kg; = 0.05*0.55*(1/ weight)* surface_naturalstoneplate*0.01*0.5* density_naturalstoneplate; lognormal variance with pedigree 0.4006, pedigree (2,5,5,5,5)
  (same comment as for Particulates, > 10 um)
- Particulates, < 2.5 um [air, unspecified]: 0.0056 kg; = 0.05*0.3*(1/ weight)* surface_naturalstoneplate*0.01*0.5* density_naturalstoneplate; lognormal variance with pedigree 0.5806, pedigree (2,5,5,5,5)
  (same comment as for Particulates, > 10 um)

## Sampling procedure
Literature

## Extrapolations
This dataset has been extrapolated from year 2004 to the year of the calculation (2021). The uncertainty has been adjusted accordingly.

## Review by Emilia Moreno Ruiz 2013-09-18
PM emissions corrected

## Review by Rolf Frischknecht 2010-02-07
passed
