# cork slab production

Dataset: EcoSpold 2, unit process
Geography: RER
Time period: 2001-01-01 to 2021-12-31
Technology level: current
Classification: ISIC rev.4 ecoinvent: 0230:Gathering of non-wood forest products
Tags: Swiss brush-up completed; ConvertedDataset
Scenario: Business-as-Usual
System model: Allocation, cut-off by classification
Generated by: Frank Werner
Published in: Kellenberger D. 2007
Database: ecoinvent
isCopyrightProtected: true
accessRestrictedTo: 1

## General comment
this cork product is used e.g. as underlay for floating floorings or as insulation material.
[This dataset was already contained in the ecoinvent database version 2. It was not individually updated during the transfer to ecoinvent version 3. Life Cycle Impact Assessment results may still have changed, as they are affected by changes in the supply chain, i.e. in other datasets. This dataset was generated following the ecoinvent quality guidelines for version 2. It may have been subject to central changes described in the ecoinvent version 3 change report (http://www.ecoinvent.org/database/ecoinvent-version-3/reports-of-changes/), and the results of the central updates were reviewed extensively. The changes added e.g. consistent water flows and other information throughout the database. The documentation of this dataset can be found in the ecoinvent reports of version 2, which are still available via the ecoinvent website. The change report linked above covers all central changes that were made during the conversion process.]

## Included activities end
Includes the material and energy inputs to the production processes, transports of the material inputs and the available process emissions.

## Geography
production data for one major producer in Portugal used for Europe

## Technology
mix of continuous fabrication and fabrication in moulds and splitting (batch process)

## Reference product
- cork slab: 1 kg; CPC 31921: Natural cork, debacked or roughly squared, or in blocks, plates, sheets or strip; crushed, granulated or groun[…]; By-product classification allocatable product
  production volume 1.32237 kg
    This is a placeholder value that does not reflect real-world production volumes. This dataset does not currently require a real-world production volume to work in the database framework, and no actual data were collected yet. This has no negative effect on the results of the ecoinvent database. The placeholder value of this activity was scaled according to the nominal GDP of 2005 (source: United Nations, http://data.un.org/Glossary.aspx?q=GDP+%28current+US%24%29, accessed 20130726) to reflect an appropriate share of the global production volume, which is also a placeholder value.
  property price 2.96 EUR2005
    Calculated value based on data from United Nations Commodity Trade Statistics Database (comtrade.un.org). UN comtrade category: 4504 Agglomerated cork and articles thereof. Year 2005. Using exchange rate of 1EURO = 1.209 USD. Average of price of import into 5 main markets (EU, US, JP, IN and CN).
  property carbon content, non-fossil 0.54
    Average carbon contents of cork (54 %(w/w)). Calculated from average composition of cork and it's components (sources: www, Roempp, Uhlmann)
  property carbon content 0.54
    carbon content on a dry matter basis (reserved; not for manual entry)
  properties: dry mass 1 kg, water content 0, carbon content, fossil 0, water in wet mass 0 kg, wet mass 1 kg, carbon allocation 0.54 kg

## Inputs from technosphere
- wooden board factory, organic bonded boards: 1e-10 unit; lognormal variance with pedigree 0.5907, pedigree (1,3,5,3,1)
  linking to specific geographical region where infrastructure is located
  properties: UVEK_relative_amount_1 1, UVEK_link_8 4417, UVEK_link_1 4946, UVEK_relative_amount_8 6.9e7
  note on UVEK_relative_amount_1: to be used only in special submissions in coordination with ecoinvent and the Swiss FOEN
  note on UVEK_link_8: This link has been introduced to model transport specifically for the SAM model; to be used only in special submissions in coordination with ecoinvent and the Swiss FOEN.
  note on UVEK_relative_amount_8: Scaling factor = amount of transport in corresponding KBOB dataset (excluding the input of wood, assumed to be 95%)/amount of this input from technosphere. Source for transport distance: Life Cycle Inventories of Wood as Fuel and Construction Material/2007/Werner F. To be used only in special submissions in coordination with ecoinvent and the Swiss FOEN
- urea formaldehyde resin: 0.056 kg; lognormal variance with pedigree 0.0657, pedigree (1,3,5,3,1)
  input as adhesive (average glue mix of sample)
  properties: carbon content, fossil 0.408958, dry mass 1 kg, heating value, net 12.39 MJ, wet mass 1 kg, UVEK_link_1 4736, UVEK_relative_amount_1 1
  note on carbon content, fossil: Chemical formula of the urea formaldehide monomer was assumed to be C3H8N2O
- heat, district or industrial, other than natural gas: 4.92 MJ; lognormal variance with pedigree 0.0657, pedigree (1,3,5,3,1)
  heat for drying of glues
  property corresponding fuel use, propane, furnace >100kW 0 MJ; name fuel_use
  properties: heating value, net 1 MJ, UVEK_link_1 2538, UVEK_relative_amount_1 1
  note on corresponding fuel use, propane, furnace >100kW: Lower heating value of the fuel input related to the heat/electricity output, taken directly from ecoinvent v3.0 dataset 'heat production, natural gas, at industrial furnace >100kW, GLO 2000'.
- electricity, medium voltage: 1 kWh; lognormal variance with pedigree 0.0657, pedigree (1,3,5,3,1)
  electricity used in production
  properties: UVEK_relative_amount_1 1, UVEK_link_1 1779
- melamine formaldehyde resin: 0.056 kg; lognormal variance with pedigree 0.0657, pedigree (1,3,5,3,1)
  input as adhesive (average glue mix of sample)
  properties: dry mass 1 kg, UVEK_relative_amount_1 1, carbon content, fossil 0.311708, heating value, net 9.44 MJ, wet mass 1 kg, UVEK_link_1 2931
  note on carbon content, fossil: Chemical formula of the melamine formaldehide monomer was assumed to be C4H6N6O
- cork, raw: 1.06 kg; lognormal variance with pedigree 0.0657, pedigree (1,3,5,3,1)
  raw cork as raw material input
  properties: heating value, net 16.36 MJ, carbon content, non-fossil 0.54, wet mass 1 kg, dry mass 1 kg
  note on carbon content, non-fossil: Average carbon contents of cork (54 %(w/w)). Calculated from average composition of cork and it's components (sources: www, Roempp, Uhlmann)
- phenolic resin: 0.028 kg; lognormal variance with pedigree 0.0657, pedigree (1,3,5,3,1)
  input as adhesive (average glue mix of sample)
  properties: UVEK_link_1 3435, UVEK_relative_amount_1 1, wet mass 1 kg, carbon content, fossil 0.772277, dry mass 1 kg, heating value, net 33.57 MJ
  note on carbon content, fossil: (C6H5OH)-CH2-(C6H5OH) was considered to be the basic structure in phenolic resin (ecoinvent v2.2 report 8-part 61). C13H14O2, MW=202 g/mol

## Emissions to nature
- Formaldehyde [air, unspecified]: 0.00014 kg; lognormal variance with pedigree 0.2487, pedigree (4,3,5,3,1)
  formaldehyde emissions from adhesives

## Sampling procedure
literature

## Extrapolations
This dataset has been extrapolated from year 2001 to the year of the calculation (2021). The uncertainty has been adjusted accordingly.
