# sanforizing, textile

Dataset: EcoSpold 2, unit process
Geography: GLO
Time period: 2016-01-01 to 2021-12-31
Technology level: current
Classification: ISIC rev.4 ecoinvent: 1313:Finishing of textiles
Scenario: Business-as-Usual
System model: Allocation, cut-off by classification
Generated by: Mireille Faist Emmenegger
Published in: Cotton Inc 2017
Database: ecoinvent
isCopyrightProtected: true
accessRestrictedTo: 1

## General comment
Data collected from mostly vertically integrated mills on a global level. The activity begins with finished cotton and ends with cotton sanforized. It includes electricity, heat and water use.
This activity is modelled as a service and therefore does not include the fabric. It should be used with 1.005kg of fabric per kg sanforized fabric.
Sanforizing is a mechanical finishing proces. The purpose of a sanforizing machine or a shrinking machine is to pre-shrink, stabilize cotton fabrics and mixed cotton fabrics such as Denim. It is a method of stretching, shrinking and fixing the woven cloth in both length and width to reduce shrinkage which would otherwise occur after washing.

## Included activities start
The activity begins with finished cotton fabric. The data has been collected for a fabric of 236 grams per square meter.

## Included activities end
The activity ends with cotton sanforized.

## Reference product
- sanforizing, textile: 1 kg; name RefProd; By-product classification allocatable product; CPC 88213: Textile finishing services
  production volume 1.86578e11 kg; name PVRefProd; = 1492627500*(100/0.16)*0.2
    It is assumed that 20% of woven production is sanforized. Annual production volume of woven fabric was scaled based on GDP and the Bangladesh production volume, given the fact that Bangladesh accounts for approximately 0.16% of the Global GDP. Value from Bangladesh:
    Production volume was found in "The Fibre Year 2017". It is also assumed that 50% of it refers to woven fabric.
    Reference: The Fibre Year 2017, accessed https://www.thefiberyear.com/home/ on 4/4/2018
  property price 0.0531411 EUR2005; name RefProd_price_EUR2005
    Calculated based on inputs: The price of the product has been calculated as a sum of the values of the material and energy inputs for this product. This value is therefore a rough estimation. It may underestimate the real price since there are additional expenses when producing any product. These expences can include for example labour costs, treatment of waste materials and profit for the producer. Please consider carefully whether this level of data quality is acceptable for your application.

## Inputs from technosphere
- waste yarn and waste textile: -0.00527 kg; name BP_amount_2; lognormal variance with pedigree 0.0039, pedigree (2,3,3,3,1)
  production volume 9.83268e8 kg; = PVRefProd * (BP_amount_2 / RefProd)
    Calculated from production volume of reference product using the relative outputs.
  property price 0 EUR2005; name BP_amount_2_price_EUR2005
  properties: hydrogen content 0.06215, wet mass 1 kg, oxygen content 0.4933, carbon content, non-fossil 0.44455, dry mass 0.97917 kg, water content 0.0212731, heating value, net 13.14 MJ
- electricity, low voltage: 0.0219 kWh; lognormal variance with pedigree 0.0039, pedigree (2,3,3,3,1)
- heat, district or industrial, other than natural gas: 4.61 MJ; lognormal variance with pedigree 0.0039, pedigree (2,3,3,3,1)
  properties: corresponding fuel use, propane, furnace >100kW 1.05263 MJ, heating value, net 1 MJ
  note on corresponding fuel use, propane, furnace >100kW: Lower heating value of the fuel input related to the heat/electricity output, taken directly from ecoinvent v3.0 dataset "heat production, natural gas, at industrial furnace >100kW, GLO 2000".
- wastewater, unpolluted: 0 m3; name BP_amount_1; pedigree (1,1,1,1,1)
  60% of water to wastewater. The emissions in wastewater are specified separately.
  production volume 0 m3
    Calculated from production volume of reference product using the relative outputs.
  property price 0 EUR2005; name BP_amount_1_price_EUR2005
  properties: dry mass 0.337476 kg, carbon content, fossil 0.00178991, carbon content, non-fossil 0.00178991, wet mass 1000 kg, water content 2962.17
  note on carbon content, fossil: Assumed to be like in tap water. Bicarbonate content is 2.93 mol/m3. CO2 content is 0.1 mol/m3 (ecoinvent v2.2 report 8, Tab 93.1).
- tap water: 4.866 kg; name water; lognormal variance with pedigree 0.0039, pedigree (2,3,3,3,1)
  properties: wet mass 1 kg, water content 2962.17, dry mass 0.000337476 kg, carbon content, fossil 0.00178991
  note on carbon content, fossil: Bicarbonate content is 2.93 mol/m3. CO2 content is 0.1 mol/m3 (ecoinvent v2.2 report 8, Tab 93.1).
- wastewater, unpolluted: -2.33568e-5, -0.00289624 m3 (2 entries); lognormal variance with pedigree 0.0039, pedigree (2,3,3,3,1)
  60% of water to wastewater. The emissions in wastewater are specified separately.
  production volume 5.44734e8 m3

## Emissions to nature
- Oils, unspecified [water, unspecified]: 4.44e-5 kg; lognormal variance with pedigree 0.0039, pedigree (2,3,3,3,1)
  Primary data.
- Water [air, unspecified]: 1.9464 m3; = water*0.4; lognormal variance with pedigree 0.0039, pedigree (2,3,3,3,1)
  40% of water evaporated.
- Suspended solids, unspecified [water, unspecified]: 8.87e-5 kg; lognormal variance with pedigree 0.0039, pedigree (2,3,3,3,1)
  Primary data.

## Sampling procedure
Primary data collected through questionnaires.

## Extrapolations
This dataset has been extrapolated from year 2016 to the year of the calculation (2021). The uncertainty has been adjusted accordingly.
