# treatment of residue from mechanical treatment, industrial device, municipal incineration with fly ash extraction

Dataset: EcoSpold 2, unit process
Geography: CH
Time period: 2006-01-01 to 2021-12-31
Technology level: current
Classification: ISIC rev.4 ecoinvent: 3821:Treatment and disposal of non-hazardous waste
Synonyms: Kehrichtverbrennung; municipal waste incineration; Siedlungsabfallverbrennung
Scenario: Business-as-Usual
System model: Allocation, cut-off by classification
Share of production covered: 100 %
Generated by: Gabor Doka
Published in: Doka G. 2015
Database: ecoinvent
isCopyrightProtected: true
accessRestrictedTo: 1

## General comment
This dataset represents the activity of waste disposal of residue from mechanical treatment, industrial device in a municipal solid waste incinerator (MSWI) // Recommended use of this dataset: Only for incineration of shredder residues generated in the recycling (mechanical treatment) of industrial electronics // Inventoried waste contains 1.54% rubber; 37.7% Plastics from electronic consumer goods; 37.7% Plastics from electronic industrial goods; 22.4% MSWI iron scrap; 0.0742% Alu in MSW; 0.0767% Glass; 0.596% wiring copper; 0.0136% Pb in ASR inert; 0.00693% silver; . // Waste composition (wet, in ppm): upper heating value 27.76 MJ/kg; lower heating value 26.61 MJ/kg; H2O 6923; O 66293; H 57376; C 626590; S 490.55; N 10017; P 555.61; B n.a.; Cl 5261.7; Br 4142.5; F 188.3; I n.a.; Ag 69.307; As 5.6489; Ba 133.31; Cd 114.15; Co 22.202; Cr 308.3; Cu 11402; Hg 0.64022; Mn 542.24; Mo 2.2596; Ni 612.3; Pb 332.45; Sb 3658.7; Se 1.4759; Sn 302.82; V 56.507; Zn 622.94; Be 0.35141; Sc n.a.; Sr 62.199; Ti 3372; Tl 0.28113; W n.a.; Si 9434.4; Fe 183630; Ca 2399.8; Al 4830.6; K 88.123; Mg n.a.; Na 154.54; // Share of carbon in waste that is biogenic 0%. // Share of metals in waste not oxidised and bulk-recyclable (exclude very small or thin parts) Iron: 99.35%; Alu: 15.29%; Copper: 52.27%. // Recovery of metal scrap from bottom ash to recycling: 105.8g iron scrap, 0.21358g aluminium scrap, 1.8043g copper scrap. From this waste, the FLUWA process in the technology mix recovers 0.000705kg (DM) of a hydroxide sludge to be recycled in zinc furnaces. // Ultimately one kg of this waste produces 0.1986 kg of bottom ash (can include some washed ash) and 0.009189 kg of residues, which are landfilled (technology mix). Additional solidification of residues with 0.003675 kg of cement.Net energy production: 3.34MJ/kg electric energy and 6.61MJ/kg thermal energy. //

## Included activities start
waste incineration from waste reception gate and delivery into waste bunker at incinerator plant site (without transports to the incinerator)

## Included activities end
Waste-specific short-term emissions to water from leachate. Long-term emissions from landfill to ground water.

## Geography
Specific to the technology mix encountered in Switzerland in 2012.

## Technology
average Swiss MSWI plants in 2010 (grate incinerators) with electrostatic precipitator for fly ash (ESP), wet flue gas scrubber and 25% SNCR , 42.77% SCR-high dust , 32.68% SCR-low dust -DeNOx facilities and 0% without Denox (weighted according to mass of burnt waste, representing Swiss average). Efficiency of iron scrap separation from slag : 58%. Efficiency of non-ferrous scrap separation from slag : 31%. The technology mix for this dataset includes a filter ash treatment (FLUWA) of a share of 46.22%. Gross electric efficiency technology mix 15.84% and Gross thermal efficiency technology mix 28.51%

## Time period
Waste composition as given in literature reference, theoretical data or other source. Transfer coefficients for modern MSWI.

## Reference product
- residue from mechanical treatment, industrial device: -1 kg; name RP_amount_1; CPC 39: Wastes or scraps; By-product classification Waste
  Main reference product of this activity (supply of disposal service).
  production volume 2.7532e6 kg; name RP_PV_1
    based on corresponding global production volume of MSW fraction in conventional MSWI (wo fly ash extraction) and scaled down to annual Swiss incinerated MSW mass of 3.02 mio. tonnes.
  property heating value, net 26.62 MJ
    Value taken from the general comment of the treatment dataset.
  property price 0 EUR2005; name RP_amount_1_price_EUR2005
    Waste products are assigned a price of zero as they are assumed to require further treatment.
  property carbon content 0.63096
    carbon content on a dry matter basis (reserved; not for manual entry)
  properties: phosphorus content 0.00055948, oxygen content 0.066755, hydrogen content 0.057776, silver content 6.9791e-5, bromine content 0.0041714, fluorine content 0.00018961, sulfur content 0.00049397, arsenic content 5.6883e-6, chlorine content 0.0052984, barium content 0.00013424, nitrogen content 0.010087, lead content 0.00033477, mercury content 6.4469e-7, manganese content 0.00054602, copper content 0.011482, cadmium content 0.00011495, cobalt content 2.2357e-5, antimony content 0.0036842, selenium content 1.4862e-6, silicon content 0.0095001, nickel content 0.00061657, vanadium content 5.6901e-5, beryllium content 3.5386e-7, strontium content 6.2633e-5, titanium content 0.0033955, tin content 0.00030493, thallium content 2.8309e-7, chromium content 0.00031045, molybdenum content 2.2753e-6, calcium content 0.0024165, zinc content 0.00062728, sodium content 0.00015562, aluminium content 0.0048643, iron content 0.18491, water content 0.0069713, potassium content 8.8737e-5, carbon content, fossil 0.63096, wet mass 1 kg, water in wet mass 0.006923 kg, dry mass 0.99308 kg, carbon allocation 0.626594 kg

## By-products
All rows: pedigree (1,1,1,1,1)
- heat, for reuse in municipal waste incineration only: 0 MJ; name E_th_prod_MSWI; By-product classification allocatable product; CPC 17300: Steam and hot water
  Net useful heat generated from this waste and used in internal MSWI plant energy redistribution.
  Uncertainty: uncertainty is calculated from uncertainties in waste composition and uncertainties in energy efficiency and the uncertainty in internal energy demand
  production volume 1.8207e7 MJ
    calculated in proportion to reference product waste input to incinerator
  property true value relation 0.1842; name E_th_prod_MSWI_true_value_relation
    property to calculate "true value" from
  property price 0.0106 EUR2005; name E_th_prod_MSWI_price_EUR2005
    Average European district heat price from Ecoheatcool and Euroheat 2005-2006, Ecoheat Work package 1: The European heat market. Final report. 10.6 EUR/GJ i s the price of district heat. http://www.solarthermalworld.org/files/Ecoheatcool%20WP1%20Web.pdf?download
  property exergy 0.1842 MJ; name E_th_prod_MSWI_exergy
    This exergy property is based on the exergy content of the product.
- electricity, for reuse in municipal waste incineration only: 0 kWh; name E_el_prod_MSWI; CPC 17100: Electrical energy; By-product classification allocatable product
  Net electricity generated from this waste and used in internal MSWI plant energy redistribution.
  Uncertainty: uncertainty is calculated from uncertainties in waste composition and uncertainties in energy efficiency and the uncertainty in internal energy demand
  production volume 2.5565e6 kWh
    calculated in proportion to reference product waste input to incinerator
  property price 0.1 EUR2005; name E_el_prod_MSWI_price_EUR2005
    Estimated to be the same price as in case of electricity, medium voltage.
  property true value relation 3.6; name E_el_prod_MSWI_true_value_relation
    property to calculate "true value" from
  property exergy 3.6 MJ; name E_el_prod_MSWI_exergy
    This exergy property is based on the exergy content of the product.
- iron scrap, sorted, pressed: 0 kg; CPC 39310: Slag, dross, scalings and other waste from the manufacture of iron or steel; By-product classification Recyclable
  Iron scrap recovered from this waste.
  Uncertainty: uncertainty calculated from uncertainty in waste composition, uncertainty of share of recyclable metal, uncertainty of transfer coefficient to bottom ash, uncertainty of the efficiency of scrap removal in MSWI plant.
  production volume 0 kg
    calculated in proportion to reference product waste input to incinerator
  property price 0.175 EUR2005
    Temporary price data. Calculated as 90% of purchasers price based on: 2005 import and export prices (total trades (USD) divided by total weight (kg) in biggest economies of the world: EU27, USA, Brasil, China, India, Japan and Russia) from UN Commodity Trade Statistics Database (http://data.un.org/Explorer.aspxDatabase [Accessed 2011.06.20]). Commodity: Waste or scrap, of cast iron
  property carbon content 0
    carbon content on a dry matter basis (reserved; not for manual entry)
  properties: wet mass 1 kg, dry mass 1 kg, water in wet mass 0 kg, carbon content, fossil 0, carbon content, non-fossil 0, water content 0, carbon allocation 0 kg
- aluminium scrap, post-consumer, prepared for melting: 0 kg; By-product classification Recyclable; CPC 39363: Waste and scrap of aluminium
  Aluminium scrap recovered from this waste.
  Uncertainty: uncertainty calculated from uncertainty in waste composition, uncertainty of share of recyclable metal, uncertainty of transfer coefficient to bottom ash, uncertainty of the efficiency of scrap removal in MSWI plant.
  production volume 0 kg
    calculated in proportion to reference product waste input to incinerator
  property price 0.806 EUR2005
    Temporary price data. Calculated as 90% of purchasers price based on: 2005 import and export prices (total trades (USD) divided by total weight (kg) in biggest economies of the world: EU27, USA, Brasil, China, India, Japan and Russia) from UN Commodity Trade Statistics Database (http://data.un.org/Explorer.aspxDatabase [Accessed 2011.06.17]). Commodity: Waste or scrap, aluminium
  property carbon content 0
    carbon content on a dry matter basis (reserved; not for manual entry)
  properties: water content 0, wet mass 1 kg, water in wet mass 0 kg, carbon content, fossil 0, dry mass 1 kg, carbon content, non-fossil 0, carbon allocation 0 kg
- copper scrap, sorted, pressed: 0 kg; CPC 39361: Waste and scrap of copper; By-product classification Recyclable
  Copper scrap recovered from this waste.
  Uncertainty: uncertainty calculated from uncertainty in waste composition, uncertainty of share of recyclable metal, uncertainty of transfer coefficient to bottom ash, uncertainty of the efficiency of scrap removal in MSWI plant.
  production volume 0 kg
    calculated in proportion to reference product waste input to incinerator
  property price 2.84 EUR2005
    Temporary price data. Calculated as 90% of purchasers price based on: Source: USGS Mineral Yearbook 2007, Table 1 in <http://minerals.usgs.gov/minerals/pubs/commodity/recycle/myb1-2007-recyc.pdf>
  property carbon content 0
    carbon content on a dry matter basis (reserved; not for manual entry)
  properties: water content 0, water in wet mass 0 kg, dry mass 1 kg, wet mass 1 kg, carbon content, fossil 0, carbon content, non-fossil 0, carbon allocation 0 kg
- metalliferous hydroxide sludge: 0 kg; By-product classification Recyclable; CPC 1429: Other non-ferrous metal ores and concentrates (other than uranium or thorium ores and concentrates)
  Metalliferous hydroxide sludge from filter ash leaching (FLUWA).
  Uncertainty: uncertainty is calculated from uncertainties in waste composition and transfer coefficients to filter ash in incinerator and the uncertainty of the transfer coefficients of the FLUWA process.
  production volume 0 kg
    calculated in proportion to reference product waste input to incinerator
  property price 0.0042 EUR2005
    World market value of manure, deflated with barley world market price and consumer price index, based on [http://www.gov.pe.ca/photos/original/af_NM_manconv.pdf].
  property heating value, net 0 MJ
    Non combustible products are assumed to have an LHV equal to zero (0).
  property carbon content 0.046248
    carbon content on a dry matter basis (reserved; not for manual entry)
  properties: manganese content 7.5369e-6, antimony content 0.055615, nickel content 0.00049844, titanium content 0.00039242, beryllium content 7.4519e-6, selenium content 2.2243e-5, lead content 0.0028447, zinc content 0.14459, vanadium content 4.5659e-6, tin content 0.00019145, strontium content 1.0066e-6, molybdenum content 0.00019651, iron content 0.0001861, calcium content 0.033552, thallium content 4.0315e-6, carbon content, fossil 0.046248, water content 3, sodium content 0.0012247, silicon content 0.00016789, aluminium content 0.00017675, potassium content 0.00079545, oxygen content 0.32321, water in wet mass 0.75 kg, wet mass 1 kg, dry mass 0.25 kg, cadmium content 0.054867, sulfur content 0.027969, chlorine content 0.17415, phosphorus content 0.01049, bromine content 0.1161, chromium content 0.00026895, arsenic content 7.4267e-5, cobalt content 0.00077723, fluorine content 0.003898, barium content 5.3244e-5, mercury content 1.6554e-6, copper content 0.0014184, carbon allocation 0.011562 kg

## Inputs from technosphere
- titanium dioxide: 0.00011237 kg; lognormal variance with pedigree 1.0494, pedigree (1,1,4,1,1)
  Input to DeNOx stage (TiO2 catalyst carrier)
  Uncertainty: uncertainty calculated from uncertainty in average DeNOx input, uncertainty in the share of thermal NOx, uncertainty of nitrogen content in average municipal waste and the uncertainty in nitrogen content in *this* waste.
  properties: dry mass 1 kg, wet mass 1 kg
- chromium oxide, flakes: 2.2933e-6 kg; lognormal variance with pedigree 1.0494, pedigree (1,1,4,1,1)
  Input to DeNOx stage. Active component in SCR catalyst (vanadium pentoxide, V2O5), here approximated with the available chromium trioxide.
  Uncertainty: uncertainty calculated from uncertainty in average DeNOx input, uncertainty in the share of thermal NOx, uncertainty of nitrogen content in average municipal waste and the uncertainty in nitrogen content in *this* waste.
  properties: wet mass 1 kg, dry mass 1 kg
- hydrogen peroxide, without water, in 50% solution state: 0.00062324 kg; lognormal variance with pedigree 0.096033, pedigree (1,1,4,1,1)
  Auxilliary oxidising agent for filter ash treatment (FLUWA).
  Uncertainty: uncertainty calculated from uncertainty in of transfer coefficients in the incinerator, and the uncertainty of the waste composition of this waste
  properties: dry mass 1 kg, wet mass 1 kg, heating value, net 7.13 MJ
- cationic resin: 3.2448e-6 kg; lognormal variance with pedigree 1.6338, pedigree (1,1,4,1,1)
  Auxilliary input for mercury removal in filter ash treatment (FLUWA).
  Uncertainty: uncertainty calculated from uncertainty in of transfer coefficients in the incinerator, and the uncertainty of the waste composition of this waste
  properties: dry mass 0.5 kg, wet mass 1 kg, carbon content, fossil 0.521606, heating value, net 6.68 MJ, water content 1
- water, decarbonised: 1.5576 kg; lognormal variance with pedigree 0.27998, pedigree (1,1,4,1,1)
  Incinerator process water used in flue gas scrubber stage.
  Uncertainty: uncertainty calculated from uncertainty in average water input, and the uncertainty of the waste composition of this waste
  properties: wet mass 1 kg
- municipal waste incineration facility: 2.5e-10 unit
  Demands per kilogram waste.
- process-specific burdens, slag landfill: 0.19862 kg; lognormal variance with pedigree 0.033736, pedigree (1,1,4,1,1)
  Mass-specific expenditures required for landfilling of bottom ash.;activityLink introduced to establish a direct link to the corresponding regional supply of this product
  Uncertainty: uncertainty is calculated from uncertainties in waste composition and transfer coefficients in incinerator
- sodium hydroxide, without water, in 50% solution state: 0.00090591 kg; lognormal variance with pedigree 0.20161, pedigree (1,1,4,1,1)
  Auxilliary inputs for the flue gas treatment stage of the incinerator plant, and partially in the filter ash treatment (FLUWA).
  Uncertainty: uncertainty calculated from uncertainty in average NaOH input, of transfer coefficients in the incinerator, and the uncertainty of the waste composition of this waste
  properties: heating value, net 3.03 MJ, dry mass 1 kg, wet mass 1 kg
- quicklime, milled, packed: 0.0028818 kg; lognormal variance with pedigree 0.40803, pedigree (1,1,4,1,1)
  Auxilliary inputs for the flue gas treatment stage of the incinerator plant.
  Uncertainty: uncertainty calculated from uncertainty in average CaO input, of transfer coefficients in the incinerator, and the uncertainty of the waste composition of this waste
  properties: dry mass 0.99 kg, water content 0.010101, wet mass 1 kg
- hydrochloric acid, without water, in 30% solution state: 0.00027941 kg; lognormal variance with pedigree 0.079229, pedigree (1,1,4,1,1)
  Auxilliary inputs for the wastewater treatment stage of the incinerator plant.
  Uncertainty: uncertainty calculated from uncertainty in average HCl input, of transfer coefficients in the incinerator, and the uncertainty of the waste composition of this waste
  properties: wet mass 1 kg, dry mass 1 kg, heating value, net 3.32 MJ
- iron (III) chloride, without water, in 40% solution state: 5.6211e-5 kg; lognormal variance with pedigree 0.27998, pedigree (1,1,4,1,1)
  Auxilliary inputs for the wastewater treatment stage of the incinerator plant.
  Uncertainty: uncertainty calculated from uncertainty in average FeCl3 input, of transfer coefficients in the incinerator, and the uncertainty of the waste composition of this waste
  properties: dry mass 1 kg, wet mass 1 kg
- chemical, organic: 2.1765e-5 kg; lognormal variance with pedigree 0.77502, pedigree (1,1,4,1,1)
  Auxilliary inputs for the wastewater treatment stage of the incinerator plant. Proxy for (pure) Trisodium-trimercapto-s-triazine (CAS 17766-26-6), used as 15% diluted solution, aka TMT15.
  Uncertainty: uncertainty calculated from uncertainty in average TMT15 input, of transfer coefficients in the incinerator, and the uncertainty of the waste composition of this waste
  properties: dry mass 1 kg, carbon content, fossil 0.628, wet mass 1 kg, heating value, net 19.03 MJ
- chemical, inorganic: 0.00013139 kg; lognormal variance with pedigree 0.23449, pedigree (1,1,4,1,1)
  Auxilliary inputs for the wastewater treatment stage of the incinerator plant. Proxy for Polyelectrolyte.
  Uncertainty: uncertainty calculated from uncertainty in average Polyelectrolyte input, of transfer coefficients in the incinerator, and the uncertainty of the waste composition of this waste
  properties: wet mass 1 kg, carbon content, fossil 0.003, dry mass 1 kg
- cement, unspecified: 0.0036754 kg; lognormal variance with pedigree 0.073465, pedigree (1,1,4,1,1)
  Cement required for solidification of landfilled residual material.
  Uncertainty: Uncertainty calculated from uncertainty of the waste composition of this waste, of transfer coefficients in the incinerator and of the solidification recipe.
  properties: dry mass 1 kg, wet mass 1 kg
- waste cement, hydrated: -0.0091886 kg; lognormal variance with pedigree 0.073465, pedigree (1,1,4,1,1)
  Hydrated cement output for solidification of landfilled residual material.
  Uncertainty: Uncertainty calculated from uncertainty of the waste composition of this waste and transfer coefficients in the incinerator and of the solidification recipe.
  production volume 25298 kg
    calculated in proportion to reference product waste input to incinerator
  properties: dry mass 1 kg, wet mass 1 kg
- slag landfill: 3.531e-10 unit; lognormal variance with pedigree 0.033736, pedigree (1,1,4,1,1)
  Landfill infrastructure required for landfilling of bottom ash.
  Uncertainty: uncertainty is calculated from uncertainties in waste composition and transfer coefficients in incinerator
- transport, freight, lorry, unspecified: 0.0085093 metric ton*km; lognormal variance with pedigree 0.03057, pedigree (1,1,4,1,1)
  Transport services to transport incineration residues to landfills and filter ash to external treatments (FLUWA).
  Uncertainty: uncertainty calculated from uncertainty of the waste composition of this waste, uncertainty of transfer coefficients and the uncertainty in generic transportation distances
- spent activated carbon with mercury: -3.4155e-6 kg; name BP_amount_1; lognormal variance with pedigree 1.6338, pedigree (1,1,4,1,1)
  Spent ion exchanger charged with mercury, from FLUWA filter ash treatment, approximated here with Spent activated carbon with mercury, deposited undergound in a polyethylene Big Bag.
  Uncertainty: uncertainty calculated from uncertainty in of transfer coefficients in the incinerator, and the uncertainty of the waste composition of this waste.
  production volume 9.40355 kg; = ABS(RP_PV_1 * (BP_amount_1 / RP_amount_1))
    Calculated from production volume of reference product using the relative outputs.
  property price 0 EUR2005; name BP_amount_1_price_EUR2005
  properties: dry mass 1 kg, carbon content, fossil 0.6, wet mass 1 kg, heating value, net 18.18 MJ
- ammonia, anhydrous, liquid: 0.0017936 kg; lognormal variance with pedigree 0.69316, pedigree (1,1,4,1,1)
  Input to DeNOx stage (100% NH3).
  Uncertainty: uncertainty calculated from uncertainty in average DeNOx input, uncertainty in the share of thermal NOx, uncertainty of nitrogen content in average municipal waste and the uncertainty in nitrogen content in *this* waste.
  properties: wet mass 1 kg, dry mass 1 kg
- process-specific burdens, residual material landfill: 0.01832 kg; lognormal variance with pedigree 0.064381, pedigree (1,1,4,1,1)
  Mass-specific expenditures required for landfilling of incineration residues.;activityLink introduced to establish a direct link to the corresponding regional supply of this product
  Uncertainty: uncertainty is calculated from uncertainties in waste composition and transfer coefficients in incinerator
- heat, district or industrial, natural gas: 0.3354 MJ; lognormal variance with pedigree 0.69316, pedigree (1,1,4,1,1)
  Input to DeNOx stage, to heat up flue gas in low-dust SCR.
  Uncertainty: uncertainty calculated from uncertainty in average DeNOx input, uncertainty in the share of thermal NOx, uncertainty of nitrogen content in average municipal waste and the uncertainty in nitrogen content in *this* waste.
  properties: heating value, net 1 MJ
- residual material landfill: 3.8166e-11 unit; lognormal variance with pedigree 0.064381, pedigree (1,1,4,1,1)
  Landfill infrastructure required for landfilling of incineration residues.
  Uncertainty: uncertainty is calculated from uncertainties in waste composition and transfer coefficients in incinerator
- iron scrap, sorted, pressed: -0.1058 kg; lognormal variance with pedigree 0.08864, pedigree (1,1,4,1,1)
  (same comment as for iron scrap, sorted, pressed)
  production volume 291280 kg
  properties: price 0.175 EUR2005, wet mass 1 kg, dry mass 1 kg
- aluminium scrap, post-consumer, prepared for melting: -0.00021358 kg; lognormal variance with pedigree 0.47425, pedigree (1,1,4,1,1)
  (same comment as for aluminium scrap, post-consumer, prepared for melting)
  production volume 588.02 kg
  properties: wet mass 1 kg, price 0.806 EUR2005, dry mass 1 kg
- copper scrap, sorted, pressed: -0.0018043 kg; lognormal variance with pedigree 0.36972, pedigree (1,1,4,1,1)
  (same comment as for copper scrap, sorted, pressed)
  production volume 4967.7 kg
  properties: dry mass 1 kg, price 2.84 EUR2005, wet mass 1 kg
- metalliferous hydroxide sludge: -0.0028187 kg; lognormal variance with pedigree 0.071236, pedigree (1,1,4,1,1)
  (same comment as for metalliferous hydroxide sludge)
  production volume 7760.3 kg
  properties: antimony content 0.055615, zinc content 0.14459, calcium content 0.033552, carbon content, fossil 0.046248, water content 3, oxygen content 0.32321, wet mass 1 kg, dry mass 0.25 kg, cadmium content 0.054867, sulfur content 0.027969, chlorine content 0.17415, bromine content 0.1161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

## Inputs from nature
- Oxygen [natural resource, in air]: 2.1591 kg; lognormal variance with pedigree 0.021291, pedigree (1,1,4,1,1)
  Oxygen from ambient air needed to combust and oxidise this waste. Net demand, i.e. without O2 leaving the plant in flue gas uncombusted.
  Uncertainty: uncertainty is calculated from uncertainties in waste composition and transfer coefficients to flue gas and soild residues in incinerator

## Emissions to nature
- COD, Chemical Oxygen Demand [water, surface water]: 0.00047635 kg; lognormal variance with pedigree 0.029103, pedigree (1,1,4,1,1)
  Emissions to water from waste composition and transfer coefficients in incinerator and landfills.
  Uncertainty: uncertainty is calculated from uncertainties in waste composition and transfer coefficients in incinerator and landfills
- Benzene, pentachloro- [air, urban air close to ground]: 1.0751e-10 kg; lognormal variance with pedigree 0.088302, pedigree (1,1,4,1,1)
  Incomplete combustion product emitted to air.
  Uncertainty: uncertainty calculated from uncertainty in average operation emissions, and the uncertainty of the flue gas volume from this waste.
- Sulfate [water, ground-, long-term]: 0.0012299 kg; lognormal variance with pedigree 0.6307, pedigree (1,1,4,1,1)
  Long-term emissions from landfilling of incineration residues.
  Uncertainty: uncertainty is calculated from uncertainties in waste composition and transfer coefficients in incinerator and landfills.
- DOC, Dissolved Organic Carbon [water, surface water]: 0.00020777 kg; lognormal variance with pedigree 0.029104, pedigree (1,1,4,1,1)
  (same comment as for COD, Chemical Oxygen Demand)
- Benzene, hexachloro- [air, urban air close to ground]: 4.2547e-11 kg; lognormal variance with pedigree 0.088302, pedigree (1,1,4,1,1)
  (same comment as for Benzene, pentachloro-)
- Nitrate [water, ground-, long-term]: 0.00035929 kg; lognormal variance with pedigree 0.38451, pedigree (1,1,4,1,1)
  (same comment as for Sulfate)
- Sulfate [water, surface water]: 0.00017749 kg; lognormal variance with pedigree 0.49398, pedigree (1,1,4,1,1)
  (same comment as for COD, Chemical Oxygen Demand)
- Phenol, pentachloro- [air, urban air close to ground]: 8.8613e-12 kg; lognormal variance with pedigree 0.088302, pedigree (1,1,4,1,1)
  (same comment as for Benzene, pentachloro-)
- Phosphate [water, ground-, long-term]: 4.1111e-5 kg; lognormal variance with pedigree 5.2174, pedigree (1,1,4,1,1)
  (same comment as for Sulfate)
- Nitrate [water, surface water]: 0.0001287 kg; lognormal variance with pedigree 0.25403, pedigree (1,1,4,1,1)
  (same comment as for COD, Chemical Oxygen Demand)
- Benzo(a)pyrene [air, urban air close to ground]: 4.5281e-13 kg; lognormal variance with pedigree 0.40484, pedigree (1,1,4,1,1)
  (same comment as for Benzene, pentachloro-)
- Chloride [water, ground-, long-term]: 0.00066454 kg; lognormal variance with pedigree 0.42073, pedigree (1,1,4,1,1)
  (same comment as for Sulfate)
- Phosphate [water, surface water]: 5.7282e-7 kg; lognormal variance with pedigree 0.36672, pedigree (1,1,4,1,1)
  (same comment as for COD, Chemical Oxygen Demand)
- Heat, waste [water, surface water]: 4.7258 MJ; lognormal variance with pedigree 0.028829, pedigree (1,1,4,1,1)
  Waste heat generated from heating value of this waste plus any electricity required to process it.
  Uncertainty: uncertainty is calculated from uncertainties in waste composition and uncertainties in energy efficiency and the uncertainty in internal energy demand
- Bromine [water, ground-, long-term]: 0.00021475 kg; lognormal variance with pedigree 0.49204, pedigree (1,1,4,1,1)
  (same comment as for Sulfate)
- Chloride [water, surface water]: 0.0044716 kg; lognormal variance with pedigree 0.16532, pedigree (1,1,4,1,1)
  (same comment as for COD, Chemical Oxygen Demand)
- Heat, waste [air, urban air close to ground]: 20.567 MJ; lognormal variance with pedigree 0.028829, pedigree (1,1,4,1,1)
  (same comment as for Heat, waste)
- Fluoride [water, ground-, long-term]: 0.00012563 kg; lognormal variance with pedigree 0.53579, pedigree (1,1,4,1,1)
  (same comment as for Sulfate)
- Bromine [water, surface water]: 0.0038439 kg; lognormal variance with pedigree 0.12577, pedigree (1,1,4,1,1)
  (same comment as for COD, Chemical Oxygen Demand)
- Water [air, urban air close to ground]: 0.00145639 m3; lognormal variance with pedigree 0.85798, pedigree (1,1,4,1,1)
  Water vapour from waste humidity, hydrogen oxidation and part of the process water.
  Uncertainty: Uncertainty calculated from uncertainty in waste composition, process water input and the uncertainty of fraction to air.
- Silver, ion [water, ground-, long-term]: 6.9305e-5 kg; lognormal variance with pedigree 1.0188, pedigree (1,1,4,1,1)
  (same comment as for Sulfate)
- Fluoride [water, surface water]: 5.4803e-5 kg; lognormal variance with pedigree 0.56368, pedigree (1,1,4,1,1)
  (same comment as for COD, Chemical Oxygen Demand)
- Water [water, surface water]: 0.000516773 m3; lognormal variance with pedigree 1.1933, pedigree (1,1,4,1,1)
  Process water released to surface water.
  Uncertainty: uncertainty calculated from uncertainty in process water input and the uncertainty of fraction to surface water.
- Arsenic, ion [water, ground-, long-term]: 3.4439e-6 kg; lognormal variance with pedigree 1.3519, pedigree (1,1,4,1,1)
  (same comment as for Sulfate)
- Silver, ion [water, surface water]: 2.4063e-9 kg; lognormal variance with pedigree 2.1144, pedigree (1,1,4,1,1)
  (same comment as for COD, Chemical Oxygen Demand)
- Barium [water, ground-, long-term]: 9.7396e-5 kg; lognormal variance with pedigree 1.2804, pedigree (1,1,4,1,1)
  (same comment as for Sulfate)
- Arsenic, ion [water, surface water]: 2.1429e-6 kg; lognormal variance with pedigree 1.2395, pedigree (1,1,4,1,1)
  (same comment as for COD, Chemical Oxygen Demand)
- Carbon monoxide, fossil [air, urban air close to ground]: 3.459e-5 kg; lognormal variance with pedigree 0.79187, pedigree (1,1,4,1,1)
  (same comment as for Benzene, pentachloro-)
- Cadmium, ion [water, ground-, long-term]: 1.8867e-5 kg; lognormal variance with pedigree 4.9063, pedigree (1,1,4,1,1)
  (same comment as for Sulfate)
- Barium [water, surface water]: 5.6565e-8 kg; lognormal variance with pedigree 0.74503, pedigree (1,1,4,1,1)
  (same comment as for COD, Chemical Oxygen Demand)
- Carbon dioxide, fossil [air, urban air close to ground]: 2.2836 kg; lognormal variance with pedigree 0.0145939, pedigree (1,1,4,1,1)
  Emission to air from waste composition and transfer coefficients.
  Uncertainty: uncertainty is calculated from uncertainties in waste composition and transfer coefficients in incinerator
- Cobalt [water, ground-, long-term]: 1.9423e-5 kg; lognormal variance with pedigree 1.1307, pedigree (1,1,4,1,1)
  (same comment as for Sulfate)
- Cadmium, ion [water, surface water]: 2.0516e-8 kg; lognormal variance with pedigree 0.96606, pedigree (1,1,4,1,1)
  (same comment as for COD, Chemical Oxygen Demand)
- Methane, fossil [air, urban air close to ground]: 3.0522e-7 kg; lognormal variance with pedigree 0.088302, pedigree (1,1,4,1,1)
  (same comment as for Benzene, pentachloro-)
- Hydrogen fluoride [air, urban air close to ground]: 1.2704e-6 kg; lognormal variance with pedigree 0.89695, pedigree (1,1,4,1,1)
  (same comment as for Carbon dioxide, fossil)
- Chromium VI [water, ground-, long-term]: 3.8504e-6 kg; lognormal variance with pedigree 3.8148, pedigree (1,1,4,1,1)
  (same comment as for Sulfate)
- Cobalt [water, surface water]: 3.6584e-9 kg; lognormal variance with pedigree 1.6881, pedigree (1,1,4,1,1)
  (same comment as for COD, Chemical Oxygen Demand)
- Sulfur dioxide [air, urban air close to ground]: 3.4082e-6 kg; lognormal variance with pedigree 0.77283, pedigree (1,1,4,1,1)
  (same comment as for Carbon dioxide, fossil)
- Arsenic [air, urban air close to ground]: 4.4249e-8 kg; lognormal variance with pedigree 1.3609, pedigree (1,1,4,1,1)
  (same comment as for Carbon dioxide, fossil)
- Copper, ion [water, ground-, long-term]: 0.0094584 kg; lognormal variance with pedigree 0.35853, pedigree (1,1,4,1,1)
  (same comment as for Sulfate)
- Chromium VI [water, surface water]: 6.0977e-7 kg; lognormal variance with pedigree 0.8921, pedigree (1,1,4,1,1)
  (same comment as for COD, Chemical Oxygen Demand)
- Nitrogen oxides [air, urban air close to ground]: 0.00066779 kg; lognormal variance with pedigree 0.74827, pedigree (1,1,4,1,1)
  Sum of fuel-Nox and thermal-NOx emitted to air after DeNOx stage.
  Uncertainty: uncertainty calculated from uncertainty in average N-emissions and uncertainty in the share of thermal NOx and the uncertainty in nitrogen content in *this* waste.
- Barium [air, urban air close to ground]: 5.2326e-7 kg; lognormal variance with pedigree 0.94306, pedigree (1,1,4,1,1)
  (same comment as for Carbon dioxide, fossil)
- Mercury [water, ground-, long-term]: 1.3445e-7 kg; lognormal variance with pedigree 1.6627, pedigree (1,1,4,1,1)
  (same comment as for Sulfate)
- Copper, ion [water, surface water]: 4.5784e-7 kg; lognormal variance with pedigree 1.146, pedigree (1,1,4,1,1)
  (same comment as for COD, Chemical Oxygen Demand)
- Ammonia [air, urban air close to ground]: 2.1088e-6 kg; lognormal variance with pedigree 0.74827, pedigree (1,1,4,1,1)
  Nitrogen species emitted to air after DeNOx stage.
  Uncertainty: uncertainty calculated from uncertainty in average N-emissions and uncertainty in the share of thermal NOx and the uncertainty in nitrogen content in *this* waste.
- Cadmium [air, urban air close to ground]: 5.784e-8 kg; lognormal variance with pedigree 0.97983, pedigree (1,1,4,1,1)
  (same comment as for Carbon dioxide, fossil)
- Manganese [water, ground-, long-term]: 0.00054114 kg; lognormal variance with pedigree 0.74545, pedigree (1,1,4,1,1)
  (same comment as for Sulfate)
- Mercury [water, surface water]: 3.4066e-9 kg; lognormal variance with pedigree 1.8031, pedigree (1,1,4,1,1)
  (same comment as for COD, Chemical Oxygen Demand)
- Dinitrogen monoxide [air, urban air close to ground]: 0.00014941 kg; lognormal variance with pedigree 1.1492, pedigree (1,1,4,1,1)
  (same comment as for Ammonia)
- Cobalt [air, urban air close to ground]: 4.0378e-8 kg; lognormal variance with pedigree 1.1856, pedigree (1,1,4,1,1)
  (same comment as for Carbon dioxide, fossil)
- Molybdenum [water, ground-, long-term]: 1.7421e-6 kg; lognormal variance with pedigree 1.4706, pedigree (1,1,4,1,1)
  (same comment as for Sulfate)
- Manganese [water, surface water]: 2.813e-8 kg; lognormal variance with pedigree 1.775, pedigree (1,1,4,1,1)
  (same comment as for COD, Chemical Oxygen Demand)
- Cyanide [air, urban air close to ground]: 3.2098e-5 kg; lognormal variance with pedigree 1.1492, pedigree (1,1,4,1,1)
  (same comment as for Ammonia)
- Chromium [air, urban air close to ground]: 3.4529e-8 kg; lognormal variance with pedigree 0.85492, pedigree (1,1,4,1,1)
  (same comment as for Carbon dioxide, fossil)
- Nickel, ion [water, ground-, long-term]: 0.00060336 kg; lognormal variance with pedigree 0.72236, pedigree (1,1,4,1,1)
  (same comment as for Sulfate)
- Molybdenum [water, surface water]: 3.7598e-7 kg; lognormal variance with pedigree 0.94425, pedigree (1,1,4,1,1)
  (same comment as for COD, Chemical Oxygen Demand)
- Phosphorus [air, urban air close to ground]: 3.8271e-7 kg; lognormal variance with pedigree 0.76715, pedigree (1,1,4,1,1)
  (same comment as for Carbon dioxide, fossil)
- Copper [air, urban air close to ground]: 2.2034e-7 kg; lognormal variance with pedigree 0.4065, pedigree (1,1,4,1,1)
  (same comment as for Carbon dioxide, fossil)
- Lead [water, ground-, long-term]: 0.00029959 kg; lognormal variance with pedigree 1.0414, pedigree (1,1,4,1,1)
  (same comment as for Sulfate)
- Nickel, ion [water, surface water]: 3.971e-7 kg; lognormal variance with pedigree 1.3869, pedigree (1,1,4,1,1)
  (same comment as for COD, Chemical Oxygen Demand)
- Hydrogen chloride [air, urban air close to ground]: 2.9047e-6 kg; lognormal variance with pedigree 0.47717, pedigree (1,1,4,1,1)
  (same comment as for Carbon dioxide, fossil)
- Mercury [air, urban air close to ground]: 1.8153e-8 kg; lognormal variance with pedigree 1.6417, pedigree (1,1,4,1,1)
  (same comment as for Carbon dioxide, fossil)
- Antimony [water, ground-, long-term]: 0.0014723 kg; lognormal variance with pedigree 0.43961, pedigree (1,1,4,1,1)
  (same comment as for Sulfate)
- Lead [water, surface water]: 1.1603e-8 kg; lognormal variance with pedigree 1.272, pedigree (1,1,4,1,1)
  (same comment as for COD, Chemical Oxygen Demand)
- Bromine [air, urban air close to ground]: 2.0692e-6 kg; lognormal variance with pedigree 0.50931, pedigree (1,1,4,1,1)
  (same comment as for Carbon dioxide, fossil)
- Manganese [air, urban air close to ground]: 9.9251e-10 kg; lognormal variance with pedigree 0.81097, pedigree (1,1,4,1,1)
  (same comment as for Carbon dioxide, fossil)
- Selenium [water, ground-, long-term]: 1.1326e-6 kg; lognormal variance with pedigree 0.99231, pedigree (1,1,4,1,1)
  (same comment as for Sulfate)
- Antimony [water, surface water]: 0.00070982 kg; lognormal variance with pedigree 0.46843, pedigree (1,1,4,1,1)
  (same comment as for COD, Chemical Oxygen Demand)
- Molybdenum [air, urban air close to ground]: 2.9731e-9 kg; lognormal variance with pedigree 1.4912, pedigree (1,1,4,1,1)
  (same comment as for Carbon dioxide, fossil)
- Tin, ion [water, ground-, long-term]: 0.00025056 kg; lognormal variance with pedigree 0.82781, pedigree (1,1,4,1,1)
  (same comment as for Sulfate)
- Selenium [water, surface water]: 2.9406e-7 kg; lognormal variance with pedigree 1.0837, pedigree (1,1,4,1,1)
  (same comment as for COD, Chemical Oxygen Demand)
- Nickel [air, urban air close to ground]: 4.7403e-7 kg; lognormal variance with pedigree 0.75258, pedigree (1,1,4,1,1)
  (same comment as for Carbon dioxide, fossil)
- Vanadium, ion [water, ground-, long-term]: 5.8091e-6 kg; lognormal variance with pedigree 2.3527, pedigree (1,1,4,1,1)
  (same comment as for Sulfate)
- Tin, ion [water, surface water]: 1.4061e-7 kg; lognormal variance with pedigree 0.72365, pedigree (1,1,4,1,1)
  (same comment as for COD, Chemical Oxygen Demand)
- Lead [air, urban air close to ground]: 9.1481e-9 kg; lognormal variance with pedigree 0.85492, pedigree (1,1,4,1,1)
  (same comment as for Carbon dioxide, fossil)
- Zinc, ion [water, ground-, long-term]: 0.00030463 kg; lognormal variance with pedigree 1.3897, pedigree (1,1,4,1,1)
  (same comment as for Sulfate)
- Vanadium, ion [water, surface water]: 2.6033e-8 kg; lognormal variance with pedigree 1.752, pedigree (1,1,4,1,1)
  (same comment as for COD, Chemical Oxygen Demand)
- Antimony [air, urban air close to ground]: 2.8932e-9 kg; lognormal variance with pedigree 0.57263, pedigree (1,1,4,1,1)
  (same comment as for Carbon dioxide, fossil)
- Beryllium [water, ground-, long-term]: 3.2979e-7 kg; lognormal variance with pedigree 1.6696, pedigree (1,1,4,1,1)
  (same comment as for Sulfate)
- Zinc, ion [water, surface water]: 3.6639e-8 kg; lognormal variance with pedigree 0.69902, pedigree (1,1,4,1,1)
  (same comment as for COD, Chemical Oxygen Demand)
- Selenium [air, urban air close to ground]: 1.7608e-8 kg; lognormal variance with pedigree 1.5344, pedigree (1,1,4,1,1)
  (same comment as for Carbon dioxide, fossil)
- Strontium [water, ground-, long-term]: 6.2133e-5 kg; lognormal variance with pedigree 1.033, pedigree (1,1,4,1,1)
  (same comment as for Sulfate)
- Beryllium [water, surface water]: 2.1869e-10 kg; lognormal variance with pedigree 2.3109, pedigree (1,1,4,1,1)
  (same comment as for COD, Chemical Oxygen Demand)
- Tin [air, urban air close to ground]: 9.9873e-11 kg; lognormal variance with pedigree 0.9063, pedigree (1,1,4,1,1)
  (same comment as for Carbon dioxide, fossil)
- Titanium, ion [water, ground-, long-term]: 0.0010091 kg; lognormal variance with pedigree 0.75425, pedigree (1,1,4,1,1)
  (same comment as for Sulfate)
- Strontium [water, surface water]: 4.0664e-8 kg; lognormal variance with pedigree 1.7018, pedigree (1,1,4,1,1)
  (same comment as for COD, Chemical Oxygen Demand)
- Vanadium [air, urban air close to ground]: 1.1981e-8 kg; lognormal variance with pedigree 1.0755, pedigree (1,1,4,1,1)
  (same comment as for Carbon dioxide, fossil)
- Thallium [water, ground-, long-term]: 2.1576e-7 kg; lognormal variance with pedigree 1.4666, pedigree (1,1,4,1,1)
  (same comment as for Sulfate)
- Titanium, ion [water, surface water]: 6.8648e-7 kg; lognormal variance with pedigree 0.40745, pedigree (1,1,4,1,1)
  (same comment as for COD, Chemical Oxygen Demand)
- Zinc [air, urban air close to ground]: 3.8722e-7 kg; lognormal variance with pedigree 0.75258, pedigree (1,1,4,1,1)
  (same comment as for Carbon dioxide, fossil)
- Silicon [water, ground-, long-term]: 0.00056947 kg; lognormal variance with pedigree 5.4714, pedigree (1,1,4,1,1)
  (same comment as for Sulfate)
- Thallium [water, surface water]: 2.0011e-10 kg; lognormal variance with pedigree 1.7547, pedigree (1,1,4,1,1)
  (same comment as for COD, Chemical Oxygen Demand)
- Strontium [air, urban air close to ground]: 6.2199e-9 kg; lognormal variance with pedigree 1.0681, pedigree (1,1,4,1,1)
  (same comment as for Carbon dioxide, fossil)
- Iron, ion [water, ground-, long-term]: 0.04048 kg; lognormal variance with pedigree 0.18637, pedigree (1,1,4,1,1)
  (same comment as for Sulfate)
- Silicon [water, surface water]: 1.568e-6 kg; lognormal variance with pedigree 0.58882, pedigree (1,1,4,1,1)
  (same comment as for COD, Chemical Oxygen Demand)
- Titanium [air, urban air close to ground]: 2.7976e-6 kg; lognormal variance with pedigree 0.5303, pedigree (1,1,4,1,1)
  (same comment as for Carbon dioxide, fossil)
- Calcium, ion [water, ground-, long-term]: 0.0021744 kg; lognormal variance with pedigree 0.49981, pedigree (1,1,4,1,1)
  (same comment as for Sulfate)
- Iron, ion [water, surface water]: 6.6475e-7 kg; lognormal variance with pedigree 1.3452, pedigree (1,1,4,1,1)
  (same comment as for COD, Chemical Oxygen Demand)
- Thallium [air, urban air close to ground]: 2.8113e-10 kg; lognormal variance with pedigree 1.7621, pedigree (1,1,4,1,1)
  (same comment as for Carbon dioxide, fossil)
- Aluminium [water, ground-, long-term]: 0.0037142 kg; lognormal variance with pedigree 0.4559, pedigree (1,1,4,1,1)
  (same comment as for Sulfate)
- Calcium, ion [water, surface water]: 4.2588e-5 kg; lognormal variance with pedigree 0.243, pedigree (1,1,4,1,1)
  (same comment as for COD, Chemical Oxygen Demand)
- Silicon [air, urban air close to ground]: 3.4782e-9 kg; lognormal variance with pedigree 0.46085, pedigree (1,1,4,1,1)
  (same comment as for Carbon dioxide, fossil)
- Potassium, ion [water, ground-, long-term]: 6.3231e-5 kg; lognormal variance with pedigree 0.67017, pedigree (1,1,4,1,1)
  (same comment as for Sulfate)
- Aluminium [water, surface water]: 2.1068e-7 kg; lognormal variance with pedigree 0.82114, pedigree (1,1,4,1,1)
  (same comment as for COD, Chemical Oxygen Demand)
- Iron [air, urban air close to ground]: 2.13e-9 kg; lognormal variance with pedigree 0.19444, pedigree (1,1,4,1,1)
  (same comment as for Carbon dioxide, fossil)
- Sodium, ion [water, ground-, long-term]: 0.0001122 kg; lognormal variance with pedigree 0.73183, pedigree (1,1,4,1,1)
  (same comment as for Sulfate)
- Potassium, ion [water, surface water]: 2.3896e-5 kg; lognormal variance with pedigree 0.39621, pedigree (1,1,4,1,1)
  (same comment as for COD, Chemical Oxygen Demand)
- Calcium [air, urban air close to ground]: 1.8446e-5 kg; lognormal variance with pedigree 0.56554, pedigree (1,1,4,1,1)
  (same comment as for Carbon dioxide, fossil)
- NMVOC, non-methane volatile organic compounds, unspecified origin [air, urban air close to ground]: 9.2604e-7 kg; lognormal variance with pedigree 0.088302, pedigree (1,1,4,1,1)
  (same comment as for Benzene, pentachloro-)
- Sodium, ion [water, surface water]: 4.0615e-5 kg; lognormal variance with pedigree 0.34736, pedigree (1,1,4,1,1)
  (same comment as for COD, Chemical Oxygen Demand)
- Aluminium [air, urban air close to ground]: 1.4717e-9 kg; lognormal variance with pedigree 0.54436, pedigree (1,1,4,1,1)
  (same comment as for Carbon dioxide, fossil)
- Particulates, < 2.5 um [air, urban air close to ground]: 2.4294e-6 kg; lognormal variance with pedigree 0.40484, pedigree (1,1,4,1,1)
  (same comment as for Benzene, pentachloro-)
- Chromium, ion [water, surface water]: 5.1336e-9 kg; lognormal variance with pedigree 0.51866, pedigree (1,1,4,1,1)
  (same comment as for COD, Chemical Oxygen Demand)
- Potassium [air, urban air close to ground]: 4.3537e-7 kg; lognormal variance with pedigree 1.00191, pedigree (1,1,4,1,1)
  (same comment as for Carbon dioxide, fossil)
- Particulates, > 2.5 um, and < 10um [air, urban air close to ground]: 1.2208e-8 kg; lognormal variance with pedigree 0.19051, pedigree (1,1,4,1,1)
  (same comment as for Benzene, pentachloro-)
- TOC, Total Organic Carbon [water, ground-, long-term]: 0.0018374 kg; lognormal variance with pedigree 0.023364, pedigree (1,1,4,1,1)
  (same comment as for Sulfate)
- Sodium [air, urban air close to ground]: 8.6264e-7 kg; lognormal variance with pedigree 0.921, pedigree (1,1,4,1,1)
  (same comment as for Carbon dioxide, fossil)
- Dioxins, measured as 2,3,7,8-tetrachlorodibenzo-p-dioxin [air, urban air close to ground]: 4.0694e-14 kg; lognormal variance with pedigree 0.40484, pedigree (1,1,4,1,1)
  (same comment as for Benzene, pentachloro-)
- BOD5, Biological Oxygen Demand [water, ground-, long-term]: 0.0015188 kg; lognormal variance with pedigree 0.023364, pedigree (1,1,4,1,1)
  (same comment as for Sulfate)
- BOD5, Biological Oxygen Demand [water, surface water]: 0.00046615 kg; lognormal variance with pedigree 0.029457, pedigree (1,1,4,1,1)
  (same comment as for COD, Chemical Oxygen Demand)
- Benzene [air, urban air close to ground]: 2.0348e-8 kg; lognormal variance with pedigree 0.088302, pedigree (1,1,4,1,1)
  (same comment as for Benzene, pentachloro-)
- DOC, Dissolved Organic Carbon [water, ground-, long-term]: 0.0018374 kg; lognormal variance with pedigree 0.023364, pedigree (1,1,4,1,1)
  (same comment as for Sulfate)
- TOC, Total Organic Carbon [water, surface water]: 0.00020777 kg; lognormal variance with pedigree 0.029104, pedigree (1,1,4,1,1)
  (same comment as for COD, Chemical Oxygen Demand)
- Toluene [air, urban air close to ground]: 4.0696e-8 kg; lognormal variance with pedigree 0.088302, pedigree (1,1,4,1,1)
  (same comment as for Benzene, pentachloro-)
- COD, Chemical Oxygen Demand [water, ground-, long-term]: 0.0046433 kg; lognormal variance with pedigree 0.023364, pedigree (1,1,4,1,1)
  (same comment as for Sulfate)

## Extrapolations
This dataset has been extrapolated from year 2012 to the year of the calculation (2021). The uncertainty has been adjusted accordingly.
