# quicklime production, in pieces, loose

Dataset: EcoSpold 2, unit process
Geography: CA-QC
Time period: 2012-01-01 to 2021-12-31
Technology level: current
Classification: EcoSpold01Categories: construction materials/additives
Classification: ISIC rev.4 ecoinvent: 2394:Manufacture of cement, lime and plaster
Tags: single enterprise data
Scenario: Business-as-Usual
System model: Allocation, cut-off by classification
Share of production covered: 100 %
Generated by: Geneviève Martineau
Published in: Kellenberger D. 2004
Database: ecoinvent
isCopyrightProtected: true
accessRestrictedTo: 1

## General comment
This dataset represents the production of quicklime in Quebec kilns.

The only quicklime producer in Quebec provided the following information:
- Diesel, petrol, and electricity consumption, used for solid fuel crushing, pre-heating of kiln, cooling, and on site material transportation.
- A total fossil energy input to the kiln of 4,95MJ/kg of quicklime.
- The amount of biomass (assumed to be
- Main air emissions (CO2, CO, NOx, particulates, SO2) related to fuel combustion and calcination process.

The specific energy mix used by the company for calcination was used to evaluate the other air emissions, based on "heat, district or industrial" processes of the ecoinvent database.

However, for confidentiality reasons, the specific energy mix used for calcination by the company is not specified in this dataset. To define fuel inputs, the Quebec industrial heat mix (Ministère du Développement durable, de l'Environnement, de la Faune et des Parcs, MDDEFP, Personal communication) was used instead of the real specific energy mix. The Quebec industrial heat mix includes:
- 8.3% Coal
- 3.4% Coke
- 1.4% Petroleum coke
- 58.4% Natural gas
- 1.4% Light fuel oil
- 26.8% Heavy fuel oil
- 0.3% Propane

Infrastructure data was extrapolated from "quicklime production, in pieces, loose, GLO 2000-2002" ecoinvent dataset : The value of the infrastructure is normalized with a annual production capacity of about 75'000tons of product per year. The estimated lifespan of the machines is 25 years.

This activity describes a pre-product for the milling process, and therefore for module "quicklime, milled, loose, at plant".

## Included activities start
From reception of raw materials, at the plant site.

## Included activities end
This activity ends with the quicklime at kiln gate.

The dataset includes the calcination process. Also included is the electricity consumption for pre-heating the fuels, crushing and milling of solid fuels, and used in scrubber, cooler and dust collector. Part of the total heating energy for "production" and "administration" is also included. Equipment included in the infrastructure: 2 vertical kilns (extrapolated from GLO dataset. See Technology for details).
The dataset doesn't include the use of fireproof bricks since no data are available. Only the measured emissions are included.

## Geography
Quebec data are from the only company that produces quicklime on the territory. Unavalable data were extrapolated based on the GLO dataset exchanges. Uncertainties adjusted accordingly.

## Technology
The Quebec limestone producer operates five(5) kilns, including four (4) rotative kiln with pre-heaters, and one (1) vertical MAERZ kiln. In the current dataset, infrastructures for vertical kilns is included (extrapolated from "quicklime production, in pieces, loose, GLO 2000-2002" ecoinvent dataset. No infrastructure information were collected from Quebec producer.
Fuel used for the calcination process varies from one kiln to another, and includes natural gas, coal, coke, heavy fuel oil, light fuel oil and biomass.
For confidentiality reasons, the specific energy mix used by the company is not specified in this dataset. The Quebec industrial heat mix was used instead (see general comments for details).

Values in this dataset represents a weighted average of all kilns, based on their annual production.
Dust collector in use to reduce particulate emissions.

## Reference product
- quicklime, in pieces, loose: 1 kg; By-product classification allocatable product; CPC 37420: Quicklime, slaked lime and hydraulic lime; CAS 1305-78-8
  EcoSpold01Location=CH
  production volume 7.32e8 kg
    Source: questionnaire. Primary data for 2012 quicklime production in Quebec.
  property carbon content, non-fossil 0
    Tab 3.3, ecoinvent v2.2 report 7, part VII, pg 5. Lump quicklime
  property price 0.077 EUR2005
    Calculated value based on data from United Nations Commodity Trade Statistics Database (comtrade.un.org). UN comtrade category: 252210 Quicklime. Year 2005. Using exchange rate of 1EURO = 1.209 USD. Average of price of import into 5 main markets (EU, US, JP, IN and CN).
  property carbon content, fossil 0
    Tab 3.3, ecoinvent v2.2 report 7, part VII, pg 5. Lump quicklime
  property carbon content 0
    carbon content on a dry matter basis (reserved; not for manual entry)
  properties: dry mass 0.99 kg, wet mass 1 kg, water content 0.010101, water in wet mass 0.01 kg, carbon allocation 0 kg

## Inputs from technosphere
- industrial machine, heavy, unspecified: 9.23e-6 kg; source Kellenberger D. 2004; lognormal variance with pedigree 0.3712, pedigree (4,3,5,5,2)
  EcoSpold01Location=RER
  Extrapolated value, based on "quicklime in pieces, loose, GLO 2000-2002" dataset.
- petroleum coke: 0.00198 kg; lognormal variance with pedigree 0.0566, pedigree (4,1,4,1,4)
  Extrapolated value. The total fossil energy input (in MJ) to kiln is a weighted average of all Quebec sites. Repartition between fuel types was established based on the Quebec industrial heat mix.
  properties: carbon content, fossil 0.885, dry mass 1 kg, wet mass 1 kg, heating value, net 35 MJ
- wood chips, from post-consumer wood, measured as dry mass: 0.00504369 kg; lognormal variance with pedigree 0.0086, pedigree (1,1,4,1,1)
  Measured value (weighted average over all Quebec sites). Source: questionnaire
  properties: dry mass 1 kg, carbon content, non-fossil 0.494, wet mass 1.4 kg, heating value, net 9.99 MJ, water content 0.4
- natural gas, high pressure: 0.0796 m3; lognormal variance with pedigree 0.0566, pedigree (4,1,4,1,4)
  (same comment as for petroleum coke)
  properties: dry mass 0.84 kg, heating value, net 39 MJ, carbon content, fossil 0.602381, wet mass 0.84 kg
  note on heating value, net: Literature value, Source: United Nations Statistics Division (2018) International Recommendations for Energy Statistics (IRES). Available at: http://unstats.un.org/unsd/statcom/doc11/BG-IRES.pdf.
  note on carbon content, fossil: An average C content of 0.506 kg C/ m3 has been assumed (this average has been calculated using data in Tab 3.5, ecoinvent v2.2 report 6_V
- heavy fuel oil: 0.0322 kg; lognormal variance with pedigree 0.0566, pedigree (4,1,4,1,4)
  EcoSpold01Location=CH
  Extrapolated value. The total fossil energy input (in MJ) to kiln is a weighted average of all Quebec sites. Repartition between fuel types was established based on the Quebec industrial heat mix.
  properties: carbon content, fossil 0.849, wet mass 1 kg, heating value, net 41.2 MJ, dry mass 1 kg
- hard coal: 0.0142 kg; lognormal variance with pedigree 0.0566, pedigree (4,1,4,1,4)
  (same comment as for petroleum coke)
  properties: dry mass 0.94 kg, heating value, net 27.91 MJ, water content 0.0638298, carbon content, fossil 0.845, wet mass 1 kg
  note on heating value, net: Based on the Characterization factor of Hard coal in the CED method
  note on carbon content, fossil: C content 75-94% (specified in Tab 1.1, report 6, part VI). A mean content of 0.845 kg C/ kg dry hard coal was considered
- transport, passenger car, large size, diesel, EURO 4: 0.000854637 km; = petrol_input_pickup/kg_petrol_per_km; lognormal variance with pedigree 0.008, pedigree (1,1,4,1,1)
  Calculated value. See Exchange properties.
  On site transportation of employees.
  Uncertainty: Calculated variable. Uncertainty will be determined from propagation of uncertainty factors of underlying variables. Uncertainty of actual relation between variables not accounted at this time.
  property kgFuel_input_in_process 0.077157 kg; name kg_petrol_per_km
  property fuel input in physical units, kg 6.59412e-5 kg; name petrol_input_pickup
  note on kgFuel_input_in_process: Literature value: From transport, passenger car, large size, petrol. EURO 4, ecoinvent v3.1
  note on fuel input in physical units, kg: Amount of petroll for on site transportation of employees, reported for 1 kg of limestone. Source: questionnaire. Considering petrol density of 0,75 kg/l (ecoinvent report 1, Table 4.6)
- heat, central or small-scale, other than natural gas: 0.00055836 MJ; source Kellenberger D. 2004; lognormal variance with pedigree 0.0438, pedigree (1,3,5,5,2)
  Extrapolated value, based on "quicklime in pieces, loose, GLO 2000-2002" dataset.
  EcoSpold01Location=CH
  properties: heating value, net 1 MJ
- propane: 0.00032 kg; lognormal variance with pedigree 0.0566, pedigree (4,1,4,1,4)
  (same comment as for petroleum coke)
  properties: carbon content, fossil 0.817139, heating value, net 46.4 MJ, dry mass 1 kg, wet mass 1 kg
  note on heating value, net: Indicative value. Reference: Fuels - Higher and Lower Calorific Values, available at: https://www.engineeringtoolbox.com/fuels-higher-calorific-values-d_169.html
- coke: 0.168 MJ; lognormal variance with pedigree 0.0566, pedigree (4,1,4,1,4)
  (same comment as for petroleum coke)
  properties: carbon content, fossil 0.869149, water content 0.0638298, dry mass 0.0328671 kg, wet mass 0.034965 kg, heating value, net 28.6 MJ
- limestone, crushed, washed: 1.73 kg; lognormal variance with pedigree 0.0086, pedigree (1,1,4,1,1)
  Measured value (weighted average over all Quebec sites). Source: questionnaire
  EcoSpold01Location=CH
  properties: water content 0.00200401, carbon content, fossil 0.117257, wet mass 1 kg, dry mass 0.998 kg
  note on carbon content, fossil: Table 3.1, ecoinvent v2.2 report 7, part VII, pg 3. MW CaCO3=100, MW MgCO3=84. C content of limestone is 0.117257 kg/kg DM
- light fuel oil: 0.00163 kg; lognormal variance with pedigree 0.0566, pedigree (4,1,4,1,4)
  (same comment as for petroleum coke)
  properties: carbon content, fossil 0.862, wet mass 1 kg, heating value, net 42.6 MJ, dry mass 1 kg
- diesel, burned in building machine: 0.0147793 MJ; = diesel_consumption/building_machine_yield; lognormal variance with pedigree 0.008, pedigree (1,1,4,1,1)
  Calculated value. See Exchange properties.
  Diesel is used for on site transportation of material. Source : Questionnaire.
  Uncertainty: Calculated variable. Uncertainty will be determined from propagation of uncertainty factors of underlying variables. Uncertainty of actual relation between variables not accounted at this time.
  property fuel input in physical units, kg 0.000345836 kg; name diesel_consumption
  property kgFuel_Input 0.0234 kg; name building_machine_yield
  properties: heating value, net 1 MJ
  note on fuel input in physical units, kg: Amount of diesel for on site transportation of 1 kg of limestone. Source: questionnaire. Considering diesel density of 0,84 kg/l (ecoinvent report 1, Table 4.6)
  note on kgFuel_Input: Amount of diesel burned in building machine per MJ. Source: "diesel, burned in building machine, GLO 2001" dataset, ecoinvent v 3.01
- electricity, medium voltage: 0.0437875 kWh; lognormal variance with pedigree 0.0092, pedigree (2,1,4,1,1)
  EcoSpold01Location=CH
  Measured value (weighted average over all Quebec sites). Electricity is used for pre-heating the fuels, crushing and milling of solid fuels,and in scrubber, cooler and dust collector. Source: questionnaire.

## Emissions to nature
- Thorium-232 [air, non-urban air or from high stacks]: 1.46e-5 kBq; lognormal variance with pedigree 0.3906, pedigree (4,4,5,4,4)
  Calculated value. Combustion emission based on values from ecoinvent v3 heat production technologies, considering as inputs the real kiln fuel mix, including natural gas, coal, coke, heavy fuel oil, light fuel oil and biomass (weighted average, provided by questionnaire).
- Uranium [air, non-urban air or from high stacks]: 1.06e-8 kg; lognormal variance with pedigree 0.7406, pedigree (4,4,5,4,4)
  (same comment as for Thorium-232)
- Iodine [air, non-urban air or from high stacks]: 4.76e-8 kg; lognormal variance with pedigree 0.1306, pedigree (4,4,5,4,4)
  (same comment as for Thorium-232)
- Beryllium [air, non-urban air or from high stacks]: 5.26e-9 kg; lognormal variance with pedigree 0.7406, pedigree (4,4,5,4,4)
  (same comment as for Thorium-232)
- Dioxins, measured as 2,3,7,8-tetrachlorodibenzo-p-dioxin [air, non-urban air or from high stacks]: 8.68e-14 kg; lognormal variance with pedigree 0.1306, pedigree (4,4,5,4,4)
  (same comment as for Thorium-232)
- Potassium-40 [air, non-urban air or from high stacks]: 5.64e-5 kBq; lognormal variance with pedigree 0.3906, pedigree (4,4,5,4,4)
  (same comment as for Thorium-232)
- Water [water, unspecified]: 2.13e-5 m3; lognormal variance with pedigree 0.1306, pedigree (4,4,5,4,4)
  (same comment as for Thorium-232)
- Molybdenum [air, non-urban air or from high stacks]: 1.98e-8 kg; lognormal variance with pedigree 0.7406, pedigree (4,4,5,4,4)
  (same comment as for Thorium-232)
- Phosphorus [air, non-urban air or from high stacks]: 2.95e-7 kg; lognormal variance with pedigree 0.1306, pedigree (4,4,5,4,4)
  (same comment as for Thorium-232)
- Particulates, > 10 um [air, non-urban air or from high stacks]: 1.69457e-6 kg; lognormal variance with pedigree 0.048, pedigree (1,1,4,1,1)
  Measured value (weighted average over all Quebec sites). Source: questionnaire
- Bromine [air, non-urban air or from high stacks]: 4.58e-8 kg; lognormal variance with pedigree 0.1306, pedigree (4,4,5,4,4)
  (same comment as for Thorium-232)
- Carbon dioxide, fossil [air, non-urban air or from high stacks]: 1.15889 kg; lognormal variance with pedigree 0.0086, pedigree (1,1,4,1,1)
  Measured value (weighted average over all Quebec sites). Source: questionnaire.
  Includes combustion emissions and decarbonation occuring during the calcination process.
- Radon-220 [air, non-urban air or from high stacks]: 4.18e-6 kBq; lognormal variance with pedigree 0.3906, pedigree (4,4,5,4,4)
  (same comment as for Thorium-232)
- Strontium [air, non-urban air or from high stacks]: 7.94e-7 kg; lognormal variance with pedigree 0.7406, pedigree (4,4,5,4,4)
  (same comment as for Thorium-232)
- Cobalt [air, non-urban air or from high stacks]: 1.34e-8 kg; lognormal variance with pedigree 0.7406, pedigree (4,4,5,4,4)
  (same comment as for Thorium-232)
- Radon-222 [air, non-urban air or from high stacks]: 4.18e-6 kBq; lognormal variance with pedigree 0.3906, pedigree (4,4,5,4,4)
  (same comment as for Thorium-232)
- Scandium [air, non-urban air or from high stacks]: 5.26e-9 kg; lognormal variance with pedigree 0.7406, pedigree (4,4,5,4,4)
  (same comment as for Thorium-232)
- Ethene [air, non-urban air or from high stacks]: 1.25e-5 kg; lognormal variance with pedigree 0.1306, pedigree (4,4,5,4,4)
  (same comment as for Thorium-232)
- Radium-226 [air, non-urban air or from high stacks]: 5.01e-5 kBq; lognormal variance with pedigree 0.3906, pedigree (4,4,5,4,4)
  (same comment as for Thorium-232)
- Chromium [air, non-urban air or from high stacks]: 9.44e-8 kg; lognormal variance with pedigree 0.7406, pedigree (4,4,5,4,4)
  (same comment as for Thorium-232)
- Thorium [air, non-urban air or from high stacks]: 7.94e-9 kg; lognormal variance with pedigree 0.7406, pedigree (4,4,5,4,4)
  (same comment as for Thorium-232)
- Hydrogen chloride [air, non-urban air or from high stacks]: 0.00016922 kg; lognormal variance with pedigree 0.1306, pedigree (4,4,5,4,4)
  (same comment as for Thorium-232)
- Methane, fossil [air, non-urban air or from high stacks]: 4.29e-5 kg; lognormal variance with pedigree 0.1306, pedigree (4,4,5,4,4)
  (same comment as for Thorium-232)
- Calcium [air, non-urban air or from high stacks]: 5.87e-6 kg; lognormal variance with pedigree 0.1306, pedigree (4,4,5,4,4)
  (same comment as for Thorium-232)
- Boron [air, non-urban air or from high stacks]: 1.98e-6 kg; lognormal variance with pedigree 0.1306, pedigree (4,4,5,4,4)
  (same comment as for Thorium-232)
- Formaldehyde [air, non-urban air or from high stacks]: 4.11e-7 kg; lognormal variance with pedigree 0.1306, pedigree (4,4,5,4,4)
  (same comment as for Thorium-232)
- Ethane [air, non-urban air or from high stacks]: 6.27e-6 kg; lognormal variance with pedigree 0.1306, pedigree (4,4,5,4,4)
  (same comment as for Thorium-232)
- Acetic acid [air, non-urban air or from high stacks]: 8.78e-8 kg; lognormal variance with pedigree 0.1306, pedigree (4,4,5,4,4)
  (same comment as for Thorium-232)
- Thorium-228 [air, non-urban air or from high stacks]: 2.3e-5 kBq; lognormal variance with pedigree 0.3906, pedigree (4,4,5,4,4)
  (same comment as for Thorium-232)
- Phenol, pentachloro- [air, non-urban air or from high stacks]: 8.39e-13 kg; lognormal variance with pedigree 0.1306, pedigree (4,4,5,4,4)
  (same comment as for Thorium-232)
- Hydrocarbons, aliphatic, alkanes, unspecified [air, non-urban air or from high stacks]: 2.19e-6 kg; lognormal variance with pedigree 0.3906, pedigree (4,4,5,4,4)
  (same comment as for Thorium-232)
- Propionic acid [air, non-urban air or from high stacks]: 1.13e-8 kg; lognormal variance with pedigree 0.1306, pedigree (4,4,5,4,4)
  (same comment as for Thorium-232)
- Chromium VI [air, non-urban air or from high stacks]: 1.16e-8 kg; lognormal variance with pedigree 0.7406, pedigree (4,4,5,4,4)
  (same comment as for Thorium-232)
- Ammonia [air, non-urban air or from high stacks]: 1.8e-7 kg; lognormal variance with pedigree 0.1306, pedigree (4,4,5,4,4)
  (same comment as for Thorium-232)
- Iron [air, non-urban air or from high stacks]: 1.85e-5 kg; lognormal variance with pedigree 0.7406, pedigree (4,4,5,4,4)
  (same comment as for Thorium-232)
- Vanadium [air, non-urban air or from high stacks]: 1.63e-7 kg; lognormal variance with pedigree 0.7406, pedigree (4,4,5,4,4)
  (same comment as for Thorium-232)
- Sodium [air, non-urban air or from high stacks]: 2.78e-6 kg; lognormal variance with pedigree 0.1306, pedigree (4,4,5,4,4)
  (same comment as for Thorium-232)
- Carbon dioxide, non-fossil [air, non-urban air or from high stacks]: 0.010197 kg; lognormal variance with pedigree 0.0912, pedigree (4,4,5,4,4)
  (same comment as for Thorium-232)
- Barium [air, non-urban air or from high stacks]: 5.26e-7 kg; lognormal variance with pedigree 0.7406, pedigree (4,4,5,4,4)
  (same comment as for Thorium-232)
- Butane [air, non-urban air or from high stacks]: 3.99e-7 kg; lognormal variance with pedigree 0.1306, pedigree (4,4,5,4,4)
  (same comment as for Thorium-232)
- Polonium-210 [air, non-urban air or from high stacks]: 0.00035514 kBq; lognormal variance with pedigree 0.3906, pedigree (4,4,5,4,4)
  (same comment as for Thorium-232)
- PAH, polycyclic aromatic hydrocarbons [air, non-urban air or from high stacks]: 6.83e-9 kg; lognormal variance with pedigree 0.3906, pedigree (4,4,5,4,4)
  (same comment as for Thorium-232)
- Thallium [air, non-urban air or from high stacks]: 6.6e-9 kg; lognormal variance with pedigree 0.7406, pedigree (4,4,5,4,4)
  (same comment as for Thorium-232)
- Ethanol [air, non-urban air or from high stacks]: 1.37e-9 kg; lognormal variance with pedigree 0.1306, pedigree (4,4,5,4,4)
  (same comment as for Thorium-232)
- Cadmium [air, non-urban air or from high stacks]: 6.67e-9 kg; lognormal variance with pedigree 0.7406, pedigree (4,4,5,4,4)
  (same comment as for Thorium-232)
- Copper [air, non-urban air or from high stacks]: 7.54e-8 kg; lognormal variance with pedigree 0.7406, pedigree (4,4,5,4,4)
  (same comment as for Thorium-232)
- Methanol [air, non-urban air or from high stacks]: 2.33e-9 kg; lognormal variance with pedigree 0.1306, pedigree (4,4,5,4,4)
  (same comment as for Thorium-232)
- Propane [air, non-urban air or from high stacks]: 4.29e-6 kg; lognormal variance with pedigree 0.1306, pedigree (4,4,5,4,4)
  (same comment as for Thorium-232)
- Mercury [air, non-urban air or from high stacks]: 1.19e-8 kg; lognormal variance with pedigree 0.7406, pedigree (4,4,5,4,4)
  (same comment as for Thorium-232)
- Benzene, ethyl- [air, non-urban air or from high stacks]: 3.11e-9 kg; lognormal variance with pedigree 0.1306, pedigree (4,4,5,4,4)
  (same comment as for Thorium-232)
- Magnesium [air, non-urban air or from high stacks]: 1.59e-5 kg; lognormal variance with pedigree 0.7406, pedigree (4,4,5,4,4)
  (same comment as for Thorium-232)
- Hydrocarbons, aliphatic, unsaturated [air, non-urban air or from high stacks]: 2.41e-6 kg; lognormal variance with pedigree 0.3906, pedigree (4,4,5,4,4)
  (same comment as for Thorium-232)
- Benzene, hexachloro- [air, non-urban air or from high stacks]: 0 kg; pedigree (1,1,1,1,1)
  (same comment as for Thorium-232)
- Zinc [air, non-urban air or from high stacks]: 4.83e-8 kg; lognormal variance with pedigree 0.7406, pedigree (4,4,5,4,4)
  (same comment as for Thorium-232)
- Particulates, < 2.5 um [air, non-urban air or from high stacks]: 6.59645e-6 kg; lognormal variance with pedigree 0.308, pedigree (1,1,4,1,1)
  Measured value (weighted average over all Quebec sites). Source: questionnaire
- Pentane [air, non-urban air or from high stacks]: 6.82e-7 kg; lognormal variance with pedigree 0.1306, pedigree (4,4,5,4,4)
  (same comment as for Thorium-232)
- Tin [air, non-urban air or from high stacks]: 2.64e-9 kg; lognormal variance with pedigree 0.7406, pedigree (4,4,5,4,4)
  (same comment as for Thorium-232)
- Nitrogen oxides [air, non-urban air or from high stacks]: 0.00161052 kg; lognormal variance with pedigree 0.048, pedigree (1,1,4,1,1)
  Measured value (weighted average over all Quebec sites). Source: questionnaire
- Toluene [air, non-urban air or from high stacks]: 5.63e-7 kg; lognormal variance with pedigree 0.1306, pedigree (4,4,5,4,4)
  (same comment as for Thorium-232)
- Hydrogen fluoride [air, non-urban air or from high stacks]: 5.26e-6 kg; lognormal variance with pedigree 0.1306, pedigree (4,4,5,4,4)
  (same comment as for Thorium-232)
- Carbon monoxide, fossil [air, non-urban air or from high stacks]: 0.208232 kg; lognormal variance with pedigree 0.658, pedigree (1,1,4,1,1)
  Measured value (weighted average over all Quebec sites). Source: questionnaire
- Hydrocarbons, aromatic [air, non-urban air or from high stacks]: 8.44e-10 kg; lognormal variance with pedigree 0.3906, pedigree (4,4,5,4,4)
  (same comment as for Thorium-232)
- Particulates, > 2.5 um, and < 10um [air, non-urban air or from high stacks]: 1.93674e-6 kg; lognormal variance with pedigree 0.128, pedigree (1,1,4,1,1)
  Measured value (weighted average over all Quebec sites). Source: questionnaire
- Selenium [air, non-urban air or from high stacks]: 3.97e-8 kg; lognormal variance with pedigree 0.7406, pedigree (4,4,5,4,4)
  (same comment as for Thorium-232)
- Fluorine [air, non-urban air or from high stacks]: 5.18e-9 kg; lognormal variance with pedigree 0.1306, pedigree (4,4,5,4,4)
  (same comment as for Thorium-232)
- Propene [air, non-urban air or from high stacks]: 2.09e-6 kg; lognormal variance with pedigree 0.1306, pedigree (4,4,5,4,4)
  (same comment as for Thorium-232)
- Manganese [air, non-urban air or from high stacks]: 1.1e-7 kg; lognormal variance with pedigree 0.7406, pedigree (4,4,5,4,4)
  (same comment as for Thorium-232)
- Acetone [air, non-urban air or from high stacks]: 6.85e-10 kg; lognormal variance with pedigree 0.1306, pedigree (4,4,5,4,4)
  (same comment as for Thorium-232)
- Radium-228 [air, non-urban air or from high stacks]: 0.00027158 kBq; lognormal variance with pedigree 0.3906, pedigree (4,4,5,4,4)
  (same comment as for Thorium-232)
- Potassium [air, non-urban air or from high stacks]: 7.69e-6 kg; lognormal variance with pedigree 0.1306, pedigree (4,4,5,4,4)
  (same comment as for Thorium-232)
- Carbon monoxide, non-fossil [air, non-urban air or from high stacks]: 4.25e-6 kg; lognormal variance with pedigree 0.7406, pedigree (4,4,5,4,4)
  (same comment as for Thorium-232)
- Silicon [air, non-urban air or from high stacks]: 6.6e-5 kg; lognormal variance with pedigree 0.1306, pedigree (4,4,5,4,4)
  (same comment as for Thorium-232)
- Arsenic [air, non-urban air or from high stacks]: 1.06e-7 kg; lognormal variance with pedigree 0.7406, pedigree (4,4,5,4,4)
  (same comment as for Thorium-232)
- Acetaldehyde [air, non-urban air or from high stacks]: 7.57e-9 kg; lognormal variance with pedigree 0.1306, pedigree (4,4,5,4,4)
  (same comment as for Thorium-232)
- Titanium [air, non-urban air or from high stacks]: 1.58e-6 kg; lognormal variance with pedigree 0.7406, pedigree (4,4,5,4,4)
  (same comment as for Thorium-232)
- Dinitrogen monoxide [air, non-urban air or from high stacks]: 4.48e-6 kg; lognormal variance with pedigree 0.1306, pedigree (4,4,5,4,4)
  (same comment as for Thorium-232)
- m-Xylene [air, non-urban air or from high stacks]: 1.24e-8 kg; lognormal variance with pedigree 0.1306, pedigree (4,4,5,4,4)
  (same comment as for Thorium-232)
- Water [air, non-urban air or from high stacks]: 3.76e-6 m3; lognormal variance with pedigree 0.1306, pedigree (4,4,5,4,4)
  (same comment as for Thorium-232)
- Nickel [air, non-urban air or from high stacks]: 8.22e-8 kg; lognormal variance with pedigree 0.7406, pedigree (4,4,5,4,4)
  (same comment as for Thorium-232)
- Chlorine [air, non-urban air or from high stacks]: 1.87e-8 kg; lognormal variance with pedigree 0.1306, pedigree (4,4,5,4,4)
  (same comment as for Thorium-232)
- Sulfur dioxide [air, non-urban air or from high stacks]: 0.00198756 kg; lognormal variance with pedigree 0.0086, pedigree (1,1,4,1,1)
  Measured value (weighted average over all Quebec sites). Source: questionnaire
- Lead-210 [air, non-urban air or from high stacks]: 0.00019428 kBq; lognormal variance with pedigree 0.3906, pedigree (4,4,5,4,4)
  (same comment as for Thorium-232)
- Methane, non-fossil [air, non-urban air or from high stacks]: 4.15e-8 kg; lognormal variance with pedigree 0.1306, pedigree (4,4,5,4,4)
  (same comment as for Thorium-232)
- Lead [air, non-urban air or from high stacks]: 3.2e-7 kg; lognormal variance with pedigree 0.7406, pedigree (4,4,5,4,4)
  (same comment as for Thorium-232)
- Benzene [air, non-urban air or from high stacks]: 2.41e-6 kg; lognormal variance with pedigree 0.1306, pedigree (4,4,5,4,4)
  (same comment as for Thorium-232)
- Aluminium [air, non-urban air or from high stacks]: 4.47e-5 kg; lognormal variance with pedigree 0.7406, pedigree (4,4,5,4,4)
  (same comment as for Thorium-232)
- Benzo(a)pyrene [air, non-urban air or from high stacks]: 9.95e-11 kg; lognormal variance with pedigree 0.1306, pedigree (4,4,5,4,4)
  (same comment as for Thorium-232)
- Uranium-238 [air, non-urban air or from high stacks]: 4.18e-5 kBq; lognormal variance with pedigree 0.3906, pedigree (4,4,5,4,4)
  (same comment as for Thorium-232)
- Antimony [air, non-urban air or from high stacks]: 6.6e-9 kg; lognormal variance with pedigree 0.7406, pedigree (4,4,5,4,4)
  (same comment as for Thorium-232)
- NMVOC, non-methane volatile organic compounds, unspecified origin [air, non-urban air or from high stacks]: 7.25e-6 kg; source Röder, A. 2004; lognormal variance with pedigree 0.0201, pedigree (1,2,4,5,1)
  Calculated value. Calculation based on values from ecoinvent v3 heat production technologies, considering as inputs the real kiln fuel mix (weighted average, provided by questionnaire).
- Xylene [air, non-urban air or from high stacks]: 4.18e-7 kg; lognormal variance with pedigree 0.1306, pedigree (4,4,5,4,4)
  (same comment as for Thorium-232)
- Ethyne [air, non-urban air or from high stacks]: 2.09e-6 kg; lognormal variance with pedigree 0.1306, pedigree (4,4,5,4,4)
  (same comment as for Thorium-232)

## Sampling procedure
Information provided by the only Quebec producer

## Extrapolations
This dataset has been extrapolated from year 2012 to the year of the calculation (2021). The uncertainty has been adjusted accordingly.
