# melamine urea formaldehyde adhesive production

Dataset: EcoSpold 2, unit process
Geography: GLO
Time period: 2010-01-01 to 2021-12-31
Technology level: current
Classification: ISIC rev.4 ecoinvent: 2029:Manufacture of other chemical products n.e.c.
Scenario: Business-as-Usual
System model: Allocation, cut-off by classification
Generated by: Florentine Brunner
Database: ecoinvent
isCopyrightProtected: true
accessRestrictedTo: 1

## General comment
This dataset represents the production of Melamine Urea Formaldehyde adhesive. Melamine Urea Formaldehyde adhesive (also MUF adhesive, MUF glue), is a type of adhesive which is applied in the production of engineered wood products, for example in the production of glued laminated timber. A standard yield of 0.98 was assumed for this process.
MUF adhesive is transparent and light resistant. It can be hardened either hot or cold. Compared to UF glue, MUF glue is more elastic. It therefore provides improved resistance to humidity.
For the production of MUF adhesive, UF adhesive is mixed with melamine.
Urea is produced from the reforming of natural gas into ammonia and the subsequent reaction with CO2. Formaldehyde is produced from the oxidation of methanol, which in turn results from the reforming of natural gas under the use of a catalyst. Melamine is produced from urea under high pressure and temperature and use of a catalyst. CO2 and ammonia are by-products to the melamine production and can be recycled. (Messmer & Chaudhardy, 2015).
This dataset is based on data for MUF adhesive production from six plants in the US, presented in Table 25: “MUF Wilson, process modeled in SimaPro” by Messmer, Annika & Chaudhary, Abhishek. (2015). Life cycle assessment of adhesives used in wood constructions. Masterthesis, ETH Zürich.

## Included activities start
Activity starts with the reception of the inputs at the chemical factory.

## Included activities end
Activity ends with the product at the chemical factory gate, ready to be sold on the market.

## Geography
Data based on a sample of 6 sites in the US.

## Time period
Literature data compiled in and thus collected before 2010.

## Reference product
- melamine urea formaldehyde adhesive: 1 kg; name a_RP; By-product classification allocatable product; CPC 35499: Other chemical products n.e.c.; CAS 25036-13-9
  Standard yield of 0.98 is assumed.
  production volume 2.5e8 kg; name PV_RP
    Global market size of wood adhesives is roughly 3.71billion USD in 2015 (adhesivemag.com). At an approximate average price of 3.25USD/kg (Messmer & Chaudhary, 2015) adhesive this results in an annual production volume of roughly 1.15E+09 kg. Assuming a market share of MUF adhesive between 20% and 25%, leads to an approximate production volume of 2.5E+8 kg.
  property price 1.55 EUR2005; name a_RP_price_EUR2005
    Calculated value based on data from United Nations Commodity Trade Statistics Database (comtrade.un.org). UN comtrade category: 390920 Melamine resins, in primary forms. Year 2005. Using exchange rate of 1EURO = 1.209 USD. Average of price of import into 5 main markets (EU, US, JP, IN and CN).
  property water in wet mass 0.28 kg; name water_in_RP
  property heating value, net 14.65 MJ
    LHV is calculated based on the elemental composition of a representative substance. Based on the CAS number of the substance (025036-13-9), the chemical formula of the substance is found to be: C5H11N8O2, (PubChem 2020).
    Reference: Kim, S., Chen, J., Cheng, T., Gindulyte, A., He, J., He, S., Li, Q., Shoemaker, B. A., Thiessen, P. A., Yu, B., Zaslavsky, L., Zhang, J., & Bolton, E. E. (2019). PubChem 2019 update: improved access to chemical data. Nucleic acids research, 47(D1), D1102–D1109. https://doi.org/10.1093/nar/gky1033
  property carbon content 0.257
    carbon content on a dry matter basis (reserved; not for manual entry)
  properties: carbon content, non-fossil 0, carbon content, fossil 0.257, water content 0.388889, dry mass 0.72 kg, wet mass 1 kg, carbon allocation 0.18504 kg

## Inputs from technosphere
- sodium hydroxide, without water, in 50% solution state: 0.000209 kg; lognormal variance with pedigree 0.0573, pedigree (2,5,5,3,3)
  Based on data for MUF adhesive production from six plants in the US, presented in Table 25: “MUF Wilson, process modeled in SimaPro” by Messmer, Annika & Chaudhary, Abhishek. (2015). Life cycle assessment of adhesives used in wood constructions. Masterthesis, ETH Zürich.
  properties: wet mass 1 kg, heating value, net 3.03 MJ, dry mass 1 kg
- urea: 0 kg; pedigree (1,1,1,1,1)
  The exchange has been updated from 'urea, as N' into 'urea' and therefore its amount has been scaled (multiplied) from 0.397 kg by 2.1438 kg of 'urea' per kg of 'urea, as N'. Original comment of the exchange is: Based on data for MUF adhesive production from six plants in the US, presented in Table 25: “MUF Wilson, process modeled in SimaPro” by Messmer, Annika & Chaudhary, Abhishek. (2015). Life cycle assessment of adhesives used in wood constructions. Masterthesis, ETH Zürich.
  properties: wet mass 1 kg, carbon content, fossil 0.2, dry mass 1 kg
- wastewater, average: 0 m3; name BP
  Assumption: fate of excess water input is not specified in the data source. It is therefore assumed that the difference bewteen water coming in and water being incorporated in the product is released as average wastewater, for further treatment.
  production volume 0 m3
    Calculated from production volume of reference product using the relative outputs.
  property price 0 EUR2005; name BP_price_EUR2005
  properties: water content 2882.2, carbon content, non-fossil 0.194039, dry mass 0.346837 kg, wet mass 1000 kg
  note on carbon content, non-fossil: 0.0673 kg TOC/m3 (Tab A.17, ecoinvent v2.2 report 13_I). TOC was considered as Total Carbon.
- ammonium sulfate: 0 kg; pedigree (1,1,1,1,1)
  (same comment as for sodium hydroxide, without water, in 50% solution state)
  properties: dry mass 1 kg, wet mass 1 kg
- formaldehyde: 0 kg; pedigree (1,1,1,1,1)
  (same comment as for sodium hydroxide, without water, in 50% solution state)
  properties: wet mass 1 kg, heating value, net 20.19 MJ, dry mass 1 kg, carbon content, fossil 0.4
- chemical factory, organics: 4e-10 unit; lognormal variance with pedigree 0.3846, pedigree (3,4,5,4,4)
  Calculated based on literature data published by the industry. For this activity, no information was readily available concerning infrastructure and land-use. Therefore, the infrastructure is estimated based on data from two chemical factories, the BASF site of Ludwigshafen and the chemical factory in Gendorf (which are both located in Germany), which produce a wide range of chemical substances. Based on this data, the following assumptions are made: the built area amounts to about 4.2 ha, the plant has an average output of 50'000 t/a and a lifespan of fifty years. The estimated infrastructure amount is therefore 4.00 E-10 units per kg of produced chemical.
  References:
  Althaus H.-J., Chudacoff M., Hischier R., Jungbluth N., Osses M. and Primas A. (2007) Life Cycle Inventories of Chemicals. ecoinvent report No. 8, v2.0. EMPA Dübendorf, Swiss Centre for Life Cycle Inventories, Dübendorf, CH.
  Gendorf (2000) Umwelterklärung 2000, Werk Gendorf. Werk Gendorf, Burgkirchen.
- heat, from steam, in chemical industry: 0 MJ; pedigree (1,1,1,1,1)
  * Based on data for MUF adhesive production from six plants in the US, presented in Table 25: “MUF Wilson, process modeled in SimaPro” by Messmer, Annika & Chaudhary, Abhishek. (2015). Life cycle assessment of adhesives used in wood constructions. Masterthesis, ETH Zürich. Only the primary fuel input of natural gas of 0.0135m3 is reported in the literaure inventory, no heat input. Considering the standard heating value of natural gas and thermal efficiencies, it is reasonable to assume that the actual heat requirements are in the size heat requirements from steam suggested by the ecoinvent default model for chemical production:
  In the ecoinvent default model for chemical production the amount of heat used per kg of chemical substance produced is calculated using literature data published by the Gendorf factory based in Germany, which produces a wide range of chemical substances. The factory produced 1657400 tonnes of chemical substances in the year 2015 (Gendorf, 2016, Umwelterklärung, www.gendorf.de) and 740000 tonnes of intermediate products. The amount of heat in the year 2015 was 523500 GJ (Gendorf, 2016, Umwelterklärung, www.gendorf.de) of which 90% was obtained from natural gas and 10% from steam. The resulting amount of heat from steam is 0.22 MJ/kg of chemical product produced. The 5-year average (2011 - 2015, weighted by production volume) is 0.20 MJ/kg. Additional heat inputs from district or industrial heat are not relevant for this dataset: Considering that the MUF adhesive production represents the mixing of UF adhesive with melamine, not requiring energy intensive processes at high temperature or pressure, it appears justified tha the energy inputs to this process are considerably lower than the average amounts suggested in the default model.
  properties: heating value, net 1 MJ
- formic acid: 0 kg; pedigree (1,1,1,1,1)
  (same comment as for sodium hydroxide, without water, in 50% solution state)
  properties: dry mass 1 kg, carbon content, fossil 0.261, wet mass 1 kg, heating value, net 13.17 MJ
- melamine: 0.0808 kg; lognormal variance with pedigree 0.0573, pedigree (2,5,5,3,3)
  (same comment as for sodium hydroxide, without water, in 50% solution state)
  properties: heating value, net 14.42 MJ, carbon content, fossil 0.285714, wet mass 1 kg, dry mass 1 kg
- propane: 3.1155e-8 kg; lognormal variance with pedigree 0.0573, pedigree (2,5,5,3,3)
  (same comment as for sodium hydroxide, without water, in 50% solution state)
  properties: dry mass 1 kg, carbon content, fossil 0.817139, heating value, net 46.4 MJ, wet mass 1 kg
  note on heating value, net: Indicative value. Reference: Fuels - Higher and Lower Calorific Values, available at: https://www.engineeringtoolbox.com/fuels-higher-calorific-values-d_169.html
- electricity, medium voltage: 0.0351 kWh; lognormal variance with pedigree 0.0573, pedigree (2,5,5,3,3)
  * Based on data for MUF adhesive production from six plants in the US, presented in Table 25: “MUF Wilson, process modeled in SimaPro” by Messmer, Annika & Chaudhary, Abhishek. (2015). Life cycle assessment of adhesives used in wood constructions. Masterthesis, ETH Zürich.
  The ecoinvent default model for chemical production suggests an input of electric energy of 0.416 kWh/kg of chemical product (1.5 MJ/kg) (5-year average (2011 - 2015, weighted by production volume) published by the Gendorf factory (Gendorf, 2016, Umwelterklärung, www.gendorf.de). Considering that the MUF adhesive production represents the mixing of UF adhesive with melamine, not requiring energy intensive processes at high temperature or pressure, it appears justified tha the energy inputs to this process are considerably lower than the average amounts suggested in the default model.
- urea: 0.0624356, 0.0503648, 0.340059, 0.398229 kg (4 entries); lognormal variance with pedigree 0.0573, pedigree (2,5,5,3,3)
  (same comment as for urea)
- wastewater, average: -0.000159668, -1.72731e-5, -0.000334059 m3 (3 entries)
  (same comment as for wastewater, average)
  production volume 127750 m3
- ammonium sulfate: 6.90343e-6, 2.24966e-5 kg (2 entries); lognormal variance with pedigree 0.0573, pedigree (2,5,5,3,3)
  (same comment as for sodium hydroxide, without water, in 50% solution state)
- formaldehyde: 0.0501825, 0.209817 kg (2 entries); lognormal variance with pedigree 0.0573, pedigree (2,5,5,3,3)
  (same comment as for sodium hydroxide, without water, in 50% solution state)
- heat, from steam, in chemical industry: 0.0299772, 0.170023 MJ (2 entries); lognormal variance with pedigree 0.0573, pedigree (2,5,5,3,3)
  (same comment as for heat, from steam, in chemical industry)
- formic acid: 3.09431e-5, 1.99569e-5 kg (2 entries); lognormal variance with pedigree 0.0573, pedigree (2,5,5,3,3)
  (same comment as for sodium hydroxide, without water, in 50% solution state)

## Inputs from nature
- Water, unspecified natural origin [natural resource, in water]: 0.000791 m3; name water_in; lognormal variance with pedigree 0.0573, pedigree (2,5,5,3,3)
  (same comment as for sodium hydroxide, without water, in 50% solution state)

## Emissions to nature
- BOD5, Biological Oxygen Demand [water, unspecified]: 6.62e-5 kg; name BOD5; lognormal variance with pedigree 0.0967, pedigree (2,5,5,3,3)
  (same comment as for sodium hydroxide, without water, in 50% solution state)
- COD, Chemical Oxygen Demand [water, unspecified]: 0.0001324 kg; name COD; = BOD5/0.5; lognormal variance with pedigree 0.126, pedigree (3,4,5,5,4)
  Calculated value - Best estimates: DOC = TOC ; COD (g O2) = 2.7*TOC (g C) and BOD5 = 0.5*COD. See 'WFLDB-Guidelines.pdf', available at https://ecoquery.ecoinvent.org/File/Reports.
- DOC, Dissolved Organic Carbon [water, unspecified]: 4.9037e-5 kg; name DOC; = TOC; lognormal variance with pedigree 0.132, pedigree (4,4,5,5,4)
  (same comment as for COD, Chemical Oxygen Demand)
- Solids, inorganic [water, unspecified]: 0.000239 kg; lognormal variance with pedigree 0.0967, pedigree (2,5,5,3,3)
  (same comment as for sodium hydroxide, without water, in 50% solution state)
- Formaldehyde [water, unspecified]: 7.84e-5 kg; lognormal variance with pedigree 0.0967, pedigree (2,5,5,3,3)
  (same comment as for sodium hydroxide, without water, in 50% solution state)
- TOC, Total Organic Carbon [water, unspecified]: 4.9037e-5 kg; name TOC; = COD/2.7; lognormal variance with pedigree 0.138, pedigree (4,5,5,5,4)
  (same comment as for COD, Chemical Oxygen Demand)
- Dimethyl ether [air, unspecified]: 2.26e-5 kg; lognormal variance with pedigree 0.0967, pedigree (2,5,5,3,3)
  (same comment as for sodium hydroxide, without water, in 50% solution state)
- Suspended solids, unspecified [water, unspecified]: 0.000394 kg; lognormal variance with pedigree 0.0967, pedigree (2,5,5,3,3)
  (same comment as for sodium hydroxide, without water, in 50% solution state)
- Nitrogen [water, unspecified]: 0.00013 kg; lognormal variance with pedigree 0.0967, pedigree (2,5,5,3,3)
  Based on data for MUF adhesive production from six plants in the US, presented in Table 25: “MUF Wilson, process modeled in SimaPro” by Messmer, Annika & Chaudhary, Abhishek. (2015). Life cycle assessment of adhesives used in wood constructions. Masterthesis, ETH Zürich.
  Reported as 'Ammonia, as N'
- Formaldehyde [air, unspecified]: 7.85e-6 kg; lognormal variance with pedigree 0.0967, pedigree (2,5,5,3,3)
  (same comment as for sodium hydroxide, without water, in 50% solution state)

## Sampling procedure
Literature data.

## Extrapolations
This dataset has been extrapolated from year 2010 to the year of the calculation (2021). The uncertainty has been adjusted accordingly.
