# heat and power co-generation unit construction, organic Rankine cycle, 1000kW electrical

Dataset: EcoSpold 2, unit process
Geography: GLO
Time period: 2011-01-01 to 2021-12-31
Technology level: modern
Classification: ISIC rev.4 ecoinvent: 4220:Construction of utility projects
Classification: EcoSpold01Categories: oil/cogeneration
Synonyms: ORC turbine; components for electricity production; organic rankine cycle; CHP unit; cogeneration turbine
Tags: biomass power
Scenario: Business-as-Usual
System model: Allocation, cut-off by classification
Generated by: Christian Bauer
Database: ecoinvent
isCopyrightProtected: true
accessRestrictedTo: 1

## General comment
This dataset represent the production and the disposal of an organic rankine cycle unit. It is dimensioned to be connected to a biomass burning boiler (with capacity 5000kWth) producing about 1000 kWel.

## Included activities start
From reception of unit components at the factory gate

## Included activities end
This activity ends with the disposal of the device in the end of its lifetime. The dataset includes the most important materials used for the fabrication of a cogeneration heat and power unit with organic rankine cycle (ORC) technology: steel, chromium steel, copper, electronic components, plastics, insulation, organic fluid. The dataset also includes energy required for the construction and the disposal of the device. The unit includes an electricity generator, a compressor, a condenser, tubes and pipes for thermal oil distribution within the cycle. The dataset doesnt include the basement in concrete for the installation and emissions from manufacture.

## Technology
Organic rankine cycle unit of modern technology (2011). Data are taken from producers and technical information available. Model choosen: brand Turboden, Pratt&Whitney Power System Company, CHP Split (devices which are sold worldwide). This module describes a specific ORC Generation Unit for the production of heat and electricity from biomass fuel, dimensioned to be connected to a furnace with about 5000 kWth capacity.
Source of image: http://www.turboden.eu/en/public/downloads/Scheda%20Biomassa%20CHP%20Split%20-%20ING.pdf

## Reference product
- heat and power co-generation unit, organic Rankine cycle, 1000kW electrical: 1 unit; name RP_amount_1; CPC 53262: Power plants; By-product classification allocatable product
  EcoSpold01Location=GLO
  production volume 2100 unit; name RP_PV_1
    Extrapolated with proportion (population) from the Swiss annual production (which derives from estimatimations from annually installed CHP plants; see Source Holzenergiestatistik); High uncertainty
  property capacity [MW] 1 MW; name capacity_MW
  property lifetime capacity [kWh] 1.752e8 kWh; name lifetime_capacity_kWh; = (lifetime*8760)*capacity_MW*1000
    calculated value. The capacity utilisation rate is 60% (about 5500 hours in a total of 8760 hours/year)
  property price 98181 EUR2005
    Assumed same prices as rankine cogen unit with 1400kW capacity, electric components only. Value calculated by 2.o. Assumed kWe:kWth of 1:1.7 (http://www.cibse.org/pdfs/GPG176.pdf) and the same prices as cogen unit (natural gas). Estimated from CHP installation and maintenance costs in http://www.northeastchp.org/nac/businesses/pubs.htm. No year specified. For the installations costs, share of components for el only is estimated from total installation costs extracted by prices of common components and building. All maintenance costs are included only for components for electricity only because it is only process indicating the use of engine (generator and control cabinet cogen unit) while no indication of maintenance exists in existing ecoinvent documentation from ecoinvent v.2.2. (From information in the dataset cogen unit ORC 1400kWth, wood burning, components for electricity only.) Assume annual hours equivalent full load operation as 5585 hours a year (http://www.cibse.org/pdfs/GPG176.pdf) and a life time of 50 years for the plant.
  property lifetime 20 year; name lifetime

## Inputs from technosphere
- waste mineral wool: 0 kg; name BP_amount_5; pedigree (1,1,1,1,1)
  calculated value
  production volume 0 kg
    Calculated from production volume of reference product using the relative outputs.
  property price 0 EUR2005; name BP_amount_5_price_EUR2005
  properties: dry mass 1 kg, wet mass 1 kg, lifetime 20 year
- copper, cathode: 67 kg; name copper; source Turboden srl 2011; lognormal variance with pedigree 0.0432, pedigree (4,5,4,5,1)
  EcoSpold01Location=RER
  estimation
  properties: wet mass 1 kg, dry mass 1 kg
- used perfluoropentane: -1200 kg; name BP_amount_6; = (perfluoropentane)*-1; lognormal variance with pedigree 0.0186, pedigree (1,5,4,5,1)
  calculated value
  production volume 2.52e6 kg; = RP_PV_1 * (BP_amount_6 / RP_amount_1)
    Calculated from production volume of reference product using the relative outputs.
  property price 0 EUR2005; name BP_amount_6_price_EUR2005
  properties: dry mass 1 kg, wet mass 1 kg, carbon content, fossil 0.0953262, lifetime 20 year, heating value, net 6.32 MJ
- scrap steel: 0 kg; name BP_amount_1; pedigree (1,1,1,1,1)
  calculated value
  EcoSpold01Location=CH
  production volume 0 kg
    Calculated from production volume of reference product using the relative outputs.
  property price 0 EUR2005; name BP_amount_1_price_EUR2005
  properties: dry mass 1 kg, wet mass 1 kg, lifetime 20 year
- perfluoropentane: 1200 kg; source Turboden srl 2011; lognormal variance with pedigree 0.0358, pedigree (2,5,4,5,1)
  literature value (organic fluid for the cycle turbine)
  properties: heating value, net 6.32 MJ, carbon content, fossil 0.0953262, wet mass 1 kg, dry mass 1 kg
- steel, low-alloyed, hot rolled: 45050 kg; name steel_low_alloyed; source Turboden srl 2011; lognormal variance with pedigree 0.0358, pedigree (2,5,4,5,1)
  literature value
  EcoSpold01Location=RER
  properties: dry mass 1 kg, carbon content, fossil 0.005, wet mass 1 kg
  note on carbon content, fossil: Low alloyed steel composition given in Tab. 3.2 ecoinvent v2.2 report 10_partII. Steel assumed to have a C content of 0.5%
- electricity, medium voltage: 9180 kWh; source Turboden srl 2011; lognormal variance with pedigree 0.164, pedigree (3,5,5,5,3)
  estimated from personal communication technician ORC turbine company (annual consumption/production)
- steel, chromium steel 18/8, hot rolled: 7950 kg; name chromium_steel; source Turboden srl 2011; lognormal variance with pedigree 0.0358, pedigree (2,5,4,5,1)
  literature value
  EcoSpold01Location=RER
  properties: carbon content, fossil 0.0008, dry mass 1 kg, wet mass 1 kg
  note on carbon content, fossil: Stainless steel model is the grade 304 steel (18/8 stainless, 18% chromium 8% nickel; max. 0.08% C)
- waste polyethylene: 0 kg; name BP_amount_2; pedigree (1,1,1,1,1)
  EcoSpold01Location=CH
  calculated value
  production volume 0 kg
    Calculated from production volume of reference product using the relative outputs.
  property price 0 EUR2005; name BP_amount_2_price_EUR2005
  properties: wet mass 1 kg, carbon content, fossil 0.825301, dry mass 0.996 kg, lifetime 20 year, heating value, net 42.47 MJ, water content 0.00401606
  note on carbon content, fossil: C content in 1 kg DM was calculated using data in Tab A.1, ecoinvent v2.2 report 13_I
  note on heating value, net: Value taken from the general comment of the treatment dataset.
- heat, central or small-scale, other than natural gas: 14860 MJ; source Turboden srl 2011; lognormal variance with pedigree 0.156, pedigree (3,5,5,5,1)
  estimated from personal communication technician ORC turbine company (annual heating value/production)
  EcoSpold01Location=CH
  properties: heating value, net 1 MJ
- electronics, for control units: 30 kg; name electronics; source Turboden srl 2011; lognormal variance with pedigree 0.0432, pedigree (4,5,4,5,1)
  estimation
  EcoSpold01Location=RER
  properties: carbon content, fossil 0.337146, wet mass 1 kg, carbon content, non-fossil 0.00013442, dry mass 1 kg
  note on carbon content, fossil: The control unit has a composition of 46% steel (housing), 32% plastics, 14% printed wiring boards and 8% cables (various types).;
- polyethylene, high density, granulate: 18 kg; name polyethylene; source Turboden srl 2011; lognormal variance with pedigree 0.0432, pedigree (4,5,4,5,1)
  estimation
  EcoSpold01Location=RER
  properties: carbon content, fossil 0.857143, dry mass 1 kg, wet mass 1 kg, heating value, net 42.47 MJ
  note on carbon content, fossil: Polyethylene is formed out of a huge amount of ethylene monomers (C2H4) (ecoinvent v2.2 report 11_II). MW=28 g/mol
- used industrial electronic device: 0 kg; name BP_amount_4; pedigree (1,1,1,1,1)
  EcoSpold01Location=CH
  calculated value
  production volume 0 kg
    Calculated from production volume of reference product using the relative outputs.
  property price 0 EUR2005; name BP_amount_4_price_EUR2005
  properties: lifetime 20 year, carbon content, non-fossil 3.07246e-5, wet mass 1 kg, carbon content, fossil 0.0818694, dry mass 1 kg
  note on carbon content, non-fossil: The composition of an average industrial device was extracted from Tab 4.38 (ecoinvent v2.2 report 18_V). 88% steel, that was considered to have a C content of 0.012 (C content was calculated out of emission factors published in Commission Decision of 18 July 2007 establishing guidelines for the monitoring and reporting of greenhouse gas emissions pursuant to Directive 2003/87/EC of the European Parliament and of the Council (notified under document number C(2007) 3416)); 8% plastics (plastics C content was calculated using data in Tab A.2, ecoinvent v2.2 report 13_I); 3.2% PWB & plugs (C content calculated using PWB composition)
- stone wool: 410 kg; name rock_wool; source Turboden srl 2011; lognormal variance with pedigree 0.0432, pedigree (4,5,4,5,1)
  estimation
  EcoSpold01Location=CH
  properties: carbon content, fossil 0.015401, dry mass 1 kg, wet mass 1 kg
  note on carbon content, fossil: The chemical composition of the glass fibres used in the rock wool production is similar to the composition of naturally cooled volcano basalt and has a composition listed in Tab. 3.1 and 3.2 in ecoinvent v2.2 report 16, part XIV. Rock wool contains: a minimum of 96% mineral fibres,between 0.5 and 3.0 weight percent of phenolic resin depending on the specific product characteristics, and about 0.2 percent mineral oil (ecoinvent v2.2 report 16, part XIV). An average composition of 1.8% phenolic resin, 0.2% mineral oil, and 98% mineral fibres has been assumed and used to calculate C content of the rock wool
- scrap copper: 0 kg; name BP_amount_3; pedigree (1,1,1,1,1)
  calculated value
  EcoSpold01Location=CH
  production volume 0 kg
    Calculated from production volume of reference product using the relative outputs.
  property price 0 EUR2005; name BP_amount_3_price_EUR2005
  properties: wet mass 1 kg, dry mass 1 kg, lifetime 20 year
- waste mineral wool: -118.841, -1.35606, -289.803 kg (3 entries); lognormal variance with pedigree 0.0186, pedigree (1,5,4,5,1)
  calculated value
  production volume 861000 kg
- scrap steel: -12905.2, -16.3505, -40078.4 kg (3 entries); lognormal variance with pedigree 0.0186, pedigree (1,5,4,5,1)
  calculated value
  EcoSpold01Location=CH
  production volume 1.113e8 kg
- waste polyethylene: -1.73258, -0.133572, -0.05517, -0.0523891, -1.9991, -0.0222881, -0.0101018, -13.9948 kg (8 entries); lognormal variance with pedigree 0.0186, pedigree (1,5,4,5,1)
  EcoSpold01Location=CH
  calculated value
  production volume 37800 kg
- used industrial electronic device: -6.9, -23.1 kg (2 entries); lognormal variance with pedigree 0.0186, pedigree (1,5,4,5,1)
  EcoSpold01Location=CH
  calculated value
  production volume 63000 kg
- scrap copper: -21.2529, -0.997141, -44.7499 kg (3 entries); lognormal variance with pedigree 0.0186, pedigree (1,5,4,5,1)
  calculated value
  EcoSpold01Location=CH
  production volume 140700 kg

## Sampling procedure
literature, technical data available, personal communications from technicians and specialized producer

## Extrapolations
This dataset has been extrapolated from year 2011 to the year of the calculation (2021). The uncertainty has been adjusted accordingly.

## Review by Bo Weidema 2012-04-15
Intended to replace previous dataset "cogen unit production, organic Rankine cycle 1400kWth, wood burning, components for electricity only"

## Review by Bo Weidema 2012-04-15
Replaces the previous "cogen unit production, organic Rankine cycle 1400kWth, wood burning, components for electricity only"
