# internal combustion engine production, passenger car

Dataset: EcoSpold 2, unit process
Geography: GLO
Time period: 2000-01-01 to 2021-12-31
Technology level: current
Classification: ISIC rev.4 ecoinvent: 2910:Manufacture of motor vehicles
Scenario: Business-as-Usual
System model: Allocation, cut-off by classification
Generated by: Hans-Jörg Althaus
Published in: H.-J. Althaus 2010
Database: ecoinvent
isCopyrightProtected: true
accessRestrictedTo: 1

## General comment
This dataset describes the production of an internal combustion engine (ICE) for a passenger car. The entries are given per kg engine. The original data has been derived for an ICE of approximately 275kg. The information described in this dataset has been obtained starting from the "Life Cycle Inventory of the Golf A4" made by Schweimer and Levin. The final dataset has been published in Althaus and Gauch: "Vergleichende Oekobilanz der Elektromobilität: Elektromobilität bersus konventionelle Mobilität mit Bio- und fossilen Treibstoffen".

## Included activities start
The dataset takes as input the raw materials and the energy inputs required for the production process and includes the production facility.

## Included activities end
The dataset returns the finished internal combustion engine as well as the output scrap fractions from the production process.

## Technology
The dataset is based on current car technologies.

## Parameters
- fraction, process water, to air: 0.15 dimensionless; name fraction_PW_to_air; lognormal variance with pedigree 0.092025, pedigree (4,4,3,2,4)
  Literature value. In case when no industry/process specific data are available, default evaporation fraction value is used. This value is 15% and is based on literature (Statistics Canada, 2007 & Shaffer, K.H., 2008, Consumptive water use in the Great Lakes Basin, USGS & Shiklomanov, 2003, World Water Resources at the Beginning of the 21st Century) and has been approved by an expert.
- fraction, tap water, to air: 0.15 dimensionless; name fraction_TW_to_air; = fraction_PW_to_air; lognormal variance with pedigree 0.092025, pedigree (4,4,3,2,4)
  Calculated value. See comment in the other parametres present in this dataset. Tap water is considered to be always used as process water, thus process water fractions to air are applied to all tap water input flows to calculate the amount of water consumed in the processes.

## Reference product
- internal combustion engine, passenger car: 1 kg; name RP_amount_1; source H.-J. Althaus 2010; CPC 4312: Internal combustion engines of a kind used for motor vehicles; By-product classification allocatable product
  production volume 1.65e10 kg; name RP_PV_1
    Estimate based on projections of passenger car production for 2012 (http://www.worldometers.info/cars/). Total of 60000000 vehicles for 2012.
  property price 9.86 EUR2005
    Calculated based on literature value (UN Commodity Trade Statistics Database) using data on trade value and net weight (kg) for 5 reference countries/regions (RER, USA, JP, CN and IN) which average is assumed to be a good approximation of the global price.

## By-products
- aluminium scrap, new: 0 kg; source H.-J. Althaus 2010; By-product classification Recyclable; CPC 39363: Waste and scrap of aluminium; pedigree (1,1,1,1,1)
  Scrap fraction from production process.
  production volume 0 kg; = RP_PV_1 * BP_amount_1 / RP_amount_1
    Calculated from production volume of reference product using the relative outputs.
  property price 0.806 EUR2005
    Temporary price data. Calculated as 90% of purchasers price based on: 2005 import and export prices (total trades (USD) divided by total weight (kg) in biggest economies of the world: EU27, USA, Brasil, China, India, Japan and Russia) from UN Commodity Trade Statistics Database (http://data.un.org/Explorer.aspxDatabase [Accessed 2011.06.17]). Commodity: Waste or scrap, aluminium
  property carbon content 0
    carbon content on a dry matter basis (reserved; not for manual entry)
  properties: water in wet mass 0 kg, water content 0, wet mass 1 kg, carbon content, fossil 0, dry mass 1 kg, carbon content, non-fossil 0, carbon allocation 0 kg
- iron scrap, unsorted: 0 kg; source H.-J. Althaus 2010; CPC 39310: Slag, dross, scalings and other waste from the manufacture of iron or steel; By-product classification Recyclable; pedigree (1,1,1,1,1)
  Scrap fraction from production process.
  production volume 0 kg; = RP_PV_1 * BP_amount_2 / RP_amount_1
    Calculated from production volume of reference product using the relative outputs.
  property price 0.149 EUR2005
    Temporary price data. Calculated as 90% of purchasers price based on: estimated at 85% of sorted scrap
  property carbon content 0
    carbon content on a dry matter basis (reserved; not for manual entry)
  properties: dry mass 1 kg, carbon content, non-fossil 0, wet mass 1 kg, water content 0, water in wet mass 0 kg, carbon content, fossil 0, carbon allocation 0 kg

## Inputs from technosphere
All rows: source H.-J. Althaus 2010
- platinum: 5.81818e-6 kg; lognormal variance with pedigree 0.0444, pedigree (2,4,5,4,2)
  Based on a Volkswagen Golf A4 materialization.
  properties: wet mass 1 kg, dry mass 1 kg
- synthetic rubber: 0.0109091 kg; lognormal variance with pedigree 0.0444, pedigree (2,4,5,4,2)
  Based on a Volkswagen Golf A4 materialization.
  properties: carbon content, fossil 0.871949, wet mass 1 kg, dry mass 1 kg, heating value, net 26.42 MJ
- lead: 0.0472727 kg; lognormal variance with pedigree 0.0444, pedigree (2,4,5,4,2)
  Based on a Volkswagen Golf A4 materialization.
  properties: dry mass 1 kg, wet mass 1 kg
- steel, low-alloyed, hot rolled: 0.393436 kg; lognormal variance with pedigree 0.0444, pedigree (2,4,5,4,2)
  Based on a Volkswagen Golf A4 materialization.
  properties: dry mass 1 kg, wet mass 1 kg, carbon content, fossil 0.005
- heat, district or industrial, natural gas: 2.10394 MJ; lognormal variance with pedigree 0.0444, pedigree (2,4,5,4,2)
  Extrapolated from ecoinvent v2.2 passenger car.
  properties: heating value, net 1 MJ
- waste plastic, mixture: 0 kg; name BP_amount_3; pedigree (1,1,1,1,1)
  Scrap fraction from production process.
  production volume 0 kg
    Calculated from production volume of reference product using the relative outputs.
  property price 0 EUR2005; name BP_amount_3_price_EUR2005
  properties: water content 0.180638, carbon content, fossil 0.747344, wet mass 1 kg, dry mass 0.847 kg, heating value, net 30.79 MJ
  note on heating value, net: Value taken from the general comment of the treatment dataset.
- lubricating oil: 0 kg; pedigree (1,1,1,1,1)
  Based on a Volkswagen Golf A4 materialization.
  properties: dry mass 1 kg, wet mass 1 kg, carbon content, fossil 0.75, heating value, net 40.2 MJ
  note on heating value, net: Literature value, Source: IPCC 2006, 2006 IPCC Guidelines for National Greenhouse Gas Inventories, Prepared by the National Greenhouse Gas Inventories Programme, Eggleston H.S., Buendia L., Miwa K., Ngara T. and Tanabe K. (eds). Published: IGES, Japan
- copper, cathode: 0.00727273 kg; lognormal variance with pedigree 0.0444, pedigree (2,4,5,4,2)
  Based on a Volkswagen Golf A4 materialization.
  properties: wet mass 1 kg, dry mass 1 kg
- aluminium, cast alloy: 0.618436 kg; lognormal variance with pedigree 0.0444, pedigree (2,4,5,4,2)
  Based on a Volkswagen Golf A4 materialization.
  properties: dry mass 1 kg, wet mass 1 kg
- polyethylene, high density, granulate: 0.056 kg; lognormal variance with pedigree 0.0444, pedigree (2,4,5,4,2)
  Based on a Volkswagen Golf A4 materialization.
  properties: wet mass 1 kg, carbon content, fossil 0.857143, dry mass 1 kg, heating value, net 42.47 MJ
  note on carbon content, fossil: Polyethylene is formed out of a huge amount of ethylene monomers (C2H4) (ecoinvent v2.2 report 11_II). MW=28 g/mol
- used internal combustion engine, passenger car: -1 kg; name BP_amount_4
  production volume 1.65e10 kg; = RP_PV_1 * (BP_amount_4 / RP_amount_1)
    Calculated from production volume of reference product using the relative outputs.
  property price 0 EUR2005; name BP_amount_4_price_EUR2005
- sulfuric acid: 0 kg; pedigree (1,1,1,1,1)
  Based on a Volkswagen Golf A4 materialization.
  properties: dry mass 1 kg, wet mass 1 kg
- reinforcing steel: 0.152727 kg; lognormal variance with pedigree 0.0444, pedigree (2,4,5,4,2)
  Based on a Volkswagen Golf A4 materialization.
  property water in wet mass 0 kg; name WWM
  property carbon content, non-fossil 0; name C_content_non_fossil
  property wet mass 1 kg; name WM
  property dry mass 1 kg; name DM
  property carbon content, fossil 0.004; name C_content_fossil
  property water content 0; name water_content
- electricity, medium voltage: 2.02812 kWh; lognormal variance with pedigree 0.0444, pedigree (2,4,5,4,2)
  Extrapolated from ecoinvent v2.2 passenger car.
- polyphenylene sulfide: 0.1 kg; lognormal variance with pedigree 0.0444, pedigree (2,4,5,4,2)
  Based on a Volkswagen Golf A4 materialization.
  properties: carbon content, fossil 0.666667, heating value, net 24.67 MJ, wet mass 1 kg, dry mass 1 kg
- heat, district or industrial, other than natural gas: 0.0597064 MJ; lognormal variance with pedigree 0.0444, pedigree (2,4,5,4,2)
  Extrapolated from ecoinvent v2.2 passenger car.
  properties: heating value, net 1 MJ
- road vehicle factory: 2.75787e-10 unit; lognormal variance with pedigree 0.0444, pedigree (2,4,5,4,2)
  Based on a Volkswagen Golf A4 materialization.
- tap water: 3.05166 kg; name tap_water_input; lognormal variance with pedigree 0.0444, pedigree (2,4,5,4,2)
  Based on a Volkswagen Golf A4 materialization.
  properties: water content 2962.17, dry mass 0.000337476 kg, carbon content, fossil 0.00178991, wet mass 1 kg
- injection moulding: 0.048 kg; lognormal variance with pedigree 0.0444, pedigree (2,4,5,4,2)
  Based on a Volkswagen Golf A4 materialization.
- wire drawing, copper: 0.00727273 kg; lognormal variance with pedigree 0.0444, pedigree (2,4,5,4,2)
  Based on a Volkswagen Golf A4 materialization.
- ethylene glycol: 0.0254545 kg; lognormal variance with pedigree 0.0444, pedigree (2,4,5,4,2)
  Based on a Volkswagen Golf A4 materialization.
  properties: carbon content, fossil 0.387097, dry mass 1 kg, wet mass 1 kg, heating value, net 23.44 MJ
- palladium: 1.09091e-6 kg; lognormal variance with pedigree 0.0444, pedigree (2,4,5,4,2)
  Based on a Volkswagen Golf A4 materialization.
  properties: dry mass 1 kg, wet mass 1 kg
- aluminium scrap, new: -0.123687 kg; lognormal variance with pedigree 0.0444, pedigree (2,4,5,4,2)
  Scrap fraction from production process.
  production volume 2.04084e9 kg
  properties: price 0.806 EUR2005, wet mass 1 kg, dry mass 1 kg
- iron scrap, unsorted: -0.0786909 kg; lognormal variance with pedigree 0.0444, pedigree (2,4,5,4,2)
  Scrap fraction from production process.
  production volume 1.2984e9 kg
  properties: dry mass 1 kg, price 0.149 EUR2005, wet mass 1 kg
- waste plastic, mixture: -0.00136507, -0.000105239, -4.34673e-5, -4.12763e-5, -0.00157505, -1.75603e-5, -7.95902e-6, -0.0110262 kg (8 entries); lognormal variance with pedigree 0.0444, pedigree (2,4,5,4,2)
  Scrap fraction from production process.
  production volume 2.34e8 kg
- lubricating oil: 0.00379636, 0.0180218 kg (2 entries); lognormal variance with pedigree 0.0444, pedigree (2,4,5,4,2)
  Based on a Volkswagen Golf A4 materialization.
- sulfuric acid: 0.000420679, 0.00321568 kg (2 entries); lognormal variance with pedigree 0.0444, pedigree (2,4,5,4,2)
  Based on a Volkswagen Golf A4 materialization.

## Emissions to nature
- TOC, Total Organic Carbon [water, unspecified]: 6.77441e-5 kg; = 0.0503/2.7; lognormal variance with pedigree 0.0838, pedigree (2,4,5,4,2)
  Derived from COD as described in ecoinvent 3 Data Quality Guidelines (p. 49, paragraph 5.9.7). The same Pedigree matrix value as COD has been used.
- COD, Chemical Oxygen Demand [water, unspecified]: 0.00018291 kg; source H.-J. Althaus 2010; lognormal variance with pedigree 0.0838, pedigree (2,4,5,4,2)
  Extrapolated from ecoinvent v2.2 passenger car.
- DOC, Dissolved Organic Carbon [water, unspecified]: 6.77441e-5 kg; = 0.0503/2.7; lognormal variance with pedigree 0.0838, pedigree (2,4,5,4,2)
  (same comment as for TOC, Total Organic Carbon)
- Water [water, unspecified]: 0.00259391 m3; name water_to_water_unspecified; = (tap_water_input/1000)*(1-fraction_TW_to_air); lognormal variance with pedigree 0.130025, pedigree (4,4,5,2,4)
  Calculated value based on literature values and expert opinion. See comments in the parametres' comment field.
  property fraction, origin: unspecified 0; name fraction_origin_unspecified_Ww
  property fraction, origin: fresh water 1; name fraction_origin_fresh_water_Ww
  property fraction, origin: salt water 0; name fraction_origin_salt_water_Ww
- NMVOC, non-methane volatile organic compounds, unspecified origin [air, unspecified]: 0.00454906 kg; source H.-J. Althaus 2010; lognormal variance with pedigree 0.0838, pedigree (2,4,5,4,2)
  Extrapolated from ecoinvent v2.2 passenger car.
- BOD5, Biological Oxygen Demand [water, unspecified]: 2.46407e-5 kg; source H.-J. Althaus 2010; lognormal variance with pedigree 0.0838, pedigree (2,4,5,4,2)
  Extrapolated from ecoinvent v2.2 passenger car.
- Water [air, unspecified]: 0.000457749 m3; name water_to_air_unspecified; = (tap_water_input/1000)*fraction_TW_to_air; lognormal variance with pedigree 0.130025, pedigree (4,4,5,2,4)
  (same comment as for Water)
  property fraction, origin: unspecified 0; name fraction_origin_unspecified
  property fraction, origin: fresh water 1; name fraction_origin_fresh_water
  property fraction, origin: salt water 0; name fraction_origin_salt_water
- Phosphate [water, unspecified]: 9.4772e-7 kg; source H.-J. Althaus 2010; lognormal variance with pedigree 0.0838, pedigree (2,4,5,4,2)
  Extrapolated from ecoinvent v2.2 passenger car.

## Sampling procedure
Lliterature

## Extrapolations
This dataset has been extrapolated from year 2012 to the year of the calculation (2021). The uncertainty has been adjusted accordingly.

## Review by Christian Bauer 2012-06-28
passed
