# biomethane production, low pressure, vehicle grade

Dataset: EcoSpold 2, unit process
Geography: CH
Time period: 2001-01-01 to 2021-12-31
Technology level: current
Classification: ISIC rev.4 ecoinvent: 3520:Manufacture of gas; distribution of gaseous fuels through mains
Classification: EcoSpold01Categories: biomass/fuels
Synonyms: Kompogas, Naturgas
Tags: ConvertedDataset
Scenario: Business-as-Usual
System model: Allocation, cut-off by classification
Share of production covered: 0 %
Generated by: Mireille Faist Emmenegger (obsolete)
Published in: Jungbluth N. 2007
Database: ecoinvent
isCopyrightProtected: true
accessRestrictedTo: 1

## General comment
The initial pressure of gas is from the low pressure network (<0.1 bar). Air emissions are calculated from gas losses and composition of biogas.
[This dataset was already contained in the ecoinvent database version 2. It was not individually updated during the transfer to ecoinvent version 3. Life Cycle Impact Assessment results may still have changed, as they are affected by changes in the supply chain, i.e. in other datasets. This dataset was generated following the ecoinvent quality guidelines for version 2. It may have been subject to central changes described in the ecoinvent version 3 change report (http://www.ecoinvent.org/database/ecoinvent-version-3/reports-of-changes/), and the results of the central updates were reviewed extensively. The changes added e.g. consistent water flows and other information throughout the database. The documentation of this dataset can be found in the ecoinvent reports of version 2, which are still available via the ecoinvent website. The change report linked above covers all central changes that were made during the conversion process.]

## Included activities end
This data set includes electricity requirements of a biogas service station as well as emissions from losses.

## Geography
Data for Switzerland

## Technology
Service station with low initial gas pressure (<0.1 bar)

## Time period
personal communication

## Reference product
- biomethane, low pressure, vehicle grade: 1 kg; By-product classification allocatable product; CPC 17200: Coal gas, water gas, producer gas and similar gases, other than petroleum gases and other gaseous hydrocarbons; CAS 74-82-8
  production volume 0.0336675 kg
    This is a placeholder value that does not reflect real-world production volumes. This dataset does not currently require a real-world production volume to work in the database framework, and no actual data were collected yet. This has no negative effect on the results of the ecoinvent database. The placeholder value of this activity was scaled according to the nominal GDP of 2005 (source: United Nations, http://data.un.org/Glossary.aspx?q=GDP+%28current+US%24%29, accessed 20130726) to reflect an appropriate share of the global production volume, which is also a placeholder value.
  property price 6.69264 EUR2005
    Calculated based on inputs: The price of the product has been calculated as a sum of the values of the material and energy inputs for this product. This value is therefore a rough estimation. It may underestimate the real price since there are additional expenses when producing any product. These expences can include for example labour costs, treatment of waste materials and profit for the producer. Please consider carefully whether this level of data quality is acceptable for your application.
  property carbon content, non-fossil 0.695496
    C content is 0.7 kg C/kg methane 96%vol (tab 19.1, ecoinvent v2.2 report 17, part 19). This can be obtained from the composition of the gas, 96% (in vol) methane, 2% (in vol) CO2. The composition in %vol was converted in % weight using density data of the different gases from tab 19.1, ecoinvent v2.2 report 17, part 19.
  property heating value, net 46.5 MJ
    Literature value, Source: United Nations Statistics Division (2018) International Recommendations for Energy Statistics (IRES). Available at: http://unstats.un.org/unsd/statcom/doc11/BG-IRES.pdf.
  property carbon content 0.695496
    carbon content on a dry matter basis (reserved; not for manual entry)
  properties: wet mass 1 kg, carbon content, fossil 0, dry mass 1 kg, water content 0, water in wet mass 0 kg, carbon allocation 0.695496 kg

## Inputs from technosphere
- biomethane, low pressure: 45.833 MJ; lognormal variance with pedigree 0.0401, pedigree (1,2,5,1,1)
  Estimation from industry expert
  Estimation from industry expert
  properties: wet mass 0.0218341 kg, carbon content, non-fossil 0.695496, dry mass 0.0218341 kg
  note on carbon content, non-fossil: C content is 0.7 kg C/kg methane 96%vol (tab 19.1, ecoinvent v2.2 report 17, part 19). This can be obtained from the composition of the gas, 96% (in vol) methane, 2% (in vol) CO2. The composition in %vol was converted in % weight using density data of the different gases from tab 19.1, ecoinvent v2.2 report 17, part 19.
- electricity, medium voltage: 0.722 kWh; lognormal variance with pedigree 0.0401, pedigree (1,2,5,1,1)
  Model from industry expert
  Model from industry expert
- natural gas service station: 8.4821e-8 unit; lognormal variance with pedigree 0.3526, pedigree (2,4,5,1,1)
  Expert data for one service station
  This exchange has an activity link directly to the producing activity because the product is primarily consumed in the same geographical area where it is produced.

## Emissions to nature
- Methane, non-fossil [air, urban air close to ground]: 0.00018125 kg; lognormal variance with pedigree 0.1712, pedigree (2,3,5,1,1)
  Emission rate from industry expert
- Hydrogen sulfide [air, urban air close to ground]: 4.0094e-9 kg; lognormal variance with pedigree 0.1712, pedigree (2,3,5,1,1)
  Emission rate from industry expert
- Carbon dioxide, non-fossil [air, urban air close to ground]: 1.0376e-5 kg; lognormal variance with pedigree 0.1712, pedigree (2,3,5,1,1)
  Emission rate from industry expert

## Extrapolations
This dataset has been extrapolated from year 2001 to the year of the calculation (2021). The uncertainty has been adjusted accordingly.

## Review by Arnaud Dauriat 2005-08-30
Passed.
