# treatment of waste wire plastic, municipal incineration

Dataset: EcoSpold 2, unit process
Geography: CH
Time period: 1994-01-01 to 2021-12-31
Technology level: outdated
Classification: EcoSpold01Categories: waste management/municipal incineration
Classification: ISIC rev.4 ecoinvent: 3821:Treatment and disposal of non-hazardous waste
Synonyms: PE and PVC
Tags: ConvertedDataset; Treatment
Scenario: Business-as-Usual
System model: Allocation, cut-off by classification
Generated by: Gabor Doka (obsolete)
Published in: Doka G. 2007
Database: ecoinvent
isCopyrightProtected: true
accessRestrictedTo: 1

## General comment
Inventoried waste contains 100% wiring plastic; .
waste composition (wet, in ppm): upper heating value 26.81 MJ/kg; lower heating value 25.95 MJ/kg; H2O 35500; O 22438; H 72167; C 530500; S 806.42; N 1069; P n.a.; B n.a.; Cl 305150; Br 50.232; F 14.281; I n.a.; Ag n.a.; As 1.8346; Ba 198.45; Cd 12.007; Co 21.87; Cr 31.397; Cu 24205; Hg 0.58871; Mn 63.112; Mo n.a.; Ni 14.22; Pb 17.077; Sb 32.095; Se 2.0277; Sn 252.09; V 860.3; Zn 141.51; Be 0.4828; Sc n.a.; Sr 85.455; Ti 965.59; Tl 0.38624; W n.a.; Si n.a.; Fe 2982.5; Ca 781.16; Al 193.12; K n.a.; Mg 28.932; Na 1415.1;
Share of carbon in waste that is biogenic 0%.
Share of iron in waste that is metallic/recyclable 0%.
Net energy produced in MSWI: 2.86MJ/kg waste electric energy and 5.8MJ/kg waste thermal energy
Allocation of energy production: no substitution or expansion. Total burden allocated to waste disposal function of MSWI.
One kg of this waste produces 0.06104 kg of slag and 0.0166 kg of residues, which are landfilled. Additional solidification with 0.006639 kg of cement.
[This dataset was already contained in the ecoinvent database version 2. It was not individually updated during the transfer to ecoinvent version 3. Life Cycle Impact Assessment results may still have changed, as they are affected by changes in the supply chain, i.e. in other datasets. This dataset was generated following the ecoinvent quality guidelines for version 2. It may have been subject to central changes described in the ecoinvent version 3 change report (http://www.ecoinvent.org/database/ecoinvent-version-3/reports-of-changes/), and the results of the central updates were reviewed extensively. The changes added e.g. consistent water flows and other information throughout the database. The documentation of this dataset can be found in the ecoinvent reports of version 2, which are still available via the ecoinvent website. The change report linked above covers all central changes that were made during the conversion process.]

## Included activities end
waste-specific air and water emisions from incineration, auxiliary material consumption for flue gas cleaning. Short-term emissions to river water and long-term emisisons to ground water from slag compartment (from bottom slag) and residual material landfill (from solidified fly ashes and scrubber slugde). Process energy demands for MSWI.

## Geography
Specific to the technology mix encountered in Switzerland in 2000. Well applicable to modern incineration practices in Europe, North America or Japan.

## Technology
replaced by newer incineration technology with fly ash extraction. Average Swiss MSWI plants in 2000 with electrostatic precipitator for fly ash (ESP), wet flue gas scrubber and 29.4% SNCR , 32.2% SCR-high dust , 24.6% SCR-low dust -DeNOx facilities and 13.8% without Denox (by burnt waste, according to Swiss average). Share of waste incinerated in plants with magnetic scrap separation from slag : 50%. Gross electric efficiency technology mix 12.997% and Gross thermal efficiency technology mix 25.57%

## Time period
Waste composition as given in literature reference, theoretical data or other source. Transfer coefficients for modern Swiss MSWI. Emission speciation based on early 90ies data.

## Reference product
- waste wire plastic: -1 kg; name RP_amount_1; By-product classification Waste; CPC 39270: Waste, parings and scrap of plastics
  EcoSpold01Location=CH
  production volume 0 kg; name RP_PV_1
    outdated. Replaced by newer incineration technology with fly ash extraction.
  property carbon content, fossil 0.549508
    C content in 1 kg DM was calculated using data in Tab A.6, ecoinvent v2.2 report 13_I
  property heating value, net 25.95 MJ
    Value taken from the general comment of the treatment dataset.
  property price 0 EUR2005; name RP_amount_1_price_EUR2005
    Waste products are assigned a price of zero as they are assumed to require further treatment.
  property carbon content 0.549508
    carbon content on a dry matter basis (reserved; not for manual entry)
  properties: water in wet mass 0.0355 kg, water content 0.0368066, wet mass 1 kg, dry mass 0.9645 kg, carbon content, non-fossil 0, carbon allocation 0.53 kg

## Inputs from technosphere
- chromium oxide, flakes: 3.15e-8 kg; lognormal variance with pedigree 2.31, pedigree (1,1,5,1,1)
  Proxy for vanadium pentoxide V2O5 in SCR catalyst, uncertainty calculated from uncertainty in average DeNOx input, uncertainty in the share of thermal NOx, uncertainty of nitrogen content in average municipal waste and the unertainty in nitrogen content in *this* waste.
  EcoSpold01Location=RER
  properties: wet mass 1 kg, dry mass 1 kg
- process-specific burdens, slag landfill: 0.061 kg; lognormal variance with pedigree 0.09, pedigree (1,1,5,1,1)
  EcoSpold01Location=CH
  uncertainty is calculated from uncertainties in waste composition and transfer coefficients in incinerator;activityLink introduced to establish a direct link to the corresponding regional supply of this product
- heat, district or industrial, natural gas: 0.004734 MJ; lognormal variance with pedigree 1.6, pedigree (1,1,5,1,1)
  uncertainty calculated from uncertainty in average DeNOx input, uncertainty in the share of thermal NOx, uncertainty of nitrogen content in average municipal waste and the unertainty in nitrogen content in *this* waste.
  EcoSpold01Location=RER
  properties: heating value, net 1 MJ
- titanium dioxide: 1.54e-6 kg; lognormal variance with pedigree 2.31, pedigree (1,1,5,1,1)
  (same comment as for heat, district or industrial, natural gas)
  properties: wet mass 1 kg, dry mass 1 kg
- sodium hydroxide, without water, in 50% solution state: 0.297 kg; lognormal variance with pedigree 0.09, pedigree (1,1,5,1,1)
  EcoSpold01Location=RER
  uncertainty calculated from uncertainty in average auxiliary material input, and the unertainty of the waste composition of this waste
  properties: dry mass 1 kg, heating value, net 3.03 MJ, wet mass 1 kg
- iron (III) chloride, without water, in 40% solution state: 0.000242 kg; lognormal variance with pedigree 0.25, pedigree (1,1,5,1,1)
  uncertainty calculated from uncertainty in average auxiliary material input, and the unertainty of the waste composition of this waste
  EcoSpold01Location=CH
  properties: wet mass 1 kg, dry mass 1 kg
- residual material landfill: 3.46e-11 unit; lognormal variance with pedigree 0.07, pedigree (1,1,5,1,1)
  EcoSpold01Location=CH
  uncertainty is calculated from uncertainties in waste composition and transfer coefficients in incinerator
- process-specific burdens, municipal waste incineration: 1 kg; lognormal variance with pedigree 0.04, pedigree (1,1,5,1,1)
  demands per kilogram waste. uncertainty is heeded in the module;activityLink introduced to establish a direct link to the corresponding regional supply of this product
  EcoSpold01Location=CH
- waste cement, hydrated: -0.0166 kg; name BP_amount_1; lognormal variance with pedigree 0.08, pedigree (1,1,5,1,1)
  Hydrated cement for solidification of landfilled residual material. Uncertainty calculated from unertainty of the waste composition of this waste and transfer coefficients in the incinerator and of the solidification recipe.
  EcoSpold01Location=CH
  production volume 0 kg; = ABS( BP_amount_1/ RP_amount_1* RP_PV_1)
    Calculated from the production volume of waste wire plastic, 3.55% water in proportion to the respective output amounts.
  property price 0 EUR2005; name BP_amount_1_price_EUR2005
  properties: dry mass 1 kg, wet mass 1 kg
- cement, unspecified: 0.00664 kg; lognormal variance with pedigree 0.08, pedigree (1,1,5,1,1)
  Cement for solidification of landfilled residual material. Uncertainty calculated from unertainty of the waste composition of this waste, of transfer coefficients in the incinerator and of the solidification recipe.
  EcoSpold01Location=CH
  properties: dry mass 1 kg, wet mass 1 kg
- slag landfill: 1.09e-10 unit; lognormal variance with pedigree 0.09, pedigree (1,1,5,1,1)
  (same comment as for residual material landfill)
- chemical, inorganic: 0.000889 kg; lognormal variance with pedigree 0.09, pedigree (1,1,5,1,1)
  Proxy for Polyelectrolyte. uncertainty calculated from uncertainty in average auxiliary material input, and the unertainty of the waste composition of this waste
  EcoSpold01Location=GLO
  properties: wet mass 1 kg, carbon content, fossil 0.003, dry mass 1 kg
  note on carbon content, fossil: This dataset is an unweighted average of 20 inorganic substances (listed in Tab 88.1, ecoinvent v2.2 report 8, part II), being part of the top100 chemicals included in this database. The C-content has also been calculated as an unweighted average of the C content of the substances composing this dataset.
- chemical, organic: 4.91e-5 kg; lognormal variance with pedigree 1.25, pedigree (1,1,5,1,1)
  Proxy for TMT15. uncertainty calculated from uncertainty in average auxiliary material input, and the unertainty of the waste composition of this waste
  EcoSpold01Location=GLO
  properties: carbon content, fossil 0.628, dry mass 1 kg, wet mass 1 kg, heating value, net 19.03 MJ
  note on carbon content, fossil: This dataset is an unweighted average of 20 organic substances (listed in Tab 88.1, ecoinvent v2.2 report 8, part II), being part of the top100 chemicals included in this database. The C-content has also been calculated as an unweighted average of the C content of the substances composing this dataset.
- ammonia, anhydrous, liquid: 5.39e-5 kg; lognormal variance with pedigree 1.6, pedigree (1,1,5,1,1)
  EcoSpold01Location=CH
  uncertainty calculated from uncertainty in average DeNOx input, uncertainty in the share of thermal NOx, uncertainty of nitrogen content in average municipal waste and the unertainty in nitrogen content in *this* waste.
  properties: wet mass 1 kg, dry mass 1 kg
- process-specific burdens, residual material landfill: 0.0166 kg; lognormal variance with pedigree 0.07, pedigree (1,1,5,1,1)
  uncertainty is calculated from uncertainties in waste composition and transfer coefficients in incinerator;activityLink introduced to establish a direct link to the corresponding regional supply of this product
  EcoSpold01Location=CH
- hydrochloric acid, without water, in 30% solution state: 0.000533 kg; lognormal variance with pedigree 0.09, pedigree (1,1,5,1,1)
  uncertainty calculated from uncertainty in average auxiliary material input, and the unertainty of the waste composition of this waste
  EcoSpold01Location=RER
  properties: heating value, net 3.32 MJ, dry mass 1 kg, wet mass 1 kg
- quicklime, milled, packed: 0.0526 kg; lognormal variance with pedigree 0.09, pedigree (1,1,5,1,1)
  (same comment as for iron (III) chloride, without water, in 40% solution state)
  properties: wet mass 1 kg, dry mass 0.99 kg, water content 0.010101
- municipal waste incineration facility: 2.5e-10 unit; lognormal variance with pedigree 0.04, pedigree (1,1,5,1,1)
  EcoSpold01Location=CH
  demands per kilogram waste. uncertainty is heeded in the module

## Emissions to nature
- Titanium, ion [water, ground-, long-term]: 0.000289 kg; lognormal variance with pedigree 1.06, pedigree (1,1,5,1,1)
  Long-term emissions from landfilling of incineration residues. uncertainty is calculated from uncertainties in waste composition and transfer coefficients in incinerator and landfills.
- Calcium [air, urban air close to ground]: 1.3e-6 kg; lognormal variance with pedigree 0.75, pedigree (1,1,5,1,1)
  uncertainty is calculated from uncertainties in waste composition and transfer coefficients in incinerator
- Iron [air, urban air close to ground]: 9.96e-8 kg; lognormal variance with pedigree 0.6, pedigree (1,1,5,1,1)
  (same comment as for Calcium)
- Arsenic, ion [water, ground-, long-term]: 1.01e-6 kg; lognormal variance with pedigree 1.53, pedigree (1,1,5,1,1)
  (same comment as for Titanium, ion)
- Calcium, ion [water, surface water]: 2.95e-6 kg; lognormal variance with pedigree 1.19, pedigree (1,1,5,1,1)
  uncertainty is calculated from uncertainties in waste composition and transfer coefficients in incinerator and landfills
- COD, Chemical Oxygen Demand [water, ground-, long-term]: 0.0131 kg; lognormal variance with pedigree 0.06, pedigree (1,1,5,1,1)
  (same comment as for Titanium, ion)
- Chromium VI [water, ground-, long-term]: 3.32e-6 kg; lognormal variance with pedigree 1.38, pedigree (1,1,5,1,1)
  (same comment as for Titanium, ion)
- Cadmium, ion [water, ground-, long-term]: 1.2e-7 kg; lognormal variance with pedigree 7.06, pedigree (1,1,5,1,1)
  (same comment as for Titanium, ion)
- Bromine [air, urban air close to ground]: 1.51e-7 kg; lognormal variance with pedigree 1.11, pedigree (1,1,5,1,1)
  (same comment as for Calcium)
- Barium [air, urban air close to ground]: 1.98e-7 kg; lognormal variance with pedigree 0.93, pedigree (1,1,5,1,1)
  (same comment as for Calcium)
- Nickel [air, urban air close to ground]: 6.14e-13 kg; lognormal variance with pedigree 1.36, pedigree (1,1,5,1,1)
  (same comment as for Calcium)
- Selenium [water, ground-, long-term]: 1.36e-6 kg; lognormal variance with pedigree 1.03, pedigree (1,1,5,1,1)
  (same comment as for Titanium, ion)
- Arsenic [air, urban air close to ground]: 1.87e-14 kg; lognormal variance with pedigree 1.64, pedigree (1,1,5,1,1)
  (same comment as for Calcium)
- Copper [air, urban air close to ground]: 1.79e-7 kg; lognormal variance with pedigree 0.36, pedigree (1,1,5,1,1)
  (same comment as for Calcium)
- BOD5, Biological Oxygen Demand [water, surface water]: 1.99e-5 kg; lognormal variance with pedigree 0.16, pedigree (1,1,5,1,1)
  (same comment as for Calcium, ion)
- Strontium [air, urban air close to ground]: 8.55e-9 kg; lognormal variance with pedigree 1.06, pedigree (1,1,5,1,1)
  (same comment as for Calcium)
- Aluminium [water, ground-, long-term]: 0.000143 kg; lognormal variance with pedigree 0.85, pedigree (1,1,5,1,1)
  (same comment as for Titanium, ion)
- Nickel, ion [water, ground-, long-term]: 1.33e-5 kg; lognormal variance with pedigree 1.21, pedigree (1,1,5,1,1)
  (same comment as for Titanium, ion)
- Antimony [water, surface water]: 1.11e-5 kg; lognormal variance with pedigree 0.97, pedigree (1,1,5,1,1)
  (same comment as for Calcium, ion)
- Iron, ion [water, surface water]: 1.02e-6 kg; lognormal variance with pedigree 0.55, pedigree (1,1,5,1,1)
  (same comment as for Calcium, ion)
- Beryllium [water, ground-, long-term]: 3.89e-7 kg; lognormal variance with pedigree 1.48, pedigree (1,1,5,1,1)
  (same comment as for Titanium, ion)
- TOC, Total Organic Carbon [water, surface water]: 1.45e-5 kg; lognormal variance with pedigree 0.28, pedigree (1,1,5,1,1)
  (same comment as for Calcium, ion)
- Mercury [water, ground-, long-term]: 3.06e-8 kg; lognormal variance with pedigree 3.44, pedigree (1,1,5,1,1)
  (same comment as for Titanium, ion)
- COD, Chemical Oxygen Demand [water, surface water]: 3.55e-5 kg; lognormal variance with pedigree 0.29, pedigree (1,1,5,1,1)
  (same comment as for Calcium, ion)
- Zinc, ion [water, surface water]: 2.6e-8 kg; lognormal variance with pedigree 0.85, pedigree (1,1,5,1,1)
  (same comment as for Calcium, ion)
- Antimony [air, urban air close to ground]: 1.25e-13 kg; lognormal variance with pedigree 1.28, pedigree (1,1,5,1,1)
  (same comment as for Calcium)
- Cobalt [air, urban air close to ground]: 6.94e-13 kg; lognormal variance with pedigree 1.31, pedigree (1,1,5,1,1)
  (same comment as for Calcium)
- Fluoride [water, surface water]: 1.1e-6 kg; lognormal variance with pedigree 0.91, pedigree (1,1,5,1,1)
  (same comment as for Calcium, ion)
- Beryllium [air, urban air close to ground]: 4.83e-10 kg; lognormal variance with pedigree 1.72, pedigree (1,1,5,1,1)
  (same comment as for Calcium)
- Sulfate [water, surface water]: 0.000392 kg; lognormal variance with pedigree 0.36, pedigree (1,1,5,1,1)
  (same comment as for Calcium, ion)
- Fluoride [water, ground-, long-term]: 1.27e-5 kg; lognormal variance with pedigree 0.87, pedigree (1,1,5,1,1)
  (same comment as for Titanium, ion)
- Thallium [air, urban air close to ground]: 3.86e-10 kg; lognormal variance with pedigree 1.75, pedigree (1,1,5,1,1)
  (same comment as for Calcium)
- Hydrogen fluoride [air, urban air close to ground]: 7.52e-9 kg; lognormal variance with pedigree 1.28, pedigree (1,1,5,1,1)
  (same comment as for Calcium)
- Sodium [air, urban air close to ground]: 1.33e-5 kg; lognormal variance with pedigree 0.66, pedigree (1,1,5,1,1)
  (same comment as for Calcium)
- Calcium, ion [water, ground-, long-term]: 0.00068 kg; lognormal variance with pedigree 0.71, pedigree (1,1,5,1,1)
  (same comment as for Titanium, ion)
- Zinc [air, urban air close to ground]: 2.31e-9 kg; lognormal variance with pedigree 1, pedigree (1,1,5,1,1)
  (same comment as for Calcium)
- Bromine [water, surface water]: 4.14e-5 kg; lognormal variance with pedigree 0.92, pedigree (1,1,5,1,1)
  (same comment as for Calcium, ion)
- Aluminium [air, urban air close to ground]: 3.02e-7 kg; lognormal variance with pedigree 0.93, pedigree (1,1,5,1,1)
  (same comment as for Calcium)
- Barium [water, surface water]: 2.73e-8 kg; lognormal variance with pedigree 1.79, pedigree (1,1,5,1,1)
  (same comment as for Calcium, ion)
- BOD5, Biological Oxygen Demand [water, ground-, long-term]: 0.00428 kg; lognormal variance with pedigree 0.06, pedigree (1,1,5,1,1)
  (same comment as for Titanium, ion)
- Tin, ion [water, surface water]: 9.35e-9 kg; lognormal variance with pedigree 1.07, pedigree (1,1,5,1,1)
  (same comment as for Calcium, ion)
- Sulfate [water, ground-, long-term]: 0.00202 kg; lognormal variance with pedigree 0.43, pedigree (1,1,5,1,1)
  (same comment as for Titanium, ion)
- Cadmium, ion [water, surface water]: 5.45e-9 kg; lognormal variance with pedigree 1.25, pedigree (1,1,5,1,1)
  (same comment as for Calcium, ion)
- Magnesium [water, ground-, long-term]: 2.67e-5 kg; lognormal variance with pedigree 1.15, pedigree (1,1,5,1,1)
  (same comment as for Titanium, ion)
- Copper, ion [water, surface water]: 9.83e-7 kg; lognormal variance with pedigree 1.01, pedigree (1,1,5,1,1)
  (same comment as for Calcium, ion)
- Chromium [air, urban air close to ground]: 2.32e-12 kg; lognormal variance with pedigree 1.25, pedigree (1,1,5,1,1)
  (same comment as for Calcium)
- Carbon dioxide, fossil [air, urban air close to ground]: 1.92 kg; lognormal variance with pedigree 0.05, pedigree (1,1,5,1,1)
  (same comment as for Calcium)
- Strontium [water, surface water]: 5.38e-8 kg; lognormal variance with pedigree 1.73, pedigree (1,1,5,1,1)
  (same comment as for Calcium, ion)
- Tin [air, urban air close to ground]: 3.34e-7 kg; lognormal variance with pedigree 0.89, pedigree (1,1,5,1,1)
  (same comment as for Calcium)
- Dinitrogen monoxide [air, urban air close to ground]: 4.51e-6 kg; lognormal variance with pedigree 1.71, pedigree (1,1,5,1,1)
  uncertainty calculated from uncertainty in average N-emissions, uncertainty in the share of thermal NOx, uncertainty of nitrogen content in average municipal waste and the unertainty in nitrogen content in *this* waste.
- Barium [water, ground-, long-term]: 0.000176 kg; lognormal variance with pedigree 0.96, pedigree (1,1,5,1,1)
  (same comment as for Titanium, ion)
- Manganese [air, urban air close to ground]: 3.44e-13 kg; lognormal variance with pedigree 1.19, pedigree (1,1,5,1,1)
  (same comment as for Calcium)
- Strontium [water, ground-, long-term]: 8.53e-5 kg; lognormal variance with pedigree 1.02, pedigree (1,1,5,1,1)
  (same comment as for Titanium, ion)
- Carbon monoxide, fossil [air, urban air close to ground]: 0.000223 kg; lognormal variance with pedigree 0.690625, pedigree (1,3,5,2,1)
  Literature data from switzerland and germany adapted to plant age distribution in switzerland
  Uncertainty: & basic uncertainty of 5; literature data from switzerland and germany adapted to plant age distribution in switzerland
- Nitrogen oxides [air, urban air close to ground]: 3.4e-5 kg; lognormal variance with pedigree 1.71, pedigree (1,1,5,1,1)
  (same comment as for Dinitrogen monoxide)
- Selenium [water, surface water]: 6.6e-7 kg; lognormal variance with pedigree 1.21, pedigree (1,1,5,1,1)
  (same comment as for Calcium, ion)
- Chromium, ion [water, surface water]: 1e-7 kg; lognormal variance with pedigree 1.17, pedigree (1,1,5,1,1)
  (same comment as for Calcium, ion)
- Thallium [water, ground-, long-term]: 2.25e-7 kg; lognormal variance with pedigree 1.31, pedigree (1,1,5,1,1)
  (same comment as for Titanium, ion)
- Thallium [water, surface water]: 2.37e-10 kg; lognormal variance with pedigree 1.91, pedigree (1,1,5,1,1)
  (same comment as for Calcium, ion)
- Manganese [water, ground-, long-term]: 5.43e-5 kg; lognormal variance with pedigree 1.15, pedigree (1,1,5,1,1)
  (same comment as for Titanium, ion)
- Titanium, ion [water, surface water]: 4.65e-9 kg; lognormal variance with pedigree 2.06, pedigree (1,1,5,1,1)
  (same comment as for Calcium, ion)
- Lead [air, urban air close to ground]: 6.34e-10 kg; lognormal variance with pedigree 1.28, pedigree (1,1,5,1,1)
  (same comment as for Calcium)
- Magnesium [air, urban air close to ground]: 3.98e-8 kg; lognormal variance with pedigree 1.19, pedigree (1,1,5,1,1)
  (same comment as for Calcium)
- Vanadium, ion [water, surface water]: 5.8e-7 kg; lognormal variance with pedigree 0.96, pedigree (1,1,5,1,1)
  (same comment as for Calcium, ion)
- Zinc, ion [water, ground-, long-term]: 2.19e-6 kg; lognormal variance with pedigree 5.54, pedigree (1,1,5,1,1)
  (same comment as for Titanium, ion)
- Ammonia [air, urban air close to ground]: 8.47e-7 kg; lognormal variance with pedigree 1.71, pedigree (1,1,5,1,1)
  (same comment as for Dinitrogen monoxide)
- Hydrogen chloride [air, urban air close to ground]: 3.39e-6 kg; lognormal variance with pedigree 0.13, pedigree (1,1,5,1,1)
  (same comment as for Calcium)
- Arsenic, ion [water, surface water]: 8.27e-7 kg; lognormal variance with pedigree 1.29, pedigree (1,1,5,1,1)
  (same comment as for Calcium, ion)
- Vanadium [air, urban air close to ground]: 8.6e-8 kg; lognormal variance with pedigree 0.75, pedigree (1,1,5,1,1)
  (same comment as for Calcium)
- Lead [water, surface water]: 4.76e-10 kg; lognormal variance with pedigree 1.23, pedigree (1,1,5,1,1)
  (same comment as for Calcium, ion)
- Chloride [water, surface water]: 0.298 kg; lognormal variance with pedigree 0.07, pedigree (1,1,5,1,1)
  (same comment as for Calcium, ion)
- Nickel, ion [water, surface water]: 8.92e-9 kg; lognormal variance with pedigree 1.84, pedigree (1,1,5,1,1)
  (same comment as for Calcium, ion)
- Sodium, ion [water, ground-, long-term]: 0.0011 kg; lognormal variance with pedigree 0.43, pedigree (1,1,5,1,1)
  (same comment as for Titanium, ion)
- DOC, Dissolved Organic Carbon [water, surface water]: 1.45e-5 kg; lognormal variance with pedigree 0.28, pedigree (1,1,5,1,1)
  (same comment as for Calcium, ion)
- Methane, fossil [air, urban air close to ground]: 6.38e-6 kg; lognormal variance with pedigree 0.091225, pedigree (2,3,5,2,1)
  Confidential data from 5 plants in Switzerland and Germany
  Uncertainty: & basic uncertainty of 1.5; confidential data from 5 plants in Switzerland and Germany
- Beryllium [water, surface water]: 3e-10 kg; lognormal variance with pedigree 1.94, pedigree (1,1,5,1,1)
  (same comment as for Calcium, ion)
- Iron, ion [water, ground-, long-term]: 0.0014 kg; lognormal variance with pedigree 1.33, pedigree (1,1,5,1,1)
  (same comment as for Titanium, ion)
- Antimony [water, ground-, long-term]: 2.05e-5 kg; lognormal variance with pedigree 0.94, pedigree (1,1,5,1,1)
  (same comment as for Titanium, ion)
- Sulfur dioxide [air, urban air close to ground]: 3.44e-6 kg; lognormal variance with pedigree 0.74, pedigree (1,1,5,1,1)
  (same comment as for Calcium)
- Cobalt [water, surface water]: 3.74e-9 kg; lognormal variance with pedigree 1.65, pedigree (1,1,5,1,1)
  (same comment as for Calcium, ion)
- Chloride [water, ground-, long-term]: 0.0072 kg; lognormal variance with pedigree 0.06, pedigree (1,1,5,1,1)
  (same comment as for Titanium, ion)
- Lead [water, ground-, long-term]: 1.22e-6 kg; lognormal variance with pedigree 7.28, pedigree (1,1,5,1,1)
  (same comment as for Titanium, ion)
- Nitrate [water, surface water]: 1.37e-5 kg; lognormal variance with pedigree 0.49, pedigree (1,1,5,1,1)
  (same comment as for Calcium, ion)
- Cadmium [air, urban air close to ground]: 6.61e-10 kg; lognormal variance with pedigree 1.32, pedigree (1,1,5,1,1)
  (same comment as for Calcium)
- DOC, Dissolved Organic Carbon [water, ground-, long-term]: 0.00518 kg; lognormal variance with pedigree 0.06, pedigree (1,1,5,1,1)
  (same comment as for Titanium, ion)
- Chromium VI [water, surface water]: 1.02e-6 kg; lognormal variance with pedigree 1.09, pedigree (1,1,5,1,1)
  (same comment as for Calcium, ion)
- Cobalt [water, ground-, long-term]: 1.91e-5 kg; lognormal variance with pedigree 1.15, pedigree (1,1,5,1,1)
  (same comment as for Titanium, ion)
- Selenium [air, urban air close to ground]: 1.02e-14 kg; lognormal variance with pedigree 1.63, pedigree (1,1,5,1,1)
  (same comment as for Calcium)
- Manganese [water, surface water]: 3.53e-9 kg; lognormal variance with pedigree 1.83, pedigree (1,1,5,1,1)
  (same comment as for Calcium, ion)
- Mercury [air, urban air close to ground]: 2.03e-14 kg; lognormal variance with pedigree 1.78, pedigree (1,1,5,1,1)
  (same comment as for Calcium)
- Tin, ion [water, ground-, long-term]: 0.000127 kg; lognormal variance with pedigree 1.27, pedigree (1,1,5,1,1)
  (same comment as for Titanium, ion)
- Vanadium, ion [water, ground-, long-term]: 0.000148 kg; lognormal variance with pedigree 1.47, pedigree (1,1,5,1,1)
  (same comment as for Titanium, ion)
- Sodium, ion [water, surface water]: 0.000306 kg; lognormal variance with pedigree 0.35, pedigree (1,1,5,1,1)
  (same comment as for Calcium, ion)
- Mercury [water, surface water]: 6.3e-9 kg; lognormal variance with pedigree 1.64, pedigree (1,1,5,1,1)
  (same comment as for Calcium, ion)
- Copper, ion [water, ground-, long-term]: 0.0196 kg; lognormal variance with pedigree 0.31, pedigree (1,1,5,1,1)
  (same comment as for Titanium, ion)
- Cyanide [air, urban air close to ground]: 9.62e-7 kg; lognormal variance with pedigree 1.71, pedigree (1,1,5,1,1)
  (same comment as for Dinitrogen monoxide)
- TOC, Total Organic Carbon [water, ground-, long-term]: 0.00518 kg; lognormal variance with pedigree 0.06, pedigree (1,1,5,1,1)
  (same comment as for Titanium, ion)
- Magnesium [water, surface water]: 1.01e-7 kg; lognormal variance with pedigree 1.64, pedigree (1,1,5,1,1)
  (same comment as for Calcium, ion)
- Nitrate [water, ground-, long-term]: 3.84e-5 kg; lognormal variance with pedigree 0.7, pedigree (1,1,5,1,1)
  (same comment as for Titanium, ion)
- Titanium [air, urban air close to ground]: 9.66e-7 kg; lognormal variance with pedigree 0.72, pedigree (1,1,5,1,1)
  (same comment as for Calcium)
- Aluminium [water, surface water]: 1.61e-8 kg; lognormal variance with pedigree 1.21, pedigree (1,1,5,1,1)
  (same comment as for Calcium, ion)
- Bromine [water, ground-, long-term]: 8.78e-6 kg; lognormal variance with pedigree 1.09, pedigree (1,1,5,1,1)
  (same comment as for Titanium, ion)

## Sampling procedure
waste-specific calculation based on literature data

## Extrapolations
This dataset has been extrapolated from year 2000 to the year of the calculation (2021). The uncertainty has been adjusted accordingly.

## Review by Niels Jungbluth 2003-07-15
Passed. Calculation for standard deviation 95 of, i.e., infrastructure,
land occupation, transport services or other services can differ from
standard Pedigree approach used in this project and figures obtained by
this procedure.
