# sawmill construction

Dataset: EcoSpold 2, unit process
Geography: CH
Time period: 2012-01-01 to 2021-12-31
Technology level: current
Classification: ISIC rev.4 ecoinvent: 4290:Construction of other civil engineering projects
Synonyms: sawing mill
Tags: Swiss brush-up completed
Scenario: Business-as-Usual
System model: Allocation, cut-off by classification
Generated by: Frank Werner
Published in: Werner F. 2007
Database: ecoinvent
isCopyrightProtected: true
accessRestrictedTo: 1

## General comment
The service life is assumed to be 50 years. The DS has been adjusted from the ecoinvent 2.2 report to represent an average size sawmill for Switzerland around 2012.

## Included activities end
The land area and the material and their transports needed for building and disposal of a sawmill with a yearly output of 50'000 m3 sawn timber is included. Land used for air drying of wood is not included.

## Technology
Sawmill with it's input wood storage place, a lop station, a hall with the saw and a conveyer belt.

## Reference product
- sawmill: 1 unit; name m_sawmill; CPC 53269: Other constructions for manufacturing; By-product classification allocatable product
  production volume 0.0493 unit; name p_sawmill
    This is a placeholder value that does not reflect real-world production volumes. This dataset does not currently require a real-world production volume to work in the database framework, and no actual data were collected yet. This has no negative effect on the results of the ecoinvent database. The placeholder value of this activity was scaled according to the nominal GDP of 2005 (source: United Nations, http://data.un.org/Glossary.aspx?q=GDP+%28current+US%24%29, accessed 20130726) to reflect an appropriate share of the global production volume, which is also a placeholder value.
  property price 3.30561e6 EUR2005
    Calculated based on inputs: The price of the product has been calculated as a sum of the values of the material and energy inputs for this product. This value is therefore a rough estimation. It may underestimate the real price since there are additional expenses when producing any product. These expences can include for example labour costs, treatment of waste materials and profit for the producer. Please consider carefully whether this level of data quality is acceptable for your application.
  property lifetime capacity in m3 51539.6 m3; = 1752345/1700*50
    Average annual roundwood production divided by 1700 sawmills in Switzerland x 50 years (http://www.bfs.admin.ch/bfs/portal/de/index/themen/07/04/blank/key/holzverarbeitung.html)

## Inputs from technosphere
- waste bulk iron, excluding reinforcement: -919600 kg; = (m_cast_iron+m_steel_low_alloyed)*-1; lognormal variance with pedigree 0.0342, pedigree (2,3,4,1,1)
  sum of steel inputs
  production volume 45336.3 kg
    Calculated from production volume of reference product using the relative outputs.
  properties: wet mass 1 kg, dry mass 1 kg
- reinforcing steel: 33440 kg; name m_reinforcing_steel; = m_concrete*80; lognormal variance with pedigree 0.0416, pedigree (4,3,4,1,1)
  With 80 kg of reinforcing steel per m3 of reinforced
  concrete
  properties: wet mass 1 kg, UVEK_link_1 3785, dry mass 1 kg, carbon content, fossil 0.004, UVEK_relative_amount_1 1
  note on UVEK_link_1: to be used only in special submissions in coordination with ecoinvent and the Swiss FOEN
- cast iron: 449350 kg; name m_cast_iron; lognormal variance with pedigree 0.051, pedigree (3,5,4,1,3)
  for machinery (personal communication, HIS)
  properties: wet mass 1 kg, carbon content, fossil 0.04, UVEK_relative_amount_1 1, UVEK_link_1 401, dry mass 1 kg
  note on carbon content, fossil: Cast iron is made by remelting pig iron in small furnaces (e.g. cupola furnaces or electric arc furnaces) and poured into moulds to make castings. It usually contains 2% to 6% carbon (ecoinvent v2.2 report 10_partII). An average content of 4% was considered
- steel, low-alloyed, hot rolled: 470250 kg; name m_steel_low_alloyed; lognormal variance with pedigree 0.051, pedigree (3,5,4,1,3)
  For machinery
  properties: dry mass 1 kg, UVEK_relative_amount_1 1, UVEK_link_1 4222, carbon content, fossil 0.005, UVEK_link_2 2662, wet mass 1 kg, UVEK_relative_amount_2 1
  note on carbon content, fossil: Low alloyed steel composition given in Tab. 3.2 ecoinvent v2.2 report 10_partII. Steel assumed to have a C content of 0.5%
- waste reinforced concrete: -955130 kg; name w_reinforcing_concrete; = (m_concrete*2205+m_reinforcing_steel)*-1; lognormal variance with pedigree 0.051, pedigree (3,5,4,1,3)
  quantified with a density for concrete of 2205 kg/m3
  production volume 47087.9 kg; = w_reinforcing_concrete/m_sawmill*p_sawmill
    Calculated from the production volume of sawmill in proportion to the respective output amounts.
  properties: water content 0.00585407, UVEK_link_1 883, dry mass 0.99418 kg, UVEK_relative_amount_1 -1, wet mass 1 kg
- concrete, sole plate and foundation: 418 m3; name m_concrete; lognormal variance with pedigree 0.051, pedigree (3,5,4,1,3)
  foundations under building, proportional to the sizes of the building halls for CH and as given in ecoinvent 2.2 report (personal communication, HIS); source of original data: Life cycle inventories of wood as fuel and construction material, Duebendorf, November 2002. Centre for life cycle inventories in the ETH domain, Duebendorf.
  properties: water content 0.0816327, wet mass 2385 kg, UVEK_relative_amount_1 1, UVEK_link_1 566, dry mass 2205 kg
- building, hall: 4279 m2; lognormal variance with pedigree 0.576, pedigree (3,5,4,1,3)
  area of buildings on average sawmill (personal communication, HIS)
  This exchange has an activity link directly to the producing activity because the product is primarily consumed in the same geographical area where it is produced.
  properties: UVEK_relative_amount_9 58.6586, UVEK_relative_amount_1 1, UVEK_link_9 4433, UVEK_link_8 4416, UVEK_link_1 342
  note on UVEK_relative_amount_9: Scaling factor = amount of transport in corresponding KBOB dataset/amount of this input from technosphere. Source for transport distance: Werner F. (2017): Background report for the life cycle inventories of wood and wood based products for updates of ecoinvent 2.2. Werner Environment & Development. To be used only in special submissions in coordination with ecoinvent and the Swiss FOEN
  note on UVEK_link_9: This link has been introduced to model transport specifically for the SAM model; to be used only in special submissions in coordination with ecoinvent and the Swiss FOEN.
- conveyor belt: 1232 m; lognormal variance with pedigree 0.051, pedigree (3,5,4,1,3)
  based on CH data on average size of sawmill (personal communication, HIS)
  properties: UVEK_link_1 579, UVEK_relative_amount_1 1

## Inputs from nature
- Transformation, to industrial area [natural resource, land]: 19700 m2; = total_area; lognormal variance with pedigree 0.376, pedigree (3,5,4,1,3)
  based on CH data on average size of sawmill (personal communication, HIS)
- Occupation, industrial area [natural resource, land]: 985000 m2*year; = total_area*50; lognormal variance with pedigree 0.226, pedigree (3,5,4,1,3)
  land occupation assumed for 50 years
- Transformation, from unspecified [natural resource, land]: 19700 m2; name total_area; lognormal variance with pedigree 0.376, pedigree (3,5,4,1,3)
  based on CH data on average size of sawmill (personal communication, HIS)

## Sampling procedure
estimation

## Extrapolations
This dataset has been extrapolated from year 2013 to the year of the calculation (2021). The uncertainty has been adjusted accordingly.
