# treatment of waste plastic, mixture, unsanitary landfill, dry infiltration class (100mm)

Dataset: EcoSpold 2, unit process
Geography: GLO
Time period: 2006-01-01 to 2021-12-31
Technology level: current
Classification: ISIC rev.4 ecoinvent: 3821:Treatment and disposal of non-hazardous waste
Synonyms: municipal waste landfill
Scenario: Business-as-Usual
System model: Allocation, cut-off by classification
Share of production covered: 1 %
Generated by: Avraam Symeonidis
Database: ecoinvent
isCopyrightProtected: true
accessRestrictedTo: 1

## General comment
This dataset represents the activity of waste disposal of waste plastic, mixture in a unsanitary landfill. Recommended use of this dataset: For plastic mixture, which goes to disposal as part of managed communal waste mixture. // Waste composition (wet, in ppm): upper heating value 34.05 MJ/kg; lower heating value 30.79 MJ/kg; H2O 153000; O 73717; H 105910; C 633590; S 1406.7; N 6112; P n.a.; B n.a.; Cl 18131; Br 65.319; F 13.717; I n.a.; Ag n.a.; As 1.7729; Ba 174.03; Cd 75.786; Co 29.478; Cr 38.132; Cu 296.41; Hg 0.79234; Mn 74.574; Mo n.a.; Ni 19.222; Pb 435.81; Sb 40.093; Se 1.9596; Sn 24.453; V 268.88; Zn 521.69; Be 0.46656; Sc n.a.; Sr 82.582; Ti 933.13; Tl 0.37325; W n.a.; Si n.a.; Fe 3476.5; Ca n.a.; Al 186.63; K n.a.; Mg n.a.; Na 1367.5; . // Share of carbon in waste that is biogenic 0%. Share of metals in waste not oxidised and bulk-recyclable (exclude very small or thin parts) Iron: 0%; Alu: 0%; Copper: 0%. Overall degradability of waste during 100 years: 1%.

## Included activities start
from final waste deposition (without transports to the site)

## Included activities end
Waste-specific short-term emissions to air via landfill gas and landfill leachate. Waste-specific long-term emissions from landfill.

## Geography
Given name of landfill location is 'infiltration class 2 dry (2018)'. Landfill site with mean annual temperature (MAT) of 8 degC, mean annual precipitation (MAP) of 550 mm/year, and net infiltration of 100 mm/year.
Climate adjustments result in an alpha t (temperature) for permafrost areas of 0.999. Total climate adjustments with alpha pt of 0.999.

## Technology
This is an inventory for an unsanitary, sub-controlled landfill for municipal solid waste. Ultimate average landfill height is 15 meters. Operation phase duration is 25 years.Percentage of landfill gas directly emitted is 100w%.
Leachate of the landfill is not treated. Based on average waste composition and climate data the end of carbonate phase is estimated to be reached 16577 years after waste deposition.

## Reference product
- waste plastic, mixture: -1 kg; By-product classification Waste; CPC 39270: Waste, parings and scrap of plastics; pedigree (1,1,1,1,1)
  main reference product of this activity (supply of disposal service).
  Uncertainty: Uncertainty is not adjusted, as this is the refence product
  production volume 1 kg
    The amount of the annual production volume is a placeholder value. The contribution of this technology to the different local markets can be found in the markets themselves.
  property price 0 EUR2005
    Waste products are assigned a price of zero as they are assumed to require further treatment.
  property heating value, net 30.79 MJ
    Value taken from the general comment of the treatment dataset.
  property carbon content 0.74805
    carbon content on a dry matter basis (reserved; not for manual entry)
  properties: tin content 2.887e-5, titanium content 0.0011017, carbon content, fossil 0.74805, selenium content 2.3135e-6, water content 0.18064, wet mass 1 kg, dry mass 0.847 kg, water in wet mass 0.153 kg, iron content 0.0041045, aluminium content 0.00022034, beryllium content 5.5084e-7, zinc content 0.00061593, thallium content 4.4067e-7, strontium content 9.7499e-5, antimony content 4.7336e-5, vanadium content 0.00031745, sodium content 0.0016145, chromium content 4.502e-5, arsenic content 2.0932e-6, cadmium content 8.9476e-5, nitrogen content 0.007216, oxygen content 0.087033, fluorine content 1.6195e-5, heating value, gross 34.054 MJ, nickel content 2.2694e-5, manganese content 8.8045e-5, cobalt content 3.4802e-5, barium content 0.00020546, hydrogen content 0.12504, copper content 0.00034995, sulfur content 0.0016609, mercury content 9.3547e-7, chlorine content 0.021406, lead content 0.00051454, bromine content 7.7118e-5, carbon allocation 0.633598 kg

## Inputs from technosphere
- diesel, burned in building machine: 0.046738 MJ; lognormal variance with pedigree 0.088256, pedigree (1,1,4,1,1)
  for waste distribution and compaction.
  Uncertainty: Uncertainty calculated from uncertainty in base parameters.
  properties: heating value, net 1 MJ
- excavation, skid-steer loader: 0.00031708 m3; lognormal variance with pedigree 0.088256, pedigree (1,1,4,1,1)
  application of daily cover.
  Uncertainty: Uncertainty calculated from uncertainty in base parameters.

## Inputs from nature
- Occupation, dump site [natural resource, land]: 0.0023333 m2*year; lognormal variance with pedigree 0.088256, pedigree (1,1,4,1,1)
  for landfill operation phase and spontaneous renaturation.
  Uncertainty: Uncertainty calculated from uncertainty in base parameters.

## Emissions to nature
- Lead [air, non-urban air or from high stacks]: 8.5494e-12 kg; lognormal variance with pedigree 0.71358, pedigree (1,1,4,1,1)
  burden from direct release or incineration of landfill biogas; or windblown leachate evaporite in arid climates.
  Uncertainty: Uncertainty calculated from unertainty of the waste composition of this waste, uncertainty in waste decomposition and short-term leaching in landfill
- Tin, ion [water, ground-]: 1.4392e-9 kg; lognormal variance with pedigree 0.55179, pedigree (1,1,4,1,1)
  burden from short-term leachate to groundwater in uncontrolled landfill in moist cimate.
  Uncertainty: Uncertainty calculated from unertainty of the waste composition of this waste, uncertainty in waste decomposition and short-term leaching in landfill
- Arsenic, ion [water, ground-, long-term]: 1.7697e-6 kg; lognormal variance with pedigree 0.38175, pedigree (1,1,4,1,1)
  Emissions from long-term leachate (>100a) directly from MSW landfill and indirectly via incineration of treatement sludge from leachate treatement.
  Uncertainty: Uncertainty calculated depending on waste input and uncertainty of long-term transfer coefficents in landfill.
- Nickel [air, non-urban air or from high stacks]: 2.7904e-12 kg; lognormal variance with pedigree 0.75489, pedigree (1,1,4,1,1)
  (same comment as for Lead)
- Selenium [water, ground-]: 2.064e-9 kg; lognormal variance with pedigree 0.54002, pedigree (1,1,4,1,1)
  (same comment as for Tin, ion)
- Nitrite [water, ground-, long-term]: 0.00013226 kg; lognormal variance with pedigree 0.11481, pedigree (1,1,4,1,1)
  (same comment as for Arsenic, ion)
- Mercury [air, non-urban air or from high stacks]: 2.1685e-10 kg; lognormal variance with pedigree 0.6135, pedigree (1,1,4,1,1)
  (same comment as for Lead)
- Lead [water, ground-]: 2.5648e-8 kg; lognormal variance with pedigree 0.4561, pedigree (1,1,4,1,1)
  (same comment as for Tin, ion)
- Chloride [water, ground-, long-term]: 0.017668 kg; lognormal variance with pedigree 0.08244, pedigree (1,1,4,1,1)
  (same comment as for Arsenic, ion)
- Manganese [air, non-urban air or from high stacks]: 2.1327e-10 kg; lognormal variance with pedigree 0.61421, pedigree (1,1,4,1,1)
  (same comment as for Lead)
- Manganese [water, ground-]: 8.5308e-7 kg; lognormal variance with pedigree 0.34542, pedigree (1,1,4,1,1)
  (same comment as for Tin, ion)
- Nitrate [water, ground-, long-term]: 0.00025555 kg; lognormal variance with pedigree 0.11481, pedigree (1,1,4,1,1)
  (same comment as for Arsenic, ion)
- Chromium [air, non-urban air or from high stacks]: 1.0853e-12 kg; lognormal variance with pedigree 0.78303, pedigree (1,1,4,1,1)
  (same comment as for Lead)
- Nickel, ion [water, ground-]: 1.1162e-8 kg; lognormal variance with pedigree 0.48425, pedigree (1,1,4,1,1)
  (same comment as for Tin, ion)
- Bromine [water, ground-, long-term]: 6.3653e-5 kg; lognormal variance with pedigree 0.2627, pedigree (1,1,4,1,1)
  (same comment as for Arsenic, ion)
- Copper [air, non-urban air or from high stacks]: 4.1422e-12 kg; lognormal variance with pedigree 0.73674, pedigree (1,1,4,1,1)
  (same comment as for Lead)
- Copper, ion [water, ground-]: 1.4498e-8 kg; lognormal variance with pedigree 0.47497, pedigree (1,1,4,1,1)
  (same comment as for Tin, ion)
- Ammonium, ion [water, ground-, long-term]: 0.00243 kg; lognormal variance with pedigree 0.11481, pedigree (1,1,4,1,1)
  (same comment as for Arsenic, ion)
- Cadmium [air, non-urban air or from high stacks]: 8.8797e-10 kg; lognormal variance with pedigree 0.56749, pedigree (1,1,4,1,1)
  (same comment as for Lead)
- Mercury [water, ground-]: 5.4212e-10 kg; lognormal variance with pedigree 0.58344, pedigree (1,1,4,1,1)
  (same comment as for Tin, ion)
- Nitrogen, organic bound [water, ground-, long-term]: 0.0039716 kg; lognormal variance with pedigree 0.11481, pedigree (1,1,4,1,1)
  (same comment as for Arsenic, ion)
- Cobalt [air, non-urban air or from high stacks]: 2.3659e-11 kg; lognormal variance with pedigree 0.68622, pedigree (1,1,4,1,1)
  (same comment as for Lead)
- Cobalt [water, ground-]: 9.4634e-8 kg; lognormal variance with pedigree 0.41508, pedigree (1,1,4,1,1)
  (same comment as for Tin, ion)
- Hydrogen sulfide [water, ground-, long-term]: 0.00010202 kg; lognormal variance with pedigree 0.16131, pedigree (1,1,4,1,1)
  (same comment as for Arsenic, ion)
- Bromine [air, non-urban air or from high stacks]: 2.3032e-8 kg; lognormal variance with pedigree 0.45996, pedigree (1,1,4,1,1)
  (same comment as for Lead)
- Chromium VI [water, ground-]: 4.3414e-9 kg; lognormal variance with pedigree 0.51518, pedigree (1,1,4,1,1)
  (same comment as for Tin, ion)
- Sulfate [water, ground-, long-term]: 0.0039137 kg; lognormal variance with pedigree 0.16131, pedigree (1,1,4,1,1)
  (same comment as for Arsenic, ion)
- Barium [air, non-urban air or from high stacks]: 4.9769e-10 kg; lognormal variance with pedigree 0.58602, pedigree (1,1,4,1,1)
  (same comment as for Lead)
- Cadmium, ion [water, ground-]: 1.332e-7 kg; lognormal variance with pedigree 0.40278, pedigree (1,1,4,1,1)
  (same comment as for Tin, ion)
- BOD5, Biological Oxygen Demand [water, ground-, long-term]: 0.16242 kg; lognormal variance with pedigree 0.0095771, pedigree (1,1,4,1,1)
  (same comment as for Arsenic, ion)
- Arsenic [air, non-urban air or from high stacks]: 4.4589e-11 kg; lognormal variance with pedigree 0.66632, pedigree (1,1,4,1,1)
  (same comment as for Lead)
- Barium [water, ground-]: 1.9908e-6 kg; lognormal variance with pedigree 0.31723, pedigree (1,1,4,1,1)
  (same comment as for Tin, ion)
- TOC, Total Organic Carbon [water, ground-, long-term]: 0.62727 kg; lognormal variance with pedigree 0.0095771, pedigree (1,1,4,1,1)
  (same comment as for Arsenic, ion)
- Hydrogen fluoride [air, non-urban air or from high stacks]: 5.4613e-8 kg; lognormal variance with pedigree 0.43532, pedigree (1,1,4,1,1)
  (same comment as for Lead)
- Arsenic, ion [water, ground-]: 3.1807e-9 kg; lognormal variance with pedigree 0.52614, pedigree (1,1,4,1,1)
  (same comment as for Tin, ion)
- COD, Chemical Oxygen Demand [water, ground-, long-term]: 0.68607 kg; lognormal variance with pedigree 0.0095771, pedigree (1,1,4,1,1)
  (same comment as for Arsenic, ion)
- Hydrogen chloride [air, non-urban air or from high stacks]: 6.5732e-6 kg; lognormal variance with pedigree 0.2797, pedigree (1,1,4,1,1)
  (same comment as for Lead)
- Chloride [water, ground-]: 0.00045603 kg; lognormal variance with pedigree 0.14708, pedigree (1,1,4,1,1)
  (same comment as for Tin, ion)
- DOC, Dissolved Organic Carbon [water, ground-, long-term]: 0.62727 kg; lognormal variance with pedigree 0.0095771, pedigree (1,1,4,1,1)
  (same comment as for Arsenic, ion)
- Nitrogen oxides [air, non-urban air or from high stacks]: 8.3727e-8 kg; lognormal variance with pedigree 0.27374, pedigree (1,1,4,1,1)
  burden from direct release or incineration of landfill biogas.
  Uncertainty: Uncertainty calculated from unertainty of the waste composition of this waste, uncertainty in waste decomposition and short-term leaching in landfill
- Fluoride [water, ground-]: 1.0065e-8 kg; lognormal variance with pedigree 0.4878, pedigree (1,1,4,1,1)
  (same comment as for Tin, ion)
- Methane, fossil [air, non-urban air or from high stacks]: 0.0045836 kg; lognormal variance with pedigree 0.11263, pedigree (1,1,4,1,1)
  (same comment as for Nitrogen oxides)
- Bromine [water, ground-]: 1.6429e-6 kg; lognormal variance with pedigree 0.32734, pedigree (1,1,4,1,1)
  (same comment as for Tin, ion)
- Sulfur dioxide [air, non-urban air or from high stacks]: 1.8336e-6 kg; lognormal variance with pedigree 0.33845, pedigree (1,1,4,1,1)
  (same comment as for Nitrogen oxides)
- Nitrite [water, ground-]: 3.1659e-6 kg; lognormal variance with pedigree 0.18152, pedigree (1,1,4,1,1)
  (same comment as for Tin, ion)
- Nitrate [water, ground-]: 6.1173e-6 kg; lognormal variance with pedigree 0.18152, pedigree (1,1,4,1,1)
  (same comment as for Tin, ion)
- Carbon dioxide, fossil [air, non-urban air or from high stacks]: 0.0099236 kg; lognormal variance with pedigree 0.102501, pedigree (1,1,4,1,1)
  (same comment as for Nitrogen oxides)
- Nitrogen, organic bound [water, ground-]: 9.5071e-5 kg; lognormal variance with pedigree 0.18152, pedigree (1,1,4,1,1)
  (same comment as for Tin, ion)
- Sodium, ion [water, ground-, long-term]: 0.001311 kg; lognormal variance with pedigree 0.16227, pedigree (1,1,4,1,1)
  (same comment as for Arsenic, ion)
- Hydrogen sulfide [water, ground-]: 3.8114e-7 kg; lognormal variance with pedigree 0.28263, pedigree (1,1,4,1,1)
  (same comment as for Tin, ion)
- Thallium [water, ground-, long-term]: 3.7303e-7 kg; lognormal variance with pedigree 0.4321, pedigree (1,1,4,1,1)
  (same comment as for Arsenic, ion)
- Ammonium, ion [water, ground-]: 5.8168e-5 kg; lognormal variance with pedigree 0.18152, pedigree (1,1,4,1,1)
  (same comment as for Tin, ion)
- Aluminium [water, ground-, long-term]: 0.00018653 kg; lognormal variance with pedigree 0.22776, pedigree (1,1,4,1,1)
  (same comment as for Arsenic, ion)
- TOC, Total Organic Carbon [water, ground-]: 0.00018432 kg; lognormal variance with pedigree 0.21318, pedigree (1,1,4,1,1)
  (same comment as for Tin, ion)
- Iron, ion [water, ground-, long-term]: 0.003476 kg; lognormal variance with pedigree 0.13237, pedigree (1,1,4,1,1)
  (same comment as for Arsenic, ion)
- DOC, Dissolved Organic Carbon [water, ground-]: 0.00018432 kg; lognormal variance with pedigree 0.21318, pedigree (1,1,4,1,1)
  (same comment as for Tin, ion)
- Strontium [water, ground-, long-term]: 8.2534e-5 kg; lognormal variance with pedigree 0.25488, pedigree (1,1,4,1,1)
  (same comment as for Arsenic, ion)
- COD, Chemical Oxygen Demand [water, ground-]: 0.0002016 kg; lognormal variance with pedigree 0.21318, pedigree (1,1,4,1,1)
  (same comment as for Tin, ion)
- Titanium, ion [water, ground-, long-term]: 0.00093266 kg; lognormal variance with pedigree 0.17466, pedigree (1,1,4,1,1)
  (same comment as for Arsenic, ion)
- Sulfate [water, ground-]: 1.4621e-5 kg; lognormal variance with pedigree 0.28263, pedigree (1,1,4,1,1)
  (same comment as for Tin, ion)
- Vanadium, ion [water, ground-, long-term]: 0.00018526 kg; lognormal variance with pedigree 0.2243, pedigree (1,1,4,1,1)
  (same comment as for Arsenic, ion)
- BOD5, Biological Oxygen Demand [water, ground-]: 4.7726e-5 kg; lognormal variance with pedigree 0.21318, pedigree (1,1,4,1,1)
  (same comment as for Tin, ion)
- Beryllium [water, ground-, long-term]: 4.6629e-7 kg; lognormal variance with pedigree 0.42494, pedigree (1,1,4,1,1)
  (same comment as for Arsenic, ion)
- Sodium [air, non-urban air or from high stacks]: 1.4131e-8 kg; lognormal variance with pedigree 0.47611, pedigree (1,1,4,1,1)
  (same comment as for Lead)
- Zinc, ion [water, ground-, long-term]: 0.00052145 kg; lognormal variance with pedigree 0.19373, pedigree (1,1,4,1,1)
  (same comment as for Arsenic, ion)
- Heat, waste [water, ground-, long-term]: 33.714 MJ; lognormal variance with pedigree 0.020651, pedigree (1,1,4,1,1)
  burden from long-term decomposition of waste (>100a).
  Uncertainty: Uncertainty calculated from unertainty of the waste composition of this waste, uncertainty in waste decomposition and short-term leaching in landfill
- Selenium [water, ground-, long-term]: 1.3226e-6 kg; lognormal variance with pedigree 0.38814, pedigree (1,1,4,1,1)
  (same comment as for Arsenic, ion)
- Heat, waste [soil, industrial]: 0.23755 MJ; lognormal variance with pedigree 0.075859, pedigree (1,1,4,1,1)
  burden from short-term decomposition of waste (0-100a).
  Uncertainty: Uncertainty calculated from unertainty of the waste composition of this waste, uncertainty in waste decomposition and short-term leaching in landfill
- Tin, ion [water, ground-, long-term]: 2.4452e-5 kg; lognormal variance with pedigree 0.29535, pedigree (1,1,4,1,1)
  (same comment as for Arsenic, ion)
- Iron [air, non-urban air or from high stacks]: 1.1924e-10 kg; lognormal variance with pedigree 0.62904, pedigree (1,1,4,1,1)
  (same comment as for Lead)
- Lead [water, ground-, long-term]: 0.00043579 kg; lognormal variance with pedigree 0.19966, pedigree (1,1,4,1,1)
  (same comment as for Arsenic, ion)
- Aluminium [air, non-urban air or from high stacks]: 2.3295e-11 kg; lognormal variance with pedigree 0.68407, pedigree (1,1,4,1,1)
  (same comment as for Lead)
- Sodium, ion [water, ground-]: 5.6524e-5 kg; lognormal variance with pedigree 0.2136, pedigree (1,1,4,1,1)
  (same comment as for Tin, ion)
- Antimony [water, ground-, long-term]: 1.2089e-5 kg; lognormal variance with pedigree 0.36873, pedigree (1,1,4,1,1)
  (same comment as for Arsenic, ion)
- Thallium [air, non-urban air or from high stacks]: 5.4185e-14 kg; lognormal variance with pedigree 0.88365, pedigree (1,1,4,1,1)
  (same comment as for Lead)
- Aluminium [water, ground-]: 9.3179e-8 kg; lognormal variance with pedigree 0.41362, pedigree (1,1,4,1,1)
  (same comment as for Tin, ion)
- Nickel, ion [water, ground-, long-term]: 1.921e-5 kg; lognormal variance with pedigree 0.30334, pedigree (1,1,4,1,1)
  (same comment as for Arsenic, ion)
- Strontium [air, non-urban air or from high stacks]: 1.1988e-11 kg; lognormal variance with pedigree 0.70643, pedigree (1,1,4,1,1)
  (same comment as for Lead)
- Thallium [water, ground-]: 2.1674e-10 kg; lognormal variance with pedigree 0.61301, pedigree (1,1,4,1,1)
  (same comment as for Tin, ion)
- Manganese [water, ground-, long-term]: 7.372e-5 kg; lognormal variance with pedigree 0.25828, pedigree (1,1,4,1,1)
  (same comment as for Arsenic, ion)
- Titanium [air, non-urban air or from high stacks]: 1.1647e-10 kg; lognormal variance with pedigree 0.63097, pedigree (1,1,4,1,1)
  (same comment as for Lead)
- Iron, ion [water, ground-]: 4.7695e-7 kg; lognormal variance with pedigree 0.3608, pedigree (1,1,4,1,1)
  (same comment as for Tin, ion)
- Mercury [water, ground-, long-term]: 7.9158e-7 kg; lognormal variance with pedigree 0.40788, pedigree (1,1,4,1,1)
  (same comment as for Arsenic, ion)
- Beryllium [air, non-urban air or from high stacks]: 6.7732e-14 kg; lognormal variance with pedigree 0.87649, pedigree (1,1,4,1,1)
  (same comment as for Lead)
- Titanium, ion [water, ground-]: 4.6589e-7 kg; lognormal variance with pedigree 0.36052, pedigree (1,1,4,1,1)
  (same comment as for Tin, ion)
- Copper, ion [water, ground-, long-term]: 0.0002964 kg; lognormal variance with pedigree 0.21241, pedigree (1,1,4,1,1)
  (same comment as for Arsenic, ion)
- Tin [air, non-urban air or from high stacks]: 3.598e-13 kg; lognormal variance with pedigree 0.8181, pedigree (1,1,4,1,1)
  (same comment as for Lead)
- Strontium [water, ground-]: 4.7954e-8 kg; lognormal variance with pedigree 0.43579, pedigree (1,1,4,1,1)
  (same comment as for Tin, ion)
- Chromium VI [water, ground-, long-term]: 5.8393e-7 kg; lognormal variance with pedigree 1.3721, pedigree (1,1,4,1,1)
  (same comment as for Arsenic, ion)
- Zinc [air, non-urban air or from high stacks]: 5.4855e-11 kg; lognormal variance with pedigree 0.65544, pedigree (1,1,4,1,1)
  (same comment as for Lead)
- Beryllium [water, ground-]: 2.7093e-10 kg; lognormal variance with pedigree 0.60586, pedigree (1,1,4,1,1)
  (same comment as for Tin, ion)
- Cobalt [water, ground-, long-term]: 2.9383e-5 kg; lognormal variance with pedigree 0.28915, pedigree (1,1,4,1,1)
  (same comment as for Arsenic, ion)
- Vanadium [air, non-urban air or from high stacks]: 7.0802e-11 kg; lognormal variance with pedigree 0.64834, pedigree (1,1,4,1,1)
  (same comment as for Lead)
- Zinc, ion [water, ground-]: 2.4685e-7 kg; lognormal variance with pedigree 0.38135, pedigree (1,1,4,1,1)
  (same comment as for Tin, ion)
- Cadmium, ion [water, ground-, long-term]: 7.5652e-5 kg; lognormal variance with pedigree 0.25773, pedigree (1,1,4,1,1)
  (same comment as for Arsenic, ion)
- Antimony [air, non-urban air or from high stacks]: 1.0558e-11 kg; lognormal variance with pedigree 0.71162, pedigree (1,1,4,1,1)
  (same comment as for Lead)
- Vanadium, ion [water, ground-]: 2.8321e-7 kg; lognormal variance with pedigree 0.37717, pedigree (1,1,4,1,1)
  (same comment as for Tin, ion)
- Barium [water, ground-, long-term]: 0.00017204 kg; lognormal variance with pedigree 0.23008, pedigree (1,1,4,1,1)
  (same comment as for Arsenic, ion)
- Selenium [air, non-urban air or from high stacks]: 5.16e-13 kg; lognormal variance with pedigree 0.81119, pedigree (1,1,4,1,1)
  (same comment as for Lead)
- Antimony [water, ground-]: 4.223e-8 kg; lognormal variance with pedigree 0.44045, pedigree (1,1,4,1,1)
  (same comment as for Tin, ion)
- Fluoride [water, ground-, long-term]: 1.3655e-5 kg; lognormal variance with pedigree 0.31452, pedigree (1,1,4,1,1)
  (same comment as for Arsenic, ion)

## Extrapolations
This dataset has been extrapolated from year 2012 to the year of the calculation (2021). The uncertainty has been adjusted accordingly.
