# operation, computer, laptop, 68% active work

Dataset: EcoSpold 2, unit process
Geography: CH
Time period: 2005-01-01 to 2021-12-31
Technology level: current
Classification: ISIC rev.4 ecoinvent: 8219:Photocopying, document preparation and other specialized office support act
Classification: EcoSpold01Categories: electronics/services
Synonyms: Heimarbeit
Tags: Operation; ConvertedDataset
Scenario: Business-as-Usual
System model: Allocation, cut-off by classification
Generated by: Marianne Leuenberger
Published in: Spielmann M. 2007
Database: ecoinvent
isCopyrightProtected: true
accessRestrictedTo: 1

## General comment
The data set represents the use of a laptop computer during work at home.
[This dataset was already contained in the ecoinvent database version 2. It was not individually updated during the transfer to ecoinvent version 3. Life Cycle Impact Assessment results may still have changed, as they are affected by changes in the supply chain, i.e. in other datasets. This dataset was generated following the ecoinvent quality guidelines for version 2. It may have been subject to central changes described in the ecoinvent version 3 change report (http://www.ecoinvent.org/database/ecoinvent-version-3/reports-of-changes/), and the results of the central updates were reviewed extensively. The changes added e.g. consistent water flows and other information throughout the database. The documentation of this dataset can be found in the ecoinvent reports of version 2, which are still available via the ecoinvent website. The change report linked above covers all central changes that were made during the conversion process.]

## Included activities end
This data set includes the use of a laptop and the energy consumption for working at home. It includes the laptop production, transport from plant to customer and electricity consumption (from consumer mix) for average office work.

## Geography
Data for Swiss conditions

## Technology
Work at home using an average laptop computer with 68% active mode, 25%standby mode and 6% off mode

## Reference product
- operation, computer, laptop, 68% active work: 1 hour; CPC 85: Support services; By-product classification allocatable product
  EcoSpold01Location=CH
  production volume 0.0336675 hour
    This is a placeholder value that does not reflect real-world production volumes. This dataset does not currently require a real-world production volume to work in the database framework, and no actual data were collected yet. This has no negative effect on the results of the ecoinvent database. The placeholder value of this activity was scaled according to the nominal GDP of 2005 (source: United Nations, http://data.un.org/Glossary.aspx?q=GDP+%28current+US%24%29, accessed 20130726) to reflect an appropriate share of the global production volume, which is also a placeholder value.
  property price 0.117738 EUR2005
    Calculated based on inputs: The price of the product has been calculated as a sum of the values of the material and energy inputs for this product. This value is therefore a rough estimation. It may underestimate the real price since there are additional expenses when producing any product. These expences can include for example labour costs, treatment of waste materials and profit for the producer. Please consider carefully whether this level of data quality is acceptable for your application.

## Inputs from technosphere
- electricity, low voltage: 0.014187 kWh; lognormal variance with pedigree 0.0087, pedigree (2,2,4,1,1)
  According to ecoinvent report no. 18: 12.75% ff: 2W, 25%standby: 4W, 68.75% active:19W, 100%video: 30W
  EcoSpold01Location=CH
  Uncertainty: according to ecoinvent report no. 18: 12.75% ff: 2W, 25%standby: 4W, 68.75% active:19W, 100%video: 30W
- computer, laptop: 0.00013514 unit; lognormal variance with pedigree 0.041225, pedigree (2,3,5,2,1)
  Lifttime: 4 years and 1850 hours
  EcoSpold01Location=GLO
  Uncertainty: lifttime: 4 years and 1850 hours
  properties: wet mass 3.15 kg, carbon content, non-fossil 1.2662e-5, carbon content, fossil 0.257799, dry mass 3.15 kg
  note on carbon content, non-fossil: Calculated as the addition of C contents in the product composition, then referred to 1 kg DM

## Extrapolations
This dataset has been extrapolated from year 2009 to the year of the calculation (2021). The uncertainty has been adjusted accordingly.

## Review by Christian Bauer 2010-02-07
26.01.2010
passed
C:\Dokumente und Einstellungen\Marianne\Eigene Dateien\Projekte\277_Mobitool\Ecoinvent\Review\Upload 1\[Ecospold_Use_Laptop-v1.1.xls]X-Process
