# planing, beam, hardwood, u=10%

Dataset: EcoSpold 2, unit process
Geography: Europe without Switzerland
Time period: 2011-01-01 to 2021-12-31
Technology level: current
Classification: ISIC rev.4 ecoinvent: 1610:Sawmilling and planing of wood
Tags: Swiss brush-up completed
Scenario: Business-as-Usual
System model: Allocation, cut-off by classification
Generated by: Frank Werner
Published in: BFS 2013
Database: ecoinvent
isCopyrightProtected: true
accessRestrictedTo: 1

## General comment
This dataset represents the planing of one m3 hardwood beam that has been kiln dried to 10% moisture content. The planing mill is assumed to be located on the sawmill site. The emissions during the planing are excluded due to lack of data. The suction of the shavings is modeled in a separate activity.
The data was provided by and approved by the Swiss forest industry (Holzindustrie Schweiz HIS).
Within ecoinvent, three products - boards, beams and laths - are distinguished:

## Included activities start
Planing process starting from kiln dried hardwood beam, at sawmill site.

## Included activities end
This activity ends with planed hardwood beam, at plant. The dataset includes the planing process at the sawmill site and input of wood. The dataset does not include dust emissions.

## Geography
Represents average Swiss conditions assumed to be represenative for Europe

## Parameters
- wood density, basic: 614.4 kg/m3; name basic_wood_d; = dry_wood_d*(1-moisture_beam*shrinkage_ratio)
  kg oven-dry matter/wet volume
- share of shaving: 6 dimensionless; name share_shaving
  share of shaving production from volume of sawnwood input
- wood density, dry: 640 kg/m3; name dry_wood_d
  kg oven-dry matter/oven-dry volume
- shrinkage ratio (u=30% - 0%): 0.004 dimensionless; name shrinkage_ratio
  shrinkage of volume in % per change (%) in moisture content, relevant between u=30% to 0%
- share of beam: 94 dimensionless; name share_beam
  share of beam production per volume
- moisture content beam: 10 dimensionless; name moisture_beam
  moisture content of beam
- wood density, apparent: 675.84 kg/m3; name wood_d_apparent_1; = (1+moisture_beam/100)* basic_wood_d
  kg wet matter/wet volume

## Reference product
- shavings, hardwood, loose, measured as dry mass: 1 kg; name m_shavings; = beam_raw_u10* share_shaving/100* basic_wood_d; source BFS 2013; By-product classification allocatable product; CPC 39283: Non-agglomerated wood waste and scrap; pedigree (1,1,1,1,1)
  calculated as dry mass
  production volume 2.21302e7 kg; = 105148.049974468/60*(12688-60)
    Scaled from the PV estimates of the Swiss sawmilling chain based UNECE data for 2013 for the production volumes of Switzerland (60'000 m3) and the production volume of Europe without Switzerland ( 12'748 m3 - 60'000 m3).
  property price 0.113 EUR2005
    Calculated based on data from FAOSTAT (accessed 20140429). The price is calculated by using data on total world import quantity (m3) and import value (1000 USD), year 2005. 40461924 m3 of Chips and Particles was imported in the world in 2005. The import value was 3022227000 USD. The calculated price is thus (3022227000/40461924=74.7*0.8=) 62.2 Euro/m3. It is estimated, that the chips and particles are half hardwood (of density 650 kg/m3) and half softwood (of density 450 kg/m3), thus the remaining mixture has a density of 550 kg/m3. The recalculated price is (1/550*62.2=) 0.11 Euro/kg. Using the same approach the calculated price for 2010 was 0.123 Euro/kg.
  property heating value, net 12.61 MJ
    LHV is calculated based on the Carbon content of the product. More details can be found on the respective documentation.
  property carbon content 0.494
    carbon content on a dry matter basis (reserved; not for manual entry)
  property true value 4.43152; name m_shavings_true_value
    allocation property applied in "true value" allocation // value calculated from revenue
  properties: wet mass 1.15 kg, carbon content, non-fossil 0.494, water content 0.15, carbon content, fossil 0, dry mass 1 kg, water in wet mass 0.15 kg, carbon allocation 0.494 kg
- sawnwood, beam, hardwood, dried (u=10%), planed: 0 m3; name beam_planed; source BFS 2013; CPC 31102: Wood, sawn or chipped lengthwise, sliced or peeled, of a thickness exceeding 6 mm, of non-coniferous wood; By-product classification allocatable product
  production volume 564300 m3; name p_sawnwood_planed; = 2681.184/60*(12688-60)
    (same comment as for shavings, hardwood, loose, measured as dry mass)
  property heating value, net 9045.69 MJ
    LHV is calculated based on the Carbon content of the product. More details can be found on the respective documentation.The property is based on a value of 13.38MJ/kg
  property carbon content, non-fossil 0.494; name beam_planed_C_content_non_fossil
    biogene carbon content on a dry matter basis
  property water in wet mass 61.44 kg; name beam_planed_WWM; = beam_planed_DM* beam_planed_water_content
  property dry mass 614.4 kg; name beam_planed_DM; = basic_wood_d
  property water content 0.1; name beam_planed_water_content
  property wet mass 675.84 kg; name beam_planed_WM; = beam_planed_DM*(1+ beam_planed_water_content)
  property price 265 EUR2005
    Expert judgement (Urs Luginbühl, Swiss Sawmilling industry, personal communication in June 2014). Cross-reference; FAOSTAT (accessed 20140428). The price is calculated by using data on total world import quantity (m3) and import value (1000 USD), year 2005. 25656806 m3 of Sawnwood (NC) - coniferous was imported in the world in 2005. The import value was 9652714000 USD. The calculated price is thus (9652714000/25656806=376*0.8=) 303 Euro.
  property carbon content 0.494
    carbon content on a dry matter basis (reserved; not for manual entry)
  property true value 265; name beam_planed_true_value
    allocation property applied in "true value" allocation // value calculated from revenue
  properties: carbon content, fossil 0, carbon allocation 303.514 kg

## Inputs from technosphere
- sawnwood, beam, hardwood, raw, dried (u=10%): 0.000446172 m3; name beam_raw_u10; = 1/(1-share_shaving/100); source BFS 2013; lognormal variance with pedigree 0.0336, pedigree (1,1,4,4,1)
  input of raw sawn wood to be planed; usually processes within the sawmill that produces the raw sawn wood
  property water in wet mass 61.44 kg; name beam_raw_WWM; = beam_raw_DM* beam_raw_water_content
  property wet mass 675.84 kg; name beam_raw_WM; = beam_raw_DM*(1+ beam_raw_water_content)
  property dry mass 614.4 kg; name beam_raw_DM; = basic_wood_d
  property water content 0.1; name beam_raw_water_content
  property carbon content, non-fossil 0.494; name beam_raw_C_content_non_fossil
  properties: heating value, net 9045.69 MJ
- electricity, medium voltage: 0.0037029 kWh; name elec_medvol; source BFS 2013; lognormal variance with pedigree 0.0337, pedigree (2,1,4,3,1)
  electricity consumed for the planing; the suction of the shavings in covered in a separate dataset; data from Swiss industry
  properties: UVEK_relative_amount_1 1, UVEK_link_1 1779
  note on UVEK_relative_amount_1: to be used only in special submissions in coordination with ecoinvent and the Swiss FOEN
- planing mill: 2.9715e-10 unit; name planemill; source BFS 2013; lognormal variance with pedigree 0.5587, pedigree (2,1,4,3,1)
  data taken from ecoinvent 2.2 dataset
  properties: UVEK_relative_amount_1 1, UVEK_link_1 3514

## Inputs from nature
- Carbon dioxide, non-fossil, resource correction [natural resource, in air]: 1.3148 kg; pedigree (1,1,1,1,1)
  This exchange has been added after economic allocation in order to re-balance the non-fossil carbon dioxide resource extraction.

## Sampling procedure
complementary literature and sampling from sawmills; CH data used to approximate European processes
