# natural gas production, liquefied

Dataset: EcoSpold 2, unit process
Geography: RoW
Time period: 2012-01-01 to 2021-12-31
Technology level: current
Classification: ISIC rev.4 ecoinvent: 0620:Extraction of natural gas
Classification: EcoSpold01Categories: natural gas/production
Scenario: Business-as-Usual
System model: Allocation, cut-off by classification
Share of production covered: 100 %
Generated by: Mireille Faist Emmenegger
Published in: Faist Emmenegger, Mireille 2015
Database: ecoinvent
isCopyrightProtected: true
accessRestrictedTo: 1

## General comment
This dataset describes the liquefaction of natural gas in a liquefaction plant. The process is normalized on the gaseous form of gas.

## Included activities start
The activity starts with the arrival of natural gas, in gaseous form in the liquefaction plant.

## Included activities end
The activity ends with the delivery of liquefied gas to the transport mode.

## Geography
The data describes the liquefaction of average gas in an European gasification plants. The DZ Dataset is used as proxy for GLO.

## Technology
Data on energy use for the liquefaction stems from a 2006 publication and refers to at that time existing capacity

## Reference product
- natural gas, liquefied: 1 m3; name RP_amount_1; = 1/39*36.8; CPC 12020: Natural gas, liquefied or in the gaseous state; By-product classification allocatable product; CAS 14493-06-2
  Scaled to LHV of ecoinvent 3
  EcoSpold01Location=DZ
  production volume 1.67231e11 m3; name RP_PV_1; = 325000000000*37.8/39
    BP Energy statistics for 2013. Scaled to LHV of ecoinvent 3
  property price 0.27 EUR2005
    Calculated value based on data from United Nations Commodity Trade Statistics Database (comtrade.un.org). UN comtrade category: 271111 Natural gas, liquified. Year 2005. Using exchange rate of 1EURO = 1.209 USD. Average of price of import into 5 main markets (EU, US, JP, IN and CN).
  property carbon content, fossil 0.602381
    An average C content of 0.506 kg C/ Nm3 has been assumed for natural gas (this average has been calculated using data in Tab 3.5, ecoinvent v2.2 report 6_V). It equals 0.60238 kg C per 0.84kg dry mass.
  property carbon content 0.602381
    carbon content on a dry matter basis (reserved; not for manual entry)
  properties: heating value, net 39 MJ, wet mass 0.84 kg, water in wet mass 0 kg, dry mass 0.84 kg, carbon content, non-fossil 0, water content 0, carbon allocation 0.506 kg

## Inputs from technosphere
- waste natural gas, sweet: -0.195 MJ; name BP_amount_1; = (1*36.8*0.005)*-1
  BAsed on flaring rate of 0.5% and the LHV of RER natural gas (36.8 MJ/m3)
  production volume 3.261e10 MJ; = RP_PV_1 * (BP_amount_1 / RP_amount_1)
    Calculated from production volume of reference product using the relative outputs.
  property price 0 EUR2005; name BP_amount_1_price_EUR2005
  properties: carbon content, fossil 0.589286, wet mass 0.0247059 kg, dry mass 0.0247059 kg
- natural gas, burned in gas motor, for storage: 4.017 MJ; = 1*36.8*0.103; lognormal variance with pedigree 0.0106, pedigree (1,1,4,5,1)
  Based on a gas consumption rate of 10.3% and the RER LHV of natural gas (36.8 MJ/m3)
  EcoSpold01Location=DZ
  Uncertainty: reference book published in 1999
  properties: heating value, net 1 MJ
- natural gas, high pressure: 1 m3; = 1/39*36.8; lognormal variance with pedigree 0.0186, pedigree (4,1,4,5,1)
  EcoSpold01Location=DZ
  Scaled to LHV of ecoinvent v3. [Activity link to 'natural gas production, GLO' introduced for v3.5 to connect directly to a supplying activty and thereby also avoiding supply from markets for natural gas (high pressure) in which evaporation might contribute]
  Uncertainty: average data for leckages
  properties: wet mass 0.84 kg, dry mass 0.84 kg, carbon content, fossil 0.602381, heating value, net 39 MJ
  note on carbon content, fossil: An average C content of 0.506 kg C/ m3 has been assumed (this average has been calculated using data in Tab 3.5, ecoinvent v2.2 report 6_V
  note on heating value, net: Literature value, Source: United Nations Statistics Division (2018) International Recommendations for Energy Statistics (IRES). Available at: http://unstats.un.org/unsd/statcom/doc11/BG-IRES.pdf.
- natural gas processing plant: 8.36168e-13 unit; lognormal variance with pedigree 0.328, pedigree (4,4,4,5,3)
  estimation for infrastructure
  EcoSpold01Location=GLO
  Uncertainty: estimation for infrastructure

## Sampling procedure
reference book

## Extrapolations
The data is for average global data.
