# treatment of H3PO4 purification residue, residual material landfill

Dataset: EcoSpold 2, unit process
Geography: CH
Time period: 1994-01-01 to 2021-12-31
Technology level: current
Classification: ISIC rev.4 ecoinvent: 3822:Treatment and disposal of hazardous waste
Classification: EcoSpold01Categories: waste management/residual material landfill
Tags: Treatment; ConvertedDataset
Scenario: Business-as-Usual
System model: Allocation, cut-off by classification
Generated by: Gabor Doka (obsolete)
Published in: Doka G. 2009
Database: ecoinvent
isCopyrightProtected: true
accessRestrictedTo: 1

## General comment
Inventoried waste contains 100% residue from H3PO4 purification; .
waste composition (wet, in ppm): H2O n.a.; O 419060; H 165; C n.a.; S 192710; N n.a.; P 15345; B n.a.; Cl n.a.; Br n.a.; F 48190; I n.a.; Ag n.a.; As 48.9; Ba n.a.; Cd 71; Co n.a.; Cr 1537; Cu 189; Hg 0.474; Mn 63; Mo n.a.; Ni 238; Pb 14; Sb n.a.; Se n.a.; Sn n.a.; V 908; Zn 1328; Be n.a.; Sc n.a.; Sr n.a.; Ti n.a.; Tl n.a.; W n.a.; Si 28646; Fe 5589; Ca 274020; Al 2795; K n.a.; Mg 9083; Na n.a.;
Share of carbon in waste that is biogenic 60.4%.
Additional solidification with 0.4 kg of cement.
[This dataset was already contained in the ecoinvent database version 2. It was not individually updated during the transfer to ecoinvent version 3. Life Cycle Impact Assessment results may still have changed, as they are affected by changes in the supply chain, i.e. in other datasets. This dataset was generated following the ecoinvent quality guidelines for version 2. It may have been subject to central changes described in the ecoinvent version 3 change report (http://www.ecoinvent.org/database/ecoinvent-version-3/reports-of-changes/), and the results of the central updates were reviewed extensively. The changes added e.g. consistent water flows and other information throughout the database. The documentation of this dataset can be found in the ecoinvent reports of version 2, which are still available via the ecoinvent website. The change report linked above covers all central changes that were made during the conversion process.]

## Included activities end
Waste-specific short-term emissions to water from leachate. Long-term emissions from landfill to ground water. Expenditures for solidificalion with cement (user-specified option)

## Geography
Technology encountered in Switzerland in 2000. Landfill includes base seal and leachate collection system.

## Technology
Swiss residual material landfill for polluted, inorganic waste. With base seal and leachate collection system. Recultivation after closure.

## Time period
Waste composition as given in literature reference, theoretical data or other source. Transfer coefficients from prospective model.

## Reference product
- H3PO4 purification residue: -1 kg; By-product classification Waste; CPC 39: Wastes or scraps
  EcoSpold01Location=CH
  production volume 0.0336675 kg
    This is a placeholder value that does not reflect real-world production volumes. This dataset does not currently require a real-world production volume to work in the database framework, and no actual data were collected yet. This has no negative effect on the results of the ecoinvent database. The placeholder value of this activity was scaled according to the nominal GDP of 2005 (source: United Nations, http://data.un.org/Glossary.aspx?q=GDP+%28current+US%24%29, accessed 20130726) to reflect an appropriate share of the global production volume, which is also a placeholder value.
  property price 0 EUR2005
    Waste products are assigned a price of zero as they are assumed to require further treatment.
  property carbon content 0
    carbon content on a dry matter basis (reserved; not for manual entry)
  properties: wet mass 1 kg, dry mass 1 kg, carbon content, fossil 0, carbon content, non-fossil 0, water in wet mass 0 kg, water content 0, carbon allocation 0 kg

## Inputs from technosphere
- waste cement, hydrated: -1 kg; lognormal variance with pedigree 0.05, pedigree (1,1,5,1,1)
  Hydrated cement for solidification of residual material waste. Uncertainty in mass from solidification recipe.
  EcoSpold01Location=CH
  production volume 1 kg
    Calculated from the production volume of H3PO4 purification residue, 0% water in proportion to the respective output amounts.
  properties: dry mass 1 kg, wet mass 1 kg
- residual material landfill: 2.0833e-9 unit; lognormal variance with pedigree 0.04, pedigree (1,1,5,1,1)
  demands per kilogram waste. uncertainty is heeded in the module
  EcoSpold01Location=CH
- cement, unspecified: 0.4 kg; lognormal variance with pedigree 0.05, pedigree (1,1,5,1,1)
  Cement for solidification of residual material waste. Uncertainty in mass from solidification recipe.
  EcoSpold01Location=CH
  properties: wet mass 1 kg, dry mass 1 kg
- process-specific burdens, residual material landfill: 1 kg; lognormal variance with pedigree 0.04, pedigree (1,1,5,1,1)
  demands per kilogram waste. uncertainty is heeded in the module;activityLink introduced to establish a direct link to the corresponding regional supply of this product
  EcoSpold01Location=CH

## Emissions to nature
- Silicon [water, surface water]: 6.4423e-5 kg; lognormal variance with pedigree 0.84, pedigree (1,1,5,1,1)
  uncertainty is calculated from uncertainties in waste composition and transfer coefficients in residual landfill
- Sulfate [water, surface water]: 0.062028 kg; lognormal variance with pedigree 0.22, pedigree (1,1,5,1,1)
  (same comment as for Silicon)
- Copper, ion [water, surface water]: 1.2146e-8 kg; lognormal variance with pedigree 1.93, pedigree (1,1,5,1,1)
  (same comment as for Silicon)
- Arsenic, ion [water, ground-, long-term]: 4.89e-14 kg; lognormal variance with pedigree 1.12, pedigree (1,1,5,1,1)
  uncertainty is calculated from uncertainties in waste composition and transfer coefficients in incinerator and landfills.
- Arsenic, ion [water, surface water]: 4.89e-5 kg; lognormal variance with pedigree 1.1, pedigree (1,1,5,1,1)
  (same comment as for Silicon)
- Zinc, ion [water, surface water]: 2.7172e-8 kg; lognormal variance with pedigree 1.83, pedigree (1,1,5,1,1)
  (same comment as for Silicon)
- Chromium VI [water, surface water]: 9.2393e-5 kg; lognormal variance with pedigree 0.81, pedigree (1,1,5,1,1)
  (same comment as for Silicon)
- Nickel, ion [water, surface water]: 1.4385e-7 kg; lognormal variance with pedigree 1.61, pedigree (1,1,5,1,1)
  (same comment as for Silicon)
- Fluoride [water, surface water]: 0.0026115 kg; lognormal variance with pedigree 0.41, pedigree (1,1,5,1,1)
  (same comment as for Silicon)
- Vanadium, ion [water, surface water]: 2.2284e-6 kg; lognormal variance with pedigree 1.25, pedigree (1,1,5,1,1)
  (same comment as for Silicon)
- Aluminium [water, ground-, long-term]: 0.0008297 kg; lognormal variance with pedigree 0.93, pedigree (1,1,5,1,1)
  (same comment as for Arsenic, ion)
- Zinc, ion [water, ground-, long-term]: 1.6276e-5 kg; lognormal variance with pedigree 5.5, pedigree (1,1,5,1,1)
  (same comment as for Arsenic, ion)
- Aluminium [water, surface water]: 1.3851e-6 kg; lognormal variance with pedigree 1.31, pedigree (1,1,5,1,1)
  (same comment as for Silicon)
- Magnesium [water, surface water]: 1.7229e-6 kg; lognormal variance with pedigree 1.29, pedigree (1,1,5,1,1)
  (same comment as for Silicon)
- Mercury [water, ground-, long-term]: 2.2374e-8 kg; lognormal variance with pedigree 4.04, pedigree (1,1,5,1,1)
  (same comment as for Arsenic, ion)
- Vanadium, ion [water, ground-, long-term]: 0.0006979 kg; lognormal variance with pedigree 0.73, pedigree (1,1,5,1,1)
  (same comment as for Arsenic, ion)
- Phosphate [water, ground-, long-term]: 0.010512 kg; lognormal variance with pedigree 0.92, pedigree (1,1,5,1,1)
  (same comment as for Arsenic, ion)
- Calcium, ion [water, surface water]: 4.1335e-5 kg; lognormal variance with pedigree 0.99, pedigree (1,1,5,1,1)
  (same comment as for Silicon)
- Lead [water, surface water]: 1.2123e-10 kg; lognormal variance with pedigree 2.54, pedigree (1,1,5,1,1)
  (same comment as for Silicon)
- Manganese [water, ground-, long-term]: 5.204e-7 kg; lognormal variance with pedigree 6.81, pedigree (1,1,5,1,1)
  (same comment as for Arsenic, ion)
- Chromium VI [water, ground-, long-term]: 0.00029186 kg; lognormal variance with pedigree 0.65, pedigree (1,1,5,1,1)
  (same comment as for Arsenic, ion)
- Magnesium [water, ground-, long-term]: 0.001032 kg; lognormal variance with pedigree 1.6, pedigree (1,1,5,1,1)
  (same comment as for Arsenic, ion)
- Copper, ion [water, ground-, long-term]: 7.2755e-6 kg; lognormal variance with pedigree 3.57, pedigree (1,1,5,1,1)
  (same comment as for Arsenic, ion)
- Phosphate [water, surface water]: 1.7548e-5 kg; lognormal variance with pedigree 1.14, pedigree (1,1,5,1,1)
  (same comment as for Silicon)
- Silicon [water, ground-, long-term]: 0.028582 kg; lognormal variance with pedigree 0.29, pedigree (1,1,5,1,1)
  (same comment as for Arsenic, ion)
- Iron, ion [water, ground-, long-term]: 2.8012e-5 kg; lognormal variance with pedigree 7.49, pedigree (1,1,5,1,1)
  (same comment as for Arsenic, ion)
- Iron, ion [water, surface water]: 4.6764e-8 kg; lognormal variance with pedigree 1.76, pedigree (1,1,5,1,1)
  (same comment as for Silicon)
- Manganese [water, surface water]: 8.6878e-10 kg; lognormal variance with pedigree 2.28, pedigree (1,1,5,1,1)
  (same comment as for Silicon)
- Lead [water, ground-, long-term]: 7.262e-8 kg; lognormal variance with pedigree 8.18, pedigree (1,1,5,1,1)
  (same comment as for Arsenic, ion)
- Cadmium, ion [water, ground-, long-term]: 4.8201e-7 kg; lognormal variance with pedigree 7.28, pedigree (1,1,5,1,1)
  (same comment as for Arsenic, ion)
- Cadmium, ion [water, surface water]: 8.0469e-10 kg; lognormal variance with pedigree 2.29, pedigree (1,1,5,1,1)
  (same comment as for Silicon)
- Mercury [water, surface water]: 3.7352e-11 kg; lognormal variance with pedigree 2.69, pedigree (1,1,5,1,1)
  (same comment as for Silicon)
- Sulfate [water, ground-, long-term]: 0.51611 kg; lognormal variance with pedigree 0.11, pedigree (1,1,5,1,1)
  (same comment as for Arsenic, ion)
- Fluoride [water, ground-, long-term]: 0.045578 kg; lognormal variance with pedigree 0.23, pedigree (1,1,5,1,1)
  (same comment as for Arsenic, ion)
- Nickel, ion [water, ground-, long-term]: 8.6165e-5 kg; lognormal variance with pedigree 1.14, pedigree (1,1,5,1,1)
  (same comment as for Arsenic, ion)
- Calcium, ion [water, ground-, long-term]: 0.02476 kg; lognormal variance with pedigree 1.53, pedigree (1,1,5,1,1)
  (same comment as for Arsenic, ion)

## Sampling procedure
Landfill model based on observed leachate concentrations in literature. Extrapolated to 60'000 years heeding chemical characteristics. Initial waste composition from various literature sources.

## Extrapolations
This dataset has been extrapolated from year 2000 to the year of the calculation (2021). The uncertainty has been adjusted accordingly.

## Review by Niels Jungbluth 2009-02-15
passed.
