# hardwood forestry, meranti, sustainable forest management

Dataset: EcoSpold 2, unit process
Geography: MY
Time period: 2000-01-01 to 2021-12-31
Technology level: current
Classification: ISIC rev.4 ecoinvent: 0220:Logging
Synonyms: Lauan; Seraya; Shorea ssp.
Tags: Swiss brush-up completed
Scenario: Business-as-Usual
System model: Allocation, cut-off by classification
Generated by: Frank Werner
Published in: Althaus H.J. 2007
Database: ecoinvent
isCopyrightProtected: true
accessRestrictedTo: 1

## General comment
This dataset represents the plantation establishment, management and harvesting of one m3 meranti wood. The dataset covers (close to) sustainable forest management in Malaysia.

The data are collected from company reports, scientific journals, the internet, a field visit to a logging site and consultation with forestry experts in Malaysia. The forest area is part of the state of Terengganu and is managed under the selective management system. The logging company professes that its timber is produced sustainably. The fuel use of forestry operations refers to teak plantations in Indonesia; this is considered an expert's guess.

It should be taken into account that the dataset stems from a legally operating, apparently well-documented logging company. Unfortunately, this cannot be assumed to be the standard case for meranti production in Malaysia.
This dataset represents the natural growth of one m3 meranti trees in a tropical forest plantation.

The data stems from a logging company that represents (close to) sustainable forest management (SFM). The forest area is part of the state of Terengganu and is managed under the selective management system of dark red meranti trees.

The data refers to wood 'under bark'. The CO2-assimilation of the biomass is calculated from a carbon content of 49.4% including bark (11%). The energy content embodied in the biomass equals its gross calorific value including bark. The assumed wood density is 600 kg/m3 (u=0%).

The data was obtained from company reports, scientific journals, the internet and a field visit to a logging site as well as consultation with forestry experts in Malaysia.

Wood density and land use data can vary considerably depending on the species and how intensive the forest is used. Since the data used are valid for one specific company and region the uncertainty is rather high.
It should be taken into account that the dataset stems from a legally operating, apparently well-documented logging company; unfortunately this cannot be assumed the standard case for meranti production in Malaysia.

## Included activities start
Plantation establishment process starting from meranti tree planting. Natural growth process starting from standing meranti trees at plantation.

## Included activities end
includes harvesting and hauling operations as well as fuel used for forest road construction, including burning of branchings; land use of forest roads and gravel are distregarded; branchings are left to rot on the ground. logging impacts on further vegetation and environmental impacts from post-harvest processes (potential forest degradation/deforestation) are not covered. includes the CO2 absorption from air and the land use for the trees to grow (including 11% bark). Forest road area is not included in the land use; dataset refers to dark red meranti; Density: 600 kg/m3 (u=0)

## Technology
The dataset reflects average technology.

Fuel consumption is assumed to lie between the Central African azobe harvesting and European average consumption
(Fisher, et al., 2005).

A rotation period of 60 years (derived from reproduction time) is assumed, allowing for two cutting cycles of 30 years.

Harvesting practices are mainly manual. Trees are felled using a chainsaw. Lianas on the trees to be felled are cut about six months previously, which prevents connected trees to be pulled down with the felling of one tree. After the crown is lopped off the trees are crosscut into logs below the first branches and these logs are extracted with the use of a cable and powerwinch by a crawler tractor (Komatsu) from the felling position to the skidding track.

Heavy crawler tractors are used to haul trees from their felling location to the temporary log landings. Tractors are restricted to skidding tracks. The temporary log landings are located within the forest area and are traversed by heavy machinery, such as the tractors and San-tai-wong (6x6 trucks). These carry logs from the temporary log landings in the forest along permanent forest roads to the permanent logyards next to the main roads.

Branchings are assumed to be burned on site; the amount of branchings and respective emissions from biomass burning are estimated based on literature (EPA, 1995 and IPCC, 2003).

## Reference product
- sawlog and veneer log, meranti, measured as solid wood under bark: 1 m3; CPC 031: Wood in the rough; By-product classification allocatable product
  production volume 0.0125597 m3; = 4*0.003139928
    This is a placeholder value that does not reflect real-world production volumes. This dataset does not currently require a real-world production volume to work in the database framework, and no actual data were collected yet. This has no negative effect on the results of the ecoinvent database. The placeholder value of this activity was scaled according to the nominal GDP of 2005 (source: United Nations, <http://data.un.org/Glossary.aspx?q=GDP+%28current+US%24%29>, accessed 20130726) to reflect an appropriate share of the global production volume, which is also a placeholder value.
  property carbon content, non-fossil 0.494
    C content of dry mass is 0.494 kgC/kg dry wood (ecoinvent v2.2 report 21).
  property heating value, net 7950.27 MJ
    LHV is calculated based on the Carbon content of the product. More details can be found on the respective documentation.The property is based on a value of 7.79MJ/kg
  property price 174.94 EUR2005
    Reference: FAOSTAT (accessed 20140112). The price is calculated by using data on total world import quantity (m3) and import value (1000 USD), year 2005. 15174881 m3 of Ind Rwd Wir (NC) Tropica was imported in the world in 2005. The import value was 3209966000 USD. The calculated price is thus (3209966000/15174881*0.8)=174.936586454945 Euro.
  property carbon content 0.494
    carbon content on a dry matter basis (reserved; not for manual entry)
  properties: dry mass 674.157 kg, water content 0.7, water in wet mass 471.91 kg, wet mass 1146.07 kg, carbon content, fossil 0, carbon allocation 333.034 kg

## Inputs from technosphere
- lubricating oil: 0.511 kg; lognormal variance with pedigree 0.065, pedigree (1,1,5,1,1)
  properties: UVEK_relative_amount_1 1, UVEK_link_1 2866, heating value, net 40.2 MJ, carbon content, fossil 0.75, dry mass 1 kg, wet mass 1 kg
  note on UVEK_relative_amount_1: to be used only in special submissions in coordination with ecoinvent and the Swiss FOEN
  note on heating value, net: Literature value, Source: IPCC 2006, 2006 IPCC Guidelines for National Greenhouse Gas Inventories, Prepared by the National Greenhouse Gas Inventories Programme, Eggleston H.S., Buendia L., Miwa K., Ngara T. and Tanabe K. (eds). Published: IGES, Japan
  note on carbon content, fossil: Lubricating oil is produced from diesel. C-content/dry mass of fats and oils considered 75%, from: ecoinvent v2.2 report, n 15a, pg 40
- diesel, burned in building machine: 309.63 MJ; lognormal variance with pedigree 0.065, pedigree (1,1,5,1,1)
  properties: UVEK_relative_amount_1 1, UVEK_link_1 734, heating value, net 1 MJ
- power sawing, without catalytic converter: 0.056154 hour; lognormal variance with pedigree 0.0751, pedigree (4,4,5,3,1)

## Inputs from nature
- Transformation, from forest, extensive [natural resource, land]: 434 m2; lognormal variance with pedigree 0.56, pedigree (5,5,5,5,5)
- Energy, gross calorific value, in biomass [natural resource, biotic]: 37400 MJ; lognormal variance with pedigree 0.0691, pedigree (3,4,5,3,1)
  Energy content of wood
- Wood, hard, standing [natural resource, biotic]: 2 m3; lognormal variance with pedigree 0.0691, pedigree (3,4,5,3,1)
- Occupation, forest, extensive [natural resource, land]: 32600 m2*year; lognormal variance with pedigree 0.41, pedigree (5,5,5,5,5)
- Transformation, to forest, extensive [natural resource, land]: 434 m2; lognormal variance with pedigree 0.56, pedigree (5,5,5,5,5)
- Carbon dioxide, in air [natural resource, in air]: 2400 kg; lognormal variance with pedigree 0.0691, pedigree (3,4,5,3,1)
  Calculated Value. Dried matter = 600 kg/m3, carbon content of dried matter = 49.4 %; including bark

## Emissions to nature
- Particulates, < 2.5 um [air, non-urban air or from high stacks]: 3.6 kg; lognormal variance with pedigree 0.5941, pedigree (3,4,5,3,1)
- Dinitrogen monoxide [air, non-urban air or from high stacks]: 0.0071077 kg; lognormal variance with pedigree 0.2441, pedigree (3,4,5,3,1)
- Particulates, > 2.5 um, and < 10um [air, non-urban air or from high stacks]: 3 kg; lognormal variance with pedigree 0.3941, pedigree (3,4,5,3,1)
- Carbon dioxide, non-fossil [air, unspecified]: 1182.5 kg; lognormal variance with pedigree 0.0691, pedigree (3,4,5,3,1)
- Methane, non-fossil [air, non-urban air or from high stacks]: 1.0338 kg; lognormal variance with pedigree 0.2441, pedigree (3,4,5,3,1)
- Particulates, > 10 um [air, non-urban air or from high stacks]: 2.4 kg; lognormal variance with pedigree 0.2441, pedigree (3,4,5,3,1)

## Sampling procedure
literature, partly relying on estimates (fuel consumption)

## Extrapolations
This dataset has been extrapolated from year 2005 to the year of the calculation (2021). The uncertainty has been adjusted accordingly.
