# inductor production, miniature radio frequency chip

Dataset: EcoSpold 2, unit process
Geography: GLO
Time period: 2005-01-01 to 2021-12-31
Technology level: current
Classification: ISIC rev.4 ecoinvent: 2610:Manufacture of electronic components and boards
Classification: EcoSpold01Categories: electronics/component
Scenario: Business-as-Usual
System model: Allocation, cut-off by classification
Generated by: Roland Hischier
Published in: Hischier R. 2007
Database: ecoinvent
isCopyrightProtected: true
accessRestrictedTo: 1

## General comment
This dataset represents the production of 1 kg of miniature RF chip type inductors. It is based on the assumption that a typical miniature radio frequency chip type inductor electronic module has an average weight of 16.8 milligrams. The data represent a typical miniature RF chip type inductor, used in the information and communication technology. Material data are taken from datasheets of producers of such inductors. Infrastructure and production efforts are based on own assumptions. The production efforts represent not a specific inductor type and have thus, accordingly higher uncertainties.

## Included activities start
From reception of metals, plastics at the factory gate.

## Included activities end
This dataset includes raw material input and production efforts for the production of currently used miniature RF chip type inductors.

## Geography
Data represent a global valuable composition of miniature RF chip type inductors.

## Technology
average production comprising the following steps: core mounting; epxoy-curing; winding; welding; molding; marking; bending; testing and final control.

## Reference product
- inductor, miniature radio frequency chip: 1 kg; By-product classification allocatable product; CPC 471: Electronic valves and tubes; electronic components; parts thereof
  EcoSpold01Location=GLO
  Inductors are used extensively in analog circuits and signal processing, in conjunction with capacitors and other components form tuned circuits which can emphasize or filter out specific signal frequencies. This can range from the use of large inductors as chokes in power supplies, now obsolete, which in conjunction with filter capacitors remove residual hum or other fluctuations from the direct current output, to such small inductances as generated by a ferrite bead or torus around a cable to prevent radio frequency interference from being transmitted down the wire. Smaller inductor/capacitor combinations provide tuned circuits used in radio reception and broadcasting, for instance. (Wikipedia (2007))
  production volume 1 kg
    Dummy value to be replaced by measured, estimated or calculated value
  property carbon content, non-fossil 0
    Calculated as the addition of C contents in the product composition, and referred to 1 kg DM inductor
  property carbon content, fossil 0.0535842
    (same comment as for inductor, miniature radio frequency chip)
  property price 51.4501 EUR2005
    Calculated based on inputs: The price of the product has been calculated as a sum of the values of the material and energy inputs for this product. This value is therefore a rough estimation. It may underestimate the real price since there are additional expenses when producing any product. These expences can include for example labour costs, treatment of waste materials and profit for the producer. Please consider carefully whether this level of data quality is acceptable for your application.
  property carbon content 0.0535842
    carbon content on a dry matter basis (reserved; not for manual entry)
  properties: water in wet mass 0 kg, dry mass 1 kg, wet mass 1 kg, water content 0, carbon allocation 0.0535842 kg

## Inputs from technosphere
- inductor, auxilliaries and energy use: 1 kg; lognormal variance with pedigree 0.134, pedigree (3,4,5,1,4)
  EcoSpold01Location=GLO
  Estimation - details see this other activity dataset
  Uncertainty: rough estimation
- silica sand: 0.07918 kg; source Venkel 2006; lognormal variance with pedigree 0.052, pedigree (1,4,5,1,1)
  Calculated Value. The production of 1 kg of inductors lead to a waste amount of 0.48 kg unused raw materials. Hence, this dataset here has an input of 1.48 kg of raw materials per kg of inductor. The split to the different raw materials (metals, plastics, etc.) is based on the reported material specifications.
  EcoSpold01Location=DE
  Uncertainty: average from company information
  properties: water content 0.010101, wet mass 1 kg, dry mass 0.99 kg
- aluminium oxide, non-metallurgical: 0 kg; source Venkel 2006; pedigree (1,1,1,1,1)
  Calculated Value. The production of 1 kg of inductors lead to a waste amount of 0.48 kg unused raw materials. Hence, this dataset here has an input of 1.48 kg of raw materials per kg of inductor. The split to the different raw materials (metals, plastics, etc.) is based on the reported material specifications.
  EcoSpold01Location=RER
  Uncertainty: average from company information
  properties: wet mass 1 kg, dry mass 1 kg
- copper, cathode: 0.16102 kg; source Venkel 2006; lognormal variance with pedigree 0.052, pedigree (1,4,5,1,1)
  (same comment as for aluminium oxide, non-metallurgical)
  properties: dry mass 1 kg, wet mass 1 kg
- epoxy resin, liquid: 0 kg; source Venkel 2006; pedigree (1,1,1,1,1)
  (same comment as for aluminium oxide, non-metallurgical)
  properties: wet mass 1 kg, dry mass 1 kg, heating value, net 12.82 MJ, carbon content, fossil 0.42325
- gold: 0.001184 kg; source Venkel 2006; lognormal variance with pedigree 0.052, pedigree (1,4,5,1,1)
  EcoSpold01Location=RER
  Calculated Value. The production of 1 kg of inductors lead to a waste amount of 0.48 kg unused raw materials. Hence, this dataset here has an input of 1.48 kg of raw materials per kg of inductor. The split to the different raw materials (metals, plastics, etc.) is based on the reported material specifications.
  Uncertainty: average from company information
  properties: dry mass 1 kg, wet mass 1 kg
- nickel, class 1: 0.032856 kg; source Venkel 2006; lognormal variance with pedigree 0.052, pedigree (1,4,5,1,1)
  EcoSpold01Location=GLO
  Calculated Value. The production of 1 kg of inductors lead to a waste amount of 0.48 kg unused raw materials. Hence, this dataset here has an input of 1.48 kg of raw materials per kg of inductor. The split to the different raw materials (metals, plastics, etc.) is based on the reported material specifications.
  Uncertainty: average from company information
  properties: dry mass 1 kg, wet mass 1 kg
- quicklime, milled, packed: 0 kg; source Venkel 2006; pedigree (1,1,1,1,1)
  Calculated Value. The production of 1 kg of inductors lead to a waste amount of 0.48 kg unused raw materials. Hence, this dataset here has an input of 1.48 kg of raw materials per kg of inductor. The split to the different raw materials (metals, plastics, etc.) is based on the reported material specifications.
  EcoSpold01Location=CH
  Uncertainty: average from company information
  properties: water content 0.010101, dry mass 0.99 kg, wet mass 1 kg
- aluminium oxide, non-metallurgical: 0.85157, 0.14417 kg (2 entries); source Venkel 2006; lognormal variance with pedigree 0.052, pedigree (1,4,5,1,1)
  (same comment as for aluminium oxide, non-metallurgical)
- epoxy resin, liquid: 0.0326024, 0.154768 kg (2 entries); source Venkel 2006; lognormal variance with pedigree 0.052, pedigree (1,4,5,1,1)
  (same comment as for aluminium oxide, non-metallurgical)
- quicklime, milled, packed: 0.000190592, 0.0224534 kg (2 entries); source Venkel 2006; lognormal variance with pedigree 0.052, pedigree (1,4,5,1,1)
  (same comment as for quicklime, milled, packed)

## Sampling procedure
literature

## Extrapolations
This dataset has been extrapolated from year 2007 to the year of the calculation (2021). The uncertainty has been adjusted accordingly.

## Review by Rolf Frischknecht 2007-09-14
passed
