# water works construction, capacity 6.23E10l/year, seawater reverse osmosis, ultrafiltration pretreatment

Dataset: EcoSpold 2, unit process
Geography: GLO
Time period: 2004-01-01 to 2021-12-31
Technology level: current
Classification: EcoSpold01Categories: water supply/production
Classification: ISIC rev.4 ecoinvent: 4220:Construction of utility projects
Scenario: Business-as-Usual
System model: Allocation, cut-off by classification
Generated by: Marylène Dussault
Published in: Al-Sarkal, T. 2013
Database: ecoinvent
isCopyrightProtected: true
accessRestrictedTo: 1

## General comment
This dataset represents the construction of a membrane filtration plant with ultrafiltration pretreatment. This dataset is based on published literature mainly from the study evaluating an alternative ultrafiltration pretreatment of seawater at the Fujairah-1 seawater reverse osmosis plant as plublised by Al-Sarkal et al. 2013. Reported infrastructure data are based on field measures, expert estimates and modeling. The plant is assumed to have a 30 years lifetime. The average production of the reverse osmosis plant is 170,500 m3/d of treated water and the pretreatment system average capacity is 416,000 m3/d of intake water. Recovery rate of the reverse osmosis system is 41%. Energy recovery is about 35%.

## Included activities start
From reception of raw materials and contruction equipment. This dataset only includes material inputs for equipment of the different water treatment stages: Intake, chlorination, coagulation, floculation, ultrafiltration system, backwash system, air blowing system, membrane filtration and post-treatment. Infrastructure for the reverse osmosis system itself is extrapolated based on the ultrafiltration pretreatment for sea-water reverse osmosis.Metal forming activities and associated losses where excluded. It also excludes the material for the membrane and casing it-self as they are considered consumables (having a shorter lifetime and material type and quantity depending on configuration and raw water quality). Membranes are included in the operation of membrane filtration treatment datasets. Energy and equipment needed for construction are excluded due to lack of data.

## Included activities end
This datasets ends with the dismantelment of the plant at the end of its useful life, expected to be 30 years. Input material end-of-life is included, but equipment and energy used for dismantling is excluded due to lack of data.

## Parameters
- reinforcing steel in concrete: 0.0275 dimensionless; name reinf_steel; lognormal variance with pedigree 0.0052, pedigree (3,4,1,1,2)
  Estimation. Reinforcing steel content in reinforced concrete for potable water treatment equipements based on average value from conventionnal treatment waterworks inventory and technical expert estimate.

## Reference product
- water works, capacity 6.23E10l/year: 1 unit; name SWRO_plant; CPC 53253: Sewage and water treatment plants; By-product classification allocatable product
  production volume 0.287155 unit; name PV_SWRO_plant
    Calculated. Estimated production volume of 2012. Based on literature market data, installed desalination capacity (including sevral technologies and water sources) grew as an average of 12% a year from 2005-2010 (Lattermann, s.2010). Adjusted on a "plant basis" using the Fujairah-1 production capacity and percentage of membrane technologies used for desalination in 2006 worldwide: 59% (Lattemann, 2010). Assumed 9% of treatment plant used conventional pretreatment (Al-Sarkal et al.).
    Lattermann, s.2010. Sustainable eater for the future: Water recycling versus desalination - Chapiter 2: Global desalination situation. Edited Escobar, I. et al., Elsevier. volume 2. 399 p.).
    Al-Sarkal, T., & Arafat, H. a. (2013). Ultrafiltration versus sedimentation-based pretreatment in Fujairah-1 RO plant: Environmental impact study. Desalination, 317, 55-66. doi:10.1016/j.desal.2013.02.019
  property price 6.28911e6 EUR2005; name SWRO_plant_price_EUR2005
    Calculated based on inputs: The price of the product has been calculated as a sum of the values of the material and energy inputs for this product. This value is therefore a rough estimation. It may underestimate the real price since there are additional expenses when producing any product. These expences can include for example labour costs, treatment of waste materials and profit for the producer. Please consider carefully whether this level of data quality is acceptable for your application.
  property lifetime capacity in m3 1.86825e9 m3; name SWRO_plant_Lft_capacity_m3
    Calculated value. Based on capacity of seawater reverse osmosis plant assuming full capacity and year long operation.
  property lifetime 30 year; name SWRO_plant_lft
    Literature value. Based on reported average expected lifetime for seawater reverse osmosis plant. Value published by Waterreuse association desalination committee. 2011. Overview of desalination plant intake alternatives - white paper.

## Inputs from technosphere
- waste plastic, mixture: 0 kg; name waste_plastic; pedigree (1,1,1,1,1)
  Estimation. Based on material input.
  production volume 0 kg
    Calculated from production volume of reference product using the relative outputs.
  property price 0 EUR2005; name waste_plastic_price_EUR2005
  properties: water content 0.180638, dry mass 0.847 kg, wet mass 1 kg, carbon content, fossil 0.747344, heating value, net 30.79 MJ
  note on heating value, net: Value taken from the general comment of the treatment dataset.
- waste reinforced concrete: 0 kg; name waste_reinf_concrete; pedigree (1,1,1,1,1)
  Estimation. Based on material input.
  production volume 0 kg
    Calculated from production volume of reference product using the relative outputs.
  property price 0 EUR2005; name waste_reinf_concrete_price_EUR2005
  properties: wet mass 1 kg, dry mass 0.99418 kg, water content 0.00585407
- scrap steel: 0 kg; name scrap_steel; pedigree (1,1,1,1,1)
  Estimation. Based on material input.
  Uncertainty: Calculated variable. Uncertainty will be determined from propagation of uncertainty factors of underlying variables. Uncertainty of actual relation between variables not accounted for at this time, although this could be included in a future update.
  production volume 0 kg
    Calculated from production volume of reference product using the relative outputs.
  property price 0 EUR2005; name scrap_steel_price_EUR2005
  properties: wet mass 1 kg, dry mass 1 kg
- reinforcing steel: 305.042 kg; = reinf_concrete* reinf_steel; lognormal variance with pedigree 0.008, pedigree (1,1,4,1,1)
  Calculated value.
  Uncertainty: Calculated variable. Uncertainty will be determined from propagation of uncertainty factors of underlying variables. Uncertainty of actual relation between variables not accounted for at this time, although this could be included in a future update.
  properties: dry mass 1 kg, wet mass 1 kg, carbon content, fossil 0.004
- polypropylene, granulate: 3950 kg; name pp; lognormal variance with pedigree 0.0132, pedigree (3,4,4,1,2)
  Literature value. Used for motor casing.
  properties: wet mass 1 kg, carbon content, fossil 0.857143, dry mass 1 kg, heating value, net 32.78 MJ
  note on heating value, net: Value extracted from "treatment of waste polypropylene, open burning"
- concrete, normal: 11092.4 m3; name reinf_concrete; = 26400000/ concrete_normal_wet_mass_1; source Al-Sarkal, T. 2013; lognormal variance with pedigree 0.0132, pedigree (3,4,4,1,2)
  Literature value. Material for settling tanks, fondation and treatment unit superstructure.
  property wet mass 2380 kg; name concrete_normal_wet_mass_1
  properties: dry mass 2190 kg, water content 0.086758
- polyvinylchloride, suspension polymerised: 985000 kg; name pvc; source Al-Sarkal, T. 2013; lognormal variance with pedigree 0.0132, pedigree (3,4,4,1,2)
  Literature value. Used for pipes.
  properties: carbon content, fossil 0.387097, wet mass 1 kg, dry mass 1 kg, heating value, net 21.5 MJ
- steel, chromium steel 18/8: 2.03394e6 kg; name ssteel; source Al-Sarkal, T. 2013; lognormal variance with pedigree 0.0132, pedigree (3,4,4,1,2)
  Literature value. Material for pumps, motors, ultrafiltration and reverse osmosis system frame and agitators of the treatment system.
  properties: dry mass 1 kg, carbon content, fossil 0.0008, wet mass 1 kg
  note on carbon content, fossil: Stainless steel model is the grade 304 steel (18/8 stainless, 18% chromium 8% nickel; max. 0.08% C)
- aluminium, wrought alloy: 1.03e6 kg; name Al; source Al-Sarkal, T. 2013; lognormal variance with pedigree 0.0132, pedigree (3,4,4,1,2)
  Literature value. Used for contruction of ultrafiltration and extrapolation to reverse osmosis system shed.
  properties: dry mass 1 kg, wet mass 1 kg
- glass fibre reinforced plastic, polyamide, injection moulded: 13200 kg; name glass_fiber; source Al-Sarkal, T. 2013; lognormal variance with pedigree 0.0132, pedigree (3,4,4,1,2)
  Literature value. Material for some chemical tanks.
  properties: dry mass 1 kg, wet mass 1 kg, carbon content, fossil 0.446018
- scrap aluminium: 0 kg; name scrap_al
  production volume 0 kg
    Calculated from production volume of reference product using the relative outputs.
  property price 0 EUR2005; name scrap_al_price_EUR2005
  properties: wet mass 1 kg, dry mass 1 kg
- steel, low-alloyed: 395799 kg; name steel; source Al-Sarkal, T. 2013; lognormal variance with pedigree 0.0192, pedigree (4,4,4,1,2)
  Literature value. Used for contruction of reverse osmosis system shed (extrapolation from ultrafiltration).
  properties: wet mass 1 kg, dry mass 1 kg, carbon content, fossil 0.005
- waste reinforcement steel: 0 kg; name waste_reinf_steel; pedigree (1,1,1,1,1)
  (same comment as for scrap steel)
  production volume 0 kg
    Calculated from production volume of reference product using the relative outputs.
  property price 0 EUR2005; name waste_reinf_steel_price_EUR2005
  properties: wet mass 1 kg, dry mass 1 kg
- waste plastic, mixture: -96461.6, -7436.62, -3071.59, -2916.76, -111300, -1240.89, -562.42, -779160 kg (8 entries); lognormal variance with pedigree 0.008, pedigree (1,1,4,1,1)
  Estimation. Based on material input.
  production volume 287773 kg
- waste reinforced concrete: -725.834, -7.69076, -10358.9 kg (3 entries); lognormal variance with pedigree 0.008, pedigree (1,1,4,1,1)
  Estimation. Based on material input.
  production volume 3185.25 kg
- scrap steel: -495254, -627.469, -1.53806e6 kg (3 entries); lognormal variance with pedigree 0.008, pedigree (1,1,4,1,1)
  (same comment as for scrap steel)
  production volume 584056 kg
- scrap aluminium: -326724, -15329.2, -687948 kg (3 entries)
  production volume 295770 kg
- waste reinforcement steel: -0.211661, -304.83 kg (2 entries); lognormal variance with pedigree 0.008, pedigree (1,1,4,1,1)
  (same comment as for scrap steel)
  production volume 87.5945 kg

## Inputs from nature
- Transformation, to industrial area [natural resource, land]: 24251.5 m2; lognormal variance with pedigree 0.0192, pedigree (4,4,4,1,2)
  Calulated value. Estimated based on reverse osmosis plant footprint and production capacity reported by Bartels. 2010. Design Advantages for SWRO Using Advanced Membrane Technology. IDA Journal of Desalination and Water Reuse. pp.21-25 (5).
- Transformation, from unspecified [natural resource, land]: 24251.5 m2; name footprint; lognormal variance with pedigree 0.0192, pedigree (4,4,4,1,2)
  (same comment as for Transformation, to industrial area)
- Occupation, construction site [natural resource, land]: 48502.9 m2*year; = footprint*2; lognormal variance with pedigree 0.0852, pedigree (5,4,5,5,2)
  Calculated value. Assumed construction of facility took 2 years.
- Occupation, industrial area [natural resource, land]: 727544 m2*year; = SWRO_plant_lft*footprint; lognormal variance with pedigree 0.008, pedigree (1,1,4,1,1)
  (same comment as for reinforcing steel)

## Sampling procedure
Al-Sarkal, T., & Arafat, H. a. (2013). Ultrafiltration versus sedimentation-based pretreatment in Fujairah-1 RO plant: Environmental impact study. Desalination, 317, 55–66. doi:10.1016/j.desal.2013.02.019

## Extrapolations
This dataset has been extrapolated from year 2012 to the year of the calculation (2021). The uncertainty has been adjusted accordingly.

## Review by Emilia Moreno Ruiz 2014-05-22
renaming water work infrastructure
