# treatment of wastewater from PV cell production, capacity 5E9l/year

Dataset: EcoSpold 2, unit process
Geography: RoW
Time period: 1994-01-01 to 2021-12-31
Technology level: current
Classification: EcoSpold01Categories: waste management/wastewater treatment
Classification: ISIC rev.4 ecoinvent: 3700:Sewerage
Tags: ConvertedDataset; Treatment
Scenario: Business-as-Usual
System model: Allocation, cut-off by classification
Share of production covered: 1 %
Generated by: Niels Jungbluth
Published in: Jungbluth, N. 2009
Database: ecoinvent
isCopyrightProtected: true
accessRestrictedTo: 1

## General comment
Wastewater purified in a medium size municipal wastewater treatment plant (capacity class 3), with an average capacity size of 24900 per-captia-equivalents PCE.
Wastewater contains (in kg/m3): TOC: 0.2699 (GSD=122.5%); NH4-N: 0.03101 (GSD=122.5%); NO3-N: 0.1227 (GSD=122.5%); PO4-P: 0.03531 (GSD=122.5%); Cl: 0.273 (GSD=226.6%); F: 0.1736 (GSD=226.6%); Ti: 0.000003914 (GSD=226.6%); Si: 0.3497 (GSD=226.6%); Ca: 0.03
[This dataset was already contained in the ecoinvent database version 2. It was not individually updated during the transfer to ecoinvent version 3. Life Cycle Impact Assessment results may still have changed, as they are affected by changes in the supply chain, i.e. in other datasets. This dataset was generated following the ecoinvent quality guidelines for version 2. It may have been subject to central changes described in the ecoinvent version 3 change report (http://www.ecoinvent.org/database/ecoinvent-version-3/reports-of-changes/), and the results of the central updates were reviewed extensively. The changes added e.g. consistent water flows and other information throughout the database. The documentation of this dataset can be found in the ecoinvent reports of version 2, which are still available via the ecoinvent website. The change report linked above covers all central changes that were made during the conversion process.]

## Included activities end
Infrastructure materials for municipal wastewater treatment plant, transports, dismantling. Land use burdens.

## Geography
Specific to the technology mix encountered in Switzerland in 2000. Well applicable to modern treatment practices in Europe, North America or Japan.

## Technology
Three stage wastewater treatment (mechanical, biological, chemical) including sludge digestion (fermentation) according to the average technology in Switzerland

## Parameters
- fraction, process water, to air: 0.1 dimensionless; name fraction_PW_to_air; lognormal variance with pedigree 0.092025, pedigree (4,4,3,2,4)

## Reference product
- wastewater from PV cell production: -1 m3; CPC 39920: Sewage sludge; By-product classification Waste
  EcoSpold01Location=CH
  production volume 3.96633 m3
    This is a placeholder value that does not reflect real-world production volumes. This dataset does not currently require a real-world production volume to work in the database framework, and no actual data were collected yet. This has no negative effect on the results of the ecoinvent database.
  property price 0 EUR2005
    Waste products are assigned a price of zero as they are assumed to require further treatment.
  property carbon content, fossil 0.121726
    TOC = 0.27 kg/m3 (Tab 7.3, ecoinvent v2.2 report 6_XII). TOC was considered as Total Carbon.
  property carbon content 0.121726
    carbon content on a dry matter basis (reserved; not for manual entry)
  properties: dry mass 2.2181 kg, carbon content, non-fossil 0, water content 449.836, wet mass 1000 kg, water in wet mass 997.782 kg, carbon allocation 0.27 kg

## Inputs from technosphere
- chromium oxide, flakes: 4.3034e-8 kg; lognormal variance with pedigree 0.552, pedigree (1,1,5,5,1)
  burden from sludge incineration. Uncertainty calculated from wastewater composition and treatment model
  EcoSpold01Location=RER
  properties: dry mass 1 kg, wet mass 1 kg
- waste plastic, mixture: 0 kg; pedigree (1,1,1,1,1)
  direct wastewater treatment plant burden. Uncertainty calculated from wastewater composition and treatment model
  EcoSpold01Location=CH
  production volume 0 kg
    Calculated from the production volume of wastewater from PV cell production in proportion to the respective output amounts.
  properties: heating value, net 30.79 MJ, water content 0.180638, carbon content, fossil 0.747344, wet mass 1 kg, dry mass 0.847 kg
  note on heating value, net: Value taken from the general comment of the treatment dataset.
  note on carbon content, fossil: C content in 1 kg DM was calculated using data in Tab A.2, ecoinvent v2.2 report 13_I
- iron (III) chloride, without water, in 40% solution state: 0.22891 kg; lognormal variance with pedigree 0.102, pedigree (1,1,5,5,1)
  direct wastewater treatment plant burden plus burden from sludge incineration. Uncertainty calculated from wastewater composition and treatment model
  EcoSpold01Location=CH
  properties: dry mass 1 kg, wet mass 1 kg
- iron sulfate: 0.16743 kg; lognormal variance with pedigree 0.102, pedigree (1,1,5,5,1)
  direct wastewater treatment plant burden. Uncertainty calculated from wastewater composition and treatment model
  EcoSpold01Location=RER
  properties: wet mass 1 kg, dry mass 1 kg
- wastewater treatment facility, capacity 5E9l/year: 5.6882e-9 unit; lognormal variance with pedigree 0.042, pedigree (1,1,5,5,1)
  uncertainty heeded in exchanges of the module
  EcoSpold01Location=CH
- hydrochloric acid, without water, in 30% solution state: 1.0238e-6 kg; lognormal variance with pedigree 0.112, pedigree (1,1,5,5,1)
  (same comment as for chromium oxide, flakes)
  properties: dry mass 1 kg, wet mass 1 kg, heating value, net 3.32 MJ
- titanium dioxide: 2.1086e-6 kg; lognormal variance with pedigree 0.552, pedigree (1,1,5,5,1)
  (same comment as for chromium oxide, flakes)
  properties: wet mass 1 kg, dry mass 1 kg
- residual material landfill: 9.3843e-11 unit; lognormal variance with pedigree 0.072, pedigree (1,1,5,5,1)
  burden from sludge incineration. Uncertainty calculated from wastewater composition and treatment model
  EcoSpold01Location=CH
- chemical, inorganic: 1.7063e-6 kg; lognormal variance with pedigree 0.112, pedigree (1,1,5,5,1)
  EcoSpold01Location=GLO
  burden from sludge incineration. Uncertainty calculated from wastewater composition and treatment model
  properties: carbon content, fossil 0.003, wet mass 1 kg, dry mass 1 kg
  note on carbon content, fossil: This dataset is an unweighted average of 20 inorganic substances (listed in Tab 88.1, ecoinvent v2.2 report 8, part II), being part of the top100 chemicals included in this database. The C-content has also been calculated as an unweighted average of the C content of the substances composing this dataset.
- heat, district or industrial, other than natural gas: 0 MJ; pedigree (1,1,1,1,1)
  (same comment as for residual material landfill)
  properties: heating value, net 1 MJ
- electricity, high voltage: 0 kWh; pedigree (1,1,1,1,1)
  (same comment as for residual material landfill)
- quicklime, milled, packed: 6.0757e-6 kg; lognormal variance with pedigree 0.122, pedigree (1,1,5,5,1)
  EcoSpold01Location=CH
  burden from sludge incineration. Uncertainty calculated from wastewater composition and treatment model
  properties: dry mass 0.99 kg, wet mass 1 kg, water content 0.010101
- municipal waste incineration facility: 3.4543e-10 unit; lognormal variance with pedigree 0.102, pedigree (1,1,5,5,1)
  (same comment as for quicklime, milled, packed)
- ammonia, anhydrous, liquid: 0 kg; pedigree (1,1,1,1,1)
  (same comment as for quicklime, milled, packed)
  properties: dry mass 1 kg, wet mass 1 kg
- waste cement, hydrated: 0 kg; pedigree (1,1,1,1,1)
  (same comment as for quicklime, milled, packed)
  production volume 0 kg
    (same comment as for waste plastic, mixture)
  properties: dry mass 1 kg, wet mass 1 kg
- process-specific burdens, slag landfill: 0 kg; pedigree (1,1,1,1,1)
  (same comment as for residual material landfill)
- heat, district or industrial, natural gas: 0 MJ; pedigree (1,1,1,1,1)
  EcoSpold01Location=RER
  burden from sludge incineration. Uncertainty calculated from wastewater composition and treatment model
  properties: heating value, net 1 MJ
- cement, unspecified: 0 kg; pedigree (1,1,1,1,1)
  (same comment as for residual material landfill)
  properties: dry mass 1 kg, wet mass 1 kg
- waste graphical paper: -0.0155 kg; lognormal variance with pedigree 0.042, pedigree (1,1,5,5,1)
  (same comment as for waste plastic, mixture)
  production volume 0.062 kg
    (same comment as for waste plastic, mixture)
  properties: water content 0.126126, dry mass 0.888 kg, wet mass 1 kg, carbon content, non-fossil 0.454955, heating value, net 14.12 MJ
- slag landfill: 8.309e-10 unit; lognormal variance with pedigree 0.072, pedigree (1,1,5,5,1)
  (same comment as for quicklime, milled, packed)
- sewer grid, 5E9l/year, 110 km: 2.1782e-7 km; lognormal variance with pedigree 0.042, pedigree (1,1,5,5,1)
  EcoSpold01Location=CH
  uncertainty heeded in exchanges of the module
- liquid manure spreading, by vacuum tanker: 0.0042172 m3; lognormal variance with pedigree 0.042, pedigree (1,1,5,5,1)
  EcoSpold01Location=CH
  burden from sludge spreading. Uncertainty calculated from wastewater composition and treatment model
- electricity, low voltage: 0 kWh; pedigree (1,1,1,1,1)
  EcoSpold01Location=CH
  direct wastewater treatment plant burden. Uncertainty calculated from wastewater composition and treatment model
- process-specific burdens, residual material landfill: 0 kg; pedigree (1,1,1,1,1)
  (same comment as for residual material landfill)
- process-specific burdens, municipal waste incineration: 0 kg; pedigree (1,1,1,1,1)
  (same comment as for quicklime, milled, packed)
- aluminium sulfate, powder: 0.04525 kg; lognormal variance with pedigree 0.102, pedigree (1,1,5,5,1)
  EcoSpold01Location=RER
  direct wastewater treatment plant burden. Uncertainty calculated from wastewater composition and treatment model
  properties: dry mass 1 kg, wet mass 1 kg
- sodium hydroxide, without water, in 50% solution state: 3.3512e-5 kg; lognormal variance with pedigree 0.122, pedigree (1,1,5,5,1)
  (same comment as for chromium oxide, flakes)
  properties: heating value, net 3.03 MJ, dry mass 1 kg, wet mass 1 kg
- waste plastic, mixture: -0.00172425, -0.000115208, -8.71297e-6, -4.75849e-5, -1.92238e-5, -4.51863e-5, -0.00146914, -0.0120707 kg (8 entries); lognormal variance with pedigree 0.042, pedigree (1,1,5,5,1)
  (same comment as for waste plastic, mixture)
  production volume 0.0614782 kg
- heat, district or industrial, other than natural gas: 0.000458491, 0.0276859, 1.13066 MJ (3 entries); lognormal variance with pedigree 0.102, pedigree (1,1,5,5,1)
  (same comment as for residual material landfill)
- electricity, high voltage: 0.00200748, 0.000384853, 0.00886455, 0.0290507, 0.00652518, 0.09396, 0.0149012, 0.042956 kWh (8 entries); lognormal variance with pedigree 0.552, pedigree (1,1,5,5,1)
  (same comment as for residual material landfill)
- ammonia, anhydrous, liquid: 1.54411e-5, 1.32735e-6, 2.06502e-6, 4.09153e-6, 4.00862e-6, 4.20146e-7, 1.87821e-6, 4.4433e-5 kg (8 entries); lognormal variance with pedigree 0.222, pedigree (1,1,5,5,1)
  (same comment as for quicklime, milled, packed)
- waste cement, hydrated: -0.0127418, -0.0323022 kg (2 entries); lognormal variance with pedigree 0.082, pedigree (1,1,5,5,1)
  (same comment as for quicklime, milled, packed)
  production volume 0.178659 kg
- process-specific burdens, slag landfill: 0.13221, 0.33517 kg (2 entries); lognormal variance with pedigree 0.072, pedigree (1,1,5,5,1)
  (same comment as for residual material landfill)
- heat, district or industrial, natural gas: 7.19631e-5, 0.00172438, 0.00466926 MJ (3 entries); lognormal variance with pedigree 0.222, pedigree (1,1,5,5,1)
  (same comment as for heat, district or industrial, natural gas)
- cement, unspecified: 0.00260172, 0.000541341, 3.96495e-5, 0.000113014, 0.00255585, 7.52262e-5, 0.000826206, 9.99617e-5, 0.011165 kg (9 entries); lognormal variance with pedigree 0.082, pedigree (1,1,5,5,1)
  (same comment as for residual material landfill)
- electricity, low voltage: 0.00756325, 0.00137712, 0.0310869, 0.108611, 0.0221734, 0.340433, 0.055076, 0.15815 kWh (8 entries); lognormal variance with pedigree 0.212, pedigree (1,1,5,5,1)
  (same comment as for electricity, low voltage)
- process-specific burdens, residual material landfill: 0.0127418, 0.0323022 kg (2 entries); lognormal variance with pedigree 0.072, pedigree (1,1,5,5,1)
  (same comment as for residual material landfill)
- process-specific burdens, municipal waste incineration: 0.390848, 0.990852 kg (2 entries); lognormal variance with pedigree 0.102, pedigree (1,1,5,5,1)
  (same comment as for quicklime, milled, packed)

## Emissions to nature
- Silicon [water, surface water]: 0.02101 kg; lognormal variance with pedigree 0.592, pedigree (1,1,5,5,1)
  sewer overload discharge plus direct wastewater treatment plant emission plus emission from sludge incineration. Uncertainty calculated from wastewater composition and treatment model
- Nitrate [water, ground-, long-term]: 5.2453e-5 kg; lognormal variance with pedigree 0.092, pedigree (1,1,5,5,1)
  emission from sludge incineration. Uncertainty calculated from wastewater composition and treatment model
- COD, Chemical Oxygen Demand [water, surface water]: 0.12079 kg; lognormal variance with pedigree 0.042, pedigree (1,1,5,5,1)
  (same comment as for Silicon)
- NMVOC, non-methane volatile organic compounds, unspecified origin [air, urban air close to ground]: 9.1489e-6 kg; lognormal variance with pedigree 0.212, pedigree (1,1,5,5,1)
  direct digester gas emission. Uncertainty calculated from wastewater composition and treatment model
- TOC, Total Organic Carbon [water, surface water]: 0.032363 kg; lognormal variance with pedigree 0.042, pedigree (1,1,5,5,1)
  (same comment as for Silicon)
- Ammonia [air, urban air close to ground]: 0.00049038 kg; lognormal variance with pedigree 0.292, pedigree (1,1,5,5,1)
  direct digester gas emission plus emission from sludge incineration plus emission from sludge spreading. Uncertainty calculated from wastewater composition and treatment model
- COD, Chemical Oxygen Demand [water, ground-, long-term]: 0.00090945 kg; lognormal variance with pedigree 0.072, pedigree (1,1,5,5,1)
  (same comment as for Nitrate)
- BOD5, Biological Oxygen Demand [water, ground-, long-term]: 0.00029748 kg; lognormal variance with pedigree 0.072, pedigree (1,1,5,5,1)
  (same comment as for Nitrate)
- Aluminium [soil, agricultural]: 0.0033477 kg; lognormal variance with pedigree 0.102, pedigree (1,1,5,5,1)
  emission from sludge spreading. Uncertainty calculated from wastewater composition and treatment model
- DOC, Dissolved Organic Carbon [water, surface water]: 0.030229 kg; lognormal variance with pedigree 0.042, pedigree (1,1,5,5,1)
  (same comment as for Silicon)
- Calcium, ion [water, surface water]: 0.032557 kg; lognormal variance with pedigree 0.692, pedigree (1,1,5,5,1)
  (same comment as for Silicon)
- Silicon [soil, agricultural]: 0.15403 kg; lognormal variance with pedigree 0.732, pedigree (1,1,5,5,1)
  (same comment as for Aluminium)
- Phosphate [water, ground-]: 0.00018338 kg; lognormal variance with pedigree 0.152, pedigree (1,1,5,5,1)
  (same comment as for Aluminium)
- Potassium, ion [water, surface water]: 0.007339 kg; lognormal variance with pedigree 0.692, pedigree (1,1,5,5,1)
  (same comment as for Silicon)
- Titanium [air, urban air close to ground]: 1.0244e-9 kg; lognormal variance with pedigree 0.752, pedigree (1,1,5,5,1)
  direct digester gas emission plus emission from sludge incineration. Uncertainty calculated from wastewater composition and treatment model
- Aluminium [air, urban air close to ground]: 5.9317e-6 kg; lognormal variance with pedigree 0.122, pedigree (1,1,5,5,1)
  (same comment as for Titanium)
- Titanium [soil, agricultural]: 9.032e-7 kg; lognormal variance with pedigree 0.732, pedigree (1,1,5,5,1)
  (same comment as for Aluminium)
- Titanium, ion [water, ground-, long-term]: 3.0696e-7 kg; lognormal variance with pedigree 1.092, pedigree (1,1,5,5,1)
  (same comment as for Nitrate)
- Silicon [water, ground-, long-term]: 0.01517 kg; lognormal variance with pedigree 5.472, pedigree (1,1,5,5,1)
  (same comment as for Nitrate)
- Calcium [air, urban air close to ground]: 3.1366e-6 kg; lognormal variance with pedigree 0.742, pedigree (1,1,5,5,1)
  (same comment as for Titanium)
- Iron, ion [water, surface water]: 2.5534e-5 kg; lognormal variance with pedigree 0.132, pedigree (1,1,5,5,1)
  (same comment as for Silicon)
- Sulfate [water, surface water]: 0.14395 kg; lognormal variance with pedigree 0.102, pedigree (1,1,5,5,1)
  (same comment as for Silicon)
- Water [air, unspecified]: 0.1 m3; name water_to_air_unspecified; lognormal variance with pedigree 0.0827, pedigree (2,2,5,5,1)
  Calculated value based on water balance.
  property fraction, origin: fresh water 0; name fraction_origin_fresh_water
  property fraction, origin: salt water 0; name fraction_origin_salt_water
  property fraction, origin: unspecified 1; name fraction_origin_unspecified
- DOC, Dissolved Organic Carbon [water, ground-, long-term]: 0.00035987 kg; lognormal variance with pedigree 0.072, pedigree (1,1,5,5,1)
  (same comment as for Nitrate)
- Chloride [water, surface water]: 0.42309 kg; lognormal variance with pedigree 0.422, pedigree (1,1,5,5,1)
  (same comment as for Silicon)
- Water [water, unspecified]: 0.9 m3; name water_to_water_unspecified; lognormal variance with pedigree 0.0827, pedigree (2,2,5,5,1)
  Calculated value based on water balance.
  property fraction, origin: unspecified 0; name fraction_origin_unspecified_Ww
  property fraction, origin: fresh water 1; name fraction_origin_fresh_water_Ww
  property fraction, origin: salt water 0; name fraction_origin_salt_water_Ww
  property carbon content, fossil 0; name C_content_fossil
  property water in wet mass 1000 kg; name WWM
  property wet mass 1000 kg; name WM
  property carbon content, non-fossil 0; name C_content_non_fossil
  property dry mass 0 kg; name DM
- Sodium, ion [water, surface water]: 0.4153 kg; lognormal variance with pedigree 0.692, pedigree (1,1,5,5,1)
  (same comment as for Silicon)
- Iron [soil, agricultural]: 0.065785 kg; lognormal variance with pedigree 0.102, pedigree (1,1,5,5,1)
  (same comment as for Aluminium)
- Aluminium [water, surface water]: 3.1595e-7 kg; lognormal variance with pedigree 0.712, pedigree (1,1,5,5,1)
  (same comment as for Silicon)
- Carbon dioxide, fossil [air, urban air close to ground]: 0.75155 kg; lognormal variance with pedigree 0.052, pedigree (1,1,5,5,1)
  (same comment as for Nitrate)
- Nitrogen [water, surface water]: 0.001294 kg; lognormal variance with pedigree 0.072, pedigree (1,1,5,5,1)
  direct wastewater treatment plant emission. Uncertainty calculated from wastewater composition and treatment model
- Silicon [air, urban air close to ground]: 0.00040671 kg; lognormal variance with pedigree 0.752, pedigree (1,1,5,5,1)
  (same comment as for Titanium)
- Carbon monoxide, fossil [air, urban air close to ground]: 0.00080601 kg; lognormal variance with pedigree 0.172, pedigree (1,1,5,5,1)
  (same comment as for Nitrate)
- Phosphorus [air, urban air close to ground]: 1.1908e-5 kg; lognormal variance with pedigree 0.122, pedigree (1,1,5,5,1)
  (same comment as for Titanium)
- TOC, Total Organic Carbon [water, ground-, long-term]: 0.00035987 kg; lognormal variance with pedigree 0.072, pedigree (1,1,5,5,1)
  (same comment as for Nitrate)
- Iron, ion [water, ground-, long-term]: 0.03495 kg; lognormal variance with pedigree 0.932, pedigree (1,1,5,5,1)
  (same comment as for Nitrate)
- Calcium [soil, agricultural]: 0.0016589 kg; lognormal variance with pedigree 0.732, pedigree (1,1,5,5,1)
  (same comment as for Aluminium)
- Nitrogen oxides [air, urban air close to ground]: 0.00081854 kg; lognormal variance with pedigree 0.092, pedigree (1,1,5,5,1)
  (same comment as for Titanium)
- Carbon [soil, agricultural]: 0.032492 kg; lognormal variance with pedigree 0.062, pedigree (1,1,5,5,1)
  (same comment as for Aluminium)
- Titanium, ion [water, surface water]: 1.9864e-6 kg; lognormal variance with pedigree 0.682, pedigree (1,1,5,5,1)
  (same comment as for Silicon)
- Fluoride [water, surface water]: 0.1736 kg; lognormal variance with pedigree 0.692, pedigree (1,1,5,5,1)
  (same comment as for Silicon)
- Cyanide [air, urban air close to ground]: 1.3141e-6 kg; lognormal variance with pedigree 0.252, pedigree (1,1,5,5,1)
  (same comment as for Nitrate)
- Phosphate [water, ground-, long-term]: 0.0013946 kg; lognormal variance with pedigree 4.272, pedigree (1,1,5,5,1)
  (same comment as for Nitrate)
- Aluminium [water, ground-, long-term]: 0.00281 kg; lognormal variance with pedigree 0.112, pedigree (1,1,5,5,1)
  (same comment as for Nitrate)
- Methane, fossil [air, urban air close to ground]: 0.0020183 kg; lognormal variance with pedigree 0.102, pedigree (1,1,5,5,1)
  (same comment as for Nitrate)
- Nitrate [water, surface water]: 0.51765 kg; lognormal variance with pedigree 0.072, pedigree (1,1,5,5,1)
  (same comment as for Silicon)
- Ammonium, ion [water, surface water]: 0.012765 kg; lognormal variance with pedigree 0.082, pedigree (1,1,5,5,1)
  (same comment as for Nitrogen)
- Dinitrogen monoxide [air, urban air close to ground]: 0.00043262 kg; lognormal variance with pedigree 0.072, pedigree (1,1,5,5,1)
  direct wastewater treatment plant emission plus direct digester gas emission plus emission from sludge incineration plus emission from sludge spreading. Uncertainty calculated from wastewater composition and treatment model
- Calcium, ion [water, ground-, long-term]: 0.0016374 kg; lognormal variance with pedigree 0.732, pedigree (1,1,5,5,1)
  (same comment as for Nitrate)
- Iron [air, urban air close to ground]: 2.491e-6 kg; lognormal variance with pedigree 0.142, pedigree (1,1,5,5,1)
  (same comment as for Titanium)
- BOD5, Biological Oxygen Demand [water, surface water]: 0.039669 kg; lognormal variance with pedigree 0.052, pedigree (1,1,5,5,1)
  (same comment as for Silicon)
- Phosphate [water, surface water]: 0.038734 kg; lognormal variance with pedigree 0.082, pedigree (1,1,5,5,1)
  sewer overload discharge plus direct wastewater treatment plant emission plus emission from sludge incineration plus emission from sludge spreading. Uncertainty calculated from wastewater composition and treatment model

## Sampling procedure
literature

## Extrapolations
wastewater compositions from literature and/or estimates This dataset has been copied from an original dataset covering the geography CH. The uncertainty has been adjusted accordingly.

## Review by Roberto Dones 2009-02-07
passed.
