# anode factory construction

Dataset: EcoSpold 2, unit process
Geography: RoW
Time period: 2002-01-01 to 2021-12-31
Technology level: current
Classification: EcoSpold01Categories: metals/extraction
Classification: ISIC rev.4 ecoinvent: 4100:Construction of buildings
Tags: ConvertedDataset
Scenario: Business-as-Usual
System model: Allocation, cut-off by classification
Generated by: Hans-Jörg Althaus
Published in: Althaus H.-J. 2000
Database: ecoinvent
isCopyrightProtected: true
accessRestrictedTo: 1

## General comment
Medium sized plant. Output: 80'000 t/a, life time: 50 years. Assumption is based on data for casting plant.
[This dataset was already contained in the ecoinvent database version 2. It was not individually updated during the transfer to ecoinvent version 3. Life Cycle Impact Assessment results may still have changed, as they are affected by changes in the supply chain, i.e. in other datasets. This dataset was generated following the ecoinvent quality guidelines for version 2. It may have been subject to central changes described in the ecoinvent version 3 change report (http://www.ecoinvent.org/database/ecoinvent-version-3/reports-of-changes/), and the results of the central updates were reviewed extensively. The changes added e.g. consistent water flows and other information throughout the database. The documentation of this dataset can be found in the ecoinvent reports of version 2, which are still available via the ecoinvent website. The change report linked above covers all central changes that were made during the conversion process.]

## Included activities end
Production hall, machinery and administrative buildings (including disposal)

## Geography
Some Swiss datasets are used for European processes.

## Technology
Assumed technology

## Reference product
- anode factory: 1 unit; CPC 53269: Other constructions for manufacturing; By-product classification allocatable product
  production volume 2.67763 unit
    This is a placeholder value that does not reflect real-world production volumes. This dataset does not currently require a real-world production volume to work in the database framework, and no actual data were collected yet. This has no negative effect on the results of the ecoinvent database.
  property price 5.27648e7 EUR2005
    Upscale from EU 27 to the world by PPP (0.8458 in 2003 and 0,8426 in 2004)

## Inputs from technosphere
- concrete, normal: 0 m3; pedigree (1,1,1,1,1)
  properties: wet mass 2380 kg, water content 0.086758, dry mass 2190 kg
- building, hall: 13400 m2; lognormal variance with pedigree 0.5, pedigree (5,5,5,5,5)
- building, multi-storey: 10000 m3; lognormal variance with pedigree 0.5, pedigree (5,5,5,5,5)
- industrial machine, heavy, unspecified: 1.23e6 kg; lognormal variance with pedigree 0.5, pedigree (5,5,5,5,5)
- waste concrete, not reinforced: -1.23e6 kg; lognormal variance with pedigree 0.5, pedigree (5,5,5,5,5)
  production volume 3.69e6 kg
    Calculated from the production volume of anode factory in proportion to the respective output amounts.
  properties: dry mass 1 kg, wet mass 1 kg
- concrete, normal: 12.643, 1.31738, 10.6651, 5.99912, 25.4046, 0.856882, 502.114 m3 (7 entries); lognormal variance with pedigree 0.5, pedigree (5,5,5,5,5)

## Inputs from nature
- Transformation, from unspecified [natural resource, land]: 300000 m2; lognormal variance with pedigree 0.32, pedigree (5,5,5,5,5)
- Occupation, industrial area [natural resource, land]: 1.5e7 m2*year; lognormal variance with pedigree 0.24, pedigree (5,5,5,5,5)
- Transformation, to industrial area [natural resource, land]: 300100 m2; lognormal variance with pedigree 0.32, pedigree (5,5,5,5,5)

## Sampling procedure
Internet search

## Extrapolations
see Geography This dataset has been copied from an original dataset covering the geography RER. The uncertainty has been adjusted accordingly.

## Review by Roland Hischier 2003-08-20
Passed.
