# cement mortar production, hand-mixed, on-site

Dataset: EcoSpold 2, unit process
Geography: IN
Time period: 2014-04-01 to 2021-12-31
Technology level: current
Classification: ISIC rev.4 ecoinvent: 2394:Manufacture of cement, lime and plaster
Scenario: Business-as-Usual
System model: Allocation, cut-off by classification
Generated by: P V Kiran Ananth
Published in: Kiran Ananth P. V. 2017
Database: ecoinvent
isCopyrightProtected: true
accessRestrictedTo: 1

## General comment
Mortar is used to hold building materials such as brick or stone together. It is composed of a thick mixture of water, sand, and cement. The water is used to hydrate the cement and hold the mix together. The water to cement ratio is higher in mortar than in concrete in order to form its bonding element. When mixed, it is a much thicker substance than concrete, making it ideal as a glue for building materials like brick.
The differences between mortar and plaster lie in the capacity of plasters to take better finish, which depend to a very large extent on the type of sand used in the mix. For plasters we use finer sand. However in mortar we use coarse particles of sand.
Mix ratio is the volumetric mixing ratio of cement and aggregates. Mix Ratio varies from 1:3 to 1:6 depending upon the application area. The mix ratio accounted for is 1:3.
This dataset is fit with hand-mixed on site mortor production. Hand-mixed on site mortor used for larger area of application like big buildings.
[This dataset is meant to replace the following datasets:
- cement mortar production, IN, 2014 - 2017]

## Included activities start
Activities starts with reception of cement, aggregates and water at civil site.

## Included activities end
Activity ends with cement mortar, ready to be applied.The tap water consumption for cleaning the container and tools is excluded due to lack of data.

## Geography
Data represents for Indian geography.

## Technology
Mixing of cement, aggregates and water done by hand mixing.

## Time period
Data available for above period.

## Reference product
- cement mortar: 1 kg; CPC 37: Glass and glass products and other non-metallic products n.e.c.; By-product classification allocatable product
  production volume 4.13e7 kg; = 59E+09*(10%*5%)*14%
    The production volume of pre-mixed dry mortars worldwide is estimated to be: "Total production of cement/gypsum/lime based dry mortars worldwide is 59,0 million tons, of which 57% is produced in Western Europe, 14% in Eastern Europe, 10% in Asia/Pacific, and about 6% each in North America, Latin America and Middle East/Africa."(Schinski, E., n.d. Dry mortars - Markets and Trends. Hercules GmbH, Aqualon Division, Düsseldorf, Germany. Retrieved from: http://www.apfac.pt/congresso2005/comunicacoes/Paper%2056.pdf, accessed 20171025). According to Schinski (n.d.), 35% of dry mix mortars are cement based renders, 32% are cement tiles, 17% are gypsum plasters and 14% are cement based mortars. India is in the top 3 global producers of cement with China and US, India produces around 10% of what China produces (WorldAtlas, 2017. Top Cement Producing Countries In The World, Retrieved from: http://www.worldatlas.com/articles/top-cement-producing-countries-in-the-world.html, accessed 20172510). Based on expert judgement it is therefore assumed that India represents 5% of the Asia and Pacific production. The production volume is therefore calculated as 59 million tons * (10%*5%) *14%.
  property price 0.094 EUR2005
    Calculated value based on data from United Nations Commodity Trade Statistics Database (comtrade.un.org). UN comtrade category: 252321 Portland cement, white or white artificially coloured. Year 2005. Using exchange rate of 1EURO = 1.209 USD. Average of price of import into 5 main markets (EU, US, JP, IN and CN).
  property carbon content 0
    carbon content on a dry matter basis (reserved; not for manual entry)
  properties: carbon content, fossil 0, wet mass 1 kg, carbon content, non-fossil 0, water content 0, dry mass 1 kg, water in wet mass 0 kg, carbon allocation 0 kg

## Inputs from technosphere
- sand: 0.7377 kg; lognormal variance with pedigree 0.005325, pedigree (3,2,3,2,2)
  Calculated value. For Cement mortar mix ratio assumed here is 1:3 (volume basis). Density of Cement 1440 kg/m3 and density of sand 1600 kg/m3 considered for calculation purpose.
  properties: wet mass 1 kg, dry mass 1 kg
- cement, pozzolana and fly ash 25-35%: 0.2732 kg; lognormal variance with pedigree 0.005325, pedigree (3,2,3,2,2)
  (same comment as for sand)
  properties: dry mass 1 kg, wet mass 1 kg
- tap water: 0.168 kg; name water_input; lognormal variance with pedigree 0.005325, pedigree (3,2,3,2,2)
  Calculated value. Usually around 20% of water by weight of the total dry material is mixed in the mixture to achieve the desire workability. For Cement mortar mix ratio assumed here is 1:3 (volume basis). Density of Cement 1440 kg/m3 and density of sand 1600 kg/m3 considered for calculation purpose.
  properties: dry mass 0.000337476 kg, water content 2962.17, carbon content, fossil 0.00178991, wet mass 1 kg
  note on carbon content, fossil: Bicarbonate content is 2.93 mol/m3. CO2 content is 0.1 mol/m3 (ecoinvent v2.2 report 8, Tab 93.1).

## Emissions to nature
- Water [air, unspecified]: 0.0001344 m3; = water_input*0.8/1000; lognormal variance with pedigree 0.0453, pedigree (3,3,3,3,4)
  Assumed value. It was considered that 80% of water vanish in air and remaining 20% water stream.
- Water [water, unspecified]: 3.36e-5 m3; = water_input*0.2/1000; lognormal variance with pedigree 0.0453, pedigree (3,3,3,3,4)
  (same comment as for Water)

## Sampling procedure
Data collected by consulting with 2 cement mortar manufacturer located in India and secondary research.

## Extrapolations
This dataset has been extrapolated from year 2017 to the year of the calculation (2021). The uncertainty has been adjusted accordingly.
