# pitch despergents production, in paper production

Dataset: EcoSpold 2, unit process
Geography: RER
Time period: 2000-01-01 to 2021-12-31
Technology level: current
Classification: ISIC rev.4 ecoinvent: 2011:Manufacture of basic chemicals
Classification: EcoSpold01Categories: chemicals/inorganics
Tags: ConvertedDataset
Scenario: Business-as-Usual
System model: Allocation, cut-off by classification
Generated by: Roland Hischier
Published in: Hischier R. 2007
Database: ecoinvent
isCopyrightProtected: true
accessRestrictedTo: 1

## General comment
The functional unit represent 1 kg of pitch despergents. Very large uncertainty of the process data, as only a mixture of different materials is included.
[This dataset was already contained in the ecoinvent database version 2. It was not individually updated during the transfer to ecoinvent version 3. Life Cycle Impact Assessment results may still have changed, as they are affected by changes in the supply chain, i.e. in other datasets. This dataset was generated following the ecoinvent quality guidelines for version 2. It may have been subject to central changes described in the ecoinvent version 3 change report (http://www.ecoinvent.org/database/ecoinvent-version-3/reports-of-changes/), and the results of the central updates were reviewed extensively. The changes added e.g. consistent water flows and other information throughout the database. The documentation of this dataset can be found in the ecoinvent reports of version 2, which are still available via the ecoinvent website. The change report linked above covers all central changes that were made during the conversion process.]

## Included activities end
Mixture of three different examples for the pitch despergent (aluminium sulphate, talc, latex). Only input of mentioned substances is taken into account.

## Geography
Data used has no specific geographical origin (raw materials represented by typical examples). Data are used as European average data.

## Technology
equal split to three different substances without any further inputs/outputs

## Reference product
- pitch despergents, in paper production: 1 kg; CPC 34: Basic chemicals; By-product classification allocatable product
  EcoSpold01Location=RER
  production volume 1.32237 kg
    This is a placeholder value that does not reflect real-world production volumes. This dataset does not currently require a real-world production volume to work in the database framework, and no actual data were collected yet. This has no negative effect on the results of the ecoinvent database. The placeholder value of this activity was scaled according to the nominal GDP of 2005 (source: United Nations, http://data.un.org/Glossary.aspx?q=GDP+%28current+US%24%29, accessed 20130726) to reflect an appropriate share of the global production volume, which is also a placeholder value.
  property heating value, net 8.82 MJ
    LHV is calculated based on the Carbon content of the product. More details can be found on the respective documentation.
  property price 0.86 EUR2005
    Assumed that all despergents of paper production have similar price to latex; Calculated value based on data from United Nations Commodity Trade Statistics Database (comtrade.un.org). UN comtrade category: 400211 Styrene-butadiene rubber (SBR/XSBR) latex. Year 2005. Using exchange rate of 1EURO = 1.209 USD. Average of price of import into 5 main markets (EU, US, JP, IN and CN).
  property carbon content, fossil 0.290994
    The dataset is an equal mixture of three different examples for the pitch despergent (aluminium sulphate, talc, latex).
  property carbon content, non-fossil 0
    (same comment as for pitch despergents, in paper production)
  property carbon content 0.290994
    carbon content on a dry matter basis (reserved; not for manual entry)
  properties: water content 0, dry mass 1 kg, water in wet mass 0 kg, wet mass 1 kg, carbon allocation 0.290994 kg

## Inputs from technosphere
- malusil: 0.333 kg; lognormal variance with pedigree 0.1561, pedigree (5,5,5,3,3)
  Estimated, based on three often used substances
  EcoSpold01Location=RER
  Uncertainty: estimated, based on three often used substances
  properties: dry mass 1 kg, wet mass 1 kg
- aluminium sulfate, powder: 0.333 kg; lognormal variance with pedigree 0.1561, pedigree (5,5,5,3,3)
  EcoSpold01Location=RER
  Estimated, based on three often used substances
  Uncertainty: estimated, based on three often used substances
  properties: dry mass 1 kg, wet mass 1 kg
- latex: 0.333 kg; lognormal variance with pedigree 0.1561, pedigree (5,5,5,3,3)
  (same comment as for malusil)
  properties: dry mass 1 kg, heating value, net 26.45 MJ, carbon content, fossil 0.872983, wet mass 1 kg
  note on carbon content, fossil: The Styrene-butadiene dispersion is based on styrene and 1,3-butadiene plus co-monomers like i.e. ac-rylonitrile or (meth-)acrylic acid (ecoinvent v2.2 report 11_III). Following specifications in US Patent 3,875,101 (1971), the dispersion was considered as: 52.5% 1.3-butadiene (0.8571 kg C/kg dry mass); 43% styrene (0.9231 kg C/kg dry mass); 2% acrylic acid (0.5 kg C/kg dry mass); 2.5% acrolein (C3H4O, MW=56; 0.6429 kg C/kg dry mass)

## Sampling procedure
see technology

## Extrapolations
This dataset has been extrapolated from year 2000 to the year of the calculation (2021). The uncertainty has been adjusted accordingly.

## Review by Hans-Jörg Althaus 2003-07-02
passed
