# treatment of used domestic refrigerator, controlled dismantling

Dataset: EcoSpold 2, unit process
Geography: GH
Time period: 2018-01-01 to 2021-12-31
Technology level: current
Classification: ISIC rev.4 ecoinvent: 3830:Materials recovery
Scenario: Business-as-Usual
System model: Allocation, cut-off by classification
Generated by: Avraam Symeonidis
Database: ecoinvent
isCopyrightProtected: true
accessRestrictedTo: 1

## General comment
The activity models the safe treatment of a large used domestic refrigeration machine by physical dismantling in a safe and controlled manner in a recycling facility. The process takes place in a formal recycling site in the capital of Ghana, Accra. This dataset includes electricity input necessary for the recovery of the refrigerant and infrastructure. The recovery efficiency is estimated at 70% of the refrigerant present in the refrigeration circuit.
The dataset averages three types of refrigerations machines based on the refrigerant they contain. Calculations regarding the average fridge are found on the table attached.
References for refrigerant:
Sampson Atiemo, Lambert Faabeluon, Andreas Manhart, Letitia Nyaaba, Tobias Schleicher, 2016, Baseline Assessment on E-waste Management in Ghana, Sustainable Recycling Industries. Accra, June 2016. Retrieved online at http://www.sustainable-recycling.org/sampson_2016_sri-ghana/ on 31/01/2018.
Amoyaw-Osei, Y & Agyekum, O.O. & Pwamang, John & Thiébaud (-Müller, Esther & Fasko, R & Schluep, Mathias. (2011). Ghana e-waste country assessment. SBC e-waste Africa project.

## Included activities start
Activity starts with the reception of the used refrigeration machine by the formal recycler. Transportation is not include in this LCI.

## Included activities end
Activity ends when the recycler removes all valuable metals. Activity includes emissions to air.

## Technology
Dismantling of refrigerator in a recycling facility. Technology involves anti-pollution measures such as removal of refrigerant and removal of insulation foam in a controlled manner.

## Time period
Controlled and safe dismantling of used domestic refrigeration machine without any temporal distinction.

## Reference product
- used domestic refrigerator: -1 unit; By-product classification Waste; CPC 39990: Other wastes n.e.c.
  production volume 136032 unit; name pvrp
    Calculated value. Production volume represents the imports (52%) of used refrigeration machines in Ghana for the time period from 2003 till 2008 (2005 excluded as was marked "in doubt"). It is assumed that 10% of the used imported refrigerators are dismantled in a controlled manner. Hence, the production volume for controlled dismantling is 136032 units.
    Reference: Ghana e-waste assessment. Retrieved online on 05.02.2018 at http://www.basel.int/Portals/4/Basel%20Convention/docs/eWaste/E-wasteAssessmentGhana.pdf
  property price 0 EUR2005
    Waste products are assigned a price of zero as they are assumed to require further treatment.
  property carbon content, non-fossil 5.2632e-6
    Values were taken from a similar product "refrigeration machine, R134a as refrigerant"
  property carbon content, fossil 0.3327
    Value calculated from the respective exchange propertis of the process outputs.
  property carbon content 0.332705
    carbon content on a dry matter basis (reserved; not for manual entry)
  properties: water in wet mass 0 kg, wet mass 58.3 kg, dry mass 58.3 kg, water content 0, carbon allocation 19.3967 kg

## By-products
- aluminium scrap, post-consumer: 0 kg; source Rufeng Xiao 2015; CPC 39363: Waste and scrap of aluminium; By-product classification Recyclable; pedigree (1,1,1,1,1)
  According to literature a domestic refrigerator has circa
  -1.58 kg of aluminum in the refrigerating system (compressor)
  -0.60 kg of aluminum in the refrigerating system (accessory)
  production volume 0 kg; = pvrp*bp3
    Calculated from production volume of reference product using the relative outputs.
  property price 0.685 EUR2005; name bp3_price_EUR2005
    Temporary price data. Calculated as 90% of purchasers price based on: estimated at 85% of new scrap
  property carbon content 0
    carbon content on a dry matter basis (reserved; not for manual entry)
  properties: water content 0, wet mass 1 kg, water in wet mass 0 kg, carbon content, non-fossil 0, carbon content, fossil 0, dry mass 1 kg, carbon allocation 0 kg
- copper scrap, sorted, pressed: 0 kg; source Rufeng Xiao 2015; CPC 39361: Waste and scrap of copper; By-product classification Recyclable; pedigree (1,1,1,1,1)
  According to literature a domestic refrigerator has circa
  -1.25 kg of copper in the refrigerating system (compressor)
  -0.05 kg of copper in the refrigerating system (accessory)
  production volume 0 kg; = pvrp*bp2
    Calculated from production volume of reference product using the relative outputs.
  property price 2.84 EUR2005; name bp2_price_EUR2005
    Temporary price data. Calculated as 90% of purchasers price based on: Source: USGS Mineral Yearbook 2007, Table 1 in <http://minerals.usgs.gov/minerals/pubs/commodity/recycle/myb1-2007-recyc.pdf>
  property carbon content 0
    carbon content on a dry matter basis (reserved; not for manual entry)
  properties: water in wet mass 0 kg, water content 0, wet mass 1 kg, dry mass 1 kg, carbon content, fossil 0, carbon content, non-fossil 0, carbon allocation 0 kg

## Inputs from technosphere
- waste polyethylene: -11.76 kg; name bp5; source Rufeng Xiao 2015; lognormal variance with pedigree 0.008925, pedigree (1,2,2,2,3)
  According to literature a domestic refrigerator has circa
  -5.14 kg of Isocyanate for foaming (Cabinet)
  -1.33 kg of Isocyanate for foaming (Door)
  -0.38 kg of Cyclopentane for foaming (Cabinet)
  -0.10 kg of Cyclopentane for foaming (Door)
  -3.81 kg of Polyether polyol for foaming (Cabinet)
  -0.99 kg of Polyether polyol for foaming (Door)
  production volume 1.59974e6 kg; = pvrp*bp5
    Calculated from production volume of reference product using the relative outputs.
  property price 0 EUR2005; name bp5_price_EUR2005
  properties: heating value, net 42.47 MJ, wet mass 1 kg, carbon content, fossil 0.825301, water content 0.00401606, dry mass 0.996 kg
  note on heating value, net: Value taken from the general comment of the treatment dataset.
  note on carbon content, fossil: C content in 1 kg DM was calculated using data in Tab A.1, ecoinvent v2.2 report 13_I
- used refrigerant R134a: -0.0722202 kg; name bp10; = (0.226*2976/6519*0.7)*-1; lognormal variance with pedigree 0.008925, pedigree (1,2,2,2,3)
  The amount represents emissions from uncontrolled venting of the refrigerant that is contained in the refrigeration circuit of an average machine. According to literature, there are 226 g of refrigerant R134a in the refrigerator machine. The latter amount is then multiplied with the normalised units (2976 units) and thereafter divided by the total amount of refrigeration machines (6519 units). Additionally, emissions from the blowing agent trapped in polyurethane foaming that functions as insulation for the refrigerator. Emissions correspond to an average machine. It is assumed that the recovery efficiency is 70% according to IPCC.
  Reference: Rüdenauer, I.; Gensch, C.-O.: Environmental and economic evaluation of the accelerated replacement of domestic appliances. ÖkoInstitut e.V., Freiburg 2007. Retrieved online at: https://www.oeko.de/en/publications/p-details/environmental-and-economic-evaluation-of-the-accelerated-replacement-of-domestic-appliances/ on 31st of January 2018.
  IPCC, 2007: Climate Change 2007: The Physical Science Basis. Contribution of Working Group I to the Fourth Assessment Report of the Intergovernmental Panel on Climate Change [Solomon, S., D. Qin, M. Manning, Z. Chen, M. Marquis, K.B. Averyt, M. Tignor and H.L. Miller (eds.)]. Cambridge University Press, Cambridge, United Kingdom and New York, NY, USA, 996 pp.
  production volume 9824.25 kg; = pvrp *bp10
    Calculated from production volume of reference product using the relative outputs.
  property price 0 EUR2005; name bp10_price_EUR2005
  properties: carbon content, fossil 0.23529, dry mass 1 kg, wet mass 1 kg, heating value, net 13.47 MJ
- waste polyvinylchloride: -0.466666 kg; name bp4; source Rufeng Xiao 2015; lognormal variance with pedigree 0.008925, pedigree (1,2,2,2,3)
  According to literature a domestic refrigerator has circa
  -0.46 kg of PVC (Shelves drawers)
  production volume 63481.5 kg; = pvrp*bp4
    Calculated from production volume of reference product using the relative outputs.
  property price 0 EUR2005; name bp4_price_EUR2005
  properties: carbon content, fossil 0.440882, wet mass 1 kg, dry mass 0.998 kg, water content 0.00200401, heating value, net 21.51 MJ
- used refrigerant R-12: -0.00795433 kg; name bp8; = (0.2905*255/6519*0.7)*-1; lognormal variance with pedigree 0.008925, pedigree (1,2,2,2,3)
  The amount represents emissions from uncontrolled venting of the refrigerant that is contained in the refrigeration circuit of an average machine. According to literature, there are on average 290.5 g of refrigerant R12 in the refrigerator machine. The latter amount is then multiplied with the normalised units (255 units) and thereafter divided by the total amount of refrigeration machines (6519 units). It is assumed that the recovery efficiency is 70% according to IPCC.
  Reference: Rüdenauer, I.; Gensch, C.-O.: Environmental and economic evaluation of the accelerated replacement of domestic appliances. ÖkoInstitut e.V., Freiburg 2007. Retrieved online at: https://www.oeko.de/en/publications/p-details/environmental-and-economic-evaluation-of-the-accelerated-replacement-of-domestic-appliances/ on 31st of January 2018.
  IPCC, 2007: Climate Change 2007: The Physical Science Basis. Contribution of Working Group I to the Fourth Assessment Report of the Intergovernmental Panel on Climate Change [Solomon, S., D. Qin, M. Manning, Z. Chen, M. Marquis, K.B. Averyt, M. Tignor and H.L. Miller (eds.)]. Cambridge University Press, Cambridge, United Kingdom and New York, NY, USA, 996 pp.
  production volume 1082.04 kg; = pvrp *bp8
    Calculated from production volume of reference product using the relative outputs.
  property price 0 EUR2005; name bp8_price_EUR2005
  properties: wet mass 1 kg, dry mass 1 kg, carbon content, fossil 0.099333, heating value, net 3.01 MJ
- used refrigerant R-600a: -0.0300101 kg; name bp9; = (0.085*3288/6519*0.7)*-1; lognormal variance with pedigree 0.008925, pedigree (1,2,2,2,3)
  The amount represents emissions from uncontrolled venting of the refrigerant that is contained in the refrigeration circuit of an average machine. According to literature, there are 85 g of refrigerant R600a in the refrigerator machine. The latter amount is then multiplied with the normalised units (3288 units) and thereafter divided by the total amount of refrigeration machines (6519 units). It is assumed that the recovery efficiency is 70% according to IPCC.
  Reference: Rüdenauer, I.; Gensch, C.-O.: Environmental and economic evaluation of the accelerated replacement of domestic appliances. ÖkoInstitut e.V., Freiburg 2007. Retrieved online at: https://www.oeko.de/en/publications/p-details/environmental-and-economic-evaluation-of-the-accelerated-replacement-of-domestic-appliances/ on 31st of January 2018.
  IPCC, 2007: Climate Change 2007: The Physical Science Basis. Contribution of Working Group I to the Fourth Assessment Report of the Intergovernmental Panel on Climate Change [Solomon, S., D. Qin, M. Manning, Z. Chen, M. Marquis, K.B. Averyt, M. Tignor and H.L. Miller (eds.)]. Cambridge University Press, Cambridge, United Kingdom and New York, NY, USA, 996 pp.
  production volume 4082.34 kg; = pvrp * bp9
    Calculated from production volume of reference product using the relative outputs.
  property price 0 EUR2005; name bp9_price_EUR2005
  properties: dry mass 1 kg, wet mass 1 kg, carbon content, fossil 0.826588, heating value, net 45.89 MJ
- scrap steel: -32.0927 kg; name bp1; source Rufeng Xiao 2015; lognormal variance with pedigree 0.010025, pedigree (2,3,2,2,3)
  According to literature a domestic refrigerator has circa
  -13 kg of steel in the cabinet (metal sheet)
  -1.9 kg of steel in the door (metal sheet)
  -15 kg of steel in the refrigerating system (compressor)
  -2.1 kg of steel in the refrigerating system (accessory)
  production volume 4.36563e6 kg; = pvrp*bp1
    Calculated from production volume of reference product using the relative outputs.
  property price 0 EUR2005; name bp1_price_EUR2005
  properties: dry mass 1 kg, wet mass 1 kg
- building, hall: 7.0137e-5 m2; lognormal variance with pedigree 0.309425, pedigree (2,3,2,2,3)
  Calculated value based on estimates. It is assumed that a domestic fridge has 0.8m of width and 0.8 m of length.
  1m2 of hall is available every day for 50 years
  1 refrigeration machine occupies during the dismantling the area of its base for the period of 2 days
- electricity, medium voltage: 0.00516088 kWh; lognormal variance with pedigree 0.010025, pedigree (2,3,2,2,3)
  Literature data.
  The power used by the reclamation machine as reported by the producer.
  0.7 kW reported by producer - Dayang (http://dyautoequip.en.alibaba.com/product/1639275705-219888480/r134a_refrigerant_recharging_equipment.html>, accessed 20150924 ).
  Cross reference:
  0.75 kW reported by another producer - Wonderfu (<http://www.wonderfu.com/sale-4009681-auto-r134a-recovery-machine-for-garage-refrigerant-reclaiming-equipment.html>, accessed 20150924).
  The recovery speed during the reclamation as reported by the producer.
  250 g/min. reported by producer - Dayang (http://dyautoequip.en.alibaba.com/product/1639275705-219888480/r134a_refrigerant_recharging_equipment.html>, accessed 20150924 ).
  Cross reference:
  300 g/min. reported by another producer - Wonderfu (<http://www.wonderfu.com/sale-4009681-auto-r134a-recovery-machine-for-garage-refrigerant-reclaiming-equipment.html>, accessed 20150924).
- waste rubber, unspecified: -0.287403 kg; name bp6; source Rufeng Xiao 2015; lognormal variance with pedigree 0.008925, pedigree (1,2,2,2,3)
  According to literature a domestic refrigerator has circa
  -0.28 kg of rubber
  production volume 39096 kg; = pvrp*bp6
    Calculated from production volume of reference product using the relative outputs.
  property price 0 EUR2005; name bp6_price_EUR2005
  properties: heating value, net 27.19 MJ, wet mass 1 kg, carbon content, fossil 0.853, dry mass 1 kg
- waste polystyrene: -10 kg; name bp7; source Rufeng Xiao 2015; lognormal variance with pedigree 0.008925, pedigree (1,2,2,2,3)
  According to literature a domestic refrigerator has circa
  -7.27 kg of High impact polystyrene (HIPS) in cabinet
  -2.72 kg of High impact polystyrene (HIPS) in the door
  production volume 1.36032e6 kg; = pvrp*bp7
    Calculated from production volume of reference product using the relative outputs.
  property price 0 EUR2005; name bp7_price_EUR2005
  properties: water content 0.00200401, dry mass 0.998 kg, wet mass 1 kg, carbon content, fossil 0.922579, heating value, net 38.67 MJ
- aluminium scrap, post-consumer: -2.18932 kg; source Rufeng Xiao 2015; lognormal variance with pedigree 0.008925, pedigree (1,2,2,2,3)
  (same comment as for aluminium scrap, post-consumer)
  production volume 297818 kg
  properties: wet mass 1 kg, dry mass 1 kg
- copper scrap, sorted, pressed: -1.308 kg; source Rufeng Xiao 2015; lognormal variance with pedigree 0.008925, pedigree (1,2,2,2,3)
  (same comment as for copper scrap, sorted, pressed)
  production volume 177930 kg
  properties: wet mass 1 kg, dry mass 1 kg

## Emissions to nature
All rows: lognormal variance with pedigree 0.129425, pedigree (2,3,2,2,3)
- Ethane, 1,1,1,2-tetrafluoro-, HFC-134a [air, urban air close to ground]: 0.0721106 kg; = 0.226*2976/6519*0.3+0.392*2976/6519*0.23
  The amount represents emissions from uncontrolled venting of the refrigerant that is contained in the refrigeration circuit of an average machine. According to literature, there are 226 g of refrigerant R134a in the refrigerator machine. The latter amount is then multiplied with the normalised units (2976 units) and thereafter divided by the total amount of refrigeration machines (6519 units). Additionally, emissions from the blowing agent trapped in polyurethane foaming that functions as insulation for the refrigerator. Emissions correspond to an average machine. It is assumed that the recovery efficiency is 70% according to IPCC. According to literature, there are on average 392 g of refrigerant R134a trapped in the insulation foam (from the refrigerator machines that use R134a as refrigerant). The latter amount is then multiplied with the normalised units (2976 units) and thereafter divided by the total amount of refrigeration machines (6519 units). Therefore it is here assumed that an average value of 23% of the blowing agent present in the polyurethane foam is considered an emission to air.
  Reference: Rüdenauer, I.; Gensch, C.-O.: Environmental and economic evaluation of the accelerated replacement of domestic appliances. ÖkoInstitut e.V., Freiburg 2007. Retrieved online at: https://www.oeko.de/en/publications/p-details/environmental-and-economic-evaluation-of-the-accelerated-replacement-of-domestic-appliances/ on 31st of January 2018.
  Prakash S, Manhart A, Amoyaw-Osei Y, Agyekum O (2010) Socio-economic Assessment and Feasibility Study on Sustainable E-waste Management in Ghana. Accra. Retrieved online at: http://www.sustainable-recycling.org/socio-economic-assessment-and-feasibility-study-on-sustainable-e-waste-management-in-ghana/ on 31st of January 2018.
  IPCC, 2007: Climate Change 2007: The Physical Science Basis. Contribution of Working Group I to the Fourth Assessment Report of the Intergovernmental Panel on Climate Change [Solomon, S., D. Qin, M. Manning, Z. Chen, M. Marquis, K.B. Averyt, M. Tignor and H.L. Miller (eds.)]. Cambridge University Press, Cambridge, United Kingdom and New York, NY, USA, 996 pp.
- Isobutane [air, urban air close to ground]: 0.0128615 kg; = 0.085*3288/6519*0.3
  (same comment as for used refrigerant R-600a)
- Methane, dichlorodifluoro-, CFC-12 [air, urban air close to ground]: 0.003409 kg; = 0.2905*255/6519*0.3
  (same comment as for used refrigerant R-12)
- Cyclopentane [air, urban air close to ground]: 0.0533625 kg; = 0.460*3288/6519*0.23
  According literature data, even in the formal recycling facilities 16-30% of the blowing agent traped in the polyurethane foam escapes to air as emission. Therefore it is here assumed that an average value of 23% of the blowing agent present in the polyurethane foam is considered an emission to air. There are on average 460 g of Cyclopentane trapped in the insulation foam (from the refrigerator machines that use R600a as refrigerant). The latter amount is then multiplied with the normalised units (3288 units) and thereafter divided by the total amount of refrigeration machines (6519 units).
  Reference: Prakash S, Manhart A, Amoyaw-Osei Y, Agyekum O (2010) Socio-economic Assessment and Feasibility Study on Sustainable E-waste Management in Ghana. Accra. Retrieved online at: http://www.sustainable-recycling.org/socio-economic-assessment-and-feasibility-study-on-sustainable-e-waste-management-in-ghana/ on 31st of January 2018.
  Rüdenauer, I.; Gensch, C.-O.: Environmental and economic evaluation of the accelerated replacement of domestic appliances. ÖkoInstitut e.V., Freiburg 2007. Retrieved online at: https://www.oeko.de/en/publications/p-details/environmental-and-economic-evaluation-of-the-accelerated-replacement-of-domestic-appliances/ on 31st of January 2018.
- Methane, trichlorofluoro-, CFC-11 [air, urban air close to ground]: 0.00646868 kg; = 0.719*255/6519*0.23
  According literature data, even in the formal recycling facilities 16-30% of the blowing agent traped in the polyurethane foam escapes to air as emission. Therefore it is here assumed that an average value of 23% of the blowing agent present in the polyurethane foam is considered an emission to air. There are on average 719 g of refrigerant R11 trapped in the insulation foam (from the refrigerator machines that use R11 as refrigerant). The latter amount is then multiplied with the normalised units (255 units) and thereafter divided by the total amount of refrigeration machines (6519 units).
  Reference: Prakash S, Manhart A, Amoyaw-Osei Y, Agyekum O (2010) Socio-economic Assessment and Feasibility Study on Sustainable E-waste Management in Ghana. Accra. Retrieved online at: http://www.sustainable-recycling.org/socio-economic-assessment-and-feasibility-study-on-sustainable-e-waste-management-in-ghana/ on 31st of January 2018.
  Rüdenauer, I.; Gensch, C.-O.: Environmental and economic evaluation of the accelerated replacement of domestic appliances. ÖkoInstitut e.V., Freiburg 2007. Retrieved online at: https://www.oeko.de/en/publications/p-details/environmental-and-economic-evaluation-of-the-accelerated-replacement-of-domestic-appliances/ on 31st of January 2018.

## Sampling procedure
Data collection took place using literature.

## Extrapolations
This dataset has been extrapolated from year 2018 to the year of the calculation (2021). The uncertainty has been adjusted accordingly.

## Review by Gabor Doka 2018-04-03
passed
