# treatment of biowaste by anaerobic digestion

Dataset: EcoSpold 2, unit process
Geography: CH
Time period: 2011-01-01 to 2021-12-31
Technology level: current
Classification: ISIC rev.4 ecoinvent: 3821:Treatment and disposal of non-hazardous waste
Classification: EcoSpold01Categories: agricultural means of production/organic fertiliser
Scenario: Business-as-Usual
System model: Allocation, cut-off by classification
Generated by: Mischa Zschokke-Gohl
Published in: Dinkel F. 2012
Database: ecoinvent
isCopyrightProtected: true
accessRestrictedTo: 1

## General comment
Biowaste in the current process is defined as follows:
Biodegradable garden and park waste, food and kitchen waste from households, restaurants, caterers and retail premises, comparable waste from food processing plants, it also includes forestry or agricultural residues and manure. It does not include sewage sludge, or other biodegradable waste such as natural textiles, paper or processed wood.
The anaerobic digestion treatment is a collection of processes by which microorganisms break down biodegradable material in the absence of oxygen. The treatment process produces biogas (a mixture of mainly methane and carbon doxide) and residual products called solid and liquid digestate.
The relevant resulting emissions to air from the treatment process are summarised in the following table:
The resulting outputs biogas, "digestate, solid" and "digestate, liquid" refer to 1 kg fresh weight of biogenic waste.
The contents of digestate are as follows:
The heavy metal contents of digestate are presented in the following tables:
Previous studies in the corresponding field showed that the evaluation of heavy metal emissions into soil with various single score methods such as Eco-Indicator 99 and ecological scarcity have a significant impact on the overall results. It is therefore advised to take special care when evaluating these systems, especially to avoid potential double counting.
The output digestate uses a special property "humus equivalents" which depicts the amount of organic carbon, which would lead to a buildup of humus.
Different substrates have different capacities of organic matter to form humus (see following figure)
The proposed method to account for humus C is based on the following methodology:
The organic carbon content of soil (Corg) is normally used to declare the amount of organic matter of soil. The content of humus is calculated from Corg, using the assumption that humus contains 58% carbon on average.
The amount of humus is therefore calculated out of Corg as follows:
humus content [%] or [mg g-1] = (Ctotal - Cinorg) / 0.58
If an allocation approach with substution is applied, the corresponding amounts of substitutes are calculated based on their capacity to build up humus. The conversion is based on the humus factors, which are listed in the next table:
More detailed descriptions and background information can be found in the corresponding report.

## Included activities start
The process described starts at the treatment site, after delivery of the materials for treatment.

## Included activities end
Energy demand for operating a anaerobic treatment plant was included as well as process emissions and the needed infrastructure of the plant.

## Geography
Values refer to the situation in Switzerland.

## Technology
Included processes: Infrastructure for the pre-treatment process, digestion of bio-waste and the succsesive treatment of the fermented material (de-watering and post composting).
Remark: Infrastructure expenditures are recorded for a plant with a yearly capacity of 10"000t and a lifetime of 25 years. For stationary machines a lifetime of 10 years is assumed. As a first approximation, the machines are taken into account as cast iron.; Geography: Data represents a Swiss plant.
Technology: Thermophile, single stage digestion with post composting.
The process step-by-step, from shredding to products:
1. Reception and weighing (+ storage of feedstock)
2. Shredding (depending on structure of feedstock)
3. Anaerobic digestion (AD) and solid/liquid separation
4. Rotting process, turning over, aeration and watering
5. Post-processing and conditioning
The scheme for industrial composting as used here is presented the following figure:
To assure best practice and good quality of the resulting product, it is assumed that the treatment process adheres to the following procedure:

## Time period
Year when reference used for this inventory was published.

## Parameters
- fraction_digestate_solid: 0.32 dimensionless
  Denotes the fraction of solid digestate, resulting from anaerobic digesting 1 kg of biowaste.
- fraction_digestate_liquid: 0.3 dimensionless
  Denotes the fraction of liquid digestate, resulting from anaerobic digesting 1 kg of biowaste.

## Reference product
- biowaste: -1 kg; name Mass_biowaste; By-product classification Waste; CPC 391: Wastes from food and tobacco industry; pedigree (1,1,1,1,1)
  Biowaste dry mass is 40% of the biowaste wet mass.
  production volume 4.46311e8 kg; name PV_biowaste; = biogas_annual_volume/biogas_yield
    Approx. 380"000 tons of biowaste went into the described treatment process (2013).
  property copper content 2.52e-5; name Mass_biowaste_Cu_content
    copper content on a dry matter basis
  property potassium content 0.00658; name Mass_biowaste_K_content
    potassium content on a dry matter basis
  property calcium content 0.0333; name Mass_biowaste_Ca_content
    calcium content on a dry matter basis
  property price 0 EUR2005
    Waste products are assigned a price of zero as they are assumed to require further treatment.
  property nickel content 1.06e-5; name Mass_biowaste_Ni_content
    nickel content on a dry matter basis
  property nitrogen content 0.009; name Mass_biowaste_N_content
    nitrogen content on a dry matter basis
  property lead content 1.76e-5; name Mass_biowaste_Pb_content
    lead content on a dry matter basis
  property sulfur content 0.00126; name Mass_biowaste_S_content
    sulfur content on a dry matter basis
  property water content 1.5; name Water_content_biowaste
  property heating value, net 4.29 MJ
    Value taken from the general comment of the treatment dataset.
  property phosphorus content 0.00182; name Mass_biowaste_P_content
    phosphorus content on a dry matter basis
  property wet mass 1 kg; name WM_biowaste
  property magnesium content 0.00347; name Mass_biowaste_Mg_content
    magnesium content on a dry matter basis
  property dry mass 0.4 kg; name DM_biowaste
  property zinc content 7.94e-5; name Mass_biowaste_Zn_content
    zinc content on a dry matter basis
  property mercury content 6.6e-8; name Mass_biowaste_Hg_content
    mercury content on a dry matter basis
  property cadmium content 1.91e-7; name Mass_biowaste_Cd_content
    cadmium content on a dry matter basis
  property carbon content 0.406
    carbon content on a dry matter basis (reserved; not for manual entry)
  properties: carbon content, non-fossil 0.406, water in wet mass 0.6 kg, carbon content, fossil 0, carbon allocation 0.1624 kg

## By-products
- digester sludge: 0 kg; CPC 39920: Sewage sludge; By-product classification Recyclable
  production volume 0 kg; = abs(PV_biowaste * (digester_sludge / Mass_biowaste))
    Calculated from production volume of reference product using the relative outputs.
  property price 0 EUR2005; name digester_sludge_price_EUR2005
    Assumed without economic value
  property heating value, net 2.42 MJ
    Value taken from the general comment of the treatment dataset.
  property carbon content 0.3444
    carbon content on a dry matter basis (reserved; not for manual entry)
  properties: water in wet mass 0.822 kg, wet mass 1 kg, carbon content, non-fossil 0.3444, dry mass 0.178 kg, carbon content, fossil 0, water content 4.61798, carbon allocation 0.0613032 kg
- biogas: 0 m3; name biogas_yield; = ABS( Mass_biowaste)*0.1; source Raboni, Massimo 2014; CPC 17200: Coal gas, water gas, producer gas and similar gases, other than petroleum gases and other gaseous hydrocarbons; By-product classification allocatable product; CAS 14493-06-2; pedigree (1,1,1,1,1)
  An average yield of 100 litres of biogas per kg biowaste is assumed
  production volume 4.46311e7 m3; name biogas_annual_volume
    According to the Swiss ministry of Environment, in 2016 in Switzerland, 947 TJ of energy produced from anaerobic digestion dedicated to the treatment of Biowaste. Values aexpressed in gross energy production. Assuming a calorific value of 21 MJ per Nm3 of biogas, the production volume is calculated to be 44631083 m3 of biogass. Source: Kaufmann, U. (2017). Schweizerische Statistik der erneuerbaren Energien. Ausgabe 2016, 75. Retrieved from http://www.bfe.admin.ch/php/modules/publikationen/stream.php?extlang=de&name=de_729286095.pdf&endung=Schweizerische
  property carbon content, non-fossil 0.449939
    Total C content in kg/Nm3 (Tab 12.8, ecoinvent v2.2 report n17), referred to 1kg DM
  property heating value, net 22.73 MJ
    Value taken from the general comment of "heat and power co-generation, biogas, gas engine" dataset.
  property price 0.109 EUR2005; name biogas_yield_price_EUR2005
    Temporary price data. Calculated as 90% of purchasers price based on: Same prices per energy output as natural gas, based on the proportional lower heating value (2/3 that of natural gas)
  property carbon content 0.449939
    carbon content on a dry matter basis (reserved; not for manual entry)
  properties: carbon content, fossil 0, water content 0, water in wet mass 0 kg, dry mass 1.15 kg, wet mass 1.15 kg, carbon allocation 0.51743 kg

## Inputs from technosphere
- wastewater, average: -0.000225 m3; name WW_average; lognormal variance with pedigree 0.0133, pedigree (2,2,3,1,2)
  production volume 100420 m3; = abs(PV_biowaste*( WW_average/ Mass_biowaste))
    Calculated from production volume of reference product using the relative outputs.
  property price 0 EUR2005; name WW_average_price_EUR2005
  properties: carbon content, non-fossil 0.194039, water content 2882.2, dry mass 0.346837 kg, wet mass 1000 kg
  note on carbon content, non-fossil: 0.0673 kg TOC/m3 (Tab A.17, ecoinvent v2.2 report 13_I). TOC was considered as Total Carbon.
- machine operation, diesel, >= 74.57 kW, low load factor: 0.000352113 hour; = 1/2840; lognormal variance with pedigree 0.0546, pedigree (3,4,5,1,2)
  Diesel usage per ton: 2.5 l ==> approx 2.1 kg / t; operating hours per ton: approx. 0.35 h
- electricity, low voltage: 0.002135 kWh; lognormal variance with pedigree 0.0132, pedigree (2,3,3,1,1)
  Own calcluations
- heat, central or small-scale, other than natural gas: 0.2416 MJ; lognormal variance with pedigree 0.0127, pedigree (2,2,3,1,1)
  Process heating for anaerobic digestion
  properties: heating value, net 1 MJ
- anaerobic digestion plant, for biowaste: 1.67e-9 unit; lognormal variance with pedigree 0.22, pedigree (5,5,5,5,5)
  activityLink introduced to establish a direct link to the corresponding regional supply of this product
- tap water: 0.225 kg; = (WW_average*-1)*1000
  Water input for the plant. An equal amount of wastewater is generated.
  properties: water content 2962.17, dry mass 0.000337476 kg, wet mass 1 kg, carbon content, fossil 0.00178991
  note on carbon content, fossil: Bicarbonate content is 2.93 mol/m3. CO2 content is 0.1 mol/m3 (ecoinvent v2.2 report 8, Tab 93.1).
- digester sludge: -0.62 kg
  production volume 2.76713e8 kg
  properties: wet mass 1 kg, carbon content, non-fossil 0.3444, heating value, net 2.42 MJ, dry mass 0.178 kg, water content 4.61798
  note on heating value, net: Value taken from the general comment of the treatment dataset.

## Emissions to nature
- Nitrogen, organic bound [water, unspecified]: 1.09e-7 kg; source Amlinger, F. 2003; lognormal variance with pedigree 0.22, pedigree (5,5,5,5,5)
- Nitrate [water, unspecified]: 2.97e-6 kg; source Amlinger, F. 2003; lognormal variance with pedigree 0.22, pedigree (5,5,5,5,5)
- Methane, non-fossil [air, urban air close to ground]: 0.0024 kg; source Wagner, R. 2011; lognormal variance with pedigree 0.0232, pedigree (2,3,3,1,1)
- Phosphorus [water, unspecified]: 7.04e-8 kg
- Ammonium, ion [water, unspecified]: 9.28e-8 kg; source Amlinger, F. 2003; lognormal variance with pedigree 0.22, pedigree (5,5,5,5,5)
- Hydrogen sulfide [air, urban air close to ground]: 8.96e-5 kg; source Wagner, R. 2011; lognormal variance with pedigree 0.0532, pedigree (2,3,3,1,1)
- Dinitrogen monoxide [air, urban air close to ground]: 3.3e-5 kg; source Wagner, R. 2011; lognormal variance with pedigree 0.0432, pedigree (2,3,3,1,1)
- Carbon dioxide, non-fossil [air, urban air close to ground]: 0.21 kg; source Wagner, R. 2011; lognormal variance with pedigree 0.0132, pedigree (2,3,3,1,1)
- Nitrite [water, unspecified]: 9.28e-8 kg; source Amlinger, F. 2003; lognormal variance with pedigree 0.22, pedigree (5,5,5,5,5)

## Sampling procedure
The data for this dataset was generated within a project in 2009-2011 financed by the Swiss Federal Office for Energy.

## Extrapolations
This dataset has been extrapolated from year 2015 to the year of the calculation (2021). The uncertainty has been adjusted accordingly.
