# aluminium oxide, metallurgical, import from South America

Dataset: EcoSpold 2, unit process
Geography: IAI Area, EU27 & EFTA
Time period: 2015-01-01 to 2021-12-31
Technology level: current
Classification: ISIC rev.4 ecoinvent: 2420:Manufacture of basic precious and other non-ferrous metals
Classification: EcoSpold01Categories: metals/extraction
Scenario: Business-as-Usual
System model: Allocation, cut-off by classification
Generated by: Lucia Valsasina
Published in: European Aluminium 2018
Database: ecoinvent
isCopyrightProtected: true
accessRestrictedTo: 1

## General comment
This dataset represents the amount of imported primary aluminium oxide metallurgical from South America to EU27 & EFTA. The import value is valid for 2015 and includes all imports, independently whether used within the importing region, or re-exported.

## Included activities start
The activity starts at the factory gate with the product ready for transport.

## Included activities end
This activity includes the transport from the exporting region (including transport within the region) to EU27 & EFTA.

## Reference product
- aluminium oxide, metallurgical: 1 kg; By-product classification allocatable product; CPC 41432: Alumina (aluminium oxide), except artificial corundum; CAS 1344-28-1
  production volume 2.79026e9 kg; = 4743750000/0.61*0.39*0.92
    Estimate based on official trade data.
  property price 0.28 EUR2005
    From UN trade database. http://data.un.org/ Import data from the largest economies of the world are used (Brazil, India, USA, China, Japan and EU-27).
  property carbon content 0
    carbon content on a dry matter basis (reserved; not for manual entry)
  properties: carbon content, fossil 0, water content 0, wet mass 1 kg, dry mass 1 kg, carbon content, non-fossil 0, water in wet mass 0 kg, carbon allocation 0 kg

## Inputs from technosphere
- aluminium oxide, metallurgical: 1 kg; lognormal variance with pedigree 0.0026, pedigree (1,1,3,1,1)
  properties: wet mass 1 kg, dry mass 1 kg
- transport, freight, lorry, unspecified: 0.005 metric ton*km; = 5/1000; lognormal variance with pedigree 0.122, pedigree (1,1,3,1,1)
  Literature value. Data extracted from the 2018 European aluminium association ENVIRONMENTAL
  PROFILE REPORT. Life-Cycle inventory data for aluminium production and transformation processes in Europe. Accessible from: https://www.european-aluminium.eu/
  Uncertainty: Default uncertainty and pedigree applied for all similar autogenerated amounts
- transport, freight, sea, container ship: 7.5 metric ton*km; = 7500/1000; lognormal variance with pedigree 0.122, pedigree (1,1,3,1,1)
  (same comment as for transport, freight, lorry, unspecified)
- transport, freight, inland waterways, barge: 0.2 metric ton*km; = 200/1000; lognormal variance with pedigree 0.122, pedigree (1,1,3,1,1)
  Literature value. Data extracted from the 2018 European aluminium association ENVIRONMENTAL
  PROFILE REPORT. Life-Cycle inventory data for aluminium production and transformation processes in Europe. Accessible from: https://www.european-aluminium.eu/
- transport, freight train: 0.05 metric ton*km; = 50/1000; lognormal variance with pedigree 0.122, pedigree (1,1,3,1,1)
  (same comment as for transport, freight, lorry, unspecified)

## Extrapolations
This dataset has been extrapolated from year 2015 to the year of the calculation (2021). The uncertainty has been adjusted accordingly.
