# treatment of waste plastic, mixture, municipal incineration

Dataset: EcoSpold 2, unit process
Geography: RoW
Time period: 2006-01-01 to 2021-12-31
Technology level: current
Classification: ISIC rev.4 ecoinvent: 3821:Treatment and disposal of non-hazardous waste
Synonyms: Kehrichtverbrennung; municipal waste incineration; Siedlungsabfallverbrennung
Scenario: Business-as-Usual
System model: Allocation, cut-off by classification
Share of production covered: 1.8 %
Generated by: Gabor Doka
Published in: Doka G. 2013
Database: ecoinvent
isCopyrightProtected: true
accessRestrictedTo: 1

## General comment
This dataset represents the activity of waste disposal of waste plastic, mixture in a municipal solid waste incinerator (MSWI) // Recommended use of this dataset: For plastic mixture, which goes to disposal as part of communal waste mixture. // // Waste composition (wet, in ppm): upper heating value 34.05 MJ/kg; lower heating value 30.79 MJ/kg; H2O 153000; O 73717; H 105910; C 633590; S 1406.7; N 6112; P n.a.; B n.a.; Cl 18131; Br 65.319; F 13.717; I n.a.; Ag n.a.; As 1.7729; Ba 174.03; Cd 75.786; Co 29.478; Cr 38.132; Cu 296.41; Hg 0.79234; Mn 74.574; Mo n.a.; Ni 19.222; Pb 435.81; Sb 40.093; Se 1.9596; Sn 24.453; V 268.88; Zn 521.69; Be 0.46656; Sc n.a.; Sr 82.582; Ti 933.13; Tl 0.37325; W n.a.; Si n.a.; Fe 3476.5; Ca n.a.; Al 186.63; K n.a.; Mg n.a.; Na 1367.5; // Share of carbon in waste that is biogenic 0%. // Share of metals in waste not oxidised and bulk-recyclable (exclude very small or thin parts) Iron: 0%; Alu: 0%; Copper: 0%. // One kg of this waste produces 0.0223 kg of slag and 0.01561 kg of residues, which are landfilled. Additional solidification with 0.006245 kg of cement. // Net energy production: 3.92MJ/kg electric energy and 7.66MJ/kg thermal energy. // Recovery of metal scrap to recycling: 0g iron scrap, 0g aluminium scrap, 0g copper scrap.

## Included activities start
waste incineration from waste reception gate and delivery into waste bunker at incinerator plant site (without transports to the incinerator)

## Included activities end
Waste-specific short-term emissions to water from leachate. Long-term emissions from landfill to ground water.

## Geography
Specific to the technology mix encountered in Switzerland in 2010. Well applicable to modern incineration practices in Europe, North America or Japan.

## Technology
average Swiss MSWI plants in 2010 (grate incinerators) with electrostatic precipitator for fly ash (ESP), wet flue gas scrubber and 25% SNCR , 42.77% SCR-high dust , 32.68% SCR-low dust -DeNOx facilities and 0% without Denox (weighted according to mass of burnt waste, representing Swiss average). Efficiency of iron scrap separation from slag : 58%. Efficiency of non-ferrous scrap separation from slag : 31%. Gross electric efficiency technology mix 15.84% and Gross thermal efficiency technology mix 28.51%

## Time period
Waste composition as given in literature reference, theoretical data or other source. Transfer coefficients for modern MSWI.

## Reference product
- waste plastic, mixture: -1 kg; name RP; By-product classification Waste; CPC 39270: Waste, parings and scrap of plastics
  Main reference product of this activity (supply of disposal service).
  production volume 1.14108e10 kg; name RP_PV; = 600570000000*0.1*0.19
    Estimated value. From UNSTATS the amount of MSW collected in 2009 globally was of 600 570 thousands tonnes (UNSTATS 2011a). Of this approximately 10% was plastic (UNSTATS 2011b). The treatment of waste plastic was determined from UNSTATS (2011c) “Municipal waste treatment” file, as a weighted average of all countries. Based on this it assumed that 54% of waste plastic is landfilled and 19% is incinerated.
    Sources, excel files available on UNSTATS website (<http://unstats.un.org/unsd/default.htm>, accessed 22nd June 2016):
    UNSTATS (2011a) Environmental Indicators and Selected Time Series. Municipal waste collected
    UNSTATS (2011b) Environmental Indicators and Selected Time Series. Composition of Municipal Waste: latest year
    UNSTATS (2011c) Environmental Indicators: Waste. Municipal waste treatment
  property heating value, net 30.79 MJ
    Value taken from the general comment of the treatment dataset.
  property price 0 EUR2005; name RP_price_EUR2005
    Waste products are assigned a price of zero as they are assumed to require further treatment.
  property carbon content 0.747344
    carbon content on a dry matter basis (reserved; not for manual entry)
  properties: carbon content, non-fossil 0, water content 0.180638, wet mass 1 kg, dry mass 0.847 kg, carbon content, fossil 0.747344, water in wet mass 0.153 kg, carbon allocation 0.633 kg

## By-products
- electricity, for reuse in municipal waste incineration only: 0 kWh; name E_el_prod_MSWI; CPC 17100: Electrical energy; By-product classification allocatable product; pedigree (1,1,1,1,1)
  Net electricity generated from this waste and used in internal MSWI plant energy redistribution.
  Uncertainty: uncertainty is calculated from uncertainties in waste composition and uncertainties in energy efficiency and the uncertainty in internal energy demand
  production volume 1.24321e10 kWh; = E_el_prod_MSWI*RP_PV/ABS(RP)
    calculated in proportion to reference product waste input to incinerator
  property exergy 3.6 MJ; name E_el_prod_MSWI_exergy
    This exergy property is based on the exergy content of the product.
  property true value relation 3.6; name E_el_prod_MSWI_true_value_relation
    property to calculate "true value" from
  property price 0.1 EUR2005; name E_el_prod_MSWI_price_EUR2005
    Estimated to be the same price as in case of electricity, medium voltage.
- heat, for reuse in municipal waste incineration only: 0 MJ; name E_th_prod_MSWI; By-product classification allocatable product; CPC 17300: Steam and hot water; pedigree (1,1,1,1,1)
  (same comment as for electricity, for reuse in municipal waste incineration only)
  production volume 8.73933e10 MJ; = E_th_prod_MSWI*RP_PV/ABS(RP)
    calculated in proportion to reference product waste input to incinerator
  property exergy 0.1842 MJ; name E_th_prod_MSWI_exergy
    This exergy property is based on the exergy content of the product.
  property price 0.0106 EUR2005; name E_th_prod_MSWI_price_EUR2005
    Average European district heat price from Ecoheatcool and Euroheat 2005-2006, Ecoheat Work package 1: The European heat market. Final report. 10.6 EUR/GJ i s the price of district heat. http://www.solarthermalworld.org/files/Ecoheatcool%20WP1%20Web.pdf?download
  property true value relation 0.1842; name E_th_prod_MSWI_true_value_relation
    property to calculate "true value" from

## Inputs from technosphere
- process-specific burdens, residual material landfill: 0 kg; pedigree (1,1,1,1,1)
  Mass-specific expenditures required for landfilling of incineration residues.
  Uncertainty: uncertainty is calculated from uncertainties in waste composition and transfer coefficients in incinerator
- transport, freight, lorry, unspecified: 0 metric ton*km; pedigree (1,1,1,1,1)
  Transport services to transport incineration residues to landfills.
  Uncertainty: uncertainty calculated from uncertainty of the waste composition of this waste, uncertainty of transfer coefficients and the uncertainty in generic transportation distances
- waste cement, hydrated: 0 kg; name waste_cement; pedigree (1,1,1,1,1)
  Hydrated cement output for solidification of landfilled residual material.
  Uncertainty: Uncertainty calculated from uncertainty of the waste composition of this waste and transfer coefficients in the incinerator and of the solidification recipe.
  production volume 0 kg
    calculated in proportion to reference product waste input to incinerator
  property price 0 EUR2005; name waste_cement_price_EUR2005
  properties: dry mass 1 kg, wet mass 1 kg
- heat, district or industrial, natural gas: 0 MJ; pedigree (1,1,1,1,1)
  Input to DeNOx stage, to heat up flue gas in low-dust SCR.
  Uncertainty: uncertainty calculated from uncertainty in average DeNOx input, uncertainty in the share of thermal NOx, uncertainty of nitrogen content in average municipal waste and the uncertainty in nitrogen content in *this* waste.
  properties: heating value, net 1 MJ
- cement, unspecified: 0 kg; pedigree (1,1,1,1,1)
  Cement required for solidification of landfilled residual material.
  Uncertainty: Uncertainty calculated from uncertainty of the waste composition of this waste, of transfer coefficients in the incinerator and of the solidification recipe.
  properties: wet mass 1 kg, dry mass 1 kg
- residual material landfill: 3.2525e-11 unit; lognormal variance with pedigree 0.074246, pedigree (1,1,4,1,1)
  Landfill infrastructure required for landfilling of incineration residues.
  Uncertainty: uncertainty is calculated from uncertainties in waste composition and transfer coefficients in incinerator
- ammonia, anhydrous, liquid: 0 kg; pedigree (1,1,1,1,1)
  Input to DeNOx stage (100% NH3).
  Uncertainty: uncertainty calculated from uncertainty in average DeNOx input, uncertainty in the share of thermal NOx, uncertainty of nitrogen content in average municipal waste and the uncertainty in nitrogen content in *this* waste.
  properties: wet mass 1 kg, dry mass 1 kg
- water, decarbonised: 0 kg; pedigree (1,1,1,1,1)
  Incinerator process water used in flue gas scrubber stage.
  Uncertainty: uncertainty calculated from uncertainty in average water input, and the uncertainty of the waste composition of this waste
  properties: wet mass 1 kg
- municipal waste incineration facility: 2.5e-10 unit
  Demands per kilogram waste.
- sodium hydroxide, without water, in 50% solution state: 0.0023341 kg; lognormal variance with pedigree 0.21818, pedigree (1,1,4,1,1)
  Auxilliary inputs for the flue gas treatment stage of the incinerator plant.
  Uncertainty: uncertainty calculated from uncertainty in average NaOH input, of transfer coefficients in the incinerator, and the uncertainty of the waste composition of this waste
  properties: heating value, net 3.03 MJ, wet mass 1 kg, dry mass 1 kg
- process-specific burdens, slag landfill: 0 kg; pedigree (1,1,1,1,1)
  Mass-specific expenditures required for landfilling of bottom ash.
  Uncertainty: uncertainty is calculated from uncertainties in waste composition and transfer coefficients in incinerator
- chemical, organic: 3.3063e-5 kg; lognormal variance with pedigree 0.86462, pedigree (1,1,4,1,1)
  Auxilliary inputs for the wastewater treatment stage of the incinerator plant. Proxy for (pure) Trisodium-trimercapto-s-triazine (CAS 17766-26-6), used as 15% diluted solution, aka TMT15.
  Uncertainty: uncertainty calculated from uncertainty in average TMT15 input, of transfer coefficients in the incinerator, and the uncertainty of the waste composition of this waste
  properties: wet mass 1 kg, dry mass 1 kg, carbon content, fossil 0.628, heating value, net 19.03 MJ
- chromium oxide, flakes: 1.8832e-6 kg; lognormal variance with pedigree 0.87619, pedigree (1,1,4,1,1)
  Input to DeNOx stage.
  Uncertainty: uncertainty calculated from uncertainty in average DeNOx input, uncertainty in the share of thermal NOx, uncertainty of nitrogen content in average municipal waste and the uncertainty in nitrogen content in *this* waste.
  properties: dry mass 1 kg, wet mass 1 kg
- quicklime, milled, packed: 0.0096675 kg; lognormal variance with pedigree 0.30508, pedigree (1,1,4,1,1)
  Auxilliary inputs for the flue gas treatment stage of the incinerator plant.
  Uncertainty: uncertainty calculated from uncertainty in average CaO input, of transfer coefficients in the incinerator, and the uncertainty of the waste composition of this waste
  properties: dry mass 0.99 kg, water content 0.010101, wet mass 1 kg
- titanium dioxide: 9.2274e-5 kg; lognormal variance with pedigree 0.87619, pedigree (1,1,4,1,1)
  Input to DeNOx stage (TiO2 catalyst carrier)
  Uncertainty: uncertainty calculated from uncertainty in average DeNOx input, uncertainty in the share of thermal NOx, uncertainty of nitrogen content in average municipal waste and the uncertainty in nitrogen content in *this* waste.
  properties: wet mass 1 kg, dry mass 1 kg
- iron (III) chloride, without water, in 40% solution state: 9.0455e-5 kg; lognormal variance with pedigree 0.25223, pedigree (1,1,4,1,1)
  Auxilliary inputs for the wastewater treatment stage of the incinerator plant.
  Uncertainty: uncertainty calculated from uncertainty in average FeCl3 input, of transfer coefficients in the incinerator, and the uncertainty of the waste composition of this waste
  properties: dry mass 1 kg, wet mass 1 kg
- hydrochloric acid, without water, in 30% solution state: 0.00015154 kg; lognormal variance with pedigree 0.26867, pedigree (1,1,4,1,1)
  Auxilliary inputs for the wastewater treatment stage of the incinerator plant.
  Uncertainty: uncertainty calculated from uncertainty in average HCl input, of transfer coefficients in the incinerator, and the uncertainty of the waste composition of this waste
  properties: dry mass 1 kg, wet mass 1 kg, heating value, net 3.32 MJ
- slag landfill: 3.7382e-11 unit; lognormal variance with pedigree 0.062261, pedigree (1,1,4,1,1)
  Landfill infrastructure required for landfilling of bottom ash.
  Uncertainty: uncertainty is calculated from uncertainties in waste composition and transfer coefficients in incinerator
- chemical, inorganic: 0.00057654 kg; lognormal variance with pedigree 0.26867, pedigree (1,1,4,1,1)
  Auxilliary inputs for the wastewater treatment stage of the incinerator plant. Proxy for Polyelectrolyte.
  Uncertainty: uncertainty calculated from uncertainty in average Polyelectrolyte input, of transfer coefficients in the incinerator, and the uncertainty of the waste composition of this waste
  properties: carbon content, fossil 0.003, wet mass 1 kg, dry mass 1 kg
- process-specific burdens, residual material landfill: 0.00441624, 0.0111958 kg (2 entries); lognormal variance with pedigree 0.074246, pedigree (1,1,4,1,1)
  (same comment as for process-specific burdens, residual material landfill)
- transport, freight, lorry, unspecified: 0.000167724, 2.62595e-5, 0.00127162 metric ton*km (3 entries); lognormal variance with pedigree 0.038328, pedigree (1,1,4,1,1)
  (same comment as for transport, freight, lorry, unspecified)
- waste cement, hydrated: -0.00441624, -0.0111958 kg (2 entries); lognormal variance with pedigree 0.08333, pedigree (1,1,4,1,1)
  (same comment as for waste cement, hydrated)
  production volume 1.78146e8 kg
- heat, district or industrial, natural gas: 0.00306536, 0.0734519, 0.198893 MJ (3 entries); lognormal variance with pedigree 0.55211, pedigree (1,1,4,1,1)
  (same comment as for heat, district or industrial, natural gas)
- cement, unspecified: 0.000901708, 0.000187619, 1.37418e-5, 3.91686e-5, 0.00088581, 2.6072e-5, 0.000286348, 3.46448e-5, 0.00386959 kg (9 entries); lognormal variance with pedigree 0.08333, pedigree (1,1,4,1,1)
  (same comment as for cement, unspecified)
- ammonia, anhydrous, liquid: 0.000308718, 2.6538e-5, 4.12863e-5, 8.18029e-5, 8.01452e-5, 8.40008e-6, 3.75515e-5, 0.000888358 kg (8 entries); lognormal variance with pedigree 0.55211, pedigree (1,1,4,1,1)
  (same comment as for ammonia, anhydrous, liquid)
- water, decarbonised: 0.0616301, 0.160361, 0.646775, 0.157939, 0.0318397, 0.104695, 0.00577979, 0.0823608, 0.191852, 1.20344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 kg (12 entries); lognormal variance with pedigree 0.25223, pedigree (1,1,4,1,1)
  (same comment as for water, decarbonised)
- process-specific burdens, slag landfill: 0.005948, 0.015079 kg (2 entries); lognormal variance with pedigree 0.062261, pedigree (1,1,4,1,1)
  (same comment as for process-specific burdens, slag landfill)

## Inputs from nature
- Oxygen [natural resource, in air]: 2.5557 kg; lognormal variance with pedigree 0.025021, pedigree (1,1,4,1,1)
  Oxygen from ambient air needed to combust and oxidise this waste. Net demand, i.e. without O2 leaving the plant in flue gas uncombusted.
  Uncertainty: uncertainty is calculated from uncertainties in waste composition and transfer coefficients to flue gas and soild residues in incinerator

## Emissions to nature
- Cobalt [air, urban air close to ground]: 5.361e-8 kg; lognormal variance with pedigree 1.149, pedigree (1,1,4,1,1)
  Emission to air from waste composition and transfer coefficients.
  Uncertainty: uncertainty is calculated from uncertainties in waste composition and transfer coefficients in incinerator
- Sulfate [water, ground-, long-term]: 0.0034841 kg; lognormal variance with pedigree 0.35513, pedigree (1,1,4,1,1)
  Long-term emissions from landfilling of incineration residues.
  Uncertainty: uncertainty is calculated from uncertainties in waste composition and transfer coefficients in incinerator and landfills.
- Arsenic, ion [water, ground-, long-term]: 5.3092e-7 kg; lognormal variance with pedigree 1.5037, pedigree (1,1,4,1,1)
  (same comment as for Sulfate)
- Cobalt [water, surface water]: 5.3406e-9 kg; lognormal variance with pedigree 1.4477, pedigree (1,1,4,1,1)
  Emissions to water from waste composition and transfer coefficients in incinerator and landfills.
  Uncertainty: uncertainty is calculated from uncertainties in waste composition and transfer coefficients in incinerator and landfills
- Antimony [air, urban air close to ground]: 3.2117e-11 kg; lognormal variance with pedigree 1.1636, pedigree (1,1,4,1,1)
  (same comment as for Cobalt)
- Toluene [air, urban air close to ground]: 2.9965e-8 kg; lognormal variance with pedigree 0.091112, pedigree (1,1,4,1,1)
  Incomplete combustion product emitted to air.
  Uncertainty: uncertainty calculated from uncertainty in average operation emissions, and the uncertainty of the flue gas volume from this waste.
- Cyanide [air, urban air close to ground]: 1.9585e-5 kg; lognormal variance with pedigree 1.2092, pedigree (1,1,4,1,1)
  Nitrogen species emitted to air after DeNOx stage.
  Uncertainty: uncertainty calculated from uncertainty in average N-emissions and uncertainty in the share of thermal NOx and the uncertainty in nitrogen content in *this* waste.
- COD, Chemical Oxygen Demand [water, surface water]: 0.00074117 kg; lognormal variance with pedigree 0.037014, pedigree (1,1,4,1,1)
  (same comment as for Cobalt)
- Thallium [water, ground-, long-term]: 2.178e-7 kg; lognormal variance with pedigree 1.2795, pedigree (1,1,4,1,1)
  (same comment as for Sulfate)
- Thallium [water, surface water]: 2.2866e-10 kg; lognormal variance with pedigree 1.8782, pedigree (1,1,4,1,1)
  (same comment as for Cobalt)
- Carbon dioxide, fossil [air, urban air close to ground]: 2.3092 kg; lognormal variance with pedigree 0.0142958, pedigree (1,1,4,1,1)
  (same comment as for Cobalt)
- Chloride [water, ground-, long-term]: 0.0042013 kg; lognormal variance with pedigree 0.30596, pedigree (1,1,4,1,1)
  (same comment as for Sulfate)
- Iron, ion [water, ground-, long-term]: 0.0017539 kg; lognormal variance with pedigree 0.68392, pedigree (1,1,4,1,1)
  (same comment as for Sulfate)
- Manganese [water, surface water]: 1.1608e-8 kg; lognormal variance with pedigree 0.87165, pedigree (1,1,4,1,1)
  (same comment as for Cobalt)
- Lead [water, ground-, long-term]: 0.00021071 kg; lognormal variance with pedigree 3.9241, pedigree (1,1,4,1,1)
  (same comment as for Sulfate)
- Selenium [water, ground-, long-term]: 1.2727e-6 kg; lognormal variance with pedigree 1.0926, pedigree (1,1,4,1,1)
  (same comment as for Sulfate)
- Cadmium, ion [water, surface water]: 7.2638e-9 kg; lognormal variance with pedigree 0.8598, pedigree (1,1,4,1,1)
  (same comment as for Cobalt)
- Tin, ion [water, surface water]: 6.4692e-10 kg; lognormal variance with pedigree 1.7989, pedigree (1,1,4,1,1)
  (same comment as for Cobalt)
- Iron [air, urban air close to ground]: 6.2305e-9 kg; lognormal variance with pedigree 0.57263, pedigree (1,1,4,1,1)
  (same comment as for Cobalt)
- Chromium [air, urban air close to ground]: 3.3298e-8 kg; lognormal variance with pedigree 1.1196, pedigree (1,1,4,1,1)
  (same comment as for Cobalt)
- Nitrate [water, surface water]: 7.7912e-5 kg; lognormal variance with pedigree 0.30793, pedigree (1,1,4,1,1)
  (same comment as for Cobalt)
- Vanadium [air, urban air close to ground]: 5.7027e-6 kg; lognormal variance with pedigree 0.84759, pedigree (1,1,4,1,1)
  (same comment as for Cobalt)
- Selenium [air, urban air close to ground]: 2.3377e-8 kg; lognormal variance with pedigree 1.4984, pedigree (1,1,4,1,1)
  (same comment as for Cobalt)
- Water [water, surface water]: 0.00047528 m3; lognormal variance with pedigree 1.0823, pedigree (1,1,4,1,1)
  Process water released to surface water.
  Uncertainty: uncertainty calculated from uncertainty in process water input and the uncertainty of fraction to surface water.
- Chloride [water, surface water]: 0.013919 kg; lognormal variance with pedigree 0.2437, pedigree (1,1,4,1,1)
  (same comment as for Cobalt)
- Sulfate [water, surface water]: 0.00071364 kg; lognormal variance with pedigree 0.29359, pedigree (1,1,4,1,1)
  (same comment as for Cobalt)
- Manganese [air, urban air close to ground]: 1.4242e-8 kg; lognormal variance with pedigree 1.0387, pedigree (1,1,4,1,1)
  (same comment as for Cobalt)
- DOC, Dissolved Organic Carbon [water, surface water]: 0.00032367 kg; lognormal variance with pedigree 0.037098, pedigree (1,1,4,1,1)
  (same comment as for Cobalt)
- Mercury [water, ground-, long-term]: 5.0465e-8 kg; lognormal variance with pedigree 3.1638, pedigree (1,1,4,1,1)
  (same comment as for Sulfate)
- Benzo(a)pyrene [air, urban air close to ground]: 3.3341e-13 kg; lognormal variance with pedigree 0.41105, pedigree (1,1,4,1,1)
  (same comment as for Toluene)
- Fluoride [water, surface water]: 1.0488e-6 kg; lognormal variance with pedigree 0.79891, pedigree (1,1,4,1,1)
  (same comment as for Cobalt)
- Benzene [air, urban air close to ground]: 1.4983e-8 kg; lognormal variance with pedigree 0.091112, pedigree (1,1,4,1,1)
  (same comment as for Toluene)
- Barium [air, urban air close to ground]: 6.8307e-7 kg; lognormal variance with pedigree 0.9063, pedigree (1,1,4,1,1)
  (same comment as for Cobalt)
- Carbon monoxide, fossil [air, urban air close to ground]: 2.5469e-5 kg; lognormal variance with pedigree 0.8006, pedigree (1,1,4,1,1)
  (same comment as for Toluene)
- Nickel [air, urban air close to ground]: 2.4147e-8 kg; lognormal variance with pedigree 1.2076, pedigree (1,1,4,1,1)
  (same comment as for Cobalt)
- BOD5, Biological Oxygen Demand [water, surface water]: 0.00073165 kg; lognormal variance with pedigree 0.037729, pedigree (1,1,4,1,1)
  (same comment as for Cobalt)
- Copper [air, urban air close to ground]: 2.7148e-8 kg; lognormal variance with pedigree 0.86225, pedigree (1,1,4,1,1)
  (same comment as for Cobalt)
- Lead [water, surface water]: 4.1688e-8 kg; lognormal variance with pedigree 0.6545, pedigree (1,1,4,1,1)
  (same comment as for Cobalt)
- Chromium VI [water, ground-, long-term]: 3.498e-6 kg; lognormal variance with pedigree 1.5669, pedigree (1,1,4,1,1)
  (same comment as for Sulfate)
- Arsenic [air, urban air close to ground]: 1.3888e-8 kg; lognormal variance with pedigree 1.5128, pedigree (1,1,4,1,1)
  (same comment as for Cobalt)
- Vanadium, ion [water, ground-, long-term]: 0.00012534 kg; lognormal variance with pedigree 0.62629, pedigree (1,1,4,1,1)
  (same comment as for Sulfate)
- Copper, ion [water, surface water]: 3.8408e-8 kg; lognormal variance with pedigree 0.77386, pedigree (1,1,4,1,1)
  (same comment as for Cobalt)
- Strontium [air, urban air close to ground]: 8.2582e-9 kg; lognormal variance with pedigree 1.0313, pedigree (1,1,4,1,1)
  (same comment as for Cobalt)
- Hydrogen chloride [air, urban air close to ground]: 1.0346e-5 kg; lognormal variance with pedigree 0.329, pedigree (1,1,4,1,1)
  (same comment as for Cobalt)
- DOC, Dissolved Organic Carbon [water, ground-, long-term]: 0.0018828 kg; lognormal variance with pedigree 0.023769, pedigree (1,1,4,1,1)
  (same comment as for Sulfate)
- Dioxins, measured as 2,3,7,8-tetrachlorodibenzo-p-dioxin [air, urban air close to ground]: 2.9963e-14 kg; lognormal variance with pedigree 0.41105, pedigree (1,1,4,1,1)
  (same comment as for Toluene)
- Mercury [air, urban air close to ground]: 2.2466e-8 kg; lognormal variance with pedigree 1.6132, pedigree (1,1,4,1,1)
  (same comment as for Cobalt)
- Benzene, pentachloro- [air, urban air close to ground]: 7.9158e-11 kg; lognormal variance with pedigree 0.091112, pedigree (1,1,4,1,1)
  (same comment as for Toluene)
- Selenium [water, surface water]: 6.6198e-7 kg; lognormal variance with pedigree 1.1862, pedigree (1,1,4,1,1)
  (same comment as for Cobalt)
- Zinc, ion [water, surface water]: 4.7068e-8 kg; lognormal variance with pedigree 0.63967, pedigree (1,1,4,1,1)
  (same comment as for Cobalt)
- Benzene, hexachloro- [air, urban air close to ground]: 3.1328e-11 kg; lognormal variance with pedigree 0.091112, pedigree (1,1,4,1,1)
  (same comment as for Toluene)
- Sulfur dioxide [air, urban air close to ground]: 1.496e-5 kg; lognormal variance with pedigree 0.63313, pedigree (1,1,4,1,1)
  (same comment as for Cobalt)
- Bromine [water, ground-, long-term]: 6.2957e-6 kg; lognormal variance with pedigree 1.0288, pedigree (1,1,4,1,1)
  (same comment as for Sulfate)
- TOC, Total Organic Carbon [water, surface water]: 0.00032367 kg; lognormal variance with pedigree 0.037098, pedigree (1,1,4,1,1)
  (same comment as for Cobalt)
- BOD5, Biological Oxygen Demand [water, ground-, long-term]: 0.0015564 kg; lognormal variance with pedigree 0.023769, pedigree (1,1,4,1,1)
  (same comment as for Sulfate)
- Vanadium, ion [water, surface water]: 4.2929e-7 kg; lognormal variance with pedigree 0.96194, pedigree (1,1,4,1,1)
  (same comment as for Cobalt)
- Cobalt [water, ground-, long-term]: 2.4012e-5 kg; lognormal variance with pedigree 1.0578, pedigree (1,1,4,1,1)
  (same comment as for Sulfate)
- Antimony [water, surface water]: 1.3819e-5 kg; lognormal variance with pedigree 1.0926, pedigree (1,1,4,1,1)
  (same comment as for Cobalt)
- Titanium, ion [water, surface water]: 3.4791e-7 kg; lognormal variance with pedigree 0.52351, pedigree (1,1,4,1,1)
  (same comment as for Cobalt)
- Heat, waste [water, surface water]: 6.2928 MJ; lognormal variance with pedigree 0.033617, pedigree (1,1,4,1,1)
  Waste heat generated from heating value of this waste plus any electricity required to process it.
  Uncertainty: uncertainty is calculated from uncertainties in waste composition and uncertainties in energy efficiency and the uncertainty in internal energy demand
- Hydrogen fluoride [air, urban air close to ground]: 9.2544e-8 kg; lognormal variance with pedigree 1.2452, pedigree (1,1,4,1,1)
  (same comment as for Cobalt)
- Dinitrogen monoxide [air, urban air close to ground]: 9.1158e-5 kg; lognormal variance with pedigree 1.2092, pedigree (1,1,4,1,1)
  (same comment as for Cyanide)
- Sodium [air, urban air close to ground]: 1.1227e-5 kg; lognormal variance with pedigree 0.63684, pedigree (1,1,4,1,1)
  (same comment as for Cobalt)
- Strontium [water, surface water]: 5.1996e-8 kg; lognormal variance with pedigree 1.7071, pedigree (1,1,4,1,1)
  (same comment as for Cobalt)
- Aluminium [water, ground-, long-term]: 0.00013496 kg; lognormal variance with pedigree 0.80971, pedigree (1,1,4,1,1)
  (same comment as for Sulfate)
- TOC, Total Organic Carbon [water, ground-, long-term]: 0.0018828 kg; lognormal variance with pedigree 0.023769, pedigree (1,1,4,1,1)
  (same comment as for Sulfate)
- Particulates, < 2.5 um [air, urban air close to ground]: 1.7888e-6 kg; lognormal variance with pedigree 0.41105, pedigree (1,1,4,1,1)
  (same comment as for Toluene)
- Aluminium [water, surface water]: 2.0197e-8 kg; lognormal variance with pedigree 1.1219, pedigree (1,1,4,1,1)
  (same comment as for Cobalt)
- Ammonia [air, urban air close to ground]: 1.7316e-6 kg; lognormal variance with pedigree 0.60125, pedigree (1,1,4,1,1)
  (same comment as for Cyanide)
- Iron, ion [water, surface water]: 9.1393e-8 kg; lognormal variance with pedigree 0.80041, pedigree (1,1,4,1,1)
  (same comment as for Cobalt)
- COD, Chemical Oxygen Demand [water, ground-, long-term]: 0.0047581 kg; lognormal variance with pedigree 0.023769, pedigree (1,1,4,1,1)
  (same comment as for Sulfate)
- Thallium [air, urban air close to ground]: 3.7325e-10 kg; lognormal variance with pedigree 1.7268, pedigree (1,1,4,1,1)
  (same comment as for Cobalt)
- Beryllium [water, surface water]: 2.9222e-10 kg; lognormal variance with pedigree 2.1896, pedigree (1,1,4,1,1)
  (same comment as for Cobalt)
- Methane, fossil [air, urban air close to ground]: 2.2474e-7 kg; lognormal variance with pedigree 0.091112, pedigree (1,1,4,1,1)
  (same comment as for Toluene)
- Zinc [air, urban air close to ground]: 3.4967e-7 kg; lognormal variance with pedigree 0.77445, pedigree (1,1,4,1,1)
  (same comment as for Cobalt)
- Titanium, ion [water, ground-, long-term]: 0.00027896 kg; lognormal variance with pedigree 0.80304, pedigree (1,1,4,1,1)
  (same comment as for Sulfate)
- Beryllium [water, ground-, long-term]: 4.2641e-7 kg; lognormal variance with pedigree 1.5953, pedigree (1,1,4,1,1)
  (same comment as for Sulfate)
- Antimony [water, ground-, long-term]: 2.5496e-5 kg; lognormal variance with pedigree 1.0578, pedigree (1,1,4,1,1)
  (same comment as for Sulfate)
- Mercury [water, surface water]: 8.6051e-10 kg; lognormal variance with pedigree 1.1364, pedigree (1,1,4,1,1)
  (same comment as for Cobalt)
- NMVOC, non-methane volatile organic compounds, unspecified origin [air, urban air close to ground]: 6.8185e-7 kg; lognormal variance with pedigree 0.091112, pedigree (1,1,4,1,1)
  (same comment as for Toluene)
- Tin [air, urban air close to ground]: 1.5973e-11 kg; lognormal variance with pedigree 1.2296, pedigree (1,1,4,1,1)
  (same comment as for Cobalt)
- Water [air, urban air close to ground]: 0.0019112 m3; lognormal variance with pedigree 0.54674, pedigree (1,1,4,1,1)
  Water vapour from waste humidity, hydrogen oxidation and part of the process water.
  Uncertainty: Uncertainty calculated from uncertainty in waste composition, process water input and the uncertainty of fraction to air.
- Bromine [water, surface water]: 5.8991e-5 kg; lognormal variance with pedigree 0.49555, pedigree (1,1,4,1,1)
  (same comment as for Cobalt)
- Fluoride [water, ground-, long-term]: 1.2298e-5 kg; lognormal variance with pedigree 0.74191, pedigree (1,1,4,1,1)
  (same comment as for Sulfate)
- Nickel, ion [water, surface water]: 1.2915e-8 kg; lognormal variance with pedigree 1.7385, pedigree (1,1,4,1,1)
  (same comment as for Cobalt)
- Bromine [air, urban air close to ground]: 3.2627e-8 kg; lognormal variance with pedigree 1.0534, pedigree (1,1,4,1,1)
  (same comment as for Cobalt)
- Nitrate [water, ground-, long-term]: 0.00021983 kg; lognormal variance with pedigree 0.44225, pedigree (1,1,4,1,1)
  (same comment as for Sulfate)
- Arsenic, ion [water, surface water]: 1.2281e-6 kg; lognormal variance with pedigree 1.3891, pedigree (1,1,4,1,1)
  (same comment as for Cobalt)
- Cadmium [air, urban air close to ground]: 3.8629e-8 kg; lognormal variance with pedigree 1.0313, pedigree (1,1,4,1,1)
  (same comment as for Cobalt)
- Aluminium [air, urban air close to ground]: 1.5216e-10 kg; lognormal variance with pedigree 0.95777, pedigree (1,1,4,1,1)
  (same comment as for Cobalt)
- Titanium [air, urban air close to ground]: 7.7417e-7 kg; lognormal variance with pedigree 0.6945, pedigree (1,1,4,1,1)
  (same comment as for Cobalt)
- Particulates, > 2.5 um, and < 10um [air, urban air close to ground]: 8.9889e-9 kg; lognormal variance with pedigree 0.19474, pedigree (1,1,4,1,1)
  (same comment as for Toluene)
- Barium [water, ground-, long-term]: 8.7644e-5 kg; lognormal variance with pedigree 2.2567, pedigree (1,1,4,1,1)
  (same comment as for Sulfate)
- Cadmium, ion [water, ground-, long-term]: 5.5302e-6 kg; lognormal variance with pedigree 6.463, pedigree (1,1,4,1,1)
  (same comment as for Sulfate)
- Chromium VI [water, surface water]: 1.0657e-6 kg; lognormal variance with pedigree 1.1772, pedigree (1,1,4,1,1)
  (same comment as for Cobalt)
- Heat, waste [air, urban air close to ground]: 24.794 MJ; lognormal variance with pedigree 0.033617, pedigree (1,1,4,1,1)
  (same comment as for Heat, waste)
- Lead [air, urban air close to ground]: 3.5904e-8 kg; lognormal variance with pedigree 0.81097, pedigree (1,1,4,1,1)
  (same comment as for Cobalt)
- Zinc, ion [water, ground-, long-term]: 0.00015865 kg; lognormal variance with pedigree 2.8772, pedigree (1,1,4,1,1)
  (same comment as for Sulfate)
- Strontium [water, ground-, long-term]: 8.2474e-5 kg; lognormal variance with pedigree 0.99503, pedigree (1,1,4,1,1)
  (same comment as for Sulfate)
- Chromium, ion [water, surface water]: 2.9609e-9 kg; lognormal variance with pedigree 1.1341, pedigree (1,1,4,1,1)
  (same comment as for Cobalt)
- Phenol, pentachloro- [air, urban air close to ground]: 6.5247e-12 kg; lognormal variance with pedigree 0.091112, pedigree (1,1,4,1,1)
  (same comment as for Toluene)
- Sodium, ion [water, surface water]: 0.00037156 kg; lognormal variance with pedigree 0.32215, pedigree (1,1,4,1,1)
  (same comment as for Cobalt)
- Nitrogen oxides [air, urban air close to ground]: 0.00054835 kg; lognormal variance with pedigree 0.60125, pedigree (1,1,4,1,1)
  Sum of fuel-Nox and thermal-NOx emitted to air after DeNOx stage.
  Uncertainty: uncertainty calculated from uncertainty in average N-emissions and uncertainty in the share of thermal NOx and the uncertainty in nitrogen content in *this* waste.
- Copper, ion [water, ground-, long-term]: 0.00026476 kg; lognormal variance with pedigree 0.81021, pedigree (1,1,4,1,1)
  (same comment as for Sulfate)
- Barium [water, surface water]: 2.3423e-8 kg; lognormal variance with pedigree 1.1956, pedigree (1,1,4,1,1)
  (same comment as for Cobalt)
- Tin, ion [water, ground-, long-term]: 9.3588e-6 kg; lognormal variance with pedigree 2.0158, pedigree (1,1,4,1,1)
  (same comment as for Sulfate)
- Sodium, ion [water, ground-, long-term]: 0.00098472 kg; lognormal variance with pedigree 0.31407, pedigree (1,1,4,1,1)
  (same comment as for Sulfate)
- Manganese [water, ground-, long-term]: 4.6006e-5 kg; lognormal variance with pedigree 1.9956, pedigree (1,1,4,1,1)
  (same comment as for Sulfate)
- Nickel, ion [water, ground-, long-term]: 1.8451e-5 kg; lognormal variance with pedigree 1.16, pedigree (1,1,4,1,1)
  (same comment as for Sulfate)
