# trellis system construction, wooden poles, soft wood, tar impregnated

Dataset: EcoSpold 2, unit process
Geography: RoW
Time period: 2010-01-01 to 2021-12-31
Technology level: current
Classification: ISIC rev.4 ecoinvent: 4100:Construction of buildings
Tags: WFLDB
Scenario: Business-as-Usual
System model: Allocation, cut-off by classification
Generated by: [System]
Database: ecoinvent
isCopyrightProtected: true
accessRestrictedTo: 1

## General comment
This global dataset is a copy of the regional CH dataset, except for the following modifications.
The production volume represents the global annual production.
The geographicalCorrelation score of every pedigree matrix of was changed to '5'.
The comments below were part of the CH regional dataset.
This dataset represents the production of 1 ha and 1 year of trellis systems for supporting trees of a fruit tree orchard. The trellis systems are need for fruit trees of orchards with a tree density of more than 500 trees per hectare because trees of such orchards are not higher than 3 meters, with a trunk diameter of about 10 to 15 cm and therefore need to be attached in order to prevent them for damage caused by wind especially when trees are carrying high fruit loads.

## Included activities start
The activity starts with planting tar impregnated soft wood poles and steel wires in order to attach trees for orchards with a tree density that exceeds 500 trees per ha. Furthermore, the contribution of machines and fuel used to install the trellis system is considered. The trellis system does not include hail protection systems or irrigation systems. Neither the repair material nor the time required to run machines for repairs is considered. Different materials listed. The hours of man power (e.g. spent on construction and maintenance of the trellis system) are not considered.

## Included activities end
The activity ends with the disposal of the wooden poles and wires after trellis system deconstruction.

## Reference product
- trellis system, wooden poles, soft wood, tar impregnated: 1 ha; By-product classification allocatable product; CPC 53121: Industrial buildings
  production volume 4.84973e6 ha
    Source: FAOSTAT. Average, 2009-2012. Calculation method: fruit tree area * planting density / lifetime
  property price 245.568 EUR2005
    Calculated based on inputs: The price of the product has been calculated as a sum of the values of the material and energy inputs for this product. This value is therefore a rough estimation. It may underestimate the real price since there are additional expenses when producing any product. These expences can include for example labour costs, treatment of waste materials and profit for the producer. Please consider carefully whether this level of data quality is acceptable for your application.

## By-products
- waste wood, post-consumer: 0 kg; CPC 3928: Sawdust and wood waste and scrap; By-product classification Recyclable; pedigree (1,1,1,1,1)
  Disposal of wooden poles. Corresponds to 6684.8kg/ha related to the life time (20 years).
  production volume 0 kg
    Calculated from reference product production volume, reference product amount and byproduct amount.
  property price 0.079 EUR2005
    Temporary price data. Calculated as 90% of purchasers price based on: 2005 import prices (total trades (USD) divided by total weight (kg) in biggest economies of the world: EU27, USA, Brasil, China, India, Japan and Russia) from UN Commodity Trade Statistics Database (http://data.un.org/Explorer.aspxDatabase [Accessed 2011.06.23]). Commodity: Sawdust, wood waste or scrap
  property heating value, net 9.99 MJ
    LHV is calculated based on the Carbon content of the product. More details can be found on the respective documentation.
  property carbon content 0.494
    carbon content on a dry matter basis (reserved; not for manual entry)
  properties: dry mass 1 kg, water in wet mass 0.4 kg, carbon content, fossil 0, water content 0.4, carbon content, non-fossil 0.494, wet mass 1.4 kg, carbon allocation 0.494 kg

## Inputs from technosphere
- tractor, 4-wheel, agricultural: 4.8469 kg; lognormal variance with pedigree 1.30352, pedigree (3,3,4,5,3)
  Corresponds to 96.9 kg/ha related to the life time (20 years). Culationsfor were made based on a tractor of 3000 kg, with a useful life of 7000 hours and a repair factor of 0.74.
- steel in car shredder residue: -35.462 kg
  Disposal of wires and anchor after deconstraction of the trellis system. Corresponds to 709.24 kg/ha related to the life time of the trellis system (20 years).
  production volume 0 kg
    Calculated from production volume of reference product using the relative outputs.
  properties: dry mass 1 kg, wet mass 1 kg
- residual softwood, wet: 0.05629 m3; lognormal variance with pedigree 0.0901383, pedigree (1,3,4,5,2)
  From manuafacturing poles from raw round wood under bark. Corresponds to 1.126 m3/ha related to the life time (20 years)
  properties: carbon content, non-fossil 0.494, water content 0.7, dry mass 450 kg, wet mass 765 kg, heating value, net 5962.7 MJ
- agricultural trailer: 3.9957 kg; lognormal variance with pedigree 1.30352, pedigree (3,3,4,5,3)
  Corresponds to 79.9 kg/ha related to the life time (20 years). Calculations base on tyre trailers of 1500 kg weight, 1200 hours useful life and 0.22 repair factor.
- diesel, burned in agricultural machinery: 2552.76 MJ; lognormal variance with pedigree 0.0989451, pedigree (3,3,4,5,3)
  Corresponds to 1134 MJ/ha related to the life time (20 years). 45 MJ = 1 kg Diesel
- shed, large, wood, non-insulated, fire-unprotected: 0.015116 m2; lognormal variance with pedigree 0.0989451, pedigree (3,3,4,5,3)
  Storrage of diverse material related to the trellis system. Corresponds to 0.302 m2/ha related to the life time of the trellissystem (20 years).
  properties: Surface 264 m2, lifetime 50 year
- sawlog and veneer log, softwood, measured as solid wood under bark: 0 m3; pedigree (1,1,1,1,1)
  properties: heating value, net 4483.78 MJ, dry mass 387.2 kg, water content 0.7, wet mass 658.24 kg, carbon content, non-fossil 0.494
  note on heating value, net: Value based on the dataset "softwood forestry, mixed species, sustainable forest management"The property is based on a value of 11.58MJ/kg
- wood preservation, pressure vessel, creosote, outdoor use, ground contact: 78.943 kg; lognormal variance with pedigree 0.0901383, pedigree (1,3,4,5,2)
  Tar oil used for impragnation of the wooden poles. Corresponds to 1579 kg/ha related to the life time (20 years).
- steel, low-alloyed: 35.462 kg; lognormal variance with pedigree 0.0921383, pedigree (3,3,4,5,2)
  Used for the wires. Corresponds to 709.24 kg/ha related to the life time (20 years).
  properties: dry mass 1 kg, wet mass 1 kg, carbon content, fossil 0.005
- heat, district or industrial, other than natural gas: 0 MJ; pedigree (1,1,1,1,1)
  Heat used for tar impragnation of wooden poles. Corresponds to 371 MJ/ha related to the life time (20 years)
  properties: heating value, net 1 MJ
- waste wood, post-consumer: -334.238 kg; lognormal variance with pedigree 0.0898491, pedigree (2,3,4,5,2)
  Disposal of wooden poles. Corresponds to 6684.8kg/ha related to the life time (20 years).
  properties: price 0.079 EUR2005, dry mass 1 kg, water content 0.4, carbon content, non-fossil 0.494, heating value, net 9.99 MJ, wet mass 1.4 kg
- sawlog and veneer log, softwood, measured as solid wood under bark: 0.00375098, 0.010479, 0.783567 m3 (3 entries); lognormal variance with pedigree 0.0907383, pedigree (2,3,4,5,2)
- heat, district or industrial, other than natural gas: 0.14683, 8.86627, 362.087 MJ (3 entries); lognormal variance with pedigree 0.0892491, pedigree (1,3,4,5,2)
  (same comment as for heat, district or industrial, other than natural gas)

## Emissions to nature
- Heat, waste [air, non-urban air or from high stacks]: 10.676 MJ; lognormal variance with pedigree 0.0892491, pedigree (1,3,4,5,2)
  Heat used from tar impragnation of wooden poles. Corresponds to 213 MJ/ha related to the life time (20 years)

## Sampling procedure
Data were collected on 12 fruit farms in Switzerland by Patrik Mouron and Franziska Heller, Agroscope.

## Extrapolations
The amount of the exchanges are copy from a regional dataset.
