# packing, clay product

Dataset: EcoSpold 2, unit process
Geography: CH
Time period: 2000-01-01 to 2021-12-31
Technology level: current
Classification: EcoSpold01Categories: construction materials/others
Classification: ISIC rev.4 ecoinvent: 8292:Packaging activities
Tags: ConvertedDataset
Scenario: Business-as-Usual
System model: Allocation, cut-off by classification
Generated by: Daniel Kellenberger (obsolete)
Published in: Kellenberger D. 2007
Database: ecoinvent
isCopyrightProtected: true
accessRestrictedTo: 1

## General comment
This dataset represents the packing of clay. The packing and loading process is normalized with an annual production volume of 1'000'000 kg/a and a density of 1'600 m3/kg. The estimated lifespan of the machines is assumed to be 25 years.
[This dataset was already contained in the ecoinvent database version 2. It was not individually updated during the transfer to ecoinvent version 3. Life Cycle Impact Assessment results may still have changed, as they are affected by changes in the supply chain, i.e. in other datasets. This dataset was generated following the ecoinvent quality guidelines for version 2. It may have been subject to central changes described in the ecoinvent version 3 change report (http://www.ecoinvent.org/database/ecoinvent-version-3/reports-of-changes/), and the results of the central updates were reviewed extensively. The changes added e.g. consistent water flows and other information throughout the database. The documentation of this dataset can be found in the ecoinvent reports of version 2, which are still available via the ecoinvent website. The change report linked above covers all central changes that were made during the conversion process.]

## Included activities start
Packing processes starting from clay, unpacked.

## Included activities end
The dataset includes the process of packing, transportation within the plant and loading of the bags on paletts. The machines used therefore are included in the infrastructure. The waste treatment of the packaging material after use is included. The dataset doesn't include the packed clay!

## Geography
Data are from one company (packing, lime products) in Switzerland.

## Technology
Assumption that the same process is used as for packing lime products

## Reference product
- packing, clay product: 1 kg; CPC 85400: Packaging services; By-product classification allocatable product
  EcoSpold01Location=CH
  production volume 0.0336675 kg
    This is a placeholder value that does not reflect real-world production volumes. This dataset does not currently require a real-world production volume to work in the database framework, and no actual data were collected yet. This has no negative effect on the results of the ecoinvent database. The placeholder value of this activity was scaled according to the nominal GDP of 2005 (source: United Nations, http://data.un.org/Glossary.aspx?q=GDP+%28current+US%24%29, accessed 20130726) to reflect an appropriate share of the global production volume, which is also a placeholder value.
  properties: price 0.0729 EUR2005

## Inputs from technosphere
- waste polyethylene: -6.15e-5 kg; lognormal variance with pedigree 0.128, pedigree (4,5,5,5,4)
  Extrapolation from "packing, lime poducts".
  The plastic foil of the packing is treated by municipal waste incineration.
  EcoSpold01Location=CH
  production volume 6.15e-5 kg
    Calculated from the production volume of packing, clay product in proportion to the respective output amounts.
  properties: heating value, net 42.47 MJ, water content 0.00401606, carbon content, fossil 0.825301, dry mass 0.996 kg, wet mass 1 kg
  note on heating value, net: Value taken from the general comment of the treatment dataset.
  note on carbon content, fossil: C content in 1 kg DM was calculated using data in Tab A.1, ecoinvent v2.2 report 13_I
- industrial machine, heavy, unspecified: 0.0015 kg; lognormal variance with pedigree 0.49, pedigree (5,5,5,5,4)
  EcoSpold01Location=RER
  Extrapolation from "packing, lime poducts".
  Estimation. The infraestructure for packing and loading is taken into account, estimating a weight of 30t and a lifespan of 20 years (data copied from "packing, lime products" dataset).
- extrusion, plastic film: 6.15e-5 kg; lognormal variance with pedigree 0.128, pedigree (4,5,5,5,4)
  EcoSpold01Location=RER
  Extrapolation from "packing, lime poducts".
  Calculation according to the circumference of the pallet (4m), the height (2m), and assuming that 2 layers of plastic with a weight of 0.0123 kg/m2 are needed. Plastic foil is used for the packing. Data was obtained from http://www.dm-folien.de/hpage.htm (Accessed October 2003).
- waste wood, untreated: -0.0018284 kg; lognormal variance with pedigree 0.156, pedigree (4,5,5,1,4)
  Extrapolation from "packing, lime poducts".
  The pallets for disposal were assumed as waste wood. Data was obtained from EMPA.
  EcoSpold01Location=CH
  production volume 0.0018284 kg
    (same comment as for waste polyethylene)
  properties: heating value, net 13.99 MJ, water content 0.25, wet mass 1 kg, carbon content, non-fossil 0.48632, dry mass 0.8 kg
  note on carbon content, non-fossil: Tab A.4, ecoinvent v2.2 report 13_I. C content has been referred to 1 kg DM,
- EUR-flat pallet: 6.25e-5 unit; lognormal variance with pedigree 0.156, pedigree (4,5,5,1,4)
  Extrapolation from "packing, lime poducts".
  Data from Frantschach per Email (05.06.02). It was assumed an average density of 1600 kg/m3, a loading capacity of 1m3, a weight of 22 kg and a lifetime of 10 uses.
  EcoSpold01Location=RER
  properties: water content 0.2, wet mass 22 kg, heating value, net 335.11 MJ, carbon content, fossil 0.0311351, dry mass 18.3333 kg, carbon content, non-fossil 0.58833
  note on carbon content, fossil: C content in components of the pallet (ecoinvent v2.2 report 7_part XVIII)
- polyethylene, high density, granulate: 6.15e-5 kg; lognormal variance with pedigree 0.128, pedigree (4,5,5,5,4)
  EcoSpold01Location=RER
  Extrapolation from "packing, lime poducts".
  Calculation Plastic foil is used for the packing. The amount was calculated according to the circumference of the pallet (4m), the height (2m), and assuming that 2 layers of plastic with a weight of 0.0123 kg/m2 are needed. Data was obtained from http://www.dm-folien.de/hpage.htm (Accessed October 2003).
  properties: heating value, net 42.47 MJ, dry mass 1 kg, carbon content, fossil 0.857143, wet mass 1 kg
  note on carbon content, fossil: Polyethylene is formed out of a huge amount of ethylene monomers (C2H4) (ecoinvent v2.2 report 11_II). MW=28 g/mol
- electricity, medium voltage: 0.00309 kWh; lognormal variance with pedigree 0.1101, pedigree (1,2,5,1,4)
  EcoSpold01Location=UCTE
  Extrapolation from "packing, lime poducts".
  As no data was available, the electricity consumption was assumed as the same of the "packing, lime products" dataset.

## Sampling procedure
Measured data of one Swiss plant

## Extrapolations
This dataset has been extrapolated from year 2002 to the year of the calculation (2021). The uncertainty has been adjusted accordingly.

## Review by Roland Hischier 2011-09-22
Transfer of documentation done.

## Review by Roberto Dones 2005-07-19
Passed
