# petroleum refinery operation

Dataset: EcoSpold 2, unit process
Geography: CH
Time period: 1980-01-01 to 2021-12-31
Technology level: current
Classification: ISIC rev.4 ecoinvent: 1920:Manufacture of refined petroleum products
Classification: EcoSpold01Categories: oil/fuels
Tags: combined production
Scenario: Business-as-Usual
System model: Allocation, cut-off by classification
Share of production covered: 100 %
Generated by: Niels Jungbluth
Published in: Jungbluth, N. 2007
Database: ecoinvent
isCopyrightProtected: true
accessRestrictedTo: 1

## General comment
Description of all flows of materials and energy due to the throughput of 1kg crude oil in the refinery. The multioutput-process 'crude oil, in refinery' delivers the co-products petrol, unleaded, bitumen, diesel, light fuel oil, heavy fuel oil, kerosene, naphtha, propane/ butane, refinery gas, secondary sulphur and electricity. The impacts of processing are allocated to the different products.
This dataset is modeled as a combined production of 8 reference products in ecoinvent version 3. The distribution of the remaining flows over the reference products is based on the original distribution of the flows as described in the ecoinvent report 6-IV "Erdoel", 2007 unless otherwise specified here.

## Included activities end
All processes on the refinery site excluding the emissions from combustion facilities, including waste water treatment, process emissions and direct discharges to rivers.

## Geography
Investigation for the refineries in Collombey and Cressier in Switzerland.

## Technology
Average data for the used technology.

## Time period
The most important data (e.g. production, throughput, energy use, regulated emissions) have been investigated for the 2 Swiss refineries for the year 2000. Other data and indicators have been assessed based on older literature data.

## Parameters
- total weight of all reference products: 0.97619 kg; name t_weight; lognormal variance with pedigree 0, pedigree (1,1,1,1,1)
  Used in combined production calculations

## Reference product
All rows: By-product classification allocatable product
- liquefied petroleum gas: 0 kg; name a_lpg; CPC 334: Petroleum gases and other gaseous hydrocarbons, except natural gas; CAS 68476-85-7
  EcoSpold01Location=CH
  Swiss statistic
  production volume 1.9044e8 kg
    4.6 mio. tonnes crude oil throughput in 2000.
    Calculated from an input of 4.6E+9 kg crude petroleum (Source: IEA) and the corresponding output relations of the dataset
  property price 0.276 EUR2005; name a_lpg_price_EUR2005
    Temporary price data. Calculated as 90% of purchasers price based on: Average 2004 prices for EU27 from UN Commodity Trade Statistics Database - Average of Propane and butane (http://data.un.org/Data.aspx?q=Butanes+&d=ComTrade&f=_l1Code%3a28%3bcmdCode%3a271113 and http://data.un.org/Data.aspx?q=propane&d=ComTrade&f=_l1Code%3a28%3bcmdCode%3a271112; accessed 1 June 2010).
  property carbon content, fossil 0.821863
    C-content is 87.8% (ecoinvent v2.2 report 6_IV, Tab 3.18)
    The composition of LPG was considered 50:50 propane:butane
  property calculation property, kg 0.0414 kg; name m_lpg
    Mass output. Defined here for use in the combined production calculations.
  property heating value, net 45.5 MJ
    Indicative value. Reference: Fuels - Higher and Lower Calorific Values, available at: https://www.engineeringtoolbox.com/fuels-higher-calorific-values-d_169.html
  property carbon content 0.821863
    carbon content on a dry matter basis (reserved; not for manual entry)
  property true value 0.0114264; name a_lpg_true_value
    allocation property applied in "true value" allocation // value calculated from revenue
  properties: water in wet mass 0 kg, carbon content, non-fossil 0, dry mass 1 kg, wet mass 1 kg, water content 0, carbon allocation 0.821863 kg
- naphtha: 0 kg; name a_naphtha; CPC 33330: Naphtha; CAS 8030-30-6
  Swiss statistic
  EcoSpold01Location=CH
  production volume 0 kg
    (same comment as for liquefied petroleum gas)
  property carbon content, fossil 0.919743
    C-content is 87.8% (ecoinvent v2.2 report 6_IV, Tab 3.18)
    C-content was calculated using data from Tab 3.20, ecoinvent v2.2 report 6_IV CO2 emmissions and High heating value.
  property price 0.265 EUR2005; name a_naphtha_price_EUR2005
    Temporary price data. Calculated as 90% of purchasers price based on: Calculated with a factor of 1.38 relative to the crude petroleum price, based on US 1999 relation from the UN Commodity Trade Statistics Database.
  property calculation property, kg 0.00839 kg; name m_naphtha
    Mass output. Defined here for use in the combined production calculations.
  property carbon content 0.919743
    carbon content on a dry matter basis (reserved; not for manual entry)
  properties: dry mass 1 kg, wet mass 1 kg, carbon content, non-fossil 0, heating value, net 45 MJ, water in wet mass 0 kg, water content 0, carbon allocation 0.919743 kg
- kerosene: 0 kg; name a_kerosene; CPC 3334: Kerosenes; CAS 8008-20-6
  Swiss statistic
  EcoSpold01Location=CH
  production volume 0 kg
    (same comment as for liquefied petroleum gas)
  property price 0.297 EUR2005; name a_kerosene_price_EUR2005
    Temporary price data. Calculated as 90% of purchasers price based on: Source: U.S. energy information administration_Independent statistics and analysis: Average daily data of Amsterdam-Rotterdam-Antwerp (ARA) Kerosene-Type Jet Fuel Spot Price FOB (Cents per Gallon) (http://tonto.eia.doe.gov/dnav/pet/pet_pri_spt_s1_d.htm; accessed 2010-07-06). Conversion factors: 0.0038 m3/US gallon; 803 kg/m3.
  property carbon content, fossil 0.85
    C-content is 87.8% (ecoinvent v2.2 report 6_IV, Tab 3.18)
    C-content is 85% (ecoinvent v2.2 report 6_IV, Tab 3.15)
  property calculation property, kg 0.0985 kg; name m_kerosene
    Mass output. Defined here for use in the combined production calculations.
  property carbon content 0.85
    carbon content on a dry matter basis (reserved; not for manual entry)
  properties: water in wet mass 0 kg, water content 0, wet mass 1 kg, dry mass 1 kg, carbon content, non-fossil 0, heating value, net 43 MJ, carbon allocation 0.85 kg
- pitch: 0 kg; name a_bitumen; CPC 34540: Oils and other products of the distillation of high temperature coal tar, and similar products; pitch and pitc[…]; CAS 61789-60-4
  Swiss statistic
  production volume 0 kg
    (same comment as for liquefied petroleum gas)
  property carbon content, fossil 0.83
    C-content is 87.8% (ecoinvent v2.2 report 6_IV, Tab 3.18)
    C content of bitumen in Tab 3.19, ecoinvent v2.2 report 6_IV
  property calculation property, kg 0.0279 kg; name m_bitumen
    Mass output. Defined here for use in the combined production calculations.
  property price 0.233 EUR2005; name a_bitumen_price_EUR2005
    2005 import and export prices (total trades (USD) divided by total weight (kg) in China, India, USA, Japan, Russia and Europe, major producers and consumers (http://www.cementchina.net/freport/showfre.asp?id=749) from UN Commodity Trade Statistics Database (http://data.un.org/Explorer.aspxDatabase [Accessed 2 July 2010]). Commodity: pitch
  property carbon content 0.83
    carbon content on a dry matter basis (reserved; not for manual entry)
  properties: water in wet mass 0 kg, dry mass 1 kg, heating value, net 28 MJ, wet mass 1 kg, water content 0, carbon content, non-fossil 0, carbon allocation 0.83 kg
- heavy fuel oil: 0 kg; name a_hfo; CPC 33370: Fuel oils n.e.c.
  EcoSpold01Location=CH
  Swiss statistic
  production volume 0 kg
    (same comment as for liquefied petroleum gas)
  property price 0.138 EUR2005; name a_hfo_price_EUR2005
    Temporary price data. Calculated as 90% of purchasers price based on: Source: International Energy Agency (http://wds.iea.org/WDS/TableViewer/tableView.aspx downloaded 4 July 2009) for Germany and excl. taxes, for low sulphur fuel oil.
  property calculation property, kg 0.17 kg; name m_hfo
    Mass output. Defined here for use in the combined production calculations.
  property carbon content 0.878
    carbon content on a dry matter basis (reserved; not for manual entry)
  properties: wet mass 1 kg, heating value, net 41.2 MJ, carbon content, non-fossil 0, carbon content, fossil 0.878, dry mass 1 kg, water content 0, water in wet mass 0 kg, carbon allocation 0.878 kg
- diesel: 0 kg; name a_diesel; CPC 33360: Gas oil; CAS 68334-30-5
  Swiss statistic
  EcoSpold01Location=CH
  production volume 0 kg
    (same comment as for liquefied petroleum gas)
  property carbon content, fossil 0.865
    C-content is 87.8% (ecoinvent v2.2 report 6_IV, Tab 3.18)
    C-content of diesel is 86.5% (ecoinvent v2.2 report 6_IV, Tab 3.14)
  property calculation property, kg 0.108 kg; name m_diesel
    Mass output. Defined here for use in the combined production calculations.
  property price 0.37 EUR2005; name a_diesel_price_EUR2005
    Temporary price data. Calculated as 90% of purchasers price based on: Source: International Energy Agency (http://wds.iea.org/WDS/TableViewer/tableView.aspx downloaded 4 July 2009) for Germany and excl. taxes, applying diesel density of 0.844 kg/litre
  property carbon content 0.865
    carbon content on a dry matter basis (reserved; not for manual entry)
  properties: heating value, net 42.8 MJ, water in wet mass 0 kg, water content 0, dry mass 1 kg, wet mass 1 kg, carbon content, non-fossil 0, carbon allocation 0.865 kg
- refinery gas: 1 kg; name a_refgas; = 0.0364 / t_weight *( a_bitumen + a_diesel + a_hfo + a_lfo + a_lpg + a_kerosene + a_naphtha + a_petrol ); CPC 33429: Other petroleum gases or gaseous hydrocarbons, except natural gas
  EcoSpold01Location=CH
  Swiss statistic
  This flow has been cut of in accordance with the ecoinvent centre.
  production volume 1.6744e8 kg; = Ref('2e210df2-6ce3-4469-a54a-8e6108ba764c', 'ProductionVolume') * (ABS(Ref('70840938-7c9b-4196-b97d-bd87287f7579')) / ABS(Ref('2e210df2-6ce3-4469-a54a-8e6108ba764c'))
    (same comment as for liquefied petroleum gas)
  property price 0.16 EUR2005; name a_refgas_price_EUR2005
    Temporary price data. Calculated as 90% of purchasers price based on: Same prices per energy output as natural gas, based on the proportional lower heating value (40.24 MJ/m3 for refinery gas; 36.3 MJ/m3 for natural gas)
  property carbon content, fossil 0.77
    C-content is 87.8% (ecoinvent v2.2 report 6_IV, Tab 3.18)
    C-content in refinery gas is considered 77% (ecoinvent v2.2 report 6_IV, tab 3.11)
  property carbon content 0.77
    carbon content on a dry matter basis (reserved; not for manual entry)
  property true value 0.000246995; name a_refgas_true_value
    allocation property applied in "true value" allocation // value calculated from revenue
  properties: wet mass 1 kg, water content 0, carbon content, non-fossil 0, heating value, net 50.3 MJ, water in wet mass 0 kg, dry mass 1 kg, carbon allocation 0.77 kg
- petrol, unleaded: 0 kg; name a_petrol; CPC 333: Petroleum oils and oils obtained from bituminous materials, other than crude; preparations n.e.c. containing by […]; CAS 86290-81-5
  Swiss statistic
  EcoSpold01Location=CH
  production volume 0 kg; name petrol_pv
    (same comment as for liquefied petroleum gas)
  property price 0.71 EUR2005; name a_petrol_price_EUR2005
    Average calculated from All Grades, Areas and Formulations in USA for 2005. Source: http://www.eia.gov/oil_gas/petroleum/data_publications/wrgp/mogas_history.html
  property heating value, net 43.2 MJ
    Assumed equal to "petroleum". LHV for petroleum: Based on literature, page 7, Report6, part 4
  property carbon content, fossil 0.865
    C-content is 87.8% (ecoinvent v2.2 report 6_IV, Tab 3.18)
    C-content is 86.5% (ecoinvent v2.2 report 6_IV, Tab 3.13)
  property calculation property, kg 0.234 kg; name m_petrol
    Mass output. Defined here for use in the combined production calculations.
  property carbon content 0.865
    carbon content on a dry matter basis (reserved; not for manual entry)
  properties: wet mass 1 kg, water in wet mass 0 kg, water content 0, carbon content, non-fossil 0, dry mass 1 kg, carbon allocation 0.865 kg
- light fuel oil: 0 kg; name a_lfo; CPC 33370: Fuel oils n.e.c.
  Swiss statistic
  EcoSpold01Location=CH
  production volume 0 kg
    (same comment as for liquefied petroleum gas)
  property price 0.268 EUR2005; name a_lfo_price_EUR2005
    Temporary price data. Calculated as 90% of purchasers price based on: Source: International Energy Agency (http://wds.iea.org/WDS/TableViewer/tableView.aspx downloaded 4 July 2009) for Germany excl. Taxes, applying fuel oil density of 0.944 kg/litre
  property carbon content, fossil 0.862
    C-content is 87.8% (ecoinvent v2.2 report 6_IV, Tab 3.18)
    C-content is 86.2% (ecoinvent v2.2 report 6_IV Tab 3.16)
  property calculation property, kg 0.288 kg; name m_lfo
    Mass output. Defined here for use in the combined production calculations.
  property carbon content 0.862
    carbon content on a dry matter basis (reserved; not for manual entry)
  properties: dry mass 1 kg, wet mass 1 kg, carbon content, non-fossil 0, water in wet mass 0 kg, heating value, net 42.6 MJ, water content 0, carbon allocation 0.862 kg

## By-products
- sulfur: 0 kg; name a_sulfur; CPC 34520: Sulphur, except sublimed sulphur, precipitated sulphur and colloidal sulphur; By-product classification allocatable product; CAS 7704-34-9; pedigree (1,1,1,1,1)
  Swiss statistic
  production volume 150020 kg; = Ref('2e210df2-6ce3-4469-a54a-8e6108ba764c', 'ProductionVolume') * (ABS(Ref('d66ad3db-5c71-4837-850b-1deb18f40794')) / ABS(Ref('2e210df2-6ce3-4469-a54a-8e6108ba764c'))
    (same comment as for liquefied petroleum gas)
  property price 0.0551778 EUR2005; name a_sulfur_price_EUR2005
    Price calculated based on price of elemental sulfur (f.o.b. mine or plant) reported in the USGS Minerals Yearbook for Sulfur from 2010 to 2019 (https://www.usgs.gov/centers/nmic/sulfur-statistics-and-information). The prices given in USD were converted to EUR based on the annual exchange rates published by the European Central Bank (https://sdw.ecb.europa.eu/quickview.do?SERIES_KEY=120.EXR.A.USD.EUR.SP00.A), and then adjusted for inflation relative to 2005 by using the Harmonised Index of Consumer Prices (HICP) of the euro area, published by eurostat (https://ec.europa.eu/eurostat/databrowser/view/PRC_HICP_AIND/default/table).
  property carbon content 0
    carbon content on a dry matter basis (reserved; not for manual entry)
  property true value 1.79952e-6; name a_sulfur_true_value
    allocation property applied in "true value" allocation // value calculated from revenue
  properties: carbon content, fossil 0, dry mass 1 kg, water in wet mass 0 kg, carbon content, non-fossil 0, water content 0, wet mass 1 kg, carbon allocation 0 kg
- electricity, high voltage: 0 kWh; name a_el_hv; By-product classification allocatable product; CPC 17100: Electrical energy; pedigree (1,1,1,1,1)
  Swiss statistic, netto production
  EcoSpold01Location=CH
  production volume 1.08857e7 kWh; = Ref('2e210df2-6ce3-4469-a54a-8e6108ba764c', 'ProductionVolume') * (ABS(Ref('19934646-fd66-4317-895a-da20caf6c5ef')) / ABS(Ref('2e210df2-6ce3-4469-a54a-8e6108ba764c'))
    (same comment as for liquefied petroleum gas)
  property price 0.0977 EUR2005; name a_el_hv_price_EUR2005
    Temporary price data. Calculated as 90% of purchasers price based on: 94% of the average price (to account for a 6% loss in transformation and transmission) for electricity for industrial consumersin 2005 (excluded taxes). From IEA.
  property true value 0.000231204; name a_el_hv_true_value
    allocation property applied in "true value" allocation // value calculated from revenue

## Inputs from technosphere
- iron sulfate: 2.83862e-5 kg; = (5E-05 / t_weight )*( a_bitumen + a_diesel + a_hfo + a_lfo + a_lpg + a_kerosene + a_naphtha + a_petrol ); lognormal variance with pedigree 0.0721, pedigree (3,4,5,3,3)
  Literature, waste water treatment
  EcoSpold01Location=RER
  Uncertainty: Literature, waste water treatment
  properties: wet mass 1 kg, dry mass 1 kg
- platinum: 2.01488e-10 kg; = 8.01E-10/(3.7* m_petrol + 3.7*m_naphtha + 0.8* m_lpg)*(3.7* a_petrol + 3.7*a_naphtha +0.8* a_lpg); lognormal variance with pedigree 0.04, pedigree (1,1,5,1,1)
  Range for RER refineries, Reformer Catalyst
  EcoSpold01Location=RER
  properties: wet mass 1 kg, dry mass 1 kg
- propylene glycol, liquid: 1.4568e-5 kg; = (6E-06 / t_weight )*( a_bitumen + a_diesel + a_hfo + a_lfo + a_lpg + a_kerosene + a_naphtha + a_petrol ) + 2.1E-04 * a_petrol; lognormal variance with pedigree 0.0621, pedigree (3,4,5,3,3)
  EcoSpold01Location=RER
  Literature
  Report mentions 2 sources of propylene glycol, but in v2.2 only one source was included in the dataset, leading to the lower value of 6E-6 kg. Error corrected here.
  Uncertainty: Literature
  properties: dry mass 1 kg, wet mass 1 kg, heating value, net 27.09 MJ, carbon content, fossil 0.473684
  note on carbon content, fossil: C-content is 87.8% (ecoinvent v2.2 report 6_IV, Tab 3.18) C3H8O2
- heat, district or industrial, other than natural gas: 0.889488 MJ; = 1.83/(0.7* m_bitumen + 0.7* m_hfo + 1* m_diesel + 1* m_lfo + 1* m_kerosene + 1.8* m_petrol + 0.6* m_naphtha + 1.5* m_lpg) * (0.7*a_bitumen + 0.7*a_hfo + 1*a_diesel + 1*a_lfo + 1*a_kerosene + 1.8*a_petrol + 0.6*a_naphtha + 1.5*a_lpg )
  Swiss statistic
  properties: heating value, net 1 MJ
- chemical, organic: 0.000170317 kg; = (0.0003 / t_weight )*( a_bitumen + a_diesel + a_hfo + a_lfo + a_lpg + a_kerosene + a_naphtha + a_petrol ); lognormal variance with pedigree 0.054, pedigree (3,4,5,1,1)
  EcoSpold01Location=GLO
  IPPC European plant data
  Distribution used in 2.2 did not match the amounts specified in report 6-IV 9.6.6 - that section states that generally, a high uncertainty remains. Distribution here is therefore mass-based.
  Uncertainty: IPPC European plant data
  properties: heating value, net 19.03 MJ, carbon content, fossil 0.628, dry mass 1 kg, wet mass 1 kg
  note on carbon content, fossil: C-content is 87.8% (ecoinvent v2.2 report 6_IV, Tab 3.18) This dataset is an unweighted average of 20 organic substances (listed in Tab 88.1, ecoinvent v2.2 report 8, part II), being part of the top100 chemicals included in this database. The C-content has also been calculated as an unweighted average of the C content of the substances composing this dataset.
- lime, hydrated, packed: 1.98704e-5 kg; = (3.5E-05 / t_weight )*( a_bitumen + a_diesel + a_hfo + a_lfo + a_lpg + a_kerosene + a_naphtha + a_petrol ); lognormal variance with pedigree 0.0621, pedigree (3,4,5,3,3)
  Estimation based on literature
  EcoSpold01Location=CH
  Uncertainty: Estimation based on literature
  properties: wet mass 1 kg, dry mass 0.997 kg, water content 0.00300903
- nickel, class 1: 2.07986e-9 kg; = 6E-09/( 2.2* m_kerosene + 2.4* m_petrol + 2.4* m_naphtha + 2.4* m_lpg) * (2.2*a_kerosene + 2.4*a_petrol + 2.4*a_naphtha + 2.4*a_lpg ); lognormal variance with pedigree 0.55, pedigree (1,1,5,1,1)
  Range for RER refineries, Ni/Mo Catalyst
  EcoSpold01Location=GLO
  properties: dry mass 1 kg, wet mass 1 kg
- refinery sludge: -6.92624e-5 kg; name a_refsludge; = (1.22E-04 / t_weight *( a_bitumen + a_diesel + a_hfo + a_lfo + a_lpg + a_kerosene + a_naphtha + a_petrol ))*-1; lognormal variance with pedigree 0.0407, pedigree (2,2,5,1,1)
  Average of plant data
  EcoSpold01Location=CH
  Uncertainty: Average of plant data
  production volume 561200 kg
    Based on output of petrol and relation of co-products produced.
  property price 0 EUR2005; name a_refsludge_price_EUR2005
  properties: carbon content, fossil 0.767857, dry mass 0.105 kg, water content 8.52381, wet mass 1 kg, heating value, net 2.45 MJ
  note on carbon content, fossil: C-content is 87.8% (ecoinvent v2.2 report 6_IV, Tab 3.18) Tab A.6, ecoinvent v2.2 report 13_I. C content has been calculated after data in the tables, and then referred to 1 kg DM
  note on heating value, net: Value taken from the general comment of the treatment dataset.
- soap: 1.5215e-6 kg; = (2.68E-06 / t_weight )*( a_bitumen + a_diesel + a_hfo + a_lfo + a_lpg + a_kerosene + a_naphtha + a_petrol ); lognormal variance with pedigree 0.0413, pedigree (2,3,5,3,1)
  Average of plant data
  EcoSpold01Location=RER
  Uncertainty: Average of plant data
  properties: heating value, net 17.93 MJ, dry mass 0.87 kg, water content 0.149425, carbon content, non-fossil 0.692237, wet mass 1 kg
  note on carbon content, non-fossil: Soap (CnH2n+1 COO Na) is produced by a combined saponification and neutralisation process performed on a blend of oleochemical feedstocks comprised of short chain (C12-14, derived from coconut or palm kernel oil) and long chain (C16-18, from tallow or palm oil) esters.The ratio of short to long fatty acid chains is 20:80 (ecoinvent v2.2 report 12). Short fatty acid has been estimated as C12.5H(2*12.5+1); MW R=176 g/mol. Long fatty acid has been estimated as C16H(2*16+1); MW R=225 g/mol. MW of COONa=67 g/mol
- rhodium: 2.01488e-10 kg; = 8.01E-10/(3.7* m_petrol + 3.7*m_naphtha + 0.8* m_lpg)*(3.7* a_petrol + 3.7*a_naphtha +0.8* a_lpg); lognormal variance with pedigree 0.04, pedigree (1,1,5,1,1)
  Range for RER refineries, Reformer Catalyst
  EcoSpold01Location=RER
  properties: wet mass 1 kg, dry mass 1 kg
- tap water: 0.00862941 kg; = (0.0152 / t_weight )*( a_bitumen + a_diesel + a_hfo + a_lfo + a_lpg + a_kerosene + a_naphtha + a_petrol ); lognormal variance with pedigree 0.0413, pedigree (2,3,5,3,1)
  Average of plant data
  EcoSpold01Location=CH
  Uncertainty: Average of plant data
  properties: dry mass 1 kg, wet mass 1 kg, carbon content, fossil 0.878
- petroleum: 0.567724 kg; = (1 / t_weight )*( a_bitumen + a_diesel + a_hfo + a_lfo + a_lpg + a_kerosene + a_naphtha + a_petrol ); lognormal variance with pedigree 0.04, pedigree (1,1,5,1,1)
  EcoSpold01Location=CH
  Swiss statistic
  Uncertainty: Swiss statistic
  properties: wet mass 1 kg, heating value, net 43.2 MJ, dry mass 1 kg, carbon content, fossil 0.85
  note on carbon content, fossil: C-content is 87.8% (ecoinvent v2.2 report 6_IV, Tab 3.18) C-content of crude oil is 83-87% (ecoinven report 6_IV, Tab 3.2). An average C-content of 0.85 kg C/kg crude oil was considered
- nitrogen, liquid: 0.000467805 kg; = (0.000824 / t_weight )*( a_bitumen + a_diesel + a_hfo + a_lfo + a_lpg + a_kerosene + a_naphtha + a_petrol ); lognormal variance with pedigree 0.0427, pedigree (2,4,5,3,1)
  Env. reports DE
  EcoSpold01Location=RER
  Uncertainty: Env. reports DE
  properties: wet mass 1 kg, dry mass 1 kg
- petroleum refinery: 1.89052e-11 unit; = (3.33E-11 / t_weight )*( a_bitumen + a_diesel + a_hfo + a_lfo + a_lpg + a_kerosene + a_naphtha + a_petrol ); lognormal variance with pedigree 0.3526, pedigree (3,3,5,1,1)
  EcoSpold01Location=RER
  Estimation
  Uncertainty: Estimation
  property lifetime capacity [kg] 3e10 kg; name lifetime_capacity_kg
  properties: dry mass 1 kg, carbon content, fossil 0.878, wet mass 1 kg
  note on lifetime capacity [kg]: Based on existing estimations in ecoinvent v2.2 report 6. Utilization rate is 80%.
- methyl tert-butyl ether: 0.00265753 kg; = 0.0117* a_petrol/ m_petrol; lognormal variance with pedigree 0.0413, pedigree (2,3,5,3,1)
  EcoSpold01Location=RER
  Estimation 5% for gasoline
  Uncertainty: Estimation 5% for gasoline
  properties: heating value, net 37.14 MJ, wet mass 1 kg, dry mass 1 kg, carbon content, fossil 0.681818
  note on carbon content, fossil: C-content is 87.8% (ecoinvent v2.2 report 6_IV, Tab 3.18) C5H12O
- lubricating oil: 1.40796e-5 kg; = (2.48E-05 / t_weight )*( a_bitumen + a_diesel + a_hfo + a_lfo + a_lpg + a_kerosene + a_naphtha + a_petrol ); lognormal variance with pedigree 0.0427, pedigree (2,4,5,3,1)
  EcoSpold01Location=RER
  Env. reports DE
  Uncertainty: Env. reports DE
  properties: wet mass 1 kg, dry mass 1 kg, heating value, net 40.2 MJ, carbon content, fossil 0.75
  note on heating value, net: Literature value, Source: IPCC 2006, 2006 IPCC Guidelines for National Greenhouse Gas Inventories, Prepared by the National Greenhouse Gas Inventories Programme, Eggleston H.S., Buendia L., Miwa K., Ngara T. and Tanabe K. (eds). Published: IGES, Japan
  note on carbon content, fossil: C-content is 87.8% (ecoinvent v2.2 report 6_IV, Tab 3.18) Lubricating oil is produced from diesel. C-content/dry mass of fats and oils considered 75%, from: ecoinvent v2.2 report, n 15a, pg 40
- calcium chloride: 9.19713e-6 kg; = (1.62E-05 / t_weight )*( a_bitumen + a_diesel + a_hfo + a_lfo + a_lpg + a_kerosene + a_naphtha + a_petrol ); lognormal variance with pedigree 0.0413, pedigree (2,3,5,3,1)
  Average of plant data
  EcoSpold01Location=RER
  Uncertainty: Average of plant data
  properties: wet mass 1 kg, dry mass 1 kg
- ammonia, anhydrous, liquid: 1.13545e-6 kg; = (2E-06 / t_weight )*( a_bitumen + a_diesel + a_hfo + a_lfo + a_lpg + a_kerosene + a_naphtha + a_petrol); lognormal variance with pedigree 0.0721, pedigree (3,4,5,3,3)
  Literature
  EcoSpold01Location=RER
  Uncertainty: Literature
  properties: dry mass 1 kg, wet mass 1 kg
- chlorine, liquid: 1.01946e-5 kg; = 4.2E-5/(3.8* m_petrol + 3.8*m_naphtha + 0.2* m_lpg)*(3.8* a_petrol + 3.8*a_naphtha +0.2* a_lpg); lognormal variance with pedigree 0.0427, pedigree (2,4,5,3,1)
  Env. reports DE
  EcoSpold01Location=RER
  Uncertainty: Env. reports DE
  properties: dry mass 1 kg, wet mass 1 kg
- zinc: 5.25944e-8 kg; = 1.07E-07 /(0* m_bitumen + 1.1* m_hfo + 0.4* m_diesel + 0.4* m_lfo + 0.7* m_kerosene + 2.1* m_petrol + 2.1* m_naphtha + 1.3* m_lpg) * (0*a_bitumen + 1.1*a_hfo + 0.4*a_diesel + 0.4*a_lfo + 0.7*a_kerosene + 2.1*a_petrol + 2.1*a_naphtha + 1.3*a_lpg ); lognormal variance with pedigree 0.04, pedigree (1,1,5,1,1)
  EcoSpold01Location=RER
  Range for RER refineries, Zn Catalyst
  properties: wet mass 1 kg, dry mass 1 kg
- sulfuric acid: 6.75592e-6 kg; = (1.19E-05 / t_weight )*( a_bitumen + a_diesel + a_hfo + a_lfo + a_lpg + a_kerosene + a_naphtha + a_petrol ); lognormal variance with pedigree 0.0413, pedigree (2,3,5,3,1)
  Average of plant data
  EcoSpold01Location=RER
  Uncertainty: Average of plant data
  properties: wet mass 1 kg, dry mass 1 kg
- waste refinery gas: -0.0268305 MJ; name a_wrg; = (0.0552 / (0.7* m_bitumen + 0.7* m_hfo + 1* m_diesel + 1* m_lfo + 1* m_kerosene + 1.8* m_petrol + 0.6* m_naphtha + 1.5* m_lpg) * (0.7*a_bitumen + 0.7*a_hfo + 1*a_diesel + 1*a_lfo + 1*a_kerosene + 1.8*a_petrol + 0.6*a_naphtha + 1.5*a_lpg ))*-1; lognormal variance with pedigree 0.0427, pedigree (2,4,5,3,1)
  Swiss plant
  EcoSpold01Location=GLO
  Uncertainty: Swiss plant
  production volume 2.5392e8 MJ
    Based on output of petrol and relation of co-products produced.
  property price 0 EUR2005; name a_wrg_price_EUR2005
  properties: carbon content, fossil 0.77, dry mass 0.0198807 kg, wet mass 0.0198807 kg
  note on carbon content, fossil: C-content is 87.8% (ecoinvent v2.2 report 6_IV, Tab 3.18) C-content in refinery gas is 77% (0.77kg C/kg) (ecoinvent v2.2 report 6_IV, tab 3.11)
- heavy fuel oil, burned in refinery furnace: 0.205603 MJ; = 0.423/(0.7* m_bitumen + 0.7* m_hfo + 1* m_diesel + 1* m_lfo + 1* m_kerosene + 1.8* m_petrol + 0.6* m_naphtha + 1.5* m_lpg) * (0.7*a_bitumen + 0.7*a_hfo + 1*a_diesel + 1*a_lfo + 1*a_kerosene + 1.8*a_petrol + 0.6*a_naphtha + 1.5*a_lpg ); lognormal variance with pedigree 0.0406, pedigree (2,1,5,1,1)
  EcoSpold01Location=CH
  Swiss statistic
  Uncertainty: Swiss statistic
  properties: carbon content, fossil 0.878, dry mass 1 kg, wet mass 1 kg
- spent catalytic converter NOx reduction: -4.91537e-7 kg; name a_cat; = (1E-06 /(0* m_bitumen + 1.1* m_hfo + 0.4* m_diesel + 0.4* m_lfo + 0.7* m_kerosene + 2.1* m_petrol + 2.1* m_naphtha + 1.3* m_lpg) * (0*a_bitumen + 1.1*a_hfo + 0.4*a_diesel + 0.4*a_lfo + 0.7*a_kerosene + 2.1*a_petrol + 2.1*a_naphtha + 1.3*a_lpg ))*-1; lognormal variance with pedigree 0.0413, pedigree (2,3,5,3,1)
  EcoSpold01Location=DE
  Estimation based on literature data
  Uncertainty: Estimation based on literature data
  production volume 4600 kg
    Based on output of petrol and relation of co-products produced.
  property price 0 EUR2005; name a_cat_price_EUR2005
  properties: wet mass 1 kg, dry mass 1 kg
- palladium: 6.3641e-9 kg; = 2.53E-08/(3.7* m_petrol + 3.7*m_naphtha + 0.8* m_lpg)*(3.7* a_petrol + 3.7*a_naphtha +0.8* a_lpg); lognormal variance with pedigree 0.07, pedigree (1,1,5,1,1)
  Range for RER refineries, Vanadium Catalyst
  EcoSpold01Location=RER
  properties: dry mass 1 kg, wet mass 1 kg
- hydrochloric acid, without water, in 30% solution state: 5.05275e-5 kg; = (8.9E-05 / t_weight )*( a_bitumen + a_diesel + a_hfo + a_lfo + a_lpg + a_kerosene + a_naphtha + a_petrol ); lognormal variance with pedigree 0.0427, pedigree (2,4,5,3,1)
  Env. reports DE
  EcoSpold01Location=RER
  Uncertainty: Env. reports DE
  properties: dry mass 1 kg, heating value, net 3.32 MJ, wet mass 1 kg
- electricity, medium voltage: 0.00921161 kWh; = 0.0179/(1.11* m_bitumen + 0.9* m_hfo + 0.7* m_diesel + 0.7* m_lfo + 0.6* m_kerosene + 1.59* m_petrol + 1.59* m_naphtha + 1.41* m_lpg) * (1.11*a_bitumen + 0.9*a_hfo + 0.7*a_diesel + 0.7*a_lfo + 0.6*a_kerosene + 1.59*a_petrol + 1.59*a_naphtha + 1.41*a_lpg ); lognormal variance with pedigree 0.0413, pedigree (2,3,5,3,1)
  EcoSpold01Location=CH
  Average of plant data
  Uncertainty: Average of plant data
- zeolite, powder: 4.87604e-6 kg; = 9.92E-06/(0* m_bitumen + 1.1* m_hfo + 0.4* m_diesel + 0.4* m_lfo + 0.7* m_kerosene + 2.1* m_petrol + 2.1* m_naphtha + 1.3* m_lpg) * (0*a_bitumen + 1.1*a_hfo + 0.4*a_diesel + 0.4*a_lfo + 0.7*a_kerosene + 2.1*a_petrol + 2.1*a_naphtha + 1.3*a_lpg ); lognormal variance with pedigree 0.06, pedigree (1,1,5,1,1)
  Range for RER refineries
  EcoSpold01Location=RER
  properties: wet mass 1 kg, dry mass 1 kg
- sodium hypochlorite, without water, in 15% solution state: 2.83862e-5 kg; = (5E-05 / t_weight )*( a_bitumen + a_diesel + a_hfo + a_lfo + a_lpg + a_kerosene + a_naphtha + a_petrol ); lognormal variance with pedigree 0.0721, pedigree (3,4,5,3,3)
  EcoSpold01Location=RER
  Literature, waste water treatment
  Uncertainty: Literature, waste water treatment
  properties: wet mass 1 kg, dry mass 1 kg
- molybdenum: 1.54099e-8 kg; = 4.05E-08/(0* m_bitumen + 0* m_hfo + 0.4* m_diesel + 0.4* m_lfo + 1.8* m_kerosene + 2* m_petrol + 2* m_naphtha + 2* m_lpg) * (0*a_bitumen + 0*a_hfo + 0.4*a_diesel + 0.4*a_lfo + 1.8*a_kerosene + 2*a_petrol + 2*a_naphtha + 2*a_lpg ); lognormal variance with pedigree 0.31, pedigree (1,1,5,1,1)
  EcoSpold01Location=RER
  Range for RER refineries, Co/Mo Catalyst
  properties: wet mass 1 kg, dry mass 1 kg
- sodium hydroxide, without water, in 50% solution state: 0.000139628 kg; = 0.000245 * a_lpg/m_lpg; lognormal variance with pedigree 0.0413, pedigree (2,3,5,3,1)
  EcoSpold01Location=RER
  Average of plant data
  Uncertainty: Average of plant data
  properties: heating value, net 3.03 MJ, dry mass 1 kg, wet mass 1 kg

## Inputs from nature
- Cobalt, in ground [natural resource, in ground]: 5.81524e-9 kg; = 1.07E-08/( m_lfo + m_diesel) * (a_lfo + a_diesel); lognormal variance with pedigree 0.16, pedigree (1,1,5,1,1)
  Range for RER refineries, Co/Mo Catalyst
- Water, cooling, unspecified natural origin [natural resource, in water]: 0.00228793 m3; = (0.00403 / t_weight )*( a_bitumen + a_diesel + a_hfo + a_lfo + a_lpg + a_kerosene + a_naphtha + a_petrol ); lognormal variance with pedigree 0.0426, pedigree (3,3,5,1,1)
  Average of plant data
  Uncertainty: Average of plant data
- Rhenium, in ground [natural resource, in ground]: 1.94426e-10 kg; = 8.01E-10/(3.8* m_petrol + 3.8*m_naphtha + 0.2* m_lpg)*(3.8* a_petrol + 3.8*a_naphtha +0.2* a_lpg); lognormal variance with pedigree 0.04, pedigree (1,1,5,1,1)
  Range for RER refineries, Reformer Catalyst
- Water, river [natural resource, in water]: 0.000321332 m3; = (0.000566 / t_weight )*( a_bitumen + a_diesel + a_hfo + a_lfo + a_lpg + a_kerosene + a_naphtha + a_petrol ); lognormal variance with pedigree 0.0427, pedigree (3,3,5,3,1)
  Average of plant data
  Uncertainty: Average of plant data

## Emissions to nature
- Hydrocarbons, unspecified [water, surface water]: 7.49188e-8 kg; = 1.55E-07/(0.3* m_bitumen + 0.3* m_hfo + 1.2* m_diesel + 1.2* m_lfo + 1.1* m_kerosene + 1.2* m_petrol + 1.2* m_naphtha + 1.2* m_lpg) * (0.3*a_bitumen + 0.3*a_hfo + 1.2*a_diesel + 1.2*a_lfo + 1.1*a_kerosene + 1.2*a_petrol + 1.2*a_naphtha + 1.2*a_lpg ); lognormal variance with pedigree 0.76, pedigree (1,1,5,1,1)
  Range for RER refineries
- Mercury [water, surface water]: 3.21332e-11 kg; = 5.66E-11 / t_weight *( a_bitumen + a_diesel + a_hfo + a_lfo + a_lpg + a_kerosene + a_naphtha + a_petrol ); lognormal variance with pedigree 0.7101, pedigree (3,5,5,3,1)
  Literature
  Uncertainty: Literature
- Butene [air, urban air close to ground]: 8.34555e-7 kg; = 1.47E-06 / t_weight *( a_bitumen + a_diesel + a_hfo + a_lfo + a_lpg + a_kerosene + a_naphtha + a_petrol ); lognormal variance with pedigree 0.1101, pedigree (3,5,5,3,1)
  Literature
  Uncertainty: Literature
- Butane [air, urban air close to ground]: 3.3439e-5 kg; = 5.89E-5 / t_weight *( a_bitumen + a_diesel + a_hfo + a_lfo + a_lpg + a_kerosene + a_naphtha + a_petrol ); lognormal variance with pedigree 0.1101, pedigree (3,5,5,3,1)
  Literature
  Uncertainty: Literature
- DOC, Dissolved Organic Carbon [water, surface water]: 1.77588e-8 kg; = 3.49E-08/(0.4* m_bitumen + 0.5* m_hfo + 1.1* m_diesel + 1.1* m_lfo + 1.0* m_kerosene + 1.1* m_petrol + 1.1* m_naphtha + 1.1* m_lpg) * (0.4*a_bitumen + 0.5*a_hfo + 1.1*a_diesel + 1.1*a_lfo + 1.0*a_kerosene + 1.1*a_petrol + 1.1*a_naphtha + 1.1*a_lpg ); lognormal variance with pedigree 0.082625, pedigree (2,4,5,2,1)
  Average of CH plant
  Uncertainty: Average of CH plant
- Heptane [air, urban air close to ground]: 8.34555e-6 kg; = 1.47E-05 / t_weight *( a_bitumen + a_diesel + a_hfo + a_lfo + a_lpg + a_kerosene + a_naphtha + a_petrol ); lognormal variance with pedigree 0.1101, pedigree (3,5,5,3,1)
  Literature
  Uncertainty: Literature
- PAH, polycyclic aromatic hydrocarbons [water, surface water]: 4.99447e-9 kg; = 8.95E-09/(0.9* m_bitumen + 0.9* m_hfo + 1* m_diesel + 1* m_lfo + 1* m_kerosene + 1* m_petrol + 1* m_naphtha + 1* m_lpg) * (0.9*a_bitumen + 0.9*a_hfo + 1*a_diesel + 1*a_lfo + 1*a_kerosene + 1*a_petrol + 1*a_naphtha + 1*a_lpg ); lognormal variance with pedigree 0.37, pedigree (1,1,5,1,1)
  Range for RER refineries
- Chromium, ion [water, surface water]: 7.33066e-8 kg; = 1.27E-07/(1* m_bitumen + 1.1* m_hfo + 1* m_diesel + 1* m_lfo + 0.9* m_kerosene + 1* m_petrol + 1* m_naphtha + 1* m_lpg) * (1*a_bitumen + 1.1*a_hfo + 1*a_diesel + 1*a_lfo + 0.9*a_kerosene + 1*a_petrol + 1*a_naphtha + 1*a_lpg ); lognormal variance with pedigree 0.2, pedigree (1,1,5,1,1)
  Range for RER refineries
- Ethane [air, urban air close to ground]: 8.34555e-6 kg; = 1.47E-05 / t_weight *( a_bitumen + a_diesel + a_hfo + a_lfo + a_lpg + a_kerosene + a_naphtha + a_petrol ); lognormal variance with pedigree 0.1101, pedigree (3,5,5,3,1)
  Literature
  Uncertainty: Literature
- Nitrogen, organic bound [water, surface water]: 3.61544e-6 kg; = 7.48E-06/(0.3* m_bitumen + 0.3* m_hfo + 1.2* m_diesel + 1.2* m_lfo + 1.1* m_kerosene + 1.2* m_petrol + 1.2* m_naphtha + 1.2* m_lpg) * (0.3*a_bitumen + 0.3*a_hfo + 1.2*a_diesel + 1.2*a_lfo + 1.1*a_kerosene + 1.2*a_petrol + 1.2*a_naphtha + 1.2*a_lpg ); lognormal variance with pedigree 0.28, pedigree (1,1,5,1,1)
  Range for RER refineries
- Cyanide [water, surface water]: 5.5637e-8 kg; = 9.8E-08 / t_weight *( a_bitumen + a_diesel + a_hfo + a_lfo + a_lpg + a_kerosene + a_naphtha + a_petrol ); lognormal variance with pedigree 0.81, pedigree (1,1,5,1,1)
  Range for RER refineries
- Zinc, ion [water, surface water]: 5.62787e-8 kg; = 9.75E-08/(1* m_bitumen + 1.1* m_hfo + 1* m_diesel + 1* m_lfo + 0.9* m_kerosene + 1* m_petrol + 1* m_naphtha + 1* m_lpg) * (1*a_bitumen + 1.1*a_hfo + 1*a_diesel + 1*a_lfo + 0.9*a_kerosene + 1*a_petrol + 1*a_naphtha + 1*a_lpg ); lognormal variance with pedigree 0.692625, pedigree (2,4,5,2,1)
  Average of CH plant
  Uncertainty: Average of CH plant
- Arsenic, ion [water, surface water]: 3.21332e-9 kg; = 5.66E-09 / t_weight *( a_bitumen + a_diesel + a_hfo + a_lfo + a_lpg + a_kerosene + a_naphtha + a_petrol ); lognormal variance with pedigree 0.7101, pedigree (3,5,5,3,1)
  Literature
  Uncertainty: Literature
- Sulfide [water, surface water]: 3.21332e-8 kg; = 5.66E-08 / t_weight *( a_bitumen + a_diesel + a_hfo + a_lfo + a_lpg + a_kerosene + a_naphtha + a_petrol ); lognormal variance with pedigree 1.37, pedigree (1,1,5,1,1)
  Range for RER refineries
- Dinitrogen monoxide [air, urban air close to ground]: 6.75592e-7 kg; = 1.19E-06 / t_weight *( a_bitumen + a_diesel + a_hfo + a_lfo + a_lpg + a_kerosene + a_naphtha + a_petrol ); lognormal variance with pedigree 0.082, pedigree (3,5,5,5,1)
  Average of plant data
  Distribution over co-products based on product masses.
  Uncertainty: Average of plant data
- Toluene [water, surface water]: 3.21332e-7 kg; = 5.66E-07 / t_weight *( a_bitumen + a_diesel + a_hfo + a_lfo + a_lpg + a_kerosene + a_naphtha + a_petrol ); lognormal variance with pedigree 0.3701, pedigree (3,5,5,3,1)
  Literature
  Uncertainty: Literature
- Cadmium, ion [water, surface water]: 3.21332e-9 kg; = 5.66E-09 / t_weight *( a_bitumen + a_diesel + a_hfo + a_lfo + a_lpg + a_kerosene + a_naphtha + a_petrol ); lognormal variance with pedigree 0.7101, pedigree (3,5,5,3,1)
  Literature
  Uncertainty: Literature
- Strontium [water, surface water]: 2.24819e-7 kg; = 3.96E-07 / t_weight *( a_bitumen + a_diesel + a_hfo + a_lfo + a_lpg + a_kerosene + a_naphtha + a_petrol ); lognormal variance with pedigree 0.7101, pedigree (3,5,5,3,1)
  Literature
  Uncertainty: Literature
- TOC, Total Organic Carbon [water, surface water]: 7.17475e-6 kg; = 1.41E-05/(0.4* m_bitumen + 0.5* m_hfo + 1.1* m_diesel + 1.1* m_lfo + 1.0* m_kerosene + 1.1* m_petrol + 1.1* m_naphtha + 1.1* m_lpg) * (0.4*a_bitumen + 0.5*a_hfo + 1.1*a_diesel + 1.1*a_lfo + 1.0*a_kerosene + 1.1*a_petrol + 1.1*a_naphtha + 1.1*a_lpg ); lognormal variance with pedigree 0.1101, pedigree (3,5,5,3,1)
  Estimation
  Uncertainty: Estimation
- Hydrocarbons, aromatic [air, urban air close to ground]: 3.81511e-13 kg; = 6.72E-13 / t_weight *( a_bitumen + a_diesel + a_hfo + a_lfo + a_lpg + a_kerosene + a_naphtha + a_petrol ); lognormal variance with pedigree 0.0813, pedigree (2,3,5,3,1)
  Average of plant data
  Uncertainty: Average of plant data
- Nitrogen oxides [air, urban air close to ground]: 1.28306e-5 kg; = 2.26E-5 / t_weight *( a_bitumen + a_diesel + a_hfo + a_lfo + a_lpg + a_kerosene + a_naphtha + a_petrol ); lognormal variance with pedigree 0.0806, pedigree (2,1,5,1,1)
  Swiss plants
  Distribution over co-products based on product masses.
  Uncertainty: Swiss plants
- Sulfate [water, surface water]: 6.30587e-5 kg; = 0.000113 /(0.9* m_bitumen + 0.9* m_hfo + 1* m_diesel + 1* m_lfo + 1* m_kerosene + 1* m_petrol + 1* m_naphtha + 1* m_lpg) * (0.9*a_bitumen + 0.9*a_hfo + 1*a_diesel + 1*a_lfo + 1*a_kerosene + 1*a_petrol + 1*a_naphtha + 1*a_lpg ); lognormal variance with pedigree 0.1101, pedigree (3,5,5,3,1)
  Literature
  Uncertainty: Literature
- Propene [air, urban air close to ground]: 1.66911e-6 kg; = 2.94E-6 / t_weight *( a_bitumen + a_diesel + a_hfo + a_lfo + a_lpg + a_kerosene + a_naphtha + a_petrol ); lognormal variance with pedigree 0.1101, pedigree (3,5,5,3,1)
  Literature
  Uncertainty: Literature
- Nitrate [water, surface water]: 2.63992e-6 kg; = 4.65E-06 / t_weight *( a_bitumen + a_diesel + a_hfo + a_lfo + a_lpg + a_kerosene + a_naphtha + a_petrol ); lognormal variance with pedigree 0.1101, pedigree (3,5,5,3,1)
  Literature
  Uncertainty: Literature
- Magnesium [water, surface water]: 8.00491e-6 kg; = 1.41E-05 / t_weight *( a_bitumen + a_diesel + a_hfo + a_lfo + a_lpg + a_kerosene + a_naphtha + a_petrol ); lognormal variance with pedigree 0.7101, pedigree (3,5,5,3,1)
  Literature
  Uncertainty: Literature
- AOX, Adsorbable Organic Halogen as Cl [water, surface water]: 4.99447e-9 kg; = 8.95E-09/(0.9* m_bitumen + 0.9* m_hfo + 1* m_diesel + 1* m_lfo + 1* m_kerosene + 1* m_petrol + 1* m_naphtha + 1* m_lpg) * (0.9*a_bitumen + 0.9*a_hfo + 1*a_diesel + 1*a_lfo + 1*a_kerosene + 1*a_petrol + 1*a_naphtha + 1*a_lpg ); lognormal variance with pedigree 0.37, pedigree (1,1,5,1,1)
  Range for RER refineries
- Boron [water, surface water]: 1.28306e-7 kg; = 2.26E-07 / t_weight *( a_bitumen + a_diesel + a_hfo + a_lfo + a_lpg + a_kerosene + a_naphtha + a_petrol ); lognormal variance with pedigree 0.1101, pedigree (3,5,5,3,1)
  Literature
  Uncertainty: Literature
- Phosphorus [water, surface water]: 1.24332e-7 kg; = 2.19E-07 / t_weight *( a_bitumen + a_diesel + a_hfo + a_lfo + a_lpg + a_kerosene + a_naphtha + a_petrol ); lognormal variance with pedigree 0.5, pedigree (1,1,5,1,1)
  Range for RER refineries
- Oils, unspecified [water, surface water]: 1.91405e-7 kg; = 3.96E-07/(0.3* m_bitumen + 0.3* m_hfo + 1.2* m_diesel + 1.2* m_lfo + 1.1* m_kerosene + 1.2* m_petrol + 1.2* m_naphtha + 1.2* m_lpg) * (0.3*a_bitumen + 0.3*a_hfo + 1.2*a_diesel + 1.2*a_lfo + 1.1*a_kerosene + 1.2*a_petrol + 1.2*a_naphtha + 1.2*a_lpg ); lognormal variance with pedigree 1.78, pedigree (1,1,5,1,1)
  Range for RER refineries
- t-Butyl methyl ether [water, surface water]: 4.0658e-8 kg; = 1.79E-07 * a_petrol / m_petrol; lognormal variance with pedigree 0.37, pedigree (1,1,5,1,1)
  Range for RER refineries
- Benzene, ethyl- [air, urban air close to ground]: 8.34555e-7 kg; = 1.47E-06 / t_weight *( a_bitumen + a_diesel + a_hfo + a_lfo + a_lpg + a_kerosene + a_naphtha + a_petrol ); lognormal variance with pedigree 0.1101, pedigree (3,5,5,3,1)
  Literature
  Uncertainty: Literature
- Phenol [water, surface water]: 7.32003e-8 kg; = 1.14E-07 /(1.4* m_bitumen + 1.7* m_hfo + 0.9* m_diesel + 0.9* m_lfo + 0.6* m_kerosene + 0.9* m_petrol + 0.9* m_naphtha + 0.9* m_lpg) * (1.4*a_bitumen + 1.7*a_hfo + 0.9*a_diesel + 0.9*a_lfo + 0.6*a_kerosene + 0.9*a_petrol + 0.9*a_naphtha + 0.9*a_lpg ); lognormal variance with pedigree 0.81, pedigree (1,1,5,1,1)
  Range for RER refineries
- Fluoride [water, surface water]: 1.43634e-6 kg; = 2.53E-06 / t_weight *( a_bitumen + a_diesel + a_hfo + a_lfo + a_lpg + a_kerosene + a_naphtha + a_petrol ); lognormal variance with pedigree 0.6, pedigree (1,1,5,1,1)
  Range for RER refineries
- Benzene, ethyl- [water, surface water]: 6.52553e-11 kg; = 1.13E-10 /(1.1* m_bitumen + 1.1* m_hfo + 1* m_diesel + 1* m_lfo + 0.9* m_kerosene + 1* m_petrol + 1* m_naphtha + 1* m_lpg) * (1.1*a_bitumen + 1.1*a_hfo + 1*a_diesel + 1*a_lfo + 0.9*a_kerosene + 1*a_petrol + 1*a_naphtha + 1*a_lpg ); lognormal variance with pedigree 0.3701, pedigree (3,5,5,3,1)
  Literature
  Uncertainty: Literature
- Selenium [water, surface water]: 4.81998e-9 kg; = 8.49E-09 / t_weight *( a_bitumen + a_diesel + a_hfo + a_lfo + a_lpg + a_kerosene + a_naphtha + a_petrol ); lognormal variance with pedigree 0.7101, pedigree (3,5,5,3,1)
  Literature
  Uncertainty: Literature
- BOD5, Biological Oxygen Demand [water, surface water]: 1.82167e-6 kg; = 3.58E-06/(0.4* m_bitumen + 0.5* m_hfo + 1.1* m_diesel + 1.1* m_lfo + 1.0* m_kerosene + 1.1* m_petrol + 1.1* m_naphtha + 1.1* m_lpg) * (0.4*a_bitumen + 0.5*a_hfo + 1.1*a_diesel + 1.1*a_lfo + 1.0*a_kerosene + 1.1*a_petrol + 1.1*a_naphtha + 1.1*a_lpg ); lognormal variance with pedigree 0.37, pedigree (1,1,5,1,1)
  Range for RER refineries
- Xylene [air, urban air close to ground]: 3.3439e-6 kg; = 5.89E-6 / t_weight *( a_bitumen + a_diesel + a_hfo + a_lfo + a_lpg + a_kerosene + a_naphtha + a_petrol ); lognormal variance with pedigree 0.1101, pedigree (3,5,5,3,1)
  Literature
  Uncertainty: Literature
- Barium [water, surface water]: 3.21332e-8 kg; = 5.66E-08 / t_weight *( a_bitumen + a_diesel + a_hfo + a_lfo + a_lpg + a_kerosene + a_naphtha + a_petrol ); lognormal variance with pedigree 0.7101, pedigree (3,5,5,3,1)
  Literature
  Uncertainty: Literature
- Ethene [air, urban air close to ground]: 1.66911e-6 kg; = 2.94E-6 / t_weight *( a_bitumen + a_diesel + a_hfo + a_lfo + a_lpg + a_kerosene + a_naphtha + a_petrol ); lognormal variance with pedigree 0.1101, pedigree (3,5,5,3,1)
  Literature
  Uncertainty: Literature
- Benzene [water, surface water]: 7.08713e-9 kg; = 1.27E-08 /(0.9* m_bitumen + 0.9* m_hfo + 1* m_diesel + 1* m_lfo + 1* m_kerosene + 1* m_petrol + 1* m_naphtha + 1* m_lpg) * (0.9*a_bitumen + 0.9*a_hfo + 1*a_diesel + 1*a_lfo + 1*a_kerosene + 1*a_petrol + 1*a_naphtha + 1*a_lpg ); lognormal variance with pedigree 3.65, pedigree (1,1,5,1,1)
  Range for RER refineries
- Aluminium [water, surface water]: 1.60666e-8 kg; = 2.83E-08 / t_weight *( a_bitumen + a_diesel + a_hfo + a_lfo + a_lpg + a_kerosene + a_naphtha + a_petrol ); lognormal variance with pedigree 0.7101, pedigree (3,5,5,3,1)
  Literature
  Uncertainty: Literature
- Sulfur dioxide [air, urban air close to ground]: 2.16303e-5 kg; = 3.81E-05 / t_weight *( a_bitumen + a_diesel + a_hfo + a_lfo + a_lpg + a_kerosene + a_naphtha + a_petrol ); lognormal variance with pedigree 0.0806, pedigree (2,1,5,1,1)
  (same comment as for Nitrogen oxides)
- Toluene [air, urban air close to ground]: 5.01301e-6 kg; = 8.83E-06 / t_weight *( a_bitumen + a_diesel + a_hfo + a_lfo + a_lpg + a_kerosene + a_naphtha + a_petrol ); lognormal variance with pedigree 0.1101, pedigree (3,5,5,3,1)
  Literature
  Uncertainty: Literature
- Manganese [water, surface water]: 6.41529e-8 kg; = 1.13E-07 / t_weight *( a_bitumen + a_diesel + a_hfo + a_lfo + a_lpg + a_kerosene + a_naphtha + a_petrol ); lognormal variance with pedigree 0.7101, pedigree (3,5,5,3,1)
  Literature
  Uncertainty: Literature
- Propane [air, urban air close to ground]: 3.3439e-5 kg; = 5.89E-5 / t_weight *( a_bitumen + a_diesel + a_hfo + a_lfo + a_lpg + a_kerosene + a_naphtha + a_petrol ); lognormal variance with pedigree 0.1101, pedigree (3,5,5,3,1)
  Literature
  Uncertainty: Literature
- Sodium, ion [water, surface water]: 9.65131e-5 kg; = 0.00017 / t_weight *( a_bitumen + a_diesel + a_hfo + a_lfo + a_lpg + a_kerosene + a_naphtha + a_petrol ); lognormal variance with pedigree 0.1101, pedigree (3,5,5,3,1)
  Literature
  Uncertainty: Literature
- Calcium, ion [water, surface water]: 1.60666e-5 kg; = 2.83E-05 / t_weight *( a_bitumen + a_diesel + a_hfo + a_lfo + a_lpg + a_kerosene + a_naphtha + a_petrol ); lognormal variance with pedigree 0.1101, pedigree (3,5,5,3,1)
  Literature
  Uncertainty: Literature
- Suspended solids, unspecified [water, surface water]: 3.21332e-6 kg; = 5.66E-06 / t_weight *( a_bitumen + a_diesel + a_hfo + a_lfo + a_lpg + a_kerosene + a_naphtha + a_petrol ); lognormal variance with pedigree 0.69, pedigree (1,1,5,1,1)
  Range for RER refineries
- Lead [water, surface water]: 1.01623e-7 kg; = 1.79E-07 / t_weight *( a_bitumen + a_diesel + a_hfo + a_lfo + a_lpg + a_kerosene + a_naphtha + a_petrol ); lognormal variance with pedigree 0.6912, pedigree (2,3,5,1,1)
  Range for RER refineries
  Uncertainty: Range for RER refineries
- Ammonia [air, urban air close to ground]: 4.17277e-8 kg; = 7.35E-08 / t_weight *( a_bitumen + a_diesel + a_hfo + a_lfo + a_lpg + a_kerosene + a_naphtha + a_petrol ); lognormal variance with pedigree 0.0941, pedigree (3,4,5,3,1)
  Plant data
  Uncertainty: Plant data
- Copper, ion [water, surface water]: 3.26705e-9 kg; = 5.66E-09/(1* m_bitumen + 1.1* m_hfo + 1* m_diesel + 1* m_lfo + 0.9* m_kerosene + 1* m_petrol + 1* m_naphtha + 1* m_lpg) * (1*a_bitumen + 1.1*a_hfo + 1*a_diesel + 1*a_lfo + 0.9*a_kerosene + 1*a_petrol + 1*a_naphtha + 1*a_lpg ); lognormal variance with pedigree 0.7101, pedigree (3,5,5,3,1)
  Literature
  Uncertainty: Literature
- Iron, ion [water, surface water]: 1.60666e-7 kg; = 2.83E-07 / t_weight *( a_bitumen + a_diesel + a_hfo + a_lfo + a_lpg + a_kerosene + a_naphtha + a_petrol ); lognormal variance with pedigree 0.7101, pedigree (3,5,5,3,1)
  Literature
  Uncertainty: Literature
- Potassium, ion [water, surface water]: 3.21332e-6 kg; = 5.66E-06 / t_weight *( a_bitumen + a_diesel + a_hfo + a_lfo + a_lpg + a_kerosene + a_naphtha + a_petrol ); lognormal variance with pedigree 0.1101, pedigree (3,5,5,3,1)
  Literature
  Uncertainty: Literature
- Hydrocarbons, aliphatic, alkanes, unspecified [air, urban air close to ground]: 2.54341e-11 kg; = 4.48E-11 / t_weight *( a_bitumen + a_diesel + a_hfo + a_lfo + a_lpg + a_kerosene + a_naphtha + a_petrol ); lognormal variance with pedigree 0.0813, pedigree (2,3,5,3,1)
  Average of plant data
  Uncertainty: Average of plant data
- Vanadium, ion [water, surface water]: 9.8127e-9 kg; = 1.7E-08/(1* m_bitumen + 1.1* m_hfo + 1* m_diesel + 1* m_lfo + 0.9* m_kerosene + 1* m_petrol + 1* m_naphtha + 1* m_lpg) * (1*a_bitumen + 1.1*a_hfo + 1*a_diesel + 1*a_lfo + 0.9*a_kerosene + 1*a_petrol + 1*a_naphtha + 1*a_lpg ); lognormal variance with pedigree 0.7101, pedigree (3,5,5,3,1)
  Literature
  Uncertainty: Literature
- COD, Chemical Oxygen Demand [water, surface water]: 1.66885e-5 kg; = 3.46E-05 /(0.2* m_bitumen + 0.3* m_hfo + 1.2* m_diesel + 1.2* m_lfo + 1* m_kerosene + 1.2* m_petrol + 1.2* m_naphtha + 1.2* m_lpg) * (0.2*a_bitumen + 0.3*a_hfo + 1.2*a_diesel + 1.2*a_lfo + 1*a_kerosene + 1.2*a_petrol + 1.2*a_naphtha + 1.2*a_lpg ); lognormal variance with pedigree 0.17, pedigree (1,1,5,1,1)
  Range for RER refineries
- Pentane [air, urban air close to ground]: 4.17845e-5 kg; = 7.36E-05 / t_weight *( a_bitumen + a_diesel + a_hfo + a_lfo + a_lpg + a_kerosene + a_naphtha + a_petrol ); lognormal variance with pedigree 0.1101, pedigree (3,5,5,3,1)
  Literature
  Uncertainty: Literature
- Hydrocarbons, aliphatic, unsaturated [air, urban air close to ground]: 1.3966e-12 kg; = 2.46E-12 / t_weight *( a_bitumen + a_diesel + a_hfo + a_lfo + a_lpg + a_kerosene + a_naphtha + a_petrol ); lognormal variance with pedigree 0.0813, pedigree (2,3,5,3,1)
  Average of plant data
  Uncertainty: Average of plant data
- Ammonium, ion [water, surface water]: 1.72661e-6 kg; = 3.39E-06/(0.5* m_bitumen + 0.5* m_hfo + 1.1* m_diesel + 1.1* m_lfo + 1* m_kerosene + 1.1* m_petrol + 1.1* m_naphtha + 1.1* m_lpg) * (0.5*a_bitumen + 0.5*a_hfo + 1.1*a_diesel + 1.1*a_lfo + 1*a_kerosene + 1.1*a_petrol + 1.1*a_naphtha + 1.1*a_lpg ); lognormal variance with pedigree 0.89, pedigree (1,1,5,1,1)
  Range for RER refineries
- Hexane [air, urban air close to ground]: 1.66911e-5 kg; = 2.94E-5 / t_weight *( a_bitumen + a_diesel + a_hfo + a_lfo + a_lpg + a_kerosene + a_naphtha + a_petrol ); lognormal variance with pedigree 0.1101, pedigree (3,5,5,3,1)
  Literature
  Uncertainty: Literature
- Nickel, ion [water, surface water]: 4.2409e-9 kg; = 7.47E-09 / t_weight *( a_bitumen + a_diesel + a_hfo + a_lfo + a_lpg + a_kerosene + a_naphtha + a_petrol ); lognormal variance with pedigree 0.692625, pedigree (2,4,5,2,1)
  Average of CH plant
  Uncertainty: Average of CH plant
- Methane, fossil [air, urban air close to ground]: 9.36745e-6 kg; = 1.65E-05 / t_weight *( a_bitumen + a_diesel + a_hfo + a_lfo + a_lpg + a_kerosene + a_naphtha + a_petrol ); lognormal variance with pedigree 0.092, pedigree (3,5,5,5,1)
  Average of plant data
  Uncertainty: Average of plant data
- Molybdenum [water, surface water]: 3.21332e-9 kg; = 5.66E-09 / t_weight *( a_bitumen + a_diesel + a_hfo + a_lfo + a_lpg + a_kerosene + a_naphtha + a_petrol ); lognormal variance with pedigree 0.7101, pedigree (3,5,5,3,1)
  Literature
  Uncertainty: Literature
- Hydrocarbons, aromatic [water, surface water]: 2.31064e-7 kg; = 4.07E-07 / t_weight *( a_bitumen + a_diesel + a_hfo + a_lfo + a_lpg + a_kerosene + a_naphtha + a_petrol ); lognormal variance with pedigree 0.3412, pedigree (2,3,5,1,1)
  Average of plant data
  Uncertainty: Average of plant data
- Xylene [water, surface water]: 3.21332e-8 kg; = 5.66E-08 / t_weight *( a_bitumen + a_diesel + a_hfo + a_lfo + a_lpg + a_kerosene + a_naphtha + a_petrol ); lognormal variance with pedigree 0.3701, pedigree (3,5,5,3,1)
  Literature
  Uncertainty: Literature
- Benzene [air, urban air close to ground]: 3.3439e-6 kg; = 5.89E-6 / t_weight *( a_bitumen + a_diesel + a_hfo + a_lfo + a_lpg + a_kerosene + a_naphtha + a_petrol ); lognormal variance with pedigree 0.1101, pedigree (3,5,5,3,1)
  Literature
  Uncertainty: Literature
- Silver, ion [water, surface water]: 1.60666e-8 kg; = 2.83E-08 / t_weight *( a_bitumen + a_diesel + a_hfo + a_lfo + a_lpg + a_kerosene + a_naphtha + a_petrol ); lognormal variance with pedigree 0.7101, pedigree (3,5,5,3,1)
  Literature
  Uncertainty: Literature
- Chloride [water, surface water]: 2.55476e-5 kg; = 4.5E-05 / t_weight *( a_bitumen + a_diesel + a_hfo + a_lfo + a_lpg + a_kerosene + a_naphtha + a_petrol ); lognormal variance with pedigree 0.692625, pedigree (2,4,5,2,1)
  Average of CH plant, basic uncertainity = 5 estimated based on range
  Uncertainty: Average of CH plant, basic uncertainity = 5 estimated based on range
- Particulates, > 10 um [air, urban air close to ground]: 5.67724e-6 kg; = 1E-05 / t_weight *( a_bitumen + a_diesel + a_hfo + a_lfo + a_lpg + a_kerosene + a_naphtha + a_petrol ); lognormal variance with pedigree 0.1901, pedigree (3,5,5,3,1)
  Literature
  Uncertainty: Literature

## Sampling procedure
Questionnaires and literature.

## Review by Bo Weidema 2012-03-18
Passed for upload to database, in order to enable calculation check. The dataset will later be re/submitted for a more thorough review.

## Review by Michael Spielmann (obsolete) 2004-07-01
Passed.
