# pig iron production

Dataset: EcoSpold 2, unit process
Geography: IN
Time period: 2010-01-01 to 2021-12-31
Technology level: current
Classification: ISIC rev.4 ecoinvent: 2410:Manufacture of basic iron and steel
Classification: EcoSpold01Categories: metals/extraction
Synonyms: hot metal
Scenario: Business-as-Usual
System model: Allocation, cut-off by classification
Share of production covered: 34 %
Generated by: Harshita Soni
Published in: Soni H. 2017
Database: ecoinvent
isCopyrightProtected: true
accessRestrictedTo: 1

## General comment
The following excerpts have been taken from the report by Indian Minerals Yearbook 2015 -

"India is an important producer of pig iron. Post-liberalisation, with setting up of several units in the Private Sector, not only imports have drastically reduced but also India has turned out to be a net exporter of pig iron.

The Private Sector accounted for 91% of total production for sale of pig iron in the country in 2014-15. The production for sale of pig iron has increased from 1.6 million tonnes in April 1991- March 1992 to
9.69 million tonnes in
April 2014-March 2015. The production of hot metal for the year April 2015- March 2016 was 58,703,000 tonnes.
Pig iron has a very high carbon content, typically 3.5–4.5%, along with silica and other constituents of dross, which makes it very brittle, and not useful directly as a material except for limited applications. Pig iron is made by smelting iron ore into a transportable ingot of impure high carbon-content iron in a blast furnace as an ingredient for further processing steps."
References: Indian Minerals
Yearbook 2015

## Included activities start
This dataset contains information for pig iron production in a Blast Furnance, intermediate process in steel production. This activity starts when raw material are delivered to the blast furnace.

## Included activities end
This activity ends at the exit of the blast furnace process.

## Geography
Data collected from integrated steel plants in India

## Technology
Blast furnace process
The blast furnace is a reactor in which materials like coke, iron ore, additives descend and react with ascending gases. In the upper part of the furnace moisture is removed and hydrates and carbonates are separated. In the lower part of the furnace, at a temperature of about 70-1000 C, iron oxides are reduced (indirect reduction) by carbon dioxide and hydrogen. At the bottom most part of the furnace, at around 1000-1600 C, direct reduction of iron oxides takes place resulting in molten iron and slag as output. Hot air blasts are sent at the bottom where coke reacts with the oxygen and steam to form carbon monoxide and hydrogen and the iron and slag melt. This is the hottest part of the blast furnace at 1850-2200 C. The two outputs – slag and molten iron are collected in a hearth. Pig iron manufacturers sell the molten iron as ingots while integrated steel plants send the molten iron or hot metal in ladle cars to steel converters. The blast furnace slag is used for cement production.

Excerpts from Steel.org on pig iron production by Blast Furnace

"The purpose of a blast furnace is to chemically reduce and physically convert iron oxides into liquid iron called "hot metal". The blast furnace is a huge, steel stack lined with refractory brick, where iron ore, coke and limestone are dumped into the top, and preheated air is blown into the bottom. The raw materials require 6 to 8 hours to descend to the bottom of the furnace where they become the final product of liquid slag and liquid iron. These liquid products are drained from the furnace at regular intervals. The hot air that was blown into the bottom of the furnace ascends to the top in 6 to 8 seconds after going through numerous chemical reactions.

Once a blast furnace is started it will continuously run for four to ten years with only short stops to perform planned maintenance.
Iron oxides can come to the blast furnace plant in the form of raw ore, pellets or sinter. The raw ore is removed from the earth and sized into pieces that range from 0.5 to 1.5 inches. This ore is either Hematite (Fe2O3) or Magnetite (Fe3O4) and the iron content ranges from 50% to 70%. This iron rich ore can be charged directly into a blast furnace without any further processing. Iron ore that contains a lower iron content must be processed or beneficiated to increase its iron content. Pellets are produced from this lower iron content ore. This ore is crushed and ground into a powder so the waste material called gangue can be removed. The remaining iron-rich powder is rolled into balls and fired in a furnace to produce strong, marble-sized pellets that contain 60% to 65% iron.
Sinter is produced from fine raw ore, small coke, sand-sized limestone and numerous other steel plant waste materials that contain some iron. These fine materials are proportioned to obtain a desired product chemistry then mixed together. This raw material mix is then placed on a sintering strand, which is similar to a steel conveyor belt, where it is ignited by gas fired furnace and fused by the heat from the coke fines into larger size pieces that are from 0.5 to 2.0 inches. The iron ore, pellets and sinter then become the liquid iron produced in the blast furnace with any of their remaining impurities going to the liquid slag.

The coke is produced from a mixture of coals. The coal is crushed and ground into a powder and then charged into an oven. As the oven is heated the coal is cooked so most of the volatile matter such as oil and tar are removed. The cooked coal, called coke, is removed from the oven after 18 to 24 hours of reaction time. The coke is cooled and screened into pieces ranging from one inch to four inches. The coke contains 90 to 93% carbon, some ash and sulfur but compared to raw coal is very strong. The strong pieces of coke with a high energy value provide permeability, heat and gases which are required to reduce and melt the iron ore, pellets and sinter.

The final raw material in the ironmaking process in limestone. The limestone is removed from the earth by blasting with explosives. It is then crushed and screened to a size that ranges from 0.5 inch to 1.5 inch to become blast furnace flux . This flux can be pure high calcium limestone, dolomitic limestone containing magnesia or a blend of the two types of limestone.

Since the limestone is melted to become the slag which removes sulfur and other impurities, the blast furnace operator may blend the different stones to produce the desired slag chemistry and create optimum slag properties such as a low melting point and a high fluidity.

All of the raw materials are stored in an ore field and transferred to the stockhouse before charging.

Once these materials are charged into the furnace top, they go through numerous chemical and physical reactions while descending to the bottom of the furnace.

The iron ore, pellets and sinter are reduced which simply means the oxygen in the iron oxides is removed by a series of chemical reactions. These reactions occur as follows:

1) 3 Fe2O3 + CO = CO2 + 2 Fe3O4 Begins at 850° F
2) Fe3O4 + CO = CO2 + 3 FeO Begins at 1100° F
3) FeO + CO = CO2 + Fe
or
FeO + C = CO + Fe Begins at 1300° F
At the same time the iron oxides are going through these purifying reactions, they are also beginning to soften then melt and finally trickle as liquid iron through the coke to the bottom of the furnace.

The coke descends to the bottom of the furnace to the level where the preheated air or hot blast enters the blast furnace. The coke is ignited by this hot blast and immediately reacts to generate heat as follows:

C + O2 = CO2 + Heat

Since the reaction takes place in the presence of excess carbon at a high temperature the carbon dioxide is reduced to carbon monoxide as follows:

CO2+ C = 2CO

The product of this reaction, carbon monoxide, is necessary to reduce the iron ore as seen in the previous iron oxide reactions.

The limestone descends in the blast furnace and remains a solid while going through its first reaction as follows:

CaCO3 = CaO + CO2

This reaction requires energy and starts at about 1600°F. The CaO formed from this reaction is used to remove sulfur from the iron which is necessary before the hot metal becomes steel. This sulfur removing reaction is:

FeS + CaO + C = CaS + FeO + CO

The CaS becomes part of the slag. The slag is also formed from any remaining Silica (SiO2), Alumina (Al2O3), Magnesia (MgO) or Calcia (CaO) that entered with the iron ore, pellets, sinter or coke. The liquid slag then trickles through the coke bed to the bottom of the furnace where it floats on top of the liquid iron since it is less dense.

Another product of the ironmaking process, in addition to molten iron and slag, is hot dirty gases. These gases exit the top of the blast furnace and proceed through gas cleaning equipment where particulate matter is removed from the gas and the gas is cooled. This gas has a considerable energy value so it is burned as a fuel in the "hot blast stoves" which are used to preheat the air entering the blast furnace to become "hot blast". Any of the gas not burned in the stoves is sent to the boiler house and is used to generate steam which turns a turbo blower that generates the compressed air known as "cold blast" that comes to the stoves. In summary, the blast furnace is a counter-current realtor where solids descend and gases ascend. In this reactor there are numerous chemical and physical reactions that produce the desired final product which is hot metal."
References: http://www.steel.org/making-steel/how-its-made/processes/how-a-blast-furnace-works.aspx

## Time period
The data was collected in 2016-17.

## Parameters
- fraction, process water, to air: 0.2 dimensionless; name fraction_PW_to_air; lognormal variance with pedigree 0.092025, pedigree (4,4,3,2,4)
  Literature value (Statistics Canada, 2007 & Shaffer, K.H., 2008, Consumptive water use in the Great Lakes Basin, USGS) (Vionnet, S., Quantis Water Database - Technical Report, 2012).

## Reference product
- pig iron: 1 kg; name RP_amount; By-product classification allocatable product; CPC 41111: Pig iron and spiegeleisen in pigs, blocks or other primary forms
  Based on data received from integrated steel plants in India
  EcoSpold01Location=GLO
  production volume 7.4156e10 kg; name RP_PV
    Source: worldsteel, 2020; data for 2019.
    References
    worldsteel (2020). Steel Statistical Yearbook 2020 [online].Available from: https://www.worldsteel.org/en/dam/jcr:5001dac8-0083-46f3-aadd-35aa357acbcc/Steel%2520Statistical%2520Yearbook%25202020%2520%2528concise%2520version%2529.pdf (accessed 20.07.2021).
  property carbon content, fossil 0.045
    Pig iron is the iron produced in the blast furnace. It is an alloy of 94% Fe and more than 2% C (world average 4.5%). (ecoinvent v2.2 report 10_partII)
  property price 0.243 EUR2005
    From Undata http://data.un.org/Data.aspx?q=pig+iron&d=ComTrade&f=_l1Code%3a73%3bcmdCode%3a720120; assumed to be pig iron non-alloy with >0.5% phosphorus because there is no refining process involved in this product. 2003 data includes only EU, China and India - no data from USA and Japan in the UN database for this year.
  property heating value, net 0 MJ
    Non combustible products are assumed to have an LHV equal to zero (0).
  property carbon content 0.045
    carbon content on a dry matter basis (reserved; not for manual entry)
  properties: wet mass 1 kg, dry mass 1 kg, water content 0, water in wet mass 0 kg, carbon content, non-fossil 0, carbon allocation 0.045 kg

## By-products
- blast furnace slag: 0 kg; By-product classification Recyclable; CPC 39310: Slag, dross, scalings and other waste from the manufacture of iron or steel; pedigree (1,1,1,1,1)
  Based on data received from integrated steel plants in India
  production volume 0 kg; = BFS_amount * RP_PV / RP_amount
    Calculated from production volume of reference product using the relative outputs.
  property price 0 EUR2005; name BFS_amount_price_EUR2005
    Assumed without economic value
  property carbon content, fossil 0
    Industry value; Arcelor Mittal, chemical composition of blast furnace slag (http://www.cst.com.br/english/products/co_products/catalog_products/blast_slag/blast_slag.asp, accessed: 20121003).
  property water content 0; name water_content
  property heating value, net 0 MJ
    Non combustible products are assumed to have an LHV equal to zero (0).
  property carbon content 0
    carbon content on a dry matter basis (reserved; not for manual entry)
  properties: carbon content, non-fossil 0, water in wet mass 0 kg, wet mass 1 kg, dry mass 1 kg, carbon allocation 0 kg
- blast furnace gas: 0 MJ; CPC 17200: Coal gas, water gas, producer gas and similar gases, other than petroleum gases and other gaseous hydrocarbons; By-product classification Recyclable; pedigree (1,1,1,1,1)
  Based on data received from integrated steel plants in India. This value corresponds to the net output. 0.45 MJ of BF gas is used as input and 4.79 MJ of BF gas is generated as output. So the net BF gas of 4.34 MJ is entered as byproduct.
  production volume 0 MJ; = BFG_amount * RP_PV / RP_amount
    Calculated from production volume of reference product using the relative outputs.
  property price 0.004 EUR2005
    Temporary price data. Calculated as 90% of purchasers price based on: Same price as natural gas per MJ
  property carbon content 0.156611
    carbon content on a dry matter basis (reserved; not for manual entry)
  properties: dry mass 0.367647 kg, wet mass 0.367647 kg, water in wet mass 0 kg, carbon content, non-fossil 0, water content 0, carbon content, fossil 0.156611, carbon allocation 0.0575774 kg

## Inputs from technosphere
- electricity, medium voltage: 4.4e-5 kWh; lognormal variance with pedigree 0.0058, pedigree (3,3,3,1,2)
  Based on data received from integrated steel plants in India
- oxygen, liquid: 0.0535 kg; lognormal variance with pedigree 0.0058, pedigree (3,3,3,1,2)
  Based on data received from integrated steel plants in India
  properties: wet mass 1 kg, dry mass 1 kg
- sponge iron: 3.5e-6 kg; lognormal variance with pedigree 0.0058, pedigree (3,3,3,1,2)
  Based on data received from integrated steel plants in Inida
  properties: heating value, net 3.03 MJ, carbon content, fossil 0.1, dry mass 1 kg, iron content 0.82, sulfur content 0.03, wet mass 1 kg, phosphorus content 0.05
- blast furnace sludge: -0.016 kg; name sludge_amount; lognormal variance with pedigree 0.3052, pedigree (3,3,3,1,2)
  Based on data received from integrated steel plants in India
  EcoSpold01Location=CH
  production volume 1.1865e9 kg; = sludge_amount*RP_PV/RP_amount
    Calculated from the production volume of pig iron in proportion to the respective output amounts.
  property price 0 EUR2005; name sludge_amount_price_EUR2005
  properties: dry mass 0.914 kg, carbon content, fossil 0.339168, water content 0.0940919, wet mass 1 kg
- blast furnace: 1.3333e-11 unit; lognormal variance with pedigree 0.2952, pedigree (3,3,3,1,2)
  EcoSpold01Location=RER
  Based on ecoinvent dataset " pig iron production, GLO" accessed through ecoeditor on 20170815
- coke: 13.025 MJ; lognormal variance with pedigree 0.005825, pedigree (3,3,3,2,2)
  EcoSpold01Location=RER
  Based on data received from integrated steel plants in India
  properties: wet mass 0.034965 kg, carbon content, fossil 0.869149, water content 0.0638298, dry mass 0.0328671 kg, heating value, net 28.6 MJ
  note on carbon content, fossil: 81.7% C and 6% water in wet mass (ecoinvent v2.1 report 6_VI Table 7.1)
- dolomite: 0.00295772 kg; lognormal variance with pedigree 0.0058, pedigree (3,3,3,1,2)
  Based on data received from integrated steel plants in India
  properties: dry mass 1 kg, carbon content, fossil 0.130435, wet mass 1 kg, heating value, net 3.95 MJ
- steam, in chemical industry: 0.145 kg; lognormal variance with pedigree 0.0058, pedigree (3,3,3,1,2)
  Based on data received from integrated steel plants in India
  properties: dry mass 1 kg, wet mass 1 kg
- nitrogen, liquid: 0.0313 kg; lognormal variance with pedigree 0.0058, pedigree (3,3,3,1,2)
  Based on data received from integrated steel plants in India
  properties: dry mass 1 kg, wet mass 1 kg
- heat, district or industrial, other than natural gas: 0.0565 MJ; lognormal variance with pedigree 0.0058, pedigree (3,3,3,1,2)
  Based on data received from integrated steel plants in India
  properties: corresponding fuel use, propane, furnace >100kW 1.05263 MJ, heating value, net 1 MJ
  note on corresponding fuel use, propane, furnace >100kW: Lower heating value of the fuel input related to the heat/electricity output, taken directly from ecoinvent v3.0 dataset "heat production, natural gas, at industrial furnace >100kW, GLO 2000".
- limestone, unprocessed: 0.00267 kg; lognormal variance with pedigree 0.043825, pedigree (3,3,5,2,2)
  EcoSpold01Location=CH
  Based on data received from integrated steel plants in India
  properties: wet mass 1 kg, carbon content, fossil 0.117257, water content 0.00200401, dry mass 0.998 kg
  note on carbon content, fossil: Table 3.1, ecoinvent v2.2 report 7, part VII, pg 3. MW CaCO3=100, MW MgCO3=84. C content of limestone is 0.117257 kg/kg DM
- diesel: 5.99283e-6 kg; lognormal variance with pedigree 0.0058, pedigree (3,3,3,1,2)
  Based on data received from integrated steel plants in Inida
  properties: wet mass 1 kg, carbon content, fossil 0.865, dry mass 1 kg, heating value, net 42.8 MJ
  note on carbon content, fossil: C-content of diesel is 86.5% (ecoinvent v2.2 report 6_IV, Tab 3.14)
- iron ore concentrate: 0.3039 kg; lognormal variance with pedigree 0.0058, pedigree (3,3,3,1,2)
  Based on data received from integrated steel plants in India
  EcoSpold01Location=GLO
  properties: dry mass 1 kg, wet mass 1 kg
- iron pellet: 0.396 kg; lognormal variance with pedigree 0.0058, pedigree (3,3,3,1,2)
  EcoSpold01Location=GLO
  Based on data received from integrated steel plants in India
  properties: wet mass 1 kg, dry mass 1 kg
- wastewater from pig iron production: -0.000590656 m3; name wastewater_amount; = (water_UNO_input*(1 - fraction_PW_to_air))*-1; lognormal variance with pedigree 0.0452, pedigree (3,3,3,1,2)
  It is assumed that 80% of water consumed as input to the process is sent out as wastewater for treatment. The wastewater after treatment is recycled and reused again in the process.
  production volume 4.38007e7 m3; = wastewater_amount * RP_PV / RP_amount
    Calculated from production volume of reference product using the relative outputs.
  property price 0 EUR2005; name wastewater_amount_price_EUR2005
  properties: dry mass 0.337476 kg, water content 2962.17, carbon content, fossil 1.2149e-5, wet mass 1000 kg
- hard coal: 1.6e-9 kg; lognormal variance with pedigree 0.0058, pedigree (3,3,3,1,2)
  Based on data received from integrated steel plants in India
  properties: dry mass 0.94 kg, carbon content, fossil 0.845, heating value, net 27.91 MJ, water content 0.0638298, wet mass 1 kg
  note on carbon content, fossil: C content 75-94% (specified in Tab 1.1, report 6, part VI). A mean content of 0.845 kg C/ kg dry hard coal was considered
  note on heating value, net: Based on the Characterization factor of Hard coal in the CED method
- iron sinter: 0.92 kg; lognormal variance with pedigree 0.0058, pedigree (3,3,3,1,2)
  Based on data received from integrated steel plants in India
  EcoSpold01Location=GLO
  properties: wet mass 1 kg, dry mass 1 kg
- blast furnace slag: -0.403 kg; lognormal variance with pedigree 0.0302, pedigree (3,3,3,1,2)
  Based on data received from integrated steel plants in India
  production volume 2.98849e10 kg
  properties: wet mass 1 kg, dry mass 1 kg
- blast furnace gas: -4.34 MJ; lognormal variance with pedigree 0.0302, pedigree (3,3,3,1,2)
  (same comment as for blast furnace gas)
  production volume 3.21837e11 MJ
  properties: dry mass 0.367647 kg, wet mass 0.367647 kg, price 0.004 EUR2005, carbon content, fossil 0.156611

## Inputs from nature
- Water, unspecified natural origin [natural resource, in ground]: 0.00073832 m3; name water_UNO_input; lognormal variance with pedigree 0.0152, pedigree (3,3,3,1,2)
  Based on data received from integrated steel plants in India

## Emissions to nature
- Water [air, unspecified]: 0.000147664 m3; = (water_UNO_input*fraction_PW_to_air); lognormal variance with pedigree 0.0452, pedigree (3,3,3,1,2)
  Based on the formula given in ecoinvent dataset " pig iron production, GLO" accessed through ecoeditor on 20170815
- Manganese [air, unspecified]: 7.4468e-8 kg; lognormal variance with pedigree 0.6552, pedigree (3,3,3,1,2)
  Based on ecoinvent dataset " pig iron production, GLO" accessed through ecoeditor on 20170815
- Hydrogen sulfide [air, unspecified]: 1.0745e-5 kg; lognormal variance with pedigree 0.0452, pedigree (3,3,3,1,2)
  (same comment as for Manganese)
- Nitrogen oxides [air, unspecified]: 7.9787e-5 kg; lognormal variance with pedigree 0.0452, pedigree (3,3,3,1,2)
  (same comment as for Manganese)
- Dioxins, measured as 2,3,7,8-tetrachlorodibenzo-p-dioxin [air, unspecified]: 2.6596e-15 kg; lognormal variance with pedigree 0.3052, pedigree (3,3,3,1,2)
  (same comment as for Manganese)
- Nickel [air, unspecified]: 1.5957e-8 kg; lognormal variance with pedigree 0.6552, pedigree (3,3,3,1,2)
  (same comment as for Manganese)
- Carbon dioxide, fossil [air, unspecified]: 0.2025 kg; lognormal variance with pedigree 0.0452, pedigree (3,3,3,1,2)
  Based on amount and types of fuel inputs and outputs
- Particulates, < 2.5 um [air, unspecified]: 2.8723e-5 kg; lognormal variance with pedigree 0.3052, pedigree (3,3,3,1,2)
  (same comment as for Manganese)
- Lead [air, unspecified]: 6.9149e-8 kg; lognormal variance with pedigree 0.0152, pedigree (3,3,3,1,2)
  (same comment as for Manganese)
- Sulfur dioxide [air, unspecified]: 0.00013298 kg; lognormal variance with pedigree 0.0452, pedigree (3,3,3,1,2)
  (same comment as for Manganese)
- Particulates, > 10 um [air, unspecified]: 1.5957e-6 kg; lognormal variance with pedigree 0.0452, pedigree (3,3,3,1,2)
  (same comment as for Manganese)
- Carbon monoxide, fossil [air, unspecified]: 0.0013404 kg; lognormal variance with pedigree 0.6552, pedigree (3,3,3,1,2)
  (same comment as for Manganese)
- Particulates, > 2.5 um, and < 10um [air, unspecified]: 1.5957e-6 kg; lognormal variance with pedigree 0.1252, pedigree (3,3,3,1,2)
  (same comment as for Manganese)

## Sampling procedure
The data has been collected from two integrated steel plants in India. The data collected represents approximately 34% of hot metal manufactured in the country.
Total Hot Metal Manufactured in India from April 2015- March 2016: 58,703,000 tonnes

Data collected for LCI: 19,721,978 tonnes

## Extrapolations
This dataset has been extrapolated from year 2017 to the year of the calculation (2021). The uncertainty has been adjusted accordingly.

## Review by Louis Brimacombe 2017-10-26
There is usually a small quantity of either cyanide or ammonia in the gas washing effluent from the blast furnace which is not entered here, but in LCA terms this is in such small quantities that it is toxicologically insignificant.. It may however become significant in terms of local compliance if local regulators set an emission limit for either CN or NH3 in effluent discharges as is happening in Europe.
