# brass production

Dataset: EcoSpold 2, unit process
Geography: RoW
Time period: 2000-01-01 to 2021-12-31
Technology level: current
Classification: EcoSpold01Categories: metals/extraction
Classification: ISIC rev.4 ecoinvent: 2420:Manufacture of basic precious and other non-ferrous metals
Tags: ConvertedDataset
Scenario: Business-as-Usual
System model: Allocation, cut-off by classification
Generated by: Hans-Jörg Althaus
Published in: Althaus H.-J. 2000
Database: ecoinvent
isCopyrightProtected: true
accessRestrictedTo: 1

## General comment
Stands for brass with 70% Cu and 30% Zn. All data are calculated based on assumptions and theoretical models. Their overall quality is poor.
[This dataset was already contained in the ecoinvent database version 2. It was not individually updated during the transfer to ecoinvent version 3. Life Cycle Impact Assessment results may still have changed, as they are affected by changes in the supply chain, i.e. in other datasets. This dataset was generated following the ecoinvent quality guidelines for version 2. It may have been subject to central changes described in the ecoinvent version 3 change report (http://www.ecoinvent.org/database/ecoinvent-version-3/reports-of-changes/), and the results of the central updates were reviewed extensively. The changes added e.g. consistent water flows and other information throughout the database. The documentation of this dataset can be found in the ecoinvent reports of version 2, which are still available via the ecoinvent website. The change report linked above covers all central changes that were made during the conversion process.]

## Included activities end
copper and zinc including their melting and casting of brass ingots

## Geography
Production data relate to the European average. Transports of inputs relate to the consumption in Switzerland

## Technology
Assumed energy mix for melting. Abatement of air emissions assumed

## Reference product
- brass: 1 kg; By-product classification allocatable product; CPC 4: Metal products, machinery and equipment; CAS 86376-49-0
  EcoSpold01Location=CH
  production volume 6.8655e9 kg
    Volume of Cu in brass estimated to 23% of global Cu consumption, based on global shares reported in Joseph G (1999) Copper: its trade, manufacture, use, and environmental status. Materials Park: ASM International. 70% Cu content in brass.
  property price 2.8513 EUR2005
    Calculated based on inputs: The price of the product has been calculated as a sum of the values of the material and energy inputs for this product. This value is therefore a rough estimation. It may underestimate the real price since there are additional expenses when producing any product. These expences can include for example labour costs, treatment of waste materials and profit for the producer. Please consider carefully whether this level of data quality is acceptable for your application. Cross reference; Calculated value based on data from United Nations Commodity Trade Statistics Database (comtrade.un.org) is 2.4 Euro/kg. UN comtrade category: 740721 Bars, rods & profiles of copper-zinc base alloys. Year 2005. Using exchange rate of 1EURO = 1.209 USD. Average of price of import into 5 main markets (EU, US, JP, IN and CN).
  property carbon content 0
    carbon content on a dry matter basis (reserved; not for manual entry)
  properties: water content 0, wet mass 1 kg, water in wet mass 0 kg, dry mass 1 kg, carbon content, fossil 0, carbon content, non-fossil 0, carbon allocation 0 kg

## Inputs from technosphere
- heat, district or industrial, natural gas: 0 MJ; pedigree (1,1,1,1,1)
  EcoSpold01Location=RER
  properties: heating value, net 1 MJ
- copper, cathode: 0.707 kg; lognormal variance with pedigree 0.148, pedigree (4,5,5,5,4)
  EcoSpold01Location=RER
  properties: wet mass 1 kg, dry mass 1 kg
- heat, district or industrial, other than natural gas: 0 MJ; pedigree (1,1,1,1,1)
  EcoSpold01Location=RER
  properties: heating value, net 1 MJ
- zinc: 0.303 kg; lognormal variance with pedigree 0.148, pedigree (4,5,5,5,4)
  EcoSpold01Location=RER
  properties: dry mass 1 kg, wet mass 1 kg
- electricity, medium voltage: 0 kWh; pedigree (1,1,1,1,1)
  EcoSpold01Location=UCTE
- aluminium casting facility: 4.9e-11 unit; lognormal variance with pedigree 0.458, pedigree (4,5,5,5,4)
  EcoSpold01Location=RER
- heat, district or industrial, natural gas: 0.00394008, 0.0944119, 0.255648 MJ (3 entries); lognormal variance with pedigree 0.148, pedigree (4,5,5,5,4)
  EcoSpold01Location=RER
- heat, district or industrial, other than natural gas: 0.000111972, 0.0067614, 0.276127 MJ (3 entries); lognormal variance with pedigree 0.148, pedigree (4,5,5,5,4)
  EcoSpold01Location=RER
- electricity, medium voltage: 0.00020038, 3.84243e-5, 0.000882282, 0.00292108, 0.000645064, 0.00938188, 0.00132238, 0.00430851 kWh (8 entries); lognormal variance with pedigree 0.148, pedigree (4,5,5,5,4)
  EcoSpold01Location=UCTE

## Emissions to nature
- Zinc [air, unspecified]: 0.000303 kg; lognormal variance with pedigree 0.198, pedigree (4,5,5,5,4)

## Sampling procedure
based on literature and internet

## Extrapolations
none This dataset has been copied from an original dataset covering the geography CH. The uncertainty has been adjusted accordingly.

## Review by Roland Hischier 2003-06-12
Passed.
