# bitumen adhesive compound production, cold

Dataset: EcoSpold 2, unit process
Geography: RER
Time period: 1994-01-01 to 2021-12-31
Technology level: current
Classification: EcoSpold01Categories: plastics/others
Classification: ISIC rev.4 ecoinvent: 2399:Manufacture of other non-metallic mineral products n.e.c.
Synonyms: cold bonding compound, Kaltkleber
Tags: ConvertedDataset
Scenario: Business-as-Usual
System model: Allocation, cut-off by classification
Generated by: Martin Lehmann
Published in: Kellenberger D. 2007
Database: ecoinvent
isCopyrightProtected: true
accessRestrictedTo: 1

## General comment
The dataset is applicable in the construction building sector. Bitumen adhesive compound is used to protect roads and roofs against water intrusion.
[This dataset was already contained in the ecoinvent database version 2. It was not individually updated during the transfer to ecoinvent version 3. Life Cycle Impact Assessment results may still have changed, as they are affected by changes in the supply chain, i.e. in other datasets. This dataset was generated following the ecoinvent quality guidelines for version 2. It may have been subject to central changes described in the ecoinvent version 3 change report (http://www.ecoinvent.org/database/ecoinvent-version-3/reports-of-changes/), and the results of the central updates were reviewed extensively. The changes added e.g. consistent water flows and other information throughout the database. The documentation of this dataset can be found in the ecoinvent reports of version 2, which are still available via the ecoinvent website. The change report linked above covers all central changes that were made during the conversion process.]

## Included activities end
The dataset describes the production of cold bitumen adhesive compound. Included sub-processes are the mixing of bitumen and solvent, the infrastructure, the transport by road and rail as well as the disposal of the compound cuttings in a hazardous waste municipal incineration.

## Geography
The data of this dataset is extracted from literature and producer information. Some own calculations (e.g. energy input, waste heat) were made.

## Technology
The technology involved is mixing of bitumen and solvent in a cold process.

## Parameters
- fraction, process water, to air: 0.5 dimensionless; name fraction_PW_to_air; lognormal variance with pedigree 0.092025, pedigree (4,4,3,2,4)
  Literature value (Statistics Canada, 2007 & Shaffer, K.H., 2008, Consumptive water use in the Great Lakes Basin, USGS) (Vionnet, S., Quantis Water Database - Technical Report, 2012).
- fraction, water, deionised, to air: 0.5 dimensionless; name fraction_WDI_to_air; = fraction_PW_to_air; lognormal variance with pedigree 0.092025, pedigree (4,4,3,2,4)
  Calculated value. See comment in the other parametres present in this dataset. Deionised water is considered to be always used as process water, thus process water fractions to air are applied to all deionised water input flows to calculate the amount of water consumed in the processes.

## Reference product
- bitumen adhesive compound, cold: 1 kg; By-product classification allocatable product; CPC 37940: Bituminous mixtures based on natural and artificial stone materials and bitumen, natural asphalt or related su[…]
  EcoSpold01Location=RER
  production volume 1.32237 kg
    This is a placeholder value that does not reflect real-world production volumes. This dataset does not currently require a real-world production volume to work in the database framework, and no actual data were collected yet. This has no negative effect on the results of the ecoinvent database. The placeholder value of this activity was scaled according to the nominal GDP of 2005 (source: United Nations, http://data.un.org/Glossary.aspx?q=GDP+%28current+US%24%29, accessed 20130726) to reflect an appropriate share of the global production volume, which is also a placeholder value.
  property price 0.247821 EUR2005
    Calculated based on inputs: The price of the product has been calculated as a sum of the values of the material and energy inputs for this product. This value is therefore a rough estimation. It may underestimate the real price since there are additional expenses when producing any product. These expences can include for example labour costs, treatment of waste materials and profit for the producer. Please consider carefully whether this level of data quality is acceptable for your application.
  property carbon content, fossil 0.762141
    The cold bitumen adhesive compound is an emulsion of bitumen (39.4% of total weight) in water (50.5%), solvent (<8 %) and emulsifier (<3%) (ecoinvent v2.2 report 7_part XXIII). C content of bitumen is considered 83% on dry mass basis(Tab 3.19, ecoinvent v2.2 report 6_IV). C content of organic solvents was considered 0.628 kgC/kg dry mass
  property heating value, net 10.19 MJ
    LHV is calculated based on the Carbon content of the product. More details can be found on the respective documentation.
  property carbon content 0.762141
    carbon content on a dry matter basis (reserved; not for manual entry)
  properties: wet mass 1 kg, dry mass 0.495 kg, water content 1.0202, carbon content, non-fossil 0, water in wet mass 0.505 kg, carbon allocation 0.37726 kg

## Inputs from technosphere
- hazardous waste, for incineration: 0 kg; pedigree (1,1,1,1,1)
  EcoSpold01Location=CH
  production volume 0 kg
    Calculated from the production volume of bitumen adhesive compound, cold in proportion to the respective output amounts.
  properties: dry mass 0.75 kg, water content 0.333333, carbon content, fossil 0.554667, wet mass 1 kg, heating value, net 17 MJ
  note on carbon content, fossil: Tab A.6, ecoinvent v2.2 report 13_I. C content has been calculated after data in the tables, and then referred to 1 kg DM
  note on heating value, net: Value taken from the general comment of the treatment dataset.
- electricity, medium voltage: 0.08 kWh; lognormal variance with pedigree 0.0513, pedigree (2,3,5,3,1)
  EcoSpold01Location=UCTE
- water, deionised: 0 kg; name water_deionised_input; pedigree (1,1,1,1,1)
  EcoSpold01Location=CH
  properties: wet mass 1 kg
- chemical factory, organics: 4e-11 unit; lognormal variance with pedigree 0.3527, pedigree (2,4,5,3,1)
  activityLink introduced to establish a direct link to the corresponding regional supply of this product
  EcoSpold01Location=RER
- chemical, organic: 0.0808 kg; lognormal variance with pedigree 0.0527, pedigree (2,4,5,3,1)
  EcoSpold01Location=GLO
  properties: dry mass 1 kg, carbon content, fossil 0.628, wet mass 1 kg, heating value, net 19.03 MJ
  note on carbon content, fossil: This dataset is an unweighted average of 20 organic substances (listed in Tab 88.1, ecoinvent v2.2 report 8, part II), being part of the top100 chemicals included in this database. The C-content has also been calculated as an unweighted average of the C content of the substances composing this dataset.
- pitch: 0 kg; pedigree (1,1,1,1,1)
  EcoSpold01Location=RER
  properties: dry mass 1 kg, wet mass 1 kg, carbon content, fossil 0.83, heating value, net 28 MJ
- hazardous waste, for incineration: -0.00955036, -0.000249641 kg (2 entries); lognormal variance with pedigree 0.0707, pedigree (2,4,5,3,3)
  EcoSpold01Location=CH
  production volume 0.0098 kg
- water, deionised: 0.503189, 0.00181136 kg (2 entries); lognormal variance with pedigree 0.0527, pedigree (2,4,5,3,1)
  EcoSpold01Location=CH
- pitch: 0.391426, 0.0025736 kg (2 entries); lognormal variance with pedigree 0.0527, pedigree (2,4,5,3,1)
  EcoSpold01Location=RER

## Emissions to nature
- NMVOC, non-methane volatile organic compounds, unspecified origin [air, unspecified]: 0.04 kg; lognormal variance with pedigree 0.1981, pedigree (4,4,5,3,3)
- Water [water, unspecified]: 0.0002525 m3; name water_to_water_unspecified; = (water_deionised_input/1000)*(1-fraction_WDI_to_air); lognormal variance with pedigree 0.0807, pedigree (2,2,5,1,1)
  Calculated value based on literature values and expert opinion. See comments in the parametres' comment field.
  property fraction, origin: salt water 0; name fraction_origin_salt_water_Ww
  property fraction, origin: fresh water 1; name fraction_origin_fresh_water_Ww
  property fraction, origin: unspecified 0; name fraction_origin_unspecified_Ww
  property water in wet mass 1000 kg; name WWM
  property carbon content, fossil 0; name C_content_fossil
  property carbon content, non-fossil 0; name C_content_non_fossil
  property wet mass 1000 kg; name WM
  property dry mass 0 kg; name DM
- Water [air, unspecified]: 0.0002525 m3; name water_to_air_unspecified; = (water_deionised_input/1000*fraction_WDI_to_air); lognormal variance with pedigree 0.0807, pedigree (2,2,5,1,1)
  (same comment as for Water)
  property fraction, origin: salt water 0; name fraction_origin_salt_water
  property fraction, origin: unspecified 0; name fraction_origin_unspecified
  property fraction, origin: fresh water 1; name fraction_origin_fresh_water

## Sampling procedure
Literature, database

## Extrapolations
This dataset has been extrapolated from year 2000 to the year of the calculation (2021). The uncertainty has been adjusted accordingly.

## Review by Rolf Frischknecht 2007-11-07
passed
