# electricity, high voltage, production mix

Dataset: EcoSpold 2, unit process, production mix
Geography: NORDEL
Time period: 2021-01-01 to 2021-12-31
Scenario: Business-as-Usual
System model: Allocation, cut-off by classification
Generated by: [System]
Database: ecoinvent
isCopyrightProtected: false
accessRestrictedTo: 1

## Reference product
- electricity, high voltage: 1 kWh; By-product classification allocatable product; CPC 17100: Electrical energy
  production volume 2.93892e11 kWh

## Inputs from technosphere
- electricity, high voltage: 0 kWh; pedigree (1,1,1,1,1)
  Calculated value/estimation. This value compensates for the losses during transmission on the high voltage level and transformation within the high voltage level. The calculation is made based on total electricity losses between net electricity available at the busbar and the use of electricity calculated based on the IEA electricity information 2014, table 1.1, Electrity supply vs. transmission losses. These total losses over the whole chain are then allocated to the different voltage levels as well as transformation and transmission losses based on information in Itten et al. 2014. For details please see the documentation available on ecoQuery.
  IEA. 2014. Electricity Information 2014. ISBN 978-92-64-21692-1. International Energy Agency (IEA), Paris Cedex (FR).
  Itten R., Frischknecht R., Stucki M. 2014. Life Cycle Inventories of Electricity Mixes and Grid. Version 1.3. treeze, Uster, Switzerland
- electricity, high voltage: 0.00521335 kWh
  production volume 1.49049e9 kWh
- electricity, high voltage: 0.0100913 kWh
  production volume 2.8851e9 kWh
- electricity, high voltage: 0.0302675 kWh
  production volume 8.65344e9 kWh
- electricity, high voltage: 0.000304161 kWh
  production volume 8.69594e7 kWh
- electricity, high voltage: 2.22557e-5 kWh
  production volume 6.36288e6 kWh
- electricity, high voltage: 0.0452038 kWh
  production volume 1.29237e10 kWh
- electricity, high voltage: 0.02548 kWh
  production volume 7.28469e9 kWh
- electricity, high voltage: 0.000226938 kWh
  production volume 6.48812e7 kWh
- electricity, high voltage: 0.00973344 kWh
  production volume 2.78278e9 kWh
- electricity, high voltage: 0.000643806 kWh
  production volume 1.84064e8 kWh
- electricity, high voltage: 0.00864788 kWh
  production volume 2.47242e9 kWh
- electricity, high voltage: 0.00107881 kWh
  production volume 3.08431e8 kWh
- electricity, high voltage: 0.00870009 kWh
  production volume 2.48735e9 kWh
- electricity, high voltage: 0.000864228 kWh
  production volume 2.47082e8 kWh
- electricity, high voltage: 0.0124691 kWh
  production volume 3.56491e9 kWh
- electricity, high voltage: 0.00179853 kWh
  production volume 5.14197e8 kWh
- electricity, high voltage: 0.00922193 kWh
  production volume 2.63654e9 kWh
- electricity, high voltage: 0.00022072 kWh
  production volume 6.31036e7 kWh
- electricity, high voltage: 0.0120899 kWh
  production volume 3.45648e9 kWh
- electricity, high voltage: 0.00229114 kWh
  production volume 6.55034e8 kWh
- electricity, high voltage: 0.000208285 kWh
  production volume 5.95485e7 kWh
- electricity, high voltage: 0 kWh
  properties: price 0.0977 EUR2005
- electricity, high voltage: 0.000107051 kWh
  production volume 3.06057e7 kWh
- electricity, high voltage: 0.0332927 kWh
  production volume 9.51836e9 kWh
- electricity, high voltage: 0.133168 kWh
  production volume 3.80727e10 kWh
- electricity, high voltage: 0.122559 kWh
  production volume 3.50395e10 kWh
- electricity, high voltage: 0.0516309 kWh
  production volume 1.47612e10 kWh
- electricity, high voltage: 5.73528e-5 kWh
  production volume 1.63971e7 kWh
- electricity, high voltage: 0.000774263 kWh
  production volume 2.21361e8 kWh
- electricity, high voltage: 0.00179198 kWh
  production volume 5.12326e8 kWh
- electricity, high voltage: 0.0362357 kWh
  production volume 1.03597e10 kWh
- electricity, high voltage: 0.00625194 kWh
  production volume 1.78742e9 kWh
- electricity, high voltage: 0.000207998 kWh
  production volume 5.94664e7 kWh
- electricity, high voltage: 0.000145989 kWh
  production volume 4.17381e7 kWh
- electricity, high voltage: 0.000873327 kWh
  production volume 2.49683e8 kWh
- electricity, high voltage: 0.000902003 kWh
  production volume 2.57882e8 kWh
- electricity, high voltage: 0.00040929 kWh
  production volume 1.17016e8 kWh
- electricity, high voltage: 0.0119972 kWh
  production volume 3.42998e9 kWh
- electricity, high voltage: 0.000988032 kWh
  production volume 2.82477e8 kWh
- electricity, high voltage: 6.25667e-5 kWh
  production volume 1.78878e7 kWh
- electricity, high voltage: 0, 0 kWh (2 entries)
  properties: exergy 3.6 MJ, price 0.0977 EUR2005
  note on exergy: allocation factor for electricity (=1) vs. heat, where heat is calculated as the termodynamic mean temperature Tm = (Tfeed-Treturn)/ln(Tfeed/Treturn), relative to the application temperature (Tu, typically = 293 K), i.e. (Tm-Tu)/Tm
- electricity, high voltage: 0.00205335 kWh
  production volume 5.87052e8 kWh
- electricity, high voltage: 0.399866 kWh
  production volume 1.14321e11 kWh
- electricity, high voltage: 6.17301e-7 kWh
  production volume 176486 kWh
- electricity, high voltage: 4.83576e-7 kWh
  production volume 138254 kWh
- electricity, high voltage: 8.0364e-5 kWh
  production volume 2.2976e7 kWh
- electricity, high voltage: 2.54473e-5 kWh
  production volume 7.27535e6 kWh
- electricity, high voltage: 0.0105504 kWh
  production volume 3.01636e9 kWh
- electricity, high voltage: 0.000223936 kWh
  production volume 6.40231e7 kWh
- electricity, high voltage: 0.000366441 kWh
  production volume 1.04765e8 kWh
- electricity, high voltage: 4.85515e-5 kWh
  production volume 1.38808e7 kWh
- electricity, high voltage: 0.000124568 kWh
  production volume 3.5614e7 kWh
- electricity, high voltage: 3.92364e-6 kWh
  production volume 1.12176e6 kWh
- electricity, high voltage: 4.45432e-5 kWh
  production volume 1.27348e7 kWh
- electricity, high voltage: 0.00037825 kWh
  production volume 1.08141e8 kWh
