# display production, cathode ray tube, 17 inches

Dataset: EcoSpold 2, unit process
Geography: GLO
Time period: 1998-01-01 to 2021-12-31
Technology level: old
Classification: EcoSpold01Categories: electronics/devices
Classification: ISIC rev.4 ecoinvent: 2620:Manufacture of computers and peripheral equipment
Tags: ConvertedDataset
Scenario: Business-as-Usual
System model: Allocation, cut-off by classification
Generated by: Roland Hischier
Published in: Hischier R. 2007
Database: ecoinvent
isCopyrightProtected: true
accessRestrictedTo: 1

## General comment
This dataset represents the production of 1 unit of a 17 Inch CRT computer screen. Meta data about the CRT screen production are taken from a US LCA study of CRT and LCD screens, representing the production of an average 17inch CRT computer screen in the late 1990s with the support of manufacturers in the US as well as in Asia. Infrastructure are based on assumptions and simplifications and have thus, accordingly higher uncertainties.
[This dataset was already contained in the ecoinvent database version 2. It was not individually updated during the transfer to ecoinvent version 3. Life Cycle Impact Assessment results may still have changed, as they are affected by changes in the supply chain, i.e. in other datasets. This dataset was generated following the ecoinvent quality guidelines for version 2. It may have been subject to central changes described in the ecoinvent version 3 change report (http://www.ecoinvent.org/database/ecoinvent-version-3/reports-of-changes/), and the results of the central updates were reviewed extensively. The changes added e.g. consistent water flows and other information throughout the database. The documentation of this dataset can be found in the ecoinvent reports of version 2, which are still available via the ecoinvent website. The change report linked above covers all central changes that were made during the conversion process.]

## Included activities start
From reception of raw materials and auxiliaries at the factory gate.

## Included activities end
This dataset includes raw materials, auxiliaries, packaging materials, energy consumption, infrastructure and land-use. All kind of emissions are not taken into account, whereas all waste is qualified as going to recycling/reuse.

## Geography
Data from a US LCA study used as global average data

## Technology
Average CRT production technology in the late 1990s, including: production of the heat sinks (on printed wiring boards), production of housing parts, production of deflection yoke, CRT magnet assembly, CRT shield assembly, audio cable assembly, video cable assembly, connectors, final assembly of the 17 inch computer screen, subsequent packaging and palleting until the complete CRT computer screen is ready to be shipped to the customer.

## Reference product
- display, cathode ray tube, 17 inches: 1 unit; CPC 47315: Monitors and projectors, principally used in an automatic data processing system; By-product classification allocatable product
  EcoSpold01Location=GLO
  Computer monitors or displays are the visual interface between a computer and the user / operator. The CRT technology has been invented by the German physicist Karl Ferdinand Braun in 1897. It is the display technology that has been for a long time used in almost all computer displays, video monitors, televisions, radar displays and oscilloscopes. The CRT technically refers to any electronic vacuum tube employing a focused beam of electrons. Cathode rays work thereby in the form of streams of high speed electrons emitted from the heating of a cathode inside a vacuum tube, at its rear end. The emitted electrons form a beam within the tube due to the voltage difference applied across the two electrodes (the CRT screen typically forms the anode). The beam is then perturbed (deflected), either by a magnetic or an electric field, to trace over ('scan') the inside surface of the screen (anode). The screen is covered with a phosphorescent coating (often transition metals or rare earth elements), which emits visible light when excited by the electrons. Early computer displays used so-called vector monitors, a type of CRT similar to an oscilloscope but typically using magnetic, rather than electrostatic, deflection. Here, the beam traces straight lines between arbitrary points, repeatedly refreshing the display as quickly as possible. Vector displays for computers were limited in that they could display only a shape's outline (advanced vector systems could provide a limited amount of shading), and only a limited amount of crudely-drawn text (the number of shapes and/or textual characters drawn was severely limited, because the speed of refresh was roughly inversely proportional to how many vectors needed to be drawn). Other graphical displays used 'storage tubes'. Such CRTs inherently stored the image, and did not require periodic refreshing. Furthermore, displays for early computers that needed to display more text than was practical by using vectors, or that required high speed for photographic output, used a so-called Charactron CRT. This type incorporates a perforated metal character mask (stencil), which shapes a wide electron beam to form a character on the screen. The system selects a character on the mask using one set of deflection circuits, and selects the position to draw the character at using a second set. The beam is activated briefly to draw the character at that position. Many of these early computer displays used "slow", or long-persistence, phosphors to reduce flicker for the operator. While it reduces eyestrain for relatively static displays, the drawback of long-persistence phosphor is that when the display is changed, it produces a visible afterimage that can take up to several seconds to fade. This makes all these technologies inappropriate for animation, or for real-time dynamic information displays.
  Modern colour tubes use three different phosphors which emit red, green, and blue light respectively. They are packed either in strips or clusters. Such colour CRTs have thus three electron guns, one for each primary colour, arranged either in a straight line or in a triangular configuration (the guns are usually constructed as a single unit). The beam of each gun reaches the dots of exactly one colour; a grille or mask absorbs those electrons that would otherwise hit the wrong phosphor. Since each beam starts at a slightly different location within the tube, and all three beams are perturbed in essentially the same way, a particular deflection charge will cause the beams to hit a slightly different location on the screen (called a 'subpixel'). The so-called dot pitch defines thereby the "native resolution" of such displays. Despite all the advantages that new, flat display technologies seem to have, colour CRTs still find adherents in computer gaming due to their high refresh rates and higher resolution per initial cost. CRT's are also still popular in the printing and broadcasting industries as well as in the profe
  production volume 1 unit
    Dummy value to be replaced by measured, estimated or calculated value
  property price 52.81 EUR2005
    Calculated value based on data from United Nations Commodity Trade Statistics Database (comtrade.un.org). UN comtrade category: 854011 Colour cathode-ray television picture tubes, monitors. Year 2005. Using exchange rate of 1EURO = 1.209 USD. Average of price of import into 5 main markets (EU, US, JP, IN and CN).
  property carbon content, fossil 0.163203
    Calculated as the addition of C contents in the product composition, then referred to 1 kg DM
  property carbon content, non-fossil 0.00235652
    (same comment as for display, cathode ray tube, 17 inches)
  property carbon content 0.16556
    carbon content on a dry matter basis (reserved; not for manual entry)
  properties: dry mass 19.86 kg, wet mass 19.86 kg, water in wet mass 0 kg, water content 0, carbon allocation 3.28802 kg

## Inputs from technosphere
- printed wiring board mounting facility: 2.08e-7 unit; lognormal variance with pedigree 0.3861, pedigree (4,5,5,3,1)
  EcoSpold01Location=GLO
  Proxy, due to a lack of specific information, the infrastructure module for the mounting of printed wiring boards is used.
  Uncertainty: Estimation, based on printed wiring board mounting plant
- steel, low-alloyed, hot rolled: 0.28711 kg; source Socolof M. L. 2001; lognormal variance with pedigree 0.0407, pedigree (1,3,5,3,1)
  Literature Value.
  EcoSpold01Location=RER
  Uncertainty: data from an US-EPA LCA study
  properties: dry mass 1 kg, carbon content, fossil 0.005, wet mass 1 kg
  note on carbon content, fossil: Low alloyed steel composition given in Tab. 3.2 ecoinvent v2.2 report 10_partII. Steel assumed to have a C content of 0.5%
- printed wiring board, surface mounted, unspecified, Pb free: 0.305795 kg; source Socolof M. L. 2001; lognormal variance with pedigree 0.0407, pedigree (1,3,5,3,1)
  EcoSpold01Location=GLO
  Literature Value.
  Uncertainty: data from an US-EPA LCA study
  properties: carbon content, fossil 0.132522, dry mass 1 kg, wet mass 1 kg
  note on carbon content, fossil: C content was calculated as the addition of C content in the PWB components
- printed wiring board, through-hole mounted, unspecified, Pb free: 0.305795 kg; source Socolof M. L. 2001; lognormal variance with pedigree 0.0407, pedigree (1,3,5,3,1)
  Literature Value.
  EcoSpold01Location=GLO
  Uncertainty: data from an US-EPA LCA study
  properties: carbon content, fossil 0.132522, wet mass 1 kg, dry mass 1 kg
- styrene-acrylonitrile copolymer: 0.827 kg; source Socolof M. L. 2001; lognormal variance with pedigree 0.0407, pedigree (1,3,5,3,1)
  EcoSpold01Location=RER
  Literature Value.
  Uncertainty: data from an US-EPA LCA study
  properties: wet mass 1 kg, carbon content, fossil 0.856023, dry mass 1 kg, heating value, net 32.54 MJ
  note on carbon content, fossil: SAN is the abbreviation originating from its monomers styrene (C8H8) and acrylonitrile (C3H3N). The acrylonitrile content in SAN goes from 20 to 35 wt% (ecoinvent v2.2 report 11_II), an average content of 27.5% was considered. MW styrene =104 g/mol, MW acrylonitrile=53 g/mol
- polycarbonate: 0.923 kg; source Socolof M. L. 2001; lognormal variance with pedigree 0.0407, pedigree (1,3,5,3,1)
  EcoSpold01Location=RER
  Literature Value.
  Uncertainty: data from an US-EPA LCA study
  properties: carbon content, fossil 0.755906, dry mass 1 kg, wet mass 1 kg, heating value, net 29.57 MJ
  note on carbon content, fossil: Polycarbonate means here 2,2-bis(4-hydroxyphenyl)propane polycarbonate – also called bisphenol A polycarbonate ( -(O-C6H4-C(CH3)2-C6H4-O-CO)n- (ecoinvent v2.2 report 11_II), C16H14O3, MW=254 g/mol.
- steel, chromium steel 18/8, hot rolled: 3.45 kg; source Socolof M. L. 2001; lognormal variance with pedigree 0.0407, pedigree (1,3,5,3,1)
  Literature Value.
  EcoSpold01Location=RER
  Uncertainty: data from an US-EPA LCA study
  properties: dry mass 1 kg, carbon content, fossil 0.0008, wet mass 1 kg
  note on carbon content, fossil: Stainless steel model is the grade 304 steel (18/8 stainless, 18% chromium 8% nickel; max. 0.08% C)
- electricity, medium voltage: 3.6944 kWh; source Socolof M. L. 2001; lognormal variance with pedigree 0.0407, pedigree (1,3,5,3,1)
  Literature Value.
  EcoSpold01Location=UCTE
  Uncertainty: data from an US-EPA LCA study
- plug, inlet and outlet, for computer cable: 1 unit; source Socolof M. L. 2001; lognormal variance with pedigree 0.0407, pedigree (1,3,5,3,1)
  EcoSpold01Location=GLO
  Literature Value.
  Uncertainty: data from an US-EPA LCA study
  properties: dry mass 0.0585 kg, carbon content, fossil 0.3397, wet mass 0.0585 kg
  note on carbon content, fossil: Calculated as the addition of C contents in the product composition
- polyvinylchloride, suspension polymerised: 0.115236 kg; source Socolof M. L. 2001; lognormal variance with pedigree 0.0407, pedigree (1,3,5,3,1)
  EcoSpold01Location=RER
  Literature Value.
  Uncertainty: data from an US-EPA LCA study
  properties: dry mass 1 kg, carbon content, fossil 0.387097, wet mass 1 kg, heating value, net 21.5 MJ
  note on carbon content, fossil: Monomer is vynyl chloride, C2H3Cl (ecoinvent v2.2 report 11_II). MW=62 g/mol
- cable, ribbon cable, 20-pin, with plugs: 0.394 kg; source Socolof M. L. 2001; lognormal variance with pedigree 0.0407, pedigree (1,3,5,3,1)
  EcoSpold01Location=GLO
  Literature Value.
  Uncertainty: data from an US-EPA LCA study
  properties: dry mass 1 kg, wet mass 1 kg, carbon content, fossil 0.648653
  note on carbon content, fossil: Calculated as the addition of C contents in the product composition. Then referred to 1 kg DM
- cathode-ray tube, cathode ray tube display: 10.7 kg; source Socolof M. L. 2001; lognormal variance with pedigree 0.0407, pedigree (1,3,5,3,1)
  EcoSpold01Location=GLO
  Literature Value.
  Uncertainty: data from an US-EPA LCA study
  properties: dry mass 1 kg, carbon content, fossil 0.00299576, wet mass 1 kg
- phosphoric acid, industrial grade, without water, in 85% solution state: 0.08421 kg; source Socolof M. L. 2001; lognormal variance with pedigree 0.0407, pedigree (1,3,5,3,1)
  Literature Value.
  EcoSpold01Location=RER
  Uncertainty: data from an US-EPA LCA study
  properties: wet mass 1 kg, dry mass 1 kg
- polyethylene, high density, granulate: 0.89952 kg; source Socolof M. L. 2001; lognormal variance with pedigree 0.0407, pedigree (1,3,5,3,1)
  Literature Value.
  EcoSpold01Location=RER
  Uncertainty: data from an US-EPA LCA study
  properties: carbon content, fossil 0.857143, wet mass 1 kg, heating value, net 42.47 MJ, dry mass 1 kg
  note on carbon content, fossil: Polyethylene is formed out of a huge amount of ethylene monomers (C2H4) (ecoinvent v2.2 report 11_II). MW=28 g/mol
- polyurethane, flexible foam: 0 kg; source Socolof M. L. 2001; pedigree (1,1,1,1,1)
  EcoSpold01Location=RER
  Literature Value.
  Uncertainty: data from an US-EPA LCA study
  properties: dry mass 1 kg, wet mass 1 kg, carbon content, fossil 0.633827, heating value, net 30.67 MJ
  note on carbon content, fossil: Polyurethanes (PUR) is the collective name for an extensive group of polymers with very different compositions and correspondingly varied property profiles, though their molecule chain contains all a urethane group (-NH-CO-O-). All PURs are built on a common principle : they are produced by the diisocyanate polyaddition process, that links polyols and (di)isocyanates. In this dataset, an example of typical polyurethane mixture is described (Ullmann, Polyurethanes, Dieterich et al. & ecoinvent v2 report 11_II). C content was calculated as an addition of C contents in its components.
- kraft paper: 0 kg; source Socolof M. L. 2001; pedigree (1,1,1,1,1)
  EcoSpold01Location=RER
  Literature Value.
  Uncertainty: data from an US-EPA LCA study
  properties: carbon content, non-fossil 0.41662, wet mass 1 kg, water content 0.0582011, carbon content, fossil 0.0020219, dry mass 0.945 kg, heating value, net 14.11 MJ
  note on carbon content, non-fossil: Biogenic C content was calculated after biogenic C contents of chemicals used in the production of the paper (in Tab 9.4 ecoinvent v2.2 report 11_III, part 9). The cellulose content in 1 kg of paper (on a wet mas basis) was estimated as (1-chemical content), C content of cellulose was considered 0.44 kgC/kg dry mass (ecoinvent v2.2 report, n 15a, pg 40)
  note on carbon content, fossil: Fossil C content was calculated after fossil C contents of chemicals used in the production of the paper (in Tab 9.4 ecoinvent v2.2 report 11_III, part 9).
- printed wiring board, surface mounted, unspecified, Pb containing: 0.131055 kg; source Socolof M. L. 2001; lognormal variance with pedigree 0.0407, pedigree (1,3,5,3,1)
  Literature Value.
  EcoSpold01Location=GLO
  Uncertainty: data from an US-EPA LCA study
  properties: carbon content, fossil 0.132522, wet mass 1 kg, dry mass 1 kg
- copper, cathode: 0.11605 kg; source Socolof M. L. 2001; lognormal variance with pedigree 0.0407, pedigree (1,3,5,3,1)
  EcoSpold01Location=RER
  Literature Value.
  Uncertainty: data from an US-EPA LCA study
  properties: dry mass 1 kg, wet mass 1 kg
- section bar extrusion, aluminium: 0.36 kg; source Socolof M. L. 2001; lognormal variance with pedigree 0.0407, pedigree (1,3,5,3,1)
  EcoSpold01Location=RER
  Literature Value.
  Uncertainty: data from an US-EPA LCA study
- injection moulding: 3.3566 kg; source Socolof M. L. 2001; lognormal variance with pedigree 0.0407, pedigree (1,3,5,3,1)
  EcoSpold01Location=RER
  Literature Value. Used for the total amount of plastics reported.
  Uncertainty: data from an US-EPA LCA study
- corrugated board box: 0 kg; pedigree (1,1,1,1,1)
  Literature Value.
  Uncertainty: own calculation, based on internet survey from current models
  properties: carbon content, fossil 0.00365437, wet mass 1 kg, dry mass 0.945 kg, carbon content, non-fossil 0.450248, water content 0.0582011, heating value, net 12.86 MJ
- polystyrene, high impact: 0.151 kg; source Socolof M. L. 2001; lognormal variance with pedigree 0.0407, pedigree (1,3,5,3,1)
  Literature Value.
  EcoSpold01Location=RER
  Uncertainty: data from an US-EPA LCA study
  properties: heating value, net 38.67 MJ, carbon content, fossil 0.923077, dry mass 1 kg, wet mass 1 kg
  note on carbon content, fossil: Chemical formula of polystyrene is (C8H8)n (ecoinvent v2.2 report 11_II)
- polyvinylchloride, emulsion polymerised: 0.0168639 kg; source Socolof M. L. 2001; lognormal variance with pedigree 0.0407, pedigree (1,3,5,3,1)
  EcoSpold01Location=RER
  Literature Value.
  Uncertainty: data from an US-EPA LCA study
  properties: carbon content, fossil 0.387097, wet mass 1 kg, dry mass 1 kg, heating value, net 21.5 MJ
- aluminium, wrought alloy: 0.39302 kg; source Socolof M. L. 2001; lognormal variance with pedigree 0.0407, pedigree (1,3,5,3,1)
  EcoSpold01Location=RER
  Literature Value.
  Uncertainty: data from an US-EPA LCA study
  properties: wet mass 1 kg, dry mass 1 kg
- acrylonitrile-butadiene-styrene copolymer: 0.424 kg; source Socolof M. L. 2001; lognormal variance with pedigree 0.0407, pedigree (1,3,5,3,1)
  Literature Value.
  EcoSpold01Location=RER
  Uncertainty: data from an US-EPA LCA study
  properties: wet mass 1 kg, dry mass 1 kg, heating value, net 35.58 MJ, carbon content, fossil 0.853081
  note on carbon content, fossil: ABS is the abbreviation originating from its monomers acrylonitrile, butadiene and styrene. It was assumed that every monomer was present in the same proportion, so the basic ABS monomer was considered (C8H8·C4H6·C3H3N), and the MW=104+54+53=211 g/mol
- sheet rolling, steel: 0.32013 kg; source Socolof M. L. 2001; lognormal variance with pedigree 0.0407, pedigree (1,3,5,3,1)
  Literature Value.
  EcoSpold01Location=RER
  Uncertainty: data from an US-EPA LCA study
- isopropanol: 0 kg; source Socolof M. L. 2001; pedigree (1,1,1,1,1)
  Literature Value.
  EcoSpold01Location=RER
  Uncertainty: data from an US-EPA LCA study
  properties: heating value, net 34.3 MJ, dry mass 1 kg, wet mass 1 kg, carbon content, fossil 0.6
- polystyrene, expandable: 1 kg; source Socolof M. L. 2001; lognormal variance with pedigree 0.06, pedigree (4,4,5,1,1)
  Literature Value.
  EcoSpold01Location=RER
  Uncertainty: own calculation, based on internet survey from current models
  properties: wet mass 1 kg, carbon content, fossil 0.923077, heating value, net 38.67 MJ, dry mass 1 kg
- cyclohexane: 0.000188 kg; source Socolof M. L. 2001; lognormal variance with pedigree 0.0407, pedigree (1,3,5,3,1)
  Literature Value.
  EcoSpold01Location=RER
  Uncertainty: data from an US-EPA LCA study
  properties: carbon content, fossil 0.857143, dry mass 1 kg, wet mass 1 kg, heating value, net 43.22 MJ
- section bar rolling, steel: 3.45 kg; source Socolof M. L. 2001; lognormal variance with pedigree 0.0407, pedigree (1,3,5,3,1)
  EcoSpold01Location=RER
  Literature Value.
  Uncertainty: data from an US-EPA LCA study
- printed wiring board, through-hole mounted, unspecified, Pb containing: 0.131055 kg; source Socolof M. L. 2001; lognormal variance with pedigree 0.0407, pedigree (1,3,5,3,1)
  Literature Value.
  EcoSpold01Location=GLO
  Uncertainty: data from an US-EPA LCA study
  properties: dry mass 1 kg, wet mass 1 kg, carbon content, fossil 0.132522
- cable, connector for computer, without plugs: 1 m; source Socolof M. L. 2001; lognormal variance with pedigree 0.0407, pedigree (1,3,5,3,1)
  Literature Value.
  EcoSpold01Location=GLO
  Uncertainty: data from an US-EPA LCA study
  properties: dry mass 0.065 kg, wet mass 0.065 kg, carbon content, fossil 0.359823
- chemical, organic: 0.0011825 kg; source Socolof M. L. 2001; lognormal variance with pedigree 0.0407, pedigree (1,3,5,3,1)
  EcoSpold01Location=GLO
  Literature Value.
  Uncertainty: data from an US-EPA LCA study
  properties: heating value, net 19.03 MJ, wet mass 1 kg, carbon content, fossil 0.628, dry mass 1 kg
  note on carbon content, fossil: This dataset is an unweighted average of 20 organic substances (listed in Tab 88.1, ecoinvent v2.2 report 8, part II), being part of the top100 chemicals included in this database. The C-content has also been calculated as an unweighted average of the C content of the substances composing this dataset.
- ferrite: 0.17 kg; source Socolof M. L. 2001; lognormal variance with pedigree 0.0407, pedigree (1,3,5,3,1)
  Literature Value.
  EcoSpold01Location=GLO
  Uncertainty: data from an US-EPA LCA study
  properties: wet mass 1 kg, dry mass 1 kg
- wire drawing, copper: 0.11605 kg; source Socolof M. L. 2001; lognormal variance with pedigree 0.0407, pedigree (1,3,5,3,1)
  EcoSpold01Location=RER
  Literature Value.
  Uncertainty: data from an US-EPA LCA study
- polyurethane, flexible foam: 0.002142, 0.010458 kg (2 entries); source Socolof M. L. 2001; lognormal variance with pedigree 0.0407, pedigree (1,3,5,3,1)
  EcoSpold01Location=RER
  Literature Value.
  Uncertainty: data from an US-EPA LCA study
- kraft paper: 0.013284, 0.100116 kg (2 entries); source Socolof M. L. 2001; lognormal variance with pedigree 0.0407, pedigree (1,3,5,3,1)
  EcoSpold01Location=RER
  Literature Value.
  Uncertainty: data from an US-EPA LCA study
- corrugated board box: 0.289074, 0.0129247, 1.098 kg (3 entries); lognormal variance with pedigree 0.06, pedigree (4,4,5,1,1)
  (same comment as for corrugated board box)
- isopropanol: 0.0033756, 0.0160244 kg (2 entries); source Socolof M. L. 2001; lognormal variance with pedigree 0.0407, pedigree (1,3,5,3,1)
  Literature Value.
  EcoSpold01Location=RER
  Uncertainty: data from an US-EPA LCA study

## Sampling procedure
literature

## Extrapolations
This dataset has been extrapolated from year 2001 to the year of the calculation (2021). The uncertainty has been adjusted accordingly.

## Review by Roland Hischier 2011-09-22
Transfer of documentation done.

## Review by Jürgen Sutter 2007-11-08
passed.
