# softwood forestry, mixed species, boreal forest

Dataset: EcoSpold 2, unit process
Geography: CA-QC
Time period: 2006-01-01 to 2021-12-31
Technology level: current
Classification: ISIC rev.4 ecoinvent: 0220:Logging
Classification: EcoSpold01Categories: wood energy/fuels
Synonyms: silviculture; forestry
Scenario: Business-as-Usual
System model: Allocation, cut-off by classification
Share of production covered: 15 %
Generated by: Achille-B. Laurent
Database: ecoinvent
isCopyrightProtected: true
accessRestrictedTo: 1

## General comment
This dataset represents the production of 1 m³ of softwood sawlog, measured as solid wood under bark, from forestlands mostly located in the boreal forest of the province of Québec (Canada). The harvested species is black spruce (80% of the harvested volume) with a density of 406 kg/m3 (oven dry mass over green volume). 66% of the total harvestable wood volume in Québec is softwood (forestierenchef.gouv.qc.ca).
This dataset was created with a model specific to the Québec context. Therefore a comparison with the other forestry datasets has to be done carefully.

## Included activities start
From the construction of forest roads.

## Included activities end
This activity ends with sawlog at forest road. The dataset includes harvest, scarification, forest camp establishment and operation, forest road construction and maintenance and reforestation. The dataset doesn"t include seedling production and emissions from the degradation of wood residues left on forest floor.

## Allocation
Forest coproducts (i.e.. branches and tops) are not considered because they are left on the ground. Other coproducts (e.g. strains) are illegal to harvest in Québec.

## Geography
Data from boreal forestlands in Québec, Canada.

## Technology
Mechanised production with whole-tree harvesting and stem-only harvesting.

## Parameters
- mass (oven dry) of bark produced during sawing per m3 of sawlog with bark: 44.919 kg; name BarkSawing; lognormal variance with pedigree 0.0012, pedigree (1,3,1,1,1)
  Average data from 5 sawmills located in Québec, Canada. Source: Athena Sustainable Materials Institute. (2009). "A Cradle-to-Gate Life Cycle Assessment of Canadian Softwood Lumber". Ottawa, ON.
- volume of antifreeze: 0.000466786 l; name AntifreezeVol; lognormal variance with pedigree 0.0012, pedigree (1,3,1,1,1)
  Antifreeze used in winter to unfreeze mobile equipment. Average data from 4 forestlands located in Québec, Canada. Source: Athena Sustainable Materials Institute. (2009). "A Cradle-to-Gate Life Cycle Assessment of Canadian Softwood Lumber". Ottawa, ON.
- content of propylene glycol in antifreeze: 0.509 dimensionless; name PropGlycolContent; lognormal variance with pedigree 0.0107, pedigree (3,5,1,3,1)
  Source: Doka G. (2009) "Life Cycle Inventories of Waste Treatment Services" (ecoinvent report no13)
- average forest age at harvest: 73.5734 year; name ForestAge; lognormal variance with pedigree 0.0032, pedigree (3,3,1,1,1)
  Average data from 4 forestlands located in Québec, Canada. Source: Athena Sustainable Materials Institute. (2009). "A Cradle-to-Gate Life Cycle Assessment of Canadian Softwood Lumber". Ottawa, ON.

## Reference product
- sawlog and veneer log, softwood, measured as solid wood under bark: 1 m3; name SawlogVolNoBark; By-product classification allocatable product; CPC 031: Wood in the rough
  production volume 2.023e7 m3
    Year 2006-2007. Source : Ministère des Ressources naturelles et de la Faune. (2010). RESSOURCES ET INDUSTRIES FORESTIÈRES PORTRAIT STATISTIQUE, table 05.02.08 (g), http://www.mrnf.gouv.qc.ca/publications/forets/connaissances/stat_edition_complete/complete2010.pdf
  property carbon content, non-fossil 0.494; name SawlogVolNoBark_C_content_non_fossil
    Biogenic carbon content on a dry matter basis. Average wood carbon content. Varies between 48% and 53% depending on the species in the Canadian forest industry.
  property water content 0.7; name SawlogVolNoBark_water_content
  property water in wet mass 322.955 kg; name SawlogVolNoBark_WWM
  property dry mass 461.364 kg; name SawlogVolNoBark_DM
  property price 80 EUR2005; name SawlogVolNoBark_price_EUR2005
    Expert judgement (Urs Luginbühl, Swiss Sawmilling industry, personal communication in June 2014). Cross-reference; Calculated as 90% of purchasers price based on: 2004 prices for World Import/Export data (USD/m3) from UN Commodity Trade Statistics Database (http://data.un.org/Data.aspx?d=ComTrade&f=_l1Code%3a45, [accessed 10th June 2010]) Commodity: 'Logs, poles, coniferous not treated or painted'.
  property heating value, net 4483.78 MJ
    Value based on the dataset "softwood forestry, mixed species, sustainable forest management"The property is based on a value of 11.58MJ/kg
  property wet mass 784.318 kg; name SawlogVolNoBark_WM
  property carbon content 0.494
    carbon content on a dry matter basis (reserved; not for manual entry)
  properties: carbon allocation 227.914 kg

## Inputs from technosphere
- propane, burned in building machine: 1.18501 MJ; = propaneBuildMachine_fuel_input_in_liter * propaneBuildMachine_density * propaneBuildMachine_Net_Heat_Value*46.46; lognormal variance with pedigree 0.008, pedigree (1,1,4,1,1)
  Quantity calculated with the lower heating value of propane and the volume of propane burned by different types of machinery during some steps (harvest, forest camp establishment and operation, forest road construction and maintenance).
  Uncertainty: C
  property amount of exchange in liters 3 0.0392116 l; name propaneBuildMachine_amountLiters3
  property heating value, net 1 MJ; name propaneBuildMachine_Net_Heat_Value
  property amount of exchange in liters 1 0.00540679 l; name propaneBuildMachine_amountLiters1
  property amount of exchange in liters 2 0.00490771 l; name propaneBuildMachine_amountLiters2
  property density 0.515 kg/l; name propaneBuildMachine_density
  property literFuel_Input 0.0495261 l; name propaneBuildMachine_fuel_input_in_liter; = propaneBuildMachine_amountLiters1 + propaneBuildMachine_amountLiters2 + propaneBuildMachine_amountLiters3
  note on heating value, net: net (lower) heating (calorific) value (MJ/kg) Source : Table B.1 in Felder, R. M., Rousseau, R. W. (1986) Elementary Principles of Chemical Processes, 2nd ed.,Wiley
  note on density: http://www.cfbp.fr/proprietes-des-gpl/caracteristiques-generales-et-physico-chimiques-n305
- transport, passenger car, large size, petrol, EURO 3: 5.06872 km; name petrol; = (petrol_amountLiters1 + petrol_amountLiters2 + petrol_amountLiters3 + petrol_amountLiters4 + petrol_amountLiters5) * petrol_density / petrol_kgFuel_input; lognormal variance with pedigree 0.21, pedigree (5,5,5,5,5)
  Km equivalent of petrol consumption from mobile equipment.
  Uncertainty: C
  property density 0.75 kg/l; name petrol_density
  property amount of exchange in liters 2 0.21887 l; name petrol_amountLiters2
  property amount of exchange in liters 3 0.0289018 l; name petrol_amountLiters3
  property amount of exchange in liters 5 0.00164322 l; name petrol_amountLiters5
  property mass of fuel used 0.081237 kg; name petrol_kgFuel_input
  property amount of exchange in liters 1 0.299561 l; name petrol_amountLiters1
  property amount of exchange in liters 4 4.68452e-5 l; name petrol_amountLiters4
  note on mass of fuel used: Kg of petrol per km. Source : ecoinvent (transport, passenger car, large size, petrol, EURO 3, GLO)
- diesel, burned in building machine: 226.549 MJ; name DieselMJ; = DieselMJ_litersFuel_input * DieselMJ_density * DieselMJ_Net_Heat_Value*42.8; lognormal variance with pedigree 0.008, pedigree (1,1,4,1,1)
  Quantity calculated with the lower heating value of diesel and the volume of diesel burned by different types of machinery during all included steps (harvest, scarification, forest camp establishment and operation, forest road construction and maintenance and reforestation).
  Uncertainty: C
  property amount of exchange in liters 2 2.87952 l; name DieselMJ_amountLiters2
  property amount of exchange in liters 5 0.185498 l; name DieselMJ_amountLiters5
  property amount of exchange in liters 4 0.000118441 l; name DieselMJ_amountLiters4
  property amount of exchange in liters 1 3.21175 l; name DieselMJ_amountLiters1
  property density 0.84 kg/l; name DieselMJ_density
  property heating value, net 1 MJ; name DieselMJ_Net_Heat_Value
  property volume of fuel used 6.30142 l; name DieselMJ_litersFuel_input; = DieselMJ_amountLiters1 + DieselMJ_amountLiters2 + DieselMJ_amountLiters3 + DieselMJ_amountLiters4 + DieselMJ_amountLiters5
  property amount of exchange in liters 3 0.0245284 l; name DieselMJ_amountLiters3
- lubricating oil: 0.0592257 kg; name lubricants; = lubricants_amountLiters * lubricants_density; lognormal variance with pedigree 0.008, pedigree (1,1,4,1,1)
  Proxy for hydraulic oil, motor oil, lubricating fuels and greases.
  Uncertainty: C
  property amount of exchange in liters 1 0.067302 l; name lubricants_amountLiters
  property density 0.88 kg/l; name lubricants_density
  properties: wet mass 1 kg, dry mass 1 kg, carbon content, fossil 0.75, heating value, net 40.2 MJ
  note on carbon content, fossil: Lubricating oil is produced from diesel. C-content/dry mass of fats and oils considered 75%, from: ecoinvent v2.2 report, n 15a, pg 40
  note on amount of exchange in liters 1: Includes hydraulic oil, motor oil, lubricating fuels and greases.
  note on heating value, net: Literature value, Source: IPCC 2006, 2006 IPCC Guidelines for National Greenhouse Gas Inventories, Prepared by the National Greenhouse Gas Inventories Programme, Eggleston H.S., Buendia L., Miwa K., Ngara T. and Tanabe K. (eds). Published: IGES, Japan
- heat, central or small-scale, other than natural gas: 10.38 MJ; name lfo; = lfo_lFuel_Input * lfo_density * lfo_Net_Heat_Value*42.7 / lfo_fuel_use; lognormal variance with pedigree 0.21, pedigree (5,5,5,5,5)
  Light fuel oil burned for heating.
  Uncertainty: C
  property density 0.84 kg/l; name lfo_density
  property Corresponding fuel use 1.06383 MJ; name lfo_fuel_use; = 1/0.94
  property heating value, net 1 MJ; name lfo_Net_Heat_Value
  property fuel input in physical units, L 0.307866 l; name lfo_lFuel_Input
  note on Corresponding fuel use: Lower heating value of the fuel input related to the heat/electricity output
- propylene glycol, liquid: 0.000246147 kg; name PropGlycol; = AntifreezeVol * PropGlycol_density * PropGlycolContent; lognormal variance with pedigree 0.008, pedigree (1,1,4,1,1)
  Propylene glycol assumed as antifreeze ingredient. Water contained in antifreeze is excluded from this value.
  Uncertainty: C
  property dry mass 1 kg; name PropGlycol_DM
  property density 1.036 kg/l; name PropGlycol_density
  property water content 0; name PropGlycol_water_content
  property carbon content, fossil 0.47368; name PropGlycol_C_content_fossil
  property carbon content, non-fossil 0; name PropGlycol_C_content_non_fossil
  property wet mass 1 kg; name PropGlycol_WM
  property water in wet mass 0 kg; name PropGlycol_WWM
  properties: heating value, net 27.09 MJ

## Inputs from nature
- Wood, soft, standing [natural resource, biotic]: 1 m3; name WoodStanding; lognormal variance with pedigree 0.008, pedigree (1,1,4,1,1)
  This exchange represents only wood. The bark is not included in this exchange.
  Uncertainty: C
  property water content 0.7; name WoodStanding_water_content
  property carbon content, fossil 0; name WoodStanding_C_content_fossil
  property dry mass 461.364 kg; name WoodStanding_DM
  property wet mass 784.318 kg; name WoodStanding_WM
  property carbon content, non-fossil 0.494; name WoodStanding_C_content_non_fossil
  property water in wet mass 322.955 kg; name WoodStanding_WWM
  property heating value, gross 20.42 MJ; name WoodStanding_Gross_Heat_Value
- Energy, gross calorific value, in biomass [natural resource, biotic]: 9421.05 MJ; = WoodStanding * SawlogVolNoBark_DM * WoodStanding_Gross_Heat_Value; lognormal variance with pedigree 0.008, pedigree (1,1,4,1,1)
  Calculated value with standing volume including bark, wood density and gross calorific value.
  Uncertainty: C
- Occupation, forest, intensive [natural resource, land]: 6750.12 m2*year; = CutArea*ForestAge; lognormal variance with pedigree 0.008, pedigree (1,1,4,1,1)
  Calculated value with the cut area in m² and the time in years between two harvests.
  Uncertainty: C
- Transformation, to forest, intensive [natural resource, land]: 91.7466 m2; name CutArea; source Athena Sustainable Materials Institute 2009; lognormal variance with pedigree 0.1286, pedigree (1,3,4,1,1)
  Excludes forest roads.
- Transformation, from forest, extensive [natural resource, land]: 96.5754 m2; = CutArea+Roads; lognormal variance with pedigree 0.008, pedigree (1,1,4,1,1)
  Forest land transformed into roads and cut area.
  Uncertainty: C
- Carbon dioxide, in air [natural resource, in air]: 835.683 kg; = SawlogVolNoBark_DM * SawlogVolNoBark_C_content_non_fossil * 44 / 12; lognormal variance with pedigree 0.0086, pedigree (1,1,4,1,1)
  Includes bark. It is assumed that softwood contains 50% carbon and that bark and solidwood have the same density.
- Occupation, traffic area, rail/road embankment [natural resource, land]: 355.269 m2*year; = Roads * ForestAge; lognormal variance with pedigree 0.008, pedigree (1,1,4,1,1)
  Calculated value with the forest road area in m² and the time in years between two harvests.
  Uncertainty: C
- Transformation, to traffic area, rail/road embankment [natural resource, land]: 4.82877 m2; name Roads; = CutArea/0.95*0.05; lognormal variance with pedigree 0.1426, pedigree (2,4,4,5,1)
  Forest roads account for approximately 5% of the cut area.

## Sampling procedure
Mostly primary data from boreal forestlands (approximately 70 forest contractors) located in the province of Québec (Canada). Estimated data include biomass energy content.

## Extrapolations
This dataset has been extrapolated from year 2012 to the year of the calculation (2021). The uncertainty has been adjusted accordingly.
