# treatment of tallow to esterquat

Dataset: EcoSpold 2, unit process
Geography: RoW
Time period: 1992-01-01 to 2021-12-31
Technology level: current
Classification: EcoSpold01Categories: washing agents/tensides
Classification: ISIC rev.4 ecoinvent: 2023:Manufacture of soap and detergents, cleaning and polishing preparations, pe
Tags: ConvertedDataset
Scenario: Business-as-Usual
System model: Allocation, cut-off by classification
Generated by: Rainer Zah
Published in: Zah R. 2007
Database: ecoinvent
isCopyrightProtected: true
accessRestrictedTo: 1

## General comment
data based on the ECOSOL study of the European surfactant industry. Allocations in multioutput processes were made, using the relative mass outputs of products.
[This dataset was already contained in the ecoinvent database version 2. It was not individually updated during the transfer to ecoinvent version 3. Life Cycle Impact Assessment results may still have changed, as they are affected by changes in the supply chain, i.e. in other datasets. This dataset was generated following the ecoinvent quality guidelines for version 2. It may have been subject to central changes described in the ecoinvent version 3 change report (http://www.ecoinvent.org/database/ecoinvent-version-3/reports-of-changes/), and the results of the central updates were reviewed extensively. The changes added e.g. consistent water flows and other information throughout the database. The documentation of this dataset can be found in the ecoinvent reports of version 2, which are still available via the ecoinvent website. The change report linked above covers all central changes that were made during the conversion process.]

## Included activities end
This module contains material and energy input, production of waste and emissions for the production of esterquat out of tallow. Transports and infrastructure have been estimated. No water consumption and no process emissions are included.

## Geography
Data based on the European esterquat production

## Technology
Average technology for the production of esterquat out of tallow by esterification with triethanolamine and quaternication with DMS. Data representing typical European production mix in the mid 90s.

## Time period
data of published literature

## Parameters
- fraction, process water, to air: 0.4 dimensionless; name fraction_PW_to_air; lognormal variance with pedigree 0.092025, pedigree (4,4,3,2,4)

## Reference product
- tallow, unrefined: 0 kg; CPC 2151: Animal fats, unrendered; By-product classification Recyclable; CAS 61789-97-7
  EcoSpold01Location=CH
  production volume 0 kg; = ABS(tallow/ esterquat* esterquat_PV)
    Calculated from the production volume of esterquat in proportion to the respective output amounts.
  property heating value, net 22.1 MJ
    LHV is calculated based on the Carbon content of the product. More details can be found on the respective documentation.
  property carbon content, non-fossil 0.75
    Carbon content in fats of dry mass is considered to be 75% (from "Evolutionary and Biochemical Aspects", A.D. Kay and T. Vrede (in Global Ecology, 2010, Elsevier B.V., S.E. Jørgensen Ed.))
  property price 0.411 EUR2005
    Temporary price data. Calculated as 90% of purchasers price based on: 2005 import and export prices (total trades (USD) divided by total weight (kg) in biggest economies of the world: EU27, USA, Brasil, China, India, Japan and Russia) from UN Commodity Trade Statistics Database (http://data.un.org/Explorer.aspxDatabase [Accessed 2011.06.21]). Commodity: Lard stearin, oleostearin & oils, natural tallow oil
  property carbon content 0.75
    carbon content on a dry matter basis (reserved; not for manual entry)
  properties: water in wet mass 0.025 kg, dry mass 0.975 kg, carbon content, fossil 0, water content 0.025641, wet mass 1 kg, carbon allocation 0.73125 kg
- esterquat: 1 kg; By-product classification allocatable product; CPC 353: Soap, cleaning preparations, perfumes and toilet preparations
  EcoSpold01Location=RER
  production volume 1.60815e7 kg; name esterquat_PV
  properties: carbon content, non-fossil 0.518779, price 2.16 EUR2005, wet mass 1 kg, carbon content, fossil 0.196746, water in wet mass 0 kg, water content 0, dry mass 1 kg, heating value, net 21.68 MJ, carbon content 0.715525, carbon allocation 0.715525 kg

## By-products
- esterquat: 0 kg; By-product classification allocatable product; CPC 353: Soap, cleaning preparations, perfumes and toilet preparations
  EcoSpold01Location=RER
  production volume 0 kg; name esterquat_PV
    5% of total esterquat production is assumed to come from rendered animal fats, reflecting its share in total animal fats and vegetable oils. Total production volume is from year 2000 for Western Europe (151000000 kg; http://www.cefic.org/files/Publications/cesio_5.pdf) extrapolated by GDP to World 2005 with factor 3.2
  property carbon content, non-fossil 0.518779
    Esterquats are produced by esterification with triethanolamine and quaternication with DMS (ecoinvent v2.2 report 12-part 4). An average esterquat (Ester Quats: the novel class of cationic fabric softeners, Mishra, S. et al., 2007, Journal of Oleo Science, 56:269-276) can be resumed in the formula C41H82NO5. C6 of this molecule come from TEA, and C1 from DMS, so are fossile. The rest C34, are biogenic, coming from the fatty acid. The esterquat is in an Isopropanol solution (15% isopropanol). Isopropanol is C3H8O, and C3 have a fossile origin.
  property price 2.16 EUR2005
    Temporary price data. Calculated as 90% of purchasers price based on: 2005 import and export prices (total trades (USD) divided by total weight (kg) in biggest economies of the world: EU27, USA, Brasil, China, India, Japan and Russia) from UN Commodity Trade Statistics Database (http://data.un.org/Explorer.aspxDatabase [Accessed 2011.06.20]). Commodity: Quarternary ammonium salts and hydroxides, nes
  property carbon content, fossil 0.196746
    Esterquats are produced by esterification with triethanolamine and quaternication with DMS (ecoinvent v2.2 report 12-part 4). An average esterquat (Ester Quats: the novel class of cationic fabric softeners, Mishra, S. et al., 2007, Journal of Oleo Science, 56:269-276) can be resumed in the formula C41H82NO5. C6 of this molecule come from TEA, and C1 from DMS, so are fossile. The rest C34, are biogenic, coming from the fatty acid. The esterquat is in an 15% Isopropanol solution. Isopropanol is C3H8O, and C3 have a fossile origin.
  property heating value, net 21.68 MJ
    (same comment as for tallow, unrefined)
  property carbon content 0.715525
    carbon content on a dry matter basis (reserved; not for manual entry)
  properties: wet mass 1 kg, water in wet mass 0 kg, water content 0, dry mass 1 kg, carbon allocation 0.715525 kg

## Inputs from technosphere
- chemical factory, organics: 4e-10 unit; lognormal variance with pedigree 0.3632, pedigree (2,3,5,5,1)
  EcoSpold01Location=RER
- triethanolamine: 0.17 kg; lognormal variance with pedigree 0.0632, pedigree (2,3,5,5,1)
  EcoSpold01Location=RER
  properties: wet mass 1 kg, carbon content, fossil 0.483221, dry mass 1 kg, heating value, net 26.82 MJ
- nitrogen, liquid: 0.0028 kg; lognormal variance with pedigree 0.0632, pedigree (2,3,5,5,1)
  EcoSpold01Location=RER
  properties: dry mass 1 kg, wet mass 1 kg
- isopropanol: 0.15 kg; lognormal variance with pedigree 0.0632, pedigree (2,3,5,5,1)
  EcoSpold01Location=RER
  properties: dry mass 1 kg, heating value, net 34.3 MJ, wet mass 1 kg, carbon content, fossil 0.6
- heat, district or industrial, natural gas: 0 MJ; pedigree (1,1,1,1,1)
  properties: heating value, net 1 MJ
- wastewater, unpolluted: -0.00026 m3; name wastewater; lognormal variance with pedigree 0.0632, pedigree (2,3,5,5,1)
  EcoSpold01Location=CH
  production volume 4181.19 m3; = ABS( wastewater/ esterquat* esterquat_PV)
    (same comment as for tallow, unrefined)
  property price 0 EUR2005; name wastewater_price_EUR2005
  properties: carbon content, non-fossil 0.00178991, water content 2962.17, carbon content, fossil 0.00178991, dry mass 0.337476 kg, wet mass 1000 kg
  note on carbon content, fossil: Assumed to be like in tap water. Bicarbonate content is 2.93 mol/m3. CO2 content is 0.1 mol/m3 (ecoinvent v2.2 report 8, Tab 93.1).
- electricity, medium voltage: 0 kWh; pedigree (1,1,1,1,1)
- dimethyl sulfate: 0.13 kg; lognormal variance with pedigree 0.0632, pedigree (2,3,5,5,1)
  EcoSpold01Location=RER
  properties: dry mass 1 kg, heating value, net 11.54 MJ, wet mass 1 kg, carbon content, fossil 0.190476
- heat, district or industrial, other than natural gas: 0 MJ; pedigree (1,1,1,1,1)
  properties: heating value, net 1 MJ
- tallow, unrefined: 0.6 kg
  EcoSpold01Location=CH
  production volume 9.6489e6 kg
  properties: heating value, net 22.1 MJ, carbon content, non-fossil 0.75, dry mass 0.975 kg, price 0.411 EUR2005, water content 0.025641, wet mass 1 kg
  note on carbon content, non-fossil: Carbon content in fats of dry mass is considered to be 75% (from "Evolutionary and Biochemical Aspects", A.D. Kay and T. Vrede (in Global Ecology, 2010, Elsevier B.V., S.E. Jørgensen Ed.))
- heat, district or industrial, natural gas: 0.0243397, 1.57926 MJ (2 entries); lognormal variance with pedigree 0.0632, pedigree (2,3,5,5,1)
- electricity, medium voltage: 0.000214903, 4.12092e-5, 0.000691817, 0.0100619, 0.00141822, 0.00462079 kWh (6 entries); lognormal variance with pedigree 0.0632, pedigree (2,3,5,5,1)
- heat, district or industrial, other than natural gas: 0.000362809, 0.894699 MJ (2 entries); lognormal variance with pedigree 0.0632, pedigree (2,3,5,5,1)

## Inputs from nature
- Water, unspecified natural origin [natural resource, in water]: 0.18175 m3; name water_UNO_input; source EMPA - Swiss Federal Laboratories for Ma 1999; lognormal variance with pedigree 0.0546, pedigree (3,3,5,5,1)
  Calculated based on literature, (Vionnet, S., Quantis Water Database - Technical Report, 2012). Technology: fatty acid from cattle tallow, esterification of triethanolamine, quaternization with DMS.
  property water content 9081.65; name water_content
  property water in wet mass 999.89 kg; name WWM
  property carbon content, fossil 0.0104329; name C_content_fossil
  property dry mass 0.1101 kg; name DM
  property wet mass 1000 kg; name WM
  property carbon content, non-fossil 0; name C_content_non_fossil

## Emissions to nature
- Water [water, unspecified]: 0.10905 m3; name water_to_water_unspecified; lognormal variance with pedigree 0.0827, pedigree (2,2,5,5,1)
  Calculated value based on literature values and expert opinion. See comments in the parametres' comment field.
  property fraction, origin: fresh water 0; name fraction_origin_fresh_water_Ww
  property fraction, origin: salt water 0; name fraction_origin_salt_water_Ww
  property fraction, origin: unspecified 1; name fraction_origin_unspecified_Ww
- Water [air, unspecified]: 0.0727 m3; name water_to_air_unspecified; lognormal variance with pedigree 0.0827, pedigree (2,2,5,5,1)
  (same comment as for Water)
  property fraction, origin: unspecified 1; name fraction_origin_unspecified
  property fraction, origin: fresh water 0; name fraction_origin_fresh_water
  property fraction, origin: salt water 0; name fraction_origin_salt_water

## Sampling procedure
data out of ECOSOL study of European Surfactant Industry. Common translation rules used, reported in Chemical report (Althaus et al. 2003).

## Extrapolations
see technology This dataset has been copied from an original dataset covering the geography RER. The uncertainty has been adjusted accordingly.

## Review by Heiko Kunst 2003-07-04
Passed.
