# treatment of residue from mechanical treatment, laser printer, municipal waste incineration

Dataset: EcoSpold 2, unit process
Geography: RoW
Time period: 2006-01-01 to 2021-12-31
Technology level: current
Classification: ISIC rev.4 ecoinvent: 3821:Treatment and disposal of non-hazardous waste
Synonyms: municipal waste incineration; Siedlungsabfallverbrennung; Kehrichtverbrennung
Scenario: Business-as-Usual
System model: Allocation, cut-off by classification
Share of production covered: 1.8 %
Generated by: Gabor Doka
Published in: Doka G. 2013
Database: ecoinvent
isCopyrightProtected: true
accessRestrictedTo: 1

## General comment
This dataset represents the activity of waste disposal of residue from mechanical treatment, laser printer in a municipal solid waste incinerator (MSWI) // Recommended use of this dataset: Only for incineration of shredder residues generated in the recycling (mechanical treatment) of laser printers // Inventoried waste contains 1.92% rubber; 47.1% Plastics from electronic consumer goods; 47.1% Plastics from electronic industrial goods; 1.42% MSWI iron scrap; 0.151% Alu in MSW; 2.25% wiring copper; . // Waste composition (wet, in ppm): upper heating value 34.74 MJ/kg; lower heating value 33.3 MJ/kg; H2O 8644.9; O 50262; H 71805; C 784170; S 411.86; N 12537; P 482.64; B n.a.; Cl 6388.1; Br 5184.3; F 235.65; I n.a.; Ag n.a.; As 7.0695; Ba 166.84; Cd 142.06; Co 27.785; Cr 66.493; Cu 25690; Hg 0.80123; Mn 40.518; Mo 2.8278; Ni 487.12; Pb 144.39; Sb 4523; Se 1.8471; Sn 200.84; V 4.2501; Zn 725.91; Be 0.43978; Sc n.a.; Sr 77.842; Ti 4220; Tl 0.35183; W n.a.; Si 3233.4; Fe 13043; Ca 2933.4; Al 3901.8; K 110.28; Mg n.a.; Na 131.49; // Share of carbon in waste that is biogenic 0%. // Share of metals in waste not oxidised and bulk-recyclable (exclude very small or thin parts) Iron: 88.6%; Alu: 38.39%; Copper: 87.53%. // One kg of this waste produces 0.07209 kg of slag and 0.02138 kg of residues, which are landfilled. Additional solidification with 0.008552 kg of cement. // Net energy production: 4.27MJ/kg electric energy and 8.3MJ/kg thermal energy. // Recovery of metal scrap to recycling: 6.6787g iron scrap, 0.41595g aluminium scrap, 6.8803g copper scrap.

## Included activities start
waste incineration from waste reception gate and delivery into waste bunker at incinerator plant site (without transports to the incinerator)

## Included activities end
Waste-specific short-term emissions to water from leachate. Long-term emissions from landfill to ground water.

## Geography
Specific to the technology mix encountered in Switzerland in 2010. Well applicable to modern incineration practices in Europe, North America or Japan.

## Technology
average Swiss MSWI plants in 2010 (grate incinerators) with electrostatic precipitator for fly ash (ESP), wet flue gas scrubber and 25% SNCR , 42.77% SCR-high dust , 32.68% SCR-low dust -DeNOx facilities and 0% without Denox (weighted according to mass of burnt waste, representing Swiss average). Efficiency of iron scrap separation from slag : 58%. Efficiency of non-ferrous scrap separation from slag : 31%. Gross electric efficiency technology mix 15.84% and Gross thermal efficiency technology mix 28.51%

## Time period
Waste composition as given in literature reference, theoretical data or other source. Transfer coefficients for modern MSWI.

## Reference product
- residue from mechanical treatment, laser printer: -1 kg; CPC 39: Wastes or scraps; By-product classification Waste
  Main reference product of this activity (supply of disposal service).
  production volume 4.3021e7 kg
    based on estimate on MSW in WTE globally and estimate of share of WEEE residues in Swiss MSW based on unqualified estimate of laser printer waste in CH and rate of this residue waste per device (from Hischier et al. 2007-V)
  property price 0 EUR2005
    Waste products are assigned a price of zero as they are assumed to require further treatment.
  property heating value, net 33.3 MJ
    Value taken from the general comment of the treatment dataset.
  property carbon content 0.796604
    carbon content on a dry matter basis (reserved; not for manual entry)
  properties: carbon content, non-fossil 0, water content 0, dry mass 1 kg, wet mass 1 kg, water in wet mass 0 kg, carbon content, fossil 0.796604, carbon allocation 0.796604 kg

## By-products
All rows: pedigree (1,1,1,1,1)
- copper scrap, sorted, pressed: 0 kg; CPC 39361: Waste and scrap of copper; By-product classification Recyclable
  Copper scrap recovered from this waste.
  Uncertainty: uncertainty calculated from uncertainty in waste composition, uncertainty of share of recyclable metal, uncertainty of transfer coefficient to bottom ash, uncertainty of the efficiency of scrap removal in MSWI plant.
  production volume 0 kg
    calculated in proportion to reference product waste input to incinerator
  property price 2.84 EUR2005
    Temporary price data. Calculated as 90% of purchasers price based on: Source: USGS Mineral Yearbook 2007, Table 1 in <http://minerals.usgs.gov/minerals/pubs/commodity/recycle/myb1-2007-recyc.pdf>
  property carbon content 0
    carbon content on a dry matter basis (reserved; not for manual entry)
  properties: dry mass 1 kg, carbon content, non-fossil 0, carbon content, fossil 0, wet mass 1 kg, water in wet mass 0 kg, water content 0, carbon allocation 0 kg
- aluminium scrap, post-consumer, prepared for melting: 0 kg; By-product classification Recyclable; CPC 39363: Waste and scrap of aluminium
  Aluminium scrap recovered from this waste.
  Uncertainty: uncertainty calculated from uncertainty in waste composition, uncertainty of share of recyclable metal, uncertainty of transfer coefficient to bottom ash, uncertainty of the efficiency of scrap removal in MSWI plant.
  production volume 0 kg
    calculated in proportion to reference product waste input to incinerator
  property price 0.806 EUR2005
    Temporary price data. Calculated as 90% of purchasers price based on: 2005 import and export prices (total trades (USD) divided by total weight (kg) in biggest economies of the world: EU27, USA, Brasil, China, India, Japan and Russia) from UN Commodity Trade Statistics Database (http://data.un.org/Explorer.aspxDatabase [Accessed 2011.06.17]). Commodity: Waste or scrap, aluminium
  property carbon content 0
    carbon content on a dry matter basis (reserved; not for manual entry)
  properties: water content 0, dry mass 1 kg, carbon content, fossil 0, wet mass 1 kg, carbon content, non-fossil 0, water in wet mass 0 kg, carbon allocation 0 kg
- heat, for reuse in municipal waste incineration only: 0 MJ; name E_th_prod_MSWI; By-product classification allocatable product; CPC 17300: Steam and hot water
  Net electricity generated from this waste and used in internal MSWI plant energy redistribution.
  Uncertainty: uncertainty is calculated from uncertainties in waste composition and uncertainties in energy efficiency and the uncertainty in internal energy demand
  production volume 3.5694e8 MJ
    calculated in proportion to reference product waste input to incinerator
  property true value relation 0.1842; name E_th_prod_MSWI_true_value_relation
    property to calculate "true value" from
  property exergy 0.1842 MJ; name E_th_prod_MSWI_exergy
    This exergy property is based on the exergy content of the product.
  property price 0.0106 EUR2005; name E_th_prod_MSWI_price_EUR2005
    Average European district heat price from Ecoheatcool and Euroheat 2005-2006, Ecoheat Work package 1: The European heat market. Final report. 10.6 EUR/GJ i s the price of district heat. http://www.solarthermalworld.org/files/Ecoheatcool%20WP1%20Web.pdf?download
- electricity, for reuse in municipal waste incineration only: 0 kWh; name E_el_prod_MSWI; CPC 17100: Electrical energy; By-product classification allocatable product
  (same comment as for heat, for reuse in municipal waste incineration only)
  production volume 5.1068e7 kWh
    calculated in proportion to reference product waste input to incinerator
  property exergy 3.6 MJ; name E_el_prod_MSWI_exergy
    This exergy property is based on the exergy content of the product.
  property true value relation 3.6; name E_el_prod_MSWI_true_value_relation
    property to calculate "true value" from
  property price 0.1 EUR2005; name E_el_prod_MSWI_price_EUR2005
    Estimated to be the same price as in case of electricity, medium voltage.
- iron scrap, sorted, pressed: 0 kg; CPC 39310: Slag, dross, scalings and other waste from the manufacture of iron or steel; By-product classification Recyclable
  Iron scrap recovered from this waste.
  Uncertainty: uncertainty calculated from uncertainty in waste composition, uncertainty of share of recyclable metal, uncertainty of transfer coefficient to bottom ash, uncertainty of the efficiency of scrap removal in MSWI plant.
  production volume 0 kg
    calculated in proportion to reference product waste input to incinerator
  property price 0.175 EUR2005
    Temporary price data. Calculated as 90% of purchasers price based on: 2005 import and export prices (total trades (USD) divided by total weight (kg) in biggest economies of the world: EU27, USA, Brasil, China, India, Japan and Russia) from UN Commodity Trade Statistics Database (http://data.un.org/Explorer.aspxDatabase [Accessed 2011.06.20]). Commodity: Waste or scrap, of cast iron
  property carbon content 0
    carbon content on a dry matter basis (reserved; not for manual entry)
  properties: carbon content, fossil 0, dry mass 1 kg, carbon content, non-fossil 0, water in wet mass 0 kg, wet mass 1 kg, water content 0, carbon allocation 0 kg

## Inputs from technosphere
- iron (III) chloride, without water, in 40% solution state: 0.00013079 kg; lognormal variance with pedigree 0.26368, pedigree (1,1,4,1,1)
  Auxilliary inputs for the wastewater treatment stage of the incinerator plant.
  Uncertainty: uncertainty calculated from uncertainty in average FeCl3 input, of transfer coefficients in the incinerator, and the uncertainty of the waste composition of this waste
  properties: dry mass 1 kg, wet mass 1 kg
- heat, district or industrial, natural gas: 0 MJ; pedigree (1,1,1,1,1)
  Input to DeNOx stage, to heat up flue gas in low-dust SCR.
  Uncertainty: uncertainty calculated from uncertainty in average DeNOx input, uncertainty in the share of thermal NOx, uncertainty of nitrogen content in average municipal waste and the uncertainty in nitrogen content in *this* waste.
  properties: heating value, net 1 MJ
- process-specific burdens, residual material landfill: 0 kg; pedigree (1,1,1,1,1)
  Mass-specific expenditures required for landfilling of incineration residues.
  Uncertainty: uncertainty is calculated from uncertainties in waste composition and transfer coefficients in incinerator
- sodium hydroxide, without water, in 50% solution state: 0.00091127 kg; lognormal variance with pedigree 0.25941, pedigree (1,1,4,1,1)
  Auxilliary inputs for the flue gas treatment stage of the incinerator plant.
  Uncertainty: uncertainty calculated from uncertainty in average NaOH input, of transfer coefficients in the incinerator, and the uncertainty of the waste composition of this waste
  properties: wet mass 1 kg, dry mass 1 kg, heating value, net 3.03 MJ
- waste cement, hydrated: 0 kg; pedigree (1,1,1,1,1)
  Hydrated cement output for solidification of landfilled residual material.
  Uncertainty: Uncertainty calculated from uncertainty of the waste composition of this waste and transfer coefficients in the incinerator and of the solidification recipe.
  production volume 0 kg
    calculated in proportion to reference product waste input to incinerator
  properties: dry mass 1 kg, wet mass 1 kg
- titanium dioxide: 0.00013968 kg; lognormal variance with pedigree 1.0333, pedigree (1,1,4,1,1)
  Input to DeNOx stage (TiO2 catalyst carrier)
  Uncertainty: uncertainty calculated from uncertainty in average DeNOx input, uncertainty in the share of thermal NOx, uncertainty of nitrogen content in average municipal waste and the uncertainty in nitrogen content in *this* waste.
  properties: wet mass 1 kg, dry mass 1 kg
- chemical, organic: 5.0643e-5 kg; lognormal variance with pedigree 0.75214, pedigree (1,1,4,1,1)
  Auxilliary inputs for the wastewater treatment stage of the incinerator plant. Proxy for (pure) Trisodium-trimercapto-s-triazine (CAS 17766-26-6), used as 15% diluted solution, aka TMT15.
  Uncertainty: uncertainty calculated from uncertainty in average TMT15 input, of transfer coefficients in the incinerator, and the uncertainty of the waste composition of this waste
  properties: dry mass 1 kg, wet mass 1 kg, heating value, net 19.03 MJ, carbon content, fossil 0.628
- ammonia, anhydrous, liquid: 0 kg; pedigree (1,1,1,1,1)
  Input to DeNOx stage (100% NH3).
  Uncertainty: uncertainty calculated from uncertainty in average DeNOx input, uncertainty in the share of thermal NOx, uncertainty of nitrogen content in average municipal waste and the uncertainty in nitrogen content in *this* waste.
  properties: dry mass 1 kg, wet mass 1 kg
- process-specific burdens, slag landfill: 0 kg; pedigree (1,1,1,1,1)
  Mass-specific expenditures required for landfilling of bottom ash.
  Uncertainty: uncertainty is calculated from uncertainties in waste composition and transfer coefficients in incinerator
- residual material landfill: 4.4542e-11 unit; lognormal variance with pedigree 0.062439, pedigree (1,1,4,1,1)
  Landfill infrastructure required for landfilling of incineration residues.
  Uncertainty: uncertainty is calculated from uncertainties in waste composition and transfer coefficients in incinerator
- municipal waste incineration facility: 2.5e-10 unit
  Demands per kilogram waste.
- transport, freight, lorry, unspecified: 0 metric ton*km; pedigree (1,1,1,1,1)
  Transport services to transport incineration residues to landfills.
  Uncertainty: uncertainty calculated from uncertainty of the waste composition of this waste, uncertainty of transfer coefficients and the uncertainty in generic transportation distances
- chemical, inorganic: 0.00030572 kg; lognormal variance with pedigree 0.22049, pedigree (1,1,4,1,1)
  Auxilliary inputs for the wastewater treatment stage of the incinerator plant. Proxy for Polyelectrolyte.
  Uncertainty: uncertainty calculated from uncertainty in average Polyelectrolyte input, of transfer coefficients in the incinerator, and the uncertainty of the waste composition of this waste
  properties: wet mass 1 kg, carbon content, fossil 0.003, dry mass 1 kg
- slag landfill: 1.2536e-10 unit; lognormal variance with pedigree 0.050414, pedigree (1,1,4,1,1)
  Landfill infrastructure required for landfilling of bottom ash.
  Uncertainty: uncertainty is calculated from uncertainties in waste composition and transfer coefficients in incinerator
- chromium oxide, flakes: 2.8507e-6 kg; lognormal variance with pedigree 1.0333, pedigree (1,1,4,1,1)
  Input to DeNOx stage.
  Uncertainty: uncertainty calculated from uncertainty in average DeNOx input, uncertainty in the share of thermal NOx, uncertainty of nitrogen content in average municipal waste and the uncertainty in nitrogen content in *this* waste.
  properties: dry mass 1 kg, wet mass 1 kg
- hydrochloric acid, without water, in 30% solution state: 8.0356e-5 kg; lognormal variance with pedigree 0.22049, pedigree (1,1,4,1,1)
  Auxilliary inputs for the wastewater treatment stage of the incinerator plant.
  Uncertainty: uncertainty calculated from uncertainty in average HCl input, of transfer coefficients in the incinerator, and the uncertainty of the waste composition of this waste
  properties: dry mass 1 kg, wet mass 1 kg, heating value, net 3.32 MJ
- quicklime, milled, packed: 0.0040422 kg; lognormal variance with pedigree 0.33012, pedigree (1,1,4,1,1)
  Auxilliary inputs for the flue gas treatment stage of the incinerator plant.
  Uncertainty: uncertainty calculated from uncertainty in average CaO input, of transfer coefficients in the incinerator, and the uncertainty of the waste composition of this waste
  properties: dry mass 0.99 kg, water content 0.010101, wet mass 1 kg
- cement, unspecified: 0 kg; pedigree (1,1,1,1,1)
  Cement required for solidification of landfilled residual material.
  Uncertainty: Uncertainty calculated from uncertainty of the waste composition of this waste, of transfer coefficients in the incinerator and of the solidification recipe.
  properties: wet mass 1 kg, dry mass 1 kg
- water, decarbonised: 0 kg; pedigree (1,1,1,1,1)
  Incinerator process water used in flue gas scrubber stage.
  Uncertainty: uncertainty calculated from uncertainty in average water input, and the uncertainty of the waste composition of this waste
  properties: wet mass 1 kg
- copper scrap, sorted, pressed: -0.0068803 kg; lognormal variance with pedigree 0.27641, pedigree (1,1,4,1,1)
  (same comment as for copper scrap, sorted, pressed)
  production volume 296000 kg
  properties: price 2.84 EUR2005, dry mass 1 kg, wet mass 1 kg
- aluminium scrap, post-consumer, prepared for melting: -0.00041595 kg; lognormal variance with pedigree 0.50094, pedigree (1,1,4,1,1)
  (same comment as for aluminium scrap, post-consumer, prepared for melting)
  production volume 17895 kg
  properties: dry mass 1 kg, wet mass 1 kg, price 0.806 EUR2005
- iron scrap, sorted, pressed: -0.0066787 kg; lognormal variance with pedigree 0.35386, pedigree (1,1,4,1,1)
  (same comment as for iron scrap, sorted, pressed)
  production volume 287330 kg
  properties: price 0.175 EUR2005, dry mass 1 kg, wet mass 1 kg
- heat, district or industrial, natural gas: 0.00464027, 0.11119, 0.30108 MJ (3 entries); lognormal variance with pedigree 0.67625, pedigree (1,1,4,1,1)
  (same comment as for heat, district or industrial, natural gas)
- process-specific burdens, residual material landfill: 0.00604786, 0.0153321 kg (2 entries); lognormal variance with pedigree 0.062439, pedigree (1,1,4,1,1)
  (same comment as for process-specific burdens, residual material landfill)
- waste cement, hydrated: -0.00604786, -0.0153321 kg (2 entries); lognormal variance with pedigree 0.071523, pedigree (1,1,4,1,1)
  (same comment as for waste cement, hydrated)
  production volume 919800 kg
- ammonia, anhydrous, liquid: 0.000467332, 4.01728e-5, 6.24985e-5, 0.000123832, 0.000121322, 1.27159e-5, 5.68448e-5, 0.00134478 kg (8 entries); lognormal variance with pedigree 0.67625, pedigree (1,1,4,1,1)
  (same comment as for ammonia, anhydrous, liquid)
- process-specific burdens, slag landfill: 0.0199477, 0.0505703 kg (2 entries); lognormal variance with pedigree 0.050414, pedigree (1,1,4,1,1)
  (same comment as for process-specific burdens, slag landfill)
- transport, freight, lorry, unspecified: 0.000420673, 6.58619e-5, 0.00318937 metric ton*km (3 entries); lognormal variance with pedigree 0.036098, pedigree (1,1,4,1,1)
  (same comment as for transport, freight, lorry, unspecified)
- cement, unspecified: 0.00123489, 0.000256943, 1.88193e-5, 5.36413e-5, 0.00121311, 3.57055e-5, 0.000392152, 4.7446e-5, 0.00529939 kg (9 entries); lognormal variance with pedigree 0.071523, pedigree (1,1,4,1,1)
  (same comment as for cement, unspecified)
- water, decarbonised: 0.0326802, 0.0850337, 0.342961, 0.0837492, 0.0168834, 0.055516, 0.00306481, 0.0436729, 0.101732, 0.638138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 kg (12 entries); lognormal variance with pedigree 0.26368, pedigree (1,1,4,1,1)
  (same comment as for water, decarbonised)

## Inputs from nature
- Oxygen [natural resource, in air]: 2.7056 kg; lognormal variance with pedigree 0.017349, pedigree (1,1,4,1,1)
  Oxygen from ambient air needed to combust and oxidise this waste. Net demand, i.e. without O2 leaving the plant in flue gas uncombusted.
  Uncertainty: uncertainty is calculated from uncertainties in waste composition and transfer coefficients to flue gas and soild residues in incinerator

## Emissions to nature
- Barium [water, surface water]: 2.2455e-8 kg; lognormal variance with pedigree 1.2004, pedigree (1,1,4,1,1)
  Emissions to water from waste composition and transfer coefficients in incinerator and landfills.
  Uncertainty: uncertainty is calculated from uncertainties in waste composition and transfer coefficients in incinerator and landfills
- Copper, ion [water, ground-, long-term]: 0.018488 kg; lognormal variance with pedigree 0.26535, pedigree (1,1,4,1,1)
  Long-term emissions from landfilling of incineration residues.
  Uncertainty: uncertainty is calculated from uncertainties in waste composition and transfer coefficients in incinerator and landfills.
- Lead [water, ground-, long-term]: 7.2613e-5 kg; lognormal variance with pedigree 3.9385, pedigree (1,1,4,1,1)
  (same comment as for Copper, ion)
- Arsenic, ion [water, ground-, long-term]: 2.117e-6 kg; lognormal variance with pedigree 1.3224, pedigree (1,1,4,1,1)
  (same comment as for Copper, ion)
- Mercury [air, urban air close to ground]: 2.2718e-8 kg; lognormal variance with pedigree 1.6132, pedigree (1,1,4,1,1)
  Emission to air from waste composition and transfer coefficients.
  Uncertainty: uncertainty is calculated from uncertainties in waste composition and transfer coefficients in incinerator
- Carbon dioxide, fossil [air, urban air close to ground]: 2.8579 kg; lognormal variance with pedigree 0.0098539, pedigree (1,1,4,1,1)
  (same comment as for Mercury)
- Silicon [air, urban air close to ground]: 4.353e-9 kg; lognormal variance with pedigree 0.57972, pedigree (1,1,4,1,1)
  (same comment as for Mercury)
- Hydrogen chloride [air, urban air close to ground]: 3.6352e-6 kg; lognormal variance with pedigree 0.45306, pedigree (1,1,4,1,1)
  (same comment as for Mercury)
- Nickel [air, urban air close to ground]: 5.9324e-7 kg; lognormal variance with pedigree 0.78174, pedigree (1,1,4,1,1)
  (same comment as for Mercury)
- Sodium [air, urban air close to ground]: 1.0796e-6 kg; lognormal variance with pedigree 0.94306, pedigree (1,1,4,1,1)
  (same comment as for Mercury)
- Strontium [water, surface water]: 4.9012e-8 kg; lognormal variance with pedigree 1.715, pedigree (1,1,4,1,1)
  (same comment as for Barium)
- Benzene, pentachloro- [air, urban air close to ground]: 7.1094e-11 kg; lognormal variance with pedigree 0.075042, pedigree (1,1,4,1,1)
  Incomplete combustion product emitted to air.
  Uncertainty: uncertainty calculated from uncertainty in average operation emissions, and the uncertainty of the flue gas volume from this waste.
- Antimony [water, surface water]: 0.0015579 kg; lognormal variance with pedigree 0.48605, pedigree (1,1,4,1,1)
  (same comment as for Barium)
- Selenium [air, urban air close to ground]: 2.2036e-8 kg; lognormal variance with pedigree 1.5056, pedigree (1,1,4,1,1)
  (same comment as for Mercury)
- Chromium, ion [water, surface water]: 3.8425e-9 kg; lognormal variance with pedigree 1.0622, pedigree (1,1,4,1,1)
  (same comment as for Barium)
- Calcium, ion [water, ground-, long-term]: 0.0021849 kg; lognormal variance with pedigree 0.49082, pedigree (1,1,4,1,1)
  (same comment as for Copper, ion)
- TOC, Total Organic Carbon [water, surface water]: 0.00040059 kg; lognormal variance with pedigree 0.032845, pedigree (1,1,4,1,1)
  (same comment as for Barium)
- Hydrogen fluoride [air, urban air close to ground]: 1.5898e-6 kg; lognormal variance with pedigree 0.86716, pedigree (1,1,4,1,1)
  (same comment as for Mercury)
- Benzene [air, urban air close to ground]: 1.3456e-8 kg; lognormal variance with pedigree 0.075042, pedigree (1,1,4,1,1)
  (same comment as for Benzene, pentachloro-)
- Silicon [water, ground-, long-term]: 0.00028603 kg; lognormal variance with pedigree 5.3103, pedigree (1,1,4,1,1)
  (same comment as for Copper, ion)
- Chromium [air, urban air close to ground]: 4.3212e-8 kg; lognormal variance with pedigree 1.046, pedigree (1,1,4,1,1)
  (same comment as for Mercury)
- Tin, ion [water, surface water]: 5.2141e-9 kg; lognormal variance with pedigree 1.5222, pedigree (1,1,4,1,1)
  (same comment as for Barium)
- Molybdenum [water, ground-, long-term]: 2.0517e-6 kg; lognormal variance with pedigree 1.4402, pedigree (1,1,4,1,1)
  (same comment as for Copper, ion)
- Dinitrogen monoxide [air, urban air close to ground]: 0.00018698 kg; lognormal variance with pedigree 1.1226, pedigree (1,1,4,1,1)
  Nitrogen species emitted to air after DeNOx stage.
  Uncertainty: uncertainty calculated from uncertainty in average N-emissions and uncertainty in the share of thermal NOx and the uncertainty in nitrogen content in *this* waste.
- Fluoride [water, ground-, long-term]: 0.00021128 kg; lognormal variance with pedigree 0.47848, pedigree (1,1,4,1,1)
  (same comment as for Copper, ion)
- Vanadium, ion [water, surface water]: 2.7006e-9 kg; lognormal variance with pedigree 1.6032, pedigree (1,1,4,1,1)
  (same comment as for Barium)
- NMVOC, non-methane volatile organic compounds, unspecified origin [air, urban air close to ground]: 6.1239e-7 kg; lognormal variance with pedigree 0.075042, pedigree (1,1,4,1,1)
  (same comment as for Benzene, pentachloro-)
- Thallium [water, ground-, long-term]: 2.053e-7 kg; lognormal variance with pedigree 1.286, pedigree (1,1,4,1,1)
  (same comment as for Copper, ion)
- Iron, ion [water, surface water]: 7.9905e-8 kg; lognormal variance with pedigree 1.2577, pedigree (1,1,4,1,1)
  (same comment as for Barium)
- Dioxins, measured as 2,3,7,8-tetrachlorodibenzo-p-dioxin [air, urban air close to ground]: 2.6911e-14 kg; lognormal variance with pedigree 0.37463, pedigree (1,1,4,1,1)
  (same comment as for Benzene, pentachloro-)
- Ammonia [air, urban air close to ground]: 2.6213e-6 kg; lognormal variance with pedigree 0.73142, pedigree (1,1,4,1,1)
  (same comment as for Dinitrogen monoxide)
- DOC, Dissolved Organic Carbon [water, surface water]: 0.00040059 kg; lognormal variance with pedigree 0.032845, pedigree (1,1,4,1,1)
  (same comment as for Barium)
- COD, Chemical Oxygen Demand [water, ground-, long-term]: 0.0058888 kg; lognormal variance with pedigree 0.0215, pedigree (1,1,4,1,1)
  (same comment as for Copper, ion)
- Zinc, ion [water, surface water]: 6.5317e-8 kg; lognormal variance with pedigree 0.6087, pedigree (1,1,4,1,1)
  (same comment as for Barium)
- Chromium VI [water, surface water]: 1.3835e-6 kg; lognormal variance with pedigree 1.1063, pedigree (1,1,4,1,1)
  (same comment as for Barium)
- Phosphate [water, surface water]: 2.6573e-7 kg; lognormal variance with pedigree 0.56799, pedigree (1,1,4,1,1)
  (same comment as for Barium)
- Fluoride [water, surface water]: 1.8019e-5 kg; lognormal variance with pedigree 0.52724, pedigree (1,1,4,1,1)
  (same comment as for Barium)
- Carbon monoxide, fossil [air, urban air close to ground]: 2.2874e-5 kg; lognormal variance with pedigree 0.74917, pedigree (1,1,4,1,1)
  (same comment as for Benzene, pentachloro-)
- Nickel, ion [water, surface water]: 3.2667e-7 kg; lognormal variance with pedigree 1.3268, pedigree (1,1,4,1,1)
  (same comment as for Barium)
- Chloride [water, surface water]: 0.004906 kg; lognormal variance with pedigree 0.34398, pedigree (1,1,4,1,1)
  (same comment as for Barium)
- Chromium VI [water, ground-, long-term]: 4.6508e-6 kg; lognormal variance with pedigree 1.9576, pedigree (1,1,4,1,1)
  (same comment as for Copper, ion)
- BOD5, Biological Oxygen Demand [water, ground-, long-term]: 0.0019262 kg; lognormal variance with pedigree 0.0215, pedigree (1,1,4,1,1)
  (same comment as for Copper, ion)
- Vanadium [air, urban air close to ground]: 1.4994e-8 kg; lognormal variance with pedigree 1.4045, pedigree (1,1,4,1,1)
  (same comment as for Mercury)
- Nitrate [water, ground-, long-term]: 0.0004509 kg; lognormal variance with pedigree 0.35634, pedigree (1,1,4,1,1)
  (same comment as for Copper, ion)
- Cadmium, ion [water, ground-, long-term]: 1.041e-5 kg; lognormal variance with pedigree 6.3767, pedigree (1,1,4,1,1)
  (same comment as for Copper, ion)
- Sodium, ion [water, surface water]: 3.5727e-5 kg; lognormal variance with pedigree 0.50131, pedigree (1,1,4,1,1)
  (same comment as for Barium)
- Lead [water, surface water]: 1.3392e-8 kg; lognormal variance with pedigree 0.77351, pedigree (1,1,4,1,1)
  (same comment as for Barium)
- Heat, waste [water, surface water]: 5.8865 MJ; lognormal variance with pedigree 0.023426, pedigree (1,1,4,1,1)
  Waste heat generated from heating value of this waste plus any electricity required to process it.
  Uncertainty: uncertainty is calculated from uncertainties in waste composition and uncertainties in energy efficiency and the uncertainty in internal energy demand
- Zinc [air, urban air close to ground]: 4.846e-7 kg; lognormal variance with pedigree 0.73076, pedigree (1,1,4,1,1)
  (same comment as for Mercury)
- Barium [water, ground-, long-term]: 8.4024e-5 kg; lognormal variance with pedigree 2.2604, pedigree (1,1,4,1,1)
  (same comment as for Copper, ion)
- Particulates, < 2.5 um [air, urban air close to ground]: 1.6066e-6 kg; lognormal variance with pedigree 0.37463, pedigree (1,1,4,1,1)
  (same comment as for Benzene, pentachloro-)
- Cyanide [air, urban air close to ground]: 4.0171e-5 kg; lognormal variance with pedigree 1.1226, pedigree (1,1,4,1,1)
  (same comment as for Dinitrogen monoxide)
- Thallium [water, surface water]: 2.1553e-10 kg; lognormal variance with pedigree 1.8852, pedigree (1,1,4,1,1)
  (same comment as for Barium)
- Heat, waste [air, urban air close to ground]: 25.587 MJ; lognormal variance with pedigree 0.023426, pedigree (1,1,4,1,1)
  (same comment as for Heat, waste)
- Particulates, > 2.5 um, and < 10um [air, urban air close to ground]: 8.0732e-9 kg; lognormal variance with pedigree 0.17022, pedigree (1,1,4,1,1)
  (same comment as for Benzene, pentachloro-)
- Silicon [water, surface water]: 7.0141e-7 kg; lognormal variance with pedigree 0.71257, pedigree (1,1,4,1,1)
  (same comment as for Barium)
- Benzene, hexachloro- [air, urban air close to ground]: 2.8136e-11 kg; lognormal variance with pedigree 0.075042, pedigree (1,1,4,1,1)
  (same comment as for Benzene, pentachloro-)
- Strontium [air, urban air close to ground]: 7.7842e-9 kg; lognormal variance with pedigree 1.0387, pedigree (1,1,4,1,1)
  (same comment as for Mercury)
- Cadmium, ion [water, surface water]: 1.3636e-8 kg; lognormal variance with pedigree 0.80008, pedigree (1,1,4,1,1)
  (same comment as for Barium)
- Arsenic, ion [water, surface water]: 4.8971e-6 kg; lognormal variance with pedigree 1.2147, pedigree (1,1,4,1,1)
  (same comment as for Barium)
- Sulfur dioxide [air, urban air close to ground]: 4.2653e-6 kg; lognormal variance with pedigree 0.79413, pedigree (1,1,4,1,1)
  (same comment as for Mercury)
- Lead [air, urban air close to ground]: 1.1449e-8 kg; lognormal variance with pedigree 0.95777, pedigree (1,1,4,1,1)
  (same comment as for Mercury)
- Methane, fossil [air, urban air close to ground]: 2.0184e-7 kg; lognormal variance with pedigree 0.075042, pedigree (1,1,4,1,1)
  (same comment as for Benzene, pentachloro-)
- Sulfate [water, surface water]: 0.00020642 kg; lognormal variance with pedigree 0.3798, pedigree (1,1,4,1,1)
  (same comment as for Barium)
- Zinc, ion [water, ground-, long-term]: 0.00022277 kg; lognormal variance with pedigree 2.8171, pedigree (1,1,4,1,1)
  (same comment as for Copper, ion)
- Copper [air, urban air close to ground]: 2.7576e-7 kg; lognormal variance with pedigree 0.31479, pedigree (1,1,4,1,1)
  (same comment as for Mercury)
- TOC, Total Organic Carbon [water, ground-, long-term]: 0.0023302 kg; lognormal variance with pedigree 0.0215, pedigree (1,1,4,1,1)
  (same comment as for Copper, ion)
- Cobalt [water, ground-, long-term]: 2.2634e-5 kg; lognormal variance with pedigree 1.0654, pedigree (1,1,4,1,1)
  (same comment as for Copper, ion)
- Phosphorus [air, urban air close to ground]: 4.7895e-7 kg; lognormal variance with pedigree 0.78174, pedigree (1,1,4,1,1)
  (same comment as for Mercury)
- Water [air, urban air close to ground]: 0.0014885 m3; lognormal variance with pedigree 0.74568, pedigree (1,1,4,1,1)
  Water vapour from waste humidity, hydrogen oxidation and part of the process water.
  Uncertainty: Uncertainty calculated from uncertainty in waste composition, process water input and the uncertainty of fraction to air.
- Calcium [air, urban air close to ground]: 2.3085e-5 kg; lognormal variance with pedigree 0.53733, pedigree (1,1,4,1,1)
  (same comment as for Mercury)
- Barium [air, urban air close to ground]: 6.5486e-7 kg; lognormal variance with pedigree 0.91365, pedigree (1,1,4,1,1)
  (same comment as for Mercury)
- Strontium [water, ground-, long-term]: 7.774e-5 kg; lognormal variance with pedigree 1.0029, pedigree (1,1,4,1,1)
  (same comment as for Copper, ion)
- Antimony [water, ground-, long-term]: 0.0028748 kg; lognormal variance with pedigree 0.45588, pedigree (1,1,4,1,1)
  (same comment as for Copper, ion)
- Aluminium [water, ground-, long-term]: 0.0026358 kg; lognormal variance with pedigree 0.46374, pedigree (1,1,4,1,1)
  (same comment as for Copper, ion)
- Nickel, ion [water, ground-, long-term]: 0.00046817 kg; lognormal variance with pedigree 0.73729, pedigree (1,1,4,1,1)
  (same comment as for Copper, ion)
- Bromine [water, surface water]: 0.004682 kg; lognormal variance with pedigree 0.19101, pedigree (1,1,4,1,1)
  (same comment as for Barium)
- Cobalt [air, urban air close to ground]: 5.0533e-8 kg; lognormal variance with pedigree 1.1563, pedigree (1,1,4,1,1)
  (same comment as for Mercury)
- Water [water, surface water]: 0.00047241 m3; lognormal variance with pedigree 1.1281, pedigree (1,1,4,1,1)
  Process water released to surface water.
  Uncertainty: uncertainty calculated from uncertainty in process water input and the uncertainty of fraction to surface water.
- Selenium [water, surface water]: 6.2398e-7 kg; lognormal variance with pedigree 1.193, pedigree (1,1,4,1,1)
  (same comment as for Barium)
- Phosphate [water, ground-, long-term]: 6.361e-5 kg; lognormal variance with pedigree 4.8933, pedigree (1,1,4,1,1)
  (same comment as for Copper, ion)
- Beryllium [water, ground-, long-term]: 4.0193e-7 kg; lognormal variance with pedigree 1.6028, pedigree (1,1,4,1,1)
  (same comment as for Copper, ion)
- Chloride [water, ground-, long-term]: 0.0014786 kg; lognormal variance with pedigree 0.42745, pedigree (1,1,4,1,1)
  (same comment as for Copper, ion)
- Vanadium, ion [water, ground-, long-term]: 6.7584e-7 kg; lognormal variance with pedigree 2.2001, pedigree (1,1,4,1,1)
  (same comment as for Copper, ion)
- Arsenic [air, urban air close to ground]: 5.5377e-8 kg; lognormal variance with pedigree 1.3318, pedigree (1,1,4,1,1)
  (same comment as for Mercury)
- Antimony [air, urban air close to ground]: 3.6208e-9 kg; lognormal variance with pedigree 0.54436, pedigree (1,1,4,1,1)
  (same comment as for Mercury)
- Selenium [water, ground-, long-term]: 1.1997e-6 kg; lognormal variance with pedigree 1.0992, pedigree (1,1,4,1,1)
  (same comment as for Copper, ion)
- Tin, ion [water, ground-, long-term]: 8.2675e-5 kg; lognormal variance with pedigree 1.6344, pedigree (1,1,4,1,1)
  (same comment as for Copper, ion)
- Manganese [air, urban air close to ground]: 1.2421e-9 kg; lognormal variance with pedigree 1.1343, pedigree (1,1,4,1,1)
  (same comment as for Mercury)
- Mercury [water, surface water]: 8.7016e-10 kg; lognormal variance with pedigree 1.1352, pedigree (1,1,4,1,1)
  (same comment as for Barium)
- DOC, Dissolved Organic Carbon [water, ground-, long-term]: 0.0023302 kg; lognormal variance with pedigree 0.0215, pedigree (1,1,4,1,1)
  (same comment as for Copper, ion)
- Calcium, ion [water, surface water]: 3.2474e-5 kg; lognormal variance with pedigree 0.40819, pedigree (1,1,4,1,1)
  (same comment as for Barium)
- Iron, ion [water, ground-, long-term]: 0.0032871 kg; lognormal variance with pedigree 0.45368, pedigree (1,1,4,1,1)
  (same comment as for Copper, ion)
- Potassium [air, urban air close to ground]: 5.4486e-7 kg; lognormal variance with pedigree 0.97248, pedigree (1,1,4,1,1)
  (same comment as for Mercury)
- Titanium [air, urban air close to ground]: 3.5011e-6 kg; lognormal variance with pedigree 0.50235, pedigree (1,1,4,1,1)
  (same comment as for Mercury)
- Nitrate [water, surface water]: 0.00015981 kg; lognormal variance with pedigree 0.25116, pedigree (1,1,4,1,1)
  (same comment as for Barium)
- Nitrogen oxides [air, urban air close to ground]: 0.00083008 kg; lognormal variance with pedigree 0.73142, pedigree (1,1,4,1,1)
  Sum of fuel-Nox and thermal-NOx emitted to air after DeNOx stage.
  Uncertainty: uncertainty calculated from uncertainty in average N-emissions and uncertainty in the share of thermal NOx and the uncertainty in nitrogen content in *this* waste.
- Cobalt [water, surface water]: 5.0341e-9 kg; lognormal variance with pedigree 1.4547, pedigree (1,1,4,1,1)
  (same comment as for Barium)
- Aluminium [air, urban air close to ground]: 1.8417e-9 kg; lognormal variance with pedigree 0.56554, pedigree (1,1,4,1,1)
  (same comment as for Mercury)
- Manganese [water, surface water]: 2.7533e-9 kg; lognormal variance with pedigree 1.7543, pedigree (1,1,4,1,1)
  (same comment as for Barium)
- Copper, ion [water, surface water]: 9.3865e-7 kg; lognormal variance with pedigree 1.0197, pedigree (1,1,4,1,1)
  (same comment as for Barium)
- Iron [air, urban air close to ground]: 2.6657e-9 kg; lognormal variance with pedigree 0.42674, pedigree (1,1,4,1,1)
  (same comment as for Mercury)
- Manganese [water, ground-, long-term]: 3.8024e-5 kg; lognormal variance with pedigree 1.101, pedigree (1,1,4,1,1)
  (same comment as for Copper, ion)
- Benzo(a)pyrene [air, urban air close to ground]: 2.9945e-13 kg; lognormal variance with pedigree 0.37463, pedigree (1,1,4,1,1)
  (same comment as for Benzene, pentachloro-)
- Titanium, ion [water, surface water]: 1.5734e-6 kg; lognormal variance with pedigree 0.40165, pedigree (1,1,4,1,1)
  (same comment as for Barium)
- Cadmium [air, urban air close to ground]: 7.2386e-8 kg; lognormal variance with pedigree 0.95041, pedigree (1,1,4,1,1)
  (same comment as for Mercury)
- Potassium, ion [water, ground-, long-term]: 8.5732e-5 kg; lognormal variance with pedigree 0.53119, pedigree (1,1,4,1,1)
  (same comment as for Copper, ion)
- Titanium, ion [water, ground-, long-term]: 0.0012616 kg; lognormal variance with pedigree 0.63732, pedigree (1,1,4,1,1)
  (same comment as for Copper, ion)
- Sulfate [water, ground-, long-term]: 0.0010228 kg; lognormal variance with pedigree 0.46823, pedigree (1,1,4,1,1)
  (same comment as for Copper, ion)
- Bromine [air, urban air close to ground]: 2.5896e-6 kg; lognormal variance with pedigree 0.48153, pedigree (1,1,4,1,1)
  (same comment as for Mercury)
- BOD5, Biological Oxygen Demand [water, surface water]: 0.00090552 kg; lognormal variance with pedigree 0.033357, pedigree (1,1,4,1,1)
  (same comment as for Barium)
- Molybdenum [water, surface water]: 7.7232e-7 kg; lognormal variance with pedigree 1.00595, pedigree (1,1,4,1,1)
  (same comment as for Barium)
- Molybdenum [air, urban air close to ground]: 3.7208e-9 kg; lognormal variance with pedigree 1.4624, pedigree (1,1,4,1,1)
  (same comment as for Mercury)
- Mercury [water, ground-, long-term]: 5.1031e-8 kg; lognormal variance with pedigree 3.1627, pedigree (1,1,4,1,1)
  (same comment as for Copper, ion)
- Potassium, ion [water, surface water]: 2.4007e-5 kg; lognormal variance with pedigree 0.58811, pedigree (1,1,4,1,1)
  (same comment as for Barium)
- Thallium [air, urban air close to ground]: 3.5183e-10 kg; lognormal variance with pedigree 1.7339, pedigree (1,1,4,1,1)
  (same comment as for Mercury)
- Aluminium [water, surface water]: 2.6058e-7 kg; lognormal variance with pedigree 0.82093, pedigree (1,1,4,1,1)
  (same comment as for Barium)
- Phenol, pentachloro- [air, urban air close to ground]: 5.86e-12 kg; lognormal variance with pedigree 0.075042, pedigree (1,1,4,1,1)
  (same comment as for Benzene, pentachloro-)
- Sodium, ion [water, ground-, long-term]: 9.4686e-5 kg; lognormal variance with pedigree 0.50562, pedigree (1,1,4,1,1)
  (same comment as for Copper, ion)
- Bromine [water, ground-, long-term]: 0.00049968 kg; lognormal variance with pedigree 0.46451, pedigree (1,1,4,1,1)
  (same comment as for Copper, ion)
- COD, Chemical Oxygen Demand [water, surface water]: 0.00091731 kg; lognormal variance with pedigree 0.032779, pedigree (1,1,4,1,1)
  (same comment as for Barium)
- Toluene [air, urban air close to ground]: 2.6913e-8 kg; lognormal variance with pedigree 0.075042, pedigree (1,1,4,1,1)
  (same comment as for Benzene, pentachloro-)
- Beryllium [water, surface water]: 2.7545e-10 kg; lognormal variance with pedigree 2.1971, pedigree (1,1,4,1,1)
  (same comment as for Barium)
- Tin [air, urban air close to ground]: 1.2499e-10 kg; lognormal variance with pedigree 0.95041, pedigree (1,1,4,1,1)
  (same comment as for Mercury)
