# treatment of spent cation exchange resin from potable water production, municipal incineration with fly ash extraction

Dataset: EcoSpold 2, unit process
Geography: CH
Time period: 2006-01-01 to 2021-12-31
Technology level: current
Classification: ISIC rev.4 ecoinvent: 3821:Treatment and disposal of non-hazardous waste
Synonyms: Siedlungsabfallverbrennung; municipal waste incineration; Kehrichtverbrennung
Scenario: Business-as-Usual
System model: Allocation, cut-off by classification
Share of production covered: 100 %
Generated by: Gabor Doka
Published in: Doka G. 2015
Database: ecoinvent
isCopyrightProtected: true
accessRestrictedTo: 1

## General comment
This dataset represents the activity of waste disposal of spent cation exchange resin from potable water production in a municipal solid waste incinerator (MSWI) // Recommended use of this dataset: disposal of used ion exchange resins *for potable water production*. Resins used of other purifications can have significantly more toxic composition, depending on use. // // Waste composition (wet, in ppm): upper heating value 11.35 MJ/kg; lower heating value 1.474 MJ/kg; H2O 496920; O 110250; H 19060; C 254640; S 73640; N 569.57; P n.a.; B n.a.; Cl 331.94; Br 258.64; F 4.178; I n.a.; Ag n.a.; As 0.54001; Ba 53.006; Cd 6.8422; Co 8.9784; Cr 11.614; Cu 31.537; Hg 0.24133; Mn 22.714; Mo n.a.; Ni 5.8546; Pb 4.379; Sb 12.212; Se 0.59685; Sn 7.448; V 81.897; Zn 244.71; Be 0.14211; Sc n.a.; Sr 25.153; Ti 284.22; Tl 0.11369; W n.a.; Si n.a.; Fe 1058.9; Ca 33440; Al 56.843; K 940; Mg 2650; Na 5380; // Share of carbon in waste that is biogenic 0%. // Share of metals in waste not oxidised and bulk-recyclable (exclude very small or thin parts) Iron: 0%; Alu: 0%; Copper: 0%. // Recovery of metal scrap from bottom ash to recycling: 0g iron scrap, 0g aluminium scrap, 0g copper scrap. From this waste, the FLUWA process in the technology mix recovers 0.012kg (DM) of a hydroxide sludge to be recycled in zinc furnaces. // Ultimately one kg of this waste produces 0.2219 kg of bottom ash (can include some washed ash) and 0.0468 kg of residues, which are landfilled (technology mix). Additional solidification of residues with 0.01872 kg of cement.Net energy production: 0MJ/kg electric energy and 0.04MJ/kg thermal energy. //

## Included activities start
waste incineration from waste reception gate and delivery into waste bunker at incinerator plant site (without transports to the incinerator)

## Included activities end
Waste-specific short-term emissions to water from leachate. Long-term emissions from landfill to ground water.

## Geography
Specific to the technology mix encountered in Switzerland in 2012.

## Technology
average Swiss MSWI plants in 2010 (grate incinerators) with electrostatic precipitator for fly ash (ESP), wet flue gas scrubber and 25% SNCR , 42.77% SCR-high dust , 32.68% SCR-low dust -DeNOx facilities and 0% without Denox (weighted according to mass of burnt waste, representing Swiss average). Efficiency of iron scrap separation from slag : 58%. Efficiency of non-ferrous scrap separation from slag : 31%. The technology mix for this dataset includes a filter ash treatment (FLUWA) of a share of 46.22%. Gross electric efficiency technology mix 15.84% and Gross thermal efficiency technology mix 28.51%

## Time period
Waste composition as given in literature reference, theoretical data or other source. Transfer coefficients for modern MSWI.

## Reference product
- spent cation exchange resin from potable water production: -1 kg; name RP_amount_1; CPC 39: Wastes or scraps; By-product classification Waste
  Main reference product of this activity (supply of disposal service).
  production volume 47339 kg; name RP_PV_1
    based on corresponding global production volume of MSW fraction in conventional MSWI (wo fly ash extraction) and scaled down to annual Swiss incinerated MSW mass of 3.02 mio. tonnes.
  property price 0 EUR2005; name RP_amount_1_price_EUR2005
    Waste products are assigned a price of zero as they are assumed to require further treatment.
  property heating value, net 1.47 MJ
    Value taken from the general comment of the treatment dataset.
  property carbon content 0.50616
    carbon content on a dry matter basis (reserved; not for manual entry)
  properties: fluorine content 8.3047e-6, arsenic content 1.0734e-6, oxygen content 0.21915, barium content 0.00010536, bromine content 0.0005141, sulfur content 0.14638, chromium content 2.3087e-5, hydrogen content 0.037886, manganese content 4.515e-5, nitrogen content 0.0011322, copper content 6.2688e-5, selenium content 1.1864e-6, cobalt content 1.7847e-5, lead content 8.7044e-6, cadmium content 1.3601e-5, chlorine content 0.0006598, nickel content 1.1637e-5, antimony content 2.4274e-5, iron content 0.0021048, vanadium content 0.00016279, tin content 1.4805e-5, calcium content 0.06647, mercury content 4.7971e-7, dry mass 0.50308 kg, strontium content 4.9998e-5, titanium content 0.00056495, zinc content 0.00048641, sodium content 0.010694, wet mass 1 kg, carbon content, fossil 0.50616, beryllium content 2.8247e-7, thallium content 2.2598e-7, magnesium content 0.0052675, potassium content 0.0018685, water content 0.98775, aluminium content 0.00011299, water in wet mass 0.49692 kg, carbon allocation 0.254639 kg

## By-products
- metalliferous hydroxide sludge: 0 kg; By-product classification Recyclable; CPC 1429: Other non-ferrous metal ores and concentrates (other than uranium or thorium ores and concentrates); pedigree (1,1,1,1,1)
  Metalliferous hydroxide sludge from filter ash leaching (FLUWA).
  Uncertainty: uncertainty is calculated from uncertainties in waste composition and transfer coefficients to filter ash in incinerator and the uncertainty of the transfer coefficients of the FLUWA process.
  production volume 0 kg
    calculated in proportion to reference product waste input to incinerator
  property heating value, net 0 MJ
    Non combustible products are assumed to have an LHV equal to zero (0).
  property price 0.0042 EUR2005
    World market value of manure, deflated with barley world market price and consumer price index, based on [http://www.gov.pe.ca/photos/original/af_NM_manconv.pdf].
  property carbon content 0.0011053
    carbon content on a dry matter basis (reserved; not for manual entry)
  properties: potassium content 0.00049898, aluminium content 3.2733e-7, iron content 9.7503e-6, thallium content 9.5874e-8, sodium content 0.0036877, calcium content 0.02815, water in wet mass 0.75 kg, oxygen content 0.58329, dry mass 0.25 kg, magnesium content 0.0003474, water content 3, carbon content, fossil 0.0011053, wet mass 1 kg, bromine content 0.00042626, chlorine content 0.00066784, fluorine content 5.0862e-6, arsenic content 4.1751e-7, lead content 6.5973e-6, barium content 1.245e-6, mercury content 3.6697e-8, sulfur content 0.37792, copper content 1.0935e-6, cobalt content 1.8484e-5, manganese content 1.9372e-6, cadmium content 0.00019455, chromium content 4.6456e-6, antimony content 1.1058e-5, nickel content 4.5477e-7, beryllium content 1.7722e-7, selenium content 5.2897e-7, vanadium content 3.8928e-5, tin content 5.4843e-7, zinc content 0.0036017, titanium content 1.9451e-6, strontium content 2.3939e-8, carbon allocation 0.000276325 kg
- heat, for reuse in municipal waste incineration only: 0 MJ; name E_th_prod_MSWI; By-product classification allocatable product; CPC 17300: Steam and hot water; pedigree (1,1,1,1,1)
  Net useful heat generated from this waste and used in internal MSWI plant energy redistribution.
  Uncertainty: uncertainty is calculated from uncertainties in waste composition and uncertainties in energy efficiency and the uncertainty in internal energy demand
  production volume 2029.4 MJ
    calculated in proportion to reference product waste input to incinerator
  property price 0.0106 EUR2005; name E_th_prod_MSWI_price_EUR2005
    Average European district heat price from Ecoheatcool and Euroheat 2005-2006, Ecoheat Work package 1: The European heat market. Final report. 10.6 EUR/GJ i s the price of district heat. http://www.solarthermalworld.org/files/Ecoheatcool%20WP1%20Web.pdf?download

## Inputs from technosphere
- chemical, organic: 3.1172e-6 kg; lognormal variance with pedigree 1.3325, pedigree (1,1,4,1,1)
  Auxilliary inputs for the wastewater treatment stage of the incinerator plant. Proxy for (pure) Trisodium-trimercapto-s-triazine (CAS 17766-26-6), used as 15% diluted solution, aka TMT15.
  Uncertainty: uncertainty calculated from uncertainty in average TMT15 input, of transfer coefficients in the incinerator, and the uncertainty of the waste composition of this waste
  properties: carbon content, fossil 0.628, heating value, net 19.03 MJ, wet mass 1 kg, dry mass 1 kg
- titanium dioxide: 2.0918e-5 kg; lognormal variance with pedigree 0.64332, pedigree (1,1,4,1,1)
  Input to DeNOx stage (TiO2 catalyst carrier)
  Uncertainty: uncertainty calculated from uncertainty in average DeNOx input, uncertainty in the share of thermal NOx, uncertainty of nitrogen content in average municipal waste and the uncertainty in nitrogen content in *this* waste.
  properties: dry mass 1 kg, wet mass 1 kg
- water, decarbonised: 3.2158 kg; lognormal variance with pedigree 0.34563, pedigree (1,1,4,1,1)
  Incinerator process water used in flue gas scrubber stage.
  Uncertainty: uncertainty calculated from uncertainty in average water input, and the uncertainty of the waste composition of this waste
  properties: wet mass 1 kg
- waste cement, hydrated: -0.046798 kg; lognormal variance with pedigree 0.052297, pedigree (1,1,4,1,1)
  Hydrated cement output for solidification of landfilled residual material.
  Uncertainty: Uncertainty calculated from uncertainty of the waste composition of this waste and transfer coefficients in the incinerator and of the solidification recipe.
  production volume 2215.4 kg
    calculated in proportion to reference product waste input to incinerator
  properties: wet mass 1 kg, dry mass 1 kg
- residual material landfill: 1.9438e-10 unit; lognormal variance with pedigree 0.043213, pedigree (1,1,4,1,1)
  Landfill infrastructure required for landfilling of incineration residues.
  Uncertainty: uncertainty is calculated from uncertainties in waste composition and transfer coefficients in incinerator
- cement, unspecified: 0.018719 kg; lognormal variance with pedigree 0.052297, pedigree (1,1,4,1,1)
  Cement required for solidification of landfilled residual material.
  Uncertainty: Uncertainty calculated from uncertainty of the waste composition of this waste, of transfer coefficients in the incinerator and of the solidification recipe.
  properties: wet mass 1 kg, dry mass 1 kg
- slag landfill: 3.9455e-10 unit; lognormal variance with pedigree 0.045737, pedigree (1,1,4,1,1)
  Landfill infrastructure required for landfilling of bottom ash.
  Uncertainty: uncertainty is calculated from uncertainties in waste composition and transfer coefficients in incinerator
- process-specific burdens, slag landfill: 0.22193 kg; lognormal variance with pedigree 0.045737, pedigree (1,1,4,1,1)
  Mass-specific expenditures required for landfilling of bottom ash.;activityLink introduced to establish a direct link to the corresponding regional supply of this product
  Uncertainty: uncertainty is calculated from uncertainties in waste composition and transfer coefficients in incinerator
- ammonia, anhydrous, liquid: 0.00033387 kg; lognormal variance with pedigree 0.34032, pedigree (1,1,4,1,1)
  Input to DeNOx stage (100% NH3).
  Uncertainty: uncertainty calculated from uncertainty in average DeNOx input, uncertainty in the share of thermal NOx, uncertainty of nitrogen content in average municipal waste and the uncertainty in nitrogen content in *this* waste.
  properties: dry mass 1 kg, wet mass 1 kg
- municipal waste incineration facility: 2.5e-10 unit
  Demands per kilogram waste.
- process-specific burdens, residual material landfill: 0.093303 kg; lognormal variance with pedigree 0.043213, pedigree (1,1,4,1,1)
  Mass-specific expenditures required for landfilling of incineration residues.;activityLink introduced to establish a direct link to the corresponding regional supply of this product
  Uncertainty: uncertainty is calculated from uncertainties in waste composition and transfer coefficients in incinerator
- sodium hydroxide, without water, in 50% solution state: 0.026331 kg; lognormal variance with pedigree 0.085008, pedigree (1,1,4,1,1)
  Auxilliary inputs for the flue gas treatment stage of the incinerator plant, and partially in the filter ash treatment (FLUWA).
  Uncertainty: uncertainty calculated from uncertainty in average NaOH input, of transfer coefficients in the incinerator, and the uncertainty of the waste composition of this waste
  properties: wet mass 1 kg, dry mass 1 kg, heating value, net 3.03 MJ
- spent activated carbon with mercury: -1.2875e-6 kg; name BP_amount_1; lognormal variance with pedigree 1.7588, pedigree (1,1,4,1,1)
  Spent ion exchanger charged with mercury, from FLUWA filter ash treatment, approximated here with Spent activated carbon with mercury, deposited undergound in a polyethylene Big Bag.
  Uncertainty: uncertainty calculated from uncertainty in of transfer coefficients in the incinerator, and the uncertainty of the waste composition of this waste.
  production volume 0.060949 kg; = ABS(RP_PV_1 * (BP_amount_1 / RP_amount_1))
    Calculated from production volume of reference product using the relative outputs.
  property price 0 EUR2005; name BP_amount_1_price_EUR2005
  properties: heating value, net 18.18 MJ, dry mass 1 kg, wet mass 1 kg, carbon content, fossil 0.6
- chromium oxide, flakes: 4.269e-7 kg; lognormal variance with pedigree 0.64332, pedigree (1,1,4,1,1)
  Input to DeNOx stage. Active component in SCR catalyst (vanadium pentoxide, V2O5), here approximated with the available chromium trioxide.
  Uncertainty: uncertainty calculated from uncertainty in average DeNOx input, uncertainty in the share of thermal NOx, uncertainty of nitrogen content in average municipal waste and the uncertainty in nitrogen content in *this* waste.
  properties: wet mass 1 kg, dry mass 1 kg
- hydrochloric acid, without water, in 30% solution state: 0.0012282 kg; lognormal variance with pedigree 0.066221, pedigree (1,1,4,1,1)
  Auxilliary inputs for the wastewater treatment stage of the incinerator plant.
  Uncertainty: uncertainty calculated from uncertainty in average HCl input, of transfer coefficients in the incinerator, and the uncertainty of the waste composition of this waste
  properties: dry mass 1 kg, heating value, net 3.32 MJ, wet mass 1 kg
- heat, district or industrial, natural gas: 0.062434 MJ; lognormal variance with pedigree 0.34032, pedigree (1,1,4,1,1)
  Input to DeNOx stage, to heat up flue gas in low-dust SCR.
  Uncertainty: uncertainty calculated from uncertainty in average DeNOx input, uncertainty in the share of thermal NOx, uncertainty of nitrogen content in average municipal waste and the uncertainty in nitrogen content in *this* waste.
  properties: heating value, net 1 MJ
- chemical, inorganic: 0.00027126 kg; lognormal variance with pedigree 0.07281, pedigree (1,1,4,1,1)
  Auxilliary inputs for the wastewater treatment stage of the incinerator plant. Proxy for Polyelectrolyte.
  Uncertainty: uncertainty calculated from uncertainty in average Polyelectrolyte input, of transfer coefficients in the incinerator, and the uncertainty of the waste composition of this waste
  properties: wet mass 1 kg, carbon content, fossil 0.003, dry mass 1 kg
- iron (III) chloride, without water, in 40% solution state: 1.407e-5 kg; lognormal variance with pedigree 0.34563, pedigree (1,1,4,1,1)
  Auxilliary inputs for the wastewater treatment stage of the incinerator plant.
  Uncertainty: uncertainty calculated from uncertainty in average FeCl3 input, of transfer coefficients in the incinerator, and the uncertainty of the waste composition of this waste
  properties: dry mass 1 kg, wet mass 1 kg
- hydrogen peroxide, without water, in 50% solution state: 0.0029445 kg; lognormal variance with pedigree 0.073143, pedigree (1,1,4,1,1)
  Auxilliary oxidising agent for filter ash treatment (FLUWA).
  Uncertainty: uncertainty calculated from uncertainty in of transfer coefficients in the incinerator, and the uncertainty of the waste composition of this waste
  properties: heating value, net 7.13 MJ, dry mass 1 kg, wet mass 1 kg
- cationic resin: 1.2231e-6 kg; lognormal variance with pedigree 1.7588, pedigree (1,1,4,1,1)
  Auxilliary input for mercury removal in filter ash treatment (FLUWA).
  Uncertainty: uncertainty calculated from uncertainty in of transfer coefficients in the incinerator, and the uncertainty of the waste composition of this waste
  properties: carbon content, fossil 0.521606, wet mass 1 kg, dry mass 0.5 kg, water content 1, heating value, net 6.68 MJ
- transport, freight, lorry, unspecified: 0.01168 metric ton*km; lognormal variance with pedigree 0.03126, pedigree (1,1,4,1,1)
  Transport services to transport incineration residues to landfills and filter ash to external treatments (FLUWA).
  Uncertainty: uncertainty calculated from uncertainty of the waste composition of this waste, uncertainty of transfer coefficients and the uncertainty in generic transportation distances
- metalliferous hydroxide sludge: -0.047931 kg; lognormal variance with pedigree 0.048029, pedigree (1,1,4,1,1)
  (same comment as for metalliferous hydroxide sludge)
  production volume 2269 kg
  properties: potassium content 0.00049898, sodium content 0.0036877, calcium content 0.02815, oxygen content 0.58329, dry mass 0.25 kg, water content 3, carbon content, fossil 0.0011053, wet mass 1 kg, price 0.0042 EUR2005, chlorine content 0.00066784, sulfur content 0.37792, zinc content 0.0036017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

## Inputs from nature
- Oxygen [natural resource, in air]: 0.83639 kg; lognormal variance with pedigree 0.042936, pedigree (1,1,4,1,1)
  Oxygen from ambient air needed to combust and oxidise this waste. Net demand, i.e. without O2 leaving the plant in flue gas uncombusted.
  Uncertainty: uncertainty is calculated from uncertainties in waste composition and transfer coefficients to flue gas and soild residues in incinerator

## Emissions to nature
- Particulates, < 2.5 um [air, urban air close to ground]: 4.452e-6 kg; lognormal variance with pedigree 0.43223, pedigree (1,1,4,1,1)
  Incomplete combustion product emitted to air.
  Uncertainty: uncertainty calculated from uncertainty in average operation emissions, and the uncertainty of the flue gas volume from this waste.
- Calcium, ion [water, surface water]: 0.00060171 kg; lognormal variance with pedigree 0.11834, pedigree (1,1,4,1,1)
  Emissions to water from waste composition and transfer coefficients in incinerator and landfills.
  Uncertainty: uncertainty is calculated from uncertainties in waste composition and transfer coefficients in incinerator and landfills
- Strontium [air, urban air close to ground]: 2.5153e-9 kg; lognormal variance with pedigree 1.1856, pedigree (1,1,4,1,1)
  Emission to air from waste composition and transfer coefficients.
  Uncertainty: uncertainty is calculated from uncertainties in waste composition and transfer coefficients in incinerator
- Dioxins, measured as 2,3,7,8-tetrachlorodibenzo-p-dioxin [air, urban air close to ground]: 7.4573e-14 kg; lognormal variance with pedigree 0.43223, pedigree (1,1,4,1,1)
  (same comment as for Particulates, < 2.5 um)
- Aluminium [water, surface water]: 2.9127e-7 kg; lognormal variance with pedigree 1.505, pedigree (1,1,4,1,1)
  (same comment as for Calcium, ion)
- Titanium [air, urban air close to ground]: 2.358e-7 kg; lognormal variance with pedigree 0.85492, pedigree (1,1,4,1,1)
  (same comment as for Strontium)
- Particulates, > 2.5 um, and < 10um [air, urban air close to ground]: 2.2372e-8 kg; lognormal variance with pedigree 0.20924, pedigree (1,1,4,1,1)
  (same comment as for Particulates, < 2.5 um)
- Potassium, ion [water, surface water]: 0.0002549 kg; lognormal variance with pedigree 0.25098, pedigree (1,1,4,1,1)
  (same comment as for Calcium, ion)
- Thallium [air, urban air close to ground]: 1.1369e-10 kg; lognormal variance with pedigree 1.8742, pedigree (1,1,4,1,1)
  (same comment as for Strontium)
- Benzene [air, urban air close to ground]: 3.7289e-8 kg; lognormal variance with pedigree 0.100875, pedigree (1,1,4,1,1)
  (same comment as for Particulates, < 2.5 um)
- Magnesium [water, surface water]: 2.0064e-5 kg; lognormal variance with pedigree 0.48219, pedigree (1,1,4,1,1)
  (same comment as for Calcium, ion)
- Iron [air, urban air close to ground]: 1.8977e-9 kg; lognormal variance with pedigree 0.72349, pedigree (1,1,4,1,1)
  (same comment as for Strontium)
- Toluene [air, urban air close to ground]: 7.4578e-8 kg; lognormal variance with pedigree 0.100875, pedigree (1,1,4,1,1)
  (same comment as for Particulates, < 2.5 um)
- Sodium, ion [water, surface water]: 0.0017705 kg; lognormal variance with pedigree 0.13772, pedigree (1,1,4,1,1)
  (same comment as for Calcium, ion)
- Calcium [air, urban air close to ground]: 0.00026317 kg; lognormal variance with pedigree 0.24671, pedigree (1,1,4,1,1)
  (same comment as for Strontium)
- Benzene, pentachloro- [air, urban air close to ground]: 1.9701e-10 kg; lognormal variance with pedigree 0.100875, pedigree (1,1,4,1,1)
  (same comment as for Particulates, < 2.5 um)
- Chromium, ion [water, surface water]: 1.5078e-9 kg; lognormal variance with pedigree 0.83666, pedigree (1,1,4,1,1)
  (same comment as for Calcium, ion)
- Aluminium [air, urban air close to ground]: 4.6345e-11 kg; lognormal variance with pedigree 1.1196, pedigree (1,1,4,1,1)
  (same comment as for Strontium)
- Benzene, hexachloro- [air, urban air close to ground]: 7.797e-11 kg; lognormal variance with pedigree 0.100875, pedigree (1,1,4,1,1)
  (same comment as for Particulates, < 2.5 um)
- BOD5, Biological Oxygen Demand [water, ground-, long-term]: 0.00061723 kg; lognormal variance with pedigree 0.052933, pedigree (1,1,4,1,1)
  Long-term emissions from landfilling of incineration residues.
  Uncertainty: uncertainty is calculated from uncertainties in waste composition and transfer coefficients in incinerator and landfills.
- Potassium [air, urban air close to ground]: 4.6441e-6 kg; lognormal variance with pedigree 0.68727, pedigree (1,1,4,1,1)
  (same comment as for Strontium)
- Phenol, pentachloro- [air, urban air close to ground]: 1.6239e-11 kg; lognormal variance with pedigree 0.100875, pedigree (1,1,4,1,1)
  (same comment as for Particulates, < 2.5 um)
- COD, Chemical Oxygen Demand [water, ground-, long-term]: 0.001887 kg; lognormal variance with pedigree 0.052933, pedigree (1,1,4,1,1)
  (same comment as for BOD5, Biological Oxygen Demand)
- Magnesium [air, urban air close to ground]: 2.7952e-6 kg; lognormal variance with pedigree 0.55847, pedigree (1,1,4,1,1)
  (same comment as for Strontium)
- Heat, waste [water, surface water]: 2.7665 MJ; lognormal variance with pedigree 0.043821, pedigree (1,1,4,1,1)
  Waste heat generated from heating value of this waste plus any electricity required to process it.
  Uncertainty: uncertainty is calculated from uncertainties in waste composition and uncertainties in energy efficiency and the uncertainty in internal energy demand
- TOC, Total Organic Carbon [water, ground-, long-term]: 0.00074668 kg; lognormal variance with pedigree 0.052933, pedigree (1,1,4,1,1)
  (same comment as for BOD5, Biological Oxygen Demand)
- Sodium [air, urban air close to ground]: 4.4171e-5 kg; lognormal variance with pedigree 0.46085, pedigree (1,1,4,1,1)
  (same comment as for Strontium)
- Benzo(a)pyrene [air, urban air close to ground]: 8.298e-13 kg; lognormal variance with pedigree 0.43223, pedigree (1,1,4,1,1)
  (same comment as for Particulates, < 2.5 um)
- DOC, Dissolved Organic Carbon [water, ground-, long-term]: 0.00074668 kg; lognormal variance with pedigree 0.052933, pedigree (1,1,4,1,1)
  (same comment as for BOD5, Biological Oxygen Demand)
- COD, Chemical Oxygen Demand [water, surface water]: 0.00019358 kg; lognormal variance with pedigree 0.057668, pedigree (1,1,4,1,1)
  (same comment as for Calcium, ion)
- Heat, waste [air, urban air close to ground]: 8.9133 MJ; lognormal variance with pedigree 0.043821, pedigree (1,1,4,1,1)
  (same comment as for Heat, waste)
- Sulfate [water, ground-, long-term]: 0.17607 kg; lognormal variance with pedigree 0.107746, pedigree (1,1,4,1,1)
  (same comment as for BOD5, Biological Oxygen Demand)
- DOC, Dissolved Organic Carbon [water, surface water]: 8.4435e-5 kg; lognormal variance with pedigree 0.057871, pedigree (1,1,4,1,1)
  (same comment as for Calcium, ion)
- Water [air, urban air close to ground]: 0.00275265 m3; lognormal variance with pedigree 1.032, pedigree (1,1,4,1,1)
  Water vapour from waste humidity, hydrogen oxidation and part of the process water.
  Uncertainty: Uncertainty calculated from uncertainty in waste composition, process water input and the uncertainty of fraction to air.
- Nitrate [water, ground-, long-term]: 2.0429e-5 kg; lognormal variance with pedigree 0.74732, pedigree (1,1,4,1,1)
  (same comment as for BOD5, Biological Oxygen Demand)
- BOD5, Biological Oxygen Demand [water, surface water]: 0.00018944 kg; lognormal variance with pedigree 0.059527, pedigree (1,1,4,1,1)
  (same comment as for Calcium, ion)
- Water [water, surface water]: 0.00109735 m3; lognormal variance with pedigree 1.4559, pedigree (1,1,4,1,1)
  Process water released to surface water.
  Uncertainty: uncertainty calculated from uncertainty in process water input and the uncertainty of fraction to surface water.
- Chloride [water, ground-, long-term]: 4.1812e-5 kg; lognormal variance with pedigree 0.79445, pedigree (1,1,4,1,1)
  (same comment as for BOD5, Biological Oxygen Demand)
- TOC, Total Organic Carbon [water, surface water]: 8.4435e-5 kg; lognormal variance with pedigree 0.057871, pedigree (1,1,4,1,1)
  (same comment as for Calcium, ion)
- Bromine [water, ground-, long-term]: 1.3408e-5 kg; lognormal variance with pedigree 0.84763, pedigree (1,1,4,1,1)
  (same comment as for BOD5, Biological Oxygen Demand)
- Sulfate [water, surface water]: 0.030092 kg; lognormal variance with pedigree 0.097637, pedigree (1,1,4,1,1)
  (same comment as for Calcium, ion)
- Carbon monoxide, fossil [air, urban air close to ground]: 6.3387e-5 kg; lognormal variance with pedigree 0.83018, pedigree (1,1,4,1,1)
  (same comment as for Particulates, < 2.5 um)
- Fluoride [water, ground-, long-term]: 2.7874e-6 kg; lognormal variance with pedigree 0.91765, pedigree (1,1,4,1,1)
  (same comment as for BOD5, Biological Oxygen Demand)
- Nitrate [water, surface water]: 7.3176e-6 kg; lognormal variance with pedigree 0.50502, pedigree (1,1,4,1,1)
  (same comment as for Calcium, ion)
- Carbon dioxide, fossil [air, urban air close to ground]: 0.92796 kg; lognormal variance with pedigree 0.056914, pedigree (1,1,4,1,1)
  (same comment as for Strontium)
- Arsenic, ion [water, ground-, long-term]: 3.2922e-7 kg; lognormal variance with pedigree 1.6577, pedigree (1,1,4,1,1)
  (same comment as for BOD5, Biological Oxygen Demand)
- Chloride [water, surface water]: 0.00028194 kg; lognormal variance with pedigree 0.3443, pedigree (1,1,4,1,1)
  (same comment as for Calcium, ion)
- Methane, fossil [air, urban air close to ground]: 5.5934e-7 kg; lognormal variance with pedigree 0.100875, pedigree (1,1,4,1,1)
  (same comment as for Particulates, < 2.5 um)
- Barium [water, ground-, long-term]: 3.8725e-5 kg; lognormal variance with pedigree 1.3848, pedigree (1,1,4,1,1)
  (same comment as for BOD5, Biological Oxygen Demand)
- Bromine [water, surface water]: 0.00023999 kg; lognormal variance with pedigree 0.24855, pedigree (1,1,4,1,1)
  (same comment as for Calcium, ion)
- Sulfur dioxide [air, urban air close to ground]: 0.00078312 kg; lognormal variance with pedigree 0.16939, pedigree (1,1,4,1,1)
  (same comment as for Strontium)
- Cadmium, ion [water, ground-, long-term]: 1.097e-6 kg; lognormal variance with pedigree 5.3275, pedigree (1,1,4,1,1)
  (same comment as for BOD5, Biological Oxygen Demand)
- Fluoride [water, surface water]: 1.216e-6 kg; lognormal variance with pedigree 0.96034, pedigree (1,1,4,1,1)
  (same comment as for Calcium, ion)
- Nitrogen oxides [air, urban air close to ground]: 0.00012431 kg; lognormal variance with pedigree 0.38352, pedigree (1,1,4,1,1)
  Sum of fuel-Nox and thermal-NOx emitted to air after DeNOx stage.
  Uncertainty: uncertainty calculated from uncertainty in average N-emissions and uncertainty in the share of thermal NOx and the uncertainty in nitrogen content in *this* waste.
- Cobalt [water, ground-, long-term]: 7.8685e-6 kg; lognormal variance with pedigree 1.2459, pedigree (1,1,4,1,1)
  (same comment as for BOD5, Biological Oxygen Demand)
- Arsenic, ion [water, surface water]: 3.7712e-7 kg; lognormal variance with pedigree 1.5366, pedigree (1,1,4,1,1)
  (same comment as for Calcium, ion)
- Ammonia [air, urban air close to ground]: 3.9255e-7 kg; lognormal variance with pedigree 0.38352, pedigree (1,1,4,1,1)
  Nitrogen species emitted to air after DeNOx stage.
  Uncertainty: uncertainty calculated from uncertainty in average N-emissions and uncertainty in the share of thermal NOx and the uncertainty in nitrogen content in *this* waste.
- Chromium VI [water, ground-, long-term]: 7.2317e-7 kg; lognormal variance with pedigree 2.4617, pedigree (1,1,4,1,1)
  (same comment as for BOD5, Biological Oxygen Demand)
- Barium [water, surface water]: 2.249e-8 kg; lognormal variance with pedigree 0.83635, pedigree (1,1,4,1,1)
  (same comment as for Calcium, ion)
- Dinitrogen monoxide [air, urban air close to ground]: 8.495e-6 kg; lognormal variance with pedigree 1.5134, pedigree (1,1,4,1,1)
  (same comment as for Ammonia)
- Copper, ion [water, ground-, long-term]: 2.9719e-5 kg; lognormal variance with pedigree 1.1115, pedigree (1,1,4,1,1)
  (same comment as for BOD5, Biological Oxygen Demand)
- Cadmium, ion [water, surface water]: 1.2162e-9 kg; lognormal variance with pedigree 1.2643, pedigree (1,1,4,1,1)
  (same comment as for Calcium, ion)
- Cyanide [air, urban air close to ground]: 1.8251e-6 kg; lognormal variance with pedigree 1.5134, pedigree (1,1,4,1,1)
  (same comment as for Ammonia)
- Mercury [water, ground-, long-term]: 5.0703e-8 kg; lognormal variance with pedigree 1.7709, pedigree (1,1,4,1,1)
  (same comment as for BOD5, Biological Oxygen Demand)
- Cobalt [water, surface water]: 1.5026e-9 kg; lognormal variance with pedigree 1.7847, pedigree (1,1,4,1,1)
  (same comment as for Calcium, ion)
- Hydrogen chloride [air, urban air close to ground]: 1.8942e-7 kg; lognormal variance with pedigree 0.83396, pedigree (1,1,4,1,1)
  (same comment as for Strontium)
- Manganese [water, ground-, long-term]: 1.8033e-5 kg; lognormal variance with pedigree 1.7495, pedigree (1,1,4,1,1)
  (same comment as for BOD5, Biological Oxygen Demand)
- Chromium VI [water, surface water]: 2.1127e-7 kg; lognormal variance with pedigree 1.3265, pedigree (1,1,4,1,1)
  (same comment as for Calcium, ion)
- Bromine [air, urban air close to ground]: 1.2919e-7 kg; lognormal variance with pedigree 0.86959, pedigree (1,1,4,1,1)
  (same comment as for Strontium)
- Nickel, ion [water, ground-, long-term]: 5.8897e-6 kg; lognormal variance with pedigree 1.291, pedigree (1,1,4,1,1)
  (same comment as for BOD5, Biological Oxygen Demand)
- Selenium [water, ground-, long-term]: 4.5802e-7 kg; lognormal variance with pedigree 1.0887, pedigree (1,1,4,1,1)
  (same comment as for BOD5, Biological Oxygen Demand)
- Copper, ion [water, surface water]: 2.7408e-9 kg; lognormal variance with pedigree 1.2424, pedigree (1,1,4,1,1)
  (same comment as for Calcium, ion)
- Hydrogen fluoride [air, urban air close to ground]: 2.8187e-8 kg; lognormal variance with pedigree 1.402, pedigree (1,1,4,1,1)
  (same comment as for Strontium)
- Lead [water, ground-, long-term]: 3.0846e-6 kg; lognormal variance with pedigree 3.2156, pedigree (1,1,4,1,1)
  (same comment as for BOD5, Biological Oxygen Demand)
- Tin, ion [water, ground-, long-term]: 4.9442e-6 kg; lognormal variance with pedigree 1.4181, pedigree (1,1,4,1,1)
  (same comment as for BOD5, Biological Oxygen Demand)
- Mercury [water, surface water]: 1.2842e-9 kg; lognormal variance with pedigree 1.9263, pedigree (1,1,4,1,1)
  (same comment as for Calcium, ion)
- Arsenic [air, urban air close to ground]: 4.23e-9 kg; lognormal variance with pedigree 1.6701, pedigree (1,1,4,1,1)
  (same comment as for Strontium)
- Antimony [water, ground-, long-term]: 4.958e-6 kg; lognormal variance with pedigree 1.0461, pedigree (1,1,4,1,1)
  (same comment as for BOD5, Biological Oxygen Demand)
- Vanadium, ion [water, ground-, long-term]: 2.5e-5 kg; lognormal variance with pedigree 1.033, pedigree (1,1,4,1,1)
  (same comment as for BOD5, Biological Oxygen Demand)
- Manganese [water, surface water]: 2.8162e-9 kg; lognormal variance with pedigree 1.1466, pedigree (1,1,4,1,1)
  (same comment as for Calcium, ion)
- Barium [air, urban air close to ground]: 2.0805e-7 kg; lognormal variance with pedigree 1.0681, pedigree (1,1,4,1,1)
  (same comment as for Strontium)
- Zinc, ion [water, ground-, long-term]: 0.00010989 kg; lognormal variance with pedigree 1.6759, pedigree (1,1,4,1,1)
  (same comment as for BOD5, Biological Oxygen Demand)
- Nickel, ion [water, surface water]: 4.1518e-9 kg; lognormal variance with pedigree 1.8631, pedigree (1,1,4,1,1)
  (same comment as for Calcium, ion)
- Cadmium [air, urban air close to ground]: 3.4875e-9 kg; lognormal variance with pedigree 1.3464, pedigree (1,1,4,1,1)
  (same comment as for Strontium)
- Beryllium [water, ground-, long-term]: 1.3337e-7 kg; lognormal variance with pedigree 1.7841, pedigree (1,1,4,1,1)
  (same comment as for BOD5, Biological Oxygen Demand)
- Lead [water, surface water]: 3.0056e-10 kg; lognormal variance with pedigree 1.1198, pedigree (1,1,4,1,1)
  (same comment as for Calcium, ion)
- Cobalt [air, urban air close to ground]: 1.6329e-8 kg; lognormal variance with pedigree 1.31, pedigree (1,1,4,1,1)
  (same comment as for Strontium)
- Strontium [water, ground-, long-term]: 2.5126e-5 kg; lognormal variance with pedigree 1.1534, pedigree (1,1,4,1,1)
  (same comment as for BOD5, Biological Oxygen Demand)
- Antimony [water, surface water]: 2.4015e-6 kg; lognormal variance with pedigree 1.1689, pedigree (1,1,4,1,1)
  (same comment as for Calcium, ion)
- Chromium [air, urban air close to ground]: 1.0142e-8 kg; lognormal variance with pedigree 1.2735, pedigree (1,1,4,1,1)
  (same comment as for Strontium)
- Titanium, ion [water, ground-, long-term]: 8.5055e-5 kg; lognormal variance with pedigree 1.0557, pedigree (1,1,4,1,1)
  (same comment as for BOD5, Biological Oxygen Demand)
- Selenium [water, surface water]: 1.1892e-7 kg; lognormal variance with pedigree 1.1819, pedigree (1,1,4,1,1)
  (same comment as for Calcium, ion)
- Copper [air, urban air close to ground]: 2.8885e-9 kg; lognormal variance with pedigree 1.1563, pedigree (1,1,4,1,1)
  (same comment as for Strontium)
- Thallium [water, ground-, long-term]: 9.0474e-8 kg; lognormal variance with pedigree 1.5357, pedigree (1,1,4,1,1)
  (same comment as for BOD5, Biological Oxygen Demand)
- Tin, ion [water, surface water]: 6.7346e-9 kg; lognormal variance with pedigree 1.2099, pedigree (1,1,4,1,1)
  (same comment as for Calcium, ion)
- Mercury [air, urban air close to ground]: 6.8427e-9 kg; lognormal variance with pedigree 1.7691, pedigree (1,1,4,1,1)
  (same comment as for Strontium)
- Silicon [water, ground-, long-term]: 0.0019237 kg; lognormal variance with pedigree 0.00800076, pedigree (1,1,4,1,1)
  (same comment as for BOD5, Biological Oxygen Demand)
- Vanadium, ion [water, surface water]: 9.797e-8 kg; lognormal variance with pedigree 0.91009, pedigree (1,1,4,1,1)
  (same comment as for Calcium, ion)
- Manganese [air, urban air close to ground]: 4.3379e-9 kg; lognormal variance with pedigree 1.2003, pedigree (1,1,4,1,1)
  (same comment as for Strontium)
- Iron, ion [water, ground-, long-term]: 0.00054398 kg; lognormal variance with pedigree 3.3334, pedigree (1,1,4,1,1)
  (same comment as for BOD5, Biological Oxygen Demand)
- Zinc, ion [water, surface water]: 1.4965e-8 kg; lognormal variance with pedigree 0.74311, pedigree (1,1,4,1,1)
  (same comment as for Calcium, ion)
- Nickel [air, urban air close to ground]: 7.3547e-9 kg; lognormal variance with pedigree 1.3682, pedigree (1,1,4,1,1)
  (same comment as for Strontium)
- Calcium, ion [water, ground-, long-term]: 0.028789 kg; lognormal variance with pedigree 0.22586, pedigree (1,1,4,1,1)
  (same comment as for BOD5, Biological Oxygen Demand)
- Beryllium [water, surface water]: 8.8439e-11 kg; lognormal variance with pedigree 2.4256, pedigree (1,1,4,1,1)
  (same comment as for Calcium, ion)
- Lead [air, urban air close to ground]: 3.6077e-10 kg; lognormal variance with pedigree 1.419, pedigree (1,1,4,1,1)
  (same comment as for Strontium)
- Potassium, ion [water, ground-, long-term]: 0.00067448 kg; lognormal variance with pedigree 0.43392, pedigree (1,1,4,1,1)
  (same comment as for BOD5, Biological Oxygen Demand)
- Strontium [water, surface water]: 1.6444e-8 kg; lognormal variance with pedigree 1.8211, pedigree (1,1,4,1,1)
  (same comment as for Calcium, ion)
- Antimony [air, urban air close to ground]: 9.7823e-12 kg; lognormal variance with pedigree 1.3245, pedigree (1,1,4,1,1)
  (same comment as for Strontium)
- Aluminium [water, ground-, long-term]: 0.00021583 kg; lognormal variance with pedigree 0.90096, pedigree (1,1,4,1,1)
  (same comment as for BOD5, Biological Oxygen Demand)
- Titanium, ion [water, surface water]: 5.7861e-8 kg; lognormal variance with pedigree 0.61312, pedigree (1,1,4,1,1)
  (same comment as for Calcium, ion)
- Selenium [air, urban air close to ground]: 7.1204e-9 kg; lognormal variance with pedigree 1.6559, pedigree (1,1,4,1,1)
  (same comment as for Strontium)
- Magnesium [water, ground-, long-term]: 0.0024681 kg; lognormal variance with pedigree 0.52935, pedigree (1,1,4,1,1)
  (same comment as for BOD5, Biological Oxygen Demand)
- Thallium [water, surface water]: 8.6299e-11 kg; lognormal variance with pedigree 1.8331, pedigree (1,1,4,1,1)
  (same comment as for Calcium, ion)
- Tin [air, urban air close to ground]: 4.8651e-12 kg; lognormal variance with pedigree 1.39, pedigree (1,1,4,1,1)
  (same comment as for Strontium)
- NMVOC, non-methane volatile organic compounds, unspecified origin [air, urban air close to ground]: 1.697e-6 kg; lognormal variance with pedigree 0.100875, pedigree (1,1,4,1,1)
  (same comment as for Particulates, < 2.5 um)
- Silicon [water, surface water]: 4.3361e-6 kg; lognormal variance with pedigree 0.55671, pedigree (1,1,4,1,1)
  (same comment as for Calcium, ion)
- Vanadium [air, urban air close to ground]: 1.7369e-6 kg; lognormal variance with pedigree 1.00191, pedigree (1,1,4,1,1)
  (same comment as for Strontium)
- Sodium, ion [water, ground-, long-term]: 0.0035211 kg; lognormal variance with pedigree 0.28538, pedigree (1,1,4,1,1)
  (same comment as for BOD5, Biological Oxygen Demand)
- Iron, ion [water, surface water]: 2.3836e-8 kg; lognormal variance with pedigree 0.98753, pedigree (1,1,4,1,1)
  (same comment as for Calcium, ion)
- Zinc [air, urban air close to ground]: 1.6402e-7 kg; lognormal variance with pedigree 0.87693, pedigree (1,1,4,1,1)
  (same comment as for Strontium)

## Extrapolations
This dataset has been extrapolated from year 2012 to the year of the calculation (2021). The uncertainty has been adjusted accordingly.
