# selective catalytic reduction of nitrogen oxides

Dataset: EcoSpold 2, unit process
Geography: GLO
Time period: 1989-01-01 to 2021-12-31
Technology level: current
Classification: EcoSpold01Categories: hard coal/power plants
Classification: ISIC rev.4 ecoinvent: 3510:Electric power generation, transmission and distribution
Synonyms: SCR; DeNOx
Tags: ConvertedDataset
Scenario: Business-as-Usual
System model: Allocation, cut-off by classification
Generated by: Christian Bauer
Published in: Röder, A. 2007
Database: ecoinvent
isCopyrightProtected: true
accessRestrictedTo: 1

## General comment
This dataset represents the denitrification process of a coal power plant through selective catalytic reduction per 1 kg NOx retained. The efficiency of the denitrification is 85%.
[This dataset was already contained in the ecoinvent database version 2. It was not individually updated during the transfer to ecoinvent version 3. Life Cycle Impact Assessment results may still have changed, as they are affected by changes in the supply chain, i.e. in other datasets. This dataset was generated following the ecoinvent quality guidelines for version 2. It may have been subject to central changes described in the ecoinvent version 3 change report (http://www.ecoinvent.org/database/ecoinvent-version-3/reports-of-changes/), and the results of the central updates were reviewed extensively. The changes added e.g. consistent water flows and other information throughout the database. The documentation of this dataset can be found in the ecoinvent reports of version 2, which are still available via the ecoinvent website. The change report linked above covers all central changes that were made during the conversion process.]

## Included activities start
Denitrification process starting with the operation of a coal power plant.

## Included activities end
This activity ends with 1 kg retained NOx resulting from the denitrification process of a coal power plant. The dataset includes apart the materials also the disposal.

## Technology
In the DeNOx process major focus is put on primary measures such as flue gas recirculation, staged combustion and low NOx burners. If these measures do not lead to a certain emission level, selective catalytic reduction (SCR) methods are used. Primary measures reduce NOx emissions up to 60%. Therefore, only constructional measures are needed and no operational material is necessary. The emissions from dry firing can be reduced to 450mg/m3, emissions from slag tap firing to 900mg/m3. In case of lignite power plants, emissions from dry firing can be reduced even up to 200mg/m3 and the sharpest limits can be met without secondary denitrification. SCR is used for large coal combustions as a secondary DeNOx system. It can be installed before (high dust) or after (low dust) the dust separator, or even after the flue gas desulfurisation plant.
With the reducing agent ammonia (NH3), nitrogen oxides are converted into nitrogen and water. That these reactions occur quickly enough even at low flue gas temperatures, a catalyst of metal oxides, molecular sieve, activated coal or coke is needed. SCR methods achieve efficiencies of 80% to 90%. With a NH3/NOx mol ratio of about 0.8 an efficiency up to 85% is achieved. As the NOx concentration in the boiler varies, the catalytic performance increases with prolonged lifetime and the applied load of the catalytic converter changes as a result of load changes, the SCR system has to be well regulated. Furthermore, NH3 reacts with SO3 to ammonium hydrogen sulfate, which can lead to inactivation of the catalyst converter (IPP 1990). Through the pressure loss of the catalyst converter, additional electricity of 0.35% of net capacity is needed (Wagner 1989) and considered in the net efficiency.
References:
IPP Karlsruhe (1990) Entsorgung von Reststoffen aus der Rauchgasreinigung; Teil 2: TA Luft-Feuerungsanlagen. Ministerium für Umwelt Baden-Württemberg. Karlsruhe.
Wagner H.-J. (1989) Aufschlüsselung von Investitionskosten. Jül-Spez 524, Jülich.

## Reference product
- NOx retained, by selective catalytic reduction: 1 kg; By-product classification allocatable product; CPC 35499: Other chemical products n.e.c.
  EcoSpold01Location=GLO
  production volume 1 kg
    Dummy value to be replaced by measured, estimated or calculated value
  property price 2.72765 EUR2005
    Calculated based on inputs: The price of the product has been calculated as a sum of the values of the material and energy inputs for this product. This value is therefore a rough estimation. It may underestimate the real price since there are additional expenses when producing any product. These expences can include for example labour costs, treatment of waste materials and profit for the producer. Please consider carefully whether this level of data quality is acceptable for your application.
  property carbon content 0
    carbon content on a dry matter basis (reserved; not for manual entry)
  properties: dry mass 1 kg, water in wet mass 0 kg, wet mass 1 kg, water content 0, carbon content, non-fossil 0, carbon content, fossil 0, carbon allocation 0 kg

## Inputs from technosphere
- spent catalytic converter NOx reduction: -0.025 kg; lognormal variance with pedigree 0.0641, pedigree (3,4,5,3,1)
  Estimation. The disposal of the catalyst converter (consisting of TiO2, V2O5 and WO3) is achieved by integration into building materials or by deposition as hazardous waste. With an increasing amount of old catalyst converters it is assumed that reconditioning is possible. The catalyst weight of 25 kg/t NOx is considered as hazardous waste.
  EcoSpold01Location=DE
  production volume 0.025 kg
    Calculated from the production volume of NOx retained, by selective catalytic reduction in proportion to the respective output amounts.
  properties: dry mass 1 kg, wet mass 1 kg
- ammonia, anhydrous, liquid: 0 kg; pedigree (1,1,1,1,1)
  Stoichiometric calculation. The stoichiometric ammonia requirement is 0.38 kg per kg of NO. Since also side reactions occur, effectively 0.45 kg of ammonia per kg NO respectively 0.3 kg of ammonia per kg NO2 is necessary.
  EcoSpold01Location=RER
  properties: dry mass 1 kg, wet mass 1 kg
- titanium dioxide: 0, 0.00833333, 0.0166667 kg (3 entries); source Marx F.J. 1990
  EcoSpold01Location=RER
  Estimation. With a reduction of 1000 to 200 mg NOx/m3, about 0.04 m3/t NOx of catalytic converter volume are necessary. This causes investment costs of approximately 450€/t NOx including installation and disposal. With a density of 0.66 t/m3 (Marx et al. 1990), 26 kg/t NOx of catalytic converter are required. With a weight of 0.87 t/MW (Wagner 1989), about 24 kg/t NOx are needed. According to (Franke et al. 1989) V2O5-TiO2 mixed oxides are used on ceramic metal or honeycomb bodies. To prevent adverse reactions to ammonium hydrogen sulfate and to improve the selectivity, trace amounts of tungsten oxide or niobium are used. According to (Lange et al. 1991), the coating consists of more than 90% of TiO2, 0.5% to 5% of V2O5 and 5% to 10% of WO3. TiO2 is taken for the total mass of the catalytic converter since the other components are not available in the database.
  Further references:
  Wagner H.-J. (1989) Aufschlüsselung von Investitionskosten. Jül-Spez 524, Jülich.
  Franke F.H., Guntermann K.J., Paersch M.J. (1989) Kohle und Umwelt. Bergbau Rohstoffe Energie, Band 26, Essen.
  Lange M., Bade M., Günther G., Haug N. (1991) Luftreinhaltung bei Kraftwerks- und Industriefeuerungen. In: VWK Bd.43 Nr.4. s.198-203
  properties: dry mass 1 kg, wet mass 1 kg
- ammonia, anhydrous, liquid: 0.00482459, 0.0322459, 0.00750583, 0.0145703, 0.0148717, 0.00682683, 0.0561247, 0.00152713, 0.161503 kg (9 entries); lognormal variance with pedigree 0.0641, pedigree (3,4,5,3,1)
  (same comment as for ammonia, anhydrous, liquid)

## Emissions to nature
- Ammonia [air, non-urban air or from high stacks]: 0.003 kg; source Hjalmarsson A.-K. 1992; lognormal variance with pedigree 0.0741, pedigree (3,4,5,3,1)
  Estimation. At a molar ratio of 0.8 NH3/NOx the ammonia slip is under 2 to 10 pmm or about 1 kg/TJ (0.003 kg/kg NOx).
  Further references:
  Voos H. (1985) Rauchgasreinigung - angewandte Verfahren und Entwicklungen. In: Steinmetz E. (Hrsg.) "Planung, Bau und Betrieb von Wärmekraftwerken", Haus der Technik, Vortragsveröffentlichungen, Heft 501, Essen.

## Sampling procedure
Based on literature.

## Extrapolations
This dataset has been extrapolated from year 2000 to the year of the calculation (2021). The uncertainty has been adjusted accordingly.

## Review by Hans-Jörg Althaus 2003-07-04
passed

## Review by Roland Hischier 2011-09-23
Tansfer of documentation done.
