# treatment of wastewater, average, capacity 1E9l/year

Dataset: EcoSpold 2, unit process
Geography: CH
Time period: 1994-01-01 to 2021-12-31
Technology level: current
Classification: EcoSpold01Categories: waste management/wastewater treatment
Classification: ISIC rev.4 ecoinvent: 3700:Sewerage
Tags: ConvertedDataset; Treatment
Scenario: Business-as-Usual
System model: Allocation, cut-off by classification
Generated by: Gabor Doka (obsolete)
Published in: Doka G. 2008
Database: ecoinvent
isCopyrightProtected: true
accessRestrictedTo: 1

## General comment
Wastewater purified in a smaller municipal wastewater treatment plant (capacity class 4), with an average capacity size of 5320 per-captia-equivalents PCE.
Wastewater contains (in kg/m3): COD: 0.1556 (GSD=122.5%); BOD: 0.1036 (GSD=122.5%); DOC: 0.04575 (GSD=122.5%); TOC: 0.0673 (GSD=122.5%); SO4-S: 0.044 (GSD=122.5%); S part.: 0.002 (GSD=122.5%); NH4-N: 0.01495 (GSD=122.5%); NO3-N: 0.00105 (GSD=122.5%); NO2-N: 0.0004 (GSD=122.5%); N part.: 0.003279 (GSD=122.5%); N org. solv.: 0.008392 (GSD=122.5%); PO4-P: 0.002459 (GSD=122.5%); P part.: 0.0006147 (GSD=122.5%); Cl: 0.03003 (GSD=224.1%); F: 0.00003277 (GSD=224.1%); As: 0.0000009 (GSD=224.1%); Cd: 0.0000002806 (GSD=223.8%); Co: 0.000001618 (GSD=223.8%); Cr: 0.00001223 (GSD=223.8%); Cu: 0.00003744 (GSD=223.8%); Hg: 0.0000002 (GSD=223.8%); Mn: 0.000053 (GSD=224.1%); Mo: 0.0000009574 (GSD=223.8%); Ni: 0.000006589 (GSD=223.8%); Pb: 0.000008631 (GSD=223.8%); Sn: 0.0000034 (GSD=224.1%); Zn: 0.0001094 (GSD=223.8%); Si: 0.003126 (GSD=224.1%); Fe: 0.007093 (GSD=224.1%); Ca: 0.05083 (GSD=224.1%); Al: 0.001038 (GSD=224.1%); K: 0.0003989 (GSD=224.1%); Mg: 0.005707 (GSD=224.1%); Na: 0.002186 (GSD=224.1%);
[This dataset was already contained in the ecoinvent database version 2. It was not individually updated during the transfer to ecoinvent version 3. Life Cycle Impact Assessment results may still have changed, as they are affected by changes in the supply chain, i.e. in other datasets. This dataset was generated following the ecoinvent quality guidelines for version 2. It may have been subject to central changes described in the ecoinvent version 3 change report (http://www.ecoinvent.org/database/ecoinvent-version-3/reports-of-changes/), and the results of the central updates were reviewed extensively. The changes added e.g. consistent water flows and other information throughout the database. The documentation of this dataset can be found in the ecoinvent reports of version 2, which are still available via the ecoinvent website. The change report linked above covers all central changes that were made during the conversion process.]

## Included activities end
Infrastructure materials for municipal wastewater treatment plant, transports, dismantling. Land use burdens.

## Geography
Specific to the technology mix encountered in Switzerland in 2000. Well applicable to modern treatment practices in Europe, North America or Japan.

## Technology
Three stage wastewater treatment (mechanical, biological, chemical) including sludge digestion (fermentation) according to the average technology in Switzerland

## Parameters
- fraction, process water, to air: 0.1 dimensionless; name fraction_PW_to_air; lognormal variance with pedigree 0.092025, pedigree (4,4,3,2,4)
  Literature value (Statistics Canada, 2007 & Shaffer, K.H., 2008, Consumptive water use in the Great Lakes Basin, USGS) (Vionnet, S., Quantis Water Database - Technical Report, 2012).

## Reference product
- wastewater, average: -1 m3; name RP_amount_1; CPC 39920: Sewage sludge; By-product classification Waste
  production volume 9.64348e8 m3; name RP_PV_1
    (year 2000) source: ecoinvent v2, report 13IV p.2
  property price 0 EUR2005; name RP_amount_1_price_EUR2005
    Waste products are assigned a price of zero as they are assumed to require further treatment.
  property carbon content, non-fossil 0.194039
    0.0673 kg TOC/m3 (Tab A.17, ecoinvent v2.2 report 13_I). TOC was considered as Total Carbon.
  property carbon content 0.194039
    carbon content on a dry matter basis (reserved; not for manual entry)
  properties: water content 2882.2, carbon content, fossil 0, water in wet mass 999.653 kg, dry mass 0.346837 kg, wet mass 1000 kg, carbon allocation 0.0673 kg

## Inputs from technosphere
- hydrochloric acid, without water, in 30% solution state: 1.8424e-7 kg; lognormal variance with pedigree 0.08, pedigree (1,1,5,1,1)
  burden from sludge incineration. Uncertainty calculated from wastewater composition and treatment model
  properties: dry mass 1 kg, wet mass 1 kg, heating value, net 3.32 MJ
- liquid manure spreading, by vacuum tanker: 0.00060399 m3; lognormal variance with pedigree 0.04, pedigree (1,1,5,1,1)
  burden from sludge spreading. Uncertainty calculated from wastewater composition and treatment model
  This exchange has an activity link directly to the producing activity because the product is primarily consumed in the same geographical area where it is produced.
- titanium dioxide: 9.6199e-7 kg; lognormal variance with pedigree 0.54, pedigree (1,1,5,1,1)
  (same comment as for hydrochloric acid, without water, in 30% solution state)
  properties: dry mass 1 kg, wet mass 1 kg
- chemical, organic: 2.4507e-7 kg; lognormal variance with pedigree 0.43, pedigree (1,1,5,1,1)
  (same comment as for hydrochloric acid, without water, in 30% solution state)
  properties: wet mass 1 kg, dry mass 1 kg, carbon content, fossil 0.628, heating value, net 19.03 MJ
  note on carbon content, fossil: This dataset is an unweighted average of 20 organic substances (listed in Tab 88.1, ecoinvent v2.2 report 8, part II), being part of the top100 chemicals included in this database. The C-content has also been calculated as an unweighted average of the C content of the substances composing this dataset.
- electricity, low voltage: 0.20571 kWh; lognormal variance with pedigree 0.06, pedigree (1,1,5,1,1)
  direct wastewater treatment plant burden. Uncertainty calculated from wastewater composition and treatment model
- quicklime, milled, packed: 5.8472e-7 kg; lognormal variance with pedigree 0.09, pedigree (1,1,5,1,1)
  (same comment as for hydrochloric acid, without water, in 30% solution state)
  properties: wet mass 1 kg, dry mass 0.99 kg, water content 0.010101
- aluminium sulfate, powder: 0.0031512 kg; lognormal variance with pedigree 0.1, pedigree (1,1,5,1,1)
  (same comment as for electricity, low voltage)
  properties: wet mass 1 kg, dry mass 1 kg
- slag landfill: 1.9579e-11 unit; lognormal variance with pedigree 0.07, pedigree (1,1,5,1,1)
  (same comment as for hydrochloric acid, without water, in 30% solution state)
- iron sulfate: 0.01166 kg; lognormal variance with pedigree 0.1, pedigree (1,1,5,1,1)
  (same comment as for electricity, low voltage)
  properties: wet mass 1 kg, dry mass 1 kg
- iron (III) chloride, without water, in 40% solution state: 0.015944 kg; lognormal variance with pedigree 0.1, pedigree (1,1,5,1,1)
  direct wastewater treatment plant burden plus burden from sludge incineration. Uncertainty calculated from wastewater composition and treatment model
  properties: dry mass 1 kg, wet mass 1 kg
- waste graphical paper: -0.0155 kg; name BP_amount_3; lognormal variance with pedigree 0.04, pedigree (1,1,5,1,1)
  (same comment as for electricity, low voltage)
  production volume 1.49474e7 kg; = BP_amount_3* RP_PV_1/ABS( RP_amount_1)
    Calculated from the production volume of sewage, average in proportion to the respective output amounts.
  property price 0 EUR2005; name BP_amount_3_price_EUR2005
  properties: dry mass 0.888 kg, heating value, net 14.12 MJ, water content 0.126126, wet mass 1 kg, carbon content, non-fossil 0.454955
  note on heating value, net: Value taken from the general comment of the treatment dataset.
- municipal waste incineration facility: 1.5119e-11 unit; lognormal variance with pedigree 0.05, pedigree (1,1,5,1,1)
  (same comment as for hydrochloric acid, without water, in 30% solution state)
- waste plastic, mixture: -0.0155 kg; name BP_amount_1; lognormal variance with pedigree 0.04, pedigree (1,1,5,1,1)
  (same comment as for electricity, low voltage)
  production volume 1.49474e7 kg; = BP_amount_1* RP_PV_1/ABS( RP_amount_1)
    (same comment as for waste graphical paper)
  property price 0 EUR2005; name BP_amount_1_price_EUR2005
  properties: dry mass 0.847 kg, wet mass 1 kg, water content 0.180638, carbon content, fossil 0.747344, heating value, net 30.79 MJ
  note on carbon content, fossil: C content in 1 kg DM was calculated using data in Tab A.2, ecoinvent v2.2 report 13_I
- process-specific burdens, municipal waste incineration: 0.060476 kg; lognormal variance with pedigree 0.05, pedigree (1,1,5,1,1)
  burden from sludge incineration. Uncertainty calculated from wastewater composition and treatment model;activityLink introduced to establish a direct link to the corresponding regional supply of this product
- waste cement, hydrated: -0.0017266 kg; name BP_amount_2; lognormal variance with pedigree 0.08, pedigree (1,1,5,1,1)
  (same comment as for hydrochloric acid, without water, in 30% solution state)
  production volume 1.66504e6 kg; = BP_amount_2* RP_PV_1/ABS( RP_amount_1)
    (same comment as for waste graphical paper)
  property price 0 EUR2005; name BP_amount_2_price_EUR2005
  properties: wet mass 1 kg, dry mass 1 kg
- electricity, high voltage: 0.0086946 kWh; lognormal variance with pedigree 0.49, pedigree (1,1,5,1,1)
  (same comment as for hydrochloric acid, without water, in 30% solution state)
- sodium hydroxide, without water, in 50% solution state: 0.00016423 kg; lognormal variance with pedigree 0.09, pedigree (1,1,5,1,1)
  (same comment as for hydrochloric acid, without water, in 30% solution state)
  properties: heating value, net 3.03 MJ, dry mass 1 kg, wet mass 1 kg
- chromium oxide, flakes: 1.9632e-8 kg; lognormal variance with pedigree 0.54, pedigree (1,1,5,1,1)
  (same comment as for hydrochloric acid, without water, in 30% solution state)
  properties: wet mass 1 kg, dry mass 1 kg
- residual material landfill: 3.5972e-12 unit; lognormal variance with pedigree 0.07, pedigree (1,1,5,1,1)
  (same comment as for hydrochloric acid, without water, in 30% solution state)
- sewer grid, 1E9l/year, 30 km: 2.8218e-7 km; lognormal variance with pedigree 0.04, pedigree (1,1,5,1,1)
  uncertainty heeded in exchanges of the module
- heat, district or industrial, natural gas: 0.00294966 MJ; lognormal variance with pedigree 0.22, pedigree (1,1,5,1,1)
  (same comment as for hydrochloric acid, without water, in 30% solution state)
  properties: heating value, net 1 MJ
- process-specific burdens, residual material landfill: 0.0017266 kg; lognormal variance with pedigree 0.07, pedigree (1,1,5,1,1)
  (same comment as for process-specific burdens, municipal waste incineration)
- wastewater treatment facility, capacity 1E9l/year: 2.6582e-8 unit; lognormal variance with pedigree 0.04, pedigree (1,1,5,1,1)
  uncertainty heeded in exchanges of the module
- cement, unspecified: 0.00069066 kg; lognormal variance with pedigree 0.08, pedigree (1,1,5,1,1)
  (same comment as for hydrochloric acid, without water, in 30% solution state)
  properties: dry mass 1 kg, wet mass 1 kg
- process-specific burdens, slag landfill: 0.011013 kg; lognormal variance with pedigree 0.07, pedigree (1,1,5,1,1)
  (same comment as for process-specific burdens, municipal waste incineration)
- heat, district or industrial, other than natural gas: 0.05072 MJ; lognormal variance with pedigree 0.05, pedigree (1,1,5,1,1)
  (same comment as for hydrochloric acid, without water, in 30% solution state)
  properties: heating value, net 1 MJ
- chemical, inorganic: 3.0706e-7 kg; lognormal variance with pedigree 0.08, pedigree (1,1,5,1,1)
  (same comment as for hydrochloric acid, without water, in 30% solution state)
  properties: wet mass 1 kg, carbon content, fossil 0.003, dry mass 1 kg
  note on carbon content, fossil: This dataset is an unweighted average of 20 inorganic substances (listed in Tab 88.1, ecoinvent v2.2 report 8, part II), being part of the top100 chemicals included in this database. The C-content has also been calculated as an unweighted average of the C content of the substances composing this dataset.
- ammonia, anhydrous, liquid: 3.3607e-5 kg; lognormal variance with pedigree 0.22, pedigree (1,1,5,1,1)
  (same comment as for hydrochloric acid, without water, in 30% solution state)
  properties: wet mass 1 kg, dry mass 1 kg

## Emissions to nature
- Copper [air, urban air close to ground]: 5.8549e-11 kg; lognormal variance with pedigree 0.77, pedigree (1,1,5,1,1)
  direct digester gas emission plus emission from sludge incineration. Uncertainty calculated from wastewater composition and treatment model
- Methane, non-fossil [air, urban air close to ground]: 0.00050213 kg; lognormal variance with pedigree 0.14, pedigree (1,1,5,1,1)
  (same comment as for Copper)
- Arsenic, ion [water, surface water]: 7.3057e-7 kg; lognormal variance with pedigree 0.64, pedigree (1,1,5,1,1)
  sewer overload discharge plus direct wastewater treatment plant emission plus emission from sludge incineration. Uncertainty calculated from wastewater composition and treatment model
- Cyanide [air, urban air close to ground]: 5.9952e-7 kg; lognormal variance with pedigree 0.24, pedigree (1,1,5,1,1)
  emission from sludge incineration. Uncertainty calculated from wastewater composition and treatment model
- Molybdenum [soil, agricultural]: 3.3667e-7 kg; lognormal variance with pedigree 0.71, pedigree (1,1,5,1,1)
  emission from sludge spreading. Uncertainty calculated from wastewater composition and treatment model
- NMVOC, non-methane volatile organic compounds, unspecified origin [air, urban air close to ground]: 2.2813e-6 kg; lognormal variance with pedigree 0.26, pedigree (1,1,5,1,1)
  direct digester gas emission. Uncertainty calculated from wastewater composition and treatment model
- Water [air, unspecified]: 0.1 m3; name water_to_air_unspecified; lognormal variance with pedigree 0.0807, pedigree (2,2,5,1,1)
  Calculated value based on water balance.
  property fraction, origin: salt water 0; name fraction_origin_salt_water
  property fraction, origin: fresh water 0; name fraction_origin_fresh_water
  property fraction, origin: unspecified 1; name fraction_origin_unspecified
- TOC, Total Organic Carbon [water, ground-, long-term]: 4.8293e-5 kg; lognormal variance with pedigree 0.12, pedigree (1,1,5,1,1)
  (same comment as for Cyanide)
- Iron, ion [water, surface water]: 0.0036009 kg; lognormal variance with pedigree 0.66, pedigree (1,1,5,1,1)
  (same comment as for Arsenic, ion)
- Water [water, unspecified]: 0.9 m3; name water_to_water_unspecified; lognormal variance with pedigree 0.0807, pedigree (2,2,5,1,1)
  Calculated value based on water balance.
  property carbon content, non-fossil 0; name C_content_non_fossil
  property fraction, origin: fresh water 1; name fraction_origin_fresh_water_Ww
  property fraction, origin: salt water 0; name fraction_origin_salt_water_Ww
  property fraction, origin: unspecified 0; name fraction_origin_unspecified_Ww
  property water in wet mass 1000 kg; name WWM
  property dry mass 0 kg; name DM
  property carbon content, fossil 0; name C_content_fossil
  property wet mass 1000 kg; name WM
- Fluoride [water, surface water]: 3.2769e-5 kg; lognormal variance with pedigree 0.67, pedigree (1,1,5,1,1)
  (same comment as for Arsenic, ion)
- Zinc [soil, agricultural]: 5.3943e-5 kg; lognormal variance with pedigree 0.71, pedigree (1,1,5,1,1)
  (same comment as for Molybdenum)
- Tin, ion [water, ground-, long-term]: 2.8434e-7 kg; lognormal variance with pedigree 1.27, pedigree (1,1,5,1,1)
  (same comment as for Cyanide)
- Arsenic [soil, agricultural]: 1.3867e-7 kg; lognormal variance with pedigree 0.71, pedigree (1,1,5,1,1)
  (same comment as for Molybdenum)
- Cadmium [soil, agricultural]: 9.868e-8 kg; lognormal variance with pedigree 0.71, pedigree (1,1,5,1,1)
  (same comment as for Molybdenum)
- TOC, Total Organic Carbon [water, surface water]: 0.0072992 kg; lognormal variance with pedigree 0.08, pedigree (1,1,5,1,1)
  (same comment as for Arsenic, ion)
- Magnesium [soil, agricultural]: 0.00039974 kg; lognormal variance with pedigree 0.71, pedigree (1,1,5,1,1)
  (same comment as for Molybdenum)
- DOC, Dissolved Organic Carbon [water, surface water]: 0.0075377 kg; lognormal variance with pedigree 0.08, pedigree (1,1,5,1,1)
  (same comment as for Arsenic, ion)
- Magnesium [water, surface water]: 0.0051478 kg; lognormal variance with pedigree 0.67, pedigree (1,1,5,1,1)
  (same comment as for Arsenic, ion)
- Sulfate [water, surface water]: 0.14465 kg; lognormal variance with pedigree 0.08, pedigree (1,1,5,1,1)
  (same comment as for Arsenic, ion)
- Cobalt [water, surface water]: 8.2105e-7 kg; lognormal variance with pedigree 0.66, pedigree (1,1,5,1,1)
  (same comment as for Arsenic, ion)
- Aluminium [air, urban air close to ground]: 6.5822e-7 kg; lognormal variance with pedigree 0.47, pedigree (1,1,5,1,1)
  (same comment as for Copper)
- Arsenic [air, urban air close to ground]: 2.5337e-10 kg; lognormal variance with pedigree 0.73, pedigree (1,1,5,1,1)
  (same comment as for Copper)
- Mercury [water, surface water]: 6.2256e-8 kg; lognormal variance with pedigree 0.65, pedigree (1,1,5,1,1)
  (same comment as for Arsenic, ion)
- Calcium, ion [water, surface water]: 0.045852 kg; lognormal variance with pedigree 0.67, pedigree (1,1,5,1,1)
  (same comment as for Arsenic, ion)
- Chromium [soil, agricultural]: 4.3013e-6 kg; lognormal variance with pedigree 0.71, pedigree (1,1,5,1,1)
  (same comment as for Molybdenum)
- Iron [air, urban air close to ground]: 1.2671e-7 kg; lognormal variance with pedigree 0.21, pedigree (1,1,5,1,1)
  (same comment as for Copper)
- COD, Chemical Oxygen Demand [water, surface water]: 0.030152 kg; lognormal variance with pedigree 0.08, pedigree (1,1,5,1,1)
  (same comment as for Arsenic, ion)
- Cadmium, ion [water, surface water]: 1.4244e-7 kg; lognormal variance with pedigree 0.66, pedigree (1,1,5,1,1)
  (same comment as for Arsenic, ion)
- Aluminium [water, ground-, long-term]: 0.00031181 kg; lognormal variance with pedigree 0.47, pedigree (1,1,5,1,1)
  (same comment as for Cyanide)
- Nickel [air, urban air close to ground]: 3.2014e-14 kg; lognormal variance with pedigree 0.81, pedigree (1,1,5,1,1)
  (same comment as for Copper)
- Sodium, ion [water, surface water]: 0.002186 kg; lognormal variance with pedigree 0.67, pedigree (1,1,5,1,1)
  (same comment as for Arsenic, ion)
- Tin [soil, agricultural]: 1.4121e-6 kg; lognormal variance with pedigree 0.71, pedigree (1,1,5,1,1)
  (same comment as for Molybdenum)
- Copper [soil, agricultural]: 1.98e-5 kg; lognormal variance with pedigree 0.71, pedigree (1,1,5,1,1)
  (same comment as for Molybdenum)
- Tin [air, urban air close to ground]: 7.5069e-10 kg; lognormal variance with pedigree 0.73, pedigree (1,1,5,1,1)
  (same comment as for Copper)
- Carbon [soil, agricultural]: 0.012346 kg; lognormal variance with pedigree 0.1, pedigree (1,1,5,1,1)
  (same comment as for Molybdenum)
- Aluminium [soil, agricultural]: 0.0010518 kg; lognormal variance with pedigree 0.45, pedigree (1,1,5,1,1)
  (same comment as for Molybdenum)
- DOC, Dissolved Organic Carbon [water, ground-, long-term]: 4.8293e-5 kg; lognormal variance with pedigree 0.12, pedigree (1,1,5,1,1)
  (same comment as for Cyanide)
- Sulfur dioxide [air, urban air close to ground]: 0.000884 kg; lognormal variance with pedigree 0.11, pedigree (1,1,5,1,1)
  (same comment as for Copper)
- Carbon monoxide, non-fossil [air, urban air close to ground]: 0.0001613 kg; lognormal variance with pedigree 0.16, pedigree (1,1,5,1,1)
  (same comment as for Copper)
- Sulfur [soil, agricultural]: 0.0010988 kg; lognormal variance with pedigree 0.1, pedigree (1,1,5,1,1)
  (same comment as for Molybdenum)
- Calcium [soil, agricultural]: 0.0035605 kg; lognormal variance with pedigree 0.71, pedigree (1,1,5,1,1)
  (same comment as for Molybdenum)
- Zinc, ion [water, surface water]: 3.3805e-5 kg; lognormal variance with pedigree 0.65, pedigree (1,1,5,1,1)
  (same comment as for Arsenic, ion)
- Molybdenum [air, urban air close to ground]: 2.6973e-10 kg; lognormal variance with pedigree 0.73, pedigree (1,1,5,1,1)
  (same comment as for Copper)
- Cadmium, ion [water, ground-, long-term]: 3.9664e-10 kg; lognormal variance with pedigree 6.9, pedigree (1,1,5,1,1)
  (same comment as for Cyanide)
- Iron, ion [water, ground-, long-term]: 0.0017779 kg; lognormal variance with pedigree 1, pedigree (1,1,5,1,1)
  (same comment as for Cyanide)
- Lead [water, ground-, long-term]: 1.5656e-7 kg; lognormal variance with pedigree 6.92, pedigree (1,1,5,1,1)
  (same comment as for Cyanide)
- Lead [air, urban air close to ground]: 8.1848e-11 kg; lognormal variance with pedigree 0.75, pedigree (1,1,5,1,1)
  (same comment as for Copper)
- BOD5, Biological Oxygen Demand [water, ground-, long-term]: 3.9921e-5 kg; lognormal variance with pedigree 0.12, pedigree (1,1,5,1,1)
  (same comment as for Cyanide)
- Silicon [soil, agricultural]: 0.0020983 kg; lognormal variance with pedigree 0.71, pedigree (1,1,5,1,1)
  (same comment as for Molybdenum)
- Iron [soil, agricultural]: 0.009475 kg; lognormal variance with pedigree 0.16, pedigree (1,1,5,1,1)
  (same comment as for Molybdenum)
- Lead [water, surface water]: 9.4866e-7 kg; lognormal variance with pedigree 0.6, pedigree (1,1,5,1,1)
  (same comment as for Arsenic, ion)
- Carbon dioxide, non-fossil [air, urban air close to ground]: 0.17202 kg; lognormal variance with pedigree 0.06, pedigree (1,1,5,1,1)
  direct wastewater treatment plant emission plus direct digester gas emission plus emission from sludge incineration. Uncertainty calculated from wastewater composition and treatment model
- Phosphate [water, ground-]: 2.705e-5 kg; lognormal variance with pedigree 0.12, pedigree (1,1,5,1,1)
  (same comment as for Molybdenum)
- Chloride [water, surface water]: 0.040484 kg; lognormal variance with pedigree 0.48, pedigree (1,1,5,1,1)
  (same comment as for Arsenic, ion)
- Ammonia [air, urban air close to ground]: 0.00059438 kg; lognormal variance with pedigree 0.31, pedigree (1,1,5,1,1)
  direct digester gas emission plus emission from sludge incineration plus emission from sludge spreading. Uncertainty calculated from wastewater composition and treatment model
- Nitrite [water, surface water]: 0.000644 kg; lognormal variance with pedigree 0.08, pedigree (1,1,5,1,1)
  direct wastewater treatment plant emission. Uncertainty calculated from wastewater composition and treatment model
- Molybdenum [water, surface water]: 5.0894e-7 kg; lognormal variance with pedigree 0.62, pedigree (1,1,5,1,1)
  (same comment as for Arsenic, ion)
- BOD5, Biological Oxygen Demand [water, surface water]: 0.0098227 kg; lognormal variance with pedigree 0.07, pedigree (1,1,5,1,1)
  (same comment as for Arsenic, ion)
- Potassium, ion [water, surface water]: 0.0003989 kg; lognormal variance with pedigree 0.67, pedigree (1,1,5,1,1)
  (same comment as for Arsenic, ion)
- Cobalt [water, ground-, long-term]: 1.9951e-7 kg; lognormal variance with pedigree 0.71, pedigree (1,1,5,1,1)
  (same comment as for Cyanide)
- Nitrogen oxides [air, urban air close to ground]: 0.00067568 kg; lognormal variance with pedigree 0.09, pedigree (1,1,5,1,1)
  (same comment as for Copper)
- Zinc, ion [water, ground-, long-term]: 3.3502e-7 kg; lognormal variance with pedigree 5.51, pedigree (1,1,5,1,1)
  (same comment as for Cyanide)
- Molybdenum [water, ground-, long-term]: 1.1156e-7 kg; lognormal variance with pedigree 0.71, pedigree (1,1,5,1,1)
  (same comment as for Cyanide)
- Phosphate [water, surface water]: 0.0027476 kg; lognormal variance with pedigree 0.08, pedigree (1,1,5,1,1)
  sewer overload discharge plus direct wastewater treatment plant emission plus emission from sludge incineration plus emission from sludge spreading. Uncertainty calculated from wastewater composition and treatment model
- Phosphate [water, ground-, long-term]: 7.2652e-5 kg; lognormal variance with pedigree 4.25, pedigree (1,1,5,1,1)
  (same comment as for Cyanide)
- Lead [soil, agricultural]: 5.4854e-6 kg; lognormal variance with pedigree 0.71, pedigree (1,1,5,1,1)
  (same comment as for Molybdenum)
- Sulfate [water, ground-, long-term]: 0.0011039 kg; lognormal variance with pedigree 0.11, pedigree (1,1,5,1,1)
  (same comment as for Cyanide)
- Nickel, ion [water, ground-, long-term]: 6.9449e-7 kg; lognormal variance with pedigree 0.71, pedigree (1,1,5,1,1)
  (same comment as for Cyanide)
- Zinc [air, urban air close to ground]: 3.5302e-10 kg; lognormal variance with pedigree 0.76, pedigree (1,1,5,1,1)
  (same comment as for Copper)
- Manganese [water, ground-, long-term]: 6.4288e-6 kg; lognormal variance with pedigree 0.87, pedigree (1,1,5,1,1)
  (same comment as for Cyanide)
- Nitrate [water, surface water]: 0.048295 kg; lognormal variance with pedigree 0.06, pedigree (1,1,5,1,1)
  (same comment as for Arsenic, ion)
- Silicon [air, urban air close to ground]: 1.9568e-6 kg; lognormal variance with pedigree 0.73, pedigree (1,1,5,1,1)
  (same comment as for Copper)
- COD, Chemical Oxygen Demand [water, ground-, long-term]: 0.00012204 kg; lognormal variance with pedigree 0.12, pedigree (1,1,5,1,1)
  (same comment as for Cyanide)
- Dinitrogen monoxide [air, urban air close to ground]: 0.0001146 kg; lognormal variance with pedigree 0.09, pedigree (1,1,5,1,1)
  direct wastewater treatment plant emission plus direct digester gas emission plus emission from sludge incineration plus emission from sludge spreading. Uncertainty calculated from wastewater composition and treatment model
- Mercury [soil, agricultural]: 9.868e-8 kg; lognormal variance with pedigree 0.71, pedigree (1,1,5,1,1)
  (same comment as for Molybdenum)
- Manganese [soil, agricultural]: 1.8637e-5 kg; lognormal variance with pedigree 0.71, pedigree (1,1,5,1,1)
  (same comment as for Molybdenum)
- Cobalt [soil, agricultural]: 5.6886e-7 kg; lognormal variance with pedigree 0.71, pedigree (1,1,5,1,1)
  (same comment as for Molybdenum)
- Mercury [air, urban air close to ground]: 3.3527e-13 kg; lognormal variance with pedigree 0.74, pedigree (1,1,5,1,1)
  (same comment as for Copper)
- Nickel, ion [water, surface water]: 3.9961e-6 kg; lognormal variance with pedigree 0.66, pedigree (1,1,5,1,1)
  (same comment as for Arsenic, ion)
- Mercury [water, ground-, long-term]: 2.0567e-9 kg; lognormal variance with pedigree 2.98, pedigree (1,1,5,1,1)
  (same comment as for Cyanide)
- Copper, ion [water, surface water]: 9.7122e-6 kg; lognormal variance with pedigree 0.65, pedigree (1,1,5,1,1)
  (same comment as for Arsenic, ion)
- Chromium [air, urban air close to ground]: 1.274e-13 kg; lognormal variance with pedigree 0.81, pedigree (1,1,5,1,1)
  (same comment as for Copper)
- Nitrogen [water, surface water]: 0.00049 kg; lognormal variance with pedigree 0.08, pedigree (1,1,5,1,1)
  (same comment as for Nitrite)
- Calcium, ion [water, ground-, long-term]: 0.0012412 kg; lognormal variance with pedigree 0.71, pedigree (1,1,5,1,1)
  (same comment as for Cyanide)
- Tin, ion [water, surface water]: 1.4223e-6 kg; lognormal variance with pedigree 0.66, pedigree (1,1,5,1,1)
  (same comment as for Arsenic, ion)
- Aluminium [water, surface water]: 6.228e-5 kg; lognormal variance with pedigree 0.55, pedigree (1,1,5,1,1)
  (same comment as for Arsenic, ion)
- Phosphorus [air, urban air close to ground]: 6.2034e-7 kg; lognormal variance with pedigree 0.1, pedigree (1,1,5,1,1)
  (same comment as for Copper)
- Cobalt [air, urban air close to ground]: 7.2351e-15 kg; lognormal variance with pedigree 0.82, pedigree (1,1,5,1,1)
  (same comment as for Copper)
- Nitrate [water, ground-, long-term]: 2.393e-5 kg; lognormal variance with pedigree 0.09, pedigree (1,1,5,1,1)
  (same comment as for Cyanide)
- Chromium VI [water, surface water]: 6.264e-6 kg; lognormal variance with pedigree 0.65, pedigree (1,1,5,1,1)
  (same comment as for Arsenic, ion)
- Calcium [air, urban air close to ground]: 2.3777e-6 kg; lognormal variance with pedigree 0.73, pedigree (1,1,5,1,1)
  (same comment as for Copper)
- Manganese [air, urban air close to ground]: 4.0651e-14 kg; lognormal variance with pedigree 0.84, pedigree (1,1,5,1,1)
  (same comment as for Copper)
- Chromium, ion [water, surface water]: 5.4915e-9 kg; lognormal variance with pedigree 0.73, pedigree (1,1,5,1,1)
  (same comment as for Cyanide)
- Manganese [water, surface water]: 2.6898e-5 kg; lognormal variance with pedigree 0.66, pedigree (1,1,5,1,1)
  (same comment as for Arsenic, ion)
- Cadmium [air, urban air close to ground]: 2.2388e-12 kg; lognormal variance with pedigree 0.72, pedigree (1,1,5,1,1)
  (same comment as for Copper)
- Nickel [soil, agricultural]: 1.8517e-6 kg; lognormal variance with pedigree 0.71, pedigree (1,1,5,1,1)
  (same comment as for Molybdenum)
- Silicon [water, ground-, long-term]: 7.2988e-5 kg; lognormal variance with pedigree 5.46, pedigree (1,1,5,1,1)
  (same comment as for Cyanide)
- Magnesium [water, ground-, long-term]: 0.00014782 kg; lognormal variance with pedigree 0.71, pedigree (1,1,5,1,1)
  (same comment as for Cyanide)
- Chromium VI [water, ground-, long-term]: 1.824e-7 kg; lognormal variance with pedigree 1.09, pedigree (1,1,5,1,1)
  (same comment as for Cyanide)
- Silicon [water, surface water]: 0.00018768 kg; lognormal variance with pedigree 0.57, pedigree (1,1,5,1,1)
  (same comment as for Arsenic, ion)
- Magnesium [air, urban air close to ground]: 2.205e-7 kg; lognormal variance with pedigree 0.73, pedigree (1,1,5,1,1)
  (same comment as for Copper)
- Arsenic, ion [water, ground-, long-term]: 3.0507e-8 kg; lognormal variance with pedigree 0.71, pedigree (1,1,5,1,1)
  (same comment as for Cyanide)
- Ammonium, ion [water, surface water]: 0.011027 kg; lognormal variance with pedigree 0.06, pedigree (1,1,5,1,1)
  (same comment as for Nitrite)
- Copper, ion [water, ground-, long-term]: 6.4114e-6 kg; lognormal variance with pedigree 0.73, pedigree (1,1,5,1,1)
  (same comment as for Cyanide)

## Extrapolations
This dataset has been extrapolated from year 2000 to the year of the calculation (2021). The uncertainty has been adjusted accordingly.

## Review by Niels Jungbluth 2009-01-22
passed.
