# helium purification

Dataset: EcoSpold 2, unit process
Geography: GLO
Time period: 2000-01-01 to 2021-12-31
Technology level: current
Classification: ISIC rev.4 ecoinvent: 2011:Manufacture of basic chemicals
Classification: EcoSpold01Categories: chemicals/inorganics
Scenario: Business-as-Usual
System model: Allocation, cut-off by classification
Share of production covered: 100 %
Generated by: Tereza Levova
Database: ecoinvent
isCopyrightProtected: true
accessRestrictedTo: 1

## General comment
This datasets represents purification of helium, crude to helium Grade - A and its liquefaction. The technology used for helium purification is pressure swing adsorption (PSA) and liquefaction unit. The dataset is based on literature and estimates. The uncertainty of the data is rather high.
The activity is mass unbalanced due to missing "used charcoal" exchange.

## Included activities start
This activity boundaries are given by the boundaries of the technology - the PSA (pressure swing adsorbtion) and liquefaction unit. The activity starts when helium, crude enters this technology.

## Included activities end
This activity ends when purified, liquified Grade - A helium (99.995% of helium) leaves the technology.

## Geography
The inventory is modelled for the world..

## Technology
The technology used for helium purification is pressure swing adsorption (PSA).
Scheme of Pressure-Swing Adsorbtion - PSA - (Ullmann's Encyclopedia)

## Time period
Time of publications.

## Parameters
- efficiency: 0.9 dimensionless
  Output relative to input (requires additional specification). It is estimated, that the efficiency of the helium purification is 90%, i.e. 10% of helium is lost during the process.

## Reference product
- helium: 1 kg; name helium_RP; = helium_RP_PV/ (helium_RP_PV*0.99997*(1/ efficiency)*(1/ 0.75)); CPC 34231: Chemical elements n.e.c.; inorganic acids except phosphoric, nitric and sulphonitric; inorganic oxygen compoun[…]; By-product classification allocatable product; CAS 7440-59-7
  Calculated based on literature and assumptions.
  1.81E+08m3 is the global production of Grade-A helium in the world in 2005 (USGS, http://minerals.usgs.gov/minerals/pubs/commodity/helium/heliumyb05.pdf, accessed 20130403)
  0.165 kg/m3 is density of helium
  99.995% is the fraction of helium in Grade-A helium
  90% is the efficiency of helium purification (i.e. 10% are losses), estimate
  production volume 2.9865e7 kg; name helium_RP_PV; = 181000000*0.165
    Calculated based on literature and assumptions.
    1.81E+08m3 is the global production of Grade-A helium in the world in 2005 (USGS, http://minerals.usgs.gov/minerals/pubs/commodity/helium/heliumyb05.pdf, accessed 20130403)
    0.165 kg/m3 is density of helium
  property price 8.33 EUR2005; name helium_RP_price_EUR2005
    Temporary price data. Calculated as 90% of purchasers price based on: 2005 import and export prices (total trades (USD) divided by total weight (kg) in EU27, USA, China, Japan and India) from UN Commodity Trade Statistics Database (http://data.un.org/Explorer.aspxDatabase [Accessed 2011.06.20]). Commodity: Rare gases other than argon
  property density 0.000165 kg/l; name helium_RP_density
  property helium content 0.99997; name helium_RP_He_content
    Helium content on a dry matter basis. Grade - A helium.
  property carbon content 0
    carbon content on a dry matter basis (reserved; not for manual entry)
  properties: water content 0, carbon content, non-fossil 0, wet mass 1 kg, dry mass 1 kg, water in wet mass 0 kg, carbon content, fossil 0, carbon allocation 0 kg

## Inputs from technosphere
- helium, crude: 1.48144 kg; name helium_crude_in
  property water in wet mass 0 kg; name helium_crude_in_WWM
  property helium content 0.75; name helium_crude_in_He_content
  property dry mass 1 kg; name helium_crude_in_DM
  property density 0.000165 kg/l; name helium_crude_in_density
  property water content 0; name helium_crude_in_water_content
  property wet mass 1 kg; name helium_crude_in_WM
- charcoal: 0.0118515 kg; = (helium_crude_in-0.75)*0.032; lognormal variance with pedigree 0.0986, pedigree (4,5,5,5,4)
  Calculated value based on estimates.
  Based on adsorbent/adsorbed inpurities chart, for the example of a helium - carbon monoxide mixture, how carbon monoxide, which is easily adsorbed, reaches the equilibrium loading, a , on the molecular sieve, while pure helium exits the adsorber. When the adsorber capacity is exhausted, the adsorbent must be regenerated.
  Charcoal is considered to be adequate representative of the adsorber used in the PSA unit. The amount of adsorber needed per kg of helium purified is calculated to be 0.032 kg of adsorber/ 1 kg of inpurities filtered out. Since the helium, crude consist from 75% of helium the remaining 25% are the inpurities which need to be adsorbed.
  Ideally an "used charcoal" exchange should be created together with it's treatment "treatment of used charcoal". Since there are no data available this exchange is omitted, causing the activity to be unbalanced.
  properties: dry mass 1 kg, wet mass 1 kg, carbon content, non-fossil 0.8, heating value, net 28.4 MJ
  note on heating value, net: Indicative value. Reference: Fuels - Higher and Lower Calorific Values, available at: https://www.engineeringtoolbox.com/fuels-higher-calorific-values-d_169.html
- electricity, medium voltage: 3.70359 kWh; = ((7+18)/2)*0.2; lognormal variance with pedigree 0.1707, pedigree (4,4,5,3,5)
  Calculated based on producer's data and estimates.
  The electricity consumption of the pure liquified helium production is between 7 - 18 kWh/kg of liquified helium, Grade - A (Linde, http://www.linde-kryotechnik.ch/public/fachberichte/cec2007_fro.pdf, accessed 20130405). The PSA (pressure swing adsorbsion) technology which represents the purification of helium and the liquefaction unit are only one part of the whole chain. It is estimated that these two technologies represents 20% of the total electricity consumption.
  In general the costs for electricity cover approximatelly 1/3 of all the costs of helium purification.
- nitrogen, liquid: 0 kg; pedigree (1,1,1,1,1)
  Calculated based on literature values and estimates.
  Liquid nitrogen is used during helium purification for washing the final product. It can be recycled several times. The final make-up amount of liquid nitrogen needed per kg of final product is estimated to be 5ppm (Helium Purification, Wright, M., The Jefferson National Accelerator Facility, presentation from 20110419, https://www.jlab.org/conferences/cryo/JLAB%20Helium%20Purification.pdf, accessed 20130405).
  properties: wet mass 1 kg, dry mass 1 kg
- chemical factory, organics: 5.92575e-10 unit; lognormal variance with pedigree 0.4701, pedigree (4,4,5,3,5)
  Based on data from Gendorf (2000).
- nitrogen, liquid: 1.07687e-6, 3.92313e-6 kg (2 entries); lognormal variance with pedigree 0.0986, pedigree (4,5,5,5,4)
  (same comment as for nitrogen, liquid)

## Emissions to nature
- Helium [air, unspecified]: 0.075 kg; = helium_RP*(1- efficiency)*0.75
  Calculated value.
  10% of helium is lost during this process (estimate)
  0.75 is the fraction of helium in helium, crude

## Sampling procedure
Literature data

## Extrapolations
This dataset has been extrapolated from year 2007 to the year of the calculation (2021). The uncertainty has been adjusted accordingly.

## Review by Bo Weidema 2013-04-05
This dataset represents purification and replaces the previous dataset that combined Natural Gas Liquids extraction with the He extraction and purification.
The crude He includes 25% other gases, mainly Nitrogen, which are not accounted for as emissions in this dataset, which is the cause of the mass imbalance.

## Review by Roland Hischier 2011-11-21
Transfer of documentation done.

## Review by Roland Hischier 2007-09-20
passed.
-
