# rutile production, synthetic, 95% titanium dioxide, Benelite process

Dataset: EcoSpold 2, unit process
Geography: IN
Time period: 2000-01-01 to 2021-12-31
Technology level: current
Classification: EcoSpold01Categories: chemicals/inorganics
Classification: ISIC rev.4 ecoinvent: 2420:Manufacture of basic precious and other non-ferrous metals
Synonyms: TiO2
Scenario: Business-as-Usual
System model: Allocation, cut-off by classification
Generated by: Tereza Levova
Published in: Mahmoud, M.H.H. 2004
Database: ecoinvent
isCopyrightProtected: true
accessRestrictedTo: 1

## General comment
Rutile can be of either natural origin (mined from mineral sand) or synthetic (produced from ilmenite). Synthetic rutile is produced by reducing the iron oxide in ilmenite to metallic iron using carbon monoxide, followed by reoxidation and separation from the TiO2 rich fraction - the Becher process - or leaching with hydrochloric acid - the Benelite process. This activity describes synthetic rutile production using the Benelite process, which is only known to be used in India.

## Included activities end
Activity includes crushing of ilmenite to smaller particles, mixing, filtering, washing and drying. The hydrochloric acid can be recycled when using this technology. In this activity (dataset) it is assumed that 95% of the HCl is being returned to the process (recycled).

## Technology
The production of synthetic rutile from ilmenite by its leaching with hydrochloric acid. The amounts of materials both on the input and on the output are calculated using stoichiometric equation relations. In order to produce 1 kg of rutile (95% TiO2, i.e. 0.95 kg of TiO2), 1.687 kg of titanium oxochloride (TiOCl2) is needed and 0.867 kg of hydrochloric acid is produced as by-product. 95% of this hydrochloric acid is recycled and returned back to the process. In order to produce 1.687 kg of oxochloride (TiOCl2), 1.922 kg of hydrochloride acid (HCl) and 2 kg of ilmenite (FeTiO3) is needed. When the recycled amount of hydrochloric acid is deducted the make-up amount is then (1.922-0.867*0.95=) 1.098kg.

## Parameters
- efficiency: 0.95 dimensionless; name technology_efficiency; lognormal variance with pedigree 0.0187, pedigree (4,4,1,3,3)
- fraction of cooling water which evaporates to air, once-through cooling system: 0.004 dimensionless; name fraction_CW_OT_to_air; lognormal variance with pedigree 0.0413, pedigree (2,3,1,3,1)
  Calculated based on literature value (Scown, C.D., 2011, Water Footprint of U.S. Transportation Fuels and supplying information of the article) supplied by Quantis.
- fraction of cooling water which evaporates to air: 0.3875 dimensionless; name fraction_CW_to_air; = (0.5*fraction_CW_OT_to_air)+(0.5*fraction_CW_R_to_air); lognormal variance with pedigree 0.0413, pedigree (2,3,1,3,1)
  Calculated value based on literature value (see comments of the other parametres present in this dataset) and expert opinion. In the case when no industry/literature data are available about the type of cooling or directly fraction, cooling water, to air specific for the process a default assumption is applied. It is assumed that the once-through cooling system is used in 50% of all cases and recirculating system is used in another 50% of all cases. Fraction of cooling water which evaporates to air, i.e. is consumed.
- fraction of cooling water which evaporates to air, recirculating cooling system: 0.771 dimensionless; name fraction_CW_R_to_air; lognormal variance with pedigree 0.0413, pedigree (2,3,1,3,1)
  (same comment as for fraction of cooling water which evaporates to air, once-through coolin)

## Reference product
- rutile, 95% titanium dioxide: 1 kg; name rutile_output; CPC 4160: Other non-ferrous metals and articles thereof (including waste and scrap of some metals); cermets and articles […]; By-product classification allocatable product; CAS 1317-80-2
  production volume 2.47e8 kg; name RP_PV_1; = (100000 + 55000 + 42000 + 50000)*1000
    The only known currently active producers of synthetic rutile apart from those located in Australia (which use the Becher process) are located in India and are reported to be using the Benelite process (Cardarelli 2018). The installed capacity of synthetic rutile in India was 247'000 metric tons in 2019 (Indian Bureau of Mines 2020) and is used as best estimate of the production volume.
    Reference:
    Cardarelli, F. (2018). Materials Handbook: A Concise Desktop Reference. 3rd edition. Springer, Cham. DOI: https://doi.org/10.1007/978-3-319-38925-7.
    Indian Bureau of Mines (2020). Indian Minerals Yearbook 2019 (Part- III : Mineral Reviews), 58th Edition, Ilmenite and Rutile (Advance Release).https://ibm.gov.in/writereaddata/files/10012020172127Ilmenite_2019_AR.pdf
  property price 0.710382 EUR2005; name rutile_output_price_EUR2005
    Price approximated with the price of "Rutile, bulk, minimum 95% TiO2, f.o.b. Australia" reported in the USGS Mineral Commodity Summaries for Titanium Mineral Concentrates from 2009 to 2018 (https://www.usgs.gov/centers/nmic/titanium-statistics-and-information). The prices given in USD were converted to EUR based on the annual exchange rates published by the European Central Bank (https://sdw.ecb.europa.eu/quickview.do?SERIES_KEY=120.EXR.A.USD.EUR.SP00.A), and then adjusted for inflation relative to 2005 by using the Harmonised Index of Consumer Prices (HICP) of the euro area, published by eurostat (https://ec.europa.eu/eurostat/databrowser/view/PRC_HICP_AIND/default/table).
  property carbon content 0
    carbon content on a dry matter basis (reserved; not for manual entry)
  properties: wet mass 1 kg, water in wet mass 0 kg, water content 0, dry mass 1 kg, carbon content, non-fossil 0, carbon content, fossil 0, carbon allocation 0 kg

## Inputs from technosphere
- heat, district or industrial, natural gas: 2 MJ; source Gendorf 2000; lognormal variance with pedigree 0.1387, pedigree (4,4,4,3,5)
  Literature value. Based on data from Gendorf (2000).
  properties: heating value, net 1 MJ
- chemical factory, organics: 4e-10 unit; source Gendorf 2000; lognormal variance with pedigree 0.4381, pedigree (4,4,4,3,5)
  Estimation based on Gendorf, 2000
- ilmenite, 54% titanium dioxide: 1.99955 kg; name ilmenite_input; = (151.709/134.772)*(1/technology_efficiency)*(134.772/79.865)*(1/ technology_efficiency)*rutile_output*0.95; lognormal variance with pedigree 0.0248, pedigree (4,5,2,1,3)
  Calculated value. Stoichiometric calculation (see equations in the technology description), yield of 95%. Rutile contain 95% of pure titanium dioxide (TiO2).
  151.709 g/mol is the molecular weight of ilmenite (FeTiO3).
  134.722 g/mol is the molecular weight of titanyl chloride (TiOCl2).
  79.865 g/mol is the molecular weight of titanium dioxide (TiO2).
  properties: dry mass 1 kg, wet mass 1 kg
- hydrochloric acid, without water, in 30% solution state: 1.0982 kg; name hydrochloric_acid_input; = ((4*36.461)/134.772*(1/technology_efficiency)*(134.772/79.865)*( rutile_output*0.95)*(1/technology_efficiency))-((2*36.461/79.865)*0.95*(rutile_output*0.95)); lognormal variance with pedigree 0.0248, pedigree (4,5,2,1,3)
  Calculated value. Stoichiometric equation, yield of 95%. See technology descrition for further information. Rutile contain 95% of pure titanium dioxide (TiO2). It is assumed that 95% of the hydrochloric acid (HCl) produced in the reaction is recycled.
  36.461 g/mol is the molecular weight of water (H2O).
  134.722 g/mol is the molecular weight of titanyl chloride (TiOCl2).
  79.865 g/mol is the molecular weight of titanium dioxide (TiO2).
  properties: heating value, net 3.32 MJ, dry mass 1 kg, wet mass 1 kg
- electricity, medium voltage: 0.333 kWh; source Gendorf 2000; lognormal variance with pedigree 0.1387, pedigree (4,4,4,3,5)
  Estimation based on Gendorf, 2000
- residue from rutile production, synthetic, 56% water: -3.60697 kg; name residue_output; = ((1/0.44)*(126.751/134.772)*(134.772/79.865)*(rutile_output*0.95)*(1/ technology_efficiency))*-1; lognormal variance with pedigree 0.0248, pedigree (4,5,2,1,3)
  Calculated (stoichiometry). Literature value (Mineral Comodity Summaries, 1996, http://books.google.ch/books?id=agWRXY2pYh8C&pg=PA139&dq=%22synthetic+rutile%22+production+ton&hl=en&sa=X&ei=cGQ-T9m6A4mLhQec_vjMBQ&redir_esc=y#v=onepage&q=%22synthetic%20rutile%22%20production%20ton&f=false) suggest that the amount should be around 1.2kg (100% dry mass). The residue from rutile production has 44% of dry mass (DM), i.e. the final amount of the residue produced is (1/0.44*1.587=) 3.604 kg.
  126.751 g/mol is the molecular weight of iron dichloride (FeCl2).
  134.722 g/mol is the molecular weight of titanyl chloride (TiOCl2).
  79.865 g/mol is the molecular weight of titanium dioxide (TiO2).
  production volume 8.90921e8 kg; = RP_PV_1 * (residue_output / rutile_output)
    Calculated from production volume of reference product using the relative outputs.
  property price 0 EUR2005; name residue_output_price_EUR2005
  properties: wet mass 1 kg, dry mass 0.44 kg, water content 1.27273

## Inputs from nature
- Water, cooling, unspecified natural origin [natural resource, in water]: 0.024 m3; name water_cooling_UNO_input; source Gendorf 2000; lognormal variance with pedigree 0.1387, pedigree (4,4,4,3,5)
  Estimation based on Gendorf, 2000
  property water content 9081.65; name water_cooling_UNO_input_water_content; = water_cooling_UNO_input_WWM/water_cooling_UNO_input_DM
  property water in wet mass 999.89 kg; name water_cooling_UNO_input_WWM; = water_cooling_UNO_input_WM-water_cooling_UNO_input_DM
  property dry mass 0.1101 kg; name water_cooling_UNO_input_DM
  property carbon content, fossil 0.0104329; name water_cooling_UNO_inp_C_content_fossil_0
  property wet mass 1000 kg; name water_cooling_UNO_input_WM
  property carbon content, non-fossil 0; name water_cooling_UNO_C_content_non_fossil_0
- Water, unspecified natural origin [natural resource, in water]: 0.00156877 m3; name water_unspecified_input; = ((((1/0.44)*(126.751/134.772)*(134.772/79.865)*(rutile_output*0.95)*(1/ technology_efficiency))*0.56)-(((2*18.015)/134.772)*(134.772/79.865)*( rutile_output*0.95)*(1/technology_efficiency)))/1000
  Calculated value based on known demanded amount from the water incorporated in the residue on the output of the activity. Since the residue from the technology contain 56% of water (2kg) there has to be enough water on the input of the technology in order to achieve the water balance. 0.44 kg of water is produced during the reaction, thus additional 1.56kg of water need to be added to be used as process water. Technology efficiency is 95%. Rutile contain 95% of pure titanium dioxide (TiO2).
  18.015 g/mol is the molecular weight of water (H2O).
  134.722 g/mol is the molecular weight of titanyl chloride (TiOCl2).
  79.865 g/mol is the molecular weight of titanium dioxide (TiO2).

## Emissions to nature
- Solids, inorganic [water, surface water]: 0.0105239 kg; = ((1/technology_efficiency)-1)*ilmenite_input*0.1; lognormal variance with pedigree 0.0642, pedigree (4,5,2,1,3)
  Calculated value. The unreacted amount of ilemnite entering the activity is released as solids together with wastewater. The WWTP is assumed to have 90% efficiency of treatment, thus 10% of the ilmenite on the input to the WWTP is released to the environment (water) as inorganic solids.
- Water [air, unspecified]: 0.0093 m3; name water_to_air_unspecified; = water_cooling_UNO_input*fraction_CW_to_air; lognormal variance with pedigree 0.0409, pedigree (2,2,2,1,1)
  Calculated value
- Hydrogen [air, unspecified]: 0.00125917 kg; name hydrogen_emissions_air; = ((0.002*hydrochloric_acid_input)+(0.05*0.867))*( 2.016/(2*36.461)); lognormal variance with pedigree 0.0642, pedigree (4,5,2,1,3)
  Calculated value. Part (0.2%) of the unreacted amount of hydrochloric acid (HCl) on the input as well as part of the (5%) amount of hydrochloric acid which is produced as by-product evaporates to air as hydrogen (H2). 0.867 kg is the amount of hydrochloric acid produced as a by-product of which 5% evaporates to air as hydrogen (H2). 95% of the hydrochloric acid produced as a by-product is recycled (re-used) in this activity.
  36.461 g/mol is the molecular weight of hydrochloric acid (HCl).
  2.016 g/mol is molecular weight of hydrogen.
- Chloride [water, surface water]: 0.0921019 kg; = (((((1/technology_efficiency)-1)*hydrochloric_acid_input)+(0.876*0.05))-((0.002*hydrochloric_acid_input)+(0.02*0.867))*(35.453/(2*36.461))); lognormal variance with pedigree 0.0642, pedigree (4,5,2,1,3)
  Calculated value. The unreacted amount of hydrochloric acid as well as the not recycled amount of hydrochloride acide produced as by-product partially (0.002%) evaporates as chlorine (Cl2) to air the rest is released into wastewater as chloride (Cl-). It is assumed that all this amount is discharged directly into the environment. 36.461 g/mol is the molecular weight of hydrochloric acid (HCl). 35.453 g/mol is the molecular weight of chloride.
- Water [water, unspecified]: 0.0147 m3; name water_to_water_unspecified; = water_cooling_UNO_input*(1-fraction_CW_to_air); lognormal variance with pedigree 0.0409, pedigree (2,2,2,1,1)
  Calculated value
  property carbon content, fossil 0; name C_content_fossil
  property carbon content, non-fossil 0; name C_content_non_fossil
  property wet mass 1000 kg; name WM
  property dry mass 0 kg; name DM
  property water in wet mass 1000 kg; name WWM
- Chlorine [air, unspecified]: 0.00442872 kg; name chlorine_emissions_air; = ((0.0002*hydrochloric_acid_input)+(0.005*0.867))*(70.906/(2*36.461)); lognormal variance with pedigree 0.0642, pedigree (4,5,2,1,3)
  Calculated value. Part (0.02%) of the unreacted amount of hydrochloric acid (HCl) on the input as well as part of the (0.5%) amount of hydrochloric acid which is produced as by-product evaporates to air as chlorine (Cl2). 0.867 kg is the amount of hydrochloric acid produced as a by-product of which 5% evaporates to air as chlorine (Cl2). 95% of the hydrochloric acid produced as a by-product is recycled (re-used) in this activity.
  36.461 g/mol is the molecular weight of hydrochloric acid (HCl).
  70.906 g/mol is the molecular weight of chlorine.

## Sampling procedure
Literature data and stoichiometric calculation.

## Extrapolations
This dataset has been extrapolated from year 2019 to the year of the calculation (2021). The uncertainty has been adjusted accordingly.
