# fertilising, by broadcaster

Dataset: EcoSpold 2, unit process
Geography: BR
Time period: 2012-01-01 to 2021-12-31
Technology level: current
Classification: EcoSpold01Categories: agricultural means of production/work processes
Classification: ISIC rev.4 ecoinvent: 0161:Support activities for crop production
Synonyms: fertilizing; top-dressing fertilization
Scenario: Business-as-Usual
System model: Allocation, cut-off by classification
Generated by: Marília I. S. Folegatti Matsuura
Published in: Folegatti-Matsuura M. 2018
Database: ecoinvent
isCopyrightProtected: true
accessRestrictedTo: 1

## General comment
This dataset represents the fertilising service. The dataset covers the application of fertiliser with a tractor (120 hp) coupled to an broadcaster (10 t carrying capacity). Functional Unit (FU) is one hectare fertilised.The operation time is 0.07 h/FU and the fuel consumption is 12 liters per hour.
This is a common operation in grain production in Brazil.

## Included activities start
From agricultural field foreseen to be processed.

## Included activities end
The dataset includes the diesel fuel consumption and the amount of agricultural machinery and shed attributed to fertilising. The dataset also includes emissions from diesel combustion and from tyre abrasion during the work process. The dataset doesn't include the fertilisers, dust other than from combustion and noise.This activity ends with the transfer back to the shed and uncoupling of the implement from the tractor.

## Geography
The inventory is modelled for agricultural processes in Brazil.

## Technology
Fuel consumption has been extrapolated to Brazil, but emissions per kg diesel and others inputs were taken from the original values.

## Time period
Most of the data used to modelling this activity were collected in the last few years (2012-2016).

## Reference product
- fertilising, by broadcaster: 1 ha; CPC 86119: Other support services to crop production; By-product classification allocatable product
  production volume 5.99441e7 ha
    Area of arable land in Brazil, according to the Municipal Agricultural Production Data of the Brazilian Institute of Geography and Statistics (SIDRA - IBGE). See more in: http://www.sidra.ibge.gov.br/.
    Permanent crops, including sugarcane, are not accounted for.
    1 applications/year assumed for arable (own estimation).
  property price 6.10034 EUR2005
    Calculated based on inputs: The price of the product has been calculated as a sum of the values of the material and energy inputs for this product. This value is therefore a rough estimation. It may underestimate the real price since there are additional expenses when producing any product. These expences can include for example labour costs, treatment of waste materials and profit for the producer. Please consider carefully whether this level of data quality is acceptable for your application.

## Inputs from technosphere
- tractor, 4-wheel, agricultural: 0.687 kg; lognormal variance with pedigree 0.006, pedigree (1,4,3,5,1)
  Proxy, based on 'Agricultural Field Work Processes' - pdf-document on the dedicated talk page of ecoinvent (www.ecoinvent.org/talk-pages). The same amount of machinery use as in the CA-QC dataset is used as a proxy.
- shed: 0.00171 m2; lognormal variance with pedigree 0.306, pedigree (1,4,3,5,1)
  (same comment as for tractor, 4-wheel, agricultural)
- diesel: 0.7 kg; name diesel_consumption; lognormal variance with pedigree 0.004, pedigree (1,4,3,1,1)
  Scaling to Brazil diesel consumption.
  properties: dry mass 1 kg, wet mass 1 kg, carbon content, fossil 0.865, heating value, net 42.8 MJ
  note on carbon content, fossil: C-content of diesel is 86.5% (ecoinvent v2.2 report 6_IV, Tab 3.14)
- agricultural machinery, unspecified: 0.241 kg; lognormal variance with pedigree 0.006, pedigree (1,4,3,5,1)
  (same comment as for tractor, 4-wheel, agricultural)

## Emissions to nature
- Ammonia [air, non-urban air or from high stacks]: 1.4e-5 kg; = 2,00E-05* diesel_consumption; source Nemecek, T. 2007; lognormal variance with pedigree 0.0621, pedigree (1,2,3,5,3)
  Emission from diesel combustion scaled from the CA-QC emission factor based on the relative diesel consumption.
- Zinc [soil, agricultural]: 0.000897 kg; lognormal variance with pedigree 0.046, pedigree (1,4,3,5,1)
  Proxy, based on 'Agricultural Field Work Processes' - pdf-document on the dedicated talk page of ecoinvent (www.ecoinvent.org/talk-pages). Emission to soil from tyre abrasion, not related to diesel combustion. The same emission factor as the CA-QC dataset is used as a proxy.
- Nitrogen oxides [air, non-urban air or from high stacks]: 0.03059 kg; = 4.37E-02* diesel_consumption; lognormal variance with pedigree 0.046, pedigree (1,4,3,5,1)
  (same comment as for Ammonia)
- Selenium [air, non-urban air or from high stacks]: 7e-9 kg; = 1,00E-08* diesel_consumption; source Nemecek, T. 2007; lognormal variance with pedigree 0.0621, pedigree (1,2,3,5,3)
  (same comment as for Ammonia)
- Copper [air, non-urban air or from high stacks]: 1.19e-6 kg; = 1.70E-06* diesel_consumption; source Nemecek, T. 2007; lognormal variance with pedigree 0.6621, pedigree (1,2,3,5,3)
  (same comment as for Ammonia)
- Particulates, < 2.5 um [air, non-urban air or from high stacks]: 0.002751 kg; = 3.93E-03* diesel_consumption; lognormal variance with pedigree 0.3221, pedigree (1,2,3,5,3)
  (same comment as for Ammonia)
- Carbon dioxide, fossil [air, non-urban air or from high stacks]: 2.184 kg; = 3.12E+00* diesel_consumption; source Nemecek, T. 2007; lognormal variance with pedigree 0.0221, pedigree (1,2,3,5,3)
  (same comment as for Ammonia)
- Cadmium [soil, agricultural]: 3.4e-7 kg; lognormal variance with pedigree 0.046, pedigree (1,4,3,5,1)
  (same comment as for Zinc)
- NMVOC, non-methane volatile organic compounds, unspecified origin [air, non-urban air or from high stacks]: 0.00189 kg; = 2.70E-03* diesel_consumption; lognormal variance with pedigree 0.046, pedigree (1,4,3,5,1)
  (same comment as for Ammonia)
- Methane, fossil [air, non-urban air or from high stacks]: 9.03e-5 kg; = 1.29E-04* diesel_consumption; source Nemecek, T. 2007; lognormal variance with pedigree 0.0621, pedigree (1,2,3,5,3)
  (same comment as for Ammonia)
- Lead [soil, agricultural]: 1.49e-6 kg; lognormal variance with pedigree 0.046, pedigree (1,4,3,5,1)
  (same comment as for Zinc)
- Sulfur dioxide [air, non-urban air or from high stacks]: 0.000707 kg; = 1.01E-03* diesel_consumption; source Nemecek, T. 2007; lognormal variance with pedigree 0.0221, pedigree (1,2,3,5,3)
  (same comment as for Ammonia)
- Chromium [air, non-urban air or from high stacks]: 3.507e-8 kg; = 5.01E-08* diesel_consumption; source Nemecek, T. 2007; lognormal variance with pedigree 0.6621, pedigree (1,2,3,5,3)
  (same comment as for Ammonia)
- PAH, polycyclic aromatic hydrocarbons [air, non-urban air or from high stacks]: 2.303e-6 kg; = 3.29E-06* diesel_consumption; source Nemecek, T. 2007; lognormal variance with pedigree 0.3221, pedigree (1,2,3,5,3)
  (same comment as for Ammonia)
- Cadmium [air, non-urban air or from high stacks]: 7e-9 kg; = 1.00E-08* diesel_consumption; source Nemecek, T. 2007; lognormal variance with pedigree 0.6621, pedigree (1,2,3,5,3)
  (same comment as for Ammonia)
- Benzene [air, non-urban air or from high stacks]: 5.11e-6 kg; = 7,30E-06* diesel_consumption; source Nemecek, T. 2007; lognormal variance with pedigree 0.0621, pedigree (1,2,3,5,3)
  (same comment as for Ammonia)
- Dinitrogen monoxide [air, non-urban air or from high stacks]: 8.4e-5 kg; = 1.20E-04* diesel_consumption; source Nemecek, T. 2007; lognormal variance with pedigree 0.0621, pedigree (1,2,3,5,3)
  (same comment as for Ammonia)
- Nickel [air, non-urban air or from high stacks]: 4.893e-8 kg; = 6.99E-08* diesel_consumption; source Nemecek, T. 2007; lognormal variance with pedigree 0.6621, pedigree (1,2,3,5,3)
  (same comment as for Ammonia)
- Benzo(a)pyrene [air, non-urban air or from high stacks]: 2.107e-8 kg; = 3,01E-08* diesel_consumption; source Nemecek, T. 2007; lognormal variance with pedigree 0.6621, pedigree (1,2,3,5,3)
  (same comment as for Ammonia)
- Zinc [air, non-urban air or from high stacks]: 7e-7 kg; = 1.00E-06* diesel_consumption; source Nemecek, T. 2007; lognormal variance with pedigree 0.6621, pedigree (1,2,3,5,3)
  (same comment as for Ammonia)
- Carbon monoxide, fossil [air, non-urban air or from high stacks]: 0.002779 kg; = 3.97E-03* diesel_consumption; lognormal variance with pedigree 0.656, pedigree (1,4,3,5,1)
  (same comment as for Ammonia)

## Sampling procedure
Emissions of CO, HC and NOx are expert estimations based on measurements for comparable activities (roling). The other emissions were calculated basing on literature data and the measured fuel consumption. The main source of data for diesel consumption are projects conducted by Embrapa Soja (CNPSO). Data are also provided by relevant experts related to agricultural sector in Brazil.

## Extrapolations
This dataset has been extrapolated from year 2016 to the year of the calculation (2021). The uncertainty has been adjusted accordingly.

## Review by Jens Lansche 2017-11-23
CA-QC dataset used as proxy, diesel input and related combustion emissions adapted.
