# treatment of sulfidic tailings, from zinc-lead mine operation, tailings impoundment

Dataset: EcoSpold 2, unit process
Geography: MX
Time period: 2015-01-01 to 2021-12-31
Technology level: current
Classification: ISIC rev.4 ecoinvent: 3822:Treatment and disposal of hazardous waste
Synonyms: pond; tailing; sulphidic; tails
Scenario: Business-as-Usual
System model: Allocation, cut-off by classification
Share of production covered: 80 %
Generated by: David Turner
Database: ecoinvent
isCopyrightProtected: true
accessRestrictedTo: 1

## General comment
This dataset represents the activity of waste disposal of sulfidic tailings, from zinc-lead mine operation in a tailings impoundment in Mexico.
Background: Tailings, a waste material produced during mineral concentration (beneficiation), often contain significant quantities of mobile toxic metals and are typically produced in large quantities. To manage these wastes, tailings are commonly stored behind dammed impoundments, known as tailings ponds. These ponds pose a significant long-term pollution risk as metals may leach out into the surrounding environment, potentially over very long timeframes.
Modelling approach: This dataset was produced using a model developed specifically for assessing the long-term emissions of tailings disposal (see Doka, 2017). The tailings disposal model is based on the modelling framework applied in existing landfill process models used in ecoinvent and is based on a top-down approach. Literature data on measurements of deposited tailings compositions (solids) and measured current concentrations in leachate (liquid) form the basis of the model and are used to characterise pollutant mobility and calculate the currently occurring rate of emissions of the landfill. Heeding chief parameters, such as hydrology, pH development and elemental chemistry, these emissions are then projected into the future. Tailings composition is based on the typical composition of tailings at zinc-lead mine sites worldwide; i.e. composition is not region-specific. Land use was calculated following the approach described by Doka (2008). Based on an assumed generic final height of a tailings impoundment of 60 m and an assumed tailings density of 2200 kg/m3, a land area of 7.58E-06 m2 is required per kilogram of sulfidic tailings. The land is assumed to be converted from unknown origin to a disposal site. After an operational phase of 30 years, spontaneous restoration of a consolidated state is assumed to be reached after one hundred years. The total occupation time is therefore 130 years and the land occupation per kilogram tailings is 9.85E-04 m2.
Waste composition (wet, in ppm): H2O 300000; O 603730; H na; C 6145; S 8563.2; N 5.0454; P 272.84; B 54.583; Cl 102.61; Br 0.22894; F 772.88; I na; Ag 26.476; As 516.17; Ba 443.79; Cd 12.479; Co 15.076; Cr 34.174; Cu 314.87; Hg 1.1079; Mn 443.21; Mo 6.3919; Ni 15.511; Pb 1329.2; Sb 100.88; Se 5.2557; Sn 9.9969; V 40.852; Zn 1656.2; Be 1.0585; Sc 5.1722; Sr 75.651; Ti 1.9307; Tl 3.7219; W 10.954; Si 29391; Fe 21079; Ca 6599.5; Al 10112; K 4448.8; Mg 3031.4; Na 620.3. // Share of carbon in waste that is biogenic 0%.
Activity extent: The dataset includes all potential emissions to the environment and land use changes. Input exchanges of infrastructure, materials, energy, and water are not included here but are accounted for in the activity, zinc-lead mine operation.
References
Doka, G. (2008). Life Cycle Inventory data of mining waste: Emissions from sulfidic tailings disposal. Zürich, Switzerland: Doka Life Cycle Assessments.
Doka, G. (2017). A model for waste-specific and climate-specific life cycle inventories of tailings impoundments. Zürich, Switzerland: Doka Life Cycle Assessments.

## Included activities start
The activity starts at the point of waste deposition in the impoundment. All upstream activities, including the pumping of tailings to the site, any dewatering or treatment, or other transport-related activities are excluded.

## Included activities end
Waste-specific short- and long-term emissions to the environment via impoundment leachate; land transformation and occupation. Note that the structural integrity of the site is assumed to be unwavering during the entie modelled time horizon; i.e. accidental releases of leachate (due to impoundment failure) are not considered.

## Geography
Given name of site is 'Zinc-lead deposits; Mexico'. Impoundment site with mean annual temperature (MAT) of 18.0997994552255 degC, mean annual precipitation (MAP) of 531.338586796131 mm/year, mean annual actual evaporation (EAT) of 431.267811698249 mm/year, and net infiltration of 315.704680947006 mm/year (using half of natural surface evapotranspiration).

## Technology
This is an inventory for an impoundment of copper ore beneficiation tailings waste. The following assumptions were made concerning technology: final impoundment height is 60 meters; operation phase duration is 30 years; and impoundment leachates are released into the environment untreated.

## Time period
'Data on average composition of tailings and tailings-derived leachates from literature sources published between 1994 and 2017 (mean publication date: 2009±6). Mean annual temperature and precipitation data for 1970-2000 (source: Fick and Hijmans, 2017); mean annual evapotranspiration for 1950-2000 (source: Fekete et al., 2002). Production volume based on world mine production data from the USGS Minerals Yearbook 2015. Transfer coefficients from prospective, tailings-specific model.
References:
Fekete, B. M., Vorosmarty, C. J. & Grabs, W. (2002). High-resolution fields of global runoff combining observed river discharge and simulated water balances. Global Biogeochemical Cycles, 16, 15-1 - 15-10.
Fick, S. E. & Hijmans, R. J. (2017). Worldclim 2: New 1-km spatial resolution climate surfaces for global land areas. International Journal of Climatology, 37, 4302-4315.'

## Reference product
- sulfidic tailings, from zinc-lead mine operation: -1 kg; By-product classification Waste
  main reference product of this activity (supply of disposal service).
  production volume 1.45e10 kg
    Estimate of the national tailings production volume from the mining and concentration of sulfidic zinc-lead ores, based on national mine production of zinc-lead from sulfide mineral deposits (kg) multiplied by estimated tailings generation rate per kg zinc-lead concentrate produced (15.5 kg per kg zinc-lead concentrate).
  property price 0 EUR2005
    Waste products are assigned a price of zero as they are assumed to require further treatment.
  property carbon content 0.0087785
    carbon content on a dry matter basis (reserved; not for manual entry)
  properties: cobalt content 2.1537e-5, silver content 3.7823e-5, vanadium content 5.8361e-5, cadmium content 1.7827e-5, sulfur content 0.012233, copper content 0.00044981, barium content 0.00063399, carbon content, non-fossil 0, arsenic content 0.00073739, chromium content 4.8821e-5, boron content 7.7976e-5, nitrogen content 7.2076e-6, chlorine content 0.00014659, fluorine content 0.0011041, phosphorus content 0.00038978, scandium content 7.3888e-6, selenium content 7.5081e-6, magnesium content 0.0043305, dry mass 0.7 kg, wet mass 1 kg, calcium content 0.0094279, molybdenum content 9.1313e-6, silicon content 0.041987, potassium content 0.0063554, tin content 1.4281e-5, titanium content 2.7581e-6, beryllium content 1.5122e-6, sodium content 0.00088614, tungsten content 1.5648e-5, nickel content 2.2158e-5, thallium content 5.317e-6, mercury content 1.5828e-6, antimony content 0.00014411, water content 0.42857, zinc content 0.002366, aluminium content 0.014446, water in wet mass 0.3 kg, oxygen content 0.86247, bromine content 3.2706e-7, manganese content 0.00063316, strontium content 0.00010807, lead content 0.0018988, iron content 0.030113, carbon content, fossil 0.0087785, carbon allocation 0.00614495 kg

## Inputs from nature
- Transformation, from unspecified [natural resource, land]: 7.5758e-6 m2; lognormal variance with pedigree 0.030796, pedigree (1,1,2,1,1)
  conversion of impoundment area.
  Uncertainty: U
- Transformation, to dump site [natural resource, land]: 7.5758e-6 m2; lognormal variance with pedigree 0.030796, pedigree (1,1,2,1,1)
  conversion to impoundment area.
  Uncertainty: U
- Occupation, dump site [natural resource, land]: 0.00098485 m2*year; lognormal variance with pedigree 0.14986, pedigree (1,1,2,1,1)
  for impoundment operation phase and 100 year renaturation phase.
  Uncertainty: U

## Emissions to nature
- Tungsten [water, ground-, long-term]: 2.4396e-6 kg; lognormal variance with pedigree 0.45508, pedigree (1,1,2,1,1)
  Emissions from long-term leachate (>100a) directly from tailings impoundment.
  Uncertainty: U
- Antimony [water, ground-, long-term]: 4.8826e-6 kg; lognormal variance with pedigree 0.81354, pedigree (1,1,2,1,1)
  (same comment as for Tungsten)
- Mercury [water, ground-, long-term]: 1.1072e-6 kg; lognormal variance with pedigree 0.38923, pedigree (1,1,2,1,1)
  (same comment as for Tungsten)
- Vanadium, ion [water, ground-]: 6.7738e-10 kg; lognormal variance with pedigree 0.56881, pedigree (1,1,2,1,1)
  burden from short-term leachate to groundwater in uncontrolled impoundment in moist cimate.
  Uncertainty: U
- Aluminium [water, ground-, long-term]: 0.010107 kg; lognormal variance with pedigree 0.091717, pedigree (1,1,2,1,1)
  (same comment as for Tungsten)
- Magnesium [water, ground-]: 3.748e-5 kg; lognormal variance with pedigree 0.21377, pedigree (1,1,2,1,1)
  (same comment as for Vanadium, ion)
- Zinc, ion [water, ground-]: 5.0834e-6 kg; lognormal variance with pedigree 0.27558, pedigree (1,1,2,1,1)
  (same comment as for Vanadium, ion)
- Nitrate [water, ground-]: 4.897e-6 kg; lognormal variance with pedigree 0.35109, pedigree (1,1,2,1,1)
  (same comment as for Vanadium, ion)
- Manganese [water, ground-]: 2.1252e-6 kg; lognormal variance with pedigree 0.30473, pedigree (1,1,2,1,1)
  (same comment as for Vanadium, ion)
- Vanadium, ion [water, ground-, long-term]: 1.1641e-7 kg; lognormal variance with pedigree 2.4171, pedigree (1,1,2,1,1)
  (same comment as for Tungsten)
- Nitrate [water, ground-, long-term]: 1.3444e-5 kg; lognormal variance with pedigree 0.34061, pedigree (1,1,2,1,1)
  (same comment as for Tungsten)
- Magnesium [water, ground-, long-term]: 0.0029939 kg; lognormal variance with pedigree 0.12891, pedigree (1,1,2,1,1)
  (same comment as for Tungsten)
- TOC, Total Organic Carbon [water, ground-, long-term]: 0.00043154 kg; lognormal variance with pedigree 0.54773, pedigree (1,1,2,1,1)
  (same comment as for Tungsten)
- Aluminium [water, ground-]: 4.7152e-6 kg; lognormal variance with pedigree 0.27981, pedigree (1,1,2,1,1)
  (same comment as for Vanadium, ion)
- Lead [water, ground-, long-term]: 0.0013291 kg; lognormal variance with pedigree 0.15535, pedigree (1,1,2,1,1)
  (same comment as for Tungsten)
- Tungsten [water, ground-]: 1.605e-8 kg; lognormal variance with pedigree 0.46504, pedigree (1,1,2,1,1)
  (same comment as for Vanadium, ion)
- Ammonium, ion [water, ground-, long-term]: 8.5175e-7 kg; lognormal variance with pedigree 0.34061, pedigree (1,1,2,1,1)
  (same comment as for Tungsten)
- Lead [water, ground-]: 1.0312e-7 kg; lognormal variance with pedigree 0.40264, pedigree (1,1,2,1,1)
  (same comment as for Vanadium, ion)
- Arsenic, ion [water, ground-]: 9.3398e-8 kg; lognormal variance with pedigree 0.40556, pedigree (1,1,2,1,1)
  (same comment as for Vanadium, ion)
- Iron, ion [water, ground-, long-term]: 0.021072 kg; lognormal variance with pedigree 0.070341, pedigree (1,1,2,1,1)
  (same comment as for Tungsten)
- Arsenic, ion [water, ground-, long-term]: 1.5825e-5 kg; lognormal variance with pedigree 0.94528, pedigree (1,1,2,1,1)
  (same comment as for Tungsten)
- Iron, ion [water, ground-]: 7.0726e-6 kg; lognormal variance with pedigree 0.26925, pedigree (1,1,2,1,1)
  (same comment as for Vanadium, ion)
- Titanium, ion [water, ground-]: 5.1302e-11 kg; lognormal variance with pedigree 0.65392, pedigree (1,1,2,1,1)
  (same comment as for Vanadium, ion)
- Ammonium, ion [water, ground-]: 3.1025e-7 kg; lognormal variance with pedigree 0.35109, pedigree (1,1,2,1,1)
  (same comment as for Vanadium, ion)
- Hydrogen sulfide [water, ground-]: 0.00065855 kg; lognormal variance with pedigree 0.10583, pedigree (1,1,2,1,1)
  (same comment as for Vanadium, ion)
- Titanium, ion [water, ground-, long-term]: 1.9306e-6 kg; lognormal variance with pedigree 0.37118, pedigree (1,1,2,1,1)
  (same comment as for Tungsten)
- Hydrogen sulfide [water, ground-, long-term]: 0.0014617 kg; lognormal variance with pedigree 0.09783, pedigree (1,1,2,1,1)
  (same comment as for Tungsten)
- TOC, Total Organic Carbon [water, ground-]: 7.2044e-7 kg; lognormal variance with pedigree 0.34045, pedigree (1,1,2,1,1)
  (same comment as for Vanadium, ion)
- Fluoride [water, ground-, long-term]: 0.0002862 kg; lognormal variance with pedigree 0.23468, pedigree (1,1,2,1,1)
  (same comment as for Tungsten)
- Tin, ion [water, ground-]: 7.2976e-9 kg; lognormal variance with pedigree 0.49063, pedigree (1,1,2,1,1)
  (same comment as for Vanadium, ion)
- Fluoride [water, ground-]: 5.9715e-7 kg; lognormal variance with pedigree 0.34462, pedigree (1,1,2,1,1)
  (same comment as for Vanadium, ion)
- Tin, ion [water, ground-, long-term]: 9.9896e-6 kg; lognormal variance with pedigree 0.31719, pedigree (1,1,2,1,1)
  (same comment as for Tungsten)
- Copper, ion [water, ground-, long-term]: 0.00031476 kg; lognormal variance with pedigree 0.20261, pedigree (1,1,2,1,1)
  (same comment as for Tungsten)
- Thallium [water, ground-, long-term]: 3.7214e-6 kg; lognormal variance with pedigree 0.34971, pedigree (1,1,2,1,1)
  (same comment as for Tungsten)
- DOC, Dissolved Organic Carbon [water, ground-, long-term]: 0.00043154 kg; lognormal variance with pedigree 0.54773, pedigree (1,1,2,1,1)
  (same comment as for Tungsten)
- Thallium [water, ground-]: 4.8511e-10 kg; lognormal variance with pedigree 0.57983, pedigree (1,1,2,1,1)
  (same comment as for Vanadium, ion)
- DOC, Dissolved Organic Carbon [water, ground-]: 7.2044e-7 kg; lognormal variance with pedigree 0.34045, pedigree (1,1,2,1,1)
  (same comment as for Vanadium, ion)
- Sulfate [water, ground-, long-term]: 0.013583 kg; lognormal variance with pedigree 0.09783, pedigree (1,1,2,1,1)
  (same comment as for Tungsten)
- COD, Chemical Oxygen Demand [water, ground-]: 6.5623e-8 kg; lognormal variance with pedigree 0.34045, pedigree (1,1,2,1,1)
  (same comment as for Vanadium, ion)
- Sulfate [water, ground-]: 0.0061198 kg; lognormal variance with pedigree 0.10583, pedigree (1,1,2,1,1)
  (same comment as for Vanadium, ion)
- Cobalt [water, ground-, long-term]: 1.4976e-5 kg; lognormal variance with pedigree 0.3036, pedigree (1,1,2,1,1)
  (same comment as for Tungsten)
- Strontium [water, ground-, long-term]: 7.5577e-5 kg; lognormal variance with pedigree 0.24999, pedigree (1,1,2,1,1)
  (same comment as for Tungsten)
- Copper, ion [water, ground-]: 1.0649e-7 kg; lognormal variance with pedigree 0.40126, pedigree (1,1,2,1,1)
  (same comment as for Vanadium, ion)
- Sodium, ion [water, ground-, long-term]: 0.0006055 kg; lognormal variance with pedigree 0.18027, pedigree (1,1,2,1,1)
  (same comment as for Tungsten)
- COD, Chemical Oxygen Demand [water, ground-, long-term]: 3.9308e-5 kg; lognormal variance with pedigree 0.54773, pedigree (1,1,2,1,1)
  (same comment as for Tungsten)
- Sodium, ion [water, ground-]: 4.1919e-6 kg; lognormal variance with pedigree 0.28314, pedigree (1,1,2,1,1)
  (same comment as for Vanadium, ion)
- Chromium VI [water, ground-, long-term]: 6.045e-7 kg; lognormal variance with pedigree 1.2939, pedigree (1,1,2,1,1)
  (same comment as for Tungsten)
- Strontium [water, ground-]: 7.4329e-8 kg; lognormal variance with pedigree 0.41378, pedigree (1,1,2,1,1)
  (same comment as for Vanadium, ion)
- Cobalt [water, ground-]: 9.9393e-8 kg; lognormal variance with pedigree 0.40725, pedigree (1,1,2,1,1)
  (same comment as for Vanadium, ion)
- Silicon [water, ground-, long-term]: 0.00034867 kg; lognormal variance with pedigree 1.2901, pedigree (1,1,2,1,1)
  (same comment as for Tungsten)
- Chromium VI [water, ground-]: 3.544e-9 kg; lognormal variance with pedigree 0.51412, pedigree (1,1,2,1,1)
  (same comment as for Vanadium, ion)
- Silver, ion [water, ground-, long-term]: 2.6474e-5 kg; lognormal variance with pedigree 0.28491, pedigree (1,1,2,1,1)
  (same comment as for Tungsten)
- Calcium, ion [water, ground-]: 8.0181e-5 kg; lognormal variance with pedigree 0.19001, pedigree (1,1,2,1,1)
  (same comment as for Vanadium, ion)
- Silver, ion [water, ground-]: 2.1842e-9 kg; lognormal variance with pedigree 0.53017, pedigree (1,1,2,1,1)
  (same comment as for Vanadium, ion)
- Chloride [water, ground-, long-term]: 8.9591e-5 kg; lognormal variance with pedigree 0.24012, pedigree (1,1,2,1,1)
  (same comment as for Tungsten)
- Silicon [water, ground-]: 2.0259e-6 kg; lognormal variance with pedigree 0.31232, pedigree (1,1,2,1,1)
  (same comment as for Vanadium, ion)
- Calcium, ion [water, ground-, long-term]: 0.0065194 kg; lognormal variance with pedigree 0.10464, pedigree (1,1,2,1,1)
  (same comment as for Tungsten)
- Scandium [water, ground-, long-term]: 5.1611e-6 kg; lognormal variance with pedigree 0.33891, pedigree (1,1,2,1,1)
  (same comment as for Tungsten)
- Chloride [water, ground-]: 1.3019e-5 kg; lognormal variance with pedigree 0.26481, pedigree (1,1,2,1,1)
  (same comment as for Vanadium, ion)
- Selenium [water, ground-, long-term]: 4.8227e-7 kg; lognormal variance with pedigree 0.69493, pedigree (1,1,2,1,1)
  (same comment as for Tungsten)
- Cadmium, ion [water, ground-, long-term]: 1.2449e-5 kg; lognormal variance with pedigree 0.30985, pedigree (1,1,2,1,1)
  (same comment as for Tungsten)
- Selenium [water, ground-]: 2.9401e-9 kg; lognormal variance with pedigree 0.52052, pedigree (1,1,2,1,1)
  (same comment as for Vanadium, ion)
- Bromine [water, ground-, long-term]: 8.478e-8 kg; lognormal variance with pedigree 0.50158, pedigree (1,1,2,1,1)
  (same comment as for Tungsten)
- Scandium [water, ground-]: 1.1081e-8 kg; lognormal variance with pedigree 0.47763, pedigree (1,1,2,1,1)
  (same comment as for Vanadium, ion)
- Cadmium, ion [water, ground-]: 3.049e-8 kg; lognormal variance with pedigree 0.4444, pedigree (1,1,2,1,1)
  (same comment as for Vanadium, ion)
- Potassium, ion [water, ground-, long-term]: 0.00059302 kg; lognormal variance with pedigree 0.37063, pedigree (1,1,2,1,1)
  (same comment as for Tungsten)
- Boron [water, ground-]: 1.3542e-8 kg; lognormal variance with pedigree 0.46971, pedigree (1,1,2,1,1)
  (same comment as for Vanadium, ion)
- Potassium, ion [water, ground-]: 1.0627e-6 kg; lognormal variance with pedigree 0.32694, pedigree (1,1,2,1,1)
  (same comment as for Vanadium, ion)
- Boron [water, ground-, long-term]: 2.2814e-6 kg; lognormal variance with pedigree 0.89086, pedigree (1,1,2,1,1)
  (same comment as for Tungsten)
- Phosphate [water, ground-, long-term]: 0.00080291 kg; lognormal variance with pedigree 0.20739, pedigree (1,1,2,1,1)
  (same comment as for Tungsten)
- Bromine [water, ground-]: 1.7689e-10 kg; lognormal variance with pedigree 0.61151, pedigree (1,1,2,1,1)
  (same comment as for Vanadium, ion)
- Phosphate [water, ground-]: 3.3222e-5 kg; lognormal variance with pedigree 0.25975, pedigree (1,1,2,1,1)
  (same comment as for Vanadium, ion)
- BOD5, Biological Oxygen Demand [water, ground-]: 1.3125e-9 kg; lognormal variance with pedigree 0.34045, pedigree (1,1,2,1,1)
  (same comment as for Vanadium, ion)
- Nickel, ion [water, ground-, long-term]: 1.5477e-5 kg; lognormal variance with pedigree 0.30265, pedigree (1,1,2,1,1)
  (same comment as for Tungsten)
- Beryllium [water, ground-, long-term]: 1.0566e-6 kg; lognormal variance with pedigree 0.39071, pedigree (1,1,2,1,1)
  (same comment as for Tungsten)
- BOD5, Biological Oxygen Demand [water, ground-, long-term]: 7.8616e-7 kg; lognormal variance with pedigree 0.54773, pedigree (1,1,2,1,1)
  (same comment as for Tungsten)
- Molybdenum [water, ground-, long-term]: 4.6426e-6 kg; lognormal variance with pedigree 0.33824, pedigree (1,1,2,1,1)
  (same comment as for Tungsten)
- Beryllium [water, ground-]: 1.9297e-9 kg; lognormal variance with pedigree 0.53458, pedigree (1,1,2,1,1)
  (same comment as for Vanadium, ion)
- Molybdenum [water, ground-]: 4.8705e-8 kg; lognormal variance with pedigree 0.43121, pedigree (1,1,2,1,1)
  (same comment as for Vanadium, ion)
- Barium [water, ground-]: 1.8511e-9 kg; lognormal variance with pedigree 0.53489, pedigree (1,1,2,1,1)
  (same comment as for Vanadium, ion)
- Nickel, ion [water, ground-]: 3.369e-8 kg; lognormal variance with pedigree 0.44094, pedigree (1,1,2,1,1)
  (same comment as for Vanadium, ion)
- Barium [water, ground-, long-term]: 0.00013364 kg; lognormal variance with pedigree 0.28129, pedigree (1,1,2,1,1)
  (same comment as for Tungsten)
- Manganese [water, ground-, long-term]: 0.00044108 kg; lognormal variance with pedigree 0.19131, pedigree (1,1,2,1,1)
  (same comment as for Tungsten)
- Zinc, ion [water, ground-, long-term]: 0.0016511 kg; lognormal variance with pedigree 0.14824, pedigree (1,1,2,1,1)
  (same comment as for Tungsten)
- Antimony [water, ground-]: 2.9084e-8 kg; lognormal variance with pedigree 0.44432, pedigree (1,1,2,1,1)
  (same comment as for Vanadium, ion)
- Mercury [water, ground-]: 7.2647e-10 kg; lognormal variance with pedigree 0.56618, pedigree (1,1,2,1,1)
  (same comment as for Vanadium, ion)

## Sampling procedure
Tailings model based on observed leachate concentrations in literature. Extrapolated to 60'000 years heeding chemical characteristics. Initial waste composition from various literature sources. Climate information for national copper deposits (identified from the USGS Major Mineral Deposits database) from literature as follows: global mean annual temperature and precipitation data from Fick and Hijmans (2017); global mean annual evapotranspiration data from Fekete et al. (2002).

References:
Fekete, B. M., Vorosmarty, C. J. & Grabs, W. (2002). High-resolution fields of global runoff combining observed river discharge and simulated water balances. Global Biogeochemical Cycles, 16, 15-1 - 15-10.
Fick, S. E. & Hijmans, R. J. (2017). Worldclim 2: New 1-km spatial resolution climate surfaces for global land areas. International Journal of Climatology, 37, 4302-4315.

## Extrapolations
This dataset has been extrapolated from year 2019 to the year of the calculation (2021). The uncertainty has been adjusted accordingly.
