# greenhouse construction, glass walls and roof, metal tubes

Dataset: EcoSpold 2, unit process
Geography: FR
Time period: 2005-01-01 to 2021-12-31
Technology level: current
Classification: ISIC rev.4 ecoinvent: 4100:Construction of buildings
Tags: WFLDB
Scenario: Business-as-Usual
System model: Allocation, cut-off by classification
Generated by: Thierry Boulard
Published in: Koch, P 2015
Database: ecoinvent
isCopyrightProtected: true
accessRestrictedTo: 1

## General comment
This dataset represents the production and dismantling of 1 m2 of greenhouse with glass walls and roof and metal tubes.
This greenhouse is made of a structure of galvanized steel and aluminum, covered with glass plates. Its lifetime is minimally 25 years. It comprises of a heating system and fume condenser. Such greenhouses represent recent technology (after 2002) and typically cover large surfaces (7 ha in average). A network of steel pipes is used to deliver heat (hot water at 50-80°C), on the ground (thermo-siphon) and at the height of the plants (growth pipes). A boiler is used to store hot water. CO2 from combustion is recovered and injected again into the greenhouse as to increase photosynthesis. The greenhouse also includes a fertigation system made of a network of polyethylene pipes. Other auxiliary facilities are also considered.

## Included activities start
This activity starts with the production of materials used to build the greenhouse and permanent technical infrastructure.

## Included activities end
This dataset includes the production of the greenhouse as well as the permanent technical infrastructure. For the greenhouse are included its bearing structure (steel tubes) and covering materials (glass). Technical infrastrctucture includes heating and cooling systems, fertigation system, CO2 injection system, storage facilities and permanent working equipments such as trolley systems.
The activity ends with the disposal and recycling of all the materials.

## Time period
Time period referring to the data source: 2005-2009. Based on expert opinion data is considered to be valid at least up to 2012.

## Parameters
- LUC_crop_specific: 1 dimensionless
  This parameter allows to switch between a 'crop specific' and a 'country specific' approach when calculating the LUC of a crop. By default, the chosen approach is 'crop specific', so the value of the parameter is 1. If you want to apply a 'country specific' approach, turn the parameter to 0.

## Reference product
- greenhouse, glass walls and roof: 1 m2*year; name RP; CPC 3870: Prefabricated buildings; By-product classification allocatable product
  Greenhouse used for agricultural production. This greenhouse has glass walls and roof, structure is made of metal tubes. Reference flow is 1 m2 used over 1 year.
  production volume 0.186957 m2*year; name RP_PV
    This is a placeholder value that does not reflect real-world production volumes. This dataset does not currently require a real-world production volume to work in the database framework, and no actual data were collected yet. This has no negative effect on the results of the ecoinvent database. The placeholder value of this activity was scaled according to the nominal GDP of 2005 (source: United Nations, http://data.un.org/Glossary.aspx?q=GDP+%28current+US%24%29, accessed 20130726) to reflect an appropriate share of the global production volume, which is also a placeholder value.
  property price 2.67873 EUR2005
    Calculated based on inputs: The price of the product has been calculated as a sum of the values of the material and energy inputs for this product. This value is therefore a rough estimation. It may underestimate the real price since there are additional expenses when producing any product. These expences can include for example labour costs, treatment of waste materials and profit for the producer. Please consider carefully whether this level of data quality is acceptable for your application.
  properties: lifetime 25 year

## By-products
- aluminium scrap, post-consumer: 0 kg; CPC 39363: Waste and scrap of aluminium; By-product classification Recyclable
  Aluminum components sent to treatment
  production volume 0 kg; = ABS( ByP_06/ RP* RP_PV)
    Calculated from reference product production volume, reference product amount and byproduct amount.
  property price 0.685 EUR2005
    Temporary price data. Calculated as 90% of purchasers price based on: estimated at 85% of new scrap
  property carbon content 0
    carbon content on a dry matter basis (reserved; not for manual entry)
  properties: wet mass 1 kg, carbon content, non-fossil 0, carbon content, fossil 0, water in wet mass 0 kg, dry mass 1 kg, water content 0, carbon allocation 0 kg
- iron scrap, unsorted: 0 kg; CPC 39310: Slag, dross, scalings and other waste from the manufacture of iron or steel; By-product classification Recyclable
  Steel and chromium steel components sent to treatment
  production volume 0 kg; = ABS( ByP_07/ RP* RP_PV)
    (same comment as for aluminium scrap, post-consumer)
  property price 0.149 EUR2005
    Temporary price data. Calculated as 90% of purchasers price based on: estimated at 85% of sorted scrap
  property carbon content 0
    carbon content on a dry matter basis (reserved; not for manual entry)
  properties: dry mass 1 kg, water in wet mass 0 kg, wet mass 1 kg, carbon content, fossil 0, water content 0, carbon content, non-fossil 0, carbon allocation 0 kg

## Inputs from technosphere
- polyethylene, high density, granulate: 0.0475 kg; lognormal variance with pedigree 0.374402, pedigree (5,5,5,5,5)
  Literature data and primary data from French manufacturers (Boulard et al, 2011). Tanks, pipes, gutters and taps for the fertigation system.
  properties: carbon content, fossil 0.857143, dry mass 1 kg, wet mass 1 kg, heating value, net 42.47 MJ
- extrusion, plastic film: 0.0533 kg; lognormal variance with pedigree 0.374402, pedigree (5,5,5,5,5)
  Literature data and primary data from French manufacturers (Boulard et al, 2011). Thermal screen for the cooling system and mulch film.
- blow moulding: 0.00316667 kg; lognormal variance with pedigree 0.374402, pedigree (5,5,5,5,5)
  Literature data and primary data from French manufacturers (Boulard et al, 2011). Tanks for the fertigation system.
- waste electric and electronic equipment: -0.003101 kg; name ByP_04
  Electric and electronic components sent to treatment
  production volume 0.000579755 kg; = ABS( ByP_04/ RP* RP_PV)
    Calculated from production volume of reference product using the relative outputs.
  property price 0 EUR2005; name ByP_04_price_EUR2005
  properties: carbon content, non-fossil 0.000485011, dry mass 1 kg, carbon content, fossil 0.0877555, wet mass 1 kg
- sheet rolling, steel: 0.03552 kg; lognormal variance with pedigree 0.374402, pedigree (5,5,5,5,5)
  Literature data and primary data from French manufacturers (Boulard et al, 2011). Roofing.
- diesel, burned in building machine: 0.450005 MJ; lognormal variance with pedigree 0.374402, pedigree (5,5,5,5,5)
  Literature data and primary data from French manufacturers (Boulard et al, 2011). Energy for building the greenhouse and retention pond.
  properties: heating value, net 1 MJ
- aluminium alloy, AlMg3: 0.228 kg; lognormal variance with pedigree 0.374402, pedigree (5,5,5,5,5)
  Literature data and primary data from French manufacturers (Boulard et al, 2011). Roof structure.
  properties: wet mass 1 kg, dry mass 1 kg
- synthetic rubber: 0.0003 kg; lognormal variance with pedigree 0.374402, pedigree (5,5,5,5,5)
  Literature data and primary data from French manufacturers (Boulard et al, 2011). Tubes for the soil preparation system.
  properties: wet mass 1 kg, dry mass 1 kg, heating value, net 26.42 MJ, carbon content, fossil 0.871949
- electronics, for control units: 0.003 kg; lognormal variance with pedigree 0.374402, pedigree (5,5,5,5,5)
  Literature data and primary data from French manufacturers (Boulard et al, 2011). Control unit for the greenhouse structure.
  properties: wet mass 1 kg, carbon content, fossil 0.337146, dry mass 1 kg, carbon content, non-fossil 0.00013442
- concrete block: 0.10699 kg; lognormal variance with pedigree 0.374402, pedigree (5,5,5,5,5)
  Literature data and primary data from French manufacturers (Boulard et al, 2011). Mechanical room part of for the storage system.
  properties: wet mass 1 kg, dry mass 1 kg
- tractor, 4-wheel, agricultural: 0.0152 kg
  Literature data and primary data from French manufacturers (Boulard et al, 2011). Tractor.
- agricultural machinery, unspecified: 0.0006 kg; lognormal variance with pedigree 0.374402, pedigree (5,5,5,5,5)
  Literature data and primary data from French manufacturers (Boulard et al, 2011). Ramp and cable drum for the soil preparation system.
- heat and power co-generation unit, 200kW electrical, diesel SCR, components for electricity only: 6.2e-10 unit; lognormal variance with pedigree 0.374402, pedigree (5,5,5,5,5)
  Literature data and primary data from French manufacturers (Boulard et al, 2011). Generating set for the heating system.
- waste rubber, unspecified: -0.0003 kg; name ByP_02
  Synthetic rubber sent to treatment
  production volume 5.60872e-5 kg; = ABS( ByP_02/ RP* RP_PV)
    Calculated from production volume of reference product using the relative outputs.
  property price 0 EUR2005; name ByP_02_price_EUR2005
  properties: wet mass 1 kg, heating value, net 27.19 MJ, dry mass 1 kg, carbon content, fossil 0.853
  note on heating value, net: Value taken from the general comment of the treatment dataset.
- section bar rolling, steel: 0.17847 kg; lognormal variance with pedigree 0.374402, pedigree (5,5,5,5,5)
  Literature data and primary data from French manufacturers (Boulard et al, 2011). Poles and trellis for the greenhouse structure.
- waste concrete: -1.05285 kg; name ByP_01
  Concrete components sent to treatment
  production volume 0.196838 kg; = ABS( ByP_01/ RP* RP_PV)
    Calculated from production volume of reference product using the relative outputs.
  property price 0 EUR2005; name ByP_01_price_EUR2005
  properties: wet mass 1 kg, water content 1, dry mass 0.5 kg
- section bar extrusion, aluminium: 0.228 kg; lognormal variance with pedigree 0.374402, pedigree (5,5,5,5,5)
  (same comment as for aluminium alloy, AlMg3)
- polyvinylfluoride: 0.0009792 kg; lognormal variance with pedigree 0.374402, pedigree (5,5,5,5,5)
  Literature data and primary data from French manufacturers (Boulard et al, 2011). Cables and wires for the greenhouse structure and the CO2 injection system.
  properties: heating value, net 23.7 MJ, wet mass 1 kg, carbon content, fossil 0.521739, dry mass 1 kg
- wire drawing, copper: 0.00028 kg; lognormal variance with pedigree 0.374402, pedigree (5,5,5,5,5)
  Literature data and primary data from French manufacturers (Boulard et al, 2011). Cables and wires for the greenhouse structure.
- concrete, normal: 0.000428961 m3; lognormal variance with pedigree 0.374402, pedigree (5,5,5,5,5)
  Literature data and primary data from French manufacturers (Boulard et al, 2011). Walls and mechanical room.
  properties: dry mass 2190 kg, water content 0.086758, wet mass 2380 kg
- steel, low-alloyed: 0.521187 kg; lognormal variance with pedigree 0.374402, pedigree (5,5,5,5,5)
  (same comment as for section bar rolling, steel)
  properties: carbon content, fossil 0.005, wet mass 1 kg, dry mass 1 kg
- polystyrene, expandable: 0.0049 kg; lognormal variance with pedigree 0.374402, pedigree (5,5,5,5,5)
  Literature data and primary data from French manufacturers (Boulard et al, 2011). Plastic bags part of for the support system.
  properties: carbon content, fossil 0.923077, wet mass 1 kg, heating value, net 38.67 MJ, dry mass 1 kg
- copper, cathode: 0.0001008 kg; lognormal variance with pedigree 0.374402, pedigree (5,5,5,5,5)
  (same comment as for wire drawing, copper)
  properties: dry mass 1 kg, wet mass 1 kg
- polymer foaming: 0.0049 kg; lognormal variance with pedigree 0.374402, pedigree (5,5,5,5,5)
  (same comment as for polystyrene, expandable)
- electricity, low voltage: 0.05972 kWh; lognormal variance with pedigree 0.374402, pedigree (5,5,5,5,5)
  Literature data and primary data from French manufacturers (Boulard et al, 2011). Electricity for manufacturing of the greenhouse structure.
- oil boiler, 100kW: 1.8612e-6 unit; lognormal variance with pedigree 0.374402, pedigree (5,5,5,5,5)
  Literature data and primary data from French manufacturers (Boulard et al, 2011). Boiler for the heating system.
- waste glass: -0.48 kg; name ByP_03
  Flat glass sent to treatment
  production volume 0.0897395 kg; = ABS( ByP_03/ RP* RP_PV)
    Calculated from production volume of reference product using the relative outputs.
  property price 0 EUR2005; name ByP_03_price_EUR2005
  properties: wet mass 1 kg, dry mass 1 kg, heating value, net 0.05 MJ
  note on heating value, net: Value extracted from "treatment of waste glass, open dump, very wet infiltration class (1000mm)"
- drawing of pipe, steel: 0.32 kg; lognormal variance with pedigree 0.374402, pedigree (5,5,5,5,5)
  Literature data and primary data from French manufacturers (Boulard et al, 2011). Tubes and siphons for the heating system.
- injection moulding: 0.00223333 kg; lognormal variance with pedigree 0.374402, pedigree (5,5,5,5,5)
  Literature data and primary data from French manufacturers (Boulard et al, 2011). Taps, gutters and stoppers for the fertigation system.
- polyethylene, linear low density, granulate: 0.0533 kg; lognormal variance with pedigree 0.374402, pedigree (5,5,5,5,5)
  (same comment as for extrusion, plastic film)
  properties: wet mass 1 kg, carbon content, fossil 0.857143, dry mass 1 kg, heating value, net 42.47 MJ
- zinc coat, coils: 0.0185194 m2; lognormal variance with pedigree 0.374402, pedigree (5,5,5,5,5)
  (same comment as for section bar rolling, steel)
- gas motor, 206kW: 6.2e-10 unit; lognormal variance with pedigree 0.374402, pedigree (5,5,5,5,5)
  (same comment as for heat and power co-generation unit, 200kW electrical, diesel SCR, compo)
- flat glass, uncoated: 0.48 kg; lognormal variance with pedigree 0.374402, pedigree (5,5,5,5,5)
  Literature data and primary data from French manufacturers (Boulard et al, 2011). 4 mm simple glass for the greenhouse structure.
  properties: dry mass 1 kg, wet mass 1 kg
- waste plastic, mixture: -0.1067 kg; name ByP_05
  Plastic components sent to treatment
  production volume 0.0199483 kg; = ABS( ByP_05/ RP* RP_PV)
    Calculated from production volume of reference product using the relative outputs.
  property price 0 EUR2005; name ByP_05_price_EUR2005
  properties: wet mass 1 kg, water content 0.180638, carbon content, fossil 0.747344, heating value, net 30.79 MJ, dry mass 0.847 kg
- steel, chromium steel 18/8: 0.0328 kg; lognormal variance with pedigree 0.374402, pedigree (5,5,5,5,5)
  Literature data and primary data from French manufacturers (Boulard et al, 2011). Bolting for the greenhouse structure.
  properties: carbon content, fossil 0.0008, dry mass 1 kg, wet mass 1 kg
- extrusion, plastic pipes: 0.0432 kg; lognormal variance with pedigree 0.374402, pedigree (5,5,5,5,5)
  Literature data and primary data from French manufacturers (Boulard et al, 2011). Pipes for the fertigation system, cooling system and CO2 injection system.
- aluminium scrap, post-consumer: -0.228 kg
  Aluminum components sent to treatment
  production volume 0.0426263 kg
  properties: wet mass 1 kg, price 0.685 EUR2005, dry mass 1 kg
- iron scrap, unsorted: -0.554 kg
  Steel and chromium steel components sent to treatment
  production volume 0.103574 kg
  properties: dry mass 1 kg, wet mass 1 kg, price 0.149 EUR2005

## Sampling procedure
Dataset is adapted from AGRIBALYSE 1.2 database, with land occupation and transformation flows removed (these are accounted for in the crop datasets). Data was collected from French manufacturers and reported in Boulard et al. (2011).
Translated name: Serre verre, Nord.

## Extrapolations
This dataset has been extrapolated from year 2012 to the year of the calculation (2021). The uncertainty has been adjusted accordingly.
