# tinplate, in mixed metal scrap, Recycled Content cut-off

Dataset: EcoSpold 2, unit process
Geography: GLO
Time period: 2021-01-01 to 2021-12-31
Technology level: current
Scenario: Business-as-Usual
System model: Allocation, cut-off by classification
Generated by: [System]
isCopyrightProtected: true
accessRestrictedTo: 1

## Reference product
- tinplate, in mixed metal scrap: 1 kg; CPC 39366: Waste and scrap of tin; By-product classification Recyclable
  property heating value, net 0 MJ
    Non combustible products are assumed to have an LHV equal to zero (0).
  property carbon content, fossil 0.0052906; = 0.04*0.771*0.17155
    fossil carbon content on a dry matter basis; estimated by assuming 4% impurities with composition as residual MSW with 77.1% dry matter and a fossil carbon content of 17.2% (on dry matter basis)
  property carbon content, non-fossil 0.00806929; = 0.04*0.771*0.26165
    non-fossil carbon content on a dry matter basis; estimated by assuming 4% impurities with composition as residual MSW with 77.1% dry matter and a non-fossil carbon content of 26.2% (on dry matter basis)
  property carbon content 0.0133599
    carbon content on a dry matter basis (reserved; not for manual entry)
  properties: water content 0.00924468, wet mass 1 kg, dry mass 0.99084 kg, water in wet mass 0.00916 kg, carbon allocation 0.0132375 kg
