# treatment of used locomotive

Dataset: EcoSpold 2, unit process
Geography: RER
Time period: 1993-01-01 to 2021-12-31
Technology level: current
Classification: EcoSpold01Categories: transport systems/train
Classification: ISIC rev.4 ecoinvent: 3830:Materials recovery
Tags: ConvertedDataset; Treatment
Scenario: Business-as-Usual
System model: Allocation, cut-off by classification
Generated by: Michael Spielmann (obsolete)
Published in: Spielmann M. 2007
Database: ecoinvent
isCopyrightProtected: true
accessRestrictedTo: 1

## General comment
The dataset represents the disposal of a locomotive used for both rail and passenger transportation with a life span assumed to be 40 years.
[This dataset was already contained in the ecoinvent database version 2. It was not individually updated during the transfer to ecoinvent version 3. Life Cycle Impact Assessment results may still have changed, as they are affected by changes in the supply chain, i.e. in other datasets. This dataset was generated following the ecoinvent quality guidelines for version 2. It may have been subject to central changes described in the ecoinvent version 3 change report (http://www.ecoinvent.org/database/ecoinvent-version-3/reports-of-changes/), and the results of the central updates were reviewed extensively. The changes added e.g. consistent water flows and other information throughout the database. The documentation of this dataset can be found in the ecoinvent reports of version 2, which are still available via the ecoinvent website. The change report linked above covers all central changes that were made during the conversion process.]

## Included activities start
Service starts with the transport of the material to be disposal.

## Included activities end
The dataset ends with the disposal of one locomotive. The dataset includes the transport of the material and disposal of oil, paint, glass, plastics and polyvinylchloride.

## Geography
Data represents Swiss and German conditions

## Technology
More than 80% of the materials of modelled locomotive are metals. For these metals is assumed a complete recycling and thus make a cut of allocation. For the remaining materials, merely the disposal of plastics, glass and paint as well as used oil are taken into account. For the transportation, standard distances are applied for the disposal of glass and plastics. For the remaining materials, a distance of 50 km has been assumed.

## Time period
Data represents a locomotive currently in operation

## Reference product
- used locomotive: -1 unit; By-product classification Waste; CPC 39990: Other wastes n.e.c.
  EcoSpold01Location=RER
  production volume 1.32237 unit
    This is a placeholder value that does not reflect real-world production volumes. This dataset does not currently require a real-world production volume to work in the database framework, and no actual data were collected yet. This has no negative effect on the results of the ecoinvent database. The placeholder value of this activity was scaled according to the nominal GDP of 2005 (source: United Nations, http://data.un.org/Glossary.aspx?q=GDP+%28current+US%24%29, accessed 20130726) to reflect an appropriate share of the global production volume, which is also a placeholder value.
  property price 0 EUR2005
    Waste products are assigned a price of zero as they are assumed to require further treatment.
  property carbon content, fossil 0.101404
    Calculated from C content in input materials in the infrastructure
  property carbon content, non-fossil 0.00220235
    Calculated from C content in input materials in the infrastructure
  property carbon content 0.103607
    carbon content on a dry matter basis (reserved; not for manual entry)
  properties: water content 0, dry mass 84000 kg, wet mass 84000 kg, water in wet mass 0 kg, carbon allocation 8702.96 kg

## Inputs from technosphere
- waste plastic, mixture: -6690 kg; lognormal variance with pedigree 0.0521, pedigree (3,1,5,3,1)
  Calculated value. In v2.2 the flow was called "disposal, plastics, mixture, 15.3% water, to sanitary landfill".
  EcoSpold01Location=CH
  Uncertainty: material composition locomotive
  production volume 6690 kg
    Calculated from the production volume of used locomotive in proportion to the respective output amounts.
  properties: dry mass 0.847 kg, heating value, net 30.79 MJ, wet mass 1 kg, water content 0.180638, carbon content, fossil 0.747344
  note on heating value, net: Value taken from the general comment of the treatment dataset.
  note on carbon content, fossil: C content in 1 kg DM was calculated using data in Tab A.2, ecoinvent v2.2 report 13_I
- waste mineral oil: 0 kg; pedigree (1,1,1,1,1)
  Calculated value. In v 2.2 the flow was called "disposal, used mineral oil, 10% water, to hazardous waste incineration".
  EcoSpold01Location=CH
  Uncertainty: oral communication
  production volume 0 kg
    (same comment as for waste plastic, mixture)
  properties: wet mass 1 kg, carbon content, fossil 0.864444, heating value, net 34.7 MJ, water content 0.111111, dry mass 0.9 kg
  note on carbon content, fossil: Tab A.6, ecoinvent v2.2 report 13_I. C content has been calculated after data in the tables, and then referred to 1 kg DM
- waste glass: -235 kg; lognormal variance with pedigree 0.0521, pedigree (3,1,5,3,1)
  EcoSpold01Location=CH
  Calculated value. In v 2.2. the flow was called "disposal, glass, 0% water, to municipal incineration".
  Uncertainty: material composition locomotive
  production volume 235 kg
    (same comment as for waste plastic, mixture)
  properties: wet mass 1 kg, heating value, net 0.05 MJ, dry mass 1 kg
  note on heating value, net: Value extracted from "treatment of waste glass, open dump, very wet infiltration class (1000mm)"
- waste polyvinylchloride: -351 kg; lognormal variance with pedigree 0.0521, pedigree (3,1,5,3,1)
  Calculated value. In v2.2 the flow was called "disposal, polyvinylchloride, 0.2% water, to municipal incineration.
  EcoSpold01Location=CH
  Uncertainty: material composition locomotive
  production volume 351 kg
    (same comment as for waste plastic, mixture)
  properties: dry mass 0.998 kg, wet mass 1 kg, heating value, net 21.51 MJ, water content 0.00200401, carbon content, fossil 0.440882
  note on carbon content, fossil: C content in 1 kg DM was calculated using data in Tab A.1, ecoinvent v2.2 report 13_I
- waste emulsion paint: 0 kg; pedigree (1,1,1,1,1)
  Calculated value. In v 2.2. the flow was called "disposal, emulsion paint, 0% water, to municipal incineration".
  EcoSpold01Location=CH
  Uncertainty: material composition locomotive
  production volume 0 kg
    (same comment as for waste plastic, mixture)
  properties: dry mass 1 kg, heating value, net 8.18 MJ, wet mass 1 kg, carbon content, fossil 0.27
  note on carbon content, fossil: Tab A.4, ecoinvent v2.2 report 13_I. C content has been calculated after data in the tables, and then referred to 1 kg DM
- waste mineral oil: -3474, -86.0024 kg (2 entries); lognormal variance with pedigree 0.0521, pedigree (3,1,5,3,1)
  (same comment as for waste mineral oil)
  production volume 3560 kg
- waste emulsion paint: -384.879, -0.120802 kg (2 entries); lognormal variance with pedigree 0.0521, pedigree (3,1,5,3,1)
  (same comment as for waste emulsion paint)
  production volume 385 kg

## Sampling procedure
Data based on expert estimate on the material consumption of a locomotive.

## Extrapolations
This dataset has been extrapolated from year 2000 to the year of the calculation (2021). The uncertainty has been adjusted accordingly.

## Review by Niels Jungbluth 2003-07-23
passed

## Review by Roland Hischier 2011-09-23
Transfer of documentation done.
