# treatment of lignite ash, opencast refill

Dataset: EcoSpold 2, unit process
Geography: MK
Time period: 1996-01-01 to 2021-12-31
Technology level: current
Classification: EcoSpold01Categories: waste management/others
Classification: ISIC rev.4 ecoinvent: 3822:Treatment and disposal of hazardous waste
Synonyms: ashes form lignite incineration disposed as backfill in opencast lignite mines
Tags: Treatment; ConvertedDataset
Scenario: Business-as-Usual
System model: Allocation, cut-off by classification
Generated by: Gabor Doka (obsolete)
Published in: Doka G. 2008
Database: ecoinvent
isCopyrightProtected: true
accessRestrictedTo: 1

## General comment
backfilled waste composition is (in ppm): H2O n.a.; O n.a.; H n.a.; C n.a.; S 19925; N n.a.; P 150.18; B 796.44; Cl 5.6604; Br 6.0377; F 18.868; I 0.75472; Ag n.a.; As 18.346; Ba 377.36; Cd 2.2324; Co 56.604; Cr 52.83; Cu 22.493; Hg 0.037926; Mn 75.472; Mo 26.282; Ni 55.949; Pb 18.393; Sb 14.867; Se 6.1626; Sn 6.0377; V 131.41; Zn 102.47; Be 3.7736; Sc 1.8868; Sr 263.49; Ti 377.36; Tl 0.074712; W 3.7736; Si 181130; Fe 20377; Ca 75472; Al 17736; K 2264.2; Mg 11321; Na 3396.2;
[This dataset was already contained in the ecoinvent database version 2. It was not individually updated during the transfer to ecoinvent version 3. Life Cycle Impact Assessment results may still have changed, as they are affected by changes in the supply chain, i.e. in other datasets. This dataset was generated following the ecoinvent quality guidelines for version 2. It may have been subject to central changes described in the ecoinvent version 3 change report (http://www.ecoinvent.org/database/ecoinvent-version-3/reports-of-changes/), and the results of the central updates were reviewed extensively. The changes added e.g. consistent water flows and other information throughout the database. The documentation of this dataset can be found in the ecoinvent reports of version 2, which are still available via the ecoinvent website. The change report linked above covers all central changes that were made during the conversion process.]

## Included activities end
This module contains only direct emissions from lignite ash used as backfill in opencast lignite mines: short-term emissions (0-100a) and long-term emissions (>100a) both to ground water. E.g. land-use and energy consumption is *not* included.

## Geography
Ash composition calculated from country-specific coal composition (MK) and technology-specific transfer coefficients in power plant.

## Technology
Lignite ash as backfill in lignite opencast mine (together with tailings)

## Reference product
- lignite ash: -1 kg; CPC 39: Wastes or scraps; By-product classification Waste
  EcoSpold01Location=MK
  production volume 7.68123e8 kg
    Estimated. Electricity and synthetic natural gas production are responsible for more than 90% of lignite use (https://www.lignite.com/about-lignite/lignite-uses/, accessed 20151008) . The production volume is calculated as the sum of lignite ashes resulting from electricity and heat and power co-generation production from lignite, in the respective country.
  property price 0 EUR2005
    Waste products are assigned a price of zero as they are assumed to require further treatment.
  property carbon content 0
    carbon content on a dry matter basis (reserved; not for manual entry)
  properties: wet mass 1 kg, dry mass 1 kg, water content 0, carbon content, fossil 0, carbon content, non-fossil 0, water in wet mass 0 kg, heating value, net 0 MJ, carbon allocation 0 kg

## Emissions to nature
- Bromine [water, ground-, long-term]: 1.021e-7 kg; lognormal variance with pedigree 1.4, pedigree (1,1,5,1,1)
  Long-term emission from lignite ash backfill. Uncertainty derived from uncertainty in ash composition and uncertainty in transfer coefficients.
- Chloride [water, ground-]: 3.2295e-6 kg; lognormal variance with pedigree 1.39, pedigree (1,1,5,1,1)
  Short-term emission from lignite ash backfill. Uncertainty derived from uncertainty in ash composition and uncertainty in transfer coefficients.
- Phosphate [water, ground-]: 4.3092e-7 kg; lognormal variance with pedigree 1.61, pedigree (1,1,5,1,1)
  (same comment as for Chloride)
- Calcium, ion [water, ground-]: 2.8564e-5 kg; lognormal variance with pedigree 0.97, pedigree (1,1,5,1,1)
  (same comment as for Chloride)
- Antimony [water, ground-]: 5.7334e-6 kg; lognormal variance with pedigree 1.28, pedigree (1,1,5,1,1)
  (same comment as for Chloride)
- Barium [water, ground-, long-term]: 0.00037735 kg; lognormal variance with pedigree 0.83, pedigree (1,1,5,1,1)
  (same comment as for Bromine)
- Cadmium, ion [water, ground-, long-term]: 2.2323e-6 kg; lognormal variance with pedigree 1.5, pedigree (1,1,5,1,1)
  (same comment as for Bromine)
- Lead [water, ground-, long-term]: 1.8393e-5 kg; lognormal variance with pedigree 1.23, pedigree (1,1,5,1,1)
  (same comment as for Bromine)
- Cadmium, ion [water, ground-]: 6.3481e-11 kg; lognormal variance with pedigree 2.63, pedigree (1,1,5,1,1)
  (same comment as for Chloride)
- Tungsten [water, ground-]: 1.4553e-6 kg; lognormal variance with pedigree 1.46, pedigree (1,1,5,1,1)
  (same comment as for Chloride)
- Copper, ion [water, ground-]: 3.6268e-9 kg; lognormal variance with pedigree 2.09, pedigree (1,1,5,1,1)
  (same comment as for Chloride)
- Titanium, ion [water, ground-]: 4.6921e-7 kg; lognormal variance with pedigree 1.45, pedigree (1,1,5,1,1)
  (same comment as for Chloride)
- Iodide [water, ground-]: 7.5472e-7 kg; lognormal variance with pedigree 1.65, pedigree (1,1,5,1,1)
  (same comment as for Chloride)
- Mercury [water, ground-]: 7.4983e-12 kg; lognormal variance with pedigree 2.89, pedigree (1,1,5,1,1)
  (same comment as for Chloride)
- Antimony [water, ground-, long-term]: 9.1332e-6 kg; lognormal variance with pedigree 1.26, pedigree (1,1,5,1,1)
  (same comment as for Bromine)
- Chromium VI [water, ground-, long-term]: 5.2396e-6 kg; lognormal variance with pedigree 1.15, pedigree (1,1,5,1,1)
  (same comment as for Bromine)
- Aluminium [water, ground-]: 2.2053e-5 kg; lognormal variance with pedigree 0.96, pedigree (1,1,5,1,1)
  (same comment as for Chloride)
- Chloride [water, ground-, long-term]: 2.4309e-6 kg; lognormal variance with pedigree 1.39, pedigree (1,1,5,1,1)
  (same comment as for Bromine)
- Magnesium [water, ground-]: 5.3878e-6 kg; lognormal variance with pedigree 1.14, pedigree (1,1,5,1,1)
  (same comment as for Chloride)
- Molybdenum [water, ground-, long-term]: 3.5764e-11 kg; lognormal variance with pedigree 1.2, pedigree (1,1,5,1,1)
  (same comment as for Bromine)
- Phosphate [water, ground-, long-term]: 0.00025812 kg; lognormal variance with pedigree 1.03, pedigree (1,1,5,1,1)
  (same comment as for Bromine)
- Sulfate [water, ground-, long-term]: 0.043683 kg; lognormal variance with pedigree 0.33, pedigree (1,1,5,1,1)
  (same comment as for Bromine)
- Potassium, ion [water, ground-, long-term]: 0.00098651 kg; lognormal variance with pedigree 0.6, pedigree (1,1,5,1,1)
  (same comment as for Bromine)
- Calcium, ion [water, ground-, long-term]: 0.075443 kg; lognormal variance with pedigree 0.19, pedigree (1,1,5,1,1)
  (same comment as for Bromine)
- Zinc, ion [water, ground-]: 5.2604e-9 kg; lognormal variance with pedigree 2.04, pedigree (1,1,5,1,1)
  (same comment as for Chloride)
- Sulfate [water, ground-]: 0.01609 kg; lognormal variance with pedigree 0.37, pedigree (1,1,5,1,1)
  (same comment as for Chloride)
- Boron [water, ground-, long-term]: 0.00049777 kg; lognormal variance with pedigree 0.78, pedigree (1,1,5,1,1)
  (same comment as for Bromine)
- Potassium, ion [water, ground-]: 0.0012776 kg; lognormal variance with pedigree 0.6, pedigree (1,1,5,1,1)
  (same comment as for Chloride)
- Thallium [water, ground-, long-term]: 7.4599e-8 kg; lognormal variance with pedigree 1.94, pedigree (1,1,5,1,1)
  (same comment as for Bromine)
- Tungsten [water, ground-, long-term]: 2.3183e-6 kg; lognormal variance with pedigree 1.44, pedigree (1,1,5,1,1)
  (same comment as for Bromine)
- Magnesium [water, ground-, long-term]: 0.011315 kg; lognormal variance with pedigree 0.39, pedigree (1,1,5,1,1)
  (same comment as for Bromine)
- Strontium [water, ground-, long-term]: 0.00026309 kg; lognormal variance with pedigree 0.87, pedigree (1,1,5,1,1)
  (same comment as for Bromine)
- Arsenic, ion [water, ground-, long-term]: 1.8346e-14 kg; lognormal variance with pedigree 1.25, pedigree (1,1,5,1,1)
  (same comment as for Bromine)
- Boron [water, ground-]: 6.2402e-6 kg; lognormal variance with pedigree 1.12, pedigree (1,1,5,1,1)
  (same comment as for Chloride)
- Chromium VI [water, ground-]: 7.9679e-6 kg; lognormal variance with pedigree 1.17, pedigree (1,1,5,1,1)
  (same comment as for Chloride)
- Manganese [water, ground-]: 2.6113e-9 kg; lognormal variance with pedigree 2.14, pedigree (1,1,5,1,1)
  (same comment as for Chloride)
- Arsenic, ion [water, ground-]: 1.8346e-5 kg; lognormal variance with pedigree 1.23, pedigree (1,1,5,1,1)
  (same comment as for Chloride)
- Cobalt [water, ground-, long-term]: 5.6563e-5 kg; lognormal variance with pedigree 1.08, pedigree (1,1,5,1,1)
  (same comment as for Bromine)
- Zinc, ion [water, ground-, long-term]: 0.00010247 kg; lognormal variance with pedigree 1, pedigree (1,1,5,1,1)
  (same comment as for Bromine)
- Strontium [water, ground-]: 3.9956e-7 kg; lognormal variance with pedigree 1.47, pedigree (1,1,5,1,1)
  (same comment as for Chloride)
- Fluoride [water, ground-]: 2.4615e-6 kg; lognormal variance with pedigree 1.32, pedigree (1,1,5,1,1)
  (same comment as for Chloride)
- Bromine [water, ground-]: 5.9356e-6 kg; lognormal variance with pedigree 1.37, pedigree (1,1,5,1,1)
  (same comment as for Chloride)
- Selenium [water, ground-]: 2.3766e-6 kg; lognormal variance with pedigree 1.4, pedigree (1,1,5,1,1)
  (same comment as for Chloride)
- Tin, ion [water, ground-, long-term]: 6.0373e-6 kg; lognormal variance with pedigree 1.37, pedigree (1,1,5,1,1)
  (same comment as for Bromine)
- Cobalt [water, ground-]: 4.0534e-8 kg; lognormal variance with pedigree 1.77, pedigree (1,1,5,1,1)
  (same comment as for Chloride)
- Selenium [water, ground-, long-term]: 3.786e-6 kg; lognormal variance with pedigree 1.38, pedigree (1,1,5,1,1)
  (same comment as for Bromine)
- Tin, ion [water, ground-]: 4.7922e-10 kg; lognormal variance with pedigree 2.36, pedigree (1,1,5,1,1)
  (same comment as for Chloride)
- Vanadium, ion [water, ground-, long-term]: 7.0681e-5 kg; lognormal variance with pedigree 1.06, pedigree (1,1,5,1,1)
  (same comment as for Bromine)
- Fluoride [water, ground-, long-term]: 1.6406e-5 kg; lognormal variance with pedigree 1.22, pedigree (1,1,5,1,1)
  (same comment as for Bromine)
- Lead [water, ground-]: 3.9963e-10 kg; lognormal variance with pedigree 2.38, pedigree (1,1,5,1,1)
  (same comment as for Chloride)
- Mercury [water, ground-, long-term]: 3.7918e-8 kg; lognormal variance with pedigree 2.03, pedigree (1,1,5,1,1)
  (same comment as for Bromine)
- Nickel, ion [water, ground-, long-term]: 5.5864e-5 kg; lognormal variance with pedigree 1.08, pedigree (1,1,5,1,1)
  (same comment as for Bromine)
- Barium [water, ground-]: 1.3056e-8 kg; lognormal variance with pedigree 1.92, pedigree (1,1,5,1,1)
  (same comment as for Chloride)
- Silicon [water, ground-, long-term]: 0.12916 kg; lognormal variance with pedigree 0.14, pedigree (1,1,5,1,1)
  (same comment as for Bromine)
- Silicon [water, ground-]: 0.001022 kg; lognormal variance with pedigree 0.55, pedigree (1,1,5,1,1)
  (same comment as for Chloride)
- Sodium, ion [water, ground-, long-term]: 0.0010432 kg; lognormal variance with pedigree 0.55, pedigree (1,1,5,1,1)
  (same comment as for Bromine)
- Molybdenum [water, ground-]: 2.6282e-5 kg; lognormal variance with pedigree 1.18, pedigree (1,1,5,1,1)
  (same comment as for Chloride)
- Beryllium [water, ground-, long-term]: 3.7679e-6 kg; lognormal variance with pedigree 1.44, pedigree (1,1,5,1,1)
  (same comment as for Bromine)
- Titanium, ion [water, ground-, long-term]: 0.00037689 kg; lognormal variance with pedigree 0.83, pedigree (1,1,5,1,1)
  (same comment as for Bromine)
- Nickel, ion [water, ground-]: 8.4843e-8 kg; lognormal variance with pedigree 1.68, pedigree (1,1,5,1,1)
  (same comment as for Chloride)
- Iodide [water, ground-, long-term]: 7.5472e-14 kg; lognormal variance with pedigree 1.67, pedigree (1,1,5,1,1)
  (same comment as for Bromine)
- Aluminium [water, ground-, long-term]: 0.017714 kg; lognormal variance with pedigree 0.34, pedigree (1,1,5,1,1)
  (same comment as for Bromine)
- Copper, ion [water, ground-, long-term]: 2.249e-5 kg; lognormal variance with pedigree 1.2, pedigree (1,1,5,1,1)
  (same comment as for Bromine)
- Scandium [water, ground-]: 5.3324e-7 kg; lognormal variance with pedigree 1.57, pedigree (1,1,5,1,1)
  (same comment as for Chloride)
- Vanadium, ion [water, ground-]: 8.0767e-7 kg; lognormal variance with pedigree 1.39, pedigree (1,1,5,1,1)
  (same comment as for Chloride)
- Manganese [water, ground-, long-term]: 7.5469e-5 kg; lognormal variance with pedigree 1.04, pedigree (1,1,5,1,1)
  (same comment as for Bromine)
- Beryllium [water, ground-]: 5.7224e-9 kg; lognormal variance with pedigree 2.04, pedigree (1,1,5,1,1)
  (same comment as for Chloride)
- Scandium [water, ground-, long-term]: 1.3536e-6 kg; lognormal variance with pedigree 1.53, pedigree (1,1,5,1,1)
  (same comment as for Bromine)
- Iron, ion [water, ground-, long-term]: 0.013618 kg; lognormal variance with pedigree 0.37, pedigree (1,1,5,1,1)
  (same comment as for Bromine)
- Thallium [water, ground-]: 1.133e-10 kg; lognormal variance with pedigree 2.54, pedigree (1,1,5,1,1)
  (same comment as for Chloride)
- Iron, ion [water, ground-]: 1.705e-7 kg; lognormal variance with pedigree 1.61, pedigree (1,1,5,1,1)
  (same comment as for Chloride)
- Sodium, ion [water, ground-]: 0.002353 kg; lognormal variance with pedigree 0.54, pedigree (1,1,5,1,1)
  (same comment as for Chloride)

## Sampling procedure
country-specific calculation based on literature data

## Extrapolations
This dataset has been extrapolated from year 2000 to the year of the calculation (2021). The uncertainty has been adjusted accordingly.

## Review by Niels Jungbluth 2009-01-22
passed.
