# rutile production, synthetic, 95% titanium dioxide, Becher process

Dataset: EcoSpold 2, unit process
Geography: AU
Time period: 2004-01-01 to 2021-12-31
Technology level: current
Classification: ISIC rev.4 ecoinvent: 2420:Manufacture of basic precious and other non-ferrous metals
Scenario: Business-as-Usual
System model: Allocation, cut-off by classification
Generated by: Marylène Dussault
Published in: Norgate, T. E. 2004
Database: ecoinvent
isCopyrightProtected: true
accessRestrictedTo: 1

## General comment
This dataset represents the production of 1 kg of synthetic rutile from ilmenite (FeTiO3) concentrate. Ilmenite concentrate is produced from heavy mineral sand quarry operation which is upgraded synthetic rutile from either the Becher or Benelite process. This dataset represents processing of ilmenite through the Becher process, which is only known to be used in Australia.
The Becher process consists in reducing iron oxide thermally and the leaching of impurities with mineral acid. The first step is an almost complete reduction of iron oxide to its metallic form using in a rotary kiln with coal at temperature of 1200°C. Then the char is removed from the reduced ilmenite by processing it through screening and magnetic separation. The char is recycled to the rotary kiln. The reduced ilmenite is leachate with ammonium chloride under aeration to oxidize and precipitate the iron into iron oxides. The iron oxides are separated by cycloning. The remaining synthetic rutile is purified by leaching using sulfuric acid. The residual iron is removed by leaching using sulfuric acid. Products is synthetic rutile with 95% titanium dioxide content. The fine particules of iron oxides are thickened and dried and return them to the mine site. This process is mainly used in Western Australia. This dataset represent a large scale technology used for ilmenite concentrate upgrading process leading ultimately to production titanium dioxide pigment or primary titanium metal.

## Included activities start
This dataset starts with ilmenite concentrated at facility.

## Included activities end
This dataset ends with production of synthetic rutile (95% TiO2). It includes electricity, fuel and chemical used in production, iron residu disposal and an estimation of infrastructure. Emissions, wastes, land occupation and usage is excluded due to lack of data. Waste iron residues and wastewater from process are approximated. Missing data include air emission other that CO2 from the reduction step (roasting in a rotary kiln), fugitive particles emissions of iron oxide and air and liquid emissions associated with leaching the synthetic rutile with sulfuric acid for purification.

## Time period
Time period chosen based on year of publication of LCI data and year of production volume data.

## Reference product
- rutile, 95% titanium dioxide: 1 kg; name s_rutile; CPC 4160: Other non-ferrous metals and articles thereof (including waste and scrap of some metals); cermets and articles […]; By-product classification allocatable product; CAS 1317-80-2
  production volume 4.162e8 kg; name PV_s_rutile; = (196200 + 220000)*1000
    Calculated based on values reported for 2019 by producers located in Australia and which are the only ones known to be using the Becher process for producing synthetic rutile.
    Iluka reported a production volume of 196'200 metric tons in 2019 (Iluka 2020).
    Tronox reported an annual production capacity of 220'000 metric tons of synthetic rutile (Tronox 2020).
    References:
    Iluka Resources Limited (2020). Annual Report 2019. https://www.iluka.com/getattachment/0ff5efb9-4ba8-4f55-b0db-7aef68f42238/annual-report-2019-including-appendix-4e.aspx
    Tronox Holdings plc (2020). 2019 Annual Report. https://s1.q4cdn.com/960380961/files/doc_financials/2019/ar/Tronox_Annual_Report_2019_Updatedv2.pdf
  property price 0.710382 EUR2005; name s_rutile_price_EUR2005
    Price approximated with the price of "Rutile, bulk, minimum 95% TiO2, f.o.b. Australia" reported in the USGS Mineral Commodity Summaries for Titanium Mineral Concentrates from 2009 to 2018 (https://www.usgs.gov/centers/nmic/titanium-statistics-and-information). The prices given in USD were converted to EUR based on the annual exchange rates published by the European Central Bank (https://sdw.ecb.europa.eu/quickview.do?SERIES_KEY=120.EXR.A.USD.EUR.SP00.A), and then adjusted for inflation relative to 2005 by using the Harmonised Index of Consumer Prices (HICP) of the euro area, published by eurostat (https://ec.europa.eu/eurostat/databrowser/view/PRC_HICP_AIND/default/table).
  property carbon content 0
    carbon content on a dry matter basis (reserved; not for manual entry)
  properties: carbon content, fossil 0, dry mass 1 kg, wet mass 1 kg, carbon content, non-fossil 0, water content 0, water in wet mass 0 kg, carbon allocation 0 kg

## Inputs from technosphere
- electricity, high voltage: 0.3 kWh; source Norgate, T. E. 2004; lognormal variance with pedigree 0.0118, pedigree (3,3,4,1,2)
  Stochiometric value. Mass of ilmenite concentrate, produced from heavy mineral sand quarry operation, needed for production of 1 kg of syntheric rutile with 92.5% titanium dioxide average content.
- sulfuric acid: 0.04 kg; source Norgate, T. E. 2004; lognormal variance with pedigree 0.0118, pedigree (3,3,4,1,2)
  Literature value: Based on LCI publish by Norgate in 2004.
  2004, Norgate, T. E., Rajakumar, V. ; Trang, S., Titanium and Other Light Metals - Technology Pathways to Sustainable Development, AUSTRALASIAN INST. OF MINING AND METALLU, 2, 105-112
  properties: wet mass 1 kg, dry mass 1 kg
- ammonium chloride: 0.01 kg; source Norgate, T. E. 2004; lognormal variance with pedigree 0.0118, pedigree (3,3,4,1,2)
  (same comment as for sulfuric acid)
  properties: wet mass 1 kg, dry mass 1 kg
- heat, district or industrial, other than natural gas: 16.3603 MJ; name naturalGas; = naturalGas_fuel_input_in_kg* naturalGas_Net_Heat_Value*28.9* naturalGas_fuel_use; source Norgate, T. E. 2004; lognormal variance with pedigree 0.0118, pedigree (3,3,4,1,2)
  (same comment as for sulfuric acid)
  property Corresponding fuel use 1.11 MJ; name naturalGas_fuel_use
  property heating value, net 1 MJ; name naturalGas_Net_Heat_Value
  property kgFuel_Input 0.51 kg; name naturalGas_fuel_input_in_kg
  note on Corresponding fuel use: Lower heating value of the fuel input related to the heat/electricity output
- sulfur: 0.02 kg; source Norgate, T. E. 2004; lognormal variance with pedigree 0.0118, pedigree (3,3,4,1,2)
  Literature value: based on LCI publish by Norgate in 2004.
  2004, Norgate, T. E., Rajakumar, V. ; Trang, S., Titanium and Other Light Metals - Technology Pathways to Sustainable Development, AUSTRALASIAN INST. OF MINING AND METALLU, 2, 105-112
  properties: wet mass 1 kg, dry mass 1 kg
- ilmenite, 54% titanium dioxide: 1.75926 kg; source Norgate, T. E. 2004; lognormal variance with pedigree 0.0118, pedigree (3,3,4,1,2)
  Literature value: based on LCI publish by Norgate in 2004. Considering Synthetic rutile TiO2 concentration of 92.5% (90-95%), for 1 T of SR = 11728 mole of SR = 11728 mole of Illemite = 1.779 T of Illmenite = 1.977 T of illmenite concentrate (90% FeOtiO2)
  2004, Norgate, T. E., Rajakumar, V. ; Trang, S., Titanium and Other Light Metals - Technology Pathways to Sustainable Development, AUSTRALASIAN INST. OF MINING AND METALLU, 2, 105-112
  properties: wet mass 1 kg, dry mass 1 kg
- tap water: 6 kg; name water; source Norgate, T. E. 2004; lognormal variance with pedigree 0.0118, pedigree (3,3,4,1,2)
  (same comment as for sulfur)
  properties: carbon content, fossil 0.00178991, dry mass 0.000337476 kg, wet mass 1 kg, water content 2962.17
  note on carbon content, fossil: Bicarbonate content is 2.93 mol/m3. CO2 content is 0.1 mol/m3 (ecoinvent v2.2 report 8, Tab 93.1).
- wastewater, average: -0.006 m3; name BP_amount_1; = (water*UnitConversion(1, 'l', 'm3'))*-1; lognormal variance with pedigree 0.0512, pedigree (5,3,4,5,1)
  Approximation: value based on water input as reported by Norgate in 2004. Processes used as an approximation for unknown characterization of wastewater generated from process.
  2004, Norgate, T. E., Rajakumar, V. ; Trang, S., Titanium and Other Light Metals - Technology Pathways to Sustainable Development, AUSTRALASIAN INST. OF MINING AND METALLU, 2, 105-112
  production volume 2.4972e6 m3; = PV_s_rutile * (BP_amount_1 / s_rutile)
    Calculated from production volume of reference product using the relative outputs.
  property price 0 EUR2005; name BP_amount_1_price_EUR2005
  properties: wet mass 1000 kg, water content 2882.2, carbon content, non-fossil 0.194039, dry mass 0.346837 kg
  note on carbon content, non-fossil: 0.0673 kg TOC/m3 (Tab A.17, ecoinvent v2.2 report 13_I). TOC was considered as Total Carbon.
- lime, hydrated, loose weight: 0.04 kg; source Norgate, T. E. 2004; lognormal variance with pedigree 0.0118, pedigree (3,3,4,1,2)
  (same comment as for sulfuric acid)
  properties: dry mass 0.997 kg, water content 0.00300903, wet mass 1 kg
- chemical factory, organics: 4e-10 unit; lognormal variance with pedigree 0.0282, pedigree (4,5,2,5,1)
  Approximated process. Represents infrastructure for beneficiation facility. Value is typical value in ecoinvent datasets.
- heat, district or industrial, other than natural gas: 1.05 MJ; source Norgate, T. E. 2004; lognormal variance with pedigree 0.0118, pedigree (3,3,4,1,2)
  (same comment as for sulfuric acid)
  properties: heating value, net 1 MJ
- residue from rutile production, synthetic, 56% water: -0.815475 kg; name iron_residu; lognormal variance with pedigree 1.17816, pedigree (2,5,3,5,2)
  Litterature value: Based on reported range of iron residu generated during synthetic rutil production (Becher process). Current pratice reported is to thickened and dried the residu and return them to the mine site. The process is an approximation for iron residue disposal.
  Dimitrios, P., Hudon, G. 2009. Iron removal and recovery in the titanium dioxide feedstock and pigment industries. JOM. 61 (10). 36-42 http://dx.doi.org/10.1007/s11837-009-0150-3
  production volume 3.39401e8 kg; = PV_s_rutile * (iron_residu / s_rutile)
    Calculated from production volume of reference product using the relative outputs.
  property price 0 EUR2005; name iron_residu_price_EUR2005
  properties: wet mass 1 kg, dry mass 0.44 kg, water content 1.27273

## Sampling procedure
Literature data based on reseach compilation of studies and modeling.

## Extrapolations
This dataset has been extrapolated from year 2019 to the year of the calculation (2021). The uncertainty has been adjusted accordingly.
