# oxalic acid production

Dataset: EcoSpold 2, unit process
Geography: CN
Time period: 2020-01-01 to 2024-12-31
Technology level: current
Classification: ISIC rev.4 ecoinvent: 2011:Manufacture of basic chemicals
Synonyms: ethanedioic acid; aquisal
Scenario: Business-as-Usual
System model: Allocation, cut-off by classification
Generated by: Efstathios Kakkos
Database: ecoinvent
isCopyrightProtected: true
accessRestrictedTo: 1

## General comment
This dataset refers to the production of 1 kg oxalic acid from propylene through the propylene oxidation method, a two-step method developed by Rhône-Poulenc, in China. The dataset is based on the supplementary materials (Table S10, page S13) of the Wang et al (2020) publication.
In the first step, propylene enters a solution of nitric acid in a reactor at 10 – 40 oC, where it is partially oxidized and subsequently converted to α-nitratolactic acid. The stoichiometric equation is the following:
C3H6 + 3HNO3 -> C3H5O5N + 2NO + 2H2O
During the second step of the process, oxygen at 45 – 100 oC is used to treat the mixed and partially oxidized acid produced from the previous step, forming oxalic acid, which is crystallized and filtered. The overall efficiency of the process is claimed to be nearly 90% and approximately all of the propylene is converted. The stoichiometric equation for the second step is the following: C3H5O5N + 5/2 O2 -> C2H2O4 + CO2 + HNO3 + H2O.
The oxygen input was not originally present in the original source. However, due to the fact that is a direct input required for the oxidization, the oxygen amount has been calculated based on the 2nd stoichiometric equation. The amount (approximately 0.89 kg) has been increased by 5% in order to account for losses (standard procedure in chemical production datasets that are modelled in Ecoinvent).
Reference: Wang, L., Wang, P., Chen, W.-Q., Wang, Q.-Q., & Lu, H.-S. (2020). Environmental Impacts of Scandium Oxide Production from Rare Earths Tailings of Bayan Obo Mine. Journal of Cleaner Production, 122464. doi:https://doi.org/10.1016/j.jclepro.2020.122464.

## Included activities start
The activity starts with the oxidization of propylene.

## Included activities end
The activity ends with the production of oxalic acid.

## Geography
Since China is the major producer of oxalic acid (representing 66.7% of the global production - Source: https://www.businesswire.com/news/home/20110111006011/en/Research-Markets-Chinas-Oxalic-Acid-Industry-2010-2012), this dataset is assumed to be valid for this entire geography.

## Technology
See general comment.

## Time period
Data are considered representative of current production practices.

## Reference product
- oxalic acid: 1 kg; CPC 34140: Carboxylic acids and their anhydrides, halides, peroxides and peroxyacids and their halogenated, sulphonated, […]; By-product classification allocatable product; CAS 144-62-7
  production volume 3e8 kg; name PVRP
    The production volume is expressed in kg. The production volume of oxalic acid in China exceeds 300000000 kg. (Source: https://www.businesswire.com/news/home/20110111006011/en/Research-Markets-Chinas-Oxalic-Acid-Industry-2010-2012.) Here the production volume is assumed to be equal to the aforementioned amount. Since the global demand was estimated at 450000000 kg and it is assumed that the demand is covered, China represents 66.7% of the global production.
  property hydrogen content 0.0224
    Hydrogen content of Oxalic acid (C2H2O4) calculated based on the molecular structure. Mass contribution of each element to the total mass: C: 26.68% , H: 2.24% , O: 71.08%. Source: https://www.lenntech.com/calculators/molecular/molecular-weight-calculator.htm
  property oxygen content 0.7108
    Oxygen content of Oxalic acid (C2H2O4) calculated based on the molecular structure. Mass contribution of each element to the total mass: C: 26.68% , H: 2.24% , O: 71.08%. Source: https://www.lenntech.com/calculators/molecular/molecular-weight-calculator.htm
  property carbon content, fossil 0.2668
    Carbon content of Oxalic acid (C2H2O4) calculated based on the molecular structure. Mass contribution of each element to the total mass: C: 26.68% , H: 2.24% , O: 71.08%. Source: https://www.lenntech.com/calculators/molecular/molecular-weight-calculator.htm
  property price 2.03212 EUR2005
    Calculated based on inputs: The price of the product has been calculated as a sum of the values of the material and energy inputs for this product. This value is therefore a rough estimation. It may underestimate the real price since there are additional expenses when producing any product. These expences can include for example labour costs, treatment of waste materials and profit for the producer. Please consider carefully whether this level of data quality is acceptable for your application.
  property carbon content 0.2668
    carbon content on a dry matter basis (reserved; not for manual entry)
  properties: dry mass 1 kg, wet mass 1 kg, water in wet mass 0 kg, water content 0, carbon content, non-fossil 0, carbon allocation 0.2668 kg

## Inputs from technosphere
- inert waste: -3.36 kg; name bp1; lognormal variance with pedigree 0.0032, pedigree (2,4,1,1,1)
  Proxy considered for the mother liquor that is produced as a byproduct (Source: http://eacharya.inflibnet.ac.in/data-server/eacharya-documents/55daa452e41301c73a2cb5ac_INFIEP_208/579/ET/208-579-ET-V1-S1__lecture_10_oxalic_acid.pdf). The value is calculated based on dry mass balance. This byproduct was not present in the source, in which this dataset is based on (supplementary materials table S10, page S13 of the following publication: Wang, L., Wang, P., Chen, W.-Q., Wang, Q.-Q., & Lu, H.-S. (2020). Environmental Impacts of Scandium Oxide Production from Rare Earths Tailings of Bayan Obo Mine. Journal of Cleaner Production, 122464. doi:10.1016/j.jclepro.2020.122464).
  production volume 1.008e9 kg; = PVRP*bp1
    Calculated from production volume of reference product using the relative outputs.
  property price 0 EUR2005; name bp1_price_EUR2005
  properties: wet mass 1 kg, dry mass 1 kg
- sodium hydroxide, without water, in 50% solution state: 0.92 kg; lognormal variance with pedigree 0.0032, pedigree (2,4,1,1,1)
  Amount taken from the supplementary materials table S10, page S13 of the following publication: Wang, L., Wang, P., Chen, W.-Q., Wang, Q.-Q., & Lu, H.-S. (2020). Environmental Impacts of Scandium Oxide Production from Rare Earths Tailings of Bayan Obo Mine. Journal of Cleaner Production, 122464. doi:10.1016/j.jclepro.2020.122464.
  Uncertainty: U
  properties: heating value, net 3.03 MJ, dry mass 1 kg, wet mass 1 kg
- sulfuric acid: 0.95 kg; lognormal variance with pedigree 0.0032, pedigree (2,4,1,1,1)
  (same comment as for sodium hydroxide, without water, in 50% solution state)
  properties: wet mass 1 kg, dry mass 1 kg
- heat, district or industrial, other than natural gas: 6.64553 MJ; = 0.66*2.75*2.795*1.31; lognormal variance with pedigree 0.0032, pedigree (2,4,1,1,1)
  This exchange represents the total thermal energy produced from steam.The original value reported is 0.66 m3 per kg of produced oxalic acid. The abovementioned value is taken from the supplementary materials (Table S10, page S13) of the following publication: Wang, L., Wang, P., Chen, W.-Q., Wang, Q.-Q., & Lu, H.-S. (2020). Environmental Impacts of Scandium Oxide Production from Rare Earths Tailings of Bayan Obo Mine. Journal of Cleaner Production, 122464. doi:10.1016/j.jclepro.2020.122464. Based on the existing datasets of Ecoinvent for heat production through steam, the assumed energy content of steam is 2.75 MJ/kg. According to the Engineering toolbox, this value represents steam production between 500 °C and 550 °C, with densities of 2.67 kg/m3 and 2.92 kg/m3 respectively. An average density of 2.795 kg/m3 has been considered. Source: https://www.engineeringtoolbox.com/saturated-steam-properties-d_101.html. The calculated amount of energy is then multiplied by 1.31, in order to account for the heat loss associated with the production of steam. An activty link was set for this exchange, as the authors of the publication state that steam is produced from coal.
  properties: corresponding fuel use, propane, furnace >100kW 1.05263 MJ, heating value, net 1 MJ
  note on corresponding fuel use, propane, furnace >100kW: Lower heating value of the fuel input related to the heat/electricity output, taken directly from ecoinvent v3.0 dataset "heat production, natural gas, at industrial furnace >100kW, GLO 2000".
- wastewater, average: -0.00299 m3; name bp2; lognormal variance with pedigree 6.0026, pedigree (2,4,1,1,1)
  Amount taken from the supplementary materials table S10, page S13 of the following publication: Wang, L., Wang, P., Chen, W.-Q., Wang, Q.-Q., & Lu, H.-S. (2020). Environmental Impacts of Scandium Oxide Production from Rare Earths Tailings of Bayan Obo Mine. Journal of Cleaner Production, 122464. doi:10.1016/j.jclepro.2020.122464.
  production volume 897000 m3; = PVRP*bp2
    Calculated from production volume of reference product using the relative outputs.
  property price 0 EUR2005; name bp2_price_EUR2005
  properties: wet mass 1000 kg, water content 2882.2, carbon content, non-fossil 0.194039, dry mass 0.346837 kg
  note on carbon content, non-fossil: 0.0673 kg TOC/m3 (Tab A.17, ecoinvent v2.2 report 13_I). TOC was considered as Total Carbon.
- nitric acid, without water, in 50% solution state: 2.1 kg; lognormal variance with pedigree 0.0032, pedigree (2,4,1,1,1)
  (same comment as for sodium hydroxide, without water, in 50% solution state)
  properties: wet mass 1 kg, dry mass 1 kg
- oxygen, liquid: 0.9345 kg; = 1.05*0.89; lognormal variance with pedigree 0.0032, pedigree (2,4,1,1,1)
  The original amount is 0.89 kg and is based on the 2nd-stage stoichiometric equation for the production of oxalic acid (see general comment). This input was not present in the source, in which this dataset is based on (supplementary materials table S10, page S13 of the following publication: Wang, L., Wang, P., Chen, W.-Q., Wang, Q.-Q., & Lu, H.-S. (2020). Environmental Impacts of Scandium Oxide Production from Rare Earths Tailings of Bayan Obo Mine. Journal of Cleaner Production, 122464. doi:10.1016/j.jclepro.2020.122464). The value has been increased by 5% to take into account the losses from the production (which is what a standard procedure in chemical production datasets that are modelled in Ecoinvent).
  properties: dry mass 1 kg, wet mass 1 kg
- chemical factory, organics: 4e-10 unit; lognormal variance with pedigree 0.3026, pedigree (2,4,1,1,1)
  This infrastructural input has been assumed for compliance with the Ecoinvent Guidelines and was not originally present in the publication, on which this dataset was based (Wang, L., Wang, P., Chen, W.-Q., Wang, Q.-Q., & Lu, H.-S. (2020). Environmental Impacts of Scandium Oxide Production from Rare Earths Tailings of Bayan Obo Mine. Journal of Cleaner Production, 122464. doi:10.1016/j.jclepro.2020.122464). Value has been taken from the dataset ''acetic acid production, product in 98% solution state, GLO'' from the Ecoinvent database version 3.6. The chemical factory is assumed to have an average output of 50'000 t/a and a lifespan of fifty years.
  Uncertainty: U
- heat, district or industrial, other than natural gas: 14.739 MJ; = 0.51*28.9; lognormal variance with pedigree 0.0032, pedigree (2,4,1,1,1)
  This exchange represents the total thermal energy produced from coke.The original value reported is 0.51 kg per kg of of produced oxalic acid. The abovementioned value is taken from the supplementary materials of the following publication: Wang, L., Wang, P., Chen, W.-Q., Wang, Q.-Q., & Lu, H.-S. (2020). Environmental Impacts of Scandium Oxide Production from Rare Earths Tailings of Bayan Obo Mine. Journal of Cleaner Production, 122464. doi:10.1016/j.jclepro.2020.122464. The original amount was converted in MJ. Gross calorific value of coke: 28.9 MJ/kg (according to Ecoinvent data quality guidelines version 3, chapter 5.6.3, page 36. Source: http://www.fao.org/3/T0269e/t0269e0c.htm. An activty link was set for this exchange, to ensure that the supplied heat comes from coke.
- propylene: 1.25 kg; lognormal variance with pedigree 0.0032, pedigree (2,4,1,1,1)
  (same comment as for sodium hydroxide, without water, in 50% solution state)
  properties: dry mass 1 kg, wet mass 1 kg, carbon content, fossil 0.857143, heating value, net 43.22 MJ
- electricity, medium voltage: 0.0194444 kWh; lognormal variance with pedigree 0.0032, pedigree (2,4,1,1,1)
  The original amount of this exchange is 0.07 MJ and was taken from the supplementary materials table S10, page S13 of the following publication: Wang, L., Wang, P., Chen, W.-Q., Wang, Q.-Q., & Lu, H.-S. (2020). Environmental Impacts of Scandium Oxide Production from Rare Earths Tailings of Bayan Obo Mine. Journal of Cleaner Production, 122464. doi:10.1016/j.jclepro.2020.122464. The original amount was converted in kWh. 1 MJ equals approximately 0.2778 kWh.
  Uncertainty: U

## Inputs from nature
- Water, unspecified natural origin [natural resource, in water]: 0.00239 m3; lognormal variance with pedigree 0.0032, pedigree (2,4,1,1,1)
  The total amount of water that is produced as byproduct based on the 2-stage stoichiometric equations in general comment section is 0.60 kg per kg of oxalic acid produced, The amount of waster water reported is 2.99 kg (0.00299 m3). based on the following: (supplementary materials table S10, page S13 of the following publication: Wang, L., Wang, P., Chen, W.-Q., Wang, Q.-Q., & Lu, H.-S. (2020). Environmental Impacts of Scandium Oxide Production from Rare Earths Tailings of Bayan Obo Mine. Journal of Cleaner Production, 122464. doi:10.1016/j.jclepro.2020.122464). Therefore, for mass balance purposes an input of 0.00239 m3 (2.39 kg) is assumed here.

## Emissions to nature
- Oxygen [air, unspecified]: 0.046725 kg; lognormal variance with pedigree 0.0426, pedigree (2,4,1,1,1)
  This exchange represents the amount of oxygen loss from the production of oxalic acid. The amount oxygen loss is assumed to be 5% of the original amount reported (check oxygen liquid exchange comment). This value was not contained in the originnal source, on which this dataset is based on (Source: Wang, L., Wang, P., Chen, W.-Q., Wang, Q.-Q., & Lu, H.-S. (2020). Environmental Impacts of Scandium Oxide Production from Rare Earths Tailings of Bayan Obo Mine. Journal of Cleaner Production, 122464. doi:10.1016/j.jclepro.2020.122464).
- Carbon dioxide, fossil [air, non-urban air or from high stacks]: 1.43 kg; lognormal variance with pedigree 0.0032, pedigree (2,4,1,1,1)
  (same comment as for sodium hydroxide, without water, in 50% solution state)
- Nitric oxide [air, unspecified]: 0.25 kg; lognormal variance with pedigree 0.0426, pedigree (2,4,1,1,1)
  (same comment as for sodium hydroxide, without water, in 50% solution state)
- Sulfur dioxide [air, non-urban air or from high stacks]: 0.05 kg; lognormal variance with pedigree 0.0032, pedigree (2,4,1,1,1)
  (same comment as for sodium hydroxide, without water, in 50% solution state)

## Sampling procedure
This dataset is based on the supplementary materials (Table S10, page S13) of the following publication: Wang, L., Wang, P., Chen, W.-Q., Wang, Q.-Q., & Lu, H.-S. (2020). Environmental Impacts of Scandium Oxide Production from Rare Earths Tailings of Bayan Obo Mine. Journal of Cleaner Production, 122464. doi:https://doi.org/10.1016/j.jclepro.2020.122464. Individual exchanges that were not present within the Ecoinvent database have been modelled with assuming proxies. Unit conversion has been performed to some exchanges to match the unit of the foreground data with the unit of the representative process of Ecoinvent. More detailed info is provided in the individual comment of each exchange. Infrastructural input (i.e chemical factory) has been introduced to take into account the type of infrastructure used in order to produce the oxalic acid. This infrastructural input was not present on the original dataset and is added in order to comply with the requirements of the Ecoinvent database. The authors of the publication, compiled the dataset for oxalic acid based on the following:
Chemical Technology: An Integral Textbook, 2013. Wiley-VCH. 1-888. ISBN: 3527304460.

Hocking M.B., 2006. Handbook of Chemical Technology and Pollution Control, 3rd Edition. Academic Press. 1-799. ISBN: 9780120887965.

Hocking M.B., 2012. Modern Chemical Technology and Emission Control. Springer. 1-460. ISBN: 9783642697753.

Kirk-Othmer Chemical Technology and the Environment, 2007. Wiley. 1-1349. ISBN: 9780470105405.
Moulijn, J.A., Makkee, M., Diepen, A.E.V., 2013. Chemical Process Technology. Wiley. 1-566. ISBN: 9781444320244.

Murzin, D.Y., 2018. Chemical Product Technology. de Gruyter. 1-280. ISBN: 9783110475319.
P.R.C. National Standard GB/T 1626-2008, 2008. Oxalic acid for industrial use. China National Standardiza-tion Management Committee. December 1st.

Ullmann's Encyclopedia of Industrial Chemistry, 2005. Wiley. pp. 17624/28029. ISBN 9783527306732.
Wang, Y.S., Yun, K., Cao, Y., Qiu, R.C., 2017. Research status and prospect of industrialized preparation of oxalic acid. Modern Chemical Industry. 37, 15-18 (in Chinese).

## Extrapolations
Due to lack of data for other production pathways of oxalic acid, this dataset is assumed to be valid for the entire country of China.

## Review by Tom Etheridge 2021-02-23
These changes and comments make the dataset much more transparent and all of my questions were addressed satisfactorily.
