# barley production

Dataset: EcoSpold 2, unit process
Geography: RoW
Time period: 2000-01-01 to 2021-12-31
Technology level: current
Classification: ISIC rev.4 ecoinvent: 0111:Growing of cereals (except rice), leguminous crops and oil seeds
Scenario: Business-as-Usual
System model: Allocation, cut-off by classification
Generated by: Thomas Nemecek
Database: ecoinvent
isCopyrightProtected: true
accessRestrictedTo: 1

## General comment
This dataset represents the production of 1 kg of barley grain (fresh matter). The amounts of flows are weighted averages over all existing local crop production datasets available for this specific product. The weights are the annual production volumes of the local datasets relative to the sum of all local annual production volumes. The locations of considered datasets in the averaging prodecure for this global dataset are Germany, Spain and France. For references refer to the respective local datasets.
[This dataset was already contained in the ecoinvent database version 2. It was not individually updated during the transfer to ecoinvent version 3. Life Cycle Impact Assessment results may still have changed, as they are affected by changes in the supply chain, i.e. in other datasets. This dataset was generated following the ecoinvent quality guidelines for version 2. It may have been subject to central changes described in the ecoinvent version 3 change report (http://www.ecoinvent.org/database/ecoinvent-version-3/reports-of-changes/), and the results of the central updates were reviewed extensively. The changes added e.g. consistent water flows and other information throughout the database. The documentation of this dataset can be found in the ecoinvent reports of version 2, which are still available via the ecoinvent website. The change report linked above covers all central changes that were made during the conversion process.]

## Included activities end
The inventory includes the processes of soil cultivation, sowing, weed control, fertilisation, pest and pathogen control, harvest and drying of the grains. Machine infrastructure and a shed for machine sheltering is included. Inputs of fertilisers, pesticides and seed as well as their transports to the farm are considered. The direct emissions on the field are also included. The system boundary is at the farm gate.

## Geography
Refers to an average production in the region Saxony-Anhalt (DE).

## Technology
conventional production typical for the region

## Time period
The yield data have been collected for the years 2000-2004.

## Parameters
- fraction, irrigation water, to ground water: 0.8 dimensionless; name fraction_IW_to_ground_water; lognormal variance with pedigree 0.0886, pedigree (4,3,1,1,4)
- fraction, irrigation water, to air: 0.586986 dimensionless; name fraction_IW_to_air; lognormal variance with pedigree 0.0409, pedigree (2,2,2,1,1)
  Literature value (Siebert, 2010) (Vionnet, S., Quantis Water Database - Technical Report, 2012).
- fraction, irrigation water to surface water: 0.2 dimensionless; name fraction_IW_to_surface_water; lognormal variance with pedigree 0.0886, pedigree (4,3,1,1,4)

## Reference product
- barley grain: 1 kg; name REF_PRODUCT; CPC 01152: Barley, other; By-product classification allocatable product
  production volume 1.11833e11 kg
    FAOSTAT
  property price 0.117 EUR2005; name REF_PRODUCT_price_EUR2005
    Temporary price data. Calculated as 90% of purchasers price based on: 2004 prices for World import/export data (tonnes and US$) from FaoStat statistics (http://faostat.fao.org/site/535/default.aspx#ancor, TRADE)- [Accessed 24 May 2010].
  property carbon content, non-fossil 0.46538; name REF_PRODUCT_C_content_non_fossil
    biogene carbon content on a dry matter basis
    Composition data obtained from Barley hulled, in (http://www.nal.usda.gov/fnic/foodcomp/search/). First, composition data were refered to 1 kg dry mass. Then, C-contents were calculated considering a C-content/dry mass of 46% in carbohydrates (including fibres), 53% in proteins and 75% in fats. All data from 'Evolutionary and Biochemical Aspects', A.D. Kay and T. Vrede (in Global Ecology, 2010, Elsevier B.V., S.E. Jørgensen Ed.).
  property energy content 15.5832 MJ; name REF_PRODUCT_energy_content
    See chapter 'Yields and Inputs of Arable Crop Production' in '01_crop production - yields & inputs CH & Europe_v1.0.pdf', section 'AGRICULTURAL PRODUCTION IN SWITZERLAND' - pdf-document on the dedicated talk page of ecoinvent (www.ecoinvent.org/documentation)
  property wet mass 1 kg; name REF_PRODUCT_WM
  property water in wet mass 0.14 kg; name REF_PRODUCT_WWM; = 1-REF_PRODUCT_DM
  property carbon content, fossil 0; name REF_PRODUCT_C_content_fossil
    fossil carbon content on a dry matter basis
  property dry mass 0.86 kg; name REF_PRODUCT_DM
  property water content 0.162791; name REF_PRODUCT_water_content; = (1-REF_PRODUCT_DM)/REF_PRODUCT_DM
  property carbon content 0.46538
    carbon content on a dry matter basis (reserved; not for manual entry)
  properties: carbon allocation 0.400227 kg

## Inputs from technosphere
- nitrile-compound: 1.64481e-5 kg; lognormal variance with pedigree 0.0427, pedigree (2,2,5,5,1)
  Averaged from local datasets. See general comment.
  properties: carbon content, fossil 0.344995, dry mass 1 kg, wet mass 1 kg
  note on carbon content, fossil: An unweighted average of the C content in chlorothalonil, dichlobenil, bromoxynil, ioxynil, substances classified as nitrile-compounds in Tab 2.25, Sutter 2010
- potassium chloride: 0.0111818 kg; lognormal variance with pedigree 0.0426, pedigree (2,1,5,5,1)
  The exchange has been updated from 'potassium chloride, as K2O' into 'potassium chloride' and therefore its amount has been scaled (multiplied) from 0.0071 kg by 1.5829 kg of 'potassium chloride' per kg of 'potassium chloride, as K2O'. Original comment of the exchange is: Averaged from local datasets. See general comment.
  properties: dry mass 1 kg, wet mass 1 kg
- combine harvesting: 0.000178567 ha; lognormal variance with pedigree 0.0426, pedigree (2,1,5,5,1)
  Averaged from local datasets. See general comment.
- ammonium sulfate: 0.000862257 kg; lognormal variance with pedigree 0.0426, pedigree (2,1,5,5,1)
  Averaged from local datasets. See general comment.
  properties: dry mass 1 kg, wet mass 1 kg
- inorganic phosphorus fertiliser, as P2O5: 0 kg; pedigree (1,1,1,1,1)
  Averaged from local datasets. See general comment.
  properties: dry mass 1 kg, wet mass 1 kg
- phenoxy-compound: 1.31352e-5 kg; lognormal variance with pedigree 0.0427, pedigree (2,2,5,5,1)
  Averaged from local datasets. See general comment.
  properties: wet mass 1 kg, carbon content, fossil 0.532559, dry mass 1 kg
  note on carbon content, fossil: An unweighted average of the C content in mCPA, mCPB, mecoprop, fluazifop-P-butyl, and 2,4-D. Those substances are classified as phenoxy-compounds in Tab 2.25, Sutter 2010
- pesticide, unspecified: 0.000116938 kg; lognormal variance with pedigree 0.0427, pedigree (2,2,5,5,1)
  Averaged from local datasets. See general comment.
  properties: wet mass 1 kg, dry mass 1 kg, carbon content, fossil 0.486978
  note on carbon content, fossil: Mean of C content in all pesticides whose formula has been documented in Sutter 2010
- tillage, rolling: 6.27952e-5 ha; lognormal variance with pedigree 0.0426, pedigree (2,1,5,5,1)
  Averaged from local datasets. See general comment.
- barley seed, for sowing: 0.0291017 kg; name SEED; lognormal variance with pedigree 0.0426, pedigree (2,1,5,5,1)
  Averaged from local datasets. See general comment.
  property water content 0.176471; name barley_seed_sowing_water_content
  property wet mass 1 kg; name barley_seed_sowing_WM
  property energy content 15.402 MJ; name SEED_energy_content
  property carbon content, non-fossil 0.449101; name SEED_C_content_non_fossil
  property dry mass 0.85 kg; name SEED_DM
  property water in wet mass 0.15 kg; name barley_seed_sowing_WWM
  note on energy content: See chapter 'Product Properties' in '01_crop production - yields & inputs CH & Europe_v1.0.pdf', section 'AGRICULTURAL PRODUCTION IN SWITZERLAND' - pdf-document on the dedicated talk page of ecoinvent (www.ecoinvent.org/documentation)
  note on carbon content, non-fossil: biogene carbon content on a dry matter basis; Composition data obtained from Barley hulled, in (http://www.nal.usda.gov/fnic/foodcomp/search/). First, composition data were refered to 1 kg dry mass. Then, C-contents were calculated considering a C-content/dry mass of 44% in carbohydrates (including fibres), 53% in proteins and 75% in fats. All data from ecoinvent report, n 15a, pg 40, except C-content in protein, that comes from Determination of protein concentration by total organic carbon analysis, Rouwenhorst et al., 1991, J Biochem and Biophys Methods, 22:119-128.
- packaging, for fertilisers: 0.0797066 kg; lognormal variance with pedigree 0.0912, pedigree (4,3,5,5,4)
  Total amount of active substance/s of fertilisers needed for the production of 'barley grain' is calculated to be circa 3.99E-02 kg. Fertiliser/s used in this dataset is/are: 'ammonium nitrate, as N', 'ammonium sulfate, as N', 'lime', 'nitrogen fertiliser, as N', 'phosphate fertiliser, as P2O5', 'potassium chloride, as K2O', 'urea, as N'. The total amount of active substance/s is doubled in order to account for the packaging of the dilluted product of fertiliser/s that is/are applied. Therefore, 7.97E-02 kg of packaging for fertilisers is justified with this exchange.
  properties: price 0.0642 EUR2005, dry mass 1 kg, wet mass 1 kg, carbon content, fossil 0.825301, heating value, net 25.01 MJ
  note on carbon content, fossil: Considering a chemical formula (C2H4)n for polyethylene, carbon content-fossil is calculated to be 0.856286 kg of Carbon per kg of dry mass.
- sowing: 0.000178567 ha; lognormal variance with pedigree 0.0426, pedigree (2,1,5,5,1)
  Averaged from local datasets. See general comment.
- irrigation: 0 m3; name water_irrigation_input; source Siebert, S. 2010; pedigree (1,1,1,1,1)
  Calculated based on literature values (Doll, 2010) and partially modelled at ETH (Pfister, S.).
  property wet mass 1000 kg; name WM
  property water content 9089.91; name water_content
  property dry mass 0.11 kg; name DM
  property carbon content, fossil 0; name C_content_fossil
  property water in wet mass 999.89 kg; name WWM
  property carbon content, non-fossil 0; name C_content_non_fossil
- fertilising, by broadcaster: 0.000487919 ha; lognormal variance with pedigree 0.0426, pedigree (2,1,5,5,1)
  Averaged from local datasets. See general comment.
- organophosphorus-compound, unspecified: 1.10707e-5 kg; lognormal variance with pedigree 0.0427, pedigree (2,2,5,5,1)
  Averaged from local datasets. See general comment.
  properties: dry mass 1 kg, wet mass 1 kg, carbon content, fossil 0.260898
  note on carbon content, fossil: C content was calculated as an unweighted average of glyphosate, parathion, and fosetyl-Al. Those substances are classified as organo-phosphorous compounds in Tab 2.25, Sutter 2010
- urea: 0 kg; pedigree (1,1,1,1,1)
  The exchange has been updated from 'urea, as N' into 'urea' and therefore its amount has been scaled (multiplied) from 0.004 kg by 2.1438 kg of 'urea' per kg of 'urea, as N'. Original comment of the exchange is: Averaged from local datasets. See general comment.
  properties: dry mass 1 kg, wet mass 1 kg, carbon content, fossil 0.2
- tillage, ploughing: 0.000167075 ha; lognormal variance with pedigree 0.0426, pedigree (2,1,5,5,1)
  Averaged from local datasets. See general comment.
- application of plant protection product, by field sprayer: 0.000643469 ha; lognormal variance with pedigree 0.0426, pedigree (2,1,5,5,1)
  Averaged from local datasets. See general comment.
- drying of feed grain: 0.00653792 l; lognormal variance with pedigree 0.0426, pedigree (2,1,5,5,1)
  Averaged from local datasets. See general comment.
- packaging, for pesticides: 0.000440522 kg; lognormal variance with pedigree 0.0912, pedigree (4,3,5,5,4)
  Total amount of active substance/s of pesticides needed for the production of barley grain is calculated to be circa 2.20E-04 kg. Pesticide/s used in this dataset is/are: '[sulfonyl]urea-compound', 'cyclic N-compound', 'diphenylether-compound', 'nitrile-compound', 'organophosphorus-compound, unspecified', 'pesticide, unspecified', 'phenoxy-compound', 'pyrethroid-compound'. The total amount of active substance/s is doubled in order to account for the packaging of the dilluted product of pesticide/s that is/are applied. Therefore, 4.41E-04 kg of packaging for pesticides is justified with this exchange.
  properties: wet mass 1 kg, dry mass 1 kg, price 0.0642 EUR2005, carbon content, fossil 0.85714, heating value, net 25.97 MJ
- inorganic nitrogen fertiliser, as N: 0 kg; pedigree (1,1,1,1,1)
  Averaged from local datasets. See general comment.
  properties: wet mass 1 kg, dry mass 1 kg
- tillage, harrowing, by spring tine harrow: 9.19314e-5 ha; lognormal variance with pedigree 0.0426, pedigree (2,1,5,5,1)
  Averaged from local datasets. See general comment.
- tillage, harrowing, by rotary harrow: 0.000244758 ha; lognormal variance with pedigree 0.0426, pedigree (2,1,5,5,1)
  Averaged from local datasets. See general comment.
- pyrethroid-compound: 8.53941e-7 kg; lognormal variance with pedigree 0.0427, pedigree (2,2,5,5,1)
  Averaged from local datasets. See general comment.
  properties: wet mass 1 kg, dry mass 1 kg, carbon content, fossil 0.623
  note on carbon content, fossil: C content of pyrethroid-compounds was calculated as an unweigthed average of C content of the substances: cypermethrin, alpha-cypermethrin,beta-cyfluthrin, lambdacyhalothrin. Those substances are classified as pyrethroid-compounds in Tab 2.25, Sutter 2010
- cyclic N-compound: 2.25571e-5 kg; lognormal variance with pedigree 0.0427, pedigree (2,2,5,5,1)
  Averaged from local datasets. See general comment.
  properties: dry mass 1 kg, carbon content, fossil 0.641962, wet mass 1 kg
  note on carbon content, fossil: Calculated as an unweigthed average of the C content of the cyclic N-compounds where information was avaliable in Sutter, 2010, following the classification in Tab 2.25 in Sutter 2010: Difenoconazole (C19H17Cl2N3O3), Fenpropidin (C19H31N), Fenpropimorph (C20H33NO), Flusilazole (C16H15F2N3Si), Metconazole (C17H22ClN3O), Penconazole (C13H15Cl2N3), Propiconazole (C15H17Cl2N3O2), Tebuconazole (C16H22ClN3O)
- ammonium nitrate: 0 kg; pedigree (1,1,1,1,1)
  The exchange has been updated from 'ammonium nitrate, as N' into 'ammonium nitrate' and therefore its amount has been scaled (multiplied) from 0.0086 kg by 2.8573 kg of 'ammonium nitrate' per kg of 'ammonium nitrate, as N'. Original comment of the exchange is: Averaged from local datasets. See general comment.
  properties: dry mass 1 kg, wet mass 1 kg
- lime: 0.000724956 kg; lognormal variance with pedigree 0.0426, pedigree (2,1,5,5,1)
  Averaged from local datasets. See general comment.
  properties: wet mass 1 kg, dry mass 1 kg, carbon content, fossil 0.120005
- transport, tractor and trailer, agricultural: 0.00339741 metric ton*km; lognormal variance with pedigree 0.0426, pedigree (2,1,5,5,1)
  Averaged from local datasets. See general comment.
- tillage, cultivating, chiselling: 6.27952e-5 ha; lognormal variance with pedigree 0.0426, pedigree (2,1,5,5,1)
  Averaged from local datasets. See general comment.
- diphenylether-compound: 6.00498e-6 kg; lognormal variance with pedigree 0.0427, pedigree (2,2,5,5,1)
  Averaged from local datasets. See general comment.
  properties: carbon content, fossil 0.560061, dry mass 1 kg, wet mass 1 kg
  note on carbon content, fossil: C content of diphenylether-compounds was calculated after the C content of thepesticides aclonifen and diflufenican classified as diphenylether-compound in Tab 2.25 of Sutter 2010
- [sulfonyl]urea-compound: 3.32532e-5 kg; lognormal variance with pedigree 0.0427, pedigree (2,2,5,5,1)
  Averaged from local datasets. See general comment.
  properties: wet mass 1 kg, carbon content, fossil 0.540853, dry mass 1 kg
  note on carbon content, fossil: Approximated as an unweighted average of the C-content of the [sulfonyl]urea-compounds (Tab 2.25 Sutter, 2010) chlorotoluron, Diuron, Linuron and Isoproturon.
- inorganic phosphorus fertiliser, as P2O5: 9.30625e-7, 7.71054e-5, 4.94375e-6, 0.000100038, 1.10133e-6, 8.01035e-5, 2.1635e-6, 1.13927e-5, 0.000627208, 1.07686e-6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 kg (60 entries); lognormal variance with pedigree 0.0426, pedigree (2,1,5,5,1)
  Averaged from local datasets. See general comment.
- irrigation: 0.00406531, 6.90239e-6, 0.0363411, 0.000595534, 0.069836, 0.00134241, 0.000458806, 0.00123015, 0.00680755, 0.000268381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 m3 (13 entries); source Siebert, S. 2010; lognormal variance with pedigree 0.0447, pedigree (2,2,5,5,1)
  (same comment as for irrigation)
  properties: wet mass 1000 kg, water content 9089.91, dry mass 0.11 kg
- urea: 0.00398869, 0.00467098 kg (2 entries); lognormal variance with pedigree 0.0426, pedigree (2,1,5,5,1)
  (same comment as for urea)
- inorganic nitrogen fertiliser, as N: 7.35597e-7, 3.92009e-5, 4.91476e-6, 5.63459e-5, 1.42673e-6, 5.03601e-5, 6.60986e-6, 1.60013e-5, 0.000176907, 1.32165e-6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 kg (60 entries); lognormal variance with pedigree 0.0426, pedigree (2,1,5,5,1)
  Averaged from local datasets. See general comment.
- ammonium nitrate: 0.00560535, 0.0190286 kg (2 entries); lognormal variance with pedigree 0.0426, pedigree (2,1,5,5,1)
  (same comment as for ammonium nitrate)

## Inputs from nature
- Energy, gross calorific value, in biomass [natural resource, biotic]: 15.1004 MJ; lognormal variance with pedigree 0.161189, pedigree (2,1,5,1,5)
  Calculated as a weighted (by production volumes) average of the regional activities. The uncertainty is set up to be the same as in case of the regional activities, only the padigree matrix is adjusted from 2,1,1,1,1 to 2,1,1,1,5.
- Occupation, annual crop, non-irrigated, intensive [natural resource, land]: 1.73708 m2*year; lognormal variance with pedigree 0.0426, pedigree (2,1,5,5,1)
  Averaged from local datasets. See general comment.
- Carbon dioxide, in air [natural resource, in air]: 1.42677 kg; = 44/12 * (REF_PRODUCT_C_content_non_fossil * REF_PRODUCT * REF_PRODUCT_DM - SEED_C_content_non_fossil * SEED * SEED_DM); lognormal variance with pedigree 0.0426, pedigree (2,1,5,5,1)
  Averaged from local datasets. See general comment.
- Transformation, to annual crop, non-irrigated, intensive [natural resource, land]: 1.78567 m2; lognormal variance with pedigree 0.0526, pedigree (2,1,5,5,1)
  Averaged from local datasets. See general comment.
- Transformation, from annual crop, non-irrigated, intensive [natural resource, land]: 1.78567 m2; lognormal variance with pedigree 0.0526, pedigree (2,1,5,5,1)
  Averaged from local datasets. See general comment.

## Emissions to nature
- Cyprodinil [soil, agricultural]: 1.23112e-5 kg; lognormal variance with pedigree 0.0527, pedigree (2,2,5,5,1)
  Averaged from local datasets. See general comment.
- Metsulfuron-methyl [soil, agricultural]: 6.00434e-8 kg; lognormal variance with pedigree 0.0527, pedigree (2,2,5,5,1)
  Averaged from local datasets. See general comment.
- Zinc, ion [water, surface water]: 4.93065e-7 kg; lognormal variance with pedigree 0.1327, pedigree (2,2,5,5,1)
  Averaged from local datasets. See general comment.
- Trifloxystrobin [soil, agricultural]: 5.90374e-7 kg; lognormal variance with pedigree 0.0527, pedigree (2,2,5,5,1)
  Averaged from local datasets. See general comment.
- Lead [water, surface water]: 2.93252e-8 kg; lognormal variance with pedigree 0.1327, pedigree (2,2,5,5,1)
  Averaged from local datasets. See general comment.
- Diflufenican [soil, agricultural]: 4.97493e-6 kg; lognormal variance with pedigree 0.0527, pedigree (2,2,5,5,1)
  Averaged from local datasets. See general comment.
- Chlortoluron [soil, agricultural]: 6.20514e-6 kg; lognormal variance with pedigree 0.0527, pedigree (2,2,5,5,1)
  Averaged from local datasets. See general comment.
- Water [water, surface water]: 0.0206127 m3; name water_to_water_surface; lognormal variance with pedigree 0.1306, pedigree (4,3,5,5,4)
  Calculated value. See the parameters and their comments to understand the calculation.
  property fraction, origin: salt water 0; name fraction_origin_salt_water_Wsw
  property fraction, origin: fresh water 1; name fraction_origin_fresh_water_Wsw
- Cypermethrin [soil, agricultural]: 2.87279e-7 kg; lognormal variance with pedigree 0.0527, pedigree (2,2,5,5,1)
  Averaged from local datasets. See general comment.
- Phosphorus [water, surface water]: 2.43296e-5 kg; lognormal variance with pedigree 0.0827, pedigree (2,2,5,5,1)
  Averaged from local datasets. See general comment.
- Flufenacet [soil, agricultural]: 4.37378e-6 kg; lognormal variance with pedigree 0.0527, pedigree (2,2,5,5,1)
  Averaged from local datasets. See general comment.
- Diclofop [soil, agricultural]: 6.40513e-6 kg; lognormal variance with pedigree 0.0527, pedigree (2,2,5,5,1)
  Averaged from local datasets. See general comment.
- Lambda-cyhalothrin [soil, agricultural]: 5.02016e-7 kg; lognormal variance with pedigree 0.0527, pedigree (2,2,5,5,1)
  Averaged from local datasets. See general comment.
- Epoxiconazole [soil, agricultural]: 8.87697e-7 kg; lognormal variance with pedigree 0.0527, pedigree (2,2,5,5,1)
  Averaged from local datasets. See general comment.
- Fludioxonil [soil, agricultural]: 2.57403e-7 kg; lognormal variance with pedigree 0.0527, pedigree (2,2,5,5,1)
  Averaged from local datasets. See general comment.
- Florasulam [soil, agricultural]: 1.09344e-7 kg; lognormal variance with pedigree 0.0527, pedigree (2,2,5,5,1)
  Averaged from local datasets. See general comment.
- Fenoxaprop ethyl ester [soil, agricultural]: 5.33752e-7 kg; lognormal variance with pedigree 0.0527, pedigree (2,2,5,5,1)
  Averaged from local datasets. See general comment.
- Carbon dioxide, fossil [air, non-urban air or from high stacks]: 0.00696719 kg; lognormal variance with pedigree 0.0427, pedigree (2,2,5,5,1)
  Averaged from local datasets. See general comment.
- Chromium [soil, agricultural]: 2.09892e-6 kg; lognormal variance with pedigree 0.0827, pedigree (2,2,5,5,1)
  Averaged from local datasets. See general comment.
- Fenpropimorph [soil, agricultural]: 2.05932e-6 kg; lognormal variance with pedigree 0.0527, pedigree (2,2,5,5,1)
  Averaged from local datasets. See general comment.
- Ammonia [air, non-urban air or from high stacks]: 0.00127954 kg; lognormal variance with pedigree 0.0527, pedigree (2,2,5,5,1)
  Averaged from local datasets. See general comment.
- Flurtamone [soil, agricultural]: 4.55616e-6 kg; lognormal variance with pedigree 0.0527, pedigree (2,2,5,5,1)
  Averaged from local datasets. See general comment.
- Lead [soil, agricultural]: 1.62104e-7 kg; lognormal variance with pedigree 0.0827, pedigree (2,2,5,5,1)
  Averaged from local datasets. See general comment.
- Cyproconazole [soil, agricultural]: 1.57199e-7 kg; lognormal variance with pedigree 0.0527, pedigree (2,2,5,5,1)
  Averaged from local datasets. See general comment.
- Azoxystrobin [soil, agricultural]: 4.35284e-6 kg; lognormal variance with pedigree 0.0527, pedigree (2,2,5,5,1)
  Averaged from local datasets. See general comment.
- Kresoxim-methyl [soil, agricultural]: 3.9458e-8 kg; lognormal variance with pedigree 0.0527, pedigree (2,2,5,5,1)
  Averaged from local datasets. See general comment.
- Fluroxypyr [soil, agricultural]: 1.83859e-7 kg; lognormal variance with pedigree 0.0527, pedigree (2,2,5,5,1)
  Averaged from local datasets. See general comment.
- Anthraquinone [soil, agricultural]: 4.02192e-6 kg; lognormal variance with pedigree 0.0527, pedigree (2,2,5,5,1)
  Averaged from local datasets. See general comment.
- MCPA [soil, agricultural]: 1.38707e-5 kg; lognormal variance with pedigree 0.0527, pedigree (2,2,5,5,1)
  Averaged from local datasets. See general comment.
- Propiconazole [soil, agricultural]: 4.92622e-6 kg; lognormal variance with pedigree 0.0527, pedigree (2,2,5,5,1)
  Averaged from local datasets. See general comment.
- 2,4-D [soil, agricultural]: 1.29514e-5 kg; lognormal variance with pedigree 0.0527, pedigree (2,2,5,5,1)
  Averaged from local datasets. See general comment.
- Picoxystrobin [soil, agricultural]: 1.43065e-6 kg; lognormal variance with pedigree 0.0527, pedigree (2,2,5,5,1)
  Averaged from local datasets. See general comment.
- Bifenox [soil, agricultural]: 1.03009e-6 kg; lognormal variance with pedigree 0.0527, pedigree (2,2,5,5,1)
  Averaged from local datasets. See general comment.
- Nitrogen oxides [air, non-urban air or from high stacks]: 0.000114409 kg; = 0.21 * N2O; lognormal variance with pedigree 0.0727, pedigree (2,2,5,5,1)
  Averaged from local datasets. See general comment.
- Mefenpyr [soil, agricultural]: 1.06752e-6 kg; lognormal variance with pedigree 0.0527, pedigree (2,2,5,5,1)
  Averaged from local datasets. See general comment.
- Nickel, ion [water, surface water]: 3.45654e-7 kg; lognormal variance with pedigree 0.1327, pedigree (2,2,5,5,1)
  Averaged from local datasets. See general comment.
- Cadmium [soil, agricultural]: 1.16077e-6 kg; lognormal variance with pedigree 0.0827, pedigree (2,2,5,5,1)
  Averaged from local datasets. See general comment.
- Phosphate [water, surface water]: 3.65892e-5 kg; lognormal variance with pedigree 0.0827, pedigree (2,2,5,5,1)
  Averaged from local datasets. See general comment.
- Copper, ion [water, surface water]: 3.96455e-7 kg; lognormal variance with pedigree 0.1327, pedigree (2,2,5,5,1)
  Averaged from local datasets. See general comment.
- Tribenuron-methyl [soil, agricultural]: 2.35473e-7 kg; lognormal variance with pedigree 0.0527, pedigree (2,2,5,5,1)
  Averaged from local datasets. See general comment.
- Chromium, ion [water, surface water]: 5.55557e-7 kg; lognormal variance with pedigree 0.1327, pedigree (2,2,5,5,1)
  Averaged from local datasets. See general comment.
- Zinc [soil, agricultural]: -1.27726e-6 kg
  Averaged from local datasets. See general comment.
- Mepiquat chloride [soil, agricultural]: 4.21457e-6 kg; lognormal variance with pedigree 0.0527, pedigree (2,2,5,5,1)
  Averaged from local datasets. See general comment.
- Fenoxaprop-P ethyl ester [soil, agricultural]: 2.98772e-7 kg; lognormal variance with pedigree 0.0527, pedigree (2,2,5,5,1)
  Averaged from local datasets. See general comment.
- Lead [water, ground-]: 6.27295e-9 kg; lognormal variance with pedigree 0.1327, pedigree (2,2,5,5,1)
  Averaged from local datasets. See general comment.
- Clopyralid [soil, agricultural]: 9.19314e-8 kg; lognormal variance with pedigree 0.0527, pedigree (2,2,5,5,1)
  Averaged from local datasets. See general comment.
- Bromoxynil [soil, agricultural]: 2.58553e-6 kg; lognormal variance with pedigree 0.0527, pedigree (2,2,5,5,1)
  Averaged from local datasets. See general comment.
- Carfentrazone-ethyl [soil, agricultural]: 4.02192e-8 kg; lognormal variance with pedigree 0.0527, pedigree (2,2,5,5,1)
  Averaged from local datasets. See general comment.
- Imidacloprid [soil, agricultural]: 2.02704e-6 kg; lognormal variance with pedigree 0.0527, pedigree (2,2,5,5,1)
  Averaged from local datasets. See general comment.
- Copper [soil, agricultural]: -2.24303e-6 kg
  Averaged from local datasets. See general comment.
- Copper, ion [water, ground-]: 4.94009e-7 kg; lognormal variance with pedigree 0.1327, pedigree (2,2,5,5,1)
  Averaged from local datasets. See general comment.
- Isoproturon [soil, agricultural]: 2.69879e-5 kg; lognormal variance with pedigree 0.0527, pedigree (2,2,5,5,1)
  Averaged from local datasets. See general comment.
- Cadmium, ion [water, ground-]: 8.04234e-9 kg; lognormal variance with pedigree 0.1327, pedigree (2,2,5,5,1)
  Averaged from local datasets. See general comment.
- Fenpropidin [soil, agricultural]: 1.31213e-5 kg; lognormal variance with pedigree 0.0527, pedigree (2,2,5,5,1)
  Averaged from local datasets. See general comment.
- Nitrate [water, ground-]: 0.0370724 kg; lognormal variance with pedigree 0.0827, pedigree (2,2,5,5,1)
  Averaged from local datasets. See general comment.
- Chromium, ion [water, ground-]: 3.40419e-6 kg; lognormal variance with pedigree 0.1327, pedigree (2,2,5,5,1)
  Averaged from local datasets. See general comment.
- Cadmium, ion [water, surface water]: 5.54152e-9 kg; lognormal variance with pedigree 0.1327, pedigree (2,2,5,5,1)
  Averaged from local datasets. See general comment.
- Phosphate [water, ground-]: 3.72634e-5 kg; lognormal variance with pedigree 0.0827, pedigree (2,2,5,5,1)
  Averaged from local datasets. See general comment.
- Dinitrogen monoxide [air, non-urban air or from high stacks]: 0.000544807 kg; name N2O; lognormal variance with pedigree 0.0727, pedigree (2,2,5,5,1)
  Averaged from local datasets. See general comment.
- Chlormequat [soil, agricultural]: 1.0342e-7 kg; lognormal variance with pedigree 0.0527, pedigree (2,2,5,5,1)
  Averaged from local datasets. See general comment.
- Pyraclostrobin (prop) [soil, agricultural]: 5.02439e-7 kg; lognormal variance with pedigree 0.0527, pedigree (2,2,5,5,1)
  Averaged from local datasets. See general comment.
- Water [water, ground-]: 0.0824509 m3; name water_to_water_ground; lognormal variance with pedigree 0.1306, pedigree (4,3,5,5,4)
  Calculated value. See the parameters and their comments to understand the calculation.
  property fraction, origin: unspecified 0; name fraction_origin_unspecified_Wgw
  property fraction, origin: fresh water 1; name fraction_origin_fresh_water_Wgw
  property fraction, origin: salt water 0; name fraction_origin_salt_water_Wgw
- Zinc, ion [water, ground-]: 2.27837e-6 kg; lognormal variance with pedigree 0.1327, pedigree (2,2,5,5,1)
  Averaged from local datasets. See general comment.
- Nickel [soil, agricultural]: 9.98064e-7 kg; lognormal variance with pedigree 0.0827, pedigree (2,2,5,5,1)
  Averaged from local datasets. See general comment.
- Ethephon [soil, agricultural]: 1.10707e-5 kg; lognormal variance with pedigree 0.0527, pedigree (2,2,5,5,1)
  Averaged from local datasets. See general comment.
- Deltamethrin [soil, agricultural]: 6.46382e-8 kg; lognormal variance with pedigree 0.0527, pedigree (2,2,5,5,1)
  Averaged from local datasets. See general comment.
- Metaldehyde [soil, agricultural]: 1.37895e-5 kg; lognormal variance with pedigree 0.0527, pedigree (2,2,5,5,1)
  Averaged from local datasets. See general comment.
- Trinexapac-ethyl [soil, agricultural]: 8.2409e-6 kg; lognormal variance with pedigree 0.0527, pedigree (2,2,5,5,1)
  Averaged from local datasets. See general comment.
- Bitertanol [soil, agricultural]: 4.34352e-7 kg; lognormal variance with pedigree 0.0527, pedigree (2,2,5,5,1)
  Averaged from local datasets. See general comment.
- Mefenpyr-diethyl [soil, agricultural]: 5.9756e-7 kg; lognormal variance with pedigree 0.0527, pedigree (2,2,5,5,1)
  Averaged from local datasets. See general comment.
- Ioxynil [soil, agricultural]: 1.55132e-6 kg; lognormal variance with pedigree 0.0527, pedigree (2,2,5,5,1)
  Averaged from local datasets. See general comment.
- Flusilazole [soil, agricultural]: 4.97701e-7 kg; lognormal variance with pedigree 0.0527, pedigree (2,2,5,5,1)
  Averaged from local datasets. See general comment.
- Water [air, unspecified]: 0.166056 m3; name water_to_air_unspecified; lognormal variance with pedigree 0.0827, pedigree (2,2,5,5,1)
  Calculated value based on literature values and expert opinion. See comments in the parametres' comment field.
  property fraction, origin: fresh water 1; name fraction_origin_fresh_water
  property fraction, origin: salt water 0; name fraction_origin_salt_water
  property fraction, origin: unspecified 0; name fraction_origin_unspecified
- Tralkoxydim [soil, agricultural]: 1.02041e-5 kg; lognormal variance with pedigree 0.0527, pedigree (2,2,5,5,1)
  Averaged from local datasets. See general comment.
- Tebuconazole [soil, agricultural]: 9.07817e-7 kg; lognormal variance with pedigree 0.0527, pedigree (2,2,5,5,1)
  Averaged from local datasets. See general comment.
- Diclofop-methyl [soil, agricultural]: 6.44945e-6 kg; lognormal variance with pedigree 0.0527, pedigree (2,2,5,5,1)
  Averaged from local datasets. See general comment.

## Review by Hans-Jörg Althaus 2007-11-07
passed
