# furnace production, wood chips, hardwood storage area, 1000kW

Dataset: EcoSpold 2, unit process
Geography: RoW
Time period: 2000-01-01 to 2021-12-31
Technology level: current
Classification: ISIC rev.4 ecoinvent: 2815:Manufacture of ovens, furnaces and furnace burners
Classification: EcoSpold01Categories: wood energy/heating systems
Tags: ConvertedDataset
Scenario: Business-as-Usual
System model: Allocation, cut-off by classification
Generated by: Christian Bauer
Published in: Bauer, C. 2007
Database: ecoinvent
isCopyrightProtected: true
accessRestrictedTo: 1

## General comment
Assumed lifetime: furnace 20 years; chimney 80 years; storage silo, automatic fuel supply, automatic control technique 20 years. Operation time 2100 h/a.
[This dataset was already contained in the ecoinvent database version 2. It was not individually updated during the transfer to ecoinvent version 3. Life Cycle Impact Assessment results may still have changed, as they are affected by changes in the supply chain, i.e. in other datasets. This dataset was generated following the ecoinvent quality guidelines for version 2. It may have been subject to central changes described in the ecoinvent version 3 change report (http://www.ecoinvent.org/database/ecoinvent-version-3/reports-of-changes/), and the results of the central updates were reviewed extensively. The changes added e.g. consistent water flows and other information throughout the database. The documentation of this dataset can be found in the ecoinvent reports of version 2, which are still available via the ecoinvent website. The change report linked above covers all central changes that were made during the conversion process.]

## Included activities end
Includes the most important materials used for the fabrication of the furnace, the chimney, the storage silo, the automatic fuel supply and the automatic control technique: steel, concrete, rock wool, aluminum, cast iron, plastics, lubricating oil. Also includes the surface for furnace and wood chip storage, transports and energy used for the construction and the disposal of the furnace.

## Geography
Could be used for central European conditions.

## Technology
Boiler of average technology available on market.

## Time period
Some data used to calculate averages are from the second half of the 1990´s.

## Reference product
- furnace, wood chips, hardwood storage area, 1000kW: 1 unit; CPC 43420: Industrial or laboratory furnaces and ovens, except non-electric bakery ovens; other industrial or laboratory […]; By-product classification allocatable product
  EcoSpold01Location=CH
  production volume 3.96633 unit
    This is a placeholder value that does not reflect real-world production volumes. This dataset does not currently require a real-world production volume to work in the database framework, and no actual data were collected yet. This has no negative effect on the results of the ecoinvent database.
  property price 54131 EUR2005
    UNDATA "Industrial furnace, oven, incinerator non-electric ne" (http://data.un.org/Data.aspx?q=industrial+furnace&d=ComTrade&f=_l1Code%3a84%3bcmdCode%3a841780; EU I/E average price is 6.133EUR/kg). The prices are per kg and converted to per unit by summed weight of material concumption of the process in existing ecoinvent documentation from ecoinvent v.2.2 (about 6540kg). For weight of concrete, it is separately added for from price per m3 used of each unit (58.2 m3; 'furnace production, wood chips, hardwood storage area, 1000kW') and apply EU&DK input output database 2003 (0.08 Euro2003/kg DS; density 2380 kg/m3<#concrete production, normal' in ecoinvent).

## Inputs from technosphere
- copper, cathode: 60 kg; lognormal variance with pedigree 0.082, pedigree (1,1,5,5,1)
  own assumption
  EcoSpold01Location=RER
  properties: dry mass 1 kg, wet mass 1 kg
- sheet rolling, steel: 27.5 kg; lognormal variance with pedigree 0.162, pedigree (1,1,5,5,1)
  own assumption
  EcoSpold01Location=RER
- cast iron: 126 kg; lognormal variance with pedigree 0.082, pedigree (1,1,5,5,1)
  own assumption
  EcoSpold01Location=RER
  properties: wet mass 1 kg, dry mass 1 kg, carbon content, fossil 0.04
  note on carbon content, fossil: Cast iron is made by remelting pig iron in small furnaces (e.g. cupola furnaces or electric arc furnaces) and poured into moulds to make castings. It usually contains 2% to 6% carbon (ecoinvent v2.2 report 10_partII). An average content of 4% was considered
- polyethylene, high density, granulate: 12.7 kg; lognormal variance with pedigree 0.082, pedigree (1,1,5,5,1)
  EcoSpold01Location=RER
  own assumption
  properties: carbon content, fossil 0.857143, dry mass 1 kg, wet mass 1 kg, heating value, net 42.47 MJ
  note on carbon content, fossil: Polyethylene is formed out of a huge amount of ethylene monomers (C2H4) (ecoinvent v2.2 report 11_II). MW=28 g/mol
- lubricating oil: 6 kg; lognormal variance with pedigree 0.082, pedigree (1,1,5,5,1)
  own assumption
  EcoSpold01Location=RER
  properties: heating value, net 40.2 MJ, carbon content, fossil 0.75, dry mass 1 kg, wet mass 1 kg
  note on heating value, net: Literature value, Source: IPCC 2006, 2006 IPCC Guidelines for National Greenhouse Gas Inventories, Prepared by the National Greenhouse Gas Inventories Programme, Eggleston H.S., Buendia L., Miwa K., Ngara T. and Tanabe K. (eds). Published: IGES, Japan
  note on carbon content, fossil: Lubricating oil is produced from diesel. C-content/dry mass of fats and oils considered 75%, from: ecoinvent v2.2 report, n 15a, pg 40
- waste mineral wool, for final disposal: 0 kg; pedigree (1,1,1,1,1)
  EcoSpold01Location=CH
  own assumption
  production volume 0 kg
    Calculated from the production volume of furnace, wood chips, hardwood storage area, 1000kW in proportion to the respective output amounts.
  properties: dry mass 1 kg, wet mass 1 kg
- concrete, normal: 0 m3; pedigree (1,1,1,1,1)
  EcoSpold01Location=CH
  own assumption
  properties: wet mass 2380 kg, dry mass 2190 kg, water content 0.086758
- steel, low-alloyed, hot rolled: 6220 kg; lognormal variance with pedigree 0.082, pedigree (1,1,5,5,1)
  EcoSpold01Location=RER
  own assumption
  properties: wet mass 1 kg, carbon content, fossil 0.005, dry mass 1 kg
  note on carbon content, fossil: Low alloyed steel composition given in Tab. 3.2 ecoinvent v2.2 report 10_partII. Steel assumed to have a C content of 0.5%
- drawing of pipe, steel: 27.5 kg; lognormal variance with pedigree 0.162, pedigree (1,1,5,5,1)
  EcoSpold01Location=RER
  own assumption
- waste polyethylene: 0 kg; pedigree (1,1,1,1,1)
  own assumption
  EcoSpold01Location=CH
  production volume 0 kg
    (same comment as for waste mineral wool, for final disposal)
  properties: water content 0.00401606, carbon content, fossil 0.825301, wet mass 1 kg, dry mass 0.996 kg, heating value, net 42.47 MJ
  note on carbon content, fossil: C content in 1 kg DM was calculated using data in Tab A.1, ecoinvent v2.2 report 13_I
  note on heating value, net: Value taken from the general comment of the treatment dataset.
- electricity, low voltage: 0 kWh; pedigree (1,1,1,1,1)
  own assumption
  EcoSpold01Location=CH
- stone wool: 55 kg; lognormal variance with pedigree 0.082, pedigree (1,1,5,5,1)
  own assumption
  EcoSpold01Location=CH
  properties: carbon content, fossil 0.015401, wet mass 1 kg, dry mass 1 kg
  note on carbon content, fossil: The chemical composition of the glass fibres used in the rock wool production is similar to the composition of naturally cooled volcano basalt and has a composition listed in Tab. 3.1 and 3.2 in ecoinvent v2.2 report 16, part XIV. Rock wool contains: a minimum of 96% mineral fibres,between 0.5 and 3.0 weight percent of phenolic resin depending on the specific product characteristics, and about 0.2 percent mineral oil (ecoinvent v2.2 report 16, part XIV). An average composition of 1.8% phenolic resin, 0.2% mineral oil, and 98% mineral fibres has been assumed and used to calculate C content of the rock wool
- heat, central or small-scale, other than natural gas: 0 MJ; pedigree (1,1,1,1,1)
  EcoSpold01Location=CH
  own assumption
  properties: heating value, net 1 MJ
- aluminium, wrought alloy: 1.86 kg; lognormal variance with pedigree 0.082, pedigree (1,1,5,5,1)
  own assumption
  EcoSpold01Location=RER
  properties: wet mass 1 kg, dry mass 1 kg
- waste concrete: 0 kg; pedigree (1,1,1,1,1)
  own assumption
  EcoSpold01Location=CH
  production volume 0 kg
    (same comment as for waste mineral wool, for final disposal)
  properties: dry mass 0.5 kg, wet mass 1 kg, water content 1
- waste mineral oil: 0 kg; pedigree (1,1,1,1,1)
  EcoSpold01Location=CH
  own assumption
  production volume 0 kg
    (same comment as for waste mineral wool, for final disposal)
  properties: wet mass 1 kg, heating value, net 34.7 MJ, carbon content, fossil 0.864444, water content 0.111111, dry mass 0.9 kg
  note on carbon content, fossil: Tab A.6, ecoinvent v2.2 report 13_I. C content has been calculated after data in the tables, and then referred to 1 kg DM
- waste mineral wool, for final disposal: -2679.23, -3540.77 kg (2 entries); lognormal variance with pedigree 0.082, pedigree (1,1,5,5,1)
  EcoSpold01Location=CH
  own assumption
  production volume 18660 kg
- concrete, normal: 1.31631, 0.137158, 1.11039, 0.624596, 2.64499, 0.0892138, 52.2773 m3 (7 entries); lognormal variance with pedigree 0.082, pedigree (1,1,5,5,1)
  EcoSpold01Location=CH
  own assumption
- waste polyethylene: -1.41277, -0.094396, -0.00713901, -0.0389889, -0.0157511, -0.0370236, -1.20375, -9.89018 kg (8 entries); lognormal variance with pedigree 0.082, pedigree (1,1,5,5,1)
  own assumption
  EcoSpold01Location=CH
  production volume 38.1 kg
- electricity, low voltage: 37.1654, 6.7671, 152.759, 533.706, 108.959, 1672.86, 270.64, 777.139 kWh (8 entries); lognormal variance with pedigree 0.082, pedigree (1,1,5,5,1)
  own assumption
  EcoSpold01Location=CH
- heat, central or small-scale, other than natural gas: 78.5803, 5721.42 MJ (2 entries); lognormal variance with pedigree 0.082, pedigree (1,1,5,5,1)
  EcoSpold01Location=CH
  own assumption
- waste concrete: -8748.04, -119252 kg (2 entries); lognormal variance with pedigree 0.082, pedigree (1,1,5,5,1)
  own assumption
  EcoSpold01Location=CH
  production volume 384000 kg
- waste mineral oil: -1.65822, -4.34178 kg (2 entries); lognormal variance with pedigree 0.082, pedigree (1,1,5,5,1)
  EcoSpold01Location=CH
  own assumption
  production volume 18 kg

## Inputs from nature
- Transformation, from unspecified [natural resource, land]: 102 m2; lognormal variance with pedigree 0.188, pedigree (4,5,5,5,1)
  Basic uncertainty:2
- Occupation, industrial area [natural resource, land]: 2040 m2*year; lognormal variance with pedigree 0.188, pedigree (4,5,5,5,1)
  Basic uncertainty:2
- Transformation, to industrial area [natural resource, land]: 102 m2; lognormal variance with pedigree 0.188, pedigree (4,5,5,5,1)
  Basic uncertainty:2

## Sampling procedure
literature, personal communication

## Extrapolations
none This dataset has been copied from an original dataset covering the geography CH. The uncertainty has been adjusted accordingly.

## Review by Christian Bauer 2003-07-25
self-validation
