# clear-cutting, primary forest to arable land, annual crop

Dataset: EcoSpold 2, unit process
Geography: TH
Time period: 2010-01-01 to 2021-12-31
Technology level: current
Classification: ISIC rev.4 ecoinvent: 0161:Support activities for crop production
Tags: WFLDB
Scenario: Business-as-Usual
System model: Allocation, cut-off by classification
Generated by: Vincent Rossi
Database: ecoinvent
isCopyrightProtected: true
accessRestrictedTo: 1

## General comment
This dataset represents the interventions associated with the clear-cutting of primary forest for the provision of arable land tenure. NPP (net primary productivity of a given land, in kg C / m2 and year) and VEG (above-ground biomass, below-ground biomass and dead organic matter) values are parameterized.
NPP values are reported by Haberl et al. (2007)
VEG values have the following sources:
- Forests: Global Forest Resources Assessment 2010: http://www.fao.org/forestry/fra/fra2010/en/
- Grassland: IPCC 2006 Guidelines, Volume 6, Table 6.4. All values in tonne C/ha, converted to carbon based on 47% carbon content of dry matter biomass (see for example section 6.2.1.4 of IPCC 2006).
- Crops: Cveg croplands, based on Table 11 of the European Commission decision.* All values in tonne C/ha.
* C(2010) 3751: COMMISSION DECISION of 10 June 2010 on guidelines for the calculation of land carbon stocks for the purpose of Annex V to Directive 2009/28/EC, Official Journal of the European Union, L 151/19. Exceptions based on the Table 12 of the EC decision: Coconuts, Jatropha, Jojoba Seeds, Oil palm fruit, Sugar cane
Distinction is made between primary and secondary forests. The respective land area of each type forest is known from FAOSTAT data. Based on empirical values, it is considered that the secondary VEG is 74% of the primary VEG. The same ratio is applied as the weighted average between primary and secondary forest is always equal to the GFRA 2010 value.

## Included activities start
This activity starts with the natural state of primary forest.

## Included activities end
The dataset includes the carbon stored in Above-Ground Biomass (AGB), Below-Ground Biomass (BGB) and Dead Organic Matter (DOM) pools. It includes the fluxes from these carbon pools in terms of CO2 and other trace gases caused by the burning of biomass. It also includes a rough estimation for the machine use required for the clear-cutting with European forestry data and the associated occupation impact.
The loss/gain of Soil Organic Carbon (SOC) usually associated with a land tranformation is accounted for in the downstream activity using the arable land tenure, given that it depends on the subsequent land use practice.
This activity ends with the provision of arable land tenure, measured in unit kg carbon Potential Net Primary Production (NPP0).

## Parameters
- NPP0, net primary productivity: 1.022 dimensionless; name NPP; lognormal variance with pedigree 0.022825, pedigree (2,5,2,2,3)
- Above and below ground biomass: 5.79 dimensionless; name VEG; lognormal variance with pedigree 0.017425, pedigree (2,5,2,2,3)
- LUC_crop_specific: 1 dimensionless
  This parameter allows to switch between a 'crop specific' and a 'country specific' approach when calculating the LUC of a crop. By default, the chosen approach is 'crop specific', so the value of the parameter is 1. If you want to apply a 'country specific' approach, turn the parameter to 0.

## Reference product
- land tenure, arable land, measured as carbon net primary productivity, annual crop: 1 kg; CPC 7: Financial and related services; real estate services; and rental and leasing services; By-product classification allocatable product
  Yield = 1.0 kg/haLand that is made available for the cultivation of annual crops, expressed in kg carbon net pripary productivity
  production volume 1.46885e7 kg
    This production volume has been estimated by decoupling the different land tenures contributing to the annual land use change (for annual crops and paddy rice), per country, and multiplying by the national annual land use change production volumes for annual crops and paddy rice, respectively. Land use change production volume is estimated based in FAO statistic and following the concept of Total Biomass Appropriation (TBA), developped by Krausmann et al., 2008. The ha of land devoted to annual crops per country is multiplied by the share of TBA of the country, in order to weight the relative land use change of the country, in a Global context. The shares of TBA are calculated in relation to the total sum of TBA of the World. The same is done to estimate land use change associated to paddy rice. Additional source: Nemecek T., Bengoa X., Lansche J., Mouron P., Riedener E., Rossi V. & Humbert S. (2015) Methodological Guidelines for the Life Cycle Inventory of Agricultural Products. Version 3.0, July 2015. World Food LCA Database (WFLDB). Quantis and Agroscope, Lausanne and Zurich, Switzerland.
  property carbon content, non-fossil 1
    The flow is expressed in kg carbon Potential Net Primary Production (NPP0)
  property carbon content 1
    carbon content on a dry matter basis (reserved; not for manual entry)
  properties: dry mass 1 kg, water content 0, wet mass 1 kg, price 0 EUR2005, water in wet mass 0 kg, carbon allocation 1 kg

## Inputs from technosphere
- power sawing, without catalytic converter: 0.0037196 hour; = 0.238*VEG/NPP*0.72/0.45/580
  Calculated Value: 0.238 (hours/m3) * VEG / NPP * 0.72 (fraction of VEG not burned) / 0.45 (ratio C to biomass) / 580 (kg/m3)
- diesel, burned in building machine: 1.5837 MJ; = 72.96*VEG/NPP/0.45/580
  Calculated Value: 72.96 (MJ/m3) * VEG / NPP / 0.45 (ratio C to biomass) / 580 (kg/m3).
  properties: heating value, net 1 MJ

## Inputs from nature
- Transformation, to arable land, unspecified use [natural resource, land]: 0.978474 m2; = 1/NPP
  Corresponds to the reference flow.
- Energy, gross calorific value, in biomass, primary forest [natural resource, biotic]: 226.614 MJ; = VEG/NPP*40
  Calculated Value: considering 15 MJ/kg (17% moisture wet basis) and 45% C in dry wood, 40 MJ/kg C in wood. 15 MJ is taken to reflect UHV rather than LHV.
- Occupation, construction site [natural resource, land]: 6.7406e-6 m2*year; = 0.0124/1800*1/NPP
  Calculated Value: VEG / NPP / 0.45 (ratio C to biomass) * 0.2 (fraction burned) * EmissionFactor
  The share of VEG that is burned is multiplied with the emission factor.
- Carbon, organic, in soil or biomass stock [natural resource, in ground]: 5.66536 kg; = VEG/NPP
  Calculated value: above and below ground biomass, in kg C per reference flow.
- Transformation, from forest, primary (non-use) [natural resource, land]: 0.978474 m2; = 1/NPP
  Corresponds to the reference flow.

## Emissions to nature
- Acetic acid [air, non-urban air or from high stacks]: 0.00528767 kg; = VEG/NPP/0.45*0.2*0.0021
  (same comment as for Occupation, construction site)
- Xylene [air, non-urban air or from high stacks]: 0.000151076 kg; = VEG/NPP/0.45*0.2*6E-05
  (same comment as for Occupation, construction site)
- Isoprene [air, non-urban air or from high stacks]: 4.0287e-5 kg; = VEG/NPP/0.45*0.2*1.6E-05
  (same comment as for Occupation, construction site)
- Terpenes [air, non-urban air or from high stacks]: 0.000377691 kg; = VEG/NPP/0.45*0.2*0.00015
  (same comment as for Occupation, construction site)
- PAH, polycyclic aromatic hydrocarbons [air, non-urban air or from high stacks]: 6.29485e-5 kg; = VEG/NPP/0.45*0.2*2.5E-05
  (same comment as for Occupation, construction site)
- Formaldehyde [air, non-urban air or from high stacks]: 0.00352511 kg; = VEG/NPP/0.45*0.2*0.0014
  (same comment as for Occupation, construction site)
- Carbon monoxide, from soil or biomass stock [air, non-urban air or from high stacks]: 0.261866 kg; = VEG/NPP/0.45*0.2*0.104
  (same comment as for Occupation, construction site)
- Formic acid [air, non-urban air or from high stacks]: 0.00276973 kg; = VEG/NPP/0.45*0.2*0.0011
  (same comment as for Occupation, construction site)
- Acetonitrile [air, non-urban air or from high stacks]: 0.000453229 kg; = VEG/NPP/0.45*0.2*0.00018
  (same comment as for Occupation, construction site)
- Benzene [air, non-urban air or from high stacks]: 0.00100718 kg; = VEG/NPP/0.45*0.2*0.0004
  (same comment as for Occupation, construction site)
- Ethyne [air, non-urban air or from high stacks]: 0.000100718 kg; = VEG/NPP/0.45*0.2*4E-05
  (same comment as for Occupation, construction site)
- Ethane [air, non-urban air or from high stacks]: 0.00302153 kg; = VEG/NPP/0.45*0.2*0.0012
  (same comment as for Occupation, construction site)
- Nitrogen oxides [air, non-urban air or from high stacks]: 0.0040287 kg; = VEG/NPP/0.45*0.2*0.0016; source EEA 2013
  (same comment as for Occupation, construction site)
- Sulfur dioxide [air, non-urban air or from high stacks]: 0.00143523 kg; = VEG/NPP/0.45*0.2*0.00057
  (same comment as for Occupation, construction site)
- Phenol [air, non-urban air or from high stacks]: 1.51076e-5 kg; = VEG/NPP/0.45*0.2*6E-06
  (same comment as for Occupation, construction site)
- Furan [air, non-urban air or from high stacks]: 0.0120861 kg; = VEG/NPP/0.45*0.2*0.0048
  (same comment as for Occupation, construction site)
- Propane [air, non-urban air or from high stacks]: 0.000377691 kg; = VEG/NPP/0.45*0.2*0.00015
  (same comment as for Occupation, construction site)
- Ammonia [air, non-urban air or from high stacks]: 0.00327332 kg; = VEG/NPP/0.45*0.2*0.0013; source EEA 2013
  (same comment as for Occupation, construction site)
- Particulates, < 2.5 um [air, non-urban air or from high stacks]: 0.0229132 kg; = VEG/NPP/0.45*0.2*0.0091
  (same comment as for Occupation, construction site)
- Benzene, ethyl- [air, non-urban air or from high stacks]: 6.04305e-5 kg; = VEG/NPP/0.45*0.2*2.4E-05
  (same comment as for Occupation, construction site)
- Ethene [air, non-urban air or from high stacks]: 0.00490998 kg; = VEG/NPP/0.45*0.2*0.00195
  (same comment as for Occupation, construction site)
- Acetone [air, non-urban air or from high stacks]: 0.00156112 kg; = VEG/NPP/0.45*0.2*0.00062
  (same comment as for Occupation, construction site)
- Carbon dioxide, from soil or biomass stock [air, non-urban air or from high stacks]: 19.8917 kg; = VEG/NPP/0.45*1.58
  Calculated Value: The entire biomass (either burned or degraded) is multiplied with the emission factor. No wood from clear-cutting is considered harvested.
- Methane, from soil or biomass stock [air, non-urban air or from high stacks]: 0.017122 kg; = VEG/NPP/0.45*0.2*0.0068
  (same comment as for Occupation, construction site)
- Acetaldehyde [air, non-urban air or from high stacks]: 0.00163666 kg; = VEG/NPP/0.45*0.2*0.00065
  (same comment as for Occupation, construction site)
- Particulates, > 2.5 um, and < 10um [air, non-urban air or from high stacks]: 0.0208989 kg; = VEG/NPP/0.45*0.2*0.0083
  (same comment as for Occupation, construction site)
- Dinitrogen monoxide [air, non-urban air or from high stacks]: 0.000503588 kg; = VEG/NPP/0.45*0.2*0.0002
  (same comment as for Occupation, construction site)
- Ethanol [air, non-urban air or from high stacks]: 4.53229e-5 kg; = VEG/NPP/0.45*0.2*1.8E-05
  (same comment as for Occupation, construction site)
- Propene [air, non-urban air or from high stacks]: 0.00138487 kg; = VEG/NPP/0.45*0.2*0.00055
  (same comment as for Occupation, construction site)
- Cyanide [air, non-urban air or from high stacks]: 0.00856099 kg; = VEG/NPP/0.45*0.2*0.0034
  (same comment as for Occupation, construction site)
- Toluene [air, non-urban air or from high stacks]: 0.000629485 kg; = VEG/NPP/0.45*0.2*0.00025
  (same comment as for Occupation, construction site)
- Methanol [air, non-urban air or from high stacks]: 0.00503588 kg; = VEG/NPP/0.45*0.2*0.002
  (same comment as for Occupation, construction site)

## Sampling procedure
Literature data
The reference product of the clear-cutting activitiy is Potential Net Primary Production (NPP) measured in unit of kg carbon.

## Extrapolations
This dataset has been extrapolated from year 2015 to the year of the calculation (2021). The uncertainty has been adjusted accordingly.
