# furnace production, pellets, with silo, 300kW

Dataset: EcoSpold 2, unit process
Geography: CH
Time period: 2010-01-01 to 2021-12-31
Technology level: modern
Classification: ISIC rev.4 ecoinvent: 2815:Manufacture of ovens, furnaces and furnace burners
Classification: EcoSpold01Categories: wood energy/heating systems
Synonyms: wood pellets boiler production; wood fired boiler production
Tags: biomass power
Scenario: Business-as-Usual
System model: Allocation, cut-off by classification
Generated by: Marco Mina
Database: ecoinvent
isCopyrightProtected: true
accessRestrictedTo: 1

## General comment
This dataset represent the production and the disposal of a wood-pellets burning furnace for local heating networks, with a storage silo. Its assumed lifetime is 20 years.

## Included activities start
From reception of furnace components at the factory gate

## Included activities end
This activity ends with the disposal of the device in the end of its lifetime. The dataset includes the most important materials used for the fabrication of the furnace, the pellets storage silo, the automatic screw conveyor system and chimney flue pipes: steel, steel alloys, aluminium, concrete, rock wool, plastics, electronic components, polystyrene, lubricating oil, paint. The dataset includes the concrete basement for the furnace room (around 13m2), the energy and heat for the construction and the disposal of the device. It is assumed to build the pellet storage silo (dimensions: 6x6x3.5m) in a separate space next to the existing furnace room.

## Geography
Could be used for Central European conditions

## Technology
Boiler of modern technology available on European and Swiss market, with combustion chamber in refractory bricks, designed for an optimal combustion process (cyclone integrated). The model of reference is a pellet boiler, mod.KWB Powerfire 300 kW. Represent the typical boiler for providing heat for local heating networks, commercial premises and multi-storey housing.
Source of image: http://www.kwb.at/at/index.php?option=com_content&task=view&id=194&Itemid=170

## Time period
This model of furnace is commercialized since 2010 in Europe and Switzerland and is still available on the market (end 2011)

## Reference product
- furnace, pellets, with silo, 300kW: 1 unit; name RP_amount_1; By-product classification allocatable product; CPC 43420: Industrial or laboratory furnaces and ovens, except non-electric bakery ovens; other industrial or laboratory […]
  production volume 33 unit; name RP_PV_1
    Extrapolated from the annual installed devices in Switzerland (pellet furnace 50-300 kW in Holzenergie Statistik, Basler und Hoffmann, 2010)
  property lifetime capacity [kWh] 5.256e7 kWh; name lifetime_capacity_kWh; = (lifetime*8760)*capacity_MW*1000
    calculated value
  property price 22188 EUR2005
    Calculated by 2.0 -Assumed same price as for wood chips furnace. Prices from UNDATA "Industrial furnace, oven, incinerator non-electric ne" (http://data.un.org/Data.aspx?q=industrial+furnace&d=ComTrade&f=_l1Code%3a84%3bcmdCode%3a841780). The prices are per kg and converted to per unit by summed weight of material concumption of the process in existing ecoinvent documentation from ecoinvent v.2.2. For weight of concrete, it is separately added for from price per m3 used of each unit and apply EU&DK input output database 2003 (0.08 Euro2003/kg DS of concrete => 176 Euro2003/m3 concrete).
  property lifetime 20 year; name lifetime
  property capacity [MW] 0.3 MW; name capacity_MW

## Inputs from technosphere
- electronics, for control units: 4 kg; source KWB 2011; lognormal variance with pedigree 0.0432, pedigree (4,5,4,5,1)
  estimation
  properties: dry mass 1 kg, carbon content, non-fossil 0.00013442, wet mass 1 kg, carbon content, fossil 0.337146
  note on carbon content, non-fossil: The control unit has a composition of 46% steel (housing), 32% plastics, 14% printed wiring boards and 8% cables (various types).;
- electricity, low voltage: 1330 kWh; source KWB 2011; lognormal variance with pedigree 0.1344, pedigree (3,5,5,5,1)
  Estimation - data derives from comparison between old dataset value, energy required for steel manufacturing (similar weight device) and suggestions from KWB technician
- scrap copper: -4.5 kg; name BP_amount_2; lognormal variance with pedigree 0.0186, pedigree (1,5,4,5,1)
  disposal for copper
  production volume 148.5 kg; = RP_PV_1 * (BP_amount_2 / RP_amount_1)
    Calculated from production volume of reference product using the relative outputs.
  property price 0 EUR2005; name BP_amount_8_price_EUR2005
  properties: wet mass 1 kg, dry mass 1 kg
- polystyrene foam slab: 52 kg; source KWB 2011; lognormal variance with pedigree 0.0358, pedigree (2,5,4,5,1)
  calculated value - 1719 dm3 (calculated value for insulation a tank 180*288 cm) * 0.03 kg/dm3 (specific weight polystyrene foam slab)
  properties: heating value, net 38.67 MJ, carbon content, fossil 0.859091, dry mass 1 kg, wet mass 1 kg
  note on carbon content, fossil: XPS consists in 91% of polystyrene, 7% of blowing agent and the re-maining 2% are flame retardants (bromine compounds) and other additives (ecoinvent v2.2 report 7, part XIV, pg69). The chemical formula of polystyrene is (C8H8)n. Here, the blowing agent is CO2.
- copper, cathode: 4.5 kg; source KWB 2011; lognormal variance with pedigree 0.0432, pedigree (4,5,4,5,1)
  estimation
  properties: wet mass 1 kg, dry mass 1 kg
- waste concrete: -39715 kg; name BP_amount_7; = (concrete*2350)*-1; lognormal variance with pedigree 0.0186, pedigree (1,5,4,5,1)
  Calculated value - disposal of the concrete for the furnace basement and for the pellet silo - conversion from m3 to kg [16.90 m3 of concrete * 2350 kg/m3 (concrete density)]
  production volume 1.3106e6 kg; = BP_amount_7* RP_PV_1
    Calculated from production volume of reference product using the relative outputs.
  property price 0 EUR2005; name BP_amount_9_price_EUR2005
  properties: water content 1, lifetime 20 year, dry mass 0.5 kg, wet mass 1 kg
- aluminium, wrought alloy: 9.5 kg; source KWB 2011; lognormal variance with pedigree 0.0432, pedigree (4,5,4,5,1)
  estimation
  properties: dry mass 1 kg, wet mass 1 kg
- heat, central or small-scale, other than natural gas: 2700 MJ; source KWB 2011; lognormal variance with pedigree 0.1344, pedigree (3,5,5,5,1)
  estimation - data comes from a comparison between old dataset value and communication with KWB producer (total annual heating value in factory/production)
  properties: heating value, net 1 MJ
- scrap steel: -2920 kg; name BP_amount_8; = (steel_low_alloyed+chromium_steel)*-1; lognormal variance with pedigree 0.0186, pedigree (1,5,4,5,1)
  Calculated value - disposal of steel low-alloyed and chromium steel (body of the furnace, water storage, feeding system, chimney flue pipes, stainless steel components)
  production volume 96360 kg; = RP_PV_1* BP_amount_8
    Calculated from production volume of reference product using the relative outputs.
  property price 0 EUR2005; name BP_amount_6_price_EUR2005
  properties: wet mass 1 kg, dry mass 1 kg, lifetime 20 year
- stone wool: 266 kg; source KWB 2011; lognormal variance with pedigree 0.0352, pedigree (1,5,4,5,1)
  calculated value - summa of rock wool for the insulation of the chimney flue pipes (42 kg: 9m height, 35 cm diameter, thickness rockwool 3cm) and rockwool inside the furnace (224 kg = 1722 dm3 * 0.13 kg/m3)
  properties: carbon content, fossil 0.015401, wet mass 1 kg, dry mass 1 kg
  note on carbon content, fossil: The chemical composition of the glass fibres used in the rock wool production is similar to the composition of naturally cooled volcano basalt and has a composition listed in Tab. 3.1 and 3.2 in ecoinvent v2.2 report 16, part XIV. Rock wool contains: a minimum of 96% mineral fibres,between 0.5 and 3.0 weight percent of phenolic resin depending on the specific product characteristics, and about 0.2 percent mineral oil (ecoinvent v2.2 report 16, part XIV). An average composition of 1.8% phenolic resin, 0.2% mineral oil, and 98% mineral fibres has been assumed and used to calculate C content of the rock wool
- steel, low-alloyed, hot rolled: 2890 kg; name steel_low_alloyed; source KWB 2011; lognormal variance with pedigree 0.0352, pedigree (1,5,4,5,1)
  Calculated value - calculated with the difference of the total weight of the device with the summa of the weight of all the other materials (also based on qualified technician suggestions)
  properties: carbon content, fossil 0.005, wet mass 1 kg, dry mass 1 kg
  note on carbon content, fossil: Low alloyed steel composition given in Tab. 3.2 ecoinvent v2.2 report 10_partII. Steel assumed to have a C content of 0.5%
- waste polyethylene: -5.5 kg; name BP_amount_4; lognormal variance with pedigree 0.0186, pedigree (1,5,4,5,1)
  plastics materials
  production volume 181.5 kg; = BP_amount_4* RP_PV_1
    Calculated from production volume of reference product using the relative outputs.
  property price 0 EUR2005; name BP_amount_1_price_EUR2005
  properties: carbon content, fossil 0.825301, dry mass 0.996 kg, wet mass 1 kg, water content 0.00401606, lifetime 20 year, heating value, net 42.47 MJ
  note on carbon content, fossil: C content in 1 kg DM was calculated using data in Tab A.1, ecoinvent v2.2 report 13_I
  note on heating value, net: Value taken from the general comment of the treatment dataset.
- sheet rolling, steel: 184 kg; source KWB 2011; lognormal variance with pedigree 0.0352, pedigree (1,5,4,5,1)
  estimation
- electronics scrap from control units: -4 kg; name BP_amount_9; lognormal variance with pedigree 0.0186, pedigree (1,5,4,5,1)
  electronic parts of the furnace
  production volume 132 kg; = RP_PV_1* BP_amount_9
    Calculated from production volume of reference product using the relative outputs.
  property price 0 EUR2005; name BP_amount_7_price_EUR2005
  properties: carbon content, fossil 0.337146, carbon content, non-fossil 0.00013442, wet mass 1 kg, dry mass 1 kg, lifetime 20 year
- lubricating oil: 3 kg; source KWB 2011; lognormal variance with pedigree 0.1724, pedigree (5,5,5,5,1)
  estimation - used for furnace manufacturing and for maintenance
  properties: wet mass 1 kg, carbon content, fossil 0.75, dry mass 1 kg, heating value, net 40.2 MJ
  note on carbon content, fossil: Lubricating oil is produced from diesel. C-content/dry mass of fats and oils considered 75%, from: ecoinvent v2.2 report, n 15a, pg 40
  note on heating value, net: Literature value, Source: IPCC 2006, 2006 IPCC Guidelines for National Greenhouse Gas Inventories, Prepared by the National Greenhouse Gas Inventories Programme, Eggleston H.S., Buendia L., Miwa K., Ngara T. and Tanabe K. (eds). Published: IGES, Japan
- waste mineral wool, for final disposal: -266 kg; name BP_amount_6; lognormal variance with pedigree 0.0186, pedigree (1,5,4,5,1)
  disposal of insulation material
  production volume 8778 kg; = BP_amount_6* RP_PV_1
    Calculated from production volume of reference product using the relative outputs.
  property price 0 EUR2005; name BP_amount_4_price_EUR2005
  properties: dry mass 1 kg, lifetime 20 year, wet mass 1 kg
- concrete, normal: 16.9 m3; name concrete; source KWB 2011; lognormal variance with pedigree 0.0352, pedigree (1,5,4,5,1)
  calculated value - basing on the silo dimensions (from furnace manual) the amount of concrete was calculated (0.69 m3 for the basement + 16.20 m3 for the silo). [thickness of the walls of the silo: 20 cm]
  properties: wet mass 2380 kg, water content 0.086758, dry mass 2190 kg
- scrap aluminium: -9.5 kg; name BP_amount_3; lognormal variance with pedigree 0.0186, pedigree (1,5,4,5,1)
  components of the furnace
  production volume 313.5 kg; = RP_PV_1* BP_amount_3
    Calculated from production volume of reference product using the relative outputs.
  property price 0 EUR2005; name BP_amount_5_price_EUR2005
  properties: wet mass 1 kg, dry mass 1 kg, lifetime 20 year
- alkyd paint, white, without solvent, in 60% solution state: 3.5 kg; source KWB 2011; lognormal variance with pedigree 0.0352, pedigree (1,5,4,5,1)
  estimation
  properties: wet mass 1 kg, carbon content, fossil 0.140367, dry mass 1 kg, carbon content, non-fossil 0.199629, heating value, net 10.3 MJ
  note on carbon content, fossil: C content was calculated as an addition of C content in the raw materials.
- waste mineral oil: -3 kg; name BP_amount_1; lognormal variance with pedigree 0.0186, pedigree (1,5,4,5,1)
  disposal of lubricating oil
  production volume 99 kg; = RP_PV_1 * (BP_amount_1 / RP_amount_1)
    Calculated from production volume of reference product using the relative outputs.
  property price 0 EUR2005; name BP_amount_2_price_EUR2005
  properties: dry mass 0.9 kg, water content 0.111111, wet mass 1 kg, carbon content, fossil 0.864444, heating value, net 34.7 MJ
  note on carbon content, fossil: Tab A.6, ecoinvent v2.2 report 13_I. C content has been calculated after data in the tables, and then referred to 1 kg DM
- refractory, fireclay, packed: 686 kg; name refractory_fireclay_packed_amount_1; source KWB 2011; lognormal variance with pedigree 0.0432, pedigree (4,5,4,5,1)
  Estimation - refractory bricks in fireclay are used in the combustion chamber inside the furnace, cilindric shaped for a circular and more efficient combustion
  properties: wet mass 1 kg, dry mass 1 kg
- inert waste, for final disposal: -686 kg; lognormal variance with pedigree 0.0186, pedigree (1,5,4,5,1)
  disposal of the refractory bricks
  production volume 22638 kg; = refractory_fireclay_packed_amount_1* RP_PV_1
    Calculated from production volume of reference product using the relative outputs.
  properties: wet mass 1 kg, water content 0.00502513, dry mass 0.995 kg, lifetime 20 year
- steel, chromium steel 18/8, hot rolled: 30 kg; name chromium_steel; source KWB 2011; lognormal variance with pedigree 0.0432, pedigree (4,5,4,5,1)
  estimation
  properties: carbon content, fossil 0.0008, dry mass 1 kg, wet mass 1 kg
  note on carbon content, fossil: Stainless steel model is the grade 304 steel (18/8 stainless, 18% chromium 8% nickel; max. 0.08% C)
- polyethylene, high density, granulate: 5.5 kg; source KWB 2011; lognormal variance with pedigree 0.0358, pedigree (2,5,4,5,1)
  estimation
  properties: heating value, net 42.47 MJ, carbon content, fossil 0.857143, dry mass 1 kg, wet mass 1 kg
  note on carbon content, fossil: Polyethylene is formed out of a huge amount of ethylene monomers (C2H4) (ecoinvent v2.2 report 11_II). MW=28 g/mol
- waste polystyrene isolation, flame-retardant: -52 kg; name BP_amount_5; lognormal variance with pedigree 0.0186, pedigree (1,5,4,5,1)
  Insulation for the water storage
  production volume 1716 kg; = RP_PV_1 * (BP_amount_5 / RP_amount_1)
    Calculated from production volume of reference product using the relative outputs.
  property price 0 EUR2005; name BP_amount_3_price_EUR2005
  properties: dry mass 0.998012 kg, water content 0.00199232, heating value, net 38.67 MJ, carbon content, fossil 0.918145, wet mass 1 kg
  note on carbon content, fossil: Polystyrene isolation (EPS) is flame-retarded with hexa-bromo-cyclo-dodecan (C12H18Br6) and contains 0.67 w% bromine (ecoinvent v2.2 report 13_I, pg 39). The rest is polystyrene: (C8H8)n.

## Inputs from nature
- Transformation, to industrial area [natural resource, land]: 75 m2; source KWB 2011; lognormal variance with pedigree 0.0752, pedigree (4,5,5,5,1)
  calculated value - calculated area necessary for the furnace installation based on specific picture in the furnace manual
  Uncertainty: b
- Transformation, from unspecified [natural resource, land]: 75 m2; name land_use; source KWB 2011; lognormal variance with pedigree 0.0752, pedigree (4,5,5,5,1)
  (same comment as for Transformation, to industrial area)
- Occupation, industrial area [natural resource, land]: 1500 m2*year; = land_use*20; source KWB 2011; lognormal variance with pedigree 0.0752, pedigree (4,5,5,5,1)
  calculated value - (transformation * lifetime of the furnace) [lifetime of the furnace: 20 years]
  Uncertainty: b

## Sampling procedure
literature, furnace manual available for customers, investigation and personal communication from producer and technician

## Extrapolations
This dataset has been extrapolated from year 2011 to the year of the calculation (2021). The uncertainty has been adjusted accordingly.

## Review by Bo Weidema 2012-03-19
Passed. Documentation adequate, inputs relevant, mass balance correct, and correct handling of capacity utilisation.

## Review by Martin Kilga 2012-03-19
Validation warnings:

- Reference products of infrastructure activities should not have mass or energy units as units or property units.

## Review by Bo Weidema 2012-03-19
This dataset has only been reviewed by two editors. Since this is an infrastructure dataset, this deviation from normal procedures is acceptable.
