# treatment of used long liner, steel

Dataset: EcoSpold 2, unit process
Geography: GLO
Time period: 2010-01-01 to 2021-12-31
Technology level: current
Classification: ISIC rev.4 ecoinvent: 0311:Marine fishing
Scenario: Business-as-Usual
System model: Allocation, cut-off by classification
Generated by: Angel Avadi
Published in: Avadí, A. 2018
Database: ecoinvent
isCopyrightProtected: true
accessRestrictedTo: 1

## General comment
This dataset represents the end of life of steel trawlerlong liners, per 1000 kg of light ship weight, based on data from Peru (2004-3013), corresponding to 9 vessels (from a fleet of 54) for which data was available with different levels of detail. Specific data for specific inventory items may be based on sub-samples for which detailed data was available. Vessel dimensions: 34 - 275 m3 (16 - 34 m length).
System boundaries and relation between activities

## Included activities start
Treatment of used vessel (recycling)

## Included activities end
End of life (decommissioning). Excludes engines and motors. Excludes energy for dismantling. Excludes gear.

## Geography
Data from Peru, extrapolated to global (GLO)

## Technology
Peru features various shipyards and relevant ship-building and ship-retrofitting expertise.

## Reference product
- used long liner, steel: -1 kg; name LSW; = -1*(iron+copper+(nylon*-1)+(paint*-1)+(rubber*-1)); source Angel Avadí 2017; By-product classification Waste
  EOL of a long liner, per 1000 kg of light ship weight (LSW), after 35 years lifetime. Regressions based on mainly primary data were created to relate the weight of each inventory item to a long liner's LSW. The list of inventory items (granularity) contribute >95% of environmental impacts, as described in the reference publication.
  production volume 1 kg; name prod_vol
    Unquantifiable
  property price 0 EUR2005; name LSW_price_EUR2005
    Waste products are assigned a price of zero as they are assumed to require further treatment.

## By-products
- copper scrap, sorted, pressed: 0 kg; source Angel Avadí 2017; CPC 39361: Waste and scrap of copper; By-product classification Recyclable; pedigree (1,1,1,1,1)
  Copper recycled from electric circuit
  Uncertainty: Based on assumptions
  production volume 0 kg; = ABS(prod_vol*copper/LSW)
    Calculated from production volume of reference product using the relative outputs.
  property price 2.84 EUR2005; name copper_price_EUR2005
    Temporary price data. Calculated as 90% of purchasers price based on: Source: USGS Mineral Yearbook 2007, Table 1 in <http://minerals.usgs.gov/minerals/pubs/commodity/recycle/myb1-2007-recyc.pdf>
  property carbon content 0
    carbon content on a dry matter basis (reserved; not for manual entry)
  properties: wet mass 1 kg, water content 0, dry mass 1 kg, carbon content, fossil 0, carbon content, non-fossil 0, water in wet mass 0 kg, carbon allocation 0 kg
- iron scrap, unsorted: 0 kg; source Angel Avadí 2017; CPC 39310: Slag, dross, scalings and other waste from the manufacture of iron or steel; By-product classification Recyclable; pedigree (1,1,1,1,1)
  Recycled steel from hull and structural elements
  Uncertainty: Based on assumptions
  production volume 0 kg; = ABS(prod_vol*iron/LSW)
    Calculated from production volume of reference product using the relative outputs.
  property price 0.149 EUR2005; name iron_price_EUR2005
    Temporary price data. Calculated as 90% of purchasers price based on: estimated at 85% of sorted scrap
  property carbon content 0
    carbon content on a dry matter basis (reserved; not for manual entry)
  properties: carbon content, fossil 0, water in wet mass 0 kg, wet mass 1 kg, dry mass 1 kg, carbon content, non-fossil 0, water content 0, carbon allocation 0 kg

## Inputs from technosphere
All rows: source Angel Avadí 2017
- waste plastic, mixture: 0 kg; name nylon; pedigree (1,1,1,1,1)
  Nylon recycled from fishing gear
  Uncertainty: Based on assumptions
  production volume 0 kg
    Calculated from production volume of reference product using the relative outputs.
  property price 0 EUR2005; name nylon_price_EUR2005
  properties: dry mass 0.847 kg, carbon content, fossil 0.637168, heating value, net 30.79 MJ, water content 0.180638, wet mass 1 kg
  note on heating value, net: Value taken from the general comment of the treatment dataset.
- waste rubber, unspecified: 0 kg; name rubber; pedigree (1,1,1,1,1)
  Rubber from fishing gear
  Uncertainty: Based on assumptions
  production volume 0 kg
    Calculated from production volume of reference product using the relative outputs.
  property price 0 EUR2005; name rubber_price_EUR2005
  properties: wet mass 1 kg, carbon content, fossil 0.853, dry mass 1 kg, heating value, net 27.19 MJ
- waste paint on metal: 0 kg; name paint; pedigree (1,1,1,1,1)
  Waste paint scrapped from hull
  Uncertainty: Based on assumptions
  production volume 0 kg
    Calculated from production volume of reference product using the relative outputs.
  property price 0 EUR2005; name paint_price_EUR2005
  properties: wet mass 1 kg, dry mass 1 kg, carbon content, fossil 0.65, heating value, net 19.7 MJ
- copper scrap, sorted, pressed: -0.00990925 kg; triangular min -0.00990925, mostLikely -0.00990925, max -0.00990925, pedigree (4,3,5,5,1)
  Copper recycled from electric circuit
  Uncertainty: Based on assumptions
  production volume 0.00990925 kg
  properties: wet mass 1 kg, dry mass 1 kg
- iron scrap, unsorted: -0.980494 kg; triangular min -0.980494, mostLikely -0.980494, max -0.980494, pedigree (4,3,5,5,1)
  Recycled steel from hull and structural elements
  Uncertainty: Based on assumptions
  production volume 0.980494 kg
  properties: wet mass 1 kg, dry mass 1 kg
- waste plastic, mixture: -0.000512046 kg; triangular min -0.000512046, mostLikely -0.000512046, max -0.000512046, pedigree (4,3,5,5,1)
  Nylon recycled from fishing gear
  Uncertainty: Based on assumptions
  production volume 0.0053197 kg
- waste plastic, mixture: -3.94758e-5 kg; triangular min -3.94758e-5, mostLikely -3.94758e-5, max -3.94758e-5, pedigree (4,3,5,5,1)
  Nylon recycled from fishing gear
  Uncertainty: Based on assumptions
- waste plastic, mixture: -1.63049e-5 kg; triangular min -1.63049e-5, mostLikely -1.63049e-5, max -1.63049e-5, pedigree (4,3,5,5,1)
  Nylon recycled from fishing gear
  Uncertainty: Based on assumptions
- waste plastic, mixture: -1.5483e-5 kg; triangular min -1.5483e-5, mostLikely -1.5483e-5, max -1.5483e-5, pedigree (4,3,5,5,1)
  Nylon recycled from fishing gear
  Uncertainty: Based on assumptions
- waste plastic, mixture: -0.000590812 kg; triangular min -0.000590812, mostLikely -0.000590812, max -0.000590812, pedigree (4,3,5,5,1)
  Nylon recycled from fishing gear
  Uncertainty: Based on assumptions
- waste plastic, mixture: -6.587e-6 kg; triangular min -6.587e-6, mostLikely -6.587e-6, max -6.587e-6, pedigree (4,3,5,5,1)
  Nylon recycled from fishing gear
  Uncertainty: Based on assumptions
- waste plastic, mixture: -2.98549e-6 kg; triangular min -2.98549e-6, mostLikely -2.98549e-6, max -2.98549e-6, pedigree (4,3,5,5,1)
  Nylon recycled from fishing gear
  Uncertainty: Based on assumptions
- waste plastic, mixture: -0.00413601 kg; triangular min -0.00413601, mostLikely -0.00413601, max -0.00413601, pedigree (4,3,5,5,1)
  Nylon recycled from fishing gear
  Uncertainty: Based on assumptions
- waste rubber, unspecified: -0.00107272, -0.00107272 kg (2 entries); triangular min -0.00107272, mostLikely -0.00107272, max -0.00107272, pedigree (4,3,5,5,1)
  Rubber from fishing gear
  Uncertainty: Based on assumptions
  production volume 0.00219047 kg
- waste rubber, unspecified: -4.50325e-5 kg; triangular min -4.50325e-5, mostLikely -4.50325e-5, max -4.50325e-5, pedigree (4,3,5,5,1)
  Rubber from fishing gear
  Uncertainty: Based on assumptions
- waste paint on metal: -1.7559e-5 kg; triangular min -1.7559e-5, mostLikely -1.7559e-5, max -1.7559e-5, pedigree (4,3,5,5,1)
  Waste paint scrapped from hull
  Uncertainty: Based on assumptions
  production volume 0.00208616 kg
- waste paint on metal: -0.0020686 kg; triangular min -0.0020686, mostLikely -0.0020686, max -0.0020686, pedigree (4,3,5,5,1)
  Waste paint scrapped from hull
  Uncertainty: Based on assumptions

## Extrapolations
This dataset has been extrapolated from year 2020 to the year of the calculation (2021). The uncertainty has been adjusted accordingly.
