# soybean meal and crude oil production, mechanical extraction

Dataset: EcoSpold 2, unit process
Geography: RoW
Time period: 2010-01-01 to 2021-12-31
Technology level: current
Classification: ISIC rev.4 ecoinvent: 1040:Manufacture of vegetable and animal oils and fats
Synonyms: crude soy oil; extrusion extraction; soybean hull
Scenario: Business-as-Usual
System model: Allocation, cut-off by classification
Generated by: Pierre-Olivier P.O.
Database: ecoinvent
isCopyrightProtected: true
accessRestrictedTo: 1

## General comment
This dataset represents the mechanical soybean processing into soybean meal and crude soy oil. This dataset is associated to a typically on farm location technology. If the user requires an industrial process, we suggest the “soybean meal and crude oil production” dataset which represents a chemical extraction process. This dataset is extrapolated from the Quebec dataset.
In the mechanical extraction, received soybeans are examined and damaged seeds are eliminated. The soybeans are then cracked into four to six particles by corrugated cracking rolls. The hulls are separated from the soybeans by aspiration. Dehulled soybeans are then extruded (a machine consisting of a screw rotating inside a barrel). The heat is generated by the extruder through friction allows for cooking, sterilizing, stabilizing, texturizing and dehydrating soybeans. Upon leaving the extruder, hot soybeans are conveyed into an expeller, a screw press, which squeezes the oil from soybeans. Expellers have generally an oil removal efficiency of about 65 to 67% (Riaz, 2005).

Riaz, M. N., Bailey’s Industrial Oil and Fat Products: Extrusion Processing of Oilseed Meals for Food and Feed Production. In John Wiley & Sons, Inc.: 2005; Vol. Sixth Edition, Six Volume Set

## Included activities start
arrival of the soybean

## Included activities end
This activity ends with the production of soymeal and crude soy oil. The dataset includes the transport of soybeans to the facility; the extraction process inputs (energy and soybeans) and outputs (discarded soybeans, crude soy oil, soy hull). This dataset doesn't include any infrastructures nor cleaning processes. It also doesn't consider the crude soy oil refining. Grading and drying at a nearby elevator were also not considered as it was assumed that local extrusion extraction was a non-industrial process mostly done at the farm.

## Geography
extrapolated from the Quebec dataset

## Time period
extrapolated from the Quebec dataset. Collected processing data for Quebec industries in 2012-13 period. Quebec soybean production data comes from 2010 statistics.

## Parameters
- electricity input: 0.0625 kWh; name electricity; = 5/0.08/1000; lognormal variance with pedigree 0.0468, pedigree (3,4,2,5,4)
  kWh/kg soybean; calculated from Energrow data which provides both of the following informations: it costs 5 $ of electricity/ton soybean while the electricity rates in the province are equivalent to 0.08$ per kWh. Consequently, we can calculate the electricity required from the cost (5/0.08 kWh/ton). We then converte the result in kg instead of ton (1 ton =1000 kg)
- mass soy hull: 0.09 kg; name hull; lognormal variance with pedigree 0.0468, pedigree (3,4,2,5,4)
  kg/kg soybean; based on the value from Nutridense (2010)
  Nutridense. (2010). BASF Use Co-Products for Efficient, Cost-Effective Rations. http://www.nutridense.com/2010/08/11/use-co-products-for-efficient-cost-effective-rations/ (March 16, 2013)
- mass soymeal: 0.75 kg; name soymeal; lognormal variance with pedigree 0.0468, pedigree (3,4,2,5,4)
  kg/kg soybean; mass balance calculation according to the known protein content in the soybean and the full fat soybean meal (i.e. qty of soybeans * %protein in soybeans = qty of soybean meal * %protein in full fat soymeal)
- mass discarded soybeans: 0.02 kg; name m_discarded; lognormal variance with pedigree 0.0454, pedigree (2,4,2,5,4)
  kg/kg soybean. based on the hypothesis from Dalgaard et al. (2008)
  Dalgaard, R.; Schmidt, J.; Halberg, N.; Christensen, P.; Thrane, M.; Pengue. W. A., 2008. LCA of Soybean Meal. International Journal of Life Cycle Assessment, 13, (3), 240-254.
- mass soybean: 1 kg; name bean; lognormal variance with pedigree 0.0468, pedigree (3,4,2,5,4)
- mass crude soy oil: 0.14 kg; name oil; lognormal variance with pedigree 0.0468, pedigree (3,4,2,5,4)
  kg/kg soybean; based on mass balance calculation according to the known oil content in the soybean and oil content in the full fat soybean meal (i.e. oil in soybean-oil in full fat soybean meal = crude oil)

## Reference product
- soybean meal: 1 kg; name meal; = soymeal/soymeal; source Canadian International Grains Institute  2010; CPC 21920: Flours and meals of oil seeds or oleaginous fruits, except those of mustard; By-product classification allocatable product
  see parameter
  production volume 3.00345e9 kg; name ref_pv; = (1/ soyoil* BP_PV_1)
    Calculated relative to oil output
  property price 0.528626 EUR2005; name meal_price_EUR2005
    Price provided by the activities data provider.
  property carbon content 0.481931
    carbon content on a dry matter basis (reserved; not for manual entry)
  property true value 0.528626; name meal_true_value
    allocation property applied in "true value" allocation // value calculated from revenue
  properties: oil/fat content 0.07, carbon content, fossil 0, water in wet mass 0.1719 kg, dry mass 0.8281 kg, digestable energy content 16.99 MJ/kg, wet mass 1 kg, carbon content, non-fossil 0.481931, protein content 0.42, carbon allocation 0.399087 kg

## By-products
- protein feed, 100% crude: 0 kg; name hulls; source Ohio State University 2013; CPC 23319: Preparations used in animal feeding n.e.c.; By-product classification allocatable product; pedigree (1,1,1,1,1)
  see parameter; hulls are typically used for its fibre content in animal feeds.
  Uncertainty: Calculated variable. Uncertainty will be determined from propagation of uncertainty factors of underlying variables. Uncertainty of actual relation between variables not accounted at this time, although this could be included in a future update
  production volume 3.60414e8 kg; = ref_pv * hulls / meal
    Calculated from production volume of reference product using the relative outputs.
  property price 0.424 EUR2005; name hulls_price_EUR2005
    Based on protein content and energy feed, gross content in soybean meal and prices per kg of soybean meal. Assumed soybean meal is the most used feed. Soybean meal 2004 prices for World import/export data (tonnes and US$) from FaoStat statistics (http://faostat.fao.org/site/535/default.aspx#ancor, TRADE)- [Accessed 24 May 2010]. See calculations for protein /energy content
  property carbon content 0.432
    carbon content on a dry matter basis (reserved; not for manual entry)
  property true value 0.05088; name hulls_true_value
    allocation property applied in "true value" allocation // value calculated from revenue
  properties: water in wet mass 0.091 kg, oil/fat content 0.018, protein content 0.134, wet mass 1 kg, carbon content, fossil 0, digestable energy content 10.5 MJ/kg, dry mass 0.9099 kg, carbon content, non-fossil 0.432, carbon allocation 0.393077 kg
- soybean oil, crude: 0 kg; name soyoil; source Health Canada 2010; CPC 21611: Soya bean oil, crude; By-product classification allocatable product; CAS 8001-22-7; pedigree (1,1,1,1,1)
  see parameter
  Uncertainty: Calculated variable. Uncertainty will be determined from propagation of uncertainty factors of underlying variables. Uncertainty of actual relation between variables not accounted at this time, although this could be included in a future update
  production volume 5.60645e8 kg; name BP_PV_1; = 56912719*1000*0.01
    Data from FAO for "oil, soybean" (http://www.fao.org/faostat/en/#data/QCL). The production volume PV for World in 2018 was 56912719 t/year. It is assumed that 99% of globally produced soybean oil is extracted by solvent, and 1% using mechanical extraction.
  property heating value, net 38.4 MJ
    Values is approximated from HHV from "vegetable oil, crude". Source: Radovanovic,M.; Zivanovic,T.; Stojiljkovic,D.; Jovanovic,V.; Jerinic,N.; Knezevic,S. et.al. Utilization of sunflower husk as a fuel for industrial boilers - 20 years experience. Proc. 5th Eur. Conf. on Industrial Furnaces&Boilers 2000,vol.2,p.221-233.
    Available at: https://phyllis.nl/Biomass/View/2152
  property price 1.22147 EUR2005; name soyoil_price_EUR2005
    Price provided by the activities data provider.
  property carbon content 0.768
    carbon content on a dry matter basis (reserved; not for manual entry)
  property true value 0.228007; name soyoil_true_value
    allocation property applied in "true value" allocation // value calculated from revenue
  properties: wet mass 1 kg, carbon content, non-fossil 0.768, digestable energy content 36.99 MJ/kg, water in wet mass 0 kg, dry mass 1 kg, carbon content, fossil 0, oil/fat content 1, protein content 0, carbon allocation 0.768 kg

## Inputs from technosphere
- electricity, low voltage: 0 kWh; source Energrow 2013; pedigree (1,1,1,1,1)
  (same comment as for soybean oil, crude)
- biowaste: -0.0174569 kg; name soy; = (m_discarded/soymeal)*-1; source Dalgaard, R. 2008; lognormal variance with pedigree 0.008, pedigree (1,1,4,1,1)
  see parameter; the mass of discarded soybeans
  Uncertainty: Calculated variable. Uncertainty will be determined from propagation of uncertainty factors of underlying variables. Uncertainty of actual relation between variables not accounted at this time, although this could be included in a future update
  production volume 8.00921e7 kg; = ref_pv * soy / meal
    Calculated from production volume of reference product using the relative outputs.
  property price 0 EUR2005; name soy_price_EUR2005
  properties: dry mass 0.4 kg, wet mass 1 kg, water content 1.5, carbon content, non-fossil 0.1624, heating value, net 4.29 MJ
  note on heating value, net: Value taken from the general comment of the treatment dataset.
- soybean: 0 kg; source Ohio State University 2013; pedigree (1,1,1,1,1)
  (same comment as for soybean oil, crude)
  properties: dry mass 0.86 kg, carbon content, non-fossil 0.52451, protein content 0.4, wet mass 1 kg, oil/fat content 0.215
- electricity, low voltage: 0.000572975, 0.000104328, 0.00235507, 0.000859225, 0.00167981, 0.0257904, 0.00837497, 0.00417244, 0.0106436 kWh (9 entries); source Energrow 2013; lognormal variance with pedigree 0.008, pedigree (1,1,4,1,1)
  (same comment as for soybean oil, crude)
- soybean: 0.240929, 0.631917 kg (2 entries); source Ohio State University 2013; lognormal variance with pedigree 0.008, pedigree (1,1,4,1,1)
  (same comment as for soybean oil, crude)

## Sampling procedure
Collected data for Quebec industries for soybean

## Extrapolations
extrapolated from the dataset representative of the province of Quebec
