# papaya production

Dataset: EcoSpold 2, unit process
Geography: GLO
Time period: 2010-01-01 to 2021-12-31
Technology level: current
Classification: ISIC rev.4 ecoinvent: 0122:Growing of tropical and subtropical fruits
Scenario: Business-as-Usual
System model: Allocation, cut-off by classification
Generated by: Franziska Stössel
Published in: Stoessel, Franziska; 2012
Database: ecoinvent
isCopyrightProtected: false
accessRestrictedTo: 1

## General comment
This dataset represents papaya production.

Yield: 70 t / ha.
Duration of one cycle: 12 months in permanent culture.
Field production.
The LCA study, from which this LCI has been derived, contains detailed descriptions of the system boundaries and the data sources used (Stoessel et al. 2012). The publication is published and freely available with comprehensive supporting information:
http://pubs.acs.org/doi/pdf/10.1021/es2030577
Franziska Stoessel, Ronnie Juraske, Stephan Pfister, Stefanie Hellweg. (2012) Life Cycle Inventory and Carbon and Water FoodPrint of Fruits and Vegetables: Application to a Swiss Retailer. Environmental Science & Technology 6(46) 3253-3262.
This activity was adapted to include the global average land use change (LUC) emissions according 2nd edition of the Quantis-modified tool developed by Blonk Consultants 'WFLDB-adapted-Blonk 2014 direct-land-use-change-assessment-tool_2015-05-18a.xlsx', tab. 'Country & land use unknown'. The size of the emission depends on (i) the relative crop expansion in all countries of the crop during the last 20 years and (ii) the corresponding, country specific land transformations. The current results are based on the average FAOSTAT data (harvested area) of 2009-2011 and 1989-1991. The weighted average is used which takes into account relative difference in crop expansion into primary forest, secondary forest, grassland, perennial and annual land.

## Included activities start
From maintenance of the orchards after harvest of the previous crop.

## Included activities end
This activity ends with harvest and storage.
The dataset includes a storage period of 1 month and it's use of electricity. The pesticide inputs are classified according to their chemical classes and the emmssions are assigned to the soil (100%). Mercury emissions are neglected due to a lack of data while other heavy metal emissions are included. The dataset doesn't include infrastructure for production and storage facilities. No transports for agricultural means of production from the regional storage to the farm are included.

## Technology
Production without production standard, but according to GAP

## Parameters
- fraction, irrigation water, to ground water: 0.8 dimensionless; name fraction_IW_to_ground_water; lognormal variance with pedigree 0.0886, pedigree (4,3,1,1,4)
  Literature value (Doll, 2011) cross referenced with expert opinion.
- fraction, irrigation water to surface water: 0.2 dimensionless; name fraction_IW_to_surface_water; lognormal variance with pedigree 0.0886, pedigree (4,3,1,1,4)
  Literature value (Doll, 2011) cross referenced with expert opinion.
- fraction, irrigation water, to air: 0.586986 dimensionless; name fraction_IW_to_air; lognormal variance with pedigree 0.0409, pedigree (2,2,2,1,1)
  Literature value (Siebert, 2010) (Vionnet, S., Quantis Water Database - Technical Report, 2012).

## Reference product
- papaya: 1 kg; source Stoessel, Franziska; 2012; CPC 01317: Papayas; By-product classification allocatable product
  production volume 1.1223e10 kg
    in kg / year (2010)
  property price 0.794 EUR2005
    Calculated from the trade statistics for the year 2005 published by the UN (COMTRADE database, accessed 20151105) as an average of 5 biggest importers of papaya in the world; USA, NL, DE, UK and CA. Comtrade cathegory: 80720: Papaws (papayas), fresh.
  property carbon content 0.0521348
    carbon content on a dry matter basis (reserved; not for manual entry)
  properties: carbon content, fossil 0, wet mass 1 kg, water in wet mass 0.8883 kg, carbon content, non-fossil 0.0521348, water content 7.95255, dry mass 0.1117 kg, carbon allocation 0.00582346 kg

## Inputs from technosphere
- fertilising, by broadcaster: 0.000343 ha; source Stoessel, Franziska; 2012; lognormal variance with pedigree 0.0439, pedigree (3,3,5,3,2)
  Fertilizing by broadcaster is used as a proxy for all the machinery work done in horticultural processes.
- potassium sulfate: 0 kg; source Stoessel, Franziska; 2012; pedigree (1,1,1,1,1)
  The exchange has been updated from 'potassium sulfate, as K2O' into 'potassium sulfate' and therefore its amount has been scaled (multiplied) from 0.0084 kg by 1.85 kg of 'potassium sulfate' per kg of 'potassium sulfate, as K2O'.
  properties: wet mass 1 kg, dry mass 1 kg
- packaging, for pesticides: 0.000352 kg; lognormal variance with pedigree 0.0592, pedigree (4,3,4,5,4)
  Total amount of active substance/s of pesticides needed for the production of papaya is calculated to be circa 1.76E-04 kg. Pesticide/s used in this dataset is/are: 'pesticide, unspecified'. The total amount of active substance/s is doubled in order to account for the packaging of the dilluted product of pesticide/s that is/are applied. Therefore, 3.52E-04 kg of packaging for pesticides is justified with this exchange.
  properties: price 0.0642 EUR2005, wet mass 1 kg, dry mass 1 kg, heating value, net 25.97 MJ, carbon content, fossil 0.85714
- electricity, low voltage: 0.0225 kWh; source Stoessel, Franziska; 2012; lognormal variance with pedigree 0.0439, pedigree (3,3,5,3,2)
- pesticide, unspecified: 0.000176 kg; source Stoessel, Franziska; 2012; lognormal variance with pedigree 0.0439, pedigree (3,3,5,3,2)
  properties: wet mass 1 kg, carbon content, fossil 0.486978, dry mass 1 kg
  note on carbon content, fossil: Mean of C content in all pesticides whose formula has been documented in Sutter 2010
- packaging, for fertilisers: 0.0294 kg; lognormal variance with pedigree 0.0592, pedigree (4,3,4,5,4)
  Total amount of active substance/s of fertilisers needed for the production of 'papaya' is calculated to be circa 1.47E-02 kg. Fertiliser/s used in this dataset is/are: 'ammonium nitrate, as N', 'phosphate fertiliser, as P2O5', 'potassium sulfate, as K2O'. The total amount of active substance/s is doubled in order to account for the packaging of the dilluted product of fertiliser/s that is/are applied. Therefore, 2.94E-02 kg of packaging for fertilisers is justified with this exchange.
  properties: price 0.0642 EUR2005, wet mass 1 kg, heating value, net 25.01 MJ, carbon content, fossil 0.825301, dry mass 1 kg
  note on carbon content, fossil: Considering a chemical formula (C2H4)n for polyethylene, carbon content-fossil is calculated to be 0.856286 kg of Carbon per kg of dry mass.
- ammonium nitrate: 0 kg; source Stoessel, Franziska; 2012; pedigree (1,1,1,1,1)
  The exchange has been updated from 'ammonium nitrate, as N' into 'ammonium nitrate' and therefore its amount has been scaled (multiplied) from 0.0047 kg by 2.8573 kg of 'ammonium nitrate' per kg of 'ammonium nitrate, as N'.
  properties: dry mass 1 kg, wet mass 1 kg
- irrigation: 0.0651 m3; name water_irrigation_input; source Stoessel, Franziska; 2012; lognormal variance with pedigree 0.0198, pedigree (2,4,4,4,3)
  Average Brazil and India
  properties: dry mass 0.11 kg, water content 9089.91, wet mass 1000 kg
- inorganic phosphorus fertiliser, as P2O5: 0 kg; source Stoessel, Franziska; 2012; pedigree (1,1,1,1,1)
  properties: wet mass 1 kg, dry mass 1 kg
- potassium sulfate: 0.00270069, 0.0128205 kg (2 entries); source Stoessel, Franziska; 2012; lognormal variance with pedigree 0.0439, pedigree (3,3,5,3,2)
  (same comment as for potassium sulfate)
- ammonium nitrate: 0.00333434, 0.00231249, 0.0017774, 0.00603375 kg (4 entries); source Stoessel, Franziska; 2012; lognormal variance with pedigree 0.0439, pedigree (3,3,5,3,2)
  (same comment as for ammonium nitrate)
- inorganic phosphorus fertiliser, as P2O5: 5.97257e-5, 6.06876e-6, 0.000216745, 3.02722e-6, 4.26318e-7, 1.17255e-5, 4.33483e-7, 6.99484e-6, 3.90672e-6, 1.43461e-5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 kg (30 entries); source Stoessel, Franziska; 2012; lognormal variance with pedigree 0.0439, pedigree (3,3,5,3,2)

## Inputs from nature
- Occupation, permanent crop, irrigated, intensive [natural resource, land]: 0.143 m2*year; source Stoessel, Franziska; 2012; lognormal variance with pedigree 0.0453, pedigree (3,3,5,3,2)
- Transformation, to permanent crop, irrigated, intensive [natural resource, land]: 0.143 m2; source Stoessel, Franziska; 2012; lognormal variance with pedigree 0.0453, pedigree (3,3,5,3,2)
- Energy, gross calorific value, in biomass [natural resource, biotic]: 2.21953 MJ; lognormal variance with pedigree 0.0099, pedigree (2,3,4,3,1)
  Calculated value based on literature. The gross energy is calculated using following formula; gross energy (MJ) = crude protein (kg)*23.04 (MJ/kg)+crude fat (kg)*38.96 (MJ/kg)+crude fibre (kg)*17.95 (MJ/kg)+carbohydrates (kg)*17.17 (MJ/kg) (formula based on expert opinion, cross referenced; Diepenbrock, 2012, Energy Balance in Crop Production). The product composition of fruits and vegetables is extracted from the USDA National Nutrient Database for Standard Reference (http://ndb.nal.usda.gov/, accessed 20131114). Crude protein (g)= 4.7, crude fat (g)= 2.6, crude fibre (g)= 17, ash (g)= 3.9, water (g)= 880.6, carbohydrates (g)= 108.2.
- Transformation, from permanent crop, irrigated, intensive [natural resource, land]: 0.143 m2; source Stoessel, Franziska; 2012; lognormal variance with pedigree 0.0453, pedigree (3,3,5,3,2)

## Emissions to nature
- Copper [soil, agricultural]: -9.9804e-7 kg; source Thomas Nemecek 2011
- Cadmium [soil, agricultural]: 6.79711e-8 kg; source Thomas Nemecek 2011; lognormal variance with pedigree 0.0847, pedigree (3,4,5,3,2)
  property water content 0; name water_content
  property water in wet mass 0 kg; name WWM
  property dry mass 1 kg; name DM
  property wet mass 1 kg; name WM
  property carbon content, fossil 0; name C_content_fossil
  property carbon content, non-fossil 0; name C_content_non_fossil
- Lead [soil, agricultural]: 8.01003e-7 kg; source Thomas Nemecek 2011; lognormal variance with pedigree 0.0847, pedigree (3,4,5,3,2)
- Water [water, ground-]: 0.0215098 m3; name water_to_water_ground; = water_irrigation_input*(1-fraction_IW_to_air)*fraction_IW_to_ground_water; lognormal variance with pedigree 0.0966, pedigree (4,3,4,1,4)
  Calculated value. See the parameters and their comments to understand the calculation.
  property fraction, origin: unspecified 0; name fraction_origin_unspecified_Wgw
  property fraction, origin: salt water 0; name fraction_origin_salt_water_Wgw
  property fraction, origin: fresh water 1; name fraction_origin_fresh_water_Wgw
- Phosphorus [water, surface water]: 3.5e-6 kg; source Stoessel, Franziska; 2012; lognormal variance with pedigree 0.0847, pedigree (3,4,5,3,2)
- Water [water, surface water]: 0.00537744 m3; name water_to_water_surface; = water_irrigation_input*(1-fraction_IW_to_air)*fraction_IW_to_surface_water; lognormal variance with pedigree 0.0966, pedigree (4,3,4,1,4)
  Calculated value. See the parameters and their comments to understand the calculation.
  property fraction, origin: fresh water 1; name fraction_origin_fresh_water_Wsw
  property fraction, origin: salt water 0; name fraction_origin_salt_water_Wsw
- Zinc [soil, agricultural]: -1.44667e-6 kg; source Thomas Nemecek 2011
- Chromium [soil, agricultural]: 1.02581e-7 kg; source Thomas Nemecek 2011; lognormal variance with pedigree 0.0847, pedigree (3,4,5,3,2)
- Nickel [soil, agricultural]: 1.0542e-7 kg; source Thomas Nemecek 2011; lognormal variance with pedigree 0.0847, pedigree (3,4,5,3,2)
- Carbon dioxide, from soil or biomass stock [air, non-urban air or from high stacks]: 0.00999365 kg; normal variance with pedigree 0.5452, pedigree (3,3,5,5,2)
  Global average LUC emissions according 2nd edition of the Quantis-modified tool developed by Blonk Consultants 'WFLDB-adapted-Blonk 2014 direct-land-use-change-assessment-tool_2015-05-18a.xlsx', tab. 'Country & land use unknown'. The emission are based on the relative change in production areas in all countries for a given crop. The weighted average is used which takes into acount relative difference in crop expansion into primary forest, secondary forest, grassland, perennial and annual land.
  Uncertainty: Uncertainty estimated based on IPCC 2006
- Water [air, unspecified]: 0.0382128 m3; name water_to_air_unspecified; = water_irrigation_input*fraction_IW_to_air; lognormal variance with pedigree 0.0487, pedigree (2,2,4,1,1)
  Calculated value based on literature values and expert opinion. See comments in the parametres' comment field.
  property fraction, origin: fresh water 1; name fraction_origin_fresh_water
  property fraction, origin: unspecified 0; name fraction_origin_unspecified
  property fraction, origin: salt water 0; name fraction_origin_salt_water
- Nitrate [water, ground-]: 0.00625757 kg; source Thomas Nemecek 2011; lognormal variance with pedigree 0.0847, pedigree (3,4,5,3,2)
- Ammonia [air, non-urban air or from high stacks]: 0.000114386 kg; source Thomas Nemecek 2011; lognormal variance with pedigree 0.0527, pedigree (3,4,5,3,2)
- Dinitrogen monoxide [air, non-urban air or from high stacks]: 9.21478e-5 kg; source Thomas Nemecek 2011; lognormal variance with pedigree 0.0747, pedigree (3,4,5,3,2)
- Phosphate [water, ground-]: 1e-6 kg; source Stoessel, Franziska; 2012; lognormal variance with pedigree 0.0847, pedigree (3,4,5,3,2)
- Pesticides, unspecified [soil, agricultural]: 0.000176 kg; source Stoessel, Franziska; 2012; lognormal variance with pedigree 0.0777, pedigree (3,4,5,3,2)
- Nitrogen oxides [air, non-urban air or from high stacks]: 1.9351e-5 kg; source Thomas Nemecek 2011; lognormal variance with pedigree 0.0747, pedigree (3,4,5,3,2)

## Sampling procedure
The LCI is based on papaya production information from different sources (peer reviewed journals, books, extension leaflets, personal information) and is well representative for a conventional production in their main production countries. Most probably it is representative for productions in other countries or farms which produces similarly.

## Extrapolations
This dataset has been extrapolated from year 2010 to the year of the calculation (2021). The uncertainty has been adjusted accordingly.
