# wastewater treatment facility construction, lagoon, capacity 1.6E8l/year

Dataset: EcoSpold 2, unit process
Geography: CA-QC
Time period: 2012-01-01 to 2021-12-31
Technology level: current
Classification: ISIC rev.4 ecoinvent: 4220:Construction of utility projects
Classification: EcoSpold01Categories: waste management/wastewater treatment
Scenario: Business-as-Usual
System model: Allocation, cut-off by classification
Share of production covered: 0.5 %
Generated by: Marylène Dussault
Published in: Godin, David 2012
Database: ecoinvent
isCopyrightProtected: true
accessRestrictedTo: 1

## General comment
This dataset represents the construction of a small size (class 1) wastewaster facultative aereted lagoons treatment facility. Average flow rate for this class is 438 m3/d (1.6E8 l/yr) with a lifetime of 40 years. Lagoon treatment includes influent pumping station, ponds and UV disinfection. Dataset is extrapolated from a one lagoon facility in Quebec (CA): average flow of 8050 m3/d. Inventory is extrapolated to a small size plant based on cost curve.

## Included activities start
From reception of raw materials and construction equipment. This dataset includes material inputs for equipment of the different water treatment stages ( influent pumping, aeration, pond construction, UV desinfection) and energy for construction. Equipment needed for construction, UV equipment and processing of material are excluded due to lack of data.

## Included activities end
This datasets ends with the dismantlement of the plant at the end of its useful life, expected to be 40 years. Clay and gravel material are assumed to be left on site. Input material end-of-life is included, but equipment and energy used for dismantling is excluded due to lack of data.

## Geography
Data provided from literature and measurements from a single treatment plant in Quebec.

## Technology
Wastewater treatement plant, facultative aerated lagoon

## Time period
Time of publication.

## Parameters
- factor A_copper: 141 kg/(m3/d)^2; name A_Cu; lognormal variance with pedigree 0.0453, pedigree (3,4,5,3,2)
  Calculated value for constant A in scaling equation Y=A*Q^-B, where Y and Q are respectively the mass of material per unit flow and flow rate and B is a scaling factor to account for economies of scale Calculations based on contruction inventory extrapolated from one lagoon facility in Québec as reported by Godin (2012), treatment plant average flow rate and cost scaling factor B for lagoon facility (EPA, 1980).
  2012, Godin, David, Analyse environnementale et éconnomique du cycle de vie d'un système d'épuration des eaux usées, 227, Master thesis, Laval University, Québec, Canada, 0 - Undefined
  US EPA. 1980. Construction costs for municipal wastewater treatment plants : 1973-1978. Report: EPA/430/9-80-003; FRD-11. U.S. Environmental Protection Agency, Office of Water Program Operations.
- factorA_excavation: 20100 kg/(m3/d)^2; name A_excav; lognormal variance with pedigree 0.0453, pedigree (3,4,5,3,2)
  (same comment as for factor A_copper)
- factor A_steel: 3700 kg/(m3/d)^2; name A_steel; lognormal variance with pedigree 0.0453, pedigree (3,4,5,3,2)
  Calculated value for constant A in scaling equation Y=A*Q^-B, where Y and Q are respectively the mass of material per unit flow and flow rate and B is a scaling factor to account for economies of scale Calculations based on contruction inventory extrapolated from one lagoon facility in Québec as reported by Godin (2012), treatment plant average flow rate and cost scaling factor B for lagoon facility (EPA, 1980). Steel is used to represent stainless steel.
  2012, Godin, David, Analyse environnementale et éconnomique du cycle de vie d'un système d'épuration des eaux usées, 227, Master thesis, Laval University, Québec, Canada, 0 - Undefined
  US EPA. 1980. Construction costs for municipal wastewater treatment plants : 1973-1978. Report: EPA/430/9-80-003; FRD-11. U.S. Environmental Protection Agency, Office of Water Program Operations.
- scaling factor: 0.73 dimensionless; name B; lognormal variance with pedigree 0.0448, pedigree (3,4,2,1,4)
  Literature value. Cost-based scaling factor, usually used to account for economies of scale, as reported in US EPA 430/9-80-003 report (1980). Note that the factor is reported to be valid for a capacity range of 190 m3/d to 20 000 m3/d.
- factor A_landuse: 9700 m2/(m3/d)^2; name A_landuse; lognormal variance with pedigree 0.0052, pedigree (3,4,1,1,2)
  Calculated value for constant A in scaling equation Y=A*Q^-B. Based on reported surface area of a lagoon wastewater treatment facility in Quebec as reported by Godin (2012),
  2012, Godin, David, Analyse environnementale et éconnomique du cycle de vie d'un système d'épuration des eaux usées, 227, Master thesis, Laval University, Québec, Canada, 0 - Undefined
  US EPA. 1980. Construction costs for municipal wastewater treatment plants : 1973-1978. Report: EPA/430/9-80-003; FRD-11. U.S. Environmental Protection Agency, Office of Water Program Operations.
- plant average daily flow rate: 438 m3/d; name Q_av; lognormal variance with pedigree 0, pedigree (1,1,1,1,1)
  Assumed average flow for class 1 to be 438 m3/d (1.6e8l/yr). Can be adapted to extrapolate construction inventory for different plant sizes ranging from 190 m3/d to 20 000 m3/d (representativity of used cost curves). To adapt the entire dataset to a different plant size change this parameter to the average flow rate of the wastewater facility you wish to model. Than change the amount called for this flow in the "wastewater treatment " dataset based on new plant lifetime production.
  Uncertainty: Fixed value for inventory calculation. no uncertainty associated.
- factor A_reinforcing steel: 4590 kg/(m3/d)^2; name A_reinfSteel; lognormal variance with pedigree 0.0453, pedigree (3,4,5,3,2)
  (same comment as for factor A_copper)
- factorA_diesel: 8490 MJ/(m3/d)^2; name A_diesel; lognormal variance with pedigree 0.0453, pedigree (3,4,5,3,2)
  Calculated value for constant A in scaling equation Y=A*Q^-B, where Y and Q are respectively the mass of material per unit flow and flow rate and B is a scaling factor to account for economies of scale Calculations based on contruction inventory extrapolated from one lagoon facility in Québec as reported by Godin (2012), treatment plant average flow rate and cost scaling factor B for lagoon facility (EPA, 1980). This factor is used to calculate the energy required for construction provided by diesel burning construction machine.
  2012, Godin, David, Analyse environnementale et éconnomique du cycle de vie d'un système d'épuration des eaux usées, 227, Master thesis, Laval University, Québec, Canada, 0 - Undefined
  US EPA. 1980. Construction costs for municipal wastewater treatment plants : 1973-1978. Report: EPA/430/9-80-003; FRD-11. U.S. Environmental Protection Agency, Office of Water Program Operations.
- factor A_pvc: 126000 kg/(m3/d)^2; name A_pvc; lognormal variance with pedigree 0.0453, pedigree (3,4,5,3,2)
  (same comment as for factor A_copper)
- factorA_iron: 2120 kg/(m3/d)^2; name A_iron; lognormal variance with pedigree 0.0453, pedigree (3,4,5,3,2)
  (same comment as for factor A_copper)
- factor A_pe: 3000 kg/(m3/d)^2; name A_pe; lognormal variance with pedigree 0.0453, pedigree (3,4,5,3,2)
  (same comment as for factor A_copper)
- factorA_gravel: 4.72e6 kg/(m3/d)^2; name A_gravel; lognormal variance with pedigree 0.0453, pedigree (3,4,5,3,2)
  (same comment as for factor A_copper)
- factor A_fibre glass: 831 kg/(m3/d)^2; name A_fglass; lognormal variance with pedigree 0.0448, pedigree (3,4,2,1,4)
  Calculated value for constant A in scaling equation Y=A*Q^-B, where Y and Q are respectively the mass of material per unit flow and flow rate and B is a scaling factor to account for economies of scale Calculations based on contruction inventory extrapolated from ecoinvent 2.2 Tap water process, St-François-Rivère-du-sud treatment plant average flow rate and cost scaling factor B (Kawamura, 2008). Note that the calculation of the constant is uncertain as the B value is used outside its reported range of validity (see general comment).
- factorA_clay: 5.26e6 kg/(m3/d)^2; name A_clay; lognormal variance with pedigree 0.0513, pedigree (4,4,5,3,2)
  Calculated value for constant A in scaling equation Y=A*Q^-B, where Y and Q are respectively the mass of material per unit flow and flow rate and B is a scaling factor to account for economies of scale Calculations based on contruction inventory extrapolated from one lagoon facility in Québec as reported by Godin (2012), treatment plant average flow rate and cost scaling factor B for lagoon facility (EPA, 1980). Clay inventory was reported in volume, density of 1826 kg/m3 was used.
  2012, Godin, David, Analyse environnementale et éconnomique du cycle de vie d'un système d'épuration des eaux usées, 227, Master thesis, Laval University, Québec, Canada, 0 - Undefined
  US EPA. 1980. Construction costs for municipal wastewater treatment plants : 1973-1978. Report: EPA/430/9-80-003; FRD-11. U.S. Environmental Protection Agency, Office of Water Program Operations.
- factor A_concrete: 70.1 m3/(m3/d)^2; name A_concrete; lognormal variance with pedigree 0.0453, pedigree (3,4,5,3,2)
  (same comment as for factor A_copper)
- scaling factor B_landuse: 0.73 dimensionless; name B_landuse; lognormal variance with pedigree 0.0432, pedigree (5,4,1,1,2)
  Literature value. Cost-based scaling factor, usually used to account for economies of scale, as reported in US EPA 430/9-80-003 report (1980). Note that the factor is reported to be valid for a capacity range of 190 m3/d to 20 000 m3/d.
  US EPA. 1980. Construction costs for municipal wastewater treatment plants : 1973-1978. Report: EPA/430/9-80-003; FRD-11. U.S. Environmental Protection Agency, Office of Water Program Operations.

## Reference product
- wastewater treatment facility, capacity 1.6E8l/year: 1 unit; name wwtp; CPC 53253: Sewage and water treatment plants; By-product classification allocatable product
  production volume 0.425 unit; name PV_wwtp
    Estimated value. Based on calculated amount of facility per m3 of wastewater treated and volume treated by lagoon of this size category per year.
  property price 3.72e6 EUR2005; name wwtp_price_EUR2005
    Calculated based on inputs: The price of the product has been calculated as a sum of the values of the material and energy inputs for this product. This value is therefore a rough estimation. It may underestimate the real price since there are additional expenses when producing any product. These expences can include for example labour costs, treatment of waste materials and profit for the producer. Please consider carefully whether this level of data quality is acceptable for your application.
  property lifetime capacity in m3 6.3948e6 m3; name wwtp_Lft_capacity_m3_1; = Q_av*(1/UnitConversion(1, 'day', 'year'))*wwtp_lifetime
    Calculated value. Estimation of lifetime capacity based on average flow rate and estimation of plant useful life.
  property lifetime 40 year; name wwtp_lifetime
    Literature value. Estimated lifetime for lagoon facility as reported by Godin (2012).

## By-products
- iron scrap, unsorted: 0 kg; CPC 39310: Slag, dross, scalings and other waste from the manufacture of iron or steel; By-product classification Recyclable; pedigree (1,1,1,1,1)
  Calculated Value.
  Uncertainty: Calculated variable. Uncertainty will be determined from propagation of uncertainty factors of underlying variables.
  production volume 0 kg; name PV_w_iron; = PV_wwtp * (w_iron / wwtp)
    Calculated from production volume of reference product using the relative outputs.
  property price 0.149 EUR2005; name w_iron_price_EUR2005
    Temporary price data. Calculated as 90% of purchasers price based on: estimated at 85% of sorted scrap
  property carbon content 0
    carbon content on a dry matter basis (reserved; not for manual entry)
  properties: water content 0, carbon content, non-fossil 0, water in wet mass 0 kg, dry mass 1 kg, carbon content, fossil 0, wet mass 1 kg, carbon allocation 0 kg

## Inputs from technosphere
- process-specific burdens, sanitary landfill: 103847 kg; = earth; lognormal variance with pedigree 0.0186, pedigree (4,4,4,1,1)
  Approximated process. Represents disposal of earth dug during excavation.
- scrap copper: -728.479 kg; name W_cu; = (cu)*-1
  Estimation. Based on material input.
  production volume 309.604 kg; name PV_w_cu; = PV_wwtp*W_cu/wwtp
    Calculated from production volume of reference product using the relative outputs.
  property price 0 EUR2005; name W_cu_price_EUR2005
  properties: wet mass 1 kg, dry mass 1 kg
- concrete, normal: 362.173 m3; name concrete; = (A_concrete* Q_av^- B)* Q_av; lognormal variance with pedigree 0.008, pedigree (1,1,4,1,1)
  EcoSpold01Location=CH
  Calculated Value.
  Uncertainty: Calculated variable. Uncertainty will be determined from propagation of uncertainty factors of underlying variables.
  properties: water content 0.086758, wet mass 2380 kg, dry mass 2190 kg
- steel, chromium steel 18/8, hot rolled: 19116.1 kg; name steel; = (A_steel* Q_av^- B)* Q_av; lognormal variance with pedigree 0.008, pedigree (1,1,4,1,1)
  Calculated Value.
  Uncertainty: Calculated variable. Uncertainty will be determined from propagation of uncertainty factors of underlying variables. Uncertainty of actual relation between variables not accounted for at this time, although this could be included in a future update.
  properties: dry mass 1 kg, wet mass 1 kg, carbon content, fossil 0.0008
  note on carbon content, fossil: Stainless steel model is the grade 304 steel (18/8 stainless, 18% chromium 8% nickel; max. 0.08% C)
- waste polyvinylchloride: -650981 kg; name W_pvc; = (pvc)*-1; lognormal variance with pedigree 0.008, pedigree (1,1,4,1,1)
  Estimation. Based on material input.
  EcoSpold01Location=CH
  Uncertainty: Calculated variable. Uncertainty will be determined from propagation of uncertainty factors of underlying variables.
  production volume 276667 kg; name PV_w_pvc; = PV_wwtp*W_pvc/wwtp
    Calculated from the production volume of water works in proportion to the respective output amounts.
  property price 0 EUR2005; name W_pvc_price_EUR2005
  properties: water content 0.00200401, wet mass 1 kg, dry mass 0.998 kg, carbon content, fossil 0.440882, heating value, net 21.51 MJ
  note on carbon content, fossil: C content in 1 kg DM was calculated using data in Tab A.1, ecoinvent v2.2 report 13_I
  note on heating value, net: Value taken from the general comment of the treatment dataset.
- waste reinforced concrete: -362.173 kg; name W_reinfconc; = (concrete)*-1; lognormal variance with pedigree 0.008, pedigree (1,1,4,1,1)
  EcoSpold01Location=CH
  Estimation. Based on material input.
  Uncertainty: Calculated variable. Uncertainty will be determined from propagation of uncertainty factors of underlying variables.
  production volume 153.924 kg; name PV_w_reinfconc; = PV_wwtp*W_reinfconc/wwtp
    (same comment as for waste polyvinylchloride)
  property price 0 EUR2005; name W_reinfconc_price_EUR2005
  properties: wet mass 1 kg, water content 0.00585407, dry mass 0.99418 kg
- cast iron: 10953 kg; name iron; = (A_iron* Q_av^- B)* Q_av; lognormal variance with pedigree 0.008, pedigree (1,1,4,1,1)
  (same comment as for steel, chromium steel 18/8, hot rolled)
  properties: wet mass 1 kg, dry mass 1 kg, carbon content, fossil 0.04
  note on carbon content, fossil: Cast iron is made by remelting pig iron in small furnaces (e.g. cupola furnaces or electric arc furnaces) and poured into moulds to make castings. It usually contains 2% to 6% carbon (ecoinvent v2.2 report 10_partII). An average content of 4% was considered
- reinforcing steel: 23714.3 kg; name reinfsteel; = (A_reinfsteel* Q_av^- B)* Q_av; lognormal variance with pedigree 0.008, pedigree (1,1,4,1,1)
  EcoSpold01Location=RER
  Calculated Value.
  Uncertainty: Calculated variable. Uncertainty will be determined from propagation of uncertainty factors of underlying variables.
  properties: dry mass 1 kg, carbon content, fossil 0.004, wet mass 1 kg
- clay: 2.71759e7 kg; = (A_clay* Q_av^- B)* Q_av; lognormal variance with pedigree 0.008, pedigree (1,1,4,1,1)
  Calculated Value. Assumed material stays in place after useful life of facility.
  Uncertainty: Calculated variable. Uncertainty will be determined from propagation of uncertainty factors of underlying variables.
  properties: wet mass 1 kg, water content 0.0362694, dry mass 0.965 kg
- excavation, hydraulic digger: 103847 m3; name earth; = (A_excav* Q_av^- B)* Q_av; lognormal variance with pedigree 0.008, pedigree (1,1,4,1,1)
  (same comment as for iron scrap, unsorted)
- diesel, burned in building machine: 43863.7 MJ; = (A_diesel* Q_av^- B)* Q_av; lognormal variance with pedigree 0.008, pedigree (1,1,4,1,1)
  (same comment as for iron scrap, unsorted)
  properties: heating value, net 1 MJ
- polyvinylchloride, bulk polymerised: 650981 kg; name PVC; = ( A_pvc* Q_av^- B)* Q_av; lognormal variance with pedigree 0.008, pedigree (1,1,4,1,1)
  Calculated Value.
  EcoSpold01Location=RER
  Uncertainty: Calculated variable. Uncertainty will be determined from propagation of uncertainty factors of underlying variables.
  properties: heating value, net 21.5 MJ, wet mass 1 kg, carbon content, fossil 0.387097, dry mass 1 kg
  note on carbon content, fossil: Monomer is vynyl chloride, C2H3Cl (ecoinvent v2.2 report 11_II). MW=62 g/mol
- scrap steel: -19116.1 kg; name W_steel; = (steel)*-1; lognormal variance with pedigree 0.008, pedigree (1,1,4,1,1)
  Estimation. Based on material input.
  Uncertainty: Calculated variable. Uncertainty will be determined from propagation of uncertainty factors of underlying variables.
  production volume 8124.35 kg; name PV_w_steel; = PV_wwtp*W_steel/wwtp
    Calculated from production volume of reference product using the relative outputs.
  property price 0 EUR2005; name W_steel_price_EUR2005
  properties: wet mass 1 kg, dry mass 1 kg
- polyethylene, high density, granulate: 15499.6 kg; name hdpe; = ( A_pe*Q_av^- B)* Q_av; lognormal variance with pedigree 0.008, pedigree (1,1,4,1,1)
  (same comment as for iron scrap, unsorted)
  properties: heating value, net 42.47 MJ, wet mass 1 kg, dry mass 1 kg, carbon content, fossil 0.857143
  note on carbon content, fossil: Polyethylene is formed out of a huge amount of ethylene monomers (C2H4) (ecoinvent v2.2 report 11_II). MW=28 g/mol
- waste reinforcement steel: -23714.3 kg; name W_reinfSteel; = (reinfsteel)*-1; lognormal variance with pedigree 0.008, pedigree (1,1,4,1,1)
  (same comment as for waste reinforced concrete)
  production volume 10078.6 kg; name PV_w_reinfSteel; = PV_wwtp*(W_reinfSteel/wwtp)
    (same comment as for waste polyvinylchloride)
  property price 0 EUR2005; name W_reinfSteel_price_EUR2005
  properties: wet mass 1 kg, dry mass 1 kg
- waste plastic, mixture: -15499.6 kg; name W_plastics; = (hdpe)*-1; lognormal variance with pedigree 0.008, pedigree (1,1,4,1,1)
  (same comment as for scrap steel)
  production volume 6587.31 kg; name PV_w_plastics; = PV_wwtp*W_plastics/wwtp
    Calculated from production volume of reference product using the relative outputs.
  property price 0 EUR2005; name W_plastics_price_EUR2005
  properties: wet mass 1 kg, heating value, net 30.79 MJ, dry mass 0.847 kg, water content 0.180638, carbon content, fossil 0.747344
- gravel, crushed: 2.4386e7 kg; name gravel; = (A_gravel* Q_av^- B)* Q_av; lognormal variance with pedigree 0.008, pedigree (1,1,4,1,1)
  (same comment as for clay)
  properties: dry mass 1 kg, wet mass 1 kg
- copper, cathode: 728.479 kg; name Cu; = (A_Cu* Q_av^- B)*Q_av; lognormal variance with pedigree 0.008, pedigree (1,1,4,1,1)
  (same comment as for reinforcing steel)
  properties: wet mass 1 kg, dry mass 1 kg
- iron scrap, unsorted: -10953 kg; lognormal variance with pedigree 0.008, pedigree (1,1,4,1,1)
  (same comment as for iron scrap, unsorted)
  production volume 4655.03 kg
  properties: dry mass 1 kg, wet mass 1 kg

## Inputs from nature
- Transformation, to industrial area [natural resource, land]: 50115.2 m2; name land; = (A_landuse* Q_av^-B_landuse)* Q_av; lognormal variance with pedigree 0.008, pedigree (1,1,4,1,1)
  (same comment as for iron scrap, unsorted)
- Occupation, industrial area [natural resource, land]: 2.00461e6 m2*year; = land*wwtp_lifetime; lognormal variance with pedigree 0.008, pedigree (1,1,4,1,1)
  (same comment as for iron scrap, unsorted)
- Transformation, from unspecified [natural resource, land]: 50115.2 m2; = (A_landuse* Q_av^-B_landuse)* Q_av; lognormal variance with pedigree 0.008, pedigree (1,1,4,1,1)
  (same comment as for iron scrap, unsorted)

## Sampling procedure
Based on data collection at plan published in Godin, D. (2012).

## Extrapolations
This dataset has been extrapolated from year 2012 to the year of the calculation (2021). The uncertainty has been adjusted accordingly.
