# nitrile-compound production

Dataset: EcoSpold 2, unit process
Geography: RoW
Time period: 2000-01-01 to 2021-12-31
Technology level: current
Classification: ISIC rev.4 ecoinvent: 2021:Manufacture of pesticides and other agrochemical products
Synonyms: cyanides
Scenario: Business-as-Usual
System model: Allocation, cut-off by classification
Share of production covered: 100 %
Generated by: Jürgen Sutter
Published in: Nemecek, T. 2007
Database: ecoinvent
isCopyrightProtected: true
accessRestrictedTo: 1

## General comment
This dataset represents the production of nitrile-compounds. Nitriles are herbicides with a nitrile group and are produced by halogenation and nitrilation of an aromate. This dataset was calculated from the arithmetic mean of all inputs and outputs of the production of bromoxynil, chlorothalonil, dichlobenil, and ioxynil. The raw materials are modelled with a stoichiometric calculations, while the energy consumption is modelled with data from a similar process. The emissions are estimated and the infrastructure is included with a default value.
References:
Nemecek T. & Kägi T. (2007) Life Cycle Inventories of Swiss and European Agricultural Production Systems. Final report ecoinvent V2.0 No. 15a. Agroscope Reckenholz-Taenikon Research Station ART, Swiss Centre for Life Cycle Inventories, Zurich and Dübendorf, CH.
Gendorf (2016) Umwelterklärung 2015, Werk Gendorf Industriepark, www.gendorf.de.

## Included activities start
From reception of precursors at the factory gate.

## Included activities end
This activity ends with nitrile-compounds at the factory gate. The dataset includes the input materials, energy uses, infrastructure and emissions. The dataset doesn't include emulsives, additives etc.

## Geography
The inventory is modelled for Europe but is assumed to be representative of the global production. Some values are based on data from a large chemical factory located in Germany. These are assumed to be valid for this geography.

## Technology
This dataset was calculated from the arithmetic mean of all inputs and outputs of the production of bromoxynil, chlorothalonil, dichlobenil, and ioxynil.
Bromoxynil is produced in four steps from phenol:
C6H6O + CHCl3 + KOH → C7H6O2 + 2 HCl + KCl
C7H6O2 + 2 Br2 → C7H4Br2O2 + HBr
C7H4Br2O2 + NH3O → C7H5Br2NO2 + H2O
C7H5Br2NO2 → C7H2Br2NO + H2O
Precursors that are used for the bromoxynil production are hydroxylamine ((NH3OH)2SO4) and nitrous dioxide (NO2).
Chlorothalonil is produced in three steps from xylene:
2 C8H10 + 2 NH3 + 3 O2 → 2 C8H7N + 6 H2O
2 C8H7N + 2 NH3 + 3 O2 → 2 C8H4N2 + 6 H2O
C8H4N2 + 4 Cl2 → C8Cl4N2 + 4 HCl
Dichlobenil is produced in four steps from o-dichlorobenzene:
C7H8 + 4 Cl2 → C7H4Cl4 + 4 HCl
C7H4Cl3 + H2O → C7H4Cl2O + 2 HCl
C7H4Cl2O + NH3O → C7H5Cl2NO + H2O
C7H5Cl2NO → C7H3Cl2N + H2O
Precursors that are used for the dichlobenil production are hydroxylamine (NH3O) and nitrous dioxide (NO2).
Ioxynil is produced in four steps from phenol:
C6H6O + CHCl3 + KOH → C7H6O2 + 2 HCl + KCl
C7H6O2 + 2 I2 → C7H4I2O2 + HI
C7H4I2O2 + NH3O → C7H5I2NO2 + H2O
C7H5I2NO2 → C7H2I2NO + H2O
Precursors that are used for the ioxynil production are hydroxylamine (NH3O) and nitrous dioxide (NO2).
Precursors:
Hydroxylamine (NH3O) is produced in five steps from ammonia:
4 NH3 + 5 O2 → 4 NO + 6 H2O
NO2 + NO + (NH4)2CO3 → 2 N2H4O2 + CO2
N2H4O2 + 2 SO2 + NH3 + H2O → H9N3O7S2
2 H9N3O7S2 + 2 NH3 + 4 H2O → (NH3OH)2SO4 + 3 (NH4)2SO4
(NH3OH)2SO4 + 2 NaOH → 2 NH3O + Na2SO4 + 2 H2O
Nitrous dioxide (NO2) is produced by oxidation of nitrogen:
2 NO + O2 → 2 NO2

## Time period
Time of publications. Some values are based on data published by the Gendorf factory that were collected between 2011 and 2015. The time period has been adjusted accordingly. For more details, see the comments of the exchanges.

## Parameters
- fraction, cooling water, recirculating system, to air: 0.771 dimensionless; name fraction_CW_R_to_air; lognormal variance with pedigree 0.0413, pedigree (2,3,1,3,1)
  Calculated based on literature value (Scown, C.D., 2011, Water Footprint of U.S. Transportation Fuels and supplying information of the article) (Vionnet, S., Quantis Water Database - Technical Report, 2012).
- fraction, cooling water, to air: 0.3875 dimensionless; name fraction_CW_to_air; = (0.5*fraction_CW_OT_to_air)+(0.5*fraction_CW_R_to_air); lognormal variance with pedigree 0.092025, pedigree (4,4,3,2,4)
  Calculated value based on literature value (see comments of the other parametres present in this dataset) and expert opinion. In the case when no industry/literature data are available about the type of cooling or directly fraction, cooling water, to air specific for the process a default assumption is applied. It is assumed that the once-through cooling system is used in 50% of all cases and recirculating system is used in another 50% of all cases.
- fraction, process water, to air: 0.205 dimensionless; name fraction_PW_to_air; lognormal variance with pedigree 0.092025, pedigree (4,4,3,2,4)
  Literature value (Statistics Canada, 2007 & Shaffer, K.H., 2008, Consumptive water use in the Great Lakes Basin, USGS) (Vionnet, S., Quantis Water Database - Technical Report, 2012).
- fraction, cooling water, once-through system, to air: 0.004 dimensionless; name fraction_CW_OT_to_air; lognormal variance with pedigree 0.0413, pedigree (2,3,1,3,1)
  (same comment as for fraction, cooling water, recirculating system, to air)
- fraction, water, decarbonised, to air: 0.3875 dimensionless; name fraction_WDC_to_air; = fraction_CW_to_air; lognormal variance with pedigree 0.092025, pedigree (4,4,3,2,4)
  Calculated value. See comments in the other parametres present in this dataset. Decarbonised water is considered to be always used as cooling water, thus cooling water fractions to air are applied to all carbonised water input flows to calculate the amount of water consumed in the processes.
- fraction, cooling water, cooling pond system, to air: 0.032 dimensionless; name fraction_CW_CP_to_air; lognormal variance with pedigree 0.0413, pedigree (2,3,1,3,1)
  (same comment as for fraction, cooling water, recirculating system, to air)

## Reference product
- nitrile-compound: 1 kg; name RP; CPC 3466: Insecticides, fungicides, herbicides and disinfectants; By-product classification allocatable product; CAS 893737-15-0
  Nitrile-compounds can have different modes of action. Chorothalonil, which is an fungicide, has a multi-site contact activity; bromoxynil, ioxyni, which are herbicides, act as inhibitors of photosynthesis at photosystem II site B; and dichlobenil, which is also a herbicide, acts as an inhibitor of cell wall synthesis site A.
  production volume 2.76155e7 kg; name RP_PV
    The addition of the consumption volumes in the US in 2002 (from USGS, 2002 Pesticide use Maps) of the nitrile-compounds bromoxynil, chlorothalonil, dichlobenil, myclobutanil has been used to estimate the production volumes of this type of pesticide in the world. For that, it has been extrapolated to a Global production mix using the ha of Arable land and Permanent crops of US versus the ha of Arable land and Permanent crops in the world in 2002 (1514/179 million ha; FAOSTAT).
  property carbon content, fossil 0.344995
    An unweighted average of the C content in chlorothalonil, dichlobenil, bromoxynil, ioxynil, substances classified as nitrile-compounds in Tab 2.25, Sutter 2010
  property price 4.26 EUR2005
    Macrotrends (2020). Euro Dollar Exchange Rate (EUR USD) - Historical Chart [Online]. Available from: https://www.macrotrends.net/2548/euro-dollar-exchange-rate-historical-chart [Accessed 28/07/2020]
  property carbon content 0.344995
    carbon content on a dry matter basis (reserved; not for manual entry)
  properties: water in wet mass 0 kg, wet mass 1 kg, water content 0, carbon content, non-fossil 0, dry mass 1 kg, carbon allocation 0.344995 kg

## Inputs from technosphere
- electricity, medium voltage: 0 kWh; source Gendorf 2000; pedigree (1,1,1,1,1)
  Estimation, assuming a default value, originated from the calculation of an average consumption of electricity and heat per kg of product (3.2 MJ/kg), and a resulting amount of electricity of 0.333 kWh for every reaction step per kg reaction product, considering that the demand is made up of a mix that includes 38% electricity. Additionally, reaction steps are approximated with energy consumption data, assuming that inventory flows can be estimated using process data for basic operation steps, available for specific organic chemicals.
  Further references:
  Kim S., Overcash M.: Energy in chemical manufacturing processes: gate-to-gate information for life cycle assessment. In: Journal of Chemical Technology & Biotechnology vol. 78, no. 9: 995-1005(11). 2003
  Uncertainty: E
- potassium hydroxide: 0.10873 kg; source Unger T A 1996; lognormal variance with pedigree 0.0382, pedigree (4,5,2,5,1)
  Stoichiometric calculation, assuming an efficiency of 95% per reaction step.
  Uncertainty: S
  properties: wet mass 1 kg, dry mass 0.856 kg, water content 0.168224
- chlorine, liquid: 1.0529 kg; source Unger T A 1996; lognormal variance with pedigree 0.0382, pedigree (4,5,2,5,1)
  (same comment as for potassium hydroxide)
  properties: dry mass 1 kg, wet mass 1 kg
- phenol: 0.18251 kg; source Unger T A 1996; lognormal variance with pedigree 0.0382, pedigree (4,5,2,5,1)
  (same comment as for potassium hydroxide)
  properties: carbon content, fossil 0.765957, dry mass 1 kg, wet mass 1 kg, heating value, net 30.93 MJ
- xylene: 0.11708 kg; source Unger T A 1996; lognormal variance with pedigree 0.0382, pedigree (4,5,2,5,1)
  (same comment as for potassium hydroxide)
  properties: wet mass 1 kg, carbon content, fossil 0.905061, dry mass 1 kg, heating value, net 38.84 MJ
- chemical factory, organics: 2.1165e-9 unit; lognormal variance with pedigree 0.31, pedigree (2,3,2,4,3)
  Calculated based on literature data published by the industry. For this activity, no information was readily available concerning infrastructure and land-use. Therefore, the infrastructure is estimated based on data from two chemical factories, the BASF site of Ludwigshafen and the chemical factory in Gendorf (which are both located in Germany), which produce a wide range of chemical substances. Based on this data, the following assumptions are made: the built area amounts to about 4.2 ha, the plant has an average output of 50'000 t/a and a lifespan of fifty years. The estimated infrastructure amount is therefore 4.00 E-10 units per kg of produced chemical. Furthermore, for this dataset, the infrastructure amount is accounted for each production step. This may be an overestimation in some multistep syntheses.
  References:
  Althaus H.-J., Chudacoff M., Hischier R., Jungbluth N., Osses M. and Primas A. (2007) Life Cycle Inventories of Chemicals. ecoinvent report No. 8, v2.0. EMPA Dübendorf, Swiss Centre for Life Cycle Inventories, Dübendorf, CH.
  Gendorf (2000) Umwelterklärung 2000, Werk Gendorf. Werk Gendorf, Burgkirchen.'
- oxygen, liquid: 0.32607 kg; source Unger T A 1996; lognormal variance with pedigree 0.0382, pedigree (4,5,2,5,1)
  Stoichiometric calculation, assuming an efficiency of 100% per reaction step.
  Further references:
  Kim et al. 2003. Kim S., Overcash M.: Energy in chemical manufacturing processes: gate-to-gate information for life cycle assessment. In: Journal of Chemical Technology & Biotechnology vol. 78, no. 9: 995-1005(11). 2003
  Laue et al. 2000. Wolfgang Laue, Michael Thiemann, Erich Scheibler, Karl Wilhelm Wiegand: Nitrates and Nitrites. In: Ullmann's Encyclopedia of Industrial Chemistry, Seventh Edition, 2009 Electronic Release (ed. Fiedler E., Grossmann G., Kersebohm D., Weiss G. and Witte C.). 7 th Electronic Release Edition. Wiley InterScience, New York, Article Online Posting Date: June 15, 2000. Online-Version under: DOI: 10.1002/14356007.a17_265
  Ritz et al. 2000. Josef Ritz, Hugo Fuchs, Howard G. Perryman: Hydroxylamine. In: Ullmann's Encyclopedia of Industrial Chemistry, Seventh Edition, 2009 Electronic Release (ed. Fiedler E., Grossmann G., Kersebohm D., Weiss G. and Witte C.). 7 th Electronic Release Edition. Wiley InterScience, New York, Article Online Posting Date: June 15, 2000. Online-Version under: DOI: 10.1002/14356007.a13_527
  Thiemann et al. 2000. Michael Thiemann, Erich Scheibler, Karl Wilhelm Wiegand: Nitric Acid, Nitrous Acid, and Nitrogen Oxides. In: Ullmann's Encyclopedia of Industrial Chemistry, Seventh Edition, 2009 Electronic Release (ed. Fiedler E., Grossmann G., Kersebohm D., Weiss G. and Witte C.). 7 th Electronic Release Edition. Wiley InterScience, New York, Article Online Posting Date: June 15, 2000. Online-Version under: DOI: 10.1002/14356007.a17_293
  Uncertainty: S
  properties: dry mass 1 kg, wet mass 1 kg
- water, decarbonised: 0 kg; name water_decarbonised_input; source Unger T A 1996; pedigree (1,1,1,1,1)
  Stoichiometric calculation, assuming an efficiency of 100%.
  Further references:
  Laue et al. 2000. Wolfgang Laue, Michael Thiemann, Erich Scheibler, Karl Wilhelm Wiegand: Nitrates and Nitrites. In: Ullmann's Encyclopedia of Industrial Chemistry, Seventh Edition, 2009 Electronic Release (ed. Fiedler E., Grossmann G., Kersebohm D., Weiss G. and Witte C.). 7 th Electronic Release Edition. Wiley InterScience, New York, Article Online Posting Date: June 15, 2000. Online-Version under: DOI: 10.1002/14356007.a17_265
  Ritz et al. 2000. Josef Ritz, Hugo Fuchs, Howard G. Perryman: Hydroxylamine. In: Ullmann's Encyclopedia of Industrial Chemistry, Seventh Edition, 2009 Electronic Release (ed. Fiedler E., Grossmann G., Kersebohm D., Weiss G. and Witte C.). 7 th Electronic Release Edition. Wiley InterScience, New York, Article Online Posting Date: June 15, 2000. Online-Version under: DOI: 10.1002/14356007.a13_527
  Thiemann et al. 2000. Michael Thiemann, Erich Scheibler, Karl Wilhelm Wiegand: Nitric Acid, Nitrous Acid, and Nitrogen Oxides. In: Ullmann's Encyclopedia of Industrial Chemistry, Seventh Edition, 2009 Electronic Release (ed. Fiedler E., Grossmann G., Kersebohm D., Weiss G. and Witte C.). 7 th Electronic Release Edition. Wiley InterScience, New York, Article Online Posting Date: June 15, 2000. Online-Version under: DOI: 10.1002/14356007.a17_293
  Stoichiometric calculation, assuming an efficiency of 100%.
  Further references:
  Laue et al. 2000. Wolfgang Laue, Michael Thiemann, Erich Scheibler, Karl Wilhelm Wiegand: Nitrates and Nitrites. In: Ullmann's Encyclopedia of Industrial Chemistry, Seventh Edition, 2009 Electronic Release (ed. Fiedler E., Grossmann G., Kersebohm D., Weiss G. and Witte C.). 7 th Electronic Release Edition. Wiley InterScience, New York, Article Online Posting Date: June 15, 2000. Online-Version under: DOI: 10.1002/14356007.a17_265
  Ritz et al. 2000. Josef Ritz, Hugo Fuchs, Howard G. Perryman: Hydroxylamine. In: Ullmann's Encyclopedia of Industrial Chemistry, Seventh Edition, 2009 Electronic Release (ed. Fiedler E., Grossmann G., Kersebohm D., Weiss G. and Witte C.). 7 th Electronic Release Edition. Wiley InterScience, New York, Article Online Posting Date: June 15, 2000. Online-Version under: DOI: 10.1002/14356007.a13_527
  Thiemann et al. 2000. Michael Thiemann, Erich Scheibler, Karl Wilhelm Wiegand: Nitric Acid, Nitrous Acid, and Nitrogen Oxides. In: Ullmann's Encyclopedia of Industrial Chemistry, Seventh Edition, 2009 Electronic Release (ed. Fiedler E., Grossmann G., Kersebohm D., Weiss G. and Witte C.). 7 th Electronic Release Edition. Wiley InterScience, New York, Article Online Posting Date: June 15, 2000. Online-Version under: DOI: 10.1002/14356007.a17_293
  Uncertainty: S
  properties: wet mass 1 kg
- ammonium carbonate: 0.20977 kg; source Laue W. 2009; lognormal variance with pedigree 0.0382, pedigree (4,5,2,5,1)
  Stoichiometric calculation, assuming an efficiency of 95% per reaction step.
  Further references:
  Ritz et al. 2000. Josef Ritz, Hugo Fuchs, Howard G. Perryman: Hydroxylamine. In: Ullmann's Encyclopedia of Industrial Chemistry, Seventh Edition, 2009 Electronic Release (ed. Fiedler E., Grossmann G., Kersebohm D., Weiss G. and Witte C.). 7 th Electronic Release Edition. Wiley InterScience, New York, Article Online Posting Date: June 15, 2000. Online-Version under: DOI: 10.1002/14356007.a13_527
  Thiemann et al. 2000. Michael Thiemann, Erich Scheibler, Karl Wilhelm Wiegand: Nitric Acid, Nitrous Acid, and Nitrogen Oxides. In: Ullmann's Encyclopedia of Industrial Chemistry, Seventh Edition, 2009 Electronic Release (ed. Fiedler E., Grossmann G., Kersebohm D., Weiss G. and Witte C.). 7 th Electronic Release Edition. Wiley InterScience, New York, Article Online Posting Date: June 15, 2000. Online-Version under: DOI: 10.1002/14356007.a17_293
  Uncertainty: S
  properties: carbon content, fossil 0.125, dry mass 1 kg, wet mass 1 kg, heating value, net 13.88 MJ
- nitrogen, liquid: 0.019 kg; lognormal variance with pedigree 0.0106, pedigree (2,3,2,4,3)
  Calculated based on literature data published by the industry. This value is a 5-year average of data (2011 - 2015) published by the Gendorf factory (Gendorf, 2016, Umwelterklärung, www.gendorf.de), (Gendorf, 2015, Umwelterklärung, www.gendorf.de), (Gendorf, 2014, Umwelterklärung, www.gendorf.de). The amount of nitrogen used per kg of chemical substance produced is calculated using literature data published by the Gendorf factory based in Germany, which produces a wide range of chemical substances. The factory produced 1657400 tonnes of chemical substances in the year 2015 (Gendorf, 2016, Umwelterklärung, www.gendorf.de) and 740000 tonnes of intermediate products. The reported amount of nitrogen used in 2015 was 33512400 Nm3 (Gendorf, 2016, Umwelterklärung, www.gendorf.de). One Nm3 of nitrogen is equal to 1.2506 kg. The resulting amount of nitrogen - the 5-year average (2011 - 2015, weighted by production volume) is 0.019 kg/kg. Nitrogen is mainly used during the production of chemicals for 'blanketing', which is the process of applying gas to the vapour space of a container or vessel in order to control its composition.
  properties: wet mass 1 kg, dry mass 1 kg
- trichloromethane: 0.22911 kg; source Unger T A 1996; lognormal variance with pedigree 0.0382, pedigree (4,5,2,5,1)
  (same comment as for potassium hydroxide)
  properties: wet mass 1 kg, carbon content, fossil 0.101695, heating value, net 4.06 MJ, dry mass 1 kg
- ammonia, anhydrous, liquid: 0 kg; source Unger T A 1996; pedigree (1,1,1,1,1)
  Stoichiometric calculation, assuming an efficiency of 95% per reaction step.
  Further references:
  Laue et al. 2000. Wolfgang Laue, Michael Thiemann, Erich Scheibler, Karl Wilhelm Wiegand: Nitrates and Nitrites. In: Ullmann's Encyclopedia of Industrial Chemistry, Seventh Edition, 2009 Electronic Release (ed. Fiedler E., Grossmann G., Kersebohm D., Weiss G. and Witte C.). 7 th Electronic Release Edition. Wiley InterScience, New York, Article Online Posting Date: June 15, 2000. Online-Version under: DOI: 10.1002/14356007.a17_265
  Ritz et al. 2000. Josef Ritz, Hugo Fuchs, Howard G. Perryman: Hydroxylamine. In: Ullmann's Encyclopedia of Industrial Chemistry, Seventh Edition, 2009 Electronic Release (ed. Fiedler E., Grossmann G., Kersebohm D., Weiss G. and Witte C.). 7 th Electronic Release Edition. Wiley InterScience, New York, Article Online Posting Date: June 15, 2000. Online-Version under: DOI: 10.1002/14356007.a13_527
  Thiemann et al. 2000. Michael Thiemann, Erich Scheibler, Karl Wilhelm Wiegand: Nitric Acid, Nitrous Acid, and Nitrogen Oxides. In: Ullmann's Encyclopedia of Industrial Chemistry, Seventh Edition, 2009 Electronic Release (ed. Fiedler E., Grossmann G., Kersebohm D., Weiss G. and Witte C.). 7 th Electronic Release Edition. Wiley InterScience, New York, Article Online Posting Date: June 15, 2000. Online-Version under: DOI: 10.1002/14356007.a17_293
  Uncertainty: S
  properties: wet mass 1 kg, dry mass 1 kg
- heat, district or industrial, natural gas: 0 MJ; source Gendorf 2000; pedigree (1,1,1,1,1)
  Estimation, assuming a default value, originated from the calculation of an average consumption of electricity and heat per kg of product (3.2 MJ/kg), and a resulting amount of heat of 2 MJ for every reaction step per kg reaction product, considering that the demand is made up of a mix that includes 50% natural gas. Additionally, reaction steps are approximated with energy consumption data, assuming that inventory flows can be estimated using process data for basic operation steps, available for specific organic chemicals.
  Further references:
  Kim S., Overcash M.: Energy in chemical manufacturing processes: gate-to-gate information for life cycle assessment. In: Journal of Chemical Technology & Biotechnology vol. 78, no. 9: 995-1005(11). 2003
  Uncertainty: E
  properties: heating value, net 1 MJ
- toluene, liquid: 0.15846 kg; source Unger T A 1996; lognormal variance with pedigree 0.0382, pedigree (4,5,2,5,1)
  (same comment as for potassium hydroxide)
  properties: heating value, net 38.17 MJ, wet mass 1 kg, dry mass 1 kg, carbon content, fossil 0.913043
- inert waste, for final disposal: -0.94984 kg; name BP_inert_waste_for_final_disposal; lognormal variance with pedigree 0.0382, pedigree (4,5,2,5,1)
  Stoichiometric calculation
  Uncertainty: S
  production volume 2.62303e7 kg; = RP_PV*BP_inert_waste_for_final_disposal/ABS(RP)
    Calculated from the production volume of nitrile-compound in proportion to the respective output amounts.
  property price 0 EUR2005; name BP_inert_waste_for_final_d_price_EUR2005
  properties: water content 0.00502513, wet mass 1 kg, dry mass 0.995 kg
- hydrochloric acid, without water, in 30% solution state: 0.0063895 kg; source Unger T A 1996; lognormal variance with pedigree 0.0382, pedigree (4,5,2,5,1)
  Stoichiometric calculation, assuming an efficiency of 100%.
  Uncertainty: S
  properties: heating value, net 3.32 MJ, wet mass 1 kg, dry mass 1 kg
- sulfur dioxide, liquid: 0.50345 kg; source Laue W. 2009; lognormal variance with pedigree 0.0382, pedigree (4,5,2,5,1)
  (same comment as for ammonium carbonate)
  properties: dry mass 1 kg, wet mass 1 kg
- heat, district or industrial, other than natural gas: 0 MJ; source Gendorf 2000; pedigree (1,1,1,1,1)
  Estimation, assuming a default value, originated from the calculation of an average consumption of electricity and heat per kg of product (3.2 MJ/kg), and a resulting amount of heat of 2 MJ for every reaction step per kg reaction product, considering that the demand is made up of a mix that includes 12% steam from external energy sources. Additionally, reaction steps are approximated with energy consumption data, assuming that inventory flows can be estimated using process data for basic operation steps, available for specific organic chemicals.
  Further references:
  Kim S., Overcash M.: Energy in chemical manufacturing processes: gate-to-gate information for life cycle assessment. In: Journal of Chemical Technology & Biotechnology vol. 78, no. 9: 995-1005(11). 2003
  Uncertainty: E
  properties: heating value, net 1 MJ
- sodium hydroxide, without water, in 50% solution state: 0.9798 kg; source Laue W. 2009; lognormal variance with pedigree 0.0382, pedigree (4,5,2,5,1)
  Stoichiometric calculation, assuming an efficiency of 100%.
  Further references:
  Laue et al. 2000. Wolfgang Laue, Michael Thiemann, Erich Scheibler, Karl Wilhelm Wiegand: Nitrates and Nitrites. In: Ullmann's Encyclopedia of Industrial Chemistry, Seventh Edition, 2009 Electronic Release (ed. Fiedler E., Grossmann G., Kersebohm D., Weiss G. and Witte C.). 7 th Electronic Release Edition. Wiley InterScience, New York, Article Online Posting Date: June 15, 2000. Online-Version under: DOI: 10.1002/14356007.a17_265
  Ritz et al. 2000. Josef Ritz, Hugo Fuchs, Howard G. Perryman: Hydroxylamine. In: Ullmann's Encyclopedia of Industrial Chemistry, Seventh Edition, 2009 Electronic Release (ed. Fiedler E., Grossmann G., Kersebohm D., Weiss G. and Witte C.). 7 th Electronic Release Edition. Wiley InterScience, New York, Article Online Posting Date: June 15, 2000. Online-Version under: DOI: 10.1002/14356007.a13_527
  Thiemann et al. 2000. Michael Thiemann, Erich Scheibler, Karl Wilhelm Wiegand: Nitric Acid, Nitrous Acid, and Nitrogen Oxides. In: Ullmann's Encyclopedia of Industrial Chemistry, Seventh Edition, 2009 Electronic Release (ed. Fiedler E., Grossmann G., Kersebohm D., Weiss G. and Witte C.). 7 th Electronic Release Edition. Wiley InterScience, New York, Article Online Posting Date: June 15, 2000. Online-Version under: DOI: 10.1002/14356007.a17_293
  Uncertainty: S
  properties: dry mass 1 kg, wet mass 1 kg, heating value, net 3.03 MJ
- electricity, medium voltage: 0.0261759, 0.0050194, 0.0842654, 1.22556, 0.172744, 0.562826 kWh (6 entries); source Gendorf 2000; lognormal variance with pedigree 0.0382, pedigree (4,5,2,5,1)
  (same comment as for electricity, medium voltage)
- water, decarbonised: 0.00449974, 0.0117083, 0.0472224, 0.00601334, 0.0878654, 0.000574804, 0.074586 kg (7 entries); source Unger T A 1996; lognormal variance with pedigree 0.0382, pedigree (4,5,2,5,1)
  (same comment as for water, decarbonised)
- ammonia, anhydrous, liquid: 0.0510596, 0.00438919, 0.00682845, 0.0135296, 0.0132554, 0.00138931, 0.00621073, 0.146928 kg (8 entries); source Unger T A 1996; lognormal variance with pedigree 0.0382, pedigree (4,5,2,5,1)
  (same comment as for ammonia, anhydrous, liquid)
- heat, district or industrial, natural gas: 0.454841, 29.512 MJ (2 entries); source Gendorf 2000; lognormal variance with pedigree 0.0382, pedigree (4,5,2,5,1)
  (same comment as for heat, district or industrial, natural gas)
- heat, district or industrial, other than natural gas: 0.00677988, 16.7194 MJ (2 entries); source Gendorf 2000; lognormal variance with pedigree 0.0382, pedigree (4,5,2,5,1)
  (same comment as for heat, district or industrial, other than natural gas)

## Inputs from nature
- Water, salt, sole [natural resource, in water]: 1.48145 m3; name water_salt_sole_input; = ((bromine_input/0.0023)+( iodine_input/0.0003))/1000; lognormal variance with pedigree 0.0382, pedigree (4,5,2,5,1)
  There are intermediates containing bromine and iodine in this process and this input is used as an input in the bromine and iodine production.
  The concentration of bromine in water, salt, sole is 0.23% = 0.0023kg/kg. Cross-referenced: 0.25% (Ullmann's encyclopedia), 0.4% (USGS). The concentration of iodine in water, salt, sole is 0.03% = 0.0003kg/kg. Cross-referenced: 0.015% - 0.12% (Ullmann's encyclopedia).
  There are intermediates containing bromine and iodine in this process and this input is used as an input in the bromine and iodine production.
  The concentration of bromine in water, salt, sole is 0.23% = 0.0023kg/kg. Cross-referenced: 0.25% (Ullmann's encyclopedia), 0.4% (USGS). The concentration of iodine in water, salt, sole is 0.03% = 0.0003kg/kg. Cross-referenced: 0.015% - 0.12% (Ullmann's encyclopedia).
  Uncertainty: S
- Water, cooling, unspecified natural origin [natural resource, in water]: 0.12001 m3; name water_cooling_UNO_input; source Gendorf 2000; lognormal variance with pedigree 0.0382, pedigree (4,5,2,5,1)
  Estimation (24 kg cooling water per kg produced chemical per step).
  Uncertainty: E
- Iodine, in water [natural resource, in water]: 0.40034 kg; name iodine_input; source Unger T A 1996; lognormal variance with pedigree 0.0382, pedigree (4,5,2,5,1)
  0.03% I; Stoichiometric calculation, assuming an efficiency of 95% per reaction step.
  Uncertainty: S
- Bromine, in water [natural resource, in water]: 0.33807 kg; name bromine_input; source Unger T A 1996; lognormal variance with pedigree 0.0382, pedigree (4,5,2,5,1)
  0.23% Br in water; Stoichiometric calculation, assuming an efficiency of 95% per reaction step.
  Uncertainty: S

## Emissions to nature
- Nitrogen oxides [air, urban air close to ground]: 0.00046592 kg; lognormal variance with pedigree 0.188, pedigree (4,5,5,5,5)
  Estimation, based on the assumption that 0.2% of volatile input materials is emitted to air occurring from the purge vent, the destillation vent and fugitive emission sources.
  Uncertainty: E
- Nitrogen [air, unspecified]: 0.019 kg; lognormal variance with pedigree 0.0106, pedigree (2,3,2,4,3)
  Calculated value. The amount of nitrogen released to air is equal to the amount of nitrogen entering the activity.
- Nitrate [water, surface water]: 0.012063 kg; lognormal variance with pedigree 0.188, pedigree (4,5,5,5,5)
  Estimation, assuming that the remaining amount of unreacted input materials leave the production process with the wastewater, wich is further treated in an internal wastewater plant. For the nitrogen containing compounds within the wastewater a removal efficiency of 50% was assumed. The nitrogen emitted to air (N2) is neglected.
  Uncertainty: E
- m-Xylene [water, surface water]: 0.00056197 kg; lognormal variance with pedigree 0.448, pedigree (4,5,5,5,5)
  Estimation, assuming that the remaining amount of unreacted input materials leave the production process with the wastewater, wich is further treated in an internal wastewater plant.
  Uncertainty: E
- m-Xylene [air, urban air close to ground]: 0.00023415 kg; lognormal variance with pedigree 0.188, pedigree (4,5,5,5,5)
  (same comment as for Nitrogen oxides)
- COD, Chemical Oxygen Demand [water, unspecified]: 0.00424064 kg; lognormal variance with pedigree 0.218, pedigree (4,5,5,5,5)
  Calculated value. The BOD, COD, TOC and BOD5 are calculated based on the amount and type of emissions released to water in the same activity.
- Iodide [water, surface water]: 0.22687 kg; lognormal variance with pedigree 0.798, pedigree (4,5,5,5,5)
  (same comment as for m-Xylene)
- BOD5, Biological Oxygen Demand [water, unspecified]: 0.00424064 kg; lognormal variance with pedigree 0.218, pedigree (4,5,5,5,5)
  (same comment as for COD, Chemical Oxygen Demand)
- Chloroform [water, surface water]: 0.00046986 kg; lognormal variance with pedigree 0.448, pedigree (4,5,5,5,5)
  (same comment as for m-Xylene)
- DOC, Dissolved Organic Carbon [water, unspecified]: 0.00134117 kg; lognormal variance with pedigree 0.218, pedigree (4,5,5,5,5)
  (same comment as for COD, Chemical Oxygen Demand)
- Chloroform [air, urban air close to ground]: 0.00019577 kg; lognormal variance with pedigree 0.188, pedigree (4,5,5,5,5)
  (same comment as for Nitrogen oxides)
- TOC, Total Organic Carbon [water, unspecified]: 0.00134117 kg; lognormal variance with pedigree 0.218, pedigree (4,5,5,5,5)
  (same comment as for COD, Chemical Oxygen Demand)
- Chlorine [air, urban air close to ground]: 0.0015228 kg; lognormal variance with pedigree 0.188, pedigree (4,5,5,5,5)
  (same comment as for Nitrogen oxides)
- Water [water, unspecified]: 1.2514 m3; = (water_decarbonised_input/1000)*(1-fraction_WDC_to_air)+water_cooling_UNO_input*(1-fraction_CW_to_air)+water_salt_sole_input*(1-fraction_PW_to_air); lognormal variance with pedigree 0.0429, pedigree (2,2,2,5,1)
  Calculated as a fraction of the input of water. For more details, refer to the mathematical relation and the parameters.
  property wet mass 1000 kg; name WM
  property fraction, origin: unspecified 0.0587389; name fraction_origin_unspecified_Ww
  property dry mass 0 kg; name DM
  property carbon content, non-fossil 0; name C_content_non_fossil
  property fraction, origin: salt water 0.941147; name fraction_origin_salt_water_Ww
  property water in wet mass 1000 kg; name WWM
  property fraction, origin: fresh water 0.000113782; name fraction_origin_fresh_water_Ww
  property carbon content, fossil 0; name C_content_fossil
- Chloride [water, surface water]: 0.72133 kg; lognormal variance with pedigree 0.448, pedigree (4,5,5,5,5)
  (same comment as for m-Xylene)
- Water [air, unspecified]: 0.350292 m3; = (water_decarbonised_input/1000*fraction_WDC_to_air)+(water_cooling_UNO_input*fraction_CW_to_air)+(water_salt_sole_input*fraction_PW_to_air); lognormal variance with pedigree 0.0429, pedigree (2,2,2,5,1)
  (same comment as for Water)
  property fraction, origin: salt water 0.866985; name fraction_origin_salt_water
  property fraction, origin: unspecified 0.132757; name fraction_origin_unspecified
  property fraction, origin: fresh water 0.000257163; name fraction_origin_fresh_water
- Carbonate [water, surface water]: 0.013111 kg; lognormal variance with pedigree 0.448, pedigree (4,5,5,5,5)
  (same comment as for m-Xylene)
- Toluene [water, surface water]: 0.00012677 kg; lognormal variance with pedigree 0.448, pedigree (4,5,5,5,5)
  (same comment as for m-Xylene)
- Carbon dioxide, fossil [air, urban air close to ground]: 0.31736 kg; lognormal variance with pedigree 0.1786, pedigree (4,5,5,5,5)
  Estimation, based on the assumption that 0.2% of volatile input materials is emitted to air occurring from the purge vent, the destillation vent and fugitive emission sources. Remaining gases like CH4 or CO are oxidated to CO2. The carbon contained in the removed carbon compounds from wastewater treatment was accounted as CO2 emissions to air (assuming a removal efficiency of 90%).
  Uncertainty: E
- Toluene [air, urban air close to ground]: 0.00031693 kg; lognormal variance with pedigree 0.188, pedigree (4,5,5,5,5)
  (same comment as for Nitrogen oxides)
- Bromide [water, surface water]: 0.19158 kg; lognormal variance with pedigree 0.798, pedigree (4,5,5,5,5)
  (same comment as for m-Xylene)
- Sulfur dioxide [air, urban air close to ground]: 0.0010069 kg; lognormal variance with pedigree 0.1786, pedigree (4,5,5,5,5)
  (same comment as for Nitrogen oxides)
- Ammonium, ion [water, surface water]: 0.019356 kg; lognormal variance with pedigree 0.188, pedigree (4,5,5,5,5)
  (same comment as for Nitrate)
- Sodium, ion [water, surface water]: 0.48582 kg; lognormal variance with pedigree 0.798, pedigree (4,5,5,5,5)
  (same comment as for m-Xylene)
- Ammonia [air, urban air close to ground]: 0.00048717 kg; lognormal variance with pedigree 0.218, pedigree (4,5,5,5,5)
  (same comment as for Nitrogen oxides)
- Potassium, ion [water, surface water]: 0.075724 kg; lognormal variance with pedigree 0.798, pedigree (4,5,5,5,5)
  (same comment as for m-Xylene)
- Phenol [water, surface water]: 0.00087606 kg; lognormal variance with pedigree 0.448, pedigree (4,5,5,5,5)
  (same comment as for m-Xylene)
- Phenol [air, urban air close to ground]: 0.00036503 kg; lognormal variance with pedigree 0.188, pedigree (4,5,5,5,5)
  (same comment as for Nitrogen oxides)

## Sampling procedure
Literature data. Some values are calculated based on data from a large chemical factory located in Germany. For more details, see the comments of the exchanges.

## Extrapolations
This dataset has been copied from an original dataset covering the geography RER. The uncertainty has been adjusted accordingly.

## Review by Gregor Wernet 2017-08-04
This dataset was additionally reviewed in a separate review process by Eric Johnson of Atlantic Consulting as well as Emilia Moreno Ruiz and Gregor Wernet of ecoinvent.
