# enzymes production

Dataset: EcoSpold 2, unit process
Geography: RER
Time period: 2015-01-01 to 2021-12-31
Technology level: current
Classification: ISIC rev.4 ecoinvent: 2011:Manufacture of basic chemicals
Synonyms: Cellulase; Alpha-amylase; Glucoamylase
Scenario: Business-as-Usual
System model: Allocation, cut-off by classification
Generated by: Lucia Valsasina
Database: ecoinvent
isCopyrightProtected: true
accessRestrictedTo: 1

## General comment
This activity represents the production of 1 kg of enzymes. In this activity we assume enzymes are produced from potato starch along with a bacterial strain. The bacterial strain is ommited leaving the enzyme production based only on potato starch as input. It is assumed that 4.16 kg of potato starch are needed to produce 1 kg of enzymes (Lages and Tannenbaum 2006). Heat and electricity required for the production are taken as the average of the values reported in Dunn et al. (2012) as inputs for the production of the following three enxymes: Alpha-amylase; Glucoamylase; Cellulase.
Reference(s):
Dunn et al. 2012. Energy consumption and greenhouse gas emissions from enzyme and yeast manufacture for corn and cellulosic ethanol production. Biotechnol Lett. DOI 10.1007/s10529-012-1057-6.
Ana C. A. Lages, Steven R. Tannenbaum, 2006, Production of Glucose from Tapioca (Cassava Starch) and Farinha de Mandioca (Cassava Meal). Journal of Food Science, DOI: 10.1111/j.1365-2621.1978.tb02474.x
For more information on the model please refer to the dedicate ecoinvent report, access it in the Report section of ecoQuery (http://www.ecoinvent.org/login-databases.html)

## Included activities start
The activity starts when the raw materials enter the process.

## Included activities end
Materials entering the process are included as well as energy uses, infrastructure and emissions.

## Geography
The majority of production of enzyme is located in Europe, see the production volume comment: 'Li et al. (2012) report in table 3 the location of the main producers of enzymes. Approximately 77% of the market share is covered by producers based in Europe.'.
Reference(s):
Li et al. 2012. Technology Prospecting on Enzymes: Application, Marketing and Engineering. Comput Struct Biotechnol J. 2012; 2: e201209017. Published online 2012 Nov 9. doi: 10.5936/csbj.201209017

## Time period
The energy data source is dated 2012 referring to 2009 data. This activity is therefore assumed to be valid for the time period from 2009 to 2020.

## Reference product
- enzymes: 1 kg; name RP; By-product classification allocatable product; CPC 34170: Ethers, alcohol peroxides, ether peroxides, epoxides, acetals and hemiacetals, and their halogenated, sulphona[…]
  Enzymes act as catalyst in biochemical reactions.
  production volume 5.39e10 kg; name RP_PV
    Estimated value. Nearly 75% of the total enzymes are produced by three top enzyme companies, i.e. Denmark-based Novozymes, US-based DuPont (through the May 2011 acquisition of Denmark-based Danisco) and Switzerland-based Roche. China produced 700 000 tons of enzymes in the year 2010, this is estimated to be less then 1% of the global market (Li et al. 2012).
    The annual produciton volume is threfore calculated based on the assumption that 700 000 tons of enzymes is equal to 1% of global production.
    Li et al. (2012) report in table 3 the location of the main producers of enzymes. Approximately 77% of the market share is covered by producers based in Europe. We therefore assume this share to be the European production volume.
    Reference(s):
    Li et al. 2012. Technology Prospecting on Enzymes: Application, Marketing and Engineering. Comput Struct Biotechnol J. 2012; 2: e201209017. Published online 2012 Nov 9. doi: 10.5936/csbj.201209017
  property price 15.1 EUR2005; name RP_price_EUR2005
    Estimated value. The price of enzymes can vary depending on the type, use and quantity bought. In this instance we take the enzyme alpha amylase as a product. Alpha amylase price is reported to be between 3 USD to 50 USD per kg. An average value of 20 USD is taken. The website consulted are alibaba.com (https://www.alibaba.com/showroom/a--amylase-price.html), Made-in-China.com (http://www.made-in-china.com/products-search/hot-china-products/Alpha-Amylase.html), amazon.com (https://www.amazon.com/Strange-Brew-F9-QRNM-WIPD-Amylase-enzyme/dp/B006O93SYQ), zauba.com (https://www.zauba.com/import-alpha+amylase+enzymes-hs-code.html). All websites were accessed 19th Sept 2017. Exchange rate used is 1 USD = 0.755 EUR
  property carbon content 0
    carbon content on a dry matter basis (reserved; not for manual entry)
  properties: carbon content, fossil 0, water in wet mass 0 kg, dry mass 1 kg, carbon content, non-fossil 0, wet mass 1 kg, water content 0, carbon allocation 0 kg

## Inputs from technosphere
- potato starch: 4.16667 kg; lognormal variance with pedigree 0.0106, pedigree (2,3,2,4,3)
  To produce enzymes, potato starch is needed along with a bacterial strain. For the sake of simplicity the bacterial strain is ommited leaving the enzyme production based only on potato starch as input. It is assumed that 4.16 kg of potato starch are needed to produce 1 kg of enzymes (Lages and Tannenbaum 2006).
  Reference:
  Ana C. A. Lages, Steven R. Tannenbaum, 2006, Production of Glucose from Tapioca (Cassava Starch) and Farinha de Mandioca (Cassava Meal). Journal of Food Science, DOI: 10.1111/j.1365-2621.1978.tb02474.x
  properties: heating value, net 10.66 MJ, dry mass 0.8 kg, carbon content, non-fossil 0.46, wet mass 1 kg, water content 0.25
  note on carbon content, non-fossil: C-content of starch is considered 46% on dry mass basis (from 'Evolutionary and Biochemical Aspects', A.D. Kay and T. Vrede (in Global Ecology, 2010, Elsevier B.V., S.E. Jørgensen Ed.)).
- heat, from steam, in chemical industry: 8.26667 MJ; lognormal variance with pedigree 0.0106, pedigree (2,3,2,4,3)
  Estimated value. The activity models the average production of enzymes. Heat and electricity are derived from the average of the heat and electricity required for the production of the following three enzymes:Alpha-amylase; Glucoamylase; Cellulase (Dunn et al. 2012).
  Reference(s):
  Dunn et al. 2012. Energy consumption and greenhouse gas emissions from enzyme and yeast manufacture for corn and cellulosic ethanol production. Biotechnol Lett. DOI 10.1007/s10529-012-1057-6.
  properties: heating value, net 1 MJ
- electricity, medium voltage: 6.2963 kWh; lognormal variance with pedigree 0.0106, pedigree (2,3,2,4,3)
  (same comment as for heat, from steam, in chemical industry)

## Sampling procedure
Literature data.

## Extrapolations
This dataset has been extrapolated from year 2020 to the year of the calculation (2021). The uncertainty has been adjusted accordingly.

## Review by Emilia Moreno Ruiz 2017-08-10
This dataset was additionally reviewed in a separate review process by Eric Johnson of Atlantic Consulting as well as Emilia Moreno Ruiz and Gregor Wernet of ecoinvent.
