# praseodymium-neodymium oxide to generic market for mischmetal

Dataset: EcoSpold 2, unit process
Geography: GLO
Time period: 2020-01-01 to 2021-12-31
Technology level: current
Classification: ISIC rev.4 ecoinvent: 0729:Mining of other non-ferrous metal ores
Scenario: Business-as-Usual
System model: Allocation, cut-off by classification
Generated by: Johannes Müller
Database: ecoinvent
isCopyrightProtected: true
accessRestrictedTo: 1

## General comment
This is a renaming activity. It's purpose is to link 'praseodymium-neodymium oxide' to the generic 'market for mischmetal'.

## Included activities start
Activity starts with the reception of 'praseodymium-neodymium oxide'.

## Included activities end
Activity ends with the 'mischmetal' being ready for transportation.

## Geography
dataset represents the global situation

## Time period
based on reference year of production volume

## Reference product
- mischmetal: 1 kg; CPC 34290: Compounds of rare earth metals, of yttrium or of scandium; By-product classification allocatable product
  production volume 188045 kg
    Assuming that approximately 35,000 tonnes and 132,000 tonnes of mischmetal and REOs are, respectively, produced globally each year (Myers, 2009; Gambogi, 2019), we estimated that approximately 27% of REO production is in the form of mischmetal. The amount of praseodymium-neodymium oxide that is used in mischmetal production was therefore calculated as 0.27 multiplied by the sum of praseodymium-neodymium oxide production globally that is represented in the database, i.e. approximately 708000 tonnes. Sources: Myers, H. P. (2009). Introductory Solid State Physics (Second Edition). Taylor & Francis, Philadelphia, PA, US; Gambogi, J. (2019). 2016 Minerals Yearbook - Rare Earths [Advance Release]. US Geological Survey, Reston, VA, US.
  property price 619.06 EUR2005
    Calculated based on inputs: The price of the product has been calculated as a sum of the values of the material and energy inputs for this product. This value is therefore a rough estimation. It may underestimate the real price since there are additional expenses when producing any product. These expences can include for example labour costs, treatment of waste materials and profit for the producer. Please consider carefully whether this level of data quality is acceptable for your application.
  property carbon content 0
    carbon content on a dry matter basis (reserved; not for manual entry)
  properties: wet mass 1 kg, water in wet mass 0 kg, carbon content, fossil 0, water content 0, dry mass 1 kg, carbon content, non-fossil 0, carbon allocation 0 kg

## Inputs from technosphere
- praseodymium-neodymium oxide: 1 kg; lognormal variance with pedigree 0.216, pedigree (5,5,5,5,5)
  properties: wet mass 1 kg, dry mass 1 kg

## Extrapolations
This dataset has been extrapolated from year 2020 to the year of the calculation (2021). The uncertainty has been adjusted accordingly.
