# panel glass production, for cathode ray tube display

Dataset: EcoSpold 2, unit process
Geography: GLO
Time period: 2001-01-01 to 2021-12-31
Technology level: old
Classification: EcoSpold01Categories: electronics/component
Classification: ISIC rev.4 ecoinvent: 2310:Manufacture of glass and glass products
Tags: ConvertedDataset
Scenario: Business-as-Usual
System model: Allocation, cut-off by classification
Generated by: Roland Hischier
Published in: Hischier R. 2007
Database: ecoinvent
isCopyrightProtected: true
accessRestrictedTo: 1

## General comment
This dataset represents the production of 1 kg of panel glass for CRT screen. It is based on a typical size of a computer screen for the year 2004 and a production site with a total life span of 50 years in a typical European production plant. Main data are taken from a European IPCC BAT report about glass production, from producers and literature.
[This dataset was already contained in the ecoinvent database version 2. It was not individually updated during the transfer to ecoinvent version 3. Life Cycle Impact Assessment results may still have changed, as they are affected by changes in the supply chain, i.e. in other datasets. This dataset was generated following the ecoinvent quality guidelines for version 2. It may have been subject to central changes described in the ecoinvent version 3 change report (http://www.ecoinvent.org/database/ecoinvent-version-3/reports-of-changes/), and the results of the central updates were reviewed extensively. The changes added e.g. consistent water flows and other information throughout the database. The documentation of this dataset can be found in the ecoinvent reports of version 2, which are still available via the ecoinvent website. The change report linked above covers all central changes that were made during the conversion process.]

## Included activities start
From reception of raw materials and auxiliaries at the factory gate.

## Included activities end
This dataset includes the material and energy efforts for: preparation and sorting of cullet, melting, forming of CRT panel glass parts, cooling down, packaging and palletising until glass parts are ready for the next process step. Included are as well direct emissions to air, waste water and waste. Infrastructure efforts of the input materials are estimated, based on packaging glass production.

## Geography
Date from one European production site used as global average data, they represent one example of a European production site.

## Technology
Average production composed of: preparation and sorting of cullet, melting, forming of respective CRT glass parts, cooling down and palleting until the glass parts are ready for the next process step. In 1997, in the European Community, a total of 13 furnaces for CRT glass were operated, having a size from 70 up to 360 tonnes per day. The furnace types included are mainly cross-fired regenerative furnaces, but also some oxy-gas fired furnaces are used. In the EU, companies producing CRT glass can be found in UK, Germany and France.

## Parameters
- fraction, process water, to air: 0.061 dimensionless; name fraction_PW_to_air; lognormal variance with pedigree 0.092025, pedigree (4,4,3,2,4)
  Literature value (Statistics Canada, 2007 & Shaffer, K.H., 2008, Consumptive water use in the Great Lakes Basin, USGS) (Vionnet, S., Quantis Water Database - Technical Report, 2012).

## Reference product
- panel glass, for cathode ray tube display: 1 kg; CPC 3719: Other glass articles; By-product classification allocatable product
  Computer monitors or displays are the visual interface between a computer and the user / operator. The CRT technology has been invented by the German physicist Karl Ferdinand Braun in 1897. It is the display technology that has been for a long time used in almost all computer displays, video monitors, televisions, radar displays and oscilloscopes. The CRT technically refers to any electronic vacuum tube employing a focused beam of electrons. Cathode rays work thereby in the form of streams of high speed electrons emitted from the heating of a cathode inside a vacuum tube, at its rear end. The emitted electrons form a beam within the tube due to the voltage difference applied across the two electrodes (the CRT screen typically forms the anode). The beam is then perturbed (deflected), either by a magnetic or an electric field, to trace over ('scan') the inside surface of the screen (anode). The screen is covered with a phosphorescent coating (often transition metals or rare earth elements), which emits visible light when excited by the electrons. Early computer displays used so-called vector monitors, a type of CRT similar to an oscilloscope but typically using magnetic, rather than electrostatic, deflection. Here, the beam traces straight lines between arbitrary points, repeatedly refreshing the display as quickly as possible. Vector displays for computers were limited in that they could display only a shape's outline (advanced vector systems could provide a limited amount of shading), and only a limited amount of crudely-drawn text (the number of shapes and/or textual characters drawn was severely limited, because the speed of refresh was roughly inversely proportional to how many vectors needed to be drawn). Other graphical displays used 'storage tubes'. Such CRTs inherently stored the image, and did not require periodic refreshing. Furthermore, displays for early computers that needed to display more text than was practical by using vectors, or that required high speed for photographic output, used a so-called Charactron CRT. This type incorporates a perforated metal character mask (stencil), which shapes a wide electron beam to form a character on the screen. The system selects a character on the mask using one set of deflection circuits, and selects the position to draw the character at using a second set. The beam is activated briefly to draw the character at that position. Many of these early computer displays used "slow", or long-persistence, phosphors to reduce flicker for the operator. While it reduces eyestrain for relatively static displays, the drawback of long-persistence phosphor is that when the display is changed, it produces a visible afterimage that can take up to several seconds to fade. This makes all these technologies inappropriate for animation, or for real-time dynamic information displays.
  Modern colour tubes use three different phosphors which emit red, green, and blue light respectively. They are packed either in strips or clusters. Such colour CRTs have thus three electron guns, one for each primary colour, arranged either in a straight line or in a triangular configuration (the guns are usually constructed as a single unit). The beam of each gun reaches the dots of exactly one colour; a grille or mask absorbs those electrons that would otherwise hit the wrong phosphor. Since each beam starts at a slightly different location within the tube, and all three beams are perturbed in essentially the same way, a particular deflection charge will cause the beams to hit a slightly different location on the screen (called a 'subpixel'). The so-called dot pitch defines thereby the "native resolution" of such displays. Despite all the advantages that new, flat display technologies seem to have, colour CRTs still find adherents in computer gaming due to their high refresh rates and higher resolution per initial cost. CRT's are also still popular in the printing and broadcasting industries as well as in the profe
  EcoSpold01Location=GLO
  production volume 1 kg
    525'000 t (CRT total, 1997)
    Dummy value to be replaced by measured, estimated or calculated value
  property carbon content, non-fossil 0
    (ecoinvent v2.2 report 18_III-part5). Glass final composition was taken from http://glassproperties.com/glasses/
  property carbon content, fossil 0
    (same comment as for panel glass, for cathode ray tube display)
  property carbon content 0
    carbon content on a dry matter basis (reserved; not for manual entry)
  properties: water in wet mass 0 kg, water content 0, wet mass 1 kg, dry mass 1 kg, price 0.802 EUR2005, carbon allocation 0 kg

## Inputs from technosphere
- zinc: 0.00833 kg; source European Commission 2001; lognormal variance with pedigree 0.0507, pedigree (1,3,5,3,1)
  EcoSpold01Location=RER
  Proxy with literature value, to represent Ti, Co, Sb, Zr, Ni, Zn, Ce compounds,Cobalt, Nickel and Zinc is used.
  Uncertainty: Data from 1 European production site
  properties: dry mass 1 kg, wet mass 1 kg
- municipal solid waste: 0 kg; source European Commission 2001; pedigree (1,1,1,1,1)
  EcoSpold01Location=CH
  Literature Value.
  Uncertainty: Data from 1 European production site
  production volume 0 kg
    Calculated from the production volume of panel glass, for cathode ray tube display in proportion to the respective output amounts.
  properties: water content 0.297017, carbon content, fossil 0.171549, dry mass 0.771 kg, wet mass 1 kg, carbon content, non-fossil 0.261655, heating value, net 11.74 MJ
  note on carbon content, fossil: MSW composition in tab 4.1, ecoinvent v2.2 report 13_I. C content referred to 1 kg DM
  note on heating value, net: Value taken from the general comment of the treatment dataset.
- chemical, organic: 0.00297 kg; source European Commission 2001; lognormal variance with pedigree 0.0507, pedigree (1,3,5,3,1)
  EcoSpold01Location=GLO
  Estimation. The total amount of auxilliaries is taken from literature. The composition was assumed as chemicals organic or solvents organic.
  Uncertainty: Data from 1 European production site
  properties: dry mass 1 kg, carbon content, fossil 0.628, wet mass 1 kg, heating value, net 19.03 MJ
  note on carbon content, fossil: This dataset is an unweighted average of 20 organic substances (listed in Tab 88.1, ecoinvent v2.2 report 8, part II), being part of the top100 chemicals included in this database. The C-content has also been calculated as an unweighted average of the C content of the substances composing this dataset.
- oxygen, liquid: 0 kg; source European Commission 2001; pedigree (1,1,1,1,1)
  EcoSpold01Location=RER
  Estimation, based on literature.
  Further references:
  PanGas (2006) Sauerstoff, O2 (gasförmig, verdichtet). pdf File. Download of December 29.
  Uncertainty: Data from 1 European production site
  properties: wet mass 1 kg, dry mass 1 kg
- barite: 0.0638 kg; lognormal variance with pedigree 0.0507, pedigree (1,3,5,3,1)
  Proxy with literature value, to representBa, Sb, Zr compounds, barite is used. 50% of total amount is assumed as metal components
  EcoSpold01Location=RER
  Uncertainty: Data from 1 European production site
  properties: dry mass 1 kg, wet mass 1 kg
- cobalt: 0.00833 kg; source European Commission 2001; lognormal variance with pedigree 0.0507, pedigree (1,3,5,3,1)
  EcoSpold01Location=GLO
  Proxy with estimation, to represent Ti, Co, Sb, Zr, Ni, Zn, Ce compounds, Cobalt, Nickel and Zinc is used.
  Uncertainty: Data from 1 European production site
  properties: wet mass 1 kg, dry mass 1 kg
- electricity, medium voltage: 0.24778 kWh; source European Commission 2001; lognormal variance with pedigree 0.0507, pedigree (1,3,5,3,1)
  Estimation. The total amount of energy is taken from literature.
  EcoSpold01Location=UCTE
  Uncertainty: Data from 1 European production site
- ammonia, anhydrous, liquid: 0 kg; pedigree (1,1,1,1,1)
  (same comment as for oxygen, liquid)
  properties: wet mass 1 kg, dry mass 1 kg
- solvent, organic: 0.00021 kg; source European Commission 2001; lognormal variance with pedigree 0.0507, pedigree (1,3,5,3,1)
  Estimation. The total amount of auxilliaries is taken from literature. The composition was assumed as chemicals organic or solvents organic.
  EcoSpold01Location=GLO
  Uncertainty: Data from 1 European production site
  properties: dry mass 1 kg, heating value, net 19.11 MJ, carbon content, fossil 0.63072, wet mass 1 kg
  note on carbon content, fossil: Mixture of 15 of the most often used solvents (list in ecoinvent v2.2 report 11-III, pg 293). C content was calculated as an unweighted average of C content of the different solvents
- silica sand: 0.271 kg; source European Commission 2001; lognormal variance with pedigree 0.0507, pedigree (1,3,5,3,1)
  Literature Value.
  EcoSpold01Location=DE
  Uncertainty: Data from 1 European production site
  properties: water content 0.010101, wet mass 1 kg, dry mass 0.99 kg
- packaging glass factory: 1.25e-10 unit; source Hischier R. 2004; lognormal variance with pedigree 0.4381, pedigree (1,5,5,3,4)
  Estimation, from packaging glass production based on literature.
  EcoSpold01Location=RER
  Uncertainty: Estimation from packaging glass production
- nickel, class 1: 0.00833 kg; source European Commission 2001; lognormal variance with pedigree 0.0507, pedigree (1,3,5,3,1)
  Proxy with literature value, to represent Ti, Co, Sb, Zr, Ni, Zn, Ce compounds, Cobalt, Nickel and Zinc is used.
  EcoSpold01Location=GLO
  Uncertainty: Data from 1 European production site
  properties: wet mass 1 kg, dry mass 1 kg
- lead: 0.077 kg; = 0.14*0.55; lognormal variance with pedigree 0.7007, pedigree (1,3,5,3,1)
  Proxy with literature value, to represent lead oxide, lead concentrate is used. The concentration of lead in lead concentrate is 0.55kg/kg.
  Uncertainty: Data from 1 European production site
  properties: dry mass 1 kg, wet mass 1 kg
- copper carbonate: 0.065 kg; source European Commission 2001; lognormal variance with pedigree 0.0507, pedigree (1,3,5,3,1)
  Proxy with literature value, to represent copper carbonate, strontium carbonate is used.
  EcoSpold01Location=RER
  Uncertainty: Data from 1 European production site
  properties: dry mass 1 kg, heating value, net 2.95 MJ, carbon content, fossil 0.097561, wet mass 1 kg
- heat, district or industrial, natural gas: 6.3162 MJ; source European Commission 2001; lognormal variance with pedigree 0.0507, pedigree (1,3,5,3,1)
  EcoSpold01Location=RER
  Estimation. The total amount of energy is taken from literature.
  Uncertainty: Data from 1 European production site
  properties: heating value, net 1 MJ
- calcium nitrate: 0 kg; pedigree (1,1,1,1,1)
  Calculated from the original input measured as N (molar masses N2). This is a proxy with literature value, to represent sodium nitrate, calcium nitrate is used.
  Uncertainty: Data from 1 European production site
  property water in wet mass 0 kg; name WWM
  property water content 0; name water_content
  property carbon content, fossil 0; name C_content_fossil
  property carbon content, non-fossil 0; name C_content_non_fossil
  property dry mass 1 kg; name DM
  property wet mass 1 kg; name WM
- potassium nitrate: 0 kg; source European Commission 2001; pedigree (1,1,1,1,1)
  Proxy with literature value, to represent potash, potassium nitrate is used. The amount is converted from K2O3 to K2O and from K2O to potassium nitrate (K2O content is 44%)
  Uncertainty: Data from 1 European production site
  properties: dry mass 1 kg, wet mass 1 kg
- heat, district or industrial, other than natural gas: 1.7146 MJ; lognormal variance with pedigree 0.0507, pedigree (1,3,5,3,1)
  EcoSpold01Location=RER
  Estimation. The total amount of energy is taken from literature. Used for the amount of natural gas consumed.
  Uncertainty: Data from 1 European production site
  properties: heating value, net 1 MJ
- dolomite: 0 kg; source European Commission 2001; pedigree (1,1,1,1,1)
  Literature Value.
  EcoSpold01Location=RER
  Uncertainty: Data from 1 European production site
  properties: wet mass 1 kg, dry mass 1 kg, carbon content, fossil 0.130435, heating value, net 3.95 MJ
- inorganic nitrogen fertiliser, as N: 0 kg; source European Commission 2001; pedigree (1,1,1,1,1)
  EcoSpold01Location=RER
  Proxy with literature value, to represent sodium nitrate, nitrogen fertiliser is used. 50% of total amount is assumed as sodium nitrate and the amount from NaNO3 to N converted.
  Uncertainty: Data from 1 European production site
  properties: dry mass 1 kg, wet mass 1 kg
- soda ash, light, crystalline, heptahydrate: 0.05 kg; source European Commission 2001; lognormal variance with pedigree 0.0507, pedigree (1,3,5,3,1)
  EcoSpold01Location=RER
  Literature Value.
  Uncertainty: Data from 1 European production site
  properties: heating value, net 3.43 MJ, wet mass 1 kg, carbon content, fossil 0.0517241, dry mass 1 kg
- feldspar: 0.0585 kg; source European Commission 2001; lognormal variance with pedigree 0.0507, pedigree (1,3,5,3,1)
  Literature Value.
  EcoSpold01Location=RER
  Uncertainty: Data from 1 European production site
  properties: dry mass 1 kg, wet mass 1 kg
- municipal solid waste: -0.000604631, -3.70595e-6, -2.59328e-6, -1.02918e-5, -0.00727878 kg (5 entries); source European Commission 2001; lognormal variance with pedigree 0.0507, pedigree (1,3,5,3,1)
  EcoSpold01Location=CH
  Literature Value.
  Uncertainty: Data from 1 European production site
  production volume 0.0079 kg
- oxygen, liquid: 0.000431804, 0.0015737 kg (2 entries); source European Commission 2001; lognormal variance with pedigree 0.0507, pedigree (1,3,5,3,1)
  (same comment as for oxygen, liquid)
- ammonia, anhydrous, liquid: 3.2164e-5, 0.000214973, 5.00388e-5, 9.71356e-5, 9.91447e-5, 4.55122e-5, 0.000374165, 1.01809e-5, 0.00107669 kg (9 entries); lognormal variance with pedigree 0.0507, pedigree (1,3,5,3,1)
  (same comment as for oxygen, liquid)
- calcium nitrate: 0.0185435, 0.0161822 kg (2 entries); lognormal variance with pedigree 0.0507, pedigree (1,3,5,3,1)
  (same comment as for calcium nitrate)
  properties: dry mass 1 kg, wet mass 1 kg
- potassium nitrate: 0.000506844, 0.0174178, 0.0365193, 0.0169197 kg (4 entries); source European Commission 2001; lognormal variance with pedigree 0.0507, pedigree (1,3,5,3,1)
  (same comment as for potassium nitrate)
- dolomite: 0.0040515, 0.0076485 kg (2 entries); source European Commission 2001; lognormal variance with pedigree 0.0507, pedigree (1,3,5,3,1)
  Literature Value.
  EcoSpold01Location=RER
  Uncertainty: Data from 1 European production site
- inorganic nitrogen fertiliser, as N: 0.000288863, 9.33355e-6, 0.000500823, 3.42087e-6, 1.40584e-6, 2.53866e-5, 2.45512e-6, 3.20327e-5, 9.36003e-6, 3.25421e-5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 kg (30 entries); source European Commission 2001; lognormal variance with pedigree 0.0507, pedigree (1,3,5,3,1)
  (same comment as for inorganic nitrogen fertiliser, as N)

## Inputs from nature
- Water, unspecified natural origin [natural resource, in water]: 0.00182 m3; name water_UNO_input; source European Commission 2001; lognormal variance with pedigree 0.0507, pedigree (1,3,5,3,1)
  Literature Value.
  Uncertainty: Data from 1 European production site

## Emissions to nature
- TOC, Total Organic Carbon [water, surface water]: 2.02593e-5 kg; lognormal variance with pedigree 0.0907, pedigree (1,3,5,3,1)
  Calculated Value, by default as TOC (gC) = COD/2.7 (COD measured in g O2). Should more correctly be calculated from the carbon content of the specified emissions to water.
  Uncertainty: Data from 1 European production site
- Antimony [air, urban air close to ground]: 3.3e-6 kg; source European Commission 2001; lognormal variance with pedigree 0.7007, pedigree (1,3,5,3,1)
  Literature Value.
  Uncertainty: Data from 1 European production site
- AOX, Adsorbable Organic Halogen as Cl [water, surface water]: 1.1e-7 kg; source European Commission 2001; lognormal variance with pedigree 0.0907, pedigree (1,3,5,3,1)
  Literature Value.
  Uncertainty: Data from 1 European production site
- Hydrogen fluoride [air, urban air close to ground]: 1.3e-6 kg; source European Commission 2001; lognormal variance with pedigree 0.0907, pedigree (1,3,5,3,1)
  Literature Value.
  Uncertainty: Data from 1 European production site
- BOD5, Biological Oxygen Demand [water, surface water]: 1.066e-5 kg; source European Commission 2001; lognormal variance with pedigree 0.0907, pedigree (1,3,5,3,1)
  Literature Value.
  Uncertainty: Data from 1 European production site
- DOC, Dissolved Organic Carbon [water, surface water]: 2.02593e-5 kg; lognormal variance with pedigree 0.0907, pedigree (1,3,5,3,1)
  Calculated Value, as equal to TOC.
  Uncertainty: Data from 1 European production site
- Water [air, unspecified]: 0.00011102 m3; name water_to_air_unspecified; = (water_UNO_input*fraction_PW_to_air); lognormal variance with pedigree 0.0807, pedigree (2,2,5,1,1)
  Calculated value based on literature values and expert opinion. See comments in the parametres' comment field.
  property fraction, origin: unspecified 1; name fraction_origin_unspecified
  property fraction, origin: fresh water 0; name fraction_origin_fresh_water
  property fraction, origin: salt water 0; name fraction_origin_salt_water
- Water [water, unspecified]: 0.00170898 m3; name water_to_water_unspecified; = water_UNO_input*(1-fraction_PW_to_air); lognormal variance with pedigree 0.0807, pedigree (2,2,5,1,1)
  (same comment as for Water)
  property fraction, origin: fresh water 0; name fraction_origin_fresh_water_Ww
  property fraction, origin: salt water 0; name fraction_origin_salt_water_Ww
  property fraction, origin: unspecified 1; name fraction_origin_unspecified_Ww
- COD, Chemical Oxygen Demand [water, surface water]: 5.47e-5 kg; source European Commission 2001; lognormal variance with pedigree 0.0907, pedigree (1,3,5,3,1)
  Literature Value.
  Uncertainty: Data from 1 European production site
- Hydrogen chloride [air, urban air close to ground]: 2.6e-6 kg; source European Commission 2001; lognormal variance with pedigree 0.0907, pedigree (1,3,5,3,1)
  Literature Value.
  Uncertainty: Data from 1 European production site
- Ammonia [air, urban air close to ground]: 0.0001 kg; source European Commission 2001; lognormal variance with pedigree 0.0907, pedigree (1,3,5,3,1)
  Literature Value.
  Uncertainty: Data from 1 European production site

## Sampling procedure
literature

## Extrapolations
This dataset has been extrapolated from year 2004 to the year of the calculation (2021). The uncertainty has been adjusted accordingly.

## Review by Bo Weidema 2012-07-30
Calcium nitrate input re-calculated from per kg N to per kg calcium nitrate.

## Review by Jürgen Sutter 2007-11-08
passed.

## Review by Roland Hischier 2011-09-22
Transfer of documentation done.
