# switch production, toggle type

Dataset: EcoSpold 2, unit process
Geography: CA-QC
Time period: 2004-01-01 to 2021-12-31
Technology level: current
Classification: EcoSpold01Categories: electronics/component
Classification: ISIC rev.4 ecoinvent: 2610:Manufacture of electronic components and boards
Tags: recontextualization
Scenario: Business-as-Usual
System model: Allocation, cut-off by classification
Generated by: Pascal Lesage
Published in: Hischier R. 2007
Database: ecoinvent
isCopyrightProtected: true
accessRestrictedTo: 1

## General comment
This dataset represents the production of 1 kg of toggle switches used in ICT equipment. It is based on the assumption that a toggle switch has a typical weight of 29 g.The data represent a current toggle type switch, used in current information and communication technology (ICT). Material data are taken from datasheets of producers of such capacitors and from the literature. Infrastructure and production efforts are based on own assumptions and taken from the Swedish LCI database and have thus, accordingly higher uncertainty.
[This dataset was already contained in the ecoinvent database version 2. It was not individually updated during the transfer to ecoinvent version 3. Life Cycle Impact Assessment results may still have changed, as they are affected by changes in the supply chain, i.e. in other datasets. This dataset was generated following the ecoinvent quality guidelines for version 2. It may have been subject to central changes described in the ecoinvent version 3 change report (http://www.ecoinvent.org/database/ecoinvent-version-3/reports-of-changes/), and the results of the central updates were reviewed extensively. The changes added e.g. consistent water flows and other information throughout the database. The documentation of this dataset can be found in the ecoinvent reports of version 2, which are still available via the ecoinvent website. The change report linked above covers all central changes that were made during the conversion process.]
Child dataset exchanges identical to GLO dataset. Created to enable linking to regional markets (e.g. for electricity). Data quality indicators adjusted accordingly.

## Included activities start
From reception of metals and plastics at the factory gate.

## Included activities end
This dataset includes raw material input and production efforts efforts for the production of toggle type switches.

## Geography
Data represent a global valuable composition of a toggle type switch.
Child dataset exchanges identical to GLO dataset. Created to enable linking to regional markets (e.g. for electricity). Data quality indicators adjusted accordingly.

## Technology
average switch production technology, based on literature and assumptions

## Parameters
- Quebec gross domestic product 2011: 3.11e11 USD(2011); name quebecGDP2011; lognormal variance with pedigree 0.0006, pedigree (1,1,1,1,1)
  Quebec Gross domestic product for 2011, expressed in 2011 USD. Source: Institut de la statistique du Québec. Converted from CAD to USD using a yearly average exchange rate of 0.989 CAD/USD (Source: bank of Canada).
- world gross domestic product 2011: 7e13 USD(2011); name worldGDP2011; lognormal variance with pedigree 0.0006, pedigree (1,1,1,1,1)
  World Gross domestic product for 2011, expressed in 2011 USD. Source: World Bank.

## Reference product
- switch, toggle type: 1 kg; By-product classification allocatable product; CPC 471: Electronic valves and tubes; electronic components; parts thereof
  Typical toggle switch used in ICT equipment.
  production volume 0.00444286 kg
    Gross approximation of Quebec production volume using relative value of Quebec GDP to world GDP
  property price 23.0041 EUR2005
    Calculated based on inputs: The price of the product has been calculated as a sum of the values of the material and energy inputs for this product. This value is therefore a rough estimation. It may underestimate the real price since there are additional expenses when producing any product. These expences can include for example labour costs, treatment of waste materials and profit for the producer. Please consider carefully whether this level of data quality is acceptable for your application.
  property carbon content, fossil 0.116333
    Calculated as the addition of C contents in the product composition
  property carbon content 0.116333
    carbon content on a dry matter basis (reserved; not for manual entry)
  properties: water in wet mass 0 kg, water content 0, wet mass 1 kg, carbon content, non-fossil 0, dry mass 1 kg, carbon allocation 0.116333 kg

## Inputs from technosphere
- brass: 0.449 kg; source ITT 2005; lognormal variance with pedigree 0.0761, pedigree (4,5,5,3,1)
  Estimation. The split to individual materials was estimaded based on literature.
  Uncertainty: e
  properties: dry mass 1 kg, wet mass 1 kg
- steel, low-alloyed, hot rolled: 0.252 kg; source ITT 2005; lognormal variance with pedigree 0.0761, pedigree (4,5,5,3,1)
  (same comment as for brass)
  properties: dry mass 1 kg, wet mass 1 kg, carbon content, fossil 0.005
  note on carbon content, fossil: Low alloyed steel composition given in Tab. 3.2 ecoinvent v2.2 report 10_partII. Steel assumed to have a C content of 0.5%
- gold: 0.00041 kg; source ITT 2005; lognormal variance with pedigree 0.0761, pedigree (4,5,5,3,1)
  (same comment as for brass)
  properties: wet mass 1 kg, dry mass 1 kg
- nickel, class 1: 0.00041 kg; source ITT 2005; lognormal variance with pedigree 0.0761, pedigree (4,5,5,3,1)
  (same comment as for brass)
  properties: wet mass 1 kg, dry mass 1 kg
- nylon 6-6, glass-filled: 0.258 kg; source ITT 2005; lognormal variance with pedigree 0.0761, pedigree (4,5,5,3,1)
  (same comment as for brass)
  properties: heating value, net 30.9 MJ, carbon content, fossil 0.446018, dry mass 1 kg, wet mass 1 kg
  note on heating value, net: Assumed equal to Nylon-66. Reference: Walters, R. N., Hackett, S. M. and Lyon, R. E. (2000) ‘Heats of combustion of high temperature polymers’, Fire and Materials, 24(5), pp. 245–252. doi: 10.1002/1099-1018(200009/10)24:5<245::AID-FAM744>3.0.CO;2-7.
  note on carbon content, fossil: Nylon 66 is derived from hexamethylene diamine and adipic acid and has the following structure: -(HN-(CH2)6-NH-CO-(CH2)4-CO)n- (ecoinvent v2.2 report 11_II), C12H22N2O2. MW=226 g/mol. Here Nylon 66 is - mainly for improved stiffness and stability - modified with glass fibres. The glass fibre content in the product is assumed of 30%. (ecoinvent v2.2 report 11_II)
- printed wiring board mounting facility: 2.08e-7 unit; lognormal variance with pedigree 0.5761, pedigree (4,5,5,3,5)
  Proxy. Due to a lack of more specific information the dataset of the printed wiring board mounting plant was used.
  Uncertainty: r
- electricity, medium voltage: 6.51 kWh; source CPM 2006; lognormal variance with pedigree 0.1461, pedigree (4,5,5,3,4)
  Proxy. The value used for connectors was used.
  Uncertainty: e
- copper, cathode: 0.04018 kg; source ITT 2005; lognormal variance with pedigree 0.0761, pedigree (4,5,5,3,1)
  (same comment as for brass)
  properties: dry mass 1 kg, wet mass 1 kg

## Sampling procedure
literature

## Extrapolations
This dataset has been extrapolated from year 2006 to the year of the calculation (2021). The uncertainty has been adjusted accordingly.
