# potato seed production, organic, at farm

Dataset: EcoSpold 2, unit process
Geography: RoW
Time period: 1996-01-01 to 2021-12-31
Technology level: current
Classification: ISIC rev.4 ecoinvent: 0113:Growing of vegetables and melons, roots and tubers
Synonyms: Solanum tuberosum L.
Scenario: Business-as-Usual
System model: Allocation, cut-off by classification
Share of production covered: 87 %
Generated by: Thomas Nemecek
Published in: Nemecek, T. 2007
Database: ecoinvent
isCopyrightProtected: true
accessRestrictedTo: 1

## General comment
This dataset represents the production of 1 kg of potato seed (fresh matter). The yield is 19500 kg/ha at a moisture content at storage of 80%.
[This dataset was already contained in the ecoinvent database version 2. It was not individually updated during the transfer to ecoinvent version 3. Life Cycle Impact Assessment results may still have changed, as they are affected by changes in the supply chain, i.e. in other datasets. This dataset was generated following the ecoinvent quality guidelines for version 2. It may have been subject to central changes described in the ecoinvent version 3 change report (http://www.ecoinvent.org/database/ecoinvent-version-3/reports-of-changes/), and the results of the central updates were reviewed extensively. The changes added e.g. consistent water flows and other information throughout the database. The documentation of this dataset can be found in the ecoinvent reports of version 2, which are still available via the ecoinvent website. The change report linked above covers all central changes that were made during the conversion process.]

## Included activities start
This activity starts after the harvest of the previous crop. The inputs of seeds and pesticides are considered. Farm manure as an organic fertiliser is only accounted for in terms of direct field emissions; all pre-processes are included in the animal production systems.

## Included activities end
The dataset includes all machine operations and corresponding machine infrastructure and sheds. Machine operations are: soil cultivation, sowing, fertilisation, weed control, pest and pathogen control, harvest, transport from field to farm (1 km) and grading of the potatoes at the farm. Further, direct field emissions are included. The cultivation of green manure during winter before planting potatoes is also included. This activity ends after harvest and grading at the farm gate.

## Geography
Refers to an average production in the Swiss lowlands.

## Technology
Organic production

## Time period
The yield data have been collected for the years 1996-2003.

## Parameters
- fraction, irrigation water, to ground water: 0.8 dimensionless; name fraction_IW_to_ground_water; lognormal variance with pedigree 0.0886, pedigree (4,3,1,1,4)
- fraction, irrigation water, to air: 0.586986 dimensionless; name fraction_IW_to_air; lognormal variance with pedigree 0.0409, pedigree (2,2,2,1,1)
- fraction, irrigation water to surface water: 0.2 dimensionless; name fraction_IW_to_surface_water; lognormal variance with pedigree 0.0886, pedigree (4,3,1,1,4)

## Reference product
- potato seed, organic, at farm: 1 kg; name REF_PRODUCT; CPC 01510: Potatoes; By-product classification allocatable product
  production volume 4.91855e7 kg
    0.11 kg per kg potato yield (2520 kg/ha)
  property energy content 3.518 MJ; name REF_PRODUCT_energy_content
    See chapter 'Product Properties' in '01_crop production - yields & inputs CH & Europe_v1.0.pdf', section 'AGRICULTURAL PRODUCTION IN SWITZERLAND' - pdf-document on the dedicated talk page of ecoinvent (www.ecoinvent.org/documentation)
  property water content 4; name REF_PRODUCT_water_content; = (1-REF_PRODUCT_DM)/REF_PRODUCT_DM
  property price 0.0265165 EUR2005; name REF_PRODUCT_price_EUR2005
    Calculated based on inputs: The price of the product has been calculated as a sum of the values of the material and energy inputs for this product. This value is therefore a rough estimation. It may underestimate the real price since there are additional expenses when producing any product. These expences can include for example labour costs, treatment of waste materials and profit for the producer. Please consider carefully whether this level of data quality is acceptable for your application.
  property carbon content, fossil 0; name REF_PRODUCT_C_content_fossil
    fossil carbon content on a dry matter basis
  property carbon content, non-fossil 0.413567; name REF_PRODUCT_C_content_non_fossil
    biogene carbon content on a dry matter basis
  property water in wet mass 0.8 kg; name REF_PRODUCT_WWM; = 1-REF_PRODUCT_DM
  property dry mass 0.2 kg; name REF_PRODUCT_DM
  property wet mass 1 kg; name REF_PRODUCT_WM
  property carbon content 0.413567
    carbon content on a dry matter basis (reserved; not for manual entry)
  properties: carbon allocation 0.0827133 kg

## Inputs from technosphere
- potato planting: 5.1282e-5 ha; lognormal variance with pedigree 0.0426, pedigree (2,1,5,5,1)
  Based on the inventory for commercial crop production 'potato production, organic CH'. Adaptations: see '01_crop production - seed production & processing_v1.0.pdf' - pdf-document on the dedicated talk page of ecoinvent (www.ecoinvent.org/documentation)
- tillage, hoeing and earthing-up, potatoes: 0.00010256 ha; lognormal variance with pedigree 0.0426, pedigree (2,1,5,5,1)
  (same comment as for potato planting)
- tillage, harrowing, by spring tine harrow: 5.1282e-5 ha; lognormal variance with pedigree 0.0426, pedigree (2,1,5,5,1)
  (same comment as for potato planting)
- green manure, organic, until March: 5.1282e-5 ha; lognormal variance with pedigree 0.0426, pedigree (2,1,5,5,1)
  (same comment as for potato planting)
- liquid manure spreading, by vacuum tanker: 0.0008277 m3; lognormal variance with pedigree 0.0426, pedigree (2,1,5,5,1)
  (same comment as for potato planting)
- transport, tractor and trailer, agricultural: 0.001 metric ton*km; lognormal variance with pedigree 0.0426, pedigree (2,1,5,5,1)
  (same comment as for potato planting)
- irrigation: 0 m3; name water_irrigation_input; source Siebert, S. 2010; pedigree (1,1,1,1,1)
  Calculated based on literature values (Doll, 2010) and partially modelled at ETH (Pfister, S.).
  property carbon content, non-fossil 0; name C_content_non_fossil
  property water content 9089.91; name water_content
  property dry mass 0.11 kg; name DM
  property wet mass 1000 kg; name WM
  property water in wet mass 999.89 kg; name WWM
  property carbon content, fossil 0; name C_content_fossil
- tillage, ploughing: 5.1282e-5 ha; lognormal variance with pedigree 0.0426, pedigree (2,1,5,5,1)
  (same comment as for potato planting)
- copper oxide: 0.00010939 kg; lognormal variance with pedigree 0.0427, pedigree (2,2,5,5,1)
  (same comment as for potato planting)
  properties: dry mass 1 kg, wet mass 1 kg
- tillage, currying, by weeder: 0.00010256 ha; lognormal variance with pedigree 0.0426, pedigree (2,1,5,5,1)
  (same comment as for potato planting)
- application of plant protection product, by field sprayer: 0.00022564 ha; lognormal variance with pedigree 0.0426, pedigree (2,1,5,5,1)
  (same comment as for potato planting)
- potato seed, organic, for setting: 0.16 kg; name SEED; lognormal variance with pedigree 0.0426, pedigree (2,1,5,5,1)
  (same comment as for potato planting)
  property energy content 3.518 MJ; name SEED_energy_content
  property carbon content, non-fossil 0.413567; name SEED_C_content_non_fossil
  property dry mass 0.2 kg; name SEED_DM
  note on energy content: See chapter 'Product Properties' in '01_crop production - yields & inputs CH & Europe_v1.0.pdf', section 'AGRICULTURAL PRODUCTION IN SWITZERLAND' - pdf-document on the dedicated talk page of ecoinvent (www.ecoinvent.org/documentation)
- harvesting, by complete harvester, ground crops: 5.1282e-5 ha; lognormal variance with pedigree 0.0426, pedigree (2,1,5,5,1)
  (same comment as for potato planting)
- tillage, harrowing, by rotary harrow: 5.1282e-5 ha; lognormal variance with pedigree 0.0426, pedigree (2,1,5,5,1)
  (same comment as for potato planting)
- potato haulm cutting: 5.1282e-5 ha; lognormal variance with pedigree 0.0426, pedigree (2,1,5,5,1)
  (same comment as for potato planting)
- solid manure loading and spreading, by hydraulic loader and spreader: 1.0515 kg; lognormal variance with pedigree 0.0426, pedigree (2,1,5,5,1)
  (same comment as for potato planting)
- packaging, for pesticides: 0.00021878 kg; lognormal variance with pedigree 0.0912, pedigree (4,3,5,5,4)
  Total amount of active substance/s of pesticides needed for the production of potato seed, organic, at farm is calculated to be circa 1.09E-04 kg. Pesticide/s used in this dataset is/are: 'copper oxide'. The total amount of active substance/s is doubled in order to account for the packaging of the dilluted product of pesticide/s that is/are applied. Therefore, 2.19E-04 kg of packaging for pesticides is justified with this exchange.
  properties: carbon content, fossil 0.85714, wet mass 1 kg, price 0.0642 EUR2005, heating value, net 25.97 MJ, dry mass 1 kg
- potato grading: 1 kg; lognormal variance with pedigree 0.0426, pedigree (2,1,5,5,1)
  (same comment as for potato planting)
- irrigation: 0.000187273, 7.94917e-6, 0.00167409, 2.7434e-5, 1.37181e-6, 7.7895e-5, 1.26788e-5, 0.00321708, 6.18399e-5, 2.11354e-5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 m3 (16 entries); source Siebert, S. 2010; lognormal variance with pedigree 0.0447, pedigree (2,2,5,5,1)
  (same comment as for irrigation)
  properties: water content 9089.91, dry mass 0.11 kg, wet mass 1000 kg

## Inputs from nature
- Occupation, annual crop, non-irrigated, extensive [natural resource, land]: 0.17806 m2*year; lognormal variance with pedigree 0.0426, pedigree (2,1,5,5,1)
  Modelled, see chapter 'Land use' in '01_crop production_direct field emissions and natural resources_v1.0.pdf' - pdf-document on the dedicated talk page of ecoinvent (www.ecoinvent.org/documentation)
- Carbon dioxide, in air [natural resource, in air]: 0.254757 kg; = 44/12 * (REF_PRODUCT_C_content_non_fossil * REF_PRODUCT * REF_PRODUCT_DM - SEED_C_content_non_fossil * SEED * SEED_DM); lognormal variance with pedigree 0.0426, pedigree (2,1,5,5,1)
  Modelled,see chapter 'CO2 binding' in '01_crop production_direct field emissions and natural resources_v1.0.pdf' - pdf-document on the dedicated talk page of ecoinvent (www.ecoinvent.org/documentation)
- Transformation, to annual crop, non-irrigated, extensive [natural resource, land]: 0.51282 m2; lognormal variance with pedigree 0.0526, pedigree (2,1,5,5,1)
  (same comment as for Occupation, annual crop, non-irrigated, extensive)
- Energy, gross calorific value, in biomass [natural resource, biotic]: 2.9551 MJ; lognormal variance with pedigree 0.0411891, pedigree (2,1,5,1,1)
- Transformation, from annual crop, non-irrigated, extensive [natural resource, land]: 0.51282 m2; lognormal variance with pedigree 0.0526, pedigree (2,1,5,5,1)
  (same comment as for Occupation, annual crop, non-irrigated, extensive)

## Emissions to nature
- Phosphorus [water, surface water]: 5.374e-6 kg; lognormal variance with pedigree 0.0827, pedigree (2,2,5,5,1)
  Modelled, see chapter 'Emissions of phosphorous to the water' in '01_crop production_direct field emissions and natural resources_v1.0.pdf' - pdf-document on the dedicated talk page of ecoinvent (www.ecoinvent.org/documentation)
- Cadmium, ion [water, surface water]: 7.3786e-10 kg; lognormal variance with pedigree 0.1327, pedigree (2,2,5,5,1)
  Modelled, see chapter 'Emissions of heavy metals to agricultural soil, surface water and ground water' in '01_crop production_direct field emissions and natural resources_v1.0.pdf' - pdf-document on the dedicated talk page of ecoinvent (www.ecoinvent.org/documentation)
- Dinitrogen monoxide [air, non-urban air or from high stacks]: 0.000171 kg; name N2O; lognormal variance with pedigree 0.0727, pedigree (2,2,5,5,1)
  Modelled, see chapter 'Emissions of N2O to the air' in '01_crop production_direct field emissions and natural resources_v1.0.pdf' - pdf-document on the dedicated talk page of ecoinvent (www.ecoinvent.org/documentation)
- Copper, ion [water, ground-]: 1.8437e-7 kg; lognormal variance with pedigree 0.1327, pedigree (2,2,5,5,1)
  (same comment as for Cadmium, ion)
- Mercury [water, surface water]: 4.0174e-10 kg; lognormal variance with pedigree 0.1327, pedigree (2,2,5,5,1)
  (same comment as for Cadmium, ion)
- Water [water, surface water]: 0.00166134 m3; name water_to_water_surface; lognormal variance with pedigree 0.1306, pedigree (4,3,5,5,4)
  Calculated value. See the parameters and their comments to understand the calculation.
  property fraction, origin: salt water 0; name fraction_origin_salt_water_Wsw
  property fraction, origin: fresh water 1; name fraction_origin_fresh_water_Wsw
- Water [water, ground-]: 0.00664535 m3; name water_to_water_ground; lognormal variance with pedigree 0.1306, pedigree (4,3,5,5,4)
  Calculated value. See the parameters and their comments to understand the calculation.
  property fraction, origin: salt water 0; name fraction_origin_salt_water_Wgw
  property fraction, origin: fresh water 1; name fraction_origin_fresh_water_Wgw
  property fraction, origin: unspecified 0; name fraction_origin_unspecified_Wgw
- Water [air, unspecified]: 0.00419021 m3; name water_to_air_unspecified; lognormal variance with pedigree 0.0827, pedigree (2,2,5,5,1)
  Calculated value based on literature values and expert opinion. See comments in the parametres' comment field.
  property fraction, origin: fresh water 1; name fraction_origin_fresh_water
  property fraction, origin: unspecified 0; name fraction_origin_unspecified
  property fraction, origin: salt water 0; name fraction_origin_salt_water
- Cadmium, ion [water, ground-]: 1.3936e-9 kg; lognormal variance with pedigree 0.1327, pedigree (2,2,5,5,1)
  (same comment as for Cadmium, ion)
- Zinc, ion [water, surface water]: 2.4224e-7 kg; lognormal variance with pedigree 0.1327, pedigree (2,2,5,5,1)
  (same comment as for Cadmium, ion)
- Zinc, ion [water, ground-]: 1.4611e-6 kg; lognormal variance with pedigree 0.1327, pedigree (2,2,5,5,1)
  (same comment as for Cadmium, ion)
- Nitrogen oxides [air, non-urban air or from high stacks]: 3.591e-5 kg; = 0.21 * N2O; lognormal variance with pedigree 0.0727, pedigree (2,2,5,5,1)
  Modelled, see chapter 'Emissions of NOx to the air' in '01_crop production_direct field emissions and natural resources_v1.0.pdf' - pdf-document on the dedicated talk page of ecoinvent (www.ecoinvent.org/documentation)
- Zinc [soil, agricultural]: 2.5001e-5 kg; lognormal variance with pedigree 0.0827, pedigree (2,2,5,5,1)
  (same comment as for Cadmium, ion)
- Lead [soil, agricultural]: 7.4983e-7 kg; lognormal variance with pedigree 0.0827, pedigree (2,2,5,5,1)
  (same comment as for Cadmium, ion)
- Lead [water, ground-]: 1.4629e-8 kg; lognormal variance with pedigree 0.1327, pedigree (2,2,5,5,1)
  (same comment as for Cadmium, ion)
- Ammonia [air, non-urban air or from high stacks]: 0.0010798 kg; lognormal variance with pedigree 0.0527, pedigree (2,2,5,5,1)
  Modelled with the 'AGRAMMON model' described in '01_crop production_direct field emissions and natural resources_v1.0.pdf' - pdf-document on the dedicated talk page of ecoinvent (www.ecoinvent.org/documentation)
- Phosphate [water, ground-]: 4.7261e-6 kg; lognormal variance with pedigree 0.0827, pedigree (2,2,5,5,1)
  (same comment as for Phosphorus)
- Copper [soil, agricultural]: 8.7475e-5 kg; lognormal variance with pedigree 0.0827, pedigree (2,2,5,5,1)
  (same comment as for Cadmium, ion)
- Cadmium [soil, agricultural]: 3.6257e-8 kg; lognormal variance with pedigree 0.0827, pedigree (2,2,5,5,1)
  (same comment as for Cadmium, ion)
- Chromium, ion [water, surface water]: 1.1296e-7 kg; lognormal variance with pedigree 0.1327, pedigree (2,2,5,5,1)
  (same comment as for Cadmium, ion)
- Chromium, ion [water, ground-]: 9.0078e-7 kg; lognormal variance with pedigree 0.1327, pedigree (2,2,5,5,1)
  (same comment as for Cadmium, ion)
- Chromium [soil, agricultural]: -2.0362e-7 kg
  (same comment as for Cadmium, ion)
- Nickel [soil, agricultural]: 8.4166e-7 kg; lognormal variance with pedigree 0.0827, pedigree (2,2,5,5,1)
  (same comment as for Cadmium, ion)
- Mercury [water, ground-]: 5.6376e-10 kg; lognormal variance with pedigree 0.1327, pedigree (2,2,5,5,1)
  (same comment as for Cadmium, ion)
- Phosphate [water, surface water]: 1.6465e-5 kg; lognormal variance with pedigree 0.0827, pedigree (2,2,5,5,1)
  (same comment as for Phosphorus)
- Mercury [soil, agricultural]: 7.3448e-8 kg; lognormal variance with pedigree 0.0827, pedigree (2,2,5,5,1)
  (same comment as for Cadmium, ion)
- Lead [water, surface water]: 5.2446e-8 kg; lognormal variance with pedigree 0.1327, pedigree (2,2,5,5,1)
  (same comment as for Cadmium, ion)
- Nitrate [water, ground-]: 0.00450781 kg; lognormal variance with pedigree 0.0827, pedigree (2,2,5,5,1)
  Modelled with the 'SALCA-NO3 model' described in '01_crop production_direct field emissions and natural resources_v1.0.pdf' - pdf-document on the dedicated talk page of ecoinvent (www.ecoinvent.org/documentation)
- Copper, ion [water, surface water]: 1.1355e-7 kg; lognormal variance with pedigree 0.1327, pedigree (2,2,5,5,1)
  (same comment as for Cadmium, ion)
- Nickel, ion [water, surface water]: 1.0146e-7 kg; lognormal variance with pedigree 0.1327, pedigree (2,2,5,5,1)
  (same comment as for Cadmium, ion)

## Sampling procedure
Data were compiled from statistics, pilot network, fertilising recommendations, documents from extension services, information provided by retailers and expert knowledge. The production data were verified and adjusted by a group of experts.

## Extrapolations
This dataset has been copied from an original dataset covering the geography CH.

## Review by Hans-Jörg Althaus 2009-01-22
passed
none
