# stearic acid production

Dataset: EcoSpold 2, unit process
Geography: GLO
Time period: 2015-01-01 to 2021-12-31
Technology level: current
Classification: ISIC rev.4 ecoinvent: 2011:Manufacture of basic chemicals
Synonyms: N-Octadecanoic acid; 57-11-4; Cetylacetic acid; Octadecanoic acid; Stearophanic acid
Scenario: Business-as-Usual
System model: Allocation, cut-off by classification
Generated by: Lucia Valsasina
Database: ecoinvent
isCopyrightProtected: true
accessRestrictedTo: 1

## General comment
This activity represents the production of 1kg of stearic acid. Stearic acid is a fatty acid with C18. Fatty acids are present in nature in fats and oils. Stearic acid is present in a weight concertation between 1 to 7 % in common vegetable oils (cotton seed, peanut, coconut, linseed, palm kernel, olive, rape-seed, castor, soybean, sunflower and palm). Stearic acid is found in very high concentration, 15 to 30% in beef tallow (Anneken et al. 2006).
Anneken et al. (2006) lists the following industries as the main application of fatty acids: soaps; detergents; cosmetics; textile; coatings and inks; rubber and tyres; candles and waxes; plastics; paper and leather; lubricants; emulsifiers; food (Anneken et al. 2006).
Fatty acids from tallow are mainly used in all the above-mentioned industries apart from coatings and inks and it is less prominent in the candles and waxes making (Anneken et al. 2006).
Reference(s):
Anneken et al. (2006) Fatty Acids. Ullmann's Encyclopedia of Industrial Chemistry. Volume 14, pp. 73-116. Wiley-VCH, Weinheim.

## Included activities start
The activity starts when the raw materials enter the process.

## Included activities end
Materials entering the process are included as well as energy uses, infrastructure and emissions.

## Geography
The inputs to the process are calculated based on stoichiometry and literature data, they are therefore considered to be valid for the chosen geography. The inputs of heat, electricity, water, factory and nitrogen are mostly taken as average of industry data. Industry data values are a 5-year average of data (2011 - 2015) published by the Gendorf factory (Gendorf, 2016, Umwelterklärung, www.gendorf.de), (Gendorf, 2015, Umwelterklärung, www.gendorf.de), (Gendorf, 2014, Umwelterklärung, www.gendorf.de). The Gendorf factory is based in Germany, it produces a wide range of chemical substances. The factory produced 1657400 tonnes of chemical substances in the year 2015 (Gendorf, 2016, Umwelterklärung, www.gendorf.de) and 740000 tonnes of intermediate products. Given the range of chemicals produced by the german site, the values are used for the GLO geography, with uncertainty adjusted accordingly.

## Technology
Stearic acid can be produced from different oils and fats. The main inputs used for stearic production is beef tallow. Beef tallow has 15 to 30% weight concentration of stearic acid, while stearic acid concentration in vegetable oils is usually between 1 and 7% (see general comment and Anneken et al. 2006).
Fatty acids are produced from the splitting of triglycerides which also results in the production of glycerol. Fat splitting can be accomplished through a number of procedures, transesterification, hydrolysis, saponification and aminolysis (Anneken et al. 2006).
Hydrolysis of triglycerides result in fatty acid and glycerol (Anneken et al. 2006).
Anneken et al. (2006) report the chemical reaction to be:
Triglyceride + 3 H2O -> 3 fatty acid + glycerol
Temperature required can vary depending on the pretreatment and so the purity of the fats and oil used. The hydrolysis reaction currently used for commercial production requires temperatures of 210–260 degrees Celcius and pressure of 1.9–6.0 MPa (Anneken et al. 2006).
This dataset models stearic production from tallow, as this is the input with greater concentration of stearic acid and therefore mainly used.
Commercially used stearic acid is usually not pure stearic acid but it contains palmitic acid (the chemical company n.d.), which is the other most important saturated fatty acids contained in tallow (20-37%) (Anneken et al. 2006). We here assume an 80% efficiency of the splitting of tallow into stearic acid.
For pure stearic acid, a further purification step should be included. This is not considered in this dataset.
This inventory representing production of a particular chemical compound is at least partially based on a generic model on the production of chemicals. The data generated by this model have been improved by compound-specific data when available.
The model on production of chemicals is using specific industry or literature data wherever possible and more generic data on chemical production processes to fill compound-specific data gaps when necessary. The basic principles of the model have been published in literature (Hischier 2005, Establishing Life Cycle Inventories of Chemicals Based on Differing Data Availability). The model has been updated and extended with newly available data from the chemical industry.
In the model, unreacted fractions are treated in a waste treatment process, and emissions reported are after a waste treatment process that is included in the scope of this dataset. For volatile reactants, a small level of evaporation is assumed. Solvents and catalysts are mostly recycled in closed-loop systems within the scope of the dataset and reported flows are for losses from this system.
The main source of information for the values for heat, electricity, water (process and cooling), nitrogen, chemical factory is industry data from Gendorf. The values are a 5-year average of data (2011 - 2015) published by the Gendorf factory (Gendorf, 2016, Umwelterklärung, www.gendorf.de), (Gendorf, 2015, Umwelterklärung, www.gendorf.de), (Gendorf, 2014, Umwelterklärung, www.gendorf.de). The Gendorf factory is based in Germany, it produces a wide range of chemical substances. The factory produced 1657400 tonnes of chemical substances in the year 2015 (Gendorf, 2016, Umwelterklärung, www.gendorf.de) and 740000 tonnes of intermediate products.
Reference(s):
Anneken et al. (2006) Fatty Acids. Ullmann's Encyclopedia of Industrial Chemistry. Volume 14, pp. 73-116. Wiley-VCH, Weinheim.
The chemical company, n.d. Stearic Acid. Retrieved from: https://thechemco.com/chemical/stearic-acid/, accessed 1 August 2017
Hischier, R. (2005) Establishing Life Cycle Inventories of Chemicals Based on Differing Data Availability (9 pp). The International Journal of Life Cycle Assessment, Volume 10, Issue 1, pp 59–67. 10.1065/lca2004.10.181.7
Gendorf (2016) Umwelterklärung 2015, Werk Gendorf Industriepark, www.gendorf.de
Kresse, R., Baudis, U., Jäger, P., Riechers, H. H., Wagner, H., Winkler, J. and Wolf, H. U. 2007. Barium and Barium Compounds. Ullmann's Encyclopedia of Industrial Chemistry. pp. 15-16. Wiley-VCH, Weinheim.

## Time period
The activity is based on stoichiometry and literature data, it is therefore considered not to change significantly over time in terms of inputs. The inputs of heat, electricity, water, factory and nitrogen are mostly taken as average of industry data. Industry data values are a 5-year average of data (2011 - 2015) published by the Gendorf factory (Gendorf, 2016, Umwelterklärung, www.gendorf.de), (Gendorf, 2015, Umwelterklärung, www.gendorf.de), (Gendorf, 2014, Umwelterklärung, www.gendorf.de). The Gendorf factory is based in Germany, it produces a wide range of chemical substances. The factory produced 1657400 tonnes of chemical substances in the year 2015 (Gendorf, 2016, Umwelterklärung, www.gendorf.de) and 740000 tonnes of intermediate products. The time period is therefore set based on the years from Gendorf reference.

## Reference product
- stearic acid: 1 kg; name RP; CPC 34140: Carboxylic acids and their anhydrides, halides, peroxides and peroxyacids and their halogenated, sulphonated, […]; By-product classification allocatable product; CAS 57-11-4
  Stearic acid is a fatty acid with C18. Fatty acids are present in nature in fats and oils. Stearic acid is present in a weight concertation between 1 to 7 % in common vegetable oils (cotton seed, peanut, coconut, linseed, palm kernel, olive, rape-seed, castor, soybean, sunflower and palm). Stearic acid is found in very high concentration, 15 to 30% in beef tallow (Anneken et al. 2006).
  Anneken et al. (2006) lists the following industries as the main application of fatty acids: soaps; detergents; cosmetics; textile; coatings and inks; rubber and tyres; candles and waxes; plastics; paper and leather; lubricants; emulsifiers; food (Anneken et al. 2006).
  Reference(s):
  Anneken et al. (2006) Fatty Acids. Ullmann's Encyclopedia of Industrial Chemistry. Volume 14, pp. 73-116. Wiley-VCH, Weinheim.
  production volume 3.92517e8 kg; name RP_PV
    Estimated value. According to Kern (1979) stearic fatty acid production in the US was of 127.2 Mlbs., accounting for 13.3% of fatty acids.
    The global production volume is extrapolated from the US production volume based on the following assumptions:
    The global production volume is extrapolated from the US production volume based on reports from Cefic (European Chemical Industry Council), and the American Chemistry Council.
    According to Cefic (2016) the global sales of chemicals in the year 2015 was 3 534 billion euros. The reported share of sales per region are: EU28 14.7%; Other Europe (Switzerland, Norway, Turkey, Russia and Ukraine) 2.7%; NAFTA (US, Canada and Mexico) 16.5%; Latin America 3.8%; China 39.9%; Japan 3.9%; Republic of Korea 3.2%; India 2.2%; Rest of Asia 11.9%; Rest of the World 1.3%. Cefic also reports the US total sales, which amount to 518.7 billion euros out of the global 3 534 billion euros (14.7%). The same share is reported by the American Chemistry Council (2016), according to which the USA sales account for 15% of global sales for the year 2016.
    US production volume:
    References:
    Cefic 2016. Facts and figures 2016 of the European chemical industry. Accessible at: http://www.cefic.org/Facts-and-Figures/Chemicals-Industry-Profile/
    American Chemistry Council 2016. Outlook: U.S. Chemical Industry Continues to Outpace Industrial Output; Accounts for More Than One-Half of Construction Spending by Manufacturing Sector. Accessible at: https://www.americanchemistry.com/Media/PressReleasesTranscripts/ACC-news-releases/US-Chemical-Industry-Continues-to-Outpace-Industrial-Output.html
    Environmental Protection Agency, 2016, Chemical data reporting results, Available at: https://www.epa.gov/chemical-data-reporting/2016-chemical-data-reporting-results
    Kern, 1979. Background, importance and production volumes. Journal of the American Oil Chemists’ Society. November 1979, Volume 56, Issue 11, pp 716A–719A. Proceedings of the AOCS Short Course on Industrial Fatty Acids, held June 10–13, 1979, Taminent, PA
  property heating value, net 38.36 MJ
    LHV is calculated based on the elemental composition of the substance. Based on the CAS number of the substance (000054-11-4), the chemical formula of the substance is found to be: C18H36O2, (PubChem 2020).
    Reference: Kim, S., Chen, J., Cheng, T., Gindulyte, A., He, J., He, S., Li, Q., Shoemaker, B. A., Thiessen, P. A., Yu, B., Zaslavsky, L., Zhang, J., & Bolton, E. E. (2019). PubChem 2019 update: improved access to chemical data. Nucleic acids research, 47(D1), D1102–D1109. https://doi.org/10.1093/nar/gky1033
  property price 1.075 EUR2005; name RP_price_EUR2005
    Literature data. ICIS Chemical Business reported in 2012:"Tallow stearic acids also rose from fourth quarter levels, settling at 1,000-1,150/tonne FD NWE as of January 18 - an increase of 40/tonne on the low side and 50/tonne on the high side.". Source retrieved from: https://www.icis.com/resources/news/2012/01/30/9527505/oleochemicals-eu-stearic-acid-price-rises-on-higher-feedstock-costs/, accessed 17th August 2017
  property carbon content 0.760563
    carbon content on a dry matter basis (reserved; not for manual entry)
  property true value 1.075; name RP_true_value
    allocation property applied in "true value" allocation // value calculated from revenue
  properties: water content 0, carbon content, non-fossil 0.760563, water in wet mass 0 kg, wet mass 1 kg, carbon content, fossil 0, dry mass 1 kg, carbon allocation 0.760563 kg

## By-products
- glycerine: 0 kg; name BP_glycerine; CPC 34570: Glycerol; By-product classification allocatable product; CAS 56-81-5; pedigree (1,1,1,1,1)
  Calculated value. Based on stoichiometry, Anneken et al. (2006) report the chemical reaction to be:
  Triglyceride + 3 H2O -> 3 fatty acid + glycerol
  production volume 4.23134e7 kg; = BP_glycerine*RP_PV/ABS(RP)
    Calculated from the production volume of the reference product in proportion to the respective output amounts.
  property heating value, net 22.38 MJ
    LHV is calculated based on the elemental composition of the substance. Based on the CAS number of the substance (000056-81-5), the chemical formula of the substance is found to be: C3H8O3, (PubChem 2020).
    Reference: Kim, S., Chen, J., Cheng, T., Gindulyte, A., He, J., He, S., Li, Q., Shoemaker, B. A., Thiessen, P. A., Yu, B., Zaslavsky, L., Zhang, J., & Bolton, E. E. (2019). PubChem 2019 update: improved access to chemical data. Nucleic acids research, 47(D1), D1102–D1109. https://doi.org/10.1093/nar/gky1033
  property price 0.792 EUR2005; name BP_glycerine_price_EUR2005
    Temporary price data. Calculated as 90% of purchasers price based on: 2004 import and export prices (total trades (USD) divided by total weight (kg) in EU27, USA, China, Japan and India) from UN data - Glycerol (glycerine), nes including synthetic glycerol (http://data.un.org/Data.aspx?q=glycerine&d=ComTrade&f=_l1Code%3a16%3bcmdCode%3a152090; accessed 1 July 10)
  property carbon content 0.391304
    carbon content on a dry matter basis (reserved; not for manual entry)
  property true value 0.0853777; name BP_glycerine_true_value
    allocation property applied in "true value" allocation // value calculated from revenue
  properties: dry mass 1 kg, water content 0, wet mass 1 kg, carbon content, fossil 0, carbon content, non-fossil 0.391304, water in wet mass 0 kg, carbon allocation 0.391304 kg

## Inputs from technosphere
- tap water: 0.024087 kg; lognormal variance with pedigree 0.0106, pedigree (2,3,2,4,3)
  Calculated based on literature data published by the industry. This value is a 5-year average of data (2011 - 2015) published by the Gendorf factory (Gendorf, 2016, Umwelterklärung, www.gendorf.de), (Gendorf, 2015, Umwelterklärung, www.gendorf.de), (Gendorf, 2014, Umwelterklärung, www.gendorf.de). The amount of tap water per kg of chemical substance produced is calculated using literature data published by the Gendorf factory based in Germany, which produces a wide range of chemical substances. The factory produced 1657400 tonnes of chemical substances in the year 2015 (Gendorf, 2016, Umwelterklärung, www.gendorf.de) and 740000 tonnes of intermediate products. The amount of tap water consumed in the year 2015 was 55100 tonnes (Gendorf, 2016, Umwelterklärung, www.gendorf.de). The resulting amount of tap water is 0.023 kg/kg of chemical product produced. The 5-year average (2011 - 2015, weighted by production volume) is 0.026 kg/kg.
  properties: carbon content, fossil 0.00178991, water content 2962.17, dry mass 0.000337476 kg, wet mass 1 kg
  note on carbon content, fossil: Bicarbonate content is 2.93 mol/m3. CO2 content is 0.1 mol/m3 (ecoinvent v2.2 report 8, Tab 93.1).
- wastewater, average: 0 m3; name BP_wastewater_average; pedigree (1,1,1,1,1)
  Calculated based on literature data published by the industry. This value is a 5-year average of data (2011 - 2015) published by the Gendorf factory (Gendorf, 2016, Umwelterklärung, www.gendorf.de), (Gendorf, 2015, Umwelterklärung, www.gendorf.de), (Gendorf, 2014, Umwelterklärung, www.gendorf.de). The amount of wastewater (which is later on treated in the municipal WWTP) per kg of chemical substance produced is calculated using literature data published by the Gendorf factory based in Germany, which produces a wide range of chemical substances. The factory produced 1657400 tonnes of chemical substances in the year 2015 (Gendorf, 2016, Umwelterklärung, www.gendorf.de) and 740000 tonnes of intermediate products. The amount of wastewater which is later on treated in the municipal WWTP in the year 2015 was 1200 tonnes (Gendorf, 2016, Umwelterklärung, www.gendorf.de). The resulting amount of wastewater is 2.7E-06 m3/kg of chemical product produced.
  production volume 0 m3
    (same comment as for glycerine)
  property price 0 EUR2005; name BP_wastewater_average_price_EUR2005
  properties: wet mass 1000 kg, dry mass 0.346837 kg, carbon content, non-fossil 0.194039, water content 2882.2
  note on carbon content, non-fossil: 0.0673 kg TOC/m3 (Tab A.17, ecoinvent v2.2 report 13_I). TOC was considered as Total Carbon.
- electricity, medium voltage: 0.385392 kWh; lognormal variance with pedigree 0.0106, pedigree (2,3,2,4,3)
  Calculated based on literature data published by the industry. This value is a 5-year average of data (2011 - 2015) published by the Gendorf factory (Gendorf, 2016, Umwelterklärung, www.gendorf.de), (Gendorf, 2015, Umwelterklärung, www.gendorf.de), (Gendorf, 2014, Umwelterklärung, www.gendorf.de). The amount of electricity per kg of chemical substance produced is calculated using literature data published by the Gendorf factory based in Germany, which produces a wide range of chemical substances. The factory produced 1657400 tonnes of chemical substances in the year 2015 (Gendorf, 2016, Umwelterklärung, www.gendorf.de) and 740000 tonnes of intermediate products. The amount of electricity consumed in the year 2015 was 3498800 GJ (Gendorf, 2016, Umwelterklärung, www.gendorf.de). The resulting amount of electricity is 0.406 kWh/kg (year 2015) of chemical substance produced. The 5-year average (2011 - 2015, weighted by production volume) is 0.416 kWh/kg (1.5 MJ/kg). Cross-reference: the amount of chemicals produced (excluding intermediate products) in the EU-28 in the year 2011 was 327 million tonnes (Eurostat, http://ec.europa.eu/eurostat/statistics-explained/index.php/Chemicals_production_statistics, accessed 20170126). The chemical and petrochemical industry sector consumed 2.33 EJ of energy in 2011 (European Commission - Joint Research Centre, 2014, BAT on Common Waste water and Waste Gas Treatment/Management Systems in the Chemical Sector). The resulting energy (both heat and electricity) consumed per kg of chemicals produced in 2011 is thus 7.13 MJ/kg. This is higher than the value calculated using data published by Gendorf – 3.85 MJ/kg, but that is to be expected as the intermediate products are not accounted for.
- tallow, unrefined: 1.11171 kg; lognormal variance with pedigree 0.0592, pedigree (4,4,5,4,3)
  Estimated value. Commercially used stearic acid is usually not pure stearic acid but it contains palmitic acid (the chemical company n.d.), which is the other most important saturated fatty acids contained in tallow (20-37%) (Anneken et al. 2006). We here assume an 80% efficiency of the splitting of tallow into stearic acid.
  properties: dry mass 0.975 kg, water content 0.025641, carbon content, non-fossil 0.75, heating value, net 22.1 MJ, wet mass 1 kg
- heat, district or industrial, natural gas: 1.99181 MJ; lognormal variance with pedigree 0.0106, pedigree (2,3,2,4,3)
  Calculated based on literature data published by the industry. This value is a 5-year average of data (2011 - 2015) published by the Gendorf factory (Gendorf, 2016, Umwelterklärung, www.gendorf.de), (Gendorf, 2015, Umwelterklärung, www.gendorf.de), (Gendorf, 2014, Umwelterklärung, www.gendorf.de). The amount of heat used per kg of chemical substance produced is calculated using literature data published by the Gendorf factory based in Germany, which produces a wide range of chemical substances. The factory produced 1657400 tonnes of chemical substances in the year 2015 (Gendorf, 2016, Umwelterklärung, www.gendorf.de) and 740000 tonnes of intermediate products. The amount of heat in the year 2015 was 523500 GJ (Gendorf, 2016, Umwelterklärung, www.gendorf.de) of which 90% was obtained from natural gas and 10% from steam. The resulting amount of heat from natural gas is 2.02 MJ/kg of chemical product produced. The 5-year average (2011 - 2015, weighted by production volume) is 2.15 MJ/kg. Cross-reference: the amount of chemicals produced (excluding intermediate products) in the EU-28 in the year 2011 was 327 million tonnes (Eurostat, http://ec.europa.eu/eurostat/statistics-explained/index.php/Chemicals_production_statistics, accessed 20170126). The chemical and petrochemical industry sector consumed 2.33 EJ of energy in 2011 (European Commission - Joint Research Centre, 2014, BAT on Common Waste water and Waste Gas Treatment/Management Systems in the Chemical Sector). The resulting energy (both heat and electricity) consumed per kg of chemicals produced in 2011 is thus 7.13 MJ/kg. This is higher than the value calculated using data published by Gendorf – 3.85 MJ/kg, but that is to be expected as the intermediate products are not accounted for.
  properties: heating value, net 1 MJ
- nitrogen, liquid: 0 kg; pedigree (1,1,1,1,1)
  Calculated based on literature data published by the industry. This value is a 5-year average of data (2011 - 2015) published by the Gendorf factory (Gendorf, 2016, Umwelterklärung, www.gendorf.de), (Gendorf, 2015, Umwelterklärung, www.gendorf.de), (Gendorf, 2014, Umwelterklärung, www.gendorf.de). The amount of nitrogen used per kg of chemical substance produced is calculated using literature data published by the Gendorf factory based in Germany, which produces a wide range of chemical substances. The factory produced 1657400 tonnes of chemical substances in the year 2015 (Gendorf, 2016, Umwelterklärung, www.gendorf.de) and 740000 tonnes of intermediate products. The reported amount of nitrogen used in 2015 was 33512400 Nm3 (Gendorf, 2016, Umwelterklärung, www.gendorf.de). One Nm3 of nitrogen is equal to 1.2506 kg. The resulting amount of nitrogen - the 5-year average (2011 - 2015, weighted by production volume) is 0.019 kg/kg. Nitrogen is mainly used during the production of chemicals for 'blanketing', which is the process of applying gas to the vapour space of a container or vessel in order to control its composition.
  properties: dry mass 1 kg, wet mass 1 kg
- chemical factory, organics: 3.70569e-10 unit; lognormal variance with pedigree 0.31, pedigree (2,3,2,4,3)
  Calculated based on literature data published by the industry. For this activity, no information was readily available concerning infrastructure and land-use. Therefore, the infrastructure is estimated based on data from two chemical factories, the BASF site of Ludwigshafen and the chemical factory in Gendorf (which are both located in Germany), which produce a wide range of chemical substances. Based on this data, the following assumptions are made: the built area amounts to about 4.2 ha, the plant has an average output of 50'000 t/a and a lifespan of fifty years. The estimated infrastructure amount is therefore 4.00 E-10 units per kg of produced chemical.
  References:
  Althaus H.-J., Chudacoff M., Hischier R., Jungbluth N., Osses M. and Primas A. (2007) Life Cycle Inventories of Chemicals. ecoinvent report No. 8, v2.0. EMPA Dübendorf, Swiss Centre for Life Cycle Inventories, Dübendorf, CH.
  Gendorf (2000) Umwelterklärung 2000, Werk Gendorf. Werk Gendorf, Burgkirchen.
- heat, from steam, in chemical industry: 0 MJ; pedigree (1,1,1,1,1)
  Calculated based on literature data published by the industry. This value is a 5-year average of data (2011 - 2015) published by the Gendorf factory (Gendorf, 2016, Umwelterklärung, www.gendorf.de), (Gendorf, 2015, Umwelterklärung, www.gendorf.de), (Gendorf, 2014, Umwelterklärung, www.gendorf.de). The amount of heat used per kg of chemical substance produced is calculated using literature data published by the Gendorf factory based in Germany, which produces a wide range of chemical substances. The factory produced 1657400 tonnes of chemical substances in the year 2015 (Gendorf, 2016, Umwelterklärung, www.gendorf.de) and 740000 tonnes of intermediate products. The amount of heat in the year 2015 was 523500 GJ (Gendorf, 2016, Umwelterklärung, www.gendorf.de) of which 90% was obtained from natural gas and 10% from steam. The resulting amount of heat from steam is 0.22 MJ/kg of chemical product produced. The 5-year average (2011 - 2015, weighted by production volume) is 0.20 MJ/kg. Cross-reference: the amount of chemicals produced (excluding intermediate products) in the EU-28 in the year 2011 was 327 million tonnes (Eurostat, http://ec.europa.eu/eurostat/statistics-explained/index.php/Chemicals_production_statistics, accessed 20170126). The chemical and petrochemical industry sector consumed 2.33 EJ of energy in 2011 (European Commission - Joint Research Centre, 2014, BAT on Common Waste water and Waste Gas Treatment/Management Systems in the Chemical Sector). The resulting energy (both heat and electricity) consumed per kg of chemicals produced in 2011 is thus 7.13 MJ/kg. This is higher than the value calculated using data published by Gendorf – 3.85 MJ/kg, but that is to be expected as the intermediate products are not accounted for.
  properties: heating value, net 1 MJ
- wastewater, average: -7.81572e-7, -8.45515e-8, -1.63522e-6 m3 (3 entries); lognormal variance with pedigree 0.0106, pedigree (2,3,2,4,3)
  (same comment as for wastewater, average)
  production volume 1059.8 m3
- nitrogen, liquid: 0.00379103, 0.013811 kg (2 entries); lognormal variance with pedigree 0.0106, pedigree (2,3,2,4,3)
  (same comment as for nitrogen, liquid)
- heat, from steam, in chemical industry: 0.0277715, 0.157513 MJ (2 entries); lognormal variance with pedigree 0.0106, pedigree (2,3,2,4,3)
  (same comment as for heat, from steam, in chemical industry)

## Inputs from nature
- Water, cooling, unspecified natural origin [natural resource, in water]: 0.0151933 m3; lognormal variance with pedigree 0.0106, pedigree (2,3,2,4,3)
  Calculated based on literature data published by the industry. This value is a 5-year average of data (2011 - 2015) published by the Gendorf factory (Gendorf, 2016, Umwelterklärung, www.gendorf.de), (Gendorf, 2015, Umwelterklärung, www.gendorf.de), (Gendorf, 2014, Umwelterklärung, www.gendorf.de). The amount of water for cooling extracted per kg of chemical substance produced is calculated using literature data published by the Gendorf factory based in Germany, which produces a wide range of chemical substances. The factory produced 1657400 tonnes of chemical substances in the year 2015 (Gendorf, 2016, Umwelterklärung, www.gendorf.de) and 740000 tonnes of intermediate products. The reported amounts of water extracted as groundwater and surface water (river) are assumed to be used entirely for cooling purposes.
- Water, well, in ground [natural resource, in water]: 0.000768931 m3; lognormal variance with pedigree 0.0106, pedigree (2,3,2,4,3)
  Calculated based on literature data published by the industry. This value is a 5-year average of data (2011 - 2015) published by the Gendorf factory (Gendorf, 2016, Umwelterklärung, www.gendorf.de), (Gendorf, 2015, Umwelterklärung, www.gendorf.de), (Gendorf, 2014, Umwelterklärung, www.gendorf.de). The amount of groundwater and surface water (river) extracted per kg of chemical substance produced is calculated using literature data published by the Gendorf factory based in Germany, which produces a wide range of chemical substances. The factory produced 1657400 tonnes of chemical substances in the year 2015 (Gendorf, 2016, Umwelterklärung, www.gendorf.de) and 740000 tonnes of intermediate products. The amount of groundwater and surface water (river) extracted in the year 2015 was 19950000 tonnes and 21488100 tonnes respectively (Gendorf, 2016, Umwelterklärung, www.gendorf.de).
- Water, river [natural resource, in water]: 0.000796723 m3; lognormal variance with pedigree 0.0106, pedigree (2,3,2,4,3)
  (same comment as for Water, well, in ground)

## Emissions to nature
- Nitrogen [air, unspecified]: 0.017602 kg; lognormal variance with pedigree 0.0106, pedigree (2,3,2,4,3)
  Calculated value. The amount of nitrogen released to air is equal to the amount of nitrogen entering the activity.
- Water [water, unspecified]: 0.0154713 m3; lognormal variance with pedigree 0.0106, pedigree (2,3,2,4,3)
  Calculated based on literature data published by the industry (Gendorf, 2016, Umwelterklärung, www.gendorf.de). The amount of water released back to the environment consists of the amount of process water treated in the internal WWTP and then released back to the environment and the amount of cooling water released back to the environment.
- Water [air, unspecified]: 0.00129699 m3; lognormal variance with pedigree 0.0106, pedigree (2,3,2,4,3)
  Calculated to ensure the water balance. In general, in the case of recirculating cooling systems, 77% of the water input evaporates to air. In case of once-through cooling systems, 4% of the water input evaporates to air. The process water has in the chemical industry an average evaporation rate of 20.5%. In the specific case of the Gendorf factory, the calculated evaporation rate based on the data published is 6.3%. This matches the qualitative information, that the majority of the cooling systems in Gendorf are once-through and that the amount of cooling water used is significantly higher than the amount of process water used (Gendorf, 2016, Umwelterklärung, www.gendorf.de).

## Sampling procedure
Literature data and stochiometric calculation.

## Review by Emilia Moreno Ruiz 2017-08-10
This dataset was additionally reviewed in a separate review process by Eric Johnson of Atlantic Consulting as well as Emilia Moreno Ruiz and Gregor Wernet of ecoinvent.
