# water production, completely softened

Dataset: EcoSpold 2, unit process
Geography: RoW
Time period: 2015-01-01 to 2021-12-31
Technology level: current
Classification: EcoSpold01Categories: water supply/production
Classification: ISIC rev.4 ecoinvent: 3600:Water collection, treatment and supply
Scenario: Business-as-Usual
System model: Allocation, cut-off by classification
Generated by: Laura Rubio
Published in: Gmünder S. 2017
Database: ecoinvent
isCopyrightProtected: false
accessRestrictedTo: 1

## General comment
This dataset represents the production of softened water by ion exchange.It is used in many sectors, such as the drinking water preparation, in breweries and in sodas, but also for cooling- and boiler feed. The main purpose of hard water is to prevent the precipitation and build-up of minerals in equipment and piping (Lenntech,2017). The process comprises a cation exchange resin on which the mobile ion inside the bed is typically sodium. When hard water passes through the resin, hardness ions (Mg2+ and Ca2+) move into the resin bed and each cation is replaced by two sodium ions getting out of the resin. Water salinity does not change, only the constituents of salinity. The system includes the process with consuption of raw materials,energy,and infrastructure, as well as the generation of emissions to air and water. Transient or unstable operations like starting up or shutting-down, are not included, but the production during stablen operation conditions. Storage and transportation of the final product are not included. The emissions into water are assumed to be emitted into river. Raw materials as well as energy consumption values are based on LCA studies. Emissions are calculated from the input properties. Infrastructure is assumed to be the same as the deionised process as a first approximation.
Data was based on two main reports: Case Study And LCA of coastal utility experiencing saltwater intrusion (Saetta, Ishii, Pine III, & Boyer, 2015) and The Sustainability of Ion Exchange Water treatment Technology (Amin, 2016). Both describe soften water process based on cationic membranes, able to exchange hardness ions (Mg2+ and Ca2+) by sodium.

## Included activities start
From the consumption of raw water at the factory as a starting material

## Included activities end
This activity ends with the production of softened water including materials, energy uses,infrastructure and emissions. The activity does not include transportation.

## Geography
The inventory is modelled from two LCA studies in United States to the rest of the world

## Technology
Water completely soften consists in the removal of cations mainly calcium and magnesium which are exchanged or replaced for another cation that cannot form scale as it is much more soluble such as sodium or chloride ions. The most common means for reduction of hard water relies on ion exchange resins or reverse osmosis; in limited circumstances, it is performed through the use of chemicals additives specially, lime softening (WaterProfessionals, 2017).

Ion exchange water softening process, apart from being the most conventional method, it is also the oldest method used to remove calcium and magnesium ions from water. It comprises a cation exchange resin on which the mobile ion inside the bed is typically sodium. When hard water passes through the resin, hardness ions (Mg2+ and Ca2+) move into the resin bed and each cation is replaced by two sodium ions getting out of the resin. Water salinity does not change, only the constituents of salinity.

Once capacity is exhausted, a water softener must be regenerated using salt. The regeneration process consists on backwash, brine draw/slow rinse, fast rinse and refill.

## Time period
The time period is set from 2015 to the year 2017 as it is a considering period in which soften treatmnet plants have not had dractical technological changes.

## Reference product
- water, completely softened: 1 kg; name Water_Softened; CPC 18000: Natural water; By-product classification allocatable product; CAS 7732-18-5
  EcoSpold01Location=RER
  production volume 3.3184e12 kg; name PV_water_softened; = 7.5878E+14*0.01
    Estimated value based on the total industrial water withdrawal according to AQUASTAT and assuming that 1% of the industrial water withdrawal is used for softened water production.
    Source for industrial water withdrawals: Table 7.1 in World Water Assessment Programme. 2009. The United Nations World Water Development Report 3: Water in a Changing World. Paris: UNESCO, and London: Earthscan.
    Industrial water withdrawals value was taken from the AQUASTAT (FAO's global water information system, developed by the Land and Water Division and the most quoted source on global water statistics). This value comprises industrial water withdrawal which can include water from primary renewable and secondary freshwater resources, as well as water from over-abstraction of renewable groundwater or withdrawal from fossil groundwater, direct use of agricultural drainage water, direct use of (treated) wastewater, and desalinated water. This sector refers to self-supplied industries not connected to the public distribution network. The ratio between net consumption and withdrawal is estimated at less than 5%. It includes water for the cooling of thermoelectric and nuclear power plants, but it does not include hydropower. Water withdrawn by industries that are connected to the public supply network is generally included in municipal water withdrawal
  property price 0.00046 EUR2005
    Converted from EU price by using Purchasing Power Parities (0.8458 in 2003 and 0.8426 in 2004)
  property carbon content 0
    carbon content on a dry matter basis (reserved; not for manual entry)
  properties: dry mass 0 kg, carbon content, non-fossil 0, water in wet mass 1 kg, wet mass 1 kg, carbon content, fossil 0, carbon allocation 0 kg

## Inputs from technosphere
- wastewater, unpolluted: -0.00015 m3; name Water_to_water; = (Water_IN-Water_Softened/1000)*-1; lognormal variance with pedigree 0.082, pedigree (5,5,3,5,1)
  EcoSpold01Location=CH
  Estimated value based on water balance ( WaterIN - WaterOut).
  Uncertainty: Estimation
  production volume 4.9776e8 m3; = PV_water_softened/ Water_Softened* Water_to_water
    Calculated from the production volume of water, completely softened, from decarbonised water, at user in proportion to the respective output amounts.
  property price 0 EUR2005; name Water_to_water_price_EUR2005
  properties: wet mass 1000 kg, carbon content, non-fossil 0.00178991, dry mass 0.337476 kg, carbon content, fossil 0.00178991, water content 2962.17
  note on carbon content, fossil: Assumed to be like in tap water. Bicarbonate content is 2.93 mol/m3. CO2 content is 0.1 mol/m3 (ecoinvent v2.2 report 8, Tab 93.1).
- sodium hypochlorite, without water, in 15% solution state: 2.64e-5 kg; name sodium_hyperchlorite; lognormal variance with pedigree 0.0078, pedigree (2,4,3,5,2)
  Calculated value based on Case Study And LCA of coastal utility experiencing saltwater intrusion (Saetta, Ishii, Pine III, & Boyer, 2015) and The Sustainability of Ion Exchange Water treatment Technology (Amin, 2016).
  properties: wet mass 1 kg, dry mass 1 kg
- ion-exchanger for water treatment: 9e-11 unit; lognormal variance with pedigree 0.0078, pedigree (2,4,3,5,2)
  Literature value, copied from the existing dataset " water production, deionised, from tap water, at user, GLO" (accessed in 20171201) as it was also considered adequate for this dataset.
  Reference:
  Althaus H.-J., Chudacoff M., Hischier R., Jungbluth N., Osses M. and Primas A. (2007) Life Cycle Inventories of Chemicals. ecoinvent report No. 8, v2.0. EMPA Dübendorf, Swiss Centre for Life Cycle Inventories, Dübendorf, CH.
- hydrochloric acid, without water, in 30% solution state: 7.36e-8 kg; name hydrochloric_acid; lognormal variance with pedigree 0.0066, pedigree (2,4,3,5,1)
  EcoSpold01Location=RER
  Calculated value based on Case Study And LCA of coastal utility experiencing saltwater intrusion (Saetta, Ishii, Pine III, & Boyer, 2015) and The Sustainability of Ion Exchange Water treatment Technology (Amin, 2016).
  Uncertainty: Literature information for a modern power plant, split of old data
  properties: dry mass 1 kg, heating value, net 3.32 MJ, wet mass 1 kg
- sodium chloride, brine solution: 0.000106 kg; name sodium_chloride; lognormal variance with pedigree 0.0132, pedigree (2,4,3,5,2)
  (same comment as for sodium hypochlorite, without water, in 15% solution state)
  properties: dry mass 1 kg, wet mass 1 kg
- sodium hydroxide, without water, in 50% solution state: 1.03e-8 kg; name sodium_hydroxide; lognormal variance with pedigree 0.0126, pedigree (1,4,3,5,2)
  EcoSpold01Location=RER
  Calculated value. Case Study And LCA of coastal utility experiencing saltwater intrusion (Saetta, Ishii, Pine III, & Boyer, 2015) and The Sustainability of Ion Exchange Water treatment Technology (Amin, 2016).
  Uncertainty: Literature information for a modern power plant
  properties: wet mass 1 kg, dry mass 1 kg, heating value, net 3.03 MJ
- electricity, medium voltage: 0 kWh; pedigree (1,1,1,1,1)
  Calculated value based on Case Study And LCA of coastal utility experiencing saltwater intrusion (Saetta, Ishii, Pine III, & Boyer, 2015) and The Sustainability of Ion Exchange Water treatment Technology (Amin, 2016). The energy includes the treatment process consumption plus the energy required for the pumping.
- electricity, medium voltage: 1.0842e-5, 2.07903e-6, 3.49025e-5, 0.000507626, 7.15502e-5 kWh (5 entries); lognormal variance with pedigree 0.0078, pedigree (2,4,3,5,2)
  (same comment as for electricity, medium voltage)

## Inputs from nature
- Water, well, in ground [natural resource, in water]: 0.00115 m3; name Water_IN; lognormal variance with pedigree 0.0332, pedigree (2,4,4,5,2)
  Calculated value based on The Sustainability of Ion Exchange Water treatment Technology report (Amin, 2016).

## Emissions to nature
- Sodium, ion [water, surface water]: 4.98591e-5 kg; = sodium_hydroxide/39.9971*22.99+ sodium_chloride/58.44*22.99+ sodium_hyperchlorite/74.44*22.99; lognormal variance with pedigree 0.064, pedigree (3,4,4,5,1)
  Calculated value. Stoechiometric calculations were used to calculate the emissions to water based on the type and amount of chemicals used. All Sodium is assumed to be emitted to water.
  Uncertainty: Calculation
- Chloride [water, surface water]: 7.6944e-5 kg; = hydrochloric_acid/36.45*35.45+ sodium_chloride/58.44*35.45+ sodium_hyperchlorite/74.44*35.45; lognormal variance with pedigree 0.064, pedigree (3,4,4,5,1)
  Calculated value. Stoechiometric calculations were used to calculate the emissions to water based on the type and amount of chemicals used. All Chloride is assumed to be emitted to water.
  Uncertainty: Calculation
- AOX, Adsorbable Organic Halogen as Cl [water, surface water]: 2.5e-8 kg; lognormal variance with pedigree 0.064, pedigree (3,4,4,5,1)
  Literature value. Based on former completly softended dataset (GLO).
  Uncertainty: Literature

## Sampling procedure
Literature and life cycle assessment studies.

References: Case Study And LCA of coastal utility experiencing saltwater intrusion (Saetta, Ishii, Pine III, & Boyer, 2015) and The Sustainability of Ion Exchange Water treatment Technology (Amin, 2016)

## Extrapolations
Data was based on two main reports: Case Study And LCA of coastal utility experiencing saltwater intrusion (Saetta, Ishii, Pine III, & Boyer, 2015) and The Sustainability of Ion Exchange Water treatment Technology (Amin, 2016). Both describe soften water process based on cationic membranes, able to exchange hardness ions (Mg2+ and Ca2+) by sodium. Data was used for regionalizing chemicals and energy exchanges. Infrastructure was assumed to be the same as deionised water as a first approximation. The Uncertainty has been changed accordingly.

## Review by Philippe Loubet 2018-01-09
The overall quality of these datasets is acceptable.
In the future it would be desirable to consider different water quality types for this process (eg. tap water or raw river water)
