# ethanol, from fermentation, to market for ethanol, vehicle grade

Dataset: EcoSpold 2, unit process
Geography: CH
Time period: 2000-01-01 to 2021-12-31
Technology level: current
Classification: ISIC rev.4 ecoinvent: 2011:Manufacture of basic chemicals
Synonyms: Ethyl alcohol; Anhydrol; Denatured alcohol; Ethanol; Ethanol absolute; alcohol dehydrated; grain alcohol; ethyl hydroxide; fermentation alcohol; ethyl hydrate; algrain; cologne spirits (alcohol); cologne spirit; ethanol 200 proof; Alkohol
Scenario: Business-as-Usual
System model: Allocation, cut-off by classification
Generated by: Sofia Parada Tur
Database: ecoinvent
isCopyrightProtected: true
accessRestrictedTo: 1

## General comment
This activity links the output of the generic market for ethanol, without water, in 99.7% solution state, from fermentation to the niche market for ethanol, without water, in 99.7% solution state, from fermentation, at service station.
The niche market provides ethanol for petrol production.

## Included activities start
Activity starting with the input of ethanol, without water, in 99.7% solution state, from fermentation

## Included activities end
Activity ends with the provision of ethanol, without water, in 99.7% solution state, from fermentation, at service station

## Geography
the inventory is valid for Swizerland

## Time period
based on reference year for production volume of ethanol at service station

## Reference product
- ethanol, without water, in 99.7% solution state, from fermentation, vehicle grade: 1 kg; CPC 35491: Biodiesel; By-product classification allocatable product; CAS 64-17-5
  production volume 32578.6 kg; = ((0.7197*0.95)+(0.789*0.05))*901000*(5/100)
    In Switzerland, the bioethanol production in the reference year 2005 was 9.01E5 L (http://www.biofuels-platform.ch/en/infos/ch-bioethanol.php). In 2005 the only bioethanol mix available in service stations was E5 (max. 5% ethanol with 95% gasoline) (http://www.etha-plus.ch/fr/infos-pratiques/production-et-elaboration.html). The mass of bioethanol is calculated with the density of ethanol and gasoline and their relative amount in bioethanol E5.
  property heating value, net 31.58 MJ
    LHV is calculated based on the elemental composition of the substance. Based on the CAS number of the substance (000064-17-5), the chemical formula of the substance is found to be: C2H6O, (PubChem 2020).
    Reference: Kim, S., Chen, J., Cheng, T., Gindulyte, A., He, J., He, S., Li, Q., Shoemaker, B. A., Thiessen, P. A., Yu, B., Zaslavsky, L., Zhang, J., & Bolton, E. E. (2019). PubChem 2019 update: improved access to chemical data. Nucleic acids research, 47(D1), D1102–D1109. https://doi.org/10.1093/nar/gky1033
  property price 0.479 EUR2005
    Estimated to be 10% more than in case of ethanol, without water, in 99.7% solution state, from fermentation, at service station
  property carbon content 0.521739
    carbon content on a dry matter basis (reserved; not for manual entry)
  properties: carbon content, non-fossil 0.521739, dry mass 1 kg, wet mass 1 kg, carbon content, fossil 0, water content 0, water in wet mass 0 kg, carbon allocation 0.521739 kg

## Inputs from technosphere
- ethanol, without water, in 99.7% solution state, from fermentation: 1 kg
  This exchange has a direct link, since the dewatering is happening only locally.
  properties: heating value, net 31.58 MJ, dry mass 1 kg, wet mass 1 kg, carbon content, non-fossil 0.521739

## Extrapolations
This dataset has been extrapolated from year 2005 to the year of the calculation (2021). The uncertainty has been adjusted accordingly.

## Review by Bo Weidema 2012-04-13
Process is a simple re-naming of a product in order to supply the service stations.
