# cryolite production, from fluosilicic acid

Dataset: EcoSpold 2, unit process
Geography: GLO
Time period: 1960-01-01 to 2021-12-31
Technology level: current
Classification: ISIC rev.4 ecoinvent: 2011:Manufacture of basic chemicals
Classification: EcoSpold01Categories: chemicals/inorganics
Synonyms: sodium aluminium fluoride; sodium hexafluoroaluminate; trisodium hexafluoroaluminate; hexafluoro-; aluminate (3-); icestone; trisodium
Scenario: Business-as-Usual
System model: Allocation, cut-off by classification
Generated by: Sofia Parada Tur
Published in: Gernes D.C. 1960
Database: ecoinvent
isCopyrightProtected: true
accessRestrictedTo: 1

## General comment
The dataset represents the production of cryolite from fluosilicic acid. The reaction yield is assumed to be 95% since no specific data is available. Water produced in the reaction is not considered as a byproduct, but assumed to be recovered and recycled internally.
The reaction process is shown below:
Al2O3 + 2H2SiF6 + 6 NaOH --> 2 Na3AlF6 + 2 SiO2 + 5 H2O

## Included activities start
From reception of fluosilicic acid, sodium hydroxide and aluminium oxide at the factory gate.

## Included activities end
The dataset includes the production of cryolite by chemical reaction of reactants at the chemical plant. Included are the estimated emissions to air and water from production. The energy demand and infrastructure of the plant are approximated. Solid wastes are omitted.

## Geography
Data used has no specific geographical origin (stoechiometry).

## Technology
The main production of cryolite involves hydrofluoric acid or fluosilicic acid. In both cases, the reactants can be combined with a variety of materials, such as Al2O3 · 3 H2O, Al2O3 · x NaOH, NaOH, NaCl, and Na2SO4. During the present reaction, fluosilicic acid is neutralised with sodium hydroxide. Then it reacts with Al2O3 to produce cryolite and silica.
The reaction process is shown below:
Al2O3 + 2H2SiF6 + 6 NaOH --> 2 Na3AlF6 + 2 SiO2 + 5 H2O
It is difficult to predict how much of the cryolite is produced with the present reaction, since many production routes exist. The present inventory serves as an illustration of the cryolite production from fluosilicic acid. The alternative production route with HF is still considered to be the main production route (source: Ullmann encyclopedia, Cryolite, 2005).

## Time period
publication year of patent (refer to published source)

## Parameters
- fraction, cooling water, once-through system, to air: 0.004 dimensionless; name fraction_CW_OT_to_air; lognormal variance with pedigree 0.0413, pedigree (2,3,1,3,1)
  Calculated based on literature value (Scown, C.D., 2011, Water Footprint of U.S. Transportation Fuels and supplying information of the article) (Vionnet, S., Quantis Water Database - Technical Report, 2012).
- fraction, cooling water, to air: 0.3875 dimensionless; name fraction_CW_to_air; = (0.5*fraction_CW_OT_to_air)+(0.5*fraction_CW_R_to_air); lognormal variance with pedigree 0.092025, pedigree (4,4,3,2,4)
  Calculated value based on literature value (see comments of the other parametres present in this dataset) and expert opinion. In the case when no industry/literature data are available about the type of cooling or directly fraction, cooling water, to air specific for the process a default assumption is applied. It is assumed that the once-through cooling system is used in 50% of all cases and recirculating system is used in another 50% of all cases.
- fraction, cooling water, cooling pond system, to air: 0.032 dimensionless; name fraction_CW_CP_to_air; lognormal variance with pedigree 0.0413, pedigree (2,3,1,3,1)
  (same comment as for fraction, cooling water, once-through system, to air)
- fraction, cooling water, recirculating system, to air: 0.771 dimensionless; name fraction_CW_R_to_air; lognormal variance with pedigree 0.0413, pedigree (2,3,1,3,1)
  (same comment as for fraction, cooling water, once-through system, to air)

## Reference product
- cryolite: 0 kg; name cryolite_output; source Gernes D.C. 1960; CPC 34: Basic chemicals; By-product classification allocatable product; CAS 15096-52-3
  EcoSpold01Location=RER
  production volume 1.95556e7 kg; name cryolite_output_production; = (23561*1000*3.32)*1/4
    Cryolite is produced at four sites in the EU-15. 3 of them updated their information in 2006. The production volume of these four sites is 23,561 t/y.
    Assumptions:
    - Based on online information found from the specified european production sites related to production means ( Fluorsid, Derivados del Fluor S.A. , I.C.I.B. S.p.A., Solvay Fluor und Derivate) it is estimated that 3/4 of cryolite are produced from HF and 1/4 from fluosilicic acid.
    - The production volume is assumed to be similar in 2006 and 2005 (reference year is 2005)
    - The World production is extrapolated with the GDP adjustment factor: 3.32 (unit of GDP: current $; World Bank, year 2005). The adjustment factor is the ratio of World GDP/EU GDP
    Note: the production volume has been cross-checked with the amount of cryolite consumption during aluminium manufacture. 2g of cryolite are used for producing 1 kg of Aluminium. Asuming 1/4 of the total cryolite is being produced from fluosilicic acid, the resulting amount is 1.6E7 which is similar to our calculated value.
  property price 1 EUR2005; name cryolite_output_price_EUR2005
    Estimated based on expert judgement and knowledge of the market for chemicals.
  property molecular weight 210 g/mol; name cryolite_output_MW
  property carbon content 0
    carbon content on a dry matter basis (reserved; not for manual entry)
  property true value 1; name cryolite_output_true_value
    allocation property applied in "true value" allocation // value calculated from revenue
  properties: dry mass 1 kg, carbon content, non-fossil 0, water content 0, carbon content, fossil 0, wet mass 1 kg, water in wet mass 0 kg, carbon allocation 0 kg
- silica sand: 1 kg; name silica_output; = 1*((2* silica_output_MW/1000)/(2* 210/1000)); source Gernes D.C. 1960; CPC 15310: Natural sands; By-product classification allocatable product; pedigree (1,1,1,1,1)
  silica sand is used as an approximation of silicon dioxide, since the product silicon dioxide is not present in the current database. This value will be substituted when better data is available.
  Calculation based on stoichiometric relationship. In this case, silica sand is considered to be pure silicone dioxide (SiO2).
  production volume 5.58732e6 kg; name silica_output_production; = cryolite_output_production * silica_output
    Calculated from production volume of reference product using the relative outputs.
  property price 0.0312 EUR2005; name silica_output_price_EUR2005
    Calculated from EU prices by use of exchange rates.
  property molecular weight 60 g/mol; name silica_output_MW
  property carbon content 0
    carbon content on a dry matter basis (reserved; not for manual entry)
  property true value 0.00891429; name silica_output_true_value
    allocation property applied in "true value" allocation // value calculated from revenue
  properties: carbon content, fossil 0, wet mass 1 kg, carbon content, non-fossil 0, water content 0.010101, water in wet mass 0.01 kg, dry mass 0.99 kg, carbon allocation 0 kg

## Inputs from technosphere
- electricity, medium voltage: 0.0102978 kWh; name electricity_input; = 0.333* cryolite_output; source Gendorf 2000; lognormal variance with pedigree 0.1706, pedigree (4,4,5,1,5)
  EcoSpold01Location=UCTE
  Estimation. These values were approximated with data from an large chemical plant site in Germany producing 2.05 Mt a-1 (intermediates included) of different chemicals. The values for the energy consumption per kg of product of this plant (3.2 MJ kg-1) were used as approximation for the energy consumption. This total energy demand contains a split of 50% natural gas, 38% electricity and 12% steam from external energy sources. For this inventory all energy used for heat or steam was assumed to be natural gas.
  Uncertainty: Chauvel 1989
- fluosilicic acid, without water, in 22% solution state: 0.0223213 kg; name fluosilicic_acid_input; = 1*((2* fluosilicic_acid_input_MW/1000)/(2* 210/1000))/0.95; source Gernes D.C. 1960; lognormal variance with pedigree 0.25, pedigree (5,5,5,5,5)
  stoichiometric calculation
  property molecular weight 144 g/mol; name fluosilicic_acid_input_MW
  properties: wet mass 1 kg, dry mass 1 kg
- aluminium oxide, non-metallurgical: 0 kg; name aluminium_oxide_input; source Gernes D.C. 1960; pedigree (1,1,1,1,1)
  stoichiometric calculation
  EcoSpold01Location=RER
  Uncertainty: estimation based on process yield 90-99.8%
  property molecular weight 102 g/mol; name aluminium_oxide_input_MW
  properties: wet mass 1 kg, dry mass 1 kg
- sodium hydroxide, without water, in 50% solution state: 0.0186011 kg; name sodium_hydroxide_input; = 1*((6* sodium_hydroxide_input_MW/1000)/(2* 210/1000))/0.95; source Gernes D.C. 1960; lognormal variance with pedigree 0.1786, pedigree (4,5,5,5,5)
  (same comment as for aluminium oxide, non-metallurgical)
  property molecular weight 40 g/mol; name sodium_hydroxide_input_MW
  properties: heating value, net 3.03 MJ, wet mass 1 kg, dry mass 1 kg
- chemical factory, organics: 1.23697e-11 unit; name chemical_factory_input; = 4E-10* cryolite_output; source Gendorf 2000; lognormal variance with pedigree 0.588, pedigree (4,5,5,5,5)
  Estimation. These values were approximated with data from an large chemical plant site in Germany producing 2.05 Mt a-1 (intermediates included) of different chemicals. The values for the energy consumption per kg of product of this plant (3.2 MJ kg-1) were used as approximation for the energy consumption. This total energy demand contains a split of 50% natural gas, 38% electricity and 12% steam from external energy sources. For this inventory all energy used for heat or steam was assumed to be natural gas.
  EcoSpold01Location=RER
  Uncertainty: estimation
- heat, district or industrial, natural gas: 0.0618487 MJ; name heat_input; = 2* cryolite_output; source Gendorf 2000; lognormal variance with pedigree 0.21, pedigree (5,5,5,5,4)
  Estimation. These values were approximated with data from an large chemical plant site in Germany producing 2.05 Mt a-1 (intermediates included) of different chemicals. The values for the energy consumption per kg of product of this plant (3.2 MJ kg-1) were used as approximation for the energy consumption. This total energy demand contains a split of 50% natural gas, 38% electricity and 12% steam from external energy sources. For this inventory all energy used for heat or steam was assumed to be natural gas.
  EcoSpold01Location=RER
  Uncertainty: estimated with data from a large chem. plant
  properties: heating value, net 1 MJ
- aluminium oxide, non-metallurgical: 0.00676086, 0.00114461 kg (2 entries); source Gernes D.C. 1960; lognormal variance with pedigree 0.1786, pedigree (4,5,5,5,5)
  (same comment as for aluminium oxide, non-metallurgical)
  properties: molecular weight 102 g/mol, wet mass 1 kg, dry mass 1 kg

## Inputs from nature
- Water, cooling, unspecified natural origin [natural resource, in water]: 0.000742184 m3; name water_cooling_input; = 0.024* cryolite_output; source Gendorf 2000; lognormal variance with pedigree 0.21, pedigree (5,5,5,5,4)
  Data from a large chemical plant in Germany (Gendorf, 2000), calculated based on overal cooling water consumption per kilogram of product.
  Uncertainty: estimated with data from a large chem. plant

## Emissions to nature
- Water [air, unspecified]: 0.000287596 m3; name water_to_air_unspecified; = water_cooling_input*fraction_CW_to_air; lognormal variance with pedigree 0.130025, pedigree (4,4,5,2,4)
  Calculated value based on literature values and expert opinion. See comments in the parametres' comment field.
  property fraction, origin: fresh water 0; name fraction_origin_fresh_water
  property fraction, origin: salt water 0; name fraction_origin_salt_water
  property fraction, origin: unspecified 1; name fraction_origin_unspecified
- Fluosilicic acid [water, unspecified]: 0.000117481 kg; name fluosilicic_acid_emission_water; = ((((1/0.95)-1)* fluosilicic_acid_input)-0)*0.1; lognormal variance with pedigree 0.25, pedigree (5,5,5,5,5)
  Estimation. From the input of fluosilicic acid, one part will leave the process as emission to the water. The formula is the following:
  mass fluosilicic acid to water=(((1/0.95)-1)*mass fluosilicic acid input)-mb air))*0.1
  Note: reaction yield is 95%; mb air = mass to air, in this case it is assumed that no fluosilicic acid leaves the process to air, since it is a liquid.
- Water [water, unspecified]: 0.000454588 m3; name water_to_water_unspecified; = water_cooling_input*(1-fraction_CW_to_air); lognormal variance with pedigree 0.130025, pedigree (4,4,5,2,4)
  (same comment as for Water)
  property fraction, origin: fresh water 0; name fraction_origin_fresh_water_Ww
  property fraction, origin: unspecified 1; name fraction_origin_unspecified_Ww
  property fraction, origin: salt water 0; name fraction_origin_salt_water_Ww
- Sodium, ion [water, surface water]: 5.62928e-5 kg; name sodium_emission_water; = (((1/0.95)-1)*sodium_hydroxide_input*23/sodium_hydroxide_input_MW)*0.1; lognormal variance with pedigree 0.23, pedigree (5,5,5,5,4)
  Estimation. From the input of sodium hydroxide, one part will leave the process as emission to the water. The formula is the following:
  mass sodium to water=(((1/0.95)-1)*mass sodium input)-mb air))*0.1
  Note: reaction yield is 95%; mb air = mass to air, in this case it is assumed that no sodium hydroxide leaves the process to air.
  Note: the mass of sodium is calculated with the respective molar weight and stoichiometric relation betweent NaOH and Na - 1 mol of Na are needed in 1 mol of NaOH. Molecular weight of Na = 23 g/mol
  Uncertainty: estimated from mass balance and WWTP effic.

## Sampling procedure
Inventory based on patent and literature review. No public data for cryolite from the European Aluminium Association was identified. The chemical reaction is based on stoichiometric principles. Infrastructure, energy and water demand based on approximation from large chemical plant. Process emissions based on general estimations.

## Extrapolations
Energy consumptions and emissions as well as Infrastructure are estimated.

## Review by Bo Weidema 2012-02-17
passed

## Review by Eric Johnson 2012-02-17
I'm satisfied with this dataset.
