# treatment of brake wear emissions, lorry

Dataset: EcoSpold 2, unit process
Geography: RER
Time period: 2009-01-01 to 2021-12-31
Technology level: current
Classification: ISIC rev.4 ecoinvent: 3821:Treatment and disposal of non-hazardous waste
Scenario: Business-as-Usual
System model: Allocation, cut-off by classification
Generated by: Andrew Simons
Published in: Ntziachristos L., Paul P. 2009
Database: ecoinvent
isCopyrightProtected: true
accessRestrictedTo: 1

## General comment
This dataset represents the treatment of non-exhaust emissions produced by brake abrasion from road freight transport. The datasets are treatments because they represent a removal of substances from the technosphere (removal of tyre material).

This dataset and the emission factors within it relate to 1kg brake wear. It is valid for Europe and represents the average data for road freight transport.

Calculation of non-exhaust emissions (tyre, brake and road wear emissions) are based on EMEP/EEA (2013) and values for net vehicle weights and average load factors. Net vehicle weights are taken from the EcoTransIT (2011) report whilst the average load factors are taken from the Tremove model v2.7b (2009) and EcoTransIT (2011) report.

The brake wear emissions are to air only. All particulates are accounted for as emissions to air and have particle sizes below 100um. Anything above this does not remain airborne over longer periods.

It must be noted that elementary and organic carbon, substances very dominant in the emissions profile from brake wear are currently not available in the ecoinvent database and are therfore not accounted for in this datase other than their representation as unspecified particulate emissions. This means that although the datasets represent 1kg of brake wear the emissions do not sum up to 1kg.

In order to use the treatment of non-exhaust emissions in a transport dataset the quantity of emissions per tkm must be calculated. This must then be devided by the specific load factor of the transport in question.Non-exhaust emissions are considered to be linearly scalable to gross vehicle weight (GVW). For brake wear emissions from lorries the specific quantity is 8.13E-9 kg/kg GVW*km.

Main data sources:

De Ceuster, G., et al. (2009) TREMOVE: Final Report. Model code v2.7b, 2009. European Commission, Brussels, BE.

Knörr, W. et al. (2011) Ecological Transport Information Tool for Worldwide Transports (EcoTransIT): Methodology and data update. Berlin, Hannover, Heidelberg, DE.

Ntziachristos, L., Boulter, P. (2013) EMEP/EEA air pollutant emissions inventory guidebook 2009: Road vehicle tyre and brake wear; Road surface wear. European Environment Agency, Copenhagen, DK.

## Included activities start
The activity starts with the friction of lorry brakes

## Included activities end
The activity ends with emissions of lorry brake wear

## Reference product
- brake wear emissions, lorry: -1 kg; source Ntziachristos, L. 2013; CPC 49129: Other parts and accessories n.e.c. of motor vehicles (including brakes, gear boxes, axles, road wheels, suspen[…]; By-product classification Waste
  Road freight specific non-exhaust emissions.
  This dataset and the emission factors within it relate to 1kg of brake wear. In order to use the treatment of non-exhaust emissions in a transport dataset the quantity of emissions per km must be calculated. This must then be devided by the specific load factor of the transport in question. Non-exhaust emissions are considered to be linearly scalable to gross vehicle weight (GVW). For brake wear emissions from lorries the specific quantity is 8.13E-9 kg/kg GVW*km.
  production volume 4.82922e7 kg; = 5.94E+12*8.13E-09*1000
    Estimation. Calculated from production volume of reference product using the relative outputs.
    Annual production volume of non-exhaust brake wear emissions = total Gtkm/yr * t emission/t gross vehicle weight and km = 5.94E+12 Gtkm/yr * 8.13E-09 t/Gtkm * 1000
    Gtkm expresses the transport of freight and vehicle over one kilometer. Source for total tkm/yr in Europe (EU 19 + CH & NO): TREMOVE (2009) v2.7b. Amount of emissions per tkm taken from Ntziachristos, L., Boulter, P. (2009b). EMEP/EEA air pollutant emissions inventory guidebook 2009: Road vehicle tyre and brake wear; Road surface wear. Copenhagen, European Environment Agency.
    Net vehicle weights taken from ecoinvent v2 with minor alteration.
  property price 0 EUR2005
    Waste products are assigned a price of zero as they are assumed to require further treatment.
  property carbon content, fossil 0.149
    fossil carbon content on a dry matter basis. Represents the total organic carbon emissions to air, water and soil.
  property carbon content 0.149
    carbon content on a dry matter basis (reserved; not for manual entry)
  properties: dry mass 1 kg, wet mass 1 kg, carbon content, non-fossil 0, carbon allocation 0.149 kg

## Emissions to nature
All rows: source Ntziachristos, L. 2013; lognormal variance with pedigree 0.0413, pedigree (2,2,5,1,1)
- Particulates, > 10 um [air, unspecified]: 0.02 kg
  Calculated value. Derived from EMEP/EEA (2013) and based on an average gross vehicle weight (GVW) of all truck categories and load factors.
- Bromine [air, unspecified]: 5.56e-5 kg
  (same comment as for Particulates, > 10 um)
- Aluminium [air, unspecified]: 0.00285 kg
  (same comment as for Particulates, > 10 um)
- Nickel [air, unspecified]: 0.000454 kg
  (same comment as for Particulates, > 10 um)
- Antimony [air, unspecified]: 0.139 kg
  (same comment as for Particulates, > 10 um)
- Zinc [air, unspecified]: 0.0121 kg
  (same comment as for Particulates, > 10 um)
- Sulfate [air, unspecified]: 0.0464 kg
  (same comment as for Particulates, > 10 um)
- Calcium [air, unspecified]: 0.0107 kg
  (same comment as for Particulates, > 10 um)
- Tin [air, unspecified]: 0.00972 kg
  (same comment as for Particulates, > 10 um)
- Lead [air, unspecified]: 0.00843 kg
  (same comment as for Particulates, > 10 um)
- Nitrate [air, unspecified]: 0.00222 kg
  (same comment as for Particulates, > 10 um)
- PAH, polycyclic aromatic hydrocarbons [air, unspecified]: 2.47e-6 kg
  (same comment as for Particulates, > 10 um)
- Cobalt [air, unspecified]: 8.89e-6 kg
  (same comment as for Particulates, > 10 um)
- Silicon [air, unspecified]: 0.0943 kg
  (same comment as for Particulates, > 10 um)
- Molybdenum [air, unspecified]: 0.0139 kg
  (same comment as for Particulates, > 10 um)
- Potassium [air, unspecified]: 0.000727 kg
  (same comment as for Particulates, > 10 um)
- Selenium [air, unspecified]: 2.78e-5 kg
  (same comment as for Particulates, > 10 um)
- Manganese [air, unspecified]: 0.00342 kg
  (same comment as for Particulates, > 10 um)
- Copper [air, unspecified]: 0.071 kg
  (same comment as for Particulates, > 10 um)
- Particulates, < 2.5 um [air, unspecified]: 0.39 kg
  (same comment as for Particulates, > 10 um)
- Iron [air, unspecified]: 0.291 kg
  (same comment as for Particulates, > 10 um)
- Vanadium [air, unspecified]: 0.000917 kg
  (same comment as for Particulates, > 10 um)
- Chromium [air, unspecified]: 8.89e-6 kg
  (same comment as for Particulates, > 10 um)
- Arsenic [air, unspecified]: 9.38e-5 kg
  (same comment as for Particulates, > 10 um)
- Strontium [air, unspecified]: 0.000722 kg
  (same comment as for Particulates, > 10 um)
- Barium [air, unspecified]: 0.0535 kg
  (same comment as for Particulates, > 10 um)
- Sodium [air, unspecified]: 0.0108 kg
  (same comment as for Particulates, > 10 um)
- Chlorine [air, unspecified]: 0.00208 kg
  (same comment as for Particulates, > 10 um)
- Particulates, > 2.5 um, and < 10um [air, unspecified]: 0.59 kg
  (same comment as for Particulates, > 10 um)
- Sulfur dioxide [air, unspecified]: 0.0356 kg
  (same comment as for Particulates, > 10 um)
- Cadmium [air, unspecified]: 3.11e-5 kg
  (same comment as for Particulates, > 10 um)
- Titanium [air, unspecified]: 0.005 kg
  (same comment as for Particulates, > 10 um)

## Sampling procedure
Literature

## Extrapolations
This dataset has been extrapolated from year 2013 to the year of the calculation (2021). The uncertainty has been adjusted accordingly.
