# mandarin production, sorted and graded

Dataset: EcoSpold 2, unit process
Geography: ZA
Time period: 2015-01-01 to 2021-12-31
Technology level: current
Classification: ISIC rev.4 ecoinvent: 0123:Growing of citrus fruits
Synonyms: Clementine; Satsumas; Soft Citrus; Tangerine
Tags: combined production
Scenario: Business-as-Usual
System model: Allocation, cut-off by classification
Share of production covered: 42 %
Generated by: Russo
Published in: Russo, V. 2017
Database: ecoinvent
isCopyrightProtected: true
accessRestrictedTo: 1

## General comment
The dataset describes the packhouse stage of the mandarin value chain. The reference flow is 1kg of fresh grade mandarin to be sent to the market and processing grade mandarin that is sent to the food industry (juices, canned fruit...). After being harvested, mandarins are sent to packhouses for sorting/grading and packing. The mandarins are jumble packed meaning that they aren't packed in a specific pattern, but boxes are filled to a specific weight (15 kg). Details on the packaging material required are given below.
CORRUGATED CARDBOARD: 0.07647 kg of corrugated cardboard for 1 kg of sorted and graded mandarin. The amount of corrugated board used was calculated to 57.2 kg corrugated board / ton of soft citrus marketed and then scaled to the reference flow of 1 kg. Data came from different packhouse from different subregions in WC province.
KRAFT PAPER, BLEACHED: 0.000245 kg of kraft paper are use per k1 of sorted and graded mandarin. Soft citrus fruit for local and export market is either packed loosely in cardboard boxes with inner packaging consisting of pulp (kraft paper).
PACKAGING FILM, LOW DENSITY POLYETHYLENE: 0.000153 kg of packaging film are used per 1 kg fo sorted and graded mandarin. Packaging films are used to pack the boxes when they are placed onto pallets.
POLYPROPYLENE, GRANULATE AND THE EXTRUSION OF POLYPROPYLENE: are used to model plastic bins which are made of polypropylene and have a lifespan of 30 years (Jumbo Bin in the fruit growing industry; Mpac Plastic Continers). A 0.00026 kg of polyepropylene is used per 1kg of sorted and graded mandarin.

## Included activities start
The activity starts with the mandarin transported from the orchard to the packhouse facilities.

## Included activities end
The activity ends with the mandarins sorted by grade and ready for the market. Packaging is excluded. From the farm the fruit is transported in crates (plastic or wooden) in small trucks or trailers pulled by tractors for shorter distances or large vehicles for longer distances to the centralised packhouses which are generally off-site (Ortmann, 2005). From here the fruit is taken to the packaging lines where it is graded and sorted and thereafter packed into corrugated cardboard boxes, which are then packed onto pallets with dimension 1x1.2 m. The activity includes the facilty and the machineries (building hall and conveyor belts).

## Reference product
- mandarin, fresh grade: 1 kg; name RP; By-product classification allocatable product; CPC 01324: Tangerines, mandarins, clementines; pedigree (1,1,1,1,1)
  The reference flow is 1kg of fresh grade mandarin to be sent to the market and processing grade mandarin to be sent to the food industry to be further processed.The fresh grade mandarin represent the 86.59% of the mandarin that comes from the farm stage.
  production volume 1.77997e8 kg; name APV_za
    Production fo the year fo reference 2015 obtained from The Citrus Growers Association (2016)
  property amount in mass units 0.881057; name RP_amount_kg; = 1/(1+0.135)
    Combined mass of mandarin, fresh grade and mandarin, processing grade.
  property price 0.71 EUR2005
    Literature. CGA. (2016). Key Industry Statistics for Citrus Growers 2016. Durban, South Africa: Citrus Growers Association of South Africa.
  property carbon content 0.38412
    carbon content on a dry matter basis (reserved; not for manual entry)
  properties: carbon content, fossil 0, carbon content, non-fossil 0.38412, dry mass 0.52974 kg, wet mass 1 kg, water content 0.887719, water in wet mass 0.47026 kg, carbon allocation 0.203484 kg
- mandarin, processing grade: 0 kg; name RP1; CPC 01324: Tangerines, mandarins, clementines; By-product classification allocatable product; pedigree (1,1,1,1,1)
  The reference flow is 1kg of fresh grade mandarin to be sent to the market and processing grade mandarin to be sent to the food industry to be further processed (juicing or canning). This represents the 11,69% of the mandarin that comes from the farm stage.
  production volume 0 kg
    Calculated from production volume of reference product using the relative outputs.
  property amount in mass units 0.118943; name RP1_amount_kg; = 0.135/(1+0.135)
    Combined mass of mandarin, fresh grade and mandarin, processing grade.
  property price 0.03 EUR2005
    (same comment as for mandarin, fresh grade)
  property carbon content 0.38412
    carbon content on a dry matter basis (reserved; not for manual entry)
  properties: carbon content, fossil 0, wet mass 1 kg, water content 0.887719, dry mass 0.52974 kg, carbon content, non-fossil 0.38412, water in wet mass 0.47026 kg, carbon allocation 0.203484 kg

## Inputs from technosphere
All rows: lognormal variance with pedigree 0.0027, pedigree (2,2,3,1,1)
- EUR-flat pallet: 0.000520705 unit; = 0.000591*(RP/1.135)+0.000591*(RP1/1.135)
  Disposable and reusable wooden pallets have a lifespan of 10 years (Jumbo Bin in the fruit growing industry; Mpac Plastic Continers).
  properties: water content 0.2, carbon content, fossil 0.0311351, wet mass 22 kg, heating value, net 335.11 MJ, dry mass 18.3333 kg, carbon content, non-fossil 0.58833
- conveyor belt: 1.24229e-7 m; = 1.41E-07*(RP/1.135)+1.41E-07*(RP1/1.135)
  The ration of conveyor belt length to packhouse area was assumed to be 0.25m/m2. Data came from Rekopane farm in Nothern Cape. Lifetime expectancy was assumed to 25 years (Kellenberger at al., 2007)
- mandarin: 1.0175 kg; = 1.154863*(RP/1.135)+1.154863*(RP1/1.135)
  Mandaring from the farm
  properties: dry mass 0.542888 kg, wet mass 1 kg, water content 0.842, carbon content, non-fossil 0.384123
- biowaste: -0.0175004 kg; name RP2; = (0.019863*(RP/1.135)+0.019863*(RP1/1.135))*-1
  This accounts for the wastes that may occur during the grading and sorting of the mandaring at packhouses: this represents the 1,72% of the mandarin that comes from the farm stage. The fruit making up the waste component is a combinaiton of incoming fruit not conforming to certain criteria fro packing due to size or damage during transit or packing.
  production volume 3.53568e6 kg; = 205563*1000*0.0172
    Calculated from production volume of reference product using the relative outputs.
  property price 0 EUR2005; name RP2_price_EUR2005
  properties: heating value, net 4.29 MJ, dry mass 0.4 kg, wet mass 1 kg, water content 1.5, carbon content, non-fossil 0.1624
  note on heating value, net: Value taken from the general comment of the treatment dataset.
- building, hall: 2.48458e-6 m2; = 2.82E-06*(RP/1.135)+2.82E-06*(RP1/1.135)
  The area of the packhouse was assumed to be 2.82*e-10 m2/yr/kg of marketed soft citrus. Data came from two citrus packhouses: African Packers and Ponders End Traders Packhouse (Afrifresh.co.za, 2015). Lifetime expectancy was assumed to 50 years (Kellenberger at al., 2007)
- electricity, low voltage: 0.0653744 kWh; = 0.0742*(RP/1.135)+0.0742*(RP1/1.135)
  Electricity at the packhouse stage is used for the operation of conveyor belts, lighting and other machinery. The amount of electricity used was calculated to 55.5 kWh grid electricity/ ton of soft citrus marketed and then scaled to the reference flow of 1 kg. Data came from different packhouse from different subregions in WC province.

## Sampling procedure
Data from Company Budget Report (Combuds), previuos study done on the Mandarin sector in South Africa (Konig, 2015) and CGA (2016).
