# wind turbine network connection construction, 750kW, onshore

Dataset: EcoSpold 2, unit process
Geography: CA-QC
Time period: 2008-01-01 to 2021-12-31
Technology level: modern
Classification: ISIC rev.4 ecoinvent: 2811:Manufacture of engines and turbines, except aircraft, vehicle and cycle eng
Synonyms: grid connection
Tags: infrastructure; wind power
Scenario: Business-as-Usual
System model: Allocation, cut-off by classification
Generated by: Pablo Tirado
Published in: Elsam Engineering A/S,Fredericia,Denmark 2004
Database: ecoinvent
isCopyrightProtected: true
accessRestrictedTo: 1

## General comment
This dataset represents the construction of the network connection for a wind turbine with 750kW capacity. This dataset is an extrapolation from the 2MW connection dataset.
This connection connects one turbine to the electricity network.
The main components of a network connection of a wind turbine are the cables, the transformer and the sub-station with the circuit breaker and the electricity meter inside it. According to (European Communities 2001), electricity produced with wind turbines is connected to medium voltage or high voltage systems, depending on the size of the windfarm.

Sources:
European Communities. 2001. Wind Turbine Grid Connection and Interaction. Deutsches Windenergie-Institut /Tech-wise A/S /DM Energy, p. 7 Tab.2.1

## Included activities start
From the transformation of pasture land to industrial site, and from the reception and treatment of building materials.

## Included activities end
This activity ends with the decommissioning of the network connection and the treatment of the resulting materials at the end of the lifetime.

This dataset includes
- all main materials for the construcion of the network connection and their treatment
- excavation of the cable trench
- land transformation and use
- It is assumed that all parts will hold for the lifetime of 20 years and don"t have to be replaced.

This dataset doesn"t include
- neither the energy use for assembly of the different wind turbine parts nor their transportation from manufacture to the construction site
- auxiliary materials such as packaging materials or vacuum fleece.
- any losses of materials (waste) during the processing of the different wind turbine parts

## Geography
Global data used. Uncertainty has been adjusted accordingly

## Technology
2MW connection technology used. Uncertainty has been adapted accordingly

## Parameters
- Installed capacity: 99.75 MW; name capacity_installed_new; = 57+42.75; lognormal variance with pedigree 0.0006, pedigree (1,1,1,1,1)
  Statistics. Total installed capacity in Quebec in 1999-2012 period
  Le Nordais (Phase 1 - Cap Chat) 76 turbines: 57MW
  Le Nordais (Phase 2 - Matane) 57 turbines: 42.75MW
  Source: http://www.canwea.ca/farms/wind-farms_e.php
- Percentage of onshore wind power plant class capacity on total: 1 dimensionless; name percentage_onshore_class_1to3; lognormal variance with pedigree 0.009325, pedigree (2,2,1,2,2)
  Statistics

## Reference product
- wind turbine network connection, 750kW, onshore: 1 unit; name network_connection; CPC 462: Electricity distribution and control apparatus, and parts thereof; By-product classification allocatable product
  production volume 133 unit; name apv_networkconn; = capacity_installed_new* percentage_onshore_class_1to3/ network_connection_capacity_MW
    Calculated value. See parameters for a closer look at the values used. This annual production volume corresponds to Quebec"s one. This dataset, combined with the wind turbine, 750kW will replace the 800kW turbines (divided in moving and fixed parts)
  property capacity [MW] 0.75 MW; name network_connection_capacity_MW
    Literature value
  property price 10441.5 EUR2005; name network_connection_price_EUR2005
    Calculated based on inputs: The price of the product has been calculated as a sum of the values of the material and energy inputs for this product. This value is therefore a rough estimation. It may underestimate the real price since there are additional expenses when producing any product. These expences can include for example labour costs, treatment of waste materials and profit for the producer. Please consider carefully whether this level of data quality is acceptable for your application.

## By-products
- aluminium scrap, post-consumer: 0 kg; CPC 39363: Waste and scrap of aluminium; By-product classification Recyclable; pedigree (1,1,1,1,1)
  Calculated value
  production volume 0 kg; = apv_networkconn * ( scrap_alu / network_connection)
    Calculated from production volume of reference product using the relative outputs.
  property lifetime 20 year; name scrap_alu_lifetime
    Literature value
  property price 0.685 EUR2005; name scrap_alu_price_EUR2005
    Temporary price data. Calculated as 90% of purchasers price based on: estimated at 85% of new scrap
  property carbon content 0
    carbon content on a dry matter basis (reserved; not for manual entry)
  properties: carbon content, fossil 0, carbon content, non-fossil 0, wet mass 1 kg, water in wet mass 0 kg, dry mass 1 kg, water content 0, carbon allocation 0 kg

## Inputs from technosphere
- wire drawing, copper: 254 kg; = copper; source Elsam Engineering A/S,Fredericia,Denmark 2004; lognormal variance with pedigree 0.04, pedigree (1,1,5,1,1)
  Calculated value
- excavation, hydraulic digger: 1400 m3; = 1*1.4*1000; source Elsam Engineering A/S,Fredericia,Denmark 2004; lognormal variance with pedigree 0.097025, pedigree (5,5,5,2,3)
  Literature value and own assumptions. The excavated cable channel is assumed to have a width of 1 m and a depth of 1.4 m for a length of 1000 m
  Uncertainty: e
- polyethylene, high density, granulate: 1377 kg; name hdpe; = 11016/8; source Elsam Engineering A/S,Fredericia,Denmark 2004, p. p. 25, Tab. 5.3; lognormal variance with pedigree 0.097025, pedigree (5,5,5,2,3)
  Literature value. One element of the cable are unspecified plastics, assumed to be polyethylene (1.38 kg/m)
  The original value in the given source is valid for a whole wind power plant with 8 wind turbines and therefore has to be divided by 8.
  Uncertainty: e
  properties: carbon content, fossil 0.857143, dry mass 1 kg, wet mass 1 kg, heating value, net 42.47 MJ
  note on carbon content, fossil: Polyethylene is formed out of a huge amount of ethylene monomers (C2H4) (ecoinvent v2.2 report 11_II). MW=28 g/mol
- aluminium, cast alloy: 23.04 kg; name alu_cast; = 0.32*1000*0.072; source Elsam Engineering A/S,Fredericia,Denmark 2004, p. p. 25, Tab. 5.3; lognormal variance with pedigree 0.097025, pedigree (5,5,5,2,3)
  Literature value/calculated value and own assumptions. Elements of the 1000m cable (0.072 kg/m).
  The shares of cast alloy and wrought alloy aluminium in the cancelled ecoinvent v2 "aluminium production mix" dataset amounted to 32% (cast alloy) and 68% (wrought alloy) respectively. These shares have been overtaken to distribute the original amount of 72 kg aluminium.
  Uncertainty: e
  properties: wet mass 1 kg, dry mass 1 kg
- copper, cathode: 254 kg; name copper; = 2032/8; source Elsam Engineering A/S,Fredericia,Denmark 2004, p. p. 25, Tab. 5.3; lognormal variance with pedigree 0.097025, pedigree (5,5,5,2,3)
  Literature value and own assumptions. Used in the cables. The conductor of the cable is made of copper with a diameter of 6.4 mm, which gives a conductor cross-section of 32.2 mm2 and a weight of 0.25 kg/m.
  The original value in the given source is valid for a whole wind power plant with 8 wind turbines and therefore has to be divided by 8.
  Uncertainty: e
  properties: dry mass 1 kg, wet mass 1 kg
- scrap copper: -254 kg; name scrap_copper; = (copper)*-1; lognormal variance with pedigree 0.04, pedigree (1,1,5,1,1)
  Calculated value
  production volume 33782 kg; = apv_networkconn * ( scrap_copper / network_connection)
    Calculated from production volume of reference product using the relative outputs.
  property lifetime 20 year; name lifetime
  property price 0 EUR2005; name scrap_copper_price_EUR2005
  properties: wet mass 1 kg, dry mass 1 kg
- sheet rolling, aluminium: 72 kg; = alu_cast+alu_wrought; source Elsam Engineering A/S,Fredericia,Denmark 2004; lognormal variance with pedigree 0.04, pedigree (1,1,5,1,1)
  Proxy for wire drawing of aluminium.
- waste polyethylene: -1377 kg; name waste_polyethylene; = (hdpe)*-1; lognormal variance with pedigree 0.04, pedigree (1,1,5,1,1)
  Calculated value
  production volume 183141 kg; = apv_networkconn * ( waste_polyethylene / network_connection)
    Calculated from production volume of reference product using the relative outputs.
  property lifetime 20 year; name waste_polyethylene_lifetime
  property price 0 EUR2005; name waste_polyethylene_price_EUR2005
  properties: water content 0.00401606, heating value, net 42.47 MJ, dry mass 0.996 kg, wet mass 1 kg, carbon content, fossil 0.825301
  note on heating value, net: Value taken from the general comment of the treatment dataset.
  note on carbon content, fossil: C content in 1 kg DM was calculated using data in Tab A.1, ecoinvent v2.2 report 13_I
- waste wire plastic: -1377 kg; name waste_wirepla; = (hdpe)*-1; lognormal variance with pedigree 0.04, pedigree (1,1,5,1,1)
  Calculated value
  production volume 183141 kg; = apv_networkconn * waste_wirepla
    Calculated from production volume of reference product using the relative outputs.
  property lifetime 20 year; name waste_wirepla_lifetime
  property price 0 EUR2005; name waste_wirepla_price_EUR2005
  properties: heating value, net 25.95 MJ, water content 0.0368066, dry mass 0.9645 kg, wet mass 1 kg, carbon content, fossil 0.549508
  note on carbon content, fossil: C content in 1 kg DM was calculated using data in Tab A.6, ecoinvent v2.2 report 13_I
- aluminium, wrought alloy: 48.96 kg; name alu_wrought; = 0.68*1000*0.072; source Elsam Engineering A/S,Fredericia,Denmark 2004, p. p. 25, Tab. 5.3; lognormal variance with pedigree 0.097025, pedigree (5,5,5,2,3)
  (same comment as for aluminium, cast alloy)
  properties: dry mass 1 kg, wet mass 1 kg
- aluminium scrap, post-consumer: -72 kg; lognormal variance with pedigree 0.04, pedigree (1,1,5,1,1)
  Calculated value
  production volume 9576 kg
  properties: wet mass 1 kg, dry mass 1 kg

## Inputs from nature
- Transformation, to industrial area [natural resource, land]: 1000 m2; = land_from; lognormal variance with pedigree 0.04, pedigree (1,1,5,1,1)
  Literature value
- Occupation, industrial area [natural resource, land]: 20000 m2*year; = land_from*lifetime; lognormal variance with pedigree 0.04, pedigree (1,1,5,1,1)
  Literature value
- Transformation, from pasture, man made [natural resource, land]: 1000 m2; name land_from; source Elsam Engineering A/S,Fredericia,Denmark 2004; lognormal variance with pedigree 0.097025, pedigree (5,5,5,2,3)
  Literature value. The excavated cable channel is assumed to have a width of 1 m and a depth of 1.4 m for a length of 1000m.
  Uncertainty: e

## Sampling procedure
Estimations

## Extrapolations
This dataset has been extrapolated from year 2008 to the year of the calculation (2021). The uncertainty has been adjusted accordingly.

## Review by Christian Bauer 2014-02-20
This dataset was thoroughfully reviewed and complies with the Data Quality Guidelines.

## Review by Emilia Moreno Ruiz 2015-09-17
broken formula fixed
