# fish residues, Recycled Content cut-off

Dataset: EcoSpold 2, unit process
Geography: GLO
Time period: 2021-01-01 to 2021-12-31
Technology level: current
Scenario: Business-as-Usual
System model: Allocation, cut-off by classification
Generated by: [System]
isCopyrightProtected: true
accessRestrictedTo: 1

## Reference product
- fish residues: 1 kg; By-product classification Recyclable; CPC 21221: Fish fillets and fish meat (whether or not minced), fresh or chilled
  property protein content 0.18
    Average of 49 fish species, http://www.fao.org/wairdocs/tan/x5916e/x5916e01.htm
  property ash content 0.015 kg
    Ash content of fish is between 1-2% of the edible portion, http://www.fao.org/wairdocs/tan/x5916e/x5916e01.htm
  property carbon content, non-fossil 0.47385; = (1-protein-fat-ash)*0.444+protein*0.535+fat*0.774
    Calculated from C_content = polysaccharids*0.444+protein*0.535+lipids*0.774 and polysaccharids = 1-(protein+lipids+ash)
  property energy content 4.01 MJ
    Average of 49 fish species, http://www.fao.org/wairdocs/tan/x5916e/x5916e01.htm
  property fat content 0.061
    Average of 49 fish species, http://www.fao.org/wairdocs/tan/x5916e/x5916e01.htm
  property carbon content 0.47385
    carbon content on a dry matter basis (reserved; not for manual entry)
  properties: dry mass 0.241111 kg, water in wet mass 0.182977 kg, wet mass 0.424088 kg, water content 0.758889, carbon allocation 0.11425 kg
