# treatment of waste building wood, chrome preserved, municipal incineration

Dataset: EcoSpold 2, unit process
Geography: RoW
Time period: 2006-01-01 to 2021-12-31
Technology level: current
Classification: ISIC rev.4 ecoinvent: 3821:Treatment and disposal of non-hazardous waste
Synonyms: Siedlungsabfallverbrennung; Kehrichtverbrennung; municipal waste incineration
Scenario: Business-as-Usual
System model: Allocation, cut-off by classification
Share of production covered: 1.8 %
Generated by: Gabor Doka
Published in: Doka G. 2013
Database: ecoinvent
isCopyrightProtected: true
accessRestrictedTo: 1

## General comment
This dataset represents the activity of waste disposal of waste building wood, chrome preserved in a municipal solid waste incinerator (MSWI) // Recommended use of this dataset: For disposal of bulk or small parts of chrome preserved wood (waste building product). Please note there is another, slightly different chrome preserved wood for wood poles in electricity grids. // // Waste composition (wet, in ppm): upper heating value 15.36 MJ/kg; lower heating value 13.99 MJ/kg; H2O 173800; O 371580; H 50083; C 400820; S 198; N 985.41; P 108.79; B 27.33; Cl 330.42; Br n.a.; F 21.073; I n.a.; Ag n.a.; As 0.42145; Ba n.a.; Cd 0.20019; Co 0.086633; Cr 1013.2; Cu 351.4; Hg 0.31925; Mn 53.034; Mo 0.82887; Ni 0.55492; Pb 27.823; Sb n.a.; Se n.a.; Sn n.a.; V n.a.; Zn 17.778; Be n.a.; Sc n.a.; Sr n.a.; Ti n.a.; Tl n.a.; W n.a.; Si n.a.; Fe 15.454; Ca 130.68; Al 6.322; K 65.307; Mg 197.24; Na 156.13; // Share of carbon in waste that is biogenic 100%. // Share of metals in waste not oxidised and bulk-recyclable (exclude very small or thin parts) Iron: 0%; Alu: 0%; Copper: 0%. // One kg of this waste produces 0.008738 kg of slag and 0.003266 kg of residues, which are landfilled. Additional solidification with 0.001306 kg of cement. // Net energy production: 1.74MJ/kg electric energy and 3.49MJ/kg thermal energy. // Recovery of metal scrap to recycling: 0g iron scrap, 0g aluminium scrap, 0g copper scrap.

## Included activities start
waste incineration from waste reception gate and delivery into waste bunker at incinerator plant site (without transports to the incinerator)

## Included activities end
Waste-specific short-term emissions to water from leachate. Long-term emissions from landfill to ground water.

## Geography
Specific to the technology mix encountered in Switzerland in 2010. Well applicable to modern incineration practices in Europe, North America or Japan.

## Technology
average Swiss MSWI plants in 2010 (grate incinerators) with electrostatic precipitator for fly ash (ESP), wet flue gas scrubber and 25% SNCR , 42.77% SCR-high dust , 32.68% SCR-low dust -DeNOx facilities and 0% without Denox (weighted according to mass of burnt waste, representing Swiss average). Efficiency of iron scrap separation from slag : 58%. Efficiency of non-ferrous scrap separation from slag : 31%. Gross electric efficiency technology mix 15.84% and Gross thermal efficiency technology mix 28.51%

## Time period
Waste composition as given in literature reference, theoretical data or other source. Transfer coefficients for modern MSWI.

## Reference product
- waste building wood, chrome preserved: -1 kg; CPC 39: Wastes or scraps; By-product classification Waste
  Main reference product of this activity (supply of disposal service).
  production volume 3.1567e8 kg
    based on estimate on MSW in WTE globally and share of building products in Swiss MSW based on an unqualified estimate of building demand of Swiss population.
  property price 0 EUR2005
    Waste products are assigned a price of zero as they are assumed to require further treatment.
  property heating value, net 11.63 MJ
    LHV is calculated based on the Carbon content of the product. More details can be found on the respective documentation.
  property carbon content 0.5
    carbon content on a dry matter basis (reserved; not for manual entry)
  properties: wet mass 1 kg, dry mass 0.8 kg, water in wet mass 0.2 kg, water content 0.25, carbon content, non-fossil 0.5, carbon content, fossil 0, carbon allocation 0.4 kg

## By-products
- electricity, for reuse in municipal waste incineration only: 0 kWh; name E_el_prod_MSWI; CPC 17100: Electrical energy; By-product classification allocatable product; pedigree (1,1,1,1,1)
  Net electricity generated from this waste and used in internal MSWI plant energy redistribution.
  Uncertainty: uncertainty is calculated from uncertainties in waste composition and uncertainties in energy efficiency and the uncertainty in internal energy demand
  production volume 1.5236e8 kWh
    calculated in proportion to reference product waste input to incinerator
  property exergy 3.6 MJ; name E_el_prod_MSWI_exergy
    This exergy property is based on the exergy content of the product.
  property true value relation 3.6; name E_el_prod_MSWI_true_value_relation
    property to calculate "true value" from
  property price 0.1 EUR2005; name E_el_prod_MSWI_price_EUR2005
    Estimated to be the same price as in case of electricity, medium voltage.
- heat, for reuse in municipal waste incineration only: 0 MJ; name E_th_prod_MSWI; By-product classification allocatable product; CPC 17300: Steam and hot water; pedigree (1,1,1,1,1)
  (same comment as for electricity, for reuse in municipal waste incineration only)
  production volume 1.1023e9 MJ
    calculated in proportion to reference product waste input to incinerator
  property price 0.0106 EUR2005; name E_th_prod_MSWI_price_EUR2005
    Average European district heat price from Ecoheatcool and Euroheat 2005-2006, Ecoheat Work package 1: The European heat market. Final report. 10.6 EUR/GJ i s the price of district heat. http://www.solarthermalworld.org/files/Ecoheatcool%20WP1%20Web.pdf?download
  property true value relation 0.1842; name E_th_prod_MSWI_true_value_relation
    property to calculate "true value" from
  property exergy 0.1842 MJ; name E_th_prod_MSWI_exergy
    This exergy property is based on the exergy content of the product.

## Inputs from technosphere
- transport, freight, lorry, unspecified: 0 metric ton*km; pedigree (1,1,1,1,1)
  Transport services to transport incineration residues to landfills.
  Uncertainty: uncertainty calculated from uncertainty of the waste composition of this waste, uncertainty of transfer coefficients and the uncertainty in generic transportation distances
- municipal waste incineration facility: 2.5e-10 unit
  Demands per kilogram waste.
- hydrochloric acid, without water, in 30% solution state: 7.7021e-6 kg; lognormal variance with pedigree 0.105731, pedigree (1,1,4,1,1)
  Auxilliary inputs for the wastewater treatment stage of the incinerator plant.
  Uncertainty: uncertainty calculated from uncertainty in average HCl input, of transfer coefficients in the incinerator, and the uncertainty of the waste composition of this waste
  properties: wet mass 1 kg, dry mass 1 kg, heating value, net 3.32 MJ
- chemical, inorganic: 2.9303e-5 kg; lognormal variance with pedigree 0.105731, pedigree (1,1,4,1,1)
  Auxilliary inputs for the wastewater treatment stage of the incinerator plant. Proxy for Polyelectrolyte.
  Uncertainty: uncertainty calculated from uncertainty in average Polyelectrolyte input, of transfer coefficients in the incinerator, and the uncertainty of the waste composition of this waste
  properties: wet mass 1 kg, dry mass 1 kg, carbon content, fossil 0.003
- iron (III) chloride, without water, in 40% solution state: 4.3388e-6 kg; lognormal variance with pedigree 0.27685, pedigree (1,1,4,1,1)
  Auxilliary inputs for the wastewater treatment stage of the incinerator plant.
  Uncertainty: uncertainty calculated from uncertainty in average FeCl3 input, of transfer coefficients in the incinerator, and the uncertainty of the waste composition of this waste
  properties: wet mass 1 kg, dry mass 1 kg
- chromium oxide, flakes: 5.9421e-7 kg; lognormal variance with pedigree 0.68334, pedigree (1,1,4,1,1)
  Input to DeNOx stage.
  Uncertainty: uncertainty calculated from uncertainty in average DeNOx input, uncertainty in the share of thermal NOx, uncertainty of nitrogen content in average municipal waste and the uncertainty in nitrogen content in *this* waste.
  properties: wet mass 1 kg, dry mass 1 kg
- slag landfill: 1.4106e-11 unit; lognormal variance with pedigree 0.032313, pedigree (1,1,4,1,1)
  Landfill infrastructure required for landfilling of bottom ash.
  Uncertainty: uncertainty is calculated from uncertainties in waste composition and transfer coefficients in incinerator
- quicklime, milled, packed: 0.00018207 kg; lognormal variance with pedigree 0.7743, pedigree (1,1,4,1,1)
  Auxilliary inputs for the flue gas treatment stage of the incinerator plant.
  Uncertainty: uncertainty calculated from uncertainty in average CaO input, of transfer coefficients in the incinerator, and the uncertainty of the waste composition of this waste
  properties: water content 0.010101, wet mass 1 kg, dry mass 0.99 kg
- sodium hydroxide, without water, in 50% solution state: 0.00010323 kg; lognormal variance with pedigree 0.37437, pedigree (1,1,4,1,1)
  Auxilliary inputs for the flue gas treatment stage of the incinerator plant.
  Uncertainty: uncertainty calculated from uncertainty in average NaOH input, of transfer coefficients in the incinerator, and the uncertainty of the waste composition of this waste
  properties: wet mass 1 kg, dry mass 1 kg, heating value, net 3.03 MJ
- water, decarbonised: 0 kg; pedigree (1,1,1,1,1)
  Incinerator process water used in flue gas scrubber stage.
  Uncertainty: uncertainty calculated from uncertainty in average water input, and the uncertainty of the waste composition of this waste
  properties: wet mass 1 kg
- process-specific burdens, residual material landfill: 0 kg; pedigree (1,1,1,1,1)
  Mass-specific expenditures required for landfilling of incineration residues.
  Uncertainty: uncertainty is calculated from uncertainties in waste composition and transfer coefficients in incinerator
- cement, unspecified: 0 kg; pedigree (1,1,1,1,1)
  Cement required for solidification of landfilled residual material.
  Uncertainty: Uncertainty calculated from uncertainty of the waste composition of this waste, of transfer coefficients in the incinerator and of the solidification recipe.
  properties: wet mass 1 kg, dry mass 1 kg
- heat, district or industrial, natural gas: 0 MJ; pedigree (1,1,1,1,1)
  Input to DeNOx stage, to heat up flue gas in low-dust SCR.
  Uncertainty: uncertainty calculated from uncertainty in average DeNOx input, uncertainty in the share of thermal NOx, uncertainty of nitrogen content in average municipal waste and the uncertainty in nitrogen content in *this* waste.
  properties: heating value, net 1 MJ
- residual material landfill: 6.804e-12 unit; lognormal variance with pedigree 0.042435, pedigree (1,1,4,1,1)
  Landfill infrastructure required for landfilling of incineration residues.
  Uncertainty: uncertainty is calculated from uncertainties in waste composition and transfer coefficients in incinerator
- ammonia, anhydrous, liquid: 0 kg; pedigree (1,1,1,1,1)
  Input to DeNOx stage (100% NH3).
  Uncertainty: uncertainty calculated from uncertainty in average DeNOx input, uncertainty in the share of thermal NOx, uncertainty of nitrogen content in average municipal waste and the uncertainty in nitrogen content in *this* waste.
  properties: wet mass 1 kg, dry mass 1 kg
- process-specific burdens, slag landfill: 0 kg; pedigree (1,1,1,1,1)
  Mass-specific expenditures required for landfilling of bottom ash.
  Uncertainty: uncertainty is calculated from uncertainties in waste composition and transfer coefficients in incinerator
- waste cement, hydrated: 0 kg; pedigree (1,1,1,1,1)
  Hydrated cement output for solidification of landfilled residual material.
  Uncertainty: Uncertainty calculated from uncertainty of the waste composition of this waste and transfer coefficients in the incinerator and of the solidification recipe.
  production volume 0 kg
    calculated in proportion to reference product waste input to incinerator
  properties: wet mass 1 kg, dry mass 1 kg
- chemical, organic: 5.3372e-6 kg; lognormal variance with pedigree 1.7076, pedigree (1,1,4,1,1)
  Auxilliary inputs for the wastewater treatment stage of the incinerator plant. Proxy for (pure) Trisodium-trimercapto-s-triazine (CAS 17766-26-6), used as 15% diluted solution, aka TMT15.
  Uncertainty: uncertainty calculated from uncertainty in average TMT15 input, of transfer coefficients in the incinerator, and the uncertainty of the waste composition of this waste
  properties: heating value, net 19.03 MJ, dry mass 1 kg, carbon content, fossil 0.628, wet mass 1 kg
- titanium dioxide: 2.9116e-5 kg; lognormal variance with pedigree 0.68334, pedigree (1,1,4,1,1)
  Input to DeNOx stage (TiO2 catalyst carrier)
  Uncertainty: uncertainty calculated from uncertainty in average DeNOx input, uncertainty in the share of thermal NOx, uncertainty of nitrogen content in average municipal waste and the uncertainty in nitrogen content in *this* waste.
  properties: wet mass 1 kg, dry mass 1 kg
- transport, freight, lorry, unspecified: 5.12718e-5, 8.02727e-6, 0.000388721 metric ton*km (3 entries); lognormal variance with pedigree 0.023199, pedigree (1,1,4,1,1)
  (same comment as for transport, freight, lorry, unspecified)
- water, decarbonised: 0.00313239, 0.00815046, 0.0328727, 0.00802735, 0.00161827, 0.00532119, 0.000293761, 0.00418604, 0.00975101, 0.0611654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 kg (12 entries); lognormal variance with pedigree 0.27685, pedigree (1,1,4,1,1)
  (same comment as for water, decarbonised)
- process-specific burdens, residual material landfill: 0.00092384, 0.00234206 kg (2 entries); lognormal variance with pedigree 0.042435, pedigree (1,1,4,1,1)
  (same comment as for process-specific burdens, residual material landfill)
- cement, unspecified: 0.000188639, 3.92501e-5, 2.8748e-6, 8.19412e-6, 0.000185313, 5.45429e-6, 5.99043e-5, 7.24775e-6, 0.000809523 kg (9 entries); lognormal variance with pedigree 0.051519, pedigree (1,1,4,1,1)
  (same comment as for cement, unspecified)
- heat, district or industrial, natural gas: 0.000967244, 0.023177, 0.0627587 MJ (3 entries); lognormal variance with pedigree 0.38114, pedigree (1,1,4,1,1)
  (same comment as for heat, district or industrial, natural gas)
- ammonia, anhydrous, liquid: 9.74114e-5, 8.37367e-6, 1.30273e-5, 2.58117e-5, 2.52886e-5, 2.65052e-6, 1.18488e-5, 0.000280308 kg (8 entries); lognormal variance with pedigree 0.38114, pedigree (1,1,4,1,1)
  (same comment as for ammonia, anhydrous, liquid)
- process-specific burdens, slag landfill: 0.0022445, 0.0056901 kg (2 entries); lognormal variance with pedigree 0.032313, pedigree (1,1,4,1,1)
  (same comment as for process-specific burdens, slag landfill)
- waste cement, hydrated: -0.00092384, -0.00234206 kg (2 entries); lognormal variance with pedigree 0.051519, pedigree (1,1,4,1,1)
  (same comment as for waste cement, hydrated)
  production volume 1.0309e6 kg

## Inputs from nature
- Oxygen [natural resource, in air]: 1.4712 kg; lognormal variance with pedigree 0.036573, pedigree (1,1,4,1,1)
  Oxygen from ambient air needed to combust and oxidise this waste. Net demand, i.e. without O2 leaving the plant in flue gas uncombusted.
  Uncertainty: uncertainty is calculated from uncertainties in waste composition and transfer coefficients to flue gas and soild residues in incinerator

## Emissions to nature
- BOD5, Biological Oxygen Demand [water, surface water]: 0.00046286 kg; lognormal variance with pedigree 0.054605, pedigree (1,1,4,1,1)
  Emissions to water from waste composition and transfer coefficients in incinerator and landfills.
  Uncertainty: uncertainty is calculated from uncertainties in waste composition and transfer coefficients in incinerator and landfills
- Cobalt [water, surface water]: 1.5696e-11 kg; lognormal variance with pedigree 2.1852, pedigree (1,1,4,1,1)
  (same comment as for BOD5, Biological Oxygen Demand)
- Cyanide [air, urban air close to ground]: 3.1575e-6 kg; lognormal variance with pedigree 1.4416, pedigree (1,1,4,1,1)
  Nitrogen species emitted to air after DeNOx stage.
  Uncertainty: uncertainty calculated from uncertainty in average N-emissions and uncertainty in the share of thermal NOx and the uncertainty in nitrogen content in *this* waste.
- Ammonia [air, urban air close to ground]: 5.464e-7 kg; lognormal variance with pedigree 0.42485, pedigree (1,1,4,1,1)
  (same comment as for Cyanide)
- Aluminium [water, ground-, long-term]: 4.5718e-6 kg; lognormal variance with pedigree 1.2387, pedigree (1,1,4,1,1)
  Long-term emissions from landfilling of incineration residues.
  Uncertainty: uncertainty is calculated from uncertainties in waste composition and transfer coefficients in incinerator and landfills.
- Dioxins, measured as 2,3,7,8-tetrachlorodibenzo-p-dioxin [air, urban air close to ground]: 6.7402e-14 kg; lognormal variance with pedigree 0.43297, pedigree (1,1,4,1,1)
  Incomplete combustion product emitted to air.
  Uncertainty: uncertainty calculated from uncertainty in average operation emissions, and the uncertainty of the flue gas volume from this waste.
- Carbon dioxide, non-fossil [air, urban air close to ground]: 1.4608 kg; lognormal variance with pedigree 0.031438, pedigree (1,1,4,1,1)
  Emission to air from waste composition and transfer coefficients.
  Uncertainty: uncertainty is calculated from uncertainties in waste composition and transfer coefficients in incinerator
- Aluminium [water, surface water]: 6.8417e-10 kg; lognormal variance with pedigree 1.458, pedigree (1,1,4,1,1)
  (same comment as for BOD5, Biological Oxygen Demand)
- Cadmium, ion [water, surface water]: 1.9187e-11 kg; lognormal variance with pedigree 1.4817, pedigree (1,1,4,1,1)
  (same comment as for BOD5, Biological Oxygen Demand)
- Benzene [air, urban air close to ground]: 3.3703e-8 kg; lognormal variance with pedigree 0.101223, pedigree (1,1,4,1,1)
  (same comment as for Dioxins, measured as 2,3,7,8-tetrachlorodibenzo-p-dioxin)
- Sodium, ion [water, surface water]: 4.2422e-5 kg; lognormal variance with pedigree 0.48732, pedigree (1,1,4,1,1)
  (same comment as for BOD5, Biological Oxygen Demand)
- Boron [water, surface water]: 2.1413e-7 kg; lognormal variance with pedigree 1.3719, pedigree (1,1,4,1,1)
  (same comment as for BOD5, Biological Oxygen Demand)
- Zinc [air, urban air close to ground]: 1.1916e-8 kg; lognormal variance with pedigree 1.2223, pedigree (1,1,4,1,1)
  (same comment as for Carbon dioxide, non-fossil)
- NMVOC, non-methane volatile organic compounds, unspecified origin [air, urban air close to ground]: 1.5338e-6 kg; lognormal variance with pedigree 0.101223, pedigree (1,1,4,1,1)
  (same comment as for Dioxins, measured as 2,3,7,8-tetrachlorodibenzo-p-dioxin)
- Arsenic, ion [water, ground-, long-term]: 1.2621e-7 kg; lognormal variance with pedigree 1.6895, pedigree (1,1,4,1,1)
  (same comment as for Aluminium)
- Mercury [water, ground-, long-term]: 2.0333e-8 kg; lognormal variance with pedigree 3.26, pedigree (1,1,4,1,1)
  (same comment as for Aluminium)
- Sulfate [water, ground-, long-term]: 0.00049039 kg; lognormal variance with pedigree 0.52999, pedigree (1,1,4,1,1)
  (same comment as for Aluminium)
- Heat, waste [air, urban air close to ground]: 11.218 MJ; lognormal variance with pedigree 0.060299, pedigree (1,1,4,1,1)
  Waste heat generated from heating value of this waste plus any electricity required to process it.
  Uncertainty: uncertainty is calculated from uncertainties in waste composition and uncertainties in energy efficiency and the uncertainty in internal energy demand
- Cadmium [air, urban air close to ground]: 1.0204e-10 kg; lognormal variance with pedigree 1.8043, pedigree (1,1,4,1,1)
  (same comment as for Carbon dioxide, non-fossil)
- Hydrogen fluoride [air, urban air close to ground]: 1.4217e-7 kg; lognormal variance with pedigree 1.1883, pedigree (1,1,4,1,1)
  (same comment as for Carbon dioxide, non-fossil)
- DOC, Dissolved Organic Carbon [water, ground-, long-term]: 0.0011911 kg; lognormal variance with pedigree 0.032591, pedigree (1,1,4,1,1)
  (same comment as for Aluminium)
- Phenol, pentachloro- [air, urban air close to ground]: 1.4677e-11 kg; lognormal variance with pedigree 0.101223, pedigree (1,1,4,1,1)
  (same comment as for Dioxins, measured as 2,3,7,8-tetrachlorodibenzo-p-dioxin)
- Chloride [water, ground-, long-term]: 7.6567e-5 kg; lognormal variance with pedigree 0.80667, pedigree (1,1,4,1,1)
  (same comment as for Aluminium)
- Copper, ion [water, surface water]: 4.5533e-8 kg; lognormal variance with pedigree 0.75697, pedigree (1,1,4,1,1)
  (same comment as for BOD5, Biological Oxygen Demand)
- Lead [water, surface water]: 2.6614e-9 kg; lognormal variance with pedigree 0.9587, pedigree (1,1,4,1,1)
  (same comment as for BOD5, Biological Oxygen Demand)
- Water [air, urban air close to ground]: 0.0014869 m3; lognormal variance with pedigree 0.79887, pedigree (1,1,4,1,1)
  Water vapour from waste humidity, hydrogen oxidation and part of the process water.
  Uncertainty: Uncertainty calculated from uncertainty in waste composition, process water input and the uncertainty of fraction to air.
- Particulates, > 2.5 um, and < 10um [air, urban air close to ground]: 2.0221e-8 kg; lognormal variance with pedigree 0.20975, pedigree (1,1,4,1,1)
  (same comment as for Dioxins, measured as 2,3,7,8-tetrachlorodibenzo-p-dioxin)
- Sulfur dioxide [air, urban air close to ground]: 2.1056e-6 kg; lognormal variance with pedigree 0.89106, pedigree (1,1,4,1,1)
  (same comment as for Carbon dioxide, non-fossil)
- Boron [water, ground-, long-term]: 2.3241e-5 kg; lognormal variance with pedigree 0.98762, pedigree (1,1,4,1,1)
  (same comment as for Aluminium)
- TOC, Total Organic Carbon [water, ground-, long-term]: 0.0011911 kg; lognormal variance with pedigree 0.032591, pedigree (1,1,4,1,1)
  (same comment as for Aluminium)
- Nitrate [water, ground-, long-term]: 3.5442e-5 kg; lognormal variance with pedigree 0.67296, pedigree (1,1,4,1,1)
  (same comment as for Aluminium)
- Heat, waste [water, surface water]: 2.8854 MJ; lognormal variance with pedigree 0.060299, pedigree (1,1,4,1,1)
  (same comment as for Heat, waste)
- Arsenic, ion [water, surface water]: 2.9195e-7 kg; lognormal variance with pedigree 1.569, pedigree (1,1,4,1,1)
  (same comment as for BOD5, Biological Oxygen Demand)
- Chromium VI [water, surface water]: 2.8317e-5 kg; lognormal variance with pedigree 0.76804, pedigree (1,1,4,1,1)
  (same comment as for BOD5, Biological Oxygen Demand)
- Fluoride [water, ground-, long-term]: 1.8893e-5 kg; lognormal variance with pedigree 0.70035, pedigree (1,1,4,1,1)
  (same comment as for Aluminium)
- Calcium [air, urban air close to ground]: 1.0284e-6 kg; lognormal variance with pedigree 0.94306, pedigree (1,1,4,1,1)
  (same comment as for Carbon dioxide, non-fossil)
- Zinc, ion [water, surface water]: 1.604e-9 kg; lognormal variance with pedigree 0.97902, pedigree (1,1,4,1,1)
  (same comment as for BOD5, Biological Oxygen Demand)
- COD, Chemical Oxygen Demand [water, surface water]: 0.00046888 kg; lognormal variance with pedigree 0.053365, pedigree (1,1,4,1,1)
  (same comment as for BOD5, Biological Oxygen Demand)
- Fluoride [water, surface water]: 1.6113e-6 kg; lognormal variance with pedigree 0.75615, pedigree (1,1,4,1,1)
  (same comment as for BOD5, Biological Oxygen Demand)
- Mercury [water, surface water]: 3.4672e-10 kg; lognormal variance with pedigree 1.2331, pedigree (1,1,4,1,1)
  (same comment as for BOD5, Biological Oxygen Demand)
- Toluene [air, urban air close to ground]: 6.7407e-8 kg; lognormal variance with pedigree 0.101223, pedigree (1,1,4,1,1)
  (same comment as for Dioxins, measured as 2,3,7,8-tetrachlorodibenzo-p-dioxin)
- Chloride [water, surface water]: 0.00025367 kg; lognormal variance with pedigree 0.67238, pedigree (1,1,4,1,1)
  (same comment as for BOD5, Biological Oxygen Demand)
- Zinc, ion [water, ground-, long-term]: 5.4064e-6 kg; lognormal variance with pedigree 3.3131, pedigree (1,1,4,1,1)
  (same comment as for Aluminium)
- Arsenic [air, urban air close to ground]: 3.3014e-9 kg; lognormal variance with pedigree 1.6985, pedigree (1,1,4,1,1)
  (same comment as for Carbon dioxide, non-fossil)
- Copper, ion [water, ground-, long-term]: 0.00031388 kg; lognormal variance with pedigree 0.78804, pedigree (1,1,4,1,1)
  (same comment as for Aluminium)
- Chromium, ion [water, surface water]: 7.8671e-8 kg; lognormal variance with pedigree 0.69967, pedigree (1,1,4,1,1)
  (same comment as for BOD5, Biological Oxygen Demand)
- Hydrogen chloride [air, urban air close to ground]: 1.8856e-7 kg; lognormal variance with pedigree 0.83456, pedigree (1,1,4,1,1)
  (same comment as for Carbon dioxide, non-fossil)
- Nickel [air, urban air close to ground]: 6.971e-10 kg; lognormal variance with pedigree 1.6701, pedigree (1,1,4,1,1)
  (same comment as for Carbon dioxide, non-fossil)
- Benzene, hexachloro- [air, urban air close to ground]: 7.0472e-11 kg; lognormal variance with pedigree 0.101223, pedigree (1,1,4,1,1)
  (same comment as for Dioxins, measured as 2,3,7,8-tetrachlorodibenzo-p-dioxin)
- Nickel, ion [water, ground-, long-term]: 5.3266e-7 kg; lognormal variance with pedigree 1.6205, pedigree (1,1,4,1,1)
  (same comment as for Aluminium)
- Calcium, ion [water, surface water]: 1.4467e-6 kg; lognormal variance with pedigree 0.70925, pedigree (1,1,4,1,1)
  (same comment as for BOD5, Biological Oxygen Demand)
- Sodium, ion [water, ground-, long-term]: 0.00011243 kg; lognormal variance with pedigree 0.49061, pedigree (1,1,4,1,1)
  (same comment as for Aluminium)
- Calcium, ion [water, ground-, long-term]: 9.7337e-5 kg; lognormal variance with pedigree 0.87692, pedigree (1,1,4,1,1)
  (same comment as for Aluminium)
- Phosphate [water, ground-, long-term]: 1.4577e-5 kg; lognormal variance with pedigree 5.087, pedigree (1,1,4,1,1)
  (same comment as for Aluminium)
- Chromium VI [water, ground-, long-term]: 9.2942e-5 kg; lognormal variance with pedigree 1.1652, pedigree (1,1,4,1,1)
  (same comment as for Aluminium)
- TOC, Total Organic Carbon [water, surface water]: 0.00020476 kg; lognormal variance with pedigree 0.053523, pedigree (1,1,4,1,1)
  (same comment as for BOD5, Biological Oxygen Demand)
- Chromium [air, urban air close to ground]: 8.8472e-7 kg; lognormal variance with pedigree 0.68727, pedigree (1,1,4,1,1)
  (same comment as for Carbon dioxide, non-fossil)
- Lead [water, ground-, long-term]: 1.3452e-5 kg; lognormal variance with pedigree 4.28, pedigree (1,1,4,1,1)
  (same comment as for Aluminium)
- COD, Chemical Oxygen Demand [water, ground-, long-term]: 0.0030101 kg; lognormal variance with pedigree 0.032591, pedigree (1,1,4,1,1)
  (same comment as for Aluminium)
- Particulates, < 2.5 um [air, urban air close to ground]: 4.0239e-6 kg; lognormal variance with pedigree 0.43297, pedigree (1,1,4,1,1)
  (same comment as for Dioxins, measured as 2,3,7,8-tetrachlorodibenzo-p-dioxin)
- Manganese [water, surface water]: 8.2552e-9 kg; lognormal variance with pedigree 0.9081, pedigree (1,1,4,1,1)
  (same comment as for BOD5, Biological Oxygen Demand)
- DOC, Dissolved Organic Carbon [water, surface water]: 0.00020476 kg; lognormal variance with pedigree 0.053523, pedigree (1,1,4,1,1)
  (same comment as for BOD5, Biological Oxygen Demand)
- Nitrate [water, surface water]: 1.2561e-5 kg; lognormal variance with pedigree 0.46833, pedigree (1,1,4,1,1)
  (same comment as for BOD5, Biological Oxygen Demand)
- Benzo(a)pyrene [air, urban air close to ground]: 7.5001e-13 kg; lognormal variance with pedigree 0.43297, pedigree (1,1,4,1,1)
  (same comment as for Dioxins, measured as 2,3,7,8-tetrachlorodibenzo-p-dioxin)
- Iron [air, urban air close to ground]: 2.7696e-11 kg; lognormal variance with pedigree 1.2808, pedigree (1,1,4,1,1)
  (same comment as for Carbon dioxide, non-fossil)
- Iron, ion [water, surface water]: 4.0626e-10 kg; lognormal variance with pedigree 1.3883, pedigree (1,1,4,1,1)
  (same comment as for BOD5, Biological Oxygen Demand)
- Lead [air, urban air close to ground]: 2.2922e-9 kg; lognormal variance with pedigree 1.1783, pedigree (1,1,4,1,1)
  (same comment as for Carbon dioxide, non-fossil)
- Water [water, surface water]: 0.00047607 m3; lognormal variance with pedigree 1.1808, pedigree (1,1,4,1,1)
  Process water released to surface water.
  Uncertainty: uncertainty calculated from uncertainty in process water input and the uncertainty of fraction to surface water.
- Benzene, pentachloro- [air, urban air close to ground]: 1.7807e-10 kg; lognormal variance with pedigree 0.101223, pedigree (1,1,4,1,1)
  (same comment as for Dioxins, measured as 2,3,7,8-tetrachlorodibenzo-p-dioxin)
- Sulfate [water, surface water]: 0.00010044 kg; lognormal variance with pedigree 0.43457, pedigree (1,1,4,1,1)
  (same comment as for BOD5, Biological Oxygen Demand)
- Carbon monoxide, non-fossil [air, urban air close to ground]: 5.7292e-5 kg; lognormal variance with pedigree 0.83121, pedigree (1,1,4,1,1)
  (same comment as for Dioxins, measured as 2,3,7,8-tetrachlorodibenzo-p-dioxin)
- Potassium, ion [water, ground-, long-term]: 5.0769e-5 kg; lognormal variance with pedigree 0.57821, pedigree (1,1,4,1,1)
  (same comment as for Aluminium)
- Manganese [air, urban air close to ground]: 1.0128e-8 kg; lognormal variance with pedigree 1.0828, pedigree (1,1,4,1,1)
  (same comment as for Carbon dioxide, non-fossil)
- Dinitrogen monoxide [air, urban air close to ground]: 1.4697e-5 kg; lognormal variance with pedigree 1.4416, pedigree (1,1,4,1,1)
  (same comment as for Cyanide)
- Manganese [water, ground-, long-term]: 3.2717e-5 kg; lognormal variance with pedigree 2.036, pedigree (1,1,4,1,1)
  (same comment as for Aluminium)
- Nitrogen oxides [air, urban air close to ground]: 0.00017303 kg; lognormal variance with pedigree 0.42485, pedigree (1,1,4,1,1)
  Sum of fuel-Nox and thermal-NOx emitted to air after DeNOx stage.
  Uncertainty: uncertainty calculated from uncertainty in average N-emissions and uncertainty in the share of thermal NOx and the uncertainty in nitrogen content in *this* waste.
- Iron, ion [water, ground-, long-term]: 7.7963e-6 kg; lognormal variance with pedigree 1.3867, pedigree (1,1,4,1,1)
  (same comment as for Aluminium)
- Potassium [air, urban air close to ground]: 3.2265e-7 kg; lognormal variance with pedigree 1.0387, pedigree (1,1,4,1,1)
  (same comment as for Carbon dioxide, non-fossil)
- Phosphorus [air, urban air close to ground]: 1.1056e-7 kg; lognormal variance with pedigree 0.97983, pedigree (1,1,4,1,1)
  (same comment as for Carbon dioxide, non-fossil)
- Sodium [air, urban air close to ground]: 1.2819e-6 kg; lognormal variance with pedigree 0.921, pedigree (1,1,4,1,1)
  (same comment as for Carbon dioxide, non-fossil)
- Molybdenum [water, surface water]: 2.2638e-7 kg; lognormal variance with pedigree 1.1387, pedigree (1,1,4,1,1)
  (same comment as for BOD5, Biological Oxygen Demand)
- Magnesium [water, ground-, long-term]: 0.00017467 kg; lognormal variance with pedigree 0.85209, pedigree (1,1,4,1,1)
  (same comment as for Aluminium)
- Copper [air, urban air close to ground]: 3.2185e-8 kg; lognormal variance with pedigree 0.84026, pedigree (1,1,4,1,1)
  (same comment as for Carbon dioxide, non-fossil)
- Molybdenum [air, urban air close to ground]: 1.0906e-9 kg; lognormal variance with pedigree 1.6203, pedigree (1,1,4,1,1)
  (same comment as for Carbon dioxide, non-fossil)
- BOD5, Biological Oxygen Demand [water, ground-, long-term]: 0.00098459 kg; lognormal variance with pedigree 0.032591, pedigree (1,1,4,1,1)
  (same comment as for Aluminium)
- Methane, non-fossil [air, urban air close to ground]: 5.0555e-7 kg; lognormal variance with pedigree 0.101223, pedigree (1,1,4,1,1)
  (same comment as for Dioxins, measured as 2,3,7,8-tetrachlorodibenzo-p-dioxin)
- Cobalt [air, urban air close to ground]: 1.5756e-10 kg; lognormal variance with pedigree 1.9437, pedigree (1,1,4,1,1)
  (same comment as for Carbon dioxide, non-fossil)
- Magnesium [water, surface water]: 9.2032e-7 kg; lognormal variance with pedigree 1.0108, pedigree (1,1,4,1,1)
  (same comment as for BOD5, Biological Oxygen Demand)
- Aluminium [air, urban air close to ground]: 5.1545e-12 kg; lognormal variance with pedigree 1.4117, pedigree (1,1,4,1,1)
  (same comment as for Carbon dioxide, non-fossil)
- Cobalt [water, ground-, long-term]: 7.0571e-8 kg; lognormal variance with pedigree 1.8373, pedigree (1,1,4,1,1)
  (same comment as for Aluminium)
- Molybdenum [water, ground-, long-term]: 6.0139e-7 kg; lognormal variance with pedigree 1.5998, pedigree (1,1,4,1,1)
  (same comment as for Aluminium)
- Mercury [air, urban air close to ground]: 9.052e-9 kg; lognormal variance with pedigree 1.7268, pedigree (1,1,4,1,1)
  (same comment as for Carbon dioxide, non-fossil)
- Cadmium, ion [water, ground-, long-term]: 1.4608e-8 kg; lognormal variance with pedigree 7.2367, pedigree (1,1,4,1,1)
  (same comment as for Aluminium)
- Potassium, ion [water, surface water]: 1.4216e-5 kg; lognormal variance with pedigree 0.63636, pedigree (1,1,4,1,1)
  (same comment as for BOD5, Biological Oxygen Demand)
- Phosphate [water, surface water]: 6.1163e-8 kg; lognormal variance with pedigree 0.69053, pedigree (1,1,4,1,1)
  (same comment as for BOD5, Biological Oxygen Demand)
- Magnesium [air, urban air close to ground]: 2.0805e-7 kg; lognormal variance with pedigree 0.89896, pedigree (1,1,4,1,1)
  (same comment as for Carbon dioxide, non-fossil)
- Nickel, ion [water, surface water]: 3.7285e-10 kg; lognormal variance with pedigree 2.194, pedigree (1,1,4,1,1)
  (same comment as for BOD5, Biological Oxygen Demand)
