# liquid crystal display production, unmounted

Dataset: EcoSpold 2, unit process
Geography: GLO
Time period: 2001-01-01 to 2021-12-31
Technology level: current
Classification: ISIC rev.4 ecoinvent: 2610:Manufacture of electronic components and boards
Classification: EcoSpold01Categories: electronics/module
Tags: ConvertedDataset
Scenario: Business-as-Usual
System model: Allocation, cut-off by classification
Generated by: Roland Hischier
Published in: Hischier R. 2007
Database: ecoinvent
isCopyrightProtected: true
accessRestrictedTo: 1

## General comment
This dataset represents the production of 1 kg of the various parts of the complete TFT-LCD module. The components of the complete TFT-LCD module are: LCD glass plates, driver TABs & input PWBs, the connection flex, the backlight unit and the ITO electrodes described in the respective datasets. It is based on information of a US-EPA study about computer screens. The data represent a current 15-inch LCD computer screen at the end of the 90s. The production efforts are included into a separate dataset.
[This dataset was already contained in the ecoinvent database version 2. It was not individually updated during the transfer to ecoinvent version 3. Life Cycle Impact Assessment results may still have changed, as they are affected by changes in the supply chain, i.e. in other datasets. This dataset was generated following the ecoinvent quality guidelines for version 2. It may have been subject to central changes described in the ecoinvent version 3 change report (http://www.ecoinvent.org/database/ecoinvent-version-3/reports-of-changes/), and the results of the central updates were reviewed extensively. The changes added e.g. consistent water flows and other information throughout the database. The documentation of this dataset can be found in the ecoinvent reports of version 2, which are still available via the ecoinvent website. The change report linked above covers all central changes that were made during the conversion process.]

## Included activities start
From reception of raw materials and auxiliaries at the factory gate.

## Included activities end
This dataset includes the various parts of the complete LCD module. The overall production efforts (i.e. auxiallaries and energy consumption, the necessary infrastructure of the various input materials) including the further coating layers (apart the ITO layer), the liquid crystals (LC) and the polarizer layer are included in a separate module linked to the dataset.

## Geography
Data from literature – used as data for the global composition average

## Technology
The production includes all components of the complete TFT-LCD module.

## Reference product
- liquid crystal display, unmounted: 1 kg; By-product classification allocatable product; CPC 47315: Monitors and projectors, principally used in an automatic data processing system
  EcoSpold01Location=GLO
  The LCD technology is just one out of several in the last decades developed flat display technologies. Other types of flat display technologies are e.g. the Plasma Display Panel (PDP) or OLED (organic light emitting diodes) displays. It can be distinguished between the so-called (self-)emissive and non-emissive displays. While the first ones have their proper light source for the production of the picture, the second type of display - to which the LCD display belongs - requests an additional light source in order to produce the image. Non-emissive displays have a low power consumption and they are (most of time) readable even in bright sunlight. The general principle used is the fact that the so-called liquid crystal (LC) - a mixture of up to 15 different organic components - changes their properties of light passing through the crystals in function of an external electrical charge. Within the LCD technology it is distinguished between passive-matrix and active-matrix LCD displays. There each row or column of the display has a single electrical circuit. The pixels are addressed one at a time by row and column addresses. This type of display is called a passive matrix because the pixel must retain its state between refreshes without the benefit of a steady electrical charge. As the number of pixels (and, correspondingly, columns and rows) increases, this type of display becomes increasingly less feasible. Very slow response times and poor contrast are typical of passive-matrix LCDs.
  For high-resolution colour displays such as modern LCD computer monitors and televisions, an active matrix structure is used. A matrix of thin-film transistors (TFTs) is added to the polarizing and colour filters. Each pixel has its own dedicated transistor, which allows each column line to access one pixel. When a row line is activated, all of the column lines are connected to a row of pixels and the correct voltage is driven onto all of the column lines. The row line is then deactivated and the next row line is activated. All of the row lines are activated in sequence during a refresh operation. Active-matrix displays are much brighter and sharper than passive-matrix displays of the same size, and generally have quicker response times.
  As shown there, the front glass plate is used as substrate for the colour filters, while the back glass plate is the substrate for the TFT-array. The two glass plates are themselves assembled with a sealant, while spacers keep the gap between the two plates - a gap that is filled up with LC material.
  On the front plate, the colour filter contains the black matrix as well as the three colour filters (red, blue, green) and a transparent ITO layer as common electrode. These colour filters can be made thereby with either dyes or with pigments, using a variety of different colouring methods. The TFT-array consists of the actual TFT, storage capacitors, pixel electrodes and the interconnect wiring. Thereby, each pixel has its proper TFT, storage capacitor and pixel electrode in order that each pixel can be addressed individually.
  Apart the LCD panel, a TFT LCD module compromises also a driving circuit unit as well as the backlight system, plus an overall chassis for keeping the complete LCD module together. The driving circuit unit contains a set of IC chips and printed wiring boards, allowing actually addressing in the end each single pixel on the LCD panel.
  production volume 1 kg
    Dummy value to be replaced by measured, estimated or calculated value
  property price 48.626 EUR2005
    Calculated based on inputs: The price of the product has been calculated as a sum of the values of the material and energy inputs for this product. This value is therefore a rough estimation. It may underestimate the real price since there are additional expenses when producing any product. These expences can include for example labour costs, treatment of waste materials and profit for the producer. Please consider carefully whether this level of data quality is acceptable for your application.
  property carbon content, non-fossil 4.20542e-5
    Calculated as the addition of C contents in the product composition
  property carbon content, fossil 0.327872
    Calculated as the addition of C contents in the product composition
  property carbon content 0.327914
    carbon content on a dry matter basis (reserved; not for manual entry)
  properties: water in wet mass 0 kg, water content 0, dry mass 1 kg, wet mass 1 kg, carbon allocation 0.327914 kg

## Inputs from technosphere
- liquid crystal display, minor components, auxilliaries and assembly effort: 1 kg; lognormal variance with pedigree 0.0407, pedigree (1,3,5,3,1)
  Estimation, the amount is due to the fact that this other dataset is defined on a per kg (LCD module) basis.
  EcoSpold01Location=GLO
  Uncertainty: data from an US-EPA LCA study
- printed wiring board, through-hole mounted, unspecified, Pb containing: 0.00657 kg; source US EPA 1998; lognormal variance with pedigree 0.0507, pedigree (1,3,5,3,1)
  EcoSpold01Location=GLO
  Proxy with literature value, to represent row and column driver input PWB, printed wiring board is used.
  Uncertainty: calculated from an US-EPA study
  properties: wet mass 1 kg, carbon content, fossil 0.132522, dry mass 1 kg
  note on carbon content, fossil: C content was calculated as the addition of C content in the PWB components
- printed wiring board, surface mounted, unspecified, Pb free: 0.01533 kg; source US EPA 1998; lognormal variance with pedigree 0.0507, pedigree (1,3,5,3,1)
  Proxy with literature value, to represent row and column driver input PWB, printed wiring board is used.
  EcoSpold01Location=GLO
  Uncertainty: calculated from an US-EPA study
  properties: dry mass 1 kg, wet mass 1 kg, carbon content, fossil 0.132522
- printed wiring board, surface mounted, unspecified, Pb containing: 0.00657 kg; source US EPA 1998; lognormal variance with pedigree 0.0507, pedigree (1,3,5,3,1)
  (same comment as for printed wiring board, through-hole mounted, unspecified, Pb containing)
  properties: wet mass 1 kg, carbon content, fossil 0.132522, dry mass 1 kg
- sputtering, indium tin oxide, for liquid crystal display: 5.5866e-8 m3; source US EPA 1998; lognormal variance with pedigree 0.0507, pedigree (1,3,5,3,1)
  EcoSpold01Location=RER
  Literature value.
  Uncertainty: calculated from an US-EPA study
- backlight, for liquid crystal display: 0.4307 kg; source US EPA 1998; lognormal variance with pedigree 0.0507, pedigree (1,3,5,3,1)
  Literature Value.
  EcoSpold01Location=GLO
  Uncertainty: calculated from an US-EPA study
  properties: carbon content, fossil 0.554974, wet mass 1 kg, dry mass 1 kg
  note on carbon content, fossil: Calculated as the addition of C contents in the product composition
- nylon 6: 0 kg; source US EPA 1998; pedigree (1,1,1,1,1)
  Proxy with literature value, to represent brightness enhancer, printed nylon is used.
  EcoSpold01Location=RER
  Uncertainty: calculated from an US-EPA study
  properties: carbon content, fossil 0.637168, dry mass 1 kg, wet mass 1 kg, heating value, net 30.9 MJ
  note on carbon content, fossil: It is a chain of caprolactam molecules, originating from aminocarboxylic acids - here caproic acid or caprolactam. The structure of nylon 6 is -(NH-(CH2)5-CO)n-, C6H11NO (ecoinvent v2.2 report 11_II). MW=113 g/mol
  note on heating value, net: Assumed equal to Nylon-66. Reference: Walters, R. N., Hackett, S. M. and Lyon, R. E. (2000) ‘Heats of combustion of high temperature polymers’, Fire and Materials, 24(5), pp. 245–252. doi: 10.1002/1099-1018(200009/10)24:5<245::AID-FAM744>3.0.CO;2-7.
- steel, chromium steel 18/8, hot rolled: 0.11345 kg; source US EPA 1998; lognormal variance with pedigree 0.0507, pedigree (1,3,5,3,1)
  EcoSpold01Location=RER
  Proxy with literature value, to represent backlight frame and 50% of gasket, screws and clips, chromium steel 18/8 is used.
  Uncertainty: calculated from an US-EPA study
  properties: carbon content, fossil 0.0008, dry mass 1 kg, wet mass 1 kg
  note on carbon content, fossil: Stainless steel model is the grade 304 steel (18/8 stainless, 18% chromium 8% nickel; max. 0.08% C)
- polycarbonate: 0.0938 kg; source US EPA 1998; lognormal variance with pedigree 0.0507, pedigree (1,3,5,3,1)
  EcoSpold01Location=RER
  Proxy with literature value, to represent frame (plastic part), polycarbonate is used.
  Uncertainty: calculated from an US-EPA study
  properties: carbon content, fossil 0.755906, wet mass 1 kg, dry mass 1 kg, heating value, net 29.57 MJ
  note on carbon content, fossil: Polycarbonate means here 2,2-bis(4-hydroxyphenyl)propane polycarbonate – also called bisphenol A polycarbonate ( -(O-C6H4-C(CH3)2-C6H4-O-CO)n- (ecoinvent v2.2 report 11_II), C16H14O3, MW=254 g/mol.
- printed wiring board, through-hole mounted, unspecified, Pb free: 0.01533 kg; source US EPA 1998; lognormal variance with pedigree 0.0507, pedigree (1,3,5,3,1)
  (same comment as for printed wiring board, surface mounted, unspecified, Pb free)
  properties: carbon content, fossil 0.132522, wet mass 1 kg, dry mass 1 kg
- injection moulding: 0.0938 kg; source US EPA 1998; lognormal variance with pedigree 0.0507, pedigree (1,3,5,3,1)
  Proxy with literature value, to represent frame (plastic part) processing, injection moulding is used.
  EcoSpold01Location=RER
  Uncertainty: calculated from an US-EPA study
- copper, cathode: 0.0031 kg; source US EPA 1998; lognormal variance with pedigree 0.0507, pedigree (1,3,5,3,1)
  EcoSpold01Location=RER
  Proxy with literature value, to represent connection flex, copper is used.
  Uncertainty: calculated from an US-EPA study
  properties: dry mass 1 kg, wet mass 1 kg
- integrated circuit, logic type: 0.0082 kg; source US EPA 1998; lognormal variance with pedigree 0.0507, pedigree (1,3,5,3,1)
  EcoSpold01Location=GLO
  Proxy with literature value, to represent row and column driver TAB, integrated circuit, IC, logic type is used.
  Uncertainty: calculated from an US-EPA study
  properties: dry mass 1 kg, wet mass 1 kg, carbon content, fossil 0.221701
- section bar rolling, steel: 0.1094 kg; source US EPA 1998; lognormal variance with pedigree 0.0507, pedigree (1,3,5,3,1)
  EcoSpold01Location=RER
  Proxy with literature value, to represent backlight frame processing, section bar rolling is used.
  Uncertainty: calculated from an US-EPA study
- glass, for liquid crystal display: 0.2965 kg; source US EPA 1998; lognormal variance with pedigree 0.0507, pedigree (1,3,5,3,1)
  Proxy with literature value, to represent AMLCD cell, LCD glass is used.
  EcoSpold01Location=GLO
  Uncertainty: calculated from an US-EPA study
  properties: dry mass 1 kg, wet mass 1 kg
- synthetic rubber: 0.00405 kg; source US EPA 1998; lognormal variance with pedigree 0.0507, pedigree (1,3,5,3,1)
  Proxy with literature value, to represent 50% of gasket, screws and clips, synthetic rubber is used.
  EcoSpold01Location=RER
  Uncertainty: calculated from an US-EPA study
  properties: wet mass 1 kg, dry mass 1 kg, carbon content, fossil 0.871949, heating value, net 26.42 MJ
  note on carbon content, fossil: EPDM (Ethylene-propene-diene terpolymer) rubber is a terpolymer of ethylene, propene, and a diene with the residual unsaturated portion of the diene in the side chain (ecoinvent v2.2 report 7-part XX & Ullmann). Chemical formula (deduced from Evidences of Solvent-Induced Miscibility in Polychloroprene-co-Ethylene-Propene Diene Terpolymer Blends, Dubey et al., Journal of Applied Polymer Science, 2009, 111:1884–1891): C20H35
- sheet rolling, copper: 0.0031 kg; source US EPA 1998; lognormal variance with pedigree 0.0507, pedigree (1,3,5,3,1)
  EcoSpold01Location=RER
  Proxy with literature value, to represent connection flex processing, copper sheet rolling is used.
  Uncertainty: calculated from an US-EPA study
- nylon 6: 0.00208273, 0.00421727 kg (2 entries); source US EPA 1998; lognormal variance with pedigree 0.0507, pedigree (1,3,5,3,1)
  (same comment as for nylon 6)

## Sampling procedure
literature & own estimations

## Extrapolations
This dataset has been extrapolated from year 2001 to the year of the calculation (2021). The uncertainty has been adjusted accordingly.

## Review by Roland Hischier 2011-09-22
Transfer of documentation done.

## Review by Jürgen Sutter 2007-11-08
passed.
