# tap water production, conventional with biological treatment

Dataset: EcoSpold 2, unit process
Geography: Europe without Switzerland
Time period: 2012-01-01 to 2021-12-31
Technology level: current
Classification: ISIC rev.4 ecoinvent: 3600:Water collection, treatment and supply
Classification: EcoSpold01Categories: water supply/production
Synonyms: potable water
Scenario: Business-as-Usual
System model: Allocation, cut-off by classification
Generated by: Tereza Levova
Database: ecoinvent
isCopyrightProtected: true
accessRestrictedTo: 1

## General comment
This dataset is created as a child of global dataset with edited production volume, activity links and river/lake water exchanges ratio valid for this geography.

This dataset represents production of 1 kg of tap water under pressure at facility gate, ready for distribution in network. It represents average operation of conventional with biological filtration treatment for production of tap water. Conventional with biological filtration treatment includes coagulation and decantation, biological filtration and disinfection. Other treatment such as oxidation (ultraviolet radiation, ozone) and other adjustment (pH, alkalinity, etc.) can be present in some plant. Inventory was constructed from reported chemicals, energy inputs and wastes from 2 distinct conventional with biological filtration plants located in Québec.
[This dataset is meant to replace the following datasets:
- tap water production and supply, Europe without Switzerland, 2000 - 2000]

## Included activities start
From the intake pumping of raw surface water into the water treatment plant.

## Included activities end
This dataset ends with the production of tap water, at facility gate, under pressure. It includes energy for intake pumping, treatment system, lighting and heating of the building as well as the energy of the pump pressurizing water to the beginning of the network. It includes all chemicals and material added to the water during treatment and, when needed, ultraviolent lamps for replacement. It excludes energy for pumping stations and water losses within the network which is included in the tap water market. Emissions to the environment occurring during the treatment and during the distribution were not considered as they are assumed negligible. Main substance in water that would be released in the environment are assumed to be considered in wastewater processes.

## Geography
Extrapolated from data from two plants in Quebec (Canada). The uncertainty was adjusted accordingly.

## Technology
Most frequent technology in tap water production facility in Quebec

## Time period
Time of publication.

## Parameters
- unit conversion, days in a year: 365.25 d/year; name days_per_year; lognormal variance with pedigree 0.0006, pedigree (1,1,1,1,1)
  Conversion factor.

## Reference product
- tap water: 1 kg; name tapwater; CPC 18000: Natural water; By-product classification allocatable product; CAS 7732-18-5
  production volume 3.21881e13 kg; name PV_tapwater; = (4.7824E14*0.816*0.466)*0.177
    Calculated based on estimates and literature values.
    4.78E11 m3/year is the amount of tap water produced in Europe (excluding Switzerland) yearly (Gleick, P., 2012, The World"s Water, Volume 7).
    18.4% is the share of tap water produced without any treatment or minimal treatment from ground water
    38% is the share of conventional treatment
    38.5% is the share of direct filtration treatment
    2.4% is the share of microstainer treatment
    2.6% is the share of ultrafiltration
    Estimated based on literature values (European Environment Agency, 2009, Water resources across Europe - confronting water scarcity and drought).
    The ratio between conventional treatment and conventional with biological treatment is estimated to be the same as in case of the global situation 82.3%/17.7%.
  properties: dry mass 0.00034 kg, carbon content, fossil 0.0017899, carbon content, non-fossil 0, wet mass 1 kg, water content 2940.18, price 0.000397 EUR2005, water in wet mass 0.99966 kg, carbon content 0.0017899, carbon allocation 6.08566e-7 kg

## By-products
- spent activated carbon, granular: 0 kg; CPC 39: Wastes or scraps; By-product classification Recyclable; CAS 7440-44-0; pedigree (1,1,1,1,1)
  Calculated value, assuming the dry mass of "activated carbon, granular" (0.97) ends up as byproduct.
  Uncertainty: C
  production volume 0 kg; = PV_tapwater * (spent_carbon / tapwater)
    Calculated from production volume of reference product using the relative outputs.
  property price 0.846 EUR2005
    Calculated value based on data from United Nations Commodity Trade Statistics Database (comtrade.un.org). UN comtrade category: 380210 Activated Carbon. Year 2005. Using exchange rate of 1EURO = 1.209 USD. Average of price of import into 5 main markets (EU, US, JP, IN and CN). The price of "spent activated carbon" is estimated to be 90% lower than the price of virgin activated carbon.
  property carbon content, fossil 0.81
    Literature value. From Biomass and Bioenergy: Processing and Properties (2014) edited by Khalid Rehman Hakeem, Mohammad Jawaid, Umer Rashid (pg. 252). Carbon content is in the range of 72-90%, an average value of 81% is taken.
  property heating value, net 5.65 MJ
    LHV is calculated based on the Carbon content of the product. More details can be found on the respective documentation.
  property carbon content 0.81
    carbon content on a dry matter basis (reserved; not for manual entry)
  properties: carbon content, non-fossil 0, wet mass 3.33333 kg, dry mass 1 kg, water content 2.33333, water in wet mass 2.33333 kg, carbon allocation 0.81 kg

## Inputs from technosphere
- oxygen, liquid: 1.745e-6 kg; lognormal variance with pedigree 0.0118, pedigree (2,3,4,5,1)
  Measured value. Average use of liquid oxygen for onsite ozone production in surveyed conventional with biological treatment plants. Note than only 1 plant reported using this substance although ozonation was applied in the other plant using air. Plants not reporting this consumable were attributed an input value of 0 during the calculation of the weighted average.
  properties: dry mass 1 kg, wet mass 1 kg
- water works, capacity 1.1E10l/year: 1.52103e-12 unit; = 1/(Q_av* days_per_year*lifetime*UnitConversion(1, 'm3', 'l')); lognormal variance with pedigree 0.008, pedigree (1,1,4,1,1)
  Calculated value. Amount of water works construction attributed to the production of 1kg of tap water. Value is based on assumed lifetime production of water treatment plant and an assumed typical medium-sized plant of 30,000 m3/day.
  Uncertainty: C
  property plant average daily flow rate 30000 m3/d; name Q_av
  property lifetime 60 year; name lifetime
  note on plant average daily flow rate: Fixed values, Flow rate of a conventional water purification plant for a medium-size facility as defined in the water works process.
  note on lifetime: Estimated Value. Expected lifetime of water works as defined in the construction process.
- activated silica: 1.31167e-6 kg; lognormal variance with pedigree 0.0132, pedigree (2,4,4,5,1)
  Measured value. Average use of substance reported in surveyed conventional with biological treatment plants. Note than 1 plant reported using this substance. Plants not reporting this consumable were attributed an input value of 0 during the calculation of the weighted average.
- diesel, burned in building machine: 6.56813e-5 MJ; = diesel_use*density_diesel*NHV*43.2; lognormal variance with pedigree 0.008, pedigree (1,1,4,1,1)
  Calculated value.
  Uncertainty: C
  property density 0.84 kg/l; name density_diesel
  property fuel input in physical units, L 1.81e-6 l; name diesel_use
  property heating value, net 1 MJ; name NHV
  note on fuel input in physical units, L: Measured value. Average of diesel volume consumed in a year. All plants reported diesel use.
  note on heating value, net: Literature. net (lower) heating (calorific) value for diesel in MJ/kg
- tap water: 6.93e-5 kg; lognormal variance with pedigree 0.0132, pedigree (3,3,4,5,1)
  Calculated value. Water content of hypochlorite solution, sodium hydroxide, prehydrolysed coagulant and aluminium sulfate.
  properties: carbon content, fossil 0.00178991, water content 2962.17, dry mass 0.000337476 kg, wet mass 1 kg
  note on carbon content, fossil: Bicarbonate content is 2.93 mol/m3. CO2 content is 0.1 mol/m3 (ecoinvent v2.2 report 8, Tab 93.1).
- heat, district or industrial, natural gas: 0.000337252 MJ; = fuel_input*heating_value*36.3*fuel_use; lognormal variance with pedigree 0.008, pedigree (1,1,4,1,1)
  Calculated value.
  Uncertainty: C
  property heating value, net 1 MJ; name heating_value
  property Corresponding fuel use 1.11 MJ; name fuel_use
  property fuel input in physical units, m3 8.37e-6 m3; name fuel_input
  note on Corresponding fuel use: Lower heating value of the fuel input related to the heat/electricity output
  note on fuel input in physical units, m3: Measured value. Average natural gas consumption in surveyed plants for this technology type. Note than only 1 of the 2 plants reported using natural gas. Plants not reporting natural gas were attributed an input value of 0 during the calculation of the weighted average.
- sodium hypochlorite, without water, in 15% solution state: 3.3e-6 kg; lognormal variance with pedigree 0.0118, pedigree (2,3,4,5,1)
  Measured value. Average use of hypochlorite (dry basis) for disinfection in surveyed conventional with biological treatment plants. Reported concentration of solution is 12% (w/w), input of exchange "water" was added accordingly. Note the 2 plants reported using this substance.
  properties: wet mass 1 kg, dry mass 1 kg
- lime, hydrated, loose weight: 5.43127e-6 kg; lognormal variance with pedigree 0.0132, pedigree (2,4,4,5,1)
  Measured value. Average use of lime for pH adjustment in surveyed conventional with biological treatment plants. Note than 1 of the 2 plants reported using this substance. Plants not reporting this consumable were attributed an input value of 0 during the calculation of the weighted average.
  properties: water content 0.00300903, dry mass 0.997 kg, wet mass 1 kg
- sodium hydroxide, without water, in 50% solution state: 5.75e-6 kg; lognormal variance with pedigree 0.0132, pedigree (2,4,4,5,1)
  Measured value. Average use of sodium hydroxide (dry basis) for adjustement in surveyed conventional treatment plants. Input of exchange "water", based on NaOH concentration, was added accordingly. Note the 2 plants reported using this substance.
  properties: heating value, net 3.03 MJ, dry mass 1 kg, wet mass 1 kg
- silica sand: 1.15704e-6 kg; lognormal variance with pedigree 0.0132, pedigree (3,3,4,5,1)
  Calculated value. Amount of sand to compensate losses through sand filter washing. Extrapolated to all plant from one reported value.Note that only 1 of the 2 plants reported this consumable.
  properties: dry mass 0.99 kg, wet mass 1 kg, water content 0.010101
- sodium phosphate: 1.14333e-6 kg; lognormal variance with pedigree 0.0132, pedigree (2,4,4,5,1)
  (same comment as for activated silica)
  properties: wet mass 1 kg, dry mass 1 kg
- wastewater, unpolluted: -4.86e-5 m3; name ww; lognormal variance with pedigree 0.0106, pedigree (1,1,4,5,1)
  Measured value. Average amount of wastewater produced during treatment.
  Uncertainty: C
  production volume 1.56434e9 m3; = PV_tapwater*(ww/tapwater)
    Calculated from the production volume of tap water, at user in proportion to the respective output amounts.
  property price 0 EUR2005; name ww_price_EUR2005
  properties: dry mass 0.337476 kg, carbon content, fossil 0.00178991, carbon content, non-fossil 0.00178991, water content 2962.17, wet mass 1000 kg
  note on carbon content, fossil: Assumed to be like in tap water. Bicarbonate content is 2.93 mol/m3. CO2 content is 0.1 mol/m3 (ecoinvent v2.2 report 8, Tab 93.1).
- sodium pyrophosphate: 2.67034e-7 kg; name tetrasodiumpyrophosphate; lognormal variance with pedigree 0.0132, pedigree (2,4,4,5,1)
  Measured value. Average use of tetrasodium pyrophosphate reported in surveyed conventional with biological treatment plants. Note than 1 plant reported using this substance. Plants not reporting this consumable were attributed an input value of 0 during the calculation of the weighted average.
- potassium permanganate: 5.44323e-7 kg; lognormal variance with pedigree 0.0132, pedigree (2,4,4,5,1)
  (same comment as for activated silica)
  properties: wet mass 1 kg, dry mass 1 kg
- aluminium sulfate, powder: 6.36e-5 kg; lognormal variance with pedigree 0.0212, pedigree (2,3,4,5,1)
  Measured value. Value reprensent average for use of pre-hydrolysed coagulant (PASS) and average for use au aluminium sulphate solution. Note that both plants reported using PASS and aluminium sulphate solution.
  properties: wet mass 1 kg, dry mass 1 kg
- polyacrylamide: 1.6467e-7 kg; lognormal variance with pedigree 0.0118, pedigree (2,3,4,5,1)
  Measured value. Average use of polymer for floculation in surveyed conventional with biological treatment plants. Polymers assumed to be 100% polyacrylamide. Note the 2 plants reported using this substance.
  properties: heating value, net 23.88 MJ
- activated carbon, granular: 2.27332e-7 kg; name GCA; lognormal variance with pedigree 0.0212, pedigree (2,3,4,5,1)
  Measured value. Replaces charcoal proxy. Average use of activated charcoal in surveyed conventional treatment plants. Note than both plants reported using this input.
  Uncertainty: L
  property water in wet mass 0.03 kg; name GAC_WWM
  property carbon content, fossil 0.81; name GAC_C_content_fossil
  property wet mass 1 kg; name GAC_WM
  property water content 0.030928; name GAC_water_content
  property dry mass 0.97 kg; name GAC_DM
  property carbon content, non-fossil 0; name GAC_C_content_non_fossil
  properties: heating value, net 30.23 MJ
  note on carbon content, fossil: Literature value. From Biomass and Bioenergy: Processing and Properties (2014) edited by Khalid Rehman Hakeem, Mohammad Jawaid, Umer Rashid (p. 252). Carbon content is in the range of 72-90%, an average value of 81% is taken.
- electricity, medium voltage: 0.000582 kWh; lognormal variance with pedigree 0.0118, pedigree (2,3,4,5,1)
  Measured value. Average electricity consumption for entire process including pumping for water intake and pumping for distribution at the plant gate. All plants (2) reported electricity use.
- spent activated carbon, granular: -2.20512e-7 kg; lognormal variance with pedigree 0.0086, pedigree (1,1,4,1,1)
  (same comment as for spent activated carbon, granular)
  production volume 7.09786e6 kg
  properties: wet mass 3.33333 kg, dry mass 1 kg, price 0.846 EUR2005, water content 2.33333, carbon content, fossil 0.81, heating value, net 5.65 MJ
  note on carbon content, fossil: Literature value. From Biomass and Bioenergy: Processing and Properties (2014) edited by Khalid Rehman Hakeem, Mohammad Jawaid, Umer Rashid (pg. 252). Carbon content is in the range of 72-90%, an average value of 81% is taken.

## Inputs from nature
- Water, lake [natural resource, in water]: 0 m3; name waterIn_L; pedigree (1,1,1,1,1)
  Calculated value. Surface water withdrawal represents average withdrawal from surveyed plants. Share of subcompartiment type (river-91%, lake-9%) is estimated based on share number of people in Quebec desserved by water source types.
- Water, river [natural resource, in water]: 0.00103263 m3; name waterIn_R; = (1/1000)+(1/1000)*0.032626; lognormal variance with pedigree 0.0112, pedigree (2,1,4,5,1)
  Calculated value.
  The shares between technologies and water sources are calculated based on literature data (Gleick, P., 2012, The World"s Water, Volume 7, European Environment Agency, 2009, Water resources across Europe - confronting water scarcity and drought, Aquastat) and estimates.
  81.6% of water used for production of tap water in Europe comes from surface waters
  18.4% of water used for production of tap water in Europe comes from ground water
  18.4% is the share of tap water produced without any treatment or minimal treatment from ground water
  38% is the share of conventional treatment
  38.5% is the share of direct filtration treatment
  2.4% is the share of microstainer treatment
  2.6% is the share of ultrafiltration
  0.0326 kg is the amount of water lost during the process

## Sampling procedure
Based on data collected from two conventional treatment plants in Quebec (Canada). See corresponding Quebec dataset for more information. Note that percent representativeness is not supplied because technology-specific global production volumes is too uncertain. Should this information become available, the representativeness can be calculated by dividing the sum of the water treated by the Quebec plants that served as a basis for the Global dataset by the technology-specific global production volume. (2.31E10 kg/a)

## Extrapolations
This dataset has been extrapolated from year 2012 to the year of the calculation (2021). The uncertainty has been adjusted accordingly.
