# wind power plant construction, 800kW, fixed parts

Dataset: EcoSpold 2, unit process
Geography: GLO
Time period: 1991-01-01 to 2021-12-31
Technology level: current
Classification: EcoSpold01Categories: wind power/production of components
Classification: ISIC rev.4 ecoinvent: 4220:Construction of utility projects
Tags: infrastructure; ConvertedDataset; wind power
Scenario: Business-as-Usual
System model: Allocation, cut-off by classification
Generated by: Christian Bauer
Published in: Burger, B. 2007
Database: ecoinvent
isCopyrightProtected: true
accessRestrictedTo: 1

## General comment
Lifetime is assumed to be 40 years. Annual electricity production is assumed to be about 1.4 GWh. Data are from a Nordex N50/800 plant. The foundation (concrete and reinforcing steel) is assumed to be remaining in the ground after the demolition of the power plant.
[This dataset was already contained in the ecoinvent database version 2. It was not individually updated during the transfer to ecoinvent version 3. Life Cycle Impact Assessment results may still have changed, as they are affected by changes in the supply chain, i.e. in other datasets. This dataset was generated following the ecoinvent quality guidelines for version 2. It may have been subject to central changes described in the ecoinvent version 3 change report (http://www.ecoinvent.org/database/ecoinvent-version-3/reports-of-changes/), and the results of the central updates were reviewed extensively. The changes added e.g. consistent water flows and other information throughout the database. The documentation of this dataset can be found in the ecoinvent reports of version 2, which are still available via the ecoinvent website. The change report linked above covers all central changes that were made during the conversion process.]

## Included activities end
Includes materials used for fixed parts: tower and base, and their disposal. Also includes the prozessing, the transports needed, and the area that is needed for installation and the energy requirements for the installation itself.

## Geography
Data for a specific 800kW wind power plant. Represents European installation conditions.

## Technology
Average European technology for a 800 kW wind power plant.

## Parameters
- Percentage of onshore wind power plant class capacity on total: 0.197 dimensionless; name percentage_class_lt_1MW_onshore; lognormal variance with pedigree 0.011325, pedigree (2,2,3,2,2)
  Percentages onshore 2008 of the three wind power plant classes (average from 41 countries worldwide): <1MW 19.7%; 1-3MW 69.6%; >3MW 10.7% [compilation out of "The Wind Power Database, 2011"]. These percentages are taken to calculate the number of new wind power plants per class with the assumption of average capacity values (0.8MW, 2MW, 4.5MW) .
  Source:
  The Wind Power. 2011. Wind power and wind farms database. www.thewindpower.net
  Uncertainty: Data from 2008
- Installed capacity: 26911 MW; name capacity_installed_new; lognormal variance with pedigree 0.0018, pedigree (2,1,1,1,2)
  Literature value/statistics. New installed capacity of wind power in the world, onshore, 2008. Calculated from the total new installed capacity (27261 MW) minus new capacity offshore (350 MW). [WWEA, 2009. World Wind Energy Report 2008. World Wind Energy Association, Bonn. Table p.12f and chapter "offshore wind energy", p.8]

## Reference product
- wind power plant, 800kW, fixed parts: 1 unit; name RP_amount_1; By-product classification allocatable product; CPC 53262: Power plants
  EcoSpold01Location=RER
  The tower of the plant is made of steel and has a diameter of 2.8 m at the basement and 1.8 m at the upper end (conically shaped). The heigth of the tower is 50 m, treated with a paint surface. The tower has a weight of 70 t. The fundament consists of concrete and reinforcing steel.
  production volume 3313.42 unit; name RP_PV_1; = capacity_installed_new* percentage_class_lt_1MW_onshore/0.8 /2
    Calculated value. See parameters for a closer look at the values used. It is assumed for the annual production volume calculations that the new installed capacity in the class of less than 1MW turbines is represented by half 800kW turbines and half 600kW turbines.
  property price 981456 EUR2005
    The production volume of this product is small compared to other products supplied by the activities within the same ISIC 3 category. Therefore, an average price of products supplied by the activities in the same ISIC 3 code has been applied.This price is obtained as '-66 Machinery and equipment, EU27' (5.71 EURO2003/kg dry soilds) in the 'EU & DK Input Output Database' (available in SimaPro); Weight: 173200 kg per unit. (Source: Existing ecoinvent documentation from ecoinvent v.2.2. From information in the dataset wind power plant 800kW, fixed parts.). Extrapolated to relevant wind power plant by a factor 800/150.

## Inputs from technosphere
- reinforcing steel: 14000 kg; name reinforcing_steel; source Steinemann D. 2001; lognormal variance with pedigree 0.042, pedigree (1,1,5,5,1)
  EcoSpold01Location=RER
  Calculated value. For each meter of tower height 280 kg of reinforcing steel are estimated (280 kg x 50 m = 14'000 kg).
  properties: carbon content, fossil 0.004, dry mass 1 kg, wet mass 1 kg
- diesel, burned in building machine: 27900 MJ; source Scholzen F. 1991; lognormal variance with pedigree 0.082, pedigree (1,1,5,5,1)
  EcoSpold01Location=GLO
  Calculated value. The amount is extrapolated from the 30 kW wind power plant on Simplon.
  properties: heating value, net 1 MJ
- epoxy resin, liquid: 0 kg; source Hagedorn G. 1991; pedigree (1,1,1,1,1)
  EcoSpold01Location=RER
  Calculated Value. For the exterior painting of the tower epoxy resin is used with 0.25 kg per m2 for two paintings - i.e. in total 2 x 0.25 kg/m2 x 2360 m2 are used. No waste treatment is modelled.
  properties: wet mass 1 kg, carbon content, fossil 0.42325, dry mass 1 kg, heating value, net 12.82 MJ
- welding, arc, steel: 190 m; source Scholzen F. 1991; lognormal variance with pedigree 0.052, pedigree (1,1,5,5,1)
  EcoSpold01Location=RER
  Estimation. For the tower the most common welding process (MAG-C-process) is assumed. Welding is accounted at a length of 3.8 m height of the tower. The expenses for material consumption are estimated with a weld of 0.166 kg/m and is rounded up generously. A total of 190 m of welding seam in different forms and strenghts are estimated.
- steel, low-alloyed, hot rolled: 69400 kg; name steel_lowalloyed; source Nordex 2001; lognormal variance with pedigree 0.042, pedigree (1,1,5,5,1)
  Estimation. The tower of the plant consists of 60'300 kg of steel. Additionally 15% are estimated for components and a service platform (9045 kg). 30 kg of steel are used for welding.
  EcoSpold01Location=RER
  properties: wet mass 1 kg, dry mass 1 kg, carbon content, fossil 0.005
  note on carbon content, fossil: Low alloyed steel composition given in Tab. 3.2 ecoinvent v2.2 report 10_partII. Steel assumed to have a C content of 0.5%
- electricity, medium voltage: 10 kWh; source Scholzen F. 1991; lognormal variance with pedigree 0.162, pedigree (1,1,5,5,1)
  EcoSpold01Location=CH
  Calculated value. The energy needed for the assembly of the tower can be roughly estimated based on the excavation work. The whole tower mass of 70 t is lifted 25 m (half of the tower height) and also moved horizontally (Epot = 70'000 kg*25 m*10ms-2 = 17.5 MJ = 4.8 kWh). An electricity consumption of 10 kWh is estimated (losses included).
- concrete, normal: 93.75 m3; name concrete; = 4500*50/2400; source Steinemann D. 2001; lognormal variance with pedigree 0.052, pedigree (1,1,5,5,1)
  Calculated value. For each meter of tower height 4500 kg of concrete are estimated (4500 kg x 50 m = 225'000 kg). A density of 2400kg/m3 is assumed for the concrete.
  EcoSpold01Location=CH
  properties: wet mass 2380 kg, dry mass 2190 kg, water content 0.086758
- sheet rolling, steel: 69400 kg; = steel_lowalloyed; source Nordex 2001; lognormal variance with pedigree 0.0406, pedigree (1,1,5,1,1)
  Estimation. Construction effort for the whole amount of steel.
  EcoSpold01Location=RER
- waste reinforced concrete: 0 kg; name BP_amount_1
  Calculated value. A density of 2400kg/m3 is assumed for concrete.
  production volume 0 kg
    Calculated from production volume of reference product using the relative outputs.
  property wet mass 1 kg; name WM
  property price 0 EUR2005; name BP_amount_1_price_EUR2005
  property dry mass 0.99418 kg; name DM
  properties: water content 0.00585407
- scrap steel: 0 kg; name BP_amount_2
  Estimation. It is assumed that 100% of that material is recycled.
  production volume 0 kg
    Calculated from production volume of reference product using the relative outputs.
  property water content 0; name water_content
  property price 0 EUR2005; name BP_amount_2_price_EUR2005
  property carbon content, non-fossil 0; name C_content_non_fossil
  property water in wet mass 0 kg; name WWM
  property carbon content, fossil 0; name C_content_fossil
  properties: wet mass 1 kg, dry mass 1 kg
- epoxy resin, liquid: 62.64, 297.36 kg (2 entries); source Hagedorn G. 1991; lognormal variance with pedigree 0.052, pedigree (1,1,5,5,1)
  (same comment as for epoxy resin, liquid)
- waste reinforced concrete: -15639, -165.707, -223195 kg (3 entries)
  Calculated value. A density of 2400kg/m3 is assumed for concrete.
  production volume 7.91907e8 kg
  properties: wet mass 1 kg, water content 0.00585407, dry mass 0.99418 kg
- scrap steel: -16898.6, -21.4099, -52480 kg (3 entries)
  Estimation. It is assumed that 100% of that material is recycled.
  production volume 2.29951e8 kg

## Inputs from nature
- Occupation, traffic area, road network [natural resource, land]: 40000 m2*year; lognormal variance with pedigree 0.052, pedigree (1,1,5,5,1)
  Estimation.
- Occupation, industrial area [natural resource, land]: 4840 m2*year; lognormal variance with pedigree 0.042, pedigree (1,1,5,5,1)
  Estimation.
- Transformation, from pasture, man made [natural resource, land]: 1120 m2; lognormal variance with pedigree 0.052, pedigree (1,1,5,5,1)
  Estimation.
- Transformation, to traffic area, road network [natural resource, land]: 1000 m2; source Suisse-eole 2001; lognormal variance with pedigree 0.052, pedigree (1,1,5,5,1)
  Estimation. Access road.
- Transformation, to industrial area [natural resource, land]: 121 m2; lognormal variance with pedigree 0.042, pedigree (1,1,5,5,1)
  Estimation.

## Sampling procedure
Literature

## Extrapolations
This dataset has been extrapolated from year 2002 to the year of the calculation (2021). The uncertainty has been adjusted accordingly.

## Review by Thomas Nemecek 2005-07-19
Passed.
