# transport, freight train

Dataset: EcoSpold 2, unit process
Geography: AT
Time period: 2000-01-01 to 2021-12-31
Technology level: current
Classification: ISIC rev.4 ecoinvent: 4912:Freight rail transport
Classification: EcoSpold01Categories: transport systems/train
Scenario: Business-as-Usual
System model: Allocation, cut-off by classification
Share of production covered: 100 %
Generated by: Michael Spielmann (obsolete)
Published in: Spielmann M. 2007
Database: ecoinvent
isCopyrightProtected: true
accessRestrictedTo: 1

## General comment
The dataset represents the entire transport life cycle of a freight train in Austria. The data of the energy use and operation emissions are average data for the operation of goods transportation by rail in Austria. They have been determined top down, by combining the total yearly energy consumption and the yearly tkm-performance of goods transportation.

## Included activities start
The dataset starts with the production of a locomotive.

## Included activities end
The dataset ends with the service of transporting 1 ton over a distance of 1 km by a freight train. The dataset includes the production and the maintenance of the locomotive and the goods wagon, the construction of the railway track and the energy use and operation emission of a freight train using diesel and electricity.
The inventory includes as well the actual energy consumption for an average goods train (951Gt) in Austria using electro and diesel energy. In addition the diesel consumption and emissions of shunting processes are accounted for.

## Geography
The data for rail infrastructure reflect Swiss conditions. Data for vehicle manufacturing and maintenance represents generic European data. Data of the energy use and operation emissions refers to average goods transport conditions in Austria, some extrapolation from Switzerland has been made: diesel consumption for shunting, particle matters from abrasion processes

## Technology
Demand factors of various transport components required to fulfill the functional unit of one tkm fright transport are presented. In order to account for the fact that the same rail tracks are used for both passenger and goods transportation are applied allocation factors. The module operation of goods trains comprises both; the actual performance of goods trains as well as required shunting processes. A distinction between the type of traction, diesel and electricity is important since in most European countries diesel and electro locomotives are in operation for both goods transportation and passenger transportation. With the transport performance factors, one may calculate the specific energy consumption per tkm. The typical diesel consumption of 0.68g/tkm for shunting has been added to the specific energy demand (see also version 2 report 16 "Documentation of changes implemented in ecoinvent Data v2.1 and v2.2" (2010) section 7.2.2 "Operation of Goods Trains in selected European countries (Germany, France, Italy, Austria, Belgium)"). Iron emissions to soil are accounted for employing the figure for Swiss operation services. Emission of lubricates due to traction are not accounted for, since measures are in operation to avoid such emissions.

## Time period
Data for emission indices for shunting is based on figures of 1995, specific energy consumption per tkm is from 2007

## Reference product
- transport, freight train: 1 metric ton*km; CPC 6512: Railway transport services of freight; By-product classification allocatable product
  EcoSpold01Location=AT
  production volume 0 metric ton*km
    The production volume of this dataset is set to 0 in order for it not to contribute to the "market for transport, freight, train" and avoid geography overlaps as the European market is represented by the activities "transport, freight train, diesel" and "transport, freight train, electricity".
    Previous comment:
    19840 Mio. tkm in 2007 in Austria
    UIC statistical synopsis 2005 http://www.uic.org/IMG/xls/synth2005-2.xls (Eurostat records 18957 million tkm: Rail freight transport 2005. http://epp.eurostat.ec.europa.eu/cache/ITY_OFFPUB/KS-SF-07-016/EN/KS-SF-07-016-EN.PDF)
  properties: price 0.026 EUR2005

## Inputs from technosphere
All rows: lognormal variance with pedigree 0.04, pedigree (1,1,5,1,1)
- locomotive: 7.11e-10 unit
  EcoSpold01Location=RER
  Calculated value, required to fulfill the functional unit of one tkm fright transport.
- diesel: 0.0013856 kg; source Knörr W. 2000
  Calculated value. The value for diesel represents the sum of diesel required for traction plus the diesel required for shunting (0.68g/tkm). The explanation and source for these data can be found in version 2 report 16 "Documentation of changes implemented in ecoinvent Data v2.1 and v2.2" (2010) section 7.2.2 "Operation of Goods Trains in selected European countries (Germany, France, Italy, Austria, Belgium)".
  properties: heating value, net 42.8 MJ, dry mass 1 kg, wet mass 1 kg, carbon content, fossil 0.865
  note on carbon content, fossil: C-content of diesel is 86.5% (ecoinvent v2.2 report 6_IV, Tab 3.14)
- maintenance, goods wagon: 4.59e-8 unit
  Calculated value, required to fulfill the functional unit of one tkm fright transport.
- railway track: 8.6325e-5 m*year
  EcoSpold01Location=CH
  Calculated value, required to fulfill the functional unit of one tkm fright transport.
- electricity, high voltage: 0.06224 kWh; source UIC 2007
  Literature value from UIC (UIC, 2007). Energy use and operation emissions
- maintenance, locomotive: 7.11e-10 unit
  Calculated value, required to fulfill the functional unit of one tkm fright transport.
- goods wagon: 4.59e-8 unit
  Calculated value, required to fulfill the functional unit of one tkm fright transport.
  EcoSpold01Location=RER

## Emissions to nature
All rows: lognormal variance with pedigree 0.04, pedigree (1,1,5,1,1)
- Particulates, > 2.5 um, and < 10um [air, unspecified]: 6.9451e-6 kg
  Literature value. Particle size distributions of exhaust emissions and exhaust emission factors [g/kg] for diesel locomotives without particle filters from EU-Norm IIIa. Energy use and operation emissions
- Nitrogen oxides [air, unspecified]: 7.6139e-5 kg; source Knörr W. 2000
  Literature value. Figures represent shunting specific emission indices Knörr et al. (2000) and average emission indices for diesel traction J. Borken et al. (2003)
  Energy use and operation emissions
  Further references:
  Borken J., Patyk A. and Reinhardt G. A. (1999) Basisdaten für ökologische Bilanzierungen: Einsatz von Nutzfahrzeugen in Transport, Landwirtschaft und Bergbau. Vieweg, Braunschweig/Wiesbaden
- NMVOC, non-methane volatile organic compounds, unspecified origin [air, unspecified]: 7.0203e-6 kg; source INFRAS 1999
  Literature value. Average emission factors for Swiss heavy good vehicles (HGV) for urban traffic conditions in 2000 derived from INFRAS (1999). the presented figures of NMVOC emissions still contain emissions of Benzene, Toulol and Xylol. Energy use and operation emissions
- Selenium [air, unspecified]: 1.3856e-11 kg; source EEA 2000
  Literature value provided by Expert Panel on Heavy Metals and POPs of the UNECE Task Force on Emission Inventories EEA (2000). However, these emission factors have to be considered as preliminary estimates only. More measurements are needed in order to confirm these values. Energy use and operation emissions
- Iron [soil, unspecified]: 1.7786e-5 kg
  Estimated value. Abrasion (from braking lining, rail and wheel) is predominately composed of iron and mineral components BUWAL (2002). In this study is assumed that all non-airborne emissions are emitted as iron to soil. In consequence, is assumed a yearly load of 191.8 t/a iron emitted to soil. Emission of lubricates due to traction are not accounted for, since measures are in operation to avoid such emissions. Energy use and operation emissions
  Further references:
  BUWAL (2002) PM10-Emissionen des Verkehrs. Statusbericht; Teil Schienenverkehr. 144. Bundesamt fuer Umwelt, Wald und Landschaft, Bern
- Mercury [air, unspecified]: 2.7631e-14 kg; source Jungbluth N. 2003
  Literature value from Jungbluth (2003). Energy use and operation emissions
- Chromium [air, unspecified]: 6.9385e-11 kg; source EEA 2000
  (same comment as for Selenium)
- Nickel [air, unspecified]: 9.7016e-11 kg; source EEA 2000
  (same comment as for Selenium)
- Carbon dioxide, fossil [air, unspecified]: 0.0043596 kg
  Estimated value. In this project CO2 indice is estimated assuming that all carbon in the fuel is transformed completely into CO2. For CO2 is employed an emission index of 73.5 g/MJ or 3146 g/kg.Energy use and operation emissions
- Toluene [air, unspecified]: 5.5467e-8 kg; source INFRAS 1999
  Literature value. Average emission factors for Swiss heavy good vehicles (HGV) for urban traffic conditions in 2000 derived from INFRAS (1999). Energy use and operation emissions
- Particulates, < 2.5 um [air, unspecified]: 1.7777e-6 kg
  (same comment as for Particulates, > 2.5 um, and < 10um)
- Dinitrogen monoxide [air, unspecified]: 1.3856e-7 kg; source INFRAS 1999
  Literature value. Average emission factors for Swiss heavy good vehicles (HGV) for urban traffic conditions in 2000 derived from INFRAS (1999).
  Energy use and operation emissions
- Benzene [air, unspecified]: 1.3856e-7 kg; source INFRAS 1999
  (same comment as for Dinitrogen monoxide)
- Particulates, > 10 um [air, unspecified]: 1.584e-5 kg
  Literature value. Particle size distributions of exhaust emissions and exhaust emission factors [g/kg] for diesel locomotives without particle filters from EU-Norm IIIa. For the determination of PM > 10 is assumed a share of 25 % for wheel and rail abrasion. Energy use and operation emissions
- Ammonia [air, unspecified]: 2.7631e-8 kg; source INFRAS 1999
  (same comment as for Dinitrogen monoxide)
- Xylene [air, unspecified]: 5.5467e-8 kg; source INFRAS 1999
  (same comment as for Toluene)
- Cadmium [air, unspecified]: 1.3856e-11 kg; source EEA 2000
  (same comment as for Selenium)
- Lead [air, unspecified]: 1.5248e-13 kg; source Jungbluth N. 2003
  Literature value from Jungbluth (2003). Energy use and operation emissions
- Copper [air, unspecified]: 2.3538e-9 kg; source EEA 2000
  (same comment as for Selenium)
- Zinc [air, unspecified]: 1.3856e-9 kg; source EEA 2000
  (same comment as for Selenium)
- Methane, fossil [air, unspecified]: 1.8011e-7 kg; source INFRAS 1999
  (same comment as for Dinitrogen monoxide)
- Carbon monoxide, fossil [air, unspecified]: 2.19e-5 kg; source Knörr W. 2000
  Literature value. Figures represent shunting specific emission indices from Knörr et al. (2000).
  Energy use and operation emissions
- Sulfur dioxide [air, unspecified]: 8.3098e-7 kg
  Estimated value.In this project SO2 indice is estimated assuming that all sulphur in the fuel is transformed completely into SO2. In line with assumptions made for road transport is assumed a sulphur content of 300 ppm resulting in a emission index of 0.6 g/kg.
  Energy use and operation emissions
- Sulfur hexafluoride [air, unspecified]: 2.7386e-9 kg; source Frischknecht R. 2003
  Literature value. Due to the fact that on the Swiss rail network only very few diesel locomotives are in operation emissions to air are limited to particulate emissions due to abrasion and emission of sulphur hexafluoride (SF6) occurring during conversion at traction substations. For sulphur hexafluoride (SF6) emitted during conversion at traction substations we assume an emission index of 4.4E-08 kg/kWh Frischknecht (2003) resulting in a specific emission of 3.79E-09 kg/tkm. Energy use and operation emissions

## Sampling procedure
International Railway statistic

## Extrapolations
This dataset has been extrapolated from year 2007 to the year of the calculation (2021). The uncertainty has been adjusted accordingly.

## Review by Christian Bauer 2010-02-07
passed.

## Review by Carl Vadenbo 2012-06-29
In preparation for the release of ecoinvent v3.0, the datasets 'operation, freight train AT'' and 'transport, freight train AT' in ecoinvent v2.2 were merged into the dataset 'transport, freight train, AT 2000-2007'. The amounts of the exchanges were reviewed and were found to correspond to the disaggregated datasets. The uncertainty information need to be revised before subsequent releases of the database. Despite this shortcoming, the new dataset was accepted for inclusion into the ecoinvent database on 2012.07.04.

## Review by Roland Hischier 2011-09-28
Transfer of documentation done.
