# electricity, high voltage, aluminium industry, production mix

Dataset: EcoSpold 2, unit process, production mix
Geography: GLO
Time period: 2021-01-01 to 2021-12-31
Scenario: Business-as-Usual
System model: Allocation, cut-off by classification
Generated by: [System]
Database: ecoinvent
isCopyrightProtected: false
accessRestrictedTo: 1

## Reference product
- electricity, high voltage, aluminium industry: 1 kWh; By-product classification allocatable product; CPC 17100: Electrical energy
  production volume 8.67327e11 kWh

## Inputs from technosphere
- electricity, high voltage, aluminium industry: 0.019024 kWh
  production volume 1.65e10 kWh
  properties: price 0.0977 EUR2005
- electricity, high voltage, aluminium industry: 0.000791649 kWh
  production volume 6.86618e8 kWh
- electricity, high voltage, aluminium industry: 0.0896786 kWh
  production volume 7.77807e10 kWh
- electricity, high voltage, aluminium industry: 8.96786e-6 kWh
  production volume 7.77807e6 kWh
- electricity, high voltage, aluminium industry: 0.0127979 kWh
  production volume 1.11e10 kWh
- electricity, high voltage, aluminium industry: 0.0169935 kWh
  production volume 1.47389e10 kWh
- electricity, high voltage, aluminium industry: 0.0066065 kWh
  production volume 5.73e9 kWh
- electricity, high voltage, aluminium industry: 0.0510642 kWh
  production volume 4.42894e10 kWh
- electricity, high voltage, aluminium industry: 0.00359101 kWh
  production volume 3.11458e9 kWh
- electricity, high voltage, aluminium industry: 0.0102703 kWh
  production volume 8.9077e9 kWh
- electricity, high voltage, aluminium industry: 0.000287281 kWh
  production volume 2.49167e8 kWh
- electricity, high voltage, aluminium industry: 0.02525 kWh
  production volume 2.19e10 kWh
- electricity, high voltage, aluminium industry: 0.00936028 kWh
  production volume 8.11843e9 kWh
- electricity, high voltage, aluminium industry: 0 kWh
- electricity, high voltage, aluminium industry: 0.461187 kWh
  production volume 4e11 kWh
- electricity, high voltage, aluminium industry: 0.051206 kWh
  production volume 4.44123e10 kWh
- electricity, high voltage, aluminium industry: 0.0186981 kWh
  production volume 1.62174e10 kWh
- electricity, high voltage, aluminium industry: 0.00702022 kWh
  production volume 6.08883e9 kWh
- electricity, high voltage, aluminium industry: 0.0668721 kWh
  production volume 5.8e10 kWh
- electricity, high voltage, aluminium industry: 0.0108831 kWh
  production volume 9.43919e9 kWh
- electricity, high voltage, aluminium industry: 0.0555786 kWh
  production volume 4.82048e10 kWh
- electricity, high voltage, aluminium industry: 0.00199921 kWh
  production volume 1.73397e9 kWh
- electricity, high voltage, aluminium industry: 0.0017871 kWh
  production volume 1.55e9 kWh
- electricity, high voltage, aluminium industry: 0.0665625 kWh
  production volume 5.77315e10 kWh
- electricity, high voltage, aluminium industry: 0.00299638 kWh
  production volume 2.59884e9 kWh
- electricity, high voltage, aluminium industry: 0 kWh; source Itten R. 2012; pedigree (1,1,1,1,1)
  Compensation for product loss. Amount based on average losses in countries producing aluminium, weighted by total electricity used for primary aluminium electrolysis, see 'extrapolations'.
- electricity, high voltage, aluminium industry: 0.00863177 kWh
  production volume 7.48657e9 kWh
- electricity, high voltage, aluminium industry: 0.000853692 kWh
  production volume 7.4043e8 kWh
