# glycerin distillate bottom, Recycled Content cut-off

Dataset: EcoSpold 2, unit process
Geography: GLO
Time period: 2021-01-01 to 2021-12-31
Technology level: current
Scenario: Business-as-Usual
System model: Allocation, cut-off by classification
Generated by: [System]
isCopyrightProtected: true
accessRestrictedTo: 1

## Reference product
- glycerin distillate bottom: 1 kg; By-product classification Recyclable; CPC 34659: Fertilizers n.e.c.
  property oxygen content 0.367255
    Oxygen content (on a dry matter basis) of glycerin distillate bottom is calculated from the molecular formula of the substance (here considered K2S1O4).
  property sulfur content 0.184008
    Sulfur content (on a dry matter basis) of glycerin distillate bottom is calculated from the molecular formula of the substance (here considered K2S1O4).
  property potassium content 0.448737
    Potassium content (on a dry matter basis) of glycerin distillate bottom is calculated from the molecular formula of the substance (here considered K2S1O4).
  property carbon content 0
    carbon content on a dry matter basis (reserved; not for manual entry)
  properties: carbon content, fossil 0, water content 0, water in wet mass 0 kg, dry mass 1 kg, wet mass 1 kg, carbon content, non-fossil 0, carbon allocation 0 kg
