# electricity production, hydro, run-of-river

Dataset: EcoSpold 2, unit process
Geography: LV
Time period: 1945-01-01 to 2021-12-31
Technology level: modern
Classification: EcoSpold01Categories: hydro power/power plants
Classification: ISIC rev.4 ecoinvent: 3510:Electric power generation, transmission and distribution
Tags: hydro power
Scenario: Business-as-Usual
System model: Allocation, cut-off by classification
Generated by: Karin Treyer
Published in: Bolliger, R. 2007
Database: ecoinvent
isCopyrightProtected: true
accessRestrictedTo: 1

## General comment
This dataset represents the production of 1 kWh of electricity in a run-of-river power plant unit in Latvia in 2012. Run-of-river power plants are hydro power plants without reservoirs. Depending on the net head of the power plant, high-pressure, medium-pressure and low-pressure systems can be distinguished. Low-pressure power plants including river power stations and canal power plants are very common; therefore these two types of run-of-river power stations are covered in the dataset. To some extent, high-pressure as well as medium-pressure run-of-river systems can be considered as reservoir power stations, e.g. as unit in plant groups that are dominated by storage power plants, but also include alpine run power stations.
LCI data are based on a representative sample of various types of power plants in Switzerland and Austria is taken into account. The calculations are based on the information and data of the following run-of-river power plants: Rupperswil-Auenstein (Baumann 1949), Wildegg-Brugg (NOK 1956), Birsfelden (Aegerter et al. 1954), Donaukraftwerk Greifenstein (Brux 1983; max. Leistung 237 MW) and Rheinkraftwerk Albbruck-Dogern (Radag 1979) as well as the new construction of the power plant Ruppoldingen. The determined specific data was then related to the entire power plant park of Switzerland with an annual net electricity output of 15484 GWh/a (BEW 2001a). Lifetime is assumed to be 80 years for the structural part (including cement, reinforcing steel, diesel, electricity, transportation and explosives) and 40 years for the rest of materials. The data refers to plant construction of a mix of types of dams built between 1945 and the beginning of the 1980s; therefore they might not be representative for more modern construction, for an individual type and for small-scale and smallest-scale plants.
Baumann J. (1949) Kraftwerk Rupperswil-Auenstein. Verlag Kraftwerk
Rupperswil-Auenstein AG, Rupperswil.
Nordostschweizerische Kraftwerke AG (NOK) (1956) Das Kraftwerk
Wildegg-Brugg. In: Schweizerische Bauzeitung, 74 (4), 47-52; 74 (5), 63-67; 74
(6), 83-88; 74 (7), 93-99; 74 (8), 111-116; 74 (10), 145-147; 74 (12), 167-172.
Aegerter A., Dr. Bosshardt O. (1954) Das Kraftwerk Birsfelden. In: Wasser- und
Energiewirtschaft, 46 (5-7), 165-176.
Brux G. (1983) Das Donaukraftwerk Greifenstein. In: Wasser, Energie, Luft, 75
(1-2), 11-13.
Radag A. (1979) 50 Jahre Rheinkraftwerk Albbruck-Dogern Aktiengesellschaft.
Waldshut/Rhein, 1929-1979.
Bundesamt für Energiewirtschaft (2001) Elektrizitatsstatistik 2000. Bern,
Schweiz.
[This dataset is meant to replace the following datasets:]

## Included activities start
From (potential) energy in water, entering the power plant and use of power plant infrastructure.

## Included activities end
The activity ends with 1 kWh of high voltage electricity produced at the power plant and arrived at the busbar.

The datasets includes the use of lubricant oil and the mass of water assing through the turbines.

The dataset doesn´t include detailed specifications about land use due to methodical issues. This information is only included via transformation and occuption of land and calculated with an simplified approach.

## Geography
Data represent the average of a characteristic sample of Swiss run-of-river hydropower plants.

## Technology
Run-of-river power plants are hydro power plants without important reservoirs. Depending on the net head of the power plant, high-pressure, medium-pressure and low-pressure systems can be distinguished. Low-pressure power plants including river power stations and canal power plants are very common; therefore these two types of run-of-river power stations are covered in the dataset. To some extent, high-pressure as well as medium-pressure run-of-river systems can be considered as reservoir power stations, e.g. as unit in plant groups that are dominated by storage power plants, but also include alpine run power stations.
The technology used in the dataset has an overall efficiency of 82%, more modern technologies show an overall efficiency of about 88%. The overall efficiency (current: 0,82; modern: 0,88) is composed of the efficiency of the works water channel (current: 1,00; modern: 1,00), the turbine (current: 0,87; modern: 0,91), the generator (current: 0,96; modern: 0,98) and the transformer (current: 0,98; modern: 0,99). For the calculation of the works water channel of run-of-river plants an efficiency of 100% is assumed.
The efficiency losses in turbines depend on the turbine type (Kaplan, Francis, Pelton, etc.), the turbine output and on the ratio between turbined water amount and the rated water amount. In König, examples for curve progressions of the relationship between these variables are shown. For current power plants an efficiency of 87% is assumed, more modern turbines show an efficiency of about 91%.
The efficiency of generators depends on the output, the rotation speed of the generator and the cooling system. For today’s power plants an efficiency of approximately 96% is assumed, modern generators show an efficiency of about 98%. The efficiency of transformers amounts to 98%, respectively 99%.
References:
König F., von (1985) Bau von Wasserkraftanlagen. C.F. Müller, Karlsruhe.

## Parameters
- losses from gross electricity production: 0.01 dimensionless; name losses_gross_net; lognormal variance with pedigree 0.003225, pedigree (3,3,1,2,1)
  Literature value. Generic value taken from the IEA Electricity information 2014, part I, p. I.7: "The difference between gross and net electricity production is generally observed to be about 7% for conventional thermal stations, 1% for hydro stations and 6% for nuclear."
  IEA/OECD. 2014. Electricity Information 2014. International Energy Agency (IEA), Paris Cedex (FR).
  nan
  Uncertainty: G
- lifetime: 80 year; lognormal variance with pedigree 0.0014, pedigree (2,2,1,3,1)
  Estimation based on experiences.
  nan
- gross electricity production: 3.707e9 kWh; name gross_electricity; lognormal variance with pedigree 0.0019, pedigree (2,2,1,1,2)
  Literature value/statistics, extrapolation. Gross production of grid-connected electricity in run-of-river plants in 2012. The IEA statistics only provide data for production of electricity with hydropower plants in general. The split into reservoir and run-of-river plants was made for all ecoinvent geographies based on Itten et al. 2014. The split of the total worldwide production was then made based on all these ecoinvent geographies.
  IEA. 2014. Electricity Information 2014. ISBN 978-92-64-21692-1. International Energy Agency (IEA), Paris Cedex (FR).
  Itten R., Frischknecht R., Stucki M. 2014. Life Cycle Inventories of Electricity Mixes and Grid. Version 1.3. treeze, Uster, Switzerland
  nan

## Reference product
- electricity, high voltage: 1 kWh; By-product classification allocatable product; CPC 17100: Electrical energy
  production volume 3.66993e9 kWh; name apv_electricity; = gross_electricity*(1-losses_gross_net)
    Assumption. This production volume had to be altered in order to obtain realistic shares of technologies on the Rest-of-World electricity market. By definition, no global electricity market exists in ecoinvent, but only the local electricity markets and the RoW electricity market.
    ORIGINAL STATISTICAL VALUE as described below:
    1227482000000 kWh
    Literature value/statistics. Net production of grid-connected electricity in pumped storage hydropower plants worldwide in 2008, with consideration of 55 countries covering about 90% of the total electricity production worldwide. Itten and Frischknecht (2012) assume a 1% internal consumption for hydropower plants. (Net = gross production minus direct electricity use needed for electricity production at the power plant)
    Compilation of Tab. 3.1 and 3.2
  property price 0.0977 EUR2005
    Temporary price data. Calculated as 90% of purchasers price based on: 94% of the average price (to account for a 6% loss in transformation and transmission) for electricity for industrial consumersin 2005 (excluded taxes). From IEA.

## Inputs from technosphere
- lubricating oil: 7.56e-6 kg; name lubricating_oil; = 0.000009*0.84; source Vögtlin H. J. 2002, p. p.36 in Bolliger et al.; lognormal variance with pedigree 0.25, pedigree (1,1,5,1,5)
  Estimation. A consumption of lubricating oil for turbines of 9 liters per GWh is estimated. With an oil density of 0.84 kg/l this amounts to 0.007 g/kWh. The lubricating oil is in a closed loop system (i.e. cannot get into the turbined water system) and is disposed annualy as waste oil in a hazardous waste treatment plant.
  properties: heating value, net 40.2 MJ, wet mass 1 kg, dry mass 1 kg, carbon content, fossil 0.75
  note on heating value, net: Literature value, Source: IPCC 2006, 2006 IPCC Guidelines for National Greenhouse Gas Inventories, Prepared by the National Greenhouse Gas Inventories Programme, Eggleston H.S., Buendia L., Miwa K., Ngara T. and Tanabe K. (eds). Published: IGES, Japan
  note on carbon content, fossil: Lubricating oil is produced from diesel. C-content/dry mass of fats and oils considered 75%, from: ecoinvent v2.2 report, n 15a, pg 40
- hydropower plant, run-of-river: 8.07285e-13 unit; = 1/(lifetime*15484*1000000); lognormal variance with pedigree 0.082, pedigree (1,1,5,5,1)
  Estimation. Lifetime is assumed to be 80 years (p. 29ff); net production is assumed to be 15484 GWh/a (Tab. 1.1 p. 3).
- waste mineral oil: -7.56e-6 kg; name waste_oil; = (lubricating_oil)*-1; lognormal variance with pedigree 0.132, pedigree (1,1,5,5,1)
  Estimation. The lubricating oil is in a closed loop system (i.e. cannot get into the turbined water system) and is disposed annualy as waste oil in a hazardous waste treatment plant. The information given is based on own assumptions.
  production volume 27744.7 kg; = apv_electricity* waste_oil
    Calculated from the production volume of electricity, high voltage, hydro, run-of-river in proportion to the respective output amounts.
  property price 0 EUR2005; name waste_oil_price_EUR2005
  properties: dry mass 0.9 kg, carbon content, fossil 0.864444, water content 0.111111, wet mass 1 kg, heating value, net 34.7 MJ
  note on carbon content, fossil: Tab A.6, ecoinvent v2.2 report 13_I. C content has been calculated after data in the tables, and then referred to 1 kg DM
  note on heating value, net: Value taken from the general comment of the treatment dataset.
- hydropower plant, run-of-river: 0 unit
  (same comment as for hydropower plant, run-of-river)

## Inputs from nature
- Transformation, to river, artificial [natural resource, land]: 5.57e-5 m2; lognormal variance with pedigree 0.162, pedigree (1,1,5,5,1)
  Estimation. To estimate the area of the water courses (i.e. the section between the water inlet and the weir) the length and average width according to the map is multiplied. As a result an index (approximate value) is calculated where the facts that hydropower plants affect natural habitats and disturb ground water are accounted for. Averaged over the investigated sample and distributed over life time the specific land use amounts to 4,5 10^-3 m2a/kWh, the transformation of land amounts to 5,6 10^-3 m2a/kWh. Thereby major rivers show lower values than small ones.
  Due to the fact that the calculated value represents an index value, it is not a hundred per cent comparable with other information relating to areas. In Switzerland the area before operation of the run-of-river plant is defined as "transformation from pasture" and "transformation from shrub land". This is because of cultivated land reclamation reasons flood protection and drainage measures have been implemented in the past. Due to the fact that it is not allowed fertilizing the area bordering the river, this land is assumed to be shrub land. Thereby, a ratio of 50 % for shrub land and 50 % for pasture is estimated.
  The area after commissioning of the run-of-river plant is defined as "transformation to river, artificial". Land use for the weir and the power station is defined as "transformation to industrial area" at which 1 % of the value is defined for the water course. Land use for access roads can be neglected because most of the power plants are built on developed land.
  It has to be pointed out that run-of-river power plants do not necessarily have a negative impact on the ecological situation (e.g. new construction of the power plant Ruppoldingen).
- Water, turbine use, unspecified natural origin [natural resource, in water]: 45 m3; name water_turbine_use_UNO_input; lognormal variance with pedigree 0.0426, pedigree (1,1,5,5,1)
  Calculated value. With respect to the ecological importance the following has to be considered: the turbined amount of water is via physical laws related to the produced amount of electricity, i.e. the turbined amount of water does not provide independent, ecological relevant information. The specific turbined amount of water (in m3/kWh) represents a value that is inversely proportional to the average net head. However, the turbined amount of water is an ecological relevant measurement in terms of representing the water amount that is in parts detracted from the natural water cycle. With an average ned head of 10 metres the specific turbined water amount accounts for 45 m3/kWh. If this value is extrapolated to the production volumes of the run-of-river power plants in Switzerland, the overall turbined water amount would be 747x10^9 m3/a. Taking the total runoff of 53,5 10^9 m3/a of Switzerland into account the water is turbined 14 times before leaving the land.
  Standard values for resources are assumed.
- Energy, potential (in hydropower reservoir), converted [natural resource, in water]: 3.79 MJ; undefined min 3.79, max 3.79, standardDeviation95 0, pedigree (1,1,3,1,1)
  Reflects range average to best performance.
- Transformation, to industrial area [natural resource, land]: 5.63e-7 m2; lognormal variance with pedigree 0.162, pedigree (1,1,5,5,1)
  (same comment as for Transformation, to river, artificial)
- Transformation, from pasture, man made [natural resource, land]: 2.81e-5 m2; name transformation_pasture; lognormal variance with pedigree 0.162, pedigree (1,1,5,5,1)
  (same comment as for Transformation, to river, artificial)
- Transformation, from shrub land, sclerophyllous [natural resource, land]: 2.81e-5 m2; name transformation_shrub; lognormal variance with pedigree 0.162, pedigree (1,1,5,5,1)
  Estimation. Data are adopted from the Swiss power plant sample as it stands, therefore uncertainty is increased.
  To estimate the area of the water courses (i.e. the section between the water inlet and the weir) the length and average width according to the map is multiplied. As a result an index (approximate value) is calculated where the facts that hydropower plants affect natural habitats and disturb ground water are accounted for. Averaged over the investigated sample and distributed over life time the specific land use amounts to 4,5 10^-3 m2a/kWh, the transformation of land amounts to 5,6 10^-3 m2a/kWh. Thereby major rivers show lower values than small ones.
  Due to the fact that the calculated value represents an index value, it is not a hundred per cent comparable with other information relating to areas. In Switzerland the area before operation of the run-of-river plant is defined as "transformation from pasture" and "transformation from shrub land". This is because of cultivated land reclamation reasons flood protection and drainage measures have been implemented in the past. Due to the fact that it is not allowed fertilizing the area bordering the river, this land is assumed to be shrub land. Thereby, a ratio of 50 % for shrub land and 50 % for pasture is estimated.
  The area after commissioning of the run-of-river plant is defined as "transformation to river, artificial". Land use for the weir and the power station is defined as "transformation to industrial area" at which 1 % of the value is defined for the water course. Land use for access roads can be neglected because most of the power plants are built on developed land.
  It has to be pointed out that run-of-river power plants do not necessarily have a negative impact on the ecological situation (e.g. new construction of the power plant Ruppoldingen).
- Occupation, river, artificial [natural resource, land]: 0.004496 m2*year; = (transformation_pasture+ transformation_shrub)*lifetime; lognormal variance with pedigree 0.082, pedigree (1,1,5,5,1)
  Estimation. Standard values for land use are assumed.

## Emissions to nature
- Water [water, unspecified]: 45 m3; name water_to_water_unspecified; = water_turbine_use_UNO_input; lognormal variance with pedigree 0.130025, pedigree (4,4,5,2,4)
  Calculated value based on literature values and expert opinion. It has been estimated that there is no emission to air. All the turbine water which enters the activity is released back to water.
  property fraction, origin: unspecified 0; name fraction_origin_unspecified
  property fraction, origin: fresh water 1; name fraction_origin_fresh_water
  property fraction, origin: salt water 0; name fraction_origin_salt_water

## Sampling procedure
Sampling procedure based on literature. Some information regarding the results is given without source notes or detailed, comprehensible derivation due to the guaranteed confidential treatment of data.

## Extrapolations
This dataset has been extrapolated from year 2015 to the year of the calculation (2021). The uncertainty has been adjusted accordingly.

## Review by Carl Vadenbo 2015-06-01
The update of the whole electricity sector for the ecoinvent v3.2 database consist of hundreds of datasets. All these datasets have passed through a streamlined review processes where the underlying modelling of production volumes, technology shares and efficiencies was reviewed in detail prior to the datasets being submitted to the database.
