# cement production, blast furnace slag 6-34%

Dataset: EcoSpold 2, unit process
Geography: RoW
Time period: 2016-01-01 to 2021-12-31
Technology level: current
Classification: ISIC rev.4 ecoinvent: 2394:Manufacture of cement, lime and plaster
Synonyms: CP II-E; Composite cement; Blended cement
Scenario: Business-as-Usual
System model: Allocation, cut-off by classification
Generated by: [System]
Published in: Silva, F. B. 2017
Database: ecoinvent
isCopyrightProtected: true
accessRestrictedTo: 1

## General comment
The dataset describes the production of blended Portland cement production with the addition of blast furnace slag in Brazil. There are three types of blended cement in Brazil (CP II) depending on the supplementary cementitious materials (SCM): slag (E), pozzolan (Z) and limestone filler (F). CP II-E has between 6% to 34% of blast furnace slag in mass composition. The three Blended cement types are specified by Brazilian standards (ABNT NBR 11578:1991).
Granulated blast furnace slag is a byproduct of iron production and, when finely ground, it is also a cementing material with hydraulic properties. Slag hydration alone is too slow to give structural properties to cement, but when the slag is combined with Portland cement, the hydration is accelerated due to the extra amount of calcium hydroxide and gypsum. The blast furnace slag is granulated in the iron industry, but usually ground in the cement plant. This extra energy for grinding may be important; however, it is not evaluated due to the lack of specific data of energy consumption per type of cement (electricity consumption in cement plants are informed as a whole).
Six types of Portland and blended cement types represent Brazilian production. The table below presents the different cement types and compositions according to Brazilian standards (NBR 11578:1991, NBR 5735:1991, NBR 5736:1991, NBR 5733:1991).
The CP II cement types are the most consumed cement in Brazil. CP II represents 62.1% of the market according to the National Union of the Cement Industry (SNIC, 2013). Its applications range from reinforced and ordinary concrete to coating mortars. The blast furnace slag in cement gives properties to concrete such as lower hydration heat and protection against sulfate and chloride attack. The CP II-E cement consists of clinker, calcium sulfate, crushed limestone, and 6-34% of blast furnace slag (see composition in the table).
This dataset contains information from clinker stockpile to cement ready to be shipped in bulk. After the clinker is cooled from the rotary kiln, it is ground in ball or roller mills to particles under 75 μm size. Then it goes to silos where it is mixed with calcium sulphate (gypsum) and SCMs. The mixed cement goes to a finishing mill and then it is stored in cement silos, ready to be shipped in bulk or packed.
Primary data were gathered from six cement manufacturers in Brazil, who informed the total values of inputs and outputs related to cement production in 2016, considering all their cement production sites. All types of flows were reported, namely: primary and secondary raw materials and fuels, auxiliary materials, electricity and water consumption. It corresponds to 70% market share, considered a good representativeness level. Although particulate emissions may occur, they are not reported due to lack of specific data for the cement grinding step (air emissions are monitored for the integrated clinker-cement plant as a whole and reported in the clinker production process).

## Included activities start
The activity starts with the reception of raw materials in the cement plant. In plants which are integrated with clinker production, clinker is stored in the silo after cooling in the upstream process (clinker production/BR).

## Included activities end
The activity includes the drying of raw materials, the grinding and mixing of raw materials for cement production in the cement mill (with grinding aids) and ends with cement stored in silos, ready to be shipped. Waste or particulate emission are not considered due to the lack of data. The dataset does not include packaging and administration.

## Geography
This dataset is a copy of the corresponding BR dataset. Uncertainty has been adjusted accordingly.

## Technology
Current technology for cement production in Brazil.

## Time period
Time period corresponds to data collection period (2016).

## Reference product
- cement, blast furnace slag 6-34%: 1 kg; name cement; By-product classification allocatable product; CPC 37440: Portland cement, aluminous cement, slag cement and similar hydraulic cements, except in the form of clinkers; EcoSpold01Categories construction materials/binder
  Cement’s bulk density ranges from 2,8 g/cm³ to 3,2 g/cm³.
  production volume 7.3587e9 kg; name APV_cement
    The global production volume was calculated as follows:
    1) The total production volume of each country was calculated
    2) The production volume was scaled based construction output (*)
    3) The average of the results was assumed to be the GLO PV
    4) The share of each different technology per country was calculated
    5) The weighted average of the shares for each country was used to split the GLO PV into different technologies
    (*)
    Construction output assumed per country
    Country Share
    CO 1%
    PE 0%
    BR 2%
    ZA 1%
    IN 10%
    US 8%
    CA-QC 0%
    CH 0%
    Europe without Switzerland 20%
    Source:
    OECD. 2018. Input-Output Tables. http://www.oecd.org/trade/input-outputtables.htm.
    United Nations Statistics Division. 2019. UN data. A world of information. http://data.un.org/.
    Timmer, M.P., E. Dietzenbacher, B. Los, R. Stehrer, and G.J. de Vries. 2015. An Illustrated User Guide to the World Input-Output Database: the Case of Global Automotive Production. Review of International Economics 23(3): 575-605. http://doi.wiley.com/10.1111/roie.12178.
    The data was adjusted based on PPP, data from:
    The World Bank. 2019. World Bank Open Data. https://data.worldbank.org/
  property price 0.0615 EUR2005
    2005 import and export prices (total trades (USD) divided by total weight (kg) in China, India, USA, Japan, Russia and Europe, major producers and consumers (http://www.cementchina.net/freport/showfre.asp?id=749) from UN Commodity Trade Statistics Database (http://data.un.org/Explorer.aspxDatabase [Accessed 2 July 2010]). Commodity: Cement (portland, aluminious, slag or hydraulic)
  property carbon content 0
    carbon content on a dry matter basis (reserved; not for manual entry)
  properties: carbon content, fossil 0, water in wet mass 0 kg, carbon content, non-fossil 0, water content 0, dry mass 1 kg, wet mass 1 kg, carbon allocation 0 kg

## Inputs from technosphere
- synthetic rubber: 8.8e-6 kg; name rubber; lognormal variance with pedigree 0.6707, pedigree (2,2,3,5,1)
  Measured value. Weighted average of values informed by manufacturers. Replacement of wearing parts of process equipment.
  Uncertainty: B
  properties: wet mass 1 kg, dry mass 1 kg, carbon content, fossil 0.871949, heating value, net 26.42 MJ
  note on carbon content, fossil: EPDM (Ethylene-propene-diene terpolymer) rubber is a terpolymer of ethylene, propene, and a diene with the residual unsaturated portion of the diene in the side chain (ecoinvent v2.2 report 7-part XX & Ullmann). Chemical formula (deduced from Evidences of Solvent-Induced Miscibility in Polychloroprene-co-Ethylene-Propene Diene Terpolymer Blends, Dubey et al., Journal of Applied Polymer Science, 2009, 111:1884-1891): C20H35
- cement factory: 2.73e-11 unit; source Kellenberger D. 2007; lognormal variance with pedigree 0.32, pedigree (3,5,4,5,1)
  Literature value from the dataset cement production, Portland /CH (accessed 20170810)
  Uncertainty: V
- scrap steel: 0 kg; pedigree (1,1,1,1,1)
  Estimation based on corresponding input.
  Uncertainty: B
  production volume 0 kg
    Calculated from production volume of reference product using the relative outputs.
  properties: carbon content, fossil 0.005, dry mass 1 kg, wet mass 1 kg
- waste rubber, unspecified: 0 kg; pedigree (1,1,1,1,1)
  Estimation based on corresponding input.
  Uncertainty: B
  production volume 0 kg
    Calculated from production volume of reference product using the relative outputs.
  properties: carbon content, fossil 0.853, dry mass 1 kg, heating value, net 27.19 MJ, wet mass 1 kg
  note on heating value, net: Value taken from the general comment of the treatment dataset.
- granulated blast furnace slag: 0.22 kg; name GBFS; lognormal variance with pedigree 0.056, pedigree (3,1,3,5,1)
  Measured value. Weighted average of values informed by manufacturers. Raw material for cement production.
  In Brazil, around 70% of the blast furnace slag used in cement making is ground along with clinker in the cement plant, not in the steel making plant. The energy for grinding is declared in the cement dataset (average aggregate data for all cement types).
  Uncertainty: B
  property carbon content, fossil 0; name GBFS_C_content_fossil
  property carbon content, non-fossil 0; name GBFS_C_content_non_fossil
  properties: dry mass 1 kg, wet mass 1 kg
- lubricating oil: 5.5e-6 kg; name oil; lognormal variance with pedigree 0.5057, pedigree (2,2,3,5,1)
  Measured value. Weighted average of values informed by manufacturers. Maintenance of process equipment.
  Uncertainty: B
  properties: heating value, net 40.2 MJ, wet mass 1 kg, carbon content, fossil 0.75, dry mass 1 kg
  note on heating value, net: Literature value, Source: IPCC 2006, 2006 IPCC Guidelines for National Greenhouse Gas Inventories, Prepared by the National Greenhouse Gas Inventories Programme, Eggleston H.S., Buendia L., Miwa K., Ngara T. and Tanabe K. (eds). Published: IGES, Japan
  note on carbon content, fossil: Lubricating oil is produced from diesel. C-content/dry mass of fats and oils considered 75%, from: ecoinvent v2.2 report, n 15a, pg 40
- waste mineral oil: 0 kg; pedigree (1,1,1,1,1)
  Estimation based on corresponding input.
  Uncertainty: B
  production volume 0 kg
    Calculated from production volume of reference product using the relative outputs.
  properties: heating value, net 34.7 MJ, carbon content, fossil 0.864444, water content 0.111111, dry mass 0.9 kg, wet mass 1 kg
  note on carbon content, fossil: Tab A.6, ecoinvent v2.2 report 13_I. C content has been calculated after data in the tables, and then referred to 1 kg DM
- clinker: 0 kg; pedigree (1,1,1,1,1)
  Measured value. Weighted average of values informed by manufacturers. Raw material for cement production.
  Uncertainty: B
  properties: dry mass 1 kg, wet mass 1 kg
- gypsum, mineral: 0 kg; pedigree (1,1,1,1,1)
  Measured value. Weighted average of values informed by manufacturers. 0,03 kg is mineral gypsum (primary raw material) and 0,02 kg is phosphogypsum (secondary raw material, by-product of phosphoric acid production); "gypsum, mineral" is used as proxy because phosphogypsum was not available in the ecoinvent database during dataset development.
  Uncertainty: B
  properties: dry mass 1 kg, wet mass 1 kg
- wastewater, average: 0 m3; name wastewater; pedigree (1,1,1,1,1)
  Estimation. Calculated as: (tap_water/1000)* cement. All tap water was considered to leave the process as an effluent.
  Uncertainty: B
  production volume 0 m3
    Calculated from production volume of reference product using the relative outputs.
  property price 0 EUR2005; name wastewater_price_EUR2005
  properties: carbon content, non-fossil 0.194039, dry mass 0.346837 kg, wet mass 1000 kg, water content 2882.2
  note on carbon content, non-fossil: 0.0673 kg TOC/m3 (Tab A.17, ecoinvent v2.2 report 13_I). TOC was considered as Total Carbon.
- heat, district or industrial, natural gas: 0 MJ; pedigree (1,1,1,1,1)
  Measured value. Weighted average of values informed by manufacturers. Heat for drying of raw materials.
  Uncertainty: B
  properties: heating value, net 1 MJ
- heat, district or industrial, other than natural gas: 0 MJ; pedigree (1,1,1,1,1)
  (same comment as for heat, district or industrial, natural gas)
  properties: heating value, net 1 MJ, corresponding fuel use, propane, furnace >100kW 1.05263 MJ
  note on corresponding fuel use, propane, furnace >100kW: Lower heating value of the fuel input related to the heat/electricity output, taken directly from ecoinvent v3.0 dataset "heat production, natural gas, at industrial furnace >100kW, GLO 2000".
- electricity, medium voltage: 0 kWh; pedigree (1,1,1,1,1)
  Measured value. Weighted average of values informed by manufacturers. Electricity for grinding and factory operation.
  Uncertainty: B
- water, harvested from rainwater: 0.00397 kg; name rainwater_input; lognormal variance with pedigree 1.6337, pedigree (2,2,3,5,1)
  Measured value. Weighted average of values informed by manufacturers. Water for equipment cooling and dust control.
  Uncertainty: B
  properties: carbon content, fossil 0.0017899, wet mass 1 kg, dry mass 0.00034 kg, water content 2940.2
- limestone, crushed, for mill: 0 kg; name limestone; pedigree (1,1,1,1,1)
  (same comment as for clinker)
  properties: carbon content, fossil 0.117492, wet mass 1 kg, dry mass 1 kg
- tap water: 0 kg; name tap_water; pedigree (1,1,1,1,1)
  Measured value. Weighted average of values informed by manufacturers. Water for sanitary purposes.
  Uncertainty: B
  properties: carbon content, fossil 0.00178991, dry mass 0.000337476 kg, water content 2962.17, wet mass 1 kg
  note on carbon content, fossil: Bicarbonate content is 2.93 mol/m3. CO2 content is 0.1 mol/m3 (ecoinvent v2.2 report 8, Tab 93.1).
- steel, low-alloyed: 7.1e-5 kg; name steel; lognormal variance with pedigree 0.4097, pedigree (2,2,3,5,1)
  (same comment as for synthetic rubber)
  property carbon content, fossil 0.005; name cc_steel
  properties: dry mass 1 kg, wet mass 1 kg
- diethylene glycol: 0.00037 kg; lognormal variance with pedigree 1.2567, pedigree (2,2,3,5,1)
  Measured value. Weighted average of values informed by manufacturers. Grinding aid for cement production.
  Uncertainty: B
  properties: heating value, net 25.14 MJ, wet mass 1 kg, carbon content, fossil 0.45283, dry mass 1 kg
- scrap steel: -8.98406e-8, -7.09102e-5 kg (2 entries); lognormal variance with pedigree 0.4097, pedigree (2,2,3,5,1)
  Estimation based on corresponding input.
  Uncertainty: B
  production volume 522468 kg
- waste rubber, unspecified: -3.54539e-7, -8.44546e-6 kg (2 entries); lognormal variance with pedigree 0.6707, pedigree (2,2,3,5,1)
  Estimation based on corresponding input.
  Uncertainty: B
  production volume 64756.5 kg
- waste mineral oil: -1.32869e-7, -5.36713e-6 kg (2 entries); lognormal variance with pedigree 0.5057, pedigree (2,2,3,5,1)
  Estimation based on corresponding input.
  Uncertainty: B
  production volume 40472.8 kg
- clinker: 0.12948, 0.00197436, 0.00632611, 0.121009, 0.00485372, 0.00810982, 0.388247 kg (7 entries); lognormal variance with pedigree 0.0097, pedigree (2,2,3,5,1)
  (same comment as for clinker)
- gypsum, mineral: 0.0377244, 0.00380286, 0.00847277 kg (3 entries); lognormal variance with pedigree 0.0667, pedigree (2,2,3,5,1)
  (same comment as for gypsum, mineral)
- wastewater, average: -1.4155e-7, -1.30845e-6 m3 (2 entries); lognormal variance with pedigree 0.6827, pedigree (2,2,3,5,1)
  (same comment as for wastewater, average)
  production volume 10670.1 m3
- heat, district or industrial, natural gas: 0.000201345, 0.00482865 MJ (2 entries); lognormal variance with pedigree 3.1017, pedigree (2,2,3,5,1)
  (same comment as for heat, district or industrial, natural gas)
- heat, district or industrial, other than natural gas: 0.000251442, 0.0152486 MJ (2 entries); lognormal variance with pedigree 2.2267, pedigree (2,2,3,5,1)
  (same comment as for heat, district or industrial, natural gas)
- electricity, medium voltage: 0.000554484, 0.000106326, 0.00244141, 0.00178499, 0.0259611, 0.0082293, 0.0119223 kWh (7 entries); lognormal variance with pedigree 0.0257, pedigree (2,2,3,5,1)
  (same comment as for electricity, medium voltage)
- limestone, crushed, for mill: 0.0476729, 0.0223271 kg (2 entries); lognormal variance with pedigree 0.0297, pedigree (2,2,3,5,1)
  (same comment as for clinker)
- tap water: 1.64493e-6, 2.71852e-6, 6.85504e-5, 1.78332e-6, 5.07263e-6, 0.000585773, 0.000784457 kg (7 entries); lognormal variance with pedigree 0.6827, pedigree (2,2,3,5,1)
  (same comment as for tap water)

## Inputs from nature
- Water, unspecified natural origin [natural resource, in water]: 2.03e-6 m3; lognormal variance with pedigree 1.7207, pedigree (2,2,3,5,1)
  (same comment as for water, harvested from rainwater)
- Water, well, in ground [natural resource, in water]: 5.65e-5 m3; name water_well_input; lognormal variance with pedigree 0.4187, pedigree (2,2,3,5,1)
  (same comment as for water, harvested from rainwater)
- Water, river [natural resource, in water]: 0.000124 m3; name water_river_input; lognormal variance with pedigree 0.2787, pedigree (2,2,3,5,1)
  (same comment as for water, harvested from rainwater)

## Emissions to nature
- Water [air, unspecified]: 0.000187 m3; lognormal variance with pedigree 0.1107, pedigree (2,2,3,5,1)
  Estimation. Calculated as: ( water_unsp_input+ water_well_input+ water_river_input+ (rainwater_input/1000))*cement. All water input except for tap water was considered to leave the system as evaporated water, as water is used for cooling and dust control.
  Uncertainty: B

## Sampling procedure
Data represent circa 70% of the Brazilian cement production in 2016, which is considered a good representativeness level. Data were provided by six cement manufacturers, via confidential questionnaires, regarding the production of cement during the year of 2016.
Raw materials flows are the weighted average of the cement composition informed by each cement manufacturer. The weighing factor used is the total cement production volume, since manufacturers did not report the production volumes of each cement type due to confidentiality. Basic uncertainty was calculated based on the sample"s weighted standard deviation and represents variation of composition between manufacturers/factories.
For other input flows (grinding aids, materials for equipment maintenance, fuels, electricity, water consumption), the weighted average of each manufacturer"s unit flows was calculated. Except for the grinding aids, all other flows are not distinguished by cement type, as their consumption is reported for the whole cement plant, which usually produces more than one cement type.
Water consumption was usually reported for the whole integrated cement plants (clinker + cement production operations). Based on literature and expert opinion, the total water volume was divided equally between the clinker and the cement production processes and then converted into unit flows.
Raw materials and fuel inputs were considered to be dry. As water is mainly used for cooling and dust control, it was considered that all water evaporates, except for the "tap water" input, which was considered to be used as drinking water and whose output is modelled as an effluent.
Fuel consumption was informed by manufacturers in terms of volume or mass. They were converted into energy using their lower heating values and modelled as a heat input, to simplify the dataset and allow the consideration of corresponding air emissions.
Infrastructure input flow (cement factory) was extrapolated from "cement Portland/CH" dataset (accessed 08.10.2017).
The amounts of the exchanges were calculated considering the weighted average of the sample. No conversion to the geometric mean of the lognormal distribution was done, for consistency reasons with other ecoinvent datasets.

## Extrapolations
This dataset is created as copy of the corresponding regional BR dataset. The production volume is set equal to the regional activity to avoid the creation of the RoW.
