# perfluoropentane production

Dataset: EcoSpold 2, unit process
Geography: GLO
Time period: 2008-01-01 to 2021-12-31
Technology level: current
Classification: EcoSpold01Categories: chemicals/organics
Classification: ISIC rev.4 ecoinvent: 2011:Manufacture of basic chemicals
Synonyms: Flutec PP50; Perfluoro-n-pentane; Dodecafluoropentane; Perflenapent
Scenario: Business-as-Usual
System model: Allocation, cut-off by classification
Generated by: [System]
Database: ecoinvent
isCopyrightProtected: true
accessRestrictedTo: 1

## General comment
This is a proxy dataset for the production of perfluoropentane (C5F12). Perfluoropentane is used e.g. in medicinal processes and as a working fluid e.g. in an organic rankine cycle unit. This dataset has a high uncertainty and has to be set up from scratch for better quality.

## Included activities start
This dataset is a first proxy for the production of perfluoropentane, but has to be revised by specialists.

## Included activities end
This dataset doesn't include any specifications, but only a proxy chemical as input.

## Reference product
- perfluoropentane: 1 kg; By-product classification allocatable product; CPC 34: Basic chemicals; CAS 678-26-2
  production volume 100000 kg
    Proxy - This value is not a true value and therefore has no correlation with reality. It should be adapted when working on this dataset.
  property heating value, net 6.32 MJ
    LHV is calculated based on the elemental composition of the substance. Based on the CAS number of the substance (000678-26-2), the chemical formula of the substance is found to be: C5F12, (PubChem 2020).
    Reference: Kim, S., Chen, J., Cheng, T., Gindulyte, A., He, J., He, S., Li, Q., Shoemaker, B. A., Thiessen, P. A., Yu, B., Zaslavsky, L., Zhang, J., & Bolton, E. E. (2019). PubChem 2019 update: improved access to chemical data. Nucleic acids research, 47(D1), D1102–D1109. https://doi.org/10.1093/nar/gky1033
  property price 5 EUR2005
    Calculated based on inputs: The price of the product has been calculated as a sum of the values of the material and energy inputs for this product. This value is therefore a rough estimation. It may underestimate the real price since there are additional expenses when producing any product. These expences can include for example labour costs, treatment of waste materials and profit for the producer. Please consider carefully whether this level of data quality is acceptable for your application.
  property carbon content 0.0953262
    carbon content on a dry matter basis (reserved; not for manual entry)
  properties: carbon content, non-fossil 0, water content 0, dry mass 1 kg, wet mass 1 kg, carbon content, fossil 0.0953262, water in wet mass 0 kg, carbon allocation 0.0953262 kg

## Inputs from technosphere
- refrigerant R134a: 1 kg; lognormal variance with pedigree 0.31, pedigree (5,5,5,5,5)
  Proxy - This input is only a proxy for the whole production process of perfluoropentane.
  Uncertainty: This input is only a proxy for the whole production process of perfluoropentane. The whole dataset therefore has to be seen as very uncertain, pedigree matrix inputs are left at "5".
  properties: wet mass 1 kg, heating value, net 9.51 MJ, carbon content, fossil 0.235294, dry mass 1 kg

## Extrapolations
This dataset has been extrapolated from year 2008 to the year of the calculation (2021). The uncertainty has been adjusted accordingly.

## Review by Bo Weidema 2012-01-11
This dataset has only been reviewed by two editors.
