# electricity production, hard coal

Dataset: EcoSpold 2, unit process
Geography: CO
Time period: 2014-01-01 to 2021-12-31
Technology level: modern
Classification: EcoSpold01Categories: hard coal/power plants
Classification: ISIC rev.4 ecoinvent: 3510:Electric power generation, transmission and distribution
Synonyms: other bituminous coal; anthracite; coking coal
Tags: coal power; fossil fuels; hard coal power
Scenario: Business-as-Usual
System model: Allocation, cut-off by classification
Share of production covered: 58.8 %
Generated by: Germán Santa María Restrepo
Published in: Suppen, N. 2017
Database: ecoinvent
isCopyrightProtected: true
accessRestrictedTo: 1

## General comment
This dataset represents the production of high voltage electricity in an average hard coal power plant in Colombia in 2014. "Hard coal" includes anthracite, coking coal and other bituminous coal according to the definition of the IEA electricity information 2014. This dataset was created from the "electricity production, hard coal, GLO" dataset retrieved on November 20 of 2017. Some of the exchanges and parameters were regionalized with data from Colombian hard coal power plants, including: efficiency, total net electricity production, carbon dioxide fossil, methane fossil, dinitrogen monoxide, nitrogen oxide, PM>10 and sulfur dioxide.
Comments on the inventory data of emissions:
- The size distribution of particle emissions has been derived from German data.
- Halogene emissions have been estimated on the basis of the content of the species in the country-specific coal input mix, assuming average retention rates.
- For CO and particle emissions average values for the former UCTE are included (Union for the Coordination of the Transmission of Electricity, since 2009 replaced by ENTSO-E European Network of Transmission System Operators for Electricity).
- Emissions of trace elements were calculated by means of a formula (CORINAIR) using the ash content in the country-specific coal input mix and average transfer coefficients for coal power plants, taking into account the share of DeSOx installed.
- Emission of uranium and thorium radioactive isotopes were assumed proportional to the corresponding element emitted with particles; the other non-gaseous radioactive isotopes of the uranium and thorium decay chain were assumed proportional to the emitted U-238 or Th-232.
- The emission of gaseous radon and K-40 are taken from the literature.
IEA. 2014. Electricity Information 2014. ISBN 978-92-64-21692-1. International Energy Agency (IEA), Paris Cedex (FR)
European Environment Agency (1991) CORINAIR Inventory; VOC"s Default Emission Factors

## Included activities start
From the constructed hard coal power plant ready to produce electricity.
From reception of hard coal and operating materials at power plant gate.

## Included activities end
This activity ends with 1kWh of high voltage electricity produced at the power plant and arrived at the busbar.

This dataset includes:
- all operation and maintenance activities and materials of the power plants.
- Use of fuel oil for startup
- Particle removal (dedusting of the flue gas)

- Desulfurisation and denitrification. These processes are described in separate modules; it can be decided by changing the values of NOx and SOx retained whether and how much DeNOx and DeSOx are installed.
- Cooling: It is assumed that all plants use wet cooling with a cooling tower. No cooling tower is included in this dataset (will be implemented in future versions)
- Loss of feed water

This dataset doesn"t include
- raw materials extraction, decommissioning and waste treatment as these activities are already included in the infrastructure datasets
- transformation of the electricity produced
- The disposal of non-recycled ashes is modelled separately.

## Geography
This dataset is based on the GLO dataset with adjustments to the regional context with data from hard coal power plants in Colombia.

## Technology
POWER PLANT:
All hard coal power plants in Colombia are modeled as 100MWe power plants (representing all power plants with a capacity <250MW).The plants are used for middle load with 4000 hours of operation at full capacity per year. The plants are assumed to operate 150000 hours during its lifetime. Hard coal electricity power plants in Colombia account for 8% of the installed capacity in the supply mix, and most of them were installed before 1985.
OTHER DATA:
- Share of installed capacity with desulfurisation 2% (rough estimation based on sulfur mass balance
- Average efficiency of desulfurisation installations: 92% (rough estimation based on Dones et al. 27
- Share of installed capacity with denitrification (primary and/or secondary installations): 73% (figure based on IEA 212 )
- Average efficiency of denitrification installations: 8% (estimation based on Dones et al. 27, p.128. Valid for selective catalytic reaction systems)
- Share of installed capacity with particle filters: 98% (figure based on IEA 212 )
- Average efficiency of particle filters: 98% (figure based on IEA 212 )
- IEA 2012. Coal Power Database. International Energy Agency Clean Coal Centre, London
- IEA/OECD. 2010. Electricity Information 2010. International Energy Agency (IEA), Paris Cedex (FR). Part IV. Detailed OECD Electricity And Heat Data.
- Dones, R., Bauer, C., Röder, A. (2007) Kohle. In: Dones, R. (Ed.) et al., Sachbilanzen von Energiesystemen: Grundlagen für den ökologischen Vergleich von Energiesystemen und den Einbezug von Energiesystemen in Ökobilanzen für die Schweiz. Final report ecoinvent No.

## Time period
The Annual Production Volume is valid for the year 2014.
The time period is set to the year 2017 as the data were collected in the year 2017.

## Parameters
- total net electricity: 5.7474e9 kWh; name totalElectricity; = 6.18*10^9*(1-0.07); lognormal variance with pedigree 0.0012, pedigree (2,1,1,1,1)
  IEA Electricity information 2018, table 1.3 reports a gross electricity production of 6.18*10^9 kWh for the yera 2016. The averaage gross to net loss factor suggested by IEA is 7%, resulting in an annual net electricity production from hard coal in Colombia of 5.7474*10^9 kWh.
  IEA. 2018. Electricity Information 2018. ISBN 978-92-64-30120-7.
  International Energy Agency (IEA), Paris Cedex (FR),
- water consumption, electricity production from hard coal, recirculating CS: 0.0018 m3/kWh; name WConsumption_EP_HC_recirculatingCS; lognormal variance with pedigree 0.092025, pedigree (4,4,3,2,4)
  Estimated based on literature (Scown, 2011, Water Footprint of U.S. Transportation Fuels, SI). The amount of water consumed while burning lignite and peat is assumed to be the same as in case of coal.
  nan
- recirculating cooling system as a fraction of all cooling systems: 0.375 dimensionless; name recirculating_CS_fraction_from_allCS; lognormal variance with pedigree 0.092025, pedigree (4,4,3,2,4)
  Calculated as an average of data available for Europe (Floerke, 2008, Future changes of freshwater needs in the electricity production sector) and USA (NERL, 2011, Estimating freshwater needs to meet future thermoelectric generation requirements).
  nan
- factor: input of MJ for the production of 1 kWh: 11.3999 MJ/kWh; name factor_MJ_kWh; = 1*3.6/efficiency; undefined min 11.1801, max 11.1801, standardDeviation95 0, pedigree (1,1,1,1,1)
  Calculated value. 3.6 MJ = 1kWh.
  nan
- losses from gross electricity production: 0 dimensionless; name gross_net_electricity
- water consumption, electricity production from hard coal, once-through and cooli: 0.0014 m3/kWh; name WConsumption_EP_HC_once_through_andCP_CS; lognormal variance with pedigree 0.092025, pedigree (4,4,3,2,4)
  (same comment as for water consumption, electricity production from hard coal, recirculatin)
- fraction, process water, to air: 0.15 dimensionless; name fraction_PW_to_air; lognormal variance with pedigree 0.092025, pedigree (4,4,3,2,4)
  Literature value. In case when no industry/process specific data are available, default evaporation fraction value is used. This value is 15% and is based on literature (Statistics Canada, 2007 & Shaffer, K.H., 2008, Consumptive water use in the Great Lakes Basin, USGS & Shiklomanov, 2003, World Water Resources at the Beginning of the 21st Century) and has been approved by an expert.
  nan
- efficiency: 0.315791 dimensionless; = totalElectricity/(65.52/3.6*10^9); lognormal variance with pedigree 0.0013, pedigree (2,2,1,1,1)
  IEA Electricity Information 2018, table 1.5 shows a fuel input for hard coal power plants in Colombia of 65.52 PJ (net calorific value) in 2016.
  IEA. 2018. Electricity Information 2018. ISBN 978-92-64-30120-7.
  International Energy Agency (IEA), Paris Cedex (FR),
- fraction, water, decarbonised, to air: 0.0299662 dimensionless; name fraction_WDC_to_air; = fraction_CW_to_air; lognormal variance with pedigree 0.092025, pedigree (4,4,3,2,4)
  Calculated value. See comments in the other parametres present in this dataset. Decarbonised water is considered to be always used as cooling water, thus cooling water fractions to air are applied to all carbonised water input flows to calculate the amount of water consumed in the processes.
  nan
- fraction, cooling water, to air: 0.0299662 dimensionless; name fraction_CW_to_air; = (WConsumption_EP_HC_recirculatingCS*recirculating_CS_fraction_from_allCS+WConsumption_EP_HC_once_through_andCP_CS*once_through_andCP_CS_fractio_from_allCS)/(WWithdrawal_EP_HC_recirculating_CS*recirculating_CS_fraction_from_allCS+WWithdrawal_EP_HC_once_through_andCP_CS*once_through_andCP_CS_fractio_from_allCS); lognormal variance with pedigree 0.092025, pedigree (4,4,3,2,4)
  Calculated
  nan
- water withdrawal, electricity production from hard coal, once-through and coolin: 0.0815 m3/kWh; name WWithdrawal_EP_HC_once_through_andCP_CS; lognormal variance with pedigree 0.092025, pedigree (4,4,3,2,4)
  Estimated based on literature (Scown, 2011, Water Footprint of U.S. Transportation Fuels, SI). The amount of water withdrawn while burning lignite and peat is assumed to be the same as in case of coal.
  nan
- water withdrawal, electricity production from hard coal, recirculating CS: 0.0021 m3/kWh; name WWithdrawal_EP_HC_recirculating_CS; lognormal variance with pedigree 0.092025, pedigree (4,4,3,2,4)
  (same comment as for water withdrawal, electricity production from hard coal, once-through )
- once-through and cooling pond cooling systems as a fraction of all cooling syste: 0.625 dimensionless; name once_through_andCP_CS_fractio_from_allCS; lognormal variance with pedigree 0.092025, pedigree (4,4,3,2,4)
  (same comment as for recirculating cooling system as a fraction of all cooling systems)
- fraction, water, completely softened, to air: 0.15 dimensionless; name fraction_WCS_to_air; = fraction_PW_to_air; lognormal variance with pedigree 0.092025, pedigree (4,4,3,2,4)
  Calculated value. See comment in the other parametres present in this dataset. Water, completely softened is considered to be always used as process water, thus process water fractions to air are applied to all water, completely softened input flows to calculate the amount of water consumed in the processes.
  nan

## Reference product
- electricity, high voltage: 1 kWh; name electricity; By-product classification allocatable product; CPC 17100: Electrical energy
  production volume 5.7474e9 kWh; name electricity_apv; = totalElectricity
    (same comment as for total net electricity)
  property price 0.0977 EUR2005
    Temporary price data. Calculated as 90% of purchasers price based on: 94% of the average price (to account for a 6% loss in transformation and transmission) for electricity for industrial consumersin 2005 (excluded taxes). From IEA.

## Inputs from technosphere
- water, completely softened: 0.0683996 kg; name water_completely_softened; = factor_MJ_kWh*0.006; lognormal variance with pedigree 0.054, pedigree (4,5,4,5,3)
  Literature value/calculated value. Feed water for the steam circuit lost when producing 1kWh of electricity from hard coal, based on the value for burning 1MJ of hard coal. Röder et al. 2007, Tab. 9.65 and Tab. 9.66, p. 160f.
  properties: wet mass 1 kg
- NOx retained, by selective catalytic reduction: 0.00073 kg; name nox_retained; lognormal variance with pedigree 0.093, pedigree (4,4,5,5,4)
  Calculated value. Weighted average from all figures from countries in ecoinvent version 2 (AT, BE, BR, CN, CZ, DE, DK, ES, FI, FR, GB, ES, FI, FR, GB, HR, HU, IE, IT, JP, NL, NO, PL, PT, RO, SE, SI, SK) and the new countries for version 3.0 (AU, CA regions, CL, IN, KR, MX, MY, PE, RU, TH, TR, TW, TZ, UA, US regions, ZA). Weighting was made with net electricity production 2008 in these countries (Itten&Frischknecht 2012).
  The v2 countries BA and BG were not included in the calculation of the GLO average as they inherit all GLO values at the moment.
  properties: dry mass 1 kg, wet mass 1 kg
- light fuel oil: 0.000193799 kg; name light_fuel_oil; = factor_MJ_kWh*0.000017; lognormal variance with pedigree 0.024, pedigree (3,4,4,5,1)
  Literature value/calculated value. Light fuel oil use per 1MJ of hard coal burned, use for start-up of the power plant after shut down. Weighted average with electricity production data (Itten&Frischknecht 2012) and ight fuel oil use values of 14 countries
  (AT, BE, ES, FR, IT, NL, PT, DE, CZ, HR, PL, SK, CN, US) (Röder et al. 2007)
  Country values are typical values for hard coal plants.
  Source:
  Itten R. and Frischknecht R. (2012) Life Cycle Inventories of Electricity Mixes and Grid. ESU-services Ltd., Uster, Switzerland.
  properties: carbon content, fossil 0.862, dry mass 1 kg, heating value, net 42.6 MJ, wet mass 1 kg
- residue from cooling tower: -6.26997e-5 kg; name amount_residue; = (factor_MJ_kWh*0.000005*1.1)*-1; lognormal variance with pedigree 0.0812, pedigree (5,3,4,5,2)
  Literature value/calculated value. Amount of cooling tower needed for producing 1kWh of electricity from hard coal, based on the value for burning 1MJ of hard coal. Weighted average with electricity production data (Itten&Frischknecht 2012) and values of 14 countries
  (AT, BE, ES, FR, IT, NL, PT, DE, CZ, HR, PL, SK, CN, US) (Röder et al. 2007) .
  Country values calculated from mass balance.
  Source:
  Itten R. and Frischknecht R. (2012) Life Cycle Inventories of Electricity Mixes and Grid. ESU-services Ltd., Uster, Switzerland.
  production volume 360360 kg; = amount_residue/electricity*electricity_apv
    Calculated from the production volume of hard coal, burned in power plant in proportion to the respective output amounts.
  property price 0 EUR2005; name amount_residue_price_EUR2005
  properties: dry mass 0.7 kg, wet mass 1 kg, carbon content, fossil 0.0544233, water content 0.428571
- hard coal power plant: 1.33333e-11 unit; name hard_coal_power_plant; = 1/ (150000*500*1000); source Röder, A. 2007; lognormal variance with pedigree 0.3686, pedigree (5,3,4,5,3)
  Calculated value. At the moment, the hard coal power plant input consists of a market mix of a 100MWe power plant and a 500MWe power plant
  .
  For this calculation, 4000 load hours per year are assumed. It is assumed that a total of 150"000h is reached during the lifetime. A capacity of 500MW is taken for the calculation.
- hard coal ash: -0.0852715 kg; name amount_ash; = (factor_MJ_kWh*0.00748)*-1; lognormal variance with pedigree 0.0986, pedigree (5,3,4,5,3)
  Literature value/calculated value. Hard coal ash produced when producing 1kWh of electricity from hard coal, based on the value for burning 1MJ of hard coal. Weighted average with electricity production data (Itten&Frischknecht 2012) and values of 12 countries
  (AT, BE, ES, FR, IT, NL, PT, DE, CZ, HR, PL, SK). These values were valid for the ash being disposed off. Now, total amount of ash has been calculated (disposed+recycled) with the data in Tab. 9.69 p. 165 in Röder et al. 2007. Globally, 74% of the lignite ash are recycled, 26% go to disposal.
  Source:
  Itten R. and Frischknecht R. (2012) Life Cycle Inventories of Electricity Mixes and Grid. ESU-services Ltd., Uster, Switzerland.
  production volume 4.9009e8 kg; = amount_ash/electricity*electricity_apv
    (same comment as for residue from cooling tower)
  property price 0 EUR2005; name amount_ash_price_EUR2005
  properties: dry mass 1 kg, wet mass 1 kg
- hard coal: 0.396382 kg; name hard_coal; = factor_MJ_kWh/hard_co_low_heating_value_hard_coal_CO_0; lognormal variance with pedigree 0.0039, pedigree (2,2,3,1,2)
  Literature value/calculated value. Hard coal use when producing 1kWh of electricity from hard coal, based on the value for burning 1MJ of hard coal. Weighted average with electricity production data and hard coal use.
  Source of electricity production and fuel consumption data: XM National Statistics
  XM Información inteligente, histórico de oferta, generación 2014
  XM Información inteligente, histórico de oferta, combustible 2014
  http://www.xm.com.co/Paginas/Home.aspx accessed on 21/07/2017 <http://www.xm.com.co/Paginas/Home.aspx%20accessed%20on%2021/07/2017>
  Source of low heating value for Colombian hard coal: Unidad de Planeación Minero Energética (UPME), Factores de Emisión para Combustibles Colombianos (FECOC).
  http://www.upme.gov.co/calculadora_emisiones/aplicacion/ayuda.html) accessed 17/07/2017
  property heating value, net 28.76 MJ; name hard_co_low_heating_value_hard_coal_CO_0
  properties: water content 0.0638298, wet mass 1 kg, dry mass 0.94 kg, carbon content, fossil 0.845
  note on carbon content, fossil: C content 75-94% (specified in Tab 1.1, report 6, part VI). A mean content of 0.845 kg C/ kg dry hard coal was considered
  note on heating value, net: This property represents the low heating value of hard coal in Colombia.
- water, decarbonised: 2.27999 kg; name water_decarbonised_user; = factor_MJ_kWh*0.2; lognormal variance with pedigree 0.054, pedigree (4,5,4,5,3)
  Literature value/calculated value. Cooling water, decarbonised, for the cooling water circuit lost when producing 1kWh of electricity from hard coal, based on the value for burning 1MJ of hard coal. Röder et al. 2007, Tab. 9.65 and Tab. 9.66, p. 160f. These tables give an amount of 0.15 kg/MJ burned, which is valid for the assumption of 75% wet cooling and 25% run-through cooling. However, this revised dataset assumes 100% wet cooling.
  properties: wet mass 1 kg
- SOx retained, in hard coal flue gas desulfurisation: 0.00201 kg; name sox_retained; lognormal variance with pedigree 0.093, pedigree (4,4,5,5,4)
  Calculated value. Weighted average from all figures from countries in ecoinvent version 2 (AT, BE, BR, CN, CZ, DE, DK, ES, FI, FR, GB, ES, FI, FR, GB, HR, HU, IE, IT, JP, NL, NO, PL, PT, RO, SE, SI, SK) and the new countries for version 3 (AU, CA regions, CL, IN, KR, MX, MY, PE, RU, TH, TR, TW, TZ, UA, US regions, ZA). Weighting was made with net electricity production 2008 in these countries (Itten&Frischknecht 2012).
  BA and BG were not included in the calculation of the GLO average as they inherit all GLO values at the moment.
  properties: dry mass 1 kg, wet mass 1 kg

## Inputs from nature
- Water, cooling, unspecified natural origin [natural resource, in water]: 0.0521363 m3; name water_cooling_UNO_input; = ((recirculating_CS_fraction_from_allCS*WWithdrawal_EP_HC_recirculating_CS)+(once_through_andCP_CS_fractio_from_allCS*WWithdrawal_EP_HC_once_through_andCP_CS))/11.31*factor_MJ_kWh; lognormal variance with pedigree 0.098025, pedigree (4,4,4,2,4)
  Calculated based on literature data.

## Emissions to nature
- Lead-210 [air, non-urban air or from high stacks]: 0.000790016 kBq; name lead_210; = factor_MJ_kWh*0.0000693; lognormal variance with pedigree 0.3986, pedigree (5,3,4,5,3)
  Literature value/calculated value. Emissions when producing 1kWh of electricity from hard coal, based on the value for burning 1MJ of hard coal. Weighted average with electricity production data (Itten&Frischknecht 2012) and emission values of 14 countries
  (AT, BE, ES, FR, IT, NL, PT, DE, CZ, HR, PL, SK, CN, US) (Röder et al. 2007)
  Country emissions values calculated from trace element balance, input uncertain
  Source:
  Itten R. and Frischknecht R. (2012) Life Cycle Inventories of Electricity Mixes and Grid. ESU-services Ltd., Uster, Switzerland.
- Antimony [air, non-urban air or from high stacks]: 1.36799e-8 kg; name antimony; = factor_MJ_kWh*0.0000000012; lognormal variance with pedigree 0.7486, pedigree (5,3,4,5,3)
  (same comment as for Lead-210)
- Ethane, 1,2-dichloro- [air, non-urban air or from high stacks]: 3.75058e-9 kg; name ethane_dichloro; = factor_MJ_kWh*0.000000000329; lognormal variance with pedigree 0.1786, pedigree (5,3,4,5,3)
  Literature value/calculated value. Emissions when producing 1kWh of electricity from hard coal, based on the value for burning 1MJ of hard coal. Weighted average with electricity production data (Itten&Frischknecht 2012) and emission values of 14 countries
  (AT, BE, ES, FR, IT, NL, PT, DE, CZ, HR, PL, SK, CN, US) (Röder et al. 2007)
  Country emissions values based on literature.
  Source:
  Itten R. and Frischknecht R. (2012) Life Cycle Inventories of Electricity Mixes and Grid. ESU-services Ltd., Uster, Switzerland.
- Manganese [air, non-urban air or from high stacks]: 4.08118e-7 kg; name manganese; = factor_MJ_kWh*0.0000000358; lognormal variance with pedigree 0.7486, pedigree (5,3,4,5,3)
  (same comment as for Lead-210)
- Chromium [air, non-urban air or from high stacks]: 9.34795e-8 kg; name chromium; = factor_MJ_kWh*0.0000000082; lognormal variance with pedigree 0.7486, pedigree (5,3,4,5,3)
  (same comment as for Lead-210)
- Benzo(a)pyrene [air, non-urban air or from high stacks]: 4.91337e-12 kg; name benzo_a_pyrene; = factor_MJ_kWh*0.000000000000431; lognormal variance with pedigree 0.08, pedigree (3,5,4,5,1)
  (same comment as for Ethane, 1,2-dichloro-)
- Mercury [air, non-urban air or from high stacks]: 3.07798e-8 kg; name mercury; = factor_MJ_kWh*0.0000000027; lognormal variance with pedigree 0.7486, pedigree (5,3,4,5,3)
  (same comment as for Lead-210)
- Thorium-234 [air, non-urban air or from high stacks]: 1.17419e-5 kBq; name thorium_234; = factor_MJ_kWh*0.00000103; lognormal variance with pedigree 0.3206, pedigree (3,3,4,5,3)
  (same comment as for Ethane, 1,2-dichloro-)
- Cobalt [air, non-urban air or from high stacks]: 3.80758e-8 kg; name cobalt; = factor_MJ_kWh*0.00000000334; lognormal variance with pedigree 0.7486, pedigree (5,3,4,5,3)
  (same comment as for Lead-210)
- Hydrocarbons, aliphatic, unsaturated [air, non-urban air or from high stacks]: 1.45919e-6 kg; name hydrocarbons_aliphatic_unsaturated; = factor_MJ_kWh*0.000000128; lognormal variance with pedigree 0.08, pedigree (3,5,4,5,1)
  (same comment as for Ethane, 1,2-dichloro-)
- Nitrogen oxides [air, non-urban air or from high stacks]: 0.0029837 kg; name nitrogen_oxides; lognormal variance with pedigree 0.0043, pedigree (2,2,3,1,2)
  Literature value/calculated value. Emissions when producing 1kWh of electricity from hard coal, based on the value for burning 1MJ of hard coal. Weighted average with electricity production data and emission values of Colombia.
  The emissions data were collected from “Environmental Compliance Reports” that are reported by power plants to the Ministry of Environment in order to obtain licenses, and are available under request at the National Environmental Licensing Authority. This exchange is a generation-weighted average of the emissions from Termopaipa and Termotasajero power plants, that account for 58,9% of the hard coal electricity production in Colombia in 2014.
  Soruce:
  Environmental Compliance Reports: ICA #13 of 2016 and ICA #10 of 2015 from Termopaipa and Termotasajero respectively.
  Source of electricity production: XM National Statistics
  XM Información inteligente, histórico de oferta, generación 2014
  http://www.xm.com.co/Paginas/Home.aspx accessed on 21/07/2017
- Toluene [air, non-urban air or from high stacks]: 7.58096e-7 kg; name toluene; = factor_MJ_kWh*0.0000000665; lognormal variance with pedigree 0.08, pedigree (3,5,4,5,1)
  (same comment as for Ethane, 1,2-dichloro-)
- Hydrogen chloride [air, non-urban air or from high stacks]: 0.000302098 kg; name hydrogen_chloride; = factor_MJ_kWh*0.0000265; lognormal variance with pedigree 0.2186, pedigree (5,3,4,5,3)
  (same comment as for Lead-210)
- Polonium-210 [air, non-urban air or from high stacks]: 0.00140219 kBq; name polonium_210; = factor_MJ_kWh*0.000123; lognormal variance with pedigree 0.3986, pedigree (5,3,4,5,3)
  (same comment as for Lead-210)
- PAH, polycyclic aromatic hydrocarbons [air, non-urban air or from high stacks]: 8.53855e-8 kg; name pah; = factor_MJ_kWh*0.00000000749; lognormal variance with pedigree 0.34, pedigree (3,5,4,5,1)
  (same comment as for Ethane, 1,2-dichloro-)
- Benzene [air, non-urban air or from high stacks]: 1.58459e-6 kg; name benzene; = factor_MJ_kWh*0.000000139; lognormal variance with pedigree 0.088, pedigree (3,5,4,5,3)
  (same comment as for Ethane, 1,2-dichloro-)
- Hydrocarbons, aliphatic, alkanes, unspecified [air, non-urban air or from high stacks]: 1.53899e-6 kg; name hydrocarbons_al_al_unspec; = factor_MJ_kWh*0.000000135; lognormal variance with pedigree 0.08, pedigree (3,5,4,5,1)
  (same comment as for Ethane, 1,2-dichloro-)
- Hydrocarbons, chlorinated [air, non-urban air or from high stacks]: 1.90379e-8 kg; name hydrocarbons_chlorinated; = factor_MJ_kWh*0.00000000167; lognormal variance with pedigree 0.1786, pedigree (5,3,4,5,3)
  (same comment as for Ethane, 1,2-dichloro-)
- Nickel [air, non-urban air or from high stacks]: 2.27999e-7 kg; name nickel; = factor_MJ_kWh*0.00000002; lognormal variance with pedigree 0.7486, pedigree (5,3,4,5,3)
  (same comment as for Lead-210)
- Cadmium [air, non-urban air or from high stacks]: 1.18559e-8 kg; name cadmium; = factor_MJ_kWh*0.00000000104; lognormal variance with pedigree 0.7486, pedigree (5,3,4,5,3)
  (same comment as for Lead-210)
- Dioxins, measured as 2,3,7,8-tetrachlorodibenzo-p-dioxin [air, non-urban air or from high stacks]: 1.20839e-13 kg; name dioxins; = factor_MJ_kWh*1.06E-14; lognormal variance with pedigree 0.34, pedigree (3,5,4,5,1)
  (same comment as for Ethane, 1,2-dichloro-)
- Carbon disulfide [air, non-urban air or from high stacks]: 1.21979e-8 kg; name carbon_disulfide; = factor_MJ_kWh*0.00000000107; lognormal variance with pedigree 0.3206, pedigree (3,3,4,5,3)
  Literature value/calculated value. Emissions when producing 1kWh of electricity from hard coal, based on the value for burning 1MJ of hard coal. Weighted average with electricity production data (Itten&Frischknecht 2012) and emission values of 14 countries
  (AT, BE, ES, FR, IT, NL, PT, DE, CZ, HR, PL, SK, CN, US) (Röder et al. 2007)
  Source:
  Itten R. and Frischknecht R. (2012) Life Cycle Inventories of Electricity Mixes and Grid. ESU-services Ltd., Uster, Switzerland.
- Acenaphthene [air, non-urban air or from high stacks]: 4.78797e-11 kg; name acenaphthene; = factor_MJ_kWh*0.0000000000042; lognormal variance with pedigree 0.1406, pedigree (3,3,4,5,3)
  (same comment as for Ethane, 1,2-dichloro-)
- Particulates, < 2.5 um [air, non-urban air or from high stacks]: 0.000332 kg; name particulates_lt2_5; lognormal variance with pedigree 0.093, pedigree (4,4,5,5,4)
  (same comment as for NOx retained, by selective catalytic reduction)
- NMVOC, non-methane volatile organic compounds, unspecified origin [air, non-urban air or from high stacks]: 1.06019e-5 kg; name nmvoc; = factor_MJ_kWh*0.00000093; lognormal variance with pedigree 0.1406, pedigree (3,3,4,5,3)
  (same comment as for Ethane, 1,2-dichloro-)
- Radon-222 [air, non-urban air or from high stacks]: 0.00567717 kBq; name radon_222; = factor_MJ_kWh*0.000498; lognormal variance with pedigree 0.3986, pedigree (5,3,4,5,3)
  (same comment as for Lead-210)
- Particulates, > 10 um [air, non-urban air or from high stacks]: 0.0002202 kg; name particulates_gt10; lognormal variance with pedigree 0.093, pedigree (4,4,5,5,4)
  (same comment as for Nitrogen oxides)
- Hexane [air, non-urban air or from high stacks]: 6.32697e-9 kg; name hexane; = factor_MJ_kWh*0.000000000555; lognormal variance with pedigree 0.1786, pedigree (5,3,4,5,3)
  (same comment as for Ethane, 1,2-dichloro-)
- Sulfate [air, non-urban air or from high stacks]: 4.49158e-9 kg; name sulfate; = factor_MJ_kWh*0.000000000394; lognormal variance with pedigree 0.1786, pedigree (5,3,4,5,3)
  (same comment as for Ethane, 1,2-dichloro-)
- Bromine [air, non-urban air or from high stacks]: 3.56818e-6 kg; name bromine; = factor_MJ_kWh*0.000000313; lognormal variance with pedigree 0.1806, pedigree (3,3,4,5,3)
  (same comment as for Lead-210)
- Uranium-234 [air, non-urban air or from high stacks]: 2.30279e-5 kBq; name uranium_234; = factor_MJ_kWh*0.00000202; lognormal variance with pedigree 0.3586, pedigree (5,3,4,5,3)
  (same comment as for Ethane, 1,2-dichloro-)
- Strontium [air, non-urban air or from high stacks]: 6.74876e-7 kg; name strontium; = factor_MJ_kWh*0.0000000592; lognormal variance with pedigree 0.7486, pedigree (5,3,4,5,3)
  (same comment as for Lead-210)
- Dinitrogen monoxide [air, non-urban air or from high stacks]: 1.70999e-5 kg; name dinitrogen_monoxide; = factor_MJ_kWh*0.0000015; lognormal variance with pedigree 0.063325, pedigree (2,2,3,2,2)
  Literature value/calculated value. Emissions when producing 1kWh of electricity from hard coal, based on the value for burning 1MJ of hard coal. Weighted average with electricity production data and emission values of Colombia.
  Source of electricity production and fuel consumption data: XM National Statistics
  XM Información inteligente, histórico de oferta, generación 2014
  XM Información inteligente, histórico de oferta, combustible 2014
  http://informacioninteligente10.xm.com.co/oferta/Paginas/HistoricoOferta.aspx accessed on 21/07/2017
  Fuel name: “Carbón Genérico”
  Emission factor: 0.0015 ton N2O/TJ (Updated on December 7 of 2016)
  Source of emission factor of coal: Unidad de Planeación Minero Energética (UPME), Factores de Emisión para Combustibles Colombianos (FECOC).
  http://www.upme.gov.co/calculadora_emisiones/aplicacion/ayuda.html) accessed 17/07/2017
- Methane, dichloro-, HCC-30 [air, non-urban air or from high stacks]: 2.72459e-8 kg; name methane_dichloro; = factor_MJ_kWh*0.00000000239; lognormal variance with pedigree 0.1786, pedigree (5,3,4,5,3)
  (same comment as for Ethane, 1,2-dichloro-)
- Particulates, > 2.5 um, and < 10um [air, non-urban air or from high stacks]: 4.13e-5 kg; name particulates_2_5_to_10; lognormal variance with pedigree 0.093, pedigree (4,4,5,5,4)
  (same comment as for NOx retained, by selective catalytic reduction)
- Thorium-228 [air, non-urban air or from high stacks]: 3.76198e-5 kBq; name throium_228; = factor_MJ_kWh*0.0000033; lognormal variance with pedigree 0.3986, pedigree (5,3,4,5,3)
  (same comment as for Lead-210)
- Ethane, 1,1,1-trichloro-, HCFC-140 [air, non-urban air or from high stacks]: 1.88099e-9 kg; name ethane_trichloro; = factor_MJ_kWh*0.000000000165; lognormal variance with pedigree 0.1406, pedigree (3,3,4,5,3)
  (same comment as for Ethane, 1,2-dichloro-)
- Carbon monoxide, fossil [air, non-urban air or from high stacks]: 0.000100547 kg; name carbon_monoxide_fossil; = factor_MJ_kWh*0.00000882; lognormal variance with pedigree 0.674, pedigree (3,4,4,5,1)
  (same comment as for Ethane, 1,2-dichloro-)
- Copper [air, non-urban air or from high stacks]: 9.35935e-8 kg; name copper; = factor_MJ_kWh*0.00000000821; lognormal variance with pedigree 0.7486, pedigree (5,3,4,5,3)
  (same comment as for Lead-210)
- Styrene [air, non-urban air or from high stacks]: 2.32559e-9 kg; name styrene; = factor_MJ_kWh*0.000000000204; lognormal variance with pedigree 0.1406, pedigree (3,3,4,5,3)
  (same comment as for Ethane, 1,2-dichloro-)
- Iodine [air, non-urban air or from high stacks]: 1.81259e-6 kg; name iodine; = factor_MJ_kWh*0.000000159; lognormal variance with pedigree 0.2186, pedigree (5,3,4,5,3)
  (same comment as for Lead-210)
- Barium [air, non-urban air or from high stacks]: 7.39856e-7 kg; name barium; = factor_MJ_kWh*0.0000000649; lognormal variance with pedigree 0.7486, pedigree (5,3,4,5,3)
  (same comment as for Lead-210)
- Propane [air, non-urban air or from high stacks]: 2.35979e-7 kg; name propane; = factor_MJ_kWh*0.0000000207; lognormal variance with pedigree 0.08, pedigree (3,5,4,5,1)
  (same comment as for Ethane, 1,2-dichloro-)
- Formaldehyde [air, non-urban air or from high stacks]: 4.13818e-7 kg; name formaldehyde; = factor_MJ_kWh*0.0000000363; lognormal variance with pedigree 0.08, pedigree (3,5,4,5,1)
  (same comment as for Ethane, 1,2-dichloro-)
- Methane, fossil [air, non-urban air or from high stacks]: 1.13999e-5 kg; name methane_fossil; = factor_MJ_kWh*0.000001; lognormal variance with pedigree 0.0633, pedigree (2,2,3,1,2)
  Literature value/calculated value. Emissions when producing 1kWh of electricity from hard coal, based on the value for burning 1MJ of hard coal. Weighted average with electricity production data and emission values of Colombia.
  Source of electricity production and fuel consumption data: XM National Statistics
  XM Información inteligente, histórico de oferta, generación 2014
  XM Información inteligente, histórico de oferta, combustible 2014
  http://informacioninteligente10.xm.com.co/oferta/Paginas/HistoricoOferta.aspx accessed on 21/07/2017
  Fuel name: “Carbón Genérico”
  Emission factor: 0.001 ton CH4/TJ (Updated on December 7 of 2016)
  Source of emission factor of coal: Unidad de Planeación Minero Energética (UPME), Factores de Emisión para Combustibles Colombianos (FECOC).
  http://www.upme.gov.co/calculadora_emisiones/aplicacion/ayuda.html) accessed 17/07/2017
- Radon-220 [air, non-urban air or from high stacks]: 0.00577977 kBq; name radon_220; = factor_MJ_kWh*0.000507; lognormal variance with pedigree 0.3986, pedigree (5,3,4,5,3)
  (same comment as for Lead-210)
- Aldehydes, unspecified [air, non-urban air or from high stacks]: 8.92615e-8 kg; name aldehydes_unspecified; = factor_MJ_kWh*0.00000000783; lognormal variance with pedigree 0.1406, pedigree (3,3,4,5,3)
  (same comment as for Ethane, 1,2-dichloro-)
- Chromium VI [air, non-urban air or from high stacks]: 1.59599e-8 kg; name chromium_vi; = factor_MJ_kWh*0.0000000014; lognormal variance with pedigree 0.5006, pedigree (3,3,4,5,3)
  Literature value/calculated value. Emissions when producing 1kWh of electricity from hard coal, based on the value for burning 1MJ of hard coal. Weighted average with electricity production data (Itten&Frischknecht 2012) and emission values of 14 countries
  (AT, BE, ES, FR, IT, NL, PT, DE, CZ, HR, PL, SK, CN, US) (Röder et al. 2007)
  Country emissions values based on range of data.
  Source:
  Itten R. and Frischknecht R. (2012) Life Cycle Inventories of Electricity Mixes and Grid. ESU-services Ltd., Uster, Switzerland.
- Uranium-238 [air, non-urban air or from high stacks]: 0.000181259 kBq; name uranium_238; = factor_MJ_kWh*0.0000159; lognormal variance with pedigree 0.3986, pedigree (5,3,4,5,3)
  (same comment as for Lead-210)
- Chloroform [air, non-urban air or from high stacks]: 9.21115e-9 kg; name chloroform; = factor_MJ_kWh*0.000000000808; lognormal variance with pedigree 0.1406, pedigree (3,3,4,5,3)
  (same comment as for Carbon disulfide)
- Thorium-232 [air, non-urban air or from high stacks]: 5.50617e-5 kBq; name thorium_232; = factor_MJ_kWh*0.00000483; lognormal variance with pedigree 0.3986, pedigree (5,3,4,5,3)
  (same comment as for Lead-210)
- Boron [air, non-urban air or from high stacks]: 4.36618e-6 kg; name boron; = factor_MJ_kWh*0.000000383; lognormal variance with pedigree 0.7486, pedigree (5,3,4,5,3)
  (same comment as for Lead-210)
- Butane [air, non-urban air or from high stacks]: 1.27679e-7 kg; name butane; = factor_MJ_kWh*0.0000000112; lognormal variance with pedigree 0.08, pedigree (3,5,4,5,1)
  (same comment as for Ethane, 1,2-dichloro-)
- Hydrogen fluoride [air, non-urban air or from high stacks]: 3.22618e-5 kg; name hydrogen_fluoride; = factor_MJ_kWh*0.00000283; lognormal variance with pedigree 0.2186, pedigree (5,3,4,5,3)
  (same comment as for Lead-210)
- Actinides, radioactive, unspecified [air, non-urban air or from high stacks]: 0.000194939 kBq; name actinides_radioactive_unspecified; = factor_MJ_kWh*0.0000171; lognormal variance with pedigree 0.3206, pedigree (3,3,4,5,3)
  (same comment as for Ethane, 1,2-dichloro-)
- Acrolein [air, non-urban air or from high stacks]: 2.72459e-8 kg; name acrolein; = factor_MJ_kWh*0.00000000239; lognormal variance with pedigree 0.3586, pedigree (5,3,4,5,3)
  (same comment as for Ethane, 1,2-dichloro-)
- Ethane [air, non-urban air or from high stacks]: 2.77018e-7 kg; name ethane; = factor_MJ_kWh*0.0000000243; lognormal variance with pedigree 0.08, pedigree (3,5,4,5,1)
  (same comment as for Ethane, 1,2-dichloro-)
- Cumene [air, non-urban air or from high stacks]: 5.11857e-10 kg; name cumene; = factor_MJ_kWh*0.0000000000449; lognormal variance with pedigree 0.124, pedigree (1,1,3,5,1)
  (same comment as for Carbon disulfide)
- Magnesium [air, non-urban air or from high stacks]: 1.03283e-6 kg; name magnesium; = factor_MJ_kWh*0.0000000906; lognormal variance with pedigree 0.7086, pedigree (5,3,4,5,3)
  (same comment as for Ethane, 1,2-dichloro-)
- Water [air, unspecified]: 0.00164091 m3; name water_to_air_unspecified; = (water_completely_softened/1000)*fraction_WCS_to_air+(water_decarbonised_user/1000)*fraction_WDC_to_air+water_cooling_UNO_input*fraction_CW_to_air; lognormal variance with pedigree 0.098025, pedigree (4,4,4,2,4)
  Calculated value based on literature values and expert opinion. See comments in the parametres" comment field.
  property fraction, origin: unspecified 0.952118; name fraction_origin_unspecified
  property fraction, origin: fresh water 0.047882; name fraction_origin_fresh_water
  property fraction, origin: salt water 0; name fraction_origin_salt_water
- Thorium-230 [air, non-urban air or from high stacks]: 1.17419e-5 kBq; name thorium_230; = factor_MJ_kWh*0.00000103; lognormal variance with pedigree 0.3586, pedigree (5,3,4,5,3)
  (same comment as for Ethane, 1,2-dichloro-)
- Potassium-40 [air, non-urban air or from high stacks]: 0.000262199 kBq; name potassium_40; = factor_MJ_kWh*0.000023; lognormal variance with pedigree 0.3986, pedigree (5,3,4,5,3)
  (same comment as for Lead-210)
- Methane, monochloro-, R-40 [air, non-urban air or from high stacks]: 4.98177e-8 kg; name methane_monochloro; = factor_MJ_kWh*0.00000000437; lognormal variance with pedigree 0.1406, pedigree (3,3,4,5,3)
  (same comment as for Ethane, 1,2-dichloro-)
- Water [water, unspecified]: 0.0528438 m3; name water_to_water_unspecified; = (water_completely_softened/1000)*(1-fraction_WCS_to_air)+(water_decarbonised_user/1000)*(1-fraction_WDC_to_air)+water_cooling_UNO_input*(1-fraction_CW_to_air); lognormal variance with pedigree 0.098025, pedigree (4,4,4,2,4)
  (same comment as for Water)
  property fraction, origin: fresh water 0.0429463; name fraction_origin_fresh_water_Ww
  property fraction, origin: salt water 0; name fraction_origin_salt_water_Ww
  property fraction, origin: unspecified 0.957054; name fraction_origin_unspecified_Ww
- Propene [air, non-urban air or from high stacks]: 1.07957e-7 kg; name propene; = factor_MJ_kWh*0.00000000947; lognormal variance with pedigree 0.08, pedigree (3,5,4,5,1)
  (same comment as for Ethane, 1,2-dichloro-)
- Beryllium [air, non-urban air or from high stacks]: 1.97219e-9 kg; name beryllium; = factor_MJ_kWh*0.000000000173; lognormal variance with pedigree 0.6706, pedigree (3,3,4,5,3)
  (same comment as for Carbon disulfide)
- Molybdenum [air, non-urban air or from high stacks]: 1.31099e-8 kg; name molybdenum; = factor_MJ_kWh*0.00000000115; lognormal variance with pedigree 0.7486, pedigree (5,3,4,5,3)
  (same comment as for Lead-210)
- Phenol [air, non-urban air or from high stacks]: 1.50479e-9 kg; name phenol; = factor_MJ_kWh*0.000000000132; lognormal variance with pedigree 0.1406, pedigree (3,3,4,5,3)
  (same comment as for Ethane, 1,2-dichloro-)
- Xylene [air, non-urban air or from high stacks]: 6.22437e-6 kg; name xylene; = factor_MJ_kWh*0.000000546; lognormal variance with pedigree 0.08, pedigree (3,5,4,5,1)
  (same comment as for Ethane, 1,2-dichloro-)
- Radium-226 [air, non-urban air or from high stacks]: 0.000208619 kBq; name radium_226; = factor_MJ_kWh*0.0000183; lognormal variance with pedigree 0.3907, pedigree (3,3,5,3,3)
  (same comment as for Lead-210)
- Furan [air, non-urban air or from high stacks]: 4.69677e-13 kg; name furan; = factor_MJ_kWh*4.12E-14; lognormal variance with pedigree 0.1406, pedigree (3,3,4,5,3)
  (same comment as for Ethane, 1,2-dichloro-)
- Vanadium [air, non-urban air or from high stacks]: 1.68719e-7 kg; name vanadium; = factor_MJ_kWh*0.0000000148; lognormal variance with pedigree 0.7486, pedigree (5,3,4,5,3)
  (same comment as for Lead-210)
- Ethene, tetrachloro- [air, non-urban air or from high stacks]: 4.03558e-9 kg; name ethene_tetrachloro; = factor_MJ_kWh*0.000000000354; lognormal variance with pedigree 0.1786, pedigree (5,3,4,5,3)
  (same comment as for Ethane, 1,2-dichloro-)
- Protactinium-234 [air, non-urban air or from high stacks]: 1.17419e-5 kBq; name protactinium_234; = factor_MJ_kWh*0.00000103; lognormal variance with pedigree 0.3206, pedigree (3,3,4,5,3)
  (same comment as for Ethane, 1,2-dichloro-)
- Pentane [air, non-urban air or from high stacks]: 9.91795e-7 kg; name pentane; = factor_MJ_kWh*0.000000087; lognormal variance with pedigree 0.08, pedigree (3,5,4,5,1)
  (same comment as for Ethane, 1,2-dichloro-)
- Carbon dioxide, fossil [air, non-urban air or from high stacks]: 1.00474 kg; name carbon_dioxide_fossil; = factor_MJ_kWh*0.088136; lognormal variance with pedigree 0.0033, pedigree (2,2,3,1,2)
  Literature value/calculated value. Emissions when producing 1kWh of electricity from hard coal, based on the value for burning 1MJ of hard coal. Weighted average with electricity production data and emission values of Colombia.
  Source of electricity production and fuel consumption data: XM National Statistics
  XM Información inteligente, histórico de oferta, generación 2014
  XM Información inteligente, histórico de oferta, combustible 2014
  http://www.xm.com.co/Paginas/Home.aspx accessed on 21/07/2017
  Fuel name: “Carbón Genérico”
  Emission factor: 88136.01864 (kg CO2/TJ), (Updated on December 7 of 2016)
  Source of emission factor of coal: Unidad de Planeación Minero Energética (UPME), Factores de Emisión para Combustibles Colombianos (FECOC).
  http://www.upme.gov.co/calculadora_emisiones/aplicacion/ayuda.html) accessed 17/07/2017
- Hydrocarbons, aliphatic, alkanes, cyclic [air, non-urban air or from high stacks]: 5.43777e-8 kg; name hydrocarbons_al_al_cyclic; = factor_MJ_kWh*0.00000000477; lognormal variance with pedigree 0.1406, pedigree (3,3,4,5,3)
  (same comment as for Ethane, 1,2-dichloro-)
- Zinc [air, non-urban air or from high stacks]: 4.74237e-7 kg; name zinc; = factor_MJ_kWh*0.0000000416; lognormal variance with pedigree 0.7486, pedigree (5,3,4,5,3)
  (same comment as for Lead-210)
- Benzene, ethyl- [air, non-urban air or from high stacks]: 8.83495e-9 kg; name benzene_ethyl; = factor_MJ_kWh*0.000000000775; lognormal variance with pedigree 0.1406, pedigree (3,3,4,5,3)
  (same comment as for Carbon disulfide)
- Sulfur dioxide [air, non-urban air or from high stacks]: 0.010177 kg; name sulfur_dioxide; lognormal variance with pedigree 0.0043, pedigree (2,2,3,1,2)
  (same comment as for Nitrogen oxides)
- Lead [air, non-urban air or from high stacks]: 4.22938e-7 kg; name lead; = factor_MJ_kWh*0.0000000371; lognormal variance with pedigree 0.7486, pedigree (5,3,4,5,3)
  (same comment as for Lead-210)
- Selenium [air, non-urban air or from high stacks]: 1.88099e-7 kg; name selenium; = factor_MJ_kWh*0.0000000165; lognormal variance with pedigree 0.7486, pedigree (5,3,4,5,3)
  (same comment as for Lead-210)
- Cyanide [air, non-urban air or from high stacks]: 2.34839e-7 kg; name cyanide; = factor_MJ_kWh*0.0000000206; lognormal variance with pedigree 0.1786, pedigree (5,3,4,5,3)
  (same comment as for Carbon disulfide)
- Arsenic [air, non-urban air or from high stacks]: 1.13657e-7 kg; name arsenic; = factor_MJ_kWh*0.00000000997; lognormal variance with pedigree 0.7486, pedigree (5,3,4,5,3)
  (same comment as for Lead-210)
- Radium-228 [air, non-urban air or from high stacks]: 6.73736e-5 kBq; name radium_228; = factor_MJ_kWh*0.00000591; lognormal variance with pedigree 0.3986, pedigree (5,3,4,5,3)
  (same comment as for Lead-210)

## Sampling procedure
literature and statistics

## Extrapolations
This dataset has been extrapolated from year 2017 to the year of the calculation (2021). The uncertainty has been adjusted accordingly.
