# cement production, pozzolana and fly ash 11-35%

Dataset: EcoSpold 2, unit process
Geography: CH
Time period: 2005-01-01 to 2021-12-31
Technology level: current
Classification: ISIC rev.4 ecoinvent: 2394:Manufacture of cement, lime and plaster
Synonyms: CEM IV/A; Pozzolanic cement
Tags: combined production
Scenario: Business-as-Usual
System model: Allocation, cut-off by classification
Share of production covered: 100 %
Generated by: Michael Elias Boesch
Published in: Boesch, M.E. 2010
Database: ecoinvent
isCopyrightProtected: true
accessRestrictedTo: 1

## General comment
The dataset describes the production of cement (CEM IV/A) in Switzerland.

## Included activities start
From cradle, i.e. including all upstream activities. As source of gypsum, waste gypsum from flue gas treatment is assumed.

## Included activities end
This activity ends with the cement produced in the cement mill. The dataset does not include packaging and administration.

## Reference product
- cement, pozzolana and fly ash 11-35%: 1 kg; name cement; source Boesch, M.E. 2010; CPC 37440: Portland cement, aluminous cement, slag cement and similar hydraulic cements, except in the form of clinkers; By-product classification allocatable product
  production volume 2.125e6 kg; name APV_cement
    Estimated 0.05% marketshare
  property price 0.0615 EUR2005; name cement_price_EUR2005
    2005 import and export prices (total trades (USD) divided by total weight (kg) in China, India, USA, Japan, Russia and Europe, major producers and consumers (http://www.cementchina.net/freport/showfre.asp?id=749) from UN Commodity Trade Statistics Database (http://data.un.org/Explorer.aspxDatabase [Accessed 2 July 2010]). Commodity: Cement (portland, aluminious, slag or hydraulic)
  property carbon content 0
    carbon content on a dry matter basis (reserved; not for manual entry)
  properties: carbon content, fossil 0, dry mass 1 kg, water in wet mass 0 kg, water content 0, carbon content, non-fossil 0, wet mass 1 kg, carbon allocation 0 kg
- hard coal ash: 0 kg; name flyash; By-product classification Waste; CPC 39: Wastes or scraps
  Literature Value
  production volume 0 kg
    Amount relative to produced amount of reference product
  property price 0 EUR2005; name flyash_price_EUR2005
    Waste products are assigned a price of zero as they are assumed to require further treatment.
  property carbon content 0
    carbon content on a dry matter basis (reserved; not for manual entry)
  properties: carbon content, non-fossil 0, water in wet mass 0 kg, wet mass 1 kg, dry mass 1 kg, carbon content, fossil 0, water content 0, carbon allocation 0 kg

## By-products
- inert filler: 0 kg; name inert_filler; = ABS(flyash)*0; source Boesch, M.E. 2010; CPC 37410: Plasters; By-product classification allocatable product
  In accordance with the ecoinvent centre, the link between waste treatment and cement production shall not be established here. Therefore the inert filler value is set to zero (cut-off approach)
  production volume 0 kg; = APV_cement/ cement*ABS( inert_filler)
    Amount relative to produced amount of reference product
  property price 0.004 EUR2005; name inert_filler_price_EUR2005
    Temporary price data. Calculated as 90% of purchasers price based on: 2004 market prices are estimated to be equal to USA prices, which are given according to http://minerals.usgs.gov/minerals/pubs/commodity/sand_&_gravel_construction/myb1-2007-sandc.xls, table 1, downloaded 21 April 2009. Same price for gravel and sand.
  property carbon content 0
    carbon content on a dry matter basis (reserved; not for manual entry)
  properties: carbon content, fossil 0, carbon content, non-fossil 0, water in wet mass 0 kg, dry mass 1 kg, water content 0, wet mass 1 kg, carbon allocation 0 kg

## Inputs from technosphere
- steel, low-alloyed: 0.00011 kg; name steel; = 0.00011* cement; source Kellenberger D. 2007; lognormal variance with pedigree 0.0433, pedigree (3,3,5,3,1)
  Literature value
  properties: wet mass 1 kg, dry mass 1 kg, carbon content, fossil 0.005
- electricity, medium voltage: 0.0329 kWh; = 0.0329* cement; source Boesch, M.E. 2010; lognormal variance with pedigree 0.0433, pedigree (3,3,5,3,1)
  Literature Value
- ethylene glycol: 0.00021 kg; = 2.1e-4* cement; source Kellenberger D. 2007; lognormal variance with pedigree 0.0433, pedigree (3,3,5,3,1)
  Ancillary product for grinding
  properties: heating value, net 23.44 MJ, carbon content, fossil 0.387097, dry mass 1 kg, wet mass 1 kg
- inert filler: 0 kg; = 0.23* cement*0; source Boesch, M.E. 2010
  (same comment as for inert filler)
  properties: wet mass 1 kg, dry mass 1 kg
- gypsum, mineral: 0.0385 kg; = 0.0385* cement; source Boesch, M.E. 2010; lognormal variance with pedigree 0.0433, pedigree (3,3,5,3,1)
  Literature Value
  properties: wet mass 1 kg, dry mass 1 kg
- clinker: 0 kg; source Boesch, M.E. 2010; pedigree (1,1,1,1,1)
  Literature Value
  properties: dry mass 1 kg, wet mass 1 kg
- cement factory: 5.36e-11 unit; = 5.36e-11* cement; source Kellenberger D. 2007; lognormal variance with pedigree 0.3406, pedigree (2,1,5,1,1)
  Literature Value
  This exchange has an activity link directly to the producing activity because the product is primarily consumed in the same geographical area where it is produced.
- clinker: 0.7315 kg; source Boesch, M.E. 2010; lognormal variance with pedigree 0.0433, pedigree (3,3,5,3,1)
  Literature Value

## Emissions to nature
- Heat, waste [air, unspecified]: 0.118 MJ; = 0.118* cement; source Boesch, M.E. 2010; lognormal variance with pedigree 0.0827, pedigree (3,3,5,3,1)
  Literature Value

## Sampling procedure
Data approximates average Swiss production

## Review by Gabor Doka 2012-06-16
Passed (just). See review comments in 'cement production, Portland blast furnace slag, 25-70% blast furnace slag, GLO, 2005 - 2009' and 'cement production, Portland, CH, 2005 - 2009' which apply to (almost) all cement datasets.
