# gold mine operation and refining

Dataset: EcoSpold 2, unit process
Geography: SE
Time period: 2004-01-01 to 2021-12-31
Technology level: current
Classification: ISIC rev.4 ecoinvent: 0729:Mining of other non-ferrous metal ores
Scenario: Business-as-Usual
System model: Allocation, cut-off by classification
Share of production covered: 20 %
Generated by: Mireille Faist Emmenegger (obsolete)
Published in: Classen M. 2009
Database: ecoinvent
isCopyrightProtected: true
accessRestrictedTo: 1

## General comment
This dataset was created by merging two separate multi-output datasets from ecoinvent database v2; "mining, gold-silver-zinc-lead-copper deposit" and "refining, copper-zinc-lead-gold-silver, in smelter".
This dataset describes the joint production of gold, silver, copper, lead and zinc. Both mining and refining are included in this activity. The data on mining corresponds to Swedish mines Aitik, Boliden and Garpenberg, which produce gold, silver and other metals. Data quality for emissions into air / water, as well as disposal of tailings, is low. Regarding the refining; gold and silver are supposed to be treated in the PGM plant in Rönnskär, whereas the other metals are supposed to undergo other treatments. A high share of the production is recycled metal, e.g. 74% for gold.

## Included activities start
From metal containing ore extraction from the ground.

## Included activities end
This activity ends with the refining of metals, through a share-representative mix of gold/silver refining, and of lead/copper/zinc refining. The dataset includes both open pit mining of the ore and purification of the metal concentrates. The dataset does not include the inputs and emissions for production of secondary gold and silver, nor the generation of metal waste (which is assumed to be recycled).

## Geography
Energy use and emissions during the mining are from Swedish mines. Material requirements during refinery for gold and silver are estimated with Australian data, cyanide consumption is estimated with US-Data.

## Technology
OPEN PIT MINING:
The ore is mined in four steps: drilling, blasting, loading and hauling. In the case of a surface mine, a pattern of holes is drilled in the pit and filled with explosives. The explosives are detonated in order to break up the ground so large shovels or front-end loaders can load it into haul trucks.
ORE AND WASTE HAULAGE:
The haul trucks transport the ore to various areas for processing. The grade and type of ore determine the processing method used. Higher-grade ores are taken to a mill. Lower grade ores are taken to leach pads. Some ores may be stockpiled for later processing.
HEAP LEACHING:
The ore is crushed or placed directly on lined leach pads where a dilute cyanide solution is applied to the surface of the heap. The solution percolates down through the ore, where it leaches the gold and flows to a central collection location. The solution is recovered in this closed system. The pregnant leach solution is fed to electrowinning cells and undergoes the same steps as described below from Electro-winning.
ORE PROCESSING:
Milling: The ore is fed into a series of grinding mills where steel balls grind the ore to a fine slurry or powder.
Oxidization and leaching: Some types of ore require further processing before gold is recovered. In this case, the slurry is pressure-oxidized in an autoclave before going to the leaching tanks or a dry powder is fed through a roaster in which it is oxidized using heat before being sent to the leaching tanks as a slurry. The slurry is thickened and runs through a series of leaching tanks. The gold in the slurry adheres to carbon in the tanks.
Stripping: The carbon is then moved into a stripping vessel where the gold is removed from the carbon by pumping a hot caustic solution through the carbon. The carbon is later recycled.
Electro-winning: The gold-bearing solution is pumped through electro-winning cells or through a zinc precipitation circuit where the gold is recovered from the solution.
Smelting: The gold is then melted in a furnace at about 1’064°C and poured into moulds, creating doré bars. Doré bars are unrefined gold bullion bars containing between 60% and 95% gold.
References:
Newmont (2004) How gold is mined. Newmont. Retrieved from http://www.newmont.com/en/gold/howmined/index.asp

## Time period
Period of public environmental report

## Parameters
- fraction_TW_to_air: 0.15 dimensionless; = fraction_PW_to_air
  Calculated value. See comment in the other parametres present in this dataset. Tap water is considered to be always used as process water, thus process water fractions to air are applied to all tap water input flows to calculate the amount of water consumed in the processes.
- fraction_PW_to_air: 0.15 dimensionless
  Literature value. In case when no industry/process specific data are available, default evaporation fraction value is used. This value is 15% and is based on literature (Statistics Canada, 2007 & Shaffer, K.H., 2008, Consumptive water use in the Great Lakes Basin, USGS & Shiklomanov, 2003, World Water Resources at the Beginning of the 21st Century) and has been approved by an expert.

## Reference product
- copper, cathode: 1 kg; name copper_RP; source Boliden 2006; By-product classification allocatable product; CPC 41413: Refined copper and copper alloys, unwrought; master alloys of copper; CAS 7440-50-8
  Copper, the red metal, apart from gold the only metallic element with a colour different from a grey tone, has been known since the early days of the human kind. It has always been one of the significant materials, and today it is the most frequently used heavy non-ferrous metal. The utility of pure copper is based on its physical and chemical properties, above all its electrical and thermal conductivity (exceeded only by silver), its outstanding ductility and thus excellent workability, and its corrosion resistance (a chemical behaviour making it a half-noble metal). Copper compounds and ores are distinguished by bright coloration, especially reds, greens, and blues. Copper in soil is an essential trace element for most creatures, including humans. Its common alloys, particularly brass and bronze, are of great practical importance. Commercial grades of cathode copper today range from 99.95% to 99.97% pure. Before end-use copper is manufactured into semi fabricated products, such as shapes and ingots (known as “semis”). These manufacturing processes are subdivided into hot working, cold working and, if necessary, process annealing. Uses: Few of the semis are ready for use as such. They more typically travel to first-stage manufacturers, who make metal rods, wire, and casting, and then to component manufacturers who produce such things as motors, valves, and insulated cables. The components in turn are incorporated by final-stage manufacturers into a variety of finished products - automobiles, commercial buildings, residential housing, and so forth. These uses account for about 79% of the world-wide consumption of copper. Calculated value: Calculated from output with share of concentrate input.
  production volume 1.61e8 kg; name RP_PV
    Source: USGS Minerals Yearbook 2015. Available from: https://www.usgs.gov/centers/nmic/copper-statistics-and-information (downloaded 21 June 2019), Table 22. Data for Sweden (primary, other)
  property price 3.57105 EUR2005
    Price calculated as 5-year market average (2015-2019; USD/kg; USGS [2020]) and converted to EUR2005 (USD2019/EUR2005 exchange rate: 0.62; Official Data Foundation [2020] and Macrotrends [2020]).
    References:
    Official Data Foundation (2020). Inflation Calculator [Online]. Available from: https://www.officialdata.org/us/inflation/2005?endYear=2019&amount=1 [Accessed 28/07/2020]
    USGS (2020). Mineral Commodity Summaries 2020 [Online]. Available from: https://pubs.usgs.gov/periodicals/mcs2020/mcs2020.pdf [Accessed 28/07/2020]
    Macrotrends (2020). Euro Dollar Exchange Rate (EUR USD) - Historical Chart [Online]. Available from: https://www.macrotrends.net/2548/euro-dollar-exchange-rate-historical-chart [Accessed 28/07/2020]
  property carbon content 0
    carbon content on a dry matter basis (reserved; not for manual entry)
  property true value 6.55287e8; name copper_RP_true_value
    allocation property applied in "true value" allocation // value calculated from revenue
  properties: wet mass 1 kg, dry mass 1 kg, carbon content, fossil 0, carbon content, non-fossil 0, water content 0, water in wet mass 0 kg, carbon allocation 0 kg

## By-products
- silver: 0 kg; name silver_BP; source Boliden 2006; CPC 41310: Silver (including silver plated with gold or platinum), unwrought or in semi-manufactured forms, or in powder […]; By-product classification allocatable product; CAS 7440-22-4
  Silver is considered a precious metal because of its rarity and corrosion resistance. Silver is often mined together with gold in polymetallic mines. Silver has a moderately high melting point (961.9°C) and the highest electrical and thermal conductivity of all metals. When in the metallic form, silver is unaffected by water or oxygen, but is altered by ozone with the formation of silver oxide, and by sulphur and other sulphur compounds with the formation of silver sulphide (Gasparrini, 1993). Uses: The principal users of silver are industrial applications, photography and jewellery. Literature value.
  production volume 198385 kg; = ABS(silver_BP/copper_RP)*RP_PV
    Calculated from the production volume of copper in proportion to the respective output amounts.
  property price 324.357 EUR2005
    (same comment as for copper, cathode)
  property carbon content 0
    carbon content on a dry matter basis (reserved; not for manual entry)
  property true value 7.33404e7; name silver_BP_true_value
    allocation property applied in "true value" allocation // value calculated from revenue
  properties: dry mass 1 kg, wet mass 1 kg, carbon content, fossil 0, carbon content, non-fossil 0, water content 0, water in wet mass 0 kg, carbon allocation 0 kg
- zinc: 0 kg; name zinc_BP; source Boliden 2006; CPC 41442: Zinc, unwrought; By-product classification allocatable product; CAS 7440-66-6
  The remarkably low boiling point of 906 °C is important in pyrometallurgical zinc production processes. Zinc can be worked at temperatures as low as 120 °C, and its good deformability is the basis for some of its uses. Zinc is resistant to air because of the self-protective coating formed. It is also resistant to halogens, but is rapidly corroded by HCl gas. Because of its high surface area, zinc dust is much more reactive and can even be pyrophoric, e.g., reacting vigorously at elevated temperatures with the elements oxygen, chlorine, and sulphur (Graf & Schleininger, 1997). Zinc is traded in different purity grades, which are specified by different authorities. Uses: In the industrialised countries, almost 50 % of the zinc consumed is used for corrosion protection. Commercial zinc (98.5 - 99.5 %) is usually used for hot-dip galvanising in production and jobbing plants, and high-purity zinc (99.95 %) for the continuous galvanising of steel strip or wire. The metallurgical processes used to produce the less pure grades of zinc means that lead is the main impurity present. This is an advantage, as the presence of 1 % lead reduces the surface tension of zinc by ca. 40 % compared with that of the high-grade product. The components being galvanised are therefore more effectively wetted by the molten zinc. Pressure die casting is another major area of use and is dominated by alloys of the type ZnAl4Cu1 and modifications thereof. Approximately 50 % of all zinc pressure die castings go to the automobile industry. Zinc-based chemicals, including zinc dust, account for ca. 7 % of the worldwide zinc consumption. Zinc oxide is quantitatively by far the most important zinc-based chemical product, followed by zinc dust, zinc sulphate, and zinc chloride in order of importance and quantity. All other zinc compounds are of minor importance. Calculated value: Calculated from output with share of concentrate input.
  production volume 2.52239e7 kg; = ABS(zinc_BP/copper_RP)*RP_PV
    (same comment as for silver)
  property true value 2.9899e7; name zinc_BP_true_value
  properties: water in wet mass 0 kg, carbon content, fossil 0, carbon content, non-fossil 0, price 1.04 EUR2005, wet mass 1 kg, dry mass 1 kg, water content 0, carbon content 0, carbon allocation 0 kg
- lead: 0 kg; name lead_BP; source Boliden 2006; CPC 41441: Lead, unwrought; By-product classification allocatable product; CAS 7439-92-1
  Lead is a lustrous metal. When freshly cut, surfaces are bluish white but oxidise readily to the familiar dull grey colour. Lead has four naturally occurring isotopes: 208Pb (51 - 53 %), 206Pb (23.5 - 27 %), 207Pb (20.5 - 23 %) and 204Pb (1.35 - 1.5 %). Three of the natural isotopes are radioactive (208Pb, end product of thorium decay; 206Pb and 207Pb, from uranium series). A number of unstable radioactive isotopes of Pb also exist. Lead is a preferred shielding material against gamma rays and X-rays; if sufficiently pure, it does not become radioactive when used for shielding against neutron sources (Sutherland et al., 1997). Uses: Generally toxicity concerns and substitution by plastics and copper have reduced the market considerably. Main applications of lead are the following (Sutherland et al., 1997): - Batteries: The battery market is by far the largest end use of lead. Batteries for starting, lighting and ignition (SLI) represent the predominant use of lead. Traction batteries are used to power electric vehicles. Stationary batteries are used for standby and emergency power supply. - Pigments and Lead Compounds: After batteries, the next largest use of refined lead is in glass making, ceramic glazes, plastic stabilisers, and paints. The lead pigment market is now very small. - Semi finished Products: Rolled and extruded lead, mainly sheet and pipe, account for about 8 % of total lead use. - Cable Sheathing: A major area of lead use was in the protection of electrical and telecommunications cables, but this market has declined drastically due to substitution by aluminium and plastics. - Lead Alloys: Solders, type metal, bearing alloys containing lead still account for about 4 % of the lead consumption. - Gasoline Additives: In 1972 the use of tetraethyl lead for improving the octane rating of gasoline was nearly 400’000 t/a. Since then, this sector has declined by 70 % due to restrictions through environmental legislation. - Shot and Ammunition: Shot and ammunition account for about 2 % of lead consumption and represent a steady market. - Miscellaneous: Uses that do not fall into the above categories account for about 4 % of lead use, and include products featuring the high density of lead such as wheel weights, yacht keels, ornamental items, stained glass, and massive radiation shielding. Calculated value: Calculated from output with share of concentrate input.
  production volume 1.94586e7 kg; = ABS(lead_BP/copper_RP)*RP_PV
    (same comment as for silver)
  property price 0.744 EUR2005
    Temporary price data. Calculated as 90% of purchasers price based on: Source: ecoinvent v2 report 10-part IX, Tab 5.10 & 2.5
  property carbon content 0
    carbon content on a dry matter basis (reserved; not for manual entry)
  property true value 1.65004e7; name lead_BP_true_value
    allocation property applied in "true value" allocation // value calculated from revenue
  properties: carbon content, non-fossil 0, water in wet mass 0 kg, dry mass 1 kg, wet mass 1 kg, water content 0, carbon content, fossil 0, carbon allocation 0 kg
- gold: 0 kg; name gold_BP; source Boliden 2006; By-product classification allocatable product; CPC 41320: Gold (including gold plated with platinum), unwrought or in semi-manufactured forms, or in powder form; CAS 7440-57-5
  Gold is considered a precious metal because of its rarity and corrosion resistance. Gold is often mined together with silver in polymetallic mines. Apart from copper, Gold is the only metallic element with a color different from a grey tone. It is a soft yellow metal with a moderately high melting point (1064°C) and a high electrical and thermal conductivity exceeded only among the elements by silver and copper. It is the most malleable and ductile of the metals. One ounce of gold can be beaten in to foil some 300 square feet in area. Uses: Gold is used mainly for jewellery, electronics and other industrial and decorative appliances. In electric/electronic devices, it is mostly used as connector or as solder paste (Goosey & Kellner, 2002). The latter one is typically a gold alloy incorporating Si (98%Au, 2%Si), Ge (87.5%Au, 12.5%Ge), In (82%Au, 18%In) or Sn (80%Au, 20%Sn). Literature value.
  production volume 3922.78 kg; = ABS(gold_BP/copper_RP)*RP_PV
    (same comment as for silver)
  property price 25128.4 EUR2005
    (same comment as for copper, cathode)
  property carbon content 0
    carbon content on a dry matter basis (reserved; not for manual entry)
  property true value 1.12349e8; name gold_BP_true_value
    allocation property applied in "true value" allocation // value calculated from revenue
  properties: water in wet mass 0 kg, carbon content, non-fossil 0, dry mass 1 kg, wet mass 1 kg, water content 0, carbon content, fossil 0, carbon allocation 0 kg

## Inputs from technosphere
- refinery sludge: -0.000743727 kg; name refinery_sludge_amount; source Boliden 2006; lognormal variance with pedigree 0.0421, pedigree (1,4,5,3,1)
  Proxy: Oil/waste is approximated with the exchange "refinery sludge, 89.5% water".
  Uncertainty: E
  production volume 162149 kg; = ABS(refinery_sludge_amount/copper_RP)*RP_PV
    (same comment as for silver)
  properties: heating value, net 2.45 MJ, carbon content, fossil 0.767857, wet mass 1 kg, water content 8.52381, dry mass 0.105 kg
  note on heating value, net: Value taken from the general comment of the treatment dataset.
  note on carbon content, fossil: Tab A.6, ecoinvent v2.2 report 13_I. C content has been calculated after data in the tables, and then referred to 1 kg DM
- hydrochloric acid, without water, in 30% solution state: 0.000449793 kg; = (13.499396108253* gold_BP)+(0.22738578567954* silver_BP); lognormal variance with pedigree 0.0606, pedigree (1,3,5,5,3)
  Calculated value: Data was obtained from Australian mining, scaled by produced gold and silver. Further references: Stewart M. (1999) Environmental Life Cycle Considerations for Design-Related Decision Making in Minerals Processing. PhD Thesis. University of Cape Town, Cape Town. 13.5 kg is the amount of the exchange needed when producing 1 kg of gold. 0.227 kg is the amount of the exchange needed when producing 1 kg of silver.
  Uncertainty: C
  properties: heating value, net 3.32 MJ, wet mass 1 kg, dry mass 1 kg
- sulfidic tailings, generic: -3.79859 kg; name sulfidic_tailings_amount; = (208630+(14332.721986133*gold_BP)+(244.76228384415*silver_BP)+(4.0879052110894*copper_RP)+(1.1212737127371*lead_BP)+(1.7144114215114*zinc_BP))*-1; source Boliden 2006; lognormal variance with pedigree 0.0427, pedigree (1,4,5,3,1)
  Calculated based on estimates and literature data. For the refinery landfill waste is approximated with the exchange "sulfidic tailing, off-site". For the mining estimation from dataset author: data are approximated with data from Papua New Guinea. 208630 kg is the amount of the exchange needed during rafinery operation. 14332.7 kg is the amount of the exchange needed during mining to produce 1 kg of gold. 244.7 kg is the amount of the exchange needed during mining to produce 1 kg of silver. 4.09 kg is the amount of the exchange needed during mining to produce 1 kg of copper. 1.12 kg is the amount of the exchange needed during mining to produce 1 kg of lead. 1.7kg is the amount of the exchange needed during mining to rpoduce 1 kg of copper.
  Uncertainty: E
  production volume 8.2818e8 kg; = ABS(sulfidic_tailings_amount/copper_RP)*RP_PV
    (same comment as for silver)
  properties: water content 0.428571, potassium content 0.0025181, iron content 0.015374, aluminium content 0.014738, calcium content 0.0045972, sodium content 0.0014472, dry mass 0.7 kg, silicon content 0.053273, oxygen content 0.89157, magnesium content 0.0022359, carbon content, fossil 0.0087785, wet mass 1 kg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
- diesel, burned in building machine: 0.89739 MJ; = (3386.7501677477* gold_BP)+(57.83609747468* silver_BP)+(0.96595145519383* copper_RP)+(0.26495134269525* lead_BP)+(0.40510680211408* zinc_BP); lognormal variance with pedigree 0.0433, pedigree (2,4,5,3,1)
  Calculated value: Share is calculated based on global energy consumption percentages of Boliden group. 3386.75 kg is the amount of the exchange needed when producing 1 kg of gold. 57.8 kg is the amount of the exchange needed when producing 1 kg of silver. 0.966 kg is the amount of the exchange needed when producing 1 kg of copper. 0.265 kg is the amount of the exchange needed when producing 1 kg of lead. 0.405 kg is the amount of the exchange needed when producing 1 kg of zinc.
  Uncertainty: E
  properties: heating value, net 1 MJ
- waste paperboard: -0.000145441 kg; name waste_paperboard_amount; source Boliden 2006; lognormal variance with pedigree 0.0421, pedigree (1,4,5,3,1)
  Proxy: Corrugated cardboad is approximated with exchange "waste packaging cardboard, 19.6% water".
  Uncertainty: E
  production volume 31709.5 kg; = ABS(waste_paperboard_amount/copper_RP)*RP_PV
    (same comment as for silver)
  properties: water content 0.243781, carbon content, non-fossil 0.483259, dry mass 0.804 kg, heating value, net 15.92 MJ, wet mass 1 kg
  note on carbon content, non-fossil: C content was calculated for 1 kg DM, using data in Tab A.3, ecoinvent v2.2 report 13_I.
- heat, district or industrial, natural gas: 0.505219 MJ; = 14045750+(1693.3750838739*gold_BP)+(28.91804873734* silver_BP)+(0.48297572759692* copper_RP)+(0.13247567134762* lead_BP)+(0.20255340105704* zinc_BP); source Boliden 2006; lognormal variance with pedigree 0.0433, pedigree (2,4,5,3,1)
  Calculated value: Reported amount results by weight averaging consumption amounts of the following processes, given their shares: Copper-zinc-lead refining: 1.48E07 MJ (99.96%) Gold silver refining: 5.59E03 MJ (0.04%) Estimation: Fossil fuels have a density of 40 MJ/kg. Proxy: LPG is approximated with the exchange "heat, district or industrial, natural gas". Further references: Boliden (2004) Energy and emissions for PGM production at Rönnskär. New Boliden. Calculated value: Share is calculated based on global energy consumption percentages of Boliden group. 1.4E+07 kg is the amount of the exchange needed during rafinery operation. 1693.37 kg is the amount of the exchange needed when producing 1 kg of gold. 28.9 kg is the amount of the exchange needed when producing 1 kg of silver. 0.483 kg is the amount of the exchange needed when producing 1 kg of copper. 0.132 kg is the amount of the exchange needed when producing 1 kg of lead. 0.2 kg is the amount of the exchange needed when producing 1 kg of zinc.
  Uncertainty: E
  properties: heating value, net 1 MJ
- waste graphical paper: -2.31384e-5 kg; name waste_graphical_paper_amount; source Boliden 2006; lognormal variance with pedigree 0.0421, pedigree (1,4,5,3,1)
  Proxy: Paper waste is approximated with exchange "waste paper, 11.2% water".
  Uncertainty: E
  production volume 5044.7 kg; = ABS(waste_graphical_paper_amount/copper_RP)*RP_PV
    (same comment as for silver)
  properties: wet mass 1 kg, heating value, net 14.12 MJ, carbon content, non-fossil 0.454955, water content 0.126126, dry mass 0.888 kg
- mine infrastructure, gold-silver-zinc-lead-copper: 1.04305e-10 unit; = (3.9364795347797E-07*gold_BP)+(6.7223917562248E-09* silver_BP)+(1.1227424364431E-10* copper_RP)+(3.079576250308E-11* lead_BP)+(4.708627908573E-11* zinc_BP); lognormal variance with pedigree 0.3427, pedigree (2,4,5,3,1)
  Literature value. 3.93E-07 kg is the amount of the exchange needed when producing 1 kg of gold. 6.72E-09 kg is the amount of the exchange needed when producing 1 kg of silver. 1.12E-10 kg is the amount of the exchange needed when producing 1 kg of copper. 3.08E-11 kg is the amount of the exchange needed when producing 1 kg of lead. 4.7E-11 kg is the amount of the exchange needed when producing 1 kg of zinc.
  Uncertainty: E
- electricity, medium voltage: 4.98454 kWh; = 495300000+(11289.232833818* gold_BP)+(192.78811198089* silver_BP)+(3.2198568963534* copper_RP)+(0.88317627494457* lead_BP)+(1.3503638547601* zinc_BP); source Boliden 2006; lognormal variance with pedigree 0.0421, pedigree (1,4,5,3,1)
  Calculated value: Reported amount results by weight averaging consumption amounts of the following processes, given their shares: Copper-zinc-lead refining: 4.95E08 KWh (99.67%) Gold silver refining: 1.62E06 KWh (0.33%) Further references: Boliden (2004) Energy and emissions for PGM production at Rönnskär. New Boliden. Calculated value: Share is calculated based on global energy consumption percentages of Boliden group. 4.95E+08 kg is the amount of the exchange needed during rafinery operation. 11289.2 kg is the amount of the exchange needed when producing 1 kg of gold. 192.79 kg is the amount of the exchange needed when producing 1 kg of silver. 3.22 kg is the amount of the exchange needed when producing 1 kg of copper. 0.883 kg is the amount of the exchange needed when producing 1 kg of lead. 1.35* kg is the amount of the exchange needed when producing 1 kg of zinc.
  Uncertainty: E
- municipal solid waste: -0.000694148 kg; name MSW_amount; source Boliden 2006; lognormal variance with pedigree 0.0421, pedigree (1,4,5,3,1)
  Proxy: "municipal solid waste, 22.9% water" is used as a proxy for Combustible waste.
  Uncertainty: E
  production volume 151340 kg; = ABS(MSW_amount/copper_RP)*RP_PV
    (same comment as for silver)
  properties: carbon content, fossil 0.171549, wet mass 1 kg, heating value, net 11.74 MJ, dry mass 0.771 kg, carbon content, non-fossil 0.261655, water content 0.297017
  note on carbon content, fossil: MSW composition in tab 4.1, ecoinvent v2.2 report 13_I. C content referred to 1 kg DM
- heat, district or industrial, other than natural gas: 4.88818 MJ; = 657195000+((6209.009170208+2257.7678371729)* gold_BP)+((38.556277917828+106.03228517093)* silver_BP)+((1.7709016450017+0.64394892442195)* copper_RP)+((0.48574156196107+0.17662909583641)* lead_BP)+((0.74269188001922+0.2700633536962)* zinc_BP); source Boliden 2006; lognormal variance with pedigree 0.0427, pedigree (1,4,5,3,1)
  Calculated based on literature values and estimates. Estimation: Fossil fuels have a density of 40 MJ/kg. Further references: Boliden (2004) Energy and emissions for PGM production at Rönnskär. New Boliden. Calculated value: Share is calculated based on global energy consumption percentages of Boliden group.
  Uncertainty: E
  property corresponding fuel use, propane, furnace >100kW 0 MJ; name fuel_use
  properties: heating value, net 1 MJ
  note on corresponding fuel use, propane, furnace >100kW: Lower heating value of the fuel input related to the heat/electricity output, taken directly from ecoinvent v3.0 dataset "heat production, natural gas, at industrial furnace >100kW, GLO 2000".
- sulfuric acid: 2.19416e-5 kg; = (0.65851979422948*gold_BP)+(0.011092202910088* silver_BP); lognormal variance with pedigree 0.0606, pedigree (1,3,5,5,3)
  Calculated value: Data was obtained from Australian mining, scaled by produced gold and silver. Further references: Stewart M. (1999) Environmental Life Cycle Considerations for Design-Related Decision Making in Minerals Processing. PhD Thesis. University of Cape Town, Cape Town. 0.66 kg is the amount of the exchange needed when producing 1 kg of gold. 0.011 kg is the amount of the exchange needed when producing 1 kg of silver.
  Uncertainty: C
  properties: dry mass 1 kg, wet mass 1 kg
- tap water: 0.000358455 kg; name tap_water_input; = (1.3528105569224* gold_BP)+(0.023102171509442* silver_BP)+(0.00038584166570804* copper_RP)+(0.00010583271741808* lead_BP)+(0.00016181670670602* zinc_BP); lognormal variance with pedigree 0.0447, pedigree (2,4,5,3,1)
  Literature value. 1.35 kg is the amount of the exchange needed during mining to produce 1 kg of gold. 0.023 kg is the amount of the exchange needed during mining to produce 1 kg of silver. 0.00038 kg is the amount of the exchange needed during mining to produce 1 kg of copper. 0.000106 kg is the amount of the exchange needed during mining to produce 1 kg of lead. 0.00016 kg is the amount of the exchange needed during mining to rpoduce 1 kg of copper.
  Uncertainty: E
  properties: dry mass 0.000337476 kg, water content 2962.17, wet mass 1 kg, carbon content, fossil 0.00178991
- blasting: 0.107706 kg; = (406.48087676135* gold_BP)+(6.9415417274778* silver_BP)+(0.11593438398712* copper_RP)+(0.03179970436068*lead_BP)+(0.048621291783925*zinc_BP); lognormal variance with pedigree 0.0433, pedigree (2,4,5,3,1)
  Estimated value. 406.48 kg is the amount of the exchange needed when producing 1 kg of gold. 6.94 kg is the amount of the exchange needed when producing 1 kg of silver. 0.116 kg is the amount of the exchange needed when producing 1 kg of copper. 0.0318 kg is the amount of the exchange needed when producing 1 kg of lead. 0.048 kg is the amount of the exchange needed when producing 1 kg of zinc.
  Uncertainty: A
- zinc: 9.54478e-5 kg; = (2.8646208901812* gold_BP)+(0.048252089690858* silver_BP); lognormal variance with pedigree 0.0606, pedigree (1,3,5,5,3)
  Calculated value: Data was obtained from Australian mining, scaled by produced gold. Further references: Stewart M. (1999) Environmental Life Cycle Considerations for Design-Related Decision Making in Minerals Processing. PhD Thesis. University of Cape Town, Cape Town. 2.86 kg is the amount of the exchange needed when producing 1 kg of gold. 0.048 kg is the amount of the exchange needed when producing 1 kg of silver.
  Uncertainty: C
  properties: wet mass 1 kg, dry mass 1 kg
- anode refinery: 1.07287e-10 unit; lognormal variance with pedigree 0.508025, pedigree (5,5,5,2,4)
  Estimation from dataset author.
  Uncertainty: R
- precious metal refinery: 3.02533e-10 unit; lognormal variance with pedigree 0.508025, pedigree (5,5,5,2,4)
  Estimation from dataset author.
  Uncertainty: R
- waste wood, untreated: -0.00157011 kg; name waste_wood_amount; source Boliden 2006; lognormal variance with pedigree 0.0421, pedigree (1,4,5,3,1)
  Proxy: Wood waste is approximated with exchange "waste wood, untreated, 20% water".
  Uncertainty: E
  production volume 342320 kg; = ABS(waste_wood_amount/copper_RP)*RP_PV
    (same comment as for silver)
  properties: carbon content, non-fossil 0.48632, heating value, net 13.99 MJ, wet mass 1 kg, dry mass 0.8 kg, water content 0.25
  note on carbon content, non-fossil: Tab A.4, ecoinvent v2.2 report 13_I. C content has been referred to 1 kg DM,
- charcoal: 0.18071 kg; = 44766000+(16.791813911877*gold_BP)+(0.28284374861793*silver_BP); source Boliden 2006; lognormal variance with pedigree 0.0421, pedigree (1,4,5,3,1)
  Estimation: No carbon is used for the gold/silver purification step. Proxy: "charcoal" is used as a proxy for Carbon. 4.47E+07 kg is the amount of the exchange needed during rafinery operation. 16.8 kg is the amount of the exchange needed when producing 1 kg of gold. 0.28 kg is the amount of the exchange needed when producing 1 kg of silver.
  Uncertainty: E
  properties: heating value, net 28.4 MJ, carbon content, non-fossil 0.8, wet mass 1 kg, dry mass 1 kg
  note on heating value, net: Indicative value. Reference: Fuels - Higher and Lower Calorific Values, available at: https://www.engineeringtoolbox.com/fuels-higher-calorific-values-d_169.html
- lime, packed: 0.00968712 kg; = 1889200+(62.559561619325*gold_BP)+(1.0537623280704* silver_BP); source Boliden 2006; lognormal variance with pedigree 0.0606, pedigree (1,3,5,5,3)
  Estimation: No lime is used for the gold/silver purification step. In the mining step calculated value: data were obtained from Australian mining, scaled by produced gold and silver. Further references: Stewart M. (1999) Environmental Life Cycle Considerations for Design-Related Decision Making in Minerals Processing. PhD Thesis. University of Cape Town, Cape Town. 1.889E+06 kg is the amount of the exchange needed during rafinery operation. 62.56 kg is the amount of the exchange needed when producing 1 kg of gold. 1.053 kg is the amount of the exchange needed when producing 1 kg of silver.
  Uncertainty: C
  properties: dry mass 0.998 kg, water content 0.00200401, wet mass 1 kg, carbon content, fossil 0.117492
  note on carbon content, fossil: Table 3.1, ecoinvent v2.2 report 7, part VII, pg 3. MW CaCO3=100, MW MgCO3=84
- sodium cyanide: 0.00093166 kg; = (27.961395660926* gold_BP)+(0.47098580337004* silver_BP); lognormal variance with pedigree 0.0606, pedigree (1,3,5,5,3)
  Estimation: Cyanide consumption is estimated with the average of US data from Barrick and Newmont (scaled by production). Proxy: "sodium cyanide" is used as a proxy for Cyanide. Further references: Newmont (2005b) Now & Beyond: Sustainability Reports. Newmont Mining Corporation. Retrieved from <http://www.newmont.com/en/social/reporting/index.asp> 27.96 kg is the amount of the exchange needed when producing 1 kg of gold. 0.47 kg is the amount of the exchange needed when producing 1 kg of silver.
  Uncertainty: C
  properties: wet mass 1 kg, carbon content, fossil 0.244898, heating value, net 7.43 MJ, dry mass 1 kg
- oxygen, liquid: 0.374845 kg; source Boliden 2006; lognormal variance with pedigree 0.0421, pedigree (1,4,5,3,1)
  Calculated value: Reported value is 6.90E07 Nm3. Value in this dataset results from recalculating the reported value with an average Oxygen density of 1.25 kg/m3.
  Uncertainty: E
  properties: dry mass 1 kg, wet mass 1 kg
- sodium hydroxide, without water, in 50% solution state: 0.0764106 kg; = 18892000+(11.524186982778*gold_BP)+(0.19411507673256*silver_BP); lognormal variance with pedigree 0.0421, pedigree (1,4,5,3,1)
  Calculated based on literature value and estimates. No caustic soda is used for the gold/silver purification step. Proxy: "sodium hydroxide, without water, in 50% solution state" is used as a proxy for Caustic soda. Calculated value: Data was obtained from Australian mining, scaled by produced gold and silver. Further references: Stewart M. (1999) Environmental Life Cycle Considerations for Design-Related Decision Making in Minerals Processing. PhD Thesis. University of Cape Town, Cape Town. 1.889E+07 kg is the amount of the exchange needed during rafinery operation. 11.52 kg is the amount of the exchange needed when producing 1 kg of gold. 0.194 kg is the amount of the exchange needed when producing 1 kg of silver.
  Uncertainty: E
  properties: dry mass 1 kg, wet mass 1 kg, heating value, net 3.03 MJ
- ammonia, anhydrous, liquid: 0.0056195 kg; source Boliden 2006; lognormal variance with pedigree 0.0421, pedigree (1,4,5,3,1)
  Estimation: No amonia is used for the gold/silver purification step.
  Uncertainty: E
  properties: wet mass 1 kg, dry mass 1 kg

## Inputs from nature
- Zinc, in ground [natural resource, in ground]: 0.128551 kg; = 1.111126364198*zinc_BP; lognormal variance with pedigree 0.0433, pedigree (2,4,5,3,1)
  0.63% Zn in ore; Calculated value. The recovery rate (proportion of valuable material physically recovered in the processing of ore) is taken into account in order to define the resource extraction. It is estimated to be 90% on the basis of global data. The average concentration (head grade, expressed in kg metal per kg ore) of metals in ore for Sweden is calculated with the quantity of ore milled and the corresponding production rate. 1.11 kg is the amount of Zinc, Zn 0.63%, Ag 9.7E-4%, Au 9.7E-4%, 0.63%, Cu 0.38%, Pb 0.014%, in ore, in ground needed to produce 1kg of zinc.
- Water, well, in ground [natural resource, in water]: 0.00143383 m3; name water_well_in_ground_input; = (5.4112815924849*gold_BP)+(0.092409358276945* silver_BP)+(0.0015433778902565* copper_RP)+(0.00042333394924858* lead_BP)+(0.00064727153545199* zinc_BP); lognormal variance with pedigree 0.0527, pedigree (2,4,5,3,1)
  Calculated value: Share is calculated based on global water consumption percentages of Boliden group. 5.4 kg is the amount of the exchange needed during rafinery operation. 0.092 kg is the amount of the exchange needed when producing 1 kg of gold. 0.0015 kg is the amount of the exchange needed when producing 1 kg of silver. 0.0197 kg is the amount of the exchange needed when producing 1 kg of copper. 0.00042 kg is the amount of the exchange needed when producing 1 kg of lead. 0.000647 kg is the amount of the exchange needed when producing 1 kg of zinc.
  Uncertainty: E
- Copper, in ground [natural resource, in ground]: 0.820506 kg; = 1.1111123892787*copper_RP; lognormal variance with pedigree 0.0433, pedigree (2,4,5,3,1)
  0.38 Cu in ore; Calculated value. The recovery rate (proportion of valuable material physically recovered in the processing of ore) is taken into account in order to define the resource extraction. It is estimated to be 90% on the basis of global data. The average concentration (head grade, expressed in kg metal per kg ore) of metals in ore for Sweden is calculated with the quantity of ore milled and the corresponding production rate. 1.11 kg is the amount of Copper, Cu 0.38%, Au 9.7E-4%, Ag 9.7E-4%, Zn 0.63%, Pb 0.014%, in ore, in ground needed to produce 1kg of copper.
- Water, river [natural resource, in water]: 0.00824428 m3; name water_river_input; = (31.113934242899* gold_BP)+(0.53133784441201* silver_BP)+(0.0088741562176464* copper_RP)+(0.0024340970682434*lead_BP)+(0.0037216994989361* zinc_BP); lognormal variance with pedigree 0.0527, pedigree (2,4,5,3,1)
  Literature value; share is calculated based on global water consumption percentages of Boliden group. 31.1 kg is the amount of the exchange needed when producing 1 kg of gold. 0.53 kg is the amount of the exchange needed when producing 1 kg of silver. 0.0089 kg is the amount of the exchange needed when producing 1 kg of copper. 0.0024 kg is the amount of the exchange needed when producing 1 kg of lead. 0.0037 kg is the amount of the exchange needed when producing 1 kg of zinc.
  Uncertainty: E
- Water, salt, ocean [natural resource, in water]: 0.0182843 m3; name water_salt_ocean_input; = 816.99+(68.992708566316*gold_BP)+(1.1781999911547*silver_BP)+(0.01967774531232*copper_RP)+(0.0053974193151022*lead_BP)+(0.0082525767039605*zinc_BP); source Boliden 2004; lognormal variance with pedigree 0.188, pedigree (4,5,5,5,5)
  Calculated based on literature values; share is calculated based on global water consumption percentages of Boliden group. Sea water is approximated with the exchange "water, salt, ocean". 816.99 kg is the amount of the exchange needed during rafinery operation. 68.99 kg is the amount of the exchange needed when producing 1 kg of gold. 1.18 kg is the amount of the exchange needed when producing 1 kg of silver. 0.0197 kg is the amount of the exchange needed when producing 1 kg of copper. 0.0054 kg is the amount of the exchange needed when producing 1 kg of lead. 0.0082 kg is the amount of the exchange needed when producing 1 kg of zinc.
  Uncertainty: E
- Lead, in ground [natural resource, in ground]: 0.0991671 kg; = 1.1111111111111*lead_BP; lognormal variance with pedigree 0.0433, pedigree (2,4,5,3,1)
  140 ppm Pb in ore; Calculated value. The recovery rate (proportion of valuable material physically recovered in the processing of ore) is taken into account in order to define the resource extraction. It is estimated to be 90% on the basis of global data. The average concentration (head grade, expressed in kg metal per kg ore) of metals in ore for Sweden is calculated with the quantity of ore milled and the corresponding production rate. 1.11 kg is the amount of Lead, Pb 0.014%, Au 9.7E-4%, Ag 9.7E-4%, Zn 0.63%, Cu 0.38%, in ore, in ground needed to produce 1kg of lead.
- Silver, in ground [natural resource, in ground]: 0.00101106 kg; = 1.1111405952855*silver_BP; lognormal variance with pedigree 0.0433, pedigree (2,4,5,3,1)
  9.7 ppm Ag in ore; Calculated value. The recovery rate (proportion of valuable material physically recovered in the processing of ore) is taken into account in order to define the resource extraction. It is estimated to be 90% on the basis of global data. The average concentration (head grade, expressed in kg metal per kg ore) of metals in ore for Sweden is calculated with the quantity of ore milled and the corresponding production rate. 1.11 kg is the amount of Silver, Ag 9.7E-4%, Au 9.7E-4%, Zn 0.63%, Cu 0.38%, Pb 0.014%, in ore, in ground needed to produce 1kg of silver.
- Gold, in ground [natural resource, in ground]: 1.99918e-5 kg; = 1.1111160814136*gold_BP; lognormal variance with pedigree 0.0433, pedigree (2,4,5,3,1)
  9.7 ppm Au in ore; Calculated value. The recovery rate (proportion of valuable material physically recovered in the processing of ore) is taken into account in order to define the resource extraction. It is estimated to be 90% on the basis of global data. The average concentration (head grade, expressed in kg metal per kg ore) of metals in ore for Sweden is calculated with the quantity of ore milled and the corresponding production rate. 1.11 kg is the amount of Gold, Au 9.7E-4%, Ag 9.7E-4%, Zn 0.63%, Cu 0.38%, Pb 0.014%, in ore, in ground needed to produce 1kg of gold.

## Emissions to nature
- Lead [air, non-urban air or from high stacks]: 0.000112417 kg; = 27927+(0.00011856873182733* gold_BP)+(0.0000020248180089337* silver_BP)+(3.3817563556885E-08*copper_RP)+(9.2758376447401E-09*lead_BP)+(1.4182622692017E-08*zinc_BP); source Boliden 2006; lognormal variance with pedigree 0.6921, pedigree (1,4,5,3,1)
  Calculated value based on literature. Total emissions were obtained by scaling emission values for Atik Mine by total milled ore. 27927 kg is the amount of the exchange needed during rafinery operation. 0.000118 kg is the amount of the exchange needed when producing 1 kg of gold. 0.000002 kg is the amount of the exchange needed when producing 1 kg of silver. 3.38E-08 kg is the amount of the exchange needed when producing 1 kg of copper. 9.27E-09 kg is the amount of the exchange needed when producing 1 kg of lead. 1.42E-08* kg is the amount of the exchange needed when producing 1 kg of zinc.
  Uncertainty: E
- Nickel, ion [water, ocean]: 6.28029e-7 kg; source Boliden 2006; lognormal variance with pedigree 0.6921, pedigree (1,4,5,3,1)
  Literature value.
  Uncertainty: E
- Water [water, unspecified]: 0.0237684 m3; = (tap_water_input/1000)*(1-fraction_TW_to_air)+water_river_input*(1-fraction_PW_to_air)+water_salt_ocean_input*(1-fraction_PW_to_air)+water_well_in_ground_input*(1-fraction_PW_to_air); lognormal variance with pedigree 0.0807, pedigree (2,2,5,1,1)
  Calculated value based on literature values and expert opinion. See comments in the parametres" comment field.
- Particulates, > 10 um [air, non-urban air or from high stacks]: 8.46225e-6 kg; source Boliden 2006; lognormal variance with pedigree 0.0821, pedigree (1,4,5,3,1)
  Calculated value: Based on standard data for non-rerrous metal industry, particulates fractions are determined to be 82% PM2.5 and 92% PM10. This percentages apply to the total dust emissions reported, which result from weight averaging the dust emissions amounts of the following processes, given their shares: Copper-zinc-lead refining: 2.63E04 kg (99.75%) Gold silver refining: 6.45E01 kg (0.25%) Further references: <http://www.iiasa.ac.at/~rains/cgi-bin/rains_pm>, retrieved 6.4.2004). Boliden (2004) Energy and emissions for PGM production at Rönnskär. New Boliden.
  Uncertainty: C
- Mercury [air, non-urban air or from high stacks]: 4.29712e-7 kg; source Boliden 2006; lognormal variance with pedigree 0.6921, pedigree (1,4,5,3,1)
  LIterature value.
  Uncertainty: E
- Mercury [water, ocean]: 4.62752e-7 kg; source Boliden 2006; lognormal variance with pedigree 0.6921, pedigree (1,4,5,3,1)
  Literature value.
  Uncertainty: E
- Cadmium [air, non-urban air or from high stacks]: 2.31384e-7 kg; source Boliden 2006; lognormal variance with pedigree 0.6921, pedigree (1,4,5,3,1)
  Literature value.
  Uncertainty: E
- Cadmium, ion [water, ocean]: 1.98332e-7 kg; source Boliden 2006; lognormal variance with pedigree 0.3421, pedigree (1,4,5,3,1)
  Literature value.
  Uncertainty: E
- Arsenic, ion [water, ocean]: 3.96661e-6 kg; source Boliden 2006; lognormal variance with pedigree 0.6921, pedigree (1,4,5,3,1)
  Literature value.
  Uncertainty: E
- Particulates, < 2.5 um [air, non-urban air or from high stacks]: 8.67352e-5 kg; source Boliden 2006; lognormal variance with pedigree 0.3421, pedigree (1,4,5,3,1)
  (same comment as for Particulates, > 10 um)
- Selenium [air, non-urban air or from high stacks]: 6.48915e-8 kg; source Boliden 2006; lognormal variance with pedigree 0.6921, pedigree (1,4,5,3,1)
  Calculated value: Data for PGM plant was allocated to gold/silver production. Further references: Boliden (2004) Energy and emissions for PGM production at Rönnskär. New Boliden.
  Uncertainty: E
- Zinc, ion [water, ocean]: 7.93306e-6 kg; source Boliden 2006; lognormal variance with pedigree 0.6921, pedigree (1,4,5,3,1)
  Literature value.
  Uncertainty: E
- Particulates, > 2.5 um, and < 10um [air, non-urban air or from high stacks]: 1.05778e-5 kg; source Boliden 2006; lognormal variance with pedigree 0.1621, pedigree (1,4,5,3,1)
  (same comment as for Particulates, > 10 um)
- Arsenic [air, non-urban air or from high stacks]: 7.60266e-7 kg; source Boliden 2006; lognormal variance with pedigree 0.6921, pedigree (1,4,5,3,1)
  Literature value.
  Uncertainty: E
- Carbon dioxide, fossil [air, non-urban air or from high stacks]: 0.0172328 kg; = (65.036546633863*gold_BP)+(1.1106399540047*silver_BP)+(0.018549389163695*copper_RP)+(0.0050879219019463*lead_BP)+(0.0077793595991489*zinc_BP); lognormal variance with pedigree 0.0433, pedigree (2,4,5,3,1)
  Calculated value: CO2 emissions from explosives are calculated with the factor of the mines of Newmont (0.16 kg CO2 per kg explosive). 65.03 kg is the amount of the exchange needed when producing 1 kg of gold. 1.11 kg is the amount of the exchange needed when producing 1 kg of silver. 0.018 kg is the amount of the exchange needed when producing 1 kg of copper. 0.0050 kg is the amount of the exchange needed when producing 1 kg of lead. 0.008 kg is the amount of the exchange needed when producing 1 kg of zinc.
- Lead [water, surface water]: 7.08232e-7 kg; = (0.0026728696041154* gold_BP)+(0.000045645040024767* silver_BP)+(7.6234211434488E-07* copper_RP)+(2.0910322739591E-07* lead_BP)+(3.1971583499211E-07* zinc_BP); lognormal variance with pedigree 0.6927, pedigree (2,4,5,3,1)
  Calculated value based on literature. Total emissions were obtained by scaling emission values for Atik Mine by total milled ore. 0.0027 kg is the amount of the exchange needed when producing 1 kg of gold. 0.000045 kg is the amount of the exchange needed when producing 1 kg of silver. 7.62E-07 kg is the amount of the exchange needed when producing 1 kg of copper. 2.09E-07 kg is the amount of the exchange needed when producing 1 kg of lead. 3.2E-07* kg is the amount of the exchange needed when producing 1 kg of zinc.
  Uncertainty: E
- Lead [water, ocean]: 1.68581e-6 kg; source Boliden 2006; lognormal variance with pedigree 0.6921, pedigree (1,4,5,3,1)
  Literature value.
  Uncertainty: E
- Copper, ion [water, ocean]: 2.87303e-6 kg; = 386.05+(0.0049796466114963*gold_BP)+(0.000085038255716244*silver_BP)+(0.0000014202691821005*copper_RP)+(3.8956639566396E-07*lead_BP)+(5.9564143043448E-07*zinc_BP); source Boliden 2006; lognormal variance with pedigree 0.3421, pedigree (1,4,5,3,1)
  Literature value. 386.05 kg is the amount of the exchange needed during rafinery operation. 0.00498 kg is the amount of the exchange needed when producing 1 kg of gold. 0.000085 kg is the amount of the exchange needed when producing 1 kg of silver. 0.00000142 kg is the amount of the exchange needed when producing 1 kg of copper. 3.89E-07 kg is the amount of the exchange needed when producing 1 kg of lead. 5.96E-07* kg is the amount of the exchange needed when producing 1 kg of zinc.
  Uncertainty: E
- Zinc, ion [water, surface water]: 1.12858e-5 kg; = (0.042592708566316* gold_BP)+(0.00072736278802353* silver_BP)+(0.000012148073162315* copper_RP)+(0.0000033321015028332* lead_BP)+(0.000005094735397076* zinc_BP); lognormal variance with pedigree 0.6927, pedigree (2,4,5,3,1)
  Calculated based on literature value. 0.0426 kg is the amount of the exchange needed when producing 1 kg of gold. 0.00073 kg is the amount of the exchange needed when producing 1 kg of silver. 0.000012 kg is the amount of the exchange needed when producing 1 kg of copper. 0.0000033 kg is the amount of the exchange needed when producing 1 kg of lead. 0.000005094735397076 kg is the amount of the exchange needed when producing 1 kg of zinc.
  Uncertainty: E
- Zinc [air, non-urban air or from high stacks]: 1.68848e-5 kg; = 4189.1+(0.00010067152762246* gold_BP)+(0.0000017191844677369* silver_BP)+(2.8713015069596E-08* copper_RP)+(7.8757083025376E-09* lead_BP)+(1.2041845013385E-08*zinc_BP); source Boliden 2006; lognormal variance with pedigree 0.6921, pedigree (1,4,5,3,1)
  Calculated based on literature value. Total emissions were obtained by scaling emission values for Atik Mine by total milled ore. 4189.1 kg is the amount of the exchange needed during rafinery operation. 0.0001 kg is the amount of the exchange needed when producing 1 kg of gold. 0.0000017 kg is the amount of the exchange needed when producing 1 kg of silver. 2.87E-08 kg is the amount of the exchange needed when producing 1 kg of copper. 7.87E-09 kg is the amount of the exchange needed when producing 1 kg of lead. 1.2E-08 kg is the amount of the exchange needed when producing 1 kg of zinc.
  Uncertainty: E
- Water [air, unspecified]: 0.00419442 m3; = (tap_water_input/1000*fraction_TW_to_air)+(water_river_input*fraction_PW_to_air)+(water_salt_ocean_input*fraction_PW_to_air)+(water_well_in_ground_input*fraction_PW_to_air); lognormal variance with pedigree 0.0807, pedigree (2,2,5,1,1)
  (same comment as for Water)
- Copper [air, non-urban air or from high stacks]: 4.72414e-6 kg; = 1149.9+(0.00036465578170432*gold_BP)+(0.0000062272876033789*silver_BP)+(1.0400524559991E-07*copper_RP)+(2.8527654594728E-08*lead_BP)+(4.3618374631066E-08*zinc_BP); source Boliden 2006; lognormal variance with pedigree 0.6921, pedigree (1,4,5,3,1)
  Literature value. Total emissions were obtained by scaling emission values for Atik Mine by total milled ore. 1149.9 kg is the amount of the exchange needed during rafinery operation. 0.00036 kg is the amount of the exchange needed when producing 1 kg of gold. 0.0000062 kg is the amount of the exchange needed when producing 1 kg of silver. 1.04E-07 kg is the amount of the exchange needed when producing 1 kg of copper. 2.8E-08 kg is the amount of the exchange needed when producing 1 kg of lead. 4.36E-08 kg is the amount of the exchange needed when producing 1 kg of zinc.
  Uncertainty: E
- Dioxins, measured as 2,3,7,8-tetrachlorodibenzo-p-dioxin [air, non-urban air or from high stacks]: 7.27227e-12 kg; source Boliden 2006; lognormal variance with pedigree 0.3421, pedigree (1,4,5,3,1)
  Literature value.
  Uncertainty: E

## Sampling procedure
environmental report

## Extrapolations
See Geography, air emissions are estimated with data of one mine
