# distribution network construction, electricity, low voltage

Dataset: EcoSpold 2, unit process
Geography: CA-QC
Time period: 2008-01-01 to 2021-12-31
Technology level: current
Classification: ISIC rev.4 ecoinvent: 4220:Construction of utility projects
Classification: EcoSpold01Categories: electricity/distribution
Scenario: Business-as-Usual
System model: Allocation, cut-off by classification
Share of production covered: 100 %
Generated by: Pablo Tirado
Database: ecoinvent
isCopyrightProtected: true
accessRestrictedTo: 1

## General comment
This dataset represents the construction of the infrastructure (poles, cables, transforming substations etc.) of the electricity low voltage transmission network in Quebec. This dataset is based on study on the production, transport and distribution of electricity in Quebec. It represents the total of all the infrastrucutres that belong to Hydro-Quebec, which is the only transporter and distributor of electricity in the region. The inventory is based on distribution lines and substations to transform high voltage to medium lines and substations of the company. In 2014, the distribution network, that includes the medium and low voltage, counts 115583 km of lines and more than 2.7 million of poles (mostly wooden poles treated to CCA and PCP). As most data were no differentiatied in the data collection, low voltage and medium voltage were split based on the amount of energy delivered at each voltage.
[This dataset was already contained in the ecoinvent database version 2. It was not individually updated during the transfer to ecoinvent version 3. Life Cycle Impact Assessment results may still have changed, as they are affected by changes in the supply chain, i.e. in other datasets. This dataset was generated following the ecoinvent quality guidelines for version 2. It may have been subject to central changes described in the ecoinvent version 3 change report (http://www.ecoinvent.org/database/ecoinvent-version-3/reports-of-changes/), and the results of the central updates were reviewed extensively. The changes added e.g. consistent water flows and other information throughout the database. The documentation of this dataset can be found in the ecoinvent reports of version 2, which are still available via the ecoinvent website. The change report linked above covers all central changes that were made during the conversion process.]

## Included activities start
From reception of materials and construction operations.

## Included activities end
The activity ends with the operation of the transmission network.
It includes:
- Land use associated to lines and substations ;
- main materials used for poles and cable construction;
- direct emissions to air (SF6) and to soil (leakage of treating substances from poles);
- waste treatment of materials
It doesn"t include:
- minor activities, materials and wastes.

## Geography
The calculations are based on Swiss data

## Technology
The distribution network includes the current tecnology on poles, cables and transformers.It includes the medium and the low voltages.
Definition of the voltage levels (according to Hydro-Quebec):
- High voltage level above 35 kV (large scale industry)
- Medium voltage level nominal voltage between phases is 750 V- 34.5 kV (medium to small scale industry, service sector
- Low voltage level below 750 V (Households)

## Time period
Operation data were collected for the 2008-2013 period.

## Parameters
- number of poles: 2.72e6 unit; name qty_poles; lognormal variance with pedigree 0.0012, pedigree (2,1,1,1,1)
  Measured data. Number of poles in the medium/low voltage network
- fraction: 0.829458 dimensionless; = 89423/(18386+89423); lognormal variance with pedigree 0.04, pedigree (5,1,1,1,1)
  Calculated/Estimated value. This parameter is used to split the common flows between the medium and the low voltage networks, as Hydro-Quebec data collection was made as a whole (the same division manages both networks).
  The split is based on the consumed energy at each voltage. This amounts have been estimated based on the consumption per electricity rate.
  LV MV HV TOTAL
  Consumed Electricity (GWh) 89 423 18 386 62 632 170 440
  Source: http://www.regie-energie.qc.ca/audiences/3541-04/RepHqdDDR/HQD-14_doc09_3541_01nov04.pdf Table R-28.4
- net electricity production in 2008: 1.04816e11 kWh; name net_electricity_2008; = 199649970000*(1-10.8%-36.7%); lognormal variance with pedigree 0.0006, pedigree (1,1,1,1,1)
  Calculated value. Sum of produced and imported energy in 2008 minus losses and used at higher voltages.
  LV MV HV TOTAL
  Consumed Electricity (GWh) 89 423 18 386 62 632 170 440
  % of total consumed 52% 11% 37%
  The total consumed per voltage includes the losses and the consumption at each level.
  Source: http://www.regie-energie.qc.ca/audiences/3541-04/RepHqdDDR/HQD-14_doc09_3541_01nov04.pdf

## Reference product
- distribution network, electricity, low voltage: 1 km; name amount_RP; CPC 532: Civil engineering works; By-product classification allocatable product
  production volume 1901.93 km; name apv_RP; = fraction*total_length_network/lifetime
    Calculated value. Total amount of kilometres divided by lifetime
  property lifetime 50 year; name lifetime
    LIterature value. Based on expert estimations from Hydro-Quebec
  property price 929713 EUR2005
    Assumed to be eqaul to 'transmission network, electricity, medium voltage'.
  property total length of network 114649 km; name total_length_network
    LIterature value.

## Inputs from technosphere
- inert waste, for final disposal: -38608.1 kg; name inert_waste; = (ceramic+ gravel)*-1; lognormal variance with pedigree 0.44, pedigree (5,5,5,5,1)
  Estimated value. It is assumed that the same quantity that enter is produced as a waste
  Uncertainty: e
  production volume 734298 kg; = inert_waste* apv_RP*0.01/ amount_RP
    Calculated from production volume of reference product using the relative outputs.
  property price 0 EUR2005; name inert_waste_price_EUR2005
  properties: dry mass 0.995 kg, water content 0.00502513, wet mass 1 kg
- steel, unalloyed: 1153.5 kg; name steel; = fraction* steel_amount1/(total_length_network); lognormal variance with pedigree 0.002, pedigree (1,1,3,1,1)
  Calculated value. Total amount divided by the total number of kilometres in the network
  Uncertainty: C
  property amount 1 of flow in kg 1.59438e8 kg; name steel_amount1
  properties: carbon content, fossil 0.0025, dry mass 1 kg, wet mass 1 kg
  note on carbon content, fossil: Unalloyed steels or carbon steels are those in which the level of an individual element in no case reaches or exceeds the limiting concentration given in Tab. 3.1 ecoinvent v2.2 report 10_partII. Assumed to have a C content of 0.25%
  note on amount 1 of flow in kg: Measured value. Total amount of steel in the network. Used in transformers, regulators, switches, breakers and fuse cut-out
- sanitary ceramics: 38.1389 kg; name ceramic; = fraction* ceramic_amount/(total_length_network); lognormal variance with pedigree 0.002, pedigree (1,1,3,1,1)
  (same comment as for steel, unalloyed)
  property amount 1 of flow in kg 5.27162e6 kg; name ceramic_amount
  properties: dry mass 1 kg, wet mass 1 kg
  note on amount 1 of flow in kg: Measured value. Total amount of ceramics in the network. Used in isolating switch and fuse cut-out
- wood preservation, vacuum pressure method, inorganic salt, containing Cr, outdoor use, ground contact: 198.599 kg; = fraction* wood_preservCCA_amount1_1* lifetime/wood_lifetime_1* wood_amount1/(total_length_network*wood_WM); lognormal variance with pedigree 0.002, pedigree (1,1,3,1,1)
  Calculated value. Total amount divided by the total number of kilometres in the network. Lifetime of wood has been taken into account in the calculation
  Uncertainty: C
  property amount 1 of flow in kg 17.8165 kg; name wood_preservCCA_amount1_1
  note on amount 1 of flow in kg: Literature value. Quantity (kg) per m3 of wood. Source: ecoinvent
- building, hall, steel construction: 0.0557 m2; lognormal variance with pedigree 0.148, pedigree (5,5,5,5,3)
  Estimated value. Extrapolated from ecoinvent GLO dataset
  Uncertainty: e
- gravel, crushed: 38569.9 kg; name gravel; = fraction*gravel_amount1/(total_length_network); lognormal variance with pedigree 0.002, pedigree (1,1,3,1,1)
  (same comment as for steel, unalloyed)
  property amount 1 of flow in kg 5.3312e9 kg; name gravel_amount1; = 1.96e3*qty_poles
  properties: wet mass 1 kg, dry mass 1 kg
  note on amount 1 of flow in kg: Estimated/calculated value. Gravel calculated considering the volume excavated per pole. 1.96tonnes/pole
- wood preservation, vacuum pressure method, organic salts, Cr-free, outdoor use, ground contact: 51.5543 kg; = fraction* wood_preservpcp_amount1* lifetime/wood_lifetime_1* wood_amount1/(total_length_network*wood_WM); lognormal variance with pedigree 0.002, pedigree (1,1,3,1,1)
  (same comment as for wood preservation, vacuum pressure method, inorganic salt, containing )
  property amount 1 of flow in kg 4.625 kg; name wood_preservPCP_amount1
  note on amount 1 of flow in kg: Literature value. Quantity per m3 of wood. Source: C.A. Bolin, S.T. Smith / Renewable and Sustainable Energy Reviews 15 (2011) 2475-2486
- waste wood pole, chrome preserved: -8527.37 kg; name waste_wood; = (+wood*wood_WM)*-1; lognormal variance with pedigree 0.44, pedigree (5,5,5,5,1)
  (same comment as for inert waste, for final disposal)
  production volume 1.62185e7 kg; = waste_wood* apv_RP/ amount_RP
    Calculated from the production volume of transmission network, electricity, medium voltage in proportion to the respective output amounts.
  property price 0 EUR2005; name waste_wood_price_EUR2005
  properties: dry mass 0.8 kg, water content 0.25, wet mass 1 kg, carbon content, non-fossil 0.483676, heating value, net 13.99 MJ
  note on carbon content, non-fossil: Tab A.4, ecoinvent v2.2 report 13_I. C content has been referred to 1 kg DM,
  note on heating value, net: Value taken from the general comment of the treatment dataset.
- aluminium, wrought alloy: 1244.38 kg; name aluminium; = fraction* aluminium_amount1/(total_length_network); lognormal variance with pedigree 0.002, pedigree (1,1,3,1,1)
  (same comment as for steel, unalloyed)
  property amount 1 of flow in kg 1.72e8 kg; name aluminium_amount1
  properties: wet mass 1 kg, dry mass 1 kg
  note on amount 1 of flow in kg: Measured value. Total amount of aluminium in the network. Used for cables
- light fuel oil: 1167.17 kg; name oil; = fraction* oil_amount/(total_length_network); lognormal variance with pedigree 0.002, pedigree (1,1,3,1,1)
  (same comment as for steel, unalloyed)
  property amount 1 of flow in kg 1.61329e8 kg; name oil_amount
  properties: dry mass 1 kg, wet mass 1 kg, heating value, net 42.6 MJ, carbon content, fossil 0.862
  note on amount 1 of flow in kg: Measured value. Total amount of oil in the network. Used in transformers, circuit breakers and regulators. It is also included here the amount of oil used to treat the PCP poles (30 kg/pole)
- scrap aluminium: -1244.38 kg; name scrap_alu; = (aluminium)*-1; lognormal variance with pedigree 0.44, pedigree (5,5,5,5,1)
  (same comment as for inert waste, for final disposal)
  production volume 23667.2 kg; = scrap_alu* apv_RP*.01/ amount_RP
    Calculated from production volume of reference product using the relative outputs.
  property price 0 EUR2005; name scrap_alu_price_EUR2005
  properties: dry mass 1 kg, wet mass 1 kg
- waste mineral oil: -1167.17 kg; name waste_oil; = (oil)*-1; lognormal variance with pedigree 0.44, pedigree (5,5,5,5,1)
  (same comment as for inert waste, for final disposal)
  production volume 2.21988e6 kg; = waste_oil* apv_RP/ amount_RP
    (same comment as for waste wood pole, chrome preserved)
  property price 0 EUR2005; name waste_oil_price_EUR2005
  properties: heating value, net 34.7 MJ, water content 0.111111, carbon content, fossil 0.864444, dry mass 0.9 kg, wet mass 1 kg
  note on carbon content, fossil: Tab A.6, ecoinvent v2.2 report 13_I. C content has been calculated after data in the tables, and then referred to 1 kg DM
- copper, cathode: 286.496 kg; name copper; = fraction* copper_amount1/(total_length_network); lognormal variance with pedigree 0.002, pedigree (1,1,3,1,1)
  (same comment as for steel, unalloyed)
  property amount 1 of flow in kg 3.96e7 kg; name copper_amount1
  properties: wet mass 1 kg, dry mass 1 kg
  note on amount 1 of flow in kg: Measured value. Total amount of copper in the network. Used in transformers and cables
- scrap copper: -286.496 kg; name scrap_copper; = (copper)*-1; lognormal variance with pedigree 0.44, pedigree (5,5,5,5,1)
  (same comment as for inert waste, for final disposal)
  production volume 544896 kg; = scrap_copper* apv_RP/ amount_RP
    Calculated from production volume of reference product using the relative outputs.
  property price 0 EUR2005; name scrap_copper_price_EUR2005
  properties: dry mass 1 kg, wet mass 1 kg
- excavation, hydraulic digger: 47.8188 m3; = fraction*excavation/(total_length_network); lognormal variance with pedigree 0.002, pedigree (1,1,3,1,1)
  (same comment as for steel, unalloyed)
  property amount 1 of flow in kg 6.6096e6 kg; name excavation; = 2.43*qty_poles
  note on amount 1 of flow in kg: Estimated/calculated value. Excavation calculated considering the volume excavated per pole. 2.43m3/pole
- diesel, burned in building machine: 58.1055 MJ; = fraction* diesel_amount*diesel_HHV/(total_length_network*1000); lognormal variance with pedigree 0.002, pedigree (1,1,3,1,1)
  (same comment as for steel, unalloyed)
  property heating value, gross 45.4 MJ; name diesel_HHV
  property fuel input in physical units, kg 1.76904e8 kg; name diesel_amount; = 210600000*density_diesel
  property density 0.84 kg/l; name density_diesel
  properties: heating value, net 1 MJ
  note on fuel input in physical units, kg: Literature value. Total amount of diesel in the network. Source: Ecoinvent
- building, multi-storey: 2.17 m3; lognormal variance with pedigree 0.148, pedigree (5,5,5,5,3)
  Estimated value. Extrapolated from ecoinvent GLO dataset
  Uncertainty: e
- scrap steel: -1153.5 kg; name scrap_steel; = (steel)*-1; lognormal variance with pedigree 0.44, pedigree (5,5,5,5,1)
  (same comment as for inert waste, for final disposal)
  production volume 2.19387e6 kg; = scrap_steel* apv_RP/ amount_RP
    Calculated from production volume of reference product using the relative outputs.
  property price 0 EUR2005; name scrap_steel_price_EUR2005
  properties: wet mass 1 kg, dry mass 1 kg
- sawlog and veneer log, softwood, debarked, measured as solid wood: 11.1469 m3; name wood; = fraction* lifetime/wood_lifetime_1* wood_amount1/(total_length_network*wood_WM); lognormal variance with pedigree 0.002, pedigree (1,1,3,1,1)
  (same comment as for wood preservation, vacuum pressure method, inorganic salt, containing )
  property wet mass 765 kg; name wood_WM
  property amount 1 of flow in kg 1.0608e9 kg; name wood_amount1; = 390*qty_poles
  property lifetime 45 year; name wood_lifetime_1
  properties: dry mass 450 kg, heating value, net 5962.7 MJ, water content 0.7, carbon content, non-fossil 0.494
  note on amount 1 of flow in kg: Measured value. Total amount of wood in the network. Amount used in wooden poles. It is assumed an average pole (11m, 390kg)
  note on lifetime: Estimated value. Wood poles lifetime is estimated at 40 years
  note on carbon content, non-fossil: C content of dry mass is 0.494 kgC/kg dry wood (ecoinvent v2.2 report 9)

## Inputs from nature
- Transformation, to industrial area [natural resource, land]: 1.49 m2; lognormal variance with pedigree 0.002, pedigree (1,1,3,1,1)
  Estimated value. Extrapolated from ecoinvent GLO dataset
  Uncertainty: C
- Transformation, from annual crop [natural resource, land]: 0.826 m2; lognormal variance with pedigree 0.002, pedigree (1,1,3,1,1)
  Estimated value. Extrapolated from ecoinvent GLO dataset
  Uncertainty: C
- Occupation, industrial area [natural resource, land]: 44.6 m2*year; lognormal variance with pedigree 0.002, pedigree (1,1,3,1,1)
  Estimated value. Extrapolated from ecoinvent GLO dataset
  Uncertainty: C
- Transformation, from forest, unspecified [natural resource, land]: 0.659 m2; lognormal variance with pedigree 0.002, pedigree (1,1,3,1,1)
  Estimated value. Extrapolated from ecoinvent GLO dataset
  Uncertainty: C

## Emissions to nature
All rows: lognormal variance with pedigree 0.002, pedigree (1,1,3,1,1)
- Hydrocarbons, unspecified [soil, unspecified]: 23.4175 kg; = fraction* hydrocarb_emission/ ( total_length_network)
  Calculated value. Total quantity per year divided by total transported energy
  Uncertainty: C
  property amount 1 of flow in kg 3.2368e6 kg; name hydrocarb_emission; = 1.4* qty_poles*85%
- Chromium VI [soil, unspecified]: 0.0147589 kg; = fraction* Cr_emission/ ( total_length_network)
  (same comment as for Hydrocarbons, unspecified)
  property amount 1 of flow in kg 2040 kg; name Cr_emission; = 5e-3* qty_poles*15%
- Arsenic [soil, unspecified]: 0.0590356 kg; = fraction* As_emission/ ( total_length_network)
  (same comment as for Hydrocarbons, unspecified)
  property amount 1 of flow in kg 8160 kg; name As_emission; = 20e-3* qty_poles*15%
- NMVOC, non-methane volatile organic compounds, unspecified origin [air, unspecified]: 148.868 kg; = fraction* NMVOC_emission/ ( total_length_network)
  (same comment as for Hydrocarbons, unspecified)
  property amount 1 of flow in kg 2.05768e7 kg; name NMVOC_emission; = 8.9* qty_poles*85%
- Copper [soil, unspecified]: 0.0236142 kg; = fraction* Cu_emission/ ( total_length_network)
  (same comment as for Hydrocarbons, unspecified)
  property amount 1 of flow in kg 3264 kg; name Cu_emission; = 8e-3* qty_poles*15%
- Phenol, pentachloro- [air, unspecified]: 0.752704 kg; = fraction* PCP_air_emission/ ( total_length_network)
  (same comment as for Hydrocarbons, unspecified)
  property amount 1 of flow in kg 104040 kg; name PCP_air_emission; = 45e-3*qty_poles*85%
- Phenol, pentachloro- [soil, unspecified]: 0.0250901 kg; = fraction* PCP_soil_emission/ ( total_length_network)
  (same comment as for Hydrocarbons, unspecified)
  property amount 1 of flow in kg 3468 kg; name PCP_soil_emission; = 1.5e-3*qty_poles*85%

## Sampling procedure
Data collection from the company including all its activities

## Extrapolations
This dataset has been extrapolated from year 2014 to the year of the calculation (2021). The uncertainty has been adjusted accordingly.
