# lentil production

Dataset: EcoSpold 2, unit process
Geography: CA-SK
Time period: 2017-01-01 to 2021-12-31
Technology level: current
Classification: ISIC rev.4 ecoinvent: 0111:Growing of cereals (except rice), leguminous crops and oil seeds
Scenario: Business-as-Usual
System model: Allocation, cut-off by classification
Generated by: Davoud Heidari
Published in: Food Systems PRISM Lab 2020
Database: ecoinvent
isCopyrightProtected: true
accessRestrictedTo: 1

## General comment
This dataset represents the production of 1 tonne of dried lentil product with a dry matter content of 84% at minimum during May-August, 2019, at 84924.57 ha lentil farms located in the Province of Saskatchewan, Canada. Farms have yield of 1701.66 kg dried matter per ha for this crop cycle. The system boundaries include the production of all of crop inputs (e.g. seeds, fertilizers, crop protection products, and fuel). There is an estimated 0.49 kg of N fixation per tonne of lentils produced in this region that can be included as an avoided use of N fertilizer for the next crop in the rotation. However, this was not included in this model due to data presentation restrictions. Irrigation is not included since it is rarely performed for lentils in this region. Sowing date for the crop is May, 2019 and harvesting date is August, 2020. Seeding rate is 0.06 kg/tonne of lentil production. Fertilizer applied contain nitrogen (as N) 5.19 kg/tonne, phosphate (as P2O5) 18.12 kg/tonne, potash (as K2O) 1.77 kg/tonne, sulfur (as S) 2.66 kg/tonne, and zinc (as Zn) 0.05 kg/tonne. Predominant crop protection applied contain active ingredients of Glyphosate 642.36 g/tonne, Ethalfluralin 76.88 g/tonne, and Sethoxydim 34.00 g/tonne. Machinery is used for tillage (disk), land rolling, seeding, tillage (cultivator), swathing, harrowing, fertilizer application, in-crop herbicide application, foliar fungicide application, foliar insecticide application, combining, post-harvest herbicide application, and burndown/desiccant application with total fuel consumption of 51.60 kg/tonne.

## Included activities start
Starting inputs for this activity include seed, fertilizer, crop protection products and fuel on the farm. This activity begins with soil preparation about 37 weeks after the harvest of the previous crop. The soil is prepared for cultivation in 1st week of May and sowing of seeds started about 5 days after soil preparation.

## Included activities end
This activity ends with lentil drying to <16% moisture at farm gate. Carbon and nitrogen emissions associated with above- and below-ground biomass are accounted for using the DNDC model. This model was also used to calculate a nitrogen fixation credit that can be included as an avoided use of N fertilizer for the next crop in the rotation. However, this was not included in this model due to data presentation restrictions. For lentils in this region, the N credit was estimated to be 0.49 kg/t.

## Geography
Refers to weighted-average production in the Province of Saskatchewan, Canada

## Technology
Production of lentil includes farm practices from tillage (disk), land rolling, seeding, tillage (cultivator), swathing, harrowing, fertilizer application, in-crop herbicide application, foliar fungicide application, foliar insecticide application, combining, post-harvest herbicide application, burndown/desiccant application, to drying.

## Time period
Soil cultivating date for the main crop: April - May 2019; Harvesting date main crop: August, 2017-2019. The soil cultivation, sowing and harvesting dates are the data collected by the farmers. Total time from date of sowing to date of harvesting comes to 119 days. The data is collected for three crop cycles. The cycle of one year is considered for entry in ecoinvent.

## Parameters
- LUC_crop_specific: 1 dimensionless
- yield kgha: 1701.66 kg/ha; name yield_kg_ha

## Reference product
- lentil: 1 kg; By-product classification allocatable product; CPC 01709: Pulses, n.e.c.
  production volume 144759 kg
    Production volume for dry lentil is provided in kg. Data is for the year 2017-2019.
  property price 0.521542 EUR2005
    Literature value. Price from FAOSTAT data Producer Prices - Annual (retrieved from: http://www.fao.org/faostat/en/#data/PP, accessed 15Feb2018). Data from 2005.
  property carbon content 0.475
    carbon content on a dry matter basis (reserved; not for manual entry)
  properties: wet mass 1 kg, water in wet mass 0.0826 kg, water content 0.0900371, dry mass 0.9174 kg, carbon content, non-fossil 0.475, carbon content, fossil 0, carbon allocation 0.435765 kg

## Inputs from technosphere
- combine harvesting: 0.000164757 ha; lognormal variance with pedigree 0.0008, pedigree (1,1,2,1,1)
  This refers to combine harvesting.
- zinc: 5.36792e-5 kg; lognormal variance with pedigree 0.002, pedigree (2,3,2,1,1)
  This refers to production of MicroEssentials SZ - Zn.
  Uncertainty: D
  properties: wet mass 1 kg, dry mass 1 kg
- tillage, harrowing, by rotary harrow: 0.000367814 ha; lognormal variance with pedigree 0.0008, pedigree (1,1,2,1,1)
  This refers to tillage, harrowing, by rotary harrow.
- application of plant protection product, by field sprayer: 2.784e-5 ha; lognormal variance with pedigree 0.0008, pedigree (1,1,2,1,1)
  This refers to application of plant protection product, by field sprayer.
- ammonium nitrate: 2.99984e-5 kg; lognormal variance with pedigree 0.002, pedigree (2,3,2,1,1)
  This refers to production of ammonium nitrate (as N).
  Uncertainty: D
  properties: wet mass 1 kg, dry mass 1 kg
- tillage, rolling: 0.000202621 ha; lognormal variance with pedigree 0.0008, pedigree (1,1,2,1,1)
  This refers to tillage, rolling.
- urea: 0.000414564 kg; lognormal variance with pedigree 0.002, pedigree (2,3,2,1,1)
  This refers to production of superU (as N), and urea (as N).
  Uncertainty: D
  properties: dry mass 1 kg, wet mass 1 kg, carbon content, fossil 0.2
- pesticide, unspecified: 0.000330205 kg; lognormal variance with pedigree 0.002, pedigree (1,3,2,1,2)
  This refers to production of herbicides (except glyphosate), fungicides and insecticides.
  Uncertainty: D
  properties: carbon content, fossil 0.486978, dry mass 1 kg, wet mass 1 kg
- lentil seed, for sowing: 5.82e-5 kg; lognormal variance with pedigree 0.0014, pedigree (1,3,2,1,1)
  This refers to production of lentil seed.
  Uncertainty: D
  properties: dry mass 0.9174 kg, carbon content, non-fossil 0.475, wet mass 1 kg, water content 0.0900371
- sulfur: 0.00265928 kg; lognormal variance with pedigree 0.002, pedigree (2,3,2,1,1)
  This refers to production of 40 Rock (as S), Alpine K Thio (as S), Bio-Sul (as S), Bio-Sul Premium Plus (as S), Blend 10-27-9-14 (as S), Blend 2-22-19-5 (as S), Blend 9-31-10-17 (as S), In-furrow liquid starter 30-62-4-4 (as S), MIcroEssentials S10 (as S), MicroEssentials S15 - S, MicroEssentials SZ - S, NutraSul90 (as S), Supreme85 (as S), and Tiger 90 (S).
  Uncertainty: D
  properties: wet mass 1 kg, dry mass 1 kg
- monoammonium phosphate: 0.0225437 kg; lognormal variance with pedigree 0.002, pedigree (2,3,2,1,1)
  This refers to production of 40 Rock (as N), Alpine (as N), Ammonium Polyphosphate (liquid) (as N), Blend 10-27-9-14 (as N), Blend 2-22-19-5 (as N), Blend 9-31-10-17 (as N), Crystal Green (as N), In-furrow liquid starter 30-62-4-4 (as N), In-furrow liquid starter 6-24-6 (as N), MIcroEssentials S10 (as N), MicroEssentials S15 (as N), MicroEssentials SZ (as N), Monoammonium Phosphate (MAP) (as N), 40 Rock (as P2O5), Alpine (as P2O5), Ammonium Polyphosphate (liquid) (as P2O5), Blend 10-27-9-14 (as P2O5), Blend 2-22-19-5 (as P2O5), Blend 9-31-10-17 (as P2O5), Crystal Green (as P2O5), In-furrow liquid starter 0-15-0-0 (as P2O5), In-furrow liquid starter 30-62-4-4 (as P2O5), In-furrow liquid starter 6-24-6 (as P2O5), MIcroEssentials S10 (as P2O5), MicroEssentials S15 (as P2O5), MicroEssentials SZ (as P2O5), and Monoammonium Phosphate (MAP) (as P2O5).
  Uncertainty: D
  properties: nitrogen content 0.084, dry mass 1 kg, phosphorus content 0.226939, wet mass 1 kg
  note on nitrogen content: Nitrogen content (on a dry matter basis) of monoammonium phosphate is calculated from the molecular formula of the nutrient present in the substance.
  note on phosphorus content: Phosphorus content (on a dry matter basis) of monoammonium phosphate is calculated from the molecular formula of the nutrient present in the substance.
- land use change, annual crop: 0.000503038 ha; = (0.8560*LUC_crop_specific+0.0000*(1-LUC_crop_specific))/yield_kg_ha; lognormal variance with pedigree 0.212, pedigree (5,5,5,5,5)
  Calculated value. Land use change (LUC) combines land transformation areas calculated with the adapted 'Direct Land Use Change Assessment Tool' version 2014 developed by Blonk Consultants and the carbon losses from soil organic carbon (SOC) and vegetation (VEG) as calculated in ecoinvent v3. See 'WFLDB-Guidelines.pdf', available at <https://ecoquery.ecoinvent.org/File/Reports>.
  Uncertainty: D
- tillage, cultivating, chiselling: 0.000965464 ha; lognormal variance with pedigree 0.0008, pedigree (1,1,2,1,1)
  This refers to tillage, cultivating, chiselling.
- tillage, rotary cultivator: 3.61639e-5 ha; lognormal variance with pedigree 0.0008, pedigree (1,1,2,1,1)
  This refers to tillage, rotary cultivator.
- urea ammonium nitrate mix: 5.71582e-5 kg; lognormal variance with pedigree 0.002, pedigree (2,3,2,1,1)
  This refers to production of urea-ammonium-nitrate (UAN) (liquid) (as N).
  Uncertainty: D
  properties: dry mass 0.75 kg, wet mass 1 kg, oxygen content 0.749063, hydrogen content 0.095042, carbon content, fossil 0.0879977, water content 0.333333, nitrogen content 0.401231
  note on oxygen content: Oxygen content (on a dry matter basis) of urea ammonium nitrate mix is calculated from the molecular formula of the substance (CH6N4O4).
  note on hydrogen content: Hydrogen content (on a dry matter basis) of urea ammonium nitrate mix is calculated from the molecular formula of the substance (CH6N4O4).
  note on carbon content, fossil: Carbon content, fossil is calculated based on the chemical formula of the substance.
  note on nitrogen content: Nitrogen content (on a dry matter basis) of urea ammonium nitrate mix is calculated from the molecular formula of the substance (CH6N4O4).
- potassium chloride: 0.0017439 kg; lognormal variance with pedigree 0.002, pedigree (2,3,2,1,1)
  This refers to production of Alpine (as K2O), Alpine K Thio (as K2O), Blend 10-27-9-14 (as K2O), Blend 2-22-19-5 (as K2O), Blend 9-31-10-17 (as K2O), In-furrow liquid starter 30-62-4-4 (as K2O), In-furrow liquid starter 6-24-6 (as K2O), and Potash (as K2O).
  Uncertainty: D
  properties: wet mass 1 kg, dry mass 1 kg
- glyphosate: 0.000676 kg; lognormal variance with pedigree 0.0014, pedigree (1,3,2,1,1)
  This refers to production of glyphosate.
  Uncertainty: D
  properties: wet mass 1 kg, carbon content, fossil 0.214286, dry mass 1 kg
- ammonium sulfate: 0.000263279 kg; lognormal variance with pedigree 0.002, pedigree (2,3,2,1,1)
  This refers to production of ammonium sulphate (as N), and ammonium thiosulphate (as N).
  Uncertainty: D
  properties: wet mass 1 kg, dry mass 1 kg
- tillage, harrowing, by offset disc harrow: 0.000300397 ha; lognormal variance with pedigree 0.0008, pedigree (1,1,2,1,1)
  This refers to tillage, harrowing, by offset disk harrow.
- swath, by rotary windrower: 8.90376e-5 ha; lognormal variance with pedigree 0.0008, pedigree (1,1,2,1,1)
  This refers to swath, by rotary windrower.
- peat moss: 7.05215e-6 m3; = 0.001459795/207
  Peat moss is used as a proxy to model the used inoculum.The amount is calculated by dividing the peat moss mass by its density (207 kg/m3).
  properties: heating value, net 17.88 MJ
- drying of lentils: 0.0244 l; lognormal variance with pedigree 0.0008, pedigree (1,1,2,1,1)
  This refers to drying of lentils.
- sowing: 8.23378e-5 ha; lognormal variance with pedigree 0.0008, pedigree (1,1,2,1,1)
  This refers to sowing.
- potassium sulfate: 2.56044e-5 kg; lognormal variance with pedigree 0.002, pedigree (2,3,2,1,1)
  This refers to production of potassium suphate (as K2O).
  Uncertainty: D
  properties: wet mass 1 kg, dry mass 1 kg
- fertilising, by broadcaster: 0.000184513 ha; lognormal variance with pedigree 0.0008, pedigree (1,1,2,1,1)
  This refers to fertilising, by broadcaster.

## Inputs from nature
- Transformation, to annual crop, non-irrigated [natural resource, land]: 5.87662 m2; lognormal variance with pedigree 0.0082, pedigree (1,1,2,1,1)
  Uncertainty: D
- Occupation, annual crop, non-irrigated [natural resource, land]: 5.87662 m2*year; lognormal variance with pedigree 0.0022, pedigree (1,1,2,1,1)
  Uncertainty: D
- Transformation, from unspecified [natural resource, land]: 5.87662 m2; lognormal variance with pedigree 0.0082, pedigree (1,1,2,1,1)
  Uncertainty: D

## Emissions to nature
- Clethodim [soil, agricultural]: 7.04e-6 kg; lognormal variance with pedigree 0.0338, pedigree (1,3,2,1,1)
  Modelled, farm-level emissions from plant protection product application were modelled based on the active ingredients for each substance. As per Margni et al. (2002), it was assumed that, regardless of the timing of the products, 76.5% of the active ingredient of each agricultural plant protection product is emitted to soil, 8.5% to water, and 10% to air. This means a total of 95% of the applied active ingredient is emitted back to the environment. The last 5% is taken up by the plant and was therefore not considered as an emission in this model. (Reference: Margni M, Rossier D, Crettaz P, Jolliet O (2002) Life cycle impact assessment of pesticides on human health and ecosystems. Agric Ecosyst Environ 93:379–392. https://doi.org/10.1016/S0167-8809(01)00336-X)
  Uncertainty: D
- Glufosinate ammonium [soil, agricultural]: 1.07e-6 kg; lognormal variance with pedigree 0.0338, pedigree (1,3,2,1,1)
  (same comment as for Clethodim)
- Ethalfluralin [soil, agricultural]: 6.19e-5 kg; lognormal variance with pedigree 0.0338, pedigree (1,3,2,1,1)
  (same comment as for Clethodim)
- Copper [soil, agricultural]: -2.28521e-5 kg
  The heavy metal emissions are calculated by SALCA-heavy metal (Freiermuth 2006) using the ecoinvent LCI calculation tool for crop production.
- Permethrin [water, unspecified]: 8.34e-8 kg; lognormal variance with pedigree 0.0408, pedigree (1,3,2,1,1)
  (same comment as for Clethodim)
- Imazamox [air, non-urban air or from high stacks]: 7.85e-7 kg; lognormal variance with pedigree 0.0408, pedigree (1,3,2,1,1)
  (same comment as for Clethodim)
- Dicamba [air, non-urban air or from high stacks]: 1.94e-8 kg; lognormal variance with pedigree 0.0408, pedigree (1,3,2,1,1)
  (same comment as for Clethodim)
- Diflufenzopyr [water, ground-]: 6.38e-9 kg; lognormal variance with pedigree 0.0408, pedigree (1,3,2,1,1)
  (same comment as for Clethodim)
- Mercury [water, surface water]: 3.00425e-8 kg; lognormal variance with pedigree 0.0872596, pedigree (2,2,2,1,1)
  The heavy metal emissions are calculated by SALCA-heavy metal (Freiermuth 2006) using the ecoinvent LCI calculation tool for crop production.
  Uncertainty: C
- Thiabendazole [soil, agricultural]: 1.5e-8 kg; lognormal variance with pedigree 0.0338, pedigree (1,3,2,1,1)
  (same comment as for Clethodim)
- Glyphosate [air, non-urban air or from high stacks]: 6.76e-5 kg; lognormal variance with pedigree 0.0408, pedigree (1,3,2,1,1)
  (same comment as for Clethodim)
- Azoxystrobin [water, ground-]: 4.28e-7 kg; lognormal variance with pedigree 0.0408, pedigree (1,3,2,1,1)
  (same comment as for Clethodim)
- Quizalofop-ethyl [water, ground-]: 3.13e-7 kg; lognormal variance with pedigree 0.0408, pedigree (1,3,2,1,1)
  (same comment as for Clethodim)
- Glufosinate ammonium [air, low population density, long-term]: 1.4e-7 kg; lognormal variance with pedigree 0.0408, pedigree (1,3,2,1,1)
  (same comment as for Clethodim)
- Ammonia [air, low population density, long-term]: 0.000289 kg; lognormal variance with pedigree 0.0108, pedigree (3,3,2,1,1)
  Modelled with using the DeNitrification DeComposition (DNDC) -Management Factor Tool (DNDC-MFT) that was developed by Smith et al, (2010). The Canadian version of DNDC that has been used in this study was developed to include a crop growth model for cultivars grown in Canada as well as the impact of snow dynamics, crop biomass, and residue management on soil temperature (Dutta et al, 2016). (References: Dutta B, Smith WN, Grant BB, et al (2016) Model development in DNDC for the prediction of evapotranspiration and water use in temperate field cropping systems. Environ Model Softw 80:. https://doi.org/10.1016/j.envsoft.2016.02.014
  Uncertainty: D
- Chlorpyrifos [air, non-urban air or from high stacks]: 1.1e-8 kg; lognormal variance with pedigree 0.0408, pedigree (1,3,2,1,1)
  (same comment as for Clethodim)
- Phosphorus [water, ground-]: 0.000302 kg; lognormal variance with pedigree 0.0428, pedigree (3,3,2,1,1)
  (same comment as for Ammonia)
- Glyphosate [soil, agricultural]: 0.000517 kg; lognormal variance with pedigree 0.0338, pedigree (1,3,2,1,1)
  (same comment as for Clethodim)
- Diquat dibromide [soil, agricultural]: 6.72e-6 kg; lognormal variance with pedigree 0.0338, pedigree (1,3,2,1,1)
  (same comment as for Clethodim)
- Penflufen [water, ground-]: 3.13e-10 kg; lognormal variance with pedigree 0.0408, pedigree (1,3,2,1,1)
  (same comment as for Clethodim)
- Picoxystrobin [soil, agricultural]: 1.47e-7 kg; lognormal variance with pedigree 0.0338, pedigree (1,3,2,1,1)
  (same comment as for Clethodim)
- Fludioxonil [air, low population density, long-term]: 6.43e-8 kg; lognormal variance with pedigree 0.0408, pedigree (1,3,2,1,1)
  (same comment as for Clethodim)
- Ethaboxam [water, ground-]: 3.68e-8 kg; lognormal variance with pedigree 0.0408, pedigree (1,3,2,1,1)
  (same comment as for Clethodim)
- Propiconazole [air, non-urban air or from high stacks]: 8.17e-8 kg; lognormal variance with pedigree 0.0408, pedigree (1,3,2,1,1)
  (same comment as for Clethodim)
- Lambda-cyhalothrin [air, non-urban air or from high stacks]: 3.14e-8 kg; lognormal variance with pedigree 0.0408, pedigree (1,3,2,1,1)
  (same comment as for Clethodim)
- Sethoxydim [soil, agricultural]: 2.74e-5 kg; lognormal variance with pedigree 0.0338, pedigree (1,3,2,1,1)
  (same comment as for Clethodim)
- Zinc, ion [water, ground-]: 9.67173e-6 kg; lognormal variance with pedigree 0.0872596, pedigree (2,2,2,1,1)
  (same comment as for Mercury)
- Thiram [soil, agricultural]: 2.09e-6 kg; lognormal variance with pedigree 0.0338, pedigree (1,3,2,1,1)
  (same comment as for Clethodim)
- Metribuzin [air, non-urban air or from high stacks]: 1.01e-6 kg; lognormal variance with pedigree 0.0408, pedigree (1,3,2,1,1)
  (same comment as for Clethodim)
- Lead [water, surface water]: 1.58599e-5 kg; lognormal variance with pedigree 0.0872596, pedigree (2,2,2,1,1)
  (same comment as for Mercury)
- Imazamox [soil, agricultural]: 6e-6 kg; lognormal variance with pedigree 0.0338, pedigree (1,3,2,1,1)
  (same comment as for Clethodim)
- Carboxin [soil, agricultural]: 2.44e-6 kg; lognormal variance with pedigree 0.0338, pedigree (1,3,2,1,1)
  (same comment as for Clethodim)
- Sedaxane [water, ground-]: 8.39e-8 kg; lognormal variance with pedigree 0.0408, pedigree (1,3,2,1,1)
  (same comment as for Clethodim)
- Fludioxonil [soil, agricultural]: 4.92e-7 kg; lognormal variance with pedigree 0.0338, pedigree (1,3,2,1,1)
  (same comment as for Clethodim)
- Saflufenacil [water, ground-]: 2.56e-7 kg; lognormal variance with pedigree 0.0408, pedigree (1,3,2,1,1)
  (same comment as for Clethodim)
- Pyraflufen-ethyl [air, unspecified]: 6.07e-9 kg; lognormal variance with pedigree 0.0408, pedigree (1,3,2,1,1)
  (same comment as for Clethodim)
- Metribuzin [water, ground-]: 8.61e-7 kg; lognormal variance with pedigree 0.0408, pedigree (1,3,2,1,1)
  (same comment as for Clethodim)
- Quizalofop-ethyl [soil, agricultural]: 2.82e-6 kg; lognormal variance with pedigree 0.0338, pedigree (1,3,2,1,1)
  (same comment as for Clethodim)
- Zinc, ion [water, surface water]: 3.18161e-5 kg; lognormal variance with pedigree 0.0872596, pedigree (2,2,2,1,1)
  (same comment as for Mercury)
- Tebuconazole [water, ground-]: 6.61e-9 kg; lognormal variance with pedigree 0.0408, pedigree (1,3,2,1,1)
  (same comment as for Clethodim)
- Sedaxane [soil, agricultural]: 7.55e-7 kg; lognormal variance with pedigree 0.0338, pedigree (1,3,2,1,1)
  (same comment as for Clethodim)
- Trifluralin [water, ground-]: 3.44e-7 kg; lognormal variance with pedigree 0.0408, pedigree (1,3,2,1,1)
  (same comment as for Clethodim)
- Carboxin [water, ground-]: 2.71e-7 kg; lognormal variance with pedigree 0.0408, pedigree (1,3,2,1,1)
  (same comment as for Clethodim)
- Tebuconazole [soil, agricultural]: 5.95e-8 kg; lognormal variance with pedigree 0.0338, pedigree (1,3,2,1,1)
  (same comment as for Clethodim)
- Deltamethrin [air, low population density, long-term]: 4.11e-9 kg; lognormal variance with pedigree 0.0408, pedigree (1,3,2,1,1)
  (same comment as for Clethodim)
- Flumioxazin [water, ground-]: 5.79e-8 kg; lognormal variance with pedigree 0.0408, pedigree (1,3,2,1,1)
  (same comment as for Clethodim)
- Ethaboxam [soil, agricultural]: 3.31e-7 kg; lognormal variance with pedigree 0.0338, pedigree (1,3,2,1,1)
  (same comment as for Clethodim)
- Copper, ion [water, surface water]: 1.72204e-5 kg; lognormal variance with pedigree 0.0872596, pedigree (2,2,2,1,1)
  (same comment as for Mercury)
- Thiamethoxam [soil, agricultural]: 6.82e-9 kg; lognormal variance with pedigree 0.0338, pedigree (1,3,2,1,1)
  (same comment as for Clethodim)
- Phosphorus [soil, agricultural]: 0.000117 kg; lognormal variance with pedigree 0.0358, pedigree (3,3,2,1,1)
  (same comment as for Ammonia)
- Thiram [air, low population density, long-term]: 2.73e-7 kg; lognormal variance with pedigree 0.0408, pedigree (1,3,2,1,1)
  (same comment as for Clethodim)
- Penflufen [soil, agricultural]: 2.81e-9 kg; lognormal variance with pedigree 0.0338, pedigree (1,3,2,1,1)
  (same comment as for Clethodim)
- Trifluralin [air, non-urban air or from high stacks]: 4.05e-7 kg; lognormal variance with pedigree 0.0408, pedigree (1,3,2,1,1)
  (same comment as for Clethodim)
- Chlorpyrifos [soil, agricultural]: 8.41e-8 kg; lognormal variance with pedigree 0.0338, pedigree (1,3,2,1,1)
  (same comment as for Clethodim)
- Diquat dibromide [air, low population density, long-term]: 8.78e-7 kg; lognormal variance with pedigree 0.0408, pedigree (1,3,2,1,1)
  (same comment as for Clethodim)
- Carfentrazone-ethyl [air, non-urban air or from high stacks]: 2.1e-7 kg; lognormal variance with pedigree 0.0408, pedigree (1,3,2,1,1)
  (same comment as for Clethodim)
- Nickel [soil, agricultural]: -1.1455e-5 kg
  (same comment as for Copper)
- Azoxystrobin [soil, agricultural]: 3.86e-6 kg; lognormal variance with pedigree 0.0338, pedigree (1,3,2,1,1)
  (same comment as for Clethodim)
- Nickel, ion [water, surface water]: 1.12437e-5 kg; lognormal variance with pedigree 0.0872596, pedigree (2,2,2,1,1)
  (same comment as for Mercury)
- Pyraclostrobin [air, non-urban air or from high stacks]: 2.39e-6 kg; lognormal variance with pedigree 0.0408, pedigree (1,3,2,1,1)
  (same comment as for Clethodim)
- Glyphosate [water, ground-]: 5.75e-5 kg; lognormal variance with pedigree 0.0408, pedigree (1,3,2,1,1)
  (same comment as for Clethodim)
- Carbon dioxide, fossil [air, low population density, long-term]: 0.00072 kg; lognormal variance with pedigree 0.0008, pedigree (1,1,2,1,1)
  (same comment as for Ammonia)
- Quizalofop-ethyl [air, non-urban air or from high stacks]: 3.69e-7 kg; lognormal variance with pedigree 0.0408, pedigree (1,3,2,1,1)
  (same comment as for Clethodim)
- Prothioconazol [soil, agricultural]: 1.3e-5 kg; lognormal variance with pedigree 0.0338, pedigree (1,3,2,1,1)
  (same comment as for Clethodim)
- Imazethapyr [air, non-urban air or from high stacks]: 5.34e-7 kg; lognormal variance with pedigree 0.0408, pedigree (1,3,2,1,1)
  (same comment as for Clethodim)
- Thiamethoxam [water, ground-]: 7.58e-10 kg; lognormal variance with pedigree 0.0408, pedigree (1,3,2,1,1)
  (same comment as for Clethodim)
- Zinc [soil, agricultural]: -4.45889e-5 kg
  (same comment as for Copper)
- Sethoxydim [water, ground-]: 3.04e-6 kg; lognormal variance with pedigree 0.0408, pedigree (1,3,2,1,1)
  (same comment as for Clethodim)
- Imazethapyr [water, ground-]: 4.54e-7 kg; lognormal variance with pedigree 0.0408, pedigree (1,3,2,1,1)
  (same comment as for Clethodim)
- Lead [water, ground-]: 2.22968e-7 kg; lognormal variance with pedigree 0.0872596, pedigree (2,2,2,1,1)
  (same comment as for Mercury)
- Cadmium, ion [water, ground-]: 2.04442e-8 kg; lognormal variance with pedigree 0.0872596, pedigree (2,2,2,1,1)
  (same comment as for Mercury)
- Thiram [water, ground-]: 2.32e-7 kg; lognormal variance with pedigree 0.0408, pedigree (1,3,2,1,1)
  (same comment as for Clethodim)
- Chromium [soil, agricultural]: -2.77452e-5 kg
  (same comment as for Copper)
- Propiconazole [soil, agricultural]: 6.25e-7 kg; lognormal variance with pedigree 0.0338, pedigree (1,3,2,1,1)
  (same comment as for Clethodim)
- Sethoxydim [air, non-urban air or from high stacks]: 3.58e-6 kg; lognormal variance with pedigree 0.0408, pedigree (1,3,2,1,1)
  (same comment as for Clethodim)
- Clethodim [air, non-urban air or from high stacks]: 9.2e-7 kg; lognormal variance with pedigree 0.0408, pedigree (1,3,2,1,1)
  (same comment as for Clethodim)
- Pyroxasulfone [water, ground-]: 9.54e-8 kg; lognormal variance with pedigree 0.0408, pedigree (1,3,2,1,1)
  (same comment as for Clethodim)
- Diquat dibromide [water, ground-]: 7.47e-7 kg; lognormal variance with pedigree 0.0408, pedigree (1,3,2,1,1)
  (same comment as for Clethodim)
- Trifloxystrobin [water, ground-]: 9.67e-7 kg; lognormal variance with pedigree 0.0408, pedigree (1,3,2,1,1)
  (same comment as for Clethodim)
- Carfentrazone ethyl ester [water, ground-]: 1.79e-7 kg; lognormal variance with pedigree 0.0408, pedigree (1,3,2,1,1)
  (same comment as for Clethodim)
- Pyraflufen-ethyl [soil, agricultural]: 4.65e-8 kg; lognormal variance with pedigree 0.0338, pedigree (1,3,2,1,1)
  (same comment as for Clethodim)
- Copper, ion [water, ground-]: 1.40921e-6 kg; lognormal variance with pedigree 0.0872596, pedigree (2,2,2,1,1)
  (same comment as for Mercury)
- Carfentrazone-ethyl [soil, agricultural]: 1.61e-6 kg; lognormal variance with pedigree 0.0338, pedigree (1,3,2,1,1)
  (same comment as for Clethodim)
- Prothioconazol [air, non-urban air or from high stacks]: 1.69e-6 kg; lognormal variance with pedigree 0.0408, pedigree (1,3,2,1,1)
  (same comment as for Clethodim)
- MCPA [air, non-urban air or from high stacks]: 6.36e-7 kg; lognormal variance with pedigree 0.0408, pedigree (1,3,2,1,1)
  (same comment as for Clethodim)
- Trifluralin [soil, agricultural]: 3.09e-6 kg; lognormal variance with pedigree 0.0338, pedigree (1,3,2,1,1)
  (same comment as for Clethodim)
- Dinitrogen monoxide [air, low population density, long-term]: 7.47e-5 kg; lognormal variance with pedigree 0.0328, pedigree (3,3,2,1,1)
  (same comment as for Ammonia)
- Pyroxasulfone [soil, agricultural]: 8.58e-7 kg; lognormal variance with pedigree 0.0338, pedigree (1,3,2,1,1)
  (same comment as for Clethodim)
- Metalaxyl-M [soil, agricultural]: 1.03e-6 kg; lognormal variance with pedigree 0.0338, pedigree (1,3,2,1,1)
  (same comment as for Clethodim)
- Pyraclostrobin [water, ground-]: 2.03e-6 kg; lognormal variance with pedigree 0.0408, pedigree (1,3,2,1,1)
  (same comment as for Clethodim)
- Thiamethoxam [air, low population density, long-term]: 8.92e-10 kg; lognormal variance with pedigree 0.0408, pedigree (1,3,2,1,1)
  (same comment as for Clethodim)
- Trifloxystrobin [soil, agricultural]: 8.7e-6 kg; lognormal variance with pedigree 0.0338, pedigree (1,3,2,1,1)
  (same comment as for Clethodim)
- Fludioxonil [water, ground-]: 5.46e-8 kg; lognormal variance with pedigree 0.0408, pedigree (1,3,2,1,1)
  (same comment as for Clethodim)
- Permethrin [air, non-urban air or from high stacks]: 9.81e-8 kg; lognormal variance with pedigree 0.0408, pedigree (1,3,2,1,1)
  (same comment as for Clethodim)
- Ethalfluralin [water, ground-]: 6.88e-6 kg; lognormal variance with pedigree 0.0408, pedigree (1,3,2,1,1)
  (same comment as for Clethodim)
- Pyraclostrobin (prop) [soil, agricultural]: 1.83e-5 kg; lognormal variance with pedigree 0.0338, pedigree (1,3,2,1,1)
  (same comment as for Clethodim)
- Diflufenzopyr-sodium [soil, agricultural]: 5.74e-8 kg; lognormal variance with pedigree 0.0338, pedigree (1,3,2,1,1)
  (same comment as for Clethodim)
- MCPA [water, ground-]: 5.41e-7 kg; lognormal variance with pedigree 0.0408, pedigree (1,3,2,1,1)
  (same comment as for Clethodim)
- Trifloxystrobin [air, non-urban air or from high stacks]: 1.14e-6 kg; lognormal variance with pedigree 0.0408, pedigree (1,3,2,1,1)
  (same comment as for Clethodim)
- Chromium, ion [water, surface water]: 2.58615e-5 kg; lognormal variance with pedigree 0.0872596, pedigree (2,2,2,1,1)
  (same comment as for Mercury)
- Metalaxyl-M [air, low population density, long-term]: 1.35e-7 kg; lognormal variance with pedigree 0.0408, pedigree (1,3,2,1,1)
  (same comment as for Clethodim)
- Deltamethrin [water, ground-]: 3.49e-9 kg; lognormal variance with pedigree 0.0408, pedigree (1,3,2,1,1)
  (same comment as for Clethodim)
- Thiabendazole [water, ground-]: 1.66e-9 kg; lognormal variance with pedigree 0.0408, pedigree (1,3,2,1,1)
  (same comment as for Clethodim)
- Mercury [soil, agricultural]: -6.31747e-8 kg
  (same comment as for Copper)
- Imazethapyr [soil, agricultural]: 4.09e-6 kg; lognormal variance with pedigree 0.0338, pedigree (1,3,2,1,1)
  (same comment as for Clethodim)
- Ethalfluralin [air, low population density, long-term]: 8.09e-6 kg; lognormal variance with pedigree 0.0408, pedigree (1,3,2,1,1)
  (same comment as for Clethodim)
- Tebuconazole [air, non-urban air or from high stacks]: 7.78e-9 kg; lognormal variance with pedigree 0.0408, pedigree (1,3,2,1,1)
  (same comment as for Clethodim)
- Boscalid [soil, agricultural]: 2.58e-5 kg; lognormal variance with pedigree 0.0338, pedigree (1,3,2,1,1)
  (same comment as for Clethodim)
- Saflufenacil [soil, agricultural]: 2.31e-6 kg; lognormal variance with pedigree 0.0338, pedigree (1,3,2,1,1)
  (same comment as for Clethodim)
- Clethodim [water, ground-]: 7.82e-7 kg; lognormal variance with pedigree 0.0408, pedigree (1,3,2,1,1)
  (same comment as for Clethodim)
- Propiconazole [water, ground-]: 6.94e-8 kg; lognormal variance with pedigree 0.0408, pedigree (1,3,2,1,1)
  (same comment as for Clethodim)
- Diflufenzopyr [air, low population density, long-term]: 7.5e-9 kg; lognormal variance with pedigree 0.0408, pedigree (1,3,2,1,1)
  (same comment as for Clethodim)
- Azoxystrobin [air, non-urban air or from high stacks]: 5.04e-7 kg; lognormal variance with pedigree 0.0408, pedigree (1,3,2,1,1)
  (same comment as for Clethodim)
- Deltamethrin [soil, agricultural]: 3.14e-8 kg; lognormal variance with pedigree 0.0338, pedigree (1,3,2,1,1)
  (same comment as for Clethodim)
- Chlorantraniliprole [water, ground-]: 4.07e-8 kg; lognormal variance with pedigree 0.0408, pedigree (1,3,2,1,1)
  (same comment as for Clethodim)
- Chlorpyrifos [water, ground-]: 9.35e-9 kg; lognormal variance with pedigree 0.0408, pedigree (1,3,2,1,1)
  (same comment as for Clethodim)
- Chlorfenapyr [soil, agricultural]: 1.05e-9 kg; lognormal variance with pedigree 0.0338, pedigree (1,3,2,1,1)
  (same comment as for Clethodim)
- Prothioconazol [water, ground-]: 1.44e-6 kg; lognormal variance with pedigree 0.0408, pedigree (1,3,2,1,1)
  (same comment as for Clethodim)
- Flumioxazin [air, non-urban air or from high stacks]: 6.81e-8 kg; lognormal variance with pedigree 0.0408, pedigree (1,3,2,1,1)
  (same comment as for Clethodim)
- Imazamox [water, ground-]: 6.67e-7 kg; lognormal variance with pedigree 0.0408, pedigree (1,3,2,1,1)
  (same comment as for Clethodim)
- Fluxapyroxad [soil, agricultural]: 9.4e-6 kg; lognormal variance with pedigree 0.0338, pedigree (1,3,2,1,1)
  (same comment as for Clethodim)
- Permethrin [soil, agricultural]: 7.51e-7 kg; lognormal variance with pedigree 0.0338, pedigree (1,3,2,1,1)
  (same comment as for Clethodim)
- Dicamba [water, ground-]: 1.65e-8 kg; lognormal variance with pedigree 0.0408, pedigree (1,3,2,1,1)
  (same comment as for Clethodim)
- Nitrate [soil, unspecified]: 0.000725 kg; lognormal variance with pedigree 0.0358, pedigree (3,3,2,1,1)
  (same comment as for Ammonia)
- Glufosinate ammonium [water, ground-]: 1.19e-7 kg; lognormal variance with pedigree 0.0408, pedigree (1,3,2,1,1)
  (same comment as for Clethodim)
- MCPA [soil, agricultural]: 4.86e-6 kg; lognormal variance with pedigree 0.0338, pedigree (1,3,2,1,1)
  (same comment as for Clethodim)
- Cadmium, ion [water, surface water]: 2.14776e-7 kg; lognormal variance with pedigree 0.0872596, pedigree (2,2,2,1,1)
  (same comment as for Mercury)
- Metribuzin [soil, agricultural]: 7.75e-6 kg; lognormal variance with pedigree 0.0338, pedigree (1,3,2,1,1)
  (same comment as for Clethodim)
- Lambda-cyhalothrin [water, ground-]: 2.67e-8 kg; lognormal variance with pedigree 0.0408, pedigree (1,3,2,1,1)
  (same comment as for Clethodim)
- Lambda-cyhalothrin [soil, agricultural]: 2.4e-7 kg; lognormal variance with pedigree 0.0338, pedigree (1,3,2,1,1)
  (same comment as for Clethodim)
- Cadmium [soil, agricultural]: 3.2597e-7 kg; lognormal variance with pedigree 0.0419915, pedigree (2,2,2,1,1)
  (same comment as for Mercury)
- Thiabendazole [air, low population density, long-term]: 1.95e-9 kg; lognormal variance with pedigree 0.0408, pedigree (1,3,2,1,1)
  (same comment as for Clethodim)
- Fluxapyroxad [water, ground-]: 1.04e-6 kg; lognormal variance with pedigree 0.0408, pedigree (1,3,2,1,1)
  (same comment as for Clethodim)
- Chromium, ion [water, ground-]: 1.03944e-5 kg; lognormal variance with pedigree 0.0872596, pedigree (2,2,2,1,1)
  (same comment as for Mercury)
- Metalaxyl-M [water, ground-]: 1.15e-7 kg; lognormal variance with pedigree 0.0408, pedigree (1,3,2,1,1)
  (same comment as for Clethodim)
- Dicamba [soil, agricultural]: 1.48e-7 kg; lognormal variance with pedigree 0.0338, pedigree (1,3,2,1,1)
  (same comment as for Clethodim)
- Mercury [water, ground-]: 2.44445e-10 kg; lognormal variance with pedigree 0.0872596, pedigree (2,2,2,1,1)
  (same comment as for Mercury)
- Flumioxazin [soil, agricultural]: 5.21e-7 kg; lognormal variance with pedigree 0.0338, pedigree (1,3,2,1,1)
  (same comment as for Clethodim)
- Chlorantraniliprole [soil, agricultural]: 3.67e-7 kg; lognormal variance with pedigree 0.0338, pedigree (1,3,2,1,1)
  (same comment as for Clethodim)
- Lead [soil, agricultural]: -4.62747e-6 kg
  (same comment as for Copper)

## Sampling procedure
Site-specific field data were collected via survey from prairie province lentil producers for crop rotation, seeding rate, machinery and fuel use for field operations (e.g., tillage, harrowing, harvest), farm inputs (e.g., fertilizers, pesticides), and electricity for crop drying. Production weighted averages were calculated for the region. Outliers were removed from reported fuel use data based on visual inspection.

## Extrapolations
This dataset has been extrapolated from year 2019 to the year of the calculation (2021). The uncertainty has been adjusted accordingly.

## Review by Jens Lansche 2021-02-02
All comments from the previous reviews have been taken into account in the current version.
