# polyethylene pipe production, corrugated, DN 75

Dataset: EcoSpold 2, unit process
Geography: RoW
Time period: 2003-01-01 to 2021-12-31
Technology level: current
Classification: EcoSpold01Categories: ventilation/production of components
Classification: ISIC rev.4 ecoinvent: 2819:Manufacture of other general-purpose machinery
Tags: ConvertedDataset
Scenario: Business-as-Usual
System model: Allocation, cut-off by classification
Generated by: Alex Primas
Published in: Hässig, W. 2007
Database: ecoinvent
isCopyrightProtected: true
accessRestrictedTo: 1

## General comment
Production of a typical component used for a ventilation system in a multi family house. The house considered in the investigation includes 6 flats with 130 m2 floor area each and a ventilation rate of 120 m3/h.
[This dataset was already contained in the ecoinvent database version 2. It was not individually updated during the transfer to ecoinvent version 3. Life Cycle Impact Assessment results may still have changed, as they are affected by changes in the supply chain, i.e. in other datasets. This dataset was generated following the ecoinvent quality guidelines for version 2. It may have been subject to central changes described in the ecoinvent version 3 change report (http://www.ecoinvent.org/database/ecoinvent-version-3/reports-of-changes/), and the results of the central updates were reviewed extensively. The changes added e.g. consistent water flows and other information throughout the database. The documentation of this dataset can be found in the ecoinvent reports of version 2, which are still available via the ecoinvent website. The change report linked above covers all central changes that were made during the conversion process.]

## Geography
Data for production in France used.

## Technology
Extruded polyethylene tube with a weight of 0.33 kg/m. Outside corrugated, inside plane

## Time period
Materials investigated in 2003

## Reference product
- polyethylene pipe, corrugated, DN 75: 1 m; CPC 36320: Tubes, pipes and hoses, and fittings therefor, of plastics; By-product classification allocatable product
  EcoSpold01Location=RER
  production volume 2.67763 m
    This is a placeholder value that does not reflect real-world production volumes. This dataset does not currently require a real-world production volume to work in the database framework, and no actual data were collected yet. This has no negative effect on the results of the ecoinvent database.
  property price 0.84 EUR2005
    Average 2005 prices for EU27, USA, China, Japan and India from Import/Export data (US$ and tonnes) in UN Commodity Trade Statistics Database; Commodity: Tube, pipe or hose, rigid, of polyethylene. Unit in EUR/kg is converted to EUR/m based on dataset for pipe production in Ecoinvent database.
  property carbon content 0.901299
    carbon content on a dry matter basis (reserved; not for manual entry)
  properties: water in wet mass 0 kg, carbon content, fossil 0.901299, wet mass 0.33 kg, dry mass 0.33 kg, carbon content, non-fossil 0, water content 0, heating value, net 14.02 MJ, carbon allocation 0.297429 kg

## Inputs from technosphere
- waste polyethylene: 0 kg; pedigree (1,1,1,1,1)
  EcoSpold01Location=CH
  Estimations on precentage material disposed
  Uncertainty: Estimations on precentage material disposed
  production volume 0 kg
    Calculated from the production volume of ventilation duct, PE corrugated tube, DN 75 in proportion to the respective output amounts.
  properties: dry mass 0.996 kg, wet mass 1 kg, heating value, net 42.47 MJ, water content 0.00401606, carbon content, fossil 0.825301
  note on heating value, net: Value taken from the general comment of the treatment dataset.
  note on carbon content, fossil: C content in 1 kg DM was calculated using data in Tab A.1, ecoinvent v2.2 report 13_I
- heat, district or industrial, other than natural gas: 0 MJ; pedigree (1,1,1,1,1)
  4,5,1,1,1,5; Data estimated from related companies
  EcoSpold01Location=RER
  properties: heating value, net 1 MJ
- plastic processing factory: 2.44e-10 unit; lognormal variance with pedigree 0.396, pedigree (4,5,5,5,3)
  EcoSpold01Location=RER
  Calculated with data of a similar company
  Uncertainty: Calculated with data of a similar company
- polyethylene, high density, granulate: 0.347 kg; lognormal variance with pedigree 0.0546, pedigree (2,4,5,5,1)
  EcoSpold01Location=RER
  Questionnaire
  Uncertainty: Questionnaire
  properties: carbon content, fossil 0.857143, dry mass 1 kg, wet mass 1 kg, heating value, net 42.47 MJ
  note on carbon content, fossil: Polyethylene is formed out of a huge amount of ethylene monomers (C2H4) (ecoinvent v2.2 report 11_II). MW=28 g/mol
- heat, district or industrial, natural gas: 0 MJ; pedigree (1,1,1,1,1)
  Data estimated from related companies
  EcoSpold01Location=RER
  Uncertainty: Data estimated from related companies
  properties: heating value, net 1 MJ
- extrusion, plastic pipes: 0.347 kg; lognormal variance with pedigree 0.0546, pedigree (2,4,5,5,1)
  EcoSpold01Location=RER
  Questionnaire
  Uncertainty: Questionnaire
- electricity, medium voltage: 0 kWh; pedigree (1,1,1,1,1)
  Data estimated from related processes
  EcoSpold01Location=UCTE
  Uncertainty: Data estimated from related processes
- waste polyethylene: -0.00202768, -0.000135482, -1.02463e-5, -5.59588e-5, -2.26067e-5, -5.31382e-5, -0.0141949 kg (7 entries); lognormal variance with pedigree 0.072, pedigree (4,4,5,5,1)
  (same comment as for waste polyethylene)
  production volume 0.0495 kg
- heat, district or industrial, other than natural gas: 0.000184067, 0.453916 MJ (2 entries); lognormal variance with pedigree 0.072, pedigree (1,1,5,5,1)
  4,5,1,1,1,5; Data estimated from related companies
  EcoSpold01Location=RER
- heat, district or industrial, natural gas: 0.00689241, 0.447208 MJ (2 entries); lognormal variance with pedigree 0.078, pedigree (4,5,5,5,1)
  (same comment as for heat, district or industrial, natural gas)
- electricity, medium voltage: 0.000457568, 8.77419e-5, 0.001473, 0.0214235, 0.00301966, 0.0098385 kWh (6 entries); lognormal variance with pedigree 0.11, pedigree (3,5,5,5,3)
  (same comment as for electricity, medium voltage)

## Sampling procedure
Questionnaire and technical information of producer. Data of one common product used.

## Extrapolations
none This dataset has been copied from an original dataset covering the geography RER. The uncertainty has been adjusted accordingly.

## Review by Rolf Frischknecht 2007-08-16
passed
none
