# treatment of hazardous waste, hazardous waste incineration

Dataset: EcoSpold 2, unit process
Geography: CH
Time period: 1997-01-01 to 2021-12-31
Technology level: current
Classification: ISIC rev.4 ecoinvent: 3822:Treatment and disposal of hazardous waste
Tags: ConvertedDataset; Treatment
Scenario: Business-as-Usual
System model: Allocation, cut-off by classification
Share of production covered: 39 %
Generated by: Gabor Doka (obsolete)
Published in: Doka G. 2008
Database: ecoinvent
isCopyrightProtected: true
accessRestrictedTo: 1

## General comment
Inventoried waste contains 100% hazardous waste avg.; . waste composition (wet, in ppm): lower heating value 17 MJ/kg; H2O 250000; O 40000; H 61000; C 416000; S 32000; N 7400; P 2200; B 7; Cl 104000; Br n.a.; F 3700; I n.a.; Ag n.a.; As n.a.; Ba n.a.; Cd 0.37; Co 74; Cr 123.95; Cu 267.47; Hg 0.74; Mn n.a.; Mo n.a.; Ni 126.81; Pb 296.64; Sb n.a.; Se n.a.; Sn n.a.; V n.a.; Zn 2378.3; Be n.a.; Sc n.a.; Sr n.a.; Ti n.a.; Tl n.a.; W n.a.; Si 80425; Fe n.a.; Ca n.a.; Al n.a.; K n.a.; Mg n.a.; Na n.a.; Share of carbon in waste that is biogenic 0%. Net energy produced in HWI: 17.11MJ/kg thermal energy and 1.27MJ/kg electric energy. Allocation of energy production: no substitution or expansion. 100% of burden allocated to waste disposal function of HWI. One kg of this waste produces 0.189 kg of residues, which are landfilled. Additional solidification with 0.07561 kg of cement.
[This dataset is meant to replace the following datasets:]

## Included activities end
waste-specific air and water emissions from incineration, auxiliary material consumption for flue gas cleaning. Short-term emissions to river water and long-term emissions to ground water from residual material landfill (from solidified fly ashes and scrubber slugde). Process energy demands for HWI.

## Geography
Specific to the technology encountered in Switzerland in 2000. Well applicable to modern incineration practices in Europe or North America or Japan.

## Technology
Swiss HWI plant in 2000 with wet flue gas scrubber and low-dust SCR DeNOx facility. Gross thermal efficiency 74.4% and gross electric efficiency 10%.

## Time period
Transfer coefficients for modern Swiss MSWI. Emission speciation based on early 90ies data.

## Parameters
- fraction, process water, to air: 1 dimensionless; name fraction_PW_to_air; lognormal variance with pedigree 0.092025, pedigree (4,4,3,2,4)
  Calculated value. During incineration all water incorporated in the products entering the incinerator evaporate to air.

## Reference product
- hazardous waste, for incineration: -1 kg; name RP; CPC 39: Wastes or scraps; By-product classification Waste
  production volume 0.0336675 kg; name PV_RP
    This is a placeholder value that does not reflect real-world production volumes. This dataset does not currently require a real-world production volume to work in the database framework, and no actual data were collected yet. This has no negative effect on the results of the ecoinvent database. The placeholder value of this activity was scaled according to the nominal GDP of 2005 (source: United Nations, http://data.un.org/Glossary.aspx?q=GDP+%28current+US%24%29, accessed 20130726) to reflect an appropriate share of the global production volume, which is also a placeholder value.
  property heating value, net 17 MJ
    Value taken from the general comment of the treatment dataset.
  property price 0 EUR2005; name RP_price_EUR2005
    Waste products are assigned a price of zero as they are assumed to require further treatment.
  property carbon content, fossil 0.554667
    Tab A.6, ecoinvent v2.2 report 13_I. C content has been calculated after data in the tables, and then referred to 1 kg DM
  property carbon content 0.554667
    carbon content on a dry matter basis (reserved; not for manual entry)
  properties: carbon content, non-fossil 0, water in wet mass 0.25 kg, dry mass 0.75 kg, water content 0.333333, wet mass 1 kg, carbon allocation 0.416 kg

## Inputs from technosphere
- process-specific burdens, residual material landfill: 0.18901 kg; lognormal variance with pedigree 0.13, pedigree (1,1,5,1,1)
  uncertainty is calculated from uncertainties in waste composition and transfer coefficients in incinerator;activityLink introduced to establish a direct link to the corresponding regional supply of this product
- hazardous waste incineration facility: 1.25e-9 unit; lognormal variance with pedigree 0.04, pedigree (1,1,5,1,1)
  demands per kilogram waste. uncertainty is heeded in the module This exchange has an activity link directly to the producing activity because the product is primarily consumed in the same geographical area where it is produced.
- ammonia, anhydrous, liquid: 0.00026987 kg; lognormal variance with pedigree 0.93, pedigree (1,1,5,1,1)
  uncertainty calculated from uncertainty in average DeNOx input, uncertainty in the share of thermal NOx, uncertainty of nitrogen content in average municipal waste and the unertainty in nitrogen content in *this* waste.
  properties: wet mass 1 kg, dry mass 1 kg
- hydrochloric acid, without water, in 30% solution state: 0.00044446 kg; lognormal variance with pedigree 0.14, pedigree (1,1,5,1,1)
  uncertainty calculated from uncertainty in average auxiliary material input, and the unertainty of the waste composition of this waste
  properties: heating value, net 3.32 MJ, dry mass 1 kg, wet mass 1 kg
- titanium dioxide: 1.0597e-5 kg; lognormal variance with pedigree 1.31, pedigree (1,1,5,1,1)
  (same comment as for ammonia, anhydrous, liquid)
  properties: dry mass 1 kg, wet mass 1 kg
- chromium: 2.1627e-7 kg; lognormal variance with pedigree 1.31, pedigree (1,1,5,1,1)
  Proxy for vanadium pentoxide V2O5 in SCR catalyst. uncertainty calculated from uncertainty in average DeNOx input, uncertainty in the share of thermal NOx, uncertainty of nitrogen content in average municipal waste and the unertainty in nitrogen content in *this* waste.
  properties: wet mass 1 kg, dry mass 1 kg
- waste cement, hydrated: -0.18901 kg; name BP; lognormal variance with pedigree 0.14, pedigree (1,1,5,1,1)
  Hydrated cement for solidification of landfilled residual material. Uncertainty calculated from unertainty of the waste composition of this waste and transfer coefficients in the incinerator and of the solidification recipe.
  production volume 0.0063635 kg; = PV_RP*BP/ABS(RP)
    Calculated from the production volume of hazardous waste, 25% water in proportion to the respective output amounts.
  property price 0 EUR2005; name BP_price_EUR2005
  properties: wet mass 1 kg, dry mass 1 kg
- residual material landfill: 3.9378e-10 unit; lognormal variance with pedigree 0.13, pedigree (1,1,5,1,1)
  uncertainty is calculated from uncertainties in waste composition and transfer coefficients in incinerator
- process-specific burdens, hazardous waste incineration plant: 1 kg; lognormal variance with pedigree 0.04, pedigree (1,1,5,1,1)
  demands per kilogram waste. uncertainty is heeded in the module;activityLink introduced to establish a direct link to the corresponding regional supply of this product
- cement, unspecified: 0.075605 kg; lognormal variance with pedigree 0.14, pedigree (1,1,5,1,1)
  Cement for solidification of landfilled residual material. Uncertainty calculated from unertainty of the waste composition of this waste, of transfer coefficients in the incinerator and of the solidification recipe.
  properties: wet mass 1 kg, dry mass 1 kg
- hydrogen peroxide, without water, in 50% solution state: 0.00014391 kg; lognormal variance with pedigree 0.31, pedigree (1,1,5,1,1)
  (same comment as for hydrochloric acid, without water, in 30% solution state)
  properties: dry mass 1 kg, wet mass 1 kg, heating value, net 7.13 MJ
- heat, central or small-scale, other than natural gas: 5.64 MJ; lognormal variance with pedigree 0.35, pedigree (1,1,5,1,1)
  Uncertainty dependent on total energy required and heating value present, using experimental GSd for substraction from uc=A*GSDa^2-B
  properties: heating value, net 1 MJ
- quicklime, milled, packed: 0.024577 kg; lognormal variance with pedigree 0.17, pedigree (1,1,5,1,1)
  (same comment as for hydrochloric acid, without water, in 30% solution state)
  properties: dry mass 0.99 kg, water content 0.010101, wet mass 1 kg
- chemical, inorganic: 0.00074076 kg; lognormal variance with pedigree 0.14, pedigree (1,1,5,1,1)
  Proxy for Polyelectrolyte. uncertainty calculated from uncertainty in average auxiliary material input, and the unertainty of the waste composition of this waste
  properties: dry mass 1 kg, wet mass 1 kg, carbon content, fossil 0.003
  note on carbon content, fossil: This dataset is an unweighted average of 20 inorganic substances (listed in Tab 88.1, ecoinvent v2.2 report 8, part II), being part of the top100 chemicals included in this database. The C-content has also been calculated as an unweighted average of the C content of the substances composing this dataset.
- sodium hydroxide, without water, in 50% solution state: 0.20351 kg; lognormal variance with pedigree 0.14, pedigree (1,1,5,1,1)
  (same comment as for hydrochloric acid, without water, in 30% solution state)
  properties: heating value, net 3.03 MJ, dry mass 1 kg, wet mass 1 kg
- iron (III) chloride, without water, in 40% solution state: 0.0018935 kg; lognormal variance with pedigree 0.41, pedigree (1,1,5,1,1)
  (same comment as for hydrochloric acid, without water, in 30% solution state)
  properties: dry mass 1 kg, wet mass 1 kg
- chemical, organic: 4.9718e-6 kg; lognormal variance with pedigree 1.21, pedigree (1,1,5,1,1)
  Proxy for TMT15. uncertainty calculated from uncertainty in average auxiliary material input, and the unertainty of the waste composition of this waste
  properties: heating value, net 19.03 MJ, dry mass 1 kg, carbon content, fossil 0.628, wet mass 1 kg
  note on carbon content, fossil: This dataset is an unweighted average of 20 organic substances (listed in Tab 88.1, ecoinvent v2.2 report 8, part II), being part of the top100 chemicals included in this database. The C-content has also been calculated as an unweighted average of the C content of the substances composing this dataset.
- heat, district or industrial, natural gas: 0.131733 MJ; lognormal variance with pedigree 1.03, pedigree (1,1,5,1,1)
  (same comment as for ammonia, anhydrous, liquid)
  properties: heating value, net 1 MJ
- calcium chloride: 0.0076287 kg; lognormal variance with pedigree 0.64, pedigree (1,1,5,1,1)
  (same comment as for hydrochloric acid, without water, in 30% solution state)
  properties: wet mass 1 kg, dry mass 1 kg

## Emissions to nature
- Fluoride [water, surface water]: 0.0036932 kg; lognormal variance with pedigree 0.53, pedigree (1,1,5,1,1)
  uncertainty is calculated from uncertainties in waste composition and transfer coefficients in incinerator and landfills
- DOC, Dissolved Organic Carbon [water, ground-, long-term]: 0.0029569 kg; lognormal variance with pedigree 0.12, pedigree (1,1,5,1,1)
  Long-term emissions from landfilling of incineration residues. uncertainty is calculated from uncertainties in waste composition and transfer coefficients in incinerator and landfills.
- DOC, Dissolved Organic Carbon [water, surface water]: 9.145e-6 kg; lognormal variance with pedigree 0.36, pedigree (1,1,5,1,1)
  (same comment as for Fluoride)
- Chromium [air, urban air close to ground]: 9.1648e-12 kg; lognormal variance with pedigree 1.07, pedigree (1,1,5,1,1)
  (same comment as for residual material landfill)
- Nickel, ion [water, surface water]: 2.5993e-5 kg; lognormal variance with pedigree 0.97, pedigree (1,1,5,1,1)
  (same comment as for Fluoride)
- Mercury [air, urban air close to ground]: 2.5558e-14 kg; lognormal variance with pedigree 1.75, pedigree (1,1,5,1,1)
  (same comment as for residual material landfill)
- Copper, ion [water, surface water]: 1.1491e-5 kg; lognormal variance with pedigree 0.87, pedigree (1,1,5,1,1)
  (same comment as for Fluoride)
- Nitrate [water, surface water]: 9.4655e-5 kg; lognormal variance with pedigree 0.33, pedigree (1,1,5,1,1)
  (same comment as for Fluoride)
- Cadmium [air, urban air close to ground]: 2.0375e-11 kg; lognormal variance with pedigree 1.78, pedigree (1,1,5,1,1)
  (same comment as for residual material landfill)
- Nickel, ion [water, ground-, long-term]: 3.6489e-5 kg; lognormal variance with pedigree 1.23, pedigree (1,1,5,1,1)
  (same comment as for DOC, Dissolved Organic Carbon)
- Zinc, ion [water, surface water]: 3.1917e-5 kg; lognormal variance with pedigree 0.59, pedigree (1,1,5,1,1)
  (same comment as for Fluoride)
- Phosphate [water, ground-, long-term]: 0.0014829 kg; lognormal variance with pedigree 1.16, pedigree (1,1,5,1,1)
  (same comment as for DOC, Dissolved Organic Carbon)
- Boron [water, surface water]: 1.0948e-6 kg; lognormal variance with pedigree 1.29, pedigree (1,1,5,1,1)
  (same comment as for Fluoride)
- Sulfate [water, surface water]: 0.092274 kg; lognormal variance with pedigree 0.27, pedigree (1,1,5,1,1)
  (same comment as for Fluoride)
- Hydrogen fluoride [air, urban air close to ground]: 9.3098e-7 kg; lognormal variance with pedigree 0.56, pedigree (1,1,5,1,1)
  (same comment as for residual material landfill)
- Zinc, ion [water, ground-, long-term]: 2.8737e-5 kg; lognormal variance with pedigree 5.43, pedigree (1,1,5,1,1)
  (same comment as for DOC, Dissolved Organic Carbon)
- Copper, ion [water, ground-, long-term]: 9.8473e-6 kg; lognormal variance with pedigree 3.52, pedigree (1,1,5,1,1)
  (same comment as for DOC, Dissolved Organic Carbon)
- Sulfate [water, ground-, long-term]: 0.003668 kg; lognormal variance with pedigree 0.28, pedigree (1,1,5,1,1)
  (same comment as for DOC, Dissolved Organic Carbon)
- Fluoride [water, ground-, long-term]: 5.9491e-6 kg; lognormal variance with pedigree 0.55, pedigree (1,1,5,1,1)
  (same comment as for DOC, Dissolved Organic Carbon)
- Nickel [air, urban air close to ground]: 8.8766e-8 kg; lognormal variance with pedigree 0.99, pedigree (1,1,5,1,1)
  (same comment as for residual material landfill)
- Nitrogen oxides [air, urban air close to ground]: 0.00019028 kg; lognormal variance with pedigree 0.97, pedigree (1,1,5,1,1)
  uncertainty calculated from uncertainty in average N-emissions, uncertainty in the share of thermal NOx, uncertainty of nitrogen content in average municipal waste and the unertainty in nitrogen content in *this* waste.
- Lead [water, surface water]: 8.0741e-9 kg; lognormal variance with pedigree 1.11, pedigree (1,1,5,1,1)
  (same comment as for Fluoride)
- TOC, Total Organic Carbon [water, ground-, long-term]: 0.0029569 kg; lognormal variance with pedigree 0.12, pedigree (1,1,5,1,1)
  (same comment as for DOC, Dissolved Organic Carbon)
- Boron [water, ground-, long-term]: 5.0197e-6 kg; lognormal variance with pedigree 1.36, pedigree (1,1,5,1,1)
  (same comment as for DOC, Dissolved Organic Carbon)
- Silicon [water, surface water]: 0.00018045 kg; lognormal variance with pedigree 0.73, pedigree (1,1,5,1,1)
  (same comment as for Fluoride)
- COD, Chemical Oxygen Demand [water, surface water]: 2.0903e-5 kg; lognormal variance with pedigree 0.36, pedigree (1,1,5,1,1)
  (same comment as for Fluoride)
- Hydrogen chloride [air, urban air close to ground]: 3.208e-5 kg; lognormal variance with pedigree 0.18, pedigree (1,1,5,1,1)
  (same comment as for residual material landfill)
- Cobalt [air, urban air close to ground]: 5.18e-8 kg; lognormal variance with pedigree 1.06, pedigree (1,1,5,1,1)
  (same comment as for residual material landfill)
- Nitrate [water, ground-, long-term]: 0.00026583 kg; lognormal variance with pedigree 0.46, pedigree (1,1,5,1,1)
  (same comment as for DOC, Dissolved Organic Carbon)
- Phosphorus [air, urban air close to ground]: 1.54e-6 kg; lognormal variance with pedigree 0.62, pedigree (1,1,5,1,1)
  (same comment as for residual material landfill)
- TOC, Total Organic Carbon [water, surface water]: 9.145e-6 kg; lognormal variance with pedigree 0.36, pedigree (1,1,5,1,1)
  (same comment as for Fluoride)
- Copper [air, urban air close to ground]: 1.8723e-7 kg; lognormal variance with pedigree 0.89, pedigree (1,1,5,1,1)
  (same comment as for residual material landfill)
- Carbon monoxide, fossil [air, urban air close to ground]: 1.2076e-5 kg; lognormal variance with pedigree 0.71, pedigree (1,4,5,1,3)
  1 plant for waste solvent incineration in Switzerland
- Phosphate [water, surface water]: 0.00010563 kg; lognormal variance with pedigree 0.58, pedigree (1,1,5,1,1)
  (same comment as for Fluoride)
- Mercury [water, ground-, long-term]: 3.4564e-8 kg; lognormal variance with pedigree 3.98, pedigree (1,1,5,1,1)
  (same comment as for DOC, Dissolved Organic Carbon)
- Cadmium, ion [water, surface water]: 1.6719e-10 kg; lognormal variance with pedigree 1.69, pedigree (1,1,5,1,1)
  (same comment as for Fluoride)
- Sulfur dioxide [air, urban air close to ground]: 3.84e-5 kg; lognormal variance with pedigree 0.3, pedigree (1,1,5,1,1)
  (same comment as for residual material landfill)
- Water [air, unspecified]: 0.00025 m3; name water_to_air_unspecified; lognormal variance with pedigree 0.0807, pedigree (2,2,5,1,1)
  Calculated value based on water balance.
  property water in wet mass 1000 kg; name WWM
  property dry mass 0 kg; name DM
  property fraction, origin: salt water 0; name fraction_origin_salt_water
  property wet mass 1000 kg; name WM
  property fraction, origin: unspecified 1; name fraction_origin_unspecified
  property carbon content, non-fossil 0; name C_content_non_fossil
  property fraction, origin: fresh water 0; name fraction_origin_fresh_water
  property carbon content, fossil 0; name C_content_fossil
- Cyanide [air, urban air close to ground]: 6.5867e-6 kg; lognormal variance with pedigree 1.06, pedigree (5,5,5,5,5)
  uncertainty calculated from uncertainty for proxy (from MSWI), uncertainty in average N-emissions, uncertainty in the share of thermal NOx, uncertainty of nitrogen content in average municipal waste and the unertainty in nitrogen content in *this* waste.
- Ammonia [air, urban air close to ground]: 7.3186e-6 kg; lognormal variance with pedigree 0.97, pedigree (1,1,5,1,1)
  (same comment as for Nitrogen oxides)
- Dinitrogen monoxide [air, urban air close to ground]: 2.6347e-5 kg; lognormal variance with pedigree 1.06, pedigree (5,5,5,5,5)
  (same comment as for Cyanide)
- Silicon [air, urban air close to ground]: 0.00018723 kg; lognormal variance with pedigree 0.2, pedigree (1,1,5,1,1)
  (same comment as for residual material landfill)
- Chromium VI [water, ground-, long-term]: 2.3461e-5 kg; lognormal variance with pedigree 0.98, pedigree (1,1,5,1,1)
  (same comment as for DOC, Dissolved Organic Carbon)
- COD, Chemical Oxygen Demand [water, ground-, long-term]: 0.0067587 kg; lognormal variance with pedigree 0.12, pedigree (1,1,5,1,1)
  (same comment as for DOC, Dissolved Organic Carbon)
- Lead [air, urban air close to ground]: 1.1011e-8 kg; lognormal variance with pedigree 0.9, pedigree (1,1,5,1,1)
  (same comment as for residual material landfill)
- Cobalt [water, surface water]: 7.3948e-5 kg; lognormal variance with pedigree 1.04, pedigree (1,1,5,1,1)
  (same comment as for Fluoride)
- Boron [air, urban air close to ground]: 8.4e-7 kg; lognormal variance with pedigree 1.36, pedigree (1,1,5,1,1)
  (same comment as for residual material landfill)
- BOD5, Biological Oxygen Demand [water, surface water]: 2.0903e-5 kg; lognormal variance with pedigree 0.36, pedigree (1,1,5,1,1)
  (same comment as for Fluoride)
- Carbon dioxide, fossil [air, urban air close to ground]: 1.5085 kg; lognormal variance with pedigree 0.06, pedigree (1,1,5,1,1)
  calculated from uncertainty in carbon in waste and transfer coefficients
- Chloride [water, surface water]: 0.10384 kg; lognormal variance with pedigree 0.16, pedigree (1,1,5,1,1)
  (same comment as for Fluoride)
- Chromium VI [water, surface water]: 7.8221e-6 kg; lognormal variance with pedigree 1.08, pedigree (1,1,5,1,1)
  (same comment as for Fluoride)
- Silicon [water, ground-, long-term]: 0.080057 kg; lognormal variance with pedigree 0.18, pedigree (1,1,5,1,1)
  (same comment as for DOC, Dissolved Organic Carbon)
- BOD5, Biological Oxygen Demand [water, ground-, long-term]: 0.0067587 kg; lognormal variance with pedigree 0.12, pedigree (1,1,5,1,1)
  (same comment as for DOC, Dissolved Organic Carbon)
- Lead [water, ground-, long-term]: 1.5386e-6 kg; lognormal variance with pedigree 7.78, pedigree (1,1,5,1,1)
  (same comment as for DOC, Dissolved Organic Carbon)
- Cadmium, ion [water, ground-, long-term]: 2.5106e-9 kg; lognormal variance with pedigree 7.97, pedigree (1,1,5,1,1)
  (same comment as for DOC, Dissolved Organic Carbon)
- Mercury [water, surface water]: 7.8024e-9 kg; lognormal variance with pedigree 1.64, pedigree (1,1,5,1,1)
  (same comment as for Fluoride)
- Zinc [air, urban air close to ground]: 1.6648e-6 kg; lognormal variance with pedigree 0.61, pedigree (1,1,5,1,1)
  (same comment as for residual material landfill)
- Chloride [water, ground-, long-term]: 0.00012623 kg; lognormal variance with pedigree 0.18, pedigree (1,1,5,1,1)
  (same comment as for DOC, Dissolved Organic Carbon)

## Sampling procedure
The 2 Swiss HWI plants, used as the inventory reference technology mix, have a total annual capacity of 53'000 tons of hazardous waste. This corresponds to 39% of the Swiss total installed capacity in 2000. Swiss average plants size is 20'000 t/a.

## Extrapolations
This dataset has been extrapolated from year 2000 to the year of the calculation (2021). The uncertainty has been adjusted accordingly.
