# cryolite production

Dataset: EcoSpold 2, unit process
Geography: RER
Time period: 2000-01-01 to 2021-12-31
Technology level: current
Classification: ISIC rev.4 ecoinvent: 2011:Manufacture of basic chemicals
Classification: EcoSpold01Categories: chemicals/inorganics
Tags: ConvertedDataset
Scenario: Business-as-Usual
System model: Allocation, cut-off by classification
Generated by: Roland Hischier
Published in: Althaus H.-J. 2007
Database: ecoinvent
isCopyrightProtected: true
accessRestrictedTo: 1

## General comment
The functional unit represent 1 kg of solid cryolite. Large uncertainty of the process data due to weak data on the production process and missing data on process emissions.
[This dataset was already contained in the ecoinvent database version 2. It was not individually updated during the transfer to ecoinvent version 3. Life Cycle Impact Assessment results may still have changed, as they are affected by changes in the supply chain, i.e. in other datasets. This dataset was generated following the ecoinvent quality guidelines for version 2. It may have been subject to central changes described in the ecoinvent version 3 change report (http://www.ecoinvent.org/database/ecoinvent-version-3/reports-of-changes/), and the results of the central updates were reviewed extensively. The changes added e.g. consistent water flows and other information throughout the database. The documentation of this dataset can be found in the ecoinvent reports of version 2, which are still available via the ecoinvent website. The change report linked above covers all central changes that were made during the conversion process.]

## Included activities end
Raw materials and chemicals used for production, transport of materials to manufacturing plant, estimated emissions to air and water from production (incomplete), estimation of energy demand and infrastructure of the plant (approximation). Solid wastes omitted.

## Geography
Data used has no specific geographical origin (stoechiometry). Average europenan processes for raw materials, transport requirements and electricity mix used.

## Technology
Production by the hydrofluoric acid technique. In a first step, alumina trihydrate is leached by hydrofluoric acid - in the second step cryolite is precipitated by adding sodium hydroxide. The overall process yield is of 98%. Inventory bases on stoechiometric calculations. The emissions to air (0.2 wt.% of HF input) and water were estimated using mass balance.

## Time period
date of published literature

## Parameters
- fraction, cooling water, to air: 0.3875 dimensionless; name fraction_CW_to_air; = (0.5*fraction_CW_OT_to_air)+(0.5*fraction_CW_R_to_air); lognormal variance with pedigree 0.092025, pedigree (4,4,3,2,4)
  Calculated value based on literature value (see comments of the other parametres present in this dataset) and expert opinion. In the case when no industry/literature data are available about the type of cooling or directly fraction, cooling water, to air specific for the process a default assumption is applied. It is assumed that the once-through cooling system is used in 50% of all cases and recirculating system is used in another 50% of all cases.
- fraction, cooling water, recirculating system, to air: 0.771 dimensionless; name fraction_CW_R_to_air; lognormal variance with pedigree 0.0413, pedigree (2,3,1,3,1)
  Calculated based on literature value (Scown, C.D., 2011, Water Footprint of U.S. Transportation Fuels and supplying information of the article) (Vionnet, S., Quantis Water Database - Technical Report, 2012).
- fraction, process water, to air: 0.205 dimensionless; name fraction_PW_to_air; lognormal variance with pedigree 0.092025, pedigree (4,4,3,2,4)
  Literature value (Statistics Canada, 2007 & Shaffer, K.H., 2008, Consumptive water use in the Great Lakes Basin, USGS) (Vionnet, S., Quantis Water Database - Technical Report, 2012).
- fraction, cooling water, once-through system, to air: 0.004 dimensionless; name fraction_CW_OT_to_air; lognormal variance with pedigree 0.0413, pedigree (2,3,1,3,1)
  (same comment as for fraction, cooling water, recirculating system, to air)
- fraction, cooling water, cooling pond system, to air: 0.032 dimensionless; name fraction_CW_CP_to_air; lognormal variance with pedigree 0.0413, pedigree (2,3,1,3,1)
  (same comment as for fraction, cooling water, recirculating system, to air)

## Reference product
- cryolite: 1 kg; CPC 34: Basic chemicals; By-product classification allocatable product; CAS 15096-52-3
  EcoSpold01Location=RER
  production volume 1.76708e7 kg; = (23561*1000)*3/4
    Cryolite is produced at four sites in the EU-15. 3 of them updated their information in 2006. The production volume of these four sites is 23,561 t/y.
    Assumptions:
    - Based on online information found from the specified european production sites related to production means ( Fluorsid, Derivados del Fluor S.A. , I.C.I.B. S.p.A., Solvay Fluor und Derivate) it is estimated that 3/4 of cryolite are produced from HF and 1/4 from fluosilicic acid.
    - The production volume is assumed to be similar in 2006 and 2005 (reference year is 2005)
    - The World production is extrapolated with the GDP adjustment factor: 3.32 (unit of GDP: current $; World Bank, year 2005). The adjustment factor is the ratio of World GDP/EU GDP
    Note: the production volume has been cross-checked with the amount of cryolite consumption during aluminium manufacture. 2g of cryolite are used for producing 1 kg of Aluminium. Asuming 1/4 of the total cryolite is being produced from fluosilicic acid, the resulting amount is 1.6E7 which is similar to our calculated value.
  property price 1 EUR2005
    Estimated based on expert judgement and knowledge of the market for chemicals.
  property carbon content 0
    carbon content on a dry matter basis (reserved; not for manual entry)
  properties: water in wet mass 0 kg, water content 0, dry mass 1 kg, wet mass 1 kg, carbon content, non-fossil 0, carbon content, fossil 0, carbon allocation 0 kg

## Inputs from technosphere
- electricity, medium voltage: 0.333 kWh; lognormal variance with pedigree 0.208, pedigree (5,5,5,1,4)
  Estimated with data from a large chem. plant
  EcoSpold01Location=UCTE
  Uncertainty: estimated with data from a large chem. plant
- chemical factory, organics: 4e-10 unit; lognormal variance with pedigree 0.5861, pedigree (4,5,5,3,5)
  Estimation
  EcoSpold01Location=RER
  Uncertainty: estimation
- heat, district or industrial, natural gas: 2 MJ; lognormal variance with pedigree 0.208, pedigree (5,5,5,1,4)
  Estimated with data from a large chem. plant
  EcoSpold01Location=RER
  Uncertainty: estimated with data from a large chem. plant
  properties: heating value, net 1 MJ
- hydrogen fluoride: 0.584 kg; lognormal variance with pedigree 0.1786, pedigree (4,5,5,5,5)
  EcoSpold01Location=GLO
  Estimation based on process yield 90-99.8%
  Uncertainty: estimation based on process yield 90-99.8%
  properties: heating value, net 6.06 MJ, dry mass 1 kg, wet mass 1 kg
- aluminium oxide, non-metallurgical: 0.248 kg; lognormal variance with pedigree 0.1786, pedigree (4,5,5,5,5)
  EcoSpold01Location=RER
  Estimation based on process yield 90-99.8%
  Uncertainty: estimation based on process yield 90-99.8%
  properties: dry mass 1 kg, wet mass 1 kg
- sodium hydroxide, without water, in 50% solution state: 0.583 kg; lognormal variance with pedigree 0.1786, pedigree (4,5,5,5,5)
  (same comment as for aluminium oxide, non-metallurgical)
  properties: wet mass 1 kg, dry mass 1 kg, heating value, net 3.03 MJ

## Inputs from nature
- Water, unspecified natural origin [natural resource, in water]: 0.012 m3; name water_UNO_input; lognormal variance with pedigree 0.208, pedigree (5,5,5,1,4)
  Estimated with data from a large chem. plant
  Uncertainty: estimated with data from a large chem. plant
- Water, cooling, unspecified natural origin [natural resource, in water]: 0.024 m3; name water_cooling_UNO_input; lognormal variance with pedigree 0.208, pedigree (5,5,5,1,4)
  (same comment as for Water, unspecified natural origin)

## Emissions to nature
- Sodium, ion [water, surface water]: 0.00604 kg; lognormal variance with pedigree 0.23, pedigree (5,5,5,5,4)
  Estimated from mass balance and WWTP effic.
  Uncertainty: estimated from mass balance and WWTP effic.
- Fluoride [water, surface water]: 0.00998 kg; lognormal variance with pedigree 0.23, pedigree (5,5,5,5,4)
  (same comment as for Sodium, ion)
- Water [water, unspecified]: 0.02424 m3; name water_to_water_unspecified; = water_cooling_UNO_input*(1-fraction_CW_to_air)+water_UNO_input*(1-fraction_PW_to_air); lognormal variance with pedigree 0.0807, pedigree (2,2,5,1,1)
  Calculated value based on literature values and expert opinion. See comments in the parametres' comment field.
  property carbon content, fossil 0; name C_content_fossil
  property fraction, origin: fresh water 0; name fraction_origin_fresh_water_Ww
  property dry mass 0 kg; name DM
  property water in wet mass 1000 kg; name WWM
  property fraction, origin: salt water 0; name fraction_origin_salt_water_Ww
  property fraction, origin: unspecified 1; name fraction_origin_unspecified_Ww
  property wet mass 1000 kg; name WM
  property carbon content, non-fossil 0; name C_content_non_fossil
- Hydrogen fluoride [air, urban air close to ground]: 0.00117 kg; lognormal variance with pedigree 0.33, pedigree (5,5,5,5,5)
  Estimation
  Uncertainty: estimation
- Water [air, unspecified]: 0.01176 m3; name water_to_air_unspecified; = (water_cooling_UNO_input*fraction_CW_to_air)+(water_UNO_input*fraction_PW_to_air); lognormal variance with pedigree 0.0807, pedigree (2,2,5,1,1)
  (same comment as for Water)
  property fraction, origin: fresh water 0; name fraction_origin_fresh_water
  property fraction, origin: salt water 0; name fraction_origin_salt_water
  property fraction, origin: unspecified 1; name fraction_origin_unspecified

## Sampling procedure
Process data based on stoechiometric calculations of few literature sources. Energy demand based on approximation from large chemical plant. Process emissions based on estimations only.

## Extrapolations
This dataset has been extrapolated from year 2000 to the year of the calculation (2021). The uncertainty has been adjusted accordingly.

## Review by Heiko Kunst 2003-06-20
Passed
Passed
