# glass cullet supply, from fluorescent lamps, for Saint-Gobain ISOVER SA

Dataset: EcoSpold 2, unit process
Geography: GLO
Time period: 2009-01-01 to 2021-12-31
Technology level: current
Classification: ISIC rev.4 ecoinvent: 3811:Collection of non-hazardous waste
Scenario: Business-as-Usual
System model: Allocation, cut-off by classification
Generated by: Bo Weidema
Database: ecoinvent
isCopyrightProtected: true
accessRestrictedTo: 1

## Reference product
- glass cullet, from fluorescent lamps treatment: -1 kg; CPC 37111: Glass in the mass, in balls (except microspheres), rods or tubes, unworked; waste and scrap of glass; By-product classification Waste
  Activity link set as transport is modelled with producer-specific transport distances and transport means in the glass wool mat production dataset.
  production volume 373520 kg; = 2.03E+07*0.0184
    production volume of Saint-Gobain ISOVER SA multiplied with the input of lamps cullet per kg glass wool mat
  property price 0 EUR2005
    Waste products are assigned a price of zero as they are assumed to require further treatment.
  property carbon content 0
    carbon content on a dry matter basis (reserved; not for manual entry)
  properties: carbon content, fossil 0, water content 0, wet mass 1 kg, dry mass 1 kg, carbon content, non-fossil 0, water in wet mass 0 kg, carbon allocation 0 kg

## By-products
- glass cullet, for Saint-Gobain ISOVER SA: 0 kg; By-product classification Recyclable; CPC 37111: Glass in the mass, in balls (except microspheres), rods or tubes, unworked; waste and scrap of glass; pedigree (1,1,1,1,1)
  production volume 0 kg; = 2.03E+07*0.0184
    (same comment as for glass cullet, from fluorescent lamps treatment)
  property price 0.08 EUR2005
    Estimated to be the same price as for glass cullet, sorted (Temporary price data. The price of the glass cullet, sorted is estimated to be two times higher than the price of the waste packaging glass, unsorted.).
  properties: dry mass 1 kg, wet mass 1 kg

## Inputs from technosphere
- glass cullet, for Saint-Gobain ISOVER SA: -1 kg; lognormal variance with pedigree 0.0086, pedigree (1,1,4,1,1)
  production volume 373520 kg
  properties: price 0.08 EUR2005, dry mass 1 kg, wet mass 1 kg

## Extrapolations
This dataset has been extrapolated from year 2009 to the year of the calculation (2021). The uncertainty has been adjusted accordingly.
