# folding boxboard carton production

Dataset: EcoSpold 2, unit process
Geography: RER
Time period: 2018-01-01 to 2021-12-31
Technology level: current
Classification: ISIC rev.4 ecoinvent: 1701:Manufacture of pulp, paper and paperboard
Synonyms: FBB, cartonboard
Scenario: Business-as-Usual
System model: Allocation, cut-off by classification
Share of production covered: 71 %
Generated by: Michael Sturges
Database: ecoinvent
isCopyrightProtected: true
accessRestrictedTo: 1

## General comment
This dataset is an aggregated process which includes the production of Folding Box Board, transport of the board to converting sites and converting of the board (printing, cutting, creasing) into blank boxes ready for delivery. Folding Box Board FBB (also known as GC and UC) is a packaging grade of board used to manufacture cartons. It is typically made using predominantly virgin fibres, but may incoroprate some recovered fibres. This grade is typically made of mechanical pulp sandwiched between two layers of chemical pulp with up to three layers of coating on the top or printing surface and one layer of coating or sizing on the reverse. The manufacture of Folding Box Board, FBB, is to a large degree integrated but usually the required chemical pulp is purchased. Typical uses include pharmaceuticals, confectionery, frozen and chilled foods. The board is converted into a carton at a converting site which typically includes a printing process and cutting/creasing of the board into carton blanks, ready for delivery to and erection by the packer/filler.
Data for the production of FBB and conversion of the FBB into cartons were provided by the European industry associations for cartonboard producers (Pro Carton) and convertors (ECMA European Carton Makers Association).
BOARD PRODUCTION: The data for the production of FBB were collected from ten European mills, together producing about 71% of the total annual production of FBB in Europe in 2017 (which is estimated at approximately 2 900 000 tonnes net saleable product. The mills contributing with data are located in Finland, Germany, Netherlands, Sweden, Slovenia and United Kingdom. The mills have a production volume of between 90 000 – 375 000 tonnes net saleable paper product . The data is collated by Pro Carton in their internal report "European Environmental Database for Cartonboard and Carton Production", which is not made publicly available.
CARTON CONVERTING: The carton converting data were collected from 33 European factories together representing the production of over 380 000 tonnes cartons. hese convertors were located in Austria, Belgium, France, Germany, Poland, Romania, Spain, Turkey, Ukraine, and the United Kingdom. They varied in size producing between 1 000 and 50 000 tonnes of finished cartons ready for shipment.
Inventory data represent the year 2018.

## Included activities start
The process starts with the reception of wood, wood chips, recovered paper and/or market pulp at the papermill.

## Included activities end
This module includes the European production of folding box board (FBB) in a papermill and conversion of the board into printed, cut and creased cartons ready for delivery to the packer/filler. Transport of the board between the mill and the converting operation is included. For the board production, wood handling, pulping and bleaching, the deinking process, board production, energy production on-site and internal waste water treatment are included. Not included is the transport of the waste paper to the mill as this in already integrated into the respective collection modules. Sorting of the incoming paper and the by-products connected to this has been excluded, since sorting of unsorted paper takes place in a separate activity. For the converting process, printing, cutting and creasing is included.

## Geography
European average data (weighted according to production volumes), provided by Pro Carton from the data survey that underpins their 2018 European Environmental Database for Cartonboard and Carton Production. Data covers the main producers in Europe

## Technology
Average of present technology used, weighted according to the production volumes of the mills participating in the original data survey

## Time period
Inventory data represent the year 2018. The production volume is valid for the year 2017.

## Reference product
- bark chips, wet, measured as dry mass: 1 kg; name a_BP10; CPC 31230: Wood in chips or particles; By-product classification allocatable product; pedigree (1,1,1,1,1)
  Average data from ten European producers of folding box board
  production volume 3.03706e7 kg; = a_BP10*PV_board
    Calculated from production volume of reference product using the relative outputs.
  property heating value, net 4.81 MJ
    LHV is calculated based on the Carbon content of the product. More details can be found on the respective documentation.
  property price 0.034 EUR2005; name a_BP10_price_EUR2005
    Expert judgement (Urs Luginbühl, Swiss Sawmilling industry, personal communication in June 2014). Cross-reference; FAOSTAT database; http://faostat.fao.org/site/626/DesktopDefault.aspx?PageID=626#ancor; Average import/export prices of EU for 'chips and particles'. Price: 48.76 Euro/m3. The density of the wood chips is 650 kg/m3. The price is calculated to be 0.075 EUR/kg.
  property carbon content 0.494
    carbon content on a dry matter basis (reserved; not for manual entry)
  property true value 0.000441131; name a_BP10_true_value
    allocation property applied in "true value" allocation // value calculated from revenue
  properties: carbon content, non-fossil 0.494, water in wet mass 1.4 kg, water content 1.4, wet mass 2.4 kg, dry mass 1 kg, carbon content, fossil 0, carbon allocation 0.494 kg
- folding boxboard carton: 0 kg; By-product classification allocatable product; CPC 32153: Cartons, boxes, cases, record sleeves and other packing containers (except bags) of paper, paperboard, cellulo[…]
  production volume 2.3408e9 kg; name PV_board
    Estimate: European production volume of cartons from folding boxboard are estimated based on the annual production of folding boxboard in Europein 2017 multiplied by a factor of 0.8, assuming that almost all board gets converted to cartons, except for a 20% of specialized applications and losses.
  property heating value, net 11.59 MJ
    (same comment as for bark chips, wet, measured as dry mass)
  property price 0.88 EUR2005
    Export prices for the World+ according to: http://faostat.fao.org/site/626/DesktopDefault.aspx?PageID=626#ancor downloaded 28 April 2009; calculated as export value divided by export volume.
  property carbon content, fossil 0.0227142
    taken over from previous ecoinvent dataset "folding boxboard production, 2000": fossil carbon content on a dry matter basis
  property carbon content, non-fossil 0.4
    biogene carbon content on a dry matter basis; based on calculations using a methodology developed by CITPA - Guidelines for calculating Carbon footprints for paper-based packaging, CITPA, March 2018
  property carbon content 0.422714
    carbon content on a dry matter basis (reserved; not for manual entry)
  property true value 0.88
    allocation property applied in "true value" allocation // value calculated from revenue
  properties: wet mass 1 kg, dry mass 0.92 kg, water in wet mass 0.08 kg, water content 0.0869565, carbon allocation 0.388897 kg

## By-products
- turpentine: 0 kg; name a_BP7; By-product classification allocatable product; CPC 34400: Activated natural mineral products; animal black; tall oil; terpenic oils produced by the treatment of conifer[…]; CAS 8006-64-2; pedigree (1,1,1,1,1)
  Average data from ten European producers of folding box board
  production volume 1.29938e7 kg; = a_BP7*PV_board
    Calculated from the production volume of the reference product in proportion to the respective output amounts.
  property heating value, net 26.74 MJ
    (same comment as for bark chips, wet, measured as dry mass)
  property price 1.826 EUR2005; name a_BP7_price_EUR2005
    Average price for imports in 2005 to USA, China, India, Japan and EU-28 according to UN comtrade. Accessible online at https://comtrade.un.org/data/, 11.6.2018
  property carbon content 0.882353
    carbon content on a dry matter basis (reserved; not for manual entry)
  property true value 0.0101361; name a_BP7_true_value
    allocation property applied in "true value" allocation // value calculated from revenue
  properties: dry mass 1 kg, carbon content, non-fossil 0.882353, water content 0, carbon content, fossil 0, wet mass 1 kg, water in wet mass 0 kg, carbon allocation 0.882353 kg
- aluminium scrap, post-consumer, prepared for melting: 0 kg; By-product classification Recyclable; CPC 39363: Waste and scrap of aluminium; pedigree (1,1,1,1,1)
  Average data from thirty three carton converting facilities, weighted according to production volumes - aluminium printing plates from the process will all be sent for recycling after use
  production volume 0 kg; = a_BP8*PV_board
    Calculated from production volume of reference product using the relative outputs.
  property price 0.806 EUR2005; name a_BP8_price_EUR2005
    Temporary price data. Calculated as 90% of purchasers price based on: 2005 import and export prices (total trades (USD) divided by total weight (kg) in biggest economies of the world: EU27, USA, Brasil, China, India, Japan and Russia) from UN Commodity Trade Statistics Database (http://data.un.org/Explorer.aspxDatabase [Accessed 2011.06.17]). Commodity: Waste or scrap, aluminium
  property carbon content 0
    carbon content on a dry matter basis (reserved; not for manual entry)
  properties: carbon content, non-fossil 0, carbon content, fossil 0, dry mass 1 kg, water in wet mass 0 kg, water content 0, wet mass 1 kg, carbon allocation 0 kg

## Inputs from technosphere
- pulpwood, hardwood, measured as solid wood under bark: 0 m3; pedigree (1,1,1,1,1)
  Average data from ten European producers of folding box board
  properties: heating value, net 6071.3 MJ, water content 0.8, wet mass 1239.04 kg, carbon content, non-fossil 0.494, dry mass 688.356 kg
  note on heating value, net: Value based on "hardwood forestry, mixed species, sustainable forest management"The property is based on a value of 11.58MJ/kg
- waste paperboard, sorted: 0.00173997 kg; lognormal variance with pedigree 0.0015, pedigree (2,2,2,1,1)
  Average data from ten European producers of folding box board, weighted according to production volumes
  properties: wet mass 1 kg, water content 0.243781, dry mass 0.804 kg, carbon content, non-fossil 0.483259, heating value, net 15.92 MJ
- sodium hydroxide, without water, in 50% solution state: 0.000105504 kg; lognormal variance with pedigree 0.0015, pedigree (2,2,2,1,1)
  Average data from ten European producers of folding box board, weighted according to production volumes - NaOH recorded in the caterogy of inputs for Functional additives
  properties: wet mass 1 kg, dry mass 1 kg, heating value, net 3.03 MJ
- pulpwood, softwood, measured as solid wood under bark: 0 m3; pedigree (1,1,1,1,1)
  Average data from ten European producers of folding box board
  properties: carbon content, non-fossil 0.494, dry mass 484 kg, water content 1.4, heating value, net 4483.78 MJ, wet mass 1161.6 kg
  note on heating value, net: Value based on "softwood forestry, mixed species, sustainable forest management"The property is based on a value of 11.58MJ/kg
- sulfuric acid: 6.79878e-5 kg; lognormal variance with pedigree 0.0015, pedigree (2,2,2,1,1)
  Average data from ten European producers of folding box board, weighted according to production volumes - H2SO4 recorded in the caterogy of inputs for Functional additives
  properties: wet mass 1 kg, dry mass 1 kg
- waste paper, sorted: 0.000434993 kg; lognormal variance with pedigree 0.0015, pedigree (2,2,2,1,1)
  (same comment as for waste paperboard, sorted)
  properties: heating value, net 14.11 MJ, water content 0.111111, dry mass 0.9 kg, wet mass 1 kg, carbon content, non-fossil 0.448889
- lignite ash: -5.82502e-5 kg; name a_BP3; lognormal variance with pedigree 0.0029, pedigree (3,2,2,1,1)
  Calculated from fossil fuels consumed
  production volume 3.57153e6 kg; = a_BP3*PV_board
    (same comment as for turpentine)
  property price 0 EUR2005; name a_BP3_price_EUR2005
  properties: wet mass 1 kg, dry mass 1 kg
- diesel, low-sulfur: 2.35569e-6 kg; lognormal variance with pedigree 0.0015, pedigree (2,2,2,1,1)
  (same comment as for waste paperboard, sorted)
  properties: carbon content, fossil 0.865, wet mass 1 kg, dry mass 1 kg, heating value, net 42.8 MJ
- acrylic varnish, without water, in 87.5% solution state: 0.000456653 kg; lognormal variance with pedigree 0.002, pedigree (2,3,2,1,1)
  Average data from thirty three carton converting facilities, weighted according to production volumes - varnish
  properties: carbon content, fossil 0.674725, dry mass 1 kg, wet mass 1 kg, heating value, net 20.44 MJ
- thermo-mechanical pulp: 0.000172173 kg; lognormal variance with pedigree 0.0029, pedigree (3,2,2,1,1)
  Average data from ten European producers of folding box board
  properties: heating value, net 14.97 MJ, dry mass 1 kg, carbon content, non-fossil 0.494, wet mass 1 kg
- printing ink, offset, without solvent, in 47.5% solution state: 0.000162145 kg; = 0.000799844721804066+0.00344729857465508; lognormal variance with pedigree 0.002, pedigree (2,3,2,1,1)
  Average data from thirty three carton converting facilities, weighted according to production volumes - Flexo ink for printing (0.000799844721804066), plus off set ink for printing (0.00344729857465508)
  properties: carbon content, fossil 0.455266, wet mass 1 kg, dry mass 1 kg, carbon content, non-fossil 0.221773, heating value, net 20.51 MJ
- sulfite pulp, bleached: 0.001653 kg; lognormal variance with pedigree 0.0029, pedigree (3,2,2,1,1)
  Average data from ten European producers of folding box board
  properties: heating value, net 13.23 MJ, wet mass 1 kg, carbon content, non-fossil 0.494, dry mass 0.9 kg, water content 0.111111
- aluminium, primary, ingot: 5.5771e-5 kg; lognormal variance with pedigree 0.0034, pedigree (3,3,2,1,1)
  Average data from thirty three carton converting facilities, weighted according to production volumes - aluminium printing plates
  properties: dry mass 1 kg, wet mass 1 kg
- natural gas, high pressure: 0 m3; pedigree (1,1,1,1,1)
  Average data from ten European producers of folding box board and thirty three carton converting facilities, weighted according to production volumes
  properties: carbon content, fossil 0.602381, dry mass 0.84 kg, wet mass 0.84 kg, heating value, net 39 MJ
  note on heating value, net: Literature value, Source: United Nations Statistics Division (2018) International Recommendations for Energy Statistics (IRES). Available at: http://unstats.un.org/unsd/statcom/doc11/BG-IRES.pdf.
- chemi-thermomechanical pulp: 0.00854337 kg; lognormal variance with pedigree 0.0015, pedigree (2,2,2,1,1)
  (same comment as for waste paperboard, sorted)
  properties: carbon content, non-fossil 0.494, dry mass 0.9 kg, water content 0.111111, wet mass 1 kg, heating value, net 13.23 MJ
- sheet rolling, aluminium: 5.5771e-5 kg; lognormal variance with pedigree 0.0034, pedigree (3,3,2,1,1)
  Combined with the input of aluminium, primary, ingot, this is a proxy for aluminium printing plates for the litho printing process. A litho printing plate is a thin sheet of anodised fine grain hardened aluminium used in the printing industry. The photographically prepared (etched picture on to the aluminium) printing plate is treated chemically so the image will accept ink. This processing of the sheet usually occurs at the converting site, which will have its own prepress facility. The energy used in the prepress activity is captured in the energy data collected from the sites, but data on chemicals used etc., is not captured. However, it is anticipated that these will fall below the cur-off criteria defined in the data collection exercise.
- pulpwood, softwood, measured as solid wood under bark: 0 m3; pedigree (1,1,1,1,1)
  (same comment as for natural gas, high pressure)
  properties: dry mass 484 kg, wet mass 1161.6 kg, water content 1.4, carbon content, non-fossil 0.494, heating value, net 4483.78 MJ
- electricity, medium voltage: 0.0537539 kWh; lognormal variance with pedigree 0.0009, pedigree (1,2,2,1,1)
  Average data from ten European producers of folding box board and thirty three carton converting facilities. Among these facilities, electricity inputs are distributed over the following countries with the respective shares: AT: 0.02; BE: 0.01; DE: 0.10; ES: 0.01; FI: 0.38; FR: 0.04; IT: 0.01; NE: 0.03; PL: 0.03; RO: 0.01; SE: 0.27; SI: 0.04; TR: 0.03; GB: 0.04; UA: 0.01. Since these facilities do not cover all European FBB production, the average European grid mix is applied here.
- transport, freight train: 0.00757855 metric ton*km; lognormal variance with pedigree 0.2082, pedigree (5,5,2,1,4)
  Transport distance based on eurostat transport statistics for railway transport of goods. The transport data was extracted from the database leaf "Railway transport - goods transported, by group of goods - from 2008 onwards based on NST 2007 (1 000 t, million tkm) (rail_go_grpgood)" (http://ec.europa.eu/eurostat/data/database) on the 2018-06-01. The transport distance was calculated based on the total mass of goods transported and total payload-distance for the NST 2007 category "GT06 - Wood and products of wood and cork (except furniture); articles of straw and plaiting materials; pulp, paper and paper products; printed matter and recorded media" in the year 2016 for all countries for which data was available. The average distance of railway transport for goods in this category in 2016 was 328 km. The fraction of goods transported by rail (in terms of mass) relative to the total mass of goods transported by road, rail and inland waterways was 7.7% in 2016. Therefore, the average distance that goods travelled by rail in 2016 was 25 km. This value is assumed to be representative for Europe.
- transport, freight, inland waterways, barge: 0.00100719 metric ton*km; lognormal variance with pedigree 0.2082, pedigree (5,5,2,1,4)
  Transport distance based on eurostat transport statistics for transport of goods by inland waterways. The transport data was extracted from the database leaf "Transport by type of good (from 2007 onwards with NST2007) (iww_go_atygo)" (http://ec.europa.eu/eurostat/data/database) on the 2018-06-01. The transport distance was calculated based on the total mass of goods transported and total payload-distance for the NST 2007 category "GT06 - Wood and products of wood and cork (except furniture); articles of straw and plaiting materials; pulp, paper and paper products; printed matter and recorded media" in the year 2016 for the European Union (current composition). The average distance of transport by inland waterways for goods in this category in 2016 was 322 km. The fraction of goods transported by inland waterways (in terms of mass) relative to the total mass of goods transported by road, rail and inland waterways was 0.6% in 2016. Therefore, the average distance that goods travelled by inland waterways in 2016 was 2 km. This value is assumed to be representative for Europe.
- aluminium sulfate, powder: 0.00031252 kg; lognormal variance with pedigree 0.0015, pedigree (2,2,2,1,1)
  Average data from ten European producers of folding box board, weighted according to production volumes - Al2(SO4)3, Alum, recorded in the caterogy of inputs for Functional additives
  properties: dry mass 1 kg, wet mass 1 kg
- wood ash mixture, pure: 0 kg; name a_BP9; pedigree (1,1,1,1,1)
  Calculated from fossil fuels consumed
  production volume 0 kg
    (same comment as for turpentine)
  property price 0 EUR2005; name a_BP9_price_EUR2005
  properties: dry mass 1 kg, wet mass 1 kg, carbon content, non-fossil 0.012
- wood chips, wet, measured as dry mass: 0 kg; pedigree (1,1,1,1,1)
  (same comment as for waste paperboard, sorted)
  properties: dry mass 1 kg, water content 1.1, wet mass 2.1 kg, heating value, net 10.84 MJ, carbon content, non-fossil 0.494
  note on heating value, net: Value based on the dataset 'softwood forestry, mixed species, sustainable forest management'
- calcium carbonate, precipitated: 0.00381518 kg; lognormal variance with pedigree 0.0015, pedigree (2,2,2,1,1)
  (same comment as for waste paperboard, sorted)
- paper mill, integrated: 2.07686e-12 unit; lognormal variance with pedigree 0.396, pedigree (4,5,5,1,4)
  Own assumption
  Uncertainty: own assumption
- light fuel oil: 2.18219e-5 kg; lognormal variance with pedigree 0.0015, pedigree (2,2,2,1,1)
  (same comment as for waste paperboard, sorted)
  properties: dry mass 1 kg, carbon content, fossil 0.862, wet mass 1 kg, heating value, net 42.6 MJ
- potato starch: 0.000510657 kg; lognormal variance with pedigree 0.0015, pedigree (2,2,2,1,1)
  Average data from ten European producers of folding box board, weighted according to production volumes - 0.00554230523390759kg recorded as potato starch; 0.0002024kg equates to 50% of the input recorded as wheat starch; 0.00581kg equates to 50% of the input recorded as Modified starch (sizing agents)
  properties: heating value, net 10.66 MJ, water content 0.25, dry mass 0.8 kg, wet mass 1 kg, carbon content, non-fossil 0.46
- sludge from pulp and paper production: -5.40974e-5 kg; name a_BP6; lognormal variance with pedigree 0.0029, pedigree (3,2,2,1,1)
  Average data from ten European producers of folding box board, weighted according to production volumes, recorded as fibre (primary sludge)
  production volume 3.31691e6 kg; = a_BP6*PV_board
    (same comment as for turpentine)
  property price 0 EUR2005; name a_BP6_price_EUR2005
  properties: carbon content, non-fossil 0.21, water content 0.333333, dry mass 0.75 kg, wet mass 1 kg, heating value, net 2.65 MJ
  note on heating value, net: Value taken from the general comment of the treatment dataset.
- sodium chlorate, powder: 1.75433e-5 kg; lognormal variance with pedigree 0.0015, pedigree (2,2,2,1,1)
  Average data from ten European producers of folding box board, weighted according to production volumes - NaClO3 recorded in the caterogy of inputs for Functional additives
  properties: wet mass 1 kg, dry mass 1 kg
- tap water: 0.00143322 kg; lognormal variance with pedigree 0.0029, pedigree (3,2,2,1,1)
  (same comment as for waste paperboard, sorted)
  properties: carbon content, fossil 0.00178991, water content 2962.17, wet mass 1 kg, dry mass 0.000337476 kg
- sulfur: 1.50065e-7 kg; lognormal variance with pedigree 0.0015, pedigree (2,2,2,1,1)
  Average data from ten European producers of folding box board, weighted according to production volumes - Sulfur recorded in the caterogy of inputs for Functional additives
  properties: dry mass 1 kg, wet mass 1 kg
- ethylene vinyl acetate copolymer: 4.32287e-5 kg; lognormal variance with pedigree 0.0015, pedigree (2,2,2,1,1)
  Average data from ten European producers of folding box board, weighted according to production volumes: 0.000383397365432845kg of Polyvinyl acetate recorded in the caterogy of inputs for coatings, pigments and binders.
  Plus average data from thirty three carton converting facilities, weighted according to production volumes: Proxy for cold glue for box making (0.000672729570509267 kg cold glue) and proxy for hot melt glue for box making (0.0000761820098111169 kg hot melt glue)
  properties: dry mass 1 kg, carbon content, fossil 0.79734, wet mass 1 kg, heating value, net 35.99 MJ
- biowaste: -0.000196247 kg; name a_BP2; lognormal variance with pedigree 0.0029, pedigree (3,2,2,1,1)
  Average data from ten European producers of folding box board, weighted according to production volumes. Consists of 0.0085kg of fibre (primary sludge) and 0.00429kg of biological treatment sludge
  production volume 1.20326e7 kg; = a_BP2*PV_board
    (same comment as for turpentine)
  property price 0 EUR2005; name a_BP2_price_EUR2005
  properties: heating value, net 4.29 MJ, water content 1.5, wet mass 1 kg, carbon content, non-fossil 0.1624, dry mass 0.4 kg
- latex: 0.000571938 kg; lognormal variance with pedigree 0.0015, pedigree (2,2,2,1,1)
  (same comment as for waste paperboard, sorted)
  properties: dry mass 1 kg, heating value, net 26.45 MJ, carbon content, fossil 0.872983, wet mass 1 kg
- rosin size, for paper production: 3.93502e-6 kg; lognormal variance with pedigree 0.0015, pedigree (2,2,2,1,1)
  Average data from ten European producers of folding box board, weighted according to production volumes - Rosin size (sizing agents) recorded in the caterogy of inputs for Functional additives
  properties: heating value, net 15.62 MJ, dry mass 1 kg, wet mass 1 kg, carbon content, non-fossil 0.515474
- transport, freight, lorry, unspecified: 0.00221897 metric ton*km; lognormal variance with pedigree 0.2082, pedigree (5,5,2,1,4)
  Transport distance based on eurostat transport statistics for road freight transport. The transport data was extracted from the database leaf 'Annual road freight transport, by type of goods and type of transport [1 000 t, Mio Tkm], from 2008 onwards (road_go_ta_tg)' (http://ec.europa.eu/eurostat/data/database) on the 2018-06-01. The transport distance was calculated based on the total mass of goods transported and total payload-distance for the NST 2007 category "GT06 - Wood and products of wood and cork (except furniture); articles of straw and plaiting materials; pulp, paper and paper products; printed matter and recorded media" in the year 2016 for all countries for which data was available. The average distance of road transport for goods in this category in 2016 was 203 km. The fraction of goods transported by road (in terms of mass) relative to the total mass of goods transported by road, rail and inland waterways was 91.8% in 2016. Therefore, the average distance that goods travelled by road in 2016 was 187 km. This value is assumed to be representative for Europe.")
- heavy fuel oil: 6.13105e-5 kg; lognormal variance with pedigree 0.0029, pedigree (3,2,2,1,1)
  Average data from ten European producers of folding box board
  properties: wet mass 1 kg, carbon content, fossil 0.849, dry mass 1 kg, heating value, net 41.2 MJ
- sulfate pulp, bleached: 0.0095464 kg; lognormal variance with pedigree 0.0015, pedigree (2,2,2,1,1)
  (same comment as for waste paperboard, sorted)
  properties: heating value, net 13.23 MJ, water content 0.111111, carbon content, non-fossil 0.494, dry mass 0.9 kg, wet mass 1 kg
- packaging film, low density polyethylene: 4.46105e-5 kg; lognormal variance with pedigree 0.002, pedigree (2,3,2,1,1)
  Average data from thirty three carton converting facilities, weighted according to production volumes - plastic stretch/shrink film
  properties: carbon content, fossil 0.857143, dry mass 1 kg, wet mass 1 kg, heating value, net 42.47 MJ
- chemical, organic: 5.78427e-5 kg; lognormal variance with pedigree 0.0015, pedigree (2,2,2,1,1)
  Average data from ten European producers of folding box board, weighted according to production volumes - Polyacrylates, recorded in the caterogy of inputs for coatings, pigments and binders
  properties: wet mass 1 kg, carbon content, fossil 0.628, dry mass 1 kg, heating value, net 19.03 MJ
- maize starch: 0.000526869 kg; lognormal variance with pedigree 0.0015, pedigree (2,2,2,1,1)
  Average data from ten European producers of folding box board, weighted according to production volumes - 0.00596695553397997kg equates to input of corn starch; 0.0002024kg equates to 50% of the input recorded as wheat starch; 0.00581kg equates to 50% of the input recorded as Modified starch (sizing agents)
  properties: water content 0.162791, heating value, net 11.64 MJ, dry mass 0.86 kg, wet mass 1 kg, carbon content, non-fossil 0.46
- clay: 0.000643971 kg; lognormal variance with pedigree 0.0015, pedigree (2,2,2,1,1)
  Average data from ten European producers of folding box board and thirty three carton converting facilities, weighted according to production volumes - 0.0168582340577921 kg clay recorded in the caterogy of inputs for coatings, pigments and binders; 0.00000957888685876384kg clay (filler) recorded in the caterogy of functional additives
  properties: water content 0.0362694, wet mass 1 kg, dry mass 0.965 kg
- municipal solid waste: -3.30144e-6 kg; name a_BP4; lognormal variance with pedigree 0.0029, pedigree (3,2,2,1,1)
  Average data from ten European producers of folding box board, weighted according to production volumes. Reported as "rejects from recovered paper processing", which will be a mixture of items such as grit, glass, small plastics, staples, etc.
  production volume 202423 kg; = a_BP4*PV_board
    (same comment as for turpentine)
  property price 0 EUR2005; name a_BP4_price_EUR2005
  properties: carbon content, non-fossil 0.261655, wet mass 1 kg, heating value, net 11.74 MJ, dry mass 0.771 kg, carbon content, fossil 0.171549, water content 0.297017
- bark chips, wet, measured as dry mass: 0 kg; pedigree (1,1,1,1,1)
  Average data from ten European producers of folding box board, as fuel, assumes calorific value of 13.6MJ/kg
  properties: water content 1.4, dry mass 1 kg, carbon content, non-fossil 0.494, wet mass 2.4 kg, heating value, net 4.81 MJ
- sludge from pulp and paper production: -5.77039e-5 kg; name a_BP5; lognormal variance with pedigree 0.0029, pedigree (3,2,2,1,1)
  (same comment as for sludge from pulp and paper production)
  production volume 3.53804e6 kg; = a_BP5*PV_board
    (same comment as for turpentine)
  property price 0 EUR2005; name a_BP5_price_EUR2005
  properties: water content 0.333333, carbon content, non-fossil 0.21, dry mass 0.75 kg, wet mass 1 kg, heating value, net 2.65 MJ
- peat: 0.00161806 kg; lognormal variance with pedigree 0.0029, pedigree (3,2,2,1,1)
  Average data from ten European producers of folding box board, assumes calorific value of 15MJ/kg
  properties: heating value, net 10 MJ, water content 1.38095, carbon content, fossil 0.59, wet mass 1 kg, dry mass 0.42 kg
  note on heating value, net: Indicative value. Reference: Nature and Management of Tropical Peat Soils, FAO Soils Bulletin 59, available at: http://www.fao.org/3/x5872e/x5872e00.htm#Contents
- hydrogen peroxide, without water, in 50% solution state: 0.000123894 kg; lognormal variance with pedigree 0.0015, pedigree (2,2,2,1,1)
  Average data from ten European producers of folding box board, weighted according to production volumes - H2O2, hydrogen peroxide recorded in the caterogy of inputs for Functional additives
  properties: heating value, net 7.13 MJ, wet mass 1 kg, dry mass 1 kg
- wood chips, from post-consumer wood, measured as dry mass: 0.000756081 kg; lognormal variance with pedigree 0.0029, pedigree (3,2,2,1,1)
  Average data from ten European producers of folding box board, assumes calorific value of 13.6MJ/kg
  properties: wet mass 1.4 kg, water content 0.4, carbon content, non-fossil 0.494, dry mass 1 kg, heating value, net 9.99 MJ
- pulpwood, softwood, measured as solid wood under bark: 3.19927e-5 m3; lognormal variance with pedigree 0.0015, pedigree (2,2,2,1,1)
  (same comment as for natural gas, high pressure)
- aluminium scrap, post-consumer, prepared for melting: -5.5771e-5 kg; lognormal variance with pedigree 0.004, pedigree (3,3,2,4,1)
  (same comment as for aluminium scrap, post-consumer, prepared for melting)
  production volume 3.41952e6 kg
  properties: dry mass 1 kg, wet mass 1 kg
- pulpwood, hardwood, measured as solid wood under bark: 5.57182e-7, 1.54798e-8 m3 (2 entries); lognormal variance with pedigree 0.0029, pedigree (3,2,2,1,1)
  Average data from ten European producers of folding box board
- pulpwood, softwood, measured as solid wood under bark: 1.46982e-6, 1.79598e-8 m3 (2 entries); lognormal variance with pedigree 0.0029, pedigree (3,2,2,1,1)
  Average data from ten European producers of folding box board
- natural gas, high pressure: 0.00326804, 2.11003e-5 m3 (2 entries); lognormal variance with pedigree 0.0009, pedigree (1,2,2,1,1)
  (same comment as for natural gas, high pressure)
- wood ash mixture, pure: -0.000181443, -3.72982e-6 kg (2 entries); lognormal variance with pedigree 0.0029, pedigree (3,2,2,1,1)
  Calculated from fossil fuels consumed
  production volume 1.13536e7 kg
- wood chips, wet, measured as dry mass: 0.000714257, 2.71746e-5 kg (2 entries); lognormal variance with pedigree 0.0015, pedigree (2,2,2,1,1)
  (same comment as for waste paperboard, sorted)
- bark chips, wet, measured as dry mass: 0.00661108, 7.20072e-5 kg (2 entries); lognormal variance with pedigree 0.0035, pedigree (3,2,2,4,1)
  (same comment as for bark chips, wet, measured as dry mass)

## Inputs from nature
- Carbon dioxide, non-fossil, resource correction [natural resource, in air]: 1.61434 kg; pedigree (1,1,1,1,1)
  This exchange has been added after economic allocation in order to re-balance the non-fossil carbon dioxide resource extraction.
- Water, lake [natural resource, in water]: 0.00127543 m3; lognormal variance with pedigree 0.0029, pedigree (3,2,2,1,1)
  (same comment as for waste paperboard, sorted)
- Water, well, in ground [natural resource, in water]: 0.000284988 m3; lognormal variance with pedigree 0.0029, pedigree (3,2,2,1,1)
  Average data from ten European producers of folding box board, weighted according to production volumes, includes Ground water fossil/non-renewable and Groundwater non fossil

## Emissions to nature
- Cobalt [air, urban air close to ground]: 1.00201e-9 kg; lognormal variance with pedigree 0.7062, pedigree (4,5,2,1,4)
  Calculated from fossil fuels consumed
- Methanol [air, urban air close to ground]: 1.26952e-9 kg; lognormal variance with pedigree 0.0962, pedigree (4,5,2,1,4)
  Calculated from fossil fuels consumed
- m-Xylene [air, urban air close to ground]: 4.58025e-8 kg; lognormal variance with pedigree 0.0962, pedigree (4,5,2,1,4)
  Calculated from fossil fuels consumed
- Uranium [air, urban air close to ground]: 1.22568e-10 kg; lognormal variance with pedigree 0.7062, pedigree (4,5,2,1,4)
  Calculated from fossil fuels consumed
- Particulates, > 2.5 um, and < 10um [air, urban air close to ground]: 5.57481e-7 kg; lognormal variance with pedigree 0.0409, pedigree (2,2,2,1,1)
  Average data from ten European producers of folding box board, weighted according to production volumes, recorded as Dust (unspecified)
- Acetaldehyde [air, urban air close to ground]: 2.37846e-8 kg; lognormal variance with pedigree 0.0962, pedigree (4,5,2,1,4)
  Calculated from fossil fuels consumed
- Magnesium [air, urban air close to ground]: 3.21381e-7 kg; lognormal variance with pedigree 0.7062, pedigree (4,5,2,1,4)
  Calculated from fossil fuels consumed
- Hydrocarbons, aliphatic, unsaturated [air, urban air close to ground]: 1.30466e-6 kg; lognormal variance with pedigree 0.0962, pedigree (4,5,2,1,4)
  Calculated from fossil fuels consumed
- Ammonia [air, urban air close to ground]: 6.60495e-7 kg; lognormal variance with pedigree 0.0962, pedigree (4,5,2,1,4)
  Calculated from fossil fuels consumed
- Hydrocarbons, aliphatic, alkanes, unspecified [air, urban air close to ground]: 4.70667e-7 kg; lognormal variance with pedigree 0.0962, pedigree (4,5,2,1,4)
  Calculated from fossil fuels consumed
- Arsenic [air, urban air close to ground]: 1.63973e-9 kg; lognormal variance with pedigree 0.0962, pedigree (4,5,2,1,4)
  Calculated from fossil fuels consumed
- Strontium [air, urban air close to ground]: 6.4318e-9 kg; lognormal variance with pedigree 0.7062, pedigree (4,5,2,1,4)
  Calculated from fossil fuels consumed
- Sodium [air, urban air close to ground]: 5.53155e-7 kg; lognormal variance with pedigree 0.7062, pedigree (4,5,2,1,4)
  Calculated from fossil fuels consumed
- Benzene, hexachloro- [air, urban air close to ground]: 2.74815e-15 kg; lognormal variance with pedigree 0.0962, pedigree (4,5,2,1,4)
  Calculated from fossil fuels consumed
- Butane [air, urban air close to ground]: 9.01104e-8 kg; lognormal variance with pedigree 0.3562, pedigree (4,5,2,1,4)
  Calculated from fossil fuels consumed
- TOC, Total Organic Carbon [water, surface water]: 0.000142511 kg; name a_TOC; lognormal variance with pedigree 0.0423, pedigree (3,2,2,1,1)
  (same comment as for waste paperboard, sorted)
- Selenium [air, urban air close to ground]: 1.86961e-9 kg; lognormal variance with pedigree 0.7062, pedigree (4,5,2,1,4)
  Calculated from fossil fuels consumed
- Formaldehyde [air, urban air close to ground]: 6.68998e-8 kg; lognormal variance with pedigree 0.0962, pedigree (4,5,2,1,4)
  Calculated from fossil fuels consumed
- AOX, Adsorbable Organic Halogen as Cl [water, surface water]: 2.80178e-8 kg; lognormal variance with pedigree 0.0423, pedigree (3,2,2,1,1)
  Average data from ten European producers of folding box board, weighted according to production volumes, AOX as Cl-
- Potassium [air, urban air close to ground]: 8.96837e-6 kg; lognormal variance with pedigree 0.7062, pedigree (4,5,2,1,4)
  Calculated from fossil fuels consumed
- Cadmium [air, urban air close to ground]: 4.5431e-10 kg; lognormal variance with pedigree 0.7062, pedigree (4,5,2,1,4)
  Calculated from fossil fuels consumed
- Toluene [air, urban air close to ground]: 1.64537e-7 kg; lognormal variance with pedigree 0.0962, pedigree (4,5,2,1,4)
  Calculated from fossil fuels consumed
- Iodine [air, urban air close to ground]: 1.10433e-9 kg; lognormal variance with pedigree 0.0962, pedigree (4,5,2,1,4)
  Calculated from fossil fuels consumed
- Potassium-40 [air, urban air close to ground]: 4.05325e-7 kBq; lognormal variance with pedigree 0.3562, pedigree (4,5,2,1,4)
  Calculated from fossil fuels consumed
- Copper [air, urban air close to ground]: 9.78448e-9 kg; lognormal variance with pedigree 0.7062, pedigree (4,5,2,1,4)
  Calculated from fossil fuels consumed
- Thorium-228 [air, urban air close to ground]: 1.79605e-7 kBq; lognormal variance with pedigree 0.3562, pedigree (4,5,2,1,4)
  Calculated from fossil fuels consumed
- Antimony [air, urban air close to ground]: 6.14055e-10 kg; lognormal variance with pedigree 0.0962, pedigree (4,5,2,1,4)
  Calculated from fossil fuels consumed
- Zinc [air, urban air close to ground]: 1.15593e-7 kg; lognormal variance with pedigree 0.7062, pedigree (4,5,2,1,4)
  Calculated from fossil fuels consumed
- Thorium-232 [air, urban air close to ground]: 1.11646e-7 kBq; lognormal variance with pedigree 0.3562, pedigree (4,5,2,1,4)
  Calculated from fossil fuels consumed
- Particulates, < 2.5 um [air, urban air close to ground]: 1.79988e-5 kg; lognormal variance with pedigree 0.1762, pedigree (4,5,2,1,4)
  Calculated from fossil fuels consumed
- Vanadium [air, urban air close to ground]: 5.7173e-9 kg; lognormal variance with pedigree 0.7062, pedigree (4,5,2,1,4)
  Calculated from fossil fuels consumed
- Benzene, ethyl- [air, urban air close to ground]: 1.14506e-8 kg; lognormal variance with pedigree 0.0962, pedigree (4,5,2,1,4)
  Calculated from fossil fuels consumed
- Radon-222 [air, urban air close to ground]: 9.70837e-8 kBq; lognormal variance with pedigree 0.3562, pedigree (4,5,2,1,4)
  Calculated from fossil fuels consumed
- Methane, non-fossil [air, urban air close to ground]: 3.88989e-7 kg; lognormal variance with pedigree 0.0962, pedigree (4,5,2,1,4)
  Calculated from fossil fuels consumed
- Beryllium [air, urban air close to ground]: 6.14055e-11 kg; lognormal variance with pedigree 0.7062, pedigree (4,5,2,1,4)
  Calculated from fossil fuels consumed
- Fluorine [air, urban air close to ground]: 1.90844e-8 kg; lognormal variance with pedigree 0.0962, pedigree (4,5,2,1,4)
  Calculated from fossil fuels consumed
- Silicon [air, urban air close to ground]: 2.93678e-6 kg; lognormal variance with pedigree 0.7062, pedigree (4,5,2,1,4)
  Calculated from fossil fuels consumed
- Thallium [air, urban air close to ground]: 3.05814e-12 kg; lognormal variance with pedigree 0.7062, pedigree (4,5,2,1,4)
  Calculated from fossil fuels consumed
- Polonium-210 [air, urban air close to ground]: 2.76689e-6 kBq; lognormal variance with pedigree 0.3562, pedigree (4,5,2,1,4)
  Calculated from fossil fuels consumed
- COD, Chemical Oxygen Demand [water, surface water]: 0.000337685 kg; lognormal variance with pedigree 0.0423, pedigree (3,2,2,1,1)
  Average data from ten European producers of folding box board, weighted according to production volumes, Chemical Oxygen Demand (CODCr)
- Chlorine [air, urban air close to ground]: 6.87037e-8 kg; lognormal variance with pedigree 0.0962, pedigree (4,5,2,1,4)
  Calculated from fossil fuels consumed
- Carbon dioxide, fossil [air, urban air close to ground]: 0.0103469 kg; lognormal variance with pedigree 0.0009, pedigree (1,2,2,1,1)
  (same comment as for waste paperboard, sorted)
- Bromine [air, urban air close to ground]: 2.32702e-8 kg; lognormal variance with pedigree 0.0962, pedigree (4,5,2,1,4)
  Calculated from fossil fuels consumed
- Xylene [air, urban air close to ground]: 8.00941e-8 kg; lognormal variance with pedigree 0.0962, pedigree (4,5,2,1,4)
  Calculated from fossil fuels consumed
- Radon-220 [air, urban air close to ground]: 9.70837e-8 kBq; lognormal variance with pedigree 0.3562, pedigree (4,5,2,1,4)
  Calculated from fossil fuels consumed
- Carbon monoxide, fossil [air, urban air close to ground]: 9.73746e-5 kg; lognormal variance with pedigree 0.7062, pedigree (4,5,2,1,4)
  Calculated from fossil fuels consumed
- Pentane [air, urban air close to ground]: 1.54143e-7 kg; lognormal variance with pedigree 0.0962, pedigree (4,5,2,1,4)
  Calculated from fossil fuels consumed
- Benzene [air, urban air close to ground]: 5.20016e-7 kg; lognormal variance with pedigree 0.0962, pedigree (4,5,2,1,4)
  Calculated from fossil fuels consumed
- Nickel [air, urban air close to ground]: 4.89088e-9 kg; lognormal variance with pedigree 0.7062, pedigree (4,5,2,1,4)
  Calculated from fossil fuels consumed
- Thorium [air, urban air close to ground]: 7.35409e-11 kg; lognormal variance with pedigree 0.7062, pedigree (4,5,2,1,4)
  Calculated from fossil fuels consumed
- Aluminium [air, urban air close to ground]: 2.88824e-7 kg; lognormal variance with pedigree 0.7062, pedigree (4,5,2,1,4)
  Calculated from fossil fuels consumed
- Phosphorus [air, urban air close to ground]: 1.16958e-7 kg; lognormal variance with pedigree 0.0962, pedigree (4,5,2,1,4)
  Calculated from fossil fuels consumed
- Particulates, > 10 um [air, urban air close to ground]: 3.4039e-6 kg; lognormal variance with pedigree 0.0962, pedigree (4,5,2,1,4)
  Calculated from fossil fuels consumed
- Lead [air, urban air close to ground]: 1.0823e-8 kg; lognormal variance with pedigree 0.7062, pedigree (4,5,2,1,4)
  Calculated from fossil fuels consumed
- Hydrogen sulfide [air, urban air close to ground]: 2.42709e-9 kg; lognormal variance with pedigree 0.0962, pedigree (4,5,2,1,4)
  Calculated from fossil fuels consumed
- Suspended solids, unspecified [water, surface water]: 5.01545e-5 kg; lognormal variance with pedigree 0.0423, pedigree (3,2,2,1,1)
  Average data from ten European producers of folding box board, weighted according to production volumes, Total suspended solids
- Scandium [air, urban air close to ground]: 1.53392e-11 kg; lognormal variance with pedigree 0.7062, pedigree (4,5,2,1,4)
  Calculated from fossil fuels consumed
- Nitrogen oxides [air, urban air close to ground]: 1.57683e-5 kg; lognormal variance with pedigree 0.0409, pedigree (2,2,2,1,1)
  Average data from ten European producers of folding box board and calculated data (from fuel consumption) for thirty three carton converting facilities, weighted according to production volumes, NOx
- Boron [air, urban air close to ground]: 2.76689e-7 kg; lognormal variance with pedigree 0.7062, pedigree (4,5,2,1,4)
  Calculated from fossil fuels consumed
- Phenol [air, urban air close to ground]: 1.21355e-8 kg; lognormal variance with pedigree 0.0962, pedigree (4,5,2,1,4)
  Calculated from fossil fuels consumed
- Dioxins, measured as 2,3,7,8-tetrachlorodibenzo-p-dioxin [air, urban air close to ground]: 1.18863e-14 kg; lognormal variance with pedigree 0.0962, pedigree (4,5,2,1,4)
  Calculated from fossil fuels consumed
- Methane, fossil [air, urban air close to ground]: 7.54631e-6 kg; lognormal variance with pedigree 0.0962, pedigree (4,5,2,1,4)
  Calculated from fossil fuels consumed
- Carbon monoxide, non-fossil [air, urban air close to ground]: 4.12253e-5 kg; lognormal variance with pedigree 0.7062, pedigree (4,5,2,1,4)
  Calculated from fossil fuels consumed
- Ethene [air, urban air close to ground]: 7.28128e-7 kg; lognormal variance with pedigree 0.7062, pedigree (4,5,2,1,4)
  Calculated from fossil fuels consumed
- Iron [air, urban air close to ground]: 3.32126e-7 kg; lognormal variance with pedigree 0.7062, pedigree (4,5,2,1,4)
  Calculated from fossil fuels consumed
- Titanium [air, urban air close to ground]: 6.14055e-9 kg; lognormal variance with pedigree 0.7062, pedigree (4,5,2,1,4)
  Calculated from fossil fuels consumed
- Ethanol [air, urban air close to ground]: 7.46778e-10 kg; lognormal variance with pedigree 0.0962, pedigree (4,5,2,1,4)
  Calculated from fossil fuels consumed
- Ethane [air, urban air close to ground]: 3.64064e-7 kg; lognormal variance with pedigree 0.0962, pedigree (4,5,2,1,4)
  Calculated from fossil fuels consumed
- Propene [air, urban air close to ground]: 1.21355e-7 kg; lognormal variance with pedigree 0.0962, pedigree (4,5,2,1,4)
  Calculated from fossil fuels consumed
- Water [water, surface water]: 0.00155382 m3; lognormal variance with pedigree 0.0029, pedigree (3,2,2,1,1)
  Average data from ten European producers of folding box board, weighted according to production volumes, recorded as thermally polluted only
- Sulfur dioxide [air, urban air close to ground]: 4.34165e-6 kg; lognormal variance with pedigree 0.0015, pedigree (2,2,2,1,1)
  Average data from ten European producers of folding box board and calculated data (from fuel consumption) for thirty three carton converting facilities, weighted according to production volumes, SOx (as SO2)
- Calcium [air, urban air close to ground]: 3.45883e-6 kg; lognormal variance with pedigree 0.3562, pedigree (4,5,2,1,4)
  Calculated from fossil fuels consumed
- Propane [air, urban air close to ground]: 2.68459e-7 kg; lognormal variance with pedigree 0.0962, pedigree (4,5,2,1,4)
  Calculated from fossil fuels consumed
- PAH, polycyclic aromatic hydrocarbons [air, urban air close to ground]: 5.52152e-9 kg; lognormal variance with pedigree 0.3562, pedigree (4,5,2,1,4)
  Calculated from fossil fuels consumed
- Water [air, urban air close to ground]: 2.59607e-5 m3; lognormal variance with pedigree 0.0568, pedigree (4,5,2,1,4)
  Calculated from fossil fuels consumed
- Carbon dioxide, non-fossil [air, urban air close to ground]: 0.0360528 kg; lognormal variance with pedigree 0.0029, pedigree (3,2,2,1,1)
  (same comment as for waste paperboard, sorted)
- Chromium VI [air, urban air close to ground]: 3.25758e-11 kg; lognormal variance with pedigree 0.7062, pedigree (4,5,2,1,4)
  Calculated from fossil fuels consumed
- Radium-228 [air, urban air close to ground]: 2.0873e-7 kBq; lognormal variance with pedigree 0.3562, pedigree (4,5,2,1,4)
  Calculated from fossil fuels consumed
- Nitrogen [water, surface water]: 3.18169e-6 kg; lognormal variance with pedigree 0.0423, pedigree (3,2,2,1,1)
  Average data from ten European producers of folding box board, weighted according to production volumes. Total nitrogen
- NMVOC, non-methane volatile organic compounds, unspecified origin [air, urban air close to ground]: 1.23302e-6 kg; lognormal variance with pedigree 0.0962, pedigree (4,5,2,1,4)
  Calculated from fossil fuels consumed
- Manganese [air, urban air close to ground]: 6.55009e-8 kg; lognormal variance with pedigree 0.7062, pedigree (4,5,2,1,4)
  Calculated from fossil fuels consumed
- Acetic acid [air, urban air close to ground]: 2.0735e-8 kg; lognormal variance with pedigree 0.0962, pedigree (4,5,2,1,4)
  Calculated from fossil fuels consumed
- Dinitrogen monoxide [air, urban air close to ground]: 9.63598e-7 kg; lognormal variance with pedigree 0.0962, pedigree (4,5,2,1,4)
  Calculated from fossil fuels consumed
- Hydrogen fluoride [air, urban air close to ground]: 3.13814e-9 kg; lognormal variance with pedigree 0.0962, pedigree (4,5,2,1,4)
  Calculated from fossil fuels consumed
- BOD5, Biological Oxygen Demand [water, surface water]: 0.000110039 kg; lognormal variance with pedigree 0.0423, pedigree (3,2,2,1,1)
  Average data from ten European producers of folding box board, weighted according to production volumes, Biological Oxygen Demand (BOD 5)
- Molybdenum [air, urban air close to ground]: 1.09269e-9 kg; lognormal variance with pedigree 0.7062, pedigree (4,5,2,1,4)
  Calculated from fossil fuels consumed
- Lead-210 [air, urban air close to ground]: 1.5048e-6 kBq; lognormal variance with pedigree 0.3562, pedigree (4,5,2,1,4)
  Calculated from fossil fuels consumed
- DOC, Dissolved Organic Carbon [water, surface water]: 0.000142511 kg; = a_TOC; lognormal variance with pedigree 0.0423, pedigree (3,2,2,1,1)
  Assumed equal to TOC.
- Phosphorus [water, surface water]: 2.31829e-7 kg; lognormal variance with pedigree 0.0423, pedigree (3,2,2,1,1)
  Average data from ten European producers of folding box board, weighted according to production volumes, Total Phosphorus
- Ethyne [air, urban air close to ground]: 1.21355e-7 kg; lognormal variance with pedigree 0.0962, pedigree (4,5,2,1,4)
  Calculated from fossil fuels consumed
- Hydrocarbons, aromatic [air, urban air close to ground]: 4.03576e-10 kg; lognormal variance with pedigree 0.0962, pedigree (4,5,2,1,4)
  Calculated from fossil fuels consumed
- Phenol, pentachloro- [air, urban air close to ground]: 3.09167e-12 kg; lognormal variance with pedigree 0.0962, pedigree (4,5,2,1,4)
  Calculated from fossil fuels consumed
- Hydrogen chloride [air, urban air close to ground]: 8.40159e-8 kg; lognormal variance with pedigree 0.0962, pedigree (4,5,2,1,4)
  Calculated from fossil fuels consumed
- Chromium [air, urban air close to ground]: 3.2252e-9 kg; lognormal variance with pedigree 0.7062, pedigree (4,5,2,1,4)
  Calculated from fossil fuels consumed
- Mercury [air, urban air close to ground]: 3.9592e-10 kg; lognormal variance with pedigree 0.7062, pedigree (4,5,2,1,4)
  Calculated from fossil fuels consumed
- Acetone [air, urban air close to ground]: 3.73389e-10 kg; lognormal variance with pedigree 0.0962, pedigree (4,5,2,1,4)
  Calculated from fossil fuels consumed
- Benzo(a)pyrene [air, urban air close to ground]: 6.77643e-10 kg; lognormal variance with pedigree 0.0962, pedigree (4,5,2,1,4)
  Calculated from fossil fuels consumed
- Uranium-238 [air, urban air close to ground]: 3.2523e-7 kBq; lognormal variance with pedigree 0.3562, pedigree (4,5,2,1,4)
  Calculated from fossil fuels consumed
- Tin [air, urban air close to ground]: 4.90273e-11 kg; lognormal variance with pedigree 0.7062, pedigree (4,5,2,1,4)
  Calculated from fossil fuels consumed
- Barium [air, urban air close to ground]: 6.14055e-9 kg; lognormal variance with pedigree 0.7062, pedigree (4,5,2,1,4)
  Calculated from fossil fuels consumed
- Propionic acid [air, urban air close to ground]: 2.56553e-9 kg; lognormal variance with pedigree 0.0962, pedigree (4,5,2,1,4)
  Calculated from fossil fuels consumed
- Radium-226 [air, urban air close to ground]: 3.88335e-7 kBq; lognormal variance with pedigree 0.3562, pedigree (4,5,2,1,4)
  Calculated from fossil fuels consumed

## Sampling procedure
Data were collected from the producers by Pro Carton and ECMA for their European Environmental Database for Cartonboard and Carton Manufacturing and reviewed by the Institut für Energie- und Umweltforschung Heidelberg (ifeu). The data for the production of FBB were collected from mills, which together represent about 71% of the total yearly production of FBB in Europe. Annual production of FBB in Europe for 2017 was approximatly 2 930 000 tonnes. Data were provided by mills in Finland, Germany, Netherlands, Sweden, Slovenia and United Kingdom. Each mill produces between 90 000 - 375 000 tonnes of net saleable paper. Carton converting data were provided by factories in Austria, Belgium, France, Germany, Poland, Romania, Spain, Turkey, Ukraine, and the United Kingdom representing over 380 000 tonnes of production of converted cartons, or around 5% of European converting operations by volume. They varied in size producing between 1 000 and 50 000 tonnes of finished cartons ready for shipment.

## Extrapolations
Additional air emissions from the combustion of fossil fuels estimated based on industrial heating datasets from the ecoinvent database and matched as follows: light fuel oil: heat production, light fuel oil, at industrial furnace 1MW, Europe without Switzerland heavy fuel oil: heat production, heavy fuel oil, at industrial furnace 1MW, Europe without Switzerland hard coal: heat production, at hard coal industrial furnace 1-10MW, Europe without Switzerland natural gas: heat production, natural gas, at industrial furnace >100kW, Europe without Switzerland lignite briquettes and peat: heat production, lignite briquette, at stove 5-15kW, Europe without Switzerland wood chips: heat production, wood chips from industry, at furnace 1000kW, CH
