# wind turbine construction, 750kW, onshore

Dataset: EcoSpold 2, unit process
Geography: CA-QC
Time period: 2008-01-01 to 2021-12-31
Technology level: modern
Classification: ISIC rev.4 ecoinvent: 2811:Manufacture of engines and turbines, except aircraft, vehicle and cycle eng
Tags: wind power; infrastructure
Scenario: Business-as-Usual
System model: Allocation, cut-off by classification
Generated by: Pablo Tirado
Published in: Elsam Engineering A/S,Fredericia,Denmark 2004
Database: ecoinvent
isCopyrightProtected: true
accessRestrictedTo: 1

## General comment
This dataset represents the construction of a wind turbine with a capacity of 750kW for onshore use. The term "wind turbine" inludes moving parts such as nacelle, rotor, rotor blades, transition piece as well as fixed parts such as the tower and the foundation.

The LCI model is based on collected data from the Wind Energy Technocentre in Quebec, that estimated the bill of materials in the different parts ot the turbine. The NEG Micon 750kW/48 has been taken as reference technology for wind turbines with a capacity lower than 1MW.
Some missing data were completed by extrapolation from 2MW turbine dataset.

Parts of the wind turbine are the following:
- Rotor: Rotor blades, rotor hub, extender
- Nacelle: The nacelle consists of the nacelle cover, which includes generator, gear, main shaft, yaw system, flanges etc.
- Electronics
- Tower (steel)
- Foundation

## Included activities start
From the transformation of pasture land to industrial site, and from the reception and treatment of building materials and turbine parts.

## Included activities end
This activity ends with the decommissioning of the wind turbine and the treatment of the resulting materials in the end of the lifetime.

This dataset includes
- all materials for the construction of the wind turbine and their treatment, but not the energy for their assembling
- land transformation and use
- energy needed for erection and dismantling of the wind turbine.

This dataset doesn"t include
- the connection to the grid, which is modeled in a separate dataset.
- the operation and maintenance of the fully finished wind power plant. It is assumed that all parts will hold for the lifetime of 20 years and don"t have to be replaced.
- auxiliary materials such as packaging materials or vacuum fleece.
- any losses of materials (waste) during the processing of the different wind turbine parts.
- neither the energy use for assembly of the different wind turbine parts nor their transportation from manufacture to the construction site.

## Geography
Turbines built in Quebec (Canada)

## Technology
Operational parameters:
Nominal output 750 kW
Power regulation Stall
Nominal wind speed 16 m/s
Cut-in 4 m/s
Cut-out 25 m/s
Rotor:
Rotor diameter 48.2 m
Rotor swept area 1824 m2
Number of blades 3
Rotor revolutions 22/15 rpm
Rotor placing Upwind rotor
Brake system:
Blade tip air brake Hydraulic, fail-safe
Disk brake Hydraulic, fail-safe
Drive train
Gear type Planetary - parallel axle
Ratio 1:67.5
Main shaft Forged shaft and flange
Main bearing Spherical roller bearing
Cooling Heat exchanger with pump
Generator:
Type Asynchronous, 4/6 pole
Nominal voltage 690 V
Nominal frequence 50 Hz
Name plate rating 750/200 kW
Cooling Liquid-cooled with pump
Yaw system:
Type Ball bearing
Yaw brake 3 Friction brake/motor brake
Drive mechanism 4 electrical planetary gears
Tower:
Type Conical, steel, painted
Hub height In accordance with approval
Controller:
Type Computer controlling
Computer controlling Soft by thyristors
Capacitor bank No-load compensated
Remote control By modem
Weight:Tower weight 60t
Rotor+Nacelle weight: 30.5 tSource:

## Time period
Turbines present in 2008 in Quebec wind power park. Lifespan of 20 years

## Parameters
- Installed capacity: 99.75 MW; name capacity_installed_new; = 57+42.75; lognormal variance with pedigree 0.0006, pedigree (1,1,1,1,1)
  Statistics. Total installed capacity in Quebec in 1999-2012 period
  Le Nordais (Phase 1 - Cap Chat) 76 turbines: 57MW
  Le Nordais (Phase 2 - Matane) 57 turbines: 42.75MW
  Source: http://www.canwea.ca/farms/wind-farms_e.php
- Percentage of onshore wind power plant class capacity on total: 1 dimensionless; name percentage_onshore; lognormal variance with pedigree 0.009325, pedigree (2,2,1,2,2)
  Percentages onshore 2008 of the three wind power plant classes (average from 41 countries worldwide): <1MW 19.7%; 1-3MW 69.6%; >3MW 10.7% [compilation out of "The Wind Power Database, 2011"]. These percentages are taken to calculate the number of new wind power plants per class with the assumption of average capacity values (0.8MW, 2MW, 4.5MW) .
  Source:
  The Wind Power. 2011. Wind power and wind farms database. www.thewindpower.net

## Reference product
- wind turbine, 750kW, onshore: 1 unit; name wind_turbine; CPC 53262: Power plants; By-product classification allocatable product
  production volume 6.65 unit; name APV_turbine; = capacity_installed_new* percentage_onshore/ (wind_turbine_capacity* wind_turbine_lifetime)
    Calculated value based on installed capacity of this category in the 1999-2012 period and the lifetime of the turbines.
  property price 172939 EUR2005; name wind_turbine_price_EUR2005
    Calculated based on inputs: The price of the product has been calculated as a sum of the values of the material and energy inputs for this product. This value is therefore a rough estimation. It may underestimate the real price since there are additional expenses when producing any product. These expences can include for example labour costs, treatment of waste materials and profit for the producer. Please consider carefully whether this level of data quality is acceptable for your application.
  property lifetime 20 year; name wind_turbine_lifetime
  property capacity [MW] 0.75 MW; name wind_turbine_capacity

## By-products
- aluminium scrap, post-consumer: 0 kg; CPC 39363: Waste and scrap of aluminium; By-product classification Recyclable; pedigree (1,1,1,1,1)
  Calculated value. It can be assumed that 100% of the aluminium enter a recycling process.
  Uncertainty: C
  production volume 0 kg; = APV_turbine * scrap_alu / wind_turbine
    Calculated from production volume of reference product using the relative outputs.
  property price 0.685 EUR2005; name scrap_alu_price_EUR2005
    Temporary price data. Calculated as 90% of purchasers price based on: estimated at 85% of new scrap
  property lifetime 20 year; name scrap_alu_lifetime
    Literature value
  property carbon content 0
    carbon content on a dry matter basis (reserved; not for manual entry)
  properties: carbon content, fossil 0, water in wet mass 0 kg, water content 0, carbon content, non-fossil 0, dry mass 1 kg, wet mass 1 kg, carbon allocation 0 kg

## Inputs from technosphere
- steel, chromium steel 18/8: 19300 kg; name chromium_steel; source Elsam Engineering A/S,Fredericia,Denmark 2004, p. p. 25, Tab. 5.3; lognormal variance with pedigree 0.0436, pedigree (3,1,5,1,2)
  Literature value. Steel used in moving parts
  Uncertainty: e
  properties: dry mass 1 kg, carbon content, fossil 0.0008, wet mass 1 kg
  note on carbon content, fossil: Stainless steel model is the grade 304 steel (18/8 stainless, 18% chromium 8% nickel; max. 0.08% C)
- excavation, hydraulic digger: 132.353 m3; = concrete_foundation; lognormal variance with pedigree 0.04, pedigree (1,1,5,1,1)
  Estimated value.
  Uncertainty: C
- scrap copper: -2900 kg; name scrap_copper; = (copper)*-1; lognormal variance with pedigree 0.04, pedigree (1,1,5,1,1)
  Calculated value. It can be assumed that 100% of the copper enter a recycling process.
  Uncertainty: C
  production volume 19285 kg; = APV_turbine * scrap_copper / wind_turbine
    Calculated from production volume of reference product using the relative outputs.
  property price 0 EUR2005; name scrap_copper_price_EUR2005
  property lifetime 20 year; name scrap_copper_lifetime
  properties: wet mass 1 kg, dry mass 1 kg
- sheet rolling, aluminium: 1000 kg; = alu_cast+alu_wrought; lognormal variance with pedigree 0.04, pedigree (1,1,5,1,1)
  Estimated value. Proxy for wire drawing of aluminium.
  Uncertainty: C
- copper, cathode: 2900 kg; name copper; source Elsam Engineering A/S,Fredericia,Denmark 2004, p. p. 25, Tab. 5.3; lognormal variance with pedigree 0.0436, pedigree (3,1,5,1,2)
  Literature value. Used in moving parts (nacelle, gearbox, generator)
  Uncertainty: e
  properties: dry mass 1 kg, wet mass 1 kg
- waste reinforced concrete: -325210 kg; name waste_concrete_reinforced; = (concrete_foundation*concreteWM+ steel_reinforcing)*-1; lognormal variance with pedigree 0.04, pedigree (1,1,5,1,1)
  Calculated value. A density of 2400kg/m3 is assumed for the reinforced concrete.
  Uncertainty: C
  production volume 2.16265e6 kg; = APV_turbine * waste_concrete_reinforced / wind_turbine
    Calculated from production volume of reference product using the relative outputs.
  property price 0 EUR2005; name waste_concrete_reinforced_price_EUR2005
  property lifetime 20 year; name waste_concrete_reinforced_lifetime
  properties: water content 0.00585407, dry mass 0.99418 kg, wet mass 1 kg
  note on lifetime: Literature value. 10% of this waste type incur during the construction of the wind turbine and therefore would only have a very short lifetime.
- welding, arc, steel: 190 m; source Burger, B. 2007; lognormal variance with pedigree 0.211, pedigree (5,5,5,5,5)
  Estimated value. For the tower the most common welding process (MAG-C-process) is assumed. Welding is accounted at a length of 3.8 m height of the tower. The expenses for material consumption are estimated with a weld of 0.166 kg/m and is rounded up generously. A total of 190 m of welding seam in different forms and strenghts are estimated.
  Uncertainty: e
- polyethylene, high density, granulate: 621 kg; name hdpe; source Elsam Engineering A/S,Fredericia,Denmark 2004, p. p. 25, Tab. 5.3; lognormal variance with pedigree 0.398, pedigree (5,5,5,5,3)
  Estimation. Used for the network connectionand for the electronical system.
  Further references:
  Scholzen (1991): Oekobilanz von Windenergie am Beispiel einer 30 kW-Anlage auf dem Simplon. Semesterarbeit am Laboratorium für Energiesysteme, ETH Zürich.
  properties: dry mass 1 kg, wet mass 1 kg, heating value, net 42.47 MJ, carbon content, fossil 0.857143
  note on carbon content, fossil: Polyethylene is formed out of a huge amount of ethylene monomers (C2H4) (ecoinvent v2.2 report 11_II). MW=28 g/mol
- electronics scrap from control units: -440 kg; name electronics_scrap; = (electronics)*-1; lognormal variance with pedigree 0.04, pedigree (1,1,5,1,1)
  Calculated value
  Uncertainty: C
  production volume 6650 kg; = APV_turbine * scrap_alu / wind_turbine
    Calculated from production volume of reference product using the relative outputs.
  property price 0 EUR2005; name electronics_scrap_price_EUR2005
  property lifetime 20 year; name lifetime
  properties: dry mass 1 kg, wet mass 1 kg, carbon content, non-fossil 0.00013442, carbon content, fossil 0.337146
- zinc: 203 kg; source Elsam Engineering A/S,Fredericia,Denmark 2004, p. p. 25, Tab. 5.3; lognormal variance with pedigree 0.097025, pedigree (5,5,5,2,3)
  Literature value
  Uncertainty: e
  properties: wet mass 1 kg, dry mass 1 kg
- waste plastic, mixture: -3300 kg; name waste_plastic; = (glass_plastic/2)*-1; lognormal variance with pedigree 0.04, pedigree (1,1,5,1,1)
  Estimation. The glass fibre reinforced plastic of the rotor is disposed of as 50% glass and 50% plastic. When using PrePreg in the manufacturing process, up to 10% of the PrePreg turns into waste due to cutoffs directly. A large percentage of this waste is sent to recycling as it is directly used in the production of e.g. high-strength construction panels. The remaining glass fibre reinforced plastic amount will turn into waste/by-product after 20 years.
  Today, it is not possible to recycle the turbine blades. When the turbine’s lifetime expires, the blades will
  be dismantled into smaller pieces, which are deposited at controlled waste deposits.[Elsam. 2004b. Life Cycle Assessment of turbines PSO 1999. Elsam Engineering A/S, Fredericia, Denmark]
  Uncertainty: C
  production volume 21945 kg; = APV_turbine * waste_plastic / wind_turbine
    Calculated from production volume of reference product using the relative outputs.
  property lifetime 20 year; name waste_plastic_lifetime
  property price 0 EUR2005; name waste_plastic_price_EUR2005
  properties: dry mass 0.847 kg, water content 0.180638, carbon content, fossil 0.747344, wet mass 1 kg, heating value, net 30.79 MJ
  note on carbon content, fossil: C content in 1 kg DM was calculated using data in Tab A.2, ecoinvent v2.2 report 13_I
  note on heating value, net: Value taken from the general comment of the treatment dataset.
- waste polyethylene: -621 kg; name waste_polyethy; = (hdpe)*-1; lognormal variance with pedigree 0.04, pedigree (1,1,5,1,1)
  Calculated value
  Uncertainty: C
  production volume 4129.65 kg; = APV_turbine * waste_polyethy / wind_turbine
    Calculated from production volume of reference product using the relative outputs.
  property lifetime 20 year; name waste_polyethy_lifetime
  property price 0 EUR2005; name waste_polyethy_price_EUR2005
  properties: carbon content, fossil 0.825301, water content 0.00401606, wet mass 1 kg, dry mass 0.996 kg, heating value, net 42.47 MJ
  note on carbon content, fossil: C content in 1 kg DM was calculated using data in Tab A.1, ecoinvent v2.2 report 13_I
- glass fibre reinforced plastic, polyamide, injection moulded: 6600 kg; name glass_plastic; = 10000*0.6*1.1; source Elsam Engineering A/S,Fredericia,Denmark 2004, p. p. 25, Tab. 5.3; lognormal variance with pedigree 0.0506, pedigree (3,1,5,1,3)
  Literature value. Used for the rotor blades. Steel and aluminium blades are used for small wind turbines. For large ones, they have problems of weight or metal fatigue. Most modern rotor blades on large wind turbines are made of glass fiber reinforced polyester or epoxy. Carbon fiber or Kevlar seems to be too expensive for large turbines. [Chataignere A. and Le Boulch D. (2003) Wind Turbine Systems. Final report ECLIPSE. EDF R&D, Clamart Cedex, France.]
  Prepreg is a glass fibre mat impregnated with epoxy resin used for the blades in this dataset. It was not possible to get information on the exact composition of Prepreg. From the supplier’s PrePreg safety data sheets it is assumed that Prepreg consists of approx 40% epoxy and 60% glass fibre. Total Prepreg mass is 21507 kg. When using PrePreg in the manufacturing process, up to 10% of the PrePreg turns into waste due to cutoffs.
  properties: wet mass 1 kg, dry mass 1 kg, carbon content, fossil 0.446018
  note on carbon content, fossil: Polyamide resin assimilate to Nylon 66 (ecoinvent v2.2 report 7_XIII). Nylon 66 is derived from hexamethylene diamine and adipic acid and has the following structure: -(HN-(CH2)6-NH-CO-(CH2)4-CO)n- (ecoinvent v2.2 report 11_II), C12H22N2O2. MW=226 g/mol. Here Nylon 66 is - mainly for improved stiffness and stability - modified with glass fibres. The glass fibre content in the product is assumed of 30%. (ecoinvent v2.2 report 11_II)
- aluminium, wrought alloy: 680 kg; name alu_wrought; = 0.68*1000; source Elsam Engineering A/S,Fredericia,Denmark 2004, p. p. 25, Tab. 5.3; lognormal variance with pedigree 0.059025, pedigree (4,4,5,2,3)
  Literature value/calculated value. The shares of cast alloy and wrought alloy aluminium in the cancelled ecoinvent v2 "aluminium production mix" dataset amounted to 32% (cast alloy) and 68% (wrought alloy) respectively. These shares have been overtaken to distribute the original amount of 1678 kg aluminium.
  Uncertainty: e
  properties: dry mass 1 kg, wet mass 1 kg
- sheet rolling, chromium steel: 19300 kg; = chromium_steel; lognormal variance with pedigree 0.04, pedigree (1,1,5,1,1)
  Estimated value.
  Uncertainty: C
- concrete, normal: 132.353 m3; name concrete_foundation; = 315000/concreteWM; source Elsam Engineering A/S,Fredericia,Denmark 2004, p. p. 13, 21+25, Tab. 5.3; lognormal variance with pedigree 0.041, pedigree (1,1,5,1,1)
  Literature value. Used for foundation.
  315t of concrete used for the foundation
  Uncertainty: e
  property dry mass 2190 kg; name concreteDM
  property wet mass 2380 kg; name concreteWM
  properties: water content 0.086758
- steel, low-alloyed: 64600 kg; name steel_lowalloyed; source Elsam Engineering A/S,Fredericia,Denmark 2004, p. p. 25, Tab. 5.3; lognormal variance with pedigree 0.0422, pedigree (2,1,5,1,2)
  Literature value. Used in the tower. It is assumed that the steel is delivered in steel plates, which have already been pre-cut. In addition, there is no waste of steel. The plates for the tower sections are rolled. Every section is welded lengthwise, then the individual sections are welded together. Subsequent surface treatment (i.e. sandblasting) is not taken into account in this dataset.
  Uncertainty: e
  properties: wet mass 1 kg, carbon content, fossil 0.005, dry mass 1 kg
  note on carbon content, fossil: Low alloyed steel composition given in Tab. 3.2 ecoinvent v2.2 report 10_partII. Steel assumed to have a C content of 0.5%
- epoxy resin, liquid: 4400 kg; name epoxy; = 10000*0.4*1.1; lognormal variance with pedigree 0.0506, pedigree (3,1,5,1,3)
  Literature value. Used for the rotor blades. Steel and aluminium blades are used for small wind turbines. For large ones, they have problems of weight or metal fatigue. Most modern rotor blades on large wind turbines are made of glass fiber reinforced polyester or epoxy. Carbon fiber or Kevlar seems to be too expensive for large turbines. [Chataignere A. and Le Boulch D. (2003) Wind Turbine Systems. Final report ECLIPSE. EDF R&D, Clamart Cedex, France.]
  Prepreg is used as material for the blades in this dataset. It was not possible to get information on the exact composition of Prepreg. From the supplier’s PrePreg safety data sheets it is assumed that Prepreg consists of approx 40% epoxy and 60% glass fibre. Total Prepreg mass is 21507 kg. When using PrePreg in the manufacturing process, up to 10% of the PrePreg turns into waste due to cutoffs.
  properties: carbon content, fossil 0.42325, dry mass 1 kg, wet mass 1 kg, heating value, net 12.82 MJ
- reinforcing steel: 10210.1 kg; name steel_reinforcing; = 27000* concrete_foundation/350; source Elsam Engineering A/S,Fredericia,Denmark 2004, p. p. 21; lognormal variance with pedigree 0.057, pedigree (4,5,5,1,1)
  Literature value. Used in the foundation.
  It is assumed the same ratio reinforcing steel/concrete than in other foundations.
  reinforcing steel in 2MW turbine=27t
  concrete in 2MW turbine= 350m3
  Uncertainty: e
  properties: wet mass 1 kg, carbon content, fossil 0.004, dry mass 1 kg
- zinc coat, pieces: 879.2 m2; = 70*4*3.14; lognormal variance with pedigree 0.064625, pedigree (4,5,5,2,3)
  Calculated value. The surface for zinc coating is estimated with a diameter and a height of the tower of 4 m and 70 m, respectively.
- waste glass: -3300 kg; name waste_glass; = (glass_plastic/2)*-1; lognormal variance with pedigree 0.04, pedigree (1,1,5,1,1)
  Estimation. The glass fibre reinforced plastic of the rotor is disposed of as 50% glass and 50% plastic. When using PrePreg in the manufacturing process, up to 10% of the PrePreg turns into waste due to cutoffs directly. The remaining amount will turn into waste/by-product after 20 years.
  Today, it is not possible to recycle the turbine blades. When the turbine’s lifetime expires, the blades will
  be dismantled into smaller pieces, which are deposited at controlled waste deposits.[Elsam. 2004b. Life Cycle Assessment of turbines PSO 1999. Elsam Engineering A/S, Fredericia, Denmark]
  Uncertainty: C
  production volume 21945 kg; = APV_turbine * waste_glass / wind_turbine
    Calculated from production volume of reference product using the relative outputs.
  property price 0 EUR2005; name waste_glass_price_EUR2005
  property lifetime 20 year; name waste_glass_lifetime
  properties: dry mass 1 kg, wet mass 1 kg, heating value, net 0.05 MJ
  note on heating value, net: Value extracted from "treatment of waste glass, open dump, very wet infiltration class (1000mm)"
- aluminium, cast alloy: 320 kg; name alu_cast; = 0.32*1000; source Elsam Engineering A/S,Fredericia,Denmark 2004, p. p. 25, Tab. 5.3; lognormal variance with pedigree 0.059025, pedigree (4,4,5,2,3)
  (same comment as for aluminium, wrought alloy)
  properties: dry mass 1 kg, wet mass 1 kg
- scrap steel: -84103 kg; name scrap_steel; = (steel_lowalloyed+chromium_steel+zinc)*-1; lognormal variance with pedigree 0.04, pedigree (1,1,5,1,1)
  Calculated value. The zinc coating of the steel tower is included in the scrap steel, which is a simplification. It can be assumed that 100% of the steel enter a recycling process.
  Uncertainty: C
  production volume 559285 kg; = APV_turbine * scrap_steel / wind_turbine
    Calculated from production volume of reference product using the relative outputs.
  property lifetime 20 year; name scrap_steel_lifetime
  property price 0 EUR2005; name scrap_steel_price_EUR2005
  properties: dry mass 1 kg, wet mass 1 kg
- road: 8000 m*year; = (10000/25)* lifetime; source Vestas 2011, p. p.81; lognormal variance with pedigree 0.065025, pedigree (4,5,5,2,3)
  Literature value/estimation. Generally a combination of tarred roads and dirt roads need to be built to provide access to the power plant turbines, which are often located in remote locations. It has been estimated that 10 km of tarred road is needed for a power plant with 25 wind turbines.
  No maintenance is assumed.
  Uncertainty: e
- sheet rolling, steel: 64600 kg; = steel_lowalloyed; lognormal variance with pedigree 0.04, pedigree (1,1,5,1,1)
  Estimated value.The steel is delivered to in steel plates, which have already been pre-cut. In addition, there is no waste of steel. The plates for the tower sections are rolled. Every section is welded lengthwise, then the individual sections are welded together.
  Uncertainty: C
- electronics, for control units: 440 kg; name electronics; source Vestas 2011, p. p.41; lognormal variance with pedigree 0.065025, pedigree (4,5,5,2,3)
  Estimated value. This amount corresponds to a 2MW turbine
  Uncertainty: e
  properties: carbon content, non-fossil 0.00013442, carbon content, fossil 0.337146, dry mass 1 kg, wet mass 1 kg
  note on carbon content, non-fossil: The control unit has a composition of 46% steel (housing), 32% plastics, 14% printed wiring boards and 8% cables (various types).;
- electricity, medium voltage: 54917 kWh; = ( steel_reinforcing+ chromium_steel+ steel_lowalloyed+ glass_plastic+hdpe+copper+alu_cast+alu_wrought+zinc+ epoxy)*0.5; source Burger, B. 2007; lognormal variance with pedigree 0.1006, pedigree (5,4,5,4,3)
  Literatur value / calculation: Additional to energy requirements for material processing, a factor of 0.5 kWh/kg material (except of concrete for the foundation) after is included.Total wind turbine weight is about 286000 kg (see Technology comment for details). This should also cover the energy required for mounting and removal of the turbine.
  Uncertainty: r
- wire drawing, copper: 2900 kg; = copper; lognormal variance with pedigree 0.04, pedigree (1,1,5,1,1)
  Estimated value.
  Uncertainty: C
- waste polyethylene/polypropylene product: -4400 kg; name waste_polyethypropy; = (epoxy)*-1; lognormal variance with pedigree 0.04, pedigree (1,1,5,1,1)
  Calculated value. Proxy for the treatment of the epoxy resin (polyepoxide, formed from reaction of an epoxide resin with polyamine hardener). When using PrePreg in the manufacturing process, up to 10% of the PrePreg turns into waste due to cutoffs directly. The remaining amount will turn into waste/by-product after 20 years.
  Uncertainty: C
  production volume 29260 kg; = APV_turbine * waste_polyethypropy / wind_turbine
    Calculated from production volume of reference product using the relative outputs.
  property lifetime 20 year; name waste_polyethypropy_lifetime
  property price 0 EUR2005; name waste_polyethypropy_price_EUR2005
  properties: water content 0.180638, wet mass 1 kg, carbon content, fossil 0.748045, heating value, net 42.47 MJ, dry mass 0.847 kg
  note on carbon content, fossil: Mixed various plastics was used to estimate the C content of this waste (Tab A.2, ecoinvent v2.2 report 13_I)
- aluminium scrap, post-consumer: -1000 kg; lognormal variance with pedigree 0.04, pedigree (1,1,5,1,1)
  (same comment as for aluminium scrap, post-consumer)
  production volume 6650 kg
  properties: dry mass 1 kg, wet mass 1 kg

## Inputs from nature
- Occupation, industrial area [natural resource, land]: 2420 m2*year; = land_from*lifetime; lognormal variance with pedigree 0.04, pedigree (1,1,5,1,1)
  Calculated value
  Uncertainty: C
- Transformation, from pasture, man made [natural resource, land]: 121 m2; name land_from; = 11*11; source Elsam Engineering A/S,Fredericia,Denmark 2004; lognormal variance with pedigree 0.33, pedigree (5,5,5,5,5)
  Estimated value. The foundation for the onshore turbine consists of plate foundations made with reinforced concrete.
  The assumed size is 11 × 11 metres and 2 metres deep.
  Uncertainty: E
- Transformation, to industrial area [natural resource, land]: 121 m2; = land_from; lognormal variance with pedigree 0.04, pedigree (1,1,5,1,1)
  Calculated value
  Uncertainty: C

## Sampling procedure
Literature, estimations

## Extrapolations
This dataset has been extrapolated from year 2008 to the year of the calculation (2021). The uncertainty has been adjusted accordingly.

## Review by Emilia Moreno Ruiz 2015-09-17
broken formula fixed

## Review by Christian Bauer 2014-02-20
This dataset was thoroughfully reviewed and complies with the Data Quality Guidelines.
