# electricity, high voltage, import from VE

Dataset: EcoSpold 2, unit process
Geography: BR-Southern grid
Time period: 2014-01-01 to 2021-12-31
Technology level: current
Classification: ISIC rev.4 ecoinvent: 3510:Electric power generation, transmission and distribution
Scenario: Business-as-Usual
System model: Allocation, cut-off by classification
Generated by: Henrique Rogerio Antunes de Souza Junior
Published in: Suppen, N 2017
Database: ecoinvent
isCopyrightProtected: true
accessRestrictedTo: 1

## General comment
This dataset represents the amount of imported electricity from VE to BR. The import value is valid for 2014 and includes all electricity imports, independently whether used within the importing country, or re-exported. For a discussion of different ways of modeling electricity trade in LCI, please refer to (Itten & Frischknecht 2012).
[This dataset is meant to replace the following datasets:
- electricity, high voltage, import from VE, BR, 2012 - 2012]
[Dataset to be replaced by 'electricity, high voltage, import from VE, BR-Northern grid, 2014 - 2017']

## Included activities start
This activity represents the point of 'handing over' the electricity from one country to the other at the border.

## Included activities end
This dataset doesn't include any electricity losses or transmission infrastructure as these are accounted for in the market datasets.

## Reference product
- electricity, high voltage: 1 kWh; By-product classification allocatable product; CPC 17100: Electrical energy
  production volume 8.41962e8 kWh; = 34422000000*0.02446
    The total electricity import in 2014 was: 615.908 - 581.486 = 34.422 GWh. This data was obtained from the reports of the Ministry of Mines and Energy of Brazil (MME, 2016) for the year 2015 (page 3).
    Of these, 2.446% were imported from Venezuela (Matriz de Energia Elétrica, 2017))
    MME (2016). Matrizes Elétricas Estaduais: Ano Referência 2015. Edição de 23 de novembro de 2016. Ministério De Minas E Energia - MME. Secretaria De Planejamento E Desenvolvimento Energético. Núcleo De Estudos Estratégicos De Energia. Available in: <http://www.mme.gov.br/documents/10584/3580498/03+-+Matrizes+El%C3%A9tricas+Estaduais+2016+-+ano+ref.+2015+%28PDF%29/ddfaad8c-a436-4aa8-b619-f95dd2cf689c?version=1.0> Access at 03-2018
    Matrizx de Energia Elétrica (2017). Available in: <http://www2.aneel.gov.br/aplicacoes/capacidadebrasil/OperacaoCapacidadeBrasil.cfm> Access at 03-2018
  property price 0.0977 EUR2005
    Temporary price data. Calculated as 90% of purchasers price based on: 94% of the average price (to account for a 6% loss in transformation and transmission) for electricity for industrial consumersin 2005 (excluded taxes). From IEA.

## Inputs from technosphere
- electricity, high voltage: 1 kWh
  activityLink added to better reflect the reality of the supply chain

## Extrapolations
This dataset has been extrapolated from year 2017 to the year of the calculation (2021). The uncertainty has been adjusted accordingly.
