# tomato seedling production, in unheated greenhouse, for planting

Dataset: EcoSpold 2, unit process
Geography: MX
Time period: 2009-01-01 to 2021-12-31
Technology level: current
Classification: ISIC rev.4 ecoinvent: 0130:Plant propagation
Tags: WFLDB
Scenario: Business-as-Usual
System model: Allocation, cut-off by classification
Generated by: Violaine Magaud
Database: ecoinvent
isCopyrightProtected: true
accessRestrictedTo: 1

## General comment
This dataset represents the production of 1 tomato seedling, under non-heated greenhouse.
Functional unit is one tomato seedling at nursery.
34000 seedlings per ha.year are considered.

## Included activities start
This activity starts with the nursery producing seedlings

## Included activities end
Included processes: peat moss use, end-of-life and distribution to seedling farm, irrigation and greenhouse infrastructure.
Excluding: fertilizers and pesticides application and transport from the nursery to the farm where the seedlings will be planted.
This activity ends with seedlings exiting the nursery.

## Parameters
- LUC_crop_specific: 1 dimensionless
  This parameter allows to switch between a 'crop specific' and a 'country specific' approach when calculating the LUC of a crop. By default, the chosen approach is 'crop specific', so the value of the parameter is 1. If you want to apply a 'country specific' approach, turn the parameter to 0.

## Reference product
- tomato seedling, for planting: 1 unit; CPC 01961: Live plants; bulbs, tubers and roots; cuttings and slips; mushroom spawn; By-product classification allocatable product
  Yield = 1.0 kg/ha
  production volume 2.66147e9 unit
    Source: FAOSTAT. Average, 2009-2012. Calculation method: crop production volume [kg] / crop productivity [kg/ha] * planting density [units/ha] = units
  property price 0.00584717 EUR2005
    Calculated based on inputs: The price of the product has been calculated as a sum of the values of the material and energy inputs for this product. This value is therefore a rough estimation. It may underestimate the real price since there are additional expenses when producing any product. These expences can include for example labour costs, treatment of waste materials and profit for the producer. Please consider carefully whether this level of data quality is acceptable for your application.
  property carbon content, non-fossil 0.439481
    calculation: C-content of components according to ecoinvent report No. 15a. Source of composition: https://ndb.nal.usda.gov/ndb/search/. Unspecific seedling used as proxy.
  property carbon content 0.439481
    carbon content on a dry matter basis (reserved; not for manual entry)
  properties: water content 0.73, wet mass 1 kg, water in wet mass 0.421965 kg, carbon content, fossil 0, dry mass 0.578035 kg, carbon allocation 0.254036 kg

## Inputs from technosphere
- irrigation: 0.00225 m3
  Literature value: total amount of water used for irrigation (Manfredi et al. 2014). See supporting documentation 'WFLDB-Documentation.pdf' chapter 'Water use for irrigation' (https://ecoquery.ecoinvent.org/File/Reports). The amount of water for irrigation assumed 3 times higher for Mexico than for Italy due to lower efficiency.
  properties: wet mass 1000 kg, dry mass 0.11 kg, water content 9089.91
- peat moss: 0.0003 m3
  Mass of peat for one seedling: 30 g/ seedling (Based on Stoessel et al. 2012); 2.3 seedling/m2 (Martinez-Blanco et al. 2011)
  properties: heating value, net 17.88 MJ
- greenhouse, plastic walls and roof: 1.13122e-6 m2*year
  Calculated value: 1 ha divided by 34000 seedlings per ha and by 26 (i.e. seedlings are transplanted after 2 weeks). Note: greenhouse dataset stands for 1 m2 used over 1 year
  properties: Surface 7 m2, lifetime 25 year

## Inputs from nature
- Occupation, arable land, unspecified use [natural resource, land]: 1.13122e-6 m2*year
  Calculated value: 34000 seedlings per ha, transplanted after 2 weeks (i.e. 1/26 of a year)
- Transformation, from arable land, unspecified use [natural resource, land]: 1.13122e-6 m2
  Calculated value: 34000 seedlings per ha, transplanted after 2 weeks (i.e. 1/26 of a year)
- Transformation, to arable land, unspecified use [natural resource, land]: 1.13122e-6 m2
  Calculated value: 34000 seedlings per ha, transplanted after 2 weeks (i.e. 1/26 of a year)

## Emissions to nature
- Water [water, surface water]: 0.000936 m3
  Water, to water, river = 0.8*((ETirr/EFirr) â€' ETirr), based on Lévová et al. (2012); Irrigation efficiency: 48%, based on FAO (1989)
- Water [water, ground-]: 0.000234 m3
  Water, to water, river = 0.2*((ETirr/EFirr) â€' ETirr), based on Lévová et al. (2012); Irrigation efficiency: 48%, based on FAO (1989)
- Water [air, non-urban air or from high stacks]: 1.08e-6 m3
  Total water use for irrigation = 25.5 m3/ha, for 34'000 seedlings of tomato/ha (Manfredi et al. 2012); Irrigation efficiency: 48%, based on FAO (1989)

## Sampling procedure
Data are based on the main production of strawberry seedlings in Mexico. Technology: Plastic greenhouses, non-heated
For the transport of seedlings to tomato farm, 100 g per seedling is considered, including moisture and container (Stoessel et al. 2012).

## Extrapolations
This dataset has been extrapolated from year 2012 to the year of the calculation (2021). The uncertainty has been adjusted accordingly.

## Review by Assumpció ANTON 2016-06-09
Be aware that the use of statistics in input calculations could provide some specific inputs not common for specific crops, this should be corrected if better information is available.
Pesticides will need to be amended periodically checking for update of pesticides' ban.
