# treatment of residue from mechanical treatment, laser printer, municipal waste incineration

Dataset: EcoSpold 2, unit process
Geography: CH
Time period: 1994-01-01 to 2021-12-31
Technology level: outdated
Classification: EcoSpold01Categories: waste management/municipal incineration
Classification: ISIC rev.4 ecoinvent: 3821:Treatment and disposal of non-hazardous waste
Tags: Treatment; ConvertedDataset
Scenario: Business-as-Usual
System model: Allocation, cut-off by classification
Generated by: Roland Hischier
Published in: Hischier R. 2007
Database: ecoinvent
isCopyrightProtected: true
accessRestrictedTo: 1

## General comment
Inventoried waste contains 1.92% rubber; 47.1% Plastics from electronic consumer goods; 47.1% Plastics from electronic industrial goods; 1.42% MSWI iron scrap; 0.15% Alu in MSW; 0.15% wiring copper; .
waste composition (wet, in ppm): upper heating value 34.74 MJ/kg; lower heating value 33.3 MJ/kg; H2O 8644.5; O 50264; H 71802; C 784140; S 411.86; N 12536; P 482.64; B n.a.; Cl 6387.9; Br 5184.1; F 235.64; I n.a.; Ag n.a.; As 7.0692; Ba 166.83; Cd 142.06; Co 27.784; Cr 66.525; Cu 4703.4; Hg 0.8012; Mn 40.584; Mo 2.8277; Ni 487.13; Pb 144.4; Sb 4522.8; Se 1.847; Sn 200.85; V 4.2569; Zn 725.89; Be 0.43977; Sc n.a.; Sr 77.839; Ti 4219.9; Tl 0.35181; W n.a.; Si 3234.2; Fe 13065; Ca 2933.3; Al 3896.6; K 110.28; Mg n.a.; Na 131.49;
Share of carbon in waste that is biogenic 0%.
Share of iron in waste that is metallic/recyclable 88.6%.
Net energy produced in MSWI: 3.81MJ/kg waste electric energy and 7.68MJ/kg waste thermal energy
Allocation of energy production: no substitution or expansion. Total burden allocated to waste disposal function of MSWI.
One kg of this waste produces 0.04598 kg of slag and 0.01752 kg of residues, which are landfilled. Additional solidification with 0.007009 kg of cement.
[This dataset was already contained in the ecoinvent database version 2. It was not individually updated during the transfer to ecoinvent version 3. Life Cycle Impact Assessment results may still have changed, as they are affected by changes in the supply chain, i.e. in other datasets. This dataset was generated following the ecoinvent quality guidelines for version 2. It may have been subject to central changes described in the ecoinvent version 3 change report (http://www.ecoinvent.org/database/ecoinvent-version-3/reports-of-changes/), and the results of the central updates were reviewed extensively. The changes added e.g. consistent water flows and other information throughout the database. The documentation of this dataset can be found in the ecoinvent reports of version 2, which are still available via the ecoinvent website. The change report linked above covers all central changes that were made during the conversion process.]

## Included activities end
waste-specific air and water emisions from incineration, auxiliary material consumption for flue gas cleaning. Short-term emissions to river water and long-term emisisons to ground water from slag compartment (from bottom slag) and residual material landfill (from solidified fly ashes and scrubber slugde). Process energy demands for MSWI.

## Geography
Specific to the technology mix encountered in Switzerland in 2000. Well applicable to modern incineration practices in Europe, North America or Japan.

## Technology
replaced by newer incineration technology with fly ash extraction. Average Swiss MSWI plants in 2000 (grate incinerators) with electrostatic precipitator for fly ash (ESP), wet flue gas scrubber and 29.4% SNCR , 32.2% SCR-high dust , 24.6% SCR-low dust -DeNOx facilities and 13.8% without Denox (by burnt waste, according to Swiss average). Share of waste incinerated in plants with magnetic scrap separation from slag : 50%. Gross electric efficiency technology mix 12.997% and Gross thermal efficiency technology mix 25.57%

## Time period
Waste composition as given in literature reference, theoretical data or other source. Transfer coefficients for modern Swiss MSWI. Emission speciation based on early 90ies data.

## Reference product
- residue from mechanical treatment, laser printer: -1 kg; CPC 39: Wastes or scraps; By-product classification Waste
  EcoSpold01Location=CH
  production volume 0 kg; name RP_PV_1
    outdated. Replaced by newer incineration technology with fly ash extraction.
  property price 0 EUR2005
    Waste products are assigned a price of zero as they are assumed to require further treatment.
  property carbon content, fossil 0.796604
    Tab 4.34, ecoinvent v2.2 report 18_V, for details in fraction composition. Carbon content in plastic was calculated using data in Tab A.2, ecoinvent v2.2 report 13_I. Others was also considered plastic, and calculated the same way (from pg 70, ecoinvent v2.2 report 18_V). Ferro was assumed to have a C content of 0.012 kg C/ kg (C content of steel, calculated out of emission factors published in Commission Decision of 18 July 2007 establishing guidelines for the monitoring and reporting of greenhouse gas emissions pursuant to Directive 2003/87/EC of the European Parliament and of the Council (notified under document number C(2007) 3416)). The other component of the fraction were considered to content no C.
  property heating value, net 33.3 MJ
    Value taken from the general comment of the treatment dataset.
  property carbon content 0.796604
    carbon content on a dry matter basis (reserved; not for manual entry)
  properties: carbon content, non-fossil 0, wet mass 1 kg, water in wet mass 0 kg, dry mass 1 kg, water content 0, carbon allocation 0.796604 kg

## Inputs from technosphere
- titanium dioxide: 1.8104e-5 kg; lognormal variance with pedigree 2.01, pedigree (1,1,5,1,1)
  EcoSpold01Location=RER
  uncertainty calculated from uncertainty in average DeNOx input, uncertainty in the share of thermal NOx, uncertainty of nitrogen content in average municipal waste and the unertainty in nitrogen content in *this* waste.
  properties: wet mass 1 kg, dry mass 1 kg
- municipal waste incineration facility: 2.5e-10 unit; lognormal variance with pedigree 0.04, pedigree (1,1,5,1,1)
  demands per kilogram waste. uncertainty is heeded in the module
  EcoSpold01Location=CH
- chromium oxide, flakes: 3.6946e-7 kg; lognormal variance with pedigree 2.01, pedigree (1,1,5,1,1)
  Proxy for vanadium pentoxide V2O5 in SCR catalyst, uncertainty calculated from uncertainty in average DeNOx input, uncertainty in the share of thermal NOx, uncertainty of nitrogen content in average municipal waste and the unertainty in nitrogen content in *this* waste.
  EcoSpold01Location=RER
  properties: dry mass 1 kg, wet mass 1 kg
- sodium hydroxide, without water, in 50% solution state: 0.0064182 kg; lognormal variance with pedigree 0.44, pedigree (1,1,5,1,1)
  EcoSpold01Location=RER
  uncertainty calculated from uncertainty in average auxiliary material input, and the unertainty of the waste composition of this waste
  properties: wet mass 1 kg, heating value, net 3.03 MJ, dry mass 1 kg
- quicklime, milled, packed: 0.0011113 kg; lognormal variance with pedigree 0.46, pedigree (1,1,5,1,1)
  EcoSpold01Location=CH
  uncertainty calculated from uncertainty in average auxiliary material input, and the unertainty of the waste composition of this waste
  properties: dry mass 0.99 kg, wet mass 1 kg, water content 0.010101
- residual material landfill: 3.6507e-11 unit; lognormal variance with pedigree 0.11, pedigree (1,1,5,1,1)
  EcoSpold01Location=CH
  uncertainty is calculated from uncertainties in waste composition and transfer coefficients in incinerator
- chemical, organic: 0.0005666 kg; lognormal variance with pedigree 0.96, pedigree (1,1,5,1,1)
  Proxy for TMT15. uncertainty calculated from uncertainty in average auxiliary material input, and the unertainty of the waste composition of this waste
  EcoSpold01Location=GLO
  properties: dry mass 1 kg, carbon content, fossil 0.628, wet mass 1 kg, heating value, net 19.03 MJ
  note on carbon content, fossil: This dataset is an unweighted average of 20 organic substances (listed in Tab 88.1, ecoinvent v2.2 report 8, part II), being part of the top100 chemicals included in this database. The C-content has also been calculated as an unweighted average of the C content of the substances composing this dataset.
- process-specific burdens, municipal waste incineration: 1 kg; lognormal variance with pedigree 0.04, pedigree (1,1,5,1,1)
  EcoSpold01Location=CH
  demands per kilogram waste. uncertainty is heeded in the module;activityLink introduced to establish a direct link to the corresponding regional supply of this product
- process-specific burdens, residual material landfill: 0.017523 kg; lognormal variance with pedigree 0.11, pedigree (1,1,5,1,1)
  uncertainty is calculated from uncertainties in waste composition and transfer coefficients in incinerator;activityLink introduced to establish a direct link to the corresponding regional supply of this product
  EcoSpold01Location=CH
- cement, unspecified: 0.0070093 kg; lognormal variance with pedigree 0.12, pedigree (1,1,5,1,1)
  EcoSpold01Location=CH
  Cement for solidification of landfilled residual material. Uncertainty calculated from unertainty of the waste composition of this waste, of transfer coefficients in the incinerator and of the solidification recipe.
  properties: dry mass 1 kg, wet mass 1 kg
- slag landfill: 8.1741e-11 unit; lognormal variance with pedigree 0.08, pedigree (1,1,5,1,1)
  uncertainty is calculated from uncertainties in waste composition and transfer coefficients in incinerator
  EcoSpold01Location=CH
- process-specific burdens, slag landfill: 0.04598 kg; lognormal variance with pedigree 0.08, pedigree (1,1,5,1,1)
  (same comment as for process-specific burdens, residual material landfill)
- ammonia, anhydrous, liquid: 0.00063245 kg; lognormal variance with pedigree 1.3, pedigree (1,1,5,1,1)
  uncertainty calculated from uncertainty in average DeNOx input, uncertainty in the share of thermal NOx, uncertainty of nitrogen content in average municipal waste and the unertainty in nitrogen content in *this* waste.
  EcoSpold01Location=CH
  properties: dry mass 1 kg, wet mass 1 kg
- iron (III) chloride, without water, in 40% solution state: 0.00054371 kg; lognormal variance with pedigree 0.32, pedigree (1,1,5,1,1)
  (same comment as for quicklime, milled, packed)
  properties: wet mass 1 kg, dry mass 1 kg
- hydrochloric acid, without water, in 30% solution state: 1.3222e-5 kg; lognormal variance with pedigree 0.36, pedigree (1,1,5,1,1)
  uncertainty calculated from uncertainty in average auxiliary material input, and the unertainty of the waste composition of this waste
  EcoSpold01Location=RER
  properties: wet mass 1 kg, dry mass 1 kg, heating value, net 3.32 MJ
- heat, district or industrial, natural gas: 0.0555102 MJ; lognormal variance with pedigree 1.3, pedigree (1,1,5,1,1)
  (same comment as for titanium dioxide)
  properties: heating value, net 1 MJ
- waste cement, hydrated: -0.017523 kg; name BP_amount_1; lognormal variance with pedigree 0.12, pedigree (1,1,5,1,1)
  Hydrated cement for solidification of landfilled residual material. Uncertainty calculated from unertainty of the waste composition of this waste and transfer coefficients in the incinerator and of the solidification recipe.
  EcoSpold01Location=CH
  production volume 0 kg; = RP_PV_1* BP_amount_1
    Calculated from the production volume of residue from mechanical treatment, laser printer in proportion to the respective output amounts.
  property price 0 EUR2005; name BP_amount_1_price_EUR2005
  properties: wet mass 1 kg, dry mass 1 kg
- chemical, inorganic: 2.2037e-5 kg; lognormal variance with pedigree 0.36, pedigree (1,1,5,1,1)
  Proxy for Polyelectrolyte. uncertainty calculated from uncertainty in average auxiliary material input, and the unertainty of the waste composition of this waste
  EcoSpold01Location=GLO
  properties: wet mass 1 kg, dry mass 1 kg, carbon content, fossil 0.003
  note on carbon content, fossil: This dataset is an unweighted average of 20 inorganic substances (listed in Tab 88.1, ecoinvent v2.2 report 8, part II), being part of the top100 chemicals included in this database. The C-content has also been calculated as an unweighted average of the C content of the substances composing this dataset.

## Emissions to nature
- Silicon [water, ground-, long-term]: 0.00024644 kg; lognormal variance with pedigree 5.46, pedigree (1,1,5,1,1)
  Long-term emissions from landfilling of incineration residues. uncertainty is calculated from uncertainties in waste composition and transfer coefficients in incinerator and landfills.
- Nickel, ion [water, ground-, long-term]: 0.00045703 kg; lognormal variance with pedigree 0.75, pedigree (1,1,5,1,1)
  (same comment as for Silicon)
- Aluminium [water, ground-, long-term]: 0.0030095 kg; lognormal variance with pedigree 0.51, pedigree (1,1,5,1,1)
  (same comment as for Silicon)
- Cyanide [air, urban air close to ground]: 1.1282e-5 kg; lognormal variance with pedigree 1.41, pedigree (1,1,5,1,1)
  uncertainty calculated from uncertainty in average N-emissions, uncertainty in the share of thermal NOx, uncertainty of nitrogen content in average municipal waste and the unertainty in nitrogen content in *this* waste.
- Mercury [water, surface water]: 8.5679e-9 kg; lognormal variance with pedigree 1.61, pedigree (1,1,5,1,1)
  uncertainty is calculated from uncertainties in waste composition and transfer coefficients in incinerator and landfills
- Manganese [water, ground-, long-term]: 3.9679e-5 kg; lognormal variance with pedigree 1.12, pedigree (1,1,5,1,1)
  (same comment as for Silicon)
- Sodium, ion [water, surface water]: 2.8427e-5 kg; lognormal variance with pedigree 0.54, pedigree (1,1,5,1,1)
  (same comment as for Mercury)
- Molybdenum [air, urban air close to ground]: 5.6554e-9 kg; lognormal variance with pedigree 1.49, pedigree (1,1,5,1,1)
  uncertainty is calculated from uncertainties in waste composition and transfer coefficients in incinerator
- Antimony [air, urban air close to ground]: 1.7582e-11 kg; lognormal variance with pedigree 0.63, pedigree (1,1,5,1,1)
  (same comment as for Molybdenum)
- Arsenic [air, urban air close to ground]: 7.2106e-14 kg; lognormal variance with pedigree 1.47, pedigree (1,1,5,1,1)
  (same comment as for Molybdenum)
- Beryllium [water, surface water]: 2.7328e-10 kg; lognormal variance with pedigree 1.95, pedigree (1,1,5,1,1)
  (same comment as for Mercury)
- Dinitrogen monoxide [air, urban air close to ground]: 5.2937e-5 kg; lognormal variance with pedigree 1.41, pedigree (1,1,5,1,1)
  (same comment as for Cyanide)
- Hydrogen fluoride [air, urban air close to ground]: 1.2402e-7 kg; lognormal variance with pedigree 0.91, pedigree (1,1,5,1,1)
  (same comment as for Molybdenum)
- Antimony [water, surface water]: 0.0015688 kg; lognormal variance with pedigree 0.42, pedigree (1,1,5,1,1)
  (same comment as for Mercury)
- BOD5, Biological Oxygen Demand [water, ground-, long-term]: 0.0063295 kg; lognormal variance with pedigree 0.05, pedigree (1,1,5,1,1)
  (same comment as for Silicon)
- Lead [water, surface water]: 3.97e-9 kg; lognormal variance with pedigree 0.99, pedigree (1,1,5,1,1)
  (same comment as for Mercury)
- Copper, ion [water, surface water]: 1.8102e-7 kg; lognormal variance with pedigree 1.3, pedigree (1,1,5,1,1)
  (same comment as for Mercury)
- Vanadium, ion [water, ground-, long-term]: 4.6822e-7 kg; lognormal variance with pedigree 2.65, pedigree (1,1,5,1,1)
  (same comment as for Silicon)
- Lead [air, urban air close to ground]: 5.1581e-9 kg; lognormal variance with pedigree 1, pedigree (1,1,5,1,1)
  (same comment as for Molybdenum)
- Sulfate [water, ground-, long-term]: 0.0010353 kg; lognormal variance with pedigree 0.5, pedigree (1,1,5,1,1)
  (same comment as for Silicon)
- Barium [water, surface water]: 2.294e-8 kg; lognormal variance with pedigree 1.81, pedigree (1,1,5,1,1)
  (same comment as for Mercury)
- Cobalt [water, ground-, long-term]: 2.4326e-5 kg; lognormal variance with pedigree 1.12, pedigree (1,1,5,1,1)
  (same comment as for Silicon)
- TOC, Total Organic Carbon [water, ground-, long-term]: 0.007657 kg; lognormal variance with pedigree 0.05, pedigree (1,1,5,1,1)
  (same comment as for Silicon)
- Fluoride [water, surface water]: 1.8114e-5 kg; lognormal variance with pedigree 0.62, pedigree (1,1,5,1,1)
  (same comment as for Mercury)
- Selenium [water, ground-, long-term]: 1.2419e-6 kg; lognormal variance with pedigree 1.04, pedigree (1,1,5,1,1)
  (same comment as for Silicon)
- Silicon [water, surface water]: 6.0842e-7 kg; lognormal variance with pedigree 0.74, pedigree (1,1,5,1,1)
  (same comment as for Mercury)
- Nitrate [water, ground-, long-term]: 0.00045034 kg; lognormal variance with pedigree 0.39, pedigree (1,1,5,1,1)
  (same comment as for Silicon)
- Mercury [water, ground-, long-term]: 4.1685e-8 kg; lognormal variance with pedigree 3.41, pedigree (1,1,5,1,1)
  (same comment as for Silicon)
- Chloride [water, ground-, long-term]: 0.00015274 kg; lognormal variance with pedigree 0.23, pedigree (1,1,5,1,1)
  (same comment as for Silicon)
- Sulfate [water, surface water]: 0.00019769 kg; lognormal variance with pedigree 0.4, pedigree (1,1,5,1,1)
  (same comment as for Mercury)
- COD, Chemical Oxygen Demand [water, ground-, long-term]: 0.01935 kg; lognormal variance with pedigree 0.05, pedigree (1,1,5,1,1)
  (same comment as for Silicon)
- Copper, ion [water, ground-, long-term]: 0.0041263 kg; lognormal variance with pedigree 0.49, pedigree (1,1,5,1,1)
  (same comment as for Silicon)
- Iron, ion [water, surface water]: 5.5798e-7 kg; lognormal variance with pedigree 0.4, pedigree (1,1,5,1,1)
  (same comment as for Mercury)
- Phosphate [water, ground-, long-term]: 5.5654e-5 kg; lognormal variance with pedigree 5.02, pedigree (1,1,5,1,1)
  (same comment as for Silicon)
- Sulfur dioxide [air, urban air close to ground]: 1.7086e-6 kg; lognormal variance with pedigree 0.83, pedigree (1,1,5,1,1)
  (same comment as for Molybdenum)
- Phosphorus [air, urban air close to ground]: 4.7128e-7 kg; lognormal variance with pedigree 0.81, pedigree (1,1,5,1,1)
  (same comment as for Molybdenum)
- Cadmium, ion [water, surface water]: 6.4428e-8 kg; lognormal variance with pedigree 0.93, pedigree (1,1,5,1,1)
  (same comment as for Mercury)
- Selenium [air, urban air close to ground]: 9.2889e-15 kg; lognormal variance with pedigree 1.65, pedigree (1,1,5,1,1)
  (same comment as for Molybdenum)
- Potassium, ion [water, surface water]: 1.9123e-5 kg; lognormal variance with pedigree 0.62, pedigree (1,1,5,1,1)
  (same comment as for Mercury)
- Iron, ion [water, ground-, long-term]: 0.0037425 kg; lognormal variance with pedigree 0.52, pedigree (1,1,5,1,1)
  (same comment as for Silicon)
- Nitrogen oxides [air, urban air close to ground]: 0.00039885 kg; lognormal variance with pedigree 1.41, pedigree (1,1,5,1,1)
  (same comment as for Cyanide)
- Molybdenum [water, surface water]: 4.8295e-7 kg; lognormal variance with pedigree 0.97, pedigree (1,1,5,1,1)
  (same comment as for Mercury)
- Cobalt [air, urban air close to ground]: 8.8216e-13 kg; lognormal variance with pedigree 1.28, pedigree (1,1,5,1,1)
  (same comment as for Molybdenum)
- Antimony [water, ground-, long-term]: 0.0028891 kg; lognormal variance with pedigree 0.4, pedigree (1,1,5,1,1)
  (same comment as for Silicon)
- Calcium [air, urban air close to ground]: 4.8898e-6 kg; lognormal variance with pedigree 0.58, pedigree (1,1,5,1,1)
  (same comment as for Molybdenum)
- Cobalt [water, surface water]: 4.753e-9 kg; lognormal variance with pedigree 1.62, pedigree (1,1,5,1,1)
  (same comment as for Mercury)
- Aluminium [water, surface water]: 2.0948e-7 kg; lognormal variance with pedigree 0.9, pedigree (1,1,5,1,1)
  (same comment as for Mercury)
- Thallium [water, surface water]: 2.1552e-10 kg; lognormal variance with pedigree 1.92, pedigree (1,1,5,1,1)
  (same comment as for Mercury)
- Aluminium [air, urban air close to ground]: 3.5287e-6 kg; lognormal variance with pedigree 0.54, pedigree (1,1,5,1,1)
  (same comment as for Molybdenum)
- Chromium VI [water, ground-, long-term]: 5.3499e-6 kg; lognormal variance with pedigree 1.78, pedigree (1,1,5,1,1)
  (same comment as for Silicon)
- Arsenic, ion [water, surface water]: 3.187e-6 kg; lognormal variance with pedigree 1.13, pedigree (1,1,5,1,1)
  (same comment as for Mercury)
- Bromine [air, urban air close to ground]: 1.5552e-5 kg; lognormal variance with pedigree 0.5, pedigree (1,1,5,1,1)
  (same comment as for Molybdenum)
- Cadmium [air, urban air close to ground]: 7.8202e-9 kg; lognormal variance with pedigree 1, pedigree (1,1,5,1,1)
  (same comment as for Molybdenum)
- Beryllium [air, urban air close to ground]: 4.3977e-10 kg; lognormal variance with pedigree 1.74, pedigree (1,1,5,1,1)
  (same comment as for Molybdenum)
- Zinc [air, urban air close to ground]: 1.1811e-8 kg; lognormal variance with pedigree 0.79, pedigree (1,1,5,1,1)
  (same comment as for Molybdenum)
- Calcium, ion [water, surface water]: 1.1088e-5 kg; lognormal variance with pedigree 1.02, pedigree (1,1,5,1,1)
  (same comment as for Mercury)
- Hydrogen chloride [air, urban air close to ground]: 7.0726e-8 kg; lognormal variance with pedigree 0.51, pedigree (1,1,5,1,1)
  (same comment as for Molybdenum)
- Phosphate [water, surface water]: 9.2911e-8 kg; lognormal variance with pedigree 1.11, pedigree (1,1,5,1,1)
  (same comment as for Mercury)
- Chromium VI [water, surface water]: 1.6128e-6 kg; lognormal variance with pedigree 1.01, pedigree (1,1,5,1,1)
  (same comment as for Mercury)
- Nickel [air, urban air close to ground]: 2.0381e-11 kg; lognormal variance with pedigree 0.89, pedigree (1,1,5,1,1)
  (same comment as for Molybdenum)
- Tin, ion [water, surface water]: 7.2513e-9 kg; lognormal variance with pedigree 1.09, pedigree (1,1,5,1,1)
  (same comment as for Mercury)
- Nitrate [water, surface water]: 0.00016035 kg; lognormal variance with pedigree 0.28, pedigree (1,1,5,1,1)
  (same comment as for Mercury)
- Bromine [water, ground-, long-term]: 0.00090652 kg; lognormal variance with pedigree 0.5, pedigree (1,1,5,1,1)
  (same comment as for Silicon)
- Chromium, ion [water, surface water]: 1.5771e-7 kg; lognormal variance with pedigree 1.07, pedigree (1,1,5,1,1)
  (same comment as for Mercury)
- Potassium [air, urban air close to ground]: 3.3248e-7 kg; lognormal variance with pedigree 1, pedigree (1,1,5,1,1)
  (same comment as for Molybdenum)
- Fluoride [water, ground-, long-term]: 0.0002102 kg; lognormal variance with pedigree 0.58, pedigree (1,1,5,1,1)
  (same comment as for Silicon)
- Zinc, ion [water, surface water]: 1.3301e-7 kg; lognormal variance with pedigree 0.66, pedigree (1,1,5,1,1)
  (same comment as for Mercury)
- Tin, ion [water, ground-, long-term]: 0.00010564 kg; lognormal variance with pedigree 1.24, pedigree (1,1,5,1,1)
  (same comment as for Silicon)
- Titanium, ion [water, surface water]: 2.0338e-8 kg; lognormal variance with pedigree 1.87, pedigree (1,1,5,1,1)
  (same comment as for Mercury)
- DOC, Dissolved Organic Carbon [water, surface water]: 2.1496e-5 kg; lognormal variance with pedigree 0.27, pedigree (1,1,5,1,1)
  (same comment as for Mercury)
- Chloride [water, surface water]: 0.0062351 kg; lognormal variance with pedigree 0.41, pedigree (1,1,5,1,1)
  (same comment as for Mercury)
- Barium [water, ground-, long-term]: 0.00014811 kg; lognormal variance with pedigree 0.98, pedigree (1,1,5,1,1)
  (same comment as for Silicon)
- Lead [water, ground-, long-term]: 1.5335e-5 kg; lognormal variance with pedigree 6.68, pedigree (1,1,5,1,1)
  (same comment as for Silicon)
- Manganese [water, surface water]: 2.1082e-9 kg; lognormal variance with pedigree 2.12, pedigree (1,1,5,1,1)
  (same comment as for Mercury)
- Bromine [water, surface water]: 0.0042724 kg; lognormal variance with pedigree 0.39, pedigree (1,1,5,1,1)
  (same comment as for Mercury)
- Nickel, ion [water, surface water]: 3.0557e-7 kg; lognormal variance with pedigree 1.38, pedigree (1,1,5,1,1)
  (same comment as for Mercury)
- Cadmium, ion [water, ground-, long-term]: 1.472e-6 kg; lognormal variance with pedigree 6.8, pedigree (1,1,5,1,1)
  (same comment as for Silicon)
- Ammonia [air, urban air close to ground]: 9.9331e-6 kg; lognormal variance with pedigree 1.41, pedigree (1,1,5,1,1)
  (same comment as for Cyanide)
- Mercury [air, urban air close to ground]: 2.7671e-14 kg; lognormal variance with pedigree 1.74, pedigree (1,1,5,1,1)
  (same comment as for Molybdenum)
- Tin [air, urban air close to ground]: 2.5382e-7 kg; lognormal variance with pedigree 0.93, pedigree (1,1,5,1,1)
  (same comment as for Molybdenum)
- Strontium [water, ground-, long-term]: 7.7737e-5 kg; lognormal variance with pedigree 1.03, pedigree (1,1,5,1,1)
  (same comment as for Silicon)
- Thallium [air, urban air close to ground]: 3.5181e-10 kg; lognormal variance with pedigree 1.77, pedigree (1,1,5,1,1)
  (same comment as for Molybdenum)
- Chromium [air, urban air close to ground]: 3.6589e-12 kg; lognormal variance with pedigree 1.15, pedigree (1,1,5,1,1)
  (same comment as for Molybdenum)
- Strontium [water, surface water]: 4.901e-8 kg; lognormal variance with pedigree 1.75, pedigree (1,1,5,1,1)
  (same comment as for Mercury)
- Vanadium [air, urban air close to ground]: 7.0692e-11 kg; lognormal variance with pedigree 1.47, pedigree (1,1,5,1,1)
  (same comment as for Molybdenum)
- Methane, fossil [air, urban air close to ground]: 6.3821e-6 kg; lognormal variance with pedigree 0.091225, pedigree (2,3,5,2,1)
  Confidential data from 5 plants in Switzerland and Germany
  Uncertainty: & basic uncertainty of 1.5; confidential data from 5 plants in Switzerland and Germany
- Strontium [air, urban air close to ground]: 7.7839e-9 kg; lognormal variance with pedigree 1.07, pedigree (1,1,5,1,1)
  (same comment as for Molybdenum)
- Titanium, ion [water, ground-, long-term]: 0.0012644 kg; lognormal variance with pedigree 0.88, pedigree (1,1,5,1,1)
  (same comment as for Silicon)
- Zinc, ion [water, ground-, long-term]: 1.4121e-5 kg; lognormal variance with pedigree 5.31, pedigree (1,1,5,1,1)
  (same comment as for Silicon)
- Sodium, ion [water, ground-, long-term]: 0.00010182 kg; lognormal variance with pedigree 0.67, pedigree (1,1,5,1,1)
  (same comment as for Silicon)
- Carbon dioxide, fossil [air, urban air close to ground]: 2.8432 kg; lognormal variance with pedigree 0.04, pedigree (1,1,5,1,1)
  (same comment as for Molybdenum)
- Vanadium, ion [water, surface water]: 2.0519e-9 kg; lognormal variance with pedigree 2.04, pedigree (1,1,5,1,1)
  (same comment as for Mercury)
- COD, Chemical Oxygen Demand [water, surface water]: 5.2409e-5 kg; lognormal variance with pedigree 0.28, pedigree (1,1,5,1,1)
  (same comment as for Mercury)
- TOC, Total Organic Carbon [water, surface water]: 2.1496e-5 kg; lognormal variance with pedigree 0.27, pedigree (1,1,5,1,1)
  (same comment as for Mercury)
- Titanium [air, urban air close to ground]: 4.2199e-6 kg; lognormal variance with pedigree 0.53, pedigree (1,1,5,1,1)
  (same comment as for Molybdenum)
- DOC, Dissolved Organic Carbon [water, ground-, long-term]: 0.007657 kg; lognormal variance with pedigree 0.05, pedigree (1,1,5,1,1)
  (same comment as for Silicon)
- Silicon [air, urban air close to ground]: 6.5062e-6 kg; lognormal variance with pedigree 0.56, pedigree (1,1,5,1,1)
  (same comment as for Molybdenum)
- Beryllium [water, ground-, long-term]: 3.5417e-7 kg; lognormal variance with pedigree 1.49, pedigree (1,1,5,1,1)
  (same comment as for Silicon)
- Carbon monoxide, fossil [air, urban air close to ground]: 0.0002229 kg; lognormal variance with pedigree 0.690625, pedigree (1,3,5,2,1)
  Literature data from switzerland and germany adapted to plant age distribution in switzerland
  Uncertainty: & basic uncertainty of 5; literature data from switzerland and germany adapted to plant age distribution in switzerland
- Barium [air, urban air close to ground]: 1.6683e-7 kg; lognormal variance with pedigree 0.95, pedigree (1,1,5,1,1)
  (same comment as for Molybdenum)
- Selenium [water, surface water]: 6.0159e-7 kg; lognormal variance with pedigree 1.22, pedigree (1,1,5,1,1)
  (same comment as for Mercury)
- Potassium, ion [water, ground-, long-term]: 9.0824e-5 kg; lognormal variance with pedigree 0.7, pedigree (1,1,5,1,1)
  (same comment as for Silicon)
- Sodium [air, urban air close to ground]: 1.2371e-6 kg; lognormal variance with pedigree 0.98, pedigree (1,1,5,1,1)
  (same comment as for Molybdenum)
- Iron [air, urban air close to ground]: 4.9655e-8 kg; lognormal variance with pedigree 0.43, pedigree (1,1,5,1,1)
  (same comment as for Molybdenum)
- Arsenic, ion [water, ground-, long-term]: 3.8822e-6 kg; lognormal variance with pedigree 1.35, pedigree (1,1,5,1,1)
  (same comment as for Silicon)
- Copper [air, urban air close to ground]: 2.2224e-8 kg; lognormal variance with pedigree 0.55, pedigree (1,1,5,1,1)
  (same comment as for Molybdenum)
- Thallium [water, ground-, long-term]: 2.0529e-7 kg; lognormal variance with pedigree 1.32, pedigree (1,1,5,1,1)
  (same comment as for Silicon)
- Molybdenum [water, ground-, long-term]: 2.339e-6 kg; lognormal variance with pedigree 1.47, pedigree (1,1,5,1,1)
  (same comment as for Silicon)
- Manganese [air, urban air close to ground]: 3.5413e-14 kg; lognormal variance with pedigree 1.26, pedigree (1,1,5,1,1)
  (same comment as for Molybdenum)
- Calcium, ion [water, ground-, long-term]: 0.0025526 kg; lognormal variance with pedigree 0.54, pedigree (1,1,5,1,1)
  (same comment as for Silicon)
- BOD5, Biological Oxygen Demand [water, surface water]: 2.9344e-5 kg; lognormal variance with pedigree 0.16, pedigree (1,1,5,1,1)
  (same comment as for Mercury)

## Sampling procedure
waste-specific calculation based on literature data

## Extrapolations
This dataset has been extrapolated from year 2000 to the year of the calculation (2021). The uncertainty has been adjusted accordingly.

## Review by Jürgen Sutter 2007-08-31
passed.
