# electricity production, nuclear, boiling water reactor

Dataset: EcoSpold 2, unit process
Geography: RoW
Time period: 1990-01-01 to 2021-12-31
Technology level: modern
Classification: ISIC rev.4 ecoinvent: 3510:Electric power generation, transmission and distribution
Synonyms: BWR
Tags: nuclear power
Scenario: Business-as-Usual
System model: Allocation, cut-off by classification
Generated by: Karin Treyer
Published in: Dones, R. 2007
Database: ecoinvent
isCopyrightProtected: true
accessRestrictedTo: 1

## General comment
This dataset represents the production of high voltage electricity at a grid-connected nuclear boiling water reactor (BWR) on the world in 2012.
It is a copy of the dataset 'electricity production, nuclear, boiling water reactor, CH, 1995-2002', i.e. of a dataset with data for a Swiss nuclear BWR. The basic source for all exchanges is therefore the ecoinvent report 'Kernenergie' (see Modelling and Administrative). Data of this CH dataset are scaled with a factor derived from the comparison of the efficiencies of Swiss BWR and those valid for this dataset in order to account for a higher or lower fuel input for the production of 1 kWh, respectively.
The average burnup 48.6 MWd/kg heavy metal of finally discharged fuel elements from the 2000/2002 fuel cycles has been assumed representative for the lifetime of the modeled plant (the burnup has increased from the initial about 33 MWd/kg heavy metal and may increase to 55 MWd/kg heavy metal in the future). The average burnup corresponds to an average enrichment of 3.8% U235 for fresh uranium fuel elements. For the calculation of the total net electricity delivered in 40 years lifetime, the sum of the actual production till 2002 and the prospective (9000 GWh/a) till end of life using is considered; this gives 3.46E11 kWh; the inverse gives the utilisation factor for the infrastructure. Full detailed information on material requirements during operation for 1991/1992 are available. The diesel requirements for the yearly test of diesel emergency generators are accounted for. Radioactive emission species to air and water are weighted averages of the emissions of the nuclear power plants Leibstadt and Mühleberg (CH) from 1995 to 2002. Alpha aerosols emission to air have been described with 'aerosols, unspecified'. Considered radioactive waste streams are: spent fuel to reprocessing (40%) and conditioning (60%); operational low active waste for conditioning in the intermediate repository; and, contaminated waste from dismantling.
[This dataset is meant to replace the following datasets:]

## Included activities start
From the constructed power plant ready to produce electricity and from the fuel ready in the power plant.

## Included activities end
This activity ends with 1kWh of high voltage electricity produced at the power plant and arrived at the busbar.
The module includes fuel elements, chemicals, and diesel requirements as well as the relevant transport requirements. Water use (fresh and decarbonized) for cooling is included. Considered radioactive waste streams are: spent fuel to reprocessing and conditioning; operational low active waste for conditioning in the intermediate repository; and, contaminated waste from dismantling. Non-radioactive wastes are accounted for.

The module includes fuel elements, chemicals, and diesel requirements as well as the relevant transport requirements. Water use (fresh and decarbonized) for cooling is included, but no cooling tower infrastructure. Considered radioactive waste streams are: spent fuel to reprocessing and conditioning; operational low active waste for conditioning in the intermediate repository; and, contaminated waste from dismantling. Non-radioactive wastes are accounted for.

## Geography
Extrapolated from Swiss data of one specific plant for requirements and all Swiss BWRs for emissions.

## Technology
Best current technology for fuel element. Standard technology for commercial operation.

## Time period
The Annual Production Volume is valid for the year 2012.

## Parameters
All rows: lognormal variance with pedigree 0.092025, pedigree (4,4,3,2,4)
- water consumption, electricity production, nuclear, once-T and coolingP CS: 0.00296 m3/kWh; name WConsumption_EP_nuclear_onceT_andCP_CS
  Estimated based on literature (Scown, 2011, Water Footprint of U.S. Transportation Fuels, SI).
  nan
- fraction, water, decarbonised, to air: 0.0431288 dimensionless; name fraction_WDC_to_air; = fraction_CW_to_air
  Calculated value. See comments in the other parametres present in this dataset. Decarbonised water is considered to be always used as cooling water, thus cooling water fractions to air are applied to all carbonised water input flows to calculate the amount of water consumed in the processes.
  nan
- water consumption, electricity production, nuclear, recirculating CS: 0.0024 m3/kWh; name WConsumption_EP_nuclear_recirculatingCS
  (same comment as for water consumption, electricity production, nuclear, once-T and cooling)
- fraction, cooling water, to air: 0.0431288 dimensionless; name fraction_CW_to_air; = (WConsumption_EP_nuclear_recirculatingCS*recirculating_CS_fraction_from_allCS+WConsumption_EP_nuclear_onceT_andCP_CS*once_through_andCP_CS_fractio_from_allCS)/(WWithdrawal_EP_nuclear_recirculating_CS*recirculating_CS_fraction_from_allCS+WWithdrawal_EP_nuclear_onceT_andCP_CS*once_through_andCP_CS_fractio_from_allCS)
  Calculated value based on literature value (Scown, 2011 & Floerke, 2009, Future changes of freshwater needs in the electricity production sector & Stiegel, 2008, Estimating Freshwater Needs to Meet Future Thermoelectric Generation Requirements) (Vionnet, S., Quantis Water Database - Technical Report, 2012).
- water withdrawal, electricity production, nuclear, once-T and coolingP CS: 0.0995 m3/kWh; name WWithdrawal_EP_nuclear_onceT_andCP_CS
  (same comment as for water consumption, electricity production, nuclear, once-T and cooling)
- recirculating cooling system as a fraction of all cooling systems: 0.375 dimensionless; name recirculating_CS_fraction_from_allCS
  Calculated as an average of data available for Europe (Floerke, 2008, Future changes of freshwater needs in the electricity production sector) and USA (NERL, 2011, Estimating freshwater needs to meet future thermoelectric generation requirements).
  nan
- water withdrawal, electricity production, nuclear, recirculating CS: 0.0042 m3/kWh; name WWithdrawal_EP_nuclear_recirculating_CS
  (same comment as for water consumption, electricity production, nuclear, once-T and cooling)
- once-through and cooling pond cooling systems as a fraction of all cooling syste: 0.625 dimensionless; name once_through_andCP_CS_fractio_from_allCS
  (same comment as for recirculating cooling system as a fraction of all cooling systems)

## Reference product
- electricity, high voltage: 1 kWh; By-product classification allocatable product; CPC 17100: Electrical energy
  production volume 1.78775e10 kWh; name apv_electricity
    Literature value/statistics. For both OECD and non-OECD countries, gross electricity production 2012 with nuclear plants was taken from the IEA electricity information 2014, table 1.2. For a split of this total value into electricity production in different types of nuclear plants (boiling water reactor, pressure water reactor and pressurised heavy water reactor), data from IEAE 2014 (PRIS database) were exploited. An own electricity use of 6% (losses between gross and net electricity production) has been applied to the gross data based on IEA 2014.
    IEA. 2014. Electricity Information 2014. ISBN 978-92-64-21692-1. International Energy Agency (IEA), Paris Cedex (FR).
    IAEA. 2014. PRIS (Power Reactor Information System) - The database on nuclear power reactors. Country statistics. Online database. International Atomic Energy Agency.
  property price 0.0977 EUR2005
    Temporary price data. Calculated as 90% of purchasers price based on: 94% of the average price (to account for a 6% loss in transformation and transmission) for electricity for industrial consumersin 2005 (excluded taxes). From IEA.

## Inputs from technosphere
- concrete, normal: 0 m3; pedigree (1,1,1,1,1)
  Literature value
  properties: wet mass 2380 kg, dry mass 2190 kg, water content 0.086758
- acetylene: 3.24e-8 kg; lognormal variance with pedigree 0.0439, pedigree (2,2,5,5,2)
  Operator information
  properties: heating value, net 51.2 MJ, dry mass 1 kg, carbon content, fossil 0.923077, wet mass 1 kg
  note on heating value, net: Based on literature, page 25 (Value may refer to HHV), Althaus H.-J., Chudacoff M., Hischier R., Jungbluth N., Osses M. and Primas A. (2007) Life Cycle Inventories of Chemicals. Final report ecoinvent data v2.0 No. 8. EMPA, Swiss Centre for Life Cycle Inventories, Dübendorf, CH, Online-Version under: www.ecoinvent.org.
  note on carbon content, fossil: C2H2. ecoinvent v2.2 report n 8. Produced from partial oxidation of natural gas
- chemical, inorganic: 6.01e-7 kg; lognormal variance with pedigree 0.0439, pedigree (2,2,5,5,2)
  Operator information. Decontamination chemicals and salt for water softening.
  properties: carbon content, fossil 0.003, wet mass 1 kg, dry mass 1 kg
  note on carbon content, fossil: This dataset is an unweighted average of 20 inorganic substances (listed in Tab 88.1, ecoinvent v2.2 report 8, part II), being part of the top100 chemicals included in this database. The C-content has also been calculated as an unweighted average of the C content of the substances composing this dataset.
- chemical, organic: 1.24e-6 kg; lognormal variance with pedigree 0.0439, pedigree (2,2,5,5,2)
  Operator information. This category contains solvents, frost protection, anticorrosives, industrial alcohol, washing agents.
  properties: wet mass 1 kg, dry mass 1 kg, carbon content, fossil 0.628, heating value, net 19.03 MJ
  note on carbon content, fossil: This dataset is an unweighted average of 20 organic substances (listed in Tab 88.1, ecoinvent v2.2 report 8, part II), being part of the top100 chemicals included in this database. The C-content has also been calculated as an unweighted average of the C content of the substances composing this dataset.
- cement, Portland: 0 kg; pedigree (1,1,1,1,1)
  Operator information. Cement use for conditioning of the hard waste.
  properties: wet mass 1 kg, dry mass 1 kg
- cast iron: 1.16e-7 kg; lognormal variance with pedigree 0.0439, pedigree (2,2,5,5,2)
  Operator information
  properties: wet mass 1 kg, dry mass 1 kg, carbon content, fossil 0.04
  note on carbon content, fossil: Cast iron is made by remelting pig iron in small furnaces (e.g. cupola furnaces or electric arc furnaces) and poured into moulds to make castings. It usually contains 2% to 6% carbon (ecoinvent v2.2 report 10_partII). An average content of 4% was considered
- reinforcing steel: 7.7e-7 kg; lognormal variance with pedigree 0.0439, pedigree (2,2,5,5,2)
  Operator information
  properties: carbon content, fossil 0.004, dry mass 1 kg, wet mass 1 kg
- paper, woodfree, coated: 5.78e-7 kg; lognormal variance with pedigree 0.0439, pedigree (2,2,5,5,2)
  Operator information. Paper use in office. No other office materials have been considered.
  properties: heating value, net 14.11 MJ, carbon content, non-fossil 0.22775, dry mass 0.945 kg, wet mass 1 kg, carbon content, fossil 0.0590617, water content 0.0582011
  note on carbon content, non-fossil: Biogenic C content was calculated after biogenic C contents of chemicals used in the production of the paper (in Tab 8.72 & 8.73 ecoinvent v2.2 report 11_III, part 8). The cellulose content in 1 kg of paper (on a wet mas basis) was estimated as (1-chemical content), C content of cellulose was considered 0.44 kgC/kg dry mass (ecoinvent v2.2 report, n 15a, pg 40)
  note on carbon content, fossil: Fossil C content was calculated after fossil C contents of chemicals used in the production of the paper (in Tab 8.72 & 8.73 ecoinvent v2.2 report 11_III, part 8).
- diesel, burned in diesel-electric generating set, 10MW: 0.000333 MJ; lognormal variance with pedigree 0.0439, pedigree (2,2,5,5,2)
  Estimation. Diesel use for testing of the emergency power in the power plant.
  properties: heating value, net 1 MJ
- flat glass, coated: 3.93e-6 kg; lognormal variance with pedigree 0.0439, pedigree (2,2,5,5,2)
  Operator information. Materials for sand blasting equipment.
  properties: dry mass 1 kg, wet mass 1 kg
- anionic resin: 1.06e-6 kg; lognormal variance with pedigree 0.0439, pedigree (2,2,5,5,2)
  Operator information. All resin types needed are modeled as 50% anionic resin and 50% cationic resin.
  properties: wet mass 1 kg, heating value, net 9.09 MJ, dry mass 0.5 kg, water content 1, carbon content, fossil 0.680721
  note on carbon content, fossil: Cross-linked polystyrene beads are treated with chloromethyl methyl ether under anhydrous conditions, with either aluminum chloride or tin(IV) chloride as catalyst. Chloromethylated polystyrene is obtained. In a second stage, the chlorine in the chloromethylated group can be replaced by an amine (Anion exchange resins, in Ullmann). In this case, Trimethylamine, C3H9N, is used (ecoinvent v2.2 report 8-part 93). That is, the resine can be formulated as C12H18NCl (after Ullmann, Anion exchange resins). The resine is hydrated (ecoinvent v2.2 report 8, part II, Tab 93.7)
- borax, anhydrous, powder: 2.89e-8 kg; lognormal variance with pedigree 0.0439, pedigree (2,2,5,5,2)
  Operator information.
  properties: dry mass 1 kg, wet mass 1 kg
- low level radioactive waste: -1.6568e-8 m3; name low_level_waste; lognormal variance with pedigree 0.0439, pedigree (2,2,5,5,2)
  Literature data
  production volume 270.939 m3; = low_level_waste * apv_electricity
    Calculated from the production volume of electricity, high voltage in proportion to the respective output amounts.
  property price 0 EUR2005; name low_level_waste_price_EUR2005
  properties: wet mass 2500 kg, dry mass 2500 kg
- steel, low-alloyed, hot rolled: 5.4e-6 kg; lognormal variance with pedigree 0.0439, pedigree (2,2,5,5,2)
  Literature value
  properties: wet mass 1 kg, dry mass 1 kg, carbon content, fossil 0.005
  note on carbon content, fossil: Low alloyed steel composition given in Tab. 3.2 ecoinvent v2.2 report 10_partII. Steel assumed to have a C content of 0.5%
- low level radioactive waste for final repository: -4.05e-8 m3; name low_level_waste_final; lognormal variance with pedigree 0.0439, pedigree (2,2,5,5,2)
  Literature data
  production volume 622.451 m3; = low_level_waste_final * apv_electricity
    (same comment as for low level radioactive waste)
  property price 0 EUR2005; name low_level_waste_final_price_EUR2005
  properties: wet mass 2500 kg, dry mass 2500 kg
- water, decarbonised: 0 kg; name water_decarbonised_input; pedigree (1,1,1,1,1)
  Literature value/estimation.
  properties: wet mass 1 kg
- spent nuclear fuel: -2.68e-6 kg; name spent_nuclear_fuel; lognormal variance with pedigree 0.0439, pedigree (2,2,5,5,2)
  Literature data
  production volume 44822.8 kg; = spent_nuclear_fuel * apv_electricity
    (same comment as for low level radioactive waste)
  property price 0 EUR2005; name spent_nuclear_fuel_price_EUR2005
  properties: dry mass 1 kg, wet mass 1 kg
- nitrogen, liquid: 5.55e-5 kg; lognormal variance with pedigree 0.0439, pedigree (2,2,5,5,2)
  Estimation. Gas use in the power plant. Nitrogen use and use of forming gas (5-10% H2, 90-95% N2) are summed up in this exchange.
  properties: wet mass 1 kg, dry mass 1 kg
- hazardous waste, for incineration: -8.73e-7 kg; name hazwaste; lognormal variance with pedigree 0.0439, pedigree (2,2,5,5,2)
  Literature data
  production volume 13419.5 kg; = hazwaste * apv_electricity
    (same comment as for low level radioactive waste)
  property price 0 EUR2005; name hazwaste_price_EUR2005
  properties: wet mass 1 kg, carbon content, fossil 0.554667, dry mass 0.75 kg, water content 0.333333, heating value, net 17 MJ
  note on carbon content, fossil: Tab A.6, ecoinvent v2.2 report 13_I. C content has been calculated after data in the tables, and then referred to 1 kg DM
  note on heating value, net: Value taken from the general comment of the treatment dataset.
- argon, liquid: 2.34e-5 kg; lognormal variance with pedigree 0.0439, pedigree (2,2,5,5,2)
  Estimation. Gas use in the power plant. Argon and helium are summed up in this exchange
  properties: dry mass 1 kg, wet mass 1 kg
- waste mineral oil: -1.46e-6 kg; name waste_oil; = (lubricating_oil)*-1; lognormal variance with pedigree 0.0439, pedigree (2,2,5,5,2)
  Literature data
  production volume 22281.6 kg; = waste_oil* apv_electricity
    (same comment as for low level radioactive waste)
  property price 0 EUR2005; name waste_oil_price_EUR2005
  properties: carbon content, fossil 0.864444, dry mass 0.9 kg, wet mass 1 kg, heating value, net 34.7 MJ, water content 0.111111
- uranium, enriched 3.8%, in fuel element for light water reactor: 2.68e-6 kg; lognormal variance with pedigree 0.0439, pedigree (2,2,5,5,2)
  estimated variation over lifetime
  properties: wet mass 1 kg, dry mass 1 kg
- fly ash and scrubber sludge: -1.97e-6 kg; name fly_ash; lognormal variance with pedigree 0.0439, pedigree (2,2,5,5,2)
  Literature data
  production volume 30422.4 kg; = fly_ash * apv_electricity
    (same comment as for low level radioactive waste)
  property price 0 EUR2005; name fly_ash_price_EUR2005
  properties: carbon content, fossil 0.167, dry mass 0.1 kg, wet mass 1 kg, water content 9
- hydrogen, liquid: 9.25e-6 kg; lognormal variance with pedigree 0.0439, pedigree (2,2,5,5,2)
  Estimation. Gas use in the power plant.
  properties: dry mass 1 kg, heating value, net 120.21 MJ, wet mass 1 kg
- carbon dioxide, liquid: 1.5e-7 kg; lognormal variance with pedigree 0.0439, pedigree (2,2,5,5,2)
  Estimation. Gas use in the power plant.
  properties: wet mass 1 kg, heating value, net 8.27 MJ, dry mass 1 kg, carbon content, fossil 0.272727
- oxygen, liquid: 1.5e-5 kg; lognormal variance with pedigree 0.0439, pedigree (2,2,5,5,2)
  Estimation. Gas use in the power plant.
  properties: wet mass 1 kg, dry mass 1 kg
- cationic resin: 1.06e-6 kg; lognormal variance with pedigree 0.0439, pedigree (2,2,5,5,2)
  (same comment as for anionic resin)
  properties: wet mass 1 kg, water content 1, dry mass 0.5 kg, carbon content, fossil 0.521606, heating value, net 6.68 MJ
  note on carbon content, fossil: Chemically inert polystyrene beads are treated with concentrated sulfuric or chlorosulfonic acid to give cross-linked polystyrene 3-sulfonic acid (Cation exchange resins, Ullmann). The resine was approximated as C8H8O3S (from Ullmann, Cation exchange resins). The resine is hydrated (ecoinvent v2.2 report 8, part II, Tab 93.5)
- lubricating oil: 1.46e-6 kg; name lubricating_oil; lognormal variance with pedigree 0.0439, pedigree (2,2,5,5,2)
  Operator information. Oil and fats for hydraulic systems and general lubricating use.
  properties: heating value, net 40.2 MJ, wet mass 1 kg, dry mass 1 kg, carbon content, fossil 0.75
  note on heating value, net: Literature value, Source: IPCC 2006, 2006 IPCC Guidelines for National Greenhouse Gas Inventories, Prepared by the National Greenhouse Gas Inventories Programme, Eggleston H.S., Buendia L., Miwa K., Ngara T. and Tanabe K. (eds). Published: IGES, Japan
  note on carbon content, fossil: Lubricating oil is produced from diesel. C-content/dry mass of fats and oils considered 75%, from: ecoinvent v2.2 report, n 15a, pg 40
- nuclear fuel element, for boiling water reactor, UO2 4.0% & MOX: 9.24e-8 kg; lognormal variance with pedigree 0.5526, pedigree (3,4,5,4,3)
  APV weighted global average
  properties: wet mass 1 kg, dry mass 1 kg
- boric acid, anhydrous, powder: 2.31e-8 kg; lognormal variance with pedigree 0.0439, pedigree (2,2,5,5,2)
  Operator information.
  properties: wet mass 1 kg, dry mass 1 kg
- nuclear power plant, boiling water reactor 1000MW: 2.89e-12 unit; lognormal variance with pedigree 0.0439, pedigree (2,2,5,5,2)
  Estimation. Total net electricity over a lifetime: 3.46E11 kWh
- concrete, normal: 9.65698e-9, 1.00624e-9, 4.58227e-9, 6.54506e-10 m3 (4 entries); lognormal variance with pedigree 0.0439, pedigree (2,2,5,5,2)
  Literature value
- cement, Portland: 1.37305e-6, 2.0053e-6, 2.37965e-6, 1.95201e-6 kg (4 entries); lognormal variance with pedigree 0.0439, pedigree (2,2,5,5,2)
  Operator information. Cement use for conditioning of the hard waste.
- water, decarbonised: 0.206067, 0.536187, 2.16256, 0.35006, 0.0263234 kg (5 entries); lognormal variance with pedigree 0.0483, pedigree (2,2,5,5,2)
  Literature value/estimation.

## Inputs from nature
- Water, cooling, unspecified natural origin [natural resource, in water]: 0.0637625 m3; name water_cooling_UNO_input; = ((recirculating_CS_fraction_from_allCS*WWithdrawal_EP_nuclear_recirculating_CS)+(once_through_andCP_CS_fractio_from_allCS*WWithdrawal_EP_nuclear_onceT_andCP_CS)); lognormal variance with pedigree 0.0483, pedigree (2,2,5,5,2)
  Calculated based on literature data.
  property dry mass 0.1101 kg; name DM
  property carbon content, fossil 0.0104329; name C_content_fossil
  property wet mass 1000 kg; name WM
  property water content 9081.65; name water_content
  property water in wet mass 999.89 kg; name WWM
  property carbon content, non-fossil 0; name C_content_non_fossil

## Emissions to nature
- Strontium-89 [water, surface water]: 2.55e-5 kBq; lognormal variance with pedigree 0.0439, pedigree (2,2,5,5,2)
  Operator data. Weighted radioactive emissions into water of Swiss nuclear power plants 1995-2002 (Weighting with net electricity production).
- Krypton-85m [air, non-urban air or from high stacks]: 0.0147 kBq; lognormal variance with pedigree 0.0439, pedigree (2,2,5,5,2)
  Operator data. Weighted radioactive emissions into air of Swiss nuclear power plants 1995-2002 (Weighting with net electricity production).
- Xenon-138 [air, non-urban air or from high stacks]: 0.0683 kBq; lognormal variance with pedigree 0.0439, pedigree (2,2,5,5,2)
  (same comment as for Krypton-85m)
- Xenon-131m [air, non-urban air or from high stacks]: 0.0312 kBq; lognormal variance with pedigree 0.0439, pedigree (2,2,5,5,2)
  (same comment as for Krypton-85m)
- Antimony-124 [air, non-urban air or from high stacks]: 2.16e-9 kBq; lognormal variance with pedigree 0.0439, pedigree (2,2,5,5,2)
  (same comment as for Krypton-85m)
- Cesium-134 [water, surface water]: 6.21e-6 kBq; lognormal variance with pedigree 0.0439, pedigree (2,2,5,5,2)
  (same comment as for Strontium-89)
- Hydrogen-3, Tritium [water, surface water]: 0.0975 kBq; lognormal variance with pedigree 0.0439, pedigree (2,2,5,5,2)
  (same comment as for Strontium-89)
- Water [water, unspecified]: 0.0641522 m3; name water_to_water_unspecified; = (water_decarbonised_input/1000)*(1-fraction_WDC_to_air)+water_cooling_UNO_input*(1-fraction_CW_to_air); lognormal variance with pedigree 0.130025, pedigree (4,4,5,2,4)
  Calculated value based on literature values and expert opinion. See comments in the parametres' comment field.
  property fraction, origin: fresh water 0.0489412; name fraction_origin_fresh_water_Ww
  property fraction, origin: salt water 0; name fraction_origin_salt_water_Ww
  property fraction, origin: unspecified 0.951059; name fraction_origin_unspecified_Ww
- Krypton-87 [air, non-urban air or from high stacks]: 0.00594 kBq; lognormal variance with pedigree 0.0439, pedigree (2,2,5,5,2)
  (same comment as for Krypton-85m)
- Krypton-88 [air, non-urban air or from high stacks]: 0.00786 kBq; lognormal variance with pedigree 0.0439, pedigree (2,2,5,5,2)
  (same comment as for Krypton-85m)
- Xenon-135 [air, non-urban air or from high stacks]: 0.255 kBq; lognormal variance with pedigree 0.0439, pedigree (2,2,5,5,2)
  (same comment as for Krypton-85m)
- Cerium-141 [air, non-urban air or from high stacks]: 4.51e-7 kBq; lognormal variance with pedigree 0.0439, pedigree (2,2,5,5,2)
  (same comment as for Krypton-85m)
- Ruthenium-103 [air, non-urban air or from high stacks]: 3.86e-10 kBq; lognormal variance with pedigree 0.0439, pedigree (2,2,5,5,2)
  (same comment as for Krypton-85m)
- Lanthanum-140 [water, surface water]: 4.55e-6 kBq; lognormal variance with pedigree 0.0439, pedigree (2,2,5,5,2)
  (same comment as for Strontium-89)
- Iodine-131 [air, non-urban air or from high stacks]: 6.44e-5 kBq; lognormal variance with pedigree 0.0439, pedigree (2,2,5,5,2)
  (same comment as for Krypton-85m)
- Ruthenium-103 [water, surface water]: 2.67e-8 kBq; lognormal variance with pedigree 0.0439, pedigree (2,2,5,5,2)
  (same comment as for Strontium-89)
- Cesium-134 [air, non-urban air or from high stacks]: 2.16e-8 kBq; lognormal variance with pedigree 0.0439, pedigree (2,2,5,5,2)
  (same comment as for Krypton-85m)
- Cobalt-60 [air, non-urban air or from high stacks]: 2.63e-7 kBq; lognormal variance with pedigree 0.0439, pedigree (2,2,5,5,2)
  (same comment as for Krypton-85m)
- Aerosols, radioactive, unspecified [air, non-urban air or from high stacks]: 8.73e-9 kBq; lognormal variance with pedigree 0.0439, pedigree (2,2,5,5,2)
  (same comment as for Krypton-85m)
- Silver-110 [water, surface water]: 0.00128 kBq; lognormal variance with pedigree 0.0439, pedigree (2,2,5,5,2)
  (same comment as for Strontium-89)
- Manganese-54 [air, non-urban air or from high stacks]: 1.48e-8 kBq; lognormal variance with pedigree 0.0439, pedigree (2,2,5,5,2)
  (same comment as for Krypton-85m)
- Cesium-137 [air, non-urban air or from high stacks]: 3.74e-7 kBq; lognormal variance with pedigree 0.0439, pedigree (2,2,5,5,2)
  (same comment as for Krypton-85m)
- Zinc-65 [air, non-urban air or from high stacks]: 7.39e-8 kBq; lognormal variance with pedigree 0.0439, pedigree (2,2,5,5,2)
  (same comment as for Krypton-85m)
- Zinc-65 [water, surface water]: 0.000182 kBq; lognormal variance with pedigree 0.0439, pedigree (2,2,5,5,2)
  (same comment as for Strontium-89)
- Chromium-51 [water, surface water]: 0.000345 kBq; lognormal variance with pedigree 0.0439, pedigree (2,2,5,5,2)
  (same comment as for Strontium-89)
- Iron-59 [water, surface water]: 3.22e-7 kBq; lognormal variance with pedigree 0.0439, pedigree (2,2,5,5,2)
  (same comment as for Strontium-89)
- Strontium-90 [water, surface water]: 2.87e-6 kBq; lognormal variance with pedigree 0.0439, pedigree (2,2,5,5,2)
  (same comment as for Strontium-89)
- Carbon-14 [air, non-urban air or from high stacks]: 0.0467 kBq; lognormal variance with pedigree 0.0439, pedigree (2,2,5,5,2)
  (same comment as for Krypton-85m)
- Antimony-125 [water, surface water]: 1.31e-6 kBq; lognormal variance with pedigree 0.0439, pedigree (2,2,5,5,2)
  (same comment as for Strontium-89)
- Xenon-137 [air, non-urban air or from high stacks]: 0.00917 kBq; lognormal variance with pedigree 0.0439, pedigree (2,2,5,5,2)
  (same comment as for Krypton-85m)
- Cobalt-58 [water, surface water]: 7.84e-5 kBq; lognormal variance with pedigree 0.0439, pedigree (2,2,5,5,2)
  (same comment as for Strontium-89)
- Cobalt-60 [water, surface water]: 0.000844 kBq; lognormal variance with pedigree 0.0439, pedigree (2,2,5,5,2)
  (same comment as for Strontium-89)
- Iodine-131 [water, surface water]: 4.62e-6 kBq; lognormal variance with pedigree 0.0439, pedigree (2,2,5,5,2)
  (same comment as for Strontium-89)
- Water [air, unspecified]: 0.00289151 m3; name water_to_air_unspecified; = (water_decarbonised_input/1000)*fraction_WDC_to_air+water_cooling_UNO_input*fraction_CW_to_air; lognormal variance with pedigree 0.130025, pedigree (4,4,5,2,4)
  (same comment as for Water)
  property fraction, origin: fresh water 0.0489412; name fraction_origin_fresh_water
  property fraction, origin: salt water 0; name fraction_origin_salt_water
  property fraction, origin: unspecified 0.951059; name fraction_origin_unspecified
- Krypton-85 [air, non-urban air or from high stacks]: 0.00468 kBq; lognormal variance with pedigree 0.0439, pedigree (2,2,5,5,2)
  (same comment as for Krypton-85m)
- Molybdenum-99 [water, surface water]: 1.77e-6 kBq; lognormal variance with pedigree 0.0439, pedigree (2,2,5,5,2)
  (same comment as for Strontium-89)
- Niobium-95 [water, surface water]: 2.59e-6 kBq; lognormal variance with pedigree 0.0439, pedigree (2,2,5,5,2)
  (same comment as for Strontium-89)
- Xenon-133m [air, non-urban air or from high stacks]: 0.00107 kBq; lognormal variance with pedigree 0.0439, pedigree (2,2,5,5,2)
  (same comment as for Krypton-85m)
- Tellurium-123m [water, surface water]: 1.73e-11 kBq; lognormal variance with pedigree 0.5526, pedigree (3,4,5,4,3)
  APV weighted global average
- Cobalt-58 [air, non-urban air or from high stacks]: 2.02e-8 kBq; lognormal variance with pedigree 0.0439, pedigree (2,2,5,5,2)
  (same comment as for Krypton-85m)
- Zirconium-95 [water, surface water]: 2.78e-7 kBq; lognormal variance with pedigree 0.0439, pedigree (2,2,5,5,2)
  (same comment as for Strontium-89)
- Barium-140 [air, non-urban air or from high stacks]: 1.86e-6 kBq; lognormal variance with pedigree 0.0439, pedigree (2,2,5,5,2)
  (same comment as for Krypton-85m)
- Radioactive species, other beta emitters [air, non-urban air or from high stacks]: 1.19e-7 kBq; lognormal variance with pedigree 0.5526, pedigree (3,4,5,4,3)
  APV weighted global average
- Zirconium-95 [air, non-urban air or from high stacks]: 1.59e-9 kBq; lognormal variance with pedigree 0.0439, pedigree (2,2,5,5,2)
  (same comment as for Krypton-85m)
- Xenon-135m [air, non-urban air or from high stacks]: 0.289 kBq; lognormal variance with pedigree 0.0439, pedigree (2,2,5,5,2)
  (same comment as for Krypton-85m)
- Manganese-54 [water, surface water]: 7.29e-5 kBq; lognormal variance with pedigree 0.0439, pedigree (2,2,5,5,2)
  (same comment as for Strontium-89)
- Radioactive species, Nuclides, unspecified [water, surface water]: 5.79e-7 kBq; lognormal variance with pedigree 0.5526, pedigree (3,4,5,4,3)
  APV weighted global average
- Cesium-137 [water, surface water]: 0.000453 kBq; lognormal variance with pedigree 0.0439, pedigree (2,2,5,5,2)
  (same comment as for Strontium-89)
- Barium-140 [water, surface water]: 4.84e-6 kBq; lognormal variance with pedigree 0.0439, pedigree (2,2,5,5,2)
  (same comment as for Strontium-89)
- Niobium-95 [air, non-urban air or from high stacks]: 1.62e-9 kBq; lognormal variance with pedigree 0.0439, pedigree (2,2,5,5,2)
  (same comment as for Krypton-85m)
- Chromium-51 [air, non-urban air or from high stacks]: 2.89e-8 kBq; lognormal variance with pedigree 0.0439, pedigree (2,2,5,5,2)
  (same comment as for Krypton-85m)
- Technetium-99m [water, surface water]: 3.74e-5 kBq; lognormal variance with pedigree 0.0439, pedigree (2,2,5,5,2)
  (same comment as for Strontium-89)
- Cerium-141 [water, surface water]: 1.72e-6 kBq; lognormal variance with pedigree 0.0439, pedigree (2,2,5,5,2)
  (same comment as for Strontium-89)
- Radioactive species, alpha emitters [water, surface water]: 4.69e-8 kBq; lognormal variance with pedigree 0.0439, pedigree (2,2,5,5,2)
  (same comment as for Strontium-89)
- Iodine-133 [water, surface water]: 2.53e-6 kBq; lognormal variance with pedigree 0.0439, pedigree (2,2,5,5,2)
  (same comment as for Strontium-89)
- Hydrogen-3, Tritium [air, non-urban air or from high stacks]: 0.0614 kBq; lognormal variance with pedigree 0.0439, pedigree (2,2,5,5,2)
  (same comment as for Krypton-85m)
- Argon-41 [air, non-urban air or from high stacks]: 0.00107 kBq; lognormal variance with pedigree 0.0439, pedigree (2,2,5,5,2)
  (same comment as for Krypton-85m)
- Lanthanum-140 [air, non-urban air or from high stacks]: 1.59e-7 kBq; lognormal variance with pedigree 0.0439, pedigree (2,2,5,5,2)
  (same comment as for Krypton-85m)
- Sodium-24 [water, surface water]: 1.25e-6 kBq; lognormal variance with pedigree 0.0439, pedigree (2,2,5,5,2)
  (same comment as for Strontium-89)
- Krypton-89 [air, non-urban air or from high stacks]: 0.00335 kBq; lognormal variance with pedigree 0.0439, pedigree (2,2,5,5,2)
  (same comment as for Krypton-85m)
- Xenon-133 [air, non-urban air or from high stacks]: 0.407 kBq; lognormal variance with pedigree 0.0439, pedigree (2,2,5,5,2)
  (same comment as for Krypton-85m)
- Antimony-124 [water, surface water]: 1e-6 kBq; lognormal variance with pedigree 0.0439, pedigree (2,2,5,5,2)
  (same comment as for Strontium-89)

## Sampling procedure
Literature, statistics, and information from operators.

## Extrapolations
This datasets is taken over from a dataset valid for Switzerland (CH). Data quality for this Swiss dataset is high. Geographical uncertainty has been adjusted accordingly.

The Swiss dataset is valid for 1995-2002 and is partly based on older sources. Temporal uncertainty has been adjusted accordingly.

## Review by Carl Vadenbo 2015-07-03
The update of the whole electricity sector for the ecoinvent v3.2 database consist of hundreds of datasets. All these datasets have passed through a streamlined review processes where the underlying modelling of production volumes, technology shares and efficiencies was reviewed in detail prior to the datasets being submitted to the database.
