# treatment of waste mineral oil, hazardous waste incineration

Dataset: EcoSpold 2, unit process
Geography: CH
Time period: 1997-01-01 to 2021-12-31
Technology level: current
Classification: ISIC rev.4 ecoinvent: 3822:Treatment and disposal of hazardous waste
Tags: Treatment; ConvertedDataset
Scenario: Business-as-Usual
System model: Allocation, cut-off by classification
Share of production covered: 39 %
Generated by: Gabor Doka (obsolete)
Published in: Doka G. 2008
Database: ecoinvent
isCopyrightProtected: true
accessRestrictedTo: 1

## General comment
Inventoried waste contains 100% waste oil; . waste composition (wet, in ppm): upper heating value 41.8 MJ/kg; lower heating value 34.7 MJ/kg; H2O 100000; O n.a.; H 120000; C 778270; S n.a.; N n.a.; P 750; B n.a.; Cl n.a.; Br n.a.; F n.a.; I n.a.; Ag n.a.; As 1.2; Ba n.a.; Cd 0.8; Co n.a.; Cr 11.2; Cu 100; Hg 0.0012; Mn n.a.; Mo n.a.; Ni 3.2; Pb 184; Sb n.a.; Se n.a.; Sn n.a.; V n.a.; Zn 680; Be n.a.; Sc n.a.; Sr n.a.; Ti n.a.; Tl 0.6; W n.a.; Si n.a.; Fe n.a.; Ca n.a.; Al n.a.; K n.a.; Mg n.a.; Na n.a.; Share of carbon in waste that is biogenic 0%. Net energy produced in HWI: 25.82MJ/kg thermal energy and 2.44MJ/kg electric energy. Allocation of energy production: no substitution or expansion. 100% of burden allocated to waste disposal function of HWI. One kg of this waste produces 0.01143 kg of residues, which are landfilled. Additional solidification with 0.004571 kg of cement.
[This dataset is meant to replace the following datasets:]

## Included activities end
waste-specific air and water emissions from incineration, auxiliary material consumption for flue gas cleaning. Short-term emissions to river water and long-term emissions to ground water from residual material landfill (from solidified fly ashes and scrubber slugde). Process energy demands for HWI.

## Geography
Specific to the technology encountered in Switzerland in 2000. Well applicable to modern incineration practices in Europe or North America or Japan.

## Technology
Swiss HWI plant in 2000 with wet flue gas scrubber and low-dust SCR DeNOx facility. Gross thermal efficiency 74.4% and gross electric efficiency 10%.

## Time period
Transfer coefficients for modern Swiss MSWI. Emission speciation based on early 90ies data.

## Reference product
- waste mineral oil: -1 kg; name RP; CPC 39990: Other wastes n.e.c.; By-product classification Waste
  production volume 1.13e8 kg; name PV_RP
    Extrapolated from the global annual production volume, according to GDP in 2010. Relative GDP of Switzerland in 2010 was 0.008734, compared to the global value of 1.
  property heating value, net 34.7 MJ
    Value taken from the general comment of the treatment dataset.
  property price 0 EUR2005; name RP_price_EUR2005
    Waste products are assigned a price of zero as they are assumed to require further treatment.
  property carbon content, fossil 0.864444
    Tab A.6, ecoinvent v2.2 report 13_I. C content has been calculated after data in the tables, and then referred to 1 kg DM
  property carbon content 0.864444
    carbon content on a dry matter basis (reserved; not for manual entry)
  properties: carbon content, non-fossil 0, dry mass 0.9 kg, water content 0.111111, wet mass 1 kg, water in wet mass 0.1 kg, carbon allocation 0.778 kg

## Inputs from technosphere
- waste cement, hydrated: -0.011426 kg; name BP; lognormal variance with pedigree 0.07, pedigree (1,1,5,1,1)
  Hydrated cement for solidification of landfilled residual material. Uncertainty calculated from unertainty of the waste composition of this waste and transfer coefficients in the incinerator and of the solidification recipe.
  production volume 1.29114e6 kg; name WC_BP_PV; = PV_RP*BP/ABS(RP)
    Calculated from the production volume of waste mineral oil, 10% water in proportion to the respective output amounts.
  property price 0 EUR2005; name BP_price_EUR2005
  properties: dry mass 1 kg, wet mass 1 kg
- calcium chloride: 0.0026007 kg; lognormal variance with pedigree 0.77, pedigree (1,1,5,1,1)
  uncertainty calculated from uncertainty in average auxiliary material input, and the unertainty of the waste composition of this waste
  properties: dry mass 1 kg, wet mass 1 kg
- chemical, inorganic: 3.2692e-5 kg; lognormal variance with pedigree 0.12, pedigree (1,1,5,1,1)
  Proxy for Polyelectrolyte. uncertainty calculated from uncertainty in average auxiliary material input, and the unertainty of the waste composition of this waste
  properties: wet mass 1 kg, dry mass 1 kg, carbon content, fossil 0.003
  note on carbon content, fossil: This dataset is an unweighted average of 20 inorganic substances (listed in Tab 88.1, ecoinvent v2.2 report 8, part II), being part of the top100 chemicals included in this database. The C-content has also been calculated as an unweighted average of the C content of the substances composing this dataset.
- chemical, organic: 5.0729e-6 kg; lognormal variance with pedigree 1.69, pedigree (1,1,5,1,1)
  Proxy for TMT15. uncertainty calculated from uncertainty in average auxiliary material input, and the unertainty of the waste composition of this waste
  properties: dry mass 1 kg, heating value, net 19.03 MJ, carbon content, fossil 0.628, wet mass 1 kg
  note on carbon content, fossil: This dataset is an unweighted average of 20 organic substances (listed in Tab 88.1, ecoinvent v2.2 report 8, part II), being part of the top100 chemicals included in this database. The C-content has also been calculated as an unweighted average of the C content of the substances composing this dataset.
- quicklime, milled, packed: 0.00014112 kg; lognormal variance with pedigree 0.77, pedigree (1,1,5,1,1)
  (same comment as for calcium chloride)
  properties: wet mass 1 kg, water content 0.010101, dry mass 0.99 kg
- hydrochloric acid, without water, in 30% solution state: 1.9615e-5 kg; lognormal variance with pedigree 0.12, pedigree (1,1,5,1,1)
  (same comment as for calcium chloride)
  properties: dry mass 1 kg, wet mass 1 kg, heating value, net 3.32 MJ
- hazardous waste incineration facility: 1.25e-9 unit; lognormal variance with pedigree 0.04, pedigree (1,1,5,1,1)
  demands per kilogram waste. uncertainty is heeded in the module This exchange has an activity link directly to the producing activity because the product is primarily consumed in the same geographical area where it is produced.
- process-specific burdens, hazardous waste incineration plant: 1 kg; lognormal variance with pedigree 0.04, pedigree (1,1,5,1,1)
  demands per kilogram waste. uncertainty is heeded in the module;activityLink introduced to establish a direct link to the corresponding regional supply of this product
- cement, unspecified: 0.0045705 kg; lognormal variance with pedigree 0.07, pedigree (1,1,5,1,1)
  Cement for solidification of landfilled residual material. Uncertainty calculated from unertainty of the waste composition of this waste, of transfer coefficients in the incinerator and of the solidification recipe.
  properties: dry mass 1 kg, wet mass 1 kg
- process-specific burdens, residual material landfill: 0.011426 kg; lognormal variance with pedigree 0.06, pedigree (1,1,5,1,1)
  uncertainty is calculated from uncertainties in waste composition and transfer coefficients in incinerator;activityLink introduced to establish a direct link to the corresponding regional supply of this product
- sodium hydroxide, without water, in 50% solution state: 0.0018215 kg; lognormal variance with pedigree 0.77, pedigree (1,1,5,1,1)
  (same comment as for calcium chloride)
  properties: wet mass 1 kg, heating value, net 3.03 MJ, dry mass 1 kg
- residual material landfill: 2.3805e-11 unit; lognormal variance with pedigree 0.06, pedigree (1,1,5,1,1)
  uncertainty is calculated from uncertainties in waste composition and transfer coefficients in incinerator
- iron (III) chloride, without water, in 40% solution state: 0.00056837 kg; lognormal variance with pedigree 0.51, pedigree (1,1,5,1,1)
  (same comment as for calcium chloride)
  properties: dry mass 1 kg, wet mass 1 kg

## Emissions to nature
- Nickel, ion [water, ground-, long-term]: 9.2079e-7 kg; lognormal variance with pedigree 1.72, pedigree (1,1,5,1,1)
  Long-term emissions from landfilling of incineration residues. uncertainty is calculated from uncertainties in waste composition and transfer coefficients in incinerator and landfills.
- Cadmium, ion [water, surface water]: 3.615e-10 kg; lognormal variance with pedigree 1.6, pedigree (1,1,5,1,1)
  uncertainty is calculated from uncertainties in waste composition and transfer coefficients in incinerator and landfills
- Thallium [water, ground-, long-term]: 2.1701e-7 kg; lognormal variance with pedigree 1.93, pedigree (1,1,5,1,1)
  (same comment as for Nickel, ion)
- Arsenic [air, urban air close to ground]: 1.224e-14 kg; lognormal variance with pedigree 1.7, pedigree (1,1,5,1,1)
  (same comment as for residual material landfill)
- Nickel, ion [water, surface water]: 6.5594e-7 kg; lognormal variance with pedigree 1.45, pedigree (1,1,5,1,1)
  (same comment as for Cadmium, ion)
- Lead [air, urban air close to ground]: 6.8299e-9 kg; lognormal variance with pedigree 0.96, pedigree (1,1,5,1,1)
  (same comment as for residual material landfill)
- Mercury [air, urban air close to ground]: 0 kg; pedigree (1,1,1,1,1)
  (same comment as for residual material landfill)
- Copper, ion [water, surface water]: 4.2961e-6 kg; lognormal variance with pedigree 1, pedigree (1,1,5,1,1)
  (same comment as for Cadmium, ion)
- Zinc [air, urban air close to ground]: 4.76e-7 kg; lognormal variance with pedigree 0.77, pedigree (1,1,5,1,1)
  (same comment as for residual material landfill)
- Phosphorus [air, urban air close to ground]: 5.25e-7 kg; lognormal variance with pedigree 0.76, pedigree (1,1,5,1,1)
  (same comment as for residual material landfill)
- Phosphate [water, ground-, long-term]: 0.00050554 kg; lognormal variance with pedigree 1.3, pedigree (1,1,5,1,1)
  (same comment as for Nickel, ion)
- Mercury [water, ground-, long-term]: 5.6049e-11 kg; lognormal variance with pedigree 4.29, pedigree (1,1,5,1,1)
  (same comment as for Nickel, ion)
- Phosphate [water, surface water]: 3.6009e-5 kg; lognormal variance with pedigree 0.71, pedigree (1,1,5,1,1)
  (same comment as for Cadmium, ion)
- Chromium VI [water, ground-, long-term]: 2.12e-6 kg; lognormal variance with pedigree 1.3, pedigree (1,1,5,1,1)
  (same comment as for Nickel, ion)
- COD, Chemical Oxygen Demand [water, surface water]: 3.9106e-5 kg; lognormal variance with pedigree 0.34, pedigree (1,1,5,1,1)
  (same comment as for Cadmium, ion)
- COD, Chemical Oxygen Demand [water, ground-, long-term]: 0.012644 kg; lognormal variance with pedigree 0.1, pedigree (1,1,5,1,1)
  (same comment as for Nickel, ion)
- Copper, ion [water, ground-, long-term]: 3.6816e-6 kg; lognormal variance with pedigree 3.65, pedigree (1,1,5,1,1)
  (same comment as for Nickel, ion)
- TOC, Total Organic Carbon [water, ground-, long-term]: 0.005532 kg; lognormal variance with pedigree 0.1, pedigree (1,1,5,1,1)
  (same comment as for Nickel, ion)
- Copper [air, urban air close to ground]: 7e-8 kg; lognormal variance with pedigree 1.02, pedigree (1,1,5,1,1)
  (same comment as for residual material landfill)
- Cadmium [air, urban air close to ground]: 4.4054e-11 kg; lognormal variance with pedigree 1.68, pedigree (1,1,5,1,1)
  (same comment as for residual material landfill)
- Carbon dioxide, fossil [air, urban air close to ground]: 2.8222 kg; lognormal variance with pedigree 0.04, pedigree (1,1,5,1,1)
  calculated from uncertainty in carbon in waste and transfer coefficients
- Chromium VI [water, surface water]: 7.0681e-7 kg; lognormal variance with pedigree 1.39, pedigree (1,1,5,1,1)
  (same comment as for Cadmium, ion)
- DOC, Dissolved Organic Carbon [water, surface water]: 1.7109e-5 kg; lognormal variance with pedigree 0.34, pedigree (1,1,5,1,1)
  (same comment as for Cadmium, ion)
- BOD5, Biological Oxygen Demand [water, surface water]: 3.9106e-5 kg; lognormal variance with pedigree 0.34, pedigree (1,1,5,1,1)
  (same comment as for Cadmium, ion)
- Thallium [air, urban air close to ground]: 6e-10 kg; lognormal variance with pedigree 1.7, pedigree (1,1,5,1,1)
  (same comment as for residual material landfill)
- Chromium [air, urban air close to ground]: 8.2814e-13 kg; lognormal variance with pedigree 1.39, pedigree (1,1,5,1,1)
  (same comment as for residual material landfill)
- TOC, Total Organic Carbon [water, surface water]: 1.7109e-5 kg; lognormal variance with pedigree 0.34, pedigree (1,1,5,1,1)
  (same comment as for Cadmium, ion)
- Zinc, ion [water, ground-, long-term]: 8.2166e-6 kg; lognormal variance with pedigree 5.59, pedigree (1,1,5,1,1)
  (same comment as for Nickel, ion)
- Carbon monoxide, fossil [air, urban air close to ground]: 1.2076e-5 kg; lognormal variance with pedigree 0.71, pedigree (1,4,5,1,3)
  1 plant for waste solvent incineration in Switzerland
- Lead [water, ground-, long-term]: 9.5437e-7 kg; lognormal variance with pedigree 7.84, pedigree (1,1,5,1,1)
  (same comment as for Nickel, ion)
- Thallium [water, surface water]: 3.6228e-10 kg; lognormal variance with pedigree 2.39, pedigree (1,1,5,1,1)
  (same comment as for Cadmium, ion)
- DOC, Dissolved Organic Carbon [water, ground-, long-term]: 0.005532 kg; lognormal variance with pedigree 0.1, pedigree (1,1,5,1,1)
  (same comment as for Nickel, ion)
- Mercury [water, surface water]: 1.2653e-11 kg; lognormal variance with pedigree 1.95, pedigree (1,1,5,1,1)
  (same comment as for Cadmium, ion)
- Cadmium, ion [water, ground-, long-term]: 5.4284e-9 kg; lognormal variance with pedigree 7.87, pedigree (1,1,5,1,1)
  (same comment as for Nickel, ion)
- BOD5, Biological Oxygen Demand [water, ground-, long-term]: 0.012644 kg; lognormal variance with pedigree 0.1, pedigree (1,1,5,1,1)
  (same comment as for Nickel, ion)
- Nickel [air, urban air close to ground]: 2.24e-9 kg; lognormal variance with pedigree 1.48, pedigree (1,1,5,1,1)
  (same comment as for residual material landfill)
- Arsenic, ion [water, surface water]: 1.2e-6 kg; lognormal variance with pedigree 1.59, pedigree (1,1,5,1,1)
  (same comment as for Cadmium, ion)
- Zinc, ion [water, surface water]: 9.1257e-6 kg; lognormal variance with pedigree 0.75, pedigree (1,1,5,1,1)
  (same comment as for Cadmium, ion)
- Lead [water, surface water]: 5.0082e-9 kg; lognormal variance with pedigree 1.17, pedigree (1,1,5,1,1)
  (same comment as for Cadmium, ion)
- Arsenic, ion [water, ground-, long-term]: 1.1999e-15 kg; lognormal variance with pedigree 1.61, pedigree (1,1,5,1,1)
  (same comment as for Nickel, ion)

## Sampling procedure
The 2 Swiss HWI plants, used as the inventory reference technology mix, have a total annual capacity of 53'000 tons of hazardous waste. This corresponds to 39% of the Swiss total installed capacity in 2000. Swiss average plants size is 20'000 t/a.

## Extrapolations
This dataset has been extrapolated from year 2000 to the year of the calculation (2021). The uncertainty has been adjusted accordingly.
