# treatment of waste polyethylene terephthalate, sanitary landfill

Dataset: EcoSpold 2, unit process
Geography: RoW
Time period: 1994-01-01 to 2021-12-31
Technology level: current
Classification: ISIC rev.4 ecoinvent: 3821:Treatment and disposal of non-hazardous waste
Classification: EcoSpold01Categories: waste management/sanitary landfill
Synonyms: PET; Pegoterate; Poly(oxyethyleneoxyterephthaloyl)
Tags: Treatment; ConvertedDataset
Scenario: Business-as-Usual
System model: Allocation, cut-off by classification
Generated by: Gabor Doka (obsolete)
Published in: Doka G. 2007
Database: ecoinvent
isCopyrightProtected: true
accessRestrictedTo: 1

## General comment
Inventoried waste contains 100% PET; .
waste composition (wet, in ppm): upper heating value 23.13 MJ/kg; lower heating value 22.95 MJ/kg; H2O 2000; O 368750; H 63380; C 553640; S 147.87; N 6456.8; P n.a.; B n.a.; Cl 788.62; Br 69.004; F 11.829; I n.a.; Ag n.a.; As 1.873; Ba 49.289; Cd 3.2531; Co 31.052; Cr 5.4218; Cu 11.829; Hg 0.08872; Mn 17.744; Mo n.a.; Ni 3.9431; Pb 5.5203; Sb 159.2; Se 2.0701; Sn 0.98577; V 1281.5; Zn 68.676; Be 0.49289; Sc n.a.; Sr 87.241; Ti 985.77; Tl 0.39431; W n.a.; Si n.a.; Fe 98.577; Ca 295.73; Al 197.15; K n.a.; Mg n.a.; Na 1444.7;
Share of carbon in waste that is biogenic 0%.
Overall degradability of waste during 100 years: 1%.
[This dataset was already contained in the ecoinvent database version 2. It was not individually updated during the transfer to ecoinvent version 3. Life Cycle Impact Assessment results may still have changed, as they are affected by changes in the supply chain, i.e. in other datasets. This dataset was generated following the ecoinvent quality guidelines for version 2. It may have been subject to central changes described in the ecoinvent version 3 change report (http://www.ecoinvent.org/database/ecoinvent-version-3/reports-of-changes/), and the results of the central updates were reviewed extensively. The changes added e.g. consistent water flows and other information throughout the database. The documentation of this dataset can be found in the ecoinvent reports of version 2, which are still available via the ecoinvent website. The change report linked above covers all central changes that were made during the conversion process.]

## Included activities end
Waste-specific short-term emissions to air via landfill gas incineration and landfill leachate. Burdens from treatment of short-term leachate (0-100a) in wastewater treatment plant (including WWTP sludge disposal in municipal incinerator). Long-term emissions from landfill to groundwater (after base lining failure).

## Geography
Technology encountered in Switzerland in 2000. Landfill includes base seal, leachate collection system, treatment of leachate in municipal wastewater treatment plant.

## Technology
Swiss municipal sanitary landfill for biogenic or untreated municipal waste ('reactive organic landfill'). Landfill gas and leachate collection system. Recultivation and monitoring for 150 years after closure.

## Reference product
- waste polyethylene terephthalate: -1 kg; name waste_PET_RP; CPC 39270: Waste, parings and scrap of plastics; By-product classification Waste; CAS 25038-59-9
  EcoSpold01Location=CH
  production volume 2.72592e10 kg; name waste_PET_RP_PV; = 3028800000*(0.9/0.1)
    Estimated. Based on literature (UNSTATS, http://unstats.un.org/unsd/environment/wastetreatment.htm, accessed 20140620) it is estimated, that 90% of waste polystyrene is landfilled.
  property carbon content, fossil 0.554108
    C content in 1 kg DM was calculated using data in Tab A.1, ecoinvent v2.2 report 13_I
  property heating value, net 22.95 MJ
    Value taken from the general comment of the treatment dataset.
  property price 0 EUR2005; name waste_PET_RP_price_EUR2005
    Waste products are assigned a price of zero as they are assumed to require further treatment.
  property carbon content 0.554108
    carbon content on a dry matter basis (reserved; not for manual entry)
  properties: water in wet mass 0.002 kg, water content 0.00200401, carbon content, non-fossil 0, dry mass 0.998 kg, wet mass 1 kg, carbon allocation 0.553 kg

## Inputs from technosphere
- cement, unspecified: 0 kg; pedigree (1,1,1,1,1)
  EcoSpold01Location=CH
  burden from incineration of sludge from wastewater treatment of the short-term leachate (0-100a). uncertainty is calculated from uncertainties in waste composition and transfer coefficients in incinerator and uncertainty of waste decomposition and short-term leaching in sanitary landfill
  properties: wet mass 1 kg, dry mass 1 kg
- chemical, organic: 8.88e-9 kg; lognormal variance with pedigree 2.032, pedigree (1,1,5,5,1)
  burden from incineration of sludge from wastewater treatment of the short-term leachate (0-100a). uncertainty is calculated from uncertainties in waste composition and transfer coefficients in incinerator and uncertainty of waste decomposition and short-term leaching in sanitary landfill
  EcoSpold01Location=GLO
  properties: heating value, net 19.03 MJ, wet mass 1 kg, dry mass 1 kg, carbon content, fossil 0.628
  note on carbon content, fossil: This dataset is an unweighted average of 20 organic substances (listed in Tab 88.1, ecoinvent v2.2 report 8, part II), being part of the top100 chemicals included in this database. The C-content has also been calculated as an unweighted average of the C content of the substances composing this dataset.
- wastewater treatment facility, capacity 5E9l/year: 1.42e-11 unit; lognormal variance with pedigree 0.2106, pedigree (5,5,5,5,5)
  burden from wastewater treatment of the short-term leachate (0-100a). Uncertainty calculated from unertainty of the waste composition of this waste, uncertainty in waste decomposition and short-term leaching in sanitary landfill
  EcoSpold01Location=CH
  Uncertainty: . Uncertainty calculated from unertainty of the waste composition of this waste, uncertainty in waste decomposition and short-term leaching in sanitary landfill
- heat, district or industrial, other than natural gas: 0 MJ; pedigree (1,1,1,1,1)
  (same comment as for cement, unspecified)
  properties: heating value, net 1 MJ
- hydrochloric acid, without water, in 30% solution state: 6.05e-11 kg; lognormal variance with pedigree 0.662, pedigree (1,1,5,5,1)
  burden from incineration of sludge from wastewater treatment of the short-term leachate (0-100a). uncertainty is calculated from uncertainties in waste composition and transfer coefficients in incinerator and uncertainty of waste decomposition and short-term leaching in sanitary landfill
  EcoSpold01Location=RER
  properties: heating value, net 3.32 MJ, wet mass 1 kg, dry mass 1 kg
- electricity, low voltage: 0 kWh; pedigree (1,1,1,1,1)
  (same comment as for wastewater treatment facility, capacity 5E9l/year)
- residual material landfill: 1.04e-15 unit; lognormal variance with pedigree 0.452, pedigree (1,1,5,5,1)
  (same comment as for cement, unspecified)
- waste cement, hydrated: 0 kg; name waste_cement_ByP
  burden from incineration of sludge from wastewater treatment of the short-term leachate (0-100a). uncertainty is calculated from uncertainties in waste composition and transfer coefficients in incinerator and uncertainty of waste decomposition and short-term leaching in sanitary landfill
  EcoSpold01Location=CH
  production volume 0 kg
    Calculated from the production volume of waste polyethylene terephtalate, 0.2% water in proportion to the respective output amounts.
  property price 0 EUR2005; name waste_cement_ByP_price_EUR2005
  properties: wet mass 1 kg, dry mass 1 kg
- iron (III) chloride, without water, in 40% solution state: 1.54e-8 kg; lognormal variance with pedigree 0.782, pedigree (1,1,5,5,1)
  (same comment as for waste cement, hydrated)
  properties: wet mass 1 kg, dry mass 1 kg
- waste plastic, mixture: 0 kg; name waste_plastic_ByP
  EcoSpold01Location=CH
  burden from wastewater treatment of the short-term leachate (0-100a). Uncertainty calculated from unertainty of the waste composition of this waste, uncertainty in waste decomposition and short-term leaching in sanitary landfill
  production volume 0 kg
    (same comment as for waste cement, hydrated)
  property price 0 EUR2005; name waste_plastic_ByP_price_EUR2005
  properties: dry mass 0.847 kg, heating value, net 30.79 MJ, water content 0.180638, carbon content, fossil 0.747344, wet mass 1 kg
  note on heating value, net: Value taken from the general comment of the treatment dataset.
  note on carbon content, fossil: C content in 1 kg DM was calculated using data in Tab A.2, ecoinvent v2.2 report 13_I
- process-specific burdens, residual material landfill: 0 kg; pedigree (1,1,1,1,1)
  (same comment as for waste cement, hydrated)
- sodium hydroxide, without water, in 50% solution state: 1.13e-8 kg; lognormal variance with pedigree 0.512, pedigree (1,1,5,5,1)
  EcoSpold01Location=RER
  burden from incineration of sludge from wastewater treatment of the short-term leachate (0-100a). uncertainty is calculated from uncertainties in waste composition and transfer coefficients in incinerator and uncertainty of waste decomposition and short-term leaching in sanitary landfill
  properties: dry mass 1 kg, wet mass 1 kg, heating value, net 3.03 MJ
- electricity, high voltage: 0 kWh; pedigree (1,1,1,1,1)
  (same comment as for waste cement, hydrated)
- slag landfill: 4.97e-15 unit; lognormal variance with pedigree 0.512, pedigree (1,1,5,5,1)
  (same comment as for cement, unspecified)
- sewer grid, 5E9l/year, 110 km: 5.45e-10 km; lognormal variance with pedigree 0.2106, pedigree (5,5,5,5,5)
  (same comment as for wastewater treatment facility, capacity 5E9l/year)
- heat, central or small-scale, other than natural gas: 0 MJ; pedigree (1,1,1,1,1)
  EcoSpold01Location=CH
  burden from wastewater treatment of the short-term leachate (0-100a). Uncertainty calculated from unertainty of the waste composition of this waste, uncertainty in waste decomposition and short-term leaching in sanitary landfill
  Uncertainty: . Uncertainty calculated from unertainty of the waste composition of this waste, uncertainty in waste decomposition and short-term leaching in sanitary landfill
  properties: heating value, net 1 MJ
- chromium oxide, flakes: 1.33e-10 kg; lognormal variance with pedigree 0.95, pedigree (5,5,5,5,5)
  EcoSpold01Location=RER
  burden from incineration of sludge from wastewater treatment of the short-term leachate (0-100a). Proxy for vanadium pentoxide V2O5 in SCR catalyst, uncertainty calculated from uncertainty in average DeNOx input, uncertainty in the share of thermal NOx, uncertainty of nitrogen content in average municipal waste and the unertainty in nitrogen content in *this* waste and uncertainty of waste decomposition and short-term leaching in sanitary landfill
  Uncertainty: . Proxy for vanadium pentoxide V2O5 in SCR catalyst, uncertainty calculated from uncertainty in average DeNOx input, uncertainty in the share of thermal NOx, uncertainty of nitrogen content in average municipal waste and the unertainty in nitrogen content in *this* waste and uncertainty of waste decomposition and short-term leaching in sanitary landfill
  properties: dry mass 1 kg, wet mass 1 kg
- municipal waste incineration facility: 2.66e-14 unit; lognormal variance with pedigree 0.672, pedigree (1,1,5,5,1)
  Burden from incineration of sludge from wastewater treatment of the short-term leachate (0-100a).
  EcoSpold01Location=CH
- waste graphical paper: 0 kg; name waste_paper_ByP
  burden from wastewater treatment of the short-term leachate (0-100a). Uncertainty calculated from unertainty of the waste composition of this waste, uncertainty in waste decomposition and short-term leaching in sanitary landfill
  EcoSpold01Location=CH
  production volume 0 kg
    (same comment as for waste cement, hydrated)
  property price 0 EUR2005; name waste_paper_ByP_price_EUR2005
  properties: water content 0.126126, wet mass 1 kg, carbon content, non-fossil 0.454955, dry mass 0.888 kg, heating value, net 14.12 MJ
- quicklime, milled, packed: 2.04e-9 kg; lognormal variance with pedigree 0.512, pedigree (1,1,5,5,1)
  (same comment as for waste cement, hydrated)
  properties: wet mass 1 kg, water content 0.010101, dry mass 0.99 kg
- titanium dioxide: 6.49e-9 kg; lognormal variance with pedigree 0.832, pedigree (1,1,5,5,1)
  (same comment as for hydrochloric acid, without water, in 30% solution state)
  properties: wet mass 1 kg, dry mass 1 kg
- heat, district or industrial, natural gas: 0 MJ; pedigree (1,1,1,1,1)
  (same comment as for hydrochloric acid, without water, in 30% solution state)
  properties: heating value, net 1 MJ
- ammonia, anhydrous, liquid: 0 kg; pedigree (1,1,1,1,1)
  (same comment as for cement, unspecified)
  properties: wet mass 1 kg, dry mass 1 kg
- process-specific burdens, municipal waste incineration: 0 kg; pedigree (1,1,1,1,1)
  (same comment as for municipal waste incineration facility)
- sanitary landfill facility: 5.56e-10 unit; lognormal variance with pedigree 0.042, pedigree (1,1,5,5,1)
  EcoSpold01Location=CH
  demands per kilogram waste. uncertainty is heeded in the module
- process-specific burdens, sanitary landfill: 1 kg; lognormal variance with pedigree 0.042, pedigree (1,1,5,5,1)
  demands per kilogram waste. uncertainty is heeded in the module
  EcoSpold01Location=CH
- process-specific burdens, slag landfill: 0 kg; pedigree (1,1,1,1,1)
  (same comment as for cement, unspecified)
- chemical, inorganic: 1.01e-10 kg; lognormal variance with pedigree 0.662, pedigree (1,1,5,5,1)
  EcoSpold01Location=GLO
  burden from incineration of sludge from wastewater treatment of the short-term leachate (0-100a). uncertainty is calculated from uncertainties in waste composition and transfer coefficients in incinerator and uncertainty of waste decomposition and short-term leaching in sanitary landfill
  properties: dry mass 1 kg, wet mass 1 kg, carbon content, fossil 0.003
  note on carbon content, fossil: This dataset is an unweighted average of 20 inorganic substances (listed in Tab 88.1, ecoinvent v2.2 report 8, part II), being part of the top100 chemicals included in this database. The C-content has also been calculated as an unweighted average of the C content of the substances composing this dataset.
- cement, unspecified: 2.87348e-8, 5.97885e-9, 4.3791e-10, 1.24819e-9, 2.82281e-8, 8.30836e-10, 9.12504e-9, 1.10403e-9, 1.23312e-7 kg (9 entries); lognormal variance with pedigree 0.452, pedigree (1,1,5,5,1)
  (same comment as for cement, unspecified)
- heat, district or industrial, other than natural gas: 3.62378e-8, 8.93638e-5 MJ (2 entries); lognormal variance with pedigree 0.672, pedigree (1,1,5,5,1)
  (same comment as for cement, unspecified)
- electricity, low voltage: 9.63585e-6, 1.7545e-6, 3.96058e-5, 0.000138374, 2.82497e-5, 0.000433723, 7.01688e-5, 0.000201489 kWh (8 entries); lognormal variance with pedigree 0.49, pedigree (5,5,5,5,5)
  (same comment as for wastewater treatment facility, capacity 5E9l/year)
- waste cement, hydrated: -1.40589e-7, -3.56411e-7 kg (2 entries)
  (same comment as for waste cement, hydrated)
  production volume 13547.8 kg
- waste plastic, mixture: -4.31618e-6, -2.88391e-7, -2.18105e-8, -1.19116e-7, -4.81214e-8, -1.13112e-7, -3.67759e-6, -3.02157e-5 kg (8 entries)
  (same comment as for waste plastic, mixture)
  production volume 1.05766e6 kg
- process-specific burdens, residual material landfill: 1.40589e-7, 3.56411e-7 kg (2 entries); lognormal variance with pedigree 0.452, pedigree (1,1,5,5,1)
  (same comment as for waste cement, hydrated)
- electricity, high voltage: 1.811e-7, 3.47186e-8, 7.99695e-7, 5.88653e-7, 8.47638e-6, 1.34428e-6, 3.87517e-6 kWh (7 entries); lognormal variance with pedigree 1.052, pedigree (1,1,5,5,1)
  (same comment as for waste cement, hydrated)
- heat, central or small-scale, other than natural gas: 5.80736e-7, 4.22833e-5 MJ (2 entries); lognormal variance with pedigree 0.23, pedigree (5,5,5,5,5)
  (same comment as for heat, central or small-scale, other than natural gas)
- waste graphical paper: -1.69726e-6, -2.59179e-7, -2.26629e-8, -9.36524e-7, -9.13189e-8, -1.69041e-7, -4.09465e-6, -3.15294e-5 kg (8 entries)
  (same comment as for waste graphical paper)
  production volume 1.05766e6 kg
- heat, district or industrial, natural gas: 8.78503e-7, 2.10506e-5, 5.70009e-5 MJ (3 entries); lognormal variance with pedigree 0.592, pedigree (1,1,5,5,1)
  (same comment as for hydrochloric acid, without water, in 30% solution state)
- ammonia, anhydrous, liquid: 4.75822e-8, 4.09026e-9, 6.36339e-9, 1.26081e-8, 1.23526e-8, 1.29469e-9, 5.78774e-9, 1.36921e-7 kg (8 entries); lognormal variance with pedigree 0.592, pedigree (1,1,5,5,1)
  (same comment as for cement, unspecified)
- process-specific burdens, municipal waste incineration: 3.02676e-5, 7.67324e-5 kg (2 entries); lognormal variance with pedigree 0.672, pedigree (1,1,5,5,1)
  (same comment as for municipal waste incineration facility)
- process-specific burdens, slag landfill: 7.92048e-7, 2.00795e-6 kg (2 entries); lognormal variance with pedigree 0.512, pedigree (1,1,5,5,1)
  (same comment as for cement, unspecified)

## Emissions to nature
- Iron, ion [water, surface water]: 6.87e-9 kg; lognormal variance with pedigree 1.922, pedigree (1,1,5,5,1)
  Emissions from short-term leachate treatment and incineration of resulting sludge. Uncertainty calculated depending on waste input and uncertainty of transfer coefficents in landfill, wastewater treatment and incineration model.
- Carbon dioxide, fossil [air, non-urban air or from high stacks]: 0.0139 kg; lognormal variance with pedigree 0.422, pedigree (1,1,5,5,1)
  burden from direct release or incineration of landfill biogas. Uncertainty calculated from unertainty of the waste composition of this waste, uncertainty in waste decomposition and short-term leaching in sanitary landfill
- Cadmium, ion [water, ground-, long-term]: 3.25e-6 kg; lognormal variance with pedigree 1.462, pedigree (1,1,5,5,1)
  Emissions from long-term leachate (>100a) directly from MSW landfill and indirectly via incineration of treatement sludge from leachate treatement. Uncertainty calculated depending on waste input and uncertainty of long-term transfer coefficents in landfill.
- Chromium [air, urban air close to ground]: 0 kg; pedigree (1,1,1,1,1)
  (same comment as for Iron, ion)
- Tin [air, non-urban air or from high stacks]: 1.45e-14 kg; lognormal variance with pedigree 3.702, pedigree (1,1,5,5,1)
  (same comment as for Carbon dioxide, fossil)
- Carbon monoxide, fossil [air, non-urban air or from high stacks]: 7.86e-7 kg; lognormal variance with pedigree 1.072, pedigree (1,1,5,5,1)
  (same comment as for Carbon dioxide, fossil)
- Antimony [air, urban air close to ground]: 8.27e-12 kg; lognormal variance with pedigree 2.232, pedigree (1,1,5,5,1)
  (same comment as for Iron, ion)
- Mercury [air, urban air close to ground]: 0 kg; pedigree (1,1,1,1,1)
  (same comment as for Iron, ion)
- Ammonium, ion [water, ground-, long-term]: 0.00257 kg; lognormal variance with pedigree 0.462, pedigree (1,1,5,5,1)
  (same comment as for Cadmium, ion)
- Hydrogen fluoride [air, non-urban air or from high stacks]: 4.72e-8 kg; lognormal variance with pedigree 1.772, pedigree (1,1,5,5,1)
  (same comment as for Carbon dioxide, fossil)
- Chromium, ion [water, surface water]: 9.7e-13 kg; lognormal variance with pedigree 2.362, pedigree (1,1,5,5,1)
  (same comment as for Iron, ion)
- Aluminium [water, surface water]: 5.92e-9 kg; lognormal variance with pedigree 1.662, pedigree (1,1,5,5,1)
  (same comment as for Iron, ion)
- Beryllium [air, urban air close to ground]: 1.41e-13 kg; lognormal variance with pedigree 2.462, pedigree (1,1,5,5,1)
  (same comment as for Iron, ion)
- Copper [air, non-urban air or from high stacks]: 1.66e-13 kg; lognormal variance with pedigree 3.382, pedigree (1,1,5,5,1)
  (same comment as for Carbon dioxide, fossil)
- Ammonium, ion [water, surface water]: 7.81e-5 kg; lognormal variance with pedigree 0.522, pedigree (1,1,5,5,1)
  (same comment as for Iron, ion)
- Calcium [air, non-urban air or from high stacks]: 9.63e-11 kg; lognormal variance with pedigree 2.572, pedigree (1,1,5,5,1)
  (same comment as for Carbon dioxide, fossil)
- Lead [water, ground-, long-term]: 5.52e-6 kg; lognormal variance with pedigree 1.392, pedigree (1,1,5,5,1)
  (same comment as for Cadmium, ion)
- Sodium, ion [water, ground-, long-term]: 0.00138 kg; lognormal variance with pedigree 0.652, pedigree (1,1,5,5,1)
  (same comment as for Cadmium, ion)
- Nitrogen [water, surface water]: 2.12e-6 kg; lognormal variance with pedigree 0.472, pedigree (1,1,5,5,1)
  (same comment as for Iron, ion)
- Copper, ion [water, ground-, long-term]: 1.18e-5 kg; lognormal variance with pedigree 1.292, pedigree (1,1,5,5,1)
  (same comment as for Cadmium, ion)
- Titanium, ion [water, surface water]: 2.5e-7 kg; lognormal variance with pedigree 1.442, pedigree (1,1,5,5,1)
  (same comment as for Iron, ion)
- Vanadium [air, non-urban air or from high stacks]: 3.38e-10 kg; lognormal variance with pedigree 2.392, pedigree (1,1,5,5,1)
  (same comment as for Carbon dioxide, fossil)
- Strontium [water, ground-, long-term]: 8.72e-5 kg; lognormal variance with pedigree 1.022, pedigree (1,1,5,5,1)
  (same comment as for Cadmium, ion)
- Thallium [air, urban air close to ground]: 1.13e-13 kg; lognormal variance with pedigree 2.492, pedigree (1,1,5,5,1)
  (same comment as for Iron, ion)
- Selenium [water, surface water]: 1.46e-9 kg; lognormal variance with pedigree 2.172, pedigree (1,1,5,5,1)
  (same comment as for Iron, ion)
- Sodium [air, non-urban air or from high stacks]: 1.49e-8 kg; lognormal variance with pedigree 1.912, pedigree (1,1,5,5,1)
  (same comment as for Carbon dioxide, fossil)
- Tin, ion [water, surface water]: 2.43e-11 kg; lognormal variance with pedigree 2.642, pedigree (1,1,5,5,1)
  (same comment as for Iron, ion)
- Mercury [water, ground-, long-term]: 8.86e-8 kg; lognormal variance with pedigree 1.962, pedigree (1,1,5,5,1)
  (same comment as for Cadmium, ion)
- Hydrogen chloride [air, non-urban air or from high stacks]: 2.86e-7 kg; lognormal variance with pedigree 1.522, pedigree (1,1,5,5,1)
  (same comment as for Carbon dioxide, fossil)
- BOD5, Biological Oxygen Demand [water, ground-, long-term]: 0.0364 kg; lognormal variance with pedigree 0.522, pedigree (1,1,5,5,1)
  (same comment as for Cadmium, ion)
- Zinc, ion [water, surface water]: 1.01e-8 kg; lognormal variance with pedigree 1.802, pedigree (1,1,5,5,1)
  (same comment as for Iron, ion)
- Bromine [air, non-urban air or from high stacks]: 2.44e-8 kg; lognormal variance with pedigree 1.842, pedigree (1,1,5,5,1)
  (same comment as for Carbon dioxide, fossil)
- Beryllium [water, surface water]: 1.46e-10 kg; lognormal variance with pedigree 2.432, pedigree (1,1,5,5,1)
  (same comment as for Iron, ion)
- Cadmium, ion [water, surface water]: 2.91e-9 kg; lognormal variance with pedigree 2.042, pedigree (1,1,5,5,1)
  (same comment as for Iron, ion)
- Aluminium [air, non-urban air or from high stacks]: 2.46e-11 kg; lognormal variance with pedigree 2.742, pedigree (1,1,5,5,1)
  (same comment as for Carbon dioxide, fossil)
- Fluoride [water, surface water]: 8.69e-9 kg; lognormal variance with pedigree 1.982, pedigree (1,1,5,5,1)
  Emissions from short-term leachate treatment. Uncertainty calculated depending on waste input and uncertainty of transfer coefficents in landfill and wastewater treatment.
- Strontium [air, urban air close to ground]: 2.5e-12 kg; lognormal variance with pedigree 1.802, pedigree (1,1,5,5,1)
  (same comment as for Iron, ion)
- Tin [air, urban air close to ground]: 4.48e-14 kg; lognormal variance with pedigree 2.672, pedigree (1,1,5,5,1)
  (same comment as for Iron, ion)
- Antimony [water, surface water]: 1.14e-7 kg; lognormal variance with pedigree 1.592, pedigree (1,1,5,5,1)
  (same comment as for Iron, ion)
- Cadmium [air, urban air close to ground]: 1.57e-13 kg; lognormal variance with pedigree 2.102, pedigree (1,1,5,5,1)
  (same comment as for Iron, ion)
- Strontium [water, surface water]: 2.58e-8 kg; lognormal variance with pedigree 1.742, pedigree (1,1,5,5,1)
  (same comment as for Iron, ion)
- Bromine [water, surface water]: 1.74e-6 kg; lognormal variance with pedigree 1.312, pedigree (1,1,5,5,1)
  (same comment as for Fluoride)
- Antimony [air, non-urban air or from high stacks]: 4.2e-11 kg; lognormal variance with pedigree 2.672, pedigree (1,1,5,5,1)
  (same comment as for Carbon dioxide, fossil)
- Nitrogen, organic bound [water, ground-, long-term]: 0.0042 kg; lognormal variance with pedigree 0.462, pedigree (1,1,5,5,1)
  (same comment as for Cadmium, ion)
- Beryllium [air, non-urban air or from high stacks]: 7.16e-14 kg; lognormal variance with pedigree 3.512, pedigree (1,1,5,5,1)
  (same comment as for Carbon dioxide, fossil)
- Zinc [air, non-urban air or from high stacks]: 7.23e-12 kg; lognormal variance with pedigree 2.902, pedigree (1,1,5,5,1)
  (same comment as for Carbon dioxide, fossil)
- Lead [air, urban air close to ground]: 1.08e-14 kg; lognormal variance with pedigree 2.472, pedigree (1,1,5,5,1)
  (same comment as for Iron, ion)
- Sulfate [water, surface water]: 1.68e-6 kg; lognormal variance with pedigree 1.432, pedigree (1,1,5,5,1)
  (same comment as for Fluoride)
- Selenium [air, urban air close to ground]: 0 kg; pedigree (1,1,1,1,1)
  (same comment as for Iron, ion)
- Chromium [air, non-urban air or from high stacks]: 1.55e-13 kg; lognormal variance with pedigree 3.402, pedigree (1,1,5,5,1)
  (same comment as for Carbon dioxide, fossil)
- Calcium, ion [water, surface water]: 3.47e-7 kg; lognormal variance with pedigree 1.482, pedigree (1,1,5,5,1)
  (same comment as for Iron, ion)
- Methane, fossil [air, urban air close to ground]: 9.06e-7 kg; lognormal variance with pedigree 0.922, pedigree (1,1,5,5,1)
  (same comment as for Iron, ion)
- Chromium VI [water, surface water]: 3.24e-10 kg; lognormal variance with pedigree 2.332, pedigree (1,1,5,5,1)
  (same comment as for Iron, ion)
- Ammonia [air, urban air close to ground]: 1.44e-7 kg; lognormal variance with pedigree 0.502, pedigree (1,1,5,5,1)
  (same comment as for Iron, ion)
- Copper [air, urban air close to ground]: 3.17e-15 kg; lognormal variance with pedigree 2.412, pedigree (1,1,5,5,1)
  (same comment as for Iron, ion)
- Arsenic, ion [water, ground-, long-term]: 1.87e-6 kg; lognormal variance with pedigree 1.532, pedigree (1,1,5,5,1)
  (same comment as for Cadmium, ion)
- Cobalt [water, surface water]: 5.07e-8 kg; lognormal variance with pedigree 1.662, pedigree (1,1,5,5,1)
  (same comment as for Iron, ion)
- Titanium [air, urban air close to ground]: 2.43e-10 kg; lognormal variance with pedigree 1.482, pedigree (1,1,5,5,1)
  (same comment as for Iron, ion)
- Methane, fossil [air, non-urban air or from high stacks]: 0.00213 kg; lognormal variance with pedigree 0.462, pedigree (1,1,5,5,1)
  (same comment as for Carbon dioxide, fossil)
- Vanadium [air, urban air close to ground]: 6.66e-11 kg; lognormal variance with pedigree 1.362, pedigree (1,1,5,5,1)
  (same comment as for Iron, ion)
- Chloride [water, surface water]: 1.99e-5 kg; lognormal variance with pedigree 0.992, pedigree (1,1,5,5,1)
  (same comment as for Fluoride)
- Nitrogen oxides [air, non-urban air or from high stacks]: 4.16e-8 kg; lognormal variance with pedigree 1.102, pedigree (1,1,5,5,1)
  (same comment as for Carbon dioxide, fossil)
- COD, Chemical Oxygen Demand [water, surface water]: 0.000102 kg; lognormal variance with pedigree 0.872, pedigree (1,1,5,5,1)
  (same comment as for Iron, ion)
- Barium [water, ground-, long-term]: 4.92e-5 kg; lognormal variance with pedigree 1.082, pedigree (1,1,5,5,1)
  (same comment as for Cadmium, ion)
- Sulfur dioxide [air, non-urban air or from high stacks]: 1.93e-7 kg; lognormal variance with pedigree 1.652, pedigree (1,1,5,5,1)
  (same comment as for Carbon dioxide, fossil)
- NMVOC, non-methane volatile organic compounds, unspecified origin [air, urban air close to ground]: 4.12e-9 kg; lognormal variance with pedigree 1.032, pedigree (1,1,5,5,1)
  (same comment as for Iron, ion)
- Manganese [air, urban air close to ground]: 0 kg; pedigree (1,1,1,1,1)
  (same comment as for Iron, ion)
- Sodium, ion [water, surface water]: 5.98e-5 kg; lognormal variance with pedigree 0.852, pedigree (1,1,5,5,1)
  (same comment as for Fluoride)
- Zinc [air, urban air close to ground]: 3.67e-13 kg; lognormal variance with pedigree 1.862, pedigree (1,1,5,5,1)
  (same comment as for Iron, ion)
- Copper, ion [water, surface water]: 1.5e-10 kg; lognormal variance with pedigree 2.342, pedigree (1,1,5,5,1)
  (same comment as for Iron, ion)
- Barium [air, urban air close to ground]: 5.31e-10 kg; lognormal variance with pedigree 1.492, pedigree (1,1,5,5,1)
  (same comment as for Iron, ion)
- Vanadium, ion [water, surface water]: 6.86e-7 kg; lognormal variance with pedigree 1.312, pedigree (1,1,5,5,1)
  (same comment as for Iron, ion)
- Iron, ion [water, ground-, long-term]: 6.91e-6 kg; lognormal variance with pedigree 2.772, pedigree (1,1,5,5,1)
  (same comment as for Cadmium, ion)
- Lead [air, non-urban air or from high stacks]: 1.08e-13 kg; lognormal variance with pedigree 3.442, pedigree (1,1,5,5,1)
  (same comment as for Carbon dioxide, fossil)
- TOC, Total Organic Carbon [water, ground-, long-term]: 0.141 kg; lognormal variance with pedigree 0.522, pedigree (1,1,5,5,1)
  (same comment as for Cadmium, ion)
- Barium [air, non-urban air or from high stacks]: 1.41e-10 kg; lognormal variance with pedigree 2.522, pedigree (1,1,5,5,1)
  (same comment as for Carbon dioxide, fossil)
- Fluoride [water, ground-, long-term]: 1.18e-5 kg; lognormal variance with pedigree 1.292, pedigree (1,1,5,5,1)
  (same comment as for Cadmium, ion)
- Antimony [water, ground-, long-term]: 1.6e-5 kg; lognormal variance with pedigree 2.262, pedigree (1,1,5,5,1)
  (same comment as for Cadmium, ion)
- COD, Chemical Oxygen Demand [water, ground-, long-term]: 0.154 kg; lognormal variance with pedigree 0.522, pedigree (1,1,5,5,1)
  (same comment as for Cadmium, ion)
- Sulfate [water, ground-, long-term]: 0.000411 kg; lognormal variance with pedigree 0.952, pedigree (1,1,5,5,1)
  (same comment as for Cadmium, ion)
- Bromine [water, ground-, long-term]: 6.72e-5 kg; lognormal variance with pedigree 1.052, pedigree (1,1,5,5,1)
  (same comment as for Cadmium, ion)
- Manganese [air, non-urban air or from high stacks]: 5.08e-11 kg; lognormal variance with pedigree 2.662, pedigree (1,1,5,5,1)
  (same comment as for Carbon dioxide, fossil)
- Beryllium [water, ground-, long-term]: 4.93e-7 kg; lognormal variance with pedigree 1.702, pedigree (1,1,5,5,1)
  (same comment as for Cadmium, ion)
- Dinitrogen monoxide [air, urban air close to ground]: 3.97e-7 kg; lognormal variance with pedigree 0.452, pedigree (1,1,5,5,1)
  (same comment as for Iron, ion)
- Strontium [air, non-urban air or from high stacks]: 1.27e-11 kg; lognormal variance with pedigree 2.832, pedigree (1,1,5,5,1)
  (same comment as for Carbon dioxide, fossil)
- Barium [water, surface water]: 3.39e-8 kg; lognormal variance with pedigree 1.472, pedigree (1,1,5,5,1)
  (same comment as for Iron, ion)
- Cobalt [air, non-urban air or from high stacks]: 2.5e-11 kg; lognormal variance with pedigree 2.742, pedigree (1,1,5,5,1)
  (same comment as for Carbon dioxide, fossil)
- Calcium, ion [water, ground-, long-term]: 0.000295 kg; lognormal variance with pedigree 0.862, pedigree (1,1,5,5,1)
  (same comment as for Cadmium, ion)
- Carbon dioxide, fossil [air, urban air close to ground]: 0.000463 kg; lognormal variance with pedigree 0.872, pedigree (1,1,5,5,1)
  (same comment as for Iron, ion)
- Manganese [water, ground-, long-term]: 1.72e-5 kg; lognormal variance with pedigree 1.222, pedigree (1,1,5,5,1)
  (same comment as for Cadmium, ion)
- TOC, Total Organic Carbon [water, surface water]: 2.57e-5 kg; lognormal variance with pedigree 0.872, pedigree (1,1,5,5,1)
  (same comment as for Iron, ion)
- Hydrogen sulfide [water, ground-, long-term]: 1.07e-5 kg; lognormal variance with pedigree 0.952, pedigree (1,1,5,5,1)
  (same comment as for Cadmium, ion)
- Cadmium [air, non-urban air or from high stacks]: 3.82e-11 kg; lognormal variance with pedigree 2.692, pedigree (1,1,5,5,1)
  (same comment as for Carbon dioxide, fossil)
- Iron [air, urban air close to ground]: 2.23e-13 kg; lognormal variance with pedigree 1.982, pedigree (1,1,5,5,1)
  (same comment as for Iron, ion)
- Arsenic [air, non-urban air or from high stacks]: 4.72e-11 kg; lognormal variance with pedigree 2.672, pedigree (1,1,5,5,1)
  (same comment as for Carbon dioxide, fossil)
- DOC, Dissolved Organic Carbon [water, surface water]: 2.47e-5 kg; lognormal variance with pedigree 0.872, pedigree (1,1,5,5,1)
  (same comment as for Iron, ion)
- Cobalt [air, urban air close to ground]: 1.56e-15 kg; lognormal variance with pedigree 1.782, pedigree (1,1,5,5,1)
  (same comment as for Iron, ion)
- Arsenic, ion [water, surface water]: 2.96e-9 kg; lognormal variance with pedigree 2.102, pedigree (1,1,5,5,1)
  (same comment as for Iron, ion)
- Nitrite [water, surface water]: 1.64e-6 kg; lognormal variance with pedigree 0.732, pedigree (1,1,5,5,1)
  (same comment as for Iron, ion)
- Nickel [air, non-urban air or from high stacks]: 5.73e-13 kg; lognormal variance with pedigree 3.242, pedigree (1,1,5,5,1)
  (same comment as for Carbon dioxide, fossil)
- Nitrate [water, ground-, long-term]: 0.00027 kg; lognormal variance with pedigree 0.462, pedigree (1,1,5,5,1)
  (same comment as for Cadmium, ion)
- Particulates, < 2.5 um [air, non-urban air or from high stacks]: 2.64e-7 kg; lognormal variance with pedigree 0.722, pedigree (1,1,5,5,1)
  (same comment as for Carbon dioxide, fossil)
- Nickel [air, urban air close to ground]: 0 kg; pedigree (1,1,1,1,1)
  (same comment as for Iron, ion)
- Manganese [water, surface water]: 1.03e-7 kg; lognormal variance with pedigree 1.582, pedigree (1,1,5,5,1)
  (same comment as for Iron, ion)
- Mercury [water, surface water]: 1.92e-11 kg; lognormal variance with pedigree 2.662, pedigree (1,1,5,5,1)
  (same comment as for Iron, ion)
- Iron [air, non-urban air or from high stacks]: 3.38e-12 kg; lognormal variance with pedigree 2.992, pedigree (1,1,5,5,1)
  (same comment as for Carbon dioxide, fossil)
- Selenium [water, ground-, long-term]: 5.84e-7 kg; lognormal variance with pedigree 1.922, pedigree (1,1,5,5,1)
  (same comment as for Cadmium, ion)
- DOC, Dissolved Organic Carbon [water, ground-, long-term]: 0.141 kg; lognormal variance with pedigree 0.522, pedigree (1,1,5,5,1)
  (same comment as for Cadmium, ion)
- Lead [water, surface water]: 3.58e-11 kg; lognormal variance with pedigree 2.412, pedigree (1,1,5,5,1)
  (same comment as for Iron, ion)
- Cyanide [air, urban air close to ground]: 4.05e-9 kg; lognormal variance with pedigree 0.602, pedigree (1,1,5,5,1)
  (same comment as for Iron, ion)
- BOD5, Biological Oxygen Demand [water, surface water]: 3.2e-5 kg; lognormal variance with pedigree 0.872, pedigree (1,1,5,5,1)
  (same comment as for Iron, ion)
- Cobalt [water, ground-, long-term]: 3.1e-5 kg; lognormal variance with pedigree 1.162, pedigree (1,1,5,5,1)
  (same comment as for Cadmium, ion)
- Thallium [air, non-urban air or from high stacks]: 5.73e-14 kg; lognormal variance with pedigree 3.542, pedigree (1,1,5,5,1)
  (same comment as for Carbon dioxide, fossil)
- Nitrogen oxides [air, urban air close to ground]: 1.41e-6 kg; lognormal variance with pedigree 0.492, pedigree (1,1,5,5,1)
  (same comment as for Iron, ion)
- Thallium [water, surface water]: 1.16e-10 kg; lognormal variance with pedigree 2.462, pedigree (1,1,5,5,1)
  (same comment as for Iron, ion)
- Nitrate [water, surface water]: 0.000285 kg; lognormal variance with pedigree 0.462, pedigree (1,1,5,5,1)
  (same comment as for Iron, ion)
- Mercury [air, non-urban air or from high stacks]: 2.43e-11 kg; lognormal variance with pedigree 2.792, pedigree (1,1,5,5,1)
  (same comment as for Carbon dioxide, fossil)
- Chloride [water, ground-, long-term]: 0.000768 kg; lognormal variance with pedigree 0.732, pedigree (1,1,5,5,1)
  (same comment as for Cadmium, ion)
- Tin, ion [water, ground-, long-term]: 9.86e-7 kg; lognormal variance with pedigree 1.612, pedigree (1,1,5,5,1)
  (same comment as for Cadmium, ion)
- Nickel, ion [water, ground-, long-term]: 3.94e-6 kg; lognormal variance with pedigree 1.432, pedigree (1,1,5,5,1)
  (same comment as for Cadmium, ion)
- Thallium [water, ground-, long-term]: 3.94e-7 kg; lognormal variance with pedigree 1.732, pedigree (1,1,5,5,1)
  (same comment as for Cadmium, ion)
- Aluminium [air, urban air close to ground]: 1.45e-10 kg; lognormal variance with pedigree 1.692, pedigree (1,1,5,5,1)
  (same comment as for Iron, ion)
- Carbon monoxide, fossil [air, urban air close to ground]: 3e-7 kg; lognormal variance with pedigree 0.922, pedigree (1,1,5,5,1)
  (same comment as for Iron, ion)
- Zinc, ion [water, ground-, long-term]: 5.67e-5 kg; lognormal variance with pedigree 1.062, pedigree (1,1,5,5,1)
  (same comment as for Cadmium, ion)
- Aluminium [water, ground-, long-term]: 0.000197 kg; lognormal variance with pedigree 0.912, pedigree (1,1,5,5,1)
  (same comment as for Cadmium, ion)
- Titanium, ion [water, ground-, long-term]: 0.000985 kg; lognormal variance with pedigree 0.702, pedigree (1,1,5,5,1)
  (same comment as for Cadmium, ion)
- Selenium [air, non-urban air or from high stacks]: 5.46e-13 kg; lognormal variance with pedigree 3.252, pedigree (1,1,5,5,1)
  (same comment as for Carbon dioxide, fossil)
- Titanium [air, non-urban air or from high stacks]: 1.23e-10 kg; lognormal variance with pedigree 2.522, pedigree (1,1,5,5,1)
  (same comment as for Carbon dioxide, fossil)
- Nickel, ion [water, surface water]: 1.39e-9 kg; lognormal variance with pedigree 2.152, pedigree (1,1,5,5,1)
  (same comment as for Iron, ion)
- Chromium VI [water, ground-, long-term]: 2.46e-8 kg; lognormal variance with pedigree 8.672, pedigree (1,1,5,5,1)
  (same comment as for Cadmium, ion)
- Arsenic [air, urban air close to ground]: 9.47e-13 kg; lognormal variance with pedigree 2.142, pedigree (1,1,5,5,1)
  (same comment as for Iron, ion)
- Vanadium, ion [water, ground-, long-term]: 0.000373 kg; lognormal variance with pedigree 1.052, pedigree (1,1,5,5,1)
  (same comment as for Cadmium, ion)
- Nitrite [water, ground-, long-term]: 0.00014 kg; lognormal variance with pedigree 0.462, pedigree (1,1,5,5,1)
  (same comment as for Cadmium, ion)
- NMVOC, non-methane volatile organic compounds, unspecified origin [air, non-urban air or from high stacks]: 1.49e-8 kg; lognormal variance with pedigree 0.462, pedigree (1,1,5,5,1)
  (same comment as for Carbon dioxide, fossil)
- Calcium [air, urban air close to ground]: 6.3e-11 kg; lognormal variance with pedigree 1.512, pedigree (1,1,5,5,1)
  (same comment as for Iron, ion)

## Sampling procedure
Landfill model based on observed leachate concentrations in literature. Extrapolated to 60'000 years heeding chemical characteristics. Initial waste composition from various literature sources.

## Extrapolations
This dataset has been copied from an original dataset covering the geography CH. The uncertainty has been adjusted accordingly.

## Review by Niels Jungbluth 2003-07-21
Passed. Calculation for standard deviation 95 of, i.e., infrastructure,
land occupation, transport services or other services can differ from
standard Pedigree approach used in this project and figures obtained by
this procedure.
