# heat production, hardwood chips from forest, at furnace 50kW, state-of-the-art 2014

Dataset: EcoSpold 2, unit process
Geography: CH
Time period: 2014-01-01 to 2021-12-31
Technology level: modern
Classification: EcoSpold01Categories: wood energy/heating systems
Classification: ISIC rev.4 ecoinvent: 3530:Steam and air conditioning supply
Synonyms: automatic wood heating system
Scenario: Business-as-Usual
System model: Allocation, cut-off by classification
Share of production covered: 100 %
Generated by: Christian Bauer
Published in: Bauer, C. 2007
Database: ecoinvent
isCopyrightProtected: true
accessRestrictedTo: 1

## General comment
This activity represents the combustion of natural wood chips from forest in Switzerland in new (=installed in 2014) boilers. Characteristics of the of wood chips to be burned: Dry wood density 650kg/m3; Energy content (LLV, oven-dry) 18.3 MJ/kg. The humidity of the wood chips when burned is assumed to be in an accurate range for appropriate combustion conditions, which is achieved after some weeks of natural drying in the storage. Air emission factors as well as the boiler efficiency represent average annual operation including start and stop (warm-up and shut-down). Therefore, emission data will be higher and efficiency will be lower than rated values provided by manufacturers. The inventory shall be considered as being representative also for boilers with nominal capacities below 70kW.

## Included activities start
from delivery of wood chips

## Included activities end
This activity describes the combustion of natural wood chips from forest in new (=installed in 2014) boilers. Included are the infrastructure, the wood requirements (wood chips from forest), the emissions to air, the electricity needed for operation, and the disposal of the ashes.

## Geography
Represents average Swiss conditions and could be used for Europe as well.

## Technology
Modern boiler technology available on the Swiss market, installed in 2014.

## Time period
Key emission factors PM, CO, NMVOC, CH4, NOx as well as the average annual efficiency have been updated using the latest available information. Other emission data (which hardly depend on the combustion technology) are from the second half of the 1990´s.

## Parameters
- scaling factor: 1.33333 dimensionless; name scaling_factor; = 1/0.75; lognormal variance with pedigree 0.0016, pedigree (2,1,1,1,1)
  The scaling factor corresponds to the inverse of the average annual efficiency of the heating system, including start/stop (warm up and cool down). Therefore, this efficiency will be lower than figures provided by manufacturers. The estimated value was provided by T.Nussbaumer, Verenum, and represents newly (=in 2014) installed boiler in this size category in Switzerland.

## Reference product
- heat, central or small-scale, other than natural gas: 1 MJ; = 0.75 * scaling_factor; source Thomas Nussbaumer 2014; CPC 17300: Steam and hot water; By-product classification allocatable product
  The numbers used in the mathematical relation refer to the input of one MJ of fuel with the heat output depending on the efficiency of the furnace. Using the "scaling factor" (inverse of the efficiency) allows for scaling of the amount of the reference product to 1.
  EcoSpold01Location=CH
  production volume 1.6042e10 MJ; name heat_apv; = 6.37e8*0.1*0.66+1.60E+10
    Estimation: useful energy in Switzerland in 2012 in furnace categories11a; 10% of APV produced in "modern technology" boilers; 66% of wood chips used in 2012 are hardwood chips.
    Further, an adjustment of the heat amount has been made to ensure the correct share of heat from wood on the Swiss market for heat, central or small-scale according to the BFE Gesamtenergiestatistik for the year 2012.
    BFE. 2013. Gesamtenergiestatistik_2013_Tabellen.xlsx. http://www.bfe.admin.ch/themen/00526/00541/00542/00631/index.html?lang=de&dossier_id=05071
  property price 0.0106 EUR2005
    Average European district heat price from Ecoheatcool and Euroheat 2005-2006, Ecoheat Work package 1: The European heat market. Final report. 10.6 EUR/GJ i s the price of district heat. http://www.solarthermalworld.org/files/Ecoheatcool%20WP1%20Web.pdf?download
  properties: Corresponding fuel use 1.25 MJ, heating value, net 1 MJ

## Inputs from technosphere
- wood chips, wet, measured as dry mass: 0.0728597 kg; = 1/18.3 * scaling_factor; lognormal variance with pedigree 0.4706, pedigree (2,1,5,1,1)
  uncertainty on energy and water content, and bulk density
  Amount was scaled to the amount of reference product.
  EcoSpold01Location=RER
  properties: heating value, net 10.84 MJ, water content 0.8, wet mass 1.8 kg, dry mass 1 kg, carbon content, non-fossil 0.494
  note on heating value, net: Value based on the dataset 'softwood forestry, mixed species, sustainable forest management'
  note on carbon content, non-fossil: C content of dry mass is 0.494 kgC/kg dry wood (ecoinvent v2.2 report 9).
- furnace, wood chips, with silo, 50kW: 1.38889e-7 unit; = 1/(50*20*2000*3.6); lognormal variance with pedigree 0.4706, pedigree (2,1,5,1,1)
  estimation based on 20a lifetime, 2000h/a, 50kW capacity
- electricity, low voltage: 0.00556 kWh; = 0.00417 * scaling_factor; source Bauer, C. 2007; lognormal variance with pedigree 0.4706, pedigree (2,1,5,1,1)
  literature. Original value [per MJ fuel input] was scaled to 1 MJ reference product output
  EcoSpold01Location=CH
- wood ash mixture, pure: -0.000666667 kg; name wood_ash; = (0.0005 * scaling_factor)*-1; source Bauer, C. 2007; lognormal variance with pedigree 0.4706, pedigree (2,1,5,1,1)
  EcoSpold01Location=CH
  literature. Original value [per MJ fuel input] was scaled to 1 MJ reference product output
  production volume 1.06947e7 kg; = heat_apv*wood_ash
    Calculated from the production volume of wood chips, from forest, hardwood, burned in furnace 50kW in proportion to the respective output amounts.
  property price 0 EUR2005; name wood_ash_price_EUR2005
  properties: dry mass 1 kg, carbon content, non-fossil 0.012, wet mass 1 kg

## Emissions to nature
- Phenol, pentachloro- [air, urban air close to ground]: 1.08e-11 kg; = 8.1E-12 * scaling_factor; source Bauer, C. 2007; lognormal variance with pedigree 0.4706, pedigree (2,1,5,1,1)
  literature. Original value [per MJ fuel input] was scaled to 1 MJ reference product output
- Ammonia [air, urban air close to ground]: 2.30667e-6 kg; = 1.73E-06 * scaling_factor; source Bauer, C. 2007; lognormal variance with pedigree 0.4706, pedigree (2,1,5,1,1)
  literature. Original value [per MJ fuel input] was scaled to 1 MJ reference product output
- Formaldehyde [air, urban air close to ground]: 1.73333e-7 kg; = 1.3E-07 * scaling_factor; source Bauer, C. 2007; lognormal variance with pedigree 0.4706, pedigree (2,1,5,1,1)
  literature. Original value [per MJ fuel input] was scaled to 1 MJ reference product output
- Phosphorus [air, urban air close to ground]: 4e-7 kg; = 3E-07 * scaling_factor; source Bauer, C. 2007; lognormal variance with pedigree 0.4706, pedigree (2,1,5,1,1)
  literature. Original value [per MJ fuel input] was scaled to 1 MJ reference product output
- Chromium VI [air, urban air close to ground]: 5.33333e-11 kg; = 4E-11 * scaling_factor; source Bauer, C. 2007; lognormal variance with pedigree 0.4706, pedigree (2,1,5,1,1)
  literature. Original value [per MJ fuel input] was scaled to 1 MJ reference product output
- Dinitrogen monoxide [air, urban air close to ground]: 4e-6 kg; = 3E-06 * scaling_factor; source Bauer, C. 2007; lognormal variance with pedigree 0.4706, pedigree (2,1,5,1,1)
  literature. Original value [per MJ fuel input] was scaled to 1 MJ reference product output
- Manganese [air, urban air close to ground]: 2.26667e-7 kg; = 1.7E-07 * scaling_factor; source Bauer, C. 2007; lognormal variance with pedigree 0.4706, pedigree (2,1,5,1,1)
  literature. Original value [per MJ fuel input] was scaled to 1 MJ reference product output
- Benzene, ethyl- [air, urban air close to ground]: 4e-8 kg; = 3E-08 * scaling_factor; source Bauer, C. 2007; lognormal variance with pedigree 0.4706, pedigree (2,1,5,1,1)
  literature. Original value [per MJ fuel input] was scaled to 1 MJ reference product output
- NMVOC, non-methane volatile organic compounds, unspecified origin [air, urban air close to ground]: 2.33333e-5 kg; = 17.5E-06 * scaling_factor; source Thomas Nussbaumer 2014; lognormal variance with pedigree 0.4326, pedigree (2,1,3,1,1)
  expert estimation (see source)
- Carbon dioxide, non-fossil [air, urban air close to ground]: 0.142667 kg; = 0.107 * scaling_factor; source Bauer, C. 2007; lognormal variance with pedigree 0.4706, pedigree (2,1,5,1,1)
  literature. Original value [per MJ fuel input] was scaled to 1 MJ reference product output
- Potassium [air, urban air close to ground]: 3.12e-5 kg; = 2.34E-05 * scaling_factor; source Bauer, C. 2007; lognormal variance with pedigree 0.4706, pedigree (2,1,5,1,1)
  literature. Original value [per MJ fuel input] was scaled to 1 MJ reference product output
- Calcium [air, urban air close to ground]: 7.8e-6 kg; = 5.85E-06 * scaling_factor; source Bauer, C. 2007; lognormal variance with pedigree 0.4706, pedigree (2,1,5,1,1)
  literature. Original value [per MJ fuel input] was scaled to 1 MJ reference product output
- Methane, non-fossil [air, urban air close to ground]: 1e-5 kg; = 7.5E-06* scaling_factor; source Thomas Nussbaumer 2014; lognormal variance with pedigree 0.4326, pedigree (2,1,3,1,1)
  expert estimation (see source)
- Bromine [air, urban air close to ground]: 8e-8 kg; = 6E-08 * scaling_factor; source Bauer, C. 2007; lognormal variance with pedigree 0.4706, pedigree (2,1,5,1,1)
  literature. Original value [per MJ fuel input] was scaled to 1 MJ reference product output
- Hydrocarbons, aliphatic, unsaturated [air, urban air close to ground]: 4.13333e-6 kg; = 3.1E-06 * scaling_factor; source Bauer, C. 2007; lognormal variance with pedigree 0.4706, pedigree (2,1,5,1,1)
  literature. Original value [per MJ fuel input] was scaled to 1 MJ reference product output
- Hydrocarbons, aliphatic, alkanes, unspecified [air, urban air close to ground]: 1.21333e-6 kg; = 9.1E-07 * scaling_factor; source Bauer, C. 2007; lognormal variance with pedigree 0.4706, pedigree (2,1,5,1,1)
  literature. Original value [per MJ fuel input] was scaled to 1 MJ reference product output
- Sulfur dioxide [air, urban air close to ground]: 3.33333e-6 kg; = 2.5E-06 * scaling_factor; source Bauer, C. 2007; lognormal variance with pedigree 0.4706, pedigree (2,1,5,1,1)
  literature. Original value [per MJ fuel input] was scaled to 1 MJ reference product output
- Sodium [air, urban air close to ground]: 1.73333e-6 kg; = 1.3E-06 * scaling_factor; source Bauer, C. 2007; lognormal variance with pedigree 0.4706, pedigree (2,1,5,1,1)
  literature. Original value [per MJ fuel input] was scaled to 1 MJ reference product output
- Nitrogen oxides [air, urban air close to ground]: 0.000173333 kg; = 1.3e-4 * scaling_factor; source Thomas Nussbaumer 2014; lognormal variance with pedigree 0.4326, pedigree (2,1,3,1,1)
  expert estimation (see source)
- Benzene, hexachloro- [air, urban air close to ground]: 9.6e-15 kg; = 7.2E-15 * scaling_factor; source Bauer, C. 2007; lognormal variance with pedigree 0.4706, pedigree (2,1,5,1,1)
  literature. Original value [per MJ fuel input] was scaled to 1 MJ reference product output
- Lead [air, urban air close to ground]: 3.33333e-8 kg; = 2.5E-08 * scaling_factor; source Bauer, C. 2007; lognormal variance with pedigree 0.4706, pedigree (2,1,5,1,1)
  literature. Original value [per MJ fuel input] was scaled to 1 MJ reference product output
- PAH, polycyclic aromatic hydrocarbons [air, urban air close to ground]: 1.48e-8 kg; = 1.11E-08 * scaling_factor; source Bauer, C. 2007; lognormal variance with pedigree 0.4706, pedigree (2,1,5,1,1)
  literature. Original value [per MJ fuel input] was scaled to 1 MJ reference product output
- Arsenic [air, urban air close to ground]: 1.33333e-9 kg; = 1E-09 * scaling_factor; source Bauer, C. 2007; lognormal variance with pedigree 0.4706, pedigree (2,1,5,1,1)
  literature. Original value [per MJ fuel input] was scaled to 1 MJ reference product output
- Fluorine [air, urban air close to ground]: 6.66667e-8 kg; = 5E-08 * scaling_factor; source Bauer, C. 2007; lognormal variance with pedigree 0.4706, pedigree (2,1,5,1,1)
  literature. Original value [per MJ fuel input] was scaled to 1 MJ reference product output
- Cadmium [air, urban air close to ground]: 9.33333e-10 kg; = 7E-10 * scaling_factor; source Bauer, C. 2007; lognormal variance with pedigree 0.4706, pedigree (2,1,5,1,1)
  literature. Original value [per MJ fuel input] was scaled to 1 MJ reference product output
- Acetaldehyde [air, urban air close to ground]: 8.13333e-8 kg; = 6.1E-08 * scaling_factor; source Bauer, C. 2007; lognormal variance with pedigree 0.4706, pedigree (2,1,5,1,1)
  literature. Original value [per MJ fuel input] was scaled to 1 MJ reference product output
- Benzene [air, urban air close to ground]: 1.21333e-6 kg; = 9.1E-07 * scaling_factor; source Bauer, C. 2007; lognormal variance with pedigree 0.4706, pedigree (2,1,5,1,1)
  literature. Original value [per MJ fuel input] was scaled to 1 MJ reference product output
- Mercury [air, urban air close to ground]: 4e-10 kg; = 3E-10 * scaling_factor; source Bauer, C. 2007; lognormal variance with pedigree 0.4706, pedigree (2,1,5,1,1)
  literature. Original value [per MJ fuel input] was scaled to 1 MJ reference product output
- Zinc [air, urban air close to ground]: 4e-7 kg; = 3E-07 * scaling_factor; source Bauer, C. 2007; lognormal variance with pedigree 0.4706, pedigree (2,1,5,1,1)
  literature. Original value [per MJ fuel input] was scaled to 1 MJ reference product output
- Water [air, urban air close to ground]: 6e-5 m3; lognormal variance with pedigree 0.0083, pedigree (2,2,3,1,2)
  introduced in order to ensure a correct water balance; the quantity represents both H2O emissions from combustion as well as from nytural wood chips drying in the storage silo
- Particulates, < 2.5 um [air, urban air close to ground]: 9.6e-5 kg; = 72E-06* scaling_factor; source Thomas Nussbaumer 2014; lognormal variance with pedigree 0.4326, pedigree (2,1,3,1,1)
  expert estimation (see source)
- Chromium [air, urban air close to ground]: 5.28e-9 kg; = 3.96E-09 * scaling_factor; source Bauer, C. 2007; lognormal variance with pedigree 0.4706, pedigree (2,1,5,1,1)
  literature. Original value [per MJ fuel input] was scaled to 1 MJ reference product output
- Particulates, > 2.5 um, and < 10um [air, urban air close to ground]: 5.33333e-6 kg; = 4E-06 * scaling_factor; source Thomas Nussbaumer 2014; lognormal variance with pedigree 0.4326, pedigree (2,1,3,1,1)
  expert estimation (see source)
- Carbon monoxide, non-fossil [air, urban air close to ground]: 0.0006 kg; = 4.5E-04 * scaling_factor; source Thomas Nussbaumer 2014; lognormal variance with pedigree 0.4326, pedigree (2,1,3,1,1)
  expert estimation (see source)
- Magnesium [air, urban air close to ground]: 4.8e-7 kg; = 3.6E-07 * scaling_factor; source Bauer, C. 2007; lognormal variance with pedigree 0.4706, pedigree (2,1,5,1,1)
  literature. Original value [per MJ fuel input] was scaled to 1 MJ reference product output
- Dioxins, measured as 2,3,7,8-tetrachlorodibenzo-p-dioxin [air, urban air close to ground]: 4.13333e-14 kg; = 3.1E-14 * scaling_factor; source Bauer, C. 2007; lognormal variance with pedigree 0.4706, pedigree (2,1,5,1,1)
  literature. Original value [per MJ fuel input] was scaled to 1 MJ reference product output
- Benzo(a)pyrene [air, urban air close to ground]: 6.66667e-10 kg; = 5E-10 * scaling_factor; source Bauer, C. 2007; lognormal variance with pedigree 0.4706, pedigree (2,1,5,1,1)
  literature. Original value [per MJ fuel input] was scaled to 1 MJ reference product output
- Chlorine [air, urban air close to ground]: 2.4e-7 kg; = 1.8E-07 * scaling_factor; source Bauer, C. 2007; lognormal variance with pedigree 0.4706, pedigree (2,1,5,1,1)
  literature. Original value [per MJ fuel input] was scaled to 1 MJ reference product output
- Copper [air, urban air close to ground]: 2.93333e-8 kg; = 2.2E-08 * scaling_factor; source Bauer, C. 2007; lognormal variance with pedigree 0.4706, pedigree (2,1,5,1,1)
  literature. Original value [per MJ fuel input] was scaled to 1 MJ reference product output
- Toluene [air, urban air close to ground]: 4e-7 kg; = 3E-07 * scaling_factor; source Bauer, C. 2007; lognormal variance with pedigree 0.4706, pedigree (2,1,5,1,1)
  literature. Original value [per MJ fuel input] was scaled to 1 MJ reference product output
- Nickel [air, urban air close to ground]: 8e-9 kg; = 6E-09 * scaling_factor; source Bauer, C. 2007; lognormal variance with pedigree 0.4706, pedigree (2,1,5,1,1)
  literature. Original value [per MJ fuel input] was scaled to 1 MJ reference product output
- m-Xylene [air, urban air close to ground]: 1.6e-7 kg; = 1.2E-07 * scaling_factor; source Bauer, C. 2007; lognormal variance with pedigree 0.4706, pedigree (2,1,5,1,1)
  literature. Original value [per MJ fuel input] was scaled to 1 MJ reference product output

## Sampling procedure
literature

## Extrapolations
This dataset has been extrapolated from year 2014 to the year of the calculation (2021). The uncertainty has been adjusted accordingly.
