# transmission network construction, long-distance

Dataset: EcoSpold 2, unit process
Geography: RoW
Time period: 1989-01-01 to 2021-12-31
Technology level: current
Classification: ISIC rev.4 ecoinvent: 4220:Construction of utility projects
Classification: EcoSpold01Categories: electricity/distribution
Tags: ConvertedDataset
Scenario: Business-as-Usual
System model: Allocation, cut-off by classification
Generated by: Mireille Faist Emmenegger (obsolete)
Published in: Dones R. 2007
Database: ecoinvent
isCopyrightProtected: true
accessRestrictedTo: 1

## General comment
This dataset describes the environmental inventories for high voltage transmission for electricity trade in Europe
[This dataset was already contained in the ecoinvent database version 2. It was not individually updated during the transfer to ecoinvent version 3. Life Cycle Impact Assessment results may still have changed, as they are affected by changes in the supply chain, i.e. in other datasets. This dataset was generated following the ecoinvent quality guidelines for version 2. It may have been subject to central changes described in the ecoinvent version 3 change report (http://www.ecoinvent.org/database/ecoinvent-version-3/reports-of-changes/), and the results of the central updates were reviewed extensively. The changes added e.g. consistent water flows and other information throughout the database. The documentation of this dataset can be found in the ecoinvent reports of version 2, which are still available via the ecoinvent website. The change report linked above covers all central changes that were made during the conversion process.]

## Technology
Average technology used to transmit electricity.

## Reference product
- transmission network, long-distance: 1 km; CPC 53242: Long-distance communication and power lines (cables); By-product classification allocatable product
  EcoSpold01Location=UCTE
  production volume 2.99384 km
    This is a placeholder value that does not reflect real-world production volumes. This dataset does not currently require a real-world production volume to work in the database framework, and no actual data were collected yet. This has no negative effect on the results of the ecoinvent database.
  property price 103908 EUR2005
    Calculated based on inputs: The price of the product has been calculated as a sum of the values of the material and energy inputs for this product. This value is therefore a rough estimation. It may underestimate the real price since there are additional expenses when producing any product. These expences can include for example labour costs, treatment of waste materials and profit for the producer. Please consider carefully whether this level of data quality is acceptable for your application.

## Inputs from technosphere
- aluminium, wrought alloy: 6000 kg; lognormal variance with pedigree 0.14, pedigree (5,5,5,5,1)
  EcoSpold01Location=RER
  Estimates
  Uncertainty: estimates
  properties: wet mass 1 kg, dry mass 1 kg
- copper, cathode: 1000 kg; lognormal variance with pedigree 0.14, pedigree (5,5,5,5,1)
  EcoSpold01Location=RER
  Estimates
  Uncertainty: estimates
  properties: dry mass 1 kg, wet mass 1 kg
- steel, unalloyed: 160000 kg; lognormal variance with pedigree 0.14, pedigree (5,5,5,5,1)
  Estimates
  EcoSpold01Location=RER
  Uncertainty: estimates
  properties: carbon content, fossil 0.0025, dry mass 1 kg, wet mass 1 kg
  note on carbon content, fossil: Unalloyed steels or carbon steels are those in which the level of an individual element in no case reaches or exceeds the limiting concentration given in Tab. 3.1 ecoinvent v2.2 report 10_partII. Assumed to have a C content of 0.25%
- waste concrete: -200000 kg; lognormal variance with pedigree 0.44, pedigree (5,5,5,5,1)
  EcoSpold01Location=CH
  Estimates
  Uncertainty: estimates
  production volume 600000 kg
    Calculated from the production volume of transmission network, long-distance in proportion to the respective output amounts.
  properties: water content 1, dry mass 0.5 kg, wet mass 1 kg
- concrete, normal: 0 m3; pedigree (1,1,1,1,1)
  Estimates
  EcoSpold01Location=CH
  Uncertainty: estimates
  properties: water content 0.086758, wet mass 2380 kg, dry mass 2190 kg
- concrete, normal: 2.05589, 0.214221, 1.73427, 0.975528, 4.13109, 0.139339, 81.6497 m3 (7 entries); lognormal variance with pedigree 0.14, pedigree (5,5,5,5,1)
  Estimates
  EcoSpold01Location=CH
  Uncertainty: estimates

## Inputs from nature
- Transformation, to industrial area [natural resource, land]: 240 m2; lognormal variance with pedigree 0.26, pedigree (5,5,5,5,1)
  Estimates
  Uncertainty: estimates
- Occupation, industrial area [natural resource, land]: 7200 m2*year; lognormal variance with pedigree 0.18, pedigree (5,5,5,5,1)
  Estimates
  Uncertainty: estimates
- Transformation, from annual crop [natural resource, land]: 240 m2; lognormal variance with pedigree 0.26, pedigree (5,5,5,5,1)
  Estimates
  Uncertainty: estimates

## Sampling procedure
estimations

## Extrapolations
This dataset has been copied from an original dataset covering the geography UCTE. The uncertainty has been adjusted accordingly.

## Review by Gerald Rebitzer (obsolete) 2003-08-10
passed
