# protein pea, feed production, Swiss integrated production

Dataset: EcoSpold 2, unit process
Geography: CH
Time period: 1996-01-01 to 2021-12-31
Technology level: current
Classification: EcoSpold01Categories: agricultural means of production/feed
Classification: ISIC rev.4 ecoinvent: 1080:Manufacture of prepared animal feeds
Tags: ConvertedDataset
Scenario: Business-as-Usual
System model: Allocation, cut-off by classification
Generated by: Thomas Nemecek
Published in: Nemecek, T. 2007
Database: ecoinvent
isCopyrightProtected: true
accessRestrictedTo: 1

## General comment
This dataset represents the production of 1 kg processed feedstuff (fresh weight).
[This dataset was already contained in the ecoinvent database version 2. It was not individually updated during the transfer to ecoinvent version 3. Life Cycle Impact Assessment results may still have changed, as they are affected by changes in the supply chain, i.e. in other datasets. This dataset was generated following the ecoinvent quality guidelines for version 2. It may have been subject to central changes described in the ecoinvent version 3 change report (http://www.ecoinvent.org/database/ecoinvent-version-3/reports-of-changes/), and the results of the central updates were reviewed extensively. The changes added e.g. consistent water flows and other information throughout the database. The documentation of this dataset can be found in the ecoinvent reports of version 2, which are still available via the ecoinvent website. The change report linked above covers all central changes that were made during the conversion process.]

## Included activities start
From reception of protein pea at the factory gate.

## Included activities end
This activity ends with the production of feedstuff. The dataset includes the feedstuff processing (crushing or milling, heat treatment, dosing, mixing squeezing and pelleting), storage of the feed mixes, water use, wastewater treatment, transformation and use of land related to the storage buildings. The dataset doesn't include process air emissions, transport of the feedstuff to the regional storehouse, solid waste generation neither packaging.

## Geography
Values refer to feedstuff delivered in Switzerland.

## Technology
The values refer to not expanded feedstuffs. The main steps to process feedstuffs comprise of rolling, crushing or milling, heat treatment, dosing, mixing, squeezing and pelleting. The feed-milling and treatment processes were described in detail by Rossel (2001). The packaging materials are not considered in the datasets. The energy value given by Cederberg (1998) for protein mixes (such as the legumes “protein peas” and “broad beans”) is lower, 70% that of expanded feedstuff, since protein feedstuff is not expanded (Cederberg 1998, Rossel 2001).
References
Cederberg C. (1998) Life cycle assessment of milk production. A comparison of conventional and organic farming. The Swedish Institute for Food and Biotechnology. SIK-Rapport 1998 No. 643, 86 p.
Rossel, U. (2001) Futtermüllerei: die wichtigsten Verfahren. Interner Bericht FAL Reckenholz, Zürich, 6p.

## Time period
Years of the publications of the main sources

## Parameters
- fraction, tap water, to air: 0.9 dimensionless; name fraction_TW_to_air; = fraction_PW_to_air; lognormal variance with pedigree 0.092025, pedigree (4,4,3,2,4)
  Calculated value. See comment in the other parametres present in this dataset. Tap water is considered to be always used as process water, thus process water fractions to air are applied to all tap water input flows to calculate the amount of water consumed in the processes.
- fraction, process water, to air: 0.9 dimensionless; name fraction_PW_to_air; lognormal variance with pedigree 0.092025, pedigree (4,4,3,2,4)
  Literature value (Statistics Canada, 2007 & Shaffer, K.H., 2008, Consumptive water use in the Great Lakes Basin, USGS) (Vionnet, S., Quantis Water Database - Technical Report, 2012).

## Reference product
- protein pea, feed, Swiss integrated production: 1 kg; CPC 23319: Preparations used in animal feeding n.e.c.; By-product classification allocatable product
  EcoSpold01Location=CH
  production volume 1.7e7 kg
    Legumes consumption in CH: 29'726'000 t/year, import in CH: 66%
    FAO production data for 'peas, dry'. Entire Swiss production volume minus the organic share.
  property price 2.11463 EUR2005
    Calculated based on inputs: The price of the product has been calculated as a sum of the values of the material and energy inputs for this product. This value is therefore a rough estimation. It may underestimate the real price since there are additional expenses when producing any product. These expences can include for example labour costs, treatment of waste materials and profit for the producer. Please consider carefully whether this level of data quality is acceptable for your application.
  property carbon content, non-fossil 0.469421
    Composition data obtained from Peas, split, mature seeds, raw, in (http://www.nal.usda.gov/fnic/foodcomp/search/). First, composition data were refered to 1 kg dry mass. Then, C-contents were calculated considering a C-content/dry mass of 46% in carbohydrates (including fibres), 53% in proteins and 75% in fats. All data from "Evolutionary and Biochemical Aspects", A.D. Kay and T. Vrede (in Global Ecology, 2010, Elsevier B.V., S.E. Jørgensen Ed.).
  property carbon content 0.469421
    carbon content on a dry matter basis (reserved; not for manual entry)
  properties: water content 0.149425, carbon content, fossil 0, dry mass 0.87 kg, wet mass 1 kg, water in wet mass 0.13 kg, carbon allocation 0.408396 kg

## Inputs from technosphere
- wastewater, average: -3.8e-5 m3; source Salzgeber Ch. 1996; lognormal variance with pedigree 0.1227, pedigree (3,3,5,3,4)
  EcoSpold01Location=CH
  Literature Value. Salzgeber & Lörcher (1996) give the total energy and water consumption of a mill processing about 30,000 tonnes of cereals per year. The mill consumes 1800 m3 water and produces 1200 m3 wastewater per year. Water consumption and wastewater output was completed from Salzgeber and Lörcher (1996), namely 56 litres tap water and 38 litres wastewater per tonne of feedstuff produced.
  production volume 646 m3
    Calculated from the production volume of protein pea, feed, Swiss integrated production in proportion to the respective output amounts.
  properties: wet mass 1000 kg, dry mass 0.346837 kg, water content 2882.2, carbon content, non-fossil 0.194039
  note on carbon content, non-fossil: 0.0673 kg TOC/m3 (Tab A.17, ecoinvent v2.2 report 13_I). TOC was considered as Total Carbon.
- tap water: 0.056 kg; name tap_water_input; source Salzgeber Ch. 1996; lognormal variance with pedigree 0.1227, pedigree (3,3,5,3,4)
  EcoSpold01Location=RER
  Literature Value. Salzgeber & Lörcher (1996) give the total energy and water consumption of a mill processing about 30,000 tonnes of cereals per year. The mill consumes 1800 m3 water and produces 1200 m3 wastewater per year. Water consumption and wastewater output was completed from Salzgeber and Lörcher (1996), namely 56 litres tap water and 38 litres wastewater per tonne of feedstuff produced.
  properties: water content 2962.17, carbon content, fossil 0.00178991, dry mass 0.000337476 kg, wet mass 1 kg
  note on carbon content, fossil: Bicarbonate content is 2.93 mol/m3. CO2 content is 0.1 mol/m3 (ecoinvent v2.2 report 8, Tab 93.1).
- building, multi-storey: 8.5e-6 m3; source UFA 2002; lognormal variance with pedigree 0.3426, pedigree (3,3,5,1,1)
  EcoSpold01Location=RER
  Estimation. The typical storage capacity of the cereal silo found in some feed processing centres in Switzerland is 10,000 tonnes, with an effective storage volume of about 80% of the building volume. With an average grain specific weight of 750 kg/m3, this gives a building volume of about 16,650 m3. Assuming that these feed processing centres process 25,000 tonnes of grain per year, the cereals will be stored for about three months before being processed.
  The largest feed processing centre in Switzerland (UFA-Biblis) has a feedstuff storage compound of 29,440 m3 (80 m length * 23 m * 16 m height) with an effective storage capacity of 4,140 tonnes (5520 palettes of 750 kg), or about 150 kg/m3 (UFA 2002). This centre processes 275,000 tonnes of concentrate feeds yearly. After processing, the feedstuff must therefore be stored for approx. one week in the processing centre before being sent to the regional storehouse.
  The average length of storage of the raw materials is set at 3 months in the calculations. The storage volume required was estimated as 1.7 m3/tonne of raw material (grain specific weight 750 kg/m3 and 80% of the building volume used for storage). The lifetime of the storage silo was assumed to be 50 years, the length of the construction phase 2 years. Land use was estimated from the height of Biblis’s storage silo (UFA 2002). Taking the height of 16 m, the area used is 0.1 m2/tonne of feedstuff for 3 months.
- heat, district or industrial, natural gas: 0.095 MJ; source InfoMil  1996; lognormal variance with pedigree 0.0593, pedigree (2,3,5,3,3)
  EcoSpold01Location=RER
  Literature Value. According to Cederberg (1998) for protein mixes from legumes such as “protein peas” and “broad beans” the energy usage is 70% of the expanded feedstuff value of InfoMil (1996) since this is not expanded. This resulted into 100 MJ final energy in the form of natural gas per tonne of feedstuff.
  Salzgeber & Lörcher (1996) give the total energy and water consumption of a mill processing about 30,000 tonnes of cereals per year. This mill produces flour for human consumption. The total process energy consumption of this mill was approx. 350 MJ per tonne of cereal grain processed (98% as electricity and 2% as fuel) or 440 MJ per tonne of flour produced; the CED was calculated by the authors as 970 MJ/tonne cereals. For production of feed mixes in the feed processing centres, Cederberg (1998) gives an energy consumption (CED) of 374 MJ per tonne of expander-treated feed for dairy cows. In the process, the expander and pelleting treatments use about 80% of the total energy consumed (40% as electricity and 60% as gas). The grinding and mixing requires only 47 MJ per tonne of feed. Hilger et al. (1997) calculated that the production of feed mixes from raw materials on an industrial scale requires about 270 MJ per tonne feedstuff (CED). InfoMil (1996) gives a total energy consumption for the production of feed mixes of 300 to 500 MJ (CED) per tonne of final product by units processing from a few thousand to more than 200,000 tonnes per year. The size of the production units corresponds to the conditions in Switzerland, where the largest feed processing centre produces 275,000 tonnes of feed per year. These data stem from a survey of the Dutch feed industry. The feed mills use about 25-45 kWh electricity and 2-6 m3 gas per tonne of feedstuff produced. The production step “dosing, milling and mixing” uses 18-32 MJ per tonne in production units processing 1 to 6 tons per charge and about 10 charges per hour. The 2-6 m3 of gas is used in the production step “pelleting and expanding”, which also uses 25-30 kWh electricity. The data from the different sources seem to give a relatively consistent picture, despite the different conditions in the various countries. The CED reported levels of between 270 and 500 MJ/tonne of feedstuff. The values for the flour mill (Salzgeber and Lörcher 1996) are higher, but the quality requirements are stricter for the production of food than for feedstuffs, hence the processes are more complex.
  Further References:
  Salzgeber Ch. & Lörcher M. (1996) Produktökobilanz Brot unter verschiedenen Landbaubedingungen. In: Umweltverträgliche Pflanzenproduktion: Indikatoren, Bilanzierungsansätze und ihre Einbindung in Ökobilanzen. 11-12 July 1996, Wittenberg, 249-269.
  Cederberg C. (1998) Life cycle assessment of milk production. A comparison of conventional and organic farming. The Swedish Institute for Food and Biotechnology. SIK-Rapport 1998 No. 643, 86 p.
  Higler J., Kühl R., Fries R., Pfeffer E. & Schulze Lammers P. (1997) Oekonomische und energetische Bewertung einer umweltgerechten Verwertung von Koppelprodukten der Ernährungsbranche und sonstigen organischen Reststoffen in der Landwirtschaft sowie Ansätze zur Entwicklung eines Recyclingkonzeptes. Forschungsberichte / Lehr- und Forschungsschwerpunkt "Umweltverträgliche und Standortgerechte Landwirtschaft" an der Landwirtschaftlichen Fakultät der Rheinischen Friedrich-Wilhelms-Universität 1364765. Bonn Institut für Landwirtschaftliche Betriebslehre.
  properties: heating value, net 1 MJ
- electricity, low voltage: 0.025 kWh; source InfoMil  1996; lognormal variance with pedigree 0.0593, pedigree (2,3,5,3,3)
  Literature Value. According to Cederberg (1998) for protein mixes from legumes such as “protein peas” and “broad beans” the energy usage is 70% of the expanded feedstuff value of InfoMil (1996) since this is not expanded. This resulted into 25 kWh electricity electricity per tonne of feedstuff.
  Salzgeber & Lörcher (1996) give the total energy and water consumption of a mill processing about 30,000 tonnes of cereals per year. This mill produces flour for human consumption. The total process energy consumption of this mill was approx. 350 MJ per tonne of cereal grain processed (98% as electricity and 2% as fuel) or 440 MJ per tonne of flour produced; the CED was calculated by the authors as 970 MJ/tonne cereals. For production of feed mixes in the feed processing centres, Cederberg (1998) gives an energy consumption (CED) of 374 MJ per tonne of expander-treated feed for dairy cows. In the process, the expander and pelleting treatments use about 80% of the total energy consumed (40% as electricity and 60% as gas). The grinding and mixing requires only 47 MJ per tonne of feed. Hilger et al. (1997) calculated that the production of feed mixes from raw materials on an industrial scale requires about 270 MJ per tonne feedstuff (CED). InfoMil (1996) gives a total energy consumption for the production of feed mixes of 300 to 500 MJ (CED) per tonne of final product by units processing from a few thousand to more than 200,000 tonnes per year. The size of the production units corresponds to the conditions in Switzerland, where the largest feed processing centre produces 275,000 tonnes of feed per year. These data stem from a survey of the Dutch feed industry. The feed mills use about 25-45 kWh electricity and 2-6 m3 gas per tonne of feedstuff produced. The production step “dosing, milling and mixing” uses 18-32 MJ per tonne in production units processing 1 to 6 tons per charge and about 10 charges per hour. The 2-6 m3 of gas is used in the production step “pelleting and expanding”, which also uses 25-30 kWh electricity. The data from the different sources seem to give a relatively consistent picture, despite the different conditions in the various countries. The CED reported levels of between 270 and 500 MJ/tonne of feedstuff. The values for the flour mill (Salzgeber and Lörcher 1996) are higher, but the quality requirements are stricter for the production of food than for feedstuffs, hence the processes are more complex.
  Further References:
  Salzgeber Ch. & Lörcher M. (1996) Produktökobilanz Brot unter verschiedenen Landbaubedingungen. In: Umweltverträgliche Pflanzenproduktion: Indikatoren, Bilanzierungsansätze und ihre Einbindung in Ökobilanzen. 11-12 July 1996, Wittenberg, 249-269.
  Cederberg C. (1998) Life cycle assessment of milk production. A comparison of conventional and organic farming. The Swedish Institute for Food and Biotechnology. SIK-Rapport 1998 No. 643, 86 p.
  Higler J., Kühl R., Fries R., Pfeffer E. & Schulze Lammers P. (1997) Oekonomische und energetische Bewertung einer umweltgerechten Verwertung von Koppelprodukten der Ernährungsbranche und sonstigen organischen Reststoffen in der Landwirtschaft sowie Ansätze zur Entwicklung eines Recyclingkonzeptes. Forschungsberichte / Lehr- und Forschungsschwerpunkt "Umweltverträgliche und Standortgerechte Landwirtschaft" an der Landwirtschaftlichen Fakultät der Rheinischen Friedrich-Wilhelms-Universität 1364765. Bonn Institut für Landwirtschaftliche Betriebslehre.
  EcoSpold01Location=CH
- protein pea, Swiss integrated production: 1 kg; lognormal variance with pedigree 0.058, pedigree (1,1,5,1,3)
  EcoSpold01Location=CH
  Calculated Value. Production of the feed ingredients: this production takes place on farm fields (agricultural production), as a main product, in factories (industrial production) or as a by-product, in food processing factories (by-products). Only feedstuffs stemming from agricultural production were considered in the ecoinvent database. The respective dataset of each feed provides information on the production of some of the raw materials of the feed mixes.
  properties: carbon content, non-fossil 0.469421, water content 0.149425, dry mass 0.87 kg, wet mass 1 kg
  note on carbon content, non-fossil: Composition data obtained from Peas, split, mature seeds, raw, in (http://www.nal.usda.gov/fnic/foodcomp/search/). First, composition data were refered to 1 kg dry mass. Then, C-contents were calculated considering a C-content/dry mass of 46% in carbohydrates (including fibres), 53% in proteins and 75% in fats. All data from "Evolutionary and Biochemical Aspects", A.D. Kay and T. Vrede (in Global Ecology, 2010, Elsevier B.V., S.E. Jørgensen Ed.).

## Inputs from nature
- Transformation, from unspecified [natural resource, land]: 1e-6 m2; source UFA 2002; lognormal variance with pedigree 0.1626, pedigree (3,3,5,1,1)
  Estimation. Corresponds to occupation industrial area/50 years (the lifetime of the storage silo was assumed to be 50 years).
- Transformation, to industrial area [natural resource, land]: 1e-6 m2; source UFA 2002; lognormal variance with pedigree 0.1626, pedigree (3,3,5,1,1)
  (same comment as for Transformation, from unspecified)
- Occupation, industrial area [natural resource, land]: 5e-5 m2*year; source UFA 2002; lognormal variance with pedigree 0.0826, pedigree (3,3,5,1,1)
  Estimation. Corresponds to 0.2m2/tonne (because the total area occupied as “industrial area” was estimated as twice as high, namely 0.2 m2/tonne) multiplied by 3 months (because the average length of storage of the raw materials is set at 3 months in the calculations).
- Occupation, construction site [natural resource, land]: 2e-6 m2*year; source UFA 2002; lognormal variance with pedigree 0.0826, pedigree (3,3,5,1,1)
  Estimation. Corresponds to land use Transformation*2 years (the length of the construction phase is 2 years).

## Emissions to nature
- Water [air, unspecified]: 5.04e-5 m3; name water_to_air_unspecified; = (tap_water_input/1000*fraction_TW_to_air); lognormal variance with pedigree 0.0807, pedigree (2,2,5,1,1)
  Calculated value based on literature values and expert opinion. See comments in the parametres' comment field.
  property fraction, origin: salt water 0; name fraction_origin_salt_water
  property fraction, origin: unspecified 0; name fraction_origin_unspecified
  property fraction, origin: fresh water 1; name fraction_origin_fresh_water

## Sampling procedure
Data based on literature, trade statistics and information from feedstuff processing enterprises.

## Extrapolations
This dataset has been extrapolated from year 1999 to the year of the calculation (2021). The uncertainty has been adjusted accordingly.

## Review by Maggie Osses 2003-06-03
Passed.

## Review by Emilia Moreno Ruiz 2012-05-31
dataset documented by trainee Diego Lima Medeiros
