# sawing, softwood

Dataset: EcoSpold 2, unit process
Geography: CA-QC
Time period: 2006-01-01 to 2021-12-31
Technology level: current
Classification: ISIC rev.4 ecoinvent: 1610:Sawmilling and planing of wood
Scenario: Business-as-Usual
System model: Allocation, cut-off by classification
Share of production covered: 6 %
Generated by: Hugues Imbeault-Tétreault
Database: ecoinvent
isCopyrightProtected: true
accessRestrictedTo: 1

## General comment
This dataset represents the service of sawing one m3 softwood at a sawmill.
The process chain in a sawmill is a net of interlinked processes; the process structure depends on the individual design and technologies in place for each sawmill. The structuring of the sawmilling processes is based on the identification of the core processes in a sawmill that are attributable to several co-products (such as upstream processes like forestry and transport of logs to the sawmill) sorting, storing and the sawing of the (debarked) log. Other processes are attributable directly to one of the co-products such as the chipping of residual wood (either after sawing or as part of the profile chipping), the chipping of the bark (the "debarking") or the suction of saw dust as collection and internal transport.
The following figure illustrates the general structure of the sawmilling processes before eventual drying and planing:
For the sawing, no distinction is made regarding different types of sawn wood products such as beams, boards and laths as sawing pattern largely depend on the diameter of the log and usually different types and sizes of sawn timber products are produced in the same cut.
The Quebec inventory data contains a small amount of wood waste sent to landfill (0.6% of wood input). However, it was not included in the dataset.

## Included activities start
The sawing process starts with the sorting of the log at the sawmill.

## Included activities end
This activity ends with sawn softwood, at sawmill; the processing of all co-products form the sawing process are covered in separate datasets. The dataset includes dust emission.

## Geography
Average data from 6 sawmills located in the province of Quebec, Canada.

## Technology
Dimension sawmills, stud sawmills and both.

## Parameters
- share of waste wood: 0.6 dimensionless; name share_waste_wood
- wood density, apparent: 690.199 kg/m3; name wood_d_apparent; = (1+moisture_sawnwood/100)* basic_wood_d
  kg wet matter/wet volume
- share of sawnwood: 52.5 dimensionless; name share_sawnwood; = 100 - share_sawdust - share_slab-share_waste_wood
  share of sawnwood produced from the debarked stem volume
- moisture content saw dust: 70 dimensionless; name moisture_sawdust
  moisture content of sawdust
- Bark ratio: 0.102925 dimensionless; name bark
  ratio of the bark of the total stem volume
- share of slab: 41.1 dimensionless; name share_slab
  share of slabs/sidings/cut-offs produced from the debarked stem volume
- wood density, basic: 406 kg/m3; name basic_wood_d; = dry_wood_d*(1-30*shrinkage_ratio)
  kg oven-dry matter/wet volume
- share of sawdust: 5.8 dimensionless; name share_sawdust
  share of sawdust produced from the debarked stem volume
- moisture content sawnwood: 70 dimensionless; name moisture_sawnwood
  moisture content of sawnwood
- shrinkage ratio (u=30% - 0%): 0.0036182 dimensionless; name shrinkage_ratio; = 0.054273/15
  shrinkage ratio between u=30% to 0%
- moisture content slab: 70 dimensionless; name moisture_slab
  moisture content of slab
- wood density, dry: 455.435 kg/m3; name dry_wood_d
  kg oven-dry matter/oven-dry volume

## Reference product
- slab and siding, softwood, wet, measured as dry mass: 1 kg; name m_slab; = sawlog_nobark* share_slab/100* basic_wood_d; CPC 31600: Builders' joinery and carpentry of wood (including cellular wood panels, assembled parquet panels, shingles an[…]; By-product classification allocatable product; pedigree (1,1,1,1,1)
  calculated by the share and basic density as the moisture content is over 30%
  production volume 4.39992e9 kg; = m_slab*p_sawnwood/sawnwood_raw
    Calculated from production volume of reference product using the relative outputs.
  property heating value, net 7.79 MJ
    LHV is calculated based on the Carbon content of the product. More details can be found on the respective documentation.
  property water in wet mass 0.7 kg; name slab_WWM
  property wet mass 1.7 kg; name slab_WM
  property carbon content, non-fossil 0.494; name slab_C_content_non_fossil
    biogene carbon content on a dry matter basis
  property price 0.055 EUR2005; name m_slab_price_EUR2005
    Expert judgement (Urs Luginbühl, Swiss Sawmilling industry, personal communication in June 2014). Cross-reference; FAOSTAT (accessed 20140429). The price is calculated by using data on total world import quantity (m3) and import value (1000 USD), year 2005. 40461924 m3 of Chips and Particles was imported in the world in 2005. The import value was 3022227000 USD. The calculated price is thus (3022227000/40461924=74.7*0.8=) 62.2 Euro/m3. It is estimated, that the chips and particles are half hardwood (of density 650 kg/m3) and half softwood (of density 450 kg/m3), thus the remaining mixture has a density of 550 kg/m3. The recalculated price is (1/550*62.2=) 0.11 Euro/kg.
  property dry mass 1 kg; name slab_DM
  property carbon content, fossil 0; name slab_C_content_fossil
    fossil carbon content on a dry matter basis
  property water content 0.7; name slab_water_content; = moisture_slab/100
  property carbon content 0.494
    carbon content on a dry matter basis (reserved; not for manual entry)
  property true value 17.5384; name m_slab_true_value
    allocation property applied in "true value" allocation // value calculated from revenue
  properties: carbon allocation 0.494 kg
- sawnwood, softwood, raw: 0 m3; name sawnwood_raw; By-product classification allocatable product; CPC 31101: Wood, sawn or chipped lengthwise, sliced or peeled, of a thickness exceeding 6 mm, of coniferous wood
  production volume 1.3798e7 m3; name p_sawnwood
    Production volume of Quebec's sawn wood (including kiln dried planed, green planed and raw sawnwood) in 2007.
  property dry mass 406 kg; = basic_wood_d
  property price 160 EUR2005; name sawnwood_raw_price_EUR2005
    Expert judgement (Urs Luginbühl, Swiss Sawmilling industry, personal communication in June 2014). Cross-reference; FAOSTAT (accessed 20140428). The price is calculated by using data on total world import quantity (m3) and import value (1000 USD), year 2005. 109432798 m3 of Sawnwood (C) - coniferous was imported in the world in 2005. The import value was 22249842000 USD. The calculated price is thus (22249842000/109432798=203*0.8=) 164 Euro.
  property water content 0.7; = moisture_sawnwood/100
  property heating value, net 5130.57 MJ
    LHV is calculated based on the Carbon content of the product. More details can be found on the respective documentation.The property is based on a value of 7.79MJ/kg
  property wet mass 690.199 kg; name WM; = basic_wood_d*(1+moisture_sawnwood/100)
  property water in wet mass 284.2 kg; = WM- basic_wood_d
  property carbon content 0.494
    carbon content on a dry matter basis (reserved; not for manual entry)
  property true value 160; name sawnwood_raw_true_value
    allocation property applied in "true value" allocation // value calculated from revenue
  properties: carbon content, fossil 0, carbon content, non-fossil 0.494, carbon allocation 200.564 kg

## By-products
- sawdust, loose, wet, measured as dry mass: 0 kg; name m_sawdust; By-product classification allocatable product; CPC 3928: Sawdust and wood waste and scrap; pedigree (1,1,1,1,1)
  calculated by the share and basic density as the moisture content is over 30%
  production volume 6.20913e8 kg; = m_sawdust*p_sawnwood/sawnwood_raw
    Calculated from production volume of reference product using the relative outputs.
  property heating value, net 7.79 MJ
    (same comment as for slab and siding, softwood, wet, measured as dry mass)
  property price 0.034 EUR2005; name m_sawdust_price_EUR2005
    Estimated to have the same price bark.
  property water content 0.7; = moisture_sawdust/100
  property carbon content 0.494
    carbon content on a dry matter basis (reserved; not for manual entry)
  property true value 1.53001; name m_sawdust_true_value
    allocation property applied in "true value" allocation // value calculated from revenue
  properties: water in wet mass 0.7 kg, carbon content, non-fossil 0.494, wet mass 1.7 kg, dry mass 1 kg, carbon content, fossil 0, carbon allocation 0.494 kg
- bark: 0 kg; name m_bark; CPC 31230: Wood in chips or particles; By-product classification allocatable product; pedigree (1,1,1,1,1)
  calculated by the share and basic density as the moisture content is over 30%
  production volume 1.22827e9 kg; = m_bark*p_sawnwood/sawnwood_raw
    Calculated from production volume of reference product using the relative outputs.
  property price 0.034 EUR2005; name m_bark_price_EUR2005
    Data on Import/Export (USD/kg) from UN data has been used. (http://data.un.org/Data.aspx?d=ComTrade&f=_l1Code%3a45, [accessed 10th June 2010]) Commodity: 'Sawdust, wood waste or scrap'. A density of 250 kg/m3 was used to convert from M3 to kg (data on density: http://wiki.answers.com/Q/What_is_the_density_of_sawdust, [Accessed 13 June 2010]).
  property water content 0.7; = moisture_slab/100
  property heating value, net 7.37 MJ
    (same comment as for slab and siding, softwood, wet, measured as dry mass)
  property carbon content 0.494
    carbon content on a dry matter basis (reserved; not for manual entry)
  property true value 3.02662; name m_bark_true_value
    allocation property applied in "true value" allocation // value calculated from revenue
  properties: wet mass 1.7 kg, carbon content, non-fossil 0.494, water in wet mass 0.7 kg, dry mass 1 kg, carbon content, fossil 0, carbon allocation 0.494 kg

## Inputs from technosphere
- waste mineral oil: -4.18727e-5 kg; name m_waste_min_oil; lognormal variance with pedigree 0.1086, pedigree (1,3,4,1,1)
  waste motor oil and hydraulic fluids; greases are used in a dissipative way
  production volume 1.91286e6 kg; = p_sawnwood * (m_waste_min_oil / sawnwood_raw)
    Calculated from production volume of reference product using the relative outputs.
  property price 0 EUR2005; name m_waste_min_oil_price_EUR2005
  properties: dry mass 0.9 kg, water content 0.111111, heating value, net 34.7 MJ, carbon content, fossil 0.864444, wet mass 1 kg
  note on heating value, net: Value taken from the general comment of the treatment dataset.
  note on carbon content, fossil: Tab A.6, ecoinvent v2.2 report 13_I. C content has been calculated after data in the tables, and then referred to 1 kg DM
- lubricating oil: 3.23183e-5 kg; lognormal variance with pedigree 0.1086, pedigree (1,3,4,1,1)
  Hydraulic fluids, motor oils and greases.
  properties: dry mass 1 kg, heating value, net 40.2 MJ, carbon content, fossil 0.75, wet mass 1 kg
  note on heating value, net: Literature value, Source: IPCC 2006, 2006 IPCC Guidelines for National Greenhouse Gas Inventories, Prepared by the National Greenhouse Gas Inventories Programme, Eggleston H.S., Buendia L., Miwa K., Ngara T. and Tanabe K. (eds). Published: IGES, Japan
  note on carbon content, fossil: Lubricating oil is produced from diesel. C-content/dry mass of fats and oils considered 75%, from: ecoinvent v2.2 report, n 15a, pg 40
- sawmill: 6.61468e-11 unit; lognormal variance with pedigree 0.2592, pedigree (2,1,4,4,1)
  value taken from econvent 2.2
- diesel, burned in building machine: 0.0546138 MJ; = 5.053*0.84*42.6; lognormal variance with pedigree 0.1087, pedigree (1,3,4,3,1)
  Diesel for internal transport. Calculated based on reported fuel input volume, fuel density and net heating value per kg.
  properties: heating value, net 1 MJ
- heat, district or industrial, natural gas: 0.000522428 MJ; = 0.050157*36.3*0.95; lognormal variance with pedigree 0.0092, pedigree (1,3,4,1,1)
  Calculated based on reported natural gas input, the net heating value per m³ of natural gas and efficiency.
  properties: heating value, net 1 MJ
- heat, district or industrial, other than natural gas: 0.00133424 MJ; = 0.11453*40.6*0.95; lognormal variance with pedigree 0.0092, pedigree (1,3,4,1,1)
  Heavy fuel oil burned for heating. Calculated based on reported fuel input volume, net heating value per liter and efficiency.
  properties: heating value, net 1 MJ
- heat, district or industrial, other than natural gas: 0.000122815 MJ; = 0.011683*0.86*42.6*0.95; lognormal variance with pedigree 0.0092, pedigree (1,3,4,1,1)
  Light fuel oil burned for heating. Calculated based on reported fuel input volume, fuel density, net heating value per kg and efficiency.
- electricity, medium voltage: 0.00779481 kWh; name elec_midvol; = 37.227-m_bark*0.0207-m_sawdust*0.03-m_slab*0.0258; lognormal variance with pedigree 0.2586, pedigree (2,1,4,1,1)
  data from industry, i.e. consumption of over-all electricity of the sawmill including the first sawing step, minus electricty consumed for the chipping of residual wood, the bark handling as well as for the suction of sawdust (i.e. processes that are covered in separate datasets).
- propane, burned in building machine: 0.000452034 MJ; = 0.062549*0.515*46.46; lognormal variance with pedigree 0.0092, pedigree (1,3,4,1,1)
  Propane for internal transport. Calculated based on reported fuel input volume, fuel density, net heating value per kg and efficiency.
  properties: heating value, net 1 MJ
- sawlog and veneer log, softwood, measured as solid wood under bark: 0.000577199 m3; name sawlog_nobark; lognormal variance with pedigree 0.2586, pedigree (1,3,4,1,1)
  input of the log, from which 1 m3 of sawnwood is produced
  properties: dry mass 461.364 kg, dry mass under bark 387.2 kg, heating value, net 4483.78 MJ, water content 0.7, wet mass 784.318 kg, carbon content, non-fossil 0.494
  note on heating value, net: Value based on the dataset "softwood forestry, mixed species, sustainable forest management"The property is based on a value of 11.58MJ/kg

## Inputs from nature
- Carbon dioxide, non-fossil, resource correction [natural resource, in air]: 1.37699 kg; pedigree (1,1,1,1,1)
  This exchange has been added after economic allocation in order to re-balance the non-fossil carbon dioxide resource extraction.
- Water, river [natural resource, in water]: 3.46108e-5 m3; name vol_water_intake; lognormal variance with pedigree 0.0092, pedigree (1,3,4,1,1)
  data from industry

## Emissions to nature
- Water [water, surface water]: 2.31892e-5 m3; = vol_water_intake*0.67; lognormal variance with pedigree 0.0098, pedigree (2,3,4,1,1)
  67% of water intake is assumed discharged.
- Particulates, > 2.5 um, and < 10um [air, non-urban air or from high stacks]: 2.35591e-6 kg; lognormal variance with pedigree 0.1292, pedigree (2,3,4,1,1)
  data from industry; process emissions
- Suspended solids, unspecified [water, surface water]: 2.71836e-7 kg; lognormal variance with pedigree 0.0486, pedigree (1,3,4,1,1)
  data from industry
- Water [air, unspecified]: 1.14216e-5 m3; = vol_water_intake*0.33; lognormal variance with pedigree 0.0098, pedigree (2,3,4,1,1)
  33% of water intake is assumed dissipated.
- Particulates, > 10 um [air, non-urban air or from high stacks]: 1.17796e-5 kg; lognormal variance with pedigree 0.0492, pedigree (2,3,4,1,1)
  data from industry; process emissions
- Particulates, < 2.5 um [air, non-urban air or from high stacks]: 6.37304e-6 kg; lognormal variance with pedigree 0.3092, pedigree (2,3,4,1,1)
  data from industry; process emissions

## Sampling procedure
Mostly primary data from 6 sawmills located in the province of Quebec (Canada).
