# heat production, hard coal briquette, stove 5-15kW

Dataset: EcoSpold 2, unit process
Geography: RoW
Time period: 1988-01-01 to 2021-12-31
Technology level: current
Classification: ISIC rev.4 ecoinvent: 3530:Steam and air conditioning supply
Classification: EcoSpold01Categories: hard coal/heating systems
Tags: ConvertedDataset
Scenario: Business-as-Usual
System model: Allocation, cut-off by classification
Generated by: Christian Bauer
Published in: Röder, A. 2004
Database: ecoinvent
isCopyrightProtected: true
accessRestrictedTo: 1

## General comment
The stove is assumed to fire hard coal briquettes. The heating value (31.4 MJ/kg) and the composition of the briquettes are average values available from the literature. The emission data are also taken from literature reporting measurements performed at the end of the 1980s in Germany. Size distribution of particles has been estimated on the basis of recent information from EPA. Emissions of trace elements were calculated using the ash content in the coal and average transfer coefficients for coal power plants with ash retention of 98 %, as first approximation.
[This dataset was already contained in the ecoinvent database version 2. It was not individually updated during the transfer to ecoinvent version 3. Life Cycle Impact Assessment results may still have changed, as they are affected by changes in the supply chain, i.e. in other datasets. This dataset was generated following the ecoinvent quality guidelines for version 2. It may have been subject to central changes described in the ecoinvent version 3 change report (http://www.ecoinvent.org/database/ecoinvent-version-3/reports-of-changes/), and the results of the central updates were reviewed extensively. The changes added e.g. consistent water flows and other information throughout the database. The documentation of this dataset can be found in the ecoinvent reports of version 2, which are still available via the ecoinvent website. The change report linked above covers all central changes that were made during the conversion process.]

## Included activities end
House heating. The module describes the combustion process and includes coal transport and ash disposal.

## Geography
German conditions.

## Technology
Average used in early 1990s.

## Reference product
- heat, central or small-scale, other than natural gas: 1 MJ; CPC 17300: Steam and hot water; By-product classification allocatable product
  EcoSpold01Location=RER
  production volume 5.36902e12 MJ; name heat_apv
    Assumption. This production volume does not represent a realistic value, but reflects the share of heat from coal sources on the market for heat, central or small-scale, other than natural gas.
    See talk pages for further discussion.
    A relation of 1:100 between the geographies RER and RoW was assumed.
    //Original comment //:
    IEA coal and Peat statistics for 2007 (http://www.iea.org/stats/coaldata.asp?COUNTRY_CODE=29), residential, commercial and agriculture. All patent fuel in kg converted to MJ heat out by multiplying with 0.67 (conversion efficiency on a gross heating value basis) and dividing by 0.0323 (kg/MJ gross heating value)
  property price 0.0106 EUR2005
    Average European district heat price from Ecoheatcool and Euroheat 2005-2006, Ecoheat Work package 1: The European heat market. Final report. 10.6 EUR/GJ i s the price of district heat. http://www.solarthermalworld.org/files/Ecoheatcool%20WP1%20Web.pdf?download
  properties: Corresponding fuel use 1.43 MJ, heating value, net 1 MJ

## Inputs from technosphere
- coal stove, 5-15kW: 8.2797e-7 unit; lognormal variance with pedigree 0.3532, pedigree (2,3,5,5,1)
  Infrastructure
  EcoSpold01Location=RER
  Uncertainty: infrastructure
- hard coal ash: -0.004433 kg; name hard_coal_ash; lognormal variance with pedigree 0.112, pedigree (5,1,5,5,1)
  EcoSpold01Location=PL
  Assumption: no reuse
  Uncertainty: assumption: no reuse
  production volume 2.38009e10 kg; = heat_apv*hard_coal_ash
    Calculated from the production volume of hard coal briquette, burned in stove 5-15kW in proportion to the respective output amounts.
  property price 0 EUR2005; name hard_coal_ash_price_EUR2005
  properties: dry mass 1 kg, wet mass 1 kg
- hard coal briquettes: 1.43 MJ; lognormal variance with pedigree 0.0601, pedigree (4,2,5,5,1)
  EcoSpold01Location=RER
  Fuel input
  Uncertainty: fuel input
  properties: wet mass 0.0318471 kg, carbon content, fossil 0.833333, water content 0.0416667, dry mass 0.0305732 kg
  note on carbon content, fossil: 80% C and 4% water in wet mass (ecoinvent v2.1 report 6_VI Table 7.1)

## Emissions to nature
- Phenol [air, urban air close to ground]: 7.15e-8 kg; lognormal variance with pedigree 0.0932, pedigree (2,3,5,5,1)
  Total NMVOC and profile estimate
  Uncertainty: total NMVOC and profile estimate
- Chromium [air, urban air close to ground]: 5.0908e-8 kg; lognormal variance with pedigree 0.728, pedigree (4,5,5,5,1)
  From trace element balance; see report for details
  Uncertainty: from trace element balance; see report for details
- Manganese [air, urban air close to ground]: 1.8018e-7 kg; lognormal variance with pedigree 0.728, pedigree (4,5,5,5,1)
  (same comment as for Chromium)
- Hydrocarbons, aliphatic, alkanes, unspecified [air, urban air close to ground]: 7.15e-6 kg; lognormal variance with pedigree 0.0932, pedigree (2,3,5,5,1)
  Total NMVOC and profile estimate
  Uncertainty: total NMVOC and profile estimate
- Dioxins, measured as 2,3,7,8-tetrachlorodibenzo-p-dioxin [air, urban air close to ground]: 2.86e-13 kg; lognormal variance with pedigree 0.3532, pedigree (2,3,5,5,1)
- Radium-228 [air, urban air close to ground]: 0.0003718 kBq; lognormal variance with pedigree 0.728, pedigree (4,5,5,5,1)
  From radioactivity of the elements; see report for details
  Uncertainty: from radioactivity of the elements; see report for details
- Hydrogen sulfide [air, urban air close to ground]: 1.43e-6 kg; lognormal variance with pedigree 0.0932, pedigree (2,3,5,5,1)
  Typical value
  Uncertainty: typical value
- Cadmium [air, urban air close to ground]: 9.009e-9 kg; lognormal variance with pedigree 0.728, pedigree (4,5,5,5,1)
  (same comment as for Chromium)
- Propene [air, urban air close to ground]: 7.15e-6 kg; lognormal variance with pedigree 0.0932, pedigree (2,3,5,5,1)
  Total NMVOC and profile estimate
  Uncertainty: total NMVOC and profile estimate
- Ethene [air, urban air close to ground]: 4.29e-5 kg; lognormal variance with pedigree 0.0932, pedigree (2,3,5,5,1)
  Total NMVOC and profile estimate
  Uncertainty: total NMVOC and profile estimate
- Polonium-210 [air, urban air close to ground]: 0.0004862 kBq; lognormal variance with pedigree 0.728, pedigree (4,5,5,5,1)
  (same comment as for Radium-228)
- Radium-226 [air, urban air close to ground]: 6.864e-5 kBq; lognormal variance with pedigree 0.728, pedigree (4,5,5,5,1)
  (same comment as for Radium-228)
- Antimony [air, urban air close to ground]: 1.0296e-8 kg; lognormal variance with pedigree 0.728, pedigree (4,5,5,5,1)
  (same comment as for Chromium)
- Uranium [air, urban air close to ground]: 1.0296e-8 kg; lognormal variance with pedigree 0.728, pedigree (4,5,5,5,1)
  (same comment as for Chromium)
- Thorium [air, urban air close to ground]: 8.2368e-9 kg; lognormal variance with pedigree 0.728, pedigree (4,5,5,5,1)
  (same comment as for Chromium)
- Selenium [air, urban air close to ground]: 2.574e-8 kg; lognormal variance with pedigree 0.728, pedigree (4,5,5,5,1)
  (same comment as for Chromium)
- Potassium [air, urban air close to ground]: 7.2072e-6 kg; lognormal variance with pedigree 0.728, pedigree (4,5,5,5,1)
  (same comment as for Chromium)
- Thorium-232 [air, urban air close to ground]: 2.002e-5 kBq; lognormal variance with pedigree 0.728, pedigree (4,5,5,5,1)
  (same comment as for Radium-228)
- Chromium VI [air, urban air close to ground]: 5.148e-10 kg; lognormal variance with pedigree 0.522, pedigree (1,1,5,5,1)
  based on range of data
- Lead-210 [air, urban air close to ground]: 0.00026598 kBq; lognormal variance with pedigree 0.728, pedigree (4,5,5,5,1)
  (same comment as for Radium-228)
- Bromine [air, urban air close to ground]: 5.4197e-8 kg; lognormal variance with pedigree 0.728, pedigree (4,5,5,5,1)
  (same comment as for Chromium)
- Uranium-238 [air, urban air close to ground]: 5.72e-5 kBq; lognormal variance with pedigree 0.728, pedigree (4,5,5,5,1)
  (same comment as for Radium-228)
- Beryllium [air, urban air close to ground]: 7.2072e-9 kg; lognormal variance with pedigree 0.728, pedigree (4,5,5,5,1)
  (same comment as for Chromium)
- Ethane [air, urban air close to ground]: 2.145e-5 kg; lognormal variance with pedigree 0.0932, pedigree (2,3,5,5,1)
  Total NMVOC and profile estimate
  Uncertainty: total NMVOC and profile estimate
- Hydrocarbons, aliphatic, unsaturated [air, urban air close to ground]: 7.15e-6 kg; lognormal variance with pedigree 0.0932, pedigree (2,3,5,5,1)
  Total NMVOC and profile estimate
  Uncertainty: total NMVOC and profile estimate
- Carbon monoxide, fossil [air, urban air close to ground]: 0.00715 kg; lognormal variance with pedigree 0.6932, pedigree (2,3,5,5,1)
  Typical value
  Uncertainty: typical value
- Benzene [air, urban air close to ground]: 7.15e-6 kg; lognormal variance with pedigree 0.0932, pedigree (2,3,5,5,1)
  Total NMVOC and profile estimate
  Uncertainty: total NMVOC and profile estimate
- Scandium [air, urban air close to ground]: 7.2072e-9 kg; lognormal variance with pedigree 0.728, pedigree (4,5,5,5,1)
  (same comment as for Chromium)
- Strontium [air, urban air close to ground]: 7.722e-7 kg; lognormal variance with pedigree 0.728, pedigree (4,5,5,5,1)
  (same comment as for Chromium)
- Sodium [air, urban air close to ground]: 3.6179e-6 kg; lognormal variance with pedigree 0.728, pedigree (4,5,5,5,1)
  (same comment as for Chromium)
- Iodine [air, urban air close to ground]: 6.5065e-8 kg; lognormal variance with pedigree 0.728, pedigree (4,5,5,5,1)
  (same comment as for Chromium)
- Tin [air, urban air close to ground]: 3.6179e-9 kg; lognormal variance with pedigree 0.728, pedigree (4,5,5,5,1)
  (same comment as for Chromium)
- Zinc [air, urban air close to ground]: 9.009e-7 kg; lognormal variance with pedigree 0.728, pedigree (4,5,5,5,1)
  (same comment as for Chromium)
- Phosphorus [air, urban air close to ground]: 3.6179e-7 kg; lognormal variance with pedigree 0.728, pedigree (4,5,5,5,1)
  (same comment as for Chromium)
- Propane [air, urban air close to ground]: 1.43e-5 kg; lognormal variance with pedigree 0.0932, pedigree (2,3,5,5,1)
  Total NMVOC and profile estimate
  Uncertainty: total NMVOC and profile estimate
- Methane, fossil [air, urban air close to ground]: 0.000429 kg; lognormal variance with pedigree 0.0932, pedigree (2,3,5,5,1)
  Typical value
  Uncertainty: typical value
- Hydrogen fluoride [air, urban air close to ground]: 2.0306e-6 kg; lognormal variance with pedigree 0.118, pedigree (4,5,5,5,1)
  (same comment as for Chromium)
- Carbon dioxide, fossil [air, urban air close to ground]: 0.117975 kg; lognormal variance with pedigree 0.0427, pedigree (2,2,5,5,1)
  From carbon balance
  Uncertainty: from carbon balance
- Aluminium [air, urban air close to ground]: 6.1204e-5 kg; lognormal variance with pedigree 0.728, pedigree (4,5,5,5,1)
  (same comment as for Chromium)
- Hydrogen chloride [air, urban air close to ground]: 3.4606e-5 kg; lognormal variance with pedigree 0.118, pedigree (4,5,5,5,1)
  (same comment as for Chromium)
- Xylene [air, urban air close to ground]: 1.43e-6 kg; lognormal variance with pedigree 0.0932, pedigree (2,3,5,5,1)
  Total NMVOC and profile estimate
  Uncertainty: total NMVOC and profile estimate
- Toluene [air, urban air close to ground]: 1.43e-6 kg; lognormal variance with pedigree 0.0932, pedigree (2,3,5,5,1)
  Total NMVOC and profile estimate
  Uncertainty: total NMVOC and profile estimate
- Sulfur dioxide [air, urban air close to ground]: 0.0006435 kg; lognormal variance with pedigree 0.078, pedigree (4,5,5,5,1)
  From S-balance
  Uncertainty: from S-balance
- NMVOC, non-methane volatile organic compounds, unspecified origin [air, urban air close to ground]: 2.5454e-5 kg; lognormal variance with pedigree 0.0932, pedigree (2,3,5,5,1)
  Total NMVOC and profile estimate
  Uncertainty: total NMVOC and profile estimate
- Radon-222 [air, urban air close to ground]: 5.72e-6 kBq; lognormal variance with pedigree 0.728, pedigree (4,5,5,5,1)
  (same comment as for Radium-228)
- Dinitrogen monoxide [air, urban air close to ground]: 2.145e-6 kg; lognormal variance with pedigree 0.0932, pedigree (2,3,5,5,1)
  Typical value
  Uncertainty: typical value
- Formaldehyde [air, urban air close to ground]: 1.43e-7 kg; lognormal variance with pedigree 0.0932, pedigree (2,3,5,5,1)
  Total NMVOC and profile estimate
  Uncertainty: total NMVOC and profile estimate
- Particulates, < 2.5 um [air, urban air close to ground]: 2.86e-5 kg; lognormal variance with pedigree 0.378, pedigree (4,5,5,5,1)
  Total PM and profile estimates
  Uncertainty: total PM and profile estimates
- Nickel [air, urban air close to ground]: 1.7017e-7 kg; lognormal variance with pedigree 0.728, pedigree (4,5,5,5,1)
  (same comment as for Chromium)
- Arsenic [air, urban air close to ground]: 1.43e-7 kg; lognormal variance with pedigree 0.728, pedigree (4,5,5,5,1)
  (same comment as for Chromium)
- Silicon [air, urban air close to ground]: 9.0376e-5 kg; lognormal variance with pedigree 0.728, pedigree (4,5,5,5,1)
  (same comment as for Chromium)
- Calcium [air, urban air close to ground]: 7.2072e-6 kg; lognormal variance with pedigree 0.728, pedigree (4,5,5,5,1)
  (same comment as for Chromium)
- Vanadium [air, urban air close to ground]: 2.0592e-7 kg; lognormal variance with pedigree 0.728, pedigree (4,5,5,5,1)
  (same comment as for Chromium)
- Cobalt [air, urban air close to ground]: 2.574e-8 kg; lognormal variance with pedigree 0.728, pedigree (4,5,5,5,1)
  (same comment as for Chromium)
- Nitrogen oxides [air, urban air close to ground]: 7.15e-5 kg; lognormal variance with pedigree 0.0932, pedigree (2,3,5,5,1)
  Typical value
  Uncertainty: typical value
- Radon-220 [air, urban air close to ground]: 5.72e-6 kBq; lognormal variance with pedigree 0.728, pedigree (4,5,5,5,1)
  (same comment as for Radium-228)
- Particulates, > 2.5 um, and < 10um [air, urban air close to ground]: 5.72e-5 kg; lognormal variance with pedigree 0.198, pedigree (4,5,5,5,1)
  Total PM and profile estimates
  Uncertainty: total PM and profile estimates
- Particulates, > 10 um [air, urban air close to ground]: 0.0002002 kg; lognormal variance with pedigree 0.118, pedigree (4,5,5,5,1)
  Total PM and profile estimates
  Uncertainty: total PM and profile estimates
- Iron [air, urban air close to ground]: 2.5311e-5 kg; lognormal variance with pedigree 0.728, pedigree (4,5,5,5,1)
  (same comment as for Chromium)
- Molybdenum [air, urban air close to ground]: 1.5444e-8 kg; lognormal variance with pedigree 0.728, pedigree (4,5,5,5,1)
  (same comment as for Chromium)
- Lead [air, urban air close to ground]: 6.1776e-7 kg; lognormal variance with pedigree 0.728, pedigree (4,5,5,5,1)
  (same comment as for Chromium)
- Thorium-228 [air, urban air close to ground]: 3.146e-5 kBq; lognormal variance with pedigree 0.728, pedigree (4,5,5,5,1)
  (same comment as for Radium-228)
- Copper [air, urban air close to ground]: 8.8803e-8 kg; lognormal variance with pedigree 0.728, pedigree (4,5,5,5,1)
  (same comment as for Chromium)
- Ethyne [air, urban air close to ground]: 7.15e-6 kg; lognormal variance with pedigree 0.0932, pedigree (2,3,5,5,1)
  Total NMVOC and profile estimate
  Uncertainty: total NMVOC and profile estimate
- Titanium [air, urban air close to ground]: 2.1736e-6 kg; lognormal variance with pedigree 0.728, pedigree (4,5,5,5,1)
  (same comment as for Chromium)
- Boron [air, urban air close to ground]: 6.3778e-7 kg; lognormal variance with pedigree 0.728, pedigree (4,5,5,5,1)
  (same comment as for Chromium)
- Thallium [air, urban air close to ground]: 9.0376e-9 kg; lognormal variance with pedigree 0.728, pedigree (4,5,5,5,1)
  (same comment as for Chromium)
- Mercury [air, urban air close to ground]: 3.8181e-9 kg; lognormal variance with pedigree 0.728, pedigree (4,5,5,5,1)
  (same comment as for Chromium)
- Benzo(a)pyrene [air, urban air close to ground]: 5.72e-8 kg; lognormal variance with pedigree 0.0932, pedigree (2,3,5,5,1)
  Total NMVOC and profile estimate
  Uncertainty: total NMVOC and profile estimate
- Potassium-40 [air, urban air close to ground]: 7.722e-5 kBq; lognormal variance with pedigree 0.728, pedigree (4,5,5,5,1)
  (same comment as for Radium-228)
- Barium [air, urban air close to ground]: 5.148e-7 kg; lognormal variance with pedigree 0.728, pedigree (4,5,5,5,1)
  (same comment as for Chromium)
- Magnesium [air, urban air close to ground]: 2.1736e-5 kg; lognormal variance with pedigree 0.728, pedigree (4,5,5,5,1)
  (same comment as for Chromium)

## Sampling procedure
literature

## Extrapolations
see Geography/Text This dataset has been copied from an original dataset covering the geography RER. The uncertainty has been adjusted accordingly.

## Review by Hans-Jörg Althaus 2005-07-19
passed
