# treatment of used refrigeration machine, R134a as refrigerant

Dataset: EcoSpold 2, unit process
Geography: GLO
Time period: 2010-01-01 to 2021-12-31
Technology level: current
Classification: EcoSpold01Categories: transport systems/road
Classification: ISIC rev.4 ecoinvent: 3830:Materials recovery
Scenario: Business-as-Usual
System model: Allocation, cut-off by classification
Generated by: Tereza Levova
Database: ecoinvent
isCopyrightProtected: true
accessRestrictedTo: 1

## General comment
This dataset represents the treatment of used refrigeration machine which uses R134a as refrigerant.

## Included activities start
The activity starts when the used refrigeration machine enters the waste treatment facility.

The data on energy needed during dismantling are unknown.

## Included activities end
The activity ends by different waste materials being ready for further treatment.

## Technology
The inventory is created by looking at the material composition of the container.

## Reference product
- used refrigeration machine, R134a as refrigerant: -1 unit; name used_ref_mach; CPC 39990: Other wastes n.e.c.; By-product classification Waste
  production volume 109800 unit; name used_ref_mach_RP_PV
    It is assumed, that same amount of refrigeration machine which is produced a year is also scrapped every year.
  property price 0 EUR2005; name used_ref_mach_price_EUR2005
    Waste products are assigned a price of zero as they are assumed to require further treatment.
  property carbon content 0.0862658
    carbon content on a dry matter basis (reserved; not for manual entry)
  properties: water content 0, wet mass 380 kg, carbon content, non-fossil 5.26316e-6, carbon content, fossil 0.0862605, water in wet mass 0 kg, dry mass 380 kg, carbon allocation 32.781 kg

## By-products
- electronics scrap: 0 kg; By-product classification Recyclable; CPC 39: Wastes or scraps
  Literature value from the refrigeration machine production dataset.
  production volume 0 kg; = ABS(ByP_8/ used_ref_mach* used_ref_mach_RP_PV)
    Calculated from production volume of reference product using the relative outputs.
  property carbon content, non-fossil 0.0045566
    Carbon content assumed equal with the intermediate exchange of "electronic component, passive, unspecified"
  property carbon content, fossil 0.317311
    (same comment as for electronics scrap)
  property price 16.1 EUR2005; name ByP_8_price_EUR2005
    Temporary price data. Calculated as 90% of purchasers price based on: 2005 import prices (total trades (USD) divided by total weight (kg) in biggest economies of the world: EU27, USA, Brasil, China, India, Japan and Russia) from UN Commodity Trade Statistics Database (http://data.un.org/Explorer.aspxDatabase [Accessed 2011.06.20]). Commodity: Waste/scrap, precious metals except pure gold/platinum
  property carbon content 0.321868
    carbon content on a dry matter basis (reserved; not for manual entry)
  properties: wet mass 1 kg, water content 0, dry mass 1 kg, water in wet mass 0 kg, carbon allocation 0.321868 kg

## Inputs from technosphere
- used refrigerant R134a: -4.5 kg; name ByP_9
  Literature value from the refrigeration machine production dataset.
  production volume 494100 kg; = ABS(ByP_9/ used_ref_mach* used_ref_mach_RP_PV)
    Calculated from production volume of reference product using the relative outputs.
  property price 0 EUR2005; name ByP_9_price_EUR2005
  properties: heating value, net 13.47 MJ
- used cable: -18.72 kg; name ByP_4; = (18*1.04)*-1
  Literature value from the refrigeration machine production dataset.
  18m is the length of the cable
  1.04kg/m is its weight per m
  production volume 2.05546e6 kg; = ABS(ByP_4/ used_ref_mach* used_ref_mach_RP_PV)
    Calculated from production volume of reference product using the relative outputs.
  property price 0 EUR2005; name ByP_4_price_EUR2005
  properties: carbon content, fossil 0.27472, dry mass 1 kg, wet mass 1 kg
  note on carbon content, fossil: According to the European company, 1 kg cable is split up into 0.66 kg of copper and 0.34 kg of plastics (ecoinvent v2.2 report 18_V, pg 97). Plastic C content (0.808) was calculated using data in Tab A.2, ecoinvent v2.2 report 13_I.
- waste plastic, industrial electronics: 0 kg; name ByP_6
  Literature value from the refrigeration machine production dataset.
  production volume 0 kg
    Calculated from production volume of reference product using the relative outputs.
  property price 0 EUR2005; name ByP_6_price_EUR2005
  properties: heating value, net 34.78 MJ, water content 0.180638, wet mass 1 kg, carbon content, fossil 0.81386, dry mass 0.847 kg
- waste polypropylene: 0 kg; name ByP_7
  Literature value from the refrigeration machine production dataset.
  production volume 0 kg
    Calculated from production volume of reference product using the relative outputs.
  property price 0 EUR2005; name ByP_7_price_EUR2005
  properties: dry mass 0.841 kg, water content 0.189061, wet mass 1 kg, heating value, net 32.78 MJ, carbon content, fossil 0.825208
  note on heating value, net: Value assumed for all polypropylene products. Source: Phyllis2, database for (treated) biomass, algae, feedstocks for biogas production and biochar, https://phyllis.nl/Biomass/View/1186, ECN.TNO
- scrap aluminium: 0 kg; name ByP_3
  Literature value from the refrigeration machine production dataset.
  production volume 0 kg
    Calculated from production volume of reference product using the relative outputs.
  property price 0 EUR2005; name ByP_3_price_EUR2005
  properties: wet mass 1 kg, dry mass 1 kg
- building, hall: 0.000495986 m2; = 1/(( lifetime_building*365)/(2.235*2.025*2))
  Calculated value based on estimates.
  1m2 of hall is available every day for 50 years
  1 refrigeration machine occupies during the dismantling the area of its base for the period of 2 days
  property lifetime 50 year; name lifetime_building
- scrap copper: 0 kg; name ByP_5
  Literature value from the refrigeration machine production dataset.
  production volume 0 kg
    Calculated from production volume of reference product using the relative outputs.
  property price 0 EUR2005; name ByP_5_price_EUR2005
  properties: dry mass 1 kg, wet mass 1 kg
- waste polyurethane foam: 0 kg; name ByP_1
  Literature value from the refrigeration machine production dataset.
  production volume 0 kg
    Calculated from production volume of reference product using the relative outputs.
  property price 0 EUR2005; name ByP_1_price_EUR2005
  properties: water content 0.00200401, heating value, net 30.67 MJ, carbon content, fossil 0.641283, wet mass 1 kg, dry mass 0.998 kg
- scrap steel: 0 kg; name ByP_2
  Literature value from the refrigeration machine production dataset.
  production volume 0 kg
    Calculated from production volume of reference product using the relative outputs.
  property price 0 EUR2005; name ByP_2_price_EUR2005
  properties: wet mass 1 kg, dry mass 1 kg
- electronics scrap: -15 kg
  Literature value from the refrigeration machine production dataset.
  production volume 1.647e6 kg
  properties: carbon content, non-fossil 0.0045566, wet mass 1 kg, dry mass 1 kg, carbon content, fossil 0.317311
  note on carbon content, non-fossil: Carbon content assumed equal with the intermediate exchange of "electronic component, passive, unspecified"
- waste plastic, industrial electronics: -4.63929e-6, -0.000307086 kg (2 entries)
  Literature value from the refrigeration machine production dataset.
  production volume 34.2274 kg
- waste polypropylene: -0.824333, -0.0635512, -0.0262489, -0.0249258, -0.951136, -0.0106043, -0.00480628, -6.65848 kg (8 entries)
  Literature value from the refrigeration machine production dataset.
  production volume 940336 kg
- scrap aluminium: -36.8715, -1.72992, -77.6362 kg (3 entries)
  Literature value from the refrigeration machine production dataset.
  production volume 1.27629e7 kg
- scrap copper: -2.05706, -0.0965128, -4.33133 kg (3 entries)
  Literature value from the refrigeration machine production dataset.
  production volume 712042 kg
- waste polyurethane foam: -0.0115285, -14.6976 kg (2 entries)
  Literature value from the refrigeration machine production dataset.
  production volume 1.61506e6 kg
- scrap steel: -34.6455, -0.0438946, -107.595 kg (3 entries)
  Literature value from the refrigeration machine production dataset.
  production volume 1.56228e7 kg

## Extrapolations
This dataset has been extrapolated from year 2014 to the year of the calculation (2021). The uncertainty has been adjusted accordingly.

## Review by Gabor Doka 2014-12-19
passed
