# electricity production, oil

Dataset: EcoSpold 2, unit process
Geography: HR
Time period: 1980-01-01 to 2021-12-31
Technology level: current
Classification: ISIC rev.4 ecoinvent: 3510:Electric power generation, transmission and distribution
Classification: EcoSpold01Categories: oil/power plants
Synonyms: petroleum; heavy fuel oil
Tags: oil power; fossil fuels
Scenario: Business-as-Usual
System model: Allocation, cut-off by classification
Generated by: Karin Treyer
Published in: Jungbluth, N. 2007
Database: ecoinvent
isCopyrightProtected: true
accessRestrictedTo: 1

## General comment
This dataset represents the production of high voltage electricity at a grid-connected oil power plant with a capacity of 500 MW on the world in 2012.
Emissions are in general calculated/estimated based on the fuel oil type S, European quality. This dataset has been built on the basis of oil electricity production datasets in version 2 of the ecoinvent database which were elaborated by N. Jungbluth 2007 (see main publication in modelling and administrative). The values and emissions are a weighted average of emissions in all datasets in version 2 (which are considered as the global values) multiplied with an efficiency scaling factor. The datasets in version 2 were valid for the following countries: AT, BE, BR, GR, CN, CS, CZ, DE, DK, ES, FI, FR, GB, GR, HR, HU, IE, IT, JP, MK, NL, NO, PT, PL, SE, SI, SK. Weighting was made with electricity production data in those countries based on IEA/OECD 2010. The weighted averages are taken as global values and then scaled with a factor derived from the comparison of the global average efficiency and the efficiency valid for this dataset in order to account for a higher or lower fuel input for the production of 1 kWh, respectively. Nothing else than the efficiency has been adjusted in this dataset; besides that no new data collection has taken place
Comments:
- sulfur content of the oil is not adapted to local/average conditions.
- CO2 emissions are presented for the combustion and for the flue gas treatment
- Extensive comments on emissions can be found in Jungbluth 2007, on which this dataset is based on.
Emissions to the water are from flue gas treatment. Most of these data come from two power plants in Portugal (EDP 2001) and data from Slowakia
EDP (2001) Environmental Report 2000. Electricidade de Portugal, S.A., Lisboa, PT, retrieved from: www.edp.pt.
Slovenské elektrárne (2002) Environment Report 2001, Bratislave, SK, retrieved from: www.seas.sk.
IEA/OECD. 2010. Electricity Information 2010. International Energy Agency (IEA), Paris Cedex (FR). Part IV. Detailed OECD Electricity And Heat Data.

## Included activities start
From the constructed power plant ready to produce electricity and from the fuel ready to be used.

## Included activities end
This activity ends with 1kWh of high voltage electricity produced at the power plant and arrived at the busbar.

This dataset includes all energy use, use of chemicals, emissions to air and water including treatment of flue gasses and effluents. In an oil power plant, water is needed for cooling, feed water for the steam circuit, for the flue gas treatment, or other cleaning. This dataset only considers water use (evaporation) for cooling and steam circuit.

## Technology
Electricity production in a conventional oil power plant with a capacity of 500 MWe.

## Time period
The Annual Production Volume is valid for the year 2012.

## Parameters
- water withdrawal, electricity production from oil, recirculating CS: 0.0021 m3/kWh; name WWithdrawal_EP_oil_recirculating_CS; lognormal variance with pedigree 0.092025, pedigree (4,4,3,2,4)
  Estimated based on literature (Scown, 2011, Water Footprint of U.S. Transportation Fuels, SI).
  nan
- fraction, cooling water, to air: 0.0118019 dimensionless; name fraction_CW_to_air; lognormal variance with pedigree 0.041425, pedigree (2,3,2,2,1)
  Calculated value
  nan
- fraction, water, completely softened, to air: 0.15 dimensionless; name fraction_WCS_to_air; = fraction_PW_to_air; lognormal variance with pedigree 0.092025, pedigree (4,4,3,2,4)
  Calculated value. See comment in the other parametres present in this dataset. Water, completely softened is considered to be always used as process water, thus process water fractions to air are applied to all water, completely softened input flows to calculate the amount of water consumed in the processes.
  nan
- factor: input of MJ for the production of 1 kWh: 10.6195 MJ/kWh; name factor_MJ_kWh; = 1*3.6/efficiency_oil_country; lognormal variance with pedigree 0.0006, pedigree (1,1,1,1,1)
  Calculated value. 3.6 MJ = 1kWh.
  nan
- relation between the global and the country's efficiency of oil power plants: 1.09145 dimensionless; name relation_global_country; = efficiency_oil_global/ efficiency_oil_country; undefined min 1, max 1, standardDeviation95 0, pedigree (1,1,1,1,1)
  Parameter not needed in this dataset but present due to parent child relationship.
  nan
- fraction, water, decarbonised, to air: 0.0118019 dimensionless; name fraction_WDC_to_air; = fraction_CW_to_air; lognormal variance with pedigree 0.041425, pedigree (2,3,2,2,1)
  Calculated value. See comments in the other parametres present in this dataset. Decarbonised water is considered to be always used as cooling water, thus cooling water fractions to air are applied to all carbonised water input flows to calculate the amount of water consumed in the processes.
  nan
- water consumption, electricity production from oil, recirculating CS: 0.0018 m3/kWh; name WConsumption_EP_oil_recirculatingCS; lognormal variance with pedigree 0.092025, pedigree (4,4,3,2,4)
  (same comment as for water withdrawal, electricity production from oil, recirculating CS)
- once-through and cooling pond cooling systems as a fraction of all cooling syste: 0.73 dimensionless; name once_through_andCP_CS_fractio_from_allCS; lognormal variance with pedigree 0.092025, pedigree (4,4,3,2,4)
  Calculated as an average of data available for Europe (Floerke, 2008, Future changes of freshwater needs in the electricity production sector) and USA (NERL, 2011, Estimating freshwater needs to meet future thermoelectric generation requirements).
  nan
- fraction, process water, to air: 0.15 dimensionless; name fraction_PW_to_air; lognormal variance with pedigree 0.092025, pedigree (4,4,3,2,4)
  Literature value. In case when no industry/process specific data are available, default evaporation fraction value is used. This value is 15% and is based on literature (Statistics Canada, 2007 & Shaffer, K.H., 2008, Consumptive water use in the Great Lakes Basin, USGS & Shiklomanov, 2003, World Water Resources at the Beginning of the 21st Century) and has been approved by an expert.
  nan
- average efficiency of oil power plants, country: 0.339 dimensionless; name efficiency_oil_country; lognormal variance with pedigree 0.003825, pedigree (3,3,1,2,2)
  Literature value/calculated value. Net electrical efficiency based on the lower heating value (LHV).
  For all OECD countries, the IEA Electricity information 2014 provides data for the year 2012 on fuel input (TJ, Net calorific value NCV) and gross electricity production (GWh) as well as heat production (TJ) in tables 8 and 9 for each country for electricity only and Combined Heat and Power (CHP) plants each. Together with the information on own use (see parameter "losses"), the net electrical efficiency based on the NCV is calculated.
  For all non-OECD countries, data from the IEA Energy balances of non-OECD countries 2014 have been used. These tables do not always provide information on how much of the electricity has been produced in electricity only and in CHP plants, but often give the total value only.
  IEA. 2014. Electricity Information 2014. ISBN 978-92-64-21692-1. International Energy Agency (IEA), Paris Cedex (FR).
  IEA/OECD. 2014. Energy balances of non-OECD countries 2014. International Energy Agency (IEA), Paris Cedex (FR).
  nan
- recirculating cooling system as a fraction of all cooling systems: 0.27 dimensionless; name recirculating_CS_fraction_from_allCS; lognormal variance with pedigree 0.092025, pedigree (4,4,3,2,4)
  (same comment as for once-through and cooling pond cooling systems as a fraction of all coo)
- gross electricity production: 2.46e8 kWh; name gross_electricity; lognormal variance with pedigree 0.0012, pedigree (2,1,1,1,1)
  Literature value/statistics. For all OECD countries, gross electricity production 2012 with oil electricity only and CHP plants was taken from the IEA electricity information 2014, country tables 8 and 9. For all non-OECD countries, the values were found in the IEA energy balances of non-OECD countries 2014.
  IEA. 2014. Electricity Information 2014. ISBN 978-92-64-21692-1. International Energy Agency (IEA), Paris Cedex (FR).
  IEA/OECD. 2014. Energy balances of non-OECD countries 2014. International Energy Agency (IEA), Paris Cedex (FR).
  nan
- water consumption, electricity production from oil, once-T and coolingP CS: 0.0005 m3/kWh; name WConsumption_EP_oil_onceT_andCP_CS; lognormal variance with pedigree 0.092025, pedigree (4,4,3,2,4)
  (same comment as for water withdrawal, electricity production from oil, recirculating CS)
- water withdrawal, electricity production from oil, once-T and coolingP CS: 0.098 m3/kWh; name WWithdrawal_EP_oil_onceT_andCP_CS; lognormal variance with pedigree 0.092025, pedigree (4,4,3,2,4)
  (same comment as for water withdrawal, electricity production from oil, recirculating CS)
- average efficiency of oil power plants, global: 0.37 dimensionless; name efficiency_oil_global; lognormal variance with pedigree 0.003325, pedigree (3,2,1,2,2)
  (same comment as for average efficiency of oil power plants, country)
- losses from gross electricity production: 0.07 dimensionless; name losses_gross_net; lognormal variance with pedigree 0.003525, pedigree (3,2,2,2,2)
  Calculated value. Own use of electricity plants in this country in 2012. For the non-OECD countries, the losses were first calculated for the total electricity sector based on the IEA electricity information 2014, table 1.1 (net electricity = gross electricity minus own use). However, this value can be very low if the share of electricity from fossiles is low in a specific country. Therefore, the default loss as described by the IEA in the electricity statistic is applied, which is 0.07 (IEA electricity information 2014: The difference between gross and net electricity production is generally observed to be about 7% for conventional thermal stations, 1% for hydro stations and 6% for nuclear.)
  IEA. 2014. Electricity Information 2014. ISBN 978-92-64-21692-1. International Energy Agency (IEA), Paris Cedex (FR).
  nan
  Uncertainty: g

## Reference product
- electricity, high voltage: 1 kWh; name electricity; By-product classification allocatable product; CPC 17100: Electrical energy
  production volume 2.2878e8 kWh; name apv_electricity; = gross_electricity* (1-losses_gross_net)
    Calculated value.
  property price 0.0977 EUR2005
    Temporary price data. Calculated as 90% of purchasers price based on: 94% of the average price (to account for a 6% loss in transformation and transmission) for electricity for industrial consumersin 2005 (excluded taxes). From IEA.
  properties: Corresponding fuel use 10.7 MJ

## Inputs from technosphere
- lignite ash: -1.48258e-5 kg; name lignite_ash; = (1.3961E-06 * factor_MJ_kWh)*-1; source Jungbluth, N. 2007; lognormal variance with pedigree 0.0033, pedigree (2,3,3,3,1)
  Average of literature data
  Amount was scaled to the amount of reference product.
  production volume 3391.86 kg; = apv_electricity * lignite_ash
    Calculated from the production volume of electricity produced in proportion to the respective output amounts.
  property price 0 EUR2005; name lignite_ash_price_EUR2005
  properties: wet mass 1 kg, dry mass 1 kg
- water, completely softened: 0.106195 kg; name water_softened_input; = 0.01 * factor_MJ_kWh; source Jungbluth, N. 2007, p. Tab. 12.10 p. 228; lognormal variance with pedigree 0.0027, pedigree (2,2,3,1,1)
  Literature data for this country
  Amount was scaled to the amount of reference product.
  Literature data for this country
  Amount was scaled to the amount of reference product.
  properties: wet mass 1 kg
- municipal solid waste: -0.000167586 kg; name municipal_waste; = (1.5781E-05 * factor_MJ_kWh)*-1; source Jungbluth, N. 2007; lognormal variance with pedigree 0.0039, pedigree (2,3,3,3,1)
  Average of literature data
  Amount was scaled to the amount of reference product.
  production volume 38340.3 kg; = apv_electricity * municipal_waste
    (same comment as for lignite ash)
  property price 0 EUR2005; name municipal_waste_price_EUR2005
  properties: water content 0.297017, wet mass 1 kg, carbon content, non-fossil 0.261655, heating value, net 11.74 MJ, dry mass 0.771 kg, carbon content, fossil 0.171549
  note on carbon content, non-fossil: MSW composition in tab 4.1, ecoinvent v2.2 report 13_I. C content referred to 1 kg DM
  note on heating value, net: Value taken from the general comment of the treatment dataset.
- heavy fuel oil: 0.257756 kg; = 0.024272 * factor_MJ_kWh; source Jungbluth, N. 2007; lognormal variance with pedigree 0.0027, pedigree (2,2,3,1,1)
  Literature data for heating value
  Amount was scaled to the amount of reference product.
  properties: wet mass 1 kg, heating value, net 41.2 MJ, carbon content, fossil 0.849, dry mass 1 kg
- ammonia, anhydrous, liquid: 0.000671214 kg; = 6.3206E-05 * factor_MJ_kWh; source Jungbluth, N. 2007, p. Tab. 12.11 p. 228; lognormal variance with pedigree 0.0147, pedigree (2,4,3,3,1)
  IPPC 2001 for flue gas treatment
  Amount was scaled to the amount of reference product.
  properties: dry mass 1 kg, wet mass 1 kg
- bilge oil: -2.1377e-5 kg; name bilge_oil; = (2.013E-06 * factor_MJ_kWh)*-1; source Jungbluth, N. 2007; lognormal variance with pedigree 0.0033, pedigree (2,3,3,3,1)
  Average of literature data
  Amount was scaled to the amount of reference product.
  production volume 4890.63 kg; = apv_electricity * bilge_oil
    (same comment as for lignite ash)
  property price 0 EUR2005; name bilge_oil_price_EUR2005
  properties: heating value, net 1.92 MJ, wet mass 1 kg, carbon content, fossil 0.84, water content 9, dry mass 0.1 kg
  note on carbon content, fossil: Tab A.6, ecoinvent v2.2 report 13_I. C content has been calculated after data in the tables, and then referred to 1 kg DM
- water, decarbonised: 0.530973 kg; name water_decarbonised_input; = 0.05 * factor_MJ_kWh; source Jungbluth, N. 2007, p. Tab. 12.10 p. 228; lognormal variance with pedigree 0.0027, pedigree (2,2,3,1,1)
  (same comment as for water, completely softened)
  properties: wet mass 1 kg
- fly ash and scrubber sludge: -2.69735e-5 kg; name fly_ash; = (2.54E-06 * factor_MJ_kWh)*-1; source Jungbluth, N. 2007, p. Tab. 12.27, p. 238; lognormal variance with pedigree 0.0033, pedigree (2,3,3,3,1)
  Average of literature data
  Amount was scaled to the amount of reference product.
  production volume 6170.99 kg; = apv_electricity * fly_ash
    (same comment as for lignite ash)
  property price 0 EUR2005; name fly_ash_price_EUR2005
  properties: wet mass 1 kg, water content 9, carbon content, fossil 0.167, dry mass 0.1 kg
- oil power plant, 500MW: 1.31246e-11 unit; = 1.2359E-12 * factor_MJ_kWh; source Jungbluth, N. 2007; lognormal variance with pedigree 0.3506, pedigree (2,5,5,5,1)
  Estimation based on case study
- limestone, crushed, washed: 0.0146145 kg; = 0.0013762 * factor_MJ_kWh; source Jungbluth, N. 2007, p. Tab. 12.11 p. 228; lognormal variance with pedigree 0.0147, pedigree (2,4,3,3,1)
  IPPC 2001 for flue gas treatment
  Amount was scaled to the amount of reference product.
  properties: dry mass 0.998 kg, wet mass 1 kg, carbon content, fossil 0.117257, water content 0.00200401
  note on carbon content, fossil: Table 3.1, ecoinvent v2.2 report 7, part VII, pg 3. MW CaCO3=100, MW MgCO3=84. C content of limestone is 0.117257 kg/kg DM
- waste mineral oil: -0.000498053 kg; name waste_oil; = (4.69E-05 * factor_MJ_kWh)*-1; source Jungbluth, N. 2007; lognormal variance with pedigree 0.0039, pedigree (2,3,3,3,1)
  Average of literature data
  Amount was scaled to the amount of reference product.
  production volume 113945 kg; = apv_electricity *waste_oil
    (same comment as for lignite ash)
  property price 0 EUR2005; name waste_oil_price_EUR2005
  properties: carbon content, fossil 0.864444, heating value, net 34.7 MJ, water content 0.111111, dry mass 0.9 kg, wet mass 1 kg
- oil power plant, 500MW: 0 unit; source Jungbluth, N. 2007
  Estimation based on case study
- residue from cooling tower: -0.000155023 kg; name cooling_tower; = (1.4598E-05 * factor_MJ_kWh)*-1; source Jungbluth, N. 2007, p. Tab. 12.27, p. 238; lognormal variance with pedigree 0.0033, pedigree (2,3,3,3,1)
  Average of literature data
  Amount was scaled to the amount of reference product.
  production volume 35466.2 kg; = apv_electricity * cooling_tower
    (same comment as for lignite ash)
  property price 0 EUR2005; name cooling_tower_price_EUR2005
  properties: wet mass 1 kg, water content 0.428571, dry mass 0.7 kg, carbon content, fossil 0.0544233

## Inputs from nature
- Water, cooling, unspecified natural origin [natural resource, in water]: 0.0792385 m3; name water_cooling_UNO_input; source Scown, C.D., et al. 2011, p. Tab. 12.10 p. 228; lognormal variance with pedigree 0.130025, pedigree (4,4,5,2,4)
  Estimation with literature data, basic uncertainty estimated = 3
  Amount was scaled to the amount of reference product.
  Calculated based on literature (Scown, C.D., et al., 2011, Water Footprint of U.S. Trasportation Fuels;Scown, C.D., et al., 2011, Water Footprint of U.S. Trasportation Fuels (SI); Stiegel, 2008, Estimating Freshwater Needs to Meet Future Thermoelectric Generation Requirements; Floerke, M., 2009, Future changes of freshwater needs in the electricity production sector), (Vionnet, S., Quantis Water Database - Technical Report, 2012). Water use in this process is modelled based on literature (see references). The process boundaries are given by the boundaries of the power plant. The process ends when the energy (MJ) is produced and ready to be used for electricity production (kWh).
  Calculated based on literature data. 9.7 MJ is calculated efficiency of the electricity production, average of all available regions.

## Emissions to nature
- Tin, ion [water, surface water]: 1.26839e-9 kg; = 1.1944E-10 * factor_MJ_kWh; source Jungbluth, N. 2007, p. Tab. 12.26, p. 238; lognormal variance with pedigree 0.002, pedigree (1,1,3,1,1)
  Mean of values for Europe, range of concentrations
  Amount was scaled to the amount of reference product.
- Particulates, > 10 um [air, urban air close to ground]: 0.000335448 kg; = 3.1588E-05 * factor_MJ_kWh; source Jungbluth, N. 2007, p. Tab. 12.17 / Tab. 12.18; lognormal variance with pedigree 0.0427, pedigree (2,2,3,1,1)
  Literature data for this country
  Amount was scaled to the amount of reference product.
- Copper, ion [water, surface water]: 2.69331e-8 kg; = 2.5362E-09 * factor_MJ_kWh; source Jungbluth, N. 2007, p. Tab. 12.26, p. 238; lognormal variance with pedigree 0.722, pedigree (1,1,3,1,1)
  (same comment as for Tin, ion)
- Cadmium [air, urban air close to ground]: 1.06001e-7 kg; = 9.9818E-09 * factor_MJ_kWh; source Jungbluth, N. 2007, p. Tab. 12.23, Tab. 12.24; lognormal variance with pedigree 1.212, pedigree (1,1,3,1,1)
  Calculation based on particle emission. Deviation calculated from ranges
  Amount was scaled to the amount of reference product.
- Lead [air, urban air close to ground]: 1.14053e-6 kg; = 1.074E-07 * factor_MJ_kWh; source Jungbluth, N. 2007; lognormal variance with pedigree 1.212, pedigree (1,1,3,1,1)
  (same comment as for Cadmium)
- Selenium [air, urban air close to ground]: 1.67724e-7 kg; = 1.5794E-08 * factor_MJ_kWh; source Jungbluth, N. 2007; lognormal variance with pedigree 1.212, pedigree (1,1,3,1,1)
  (same comment as for Cadmium)
- Chromium VI [air, urban air close to ground]: 3.30488e-9 kg; = 3.1121E-10 * factor_MJ_kWh; source Jungbluth, N. 2007, p. Tab. 12.23, Tab. 12.24; lognormal variance with pedigree 2.2927, pedigree (3,3,5,3,1)
  Literature, basic uncertainity = 20
  Amount was scaled to the amount of reference product.
- Ethanol [air, urban air close to ground]: 5.6486e-6 kg; = 5.3191E-07 * factor_MJ_kWh; source Jungbluth, N. 2007; lognormal variance with pedigree 0.092, pedigree (1,1,3,1,1)
  Calculation based on VOC emission. Deviation calculated from ranges
  Amount was scaled to the amount of reference product.
- Particulates, > 2.5 um, and < 10um [air, urban air close to ground]: 0.000167724 kg; = 1.5794E-05 * factor_MJ_kWh; source Jungbluth, N. 2007, p. Tab. 12.17 / Tab. 12.18; lognormal variance with pedigree 0.1227, pedigree (2,2,3,1,1)
  Literature data for this country
  Amount was scaled to the amount of reference product.
- Acetone [air, urban air close to ground]: 2.76669e-6 kg; = 2.6053E-07 * factor_MJ_kWh; source Jungbluth, N. 2007; lognormal variance with pedigree 0.092, pedigree (1,1,3,1,1)
  (same comment as for Ethanol)
- Propane [air, urban air close to ground]: 5.6486e-7 kg; = 5.3191E-08 * factor_MJ_kWh; source Jungbluth, N. 2007, p. Tab. 12.19, Tab. 12.20; lognormal variance with pedigree 0.092, pedigree (1,1,3,1,1)
  (same comment as for Ethanol)
- Iron [air, urban air close to ground]: 7.43363e-7 kg; = 7E-08 * factor_MJ_kWh; source Jungbluth, N. 2007; lognormal variance with pedigree 0.7107, pedigree (3,3,5,3,3)
  Literature
  Amount was scaled to the amount of reference product.
- Thallium [water, surface water]: 3.93218e-8 kg; = 3.7028E-09 * factor_MJ_kWh; source Jungbluth, N. 2007, p. Tab. 12.26, p. 238; lognormal variance with pedigree 0.002, pedigree (1,1,3,1,1)
  (same comment as for Tin, ion)
- Water [water, unspecified]: 0.0789183 m3; name water_to_water_unspecified; = (water_softened_input/1000)*(1-fraction_WCS_to_air)+(water_decarbonised_input/1000)*(1-fraction_WDC_to_air)+water_cooling_UNO_input*(1-fraction_CW_to_air); lognormal variance with pedigree 0.0427, pedigree (2,2,3,1,1)
  Calculated value based on literature values and expert opinion. See comments in the parametres" comment field.
  property wet mass 1000 kg; name WM
  property dry mass 0 kg; name DM
  property fraction, origin: salt water 0; name fraction_origin_salt_water_Ww
  property fraction, origin: unspecified 0.992149; name fraction_origin_unspecified_Ww
  property carbon content, fossil 0; name C_content_fossil
  property fraction, origin: fresh water 0.00785115; name fraction_origin_fresh_water_Ww
  property carbon content, non-fossil 0; name C_content_non_fossil
  property water in wet mass 1000 kg; name WWM
- Sulfide [water, surface water]: 5.70796e-7 kg; = 5.375E-08 * factor_MJ_kWh; source Jungbluth, N. 2007, p. Tab. 12.26, p. 238; lognormal variance with pedigree 0.272, pedigree (1,1,3,1,1)
  (same comment as for Tin, ion)
- Molybdenum [air, urban air close to ground]: 2.54942e-7 kg; = 2.4007E-08 * factor_MJ_kWh; source Jungbluth, N. 2007; lognormal variance with pedigree 1.212, pedigree (1,1,3,1,1)
  (same comment as for Cadmium)
- Water [air, unspecified]: 0.000957361 m3; name water_to_air_unspecified; = (water_softened_input/1000)*fraction_WCS_to_air+(water_decarbonised_input/1000)*fraction_WDC_to_air+water_cooling_UNO_input*fraction_CW_to_air; lognormal variance with pedigree 0.0427, pedigree (2,2,3,1,1)
  (same comment as for Water)
  property fraction, origin: salt water 0; name fraction_origin_salt_water
  property fraction, origin: unspecified 0.976644; name fraction_origin_unspecified
  property fraction, origin: fresh water 0.023356; name fraction_origin_fresh_water
- Calcium [air, urban air close to ground]: 3.18584e-7 kg; = 3E-08 * factor_MJ_kWh; source Jungbluth, N. 2007, p. Tab. 12.25; lognormal variance with pedigree 0.1007, pedigree (3,3,5,3,3)
  Literature
  Amount was scaled to the amount of reference product.
- Mercury [water, surface water]: 1.33189e-9 kg; = 1.2542E-10 * factor_MJ_kWh; source Jungbluth, N. 2007, p. Tab. 12.26, p. 238; lognormal variance with pedigree 0.562, pedigree (1,1,3,1,1)
  (same comment as for Tin, ion)
- Fluoride [water, surface water]: 2.15639e-6 kg; = 2.0306E-07 * factor_MJ_kWh; source Jungbluth, N. 2007, p. Tab. 12.26, p. 238; lognormal variance with pedigree 0.762, pedigree (1,1,3,1,1)
  (same comment as for Tin, ion)
- Hydrocarbons, unspecified [water, surface water]: 3.94088e-7 kg; = 3.711E-08 * factor_MJ_kWh; source Jungbluth, N. 2007, p. Tab. 12.26, p. 238; lognormal variance with pedigree 0.042, pedigree (1,1,3,1,1)
  (same comment as for Tin, ion)
- Vanadium, ion [water, surface water]: 3.83671e-7 kg; = 3.6129E-08 * factor_MJ_kWh; source Jungbluth, N. 2007, p. Tab. 12.26, p. 238; lognormal variance with pedigree 0.672, pedigree (1,1,3,1,1)
  (same comment as for Tin, ion)
- Chloride [water, surface water]: 0.000259519 kg; = 2.4438E-05 * factor_MJ_kWh; source Jungbluth, N. 2007, p. Tab. 12.26, p. 238; lognormal variance with pedigree 0.892, pedigree (1,1,3,1,1)
  (same comment as for Tin, ion)
- Hydrogen fluoride [air, urban air close to ground]: 3.19646e-7 kg; = 3.01E-08 * factor_MJ_kWh; source Jungbluth, N. 2007, p. Tab. 12.25; lognormal variance with pedigree 0.0612, pedigree (2,3,3,1,3)
  Literature
  Amount was scaled to the amount of reference product.
- Lead [water, surface water]: 5.29784e-8 kg; = 4.9888E-09 * factor_MJ_kWh; source Jungbluth, N. 2007, p. Tab. 12.26, p. 238; lognormal variance with pedigree 0.502, pedigree (1,1,3,1,1)
  (same comment as for Tin, ion)
- Copper [air, urban air close to ground]: 1.57657e-6 kg; = 1.4846E-07 * factor_MJ_kWh; source Jungbluth, N. 2007, p. Tab. 12.23, Tab. 12.24; lognormal variance with pedigree 1.312, pedigree (1,1,3,1,1)
  (same comment as for Cadmium)
- Cadmium, ion [water, surface water]: 3.08655e-9 kg; = 2.9065E-10 * factor_MJ_kWh; source Jungbluth, N. 2007, p. Tab. 12.26, p. 238; lognormal variance with pedigree 0.422, pedigree (1,1,3,1,1)
  (same comment as for Tin, ion)
- Zinc [air, urban air close to ground]: 8.05073e-7 kg; = 7.5811E-08 * factor_MJ_kWh; source Jungbluth, N. 2007; lognormal variance with pedigree 1.212, pedigree (1,1,3,1,1)
  (same comment as for Cadmium)
- Vanadium [air, urban air close to ground]: 3.35448e-5 kg; = 3.1588E-06 * factor_MJ_kWh; source Jungbluth, N. 2007; lognormal variance with pedigree 1.392, pedigree (1,1,3,1,1)
  (same comment as for Cadmium)
- Nitrogen [water, surface water]: 8.67186e-5 kg; = 8.166E-06 * factor_MJ_kWh; source Jungbluth, N. 2007, p. Tab. 12.26, p. 238; lognormal variance with pedigree 0.032, pedigree (1,1,3,1,1)
  (same comment as for Tin, ion)
- Particulates, < 2.5 um [air, urban air close to ground]: 0.000167724 kg; = 1.5794E-05 * factor_MJ_kWh; source Jungbluth, N. 2007, p. Tab. 12.17 / Tab. 12.18; lognormal variance with pedigree 0.3027, pedigree (2,2,3,1,1)
  Literature data for this country
  Amount was scaled to the amount of reference product.
- Formaldehyde [air, urban air close to ground]: 8.47296e-6 kg; = 7.9787E-07 * factor_MJ_kWh; source Jungbluth, N. 2007, p. Tab. 12.19, Tab. 12.20; lognormal variance with pedigree 0.092, pedigree (1,1,3,1,1)
  (same comment as for Ethanol)
- Sulfate [water, surface water]: 0.00212145 kg; = 0.00019977 * factor_MJ_kWh; source Jungbluth, N. 2007, p. Tab. 12.26, p. 238; lognormal variance with pedigree 0.022, pedigree (1,1,3,1,1)
  (same comment as for Tin, ion)
- DOC, Dissolved Organic Carbon [water, surface water]: 1.09083e-5 kg; = 1.0272E-06 * factor_MJ_kWh; source Jungbluth, N. 2007; lognormal variance with pedigree 0.002, pedigree (1,1,3,1,1)
  Calculated as equal to TOC.
  Amount was scaled to the amount of reference product.
- Beryllium [air, urban air close to ground]: 5.92269e-10 kg; = 5.5772E-11 * factor_MJ_kWh; source Jungbluth, N. 2007; lognormal variance with pedigree 0.6927, pedigree (3,3,5,3,1)
  Literature
  Amount was scaled to the amount of reference product.
- Hydrocarbons, aliphatic, alkanes, unspecified [air, urban air close to ground]: 1.1297e-5 kg; = 1.0638E-06 * factor_MJ_kWh; source Jungbluth, N. 2007; lognormal variance with pedigree 0.092, pedigree (1,1,3,1,1)
  (same comment as for Ethanol)
- Carbon dioxide, fossil [air, unspecified]: 0.00656188 kg; = 0.00061791 * factor_MJ_kWh; source Jungbluth, N. 2007, p. Tab. 12.29, Tab. 12.30; lognormal variance with pedigree 0.0206, pedigree (2,5,3,1,1)
  Calculation for limestone use
  Amount was scaled to the amount of reference product.
- Hypochlorite [water, ocean]: 3.9292e-6 kg; = 3.7E-07 * factor_MJ_kWh; source Jungbluth, N. 2007; lognormal variance with pedigree 0.1021, pedigree (3,4,5,3,3)
  Literature
  Amount was scaled to the amount of reference product.
- Chromium, ion [water, surface water]: 3.25147e-8 kg; = 3.0618E-09 * factor_MJ_kWh; source Jungbluth, N. 2007, p. Tab. 12.26, p. 238; lognormal variance with pedigree 0.632, pedigree (1,1,3,1,1)
  (same comment as for Tin, ion)
- Methane, fossil [air, urban air close to ground]: 5.6486e-5 kg; = 5.3191E-06 * factor_MJ_kWh; source Jungbluth, N. 2007, p. Tab. 12.19, Tab. 12.20; lognormal variance with pedigree 0.092, pedigree (1,1,3,1,1)
  (same comment as for Ethanol)
- Sulfite [water, surface water]: 1.91533e-5 kg; = 1.8036E-06 * factor_MJ_kWh; source Jungbluth, N. 2007, p. Tab. 12.26, p. 238; lognormal variance with pedigree 0.032, pedigree (1,1,3,1,1)
  (same comment as for Tin, ion)
- Hypochlorite [water, surface water]: 3.50442e-6 kg; = 3.3E-07 * factor_MJ_kWh; source Jungbluth, N. 2007; lognormal variance with pedigree 0.1021, pedigree (3,4,5,3,3)
  Literature
  Amount was scaled to the amount of reference product.
- TOC, Total Organic Carbon [water, surface water]: 1.09083e-5 kg; = 1.0272E-06 * factor_MJ_kWh; source Jungbluth, N. 2007, p. Tab. 12.26, p. 238; lognormal variance with pedigree 0.002, pedigree (1,1,3,1,1)
  (same comment as for Tin, ion)
- Hydrocarbons, aliphatic, unsaturated [air, urban air close to ground]: 5.6486e-7 kg; = 5.3191E-08 * factor_MJ_kWh; source Jungbluth, N. 2007; lognormal variance with pedigree 0.092, pedigree (1,1,3,1,1)
  (same comment as for Ethanol)
- COD, Chemical Oxygen Demand [water, surface water]: 1.95133e-5 kg; = 1.8375E-06 * factor_MJ_kWh; source Jungbluth, N. 2007, p. Tab. 12.26, p. 238; lognormal variance with pedigree 0.482, pedigree (1,1,3,1,1)
  (same comment as for Tin, ion)
- Sulfur dioxide [air, urban air close to ground]: 0.0096583 kg; = 0.00090949 * factor_MJ_kWh; source Jungbluth, N. 2007, p. Tab. 12.14 p. 230; lognormal variance with pedigree 0.0027, pedigree (2,2,3,1,1)
  Literature data for this country
  Amount was scaled to the amount of reference product.
- Mercury [air, urban air close to ground]: 1.59292e-9 kg; = 1.5E-10 * factor_MJ_kWh; source Jungbluth, N. 2007; lognormal variance with pedigree 1.632, pedigree (1,1,3,1,1)
  Calculation from ranges
  Amount was scaled to the amount of reference product.
- Acetic acid [air, urban air close to ground]: 1.1297e-5 kg; = 1.0638E-06 * factor_MJ_kWh; source Jungbluth, N. 2007; lognormal variance with pedigree 0.092, pedigree (1,1,3,1,1)
  (same comment as for Ethanol)
- Zinc, ion [water, surface water]: 6.70088e-8 kg; = 6.31E-09 * factor_MJ_kWh; source Jungbluth, N. 2007, p. Tab. 12.26, p. 238; lognormal variance with pedigree 0.262, pedigree (1,1,3,1,1)
  (same comment as for Tin, ion)
- Nickel [air, urban air close to ground]: 9.25837e-6 kg; = 8.7183E-07 * factor_MJ_kWh; source Jungbluth, N. 2007; lognormal variance with pedigree 1.212, pedigree (1,1,3,1,1)
  (same comment as for Cadmium)
- Nickel, ion [water, surface water]: 1.87657e-7 kg; = 1.7671E-08 * factor_MJ_kWh; source Jungbluth, N. 2007, p. Tab. 12.26, p. 238; lognormal variance with pedigree 0.342, pedigree (1,1,3,1,1)
  (same comment as for Tin, ion)
- Ammonia [air, urban air close to ground]: 1.06195e-6 kg; = 1E-07 * factor_MJ_kWh; source Jungbluth, N. 2007, p. p.232; lognormal variance with pedigree 1.102, pedigree (1,1,3,1,1)
  Calculation from ranges
  Amount was scaled to the amount of reference product.
- Methanol [air, urban air close to ground]: 5.6486e-6 kg; = 5.3191E-07 * factor_MJ_kWh; source Jungbluth, N. 2007; lognormal variance with pedigree 0.092, pedigree (1,1,3,1,1)
  (same comment as for Ethanol)
- Benzene [air, urban air close to ground]: 5.6486e-7 kg; = 5.3191E-08 * factor_MJ_kWh; source Jungbluth, N. 2007; lognormal variance with pedigree 0.092, pedigree (1,1,3,1,1)
  (same comment as for Ethanol)
- BOD5, Biological Oxygen Demand [water, surface water]: 1.78407e-5 kg; = 1.68E-06 * factor_MJ_kWh; source Jungbluth, N. 2007, p. Tab. 12.26, p. 238; lognormal variance with pedigree 0.292, pedigree (1,1,3,1,1)
  (same comment as for Tin, ion)
- Phosphorus [water, surface water]: 1.96609e-7 kg; = 1.8514E-08 * factor_MJ_kWh; source Jungbluth, N. 2007, p. Tab. 12.26, p. 238; lognormal variance with pedigree 0.002, pedigree (1,1,3,1,1)
  (same comment as for Tin, ion)
- Carbon dioxide, fossil [air, urban air close to ground]: 0.813749 kg; = 0.076628 * factor_MJ_kWh; source Jungbluth, N. 2007, p. Tab. 12.12, p. 229; lognormal variance with pedigree 0.0027, pedigree (2,2,3,1,1)
  Literature data for this country
  Amount was scaled to the amount of reference product.
- Dioxins, measured as 2,3,7,8-tetrachlorodibenzo-p-dioxin [air, urban air close to ground]: 1.06195e-13 kg; = 1E-14 * factor_MJ_kWh; source Jungbluth, N. 2007, p. Tab. 12.22 p. 235; lognormal variance with pedigree 0.3147, pedigree (2,4,3,3,1)
  Literature
  Amount was scaled to the amount of reference product.
- Carbon monoxide, fossil [air, urban air close to ground]: 0.000106195 kg; = 1E-05 * factor_MJ_kWh; source Jungbluth, N. 2007, p. Tab. 12.13, p. 229; lognormal variance with pedigree 0.162, pedigree (1,1,3,1,1)
  Calculation from ranges
  Amount was scaled to the amount of reference product.
- Cobalt [water, surface water]: 2.53688e-9 kg; = 2.3889E-10 * factor_MJ_kWh; source Jungbluth, N. 2007, p. Tab. 12.26, p. 238; lognormal variance with pedigree 0.002, pedigree (1,1,3,1,1)
  (same comment as for Tin, ion)
- PAH, polycyclic aromatic hydrocarbons [air, urban air close to ground]: 1.9115e-8 kg; = 1.8E-09 * factor_MJ_kWh; source Jungbluth, N. 2007, p. Tab. 12.21, p. 235; lognormal variance with pedigree 0.3147, pedigree (2,4,3,3,1)
  Literature
  Amount was scaled to the amount of reference product.
- Iron, ion [water, surface water]: 1.33444e-6 kg; = 1.2566E-07 * factor_MJ_kWh; source Jungbluth, N. 2007, p. Tab. 12.26, p. 238; lognormal variance with pedigree 0.242, pedigree (1,1,3,1,1)
  (same comment as for Tin, ion)
- Hydrogen chloride [air, urban air close to ground]: 4.78938e-7 kg; = 4.51E-08 * factor_MJ_kWh; source Jungbluth, N. 2007, p. Tab. 12.25; lognormal variance with pedigree 0.0612, pedigree (2,3,3,1,3)
  Literature
  Amount was scaled to the amount of reference product.
- Arsenic [air, urban air close to ground]: 2.21395e-7 kg; = 2.0848E-08 * factor_MJ_kWh; source Jungbluth, N. 2007, p. Tab. 12.23, Tab. 12.24; lognormal variance with pedigree 1.212, pedigree (1,1,3,1,1)
  (same comment as for Cadmium)
- Sodium [air, urban air close to ground]: 3.18584e-6 kg; = 3E-07 * factor_MJ_kWh; source Jungbluth, N. 2007, p. Tab. 12.25; lognormal variance with pedigree 0.1007, pedigree (3,3,5,3,3)
  Literature
  Amount was scaled to the amount of reference product.
- Arsenic, ion [water, surface water]: 1.26839e-9 kg; = 1.1944E-10 * factor_MJ_kWh; source Jungbluth, N. 2007, p. Tab. 12.26, p. 238; lognormal variance with pedigree 0.002, pedigree (1,1,3,1,1)
  (same comment as for Tin, ion)
- Dinitrogen monoxide [air, urban air close to ground]: 4.24779e-5 kg; = 4E-06 * factor_MJ_kWh; source Jungbluth, N. 2007, p. Tab. 12.16 p. 232; lognormal variance with pedigree 0.352, pedigree (1,1,3,1,1)
  Calculation from ranges
  Amount was scaled to the amount of reference product.
- AOX, Adsorbable Organic Halogen as Cl [water, surface water]: 4.50297e-8 kg; = 4.2403E-09 * factor_MJ_kWh; source Jungbluth, N. 2007, p. Tab. 12.26, p. 238; lognormal variance with pedigree 0.002, pedigree (1,1,3,1,1)
  (same comment as for Tin, ion)
- Suspended solids, unspecified [water, surface water]: 1.61512e-5 kg; = 1.5209E-06 * factor_MJ_kWh; source Jungbluth, N. 2007, p. Tab. 12.26, p. 238; lognormal variance with pedigree 0.052, pedigree (1,1,3,1,1)
  (same comment as for Tin, ion)
- Cobalt [air, urban air close to ground]: 1.17409e-6 kg; = 1.1056E-07 * factor_MJ_kWh; source Jungbluth, N. 2007, p. Tab. 12.23, Tab. 12.24; lognormal variance with pedigree 1.212, pedigree (1,1,3,1,1)
  (same comment as for Cadmium)
- Manganese [water, surface water]: 3.80527e-8 kg; = 3.5833E-09 * factor_MJ_kWh; source Jungbluth, N. 2007, p. Tab. 12.26, p. 238; lognormal variance with pedigree 0.002, pedigree (1,1,3,1,1)
  (same comment as for Tin, ion)
- Chromium [air, urban air close to ground]: 3.89172e-7 kg; = 3.6647E-08 * factor_MJ_kWh; source Jungbluth, N. 2007, p. Tab. 12.23, Tab. 12.24; lognormal variance with pedigree 1.462, pedigree (1,1,3,1,1)
  (same comment as for Cadmium)
- Benzo(a)pyrene [air, urban air close to ground]: 1.59292e-10 kg; = 1.5E-11 * factor_MJ_kWh; source Jungbluth, N. 2007; lognormal variance with pedigree 0.3707, pedigree (3,3,5,3,3)
  Literature
  Amount was scaled to the amount of reference product.
- Oils, unspecified [water, surface water]: 6.01848e-7 kg; = 5.6674E-08 * factor_MJ_kWh; source Jungbluth, N. 2007, p. Tab. 12.26, p. 238; lognormal variance with pedigree 0.032, pedigree (1,1,3,1,1)
  (same comment as for Tin, ion)
- Manganese [air, urban air close to ground]: 3.68995e-7 kg; = 3.4747E-08 * factor_MJ_kWh; source Jungbluth, N. 2007, p. Tab. 12.23, Tab. 12.24; lognormal variance with pedigree 1.212, pedigree (1,1,3,1,1)
  (same comment as for Cadmium)
- Acetaldehyde [air, urban air close to ground]: 2.76669e-6 kg; = 2.6053E-07 * factor_MJ_kWh; source Jungbluth, N. 2007; lognormal variance with pedigree 0.092, pedigree (1,1,3,1,1)
  (same comment as for Ethanol)
- Nitrogen oxides [air, urban air close to ground]: 0.00153345 kg; = 0.0001444 * factor_MJ_kWh; source Jungbluth, N. 2007, p. Tab. 12.15 p. 231; lognormal variance with pedigree 0.0427, pedigree (2,2,3,1,1)
  Literature data for this country
  Amount was scaled to the amount of reference product.
- Hydrocarbons, aromatic [air, urban air close to ground]: 1.1297e-7 kg; = 1.0638E-08 * factor_MJ_kWh; source Jungbluth, N. 2007; lognormal variance with pedigree 0.092, pedigree (1,1,3,1,1)
  (same comment as for Ethanol)

## Sampling procedure
Literature

## Extrapolations
This dataset has been extrapolated from year 2015 to the year of the calculation (2021). The uncertainty has been adjusted accordingly.

## Review by Carl Vadenbo 2015-07-14
The update of the whole electricity sector for the ecoinvent v3.2 database consist of hundreds of datasets. All these datasets have passed through a streamlined review processes where the underlying modelling of production volumes, technology shares and efficiencies was reviewed in detail prior to the datasets being submitted to the database.
