# NCA oxide production, for Li-ion battery

Dataset: EcoSpold 2, unit process
Geography: CN
Time period: 2016-01-01 to 2021-12-31
Technology level: current
Classification: ISIC rev.4 ecoinvent: 2011:Manufacture of basic chemicals
Synonyms: nickel cobalt aluminium oxide; nickel-cobalt-aluminium oxide
Scenario: Business-as-Usual
System model: Allocation, cut-off by classification
Generated by: Eleonora Crenna
Published in: Benavides, P.T. 2016
Database: ecoinvent
isCopyrightProtected: true
accessRestrictedTo: 1

## General comment
This dataset represents the production of 1 kg nickel cobalt aluminium (NCA) oxide in Chinese industry, and it is used as active material in the production NCA cathodes in Li-ion batteries.

## Included activities start
The activity starts when NCA hydroxide and other chemicals enter the process at the factory.

## Included activities end
The activity ends with the production at factory gate of NCA oxide via calcination process.

## Geography
The values in this dataset come from large-scale industrial production companies located in China and are assumed to be representative of the production of NCA oxide in China.

## Technology
NCA oxide is produced through a multi-step calcination process. NCA hydroxide and lithium hydroxide are mixed and heated in the calcination kiln over two or three rounds of mixing and calcination. Oxygen is also add to the mixture.The resulting material is crushed, sieved and demagnetized to obtain NCA oxide. The production process is completely automated and almost all electricity consumption is attributed to the calcination kiln. The facility can achieve an overall material efficiency of approximately100%.

The general reaction is the following:

NCA(OH)2 + LiOH + 0.25 O2 --> Li-NCA-O2 + 2.5 H20
Reference:

Dai, Q., Kelly, J. C., Dunn, J., & Benavides, P. (2018). Update of Bill-of-Materials and Cathode Materials Production for Lithium-Ion Batteries in the GREET Model. 2018. Argonne National Laboratory.

## Time period
The time period is from 2016 (year of the publication of data) and 2020 (year of the dataset)

## Reference product
- NCA oxide: 1 kg; By-product classification allocatable product; CPC 34220: Zinc oxide; zinc peroxide; chromium oxides and hydroxides; manganese oxides; iron oxides and hydroxides; earth[…]
  production volume 7.19709e6 kg; = 191922359 *0.15*0.25
    The PV is expressed in kg. According to UN Comtrade (https://comtrade.un.org/data/, HS code: 850760) 191922359 kg Li-ion batteries were exported from China in 2019. Approximately 15% are NCA Li-ion batteries (Benchmark Mineral Intelligence, 2019. The Current Position of Li-ion Raw Material Supply and the Role of Recycling). NCA oxide represents approximately 25% weight of a battery pack
  property price 22.41 EUR2005; = 27*0.83
    Price infromation from: Pillot, 2017. The rechargeable battery market and main trends 2016-2025. Avicenne Energy. Slide 38, graph interpretation.
  property carbon content 0
    carbon content on a dry matter basis (reserved; not for manual entry)
  properties: water in wet mass 0 kg, carbon content, non-fossil 0, water content 0, wet mass 1 kg, dry mass 1 kg, carbon content, fossil 0, carbon allocation 0 kg

## Inputs from technosphere
- lithium hydroxide: 0.25 kg; source Benavides, P.T. 2016; lognormal variance with pedigree 0.002, pedigree (2,3,2,1,1)
  Literature. Lithium input according to the following reaction: NCA(OH)2 + LiOH + 0.25 O2 --> Li-NCA-O2 + 2.5 H20. Value available in GREET2 2018 model (https://greet.es.anl.gov/greet.models) based on the update of Benavides et al. 2016 (Benavides, P.T., Dai, Q., Kelly, J., Dunn, J.B., 2016. Addition of nickel cobalt aluminium (NCA) cathode material to GREET2. Report, Argonne National Laboratory
  properties: wet mass 1 kg, dry mass 1 kg, heating value, net 5.06 MJ
- NMC811 hydroxide: 0 kg; name RefProd
  property carbon content, non-fossil 0; name RefProd_C_content_non_fossil
  property carbon content, fossil 0; name RefProd_C_content_fossil
  property wet mass 1 kg; name RefProd_WM
  property dry mass 1 kg; name RefProd_DM
  property water in wet mass 0 kg; name RefProd_WWM
  property water content 0; name RefProd_water_content
  properties: heating value, net 2.62 MJ
- chemical factory, organics: 7.41e-10 unit; lognormal variance with pedigree 0.3034, pedigree (3,3,2,1,2)
  Calculated value. Annual production: 27000 metric ton cathode material (Dai et al., 2018) and 50yr lifetime chemical factory
  Reference:
  Dai, Q., Kelly, J. C., Dunn, J., & Benavides, P. (2018). Update of Bill-of-Materials and Cathode Materials Production for Lithium-Ion Batteries in the GREET Model. 2018. Argonne National Laboratory.
- NCA hydroxide: 0.95 kg; source Benavides, P.T. 2016; lognormal variance with pedigree 0.002, pedigree (2,3,2,1,1)
  Literature. NCA precursor input according to the following reaction: NCA(OH)2 + LiOH + 0.25 O2 --> Li-NCA-O2 + 2.5 H20. Value available in GREET2 2018 model (https://greet.es.anl.gov/greet.models) based on the update of Benavides et al. 2016 (Benavides, P.T., Dai, Q., Kelly, J., Dunn, J.B., 2016. Addition of nickel cobalt aluminium (NCA) cathode material to GREET2. Report, Argonne National Laboratory
  properties: heating value, net 2.66 MJ, dry mass 1 kg, wet mass 1 kg
- electricity, medium voltage: 7.26 kWh; source Dai, Q. 2018; lognormal variance with pedigree 0.002, pedigree (2,3,2,1,1)
  Literature. Original value 24.765 mmBTU/ton NMC811 oxide taken from the more up-to-date version of GREET2 model (Argonne National Laboratory, 2019, Available at: https://greet.es.anl.gov/ ) and Dai et al. (2018). Conversion factor: 1 mmBTU = 293.07135 kWh
  Reference:
  Dai, Q., Kelly, J. C., Dunn, J., & Benavides, P. (2018). Update of Bill-of-Materials and Cathode Materials Production for Lithium-Ion Batteries in the GREET Model. 2018. Argonne National Laboratory.

## Inputs from nature
- Oxygen [natural resource, in air]: 0.04 kg; source Benavides, P.T. 2016; lognormal variance with pedigree 0.002, pedigree (2,3,2,1,1)
  Literature. Oxygen input according to the following reaction: NCA(OH)2 + LiOH + 0.25 O2 --> Li-NCA-O2 + 2.5 H20. Value available in GREET2 2018 model (Argonne National Laboratory, https://greet.es.anl.gov/greet.models) based on the update of Benavides et al. 2016 (Benavides, P.T., Dai, Q., Kelly, J., Dunn, J.B., 2016. Addition of nickel cobalt aluminium (NCA) cathode material to GREET2. Report, Argonne National Laboratory

## Emissions to nature
- Water [air, non-urban air or from high stacks]: 0.00024 m3; lognormal variance with pedigree 0.0828, pedigree (3,3,2,1,4)
  Calculated value to obtain mass balance, based on the following reaction: NCA(OH)2 + LiOH + 0.25 O2 --> Li-NCA-O2 + 2.5 H20

## Sampling procedure
The data about the production process of NCA oxide are retrieved from the literature (see published source field). The value of water emissions is calculated to obtain mass balance; the value of infrastructure is calculated as representative of the production site.

## Extrapolations
This dataset has been extrapolated from year 2020 to the year of the calculation (2021). The uncertainty has been adjusted accordingly.
