# polystyrene foam slab production

Dataset: EcoSpold 2, unit process
Geography: RER
Time period: 2003-01-01 to 2021-12-31
Technology level: current
Classification: EcoSpold01Categories: insulation materials/production
Classification: ISIC rev.4 ecoinvent: 2220:Manufacture of plastics products
Tags: ConvertedDataset
Scenario: Business-as-Usual
System model: Allocation, cut-off by classification
Generated by: Hans-Jörg Althaus
Published in: Kellenberger D. 2007
Database: ecoinvent
isCopyrightProtected: true
accessRestrictedTo: 1

## General comment
Combination of material and processing module. EPS foam slab has a density of 30 kg/m3 and a thermal conductivity of 0.035-0.04 W/mK.
[This dataset was already contained in the ecoinvent database version 2. It was not individually updated during the transfer to ecoinvent version 3. Life Cycle Impact Assessment results may still have changed, as they are affected by changes in the supply chain, i.e. in other datasets. This dataset was generated following the ecoinvent quality guidelines for version 2. It may have been subject to central changes described in the ecoinvent version 3 change report (http://www.ecoinvent.org/database/ecoinvent-version-3/reports-of-changes/), and the results of the central updates were reviewed extensively. The changes added e.g. consistent water flows and other information throughout the database. The documentation of this dataset can be found in the ecoinvent reports of version 2, which are still available via the ecoinvent website. The change report linked above covers all central changes that were made during the conversion process.]

## Included activities end
Includes production and thermoforming of EPS

## Technology
European average EPS production; thermoforming from 2 Factories in Switzerland

## Reference product
- polystyrene foam slab: 1 kg; CPC 363: Semi-manufactures of plastics; By-product classification allocatable product
  EcoSpold01Location=RER
  production volume 6.4128e8 kg
    Unknown
    6E9 kg styrene capacity ; 90% capacity use; used in 46% polystyrene and 16% EPS ; www.cefic.org/files/publications/Styrene%20Monomer%20Environmental%20Health%20Safety%20and%20Distribution%20Guidelines.pdf and http://www.chemsystems.com/about/cs/news/items/PPE%20PCMD%20Styrenics%202007.cfm
  property carbon content, non-fossil 0
    XPS consists in 91% of polystyrene, 7% of blowing agent and the re-maining 2% are flame retardants (bromine compounds) and other additives (ecoinvent v2.2 report 7, part XIV, pg69). The chemical formula of polystyrene is (C8H8)n. Here, the blowing agent is CO2.
  property price 1.24 EUR2005
    Calculated value based on data from United Nations Commodity Trade Statistics Database (comtrade.un.org). UN comtrade category: 390311 Polystyrene, expansible in primary forms. Year 2005. Using exchange rate of 1EURO = 1.209 USD. Average of price of import into 5 main markets (EU, US, JP, IN and CN).
  property carbon content, fossil 0.859091
    (same comment as for polystyrene foam slab)
  property carbon content 0.859091
    carbon content on a dry matter basis (reserved; not for manual entry)
  properties: water in wet mass 0 kg, dry mass 1 kg, wet mass 1 kg, heating value, net 38.67 MJ, water content 0, carbon allocation 0.859091 kg

## Inputs from technosphere
- polymer foaming: 1 kg; lognormal variance with pedigree 0.04, pedigree (1,1,5,1,1)
  uncertainties in the combined modules --> no uncertainty
  EcoSpold01Location=RER
- polystyrene, expandable: 1.04 kg; lognormal variance with pedigree 0.04, pedigree (1,1,5,1,1)
  EcoSpold01Location=RER
  uncertainties in the combined modules --> no uncertainty
  properties: heating value, net 38.67 MJ, carbon content, fossil 0.923077, dry mass 1 kg, wet mass 1 kg
  note on carbon content, fossil: Chemical formula of polystyrene is (C8H8)n (ecoinvent v2.2 report 11_II)

## Extrapolations
This dataset has been extrapolated from year 2003 to the year of the calculation (2021). The uncertainty has been adjusted accordingly.

## Review by Roberto Dones 2003-07-04
Passed
