# maize grain, feed production

Dataset: EcoSpold 2, unit process
Geography: ZA
Time period: 2016-01-01 to 2021-12-31
Technology level: current
Classification: EcoSpold01Categories: agricultural means of production/feed
Classification: ISIC rev.4 ecoinvent: 1080:Manufacture of prepared animal feeds
Scenario: Business-as-Usual
System model: Allocation, cut-off by classification
Generated by: Ilhaam Patel
Published in: Russo, V 2017
Database: ecoinvent
isCopyrightProtected: true
accessRestrictedTo: 1

## General comment
The inventory refers to 1 kg processed feedstuff (fresh weight).
Boundary of exchanges for maize grain, feed production, ZA 2016

## Included activities start
The dataset starts with the reception of feedstuff at the processing centre.

## Included activities end
The inventory includes the processing of feedstuff (crushing or milling, heat treatment, dosing, mixing squeezing and pelleting) and the storage of the feed mixes. It also includes water use and wastewater treatment, the transformation and use of land related to the storage buildings. No process emissions were included except heat waste from the use of electricity. Packaging is not included.

## Geography
South African values: not applicable worldwide

## Technology
The data are intended to reflect current equipment and processes in South Africa.

## Time period
The production data represented in this dataset are based on SAGIS supply and demand data for the 2016/2017 marketing season (March to Feb) retrieved online. Reference(s): SAGIS (2017) Supply and Demand: Marketing Year March 2016 to February 2017, South African Grain Information System. Available at: http://www.sagis.org.za/sd_marketing_year.html. (Accessed August 2017)

## Parameters
- fraction, process water, to air: 0.9 dimensionless; lognormal variance with pedigree 0.092025, pedigree (4,4,3,2,4)
- fraction, tap water, to air: 0.9 dimensionless; lognormal variance with pedigree 0.092025, pedigree (4,4,3,2,4)

## Reference product
- maize grain, feed: 1 kg; name REF_PRODUCT; CPC 23319: Preparations used in animal feeding n.e.c.; By-product classification allocatable product
  Maize grain processed primarily for animal feed.
  production volume 4.48798e9 kg; name REF_PRODUCT_PV
    Calculated from the annual production volume of milled maize products (9,868,504 tonnes) and the fraction of total product that is for the animal feed industry. This production figure is calculated from the total maize processed for industrial/animal purposes (SAGIS, 2017) and the breakdown of of indutrial versus animal feed production. Industrial refers to wet mill products - there is only one wet mill in South Africa, i.e. Tongaat Hulett Starch. Tongaat processes more than 630 thousand tonnes of maize for starch (THS, 2017). The remainder is processed for animal feed. SAGIS supply and demand data for the 2016/2017 marketing season (March to Feb). Reference(s): SAGIS (2017) Supply and Demand: Marketing Year March 2016 to February 2017, South African Grain Information Service. Available at: http://www.sagis.org.za/sd_marketing_year.html. (Accessed August 2017); THS (2017) Integrated Annual Report, Tongaat Hulett Starch. Available at: http://www.tongaat.co.za/imc/annual_reports/ar_2017/downloads/annual-report-2017.pdf. (Accessed May 2017).
  property price 0.12 EUR2005; name REF_PRODUCT_price_EUR2005
    Estimated equal to price of maize grain, 0.12EUR/kg, comment: Literature value. Based on SAFEX price of R 2,025 per tonne (average yellow and white). Source: SAGIS, 2018. Retrieved from: http://www.sagis.org.za/safex_historic.html, accessed 28May2018.
  property carbon content 0.46957
    carbon content on a dry matter basis (reserved; not for manual entry)
  properties: wet mass 1 kg, water in wet mass 0.14 kg, dry mass 0.86 kg, water content 0.162791, carbon content, fossil 0, carbon content, non-fossil 0.46957, carbon allocation 0.40383 kg

## Inputs from technosphere
- maize grain: 1 kg; lognormal variance with pedigree 0.06, pedigree (1,1,5,5,3)
  Refers to the grain input for feed production. Due to lack of representative data, no loss is considered.
  properties: dry mass 0.86 kg, carbon content, non-fossil 0.46957, water content 0.162791, wet mass 1 kg
- wastewater, average: -3.52e-5 m3; name WW; source Salzgeber Ch. 1996; lognormal variance with pedigree 0.0492, pedigree (2,3,4,1,1)
  EcoSpold01Location=CH
  Estimated value based on average tap water input and fraction of water input emitted as wastewater. The fraction of wastewater was based on tap water input and wastewater output reported by a single feed production mill in South Africa and amounted to 43%. Reference(s): CBH (2013) Integrated Annual Report 2013, Country Bird Holdings Limited, Available at: http://cbh.co.za/wp-content/uploads/2014/07/cbh_integrated_annual_report_2013.pdf. (Accessed October 2017).
  production volume 157977 m3; = WW/ REF_PRODUCT* REF_PRODUCT_PV
    Calculated from the production volume of maize grain, feed, in proportion to the respective output amounts.
  property price 0 EUR2005; name WW_price_EUR2005
  properties: dry mass 0.346837 kg, water content 2882.2, carbon content, non-fossil 0.194039, wet mass 1000 kg
  note on carbon content, non-fossil: 0.0673 kg TOC/m3 (Tab A.17, ecoinvent v2.2 report 13_I). TOC was considered as Total Carbon.
- tap water: 0.082 kg; source Salzgeber Ch. 1996; lognormal variance with pedigree 0.0492, pedigree (2,3,4,1,1)
  Average water use of two feed production facilities in South Africa: 57 kg/tonne and 107 kg/tonne based on annual production data. Reference(s): CBH (2013) Integrated Annual Report 2013, Country Bird Holdings Limited, Available at: http://cbh.co.za/wp-content/uploads/2014/07/cbh_integrated_annual_report_2013.pdf. (Accessed October 2017); Astral Foods (2011) Carbon Footprint Assessment Report: October 2009 to September 2010, Available at: http://www.astralfoods.com/PDF/Company%20Information/Carbon%20Footprint%20Assessment%20Report%20October%202009%20to%20September%202010.pdf. (Accessed October 2017).
  properties: wet mass 1 kg, water content 2962.17, carbon content, fossil 0.00178991, dry mass 0.000337476 kg
  note on carbon content, fossil: Bicarbonate content is 2.93 mol/m3. CO2 content is 0.1 mol/m3 (ecoinvent v2.2 report 8, Tab 93.1).
- electricity, low voltage: 0.0374 kWh; source InfoMil  1996; lognormal variance with pedigree 0.0192, pedigree (2,3,4,1,1)
  Average electricity use of several feed production facilities in South Africa. Electricity ranges from 22.9 kWh/tonne and 50.6 kWh/tonne based on annual production data. Reference(s): CBH (2013) Integrated Annual Report 2013, Country Bird Holdings Limited, Available at: http://cbh.co.za/wp-content/uploads/2014/07/cbh_integrated_annual_report_2013.pdf. (Accessed October 2017); Astral Foods (2011) Carbon Footprint Assessment Report: October 2009 to September 2010, Available at: http://www.astralfoods.com/PDF/Company%20Information/Carbon%20Footprint%20Assessment%20Report%20October%202009%20to%20September%202010.pdf. (Accessed October 2017).
  EcoSpold01Location=CH
- industrial machine, heavy, unspecified: 1.3e-5 kg; lognormal variance with pedigree 0.1306, pedigree (5,5,5,5,4)
  Estimate from industrial machinery used in "Limestone, crushed, for mill production" (annual production of 195,000 tonnes). Value adapted on the basis of annual production, which was estimated to be an average of 415,000 tonnes per year, based on the production figures of two dry milling facilities in South Africa, producing flour. The estimated life span of the machines is 25 years.
- building, multi-storey: 8.5e-6 m3; source UFA 2002; lognormal variance with pedigree 0.3446, pedigree (3,3,5,5,1)
  EcoSpold01Location=RER
  Estimated figure is not geography specific. The value is the same as "maize grain, feed production, GLO"
- heat, district or industrial, other than natural gas: 0.153 MJ; lognormal variance with pedigree 0.0098, pedigree (2,3,4,1,1)
  Average coal use (in boilers) of several feed production facilities in South Africa. Heat requirements from coal ranging from 0.1 MJ/tonne and 322 MJ/tonne based on annual production data. Reference(s): CBH (2013) Integrated Annual Report 2013, Country Bird Holdings Limited, Available at: http://cbh.co.za/wp-content/uploads/2014/07/cbh_integrated_annual_report_2013.pdf. (Accessed October 2017); Astral Foods (2011) Carbon Footprint Assessment Report: October 2009 to September 2010, Available at: http://www.astralfoods.com/PDF/Company%20Information/Carbon%20Footprint%20Assessment%20Report%20October%202009%20to%20September%202010.pdf. (Accessed October 2017).
  properties: heating value, net 1 MJ, corresponding fuel use, propane, furnace >100kW 1.05263 MJ
  note on corresponding fuel use, propane, furnace >100kW: Lower heating value of the fuel input related to the heat/electricity output, taken directly from ecoinvent v3.0 dataset "heat production, natural gas, at industrial furnace >100kW, GLO 2000".

## Inputs from nature
- Occupation, industrial area [natural resource, land]: 5e-5 m2*year; source UFA 2002; lognormal variance with pedigree 0.0846, pedigree (3,3,5,5,1)
  Estimated figure is not geography specific. The value is the same as "maize grain, feed production, GLO"
- Occupation, construction site [natural resource, land]: 2e-6 m2*year; source UFA 2002; lognormal variance with pedigree 0.0846, pedigree (3,3,5,5,1)
  (same comment as for Occupation, industrial area)
- Transformation, from unspecified [natural resource, land]: 1e-6 m2; source UFA 2002; lognormal variance with pedigree 0.1646, pedigree (3,3,5,5,1)
  (same comment as for Occupation, industrial area)
- Transformation, to industrial area [natural resource, land]: 1e-6 m2; source UFA 2002; lognormal variance with pedigree 0.1646, pedigree (3,3,5,5,1)
  (same comment as for Occupation, industrial area)

## Emissions to nature
- Water [air, unspecified]: 4.69e-5 m3; lognormal variance with pedigree 0.052, pedigree (3,4,4,1,1)
  Emissions of water calculated from tap water input and wastewater generation for water balance.

## Sampling procedure
Data based on literature, trade statistics and information from feedstuff processing enterprises.

## Extrapolations
This dataset has been extrapolated from year 2016 to the year of the calculation (2021). The uncertainty has been adjusted accordingly.

## Review by Assumpció ANTON 2017-11-21
Please,be aware to consider further flow updates as far as better information or emission models are available.

It could be advisable to have a specific report, similar to Ecoinvent report n.º 15 or WFLDB guidelines but specific for South African crops, where specific parameters, scaling factors used to build and calculate emissions are explained. That would help further parctitioners to validate datasets or change what they may consider.
