# treatment of waste refinery gas, burned in flare

Dataset: EcoSpold 2, unit process
Geography: GLO
Time period: 1980-01-01 to 2021-12-31
Technology level: current
Classification: EcoSpold01Categories: oil/production
Classification: ISIC rev.4 ecoinvent: 1920:Manufacture of refined petroleum products
Tags: ConvertedDataset; Treatment
Scenario: Business-as-Usual
System model: Allocation, cut-off by classification
Generated by: Niels Jungbluth
Published in: Jungbluth, N. 2007
Database: ecoinvent
isCopyrightProtected: true
accessRestrictedTo: 1

## General comment
Description of the direct emissions due to the combustion of refinery gas in refinery flares not including the infrastructure of the flare.
[This dataset was already contained in the ecoinvent database version 2. It was not individually updated during the transfer to ecoinvent version 3. Life Cycle Impact Assessment results may still have changed, as they are affected by changes in the supply chain, i.e. in other datasets. This dataset was generated following the ecoinvent quality guidelines for version 2. It may have been subject to central changes described in the ecoinvent version 3 change report (http://www.ecoinvent.org/database/ecoinvent-version-3/reports-of-changes/), and the results of the central updates were reviewed extensively. The changes added e.g. consistent water flows and other information throughout the database. The documentation of this dataset can be found in the ecoinvent reports of version 2, which are still available via the ecoinvent website. The change report linked above covers all central changes that were made during the conversion process.]

## Included activities end
Combustion emissions.

## Geography
Data for Swiss and single European plants.

## Technology
Average technology in use.

## Time period
New European data from single plants for regulated emissions like CO2, NOx, SOx etc. have been provided in the literature. They have been compared and discussed with older literature data.

## Reference product
- waste refinery gas: -1 MJ; CPC 39990: Other wastes n.e.c.; By-product classification Waste
  EcoSpold01Location=GLO
  production volume 4.94198e11 MJ
    Not known
    Calculated from a global input of 3.93E+12 kg crude petroleum (IEA) and the corresponding output relations of the European dataset (2.5 kg waste refinery gas/Mg crude; 50.3 MJ/kg)
  property price 0 EUR2005
    Waste products are assigned a price of zero as they are assumed to require further treatment.
  property carbon content, fossil 0.77
    C-content in refinery gas is 77% (0.77kg C/kg) (ecoinvent v2.2 report 6_IV, tab 3.11)
  property carbon content 0.77
    carbon content on a dry matter basis (reserved; not for manual entry)
  properties: carbon content, non-fossil 0, water content 0, wet mass 0.0198807 kg, dry mass 0.0198807 kg, water in wet mass 0 kg, carbon allocation 0.0153082 kg

## Emissions to nature
- NMVOC, non-methane volatile organic compounds, unspecified origin [air, urban air close to ground]: 4.97e-6 kg; lognormal variance with pedigree 0.1741, pedigree (3,4,5,3,1)
  Literature data
  Uncertainty: Literature data
- Methane, fossil [air, urban air close to ground]: 4e-6 kg; lognormal variance with pedigree 0.0941, pedigree (3,4,5,3,1)
  Literature data
  Uncertainty: Literature data
- Carbon dioxide, fossil [air, urban air close to ground]: 0.0561 kg; lognormal variance with pedigree 0.0541, pedigree (3,4,5,3,1)
  Literature data
  Uncertainty: Literature data
- Radon-222 [air, non-urban air or from high stacks]: 0.00636 kBq; lognormal variance with pedigree 0.1626, pedigree (2,4,5,1,1)
  Literature data
  Uncertainty: Literature data
- Nitrogen oxides [air, urban air close to ground]: 0.000192 kg; lognormal variance with pedigree 0.32, pedigree (1,1,5,1,1)
  44.5% of Range for RER refineries
- Carbon monoxide, fossil [air, urban air close to ground]: 1.5e-5 kg; lognormal variance with pedigree 0.7041, pedigree (3,4,5,3,1)
  Literature data
  Uncertainty: Literature data
- Particulates, < 2.5 um [air, urban air close to ground]: 5.46e-6 kg; lognormal variance with pedigree 0.1626, pedigree (2,4,5,1,1)
  Literature data
  Uncertainty: Literature data
- Mercury [air, urban air close to ground]: 1.39e-9 kg; lognormal variance with pedigree 0.7041, pedigree (3,4,5,3,1)
  Literature data
  Uncertainty: Literature data
- Sulfur dioxide [air, urban air close to ground]: 0.000729 kg; lognormal variance with pedigree 1.79, pedigree (1,1,5,1,1)
  Range for RER refineries, Share for combustion

## Sampling procedure
Literature survey and plant data.

## Extrapolations
This dataset has been extrapolated from year 2000 to the year of the calculation (2021). The uncertainty has been adjusted accordingly.

## Review by Michael Spielmann (obsolete) 2003-07-04
passed
