# maize grain production

Dataset: EcoSpold 2, unit process
Geography: BR-PR
Time period: 2012-01-01 to 2021-12-31
Technology level: current
Classification: ISIC rev.4 ecoinvent: 0111:Growing of cereals (except rice), leguminous crops and oil seeds
Synonyms: corn production; maize production
Scenario: Business-as-Usual
System model: Allocation, cut-off by classification
Share of production covered: 37 %
Generated by: Marília I. S. Folegatti Matsuura
Published in: Folegatti-Matsuura M. 2018
Database: ecoinvent
isCopyrightProtected: true
accessRestrictedTo: 1

## General comment
This dataset represents the production of 1 kg of maize grain (fresh matter). The average annual yield is 5449 kg/ha at a moisture content of 14% after drying.
This activity represents the production of maize grain in cropping system (e.g. crop rotation with other grain in the agricultural cycle, mainly soybean). There is no maize monoculture in Brazil.
Therefore, exchanges that are shared (land occupation and liming) are related to the time occupation of maize production. The total amount of mineral fertilizers (N-P-K) and pesticides (glyphosate, atrazine, imidacloprid, beta-cyfluthrin, methyl ester, teflubenzurom, lufenuron, nicosulfuron, trifloxystrobin and tebuconazole) applied are 64 kg N.ha-1; 50 kg P2O5.ha-1; 50 kg K2O.ha-1 and 3.77 a.i.ha-1, respectively.

## Included activities start
This activity starts after the harvest of the previous crop.

## Included activities end
The dataset includes the inputs of seeds, mineral fertilisers and pesticides. It is assumed that no organic fertilisers are applied.
The dataset also includes all machine operations and corresponding machine infrastructure and sheds. Machine operations are: limestone and gypsum application, by spreader; application of plant protection product, by field sprayer; planting with starter fertiliser, by no till planter; fertilising, by broadcaster; combine harvesting and drying of grains. Includes the transportation of products inside the farm: water from water source to field, fertilisers from farm gate to field and grains from harvester to truck.
Furthermore, direct field and land use change emissions are included, with important regionalizations added. The dataset doesn't include: cleaning and storage of harvested grains.
The activity ends after harvest at the farm gate.

## Geography
The inventory is modelled for the state of Parana, in Brazil.

## Technology
Cultivation of maize grains like second harvest in cropping system (e.g. soybean followed by maize).

## Time period
Time period of the most of the data collected for this dataset.

## Parameters
- rooting depth: 0.46 m; name root_depth; lognormal variance with pedigree 0.0509, pedigree (4,4,2,3,4)
  This value represents the rooting depth of the crop (m).
  Used in the SQCB-NO3 model for the calculation of leaching of NO3.
  From Bordin et al. (2008).
- soil eroded: 251 kg/ha.yr; name soil_eroded; lognormal variance with pedigree 0.0447, pedigree (3,4,1,3,4)
  This value represents the quantity of soil eroded (kg/(ha*yr)).
  Used for the calculation of P emissions through water erosion to surface water. From Zolin et al. (2016).
- LUC_crop_specific: 1 dimensionless
  This parameter allows to switch between a 'crop specific' and a 'country specific' approach when calculating the LUC of a crop. By default, the chosen approach is 'crop specific', so the value of the parameter is 1. If you want to apply a 'country specific' approach, turn the parameter to 0.
- precipitation, annual: 1450 mm/year; name precipitation; lognormal variance with pedigree 0.0013, pedigree (2,2,1,1,1)
  This value represents the average annual precipitation in Parana, Brazil.
  Used in the SQCB-NO3 model for the calculation of leaching of NO3.
- clay content into soil: 60 % (obsolete); name Clay_content; lognormal variance with pedigree 0.0487, pedigree (4,2,1,1,4)
  This value represents the fraction of clay content into soil (%).
  Used in the SQCB-NO3 model for the calculation of leaching of NO3.
  From May et al. (2016).
- water content at harvest: 0.18 kg/kg; name harvest_wc; lognormal variance with pedigree 0.0007, pedigree (1,2,1,1,1)
  Crop water content at harvest (% fresh basis). From May et al. (2016).
- nitrogen uptake by plant: 196 kg N/ha; name Nuptake_plant; lognormal variance with pedigree 0.0606, pedigree (4,5,3,5,4)
  This value represents the N taken by plant during its growth (kg N/ha). Used in the SQCB-NO3 model for the calculation of leaching of NO3.
  From Nemececk & Schnetzer (2011),
- total liming: 219.178 kg/ha; name L_total; = 2000/3*occupation_time; lognormal variance with pedigree 0.0007, pedigree (1,2,1,1,1)
  Amount for typical system from May et al. (2016) alocated between soybean and maize in cropping system where maize occupies the ground for four months and limestone is applied each three years.
- organic nitrogen into soil: 9000 kg N/ha; name Norg_soil; lognormal variance with pedigree 0.0487, pedigree (4,2,1,1,4)
  Norg is the mass of organic nitrogen contained in the upper 50 cm of soil per ha (kg N/ha). Used in the SQCB-NO3 model for the calculation of leaching of NO3. From May et al. (2016).
- land transformation to: 1.84 m2/kg; name T_t; lognormal variance with pedigree 0.008, pedigree (1,1,1,1,1)
  This value will be used to transform exchanges per ha to exchanges per kg of maize grain. From May et al. (2016).
  Uncertainty: Variance of log-transformed data as recommended by Ecoinvent for "Land use, transformation" for agriculture.
- total nitrogen: 64 kg/ha; name N_total; lognormal variance with pedigree 0.0007, pedigree (1,2,1,1,1)
  This value represents the total nitrogen in mineral fertilisers (kg N/ha). From May et al. (2016).
- occupation time: 0.328767 dimensionless; name occupation_time; = 120/365
  Liming is proportional to the occupation time of maize production in cropping system (4 months).
- nitrogen in crop residues: 30 kg N/ha; name Ncrop_residues; lognormal variance with pedigree 0.0467, pedigree (3,4,3,3,4)
  This value represents the nitrogen contained in the crop residues (kg N/ha). Used for the calculation of emissions of N2O to the air.
  From Coelho (2007).

## Reference product
- maize grain: 1 kg; name REF_PRODUCT; By-product classification allocatable product; CPC 01122: Maize (corn), other
  1 Kg of maize grain produced used as reference. The corn cob, straw and biomass are left on the field.
  production volume 1.57774e10 kg
    Production Volume of maize grain in the state of Paraná in Brazil, 2015 harvest, according to the Municipal Agricultural Production Data of the Brazilian Institute of Geography and Statistics (SIDRA - IBGE). See more in: <http://www.sidra.ibge.gov.br/>.
  property price 0.12 EUR2005; name REF_PRODUCT_price_EUR2005
    Literature value. Based on SAFEX price of R 2,025 per tonne (average yellow and white). Source: SAGIS, 2018. Retrieved from: http://www.sagis.org.za/safex_historic.html, accessed 28May2018.
  property wet mass 1 kg; name REF_PRODUCT_WM
  property water in wet mass 0.14 kg; name REF_PRODUCT_WWM
  property carbon content, non-fossil 0.46957; name REF_PRODUCT_C_content_non_fossil
    Based on ecoinvent database.
  property dry mass 0.86 kg; name REF_PRODUCT_DM; = REF_PRODUCT_WM- REF_PRODUCT_WWM
  property water content 0.162791; = REF_PRODUCT_WWM/ REF_PRODUCT_DM
  property carbon content 0.46957
    carbon content on a dry matter basis (reserved; not for manual entry)
  properties: carbon content, fossil 0, carbon allocation 0.40383 kg

## Inputs from technosphere
- drying of maize grain: 0.0487805 l; name water_drying; = REF_PRODUCT*( REF_PRODUCT_WWM- harvest_wc)/( harvest_wc-1); source Folegatti Matsuura M. 2017; lognormal variance with pedigree 0.3046, pedigree (3,3,3,1,1)
  Calculated from average moisture content of grains at harvest (see Exchange Properties and Parameters).
- tap water: 0.184 kg; name water_dilution; = 5*T_t*1E-04*200; source Folegatti Matsuura M. 2017; lognormal variance with pedigree 0.0033, pedigree (2,2,3,1,1)
  Water is used to dilute pesticides in a rate of 200 liters per application. Amount for typical system from May et al. (2016).
  properties: dry mass 0.000337476 kg, carbon content, fossil 0.00178991, water content 2962.17, wet mass 1 kg
  note on carbon content, fossil: Bicarbonate content is 2.93 mol/m3. CO2 content is 0.1 mol/m3 (ecoinvent v2.2 report 8, Tab 93.1).
- inorganic potassium fertiliser, as K2O: 0.00918 kg; source Folegatti Matsuura M. 2017; lognormal variance with pedigree 0.0033, pedigree (2,2,3,1,1)
  Amount for typical system from May et al. (2016).
  Uncertainty: Variance of log-transformed data as recommended by Ecoinvent for "Primary energy carriers, metals, salts" for agriculture.
  properties: wet mass 1 kg, dry mass 1 kg
- pesticide, unspecified: 0.00029 kg; source Folegatti Matsuura M. 2017; lognormal variance with pedigree 0.0033, pedigree (2,2,3,1,1)
  Amount for typical system from May et al. (2016). This exchange represents the input of Imidacloprid (3.8%); Beta-Cyflutrin (0.5%); Methyl esther (64.5%); Teflubenzuron (1.9%); Lufenuron (1.6%); Nicosulfuron (0.8%); Trifloxystrobin (9%); and Tebuconazole (17.9%).
  Uncertainty: Variance of log-transformed data as recommended by Ecoinvent for "Primary energy carriers, metals, salts" for agriculture.
  properties: wet mass 1 kg, dry mass 1 kg, carbon content, fossil 0.486978
- land use change, annual crop: 0 ha; = 0*LUC_crop_specific+(0*(1-LUC_crop_specific))
  Calculated value. Land use change (LUC) from Novaes et al. (2017).
- atrazine: 0.000229 kg; source Folegatti Matsuura M. 2017; lognormal variance with pedigree 0.0033, pedigree (2,2,3,1,1)
  Amount for typical system from May et al. (2016).
  properties: dry mass 1 kg, carbon content, fossil 0.446512, wet mass 1 kg
- inorganic phosphorus fertiliser, as P2O5: 0.00918 kg; source Folegatti Matsuura M. 2017; lognormal variance with pedigree 0.0033, pedigree (2,2,3,1,1)
  (same comment as for inorganic potassium fertiliser, as K2O)
  properties: dry mass 1 kg, wet mass 1 kg
- limestone and gypsum application, by spreader: 2.01644e-5 ha; = 1/3*occupation_time*T_t*1E-04; source Folegatti Matsuura M. 2017; lognormal variance with pedigree 0.005225, pedigree (3,3,3,2,1)
  Agricultural operation. Amount for typical system from May et al. (2016) alocated between soybean and maize in cropping system where maize occupies the ground for four months and limestone is applied each three years.
- glyphosate: 0.000176 kg; source Folegatti Matsuura M. 2017; lognormal variance with pedigree 0.0033, pedigree (2,2,3,1,1)
  Amount for typical system from May et al. (2016).
  properties: wet mass 1 kg, dry mass 1 kg, carbon content, fossil 0.214286
- packaging, for fertilisers: 0.14093 kg; lognormal variance with pedigree 0.0532, pedigree (4,3,3,5,4)
  Total amount of active substance/s of fertilisers needed for the production of 'maize grain' is calculated to be circa 7.05E-02 kg. Fertiliser/s used in this dataset is/are: 'lime', 'phosphate fertiliser, as P2O5', 'potassium fertiliser, as K2O', 'urea, as N'. The total amount of active substance/s is doubled in order to account for the packaging of the dilluted product of fertiliser/s that is/are applied. Therefore, 1.41E-01 kg of packaging for fertilisers is justified with this exchange.
  properties: heating value, net 25.01 MJ, wet mass 1 kg, price 0.0642 EUR2005, dry mass 1 kg, carbon content, fossil 0.825301
  note on carbon content, fossil: Considering a chemical formula (C2H4)n for polyethylene, carbon content-fossil is calculated to be 0.856286 kg of Carbon per kg of dry mass.
- fertilising, by broadcaster: 0.000184 ha; = 1*T_t*1E-04; source Folegatti Matsuura M. 2017; lognormal variance with pedigree 0.005225, pedigree (3,3,3,2,1)
  Agricultural operation. Amount for typical system from May et al. (2016).
- transport, tractor and trailer, agricultural: 0.000684554 metric ton*km; = 3.7204 * T_t * 1E-04; source Folegatti Matsuura M. 2017; lognormal variance with pedigree 0.3046, pedigree (3,3,3,1,1)
  Transports inside the field of: grains (total distance = 0.6 km/ha; total load = 0.6 t/ha), side dressing fertiliser (total distance = 0.14 km/ha; total load = 0.14 t/ha), starter fertiliser (total distance = 0.16 km/ha; total load = 0.16 t/ha) and water (total distance = 0.13 km/ha; total load = 0.13 t/ha) respectively. Amount for typical system from May et al. (2016). Transport of water from the water source to the field to supply the pesticide sprayer. Long distances are involved in maize production in Brasil what makes necessary the transportation, e.g., of water from the captation to the application in order to keep the operation of pesticide spraying continuos. Amount for typical system from May et al. (2016).
- packaging, for pesticides: 0.00139 kg; lognormal variance with pedigree 0.0532, pedigree (4,3,3,5,4)
  Total amount of active substance/s of pesticides needed for the production of maize grain is calculated to be circa 6.95E-04 kg. Pesticide/s used in this dataset is/are: 'atrazine', 'glyphosate', 'pesticide, unspecified'. The total amount of active substance/s is doubled in order to account for the packaging of the dilluted product of pesticide/s that is/are applied. Therefore, 1.39E-03 kg of packaging for pesticides is justified with this exchange.
  properties: heating value, net 25.97 MJ, price 0.0642 EUR2005, carbon content, fossil 0.85714, dry mass 1 kg, wet mass 1 kg
- planting with starter fertiliser, by no till planter: 0.000184 ha; = 1*T_t*1E-04; source Folegatti Matsuura M. 2017; lognormal variance with pedigree 0.005225, pedigree (3,3,3,2,1)
  Maize seeds planting operation with the application of starter fertiliser inside the groove. Amount for typical system from May et al. (2016).
- urea: 0.0252454 kg; name N_fert; = (N_total * T_t * 1E-04)*2.14379903903132; source Folegatti Matsuura M. 2017; lognormal variance with pedigree 0.0033, pedigree (2,2,3,1,1)
  The exchange has been updated from 'urea, as N' into 'urea' and therefore its amount has been scaled (multiplied) from 0.0118 kg by 2.1438 kg of 'urea' per kg of 'urea, as N'. Original comment of the exchange is: Urea as Nitrogen fertiliser. Amount for typical system from May et al. (2016).
  properties: dry mass 1 kg, carbon content, fossil 0.2, wet mass 1 kg
- lime: 0.0403288 kg; = L_total*T_t*1E-04; source Folegatti Matsuura M. 2017; lognormal variance with pedigree 0.0033, pedigree (2,2,3,1,1)
  Amount for typical system from May et al. (2016) alocated between soybean and maize in cropping system where maize occupies the ground for four months.
  Uncertainty: Variance of log-transformed data as recommended by Ecoinvent for "Primary energy carriers, metals, salts" for agriculture.
  properties: wet mass 1 kg, dry mass 1 kg, carbon content, fossil 0.120005
- combine harvesting: 0.000184 ha; = 1*T_t*1E-04; source Folegatti Matsuura M. 2017; lognormal variance with pedigree 0.3046, pedigree (3,3,3,1,1)
  Agricultural operation. Amount for typical system from May et al. (2016).
- application of plant protection product, by field sprayer: 0.00092 ha; = 5*T_t*1E-04; source Folegatti Matsuura M. 2017; lognormal variance with pedigree 0.3046, pedigree (3,3,3,1,1)
  Agricultural operation. Amount for typical system from May et al. (2016).
- maize seed, for sowing: 0.00385 kg; name SEED; source Folegatti Matsuura M. 2017; lognormal variance with pedigree 0.0033, pedigree (2,2,3,1,1)
  Amount for typical system from May et al. (2016).
  property carbon content, non-fossil 0.45263; name maize_seed_sowing_C_content_non_fossil
  property carbon content, fossil 0; name maize_seed_sowing_C_content_fossil
  property wet mass 1 kg; name maize_seed_sowing_WM
  property water content 0.136364; name maize_seed_sowing_water_content; = maize_seed_sowing_WWM/ maize_seed_sowing_DM
  property dry mass 0.88 kg; name maize_seed_sowing_DM; = maize_seed_sowing_WM- maize_seed_sowing_WWM
  property water in wet mass 0.12 kg; name maize_seed_sowing_WWM
  note on carbon content, non-fossil: biogene carbon content on a dry matter basis; Composition data obtained from Corn Grain Whole, in (http://beefmagazine.com/images/2009%20feed%20table.pdf). First, composition data were refered to 1 kg dry mass. Then, C-contents were calculated considering a C-content/dry mass of 44% in carbohydrates (including fibres), 53% in proteins and 75% in fats. All data from ecoinvent report, n 15a, pg 40, except C-content in protein, that comes from Determination of protein concentration by total organic carbon analysis, Rouwenhorst et al., 1991, J Biochem and Biophys Methods, 22:119-128.

## Inputs from nature
- Transformation, to annual crop, non-irrigated [natural resource, land]: 1.84 m2; = T_t; source Folegatti Matsuura M. 2017; lognormal variance with pedigree 0.01, pedigree (1,1,3,1,1)
  Amount for typical system from May et al. (2016).
- Energy, gross calorific value, in biomass [natural resource, biotic]: 15.91 MJ; lognormal variance with pedigree 0.0033, pedigree (2,2,3,1,1)
  Calorific value of maize based on Ecoinvent database.
  Uncertainty: Variance of log-transformed data as recommended by Ecoinvent for "Primary energy carriers, metals, salts" for agriculture.
- Occupation, annual crop, non-irrigated, intensive [natural resource, land]: 0.604932 m2*year; = T_t*occupation_time; source Nemecek, T. 2011; lognormal variance with pedigree 0.004, pedigree (1,1,3,1,1)
  Occupation may range around 120 days. Users must adjust this mathematical relation to their needs. The final amount was allocated due to being a cropping system. The fallow period considered is around 70 days.
  Uncertainty: Variance of log-transformed data as recommended by Ecoinvent for "Land use, occupation" for agriculture.
- Transformation, from annual crop, non-irrigated [natural resource, land]: 1.84 m2; = T_t; source Folegatti Matsuura M. 2017; lognormal variance with pedigree 0.01, pedigree (1,1,3,1,1)
  Amount for typical system from May et al. (2016).
- Carbon dioxide, in air [natural resource, in air]: 1.47509 kg; = 44/12 * (REF_PRODUCT_C_content_non_fossil * REF_PRODUCT * REF_PRODUCT_DM - maize_seed_sowing_C_content_non_fossil * SEED * maize_seed_sowing_DM); source Nemecek, T. 2011; lognormal variance with pedigree 0.0033, pedigree (2,2,3,1,1)
  CO2 absorbed during photosyntesis. See "3.1 CO2 from the Atmosphere" in Nemececk & Schnetzer (2011).
  Uncertainty: Variance of log-transformed data as recommended by Ecoinvent for "Primary energy carriers, metals, salts" for agriculture.

## Emissions to nature
- Nickel, ion [water, surface water]: 2.38e-10 kg; source Milà i Canals L. 2003; lognormal variance with pedigree 0.1007, pedigree (4,3,3,3,1)
  Emissions of heavy metals to soil and surface water estimated from mineral fertilisers and liming as recommended by Canals (2003), metal content in maize from Anjos & Mattiazzo (2000).
  Uncertainty: Variance of log-transformed data as recommended by Ecoinvent for "Heavy metals" for agriculture.
- Cadmium [soil, agricultural]: 1.74e-7 kg; source Milà i Canals L. 2003; lognormal variance with pedigree 0.0506, pedigree (4,3,3,1,1)
  (same comment as for Nickel, ion)
- Glyphosate [soil, agricultural]: 0.000176 kg; source Nemecek, T. 2011; lognormal variance with pedigree 0.0436, pedigree (4,3,3,1,1)
  "All pesticides applied for crop production were assumed to end up as emissions to the soil. The amounts of pesticides used as inputs were thus simultaneously calculated as outputs (emissions to agricultural soil)", as recomended by Nemecek & Schnetzer (2011), "2.9 EMISSIONS OF PESTICIDES TO AGRICULTURAL SOIL" (page 21).
  Uncertainty: Variance of log-transformed data as recommended by Ecoinvent for "Pesticides" for agriculture.
- Zinc [soil, agricultural]: -2.99e-5 kg; source Milà i Canals L. 2003
  Emissions of heavy metals to soil and surface water estimated from mineral fertilisers and liming as recommended by Canals (2003), metal content in maize from Anjos & Mattiazzo (2000). Nemecek & Schnetzer (2011) state that "some of the values for emissions of heavy metals to the soil are negative. This means that more heavy metals are exported than imported. It must, however, be borne in mind that these heavy metals are transferred either to the water bodies or to the products harvested from the field".
- Imidacloprid [soil, agricultural]: 1.1e-5 kg; source Nemecek, T. 2011; lognormal variance with pedigree 0.0436, pedigree (4,3,3,1,1)
  (same comment as for Glyphosate)
- Cadmium, ion [water, surface water]: 1.74e-11 kg; source Milà i Canals L. 2003; lognormal variance with pedigree 0.1007, pedigree (4,3,3,3,1)
  (same comment as for Nickel, ion)
- Nicosulfuron [soil, agricultural]: 2.2e-6 kg; source Nemecek, T. 2011; lognormal variance with pedigree 0.0436, pedigree (4,3,3,1,1)
  "All pesticides applied for crop production were assumed to end up as emissions to the soil. The amounts of pesticides used as inputs were thus simultaneously calculated as outputs (emissions to agricultural soil)", as recomended by Nemecek & Schnetzer (2011), "2.9 EMISSIONS OF PESTICIDES TO AGRICULTURAL SOIL" (page 21).
- Trifloxystrobin [soil, agricultural]: 2.57e-5 kg; source Nemecek, T. 2011; lognormal variance with pedigree 0.0436, pedigree (4,3,3,1,1)
  (same comment as for Nicosulfuron)
- Carbon dioxide, fossil [air, non-urban air or from high stacks]: 0.0369723 kg; = ((44/12*0.125*L_total)+(N_total*1.57))* T_t*1E-04; source IPCC 2006; lognormal variance with pedigree 0.0113, pedigree (4,3,3,3,1)
  Emissions of CO2 to air from limestone and urea application based on IPCC (2006).
  Uncertainty: Variance of log-transformed data as recommended by Ecoinvent for "CO2" for combustion emissions.
- Pesticides, unspecified [soil, agricultural]: 0.000191 kg; source Nemecek, T. 2011; lognormal variance with pedigree 0.0436, pedigree (4,3,3,1,1)
  "All pesticides applied for crop production were assumed to end up as emissions to the soil. The amounts of pesticides used as inputs were thus simultaneously calculated as outputs (emissions to agricultural soil)", as recomended by Nemecek & Schnetzer (2011), "2.9 EMISSIONS OF PESTICIDES TO AGRICULTURAL SOIL" (page 21). This exchange represents the emissions of Beta-Cyflutrin (0.7%); Methyl esther (96.9%); and Lufenuron (2.4%).
  Uncertainty: Variance of log-transformed data as recommended by Ecoinvent for "Pesticides" for agriculture.
- Copper, ion [water, surface water]: -6.33e-11 kg; source Milà i Canals L. 2003
  (same comment as for Zinc)
- Zinc, ion [water, unspecified]: -2.99e-9 kg; source Milà i Canals L. 2003
  (same comment as for Zinc)
- Ammonia [air, non-urban air or from high stacks]: 0.00285989 kg; name NH3; = 17/14*N_fert*0.466461632733939*0.2; source Nemecek T. 2015; lognormal variance with pedigree 0.0187, pedigree (4,3,3,3,1)
  NH3 emissions from applied mineral fertilisers are calculated according to EEA/EMEP (2013), page 35. For urea it is 20% to soils with pH<=7 (brazilian conditions).
  Uncertainty: Variance of log-transformed data as recommended by Ecoinvent for "CH4, NH3" for agriculture.
- Tebuconazole [soil, agricultural]: 5.14e-5 kg; source Nemecek, T. 2011; lognormal variance with pedigree 0.0436, pedigree (4,3,3,1,1)
  (same comment as for Nicosulfuron)
- Phosphorus [water, surface water]: 1.63214e-5 kg; = soil_eroded * 0.00095 * 1.86 * 0.2 * T_t*1E-04; source Nemecek, T. 2011; lognormal variance with pedigree 0.0507, pedigree (4,3,3,3,1)
  Due to phosphorus low mobility in Brazilian soils, its emissions through leaching and run-off were disregarded (Novais & Smyth, 1999). Only P emission by water erosion through surface water was considered, as in "2.3.3 Phorsphorous Emissions Through Water Erosion to Surface Water" Nemecek and Schnetzer (2011).
  Uncertainty: Variance of log-transformed data as recommended by Ecoinvent for "NO3, PO4" for agriculture.
- Atrazine [soil, agricultural]: 0.000229 kg; source Nemecek, T. 2011; lognormal variance with pedigree 0.0436, pedigree (4,3,3,1,1)
  (same comment as for Nicosulfuron)
- Dinitrogen monoxide [air, non-urban air or from high stacks]: 0.000362915 kg; name N2O; = 44/28*(0.01*((N_total+ Ncrop_residues)*T_t*1E-04)+ 0.01*14/17*NH3 + 0.0075*14/62*NO3); source Nemecek, T. 2011; lognormal variance with pedigree 0.1987, pedigree (4,3,5,3,5)
  Emissions of N2O to the air. See "2.4 EMISSIONS OF N2O TO THE AIR" in Nemecek & Schnetzer (2011), with "nitrogen contained in the crop residues" Ncr = 30 kg N/ha from Coelho (2007).
  Uncertainty: Variance of log-transformed data as recommended by Ecoinvent for "NOX, N2O" for agriculture.
- Copper [soil, agricultural]: -6.33e-7 kg; source Milà i Canals L. 2003
  (same comment as for Zinc)
- Chromium, ion [water, surface water]: 2.04e-10 kg; source Milà i Canals L. 2003; lognormal variance with pedigree 0.1007, pedigree (4,3,3,3,1)
  Emissions of heavy metals to soil and surface water estimated from mineral fertilisers and liming as recommended by Canals (2003), metal content in maize from Anjos & Mattiazzo (2000).
- Nitrogen oxides [air, non-urban air or from high stacks]: 7.62121e-5 kg; = N2O*0.21; source Nemecek, T. 2011; lognormal variance with pedigree 0.0407, pedigree (4,3,3,3,1)
  Emissions of NOx to the air. See "2.5 EMISSIONS OF NOX TO THE AIR" in Nemecek & Schnetzer (2011).
  Uncertainty: Variance of log-transformed data as recommended by Ecoinvent for "NOX, N2O" for agriculture.
- Water [water, surface water]: 0.000184 m3; = water_dilution*1E-03; lognormal variance with pedigree 0.0532, pedigree (4,3,3,5,4)
  Emissions of water related to pesticide dilution.
- Nitrate [water, ground-]: 0.0203323 kg; name NO3; = 62/14*((21.37 + precipitation/(Clay_content*root_depth) * (0.0037*N_total + 0.0000601*Norg_soil - 0.00362*Nuptake_plant)) * T_t * 1E-04); source Nemecek, T. 2011; lognormal variance with pedigree 0.0507, pedigree (4,3,3,3,1)
  See "2.2.2 The SQCB-NO3 model" in Nemececk & Schnetzer (2011), as "SALCA-NO3 model" has "Geographic scope of application: Europe". U= 196 Kg N/ha for Nitrogen uptake also from Nemececk & Schnetzer (2011), table 2.16. Norg = 9 t/ha for typical system from May et al. (2016).
  Uncertainty: Variance of log-transformed data as recommended by Ecoinvent for "NO3, PO4" for agriculture.
- Water [air, unspecified]: 4.87805e-5 m3; = water_drying*1E-03; lognormal variance with pedigree 0.0532, pedigree (4,3,3,5,4)
  Evaporated water related to the service dataset "drying of maize grain".
- Chromium [soil, agricultural]: 2.04e-6 kg; source Milà i Canals L. 2003; lognormal variance with pedigree 0.0506, pedigree (4,3,3,1,1)
  (same comment as for Nickel, ion)
- Teflubenzuron [soil, agricultural]: 5.51e-6 kg; source Nemecek, T. 2011; lognormal variance with pedigree 0.0436, pedigree (4,3,3,1,1)
  (same comment as for Nicosulfuron)
- Lead [soil, agricultural]: 4.55e-6 kg; source Milà i Canals L. 2003; lognormal variance with pedigree 0.0506, pedigree (4,3,3,1,1)
  (same comment as for Nickel, ion)
- Lead [water, surface water]: 4.55e-10 kg; source Milà i Canals L. 2003; lognormal variance with pedigree 0.1007, pedigree (4,3,3,3,1)
  (same comment as for Nickel, ion)
- Nickel [soil, agricultural]: 2.38e-6 kg; source Milà i Canals L. 2003; lognormal variance with pedigree 0.0506, pedigree (4,3,3,1,1)
  (same comment as for Nickel, ion)

## Sampling procedure
The main source of data for agricultural inputs and operations are projects conducted by Embrapa Milho e Sorgo (CNPMS) and Embrapa Soja (CNPSO). Data are also provided by relevant experts related to agricultural sector of maize in Parana state (BR).
Emissions from the agricultural process are estimated according to Nemecek and Schnetzer (2011) and Canals (2003).
The system of maize grain production analyzed corresponds to the west region of Paraná state that represents 37% of the total production in BR-PR, according to grains survey IBGE/SIDRA (2016) (https://sidra.ibge.gov.br/home/ipca15/brasil).

## Extrapolations
This dataset has been extrapolated from year 2016 to the year of the calculation (2021). The uncertainty has been adjusted accordingly.

## Review by Jens Lansche 2017-05-31
Reviewer comments have been considered.
Both documentation and modelling of the exchanges are well done.
