# wood preservation, dipping/immersion, water-based preservative, indoor use, occasionally wet

Dataset: EcoSpold 2, unit process
Geography: RoW
Time period: 2012-01-01 to 2021-12-31
Technology level: current
Classification: EcoSpold01Categories: wooden materials/refinement
Classification: ISIC rev.4 ecoinvent: 1610:Sawmilling and planing of wood
Synonyms: open tank impregnation
Scenario: Business-as-Usual
System model: Allocation, cut-off by classification
Generated by: trainee ecoinvent
Database: ecoinvent
isCopyrightProtected: true
accessRestrictedTo: 1

## General comment
This dataset covers the treatment of wood in open tank impregnation. The dipping/immersion process is considered to be a surface treatment and not a deep penetration treatment. Wood preservatives do not penetrate the wood more than three milimeters. We can distinguish two main types of industrial branches applying dipping/immersion for wood preservation purposes: a) sawmilling where freshly cut wood is treated with fungicides to prevent the discoloration caused by blue stain forming fungi; this treatment aims for a short-term preservation of wood until it is further processed, and b) joinery industry and carpentry shops: "joinery applications" are industrial processes to creating wood articles that have been made to shape, for example fence panels, composites, window, doors and door frames, floors, architrave, decorative features, etc; carpentry shops fabricate wooden construction materials and treat them for long term protection against insects and fungi. Despite some small differences in the operation and infrastructure, dipping/immersion applied by the two industrial sectors can be described by a generic "dipping/immersion" emission scenario (OECD 2000, p.38ff).
Both automatic and manual dipping/immersion are batch processes. It involves submerging a pack or a single piece of wood into the dipping tank filled with a solution containing the preservative. Packs of wood are loaded on automatic equipment (e.g. hydraulic elevator) and lowered into a dipping tank. Wood remains there for a period usually between a few minutes and an hour (it is less than 30 seconds fro sawmill anti-sapstain treatments but can last for several days for other applications, e.g. for cold soaking or steeping) during which the wood absorbs the preservative through capillary forces and diffusion. Dipping baths can be heated in cold climate conditions. The treated wood is held over the dipping vat, usually for 30 minutes to an hour, in order the excess of the preservative solution to drain. Drips are usually collected and recycled into the process. Then the treated wood is removed to storage. Dipping facilities may be open or encapsulated, equipped with vapour trapping and air emission control.
Application: 200 g/m2;
Characterisation of preservative: active agent: 0.45% iodopropinyl butylcarbamat, 0.075% Permethrin, 0.7% Tebocunazol; concentration for application: 100% v/v
Wood is not included in the dataset.
The process does not cause any waste water; preservatives from dripping or leaching during storage are recovered and recycled. Emissions into air and into surface water from run-off water are calculated based on emission factors (EF) as determined in OECD (2000, part 1), depending on the physical properties of the main componentes of the wood preservative. It is assumed in addition that all solvents (incl. water) are evaporated during drying and fixation. For acids and salts, no emissions into air are inventoried. The determination of emission factors is documented in the following table:
Sources:
OECD (2000): Emission scenario document for wood preservatives, part 1. OECD series on emission scenario documents, number 2, Organisation for Economic Co-operation and Development, Paris.
Personal written communications of several producers and/or researchers (see source fields for each exchange)

## Included activities start
Service starting with the reception of the concentrated wood preservative at the factory gate

## Included activities end
The data set contains the treatment service of dried wood with a water-based wood preservative (primer) for use class 2 (indoor use, occasionally wet) in the dipping/immersion process. It covers the necessary inputs of the wood preservative, electricity as well as some infrastructure. For the inventorying of emissions into surface water and air, see general comment. The dataset does not include wood. Also eventual waste streams (e.g. saw dust recollected from the dipping/immersion vat) are not included.

## Parameters
- efficiency of air filter: 0.75 dimensionless; name efficiency_air_filter
  According to EPA 1999 (p. 10.8-5) 'the result of one emission test on the incinerator-controlled facility indicated a VOC control efficiency of more than 99 percent'. Other emissions control devices such as knock-out tanks followed by a ventury scrubber are indicated to have a VOC control efficiency of 75% (same source).
- share of collected rainwater: 0.5 dimensionless; name share_collected_rainwater
  share of the rainwater that is colleced and lead into the sewer contrary to run-off water; default value according to OECD (2000, part 1)

## Reference product
- wood preservation, dipping/immersion method, water-based, indoor use, occasionally wet: 1 kg; CPC 54730: Painting services; By-product classification allocatable product
  production volume 1.47649e8 kg; name p_preservation; = 3.65E09 * 0.5 *0.92 * 0.28 /3
    Using the GLO value of 3.65E09 kg preservative derived from Vlosky (2009), the distribution on water-based (92%), the 50% non-pressure methods, the German data of 28% dipping/immersions and 72% flow coating and the assumption of equal distribution over the 3 use classes, we obtain: 3.65E09 kg * 0.5 (non-pressure) *0.92 (water) * 0.28 (dip)/3 use classes = 1.57E8kg
  property price 1.75612 EUR2005
    Calculated based on inputs: The price of the product has been calculated as a sum of the values of the material and energy inputs for this product. This value is therefore a rough estimation. It may underestimate the real price since there are additional expenses when producing any product. These expences can include for example labour costs, treatment of waste materials and profit for the producer. Please consider carefully whether this level of data quality is acceptable for your application.

## Inputs from technosphere
- waste mineral oil: -0.000194444 kg; name w_mineral_oil; source Hubel M. 2012; lognormal variance with pedigree 0.01, pedigree (1,1,4,5,1)
  = disposal of hydraulic (lubricating) oil
  production volume 28709.4 kg; = p_preservation*w_mineral_oil
    calculated from production of reference product
  property price 0 EUR2005; name w_mineral_oil_price_EUR2005
  properties: heating value, net 34.7 MJ, dry mass 0.9 kg, wet mass 1 kg, carbon content, fossil 0.864444, water content 0.111111
  note on heating value, net: Value taken from the general comment of the treatment dataset.
- tap water: 0 kg; name m_tapwater; source Empa St. Gallen 2012; pedigree (1,1,1,1,1)
  Water for diluting the perservative to reach concentration for application
  property dry mass 0.000337476 kg; name DM
  property wet mass 1 kg; name WM
  properties: water content 2962.17, carbon content, fossil 0.00178991
- electricity, medium voltage: 0 kWh; source Künniger T. 2000; pedigree (1,1,1,1,1)
  2 minutes with 3 kW motor per 14 m3, 50 m2/m3 and 0.2 kg/m2
- lubricating oil: 0.000194444 kg; name m_lubricating_oil; source Hubel M. 2012; lognormal variance with pedigree 0.0126, pedigree (1,4,4,5,1)
  35 kg every 3 years at an annual production o 6000 m3, equalling 50 m2/m3 at 200 ml wood preservative/m2
  property dry mass 1 kg; name m_lubricating_oil_DM
  properties: carbon content, fossil 0.75, heating value, net 40.2 MJ
  note on heating value, net: Literature value, Source: IPCC 2006, 2006 IPCC Guidelines for National Greenhouse Gas Inventories, Prepared by the National Greenhouse Gas Inventories Programme, Eggleston H.S., Buendia L., Miwa K., Ngara T. and Tanabe K. (eds). Published: IGES, Japan
- wood preservation facility, dipping/immersion tank: 2.22222e-7 unit; source Hubel M. 2012; lognormal variance with pedigree 0.38, pedigree (3,5,4,5,1)
  1 plant per 75 years of service life at 6000 m3/year, 50 m2/m3 and an input of 0.2 kg of wood preservative
- wood preservative, water-based, indoor use, occasionally wet: 1 kg; name preservative_concentration; lognormal variance with pedigree 0.01, pedigree (1,1,4,5,1)
- tap water: 0.00118986, 0.000143227, 0.000236707, 0.0059688, 0.000155277, 0.000441683, 0.068304 kg (7 entries); source Empa St. Gallen 2012; lognormal variance with pedigree 0.774324, pedigree (1,1,4,5,1)
  Water for diluting the perservative to reach concentration for application
  properties: water content 2962.17, carbon content, fossil 0.00178991, dry mass 0.000337476 kg, wet mass 1 kg
- electricity, medium voltage: 9.00371e-6, 1.72652e-6, 2.89847e-5, 0.000421557, 5.94187e-5, 0.000193595 kWh (6 entries); source Künniger T. 2000; lognormal variance with pedigree 0.0126, pedigree (1,4,4,5,1)
  2 minutes with 3 kW motor per 14 m3, 50 m2/m3 and 0.2 kg/m2

## Emissions to nature
- Monoethanolamine [air, non-urban air or from high stacks]: 1.25e-5 kg; source OECD 2000; lognormal variance with pedigree 0.172, pedigree (3,5,5,5,1)
  scenario according to (OECD 2000, p. 38ff); proxy for other aminio alcohol
  property carbon content, fossil 0.393264; name C_content_fossil_Monoethanolamine
- Monoethanolamine [water, unspecified]: 7.5e-5 kg; source OECD 2000; lognormal variance with pedigree 0.352, pedigree (3,5,5,5,1)
  scenario according to (OECD 2000, p. 38ff); proxy for other aminio alcohol
- Tebuconazole [air, non-urban air or from high stacks]: 1.75e-6 kg; source OECD 2000; lognormal variance with pedigree 0.172, pedigree (3,5,5,5,1)
  scenario according to (OECD 2000, p. 38ff)
  property carbon content, fossil 0.624307; name C_content_fossil_Tebuconazole
- Butylcarbamate, iodopropynyl [air, non-urban air or from high stacks]: 2.25e-5 kg; source OECD 2000; lognormal variance with pedigree 0.172, pedigree (3,5,5,5,1)
  scenario according to (OECD 2000, p. 38ff)
  property carbon content, fossil 0.341527; name C_content_fossil_IPBC
- Ethylene glycol monoethyl ether [water, surface water]: 9.75e-5 kg; source OECD 2000; lognormal variance with pedigree 0.352, pedigree (3,5,5,5,1)
  scenario according to (OECD 2000, p. 38ff); proxy for comparable glycol ether
- Ethylene glycol monoethyl ether [air, non-urban air or from high stacks]: 0.00157625 kg; source OECD 2000; lognormal variance with pedigree 0.172, pedigree (3,5,5,5,1)
  scenario according to (OECD 2000, p. 38ff); proxy for comparable glycol ether
  property carbon content, fossil 0.533098; name C_content_fossil_Ethylene_glocol_MET
- Methyl ethyl ketone [water, surface water]: 1.5e-5 kg; source OECD 2000; lognormal variance with pedigree 0.352, pedigree (3,5,5,5,1)
  scenario according to (OECD 2000, p. 38ff); proxy for similar ketone
- Water [air, unspecified]: 0.00059644 m3; = (m_tapwater+0.52)/1000; lognormal variance with pedigree 0.0105, pedigree (1,1,4,1,1)
  tap water plus water in preservative
- Hydrocarbons, aromatic [water, surface water]: 1.5e-6 kg; source OECD 2000; lognormal variance with pedigree 0.352, pedigree (3,5,5,5,1)
  scenario according to (OECD 2000, p. 38ff); proxy
- Permethrin [water, unspecified]: 1.125e-5 kg; source OECD 2000; lognormal variance with pedigree 0.352, pedigree (3,5,5,5,1)
  scenario according to (OECD 2000, p. 38ff)
- Methyl ethyl ketone [air, non-urban air or from high stacks]: 0.0002425 kg; source OECD 2000; lognormal variance with pedigree 0.172, pedigree (3,5,5,5,1)
  scenario according to (OECD 2000, p. 38ff); proxy for similar ketone
  property carbon content, fossil 0.666288; name C_content_fossil_Methyl_ethyl_ketone
- Tebuconazole [water, surface water]: 0.000105 kg; source OECD 2000; lognormal variance with pedigree 0.352, pedigree (3,5,5,5,1)
  scenario according to (OECD 2000, p. 38ff)
- Diethylene glycol [air, non-urban air or from high stacks]: 0.00575937 kg; source OECD 2000; lognormal variance with pedigree 0.172, pedigree (3,5,5,5,1)
  scenario according to (OECD 2000, p. 38ff); proxy for comparable glycol
  property carbon content, fossil 0.452726; name C_content_fossil_Diethylene_glycol
- NMVOC, non-methane volatile organic compounds, unspecified origin [air, non-urban air or from high stacks]: 0.00396487 kg; source OECD 2000; lognormal variance with pedigree 0.172, pedigree (3,5,5,5,1)
  scenario according to (OECD 2000); proxy (corrected for amount of active substances, which are inventoried explicitly)
  property carbon content, non-fossil 0; name C_content_non_fossil_NMVOC
  property carbon content, fossil 0.854049; name C_content_fossil_NMVOC
- Butylcarbamate, iodopropynyl [water, surface water]: 6.75e-5 kg; source OECD 2000; lognormal variance with pedigree 0.352, pedigree (3,5,5,5,1)
  scenario according to (OECD 2000, p. 38ff)
- Diethylene glycol [water, surface water]: 0.00035625 kg; source OECD 2000; lognormal variance with pedigree 0.352, pedigree (3,5,5,5,1)
  scenario according to (OECD 2000, p. 38ff); proxy for comparable glycol
- Hydrocarbons, unspecified [water, surface water]: 0.00024525 kg; source OECD 2000; lognormal variance with pedigree 0.352, pedigree (3,5,5,5,1)
  scenario according to (OECD 2000, p.38ff); proxy (corrected for amount of active substances, which are inventoried explicitly)
- Hydrocarbons, aromatic [air, non-urban air or from high stacks]: 6.25e-6 kg; source OECD 2000; lognormal variance with pedigree 0.172, pedigree (3,5,5,5,1)
  scenario according to (OECD 2000, p. 38ff); proxy
  property carbon content, fossil 0.911297; name C_content_fossil_HC_aromatic
- Permethrin [air, non-urban air or from high stacks]: 1.875e-7 kg; source OECD 2000; lognormal variance with pedigree 0.172, pedigree (3,5,5,5,1)
  scenario according to (OECD 2000, p. 38ff)
  property carbon content, fossil 0.644027; name C_content_fossil_Permethrin
- Carbon dioxide, fossil [air, non-urban air or from high stacks]: 0.077165 kg; = (0.00075* preservative_concentration*0.001* C_content_fossil_Permethrin+0.02375* preservative_concentration*0.97* C_content_fossil_Diethylene_glycol+0.007* preservative_concentration*0.001*C_content_fossil_Tebuconazole+0.0045* preservative_concentration*0.02* C_content_fossil_IPBC +0.0065* preservative_concentration*0.97* C_content_fossil_Ethylene_glocol_MET +0.001* preservative_concentration*0.97* C_content_fossil_Methyl_ethyl_ketone +0.0001* preservative_concentration*0.25* C_content_fossil_HC_aromatic +((0.0251-0.01225)+0.0035)* preservative_concentration*0.97* C_content_fossil_NMVOC +0.005*preservative_concentration*0.01* C_content_fossil_Monoethanolamine)*efficiency_air_filter/12*44; lognormal variance with pedigree 0.05, pedigree (5,1,4,5,1)
  assuming that all C retained in the filter is finally converted to CO2, irrespective of the filter technology

## Sampling procedure
Plant measurements for input of energy, water, etc. Estimates based on literature for air-borne emissions and emissions into water.

## Extrapolations
Calculated as weighted average of existing local data
