# treatment of waste polystyrene, sanitary landfill

Dataset: EcoSpold 2, unit process
Geography: RoW
Time period: 1994-01-01 to 2021-12-31
Technology level: current
Classification: EcoSpold01Categories: waste management/sanitary landfill
Classification: ISIC rev.4 ecoinvent: 3821:Treatment and disposal of non-hazardous waste
Synonyms: PS
Tags: Treatment; ConvertedDataset
Scenario: Business-as-Usual
System model: Allocation, cut-off by classification
Generated by: Gabor Doka (obsolete)
Published in: Doka G. 2007
Database: ecoinvent
isCopyrightProtected: true
accessRestrictedTo: 1

## General comment
Inventoried waste contains 100% PS; .
waste composition (wet, in ppm): upper heating value 38.88 MJ/kg; lower heating value 38.67 MJ/kg; H2O 2000; O 38852; H 78046; C 868490; S 678.75; N 1942.6; P n.a.; B n.a.; Cl 1132.1; Br 882.12; F 14.25; I n.a.; Ag n.a.; As 1.8418; Ba 180.79; Cd 23.336; Co 30.622; Cr 39.613; Cu 107.56; Hg 0.82311; Mn 77.469; Mo n.a.; Ni 19.968; Pb 14.935; Sb 41.65; Se 2.0357; Sn 25.403; V 279.32; Zn 834.61; Be 0.48468; Sc n.a.; Sr 85.789; Ti 969.36; Tl 0.38774; W n.a.; Si n.a.; Fe 3611.5; Ca n.a.; Al 193.87; K n.a.; Mg n.a.; Na 1420.6;
Share of carbon in waste that is biogenic 0%.
Overall degradability of waste during 100 years: 1%.
[This dataset was already contained in the ecoinvent database version 2. It was not individually updated during the transfer to ecoinvent version 3. Life Cycle Impact Assessment results may still have changed, as they are affected by changes in the supply chain, i.e. in other datasets. This dataset was generated following the ecoinvent quality guidelines for version 2. It may have been subject to central changes described in the ecoinvent version 3 change report (http://www.ecoinvent.org/database/ecoinvent-version-3/reports-of-changes/), and the results of the central updates were reviewed extensively. The changes added e.g. consistent water flows and other information throughout the database. The documentation of this dataset can be found in the ecoinvent reports of version 2, which are still available via the ecoinvent website. The change report linked above covers all central changes that were made during the conversion process.]

## Included activities end
Waste-specific short-term emissions to air via landfill gas incineration and landfill leachate. Burdens from treatment of short-term leachate (0-100a) in wastewater treatment plant (including WWTP sludge disposal in municipal incinerator). Long-term emissions from landfill to groundwater (after base lining failure).

## Geography
Technology encountered in Switzerland in 2000. Landfill includes base seal, leachate collection system, treatment of leachate in municipal wastewater treatment plant.

## Technology
Swiss municipal sanitary landfill for biogenic or untreated municipal waste ('reactive organic landfill'). Landfill gas and leachate collection system. Recultivation and monitoring for 150 years after closure.

## Reference product
- waste polystyrene: -1 kg; name waste_PS_RP; CPC 39270: Waste, parings and scrap of plastics; By-product classification Waste; CAS 9003-53-6
  EcoSpold01Location=CH
  production volume 1.87407e10 kg; name waste_PS_RP_PV; = (0.9/0.1)*2082300000
    Estimated. Based on literature (UNSTATS, http://unstats.un.org/unsd/environment/wastetreatment.htm, accessed 20140620) it is estimated, that 90% of waste polystyrene is landfilled.
  property heating value, net 38.67 MJ
    Value taken from the general comment of the treatment dataset.
  property price 0 EUR2005; name waste_PS_RP_price_EUR2005
    Waste products are assigned a price of zero as they are assumed to require further treatment.
  property carbon content 0.922579
    carbon content on a dry matter basis (reserved; not for manual entry)
  properties: water content 0.00200401, carbon content, fossil 0.922579, water in wet mass 0.002 kg, carbon content, non-fossil 0, dry mass 0.998 kg, wet mass 1 kg, carbon allocation 0.920734 kg

## Inputs from technosphere
- cement, unspecified: 0 kg; pedigree (1,1,1,1,1)
  EcoSpold01Location=CH
  burden from incineration of sludge from wastewater treatment of the short-term leachate (0-100a). uncertainty is calculated from uncertainties in waste composition and transfer coefficients in incinerator and uncertainty of waste decomposition and short-term leaching in sanitary landfill
  properties: wet mass 1 kg, dry mass 1 kg
- titanium dioxide: 1.95e-9 kg; lognormal variance with pedigree 0.952, pedigree (1,1,5,5,1)
  burden from incineration of sludge from wastewater treatment of the short-term leachate (0-100a). uncertainty is calculated from uncertainties in waste composition and transfer coefficients in incinerator and uncertainty of waste decomposition and short-term leaching in sanitary landfill
  EcoSpold01Location=RER
  properties: wet mass 1 kg, dry mass 1 kg
- chemical, organic: 6.4e-8 kg; lognormal variance with pedigree 1.762, pedigree (1,1,5,5,1)
  burden from incineration of sludge from wastewater treatment of the short-term leachate (0-100a). uncertainty is calculated from uncertainties in waste composition and transfer coefficients in incinerator and uncertainty of waste decomposition and short-term leaching in sanitary landfill
  EcoSpold01Location=GLO
  properties: carbon content, fossil 0.628, dry mass 1 kg, heating value, net 19.03 MJ, wet mass 1 kg
  note on carbon content, fossil: This dataset is an unweighted average of 20 organic substances (listed in Tab 88.1, ecoinvent v2.2 report 8, part II), being part of the top100 chemicals included in this database. The C-content has also been calculated as an unweighted average of the C content of the substances composing this dataset.
- sewer grid, 5E9l/year, 110 km: 5.45e-10 km; lognormal variance with pedigree 0.2106, pedigree (5,5,5,5,5)
  EcoSpold01Location=CH
  burden from wastewater treatment of the short-term leachate (0-100a). Uncertainty calculated from unertainty of the waste composition of this waste, uncertainty in waste decomposition and short-term leaching in sanitary landfill
  Uncertainty: . Uncertainty calculated from unertainty of the waste composition of this waste, uncertainty in waste decomposition and short-term leaching in sanitary landfill
- waste graphical paper: 0 kg; name waste_paper_ByP
  burden from wastewater treatment of the short-term leachate (0-100a). Uncertainty calculated from unertainty of the waste composition of this waste, uncertainty in waste decomposition and short-term leaching in sanitary landfill
  EcoSpold01Location=CH
  production volume 0 kg
    Calculated from the production volume of waste polystyrene, 0.2% water in proportion to the respective output amounts.
  property price 0 EUR2005; name waste_paper_ByP_price_EUR2005
  properties: carbon content, non-fossil 0.454955, water content 0.126126, wet mass 1 kg, dry mass 0.888 kg, heating value, net 14.12 MJ
  note on heating value, net: Value taken from the general comment of the treatment dataset.
- slag landfill: 7.09e-15 unit; lognormal variance with pedigree 0.572, pedigree (1,1,5,5,1)
  (same comment as for cement, unspecified)
- municipal waste incineration facility: 3.82e-14 unit; lognormal variance with pedigree 0.742, pedigree (1,1,5,5,1)
  Burden from incineration of sludge from wastewater treatment of the short-term leachate (0-100a).
  EcoSpold01Location=CH
- residual material landfill: 2.05e-15 unit; lognormal variance with pedigree 0.542, pedigree (1,1,5,5,1)
  burden from incineration of sludge from wastewater treatment of the short-term leachate (0-100a). uncertainty is calculated from uncertainties in waste composition and transfer coefficients in incinerator and uncertainty of waste decomposition and short-term leaching in sanitary landfill
  EcoSpold01Location=CH
- waste cement, hydrated: 0 kg; name waste_cement_ByP
  (same comment as for cement, unspecified)
  production volume 0 kg
    (same comment as for waste graphical paper)
  property price 0 EUR2005; name waste_cement_ByP_price_EUR2005
  properties: wet mass 1 kg, dry mass 1 kg
- electricity, low voltage: 0 kWh; pedigree (1,1,1,1,1)
  burden from wastewater treatment of the short-term leachate (0-100a). Uncertainty calculated from unertainty of the waste composition of this waste, uncertainty in waste decomposition and short-term leaching in sanitary landfill
  EcoSpold01Location=CH
  Uncertainty: . Uncertainty calculated from unertainty of the waste composition of this waste, uncertainty in waste decomposition and short-term leaching in sanitary landfill
- ammonia, anhydrous, liquid: 0 kg; pedigree (1,1,1,1,1)
  (same comment as for residual material landfill)
  properties: wet mass 1 kg, dry mass 1 kg
- chemical, inorganic: 2.43e-10 kg; lognormal variance with pedigree 0.952, pedigree (1,1,5,5,1)
  (same comment as for chemical, organic)
  properties: dry mass 1 kg, wet mass 1 kg, carbon content, fossil 0.003
  note on carbon content, fossil: This dataset is an unweighted average of 20 inorganic substances (listed in Tab 88.1, ecoinvent v2.2 report 8, part II), being part of the top100 chemicals included in this database. The C-content has also been calculated as an unweighted average of the C content of the substances composing this dataset.
- heat, district or industrial, other than natural gas: 0 MJ; pedigree (1,1,1,1,1)
  (same comment as for cement, unspecified)
  properties: heating value, net 1 MJ
- electricity, high voltage: 0 kWh; pedigree (1,1,1,1,1)
  (same comment as for cement, unspecified)
- heat, district or industrial, natural gas: 0 MJ; pedigree (1,1,1,1,1)
  (same comment as for titanium dioxide)
  properties: heating value, net 1 MJ
- hydrochloric acid, without water, in 30% solution state: 1.46e-10 kg; lognormal variance with pedigree 0.952, pedigree (1,1,5,5,1)
  (same comment as for titanium dioxide)
  properties: wet mass 1 kg, dry mass 1 kg, heating value, net 3.32 MJ
- process-specific burdens, municipal waste incineration: 0 kg; pedigree (1,1,1,1,1)
  EcoSpold01Location=CH
  Burden from incineration of sludge from wastewater treatment of the short-term leachate (0-100a).
- wastewater treatment facility, capacity 5E9l/year: 1.42e-11 unit; lognormal variance with pedigree 0.2106, pedigree (5,5,5,5,5)
  (same comment as for electricity, low voltage)
- quicklime, milled, packed: 6.15e-10 kg; lognormal variance with pedigree 0.622, pedigree (1,1,5,5,1)
  (same comment as for cement, unspecified)
  properties: wet mass 1 kg, water content 0.010101, dry mass 0.99 kg
- process-specific burdens, sanitary landfill: 1 kg; lognormal variance with pedigree 0.042, pedigree (1,1,5,5,1)
  demands per kilogram waste. uncertainty is heeded in the module
  EcoSpold01Location=CH
- process-specific burdens, residual material landfill: 0 kg; pedigree (1,1,1,1,1)
  (same comment as for cement, unspecified)
- iron (III) chloride, without water, in 40% solution state: 4.2e-8 kg; lognormal variance with pedigree 1.012, pedigree (1,1,5,5,1)
  (same comment as for residual material landfill)
  properties: wet mass 1 kg, dry mass 1 kg
- heat, central or small-scale, other than natural gas: 0 MJ; pedigree (1,1,1,1,1)
  (same comment as for electricity, low voltage)
  properties: heating value, net 1 MJ
- waste plastic, mixture: 0 kg; name waste_plastic_ByP
  EcoSpold01Location=CH
  burden from wastewater treatment of the short-term leachate (0-100a). Uncertainty calculated from unertainty of the waste composition of this waste, uncertainty in waste decomposition and short-term leaching in sanitary landfill
  production volume 0 kg
    (same comment as for waste graphical paper)
  property price 0 EUR2005; name waste_plastic_ByP_price_EUR2005
  properties: wet mass 1 kg, dry mass 0.847 kg, water content 0.180638, carbon content, fossil 0.747344, heating value, net 30.79 MJ
  note on carbon content, fossil: C content in 1 kg DM was calculated using data in Tab A.2, ecoinvent v2.2 report 13_I
- chromium oxide, flakes: 3.99e-11 kg; lognormal variance with pedigree 1.07, pedigree (5,5,5,5,5)
  EcoSpold01Location=RER
  burden from incineration of sludge from wastewater treatment of the short-term leachate (0-100a). Proxy for vanadium pentoxide V2O5 in SCR catalyst, uncertainty calculated from uncertainty in average DeNOx input, uncertainty in the share of thermal NOx, uncertainty of nitrogen content in average municipal waste and the unertainty in nitrogen content in *this* waste and uncertainty of waste decomposition and short-term leaching in sanitary landfill
  Uncertainty: . Proxy for vanadium pentoxide V2O5 in SCR catalyst, uncertainty calculated from uncertainty in average DeNOx input, uncertainty in the share of thermal NOx, uncertainty of nitrogen content in average municipal waste and the unertainty in nitrogen content in *this* waste and uncertainty of waste decomposition and short-term leaching in sanitary landfill
  properties: dry mass 1 kg, wet mass 1 kg
- process-specific burdens, slag landfill: 0 kg; pedigree (1,1,1,1,1)
  (same comment as for residual material landfill)
- sodium hydroxide, without water, in 50% solution state: 3.39e-9 kg; lognormal variance with pedigree 0.622, pedigree (1,1,5,5,1)
  (same comment as for titanium dioxide)
  properties: heating value, net 3.03 MJ, wet mass 1 kg, dry mass 1 kg
- sanitary landfill facility: 5.56e-10 unit; lognormal variance with pedigree 0.042, pedigree (1,1,5,5,1)
  demands per kilogram waste. uncertainty is heeded in the module
  EcoSpold01Location=CH
- cement, unspecified: 5.67475e-8, 1.18075e-8, 8.64816e-10, 2.46501e-9, 5.5747e-8, 1.6408e-9, 1.80208e-8, 2.18032e-9, 2.43526e-7 kg (9 entries); lognormal variance with pedigree 0.552, pedigree (1,1,5,5,1)
  (same comment as for cement, unspecified)
- waste graphical paper: -1.69726e-6, -2.59179e-7, -2.26629e-8, -9.36524e-7, -9.13189e-8, -1.69041e-7, -4.09465e-6, -3.15294e-5 kg (8 entries)
  (same comment as for waste graphical paper)
  production volume 727139 kg
- waste cement, hydrated: -2.78066e-7, -7.04934e-7 kg (2 entries)
  (same comment as for cement, unspecified)
  production volume 18422.1 kg
- electricity, low voltage: 4.69787e-6, 8.55392e-7, 1.93094e-5, 6.74628e-5, 1.37729e-5, 0.000211458, 3.42101e-5, 9.82339e-5 kWh (8 entries); lognormal variance with pedigree 0.53, pedigree (5,5,5,5,5)
  (same comment as for electricity, low voltage)
- ammonia, anhydrous, liquid: 1.42956e-8, 1.22888e-9, 1.91182e-9, 3.78799e-9, 3.71123e-9, 3.88977e-10, 1.73887e-9, 4.11366e-8 kg (8 entries); lognormal variance with pedigree 0.702, pedigree (1,1,5,5,1)
  (same comment as for residual material landfill)
- heat, district or industrial, other than natural gas: 5.18842e-8, 0.000127948 MJ (2 entries); lognormal variance with pedigree 0.742, pedigree (1,1,5,5,1)
  (same comment as for cement, unspecified)
- electricity, high voltage: 2.60405e-7, 4.99222e-8, 1.14989e-6, 8.4643e-7, 1.21883e-5, 1.93295e-6, 5.57215e-6 kWh (7 entries); lognormal variance with pedigree 1.142, pedigree (1,1,5,5,1)
  (same comment as for cement, unspecified)
- heat, district or industrial, natural gas: 6.14852e-7, 1.4733e-5, 3.98941e-5 MJ (3 entries); lognormal variance with pedigree 0.702, pedigree (1,1,5,5,1)
  (same comment as for titanium dioxide)
- process-specific burdens, municipal waste incineration: 4.32798e-5, 0.00010972 kg (2 entries); lognormal variance with pedigree 0.742, pedigree (1,1,5,5,1)
  (same comment as for process-specific burdens, municipal waste incineration)
- process-specific burdens, residual material landfill: 2.78066e-7, 7.04934e-7 kg (2 entries); lognormal variance with pedigree 0.542, pedigree (1,1,5,5,1)
  (same comment as for cement, unspecified)
- heat, central or small-scale, other than natural gas: 4.83947e-7, 3.52361e-5 MJ (2 entries); lognormal variance with pedigree 0.22, pedigree (5,5,5,5,5)
  (same comment as for electricity, low voltage)
- waste plastic, mixture: -4.31618e-6, -2.88391e-7, -2.18105e-8, -1.19116e-7, -4.81214e-8, -1.13112e-7, -3.67759e-6, -3.02157e-5 kg (8 entries)
  (same comment as for waste plastic, mixture)
  production volume 727139 kg
- process-specific burdens, slag landfill: 1.12867e-6, 2.86133e-6 kg (2 entries); lognormal variance with pedigree 0.572, pedigree (1,1,5,5,1)
  (same comment as for residual material landfill)

## Emissions to nature
- Titanium [air, non-urban air or from high stacks]: 1.21e-10 kg; lognormal variance with pedigree 2.522, pedigree (1,1,5,5,1)
  burden from direct release or incineration of landfill biogas. Uncertainty calculated from unertainty of the waste composition of this waste, uncertainty in waste decomposition and short-term leaching in sanitary landfill
- Thallium [water, ground-, long-term]: 3.88e-7 kg; lognormal variance with pedigree 1.732, pedigree (1,1,5,5,1)
  Emissions from long-term leachate (>100a) directly from MSW landfill and indirectly via incineration of treatement sludge from leachate treatement. Uncertainty calculated depending on waste input and uncertainty of long-term transfer coefficents in landfill.
- Carbon dioxide, fossil [air, non-urban air or from high stacks]: 0.0217 kg; lognormal variance with pedigree 0.412, pedigree (1,1,5,5,1)
  (same comment as for Titanium)
- Nickel [air, non-urban air or from high stacks]: 2.9e-12 kg; lognormal variance with pedigree 3.022, pedigree (1,1,5,5,1)
  (same comment as for Titanium)
- Aluminium [air, urban air close to ground]: 1.42e-10 kg; lognormal variance with pedigree 1.692, pedigree (1,1,5,5,1)
  Emissions from short-term leachate treatment and incineration of resulting sludge. Uncertainty calculated depending on waste input and uncertainty of transfer coefficents in landfill, wastewater treatment and incineration model.
- Mercury [air, urban air close to ground]: 0 kg; pedigree (1,1,1,1,1)
  (same comment as for Aluminium)
- Cadmium, ion [water, surface water]: 2.08e-8 kg; lognormal variance with pedigree 1.772, pedigree (1,1,5,5,1)
  (same comment as for Aluminium)
- Aluminium [water, surface water]: 5.82e-9 kg; lognormal variance with pedigree 1.662, pedigree (1,1,5,5,1)
  (same comment as for Aluminium)
- NMVOC, non-methane volatile organic compounds, unspecified origin [air, non-urban air or from high stacks]: 2.33e-8 kg; lognormal variance with pedigree 0.452, pedigree (1,1,5,5,1)
  (same comment as for Titanium)
- Sodium, ion [water, ground-, long-term]: 0.00136 kg; lognormal variance with pedigree 0.652, pedigree (1,1,5,5,1)
  (same comment as for Thallium)
- COD, Chemical Oxygen Demand [water, ground-, long-term]: 0.241 kg; lognormal variance with pedigree 0.512, pedigree (1,1,5,5,1)
  (same comment as for Thallium)
- Nitrite [water, surface water]: 4.94e-7 kg; lognormal variance with pedigree 0.882, pedigree (1,1,5,5,1)
  (same comment as for Aluminium)
- Selenium [water, ground-, long-term]: 5.74e-7 kg; lognormal variance with pedigree 1.922, pedigree (1,1,5,5,1)
  (same comment as for Thallium)
- Hydrogen sulfide [water, ground-, long-term]: 4.92e-5 kg; lognormal variance with pedigree 0.752, pedigree (1,1,5,5,1)
  (same comment as for Thallium)
- Bromine [air, non-urban air or from high stacks]: 3.11e-7 kg; lognormal variance with pedigree 1.502, pedigree (1,1,5,5,1)
  (same comment as for Titanium)
- Lead [water, ground-, long-term]: 1.49e-5 kg; lognormal variance with pedigree 1.252, pedigree (1,1,5,5,1)
  (same comment as for Thallium)
- Aluminium [air, non-urban air or from high stacks]: 2.42e-11 kg; lognormal variance with pedigree 2.742, pedigree (1,1,5,5,1)
  (same comment as for Titanium)
- Copper, ion [water, surface water]: 1.37e-9 kg; lognormal variance with pedigree 2.052, pedigree (1,1,5,5,1)
  (same comment as for Aluminium)
- Bromine [water, ground-, long-term]: 0.00086 kg; lognormal variance with pedigree 0.712, pedigree (1,1,5,5,1)
  (same comment as for Thallium)
- Zinc, ion [water, surface water]: 1.22e-7 kg; lognormal variance with pedigree 1.482, pedigree (1,1,5,5,1)
  (same comment as for Aluminium)
- Vanadium, ion [water, surface water]: 1.5e-7 kg; lognormal variance with pedigree 1.512, pedigree (1,1,5,5,1)
  (same comment as for Aluminium)
- Iron [air, non-urban air or from high stacks]: 1.24e-10 kg; lognormal variance with pedigree 2.522, pedigree (1,1,5,5,1)
  (same comment as for Titanium)
- Lead [air, non-urban air or from high stacks]: 2.93e-13 kg; lognormal variance with pedigree 3.312, pedigree (1,1,5,5,1)
  (same comment as for Titanium)
- Barium [water, surface water]: 1.24e-7 kg; lognormal variance with pedigree 1.302, pedigree (1,1,5,5,1)
  (same comment as for Aluminium)
- Carbon dioxide, fossil [air, urban air close to ground]: 0.000726 kg; lognormal variance with pedigree 0.862, pedigree (1,1,5,5,1)
  (same comment as for Aluminium)
- Zinc, ion [water, ground-, long-term]: 0.000689 kg; lognormal variance with pedigree 0.732, pedigree (1,1,5,5,1)
  (same comment as for Thallium)
- Fluoride [water, ground-, long-term]: 1.42e-5 kg; lognormal variance with pedigree 1.262, pedigree (1,1,5,5,1)
  (same comment as for Thallium)
- Strontium [air, non-urban air or from high stacks]: 1.25e-11 kg; lognormal variance with pedigree 2.832, pedigree (1,1,5,5,1)
  (same comment as for Titanium)
- Mercury [water, ground-, long-term]: 8.22e-7 kg; lognormal variance with pedigree 1.632, pedigree (1,1,5,5,1)
  (same comment as for Thallium)
- Nickel [air, urban air close to ground]: 0 kg; pedigree (1,1,1,1,1)
  (same comment as for Aluminium)
- Nitrate [water, ground-, long-term]: 8.13e-5 kg; lognormal variance with pedigree 0.612, pedigree (1,1,5,5,1)
  (same comment as for Thallium)
- Chromium, ion [water, surface water]: 7.09e-12 kg; lognormal variance with pedigree 2.102, pedigree (1,1,5,5,1)
  (same comment as for Aluminium)
- Nitrogen, organic bound [water, ground-, long-term]: 0.00126 kg; lognormal variance with pedigree 0.612, pedigree (1,1,5,5,1)
  (same comment as for Thallium)
- Copper [air, urban air close to ground]: 2.88e-14 kg; lognormal variance with pedigree 2.112, pedigree (1,1,5,5,1)
  (same comment as for Aluminium)
- TOC, Total Organic Carbon [water, surface water]: 4.04e-5 kg; lognormal variance with pedigree 0.862, pedigree (1,1,5,5,1)
  (same comment as for Aluminium)
- COD, Chemical Oxygen Demand [water, surface water]: 0.00016 kg; lognormal variance with pedigree 0.862, pedigree (1,1,5,5,1)
  (same comment as for Aluminium)
- Barium [air, non-urban air or from high stacks]: 5.18e-10 kg; lognormal variance with pedigree 2.352, pedigree (1,1,5,5,1)
  (same comment as for Titanium)
- Titanium, ion [water, surface water]: 2.46e-7 kg; lognormal variance with pedigree 1.442, pedigree (1,1,5,5,1)
  (same comment as for Aluminium)
- Tin, ion [water, surface water]: 6.26e-10 kg; lognormal variance with pedigree 2.212, pedigree (1,1,5,5,1)
  (same comment as for Aluminium)
- Vanadium [air, urban air close to ground]: 1.45e-11 kg; lognormal variance with pedigree 1.562, pedigree (1,1,5,5,1)
  (same comment as for Aluminium)
- Thallium [air, urban air close to ground]: 1.11e-13 kg; lognormal variance with pedigree 2.492, pedigree (1,1,5,5,1)
  (same comment as for Aluminium)
- Barium [air, urban air close to ground]: 1.95e-9 kg; lognormal variance with pedigree 1.312, pedigree (1,1,5,5,1)
  (same comment as for Aluminium)
- Chromium VI [water, surface water]: 2.36e-9 kg; lognormal variance with pedigree 2.062, pedigree (1,1,5,5,1)
  (same comment as for Aluminium)
- Hydrogen chloride [air, non-urban air or from high stacks]: 4.11e-7 kg; lognormal variance with pedigree 1.472, pedigree (1,1,5,5,1)
  (same comment as for Titanium)
- Ammonium, ion [water, surface water]: 2.35e-5 kg; lognormal variance with pedigree 0.642, pedigree (1,1,5,5,1)
  (same comment as for Aluminium)
- Sulfur dioxide [air, non-urban air or from high stacks]: 8.86e-7 kg; lognormal variance with pedigree 1.462, pedigree (1,1,5,5,1)
  (same comment as for Titanium)
- Manganese [air, urban air close to ground]: 2.38e-15 kg; lognormal variance with pedigree 1.532, pedigree (1,1,5,5,1)
  (same comment as for Aluminium)
- Arsenic [air, non-urban air or from high stacks]: 4.64e-11 kg; lognormal variance with pedigree 2.672, pedigree (1,1,5,5,1)
  (same comment as for Titanium)
- Manganese [water, surface water]: 4.5e-7 kg; lognormal variance with pedigree 1.392, pedigree (1,1,5,5,1)
  (same comment as for Aluminium)
- Selenium [water, surface water]: 1.43e-9 kg; lognormal variance with pedigree 2.172, pedigree (1,1,5,5,1)
  (same comment as for Aluminium)
- Antimony [water, ground-, long-term]: 4.19e-6 kg; lognormal variance with pedigree 2.442, pedigree (1,1,5,5,1)
  (same comment as for Thallium)
- Carbon monoxide, fossil [air, non-urban air or from high stacks]: 1.23e-6 kg; lognormal variance with pedigree 1.062, pedigree (1,1,5,5,1)
  (same comment as for Titanium)
- Barium [water, ground-, long-term]: 0.00018 kg; lognormal variance with pedigree 0.912, pedigree (1,1,5,5,1)
  (same comment as for Thallium)
- Cobalt [water, surface water]: 5e-8 kg; lognormal variance with pedigree 1.662, pedigree (1,1,5,5,1)
  (same comment as for Aluminium)
- Cadmium [air, non-urban air or from high stacks]: 2.74e-10 kg; lognormal variance with pedigree 2.442, pedigree (1,1,5,5,1)
  (same comment as for Titanium)
- Cobalt [water, ground-, long-term]: 3.06e-5 kg; lognormal variance with pedigree 1.162, pedigree (1,1,5,5,1)
  (same comment as for Thallium)
- Vanadium, ion [water, ground-, long-term]: 8.13e-5 kg; lognormal variance with pedigree 1.252, pedigree (1,1,5,5,1)
  (same comment as for Thallium)
- Tin, ion [water, ground-, long-term]: 2.54e-5 kg; lognormal variance with pedigree 1.182, pedigree (1,1,5,5,1)
  (same comment as for Thallium)
- Nickel, ion [water, ground-, long-term]: 2e-5 kg; lognormal variance with pedigree 1.222, pedigree (1,1,5,5,1)
  (same comment as for Thallium)
- Chloride [water, surface water]: 2.85e-5 kg; lognormal variance with pedigree 0.942, pedigree (1,1,5,5,1)
  Emissions from short-term leachate treatment. Uncertainty calculated depending on waste input and uncertainty of transfer coefficents in landfill and wastewater treatment.
- Sodium [air, non-urban air or from high stacks]: 1.47e-8 kg; lognormal variance with pedigree 1.912, pedigree (1,1,5,5,1)
  (same comment as for Titanium)
- Beryllium [water, ground-, long-term]: 4.85e-7 kg; lognormal variance with pedigree 1.702, pedigree (1,1,5,5,1)
  (same comment as for Thallium)
- Titanium [air, urban air close to ground]: 2.39e-10 kg; lognormal variance with pedigree 1.492, pedigree (1,1,5,5,1)
  (same comment as for Aluminium)
- Cadmium, ion [water, ground-, long-term]: 2.33e-5 kg; lognormal variance with pedigree 1.202, pedigree (1,1,5,5,1)
  (same comment as for Thallium)
- Cadmium [air, urban air close to ground]: 1.12e-12 kg; lognormal variance with pedigree 1.842, pedigree (1,1,5,5,1)
  (same comment as for Aluminium)
- Nitrite [water, ground-, long-term]: 4.2e-5 kg; lognormal variance with pedigree 0.612, pedigree (1,1,5,5,1)
  (same comment as for Thallium)
- Thallium [air, non-urban air or from high stacks]: 5.64e-14 kg; lognormal variance with pedigree 3.542, pedigree (1,1,5,5,1)
  (same comment as for Titanium)
- Nitrate [water, surface water]: 8.56e-5 kg; lognormal variance with pedigree 0.572, pedigree (1,1,5,5,1)
  (same comment as for Aluminium)
- Carbon monoxide, fossil [air, urban air close to ground]: 4.67e-7 kg; lognormal variance with pedigree 0.922, pedigree (1,1,5,5,1)
  (same comment as for Aluminium)
- Cyanide [air, urban air close to ground]: 1.22e-9 kg; lognormal variance with pedigree 0.722, pedigree (1,1,5,5,1)
  (same comment as for Aluminium)
- Titanium, ion [water, ground-, long-term]: 0.000969 kg; lognormal variance with pedigree 0.702, pedigree (1,1,5,5,1)
  (same comment as for Thallium)
- TOC, Total Organic Carbon [water, ground-, long-term]: 0.22 kg; lognormal variance with pedigree 0.512, pedigree (1,1,5,5,1)
  (same comment as for Thallium)
- Particulates, < 2.5 um [air, non-urban air or from high stacks]: 4.14e-7 kg; lognormal variance with pedigree 0.712, pedigree (1,1,5,5,1)
  (same comment as for Titanium)
- Dinitrogen monoxide [air, urban air close to ground]: 1.19e-7 kg; lognormal variance with pedigree 0.552, pedigree (1,1,5,5,1)
  (same comment as for Aluminium)
- Chromium [air, urban air close to ground]: 0 kg; pedigree (1,1,1,1,1)
  (same comment as for Aluminium)
- Antimony [water, surface water]: 2.98e-8 kg; lognormal variance with pedigree 1.772, pedigree (1,1,5,5,1)
  (same comment as for Aluminium)
- Selenium [air, urban air close to ground]: 0 kg; pedigree (1,1,1,1,1)
  (same comment as for Aluminium)
- Thallium [water, surface water]: 1.14e-10 kg; lognormal variance with pedigree 2.462, pedigree (1,1,5,5,1)
  (same comment as for Aluminium)
- DOC, Dissolved Organic Carbon [water, ground-, long-term]: 0.22 kg; lognormal variance with pedigree 0.512, pedigree (1,1,5,5,1)
  (same comment as for Thallium)
- Sulfate [water, ground-, long-term]: 0.00189 kg; lognormal variance with pedigree 0.752, pedigree (1,1,5,5,1)
  (same comment as for Thallium)
- Iron, ion [water, ground-, long-term]: 0.000253 kg; lognormal variance with pedigree 2.302, pedigree (1,1,5,5,1)
  (same comment as for Thallium)
- Hydrogen fluoride [air, non-urban air or from high stacks]: 5.68e-8 kg; lognormal variance with pedigree 1.742, pedigree (1,1,5,5,1)
  (same comment as for Titanium)
- Fluoride [water, surface water]: 1.05e-8 kg; lognormal variance with pedigree 1.952, pedigree (1,1,5,5,1)
  (same comment as for Chloride)
- Manganese [water, ground-, long-term]: 7.53e-5 kg; lognormal variance with pedigree 1.032, pedigree (1,1,5,5,1)
  (same comment as for Thallium)
- Selenium [air, non-urban air or from high stacks]: 5.37e-13 kg; lognormal variance with pedigree 3.252, pedigree (1,1,5,5,1)
  (same comment as for Titanium)
- Methane, fossil [air, urban air close to ground]: 1.42e-6 kg; lognormal variance with pedigree 0.912, pedigree (1,1,5,5,1)
  (same comment as for Aluminium)
- Arsenic, ion [water, ground-, long-term]: 1.84e-6 kg; lognormal variance with pedigree 1.532, pedigree (1,1,5,5,1)
  (same comment as for Thallium)
- Cobalt [air, urban air close to ground]: 1.54e-15 kg; lognormal variance with pedigree 1.782, pedigree (1,1,5,5,1)
  (same comment as for Aluminium)
- BOD5, Biological Oxygen Demand [water, surface water]: 5.02e-5 kg; lognormal variance with pedigree 0.862, pedigree (1,1,5,5,1)
  (same comment as for Aluminium)
- Cobalt [air, non-urban air or from high stacks]: 2.46e-11 kg; lognormal variance with pedigree 2.752, pedigree (1,1,5,5,1)
  (same comment as for Titanium)
- Vanadium [air, non-urban air or from high stacks]: 7.36e-11 kg; lognormal variance with pedigree 2.602, pedigree (1,1,5,5,1)
  (same comment as for Titanium)
- Chromium [air, non-urban air or from high stacks]: 1.13e-12 kg; lognormal variance with pedigree 3.132, pedigree (1,1,5,5,1)
  (same comment as for Titanium)
- Ammonia [air, urban air close to ground]: 4.33e-8 kg; lognormal variance with pedigree 0.612, pedigree (1,1,5,5,1)
  (same comment as for Aluminium)
- Beryllium [air, non-urban air or from high stacks]: 7.04e-14 kg; lognormal variance with pedigree 3.512, pedigree (1,1,5,5,1)
  (same comment as for Titanium)
- Nitrogen [water, surface water]: 6.37e-7 kg; lognormal variance with pedigree 0.582, pedigree (1,1,5,5,1)
  (same comment as for Aluminium)
- Manganese [air, non-urban air or from high stacks]: 2.22e-10 kg; lognormal variance with pedigree 2.462, pedigree (1,1,5,5,1)
  (same comment as for Titanium)
- Methane, fossil [air, non-urban air or from high stacks]: 0.00333 kg; lognormal variance with pedigree 0.452, pedigree (1,1,5,5,1)
  (same comment as for Titanium)
- Tin [air, non-urban air or from high stacks]: 3.74e-13 kg; lognormal variance with pedigree 3.282, pedigree (1,1,5,5,1)
  (same comment as for Titanium)
- BOD5, Biological Oxygen Demand [water, ground-, long-term]: 0.0571 kg; lognormal variance with pedigree 0.512, pedigree (1,1,5,5,1)
  (same comment as for Thallium)
- Lead [air, urban air close to ground]: 2.91e-14 kg; lognormal variance with pedigree 2.342, pedigree (1,1,5,5,1)
  (same comment as for Aluminium)
- Nitrogen oxides [air, non-urban air or from high stacks]: 1.25e-8 kg; lognormal variance with pedigree 1.252, pedigree (1,1,5,5,1)
  (same comment as for Titanium)
- Mercury [water, surface water]: 1.78e-10 kg; lognormal variance with pedigree 2.342, pedigree (1,1,5,5,1)
  (same comment as for Aluminium)
- Iron, ion [water, surface water]: 2.52e-7 kg; lognormal variance with pedigree 1.442, pedigree (1,1,5,5,1)
  (same comment as for Aluminium)
- Nitrogen oxides [air, urban air close to ground]: 4.23e-7 kg; lognormal variance with pedigree 0.602, pedigree (1,1,5,5,1)
  (same comment as for Aluminium)
- Tin [air, urban air close to ground]: 1.16e-12 kg; lognormal variance with pedigree 2.252, pedigree (1,1,5,5,1)
  (same comment as for Aluminium)
- DOC, Dissolved Organic Carbon [water, surface water]: 3.87e-5 kg; lognormal variance with pedigree 0.862, pedigree (1,1,5,5,1)
  (same comment as for Aluminium)
- Mercury [air, non-urban air or from high stacks]: 2.26e-10 kg; lognormal variance with pedigree 2.462, pedigree (1,1,5,5,1)
  (same comment as for Titanium)
- Strontium [air, urban air close to ground]: 2.46e-12 kg; lognormal variance with pedigree 1.802, pedigree (1,1,5,5,1)
  (same comment as for Aluminium)
- Nickel, ion [water, surface water]: 7.04e-9 kg; lognormal variance with pedigree 1.942, pedigree (1,1,5,5,1)
  (same comment as for Aluminium)
- Strontium [water, surface water]: 2.53e-8 kg; lognormal variance with pedigree 1.752, pedigree (1,1,5,5,1)
  (same comment as for Aluminium)
- Sodium, ion [water, surface water]: 5.88e-5 kg; lognormal variance with pedigree 0.862, pedigree (1,1,5,5,1)
  (same comment as for Chloride)
- Zinc [air, urban air close to ground]: 4.46e-12 kg; lognormal variance with pedigree 1.542, pedigree (1,1,5,5,1)
  (same comment as for Aluminium)
- Copper, ion [water, ground-, long-term]: 0.000108 kg; lognormal variance with pedigree 0.992, pedigree (1,1,5,5,1)
  (same comment as for Thallium)
- Antimony [air, non-urban air or from high stacks]: 1.1e-11 kg; lognormal variance with pedigree 2.852, pedigree (1,1,5,5,1)
  (same comment as for Titanium)
- Arsenic, ion [water, surface water]: 2.92e-9 kg; lognormal variance with pedigree 2.102, pedigree (1,1,5,5,1)
  (same comment as for Aluminium)
- NMVOC, non-methane volatile organic compounds, unspecified origin [air, urban air close to ground]: 6.46e-9 kg; lognormal variance with pedigree 1.032, pedigree (1,1,5,5,1)
  (same comment as for Aluminium)
- Iron [air, urban air close to ground]: 8.16e-12 kg; lognormal variance with pedigree 1.512, pedigree (1,1,5,5,1)
  (same comment as for Aluminium)
- Chromium VI [water, ground-, long-term]: 1.8e-7 kg; lognormal variance with pedigree 8.402, pedigree (1,1,5,5,1)
  (same comment as for Thallium)
- Ammonium, ion [water, ground-, long-term]: 0.000772 kg; lognormal variance with pedigree 0.612, pedigree (1,1,5,5,1)
  (same comment as for Thallium)
- Beryllium [water, surface water]: 1.43e-10 kg; lognormal variance with pedigree 2.432, pedigree (1,1,5,5,1)
  (same comment as for Aluminium)
- Chloride [water, ground-, long-term]: 0.0011 kg; lognormal variance with pedigree 0.682, pedigree (1,1,5,5,1)
  (same comment as for Thallium)
- Aluminium [water, ground-, long-term]: 0.000194 kg; lognormal variance with pedigree 0.912, pedigree (1,1,5,5,1)
  (same comment as for Thallium)
- Copper [air, non-urban air or from high stacks]: 1.5e-12 kg; lognormal variance with pedigree 3.092, pedigree (1,1,5,5,1)
  (same comment as for Titanium)
- Bromine [water, surface water]: 2.22e-5 kg; lognormal variance with pedigree 0.972, pedigree (1,1,5,5,1)
  (same comment as for Chloride)
- Lead [water, surface water]: 9.67e-11 kg; lognormal variance with pedigree 2.282, pedigree (1,1,5,5,1)
  (same comment as for Aluminium)
- Antimony [air, urban air close to ground]: 2.16e-12 kg; lognormal variance with pedigree 2.412, pedigree (1,1,5,5,1)
  (same comment as for Aluminium)
- Beryllium [air, urban air close to ground]: 1.39e-13 kg; lognormal variance with pedigree 2.462, pedigree (1,1,5,5,1)
  (same comment as for Aluminium)
- Sulfate [water, surface water]: 7.72e-6 kg; lognormal variance with pedigree 1.232, pedigree (1,1,5,5,1)
  (same comment as for Chloride)
- Strontium [water, ground-, long-term]: 8.58e-5 kg; lognormal variance with pedigree 1.022, pedigree (1,1,5,5,1)
  (same comment as for Thallium)
- Arsenic [air, urban air close to ground]: 9.31e-13 kg; lognormal variance with pedigree 2.152, pedigree (1,1,5,5,1)
  (same comment as for Aluminium)
- Zinc [air, non-urban air or from high stacks]: 8.79e-11 kg; lognormal variance with pedigree 2.572, pedigree (1,1,5,5,1)
  (same comment as for Titanium)

## Sampling procedure
Landfill model based on observed leachate concentrations in literature. Extrapolated to 60'000 years heeding chemical characteristics. Initial waste composition from various literature sources.

## Extrapolations
This dataset has been copied from an original dataset covering the geography CH. The uncertainty has been adjusted accordingly.

## Review by Niels Jungbluth 2003-07-21
Passed. Calculation for standard deviation 95 of, i.e., infrastructure,
land occupation, transport services or other services can differ from
standard Pedigree approach used in this project and figures obtained by
this procedure.
