# coating service, melamine impregnated paper, double-sided

Dataset: EcoSpold 2, unit process
Geography: RER
Time period: 2012-01-01 to 2021-12-31
Technology level: current
Classification: ISIC rev.4 ecoinvent: 1621:Manufacture of veneer sheets and wood-based panels
Tags: Swiss brush-up completed
Scenario: Business-as-Usual
System model: Allocation, cut-off by classification
Generated by: Frank Werner
Database: ecoinvent
isCopyrightProtected: true
accessRestrictedTo: 1

## General comment
Both particleboard and medium density fibreboard are frequently coated with melamine-impregnated paper. Such coated boards are particularly used for interior works such as for furniture or in kitchens.The dataset describes the service of double-sided coating of wood-based boards and can be used for the coating of various types of wood-based boards.
The data stems from several plants in Europe that start from different states of pre-produced resins.
The area weight of the inventoried melamine impregnated paper is 302 gr/m2, corresponding to a paper weight of 104 gr/m2

## Included activities start
From the reception of the melamine-impregnated paper at the factory gate/or from the internal department producing the melamine-impregnated paper.

## Included activities end
The activity ends with the double-sided application of melamine coated paper on wood-based boards at the factory. The wood-based board is not included. Possible airborne emissions are not included due to the lack of specific data. As for the infrastructure it may be assumed that it is included in the dataset of the production of the wood-based boards as the production of melamine faced paper is often produced at the same site.

## Geography
Data collected based on survey data from several plants producing coated wood based panels (plus melamine impregnated paper) and completed with additional information from e.g. environmental product declarations.

## Reference product
- coating, with melamine impregnated paper: 1 m2; name RP; CPC 54730: Painting services; By-product classification allocatable product
  production volume 1.48795e9 m2; name PV_RP; = 898719336.60715/(2* 0.302)
    annual production of melamine impregnated paper divided by area weight, assuming double-sided coating. The area weight of the inventoried melamine impregnated paper is 302 gr/m2, corresponding to a paper weight of 104 gr/m2
  property price 0.463776 EUR2005
    Calculated based on inputs: The price of the product has been calculated as a sum of the values of the material and energy inputs for this product. This value is therefore a rough estimation. It may underestimate the real price since there are additional expenses when producing any product. These expences can include for example labour costs, treatment of waste materials and profit for the producer. Please consider carefully whether this level of data quality is acceptable for your application.

## By-products
- waste packaging paper: 0 kg; CPC 39240: Waste and scrap of paper or paperboard; By-product classification Recyclable; pedigree (1,1,1,1,1)
  Waste output based on paper input.
  production volume 0 kg; = PV_RP*abs(BP_paper/RP)
    Calculated from production volume of reference product using the relative outputs.
  property price 0.1 EUR2005; name BP_paper_price_EUR2005
    For paper and board waste the price, in 2005, according to [http://ec.europa.eu/eurostat] is about 1 EUR/kg corresponding to a purchase price of 0.099 similar to the price of UN comodittie: Waste, scrap of paper, board, nes (including unsorted).
  property carbon content, fossil 0.3635
    fossil carbon content on a dry matter basis. Set to same content as paper input.
  property carbon content, non-fossil 0.1432
    biogene carbon content on a dry matter basis. Set to same content as paper input.
  property carbon content 0.5067
    carbon content on a dry matter basis (reserved; not for manual entry)
  properties: heating value, net 14.11 MJ, wet mass 1 kg, water content 0, dry mass 1 kg, water in wet mass 0 kg, carbon allocation 0.5067 kg

## Inputs from technosphere
- heat, district or industrial, natural gas: 0.36 MJ; lognormal variance with pedigree 0.0336, pedigree (1,3,4,1,1)
  properties: UVEK_link_1 2576, UVEK_relative_amount_1 1, heating value, net 1 MJ
  note on UVEK_link_1: to be used only in special submissions in coordination with ecoinvent and the Swiss FOEN
- paper, melamine impregnated: 0.604 kg; name paper; = 2*0.302; lognormal variance with pedigree 0.0336, pedigree (1,3,4,1,1)
  Double sided application of melamine faced paper (at 302 gr/m2, incl. resin)
  properties: wet mass 1 kg, dry mass 1 kg, carbon content, non-fossil 0.1432, carbon content, fossil 0.3635, heating value, net 15.35 MJ
- electricity, medium voltage: 0.195833 kWh; = 0.705/3.6; lognormal variance with pedigree 0.0336, pedigree (1,3,4,1,1)
  MJ converted to kWh
  properties: UVEK_relative_amount_1 1, UVEK_link_1 1779
- tap water: 0.154 kg; lognormal variance with pedigree 0.0336, pedigree (1,3,4,1,1)
  properties: carbon content, fossil 0.00178991, UVEK_link_1 4285, dry mass 0.000337476 kg, water content 2962.17, wet mass 1 kg, UVEK_relative_amount_1 1
  note on carbon content, fossil: Bicarbonate content is 2.93 mol/m3. CO2 content is 0.1 mol/m3 (ecoinvent v2.2 report 8, Tab 93.1).
- waste packaging paper: -0.604 kg; lognormal variance with pedigree 0.0092, pedigree (1,3,4,1,1)
  Waste output based on paper input.
  production volume 8.98719e8 kg
  properties: heating value, net 14.11 MJ, wet mass 1 kg, dry mass 1 kg, carbon content, fossil 0.3635, carbon content, non-fossil 0.1432
  note on carbon content, fossil: fossil carbon content on a dry matter basis. Set to same content as paper input.
  note on carbon content, non-fossil: biogene carbon content on a dry matter basis. Set to same content as paper input.

## Emissions to nature
- Water [air, unspecified]: 0.000154 m3; lognormal variance with pedigree 0.2086, pedigree (1,3,4,1,1)

## Sampling procedure
The life cycle inventory has been compiled based on survey data from several plants producing coated wood based panels (plus melamine impregnated paper) and completed with additional information from e.g. environmental product declarations. As such, the LCI does not represent a statistical average but a best guess based on the available information.

## Extrapolations
This dataset has been extrapolated from year 2012 to the year of the calculation (2021). The uncertainty has been adjusted accordingly.
