# treatment of waste polystyrene, open burning

Dataset: EcoSpold 2, unit process
Geography: GLO
Time period: 2006-01-01 to 2021-12-31
Technology level: current
Classification: ISIC rev.4 ecoinvent: 3821:Treatment and disposal of non-hazardous waste
Synonyms: open, uncontrolled burning
Scenario: Business-as-Usual
System model: Allocation, cut-off by classification
Share of production covered: 1 %
Generated by: Avraam Symeonidis
Database: ecoinvent
isCopyrightProtected: true
accessRestrictedTo: 1

## General comment
This dataset represents the activity of waste disposal of waste polystyrene in uncontrolled, open burning. Recommended use of this dataset: For PS, which goes to disposal as part of unmanaged communal waste mixture. For Expanded PS (EPS) use other dataset.Waste composition (wet, in ppm): upper heating value 38.88 MJ/kg; lower heating value 38.67 MJ/kg; H2O 2000; O 38852; H 78046; C 868490; S 678.75; N 1942.6; P n.a.; B n.a.; Cl 1132.1; Br 882.12; F 14.25; I n.a.; Ag n.a.; As 1.8418; Ba 180.79; Cd 23.336; Co 30.622; Cr 39.613; Cu 107.56; Hg 0.82311; Mn 77.469; Mo n.a.; Ni 19.968; Pb 14.935; Sb 41.65; Se 2.0357; Sn 25.403; V 279.32; Zn 834.61; Be 0.48468; Sc n.a.; Sr 85.789; Ti 969.36; Tl 0.38774; W n.a.; Si n.a.; Fe 3611.5; Ca n.a.; Al 193.87; K n.a.; Mg n.a.; Na 1420.6; . Share of carbon in waste that is biogenic 0%. // Recycling rates for metallic iron = 0% for metallic aluminium = 0% for metallic copper = 0% . A mass of 0.0272kg residues are left on ground.

## Included activities start
open burning starting from waste placement on burning site (without transports to the site)

## Included activities end
Waste-specific emissions to air and soil from open burning.

## Geography
Generic open burning without any geographical distinction.

## Technology
This is an inventory for open burning of solid waste. Informal or uncontrolled burning. No flue gas treatment. Suitable for informal recycling (e.g. burning of e-waste). Based on Municipal waste incineration without any pollution control. Residues (minus any actually recycled metals) are left on site. Assumption of share of thermal NOx to total NOx in average waste burning process is 30%. Contribution from thermal NOx is 810mg per kg waste. Recycling rates for metallic iron = 0% for metallic aluminium = 0% for metallic copper = 0% .

## Time period
generic open burning without any temporal distinction

## Reference product
- waste polystyrene: -1 kg; CPC 39270: Waste, parings and scrap of plastics; By-product classification Waste; CAS 9003-53-6; pedigree (1,1,1,1,1)
  main reference product of this activity (supply of disposal service).
  Uncertainty: Uncertainty is not adjusted, as this is the refence product
  production volume 1 kg
    The amount of the annual production volume is a placeholder value. The contribution of this technology to the different local markets can be found in the markets themselves.
  property heating value, net 38.67 MJ
    Value taken from the general comment of the treatment dataset.
  property price 0 EUR2005
    Waste products are assigned a price of zero as they are assumed to require further treatment.
  property carbon content 0.87023
    carbon content on a dry matter basis (reserved; not for manual entry)
  properties: water in wet mass 0.002 kg, iron content 0.0036188, sodium content 0.0014234, water content 0.002004, wet mass 1 kg, aluminium content 0.00019426, strontium content 8.596e-5, chlorine content 0.0011344, selenium content 2.0397e-6, chromium content 3.9692e-5, bromine content 0.00088389, cadmium content 2.3383e-5, nickel content 2.0008e-5, mercury content 8.2476e-7, heating value, gross 38.884 MJ, antimony content 4.1734e-5, titanium content 0.0009713, barium content 0.00018115, tin content 2.5454e-5, arsenic content 1.8455e-6, manganese content 7.7625e-5, hydrogen content 0.078203, copper content 0.00010778, cobalt content 3.0684e-5, nitrogen content 0.0019465, fluorine content 1.4278e-5, oxygen content 0.03893, vanadium content 0.00027988, thallium content 3.8852e-7, lead content 1.4965e-5, sulfur content 0.00068011, beryllium content 4.8565e-7, zinc content 0.00083628, carbon content, fossil 0.87023, dry mass 0.998 kg, carbon allocation 0.86849 kg

## Inputs from nature
- Oxygen [natural resource, in air]: 2.8809 kg; lognormal variance with pedigree 0.0163192, pedigree (1,1,4,1,1)
  oxygen from ambient air needed to combust and oxidise this waste. Net demand, i.e. without air O2 leaving the process uncombusted.
  Uncertainty: uncertainty is calculated from uncertainties in waste composition and transfer coefficients to flue gas and soild residues

## Emissions to nature
- Aluminium [air, urban air close to ground]: 1.5981e-7 kg; lognormal variance with pedigree 0.98933, pedigree (1,1,4,1,1)
  Emissions to air from open burning.
  Uncertainty: Uncertainty calculated depending on waste input and uncertainty of transfer coefficents in incineration model.
- Titanium [soil, industrial]: 0.00095908 kg; lognormal variance with pedigree 0.66967, pedigree (1,1,4,1,1)
  Emissions from open burning to residues left on ground.
  Uncertainty: Uncertainty calculated depending on waste input and uncertainty of transfer coefficents in incineration model.
- Strontium [air, urban air close to ground]: 8.5789e-8 kg; lognormal variance with pedigree 1.0928, pedigree (1,1,4,1,1)
  (same comment as for Aluminium)
- Beryllium [soil, industrial]: 4.8376e-7 kg; lognormal variance with pedigree 1.6709, pedigree (1,1,4,1,1)
  (same comment as for Titanium)
- Titanium [air, urban air close to ground]: 1.0278e-5 kg; lognormal variance with pedigree 0.71884, pedigree (1,1,4,1,1)
  (same comment as for Aluminium)
- Zinc [soil, industrial]: 0.0008284 kg; lognormal variance with pedigree 0.68923, pedigree (1,1,4,1,1)
  (same comment as for Titanium)
- Beryllium [air, urban air close to ground]: 9.1607e-10 kg; lognormal variance with pedigree 1.7576, pedigree (1,1,4,1,1)
  (same comment as for Aluminium)
- Vanadium [soil, industrial]: 0.00025776 kg; lognormal variance with pedigree 0.83353, pedigree (1,1,4,1,1)
  (same comment as for Titanium)
- Vanadium [air, urban air close to ground]: 2.1566e-5 kg; lognormal variance with pedigree 0.85064, pedigree (1,1,4,1,1)
  (same comment as for Aluminium)
- Selenium [soil, industrial]: 1.8592e-6 kg; lognormal variance with pedigree 1.485, pedigree (1,1,4,1,1)
  (same comment as for Titanium)
- Zinc [air, urban air close to ground]: 6.2094e-6 kg; lognormal variance with pedigree 0.74545, pedigree (1,1,4,1,1)
  (same comment as for Aluminium)
- Antimony [soil, industrial]: 4.165e-5 kg; lognormal variance with pedigree 1.0866, pedigree (1,1,4,1,1)
  (same comment as for Titanium)
- Tin [air, urban air close to ground]: 4.9779e-11 kg; lognormal variance with pedigree 1.445, pedigree (1,1,4,1,1)
  (same comment as for Aluminium)
- Tin [soil, industrial]: 2.5403e-5 kg; lognormal variance with pedigree 1.1524, pedigree (1,1,4,1,1)
  (same comment as for Titanium)
- Selenium [air, urban air close to ground]: 1.7643e-7 kg; lognormal variance with pedigree 1.5007, pedigree (1,1,4,1,1)
  (same comment as for Aluminium)
- Manganese [soil, industrial]: 7.681e-5 kg; lognormal variance with pedigree 1.00401, pedigree (1,1,4,1,1)
  (same comment as for Titanium)
- Antimony [air, urban air close to ground]: 1.0009e-10 kg; lognormal variance with pedigree 1.3722, pedigree (1,1,4,1,1)
  (same comment as for Aluminium)
- Nickel [soil, industrial]: 1.9939e-5 kg; lognormal variance with pedigree 1.1843, pedigree (1,1,4,1,1)
  (same comment as for Titanium)
- Nickel [air, urban air close to ground]: 2.8488e-8 kg; lognormal variance with pedigree 1.2778, pedigree (1,1,4,1,1)
  (same comment as for Aluminium)
- Lead [soil, industrial]: 1.481e-5 kg; lognormal variance with pedigree 1.2228, pedigree (1,1,4,1,1)
  (same comment as for Titanium)
- Lead [air, urban air close to ground]: 1.2551e-7 kg; lognormal variance with pedigree 1.2766, pedigree (1,1,4,1,1)
  (same comment as for Aluminium)
- Mercury [soil, industrial]: 3.2426e-7 kg; lognormal variance with pedigree 1.6051, pedigree (1,1,4,1,1)
  (same comment as for Titanium)
- Manganese [air, urban air close to ground]: 6.5943e-7 kg; lognormal variance with pedigree 1.0575, pedigree (1,1,4,1,1)
  (same comment as for Aluminium)
- Copper [soil, industrial]: 0.00010745 kg; lognormal variance with pedigree 0.96032, pedigree (1,1,4,1,1)
  (same comment as for Titanium)
- Chromium [air, urban air close to ground]: 5.907e-8 kg; lognormal variance with pedigree 1.1857, pedigree (1,1,4,1,1)
  (same comment as for Aluminium)
- Cadmium [soil, industrial]: 2.3204e-5 kg; lognormal variance with pedigree 1.1636, pedigree (1,1,4,1,1)
  (same comment as for Titanium)
- Copper [air, urban air close to ground]: 1.1822e-7 kg; lognormal variance with pedigree 1.0603, pedigree (1,1,4,1,1)
  (same comment as for Aluminium)
- Chromium [soil, industrial]: 3.9554e-5 kg; lognormal variance with pedigree 1.0933, pedigree (1,1,4,1,1)
  (same comment as for Titanium)
- Mercury [air, urban air close to ground]: 4.9885e-7 kg; lognormal variance with pedigree 1.6033, pedigree (1,1,4,1,1)
  (same comment as for Aluminium)
- Cobalt [soil, industrial]: 2.9387e-5 kg; lognormal variance with pedigree 1.1275, pedigree (1,1,4,1,1)
  (same comment as for Titanium)
- Cobalt [air, urban air close to ground]: 1.2351e-6 kg; lognormal variance with pedigree 1.1536, pedigree (1,1,4,1,1)
  (same comment as for Aluminium)
- Barium [soil, industrial]: 0.00017333 kg; lognormal variance with pedigree 0.89126, pedigree (1,1,4,1,1)
  (same comment as for Titanium)
- Cadmium [air, urban air close to ground]: 1.3203e-7 kg; lognormal variance with pedigree 1.2255, pedigree (1,1,4,1,1)
  (same comment as for Aluminium)
- Arsenic [soil, industrial]: 1.8261e-6 kg; lognormal variance with pedigree 1.4981, pedigree (1,1,4,1,1)
  (same comment as for Titanium)
- Barium [air, urban air close to ground]: 7.4513e-6 kg; lognormal variance with pedigree 0.91702, pedigree (1,1,4,1,1)
  (same comment as for Aluminium)
- Fluoride [soil, industrial]: 1.273e-5 kg; lognormal variance with pedigree 1.2291, pedigree (1,1,4,1,1)
  (same comment as for Titanium)
- Arsenic [air, urban air close to ground]: 1.5697e-8 kg; lognormal variance with pedigree 1.5515, pedigree (1,1,4,1,1)
  (same comment as for Aluminium)
- Chloride [soil, industrial]: 0.00037687 kg; lognormal variance with pedigree 0.65284, pedigree (1,1,4,1,1)
  (same comment as for Titanium)
- Hydrogen fluoride [air, urban air close to ground]: 1.5991e-6 kg; lognormal variance with pedigree 1.2423, pedigree (1,1,4,1,1)
  (same comment as for Aluminium)
- Bromine [soil, industrial]: 0.00059924 kg; lognormal variance with pedigree 0.68242, pedigree (1,1,4,1,1)
  (same comment as for Titanium)
- Bromine [air, urban air close to ground]: 0.00028288 kg; lognormal variance with pedigree 0.68562, pedigree (1,1,4,1,1)
  (same comment as for Aluminium)
- Nitrogen [soil, industrial]: 1.945e-5 kg; lognormal variance with pedigree 0.62989, pedigree (1,1,4,1,1)
  (same comment as for Titanium)
- Hydrogen chloride [air, urban air close to ground]: 0.00077655 kg; lognormal variance with pedigree 0.64992, pedigree (1,1,4,1,1)
  (same comment as for Aluminium)
- Sulfur [soil, industrial]: 0.0005813 kg; lognormal variance with pedigree 0.71639, pedigree (1,1,4,1,1)
  (same comment as for Titanium)
- Sulfur dioxide [air, urban air close to ground]: 0.00029233 kg; lognormal variance with pedigree 0.72647, pedigree (1,1,4,1,1)
  (same comment as for Aluminium)
- Carbon [soil, industrial]: 0.0043555 kg; lognormal variance with pedigree 0.073132, pedigree (1,1,4,1,1)
  (same comment as for Titanium)
- Nitrogen oxides [air, urban air close to ground]: 0.0031722 kg; lognormal variance with pedigree 0.39619, pedigree (1,1,4,1,1)
  (same comment as for Aluminium)
- Polychlorinated biphenyls [air, urban air close to ground]: 1.1189e-7 kg; lognormal variance with pedigree 0.0491, pedigree (1,1,4,1,1)
  Process-specific (constant) emissions to air from open burning.
  Uncertainty: uncertainty generic estimate
- Dinitrogen monoxide [air, urban air close to ground]: 0.00011625 kg; lognormal variance with pedigree 0.0491, pedigree (1,1,4,1,1)
  (same comment as for Aluminium)
- Benzene, ethyl- [air, urban air close to ground]: 0.00032746 kg; lognormal variance with pedigree 0.0491, pedigree (1,1,4,1,1)
  (same comment as for Polychlorinated biphenyls)
- Carbon dioxide, fossil [air, urban air close to ground]: 3.0916 kg; lognormal variance with pedigree 0.00866599, pedigree (1,1,4,1,1)
  Emissions to air from open burning.
  Uncertainty: Uncertainty calculated depending on waste input, uncertainty of transfer coefficents in incineration model,and uncertainty in CO and CH4 emissions.
- PAH, polycyclic aromatic hydrocarbons [air, urban air close to ground]: 0.0003443 kg; lognormal variance with pedigree 0.30974, pedigree (1,1,4,1,1)
  (same comment as for Polychlorinated biphenyls)
- Methane, fossil [air, urban air close to ground]: 0.0059 kg; lognormal variance with pedigree 0.0491, pedigree (1,1,4,1,1)
  (same comment as for Polychlorinated biphenyls)
- Acetaldehyde [air, urban air close to ground]: 0.0004284 kg; lognormal variance with pedigree 0.0491, pedigree (1,1,4,1,1)
  (same comment as for Polychlorinated biphenyls)
- Carbon monoxide, fossil [air, urban air close to ground]: 0.0386 kg; lognormal variance with pedigree 0.65557, pedigree (1,1,4,1,1)
  (same comment as for Polychlorinated biphenyls)
- Formaldehyde [air, urban air close to ground]: 0.00044365 kg; lognormal variance with pedigree 0.0491, pedigree (1,1,4,1,1)
  (same comment as for Polychlorinated biphenyls)
- Toluene [air, urban air close to ground]: 0.000372 kg; lognormal variance with pedigree 0.0491, pedigree (1,1,4,1,1)
  (same comment as for Polychlorinated biphenyls)
- Styrene [air, urban air close to ground]: 0.0005275 kg; lognormal variance with pedigree 0.0491, pedigree (1,1,4,1,1)
  (same comment as for Polychlorinated biphenyls)
- Phenol [air, urban air close to ground]: 1.4799e-5 kg; lognormal variance with pedigree 0.0491, pedigree (1,1,4,1,1)
  (same comment as for Polychlorinated biphenyls)
- Dioxins, measured as 2,3,7,8-tetrachlorodibenzo-p-dioxin [air, urban air close to ground]: 1.5368e-11 kg; lognormal variance with pedigree 1.1299, pedigree (1,1,4,1,1)
  Process-specific (constant) emissions to air from open burning.
  Uncertainty: Uncertainty calculated from uncetainty in Chlorine content in waste and estimation formula
- Dioxins, measured as 2,3,7,8-tetrachlorodibenzo-p-dioxin [soil, industrial]: 4.2689e-12 kg; lognormal variance with pedigree 1.6103, pedigree (1,1,4,1,1)
  (same comment as for Dioxins, measured as 2,3,7,8-tetrachlorodibenzo-p-dioxin)
- Particulates, < 2.5 um [air, urban air close to ground]: 0.0008168 kg; lognormal variance with pedigree 0.39897, pedigree (1,1,4,1,1)
  (same comment as for Aluminium)
- Water [air, urban air close to ground]: 0.00062637 m3; lognormal variance with pedigree 0.15096, pedigree (1,1,4,1,1)
  water vapour from waste humidity, hydrogen oxidation.
  Uncertainty: Uncertainty calculated from uncertainty in waste composition and the uncertainty of fraction to air.
- Benzene [air, urban air close to ground]: 0.00097975 kg; lognormal variance with pedigree 0.0491, pedigree (1,1,4,1,1)
  (same comment as for Polychlorinated biphenyls)
- Sodium [air, urban air close to ground]: 3.499e-5 kg; lognormal variance with pedigree 0.6539, pedigree (1,1,4,1,1)
  (same comment as for Aluminium)
- Sodium [soil, industrial]: 0.0013856 kg; lognormal variance with pedigree 0.61998, pedigree (1,1,4,1,1)
  (same comment as for Titanium)
- Particulates, > 2.5 um, and < 10um [air, urban air close to ground]: 0.00043982 kg; lognormal variance with pedigree 0.39897, pedigree (1,1,4,1,1)
  (same comment as for Aluminium)
- Iron [soil, industrial]: 0.003605 kg; lognormal variance with pedigree 0.5007, pedigree (1,1,4,1,1)
  (same comment as for Titanium)
- Particulates, > 10 um [air, urban air close to ground]: 0.00031416 kg; lognormal variance with pedigree 0.39897, pedigree (1,1,4,1,1)
  (same comment as for Aluminium)
- Aluminium [soil, industrial]: 0.00019371 kg; lognormal variance with pedigree 0.88197, pedigree (1,1,4,1,1)
  (same comment as for Titanium)
- Iron [air, urban air close to ground]: 6.5436e-6 kg; lognormal variance with pedigree 0.58842, pedigree (1,1,4,1,1)
  (same comment as for Aluminium)
- Thallium [soil, industrial]: 3.8697e-7 kg; lognormal variance with pedigree 1.6995, pedigree (1,1,4,1,1)
  (same comment as for Titanium)
- Thallium [air, urban air close to ground]: 7.7549e-10 kg; lognormal variance with pedigree 1.7849, pedigree (1,1,4,1,1)
  (same comment as for Aluminium)
- Strontium [soil, industrial]: 8.5703e-5 kg; lognormal variance with pedigree 0.99043, pedigree (1,1,4,1,1)
  (same comment as for Titanium)

## Extrapolations
This dataset has been extrapolated from year 2012 to the year of the calculation (2021). The uncertainty has been adjusted accordingly.
