# polystyrene foam slab with graphite, 6% recycled

Dataset: EcoSpold 2, unit process
Geography: CH
Time period: 2009-01-01 to 2021-12-31
Technology level: current
Classification: ISIC rev.4 ecoinvent: 2220:Manufacture of plastics products
Classification: EcoSpold01Categories: insulation materials/production
Synonyms: EPS graphite
Tags: single enterprise data
Scenario: Business-as-Usual
System model: Allocation, cut-off by classification
Share of production covered: 0 %
Generated by: Matthias Klingler
Database: ecoinvent
isCopyrightProtected: true
accessRestrictedTo: 1

## General comment
This dataset represents the production of polystyrene foam insulation for wall and roof applications with added graphite for enhanced thermal insulation properties. The density of the insulation ranges from 15-25 kg/m3 and the thermal conductivity ranges from 0.029-0.032 W/m*K. The production includes the raw materials, the transport of raw materials, the expanding of the polystyrene granulate, the recycling of polystyrene waste for primary production and the forming of insulation slabs. For the inventory it was assumed that the energy used for the foaming and the forming of the slabs is independent of the densitiy of the final product. Hence per kilogram of material input it was considered that the consumption of energy is the same for all polystyrene foam slabs produced at the company that was inventoried.

## Included activities start
From the reception of polystyrene granulate, graphite and polystyrene waste at the factory gate.

## Included activities end
This activity ends with the finished product at the production plant. The dataset includes the raw materials as well as transports and the energy required for the transformation into the final product. The dataset does not include the packaging of the final product.

## Geography
Data from swisspor AG

## Technology
Swiss average EPS production; process from 2 factories in Switzerland. The polystyrene granulate which contains pentane is expanded with steam. Polystyrene wastes are shredded. In a thermoforming process the expanded granulate and the recycled material are formed into slabs and finally cut to the desired dimensions.

## Reference product
- polystyrene foam slab with graphite, 6% recycled: 1 kg; CPC 363: Semi-manufactures of plastics; By-product classification allocatable product
  production volume 2.6785e6 kg
    Production volume Swisspor in 2009
  property price 0.91 EUR2005
    Calculated value based on data from United Nations Commodity Trade Statistics Database (comtrade.un.org). UN comtrade category: 390319 Polystyrene, except expansible in primary forms. Year 2005. Using exchange rate of 1EURO = 1.209 USD. Average of price of import into 5 main markets (EU, US, JP, IN and CN).
  property carbon content, non-fossil 0
    XPS consists in 91% of polystyrene, 7% of blowing agent and the re-maining 2% are flame retardants (bromine compounds) and other additives (ecoinvent v2.2 report 7, part XIV, pg69). The chemical formula of polystyrene is (C8H8)n. Here, the blowing agent is CO2.
  property carbon content, fossil 0.859091
    (same comment as for polystyrene foam slab with graphite, 6% recycled)
  property carbon content 0.859091
    carbon content on a dry matter basis (reserved; not for manual entry)
  properties: water content 0, water in wet mass 0 kg, dry mass 1 kg, wet mass 1 kg, heating value, net 38.67 MJ, carbon allocation 0.859091 kg

## Inputs from technosphere
- building, hall: 3.987e-5 m2; lognormal variance with pedigree 0.0112, pedigree (2,4,4,1,1)
  Calculated value: The area occupied by one storey buildings is 14'530 m2. The amortisation of the buildings is assumed to be 60 years. The yearly production volume of all products is 6'073 tons.
  This exchange has an activity link directly to the producing activity because the product is primarily consumed in the same geographical area where it is produced.
- industrial machine, heavy, unspecified: 0.00352 kg; lognormal variance with pedigree 0.0172, pedigree (2,5,4,1,1)
  Calculated value: The estimated weight of all machinery is 428.05 t. The average life-time of machines was estimated to be 20 years. The production volume of all products is 6'073 t.
- electricity, medium voltage: 0.549 kWh; lognormal variance with pedigree 0.0093, pedigree (2,2,4,1,1)
  Calculated value: For the calculation of the electricity used for the foaming of the granulate and the forming of the insulation slabs it was assumed that this input depends of the mass of the material input since the energy required for foaming and forming depends mainly on the mass of the raw material that needs to be heated. The calculation of the value is based on the yearly energy consumption of the producer where electricity represents a share of 27% . The energy required for the forming of the slabs had to be put into relation to the total mass of the inputs of granulate and recycled material for all products whereas the energy consumption of the foaming process applies only to the total input of granulate. According to an estimation of Swisspor the energy required for the forming of the slabs is about double the one required for the foaming process. The calculated inputs of electricity per kilogram of granulate are: 0.187 kWh/kg for foaming and 0.373 kWh/kg for forming. The electricity required for recycling is 0.002 kWh/kg of recycled material.
- heat, district or industrial, other than natural gas: 2.649 MJ; lognormal variance with pedigree 0.0093, pedigree (2,2,4,1,1)
  Calculated value: For the calculation of the oil used for the foaming of the granulate and the forming of the insulation slabs it was assumed that this input depends of the mass of the material input since the energy required for foaming and forming depends mainly on the mass of the raw material that needs to be heated. The calculation of the value is based on the yearly energy consumption of the producer where oil represents a share of 37% . The energy required for the forming of the slabs had to be put into relation to the total mass of the inputs of granulate and recycled material for all products whereas the energy consumption of the foaming process applies only to the total input of granulate. According to an estimation of Swisspor the energy required for the forming of the slabs is about double the one required for the foaming process. The calculated inputs of oil per kilogram of granulate are: 0.901 MJ/kg for foaming and 1.802 MJ/kg for forming.
  properties: heating value, net 1 MJ
- polystyrene, expandable: 0.9 kg; name Polystyrene; lognormal variance with pedigree 0.0093, pedigree (2,2,4,1,1)
  Measured value: Based on the material composition of the product as declared by the producer.
  properties: carbon content, fossil 0.923077, dry mass 1 kg, wet mass 1 kg, heating value, net 38.67 MJ
  note on carbon content, fossil: Chemical formula of polystyrene is (C8H8)n (ecoinvent v2.2 report 11_II)
- building, multi-storey: 2.883e-5 m3; lognormal variance with pedigree 0.0112, pedigree (2,4,4,1,1)
  Calculated value: The volume occupied by multi-storey buildings is 10'506 m3. The amortisation of the buildings is assumed to be 60 years. The yearly production volume of all products is 6'073 tons.
- packaging film, low density polyethylene: 0.032 kg; lognormal variance with pedigree 0.0112, pedigree (2,4,4,1,1)
  Calculated value: On average 0.64 kg packaging film is needed per m3 of product. The average densitiy of the product is 20 kg/m3.
  property carbon content, fossil 0.857143; name C_content_fossil
  property dry mass 1 kg; name DM
  property water content 0; name water_content
  property carbon content, non-fossil 0; name C_content_non_fossil
  property wet mass 1 kg; name WM
  property water in wet mass 0 kg; name WWM
  properties: heating value, net 42.47 MJ
- heat, district or industrial, natural gas: 2.567 MJ; lognormal variance with pedigree 0.0093, pedigree (2,2,4,1,1)
  Calculated value: For the calculation of the natural gas used for the foaming of the granulate and the forming of the insulation slabs it was assumed that this input depends of the mass of the material input since the energy required for foaming and forming depends mainly on the mass of the raw material that needs to be heated. The calculation of the value is based on the yearly energy consumption of the producer where natural gas represents a share of 36% . The energy required for the forming of the slabs had to be put into relation to the total mass of the inputs of granulate and recycled material for all products whereas the energy consumption of the foaming process applies only to the total input of granulate. According to an estimation of Swisspor the energy required for the forming of the slabs is about double the one required for the foaming process. The calculated inputs of natural gas per kilogram of granulate are: 0.873 MJ/kg for foaming and 1.746 MJ/kg for forming.
  properties: heating value, net 1 MJ
- polystyrene scrap, post-consumer: 0.06 kg; lognormal variance with pedigree 0.0093, pedigree (2,2,4,1,1)
  (same comment as for polystyrene, expandable)
  properties: carbon content, fossil 0.922579, wet mass 1 kg, dry mass 1 kg, heating value, net 38.67 MJ
  note on carbon content, fossil: Tab & Fig 6.12, ecoinvent v2.2 report 7, part XXI. Chemical formula of polystyrene is (C8H8)n
- graphite: 0.04 kg; lognormal variance with pedigree 0.0093, pedigree (2,2,4,1,1)
  (same comment as for polystyrene, expandable)
  properties: carbon content, fossil 1, dry mass 1 kg, wet mass 1 kg, heating value, net 30.3 MJ

## Inputs from nature
- Occupation, industrial area [natural resource, land]: 0.00385 m2*year; lognormal variance with pedigree 0.0172, pedigree (2,5,4,1,1)
  Calculated value: The whole aea occupied by the factory is 23'400 m2. The time of occupation was estimated to be 100 years. The yearly production volume is 6'073 t.

## Emissions to nature
- Carbon dioxide, fossil [air, unspecified]: 0.0702697 kg; = Polystyrene*0.04*2/3*0.96*3.0499; lognormal variance with pedigree 0.0093, pedigree (2,2,4,1,1)
  Calculated value: Per mole of pentane 5 moles of CO2 are emitted (molar mass pentane 72.15 g/mole, molar mass CO2 44.01 g/mole). Therefore 3.0499 kg CO2 are emitted per kg of pentane.
- Pentane [air, non-urban air or from high stacks]: 0.00096 kg; = Polystyrene*0.04*2/3*0.04; lognormal variance with pedigree 0.1287, pedigree (2,2,4,1,1)
  Calculated value: One kilogram of polystyrene granulate contains approximately 40 g of pentane. During the foaming process about 67% (27 g) are emitted and treated in the factory. Only about 4% of the pentane emitted during the foaming process are emitted into the atmosphere (approx. 1 g of pentane per kilogram of granulate). The remaining 13 g of pentane are still in the product at the end of the production.

## Sampling procedure
Data from 2 factories from Swisspor on the consumption of raw materials, energy carriers (electricity, gas, oil), recycled wastes and transports.

## Extrapolations
This dataset has been extrapolated from year 2011 to the year of the calculation (2021). The uncertainty has been adjusted accordingly.
