# eucalyptus seedling production, in heated greenhouse

Dataset: EcoSpold 2, unit process
Geography: BR
Time period: 2010-01-01 to 2021-12-31
Technology level: current
Classification: ISIC rev.4 ecoinvent: 0130:Plant propagation
Scenario: Business-as-Usual
System model: Allocation, cut-off by classification
Generated by: Leticia De Santi Barrantes
Published in: Diogo Aparecido Lopes Silva 2013
Database: ecoinvent
isCopyrightProtected: true
accessRestrictedTo: 1

## General comment
The dataset refers to the production of 1000 Eucalyptus seedling. The dataset contains the production of Eucalyptus seedlings in a tree nursery for plantation in forests. The seedlings are produced in a heated greenhouse and wood wastes are bought for that. The final product is the seedlings planted in the substrate (as showed in the following picture) inside the polytubes where they are cultivated. Yield capacity is 1.3 million seedlings per month.
Source: EMBRAPA CNPTIA <http://www.agencia.cnptia.embrapa.br/gestor/eucalipto/arvore/CONTAG01_37_2572006132315.html>, access 02 mar 2016.
Polypropylene tubes with substrate are used to the cultivation and it can be reused for 6 to 8 years. However, the consumption of substrate is not included. The production steps are the following:
Source: USP <http://www.teses.usp.br/teses/disponiveis/88/88131/tde-31072012-121351/en.php>, access 02 mar 2016.
As data is from a LCA of MDP board production in Brazil, the original numbers had to be converted using the following information: kg of wood produce per seedling = 74.3 and kg of wood consumed to produce 1 m³ of MDP board = 687.

## Included activities start
This activity covers the water, fertilizers and pesticides consumed for cultivation of the seedlings, besides covers the transport of inputs inside the nursery by tractors and the electricity and wood wastes consumption to heat up the greenhouses.

## Included activities end
The activity ends with the seedlings ready to expedition. It does not includes the substrate and package boxes as source does not provide this information.

## Geography
The inventory is modelled for Brazil.

## Technology
Cultivation of Eucalyptus seedlings in heated greenhouse inside nurseries.

## Time period
Time period valid for the most data collected.

## Parameters
- Time: 0.25 year; name time; = 3/12; lognormal variance with pedigree 0.1306, pedigree (5,5,5,5,4)
  The life span takes 3 months.
- evapotranspiration rate: 0.2941 dimensionless; name e_rate; lognormal variance with pedigree 0.1306, pedigree (5,5,5,5,4)
  This parameter is related to the evapotranspiration that happens during the production of tree seedling, according to the experiment conducted by Oliveira (2012.
  OLIVEIRA, Aline Santana. Otimização do uso da água na produção de mudas clonais de Eucalyptus. 2012. PhD Thesis. Federal University of Viçosa <http://www.tede.ufv.br/tedesimplificado/tde_arquivos/24/TDE-2012-08-28T072515Z-3888/Publico/texto%20completo.pdf>.
- wood density, dry: 474 kg/m3; name dry_wood_d; lognormal variance with pedigree 0.1306, pedigree (5,5,5,5,4)
  Wood density. From Silva et al. (2013).
- weight_seedling: 0.0557 kg; lognormal variance with pedigree 0.1306, pedigree (5,5,5,5,4)
  Weight of one seedling in the substrate inside the polytube.
- density, seedlings: 750 units/m²; name seedlings_m2; lognormal variance with pedigree 0.136, pedigree (5,5,5,5,4)
  Value extrapolated from "tree seedling" global dataset.

## Reference product
- eucalyptus seedling, for planting: 1 unit; name RP; By-product classification allocatable product
  production volume 14635.8 unit; name RP_PV; = 731788862.18*0.02/RP
    The production volume of eucalyptus seedling was estimated from eucalyptus planted area in Brazil (from Brazilian Tree Industry - Report 2017 - http://iba.org/images/shared/Biblioteca/IBA_RelatorioAnual2017.pdf) considering different rotation periods, average density per hectare and mortality rate of planted seedlings).
    Besides, based on nursery owners opinion and on literature review, it was assumed that 2% of total eucalyptus seedlings production in Brazil is produced in heated greenhouses.
  property dry mass 0.6 kg; name dry_mass; = wet_mass-water_wet_mass
  property water content 0.666667; = water_wet_mass/dry_mass
  property wet mass 1 kg; name wet_mass
  property carbon content, non-fossil 0.494; name ref_cc_nf
    biogene carbon content on a dry matter basis
  property price 2.8945 EUR2005; name RP_price_EUR2005
    Estimated value. The price of eucalypstus seedling is set to be approximately to 3.5USD. The value is set according to the prices report from the websites parkseed.com (https://parkseed.com/eucalyptus-seeds/p/03179-PK-P1/, accessed 19Feb2018) and seedman.com (https://www.seedman.com/eucalyptus.htm, accessed 19Feb2018).
  property water in wet mass 0.4 kg; name water_wet_mass; = 0.4*wet_mass
  property carbon content 0.494
    carbon content on a dry matter basis (reserved; not for manual entry)
  properties: carbon content, fossil 0, carbon allocation 0.2964 kg

## Inputs from technosphere
- electricity, medium voltage: 0.00541667 kWh; = UnitConversion(0.0195, 'MJ', 'kWh')*1000; source Diogo Aparecido Lopes Silva 2013; lognormal variance with pedigree 0.0041, pedigree (2,4,2,3,2)
  Electricity is consumed to heat up the greenhouses and other machines.
- waste polypropylene: -0.0005573 kg; name ByP01; = (PP)*-1; source Diogo Aparecido Lopes Silva 2013; lognormal variance with pedigree 0.2106, pedigree (5,5,5,5,5)
  Tubes of polypropylene are used to cultivate seedlings and are reused through 6 to 8 years resulting in 28 times as the process takes 3 months.
  production volume 8.15652 kg; = ByP01/ RP* RP_PV
    Calculated from production volume of reference product using the relative outputs.
  property price 0 EUR2005; name ByP01_price_EUR2005
  properties: heating value, net 32.78 MJ, wet mass 1 kg, dry mass 0.841 kg, water content 0.189061, carbon content, fossil 0.825208
  note on heating value, net: Value assumed for all polypropylene products. Source: Phyllis2, database for (treated) biomass, algae, feedstocks for biogas production and biochar, https://phyllis.nl/Biomass/View/1186, ECN.TNO
- packaging, for fertilisers: 0.0006436 kg; lognormal variance with pedigree 0.0514, pedigree (4,3,2,5,4)
  Total amount of active substance/s of fertilisers needed for the production of 'eucalyptus seedling, for planting' is calculated to be circa 3.22E-01 kg. Fertiliser/s used in this dataset is/are: 'ammonium sulfate, as N', 'phosphate fertiliser, as P2O5', 'potassium chloride, as K2O'. The total amount of active substance/s is doubled in order to account for the packaging of the dilluted product of fertiliser/s that is/are applied. Therefore, 6.44E-01 kg of packaging for fertilisers is justified with this exchange.
  properties: dry mass 1 kg, heating value, net 25.01 MJ, wet mass 1 kg, carbon content, fossil 0.825301, price 0.0642 EUR2005
  note on carbon content, fossil: Considering a chemical formula (C2H4)n for polyethylene, carbon content-fossil is calculated to be 0.856286 kg of Carbon per kg of dry mass.
- transport, tractor and trailer, agricultural: 0.0020711 metric ton*km; = 0.0903/0.0436; source Diogo Aparecido Lopes Silva 2013; lognormal variance with pedigree 0.1235, pedigree (2,4,2,3,2)
  Corresponds to the transport of inputs inside the nursery. The exchange of tkm was calculated by dividing the diesel consumption of the system by the diesel consumed to 1 tkm of "transport, tractor and trailer, agricultural" dataset = 0.0436 kg. The original data of the reference gives lower proportional emissions: 0.090309 kg of diesel; 0.27255 of carbon dioxide fossil; 0.0029526 kg of carbon monoxide fossil; 0.0012438 kg COVNM; 0.0017674 kg of sulfur dioxide; and 0.00027147 kg of particulates.
- packaging, for pesticides: 3.072e-5 kg; lognormal variance with pedigree 0.0514, pedigree (4,3,2,5,4)
  Total amount of active substance/s of pesticides needed for the production of eucalyptus seedling, for planting is calculated to be circa 1.54E-02 kg. Pesticide/s used in this dataset is/are: 'glyphosate'. The total amount of active substance/s is doubled in order to account for the packaging of the dilluted product of pesticide/s that is/are applied. Therefore, 3.07E-02 kg of packaging for pesticides is justified with this exchange.
  properties: carbon content, fossil 0.85714, price 0.0642 EUR2005, heating value, net 25.97 MJ, wet mass 1 kg, dry mass 1 kg
- inorganic phosphorus fertiliser, as P2O5: 4.3e-5 kg; source Diogo Aparecido Lopes Silva 2013; lognormal variance with pedigree 0.0041, pedigree (2,4,2,3,2)
  Super simple phosphate is applied as a phosphate fertiliser source.
  properties: dry mass 1 kg, wet mass 1 kg
- wood ash mixture, pure: -0.00156825 kg; name BP_amount_1; source Diogo Aparecido Lopes Silva 2013; lognormal variance with pedigree 0.1306, pedigree (5,5,5,5,4)
  Residue results from wood chips burning inside the greenhouse.
  Emissions from combustion of wood chips were based on USLCI "wood waste, unspecified, combusted in industrial boiler" that considers 50% of moisture content in wood chips and 350 kg/m³ to basic density. The energy efficiency is around 85%.
  production volume 22.9526 kg; = RP_PV * (BP_amount_1 / RP)
    Calculated from production volume of reference product using the relative outputs.
  property price 0 EUR2005; name BP_amount_1_price_EUR2005
  properties: wet mass 1 kg, carbon content, non-fossil 0.012, dry mass 1 kg
- ammonium sulfate: 7.8e-6 kg; source Diogo Aparecido Lopes Silva 2013; lognormal variance with pedigree 0.0041, pedigree (2,4,2,3,2)
  Ammonium sulphate is applied as a nitrogen fertiliser source.
  properties: wet mass 1 kg, dry mass 1 kg
- irrigation: 0.00054078 m3; source Diogo Aparecido Lopes Silva 2013; lognormal variance with pedigree 0.0041, pedigree (2,4,2,3,2)
  Water consumption to irrigate the nursery plus the amount of water used in dilution of fertilisers and pesticides.
  properties: wet mass 1000 kg, dry mass 0.11 kg, water content 9089.91
- potassium chloride: 0.000428965 kg; source Diogo Aparecido Lopes Silva 2013; lognormal variance with pedigree 0.0041, pedigree (2,4,2,3,2)
  The exchange has been updated from 'potassium chloride, as K2O' into 'potassium chloride' and therefore its amount has been scaled (multiplied) from 0.271 kg by 1.5829 kg of 'potassium chloride' per kg of 'potassium chloride, as K2O'. Original comment of the exchange is: Potassium chloride is applied as a potassium fertiliser source.
  properties: wet mass 1 kg, dry mass 1 kg
- extrusion, plastic pipes: 0.0005595 kg
  Represents the extrusion of the polypropylene granulated.
- glyphosate: 1.536e-5 kg; source Diogo Aparecido Lopes Silva 2013; lognormal variance with pedigree 0.0041, pedigree (2,4,2,3,2)
  Input of glyphosate during the tree seedling production.
  properties: carbon content, fossil 0.214286, wet mass 1 kg, dry mass 1 kg
- greenhouse, plastic walls and roof: 0.000333333 m2*year; = (1000/seedlings_m2)*time; lognormal variance with pedigree 0.3035, pedigree (2,4,2,3,2)
  Related to the greenhouse building and disposal. Amount calculated as extrapolation from "tree seedling" global dataset: assumed growing density of 750 seedlings/m2, based on Aldentun (2002).
- wood chips, dry, measured as dry mass: 0.019468 kg; source Diogo Aparecido Lopes Silva 2013; lognormal variance with pedigree 0.0041, pedigree (2,4,2,3,2)
  Wood chips are consumed to heat up the greenhouse.
  properties: carbon content, non-fossil 0.494, heating value, net 9.99 MJ, wet mass 1.4 kg, water content 0.4, dry mass 1 kg
  note on carbon content, non-fossil: C content of dry mass is 0.494 kgC/kg dry wood (ecoinvent v2.2 report 9).
- polypropylene, granulate: 0.0005573 kg; name PP; lognormal variance with pedigree 0.0285, pedigree (2,4,2,3,2)
  Based on technical specifications of Tecnoflora<http://tecnoflora.ind.br/produtos.asp?act=eucalipto4-125>, access 02 mar 2016, this is the amount of polypropylene contained in a tube (container where seedlings are cultivated inside). Volume of polypropylene in the container = 14.76 cm³; density of polypropylene = 0.946 g/cm³, reuse rate = 28 times.
  properties: wet mass 1 kg, carbon content, fossil 0.857143, dry mass 1 kg, heating value, net 32.78 MJ
  note on heating value, net: Value extracted from "treatment of waste polypropylene, open burning"

## Inputs from nature
- Occupation, industrial area [natural resource, land]: 0.000333333 m2*year; = 1000/seedlings_m2*time; lognormal variance with pedigree 0.132, pedigree (5,5,5,5,4)
  Extrapolated from "tree seedling" global dataset: assumed growing density of 750 seedlings/m2, based on Aldentun (2002).
- Transformation, from industrial area [natural resource, land]: 0.00133333 m2; = 1000/seedlings_m2; lognormal variance with pedigree 0.138, pedigree (5,5,5,5,4)
  (same comment as for Occupation, industrial area)
- Transformation, to industrial area [natural resource, land]: 0.00133333 m2; = 1000/seedlings_m2; lognormal variance with pedigree 0.138, pedigree (5,5,5,5,4)
  (same comment as for Occupation, industrial area)
- Carbon dioxide, in air [natural resource, in air]: 1.0868 kg; = 44/12*(ref_cc_nf*RP*dry_mass); lognormal variance with pedigree 0.1306, pedigree (5,5,5,5,4)
  Carbon dioxide captured from the atmosphere.

## Emissions to nature
- Phosphate [water, surface water]: 3.68e-6 kg; source Diogo Aparecido Lopes Silva 2013; lognormal variance with pedigree 0.17, pedigree (5,5,5,5,4)
  Exchange results from the phosphate fertiliser applied.
- Ammonium sulfate [water, unspecified]: 7.34e-6 kg; source Diogo Aparecido Lopes Silva 2013; lognormal variance with pedigree 0.17, pedigree (5,5,5,5,4)
  Exchange results from ammonium sulphate applied.
- Nitrogen oxides [air, unspecified]: 1.7134e-5 kg; = 0.000734+0.0164; source Diogo Aparecido Lopes Silva 2013; lognormal variance with pedigree 0.16, pedigree (5,5,5,5,4)
  The first amount results from ammonium sulfate applied (emissions is calculated acording to PestLCI) and the second results from wood chips burning inside the greenhouse.
  Emissions from combustion of wood chips were based on USLCI "wood waste, unspecified, combusted in industrial boiler" that considers 50% of moisture content in wood chips and 350 kg/m³ to basic density. The energy efficiency is around 85%.
- Carbon dioxide, non-fossil [air, unspecified]: 0.013736 kg; source Diogo Aparecido Lopes Silva 2013; lognormal variance with pedigree 0.1306, pedigree (5,5,5,5,4)
  Exchange results from wood chips burning inside the greenhouse.
  Emissions from combustion of wood chips were based on USLCI "wood waste, unspecified, combusted in industrial boiler" that considers 50% of moisture content in wood chips and 350 kg/m³ to basic density. The energy efficiency is around 85%.
- Glyphosate [air, non-urban air or from high stacks]: 1.417e-5 kg; source Diogo Aparecido Lopes Silva 2013; lognormal variance with pedigree 0.17, pedigree (5,5,5,5,4)
  Exchange results from the glyphosate applied.
- Water [water, unspecified]: 0.000381337 m3; = irrigation - evapotranspiration - (water_wet_mass/1000); lognormal variance with pedigree 0.1306, pedigree (5,5,5,5,4)
  Exchange results from the water input. It was assumed that all water that is not consumed by seedling and is not emitted to air by evapotranspiration goes to water.
  OLIVEIRA, Aline Santana. Otimização do uso da água na produção de mudas clonais de Eucalyptus. 2012. PhD Thesis. Federal University of Viçosa <http://www.tede.ufv.br/tedesimplificado/tde_arquivos/24/TDE-2012-08-28T072515Z-3888/Publico/texto%20completo.pdf>.
- Sulfur dioxide [air, unspecified]: 1.76e-6 kg; source Diogo Aparecido Lopes Silva 2013; lognormal variance with pedigree 0.78, pedigree (5,5,5,5,4)
  (same comment as for Carbon dioxide, non-fossil)
- Ammonia [air, unspecified]: 5.51e-6 kg; source Diogo Aparecido Lopes Silva 2013; lognormal variance with pedigree 0.138, pedigree (5,5,5,5,4)
  Exchange results from the ammonium sulphate applied.
- Carbon monoxide, non-fossil [air, unspecified]: 4.23969e-5 kg; source Diogo Aparecido Lopes Silva 2013; lognormal variance with pedigree 0.78, pedigree (5,5,5,5,4)
  (same comment as for Carbon dioxide, non-fossil)
- Glyphosate [water, unspecified]: 1.73e-6 kg; source Diogo Aparecido Lopes Silva 2013; lognormal variance with pedigree 0.17, pedigree (5,5,5,5,4)
  Exchange results from the glyphosate applied.
- Particulates, < 2.5 um [air, unspecified]: 3.52586e-5 kg; source Diogo Aparecido Lopes Silva 2013; lognormal variance with pedigree 0.43, pedigree (5,5,5,5,4)
  (same comment as for Carbon dioxide, non-fossil)
- Water [air, unspecified]: 0.000159043 m3; name evapotranspiration; = irrigation* e_rate; source Aline Santana de Oliveira 2012; lognormal variance with pedigree 0.1306, pedigree (5,5,5,5,4)
  Exchange results from the water input. It corresponds to the evapotranspiration of seedling during the production process, according to Oliveira (2012).
  OLIVEIRA, Aline Santana. Otimização do uso da água na produção de mudas clonais de Eucalyptus. 2012. PhD Thesis. Federal University of Viçosa <http://www.tede.ufv.br/tedesimplificado/tde_arquivos/24/TDE-2012-08-28T072515Z-3888/Publico/texto%20completo.pdf>.

## Sampling procedure
The majority of data came from a published source "Life cycle assessment of medium density particleboard (MDP) produced in Brazil" (Silva et al., 2013). Additional and necessary data were collected in the literature.

## Extrapolations
This dataset has been extrapolated from year 2020 to the year of the calculation (2021). The uncertainty has been adjusted accordingly.
