# hydroxylamine production

Dataset: EcoSpold 2, unit process
Geography: RER
Time period: 2010-01-01 to 2021-12-31
Technology level: current
Classification: ISIC rev.4 ecoinvent: 2011:Manufacture of basic chemicals
Synonyms: Oxammonium; NH2OH; Nitroxide; HYDROXYAMINE
Scenario: Business-as-Usual
System model: Allocation, cut-off by classification
Share of production covered: 100 %
Generated by: Jürgen Sutter
Database: ecoinvent
isCopyrightProtected: true
accessRestrictedTo: 1

## General comment
This dataset represents the production of hydroxylamine from ammonium nitrite by the Raschig process. Hydroxylamine forms transparent, colourless, odourless crystals. The compound is readily soluble in water, methanol, and ethanol. More than 95 % of hydroxylamine production is used to produce cyclohexanone oxime or caprolactam. Depending on patents and available technology, various producers use either hydrogenation or the Raschig process. The differences lie mainly in the amount of ammonium sulfate produced in oximation. Hydroxylammonium salts are also used in many branches of the chemical industry as a stable form of hydroxylamine because of the ease with which they undergo reactions. Some applications include the following:
1. Chemical industry: a reactant for the production of oximes as intermediates; an oxidizing or reducing agent, depending on pH
2. Paints and coatings: production of special oximes for use in anticreaming agents
3. Pharmaceuticals: production of antibiotics, steroids, tranquilizers, spasmolytics, and antitubercular drugs
4. Photography: stabilizer for developers; additive for colour emulsions
5. Rubber industry: regulator in the polymerization of synthetic rubber; antioxidant for natural rubber; accelerator for the vulcanization of synthetic rubber
6. Soap: auxiliary for refining fats for soap production
7. Plastics: regulator and inhibitor in various polymerizations
8. Metallurgy: additive for surface treatment of steel; auxiliary for metal extraction from electrolysis waste liquor and for reclaiming spoil tips; flotation agent for copper ores
9. Nuclear industry: auxiliary for separation of uranium and plutonium
10.Textiles: auxiliary for specific dyeing processes; fixative for textile dyes; starting material for textile dyes based on isatin and isoxazole
11. Crop protection: starting material for production of insecticides, herbicides, and plant growth regulators
12. Food: intermediate in the production of sweeteners
In the inventory, the raw materials are modelled with a stoechiometric calculation. Emissions are estimated. Energy and water consumptions are approximated based on data from a large chemical factory (Gendorf 2016).
References:
Frischknecht R., Jungbluth N., Althaus H.-J., Doka G., Dones R., Heck T., Hellweg S., Hischier R., Nemecek T., Rebitzer G. and Spielmann M. (2007) Overview and Methodology. Final report ecoinvent v2.0 No. 1. Swiss Centre for Life Cycle Inventories, Dübendorf, CH, retrieved from: www.ecoinvent.org.
Ritz, J., Fuchs, H. and Perryman, H. G. 2000. Hydroxylamine. Ullmann's Encyclopedia of Industrial Chemistry.
Gendorf (2016) Umwelterklärung 2015, Werk Gendorf Industriepark, www.gendorf.de.

## Included activities start
The activity starts when the raw materials enter the process.

## Included activities end
This activity ends with the production of hydroxylamine, including materials, energy uses, infrastructure, and emissions.

## Geography
The data used has no specific geographical origin as it is based on stoechiometric calculations and estimations. Some values are based on data from a large chemical factory located in Germany. These are assumed to be valid for this geography.

## Technology
Industrial production of hydroxylamine is carried out by reduction of the higher oxidation states of nitrogen. For example, nitric oxide or nitric acid can be hydrogenated catalytically to hydroxylamine. For the reduction of nitrous acid to hydroxylamine, sulfurous acid is used. In all cases the product is an aqueous solution of a salt NH2OH • HX (where HX is an acid, e.g., sulfuric or phosphoric acid) or (NH3OH)X, rather than free hydroxylamine. Acid hydrolysis of primary nitroalkanes, with simultaneous formation of the corresponding carboxylic acid, plays only a minor role in the production of hydroxylamine.
Catalytic Hydrogenation of Nitric Oxide
To produce nitric oxide of high purity, ammonia and oxygen are reacted together over a platinum–rhodium catalyst at a temperature above 900 °C, the reaction gas being diluted with enough water or water vapor to bring the mixture below the lower explosion limit.
The byproduct, nitrogen dioxide, and excess oxygen are subsequently hydrogenated over a silver catalyst to nitric oxide and water, respectively.
After condensation and simultaneous recovery of water vapor, nitric oxide is purified in a washer and converted to hydroxylamine by reaction with hydrogen below 50 °C over a suspension of partially poisoned platinum catalyst in sulfuric acid. Small amounts of ammonium sulfate and dinitrogen monoxide are produced as byproducts.
A continuous multistep process, in which the exhaust gases are extensively recirculated, has proved itself industrially. Residual gas, composed of hydrogen, nitrogen, nitric oxide, and dinitrogen monoxide, can be burned for recovery of steam. Explosive gas mixtures can be avoided in the synthesis of hydroxylamine by the choice of suitable gas composition.
Catalytic Hydrogenation of Nitrates
In the hydroxylamine –phosphate –oxime (HPO) process hydroxylamine is produced by hydrogenation of ammonium nitrate solution in phosphoric acid in combination with synthesis of cyclohexanone oxime for production of caprolactam. This process is described in Caprolactam.
The Raschig Process
The Raschig process, sometimes modified, remains an important process for the production of hydroxylamine.
Water, ammonia, and carbon dioxide react together in an absorption column to give a solution of ammonium carbonate, which forms an alkaline solution of ammonium nitrite with nitrogen oxides at low temperature. In a further step, the ammonium nitrite is converted to ammonium hydroxylamine disulfonate with sulfur dioxide. In this process, excess ammonium hydroxylamine disulfonate is recycled. The ammonium hydroxylamine disulfonate solution is drawn off and the salt is hydrolyzed and neutralized to give hydroxylammonium sulfate and ammonium sulfate as products.
Acid Cleavage of Nitroalkanes
Mixtures of nitropropane and nitromethane can be cleaved to hydroxylammonium sulfate and the corresponding carboxylic acid by sulfuric acid at elevated temperature. This process has been used only to a limited extent because of its cost and the limited availability of raw materials.
Production of Crystalline Salts
Catalytic hydrogenation of nitric oxide leads to solutions of hydroxylammonium salts, which, after removal of the hydrogenation catalyst and neutralization with ammonia if required, can be allowed to crystallize. The Raschig process leads initially to an oxime; acid hydrolysis, removal of the ketone, and subsequent crystallization give the solid salt.
With the intregrated hydroxylamine–cyclohexanone oxime process for production of caprolactam, the solid salts are also, in principle, accessible by acid hydrolysis of the oxime.
Reference:
Ritz, J., Fuchs, H. and Perryman, H. G. 2000. Hydroxylamine. Ullmann's Encyclopedia of Industrial Chemistry.

## Time period
Time of publications. Some values are based on data published by the Gendorf factory that were collected between 2011 and 2015. The time period has been adjusted accordingly. For more details, see the comments of the exchanges.

## Parameters
- fraction, water, decarbonised, to air: 0.15 dimensionless; name fraction_WDC_to_air; lognormal variance with pedigree 0.092025, pedigree (4,4,3,2,4)
  The decarbonised water is used as process water, thus the process water fraction to air is used.

## Reference product
- hydroxylamine: 1 kg; name RP; CPC 34150: Amine-function compounds; oxygen-function amino-compounds, except lysine and its esters and salts thereof and […]; By-product classification allocatable product; CAS 7803-49-8
  Hydroxylamine forms transparent, colourless, odourless crystals. The compound is readily soluble in water, methanol, and ethanol. More than 95 % of hydroxylamine production is used to produce cyclohexanone oxime or caprolactam.
  References:
  Frischknecht R., Jungbluth N., Althaus H.-J., Doka G., Dones R., Heck T., Hellweg S., Hischier R., Nemecek T., Rebitzer G. and Spielmann M. (2007) Overview and Methodology. Final report ecoinvent v2.0 No. 1. Swiss Centre for Life Cycle Inventories, Dübendorf, CH, retrieved from: www.ecoinvent.org.
  Ritz, J., Fuchs, H. and Perryman, H. G. 2000. Hydroxylamine. Ullmann's Encyclopedia of Industrial Chemistry.
  production volume 1.392e8 kg; name RP_PV
    Estimated value. The European production volume is extrapolated from the global production volume based on reports from Cefic (European Chemical Industry Council), and the American Chemistry Council.
    According to Cefic (2016) the global sales of chemicals in the year 2015 was 3 534 billion euros. The reported share of sales per region are: EU28 14.7%; Other Europe (Switzerland, Norway, Turkey, Russia and Ukraine) 2.7%; NAFTA (US, Canada and Mexico) 16.5%; Latin America 3.8%; China 39.9%; Japan 3.9%; Republic of Korea 3.2%; India 2.2%; Rest of Asia 11.9%; Rest of the World 1.3%. Cefic also reports the US total sales, which amount to 518.7 billion euros out of the global 3 534 billion euros (14.7%). The same share is reported by the American Chemistry Council (2016), according to which the USA sales account for 15% of global sales for the year 2016.
    According to Lewdorowicz et al. (2006), the world capacity of hydroxylamine is estimated to be 800 000 tons per year. Since no data were found for the European production, this value was scaled accordingly.
    Reference(s):
    Cefic 2016. Facts and figures 2016 of the European chemical industry. Accessible at: http://www.cefic.org/Facts-and-Figures/Chemicals-Industry-Profile/
    American Chemistry Council 2016. Outlook: U.S. Chemical Industry Continues to Outpace Industrial Output; Accounts for More Than One-Half of Construction Spending by Manufacturing Sector. Accessible at: https://www.americanchemistry.com/Media/PressReleasesTranscripts/ACC-news-releases/US-Chemical-Industry-Continues-to-Outpace-Industrial-Output.html
    W. Lewdorowicz, W. Tokarz, P. Piela and P. K. Wrona (2006). Synthesis of Hydroxylamine in the Nitric Oxide — Hydrogen Fuel Cell, Journal of New Materials for Electrochemical Systems 9, 339-343, http://www.groupes.polymtl.ca/jnmes/archives/2006_10/art03.pdf (last accessed on 2017-08-31).
  property heating value, net 11.01 MJ
    LHV is calculated based on the elemental composition of the substance. Based on the CAS number of the substance (007803-49-8), the chemical formula of the substance is found to be: H3NO, (PubChem 2020).
    Reference: Kim, S., Chen, J., Cheng, T., Gindulyte, A., He, J., He, S., Li, Q., Shoemaker, B. A., Thiessen, P. A., Yu, B., Zaslavsky, L., Zhang, J., & Bolton, E. E. (2019). PubChem 2019 update: improved access to chemical data. Nucleic acids research, 47(D1), D1102–D1109. https://doi.org/10.1093/nar/gky1033
  property price 3.66409 EUR2005
    Calculated based on inputs: The price of the product has been calculated as a sum of the values of the material and energy inputs for this product. This value is therefore a rough estimation. It may underestimate the real price since there are additional expenses when producing any product. These expences can include for example labour costs, treatment of waste materials and profit for the producer. Please consider carefully whether this level of data quality is acceptable for your application. Cross-referenced; Calculated value based on data from United Nations Commodity Trade Statistics Database (comtrade.un.org) is 2.28 Euro/kg. UN comtrade category: 282510 Hydrazine and hydroxilamine, inorganic salts. Year 2005. Using exchange rate of 1EURO = 1.209 USD. Average of price of import into 5 main markets (EU, US, JP, IN and CN).
  property carbon content, fossil 0
    Calculated based on molecular structure. See tab 'chemicals'.
  property carbon content 0
    carbon content on a dry matter basis (reserved; not for manual entry)
  properties: water in wet mass 0 kg, dry mass 1 kg, carbon content, non-fossil 0, water content 0, wet mass 1 kg, carbon allocation 0 kg

## Inputs from technosphere
- hydrochloric acid, without water, in 30% solution state: 0.0342 kg; lognormal variance with pedigree 0.1786, pedigree (4,5,5,5,5)
  Stoechiometric calculation: The remaining sodium hydroxide is considered to be neutralized with hydrogen chloride.
  Uncertainty: S
  properties: wet mass 1 kg, dry mass 1 kg, heating value, net 3.32 MJ
- water, decarbonised: 0 kg; name water_decarbonised_input; pedigree (1,1,1,1,1)
  Stoechiometric calculation, with an assumed yield of 97% per reaction step.
  Uncertainty: S
  properties: wet mass 1 kg
- chemical factory, organics: 4e-10 unit; lognormal variance with pedigree 0.309425, pedigree (2,3,2,2,3)
  Calculated based on literature data published by the industry. For this activity, no information was readily available concerning infrastructure and land-use. Therefore, the infrastructure is estimated based on data from two chemical factories, the BASF site of Ludwigshafen and the chemical factory in Gendorf (which are both located in Germany), which produce a wide range of chemical substances. Based on this data, the following assumptions are made: the built area amounts to about 4.2 ha, the plant has an average output of 50'000 t/a and a lifespan of fifty years. The estimated infrastructure amount is therefore 4.00 E-10 units per kg of produced chemical.
  References:
  Althaus H.-J., Chudacoff M., Hischier R., Jungbluth N., Osses M. and Primas A. (2007) Life Cycle Inventories of Chemicals. ecoinvent report No. 8, v2.0. EMPA Dübendorf, Swiss Centre for Life Cycle Inventories, Dübendorf, CH.
  Gendorf (2000) Umwelterklärung 2000, Werk Gendorf. Werk Gendorf, Burgkirchen.
- tap water: 0.026 kg; lognormal variance with pedigree 0.010025, pedigree (2,3,2,2,3)
  Calculated based on literature data published by the industry. This value is a 5-year average of data (2011 - 2015) published by the Gendorf factory (Gendorf, 2016, Umwelterklärung, www.gendorf.de), (Gendorf, 2015, Umwelterklärung, www.gendorf.de), (Gendorf, 2014, Umwelterklärung, www.gendorf.de). The amount of tap water per kg of chemical substance produced is calculated using literature data published by the Gendorf factory based in Germany, which produces a wide range of chemical substances. The factory produced 1657400 tonnes of chemical substances in the year 2015 (Gendorf, 2016, Umwelterklärung, www.gendorf.de) and 740000 tonnes of intermediate products. The amount of tap water consumed in the year 2015 was 55100 tonnes (Gendorf, 2016, Umwelterklärung, www.gendorf.de). The resulting amount of tap water is 0.023 kg/kg of chemical product produced. The 5-year average (2011 - 2015, weighted by production volume) is 0.026 kg/kg.
  properties: wet mass 1 kg, carbon content, fossil 0.00178991, dry mass 0.000337476 kg, water content 2962.17
  note on carbon content, fossil: Bicarbonate content is 2.93 mol/m3. CO2 content is 0.1 mol/m3 (ecoinvent v2.2 report 8, Tab 93.1).
- electricity, medium voltage: 0.416 kWh; lognormal variance with pedigree 0.010025, pedigree (2,3,2,2,3)
  Calculated based on literature data published by the industry. This value is a 5-year average of data (2011 - 2015) published by the Gendorf factory (Gendorf, 2016, Umwelterklärung, www.gendorf.de), (Gendorf, 2015, Umwelterklärung, www.gendorf.de), (Gendorf, 2014, Umwelterklärung, www.gendorf.de). The amount of electricity per kg of chemical substance produced is calculated using literature data published by the Gendorf factory based in Germany, which produces a wide range of chemical substances. The factory produced 1657400 tonnes of chemical substances in the year 2015 (Gendorf, 2016, Umwelterklärung, www.gendorf.de) and 740000 tonnes of intermediate products. The amount of electricity consumed in the year 2015 was 3498800 GJ (Gendorf, 2016, Umwelterklärung, www.gendorf.de). The resulting amount of electricity is 0.406 kWh/kg (year 2015) of chemical substance produced. The 5-year average (2011 - 2015, weighted by production volume) is 0.416 kWh/kg (1.5 MJ/kg). Cross-reference: the amount of chemicals produced (excluding intermediate products) in the EU-28 in the year 2011 was 327 million tonnes (Eurostat, http://ec.europa.eu/eurostat/statistics-explained/index.php/Chemicals_production_statistics, accessed 20170126). The chemical and petrochemical industry sector consumed 2.33 EJ of energy in 2011 (European Commission - Joint Research Centre, 2014, BAT on Common Waste water and Waste Gas Treatment/Management Systems in the Chemical Sector). The resulting energy (both heat and electricity) consumed per kg of chemicals produced in 2011 is thus 7.13 MJ/kg. This is higher than the value calculated using data published by Gendorf – 3.85 MJ/kg, but that is to be expected as the intermediate products are not accounted for.
- sulfur dioxide, liquid: 4.253 kg; name sulfur_dioxide_input; lognormal variance with pedigree 0.1786, pedigree (4,5,5,5,5)
  As there was no data available for the production of hydroxylamine, the values for the consumption of the raw materials are calculated with an assumed yield of 97% per reaction step.
  Uncertainty: S
  properties: wet mass 1 kg, dry mass 1 kg
- ammonium nitrite: 2.125 kg; lognormal variance with pedigree 0.1786, pedigree (4,5,5,5,5)
  (same comment as for sulfur dioxide, liquid)
  properties: wet mass 1 kg, dry mass 1 kg
- sodium hydroxide, without water, in 50% solution state: 1.249 kg; lognormal variance with pedigree 0.1786, pedigree (4,5,5,5,5)
  (same comment as for sulfur dioxide, liquid)
  properties: heating value, net 3.03 MJ, dry mass 1 kg, wet mass 1 kg
- ammonia, anhydrous, liquid: 1.112 kg; name ammonia_input; lognormal variance with pedigree 0.1786, pedigree (4,5,5,5,5)
  (same comment as for sulfur dioxide, liquid)
  properties: dry mass 1 kg, wet mass 1 kg
- nitrogen, liquid: 0.019 kg; lognormal variance with pedigree 0.010025, pedigree (2,3,2,2,3)
  Calculated based on literature data published by the industry. This value is a 5-year average of data (2011 - 2015) published by the Gendorf factory (Gendorf, 2016, Umwelterklärung, www.gendorf.de), (Gendorf, 2015, Umwelterklärung, www.gendorf.de), (Gendorf, 2014, Umwelterklärung, www.gendorf.de). The amount of nitrogen used per kg of chemical substance produced is calculated using literature data published by the Gendorf factory based in Germany, which produces a wide range of chemical substances. The factory produced 1657400 tonnes of chemical substances in the year 2015 (Gendorf, 2016, Umwelterklärung, www.gendorf.de) and 740000 tonnes of intermediate products. The reported amount of nitrogen used in 2015 was 33512400 Nm3 (Gendorf, 2016, Umwelterklärung, www.gendorf.de). One Nm3 of nitrogen is equal to 1.2506 kg. The resulting amount of nitrogen - the 5-year average (2011 - 2015, weighted by production volume) is 0.019 kg/kg. Nitrogen is mainly used during the production of chemicals for 'blanketing', which is the process of applying gas to the vapour space of a container or vessel in order to control its composition.
  properties: wet mass 1 kg, dry mass 1 kg
- wastewater, average: 0 m3; name BP_wastewater_average; pedigree (1,1,1,1,1)
  Calculated based on literature data published by the industry. This value is a 5-year average of data (2011 - 2015) published by the Gendorf factory (Gendorf, 2016, Umwelterklärung, www.gendorf.de), (Gendorf, 2015, Umwelterklärung, www.gendorf.de), (Gendorf, 2014, Umwelterklärung, www.gendorf.de). The amount of wastewater (which is later on treated in the municipal WWTP) per kg of chemical substance produced is calculated using literature data published by the Gendorf factory based in Germany, which produces a wide range of chemical substances. The factory produced 1657400 tonnes of chemical substances in the year 2015 (Gendorf, 2016, Umwelterklärung, www.gendorf.de) and 740000 tonnes of intermediate products. The amount of wastewater which is later on treated in the municipal WWTP in the year 2015 was 1200 tonnes (Gendorf, 2016, Umwelterklärung, www.gendorf.de). The resulting amount of wastewater is 2.7E-06 m3/kg of chemical product produced.
  production volume 0 m3
    Calculated from the production volume of hydroxylamine in proportion to the respective output amounts.
  property price 0 EUR2005; name BP_wastewater_average_price_EUR2005
  properties: wet mass 1000 kg, water content 2882.2, dry mass 0.346837 kg, carbon content, non-fossil 0.194039
  note on carbon content, non-fossil: 0.0673 kg TOC/m3 (Tab A.17, ecoinvent v2.2 report 13_I). TOC was considered as Total Carbon.
- heat, from steam, in chemical industry: 0.2 MJ; lognormal variance with pedigree 0.010025, pedigree (2,3,2,2,3)
  Calculated based on literature data published by the industry. This value is a 5-year average of data (2011 - 2015) published by the Gendorf factory (Gendorf, 2016, Umwelterklärung, www.gendorf.de), (Gendorf, 2015, Umwelterklärung, www.gendorf.de), (Gendorf, 2014, Umwelterklärung, www.gendorf.de). The amount of heat used per kg of chemical substance produced is calculated using literature data published by the Gendorf factory based in Germany, which produces a wide range of chemical substances. The factory produced 1657400 tonnes of chemical substances in the year 2015 (Gendorf, 2016, Umwelterklärung, www.gendorf.de) and 740000 tonnes of intermediate products. The amount of heat in the year 2015 was 523500 GJ (Gendorf, 2016, Umwelterklärung, www.gendorf.de) of which 90% was obtained from natural gas and 10% from steam. The resulting amount of heat from steam is 0.22 MJ/kg of chemical product produced. The 5-year average (2011 - 2015, weighted by production volume) is 0.20 MJ/kg. Cross-reference: the amount of chemicals produced (excluding intermediate products) in the EU-28 in the year 2011 was 327 million tonnes (Eurostat, http://ec.europa.eu/eurostat/statistics-explained/index.php/Chemicals_production_statistics, accessed 20170126). The chemical and petrochemical industry sector consumed 2.33 EJ of energy in 2011 (European Commission - Joint Research Centre, 2014, BAT on Common Waste water and Waste Gas Treatment/Management Systems in the Chemical Sector). The resulting energy (both heat and electricity) consumed per kg of chemicals produced in 2011 is thus 7.13 MJ/kg. This is higher than the value calculated using data published by Gendorf – 3.85 MJ/kg, but that is to be expected as the intermediate products are not accounted for.
  properties: heating value, net 1 MJ
- inert waste, for final disposal: -8.416 kg; name BP_inert_waste_for_final_disposal; lognormal variance with pedigree 0.0257, pedigree (4,5,2,1,1)
  The produced ammonium sulfate and sodium sulfate and the remaining amount of unreacted hydroxylamine sulfate are assumed to be disposed as inert waste.
  Uncertainty: S
  production volume 8.416 kg; = RP_PV*BP_inert_waste_for_final_disposal/ABS(RP_PV)
    (same comment as for wastewater, average)
  property price 0 EUR2005; name BP_inert_waste_for_final_d_price_EUR2005
  properties: wet mass 1 kg, water content 0.00502513, dry mass 0.995 kg
- heat, district or industrial, natural gas: 2.15 MJ; lognormal variance with pedigree 0.010025, pedigree (2,3,2,2,3)
  Calculated based on literature data published by the industry. This value is a 5-year average of data (2011 - 2015) published by the Gendorf factory (Gendorf, 2016, Umwelterklärung, www.gendorf.de), (Gendorf, 2015, Umwelterklärung, www.gendorf.de), (Gendorf, 2014, Umwelterklärung, www.gendorf.de). The amount of heat used per kg of chemical substance produced is calculated using literature data published by the Gendorf factory based in Germany, which produces a wide range of chemical substances. The factory produced 1657400 tonnes of chemical substances in the year 2015 (Gendorf, 2016, Umwelterklärung, www.gendorf.de) and 740000 tonnes of intermediate products. The amount of heat in the year 2015 was 523500 GJ (Gendorf, 2016, Umwelterklärung, www.gendorf.de) of which 90% was obtained from natural gas and 10% from steam. The resulting amount of heat from natural gas is 2.02 MJ/kg of chemical product produced. The 5-year average (2011 - 2015, weighted by production volume) is 2.15 MJ/kg. Cross-reference: the amount of chemicals produced (excluding intermediate products) in the EU-28 in the year 2011 was 327 million tonnes (Eurostat, http://ec.europa.eu/eurostat/statistics-explained/index.php/Chemicals_production_statistics, accessed 20170126). The chemical and petrochemical industry sector consumed 2.33 EJ of energy in 2011 (European Commission - Joint Research Centre, 2014, BAT on Common Waste water and Waste Gas Treatment/Management Systems in the Chemical Sector). The resulting energy (both heat and electricity) consumed per kg of chemicals produced in 2011 is thus 7.13 MJ/kg. This is higher than the value calculated using data published by Gendorf – 3.85 MJ/kg, but that is to be expected as the intermediate products are not accounted for.
  properties: heating value, net 1 MJ
- water, decarbonised: 0.923906, 0.186255, 0.612442, 0.000586652, 0.0338104 kg (5 entries); lognormal variance with pedigree 0.1786, pedigree (4,5,5,5,5)
  Stoechiometric calculation, with an assumed yield of 97% per reaction step.
  Uncertainty: S
- wastewater, average: -2.43642e-6, -2.63575e-7 m3 (2 entries); lognormal variance with pedigree 0.010025, pedigree (2,3,2,2,3)
  (same comment as for wastewater, average)
  production volume 2.7e-6 m3

## Inputs from nature
- Water, river [natural resource, in water]: 0.00086 m3; lognormal variance with pedigree 0.010025, pedigree (2,3,2,2,3)
  Calculated based on literature data published by the industry. This value is a 5-year average of data (2011 - 2015) published by the Gendorf factory (Gendorf, 2016, Umwelterklärung, www.gendorf.de), (Gendorf, 2015, Umwelterklärung, www.gendorf.de), (Gendorf, 2014, Umwelterklärung, www.gendorf.de). The amount of groundwater and surface water (river) extracted per kg of chemical substance produced is calculated using literature data published by the Gendorf factory based in Germany, which produces a wide range of chemical substances. The factory produced 1657400 tonnes of chemical substances in the year 2015 (Gendorf, 2016, Umwelterklärung, www.gendorf.de) and 740000 tonnes of intermediate products. The amount of groundwater and surface water (river) extracted in the year 2015 was 19950000 tonnes and 21488100 tonnes respectively (Gendorf, 2016, Umwelterklärung, www.gendorf.de).
- Water, cooling, unspecified natural origin [natural resource, in water]: 0.0164 m3; lognormal variance with pedigree 0.010025, pedigree (2,3,2,2,3)
  Calculated based on literature data published by the industry. This value is a 5-year average of data (2011 - 2015) published by the Gendorf factory (Gendorf, 2016, Umwelterklärung, www.gendorf.de), (Gendorf, 2015, Umwelterklärung, www.gendorf.de), (Gendorf, 2014, Umwelterklärung, www.gendorf.de). The amount of water for cooling extracted per kg of chemical substance produced is calculated using literature data published by the Gendorf factory based in Germany, which produces a wide range of chemical substances. The factory produced 1657400 tonnes of chemical substances in the year 2015 (Gendorf, 2016, Umwelterklärung, www.gendorf.de) and 740000 tonnes of intermediate products. The reported amounts of water extracted as groundwater and surface water (river) are assumed to be used entirely for cooling purposes.
- Water, well, in ground [natural resource, in water]: 0.00083 m3; lognormal variance with pedigree 0.010025, pedigree (2,3,2,2,3)
  (same comment as for Water, river)

## Emissions to nature
- Nitrogen [air, unspecified]: 0.019 kg; lognormal variance with pedigree 0.010025, pedigree (2,3,2,2,3)
  Calculated value. The amount of nitrogen released to air is equal to the amount of nitrogen entering the activity.
- Water [air, unspecified]: 0.00148179 m3; = 0.0014 + fraction_WDC_to_air*0.5453/1000; lognormal variance with pedigree 0.010025, pedigree (2,3,2,2,3)
  Calculated to ensure the water balance. In general, in the case of recirculating cooling systems, 77% of the water input evaporates to air. In case of once-through cooling systems, 4% of the water input evaporates to air. The process water has in the chemical industry an average evaporation rate of 20.5%. In the specific case of the Gendorf factory, the calculated evaporation rate based on the data published is 6.3%. This matches the qualitative information, that the majority of the cooling systems in Gendorf are once-through and that the amount of cooling water used is significantly higher than the amount of process water used (Gendorf, 2016, Umwelterklärung, www.gendorf.de).
  In addition, the chemical reactions release some water (0.5453 kg) of which 15% is assumed to be evaporated.
  property fraction, origin: unspecified 0.993322; name fraction_origin_unspecified
  property fraction, origin: fresh water 0.00667776; name fraction_origin_fresh_water
  property fraction, origin: salt water 0; name fraction_origin_salt_water
- Ammonia [air, urban air close to ground]: 0.002224 kg; = ammonia_input * 0.002; lognormal variance with pedigree 0.1786, pedigree (4,5,5,5,5)
  There was no data available on process emissions to air for the hydroxylamine production. As an approximation, the air emissions occurring from the purge vent, the distillation vent and fugitive emission sources were estimated to be 0.2% of the ammonia and sulfur dioxide input.
  Uncertainty: E
- Nitrate [water, surface water]: 0.06175 kg; lognormal variance with pedigree 0.1786, pedigree (4,5,5,5,5)
  The remaining amount of unreacted ammonium nitrite is assumed to leave the production process with the wastewater. Furthermore, it was assumed that this wastewater is treated in an internal wastewater plant (50% removal efficiency). The ammonium nitrite is calculated as nitrate emission.
  Uncertainty: E
- Sulfur dioxide [air, urban air close to ground]: 0.008506 kg; = sulfur_dioxide_input * 0.002; lognormal variance with pedigree 0.1786, pedigree (4,5,5,5,5)
  (same comment as for Ammonia)
- Chloride [water, surface water]: 0.03322 kg; lognormal variance with pedigree 0.3184, pedigree (4,5,5,5,5)
  The emissions of sodium and chloride are calculated from the sodium hydroxide and hydrogen chloride input.
  Uncertainty: E
- Sodium, ion [water, surface water]: 0.02154 kg; lognormal variance with pedigree 0.6642, pedigree (4,5,5,5,5)
  (same comment as for Chloride)
- Water [water, unspecified]: 0.0171635 m3; = 0.0167 + (1-fraction_WDC_to_air)*0.5453/1000; lognormal variance with pedigree 0.010025, pedigree (2,3,2,2,3)
  Calculated based on literature data published by the industry (Gendorf, 2016, Umwelterklärung, www.gendorf.de). The amount of water released back to the environment consists of the amount of process water treated in the internal WWTP and then released back to the environment and the amount of cooling water released back to the environment.
  In addition, the chemical reactions release some water (0.5453 kg) of which 85% is assumed to be released into water.
  property fraction, origin: salt water 0; name fraction_origin_salt_water_Ww
  property fraction, origin: unspecified 0.993322; name fraction_origin_unspecified_Ww
  property fraction, origin: fresh water 0.00667776; name fraction_origin_fresh_water_Ww
- Ammonium, ion [water, surface water]: 0.01557 kg; lognormal variance with pedigree 0.1786, pedigree (4,5,5,5,5)
  The remaining amount of unreacted ammonium is assumed to leave the production process with the wastewater. Furthermore, it was assumed that this wastewater is treated in an internal wastewater plant. The removal efficiency for ammonium is assumed to be 50%.
  Uncertainty: E

## Sampling procedure
Literature data and stoechiometric calculations. Some values are calculated based on data from a large chemical factory located in Germany. For more details, see the comments of the exchanges.

## Extrapolations
This dataset has been extrapolated from year 2020 to the year of the calculation (2021). The uncertainty has been adjusted accordingly.

## Review by Emilia Moreno Ruiz 2017-09-01
This dataset was additionally reviewed in a separate review process by Eric Johnson of Atlantic Consulting as well as Emilia Moreno Ruiz and Gregor Wernet of ecoinvent.
