# electric motor production, vehicle

Dataset: EcoSpold 2, unit process
Geography: RER
Time period: 2000-01-01 to 2021-12-31
Technology level: current
Classification: ISIC rev.4 ecoinvent: 2710:Manufacture of electric motors, generators, transformers and electricity di
Classification: EcoSpold01Categories: transport systems/road
Tags: ConvertedDataset
Scenario: Business-as-Usual
System model: Allocation, cut-off by classification
Generated by: Marianne Leuenberger
Published in: Spielmann M. 2007
Database: ecoinvent
isCopyrightProtected: true
accessRestrictedTo: 1

## General comment
The module reflects an average electric motor used in BEV or HEV
[This dataset was already contained in the ecoinvent database version 2. It was not individually updated during the transfer to ecoinvent version 3. Life Cycle Impact Assessment results may still have changed, as they are affected by changes in the supply chain, i.e. in other datasets. This dataset was generated following the ecoinvent quality guidelines for version 2. It may have been subject to central changes described in the ecoinvent version 3 change report (http://www.ecoinvent.org/database/ecoinvent-version-3/reports-of-changes/), and the results of the central updates were reviewed extensively. The changes added e.g. consistent water flows and other information throughout the database. The documentation of this dataset can be found in the ecoinvent reports of version 2, which are still available via the ecoinvent website. The change report linked above covers all central changes that were made during the conversion process.]

## Included activities end
This data set includes the material used for the production of 1 kg electric motor for a electric vehicle

## Geography
Data valid for average electric motor

## Technology
Production of electric motor for BEV or HEV

## Reference product
- electric motor, vehicle: 1 kg; CPC 461: Electric motors, generators and transformers, and parts thereof; By-product classification allocatable product
  EcoSpold01Location=RER
  production volume 1.32237 kg
    This is a placeholder value that does not reflect real-world production volumes. This dataset does not currently require a real-world production volume to work in the database framework, and no actual data were collected yet. This has no negative effect on the results of the ecoinvent database. The placeholder value of this activity was scaled according to the nominal GDP of 2005 (source: United Nations, http://data.un.org/Glossary.aspx?q=GDP+%28current+US%24%29, accessed 20130726) to reflect an appropriate share of the global production volume, which is also a placeholder value.
  property carbon content, fossil 0.00375
    Calculated as the addition of C contents in the product composition
  property carbon content, non-fossil 0
    Calculated as the addition of C contents in the product composition
  property price 12.9 EUR2005
    Calculated value based on data from United Nations Commodity Trade Statistics Database (comtrade.un.org). UN comtrade category: 850132 DC motors, DC generators, of na output 0.75-75kW. Year 2005. Using exchange rate of 1EURO = 1.209 USD. Average of price of import into 5 main markets (EU, US, JP, IN and CN).
  property carbon content 0.00375
    carbon content on a dry matter basis (reserved; not for manual entry)
  properties: water in wet mass 0 kg, dry mass 1 kg, wet mass 1 kg, water content 0, carbon allocation 0.00375 kg

## Inputs from technosphere
All rows: lognormal variance with pedigree 0.076625, pedigree (4,3,5,2,3)
- aluminium, cast alloy: 0.0528 kg
  Roeder, 2001
  EcoSpold01Location=RER
  Uncertainty: Roeder, 2001
  properties: dry mass 1 kg, wet mass 1 kg
- steel, low-alloyed, hot rolled: 0.75 kg
  EcoSpold01Location=RER
  Roeder, 2001
  Uncertainty: Roeder, 2001
  properties: carbon content, fossil 0.005, wet mass 1 kg, dry mass 1 kg
  note on carbon content, fossil: Low alloyed steel composition given in Tab. 3.2 ecoinvent v2.2 report 10_partII. Steel assumed to have a C content of 0.5%
- sheet rolling, steel: 0.75 kg
  Assumption
  EcoSpold01Location=RER
  Uncertainty: assumption
- aluminium, wrought alloy: 0.1122 kg
  EcoSpold01Location=RER
  Roeder, 2001
  Uncertainty: Roeder, 2001
  properties: wet mass 1 kg, dry mass 1 kg
- copper, cathode: 0.09 kg
  Roeder, 2001
  EcoSpold01Location=RER
  Uncertainty: Roeder, 2001
  properties: wet mass 1 kg, dry mass 1 kg
- wire drawing, copper: 0.09 kg
  Assumption
  EcoSpold01Location=RER
  Uncertainty: assumption

## Sampling procedure
Literature

## Extrapolations
This dataset has been extrapolated from year 2009 to the year of the calculation (2021). The uncertainty has been adjusted accordingly.

## Review by Christian Bauer 2010-02-09
09.02.2010
passed
C:\Dokumente und Einstellungen\Marianne\Eigene Dateien\Projekte\277_Mobitool\Ecoinvent\Review\Upload 1\[Ecospold_ElectricMotor-v1.1.xls]X-Process
