# cement production, alternative constituents 45%

Dataset: EcoSpold 2, unit process
Geography: CO
Time period: 2014-01-01 to 2021-12-31
Technology level: current
Classification: ISIC rev.4 ecoinvent: 2394:Manufacture of cement, lime and plaster
Synonyms: General Use according to NTC 121/ASTM C1157; Uso General according to NTC 121/ASTM C1157
Tags: combined production
Scenario: Business-as-Usual
System model: Allocation, cut-off by classification
Share of production covered: 81 %
Generated by: Simon Gmünder
Published in: Silva, F. B. 2017
Database: ecoinvent
isCopyrightProtected: true
accessRestrictedTo: 1

## General comment
The dataset describes the production of cement type general use (uso general) according to technical norm NTC 121 (Icontec, 2014), which is based on the standard specification for hydraulic cement (ASTM standard n° C1157).
The weight composition of the cement is: 55% clinker, 2.2% gypsum, 14.3% blast funrace slag, 14.3% fly ash and 14.3% limestone (rounded numbers).
The cement density is 3g/ml and the resitance is 24-30MPa according to the NTC 220 (Cemex and Argos).

## Included activities start
This activity starts with the reception of raw materials.

## Included activities end
This activity ends with the cement produced in the cement mill. The dataset includes packaging in cement bags. No production waste is included.

## Geography
Representative production of cement type GU in Colombia. Data based from main cement producers and personal comunications with local experts.

## Technology
Represent the current technology for cement production in Colombia.

## Time period
The production volume of 2016 is considered. Data from sustainability reports of 2014 to 2017 is used.

## Reference product
- hard coal ash: 0 kg; name ash; By-product classification Waste; CPC 39: Wastes or scraps
  Calculated Value. An equal repartition by mass of principal supplementary cementitious used in Colombia (clay, slag and fly ash). (Dir. Lascarro, 2017; Ing. Pimentel, 2017).The mathematical relation used to calculate the value is: -(1-clinker-gypsum)/3
  production volume 0 kg
    Calculated from production volume of reference product using the relative outputs.
  property price 0 EUR2005; name ash_price_EUR2005
    Waste products are assigned a price of zero as they are assumed to require further treatment.
  property carbon content 0
    carbon content on a dry matter basis (reserved; not for manual entry)
  properties: carbon content, fossil 0, wet mass 1 kg, dry mass 1 kg, carbon content, non-fossil 0, water in wet mass 0 kg, water content 0, carbon allocation 0 kg
- cement, alternative constituents 45%: 1 kg; name cement; CPC 374: Plaster, lime and cement; By-product classification allocatable product
  Refernce product with a density between 3-3.15 g/ml.
  production volume 9.0757e9 kg; name cement_PV
    Calculated value.
    In 2016, the total production of cement for Colombia was 12’100’937 tons (DANE, 2017). The most produced cements in Colombia are type GU (general use), with a market share of 75% and type ART (early strength), with a market share of 24%.
    DANE. (2017). Estadísticas de cemento gris 2017.
  property price 0.0615 EUR2005; name cement_price_EUR2005
    2005 import and export prices (total trades (USD) divided by total weight (kg) in China, India, USA, Japan, Russia and Europe, major producers and consumers (http://www.cementchina.net/freport/showfre.asp?id=749) from UN Commodity Trade Statistics Database (http://data.un.org/Explorer.aspxDatabase [Accessed 2 July 2010]). Commodity: Cement (portland, aluminious, slag or hydraulic)
  property water content 0; name cement_water_content
  property carbon content, fossil 0; name cement_C_content_fossil
    fossil carbon content on a dry matter basis
  property dry mass 1 kg; name cement_DM
  property water in wet mass 0 kg; name cement_WWM
  property wet mass 1 kg; name cement_WM
  property carbon content, non-fossil 0; name cement_C_content_non_fossil
    biogene carbon content on a dry matter basis
  property carbon content 0
    carbon content on a dry matter basis (reserved; not for manual entry)
  properties: carbon allocation 0 kg

## Inputs from technosphere
- clay: 0.142667 kg; = 0.142666666666667*cement; lognormal variance with pedigree 0.0052, pedigree (3,3,3,1,1)
  Calculated Value. An equal repartition by mass of principal supplementary cementitious used in Colombia (clay, slag and fly ash). (Dir. Lascarro, 2017; Ing. Pimentel, 2017).The mathematical relation used to calculate the value is: -(1-clinker-gypsum)/3
  Uncertainty: Variance of log-transformed data was taken from ecoinvent report no 1, table 10.3. Value represents demand of products, electricity etc. for input/output group c.
  properties: water content 0.0362694, dry mass 0.965 kg, wet mass 1 kg
- electricity, medium voltage: 0.037 kWh; name electricity; = 0.037*cement; lognormal variance with pedigree 0.0113, pedigree (3,3,4,3,1)
  Literature value. the electricity considered for cement production is 37kWh per ton of cement, which is aligned with the current ecoinvent datasets.
  Source: Boesch & Hellweg 2010, 2010, Boesch, M.E., Hellweg, S., Identifying Improvement Potentials in Cement Production with Life Cycle Assessment, Environmental Science & Technology, 44, 23, 9143-9149, 1 - Article, Supporting information is available via http://pubs.acs.org (accessed on october 15th 2017)
  Uncertainty: Variance of log-transformed data was taken from ecoinvent report no 1, table 10.3. Value represents demand of products, electricity etc. for input/output group c.
- ethylene glycol: 0.00031 kg; = 0.00031*cement; source Kellenberger D. 2007; lognormal variance with pedigree 0.0132, pedigree (3,3,4,5,1)
  Literature value. Ancillary product for grinding. As no data from Colombian producer was founded, the value of Global datastet (cement production, alternative constituents 21-35%) has been used.
  Source: 2007, Kellenberger D., Althaus H.-J., Jungbluth N., Künniger T., Life Cycle Inventories of Building Products, Final report ecoinvent data v2.0, 7, Dübendorf, CH, Swiss Centre for LCI, Empa - TSL, 3 - SeparatePublication, CD-ROM (Accessed on october 15th 2017)
  Uncertainty: Variance of log-transformed data was taken from ecoinvent report no 1, table 10.3. Value represents demand of products, electricity etc. for input/output group c.
  properties: carbon content, fossil 0.387097, dry mass 1 kg, wet mass 1 kg, heating value, net 23.44 MJ
- clinker: 0.55 kg; = 0.55*cement+ash*0; source Nicholas Myers 2017; lognormal variance with pedigree 0.0052, pedigree (3,3,3,1,1)
  Estimated value.The cement type GU, represents 75% of sales and have an average clinker amount of 55% (Ing. Pimentel, 2017).
  Uncertainty: Variance of log-transformed data was taken from ecoinvent report no 1, table 10.3. Value represents demand of products, electricity etc. for input/output group c.
  properties: wet mass 1 kg, dry mass 1 kg
- kraft paper: 0.00031 kg; = 0.00031*cement; lognormal variance with pedigree 0.0132, pedigree (3,3,4,5,1)
  Calculated value. The cement used in the self-construction sector is typically packaged in kraft paper bags. The most common cement bags in Colombia weight 50 kg. The kraft paper weight is 92g/m2.
  Uncertainty: Variance of log-transformed data was taken from ecoinvent report no 1, table 10.3. Value represents demand of products, electricity etc. for input/output group c.
  properties: water content 0.0582011, wet mass 1 kg, carbon content, non-fossil 0.41662, carbon content, fossil 0.0020219, dry mass 0.945 kg, heating value, net 14.11 MJ
  note on carbon content, non-fossil: Biogenic C content was calculated after biogenic C contents of chemicals used in the production of the paper (in Tab 9.4 ecoinvent v2.2 report 11_III, part 9). The cellulose content in 1 kg of paper (on a wet mas basis) was estimated as (1-chemical content), C content of cellulose was considered 0.44 kgC/kg dry mass (ecoinvent v2.2 report, n 15a, pg 40)
  note on carbon content, fossil: Fossil C content was calculated after fossil C contents of chemicals used in the production of the paper (in Tab 9.4 ecoinvent v2.2 report 11_III, part 9).
- ground granulated blast furnace slag: 0.142667 kg; name GGBFS; = 0.142666666666667*cement; source Manuel Lascarro 2017; lognormal variance with pedigree 0.0052, pedigree (3,3,3,1,1)
  (same comment as for clay)
  properties: dry mass 0.99 kg, wet mass 1 kg
- gypsum, mineral: 0.022 kg; name gypsum; = 0.022*cement; source Manuel Lascarro 2017; lognormal variance with pedigree 0.0052, pedigree (3,3,3,1,1)
  Literature Value. 4% of gypsum per clinker mass is used according to the Colombian cement association, ASOCRETO. The mathematical relation used to calculate the value is: clinker*0.04* cement
  Uncertainty: Variance of log-transformed data was taken from ecoinvent report no 1, table 10.3. Value represents demand of products, electricity etc. for input/output group c.
  properties: dry mass 1 kg, wet mass 1 kg
- cement factory: 5.36e-11 unit; = 0.0000000000536*cement; lognormal variance with pedigree 0.0146, pedigree (3,5,3,5,1)
  Literature Value. From the global dataset " alternative constituents 21-35%" (retrieved 2018/01/04)
  Uncertainty: Variance of log-transformed data was taken from ecoinvent report no 1, table 10.3. Value represents demand of products, electricity etc. for input/output group c.
- steel, low-alloyed: 0.00011 kg; name steel; = 0.00011*cement; source Kellenberger D. 2007; lognormal variance with pedigree 0.0146, pedigree (3,5,3,5,1)
  Literature value. As no data from Colombian producer was founded, the value of Global datastet (cement production, alternative constituents 21-35%) has been used.
  Source: 2007, Kellenberger D., Althaus H.-J., Jungbluth N., Künniger T., Life Cycle Inventories of Building Products, Final report ecoinvent data v2.0, 7, Dübendorf, CH, Swiss Centre for LCI, Empa - TSL, 3 - SeparatePublication, CD-ROM (Accessed on october 15th 2017)
  Uncertainty: Variance of log-transformed data was taken from ecoinvent report no 1, table 10.3. Value represents demand of products, electricity etc. for input/output group c.
  properties: carbon content, fossil 0.005, dry mass 1 kg, wet mass 1 kg

## Sampling procedure
The data is compiled based on different data sources, including sustainability reports, literature values and expert judgements. Most data is derived from sustainability reports of the three principal concrete producers of Colombia (Argos, Cemex and Holcim). The data is checked, completed and validated by local experts. In total, it is estimated that the data considered is representative for 81% of cement production in all the country (market share of the three main cement producers).
Unit flows were calculated by dividing the amounts of inputs and outputs by the total clinker production in mass.
The amount of the exchanges were calculated considering the arithmetic [weighted] average of the sample. No conversion to the geometric mean of the lognormal distribution was done, for consistency reasons with other Ecoinvent datasets.

## Extrapolations
The life cycle inventory model is based on the PCR for cement and concrete (Environdec, 2010), as well as on the LCA core model of the WBCSD-CSI EPD tool (Dauriat et al., 2014).

Dauriat, A., Porté, C., Delerce, C., Guignard, C., & Adams, A. (2014). WBCSD CSI tool for EPDs of concrete and cement: LCA core model and database report.

Environdec. (2010). Product category rules of UN CPC 3744 Cement.
