# furnace production, logs, hardwood storage area, 6kW

Dataset: EcoSpold 2, unit process
Geography: RoW
Time period: 2000-01-01 to 2021-12-31
Technology level: current
Classification: EcoSpold01Categories: wood energy/heating systems
Classification: ISIC rev.4 ecoinvent: 2815:Manufacture of ovens, furnaces and furnace burners
Tags: ConvertedDataset
Scenario: Business-as-Usual
System model: Allocation, cut-off by classification
Generated by: Christian Bauer
Published in: Bauer, C. 2007
Database: ecoinvent
isCopyrightProtected: true
accessRestrictedTo: 1

## General comment
Assumed lifetime: furnace 20 years; chimney 80 years. Operation time 1000 h/a.
[This dataset was already contained in the ecoinvent database version 2. It was not individually updated during the transfer to ecoinvent version 3. Life Cycle Impact Assessment results may still have changed, as they are affected by changes in the supply chain, i.e. in other datasets. This dataset was generated following the ecoinvent quality guidelines for version 2. It may have been subject to central changes described in the ecoinvent version 3 change report (http://www.ecoinvent.org/database/ecoinvent-version-3/reports-of-changes/), and the results of the central updates were reviewed extensively. The changes added e.g. consistent water flows and other information throughout the database. The documentation of this dataset can be found in the ecoinvent reports of version 2, which are still available via the ecoinvent website. The change report linked above covers all central changes that were made during the conversion process.]

## Included activities end
Includes the most important materials used for the fabrication of the furnace and the chimney: steel, concrete, rock wool, lubricating oil. Also includes the surface for furnace and wood storage, transports, and energy used for the construction and the disposal of the furnace.

## Geography
Could be used for central European conditions.

## Technology
Boiler of average technology available on market.

## Time period
Some data used to calculate averages are from the second half of the 1990´s.

## Reference product
- furnace, logs, hardwood storage area, 6kW: 1 unit; name furnace_RP; By-product classification allocatable product; CPC 43420: Industrial or laboratory furnaces and ovens, except non-electric bakery ovens; other industrial or laboratory […]
  EcoSpold01Location=CH
  production volume 3.96633 unit; name furnace_RP_PV
    This is a placeholder value that does not reflect real-world production volumes. This dataset does not currently require a real-world production volume to work in the database framework, and no actual data were collected yet. This has no negative effect on the results of the ecoinvent database.
  property price 724 EUR2005
    UNDATA "Industrial furnace, oven, incinerator non-electric ne" (http://data.un.org/Data.aspx?q=industrial+furnace&d=ComTrade&f=_l1Code%3a84%3bcmdCode%3a841780; EU I/E average price is 6.133EUR/kg). The prices are per kg and converted to per unit by summed weight of material concumption of the process in existing ecoinvent documentation from ecoinvent v.2.2 (about 108kg). For weight of concrete, it is separately added for from price per m3 used of each unit (0.059 m3; 'furnace production, logs, hardwood storage area, 30kW')and apply EU&DK input output database 2003 (0.08 Euro2003/kg DS; density 2380 kg/m3<#concrete production, normal' in ecoinvent).

## Inputs from technosphere
- waste mineral wool, for final disposal: 0 kg; name waste_wool_byP; pedigree (1,1,1,1,1)
  EcoSpold01Location=CH
  own assumption
  production volume 0 kg
    Calculated from the production volume of furnace, logs, hardwood storage area, 6kW in proportion to the respective output amounts.
  property price 0 EUR2005; name waste_wool_byP_price_EUR2005
  properties: wet mass 1 kg, dry mass 1 kg
- drawing of pipe, steel: 0.875 kg; lognormal variance with pedigree 0.162, pedigree (1,1,5,5,1)
  EcoSpold01Location=RER
  own assumption
- stone wool: 1.75 kg; lognormal variance with pedigree 0.062, pedigree (1,1,5,5,1)
  own assumption
  EcoSpold01Location=CH
  properties: dry mass 1 kg, carbon content, fossil 0.015401, wet mass 1 kg
  note on carbon content, fossil: The chemical composition of the glass fibres used in the rock wool production is similar to the composition of naturally cooled volcano basalt and has a composition listed in Tab. 3.1 and 3.2 in ecoinvent v2.2 report 16, part XIV. Rock wool contains: a minimum of 96% mineral fibres,between 0.5 and 3.0 weight percent of phenolic resin depending on the specific product characteristics, and about 0.2 percent mineral oil (ecoinvent v2.2 report 16, part XIV). An average composition of 1.8% phenolic resin, 0.2% mineral oil, and 98% mineral fibres has been assumed and used to calculate C content of the rock wool
- electricity, low voltage: 0 kWh; pedigree (1,1,1,1,1)
  EcoSpold01Location=CH
  own assumption
- lubricating oil: 0.1 kg; lognormal variance with pedigree 0.062, pedigree (1,1,5,5,1)
  EcoSpold01Location=RER
  own assumption
  properties: carbon content, fossil 0.75, wet mass 1 kg, dry mass 1 kg, heating value, net 40.2 MJ
  note on carbon content, fossil: Lubricating oil is produced from diesel. C-content/dry mass of fats and oils considered 75%, from: ecoinvent v2.2 report, n 15a, pg 40
  note on heating value, net: Literature value, Source: IPCC 2006, 2006 IPCC Guidelines for National Greenhouse Gas Inventories, Prepared by the National Greenhouse Gas Inventories Programme, Eggleston H.S., Buendia L., Miwa K., Ngara T. and Tanabe K. (eds). Published: IGES, Japan
- waste mineral oil: 0 kg; name waste_oil_byP; pedigree (1,1,1,1,1)
  own assumption
  EcoSpold01Location=CH
  production volume 0 kg
    (same comment as for waste mineral wool, for final disposal)
  property price 0 EUR2005; name waste_oil_byP_price_EUR2005
  properties: dry mass 0.9 kg, wet mass 1 kg, carbon content, fossil 0.864444, heating value, net 34.7 MJ, water content 0.111111
  note on carbon content, fossil: Tab A.6, ecoinvent v2.2 report 13_I. C content has been calculated after data in the tables, and then referred to 1 kg DM
  note on heating value, net: Value taken from the general comment of the treatment dataset.
- waste concrete: 0 kg; name waste_concrete_byP; pedigree (1,1,1,1,1)
  EcoSpold01Location=CH
  own assumption
  production volume 0 kg
    (same comment as for waste mineral wool, for final disposal)
  property price 0 EUR2005; name waste_concrete_byP_price_EUR2005
  properties: wet mass 1 kg, dry mass 0.5 kg, water content 1
- steel, low-alloyed, hot rolled: 104 kg; lognormal variance with pedigree 0.062, pedigree (1,1,5,5,1)
  own assumption
  EcoSpold01Location=RER
  properties: dry mass 1 kg, wet mass 1 kg, carbon content, fossil 0.005
  note on carbon content, fossil: Low alloyed steel composition given in Tab. 3.2 ecoinvent v2.2 report 10_partII. Steel assumed to have a C content of 0.5%
- sheet rolling, steel: 0.875 kg; lognormal variance with pedigree 0.162, pedigree (1,1,5,5,1)
  EcoSpold01Location=RER
  own assumption
- heat, central or small-scale, other than natural gas: 0 MJ; pedigree (1,1,1,1,1)
  EcoSpold01Location=CH
  own assumption
  properties: heating value, net 1 MJ
- scrap steel: 0 kg; name scrap_steel_byP
  production volume 0 kg
    Calculated from production volume of reference product using the relative outputs.
  property price 0 EUR2005; name scrap_steel_byP_price_EUR2005
  properties: wet mass 1 kg, dry mass 1 kg
- concrete, normal: 0 m3; pedigree (1,1,1,1,1)
  own assumption
  EcoSpold01Location=CH
  properties: water content 0.086758, dry mass 2190 kg, wet mass 2380 kg
- waste mineral wool, for final disposal: -0.753802, -0.996198 kg (2 entries); lognormal variance with pedigree 0.062, pedigree (1,1,5,5,1)
  EcoSpold01Location=CH
  own assumption
  production volume 6.94108 kg
- electricity, low voltage: 1.16925, 0.212898, 4.80591, 16.7907, 3.42792, 52.6295, 8.51452, 24.4493 kWh (8 entries); lognormal variance with pedigree 0.062, pedigree (1,1,5,5,1)
  EcoSpold01Location=CH
  own assumption
- waste mineral oil: -0.0276369, -0.0723631 kg (2 entries); lognormal variance with pedigree 0.062, pedigree (1,1,5,5,1)
  own assumption
  EcoSpold01Location=CH
  production volume 0.396633 kg
- waste concrete: -8.88472, -121.115 kg (2 entries); lognormal variance with pedigree 0.062, pedigree (1,1,5,5,1)
  EcoSpold01Location=CH
  own assumption
  production volume 515.623 kg
- heat, central or small-scale, other than natural gas: 6.77417, 493.226 MJ (2 entries); lognormal variance with pedigree 0.062, pedigree (1,1,5,5,1)
  EcoSpold01Location=CH
  own assumption
- scrap steel: -25.3313, -78.6687 kg (2 entries)
  production volume 412.499 kg
- concrete, normal: 0.00133441, 0.000139044, 0.00112566, 0.000633181, 0.00268134, 9.04401e-5, 0.0529959 m3 (7 entries); lognormal variance with pedigree 0.062, pedigree (1,1,5,5,1)
  own assumption
  EcoSpold01Location=CH

## Inputs from nature
- Occupation, industrial area [natural resource, land]: 34 m2*year; lognormal variance with pedigree 0.188, pedigree (4,5,5,5,1)
  Basic uncertainty:2
- Transformation, to industrial area [natural resource, land]: 1.7 m2; lognormal variance with pedigree 0.188, pedigree (4,5,5,5,1)
  Basic uncertainty:2
- Transformation, from unspecified [natural resource, land]: 1.7 m2; lognormal variance with pedigree 0.188, pedigree (4,5,5,5,1)
  Basic uncertainty:2

## Sampling procedure
literature, personal communication

## Extrapolations
none This dataset has been copied from an original dataset covering the geography CH. The uncertainty has been adjusted accordingly.

## Review by Emilia Moreno Ruiz 2014-06-05
wrong by-product corrected (from steel to scrap steel)

## Review by Christian Bauer 2003-07-25
self-validation
