# heat and power co-generation, oil

Dataset: EcoSpold 2, unit process
Geography: RS
Time period: 1980-01-01 to 2021-12-31
Technology level: current
Classification: ISIC rev.4 ecoinvent: 3510:Electric power generation, transmission and distribution
Classification: EcoSpold01Categories: hard coal/power plants
Synonyms: heavy fuel oil; petroleum
Tags: fossil fuels; oil power
Scenario: Business-as-Usual
System model: Allocation, cut-off by classification
Generated by: Karin Treyer
Published in: Jungbluth N. 2003
Database: ecoinvent
isCopyrightProtected: true
accessRestrictedTo: 1

## General comment
This dataset represents the production of high voltage electricity and district heat at a grid-connected oil power plant with a capacity of 500 MW on the world in 2012.
Emissions are in general calculated/estimated based on the fuel oil type S, European quality. This dataset has been built on the basis of oil electricity production datasets in version 2 of the ecoinvent database which were elaborated by N. Jungbluth 2007 (see main publication in modelling and administrative). The values and emissions are a weighted average of emissions in all datasets in version 2 (which are considered as the global values) multiplied with an efficiency scaling factor. The datasets in version 2 were valid for the following countries: AT, BE, CS, CZ, DE, DK, ES, FI, FR, GB, GR, HR, HU, IE, IT, NL, PT, SE, SI, SK. Weighting was made with electricity production data in those countries based on IEA/OECD 2012. Nothing else than the efficiency has been adjusted in this dataset; besides that no new data collection has taken place
Comments:
- sulfur content of the oil is not adapted to local/average conditions.
- CO2 emissions are presented for the combustion and for the flue gas treatment
- Extensive comments on emissions can be found in Jungbluth 2007, on which this dataset is based on.
Emissions to the water are from flue gas treatment. Most of these data come from two power plants in Portugal (EDP 2001) and data from Slowakia
EDP (2001) Environmental Report 2000. Electricidade de Portugal, S.A., Lisboa, PT, retrieved from: www.edp.pt.
Slovenské elektrárne (2002) Environment Report 2001, Bratislave, SK, retrieved from: www.seas.sk.
IEA/OECD. 2010. Electricity Information 2010. International Energy Agency (IEA), Paris Cedex (FR). Part IV. Detailed OECD Electricity And Heat Data.
[This dataset is meant to replace the following datasets:
- electricity production, oil, RS, 1980 - 2015]

## Included activities start
From the constructed power plant ready to produce electricity and from the fuel ready to be used.

## Included activities end
This activity ends with 1MJ of heavy fuel oil burned in power plant with heat and electricity as main products.

This dataset includes all energy use, use of chemicals, emissions to air and water including treatment of flue gasses and effluents. In an oil power plant, water is needed for cooling, feed water for the steam circuit, for the flue gas treatment, or other cleaning. This dataset only considers water use (evaporation) for cooling and steam circuit.

## Technology
Electricity and heat production in a conventional combined heat and power oil power plant with a capacity of 500 MWe

## Time period
The Annual Production Volume is valid for the year 2012.

## Parameters
- average efficiency of oil power plants, country: 0.3 dimensionless; name efficiency_oil_country; lognormal variance with pedigree 0.003825, pedigree (3,3,1,2,2)
  Literature value/calculated value. Net electrical efficiency based on the lower heating value (LHV).
  For all OECD countries, the IEA Electricity information 2014 provides data for the year 2012 on fuel input (TJ, Net calorific value NCV) and gross electricity production (GWh) as well as heat production (TJ) in tables 8 and 9 for each country for electricity only and Combined Heat and Power (CHP) plants each. Together with the information on own use (see parameter "losses"), the net electrical efficiency based on the NCV is calculated.
  For all non-OECD countries, data from the IEA Energy balances of non-OECD countries 2014 have been used. These tables do not always provide information on how much of the electricity has been produced in electricity only and in CHP plants, but often give the total value only.
  IEA. 2014. Electricity Information 2014. ISBN 978-92-64-21692-1. International Energy Agency (IEA), Paris Cedex (FR).
  IEA/OECD. 2014. Energy balances of non-OECD countries 2014. International Energy Agency (IEA), Paris Cedex (FR).
  The original value calculated by the statistics amounted to 0.075, which seems not to be realistic. A value of 0.3 is therefore being used (own assumption).
- fraction, cooling water, to air: 0.0118019 dimensionless; name fraction_CW_to_air; = (WConsumption_EP_oil_recirculatingCS*recirculating_CS_fraction_from_allCS+WConsumption_EP_oil_onceT_andCP_CS*once_through_andCP_CS_fractio_from_allCS)/(WWithdrawal_EP_oil_recirculating_CS*recirculating_CS_fraction_from_allCS+WWithdrawal_EP_oil_onceT_andCP_CS*once_through_andCP_CS_fractio_from_allCS); lognormal variance with pedigree 0.092025, pedigree (4,4,3,2,4)
  Calculated value
  nan
- gross electricity production: 6.7e7 kWh; name gross_electricity; lognormal variance with pedigree 0.0012, pedigree (2,1,1,1,1)
  Literature value/statistics.
  For OECD countries, gross electricity production 2012 with natural gas in electricity plants or CHP plants was taken from the IEA electricity informaiton 2014, country tables 8 and 9.
  For non-OECD countries, these values were found in the Energy balances of non-OECD countries.
  The split of electricity only and CHP plants into conventional and combined cycle plants (see general comment) was made based on information on installed electrical capacity with natural gas as fuel in the individual countries taken from the WEPP database.
  IEA. 2014. Electricity Information 2014. ISBN 978-92-64-21692-1. International Energy Agency (IEA), Paris Cedex (FR).
  IEA/OECD. 2014. Energy balances of non-OECD countries 2014. International Energy Agency (IEA), Paris Cedex (FR).
  WEPP 2014. World Electric Power Plants Database. PLATTS McGraw Hill Financial. http://www.platts.com/products/world-electric-power-plants-database
  nan
- fraction, water, decarbonised, to air: 0.0118019 dimensionless; name fraction_WDC_to_air; = fraction_CW_to_air; lognormal variance with pedigree 0.092025, pedigree (4,4,3,2,4)
  Calculated value. See comments in the other parametres present in this dataset. Decarbonised water is considered to be always used as cooling water, thus cooling water fractions to air are applied to all carbonised water input flows to calculate the amount of water consumed in the processes.
  nan
- relation between the global and the country's efficiency of oil power plants: 0 dimensionless
  Parameter not needed anymore.
- average efficiency of oil power plants, global: 0 dimensionless
  Parameter not needed anymore.
- fraction, water, completely softened, to air: 0.15 dimensionless; name fraction_WCS_to_air; = fraction_PW_to_air; lognormal variance with pedigree 0.092025, pedigree (4,4,3,2,4)
  Calculated value. See comment in the other parametres present in this dataset. Water, completely softened is considered to be always used as process water, thus process water fractions to air are applied to all water, completely softened input flows to calculate the amount of water consumed in the processes.
  nan
- recirculating cooling system as a fraction of all cooling systems: 0.27 dimensionless; name recirculating_CS_fraction_from_allCS; lognormal variance with pedigree 0.092025, pedigree (4,4,3,2,4)
  Calculated as an average of data available for Europe (Floerke, 2008, Future changes of freshwater needs in the electricity production sector) and USA (NERL, 2011, Estimating freshwater needs to meet future thermoelectric generation requirements).
  nan
- once-through and cooling pond cooling systems as a fraction of all cooling syste: 0.73 dimensionless; name once_through_andCP_CS_fractio_from_allCS; lognormal variance with pedigree 0.092025, pedigree (4,4,3,2,4)
  (same comment as for recirculating cooling system as a fraction of all cooling systems)
- water withdrawal, electricity production from oil, recirculating CS: 0.0021 m3/kWh; name WWithdrawal_EP_oil_recirculating_CS; lognormal variance with pedigree 0.092025, pedigree (4,4,3,2,4)
  Estimated based on literature (Scown, 2011, Water Footprint of U.S. Transportation Fuels, SI).
  nan
- water consumption, electricity production from oil, once-T and coolingP CS: 0.0005 m3/kWh; name WConsumption_EP_oil_onceT_andCP_CS; lognormal variance with pedigree 0.092025, pedigree (4,4,3,2,4)
  (same comment as for water withdrawal, electricity production from oil, recirculating CS)
- fraction, process water, to air: 0.15 dimensionless; name fraction_PW_to_air; lognormal variance with pedigree 0.092025, pedigree (4,4,3,2,4)
  Literature value. In case when no industry/process specific data are available, default evaporation fraction value is used. This value is 15% and is based on literature (Statistics Canada, 2007 & Shaffer, K.H., 2008, Consumptive water use in the Great Lakes Basin, USGS & Shiklomanov, 2003, World Water Resources at the Beginning of the 21st Century) and has been approved by an expert.
  nan
- water withdrawal, electricity production from oil, once-T and coolingP CS: 0.098 m3/kWh; name WWithdrawal_EP_oil_onceT_andCP_CS; lognormal variance with pedigree 0.092025, pedigree (4,4,3,2,4)
  (same comment as for water withdrawal, electricity production from oil, recirculating CS)
- losses from gross electricity production: 0.07 dimensionless; name losses_gross_net; lognormal variance with pedigree 0.003525, pedigree (3,2,2,2,2)
  Calculated value. Own use of electricity plants in this country in 2012. For the non-OECD countries, the losses were first calculated for the total electricity sector based on the IEA electricity information 2014, table 1.1 (net electricity = gross electricity minus own use). However, this value can be very low if the share of electricity from fossiles is low in a specific country. Therefore, the default loss as described by the IEA in the electricity statistic is applied, which is 0.07 (IEA electricity information 2014: The difference between gross and net electricity production is generally observed to be about 7% for conventional thermal stations, 1% for hydro stations and 6% for nuclear.)
  IEA. 2014. Electricity Information 2014. ISBN 978-92-64-21692-1. International Energy Agency (IEA), Paris Cedex (FR).
  nan
  Uncertainty: g
- water consumption, electricity production from oil, recirculating CS: 0.0018 m3/kWh; name WConsumption_EP_oil_recirculatingCS; lognormal variance with pedigree 0.092025, pedigree (4,4,3,2,4)
  (same comment as for water withdrawal, electricity production from oil, recirculating CS)
- factor: input of MJ for the production of 1 kWh: 12 MJ/kWh; name factor_MJ_kWh; = 1*3.6/efficiency_oil_country; lognormal variance with pedigree 0.0006, pedigree (1,1,1,1,1)
  Calculated value. 3.6 MJ = 1kWh.
  nan

## Reference product
- heat, district or industrial, other than natural gas: 1 MJ; name heat; By-product classification allocatable product; CPC 17300: Steam and hot water
  Literature value/calculated value. Net thermal efficiency based on the lower heating value (LHV). The calculated value amounted to 0.8, which seems unrealistically high. Therefore, a value of 0.4 is estimated.
  For all OECD countries, the IEA Electricity information 2014 provides data for the year 2012 on fuel input (TJ, Net calorific value NCV) and gross electricity production (GWh) as well as heat production (TJ) in tables 8 and 9 for each country for electricity only and Combined Heat and Power (CHP) plants each. Together with the information on own use (see parameter "losses"), the net electrical efficiency based on the NCV is calculated.
  For all non-OECD countries, data from the IEA Energy balances of non-OECD countries 2014 have been used. These tables do not always provide information on how much of the electricity has been produced in electricity only and in CHP plants, but often give the total value only.
  IEA. 2014. Electricity Information 2014. ISBN 978-92-64-21692-1. International Energy Agency (IEA), Paris Cedex (FR).
  IEA/OECD. 2014. Energy balances of non-OECD countries 2014. International Energy Agency (IEA), Paris Cedex (FR).
  production volume 2.39e9 MJ; name apv_heat
    Literature value/statistics. Taken from the IEA electricity information 2014. The global value is the sum of all oil CHP datasets in ecoinvent.
    IEA. 2014. Electricity Information 2014. ISBN 978-92-64-21692-1. International Energy Agency (IEA), Paris Cedex (FR).
  property true value relation 0.1842; name heat_true_value_relation
    property to calculate "true value" from
  property exergy 0.1842 MJ; name heat_exergy
    This exergy property is based on the exergy content of the product.
  property price 0.0106 EUR2005; name heat_price_EUR2005
    Average European district heat price from Ecoheatcool and Euroheat 2005-2006, Ecoheat Work package 1: The European heat market. Final report. 10.6 EUR/GJ i s the price of district heat. http://www.solarthermalworld.org/files/Ecoheatcool%20WP1%20Web.pdf?download
  property true value 0.00244134; name heat_true_value
    allocation property applied in "true value" allocation // value calculated from true value relation
  properties: heating value, net 1 MJ, corresponding fuel use, propane, furnace >100kW 0 MJ

## By-products
- electricity, high voltage: 0 kWh; name electricity; By-product classification allocatable product; CPC 17100: Electrical energy; undefined min 1, max 1, standardDeviation95 0, pedigree (1,1,3,1,1)
  Electricity output per MJ of oil burned.
  production volume 6.231e7 kWh; name apv_electricity; = gross_electricity* (1-losses_gross_net)
    Calculated value.
  property exergy 3.6 MJ; name electricity_exergy
    This exergy property is based on the exergy content of the product.
  property true value relation 3.6; name electricity_true_value_relation
    property to calculate "true value" from
  property price 0.0977 EUR2005; name electricity_price_EUR2005
    Temporary price data. Calculated as 90% of purchasers price based on: 94% of the average price (to account for a 6% loss in transformation and transmission) for electricity for industrial consumersin 2005 (excluded taxes). From IEA.
  property true value 0.00994032; name electricity_true_value
    (same comment as for heat, district or industrial, other than natural gas)

## Inputs from technosphere
- municipal solid waste: -7.77901e-6 kg; name municipal_waste; source Jungbluth, N. 2007; lognormal variance with pedigree 0.0039, pedigree (2,3,3,3,1)
  Average of literature data
  Amount was scaled to the amount of reference product.
  production volume 983.314 kg; = apv_electricity * municipal_waste
    Calculated from the production volume of electricity produced in proportion to the respective output amounts.
  property price 0 EUR2005; name municipal_waste_price_EUR2005
  properties: carbon content, fossil 0.171549, dry mass 0.771 kg, heating value, net 11.74 MJ, water content 0.297017, carbon content, non-fossil 0.261655, wet mass 1 kg
  note on carbon content, fossil: MSW composition in tab 4.1, ecoinvent v2.2 report 13_I. C content referred to 1 kg DM
  note on heating value, net: Value taken from the general comment of the treatment dataset.
- oil power plant, 500MW: 0 unit; source Jungbluth, N. 2007
  Estimation based on case study
- waste mineral oil: -2.31187e-5 kg; name waste_oil; source Jungbluth, N. 2007; lognormal variance with pedigree 0.0039, pedigree (2,3,3,3,1)
  Average of literature data
  Amount was scaled to the amount of reference product.
  production volume 2922.34 kg; = apv_electricity *waste_oil
    (same comment as for municipal solid waste)
  property price 0 EUR2005; name waste_oil_price_EUR2005
  properties: dry mass 0.9 kg, heating value, net 34.7 MJ, wet mass 1 kg, carbon content, fossil 0.864444, water content 0.111111
  note on carbon content, fossil: Tab A.6, ecoinvent v2.2 report 13_I. C content has been calculated after data in the tables, and then referred to 1 kg DM
- heavy fuel oil: 0.0119645 kg; source Jungbluth, N. 2007; lognormal variance with pedigree 0.0027, pedigree (2,2,3,1,1)
  Literature data for heating value
  Amount was scaled to the amount of reference product.
  properties: wet mass 1 kg, heating value, net 41.2 MJ, carbon content, fossil 0.849, dry mass 1 kg
- fly ash and scrubber sludge: -1.25206e-6 kg; name fly_ash; source Jungbluth, N. 2007, p. Tab. 12.27, p. 238; lognormal variance with pedigree 0.0033, pedigree (2,3,3,3,1)
  Average of literature data
  Amount was scaled to the amount of reference product.
  production volume 158.267 kg; = apv_electricity * fly_ash
    (same comment as for municipal solid waste)
  property price 0 EUR2005; name fly_ash_price_EUR2005
  properties: wet mass 1 kg, carbon content, fossil 0.167, dry mass 0.1 kg, water content 9
- bilge oil: -9.92278e-7 kg; name bilge_oil; source Jungbluth, N. 2007; lognormal variance with pedigree 0.0033, pedigree (2,3,3,3,1)
  Average of literature data
  Amount was scaled to the amount of reference product.
  production volume 125.43 kg; = apv_electricity * bilge_oil
    (same comment as for municipal solid waste)
  property price 0 EUR2005; name bilge_oil_price_EUR2005
  properties: heating value, net 1.92 MJ, carbon content, fossil 0.84, water content 9, wet mass 1 kg, dry mass 0.1 kg
- lignite ash: -6.88187e-7 kg; name lignite_ash; source Jungbluth, N. 2007; lognormal variance with pedigree 0.0033, pedigree (2,3,3,3,1)
  Average of literature data
  Amount was scaled to the amount of reference product.
  production volume 86.991 kg; = apv_electricity * lignite_ash
    Calculated from the production volume of electricity produced in proportion to the respective output amounts. An extra amount has been added in the global dataset due to parent child relationship.
  property price 0 EUR2005; name lignite_ash_price_EUR2005
  properties: dry mass 1 kg, wet mass 1 kg
- ammonia, anhydrous, liquid: 3.11565e-5 kg; source Jungbluth, N. 2007, p. Tab. 12.11 p. 228; lognormal variance with pedigree 0.0147, pedigree (2,4,3,3,1)
  IPPC 2001 for flue gas treatment
  Amount was scaled to the amount of reference product.
  properties: wet mass 1 kg, dry mass 1 kg
- limestone, crushed, washed: 0.000678377 kg; source Jungbluth, N. 2007, p. Tab. 12.11 p. 228; lognormal variance with pedigree 0.0147, pedigree (2,4,3,3,1)
  IPPC 2001 for flue gas treatment
  Amount was scaled to the amount of reference product.
  properties: carbon content, fossil 0.117257, wet mass 1 kg, water content 0.00200401, dry mass 0.998 kg
  note on carbon content, fossil: Table 3.1, ecoinvent v2.2 report 7, part VII, pg 3. MW CaCO3=100, MW MgCO3=84. C content of limestone is 0.117257 kg/kg DM
- oil power plant, 500MW: 6.1124e-13 unit; source Jungbluth, N. 2007; lognormal variance with pedigree 0.3506, pedigree (2,5,5,5,1)
  Estimation based on case study
- residue from cooling tower: -7.19587e-6 kg; name residue; source Jungbluth, N. 2007, p. Tab. 12.27, p. 238; lognormal variance with pedigree 0.0033, pedigree (2,3,3,3,1)
  Average of literature data
  Amount was scaled to the amount of reference product.
  production volume 909.601 kg; = apv_electricity * residue
    (same comment as for municipal solid waste)
  property price 0 EUR2005; name cooling_tower_price_EUR2005
  properties: wet mass 1 kg, water content 0.428571, carbon content, fossil 0.0544233, dry mass 0.7 kg
- water, completely softened: 0.00492935 kg; name water_softened_input; source Jungbluth, N. 2007, p. Tab. 12.10 p. 228; lognormal variance with pedigree 0.0027, pedigree (2,2,3,1,1)
  Literature data for this country
  Amount was scaled to the amount of reference product.
  Literature data for this country
  Amount was scaled to the amount of reference product.
  properties: wet mass 1 kg
- water, decarbonised: 0.0246468 kg; name water_decarbonised_input; source Jungbluth, N. 2007, p. Tab. 12.10 p. 228; lognormal variance with pedigree 0.0027, pedigree (2,2,3,1,1)
  (same comment as for water, completely softened)
  properties: wet mass 1 kg

## Inputs from nature
- Water, cooling, unspecified natural origin [natural resource, in water]: 0.00365041 m3; name water_cooling_UNO_input; = ((recirculating_CS_fraction_from_allCS*WWithdrawal_EP_oil_recirculating_CS)+(once_through_andCP_CS_fractio_from_allCS*WWithdrawal_EP_oil_onceT_andCP_CS))/9.737; source Scown, C.D., et al. 2011, p. Tab. 12.10 p. 228; lognormal variance with pedigree 0.130025, pedigree (4,4,5,2,4)
  Estimation with literature data, basic uncertainty estimated = 3
  Amount was scaled to the amount of reference product.
  Calculated based on literature data. 9.7 MJ is calculated efficiency of the electricity production, average of all available regions.

## Emissions to nature
- Sodium [air, urban air close to ground]: 1.47881e-7 kg; source Jungbluth, N. 2007, p. Tab. 12.25; lognormal variance with pedigree 0.1007, pedigree (3,3,5,3,3)
  Literature
  Amount was scaled to the amount of reference product.
- Vanadium, ion [water, surface water]: 1.78093e-8 kg; source Jungbluth, N. 2007, p. Tab. 12.26, p. 238; lognormal variance with pedigree 0.672, pedigree (1,1,3,1,1)
  Mean of values for Europe, range of concentrations
  Amount was scaled to the amount of reference product.
- Sulfite [water, surface water]: 8.89058e-7 kg; source Jungbluth, N. 2007, p. Tab. 12.26, p. 238; lognormal variance with pedigree 0.032, pedigree (1,1,3,1,1)
  (same comment as for Vanadium, ion)
- Methanol [air, urban air close to ground]: 2.62197e-7 kg; source Jungbluth, N. 2007; lognormal variance with pedigree 0.092, pedigree (1,1,3,1,1)
  Calculation based on VOC emission. Deviation calculated from ranges
  Amount was scaled to the amount of reference product.
- Cobalt [air, urban air close to ground]: 5.17582e-8 kg; source Jungbluth, N. 2007, p. Tab. 12.23, Tab. 12.24; lognormal variance with pedigree 1.212, pedigree (1,1,3,1,1)
  Calculation based on particle emission. Deviation calculated from ranges
  Amount was scaled to the amount of reference product.
- Hypochlorite [water, ocean]: 1.57739e-7 kg; source Jungbluth, N. 2007; lognormal variance with pedigree 0.1021, pedigree (3,4,5,3,3)
  Literature
  Amount was scaled to the amount of reference product.
- AOX, Adsorbable Organic Halogen as Cl [water, surface water]: 2.09019e-9 kg; source Jungbluth, N. 2007, p. Tab. 12.26, p. 238; lognormal variance with pedigree 0.002, pedigree (1,1,3,1,1)
  (same comment as for Vanadium, ion)
- Ammonia [air, urban air close to ground]: 4.92935e-8 kg; source Jungbluth, N. 2007, p. p.232; lognormal variance with pedigree 1.102, pedigree (1,1,3,1,1)
  Calculation from ranges
  Amount was scaled to the amount of reference product.
- Benzene [air, urban air close to ground]: 2.62197e-8 kg; source Jungbluth, N. 2007; lognormal variance with pedigree 0.092, pedigree (1,1,3,1,1)
  (same comment as for Methanol)
- Benzo(a)pyrene [air, urban air close to ground]: 7.39403e-12 kg; source Jungbluth, N. 2007; lognormal variance with pedigree 0.3707, pedigree (3,3,5,3,3)
  Literature
  Amount was scaled to the amount of reference product.
- Oils, unspecified [water, surface water]: 2.79366e-8 kg; source Jungbluth, N. 2007, p. Tab. 12.26, p. 238; lognormal variance with pedigree 0.032, pedigree (1,1,3,1,1)
  (same comment as for Vanadium, ion)
- Suspended solids, unspecified [water, surface water]: 7.49705e-7 kg; source Jungbluth, N. 2007, p. Tab. 12.26, p. 238; lognormal variance with pedigree 0.052, pedigree (1,1,3,1,1)
  (same comment as for Vanadium, ion)
- Lead [air, urban air close to ground]: 5.02794e-8 kg; source Jungbluth, N. 2007; lognormal variance with pedigree 1.212, pedigree (1,1,3,1,1)
  (same comment as for Cobalt)
- Chloride [water, surface water]: 1.20463e-5 kg; source Jungbluth, N. 2007, p. Tab. 12.26, p. 238; lognormal variance with pedigree 0.892, pedigree (1,1,3,1,1)
  (same comment as for Vanadium, ion)
- Methane, fossil [air, urban air close to ground]: 2.62197e-6 kg; source Jungbluth, N. 2007, p. Tab. 12.19, Tab. 12.20; lognormal variance with pedigree 0.092, pedigree (1,1,3,1,1)
  (same comment as for Methanol)
- Nickel, ion [water, surface water]: 8.71066e-9 kg; source Jungbluth, N. 2007, p. Tab. 12.26, p. 238; lognormal variance with pedigree 0.342, pedigree (1,1,3,1,1)
  (same comment as for Vanadium, ion)
- PAH, polycyclic aromatic hydrocarbons [air, urban air close to ground]: 8.87283e-10 kg; source Jungbluth, N. 2007, p. Tab. 12.21, p. 235; lognormal variance with pedigree 0.3147, pedigree (2,4,3,3,1)
  Literature
  Amount was scaled to the amount of reference product.
- Zinc [air, urban air close to ground]: 3.54913e-8 kg; source Jungbluth, N. 2007; lognormal variance with pedigree 1.212, pedigree (1,1,3,1,1)
  (same comment as for Cobalt)
- Iron, ion [water, surface water]: 6.19422e-8 kg; source Jungbluth, N. 2007, p. Tab. 12.26, p. 238; lognormal variance with pedigree 0.242, pedigree (1,1,3,1,1)
  (same comment as for Vanadium, ion)
- Hydrogen fluoride [air, urban air close to ground]: 1.48373e-8 kg; source Jungbluth, N. 2007, p. Tab. 12.25; lognormal variance with pedigree 0.0612, pedigree (2,3,3,1,3)
  Literature
  Amount was scaled to the amount of reference product.
- Zinc, ion [water, surface water]: 3.11042e-9 kg; source Jungbluth, N. 2007, p. Tab. 12.26, p. 238; lognormal variance with pedigree 0.262, pedigree (1,1,3,1,1)
  (same comment as for Vanadium, ion)
- BOD5, Biological Oxygen Demand [water, surface water]: 8.28131e-7 kg; source Jungbluth, N. 2007, p. Tab. 12.26, p. 238; lognormal variance with pedigree 0.292, pedigree (1,1,3,1,1)
  (same comment as for Vanadium, ion)
- Nitrogen oxides [air, urban air close to ground]: 6.60533e-5 kg; source Jungbluth, N. 2007, p. Tab. 12.15 p. 231; lognormal variance with pedigree 0.0427, pedigree (2,2,3,1,1)
  Literature data for this country
  Amount was scaled to the amount of reference product.
- Particulates, < 2.5 um [air, urban air close to ground]: 7.39403e-6 kg; source Jungbluth, N. 2007, p. Tab. 12.17 / Tab. 12.18; lognormal variance with pedigree 0.3027, pedigree (2,2,3,1,1)
  Literature data for this country
  Amount was scaled to the amount of reference product.
- Fluoride [water, surface water]: 1.00095e-7 kg; source Jungbluth, N. 2007, p. Tab. 12.26, p. 238; lognormal variance with pedigree 0.762, pedigree (1,1,3,1,1)
  (same comment as for Vanadium, ion)
- Acetic acid [air, urban air close to ground]: 5.24384e-7 kg; source Jungbluth, N. 2007; lognormal variance with pedigree 0.092, pedigree (1,1,3,1,1)
  (same comment as for Methanol)
- Thallium [water, surface water]: 1.82524e-9 kg; source Jungbluth, N. 2007, p. Tab. 12.26, p. 238; lognormal variance with pedigree 0.002, pedigree (1,1,3,1,1)
  (same comment as for Vanadium, ion)
- Arsenic [air, urban air close to ground]: 9.76012e-9 kg; source Jungbluth, N. 2007, p. Tab. 12.23, Tab. 12.24; lognormal variance with pedigree 1.212, pedigree (1,1,3,1,1)
  (same comment as for Cobalt)
- COD, Chemical Oxygen Demand [water, surface water]: 9.05768e-7 kg; source Jungbluth, N. 2007, p. Tab. 12.26, p. 238; lognormal variance with pedigree 0.482, pedigree (1,1,3,1,1)
  (same comment as for Vanadium, ion)
- Acetaldehyde [air, urban air close to ground]: 1.28424e-7 kg; source Jungbluth, N. 2007; lognormal variance with pedigree 0.092, pedigree (1,1,3,1,1)
  (same comment as for Methanol)
- Mercury [water, surface water]: 6.18239e-11 kg; source Jungbluth, N. 2007, p. Tab. 12.26, p. 238; lognormal variance with pedigree 0.562, pedigree (1,1,3,1,1)
  (same comment as for Vanadium, ion)
- TOC, Total Organic Carbon [water, surface water]: 5.06343e-7 kg; source Jungbluth, N. 2007, p. Tab. 12.26, p. 238; lognormal variance with pedigree 0.002, pedigree (1,1,3,1,1)
  (same comment as for Vanadium, ion)
- Hypochlorite [water, surface water]: 1.87315e-7 kg; source Jungbluth, N. 2007; lognormal variance with pedigree 0.1021, pedigree (3,4,5,3,3)
  Literature
  Amount was scaled to the amount of reference product.
- Chromium [air, urban air close to ground]: 1.71487e-8 kg; source Jungbluth, N. 2007, p. Tab. 12.23, Tab. 12.24; lognormal variance with pedigree 1.462, pedigree (1,1,3,1,1)
  (same comment as for Cobalt)
- Sulfur dioxide [air, urban air close to ground]: 0.000246468 kg; source Jungbluth, N. 2007, p. Tab. 12.14 p. 230; lognormal variance with pedigree 1.002, pedigree (1,1,3,1,1)
  Calculation from ranges
  Amount was scaled to the amount of reference product.
- Sulfide [water, surface water]: 2.64953e-8 kg; source Jungbluth, N. 2007, p. Tab. 12.26, p. 238; lognormal variance with pedigree 0.272, pedigree (1,1,3,1,1)
  (same comment as for Vanadium, ion)
- Hydrocarbons, aliphatic, unsaturated [air, urban air close to ground]: 2.62197e-8 kg; source Jungbluth, N. 2007; lognormal variance with pedigree 0.092, pedigree (1,1,3,1,1)
  (same comment as for Methanol)
- Cadmium [air, urban air close to ground]: 4.67303e-9 kg; source Jungbluth, N. 2007, p. Tab. 12.23, Tab. 12.24; lognormal variance with pedigree 1.212, pedigree (1,1,3,1,1)
  (same comment as for Cobalt)
- Copper, ion [water, surface water]: 1.25018e-9 kg; source Jungbluth, N. 2007, p. Tab. 12.26, p. 238; lognormal variance with pedigree 0.722, pedigree (1,1,3,1,1)
  (same comment as for Vanadium, ion)
- Carbon dioxide, fossil [air, unspecified]: 0.00030459 kg; source Jungbluth, N. 2007, p. Tab. 12.29, Tab. 12.30; lognormal variance with pedigree 0.0206, pedigree (2,5,3,1,1)
  Calculation for limestone use
  Amount was scaled to the amount of reference product.
- Particulates, > 10 um [air, urban air close to ground]: 1.47881e-5 kg; source Jungbluth, N. 2007, p. Tab. 12.17 / Tab. 12.18; lognormal variance with pedigree 0.0427, pedigree (2,2,3,1,1)
  Literature data for this country
  Amount was scaled to the amount of reference product.
- Selenium [air, urban air close to ground]: 7.39403e-9 kg; source Jungbluth, N. 2007; lognormal variance with pedigree 1.212, pedigree (1,1,3,1,1)
  (same comment as for Cobalt)
- Mercury [air, urban air close to ground]: 7.39403e-11 kg; source Jungbluth, N. 2007; lognormal variance with pedigree 1.632, pedigree (1,1,3,1,1)
  Calculation from ranges
  Amount was scaled to the amount of reference product.
- Hydrocarbons, aliphatic, alkanes, unspecified [air, urban air close to ground]: 5.24384e-7 kg; source Jungbluth, N. 2007; lognormal variance with pedigree 0.092, pedigree (1,1,3,1,1)
  (same comment as for Methanol)
- Carbon dioxide, fossil [air, urban air close to ground]: 0.0385475 kg; source Jungbluth, N. 2007, p. Tab. 12.12, p. 229; lognormal variance with pedigree 0.0027, pedigree (2,2,3,1,1)
  Literature data for this country
  Amount was scaled to the amount of reference product.
- Arsenic, ion [water, surface water]: 5.88762e-11 kg; source Jungbluth, N. 2007, p. Tab. 12.26, p. 238; lognormal variance with pedigree 0.002, pedigree (1,1,3,1,1)
  (same comment as for Vanadium, ion)
- Chromium VI [air, urban air close to ground]: 1.53406e-10 kg; source Jungbluth, N. 2007, p. Tab. 12.23, Tab. 12.24; lognormal variance with pedigree 2.2927, pedigree (3,3,5,3,1)
  Literature, basic uncertainity = 20
  Amount was scaled to the amount of reference product.
- Dioxins, measured as 2,3,7,8-tetrachlorodibenzo-p-dioxin [air, urban air close to ground]: 4.92935e-15 kg; source Jungbluth, N. 2007, p. Tab. 12.22 p. 235; lognormal variance with pedigree 0.3147, pedigree (2,4,3,3,1)
  Literature
  Amount was scaled to the amount of reference product.
- Chromium, ion [water, surface water]: 1.50927e-9 kg; source Jungbluth, N. 2007, p. Tab. 12.26, p. 238; lognormal variance with pedigree 0.632, pedigree (1,1,3,1,1)
  (same comment as for Vanadium, ion)
- Manganese [water, surface water]: 1.76633e-9 kg; source Jungbluth, N. 2007, p. Tab. 12.26, p. 238; lognormal variance with pedigree 0.002, pedigree (1,1,3,1,1)
  (same comment as for Vanadium, ion)
- Particulates, > 2.5 um, and < 10um [air, urban air close to ground]: 7.39403e-6 kg; source Jungbluth, N. 2007, p. Tab. 12.17 / Tab. 12.18; lognormal variance with pedigree 0.1227, pedigree (2,2,3,1,1)
  Literature data for this country
  Amount was scaled to the amount of reference product.
- Iron [air, urban air close to ground]: 3.45055e-8 kg; source Jungbluth, N. 2007; lognormal variance with pedigree 0.7107, pedigree (3,3,5,3,3)
  Literature
  Amount was scaled to the amount of reference product.
- Hydrogen chloride [air, urban air close to ground]: 2.22314e-8 kg; source Jungbluth, N. 2007, p. Tab. 12.25; lognormal variance with pedigree 0.0612, pedigree (2,3,3,1,3)
  Literature
  Amount was scaled to the amount of reference product.
- Propane [air, urban air close to ground]: 2.62197e-8 kg; source Jungbluth, N. 2007, p. Tab. 12.19, Tab. 12.20; lognormal variance with pedigree 0.092, pedigree (1,1,3,1,1)
  (same comment as for Methanol)
- Ethanol [air, urban air close to ground]: 2.62197e-7 kg; source Jungbluth, N. 2007; lognormal variance with pedigree 0.092, pedigree (1,1,3,1,1)
  (same comment as for Methanol)
- Manganese [air, urban air close to ground]: 1.62669e-8 kg; source Jungbluth, N. 2007, p. Tab. 12.23, Tab. 12.24; lognormal variance with pedigree 1.212, pedigree (1,1,3,1,1)
  (same comment as for Cobalt)
- Cadmium, ion [water, surface water]: 1.43272e-10 kg; source Jungbluth, N. 2007, p. Tab. 12.26, p. 238; lognormal variance with pedigree 0.422, pedigree (1,1,3,1,1)
  (same comment as for Vanadium, ion)
- Molybdenum [air, urban air close to ground]: 1.12389e-8 kg; source Jungbluth, N. 2007; lognormal variance with pedigree 1.212, pedigree (1,1,3,1,1)
  (same comment as for Cobalt)
- Beryllium [air, urban air close to ground]: 2.7492e-11 kg; source Jungbluth, N. 2007; lognormal variance with pedigree 0.6927, pedigree (3,3,5,3,1)
  Literature
  Amount was scaled to the amount of reference product.
- Tin, ion [water, surface water]: 5.88762e-11 kg; source Jungbluth, N. 2007, p. Tab. 12.26, p. 238; lognormal variance with pedigree 0.002, pedigree (1,1,3,1,1)
  (same comment as for Vanadium, ion)
- Copper [air, urban air close to ground]: 6.95039e-8 kg; source Jungbluth, N. 2007, p. Tab. 12.23, Tab. 12.24; lognormal variance with pedigree 1.312, pedigree (1,1,3,1,1)
  (same comment as for Cobalt)
- Phosphorus [water, surface water]: 9.1262e-9 kg; source Jungbluth, N. 2007, p. Tab. 12.26, p. 238; lognormal variance with pedigree 0.002, pedigree (1,1,3,1,1)
  (same comment as for Vanadium, ion)
- Hydrocarbons, unspecified [water, surface water]: 1.82928e-8 kg; source Jungbluth, N. 2007, p. Tab. 12.26, p. 238; lognormal variance with pedigree 0.042, pedigree (1,1,3,1,1)
  (same comment as for Vanadium, ion)
- Dinitrogen monoxide [air, urban air close to ground]: 1.97174e-6 kg; source Jungbluth, N. 2007, p. Tab. 12.16 p. 232; lognormal variance with pedigree 0.352, pedigree (1,1,3,1,1)
  Calculation from ranges
  Amount was scaled to the amount of reference product.
- Sulfate [water, surface water]: 9.84737e-5 kg; source Jungbluth, N. 2007, p. Tab. 12.26, p. 238; lognormal variance with pedigree 0.022, pedigree (1,1,3,1,1)
  (same comment as for Vanadium, ion)
- Nitrogen [water, surface water]: 4.02531e-6 kg; source Jungbluth, N. 2007, p. Tab. 12.26, p. 238; lognormal variance with pedigree 0.032, pedigree (1,1,3,1,1)
  (same comment as for Vanadium, ion)
- Water [water, unspecified]: 0.000329157 m3; name water_to_water_unspecified; = (water_softened_input/1000)*(1-fraction_WCS_to_air)+(water_decarbonised_input/1000)*(1-fraction_WDC_to_air)+water_cooling_UNO_input*(1-fraction_CW_to_air)*(efficiency_oil_country/3.6); lognormal variance with pedigree 0.130025, pedigree (4,4,5,2,4)
  Calculated value based on literature values and expert opinion. See comments in the parametres" comment field.
  property fraction, origin: unspecified 0.992149; name fraction_origin_unspecified_Ww
  property fraction, origin: salt water 0; name fraction_origin_salt_water_Ww
  property fraction, origin: fresh water 0.00785115; name fraction_origin_fresh_water_Ww
- Hydrocarbons, aromatic [air, urban air close to ground]: 5.24384e-9 kg; source Jungbluth, N. 2007; lognormal variance with pedigree 0.092, pedigree (1,1,3,1,1)
  (same comment as for Methanol)
- Vanadium [air, urban air close to ground]: 1.47881e-6 kg; source Jungbluth, N. 2007; lognormal variance with pedigree 1.392, pedigree (1,1,3,1,1)
  (same comment as for Cobalt)
- Cobalt [water, surface water]: 1.17757e-10 kg; source Jungbluth, N. 2007, p. Tab. 12.26, p. 238; lognormal variance with pedigree 0.002, pedigree (1,1,3,1,1)
  (same comment as for Vanadium, ion)
- Carbon monoxide, fossil [air, urban air close to ground]: 4.92935e-6 kg; source Jungbluth, N. 2007, p. Tab. 12.13, p. 229; lognormal variance with pedigree 0.162, pedigree (1,1,3,1,1)
  Calculation from ranges
  Amount was scaled to the amount of reference product.
- Calcium [air, urban air close to ground]: 1.47881e-8 kg; source Jungbluth, N. 2007, p. Tab. 12.25; lognormal variance with pedigree 0.1007, pedigree (3,3,5,3,3)
  Literature
  Amount was scaled to the amount of reference product.
- Lead [water, surface water]: 2.45915e-9 kg; source Jungbluth, N. 2007, p. Tab. 12.26, p. 238; lognormal variance with pedigree 0.502, pedigree (1,1,3,1,1)
  (same comment as for Vanadium, ion)
- Water [air, unspecified]: 4.62043e-6 m3; name water_to_air_unspecified; = (water_softened_input/1000)*fraction_WCS_to_air+(water_decarbonised_input/1000)*fraction_WDC_to_air+water_cooling_UNO_input*fraction_CW_to_air*(efficiency_oil_country/3.6); lognormal variance with pedigree 0.130025, pedigree (4,4,5,2,4)
  (same comment as for Water)
  property fraction, origin: unspecified 0.976644; name fraction_origin_unspecified
  property fraction, origin: salt water 0; name fraction_origin_salt_water
  property fraction, origin: fresh water 0.023356; name fraction_origin_fresh_water
- Nickel [air, urban air close to ground]: 4.0815e-7 kg; source Jungbluth, N. 2007; lognormal variance with pedigree 1.212, pedigree (1,1,3,1,1)
  (same comment as for Cobalt)
- Formaldehyde [air, urban air close to ground]: 3.93298e-7 kg; source Jungbluth, N. 2007, p. Tab. 12.19, Tab. 12.20; lognormal variance with pedigree 0.092, pedigree (1,1,3,1,1)
  (same comment as for Methanol)
- DOC, Dissolved Organic Carbon [water, surface water]: 5.06343e-7 kg; source Jungbluth, N. 2007; lognormal variance with pedigree 0.002, pedigree (1,1,3,1,1)
  Calculated as equal to TOC.
  Amount was scaled to the amount of reference product.
- Acetone [air, urban air close to ground]: 1.28424e-7 kg; source Jungbluth, N. 2007; lognormal variance with pedigree 0.092, pedigree (1,1,3,1,1)
  (same comment as for Methanol)

## Sampling procedure
Literature, environmental reports and questionnaires

## Extrapolations
Data are originally from sources from the 90ies. Uncertainty has been adjusted accordingly.

## Review by Carl Vadenbo 2015-07-24
The update of the whole electricity sector for the ecoinvent v3.2 database consist of hundreds of datasets. All these datasets have passed through a streamlined review processes where the underlying modelling of production volumes, technology shares and efficiencies was reviewed in detail prior to the datasets being submitted to the database.
