# onion production

Dataset: EcoSpold 2, unit process
Geography: IN
Time period: 2015-01-01 to 2021-12-31
Technology level: current
Classification: ISIC rev.4 ecoinvent: 0113:Growing of vegetables and melons, roots and tubers
Scenario: Business-as-Usual
System model: Allocation, cut-off by classification
Generated by: Dhanesh Chandra
Database: ecoinvent
isCopyrightProtected: true
accessRestrictedTo: 1

## General comment
This dataset represents the production of 1 kg of fresh Onion during December, 2016 -April, 2017 at a farm located in village Vadner Bhairav, District Nashik of Maharashtra. In this area, fields are irrigated with ground water using electric pump for surface irrigation. The farm has a yield of 43,750 kg fresh matter per ha for this crop cycle. Sowing date for the crop is 28-December, 2016 and harvesting date is 15-April, 2017. Mineral NPK fertilizer input is 105-198.75-215 kg/ha. Herbicide used has active ingredient as Oxyfluorfen 150g/ha. Fungicides used has active ingredient as Mancozeb 1875g/ha. Insecticides used has active ingredient as Profenofos 750g/ha, Cypermethrin 75g/ha. Machinery is used for soil cultivation with fuel consumption of 12.48 kg/ha using plough, hoeing, earthed up and rotary cultivator for soil tillage, Machines used for plant protection with fuel consumption of 2.08 kg/ha using Pesticides spray.

## Included activities start
This activity starts about nine weeks after the harvest of the previous crop. The soil is prepared for cultivation in December and sowing of seeds started about three weeks after soil preparation. Thereafter the crop is mature for harvesting in about 3 months.

## Included activities end
The activity ends with the harvesting of the mature Onion plant.

## Technology
Cultivation of Onion follows conventional production standards

## Time period
Soil cultivating date for the main crop: 28- December, 2016; Harvesting date main crop: 15-April, 2017. The soil cultivation, sowing and harvesting dates are taken as the middle date of the week or fortnight told to the data collector by the farmer. Total time from date of sowing to date of harvesting comes to 85 days. The data is collected for one crop cycle. The cycle of one year is considered for entry in ecoeditor.

## Reference product
- onion: 1 kg; CPC 01253: Onions; By-product classification allocatable product
  production volume 2.09312e10 kg; = 20931.23*1000*1000
    http://agriexchange.apeda.gov.in/India%20Production/India_Productions.aspx?cat=Vegetables&hscode=1080 Production volume for 2015-16 figure given in thousand tonnes
  property price 0.322 EUR2005
    Calculated from the trade statistics for the year 2005 published by the UN (COMTRADE database, accessed 20151105) as an average of 5 biggest importers of onion in the world; USA, UK, RU, DE and MY. Comtrade cathegory: 70310: Onions and shallots, fresh or chilled.

## Inputs from technosphere
- [sulfonyl]urea-compound: 3.42857e-6 kg; lognormal variance with pedigree 0.0034, pedigree (2,4,2,1,1)
  The data was collected for a hectare area through interview
  properties: dry mass 1 kg, carbon content, fossil 0.540853, wet mass 1 kg
- onion seedling, for planting: 7.54717e-5 unit; lognormal variance with pedigree 0.0034, pedigree (2,4,2,1,1)
  The data was collected for a hectare area through interview
  properties: carbon content, non-fossil 1, dry mass 0.03 kg, wet mass 0.03 kg
- tillage, hoeing and earthing-up, potatoes: 2.51492e-5 ha; lognormal variance with pedigree 0.0034, pedigree (2,4,2,1,1)
  The data was collected for a hectare area through interview
- mancozeb: 4.28571e-5 kg; lognormal variance with pedigree 0.0034, pedigree (2,4,2,1,1)
  The data was collected for a hectare area through interview
  properties: wet mass 1 kg, dry mass 1 kg, carbon content, fossil 0.17759
- packaging, for fertilisers: 0.0237143 kg; lognormal variance with pedigree 0.0514, pedigree (4,3,2,5,4)
  Total amount of active substance/s of fertilisers needed for the production of 'onion' is calculated to be circa 1.19E-02 kg. Fertiliser/s used in this dataset is/are: 'nitrogen fertiliser, as N', 'phosphate fertiliser, as P2O5', 'potassium chloride, as K2O', 'potassium fertiliser, as K2O', 'urea, as N'. The total amount of active substance/s is doubled in order to account for the packaging of the dilluted product of fertiliser/s that is/are applied. Therefore, 2.37E-02 kg of packaging for fertilisers is justified with this exchange.
  properties: dry mass 1 kg, wet mass 1 kg, price 0.0642 EUR2005, carbon content, fossil 0.825301, heating value, net 25.01 MJ
  note on carbon content, fossil: Considering a chemical formula (C2H4)n for polyethylene, carbon content-fossil is calculated to be 0.856286 kg of Carbon per kg of dry mass.
- pyrethroid-compound: 1.71429e-6 kg; lognormal variance with pedigree 0.0108, pedigree (4,4,2,1,1)
  The data was collected for a hectare area through interview
  properties: carbon content, fossil 0.623, dry mass 1 kg, wet mass 1 kg
- potassium chloride: 0.00544517 kg; lognormal variance with pedigree 0.0034, pedigree (2,4,2,1,1)
  The exchange has been updated from 'potassium chloride, as K2O' into 'potassium chloride' and therefore its amount has been scaled (multiplied) from 0.0034 kg by 1.5829 kg of 'potassium chloride' per kg of 'potassium chloride, as K2O'. Original comment of the exchange is: The data was collected for a hectare area through interview
  properties: dry mass 1 kg, wet mass 1 kg
- land use change, annual crop: 7.16418e-6 ha; lognormal variance with pedigree 0.0108, pedigree (4,4,2,1,1)
  Calculated Value. This value has been calculated by using the ecoinvent LCI calculation tool for crop production
- inorganic phosphorus fertiliser, as P2O5: 0.00454286 kg; lognormal variance with pedigree 0.0034, pedigree (2,4,2,1,1)
  This exchange is an aggregation of amounts:
  0.0017262857142857145. Comment:
  0.0013174285714285714. Comment:
  0.0014991428571428573. Comment:
  properties: dry mass 1 kg, wet mass 1 kg
- inorganic potassium fertiliser, as K2O: 0.00147429 kg; lognormal variance with pedigree 0.0034, pedigree (2,4,2,1,1)
  The data was collected for a hectare area through interview
  properties: wet mass 1 kg, dry mass 1 kg
- tillage, rotary cultivator: 6.23222e-6 ha; lognormal variance with pedigree 0.0108, pedigree (4,4,2,1,1)
  The data was collected for a hectare area through interview
- inorganic nitrogen fertiliser, as N: 0.00108 kg; lognormal variance with pedigree 0.0034, pedigree (2,4,2,1,1)
  This exchange is an aggregation of amounts:
  5.04E-4. Comment:
  5.76E-4. Comment:
  properties: dry mass 1 kg, wet mass 1 kg
- organophosphorus-compound, unspecified: 1.71429e-5 kg; lognormal variance with pedigree 0.0108, pedigree (4,4,2,1,1)
  The data was collected for a hectare area through interview
  properties: carbon content, fossil 0.260898, wet mass 1 kg, dry mass 1 kg
- urea: 0.00282981 kg; lognormal variance with pedigree 0.0034, pedigree (2,4,2,1,1)
  The exchange has been updated from 'urea, as N' into 'urea' and therefore its amount has been scaled (multiplied) from 0.0013 kg by 2.1438 kg of 'urea' per kg of 'urea, as N'. Original comment of the exchange is: The data was collected for a hectare area through interview
  properties: carbon content, fossil 0.2, wet mass 1 kg, dry mass 1 kg
- tillage, ploughing: 3.36683e-6 ha; lognormal variance with pedigree 0.0108, pedigree (4,4,2,1,1)
  The data was collected for a hectare area through interview
- packaging, for pesticides: 0.000130286 kg; lognormal variance with pedigree 0.0514, pedigree (4,3,2,5,4)
  Total amount of active substance/s of pesticides needed for the production of onion is calculated to be circa 6.51E-05 kg. Pesticide/s used in this dataset is/are: '[sulfonyl]urea-compound', 'mancozeb', 'organophosphorus-compound, unspecified', 'pyrethroid-compound'. The total amount of active substance/s is doubled in order to account for the packaging of the dilluted product of pesticide/s that is/are applied. Therefore, 1.30E-04 kg of packaging for pesticides is justified with this exchange.
  properties: carbon content, fossil 0.85714, wet mass 1 kg, dry mass 1 kg, heating value, net 25.97 MJ, price 0.0642 EUR2005
- irrigation: 1.23429e-5 m3; lognormal variance with pedigree 0.0034, pedigree (2,4,2,1,1)
  The data was collected for a hectare area through interview
  properties: dry mass 0.11 kg, wet mass 1000 kg, water content 9089.91
- application of plant protection product, by field sprayer: 2.7013e-5 ha; lognormal variance with pedigree 0.0034, pedigree (2,4,2,1,1)
  Pesticide Spray

## Inputs from nature
- Transformation, from annual crop, irrigated [natural resource, land]: 0.228571 m2; lognormal variance with pedigree 0.0108, pedigree (2,4,2,1,1)
  Calculated Value. This value has been calculated by using the ecoinvent LCI calculation tool for crop production.
- Occupation, annual crop, irrigated [natural resource, land]: 0.104762 m2*year; lognormal variance with pedigree 0.0048, pedigree (2,4,2,1,1)
  (same comment as for Transformation, from annual crop, irrigated)
- Transformation, to annual crop, irrigated [natural resource, land]: 0.228571 m2; lognormal variance with pedigree 0.0108, pedigree (2,4,2,1,1)
  (same comment as for Transformation, from annual crop, irrigated)
- Energy, gross calorific value, in biomass [natural resource, biotic]: 2.03861 MJ; lognormal variance with pedigree 0.0034, pedigree (2,4,2,1,1)
  The data was collected for a hectare area through interview
- Carbon dioxide, in air [natural resource, in air]: 0.17727 kg; lognormal variance with pedigree 0.0034, pedigree (2,4,2,1,1)
  (same comment as for Transformation, from annual crop, irrigated)

## Emissions to nature
- Water [water, surface water]: 1.23429e-6 m3; lognormal variance with pedigree 0.0034, pedigree (2,4,2,1,1)
  (same comment as for land use change, annual crop)
- Phosphorus [water, surface water]: 8.39959e-5 kg; lognormal variance with pedigree 0.0428, pedigree (2,4,2,1,1)
  (same comment as for Transformation, from annual crop, irrigated)
- Water [water, ground-]: 4.81371e-6 m3; lognormal variance with pedigree 0.0034, pedigree (2,4,2,1,1)
  (same comment as for land use change, annual crop)
- Ammonia [air, non-urban air or from high stacks]: 0.000363306 kg; lognormal variance with pedigree 0.0108, pedigree (2,4,2,1,1)
  (same comment as for land use change, annual crop)
- Zinc, ion [water, ground-]: 3.1324e-7 kg; lognormal variance with pedigree 0.0928, pedigree (2,4,2,1,1)
  (same comment as for land use change, annual crop)
- Nitrate [water, ground-]: 0.00293121 kg; lognormal variance with pedigree 0.0428, pedigree (2,4,2,1,1)
- Mancozeb [soil, agricultural]: 4.28571e-5 kg; lognormal variance with pedigree 0.0352, pedigree (1,4,2,1,1)
  (same comment as for land use change, annual crop)
- Nickel, ion [water, surface water]: 9.11733e-7 kg; lognormal variance with pedigree 0.0928, pedigree (2,4,2,1,1)
  (same comment as for land use change, annual crop)
- Oxyfluorfen [soil, agricultural]: 3.42857e-6 kg; lognormal variance with pedigree 0.0358, pedigree (2,4,2,1,1)
  (same comment as for land use change, annual crop)
- Zinc, ion [water, surface water]: 2.59656e-6 kg; lognormal variance with pedigree 0.0928, pedigree (2,4,2,1,1)
  (same comment as for land use change, annual crop)
- Zinc [soil, unspecified]: 0 kg
  (same comment as for land use change, annual crop)
- Mercury [water, surface water]: 2.76075e-9 kg; lognormal variance with pedigree 0.0928, pedigree (2,4,2,1,1)
  (same comment as for land use change, annual crop)
- Nickel [soil, agricultural]: -5.70267e-7 kg
  (same comment as for land use change, annual crop)
- Lead [water, ground-]: 5.39769e-9 kg; lognormal variance with pedigree 0.0928, pedigree (2,4,2,1,1)
  (same comment as for land use change, annual crop)
- Mercury [water, ground-]: 1.19444e-11 kg; lognormal variance with pedigree 0.0928, pedigree (2,4,2,1,1)
  (same comment as for land use change, annual crop)
- Lead [water, surface water]: 8.74123e-7 kg; lognormal variance with pedigree 0.0928, pedigree (2,4,2,1,1)
  (same comment as for land use change, annual crop)
- Mercury [soil, agricultural]: -4.11944e-9 kg; normal variance with pedigree 0.0028, pedigree (2,4,2,1,1)
  (same comment as for land use change, annual crop)
- Copper, ion [water, surface water]: 1.5402e-6 kg; lognormal variance with pedigree 0.0928, pedigree (2,4,2,1,1)
  (same comment as for land use change, annual crop)
- Profenofos [soil, agricultural]: 1.71429e-5 kg; lognormal variance with pedigree 0.0358, pedigree (2,4,2,1,1)
  (same comment as for land use change, annual crop)
- Copper [soil, agricultural]: -1.73478e-6 kg
  (same comment as for land use change, annual crop)
- Lead [soil, agricultural]: 8.13777e-8 kg; lognormal variance with pedigree 0.0428, pedigree (2,4,2,1,1)
  (same comment as for land use change, annual crop)
- Copper, ion [water, ground-]: 3.62474e-8 kg; lognormal variance with pedigree 0.0928, pedigree (2,4,2,1,1)
  (same comment as for land use change, annual crop)
- Chromium [soil, agricultural]: 1.00212e-6 kg; lognormal variance with pedigree 0.0428, pedigree (2,4,2,1,1)
  (same comment as for land use change, annual crop)
- Chromium, ion [water, surface water]: 1.08652e-6 kg; lognormal variance with pedigree 0.0928, pedigree (2,4,2,1,1)
  (same comment as for land use change, annual crop)
- Water [air, non-urban air or from high stacks]: 6.29486e-6 m3; lognormal variance with pedigree 0.0034, pedigree (2,4,2,1,1)
  (same comment as for land use change, annual crop)
- Chromium, ion [water, ground-]: 2.18622e-7 kg; lognormal variance with pedigree 0.0928, pedigree (2,4,2,1,1)
  (same comment as for land use change, annual crop)
- Cadmium [soil, agricultural]: 2.04916e-7 kg; lognormal variance with pedigree 0.0428, pedigree (2,4,2,1,1)
  (same comment as for land use change, annual crop)
- Cadmium, ion [water, ground-]: 5.08042e-10 kg; lognormal variance with pedigree 0.0928, pedigree (2,4,2,1,1)
  (same comment as for land use change, annual crop)
- Carbon dioxide, fossil [air, non-urban air or from high stacks]: 0.00207374 kg; lognormal variance with pedigree 0.0034, pedigree (2,4,2,1,1)
  (same comment as for land use change, annual crop)
- Phosphate [water, surface water]: 8.41445e-6 kg; lognormal variance with pedigree 0.0428, pedigree (2,4,2,1,1)
  (same comment as for land use change, annual crop)
- Cypermethrin [soil, agricultural]: 1.71429e-6 kg; lognormal variance with pedigree 0.0358, pedigree (2,4,2,1,1)
  (same comment as for land use change, annual crop)
- Dinitrogen monoxide [air, non-urban air or from high stacks]: 5.09082e-5 kg; lognormal variance with pedigree 0.0328, pedigree (2,4,2,1,1)
  (same comment as for land use change, annual crop)
- Cadmium, ion [water, surface water]: 1.21726e-8 kg; lognormal variance with pedigree 0.0928, pedigree (2,4,2,1,1)
  (same comment as for land use change, annual crop)
- Nitrogen oxides [air, non-urban air or from high stacks]: 0.000147188 kg; lognormal variance with pedigree 0.0428, pedigree (2,4,2,1,1)
  (same comment as for land use change, annual crop)
- Phosphate [water, ground-]: 2.24854e-6 kg; lognormal variance with pedigree 0.0428, pedigree (2,4,2,1,1)
  (same comment as for land use change, annual crop)
- Zinc [soil, agricultural]: 1.71657e-6 kg; lognormal variance with pedigree 0.0428, pedigree (2,4,2,1,1)
  (same comment as for land use change, annual crop)

## Sampling procedure
The farmer was identified and contacted by agriculture science faculty familiar with the local farmers in the region. Data was collected directly from the farmer through semi-structured interview using a questionnaire based on the input requirements of the ecoinvent LCI calculation tool for crop production. The farmer does not maintain any written records and has provided the data from recent memory. In this region, typically farmers are unable to provide exact name of active ingredient in the pesticide they use and the same was noted from details given on the pesticide packet. Individual farmer is not able to calculate fuel consumption for his own farm alone and this information has been collected from farming community of the area.

## Extrapolations
This dataset has been extrapolated from year 2018 to the year of the calculation (2021). The uncertainty has been adjusted accordingly.

## Review by Assumpció ANTON 2018-02-21
Be aware to remove the mention to ALCIG from all flows that bear it. Cite “Ecoinvent LCI calculation tool for crop production” instead
