# rye production, Swiss integrated production, extensive

Dataset: EcoSpold 2, unit process
Geography: CH
Time period: 1996-01-01 to 2021-12-31
Technology level: current
Classification: ISIC rev.4 ecoinvent: 0111:Growing of cereals (except rice), leguminous crops and oil seeds
Synonyms: Secale cereale L.
Scenario: Business-as-Usual
System model: Allocation, cut-off by classification
Share of production covered: 77 %
Generated by: Thomas Nemecek
Published in: Nemecek, T. 2007
Database: ecoinvent
isCopyrightProtected: true
accessRestrictedTo: 1

## General comment
This dataset represents the cultivation of rye on an area of 1 ha producing the co-products rye grain and straw. The yield of rye grain is 5969 kg/ha at a moisture content at storage of 15%, the yield of straw is 8140 kg/ha at a moisture content of 15%.
[This dataset was already contained in the ecoinvent database version 2. It was not individually updated during the transfer to ecoinvent version 3. Life Cycle Impact Assessment results may still have changed, as they are affected by changes in the supply chain, i.e. in other datasets. This dataset was generated following the ecoinvent quality guidelines for version 2. It may have been subject to central changes described in the ecoinvent version 3 change report (http://www.ecoinvent.org/database/ecoinvent-version-3/reports-of-changes/), and the results of the central updates were reviewed extensively. The changes added e.g. consistent water flows and other information throughout the database. The documentation of this dataset can be found in the ecoinvent reports of version 2, which are still available via the ecoinvent website. The change report linked above covers all central changes that were made during the conversion process.]

## Included activities start
This activity starts after the harvest of the previous crop. The inputs of seeds, mineral fertilisers and pesticides are considered. Farm manure as an organic fertiliser is only accounted for in terms of direct field emissions; all pre-processes are included in the animal production systems.

## Included activities end
The dataset includes all machine operations and corresponding machine infrastructure and sheds. Machine operations are: soil cultivation, sowing, fertilisation, weed control, pest and pathogen control, combine-harvest, transport from field to regional processing centre (10 km) and drying of grains. Further, direct field emissions are included. This activity ends after drying of grains at the regional processing centre.

## Geography
Refers to an average production in the Swiss lowlands.

## Technology
Integrated production with extensive plant protection (no fungicides, insecticides and growth regulators)

## Time period
The yield data have been collected for the years 1996-2003.

## Parameters
- fraction, irrigation water, to ground water: 0.8 dimensionless; name fraction_IW_to_ground_water; lognormal variance with pedigree 0.0886, pedigree (4,3,1,1,4)
  Literature value (Döll, 2011) cross referenced with expert opinion.
- fraction, irrigation water, to air: 0.3353 dimensionless; name fraction_IW_to_air; lognormal variance with pedigree 0.0409, pedigree (2,2,2,1,1)
  Literature value (Siebert, 2010) (Vionnet, S., Quantis Water Database - Technical Report, 2012).
- fraction, irrigation water to surface water: 0.2 dimensionless; name fraction_IW_to_surface_water; lognormal variance with pedigree 0.0886, pedigree (4,3,1,1,4)
  Literature value (Döll, 2011) cross referenced with expert opinion.

## Reference product
- rye grain, Swiss integrated production: 1 kg; name REF_PRODUCT; CPC 01162: Rye, other; By-product classification allocatable product
  production volume 4.21173e6 kg
    CH prod. of rye: 11300t in 2004. % repr refers to fract of tot area in lowlands
    Area with rye in 2004 1680 ha ; 42% extensive ; 5969 kg/ha
  property price 0.109 EUR2005; name REF_PRODUCT_price_EUR2005
    Temporary price data. Calculated as 90% of purchasers price based on: 2004 prices for World import/export data (tonnes and US$) from FaoStat statistics (http://faostat.fao.org/site/535/default.aspx#ancor, TRADE)- [Accessed 24 May 2010].
  property carbon content, non-fossil 0.465305; name REF_PRODUCT_C_content_non_fossil
    biogene carbon content on a dry matter basis
    Composition data obtained from Rye, in (http://www.nal.usda.gov/fnic/foodcomp/search/). First, composition data were refered to 1 kg dry mass. Then, C-contents were calculated considering a C-content/dry mass of 46% in carbohydrates (including fibres), 53% in proteins and 75% in fats. All data from 'Evolutionary and Biochemical Aspects', A.D. Kay and T. Vrede (in Global Ecology, 2010, Elsevier B.V., S.E. Jørgensen Ed.).
  property energy content 15.1895 MJ; name REF_PRODUCT_energy_content
    See chapter 'Product Properties' in '01_crop production - yields & inputs CH & Europe_v1.0.pdf', section 'AGRICULTURAL PRODUCTION IN SWITZERLAND' - pdf-document on the dedicated talk page of ecoinvent (www.ecoinvent.org/documentation)
  property dry mass 0.85 kg; name REF_PRODUCT_DM
  property carbon content 0.465305
    carbon content on a dry matter basis (reserved; not for manual entry)
  property true value 650.643; name REF_PRODUCT_true_value
    allocation property applied in "true value" allocation // value calculated from revenue
  properties: water in wet mass 0.15 kg, carbon content, fossil 0, wet mass 1 kg, water content 0.176471, carbon allocation 0.39551 kg

## By-products
- straw: 0 kg; name BY_PRODUCT; CPC 01913: Cereal straw, husks, unprepared, ground, pressed, or in the form of pellets; By-product classification allocatable product
  production volume 2.79982e6 kg
    CH prod. of rye: 11300t in 2004. % repr refers to fract of tot area in lowlands
    Area with rye in 2004 1680 ha ; 42% extensive ; 3968 kg/ha
  property heating value, net 14.25 MJ
    Literature value, Source: Phyllis2, database for (treated) biomass, algae, feedstocks for biogas production and biochar, https://phyllis.nl/Biomass/View/1271, ECN.TNO
  property dry mass 0.85 kg; name BY_PRODUCT_DM
  property energy content 17.459 MJ; name BY_PRODUCT_energy_content
    (same comment as for rye grain, Swiss integrated production)
  property carbon content, non-fossil 0.437377; name BY_PRODUCT_C_content_non_fossil
    biogene carbon content on a dry matter basis
    Composition data obtained as the average of those of Rye straw (http://beefmagazine.com/images/2009%20feed%20table.pdf), and Barley straw and Wheat straw (http://www.uwex.edu/ces/crops/uwforage/StrawFOF.pdf). First, composition data were refered to 1 kg dry mass. Then, C-contents were calculated considering a C-content/dry mass of 46% in carbohydrates (including fibres), 53% in proteins and 75% in fats. All data from 'Evolutionary and Biochemical Aspects', A.D. Kay and T. Vrede (in Global Ecology, 2010, Elsevier B.V., S.E. Jørgensen Ed.).
  property price 0.012 EUR2005; name BY_PRODUCT_price_EUR2005
    Temporary price data. Calculated as 90% of purchasers price based on: Based on price allocation ratio from EcoInvent v2 report number 17, page 118.
  property carbon content 0.437377
    carbon content on a dry matter basis (reserved; not for manual entry)
  property true value 47.6184; name BY_PRODUCT_true_value
    allocation property applied in "true value" allocation // value calculated from revenue
  properties: wet mass 1 kg, carbon content, fossil 0, water in wet mass 0.15 kg, water content 0.176471, carbon allocation 0.37177 kg

## Inputs from technosphere
- dinitroaniline-compound: 6.55629e-5 kg; lognormal variance with pedigree 0.0407, pedigree (2,2,5,1,1)
  See chapter 'Yields and Inputs of Arable Crop Production' in '01_crop production - yields & inputs CH & Europe_v1.0.pdf', section 'AGRICULTURAL PRODUCTION IN SWITZERLAND' - pdf-document on the dedicated talk page of ecoinvent (www.ecoinvent.org/documentation)
  See chapter 'Yields and Inputs of Arable Crop Production' in '01_crop production - yields & inputs CH & Europe_v1.0.pdf', section 'AGRICULTURAL PRODUCTION IN SWITZERLAND' - pdf-document on the dedicated talk page of ecoinvent (www.ecoinvent.org/documentation)
  properties: wet mass 1 kg, dry mass 1 kg, carbon content, fossil 0.55516
  note on carbon content, fossil: C content of dinitroaniline-compound was calculated after the C content of the herbicide pendimethalin, classified as dinitroaniline-compound in Tab 2.25 of Sutter 2010
- packaging, for fertilisers: 0.0534599 kg; lognormal variance with pedigree 0.0912, pedigree (4,3,5,5,4)
  Total amount of active substance/s of fertilisers needed for the production of 'rye grain, Swiss integrated production' is calculated to be circa 1.71E+02 kg. Fertiliser/s used in this dataset is/are: 'ammonium nitrate, as N', 'ammonium sulfate, as N', 'nitrogen fertiliser, as N', 'phosphate fertiliser, as P2O5', 'phosphate rock, as P2O5, beneficiated, dry', 'potassium chloride, as K2O', 'potassium sulfate, as K2O', 'urea, as N'. The total amount of active substance/s is doubled in order to account for the packaging of the dilluted product of fertiliser/s that is/are applied. Therefore, 3.42E+02 kg of packaging for fertilisers is justified with this exchange.
  properties: dry mass 1 kg, price 0.0642 EUR2005, carbon content, fossil 0.825301, wet mass 1 kg, heating value, net 25.01 MJ
  note on carbon content, fossil: Considering a chemical formula (C2H4)n for polyethylene, carbon content-fossil is calculated to be 0.856286 kg of Carbon per kg of dry mass.
- bale loading: 0.00387149 unit; lognormal variance with pedigree 0.0406, pedigree (2,1,5,1,1)
  See chapter 'Yields and Inputs of Arable Crop Production' in '01_crop production - yields & inputs CH & Europe_v1.0.pdf', section 'AGRICULTURAL PRODUCTION IN SWITZERLAND' - pdf-document on the dedicated talk page of ecoinvent (www.ecoinvent.org/documentation)
  This exchange has an activity link directly to the producing activity because the product is primarily consumed in the same geographical area where it is produced.
- fertilising, by broadcaster: 0.000468306 ha; lognormal variance with pedigree 0.0406, pedigree (2,1,5,1,1)
  (same comment as for bale loading)
- phosphate rock, beneficiated: 0.00624555 kg; lognormal variance with pedigree 0.0406, pedigree (2,1,5,1,1)
  The exchange has been updated from 'phosphate rock, as P2O5, beneficiated, dry' into 'phosphate rock, beneficiated' and therefore its amount has been scaled (multiplied) from 12.803 kg by 3.125 kg of 'phosphate rock, beneficiated' per kg of 'phosphate rock, as P2O5, beneficiated, dry'. Original comment of the exchange is: See chapter 'Yields and Inputs of Arable Crop Production' in '01_crop production - yields & inputs CH & Europe_v1.0.pdf', section 'AGRICULTURAL PRODUCTION IN SWITZERLAND' - pdf-document on the dedicated talk page of ecoinvent (www.ecoinvent.org/documentation)
  See chapter 'Yields and Inputs of Arable Crop Production' in '01_crop production - yields & inputs CH & Europe_v1.0.pdf', section 'AGRICULTURAL PRODUCTION IN SWITZERLAND' - pdf-document on the dedicated talk page of ecoinvent (www.ecoinvent.org/documentation)
  properties: wet mass 1 kg, dry mass 1 kg
- tillage, harrowing, by spring tine harrow: 0.000312204 ha; lognormal variance with pedigree 0.0406, pedigree (2,1,5,1,1)
  (same comment as for bale loading)
- rye seed, Swiss integrated production, for sowing: 0.0218543 kg; name SEED; lognormal variance with pedigree 0.0406, pedigree (2,1,5,1,1)
  (same comment as for dinitroaniline-compound)
  property energy content 15.1895 MJ; name SEED_energy_content
  property dry mass 0.85 kg; name SEED_DM
  property carbon content, non-fossil 0.465305; name SEED_C_content_non_fossil
  properties: wet mass 1 kg, water content 0.176471
  note on energy content: See chapter 'Product Properties' in '01_crop production - yields & inputs CH & Europe_v1.0.pdf', section 'AGRICULTURAL PRODUCTION IN SWITZERLAND' - pdf-document on the dedicated talk page of ecoinvent (www.ecoinvent.org/documentation)
  note on carbon content, non-fossil: biogene carbon content on a dry matter basis Composition data obtained from Rye, in (http://www.nal.usda.gov/fnic/foodcomp/search/). First, composition data were refered to 1 kg dry mass. Then, C-contents were calculated considering a C-content/dry mass of 46% in carbohydrates (including fibres), 53% in proteins and 75% in fats. All data from 'Evolutionary and Biochemical Aspects', A.D. Kay and T. Vrede (in Global Ecology, 2010, Elsevier B.V., S.E. Jørgensen Ed.).
- application of plant protection product, by field sprayer: 0.000187322 ha; lognormal variance with pedigree 0.0406, pedigree (2,1,5,1,1)
  (same comment as for bale loading)
- ammonium sulfate: 0.000464138 kg; lognormal variance with pedigree 0.0406, pedigree (2,1,5,1,1)
  (same comment as for dinitroaniline-compound)
  properties: wet mass 1 kg, dry mass 1 kg
- potassium sulfate: 0.000647163 kg; lognormal variance with pedigree 0.0406, pedigree (2,1,5,1,1)
  The exchange has been updated from 'potassium sulfate, as K2O' into 'potassium sulfate' and therefore its amount has been scaled (multiplied) from 2.241 kg by 1.85 kg of 'potassium sulfate' per kg of 'potassium sulfate, as K2O'. Original comment of the exchange is: See chapter 'Yields and Inputs of Arable Crop Production' in '01_crop production - yields & inputs CH & Europe_v1.0.pdf', section 'AGRICULTURAL PRODUCTION IN SWITZERLAND' - pdf-document on the dedicated talk page of ecoinvent (www.ecoinvent.org/documentation)
  See chapter 'Yields and Inputs of Arable Crop Production' in '01_crop production - yields & inputs CH & Europe_v1.0.pdf', section 'AGRICULTURAL PRODUCTION IN SWITZERLAND' - pdf-document on the dedicated talk page of ecoinvent (www.ecoinvent.org/documentation)
  properties: dry mass 1 kg, wet mass 1 kg
- drying of bread grain, seed and legumes: 0.0110929 l; lognormal variance with pedigree 0.0406, pedigree (2,1,5,1,1)
  (same comment as for bale loading)
- potassium chloride: 0.0084422 kg; lognormal variance with pedigree 0.0406, pedigree (2,1,5,1,1)
  The exchange has been updated from 'potassium chloride, as K2O' into 'potassium chloride' and therefore its amount has been scaled (multiplied) from 34.166 kg by 1.5829 kg of 'potassium chloride' per kg of 'potassium chloride, as K2O'. Original comment of the exchange is: See chapter 'Yields and Inputs of Arable Crop Production' in '01_crop production - yields & inputs CH & Europe_v1.0.pdf', section 'AGRICULTURAL PRODUCTION IN SWITZERLAND' - pdf-document on the dedicated talk page of ecoinvent (www.ecoinvent.org/documentation)
  See chapter 'Yields and Inputs of Arable Crop Production' in '01_crop production - yields & inputs CH & Europe_v1.0.pdf', section 'AGRICULTURAL PRODUCTION IN SWITZERLAND' - pdf-document on the dedicated talk page of ecoinvent (www.ecoinvent.org/documentation)
  properties: dry mass 1 kg, wet mass 1 kg
- baling: 0.000890437 unit; lognormal variance with pedigree 0.0406, pedigree (2,1,5,1,1)
  (same comment as for bale loading)
- ammonium nitrate: 0.0175255 kg; lognormal variance with pedigree 0.0406, pedigree (2,1,5,1,1)
  The exchange has been updated from 'ammonium nitrate, as N' into 'ammonium nitrate' and therefore its amount has been scaled (multiplied) from 39.292 kg by 2.8573 kg of 'ammonium nitrate' per kg of 'ammonium nitrate, as N'. Original comment of the exchange is: See chapter 'Yields and Inputs of Arable Crop Production' in '01_crop production - yields & inputs CH & Europe_v1.0.pdf', section 'AGRICULTURAL PRODUCTION IN SWITZERLAND' - pdf-document on the dedicated talk page of ecoinvent (www.ecoinvent.org/documentation)
  See chapter 'Yields and Inputs of Arable Crop Production' in '01_crop production - yields & inputs CH & Europe_v1.0.pdf', section 'AGRICULTURAL PRODUCTION IN SWITZERLAND' - pdf-document on the dedicated talk page of ecoinvent (www.ecoinvent.org/documentation)
  properties: dry mass 1 kg, wet mass 1 kg
- urea: 0.00461785 kg; lognormal variance with pedigree 0.0406, pedigree (2,1,5,1,1)
  The exchange has been updated from 'urea, as N' into 'urea' and therefore its amount has been scaled (multiplied) from 13.799 kg by 2.1438 kg of 'urea' per kg of 'urea, as N'. Original comment of the exchange is: See chapter 'Yields and Inputs of Arable Crop Production' in '01_crop production - yields & inputs CH & Europe_v1.0.pdf', section 'AGRICULTURAL PRODUCTION IN SWITZERLAND' - pdf-document on the dedicated talk page of ecoinvent (www.ecoinvent.org/documentation)
  See chapter 'Yields and Inputs of Arable Crop Production' in '01_crop production - yields & inputs CH & Europe_v1.0.pdf', section 'AGRICULTURAL PRODUCTION IN SWITZERLAND' - pdf-document on the dedicated talk page of ecoinvent (www.ecoinvent.org/documentation)
  properties: carbon content, fossil 0.2, wet mass 1 kg, dry mass 1 kg
- [sulfonyl]urea-compound: 0.000181078 kg; lognormal variance with pedigree 0.0407, pedigree (2,2,5,1,1)
  (same comment as for dinitroaniline-compound)
  properties: carbon content, fossil 0.540853, wet mass 1 kg, dry mass 1 kg
  note on carbon content, fossil: Approximated as an unweighted average of the C-content of the [sulfonyl]urea-compounds (Tab 2.25 Sutter, 2010) chlorotoluron, Diuron, Linuron and Isoproturon.
- combine harvesting: 0.000156102 ha; lognormal variance with pedigree 0.0406, pedigree (2,1,5,1,1)
  (same comment as for bale loading)
- tillage, cultivating, chiselling: 0.000156102 ha; lognormal variance with pedigree 0.0406, pedigree (2,1,5,1,1)
  (same comment as for bale loading)
- inorganic nitrogen fertiliser, as N: 0.00398636 kg; lognormal variance with pedigree 0.0406, pedigree (2,1,5,1,1)
  (same comment as for dinitroaniline-compound)
  properties: dry mass 1 kg, wet mass 1 kg
- tillage, ploughing: 0.000156102 ha; lognormal variance with pedigree 0.0406, pedigree (2,1,5,1,1)
  (same comment as for bale loading)
- pesticide, unspecified: 4.68306e-6 kg; lognormal variance with pedigree 0.0407, pedigree (2,2,5,1,1)
  (same comment as for dinitroaniline-compound)
  properties: dry mass 1 kg, carbon content, fossil 0.486978, wet mass 1 kg
  note on carbon content, fossil: Mean of C content in all pesticides whose formula has been documented in Sutter 2010
- inorganic phosphorus fertiliser, as P2O5: 0.00631008 kg; lognormal variance with pedigree 0.0406, pedigree (2,1,5,1,1)
  (same comment as for dinitroaniline-compound)
  properties: dry mass 1 kg, wet mass 1 kg
- irrigation: 0.0105969 m3; name water_irrigation_input; source Siebert, S. 2010; lognormal variance with pedigree 0.0427, pedigree (2,2,5,1,1)
  Calculated based on literature values (Döll, 2010) and partially modelled at ETH (Pfister, S.).
  property wet mass 1000 kg; name WM
  property carbon content, non-fossil 0; name C_content_non_fossil
  property dry mass 0.11 kg; name DM
  property carbon content, fossil 0; name C_content_fossil
  property water content 9089.91; name water_content
  property water in wet mass 999.89 kg; name WWM
- tillage, currying, by weeder: 0.000156102 ha; lognormal variance with pedigree 0.0406, pedigree (2,1,5,1,1)
  (same comment as for bale loading)
- packaging, for pesticides: 0.000507019 kg; lognormal variance with pedigree 0.0912, pedigree (4,3,5,5,4)
  Total amount of active substance/s of pesticides needed for the production of rye grain, Swiss integrated production is calculated to be circa 1.62E+00 kg. Pesticide/s used in this dataset is/are: '[sulfonyl]urea-compound', 'cyclic N-compound', 'dinitroaniline-compound', 'pesticide, unspecified'. The total amount of active substance/s is doubled in order to account for the packaging of the dilluted product of pesticide/s that is/are applied. Therefore, 3.25E+00 kg of packaging for pesticides is justified with this exchange.
  properties: wet mass 1 kg, heating value, net 25.97 MJ, price 0.0642 EUR2005, carbon content, fossil 0.85714, dry mass 1 kg
- cyclic N-compound: 2.18543e-6 kg; lognormal variance with pedigree 0.0407, pedigree (2,2,5,1,1)
  (same comment as for dinitroaniline-compound)
  properties: dry mass 1 kg, wet mass 1 kg, carbon content, fossil 0.641962
  note on carbon content, fossil: Calculated as an unweigthed average of the C content of the cyclic N-compounds where information was avaliable in Sutter, 2010, following the classification in Tab 2.25 in Sutter 2010: Difenoconazole (C19H17Cl2N3O3), Fenpropidin (C19H31N), Fenpropimorph (C20H33NO), Flusilazole (C16H15F2N3Si), Metconazole (C17H22ClN3O), Penconazole (C13H15Cl2N3), Propiconazole (C15H17Cl2N3O2), Tebuconazole (C16H22ClN3O)
- liquid manure spreading, by vacuum tanker: 0.00119808 m3; lognormal variance with pedigree 0.0406, pedigree (2,1,5,1,1)
  (same comment as for bale loading)
- sowing: 0.000156102 ha; lognormal variance with pedigree 0.0406, pedigree (2,1,5,1,1)
  (same comment as for bale loading)
- transport, tractor and trailer, agricultural: 0.00942903 metric ton*km; lognormal variance with pedigree 0.0406, pedigree (2,1,5,1,1)
  (same comment as for dinitroaniline-compound)
- solid manure loading and spreading, by hydraulic loader and spreader: 0.0433964 kg; lognormal variance with pedigree 0.0406, pedigree (2,1,5,1,1)
  (same comment as for bale loading)

## Inputs from nature
- Energy, gross calorific value, in biomass [natural resource, biotic]: 24.636 MJ; lognormal variance with pedigree 0.0411891, pedigree (2,1,5,1,1)
- Transformation, from annual crop, non-irrigated, extensive [natural resource, land]: 1.10832 m2; lognormal variance with pedigree 0.0506, pedigree (2,1,5,1,1)
  Modelled, see chapter 'Land use' in '01_crop production_direct field emissions and natural resources_v1.0.pdf' - pdf-document on the dedicated talk page of ecoinvent (www.ecoinvent.org/documentation)
- Transformation, from pasture, man made, intensive [natural resource, land]: 0.452696 m2; lognormal variance with pedigree 0.0506, pedigree (2,1,5,1,1)
  (same comment as for Transformation, from annual crop, non-irrigated, extensive)
- Occupation, annual crop, non-irrigated, extensive [natural resource, land]: 1.32687 m2*year; lognormal variance with pedigree 0.0406, pedigree (2,1,5,1,1)
  (same comment as for Transformation, from annual crop, non-irrigated, extensive)
- Transformation, to annual crop, non-irrigated, extensive [natural resource, land]: 1.56102 m2; lognormal variance with pedigree 0.0506, pedigree (2,1,5,1,1)
  (same comment as for Transformation, from annual crop, non-irrigated, extensive)
- Carbon dioxide, in air [natural resource, in air]: 2.16401 kg; = 44/12 * (REF_PRODUCT_C_content_non_fossil * REF_PRODUCT * REF_PRODUCT_DM + BY_PRODUCT_C_content_non_fossil * BY_PRODUCT * BY_PRODUCT_DM - SEED_C_content_non_fossil * SEED * SEED_DM); lognormal variance with pedigree 0.0406, pedigree (2,1,5,1,1)
  Modelled,see chapter 'CO2 binding' in '01_crop production_direct field emissions and natural resources_v1.0.pdf' - pdf-document on the dedicated talk page of ecoinvent (www.ecoinvent.org/documentation)

## Emissions to nature
- Nickel, ion [water, surface water]: 2.9074e-7 kg; lognormal variance with pedigree 0.1307, pedigree (2,2,5,1,1)
  Modelled, see chapter 'Emissions of heavy metals to agricultural soil, surface water and ground water' in '01_crop production_direct field emissions and natural resources_v1.0.pdf' - pdf-document on the dedicated talk page of ecoinvent (www.ecoinvent.org/documentation)
- Water [water, ground-]: 0.00563503 m3; name water_to_water_ground; = water_irrigation_input*(1-fraction_IW_to_air)*fraction_IW_to_ground_water; lognormal variance with pedigree 0.1286, pedigree (4,3,5,1,4)
  Calculated value. See the parameters and their comments to understand the calculation.
  property fraction, origin: unspecified 0; name fraction_origin_unspecified_Wgw
  property fraction, origin: salt water 0; name fraction_origin_salt_water_Wgw
  property fraction, origin: fresh water 1; name fraction_origin_fresh_water_Wgw
- Isoproturon [soil, agricultural]: 8.27341e-5 kg; lognormal variance with pedigree 0.0507, pedigree (2,2,5,1,1)
  Modelled, see chapter 'Emissions of pesticides to agricultural soil' in '01_crop production_direct field emissions and natural resources_v1.0.pdf' - pdf-document on the dedicated talk page of ecoinvent (www.ecoinvent.org/documentation)
- Copper [soil, agricultural]: -1.51619e-6 kg
  (same comment as for Nickel, ion)
- Phosphorus [water, surface water]: 1.90257e-5 kg; lognormal variance with pedigree 0.0807, pedigree (2,2,5,1,1)
  Modelled, see chapter 'Emissions of phosphorous to the water' in '01_crop production_direct field emissions and natural resources_v1.0.pdf' - pdf-document on the dedicated talk page of ecoinvent (www.ecoinvent.org/documentation)
- Pendimethalin [soil, agricultural]: 6.55629e-5 kg; lognormal variance with pedigree 0.0507, pedigree (2,2,5,1,1)
  (same comment as for Isoproturon)
- Cadmium, ion [water, surface water]: 4.13514e-9 kg; lognormal variance with pedigree 0.1307, pedigree (2,2,5,1,1)
  (same comment as for Nickel, ion)
- Chromium, ion [water, ground-]: 3.14358e-6 kg; lognormal variance with pedigree 0.1307, pedigree (2,2,5,1,1)
  (same comment as for Nickel, ion)
- Chlortoluron [soil, agricultural]: 9.83443e-5 kg; lognormal variance with pedigree 0.0507, pedigree (2,2,5,1,1)
  (same comment as for Isoproturon)
- Carbon dioxide, fossil [air, non-urban air or from high stacks]: 0.00338179 kg; lognormal variance with pedigree 0.0407, pedigree (2,2,5,1,1)
  Modelled, see chapter 'Release of fossil CO2 after urea applications' in '01_crop production_assessment methods of direct field emissions_v1.0.pdf' - pdf-document on the dedicated talk page of ecoinvent (www.ecoinvent.org/documentation)
- Zinc, ion [water, surface water]: 5.47684e-7 kg; lognormal variance with pedigree 0.1307, pedigree (2,2,5,1,1)
  (same comment as for Nickel, ion)
- Nickel [soil, agricultural]: 8.37019e-7 kg; lognormal variance with pedigree 0.0807, pedigree (2,2,5,1,1)
  (same comment as for Nickel, ion)
- Copper, ion [water, surface water]: 3.61048e-7 kg; lognormal variance with pedigree 0.1307, pedigree (2,2,5,1,1)
  (same comment as for Nickel, ion)
- Difenoconazole [soil, agricultural]: 2.18543e-6 kg; lognormal variance with pedigree 0.0507, pedigree (2,2,5,1,1)
  (same comment as for Isoproturon)
- Chromium, ion [water, surface water]: 4.58472e-7 kg; lognormal variance with pedigree 0.1307, pedigree (2,2,5,1,1)
  (same comment as for Nickel, ion)
- Nitrogen oxides [air, non-urban air or from high stacks]: 8.98211e-5 kg; = 0.21 * N2O; lognormal variance with pedigree 0.0707, pedigree (2,2,5,1,1)
  Modelled, see chapter 'Emissions of NOx to the air' in '01_crop production_direct field emissions and natural resources_v1.0.pdf' - pdf-document on the dedicated talk page of ecoinvent (www.ecoinvent.org/documentation)
- Cadmium, ion [water, ground-]: 6.71504e-9 kg; lognormal variance with pedigree 0.1307, pedigree (2,2,5,1,1)
  (same comment as for Nickel, ion)
- Dinitrogen monoxide [air, non-urban air or from high stacks]: 0.00042772 kg; name N2O; lognormal variance with pedigree 0.0707, pedigree (2,2,5,1,1)
  Modelled, see chapter 'Emissions of N2O to the air' in '01_crop production_direct field emissions and natural resources_v1.0.pdf' - pdf-document on the dedicated talk page of ecoinvent (www.ecoinvent.org/documentation)
- Metaldehyde [soil, agricultural]: 4.68306e-6 kg; lognormal variance with pedigree 0.0507, pedigree (2,2,5,1,1)
  (same comment as for Isoproturon)
- Lead [water, ground-]: 1.73008e-8 kg; lognormal variance with pedigree 0.1307, pedigree (2,2,5,1,1)
  (same comment as for Nickel, ion)
- Mercury [soil, agricultural]: 1.24229e-8 kg; lognormal variance with pedigree 0.0807, pedigree (2,2,5,1,1)
  (same comment as for Nickel, ion)
- Copper, ion [water, ground-]: 5.04038e-7 kg; lognormal variance with pedigree 0.1307, pedigree (2,2,5,1,1)
  (same comment as for Nickel, ion)
- Zinc, ion [water, ground-]: 2.84028e-6 kg; lognormal variance with pedigree 0.1307, pedigree (2,2,5,1,1)
  (same comment as for Nickel, ion)
- Zinc [soil, agricultural]: 7.49758e-7 kg; lognormal variance with pedigree 0.0807, pedigree (2,2,5,1,1)
  (same comment as for Nickel, ion)
- Ammonia [air, non-urban air or from high stacks]: 0.00129272 kg; lognormal variance with pedigree 0.0507, pedigree (2,2,5,1,1)
  Modelled with the 'AGRAMMON model' described in '01_crop production_direct field emissions and natural resources_v1.0.pdf' - pdf-document on the dedicated talk page of ecoinvent (www.ecoinvent.org/documentation)
- Chromium [soil, agricultural]: 6.79528e-6 kg; lognormal variance with pedigree 0.0807, pedigree (2,2,5,1,1)
  (same comment as for Nickel, ion)
- Lead [soil, agricultural]: 5.03086e-7 kg; lognormal variance with pedigree 0.0807, pedigree (2,2,5,1,1)
  (same comment as for Nickel, ion)
- Lead [water, surface water]: 7.21363e-8 kg; lognormal variance with pedigree 0.1307, pedigree (2,2,5,1,1)
  (same comment as for Nickel, ion)
- Mercury [water, surface water]: 1.06092e-9 kg; lognormal variance with pedigree 0.1307, pedigree (2,2,5,1,1)
  (same comment as for Nickel, ion)
- Cadmium [soil, agricultural]: 5.47216e-7 kg; lognormal variance with pedigree 0.0807, pedigree (2,2,5,1,1)
  (same comment as for Nickel, ion)
- Nitrate [water, ground-]: 0.0461188 kg; lognormal variance with pedigree 0.0807, pedigree (2,2,5,1,1)
  Modelled with the 'SALCA-NO3 model' described in '01_crop production_direct field emissions and natural resources_v1.0.pdf' - pdf-document on the dedicated talk page of ecoinvent (www.ecoinvent.org/documentation)
- Phosphate [water, ground-]: 3.44502e-5 kg; lognormal variance with pedigree 0.0807, pedigree (2,2,5,1,1)
  (same comment as for Phosphorus)
- Mercury [water, ground-]: 1.28005e-9 kg; lognormal variance with pedigree 0.1307, pedigree (2,2,5,1,1)
  (same comment as for Nickel, ion)
- Water [air, unspecified]: 0.00355315 m3; name water_to_air_unspecified; = (water_irrigation_input*fraction_IW_to_air); lognormal variance with pedigree 0.0807, pedigree (2,2,5,1,1)
  Calculated value based on literature values and expert opinion. See comments in the parametres' comment field.
  property fraction, origin: fresh water 1; name fraction_origin_fresh_water
  property fraction, origin: unspecified 0; name fraction_origin_unspecified
  property fraction, origin: salt water 0; name fraction_origin_salt_water
- Phosphate [water, surface water]: 0.000124726 kg; lognormal variance with pedigree 0.0807, pedigree (2,2,5,1,1)
  (same comment as for Phosphorus)
- Water [water, surface water]: 0.00140876 m3; name water_to_water_surface; = water_irrigation_input*(1-fraction_IW_to_air)*fraction_IW_to_surface_water; lognormal variance with pedigree 0.1286, pedigree (4,3,5,1,4)
  Calculated value. See the parameters and their comments to understand the calculation.
  property fraction, origin: fresh water 1; name fraction_origin_fresh_water_Wsw
  property fraction, origin: salt water 0; name fraction_origin_salt_water_Wsw

## Sampling procedure
Data were compiled from statistics, pilot network, fertilising recommendations, documents from extension services, information provided by retailers and expert knowledge. The production data were verified and adjusted by a group of experts.

## Review by Bo Weidema 2012-01-19
In general, it is difficult or impossible to check the validity of the exchanges due to the limited documentation of each value, relying on an external model. However, since the dataset is an improvement compared to the previously existing dataset in the ecoinvent database, it is accepted. It is recommended to improve the transparency in the future, by integrating the model into the dataset and report the emissions from fertilisers separate from those of the plant production.

## Review by Hans-Jörg Althaus 2009-01-22
passed
none
