# wood preservative production, water-based, outdoor use, no ground contact

Dataset: EcoSpold 2, unit process
Geography: GLO
Time period: 2012-01-01 to 2021-12-31
Technology level: current
Classification: ISIC rev.4 ecoinvent: 2021:Manufacture of pesticides and other agrochemical products
Tags: Swiss brush-up completed
Scenario: Business-as-Usual
System model: Allocation, cut-off by classification
Generated by: Frank Werner
Database: ecoinvent
isCopyrightProtected: true
accessRestrictedTo: 1

## General comment
According to EN 335-1:2005, five use classes are distinguished for chemical wood protection based on the general exposure of wood in its application, wetting regime in service and the biological agents to be expected. This exposure scenario determines the potentially vulnerable zone of wood and the required treatment for the application of the wood preservative (see table)

## Included activities start
From reception of chemicals at the factory gate

## Included activities end
The datasets covers the components and preparation of a typical water-based/organic solvent based [as applicable] wood preservative for the use class according to EN 335-1:2006 as indicated in the name of the dataset, ready to be packed. In addition in contains an estimate for electricity consumption and for infrastructure. Packaging is not included

## Geography
Data referring to (Central) European conditions

## Reference product
- wood preservative, water-based, outdoor use, no ground contact: 1 kg; source Empa St. Gallen 2012; CPC 345: Miscellaneous basic chemical products; By-product classification allocatable product
  production volume 5.59667e8 kg; name p_preservative; = 3.65E9*0.5*0.92/3
    Using the GLO value of 3.65E09 kg preservative derived from Vlosky (2009), the distribution on waterborne (92%), the 50% non-pressure methods, and the assumption of equal distribution over the 3 use classes
  property price 0.879868 EUR2005
    Calculated based on inputs: The price of the product has been calculated as a sum of the values of the material and energy inputs for this product. This value is therefore a rough estimation. It may underestimate the real price since there are additional expenses when producing any product. These expences can include for example labour costs, treatment of waste materials and profit for the producer. Please consider carefully whether this level of data quality is acceptable for your application.
  property water content 4; = 0.8/0.2
  property carbon content 0.131234
    carbon content on a dry matter basis (reserved; not for manual entry)
  properties: wet mass 1 kg, carbon content, non-fossil 0, carbon content, fossil 0.131234, dry mass 0.2 kg, water in wet mass 0.8 kg, carbon allocation 0.0262468 kg

## Inputs from technosphere
- hazardous waste, for incineration: 0 kg; name m_hazardous_waste; source Nemecek, T. 2007; pedigree (1,1,1,1,1)
  estimated as 200 kg/t active ingredient
  production volume 0 kg
    Calculated from production volume of reference product using the relative outputs.
  properties: carbon content, fossil 0.554667, UVEK_link_1 965, UVEK_relative_amount_1 -1, water content 0.333333, wet mass 1 kg, dry mass 0.75 kg, heating value, net 17 MJ
  note on UVEK_link_1: to be used only in special submissions in coordination with ecoinvent and the Swiss FOEN
  note on heating value, net: Value taken from the general comment of the treatment dataset.
- ethoxylated alcohol (AE3): 0 kg; source Empa St. Gallen 2012; pedigree (1,1,1,1,1)
  for mix of solvents from butoxyethanol and methoxypropanol
  properties: UVEK_relative_amount_1 1, carbon content, fossil 0.207952, UVEK_link_1 2069, heating value, net 21 MJ, dry mass 1 kg, wet mass 1 kg, carbon content, non-fossil 0.485221
- chemical factory, organics: 4e-10 unit; source Althaus H.-J. 2007; lognormal variance with pedigree 0.76, pedigree (5,5,5,5,5)
  assumed to be equal as for paint production
  properties: UVEK_link_1 430, UVEK_relative_amount_1 1
- pyrethroid-compound: 0.0125 kg; name m_permetrine; lognormal variance with pedigree 0.235, pedigree (5,5,5,5,5)
  active agent
  properties: UVEK_relative_amount_1 1, dry mass 1 kg, carbon content, fossil 0.623, UVEK_link_1 3716, wet mass 1 kg
- water, deionised: 0 kg; source Empa St. Gallen 2012; pedigree (1,1,1,1,1)
  solvent
  property carbon content, non-fossil 0; name C_content_non_fossil
  property water in wet mass 1 kg; name WWM
  properties: wet mass 1 kg, UVEK_relative_amount_1 1, UVEK_link_1 4853
- [thio]carbamate-compound: 0.0125 kg; name m_IBPC; lognormal variance with pedigree 0.235, pedigree (5,5,5,5,5)
  active agent
  properties: UVEK_link_1 4, carbon content, fossil 0.626349, UVEK_relative_amount_1 1, dry mass 1 kg, wet mass 1 kg
- alkyd resin, long oil, without solvent, in 70% white spirit solution state: 0 kg; source Empa St. Gallen 2012; pedigree (1,1,1,1,1)
  binder
  properties: wet mass 1 kg, UVEK_link_1 141, dry mass 1 kg, carbon content, fossil 0.268755, carbon content, non-fossil 0.412906, UVEK_relative_amount_1 1, heating value, net 20.65 MJ
- cyclic N-compound: 0.0125 kg; name m_tebuconazole; lognormal variance with pedigree 0.235, pedigree (5,5,5,5,5)
  active agent
  properties: wet mass 1 kg, UVEK_link_1 688, UVEK_relative_amount_1 1, dry mass 1 kg, carbon content, fossil 0.641962
- electricity, medium voltage: 0.0428 kWh; source Althaus H.-J. 2007; lognormal variance with pedigree 0.235, pedigree (5,5,5,5,5)
  assumed to equal as for water-based paint
  properties: UVEK_relative_amount_1 1, UVEK_relative_amount_8 0.46729, UVEK_link_8 4417, UVEK_link_1 1785, UVEK_link_9 4433, UVEK_relative_amount_9 2.80374
  note on UVEK_relative_amount_8: Scaling factor = amount of transport in corresponding KBOB dataset/amount of this input from technosphere. Source for transport distance: Life Cycle Inventories of Wood as Fuel and Construction Material/2007/Werner F. To be used only in special submissions in coordination with ecoinvent and the Swiss FOEN
  note on UVEK_link_8: This link has been introduced to model transport specifically for the SAM model; to be used only in special submissions in coordination with ecoinvent and the Swiss FOEN.
- hazardous waste, for incineration: -0.002415, -6.31266e-5, -0.00502187 kg (3 entries); source Nemecek, T. 2007; lognormal variance with pedigree 0.203, pedigree (4,5,5,5,5)
  estimated as 200 kg/t active ingredient
  production volume 4.1975e6 kg
- ethoxylated alcohol (AE3): 0.0071166, 0.0337834 kg (2 entries); source Empa St. Gallen 2012; lognormal variance with pedigree 0.235, pedigree (5,5,5,5,5)
  for mix of solvents from butoxyethanol and methoxypropanol
- water, deionised: 0.188239, 0.000677614, 0.611083 kg (3 entries); source Empa St. Gallen 2012; lognormal variance with pedigree 0.235, pedigree (5,5,5,5,5)
  solvent
- alkyd resin, long oil, without solvent, in 70% white spirit solution state: 0.0402, 0.0814 kg (2 entries); source Empa St. Gallen 2012; lognormal variance with pedigree 0.235, pedigree (5,5,5,5,5)
  binder

## Sampling procedure
Ideal-type formulation of wood preservative for a water-/solvent-based [as applicable] wood preservative for the respective use class

## Extrapolations
This dataset has been extrapolated from year 2012 to the year of the calculation (2021). The uncertainty has been adjusted accordingly.
