# trichloromethane production

Dataset: EcoSpold 2, unit process
Geography: RER
Time period: 1998-01-01 to 2021-12-31
Technology level: current
Classification: EcoSpold01Categories: chemicals/organics
Classification: ISIC rev.4 ecoinvent: 2011:Manufacture of basic chemicals
Synonyms: R 20; trichloroform; formyl trichloride; Refrigerant R20; methenyl trichloride; Methyl trichloride; Chloroform; r 20 (refrigerant); methane trichloride
Tags: ConvertedDataset
Scenario: Business-as-Usual
System model: Allocation, cut-off by classification
Share of production covered: 0 %
Generated by: Niels Jungbluth
Published in: Althaus H.-J. 2007
Database: ecoinvent
isCopyrightProtected: true
accessRestrictedTo: 1

## General comment
Inventory for a chemical.
[This dataset was already contained in the ecoinvent database version 2. It was not individually updated during the transfer to ecoinvent version 3. Life Cycle Impact Assessment results may still have changed, as they are affected by changes in the supply chain, i.e. in other datasets. This dataset was generated following the ecoinvent quality guidelines for version 2. It may have been subject to central changes described in the ecoinvent version 3 change report (http://www.ecoinvent.org/database/ecoinvent-version-3/reports-of-changes/), and the results of the central updates were reviewed extensively. The changes added e.g. consistent water flows and other information throughout the database. The documentation of this dataset can be found in the ecoinvent reports of version 2, which are still available via the ecoinvent website. The change report linked above covers all central changes that were made during the conversion process.]

## Included activities end
Gate to gate inventory for the production, estimation for infrastructure and not including by-products

## Geography
Plant e.g. in NL

## Technology
Chemical processing

## Time period
Publication date

## Reference product
- trichloromethane: 1 kg; CPC 34110: Hydrocarbons and their halogenated, sulphonated, nitrated or nitrosated derivatives; By-product classification allocatable product; CAS 67-66-3
  EcoSpold01Location=RER
  production volume 3.02784e8 kg
    The worldwide production capacity in 1987 for fluoroplastics was ca. 45 000t.
    Source: CEFIC, cited in EU risk assessment (http://echa.europa.eu/doc/trd_substances/chloroform/rar/trd_rar_env_france_chloroform.pdf) page 10 Accessed 22 Sept 2010).
  property price 0.55 EUR2005
    Calculated value based on data from United Nations Commodity Trade Statistics Database (comtrade.un.org). UN comtrade category: 290313 Chloroform (trichloromethane). Year 2005. Using exchange rate of 1EURO = 1.209 USD. Average of price of import into 5 main markets (EU, US, JP, IN and CN).
  property heating value, net 4.06 MJ
    LHV is calculated based on the elemental composition of the substance. Based on the CAS number of the substance (000067-66-3), the chemical formula of the substance is found to be: CHCl3, (PubChem 2020).
    Reference: Kim, S., Chen, J., Cheng, T., Gindulyte, A., He, J., He, S., Li, Q., Shoemaker, B. A., Thiessen, P. A., Yu, B., Zaslavsky, L., Zhang, J., & Bolton, E. E. (2019). PubChem 2019 update: improved access to chemical data. Nucleic acids research, 47(D1), D1102–D1109. https://doi.org/10.1093/nar/gky1033
  property carbon content 0.101695
    carbon content on a dry matter basis (reserved; not for manual entry)
  properties: water content 0, water in wet mass 0 kg, wet mass 1 kg, carbon content, fossil 0.101695, dry mass 1 kg, carbon content, non-fossil 0, carbon allocation 0.101695 kg

## Inputs from technosphere
- chlorine, liquid: 0.848 kg; lognormal variance with pedigree 0.084, pedigree (4,5,5,1,3)
  EcoSpold01Location=RER
  Stoichometric calculation, yield 85%, not including Cl2 for total HCl couple product
  Uncertainty: Stoichometric calculation, yield 85%, not including Cl2 for total HCl couple product
  properties: dry mass 1 kg, wet mass 1 kg
- natural gas, high pressure: 0 m3; pedigree (1,1,1,1,1)
  Assumption for methane, stoichometric calculation, yield 85%
  EcoSpold01Location=RER
  Uncertainty: Assumption for methane, stoichometric calculation, yield 85%
  properties: dry mass 0.84 kg, carbon content, fossil 0.602381, wet mass 0.84 kg, heating value, gross 39 MJ, heating value, net 39 MJ
  note on carbon content, fossil: An average C content of 0.506 kg C/ m3 has been assumed (this average has been calculated using data in Tab 3.5, ecoinvent v2.2 report 6_V
  note on heating value, net: Literature value, Source: United Nations Statistics Division (2018) International Recommendations for Energy Statistics (IRES). Available at: http://unstats.un.org/unsd/statcom/doc11/BG-IRES.pdf.
- chemical factory, organics: 4e-10 unit; lognormal variance with pedigree 0.628, pedigree (5,5,5,1,5)
  Generic estimation
  EcoSpold01Location=RER
  Uncertainty: Generic estimation
- heat, district or industrial, natural gas: 10.45 MJ; lognormal variance with pedigree 0.068, pedigree (3,5,5,1,3)
  EcoSpold01Location=RER
  Literature 1998, estimation 90% gas
  Uncertainty: Literature 1998, estimation 90% gas
  properties: heating value, net 1 MJ
- electricity, medium voltage: 0.444 kWh; lognormal variance with pedigree 0.068, pedigree (3,5,5,1,3)
  EcoSpold01Location=UCTE
  Literature 1998, estimation 10% electricity
  Uncertainty: Literature 1998, estimation 10% electricity
- natural gas, high pressure: 0.194895, 0.00125836 m3 (2 entries); lognormal variance with pedigree 0.084, pedigree (4,5,5,1,3)
  (same comment as for natural gas, high pressure)

## Emissions to nature
- Methane, dichloro-, HCC-30 [water, surface water]: 5e-6 kg; lognormal variance with pedigree 0.436, pedigree (5,5,5,1,3)
  Estimation
  Uncertainty: Estimation
- Methane, dichloro-, HCC-30 [air, urban air close to ground]: 0.0003 kg; lognormal variance with pedigree 0.186, pedigree (5,5,5,1,3)
  Estimation of 0.03% emission
  Uncertainty: Estimation of 0.03% emission
- Chloroform [air, urban air close to ground]: 0.01 kg; lognormal variance with pedigree 0.186, pedigree (5,5,5,1,3)
  Estimation of 1% emission
  Uncertainty: Estimation of 1% emission
- Ethene, chloro- [air, urban air close to ground]: 5e-7 kg; lognormal variance with pedigree 0.186, pedigree (5,5,5,1,3)
  Estimation
  Uncertainty: Estimation
- Methane, tetrachloro-, R-10 [air, urban air close to ground]: 0.001 kg; lognormal variance with pedigree 0.186, pedigree (5,5,5,1,3)
  Estimation of 0.1% emission
  Uncertainty: Estimation of 0.1% emission

## Sampling procedure
Literature, company information, stoichiometric calculations, assumptions.

## Extrapolations
This dataset has been extrapolated from year 1999 to the year of the calculation (2021). The uncertainty has been adjusted accordingly.

## Review by Roland Hischier 2009-02-06
Passed.
