# carbon disulfide production

Dataset: EcoSpold 2, unit process
Geography: GLO
Time period: 2000-01-01 to 2021-12-31
Technology level: current
Classification: ISIC rev.4 ecoinvent: 2011:Manufacture of basic chemicals
Classification: EcoSpold01Categories: chemicals/organics
Tags: ConvertedDataset
Scenario: Business-as-Usual
System model: Allocation, cut-off by classification
Share of production covered: 100 %
Generated by: Jürgen Sutter
Published in: Sutter, J. 2007
Database: ecoinvent
isCopyrightProtected: true
accessRestrictedTo: 1

## General comment
This dataset represents the production of 1 kg carbon disulfide, at plant, global. For this dataset the production of carbon disulfide by means of the reaction between sulfur and methane is considered. All data in the present dataset is referred to 1 kg carbon disulfide 100%. The system includes the process with consumption of raw materials, energy, infrastructure and land use as well as the generation of emissions to air and water. It also includes transportation of the raw materials. Transient or unstable operations like starting-up or shutting-down, are not included, but the production during stable operation conditions. Storage and transportation of the final product are also not included. It is assumed that the manufacturing plants are located in an urban/industrial area and consequently the emissions are categorised as emanating in a high population density area. The emissions into water are assumed to be emitted into rivers.
[This dataset was already contained in the ecoinvent database version 2. It was not individually updated during the transfer to ecoinvent version 3. Life Cycle Impact Assessment results may still have changed, as they are affected by changes in the supply chain, i.e. in other datasets. This dataset was generated following the ecoinvent quality guidelines for version 2. It may have been subject to central changes described in the ecoinvent version 3 change report (http://www.ecoinvent.org/database/ecoinvent-version-3/reports-of-changes/), and the results of the central updates were reviewed extensively. The changes added e.g. consistent water flows and other information throughout the database. The documentation of this dataset can be found in the ecoinvent reports of version 2, which are still available via the ecoinvent website. The change report linked above covers all central changes that were made during the conversion process.]

## Included activities start
From the reception of methane and sulphur at the factory gate.

## Included activities end
This activity ends with the production of carbon disulfide including materials, energy uses, infrastructure and emissions. This activity doesn't include water emissions.

## Geography
The inventory is modelled for the world.

## Technology
The technology used in this dataset is the production of CS2 by sulphurization of methane. Purified natural gas containing over 95 % methane and low concentrations of propane and heavier hydrocarbons is preheated to about 250 °C in the convection section of the reaction furnace. The furnace is a typical box-type pyrolysis furnace commonly used in the petrochemical industry, with radiant and convection sections. The hot methane gas is mixed with liquid sulfur and introduced into the horizontal heating coil located in the radiant section. There the liquid sulfur is vaporized, and the temperature of the mixture is raised to 550 – 650 °C. Operating pressure is typically 400 – 700 kPa. Alternatively, the methane and sulfur may be introduced separately and at different locations of the coil. A slight excess of sulfur (5 %) is used to ensure good methane conversion and to minimize carbon and tar formation.
To withstand the high-temperature corrosive environment, cast high-alloy stainless steel is used as tube material. Tube life is normally 2 – 3 years. Packed, brick-lined reactors are connected to the heating coil to provide additional residence time and housing for catalyst beds. Reaction takes place both in the tubes and in the reactors; almost all the hydrocarbons are converted by the time the gas leaves the last reactor.
Gas exiting the reaction furnace system passes through the sulfur condenser where most of the excess sulfur is separated. Next the cooled gas goes through a sulfur scrubber and then to the CS2 scrubber in which the remaining sulfur is removed. The relatively sulfur-free gas then enters water-cooled condensers for bulk separation of carbon disulfide. The remaining carbon disulfide is finally removed from the hydrogen sulfide gas in the oil absorber. The hydrogen sulfide gas exiting the oil absorber contains 1 – 2 % methane and less than 1000 ppm carbon disulfide. This gas is routed to a Claus sulfur recovery plant where it is converted back to sulfur.
Crude carbon disulfide from the condensers, including that recovered in the stripper, is sent to the stabilizer column for removal of low-boiling impurities. The bottoms from the stabilizer column are next processed in the purification column where high-boiling contaminants are separated from the product. A caustic and water wash complete the product purification operations, and the finished product is pumped to check tanks and storage.
Figure: Methane process for CS2 production.
a) Reaction furnace; b) Catalytic reactors; c) Sulfur condenser; d) CS2 scrubber; e) CS2 condenser; f) CS2 absorber; g) Oil interchangers; h) CS2 stripper; i) Stabilizer column; j) Purification column; k) Caustic wash column; l) Water wash column
Tables: World production of CS2 in 1984 in 103 tons / World production of CS2 in 1991 in 103 tons
Lay, M., Sauerhoff, M., Saunders, D.:Carbon disulfide. Published online: 2000. In: Ullmann's Encyclopedia of Industrial Chemistry, Seventh Edition, 2004 Elec-tronic Release (ed. Fiedler E., Grossmann G., Kersebohm D., Weiss G. and Witte C.). 7 th Electronic Release Edition. Wiley InterScience, New York, Online-Version under: http://www.mrw.interscience.wiley.com/emrw/9783527306732/home

## Time period
Time of publications

## Parameters
- fraction, cooling water, to air: 0.3875 dimensionless; name fraction_CW_to_air; = (0.5*fraction_CW_OT_to_air)+(0.5*fraction_CW_R_to_air); lognormal variance with pedigree 0.092025, pedigree (4,4,3,2,4)
  Calculated value based on literature value (see comments of the other parametres present in this dataset) and expert opinion. In the case when no industry/literature data are available about the type of cooling or directly fraction, cooling water, to air specific for the process a default assumption is applied. It is assumed that the once-through cooling system is used in 50% of all cases and recirculating system is used in another 50% of all cases.
- fraction, cooling water, once-through system, to air: 0.004 dimensionless; name fraction_CW_OT_to_air; lognormal variance with pedigree 0.0413, pedigree (2,3,1,3,1)
  Calculated based on literature value (Scown, C.D., 2011, Water Footprint of U.S. Transportation Fuels and supplying information of the article) (Vionnet, S., Quantis Water Database - Technical Report, 2012).
- fraction, cooling water, cooling pond system, to air: 0.032 dimensionless; name fraction_CW_CP_to_air; lognormal variance with pedigree 0.0413, pedigree (2,3,1,3,1)
  (same comment as for fraction, cooling water, once-through system, to air)
- fraction, cooling water, recirculating system, to air: 0.771 dimensionless; name fraction_CW_R_to_air; lognormal variance with pedigree 0.0413, pedigree (2,3,1,3,1)
  (same comment as for fraction, cooling water, once-through system, to air)

## Reference product
- carbon disulfide: 1 kg; CPC 34231: Chemical elements n.e.c.; inorganic acids except phosphoric, nitric and sulphonitric; inorganic oxygen compoun[…]; By-product classification allocatable product; CAS 75-15-0
  Carbon disulfide is a volatile, dense liquid with a wide flammability range in air (1 - 50 vol %). It has an unusually low autoignition point and a low flash point. Its evaporation rate into air is 1.6 times that of diethyl ether. It is an excellent solvent for many organic compounds and readily dissolves sulfur, phosphorus, iodine, waxes, rubber, and resins. The commercial product has a pungent odor characteristic of sulfur compounds.
  Carbon disulfide is used as a reaction and extraction solvent, as a catalyst presulfidation agent, an oil well solvent, and a cold vulcanization additive for rubber, synthetic chemicals.
  EcoSpold01Location=GLO
  production volume 1 kg
    Unknown
    Dummy value to be replaced by measured, estimated or calculated value
  property price 0.28 EUR2005
    Calculated value based on data from United Nations Commodity Trade Statistics Database (comtrade.un.org). UN comtrade category: 281310 Carbon disulphide. Year 2005. Using exchange rate of 1EURO = 1.209 USD. Average of price of import into 5 main markets (EU, US, JP, IN and CN).
  property heating value, net 32.72 MJ
    LHV is calculated based on the elemental composition of the substance. Based on the CAS number of the substance (000075-10-0), the chemical formula of the substance is found to be: C70H49N5, (PubChem 2020).
    Reference: Kim, S., Chen, J., Cheng, T., Gindulyte, A., He, J., He, S., Li, Q., Shoemaker, B. A., Thiessen, P. A., Yu, B., Zaslavsky, L., Zhang, J., & Bolton, E. E. (2019). PubChem 2019 update: improved access to chemical data. Nucleic acids research, 47(D1), D1102–D1109. https://doi.org/10.1093/nar/gky1033
  property carbon content 0.157895
    carbon content on a dry matter basis (reserved; not for manual entry)
  properties: water content 0, water in wet mass 0 kg, carbon content, non-fossil 0, carbon content, fossil 0.157895, wet mass 1 kg, dry mass 1 kg, carbon allocation 0.157895 kg

## Inputs from technosphere
- heat, district or industrial, natural gas: 2 MJ; source Gendorf 2000; lognormal variance with pedigree 0.1786, pedigree (4,5,5,5,5)
  EcoSpold01Location=RER
  Estimation. This value was approximated with data from an large chemical plant site in Germany producing 2.05 Mt a-1 (intermediates included) of different chemicals. The values for the energy consumption per kg of product of this plant (3.2 MJ kg-1) were used as approximation for the energy consumption of the carbon disulfide production. This total energy demand contains a split of 50% natural gas, 38% electricity and 12% steam from external energy sources. For this inventory all energy used for heat or steam was assumed to be natural gas.
  Uncertainty: Estimation
  properties: heating value, net 1 MJ
- sulfur: 0.88643 kg; source Lay, M. 2004; lognormal variance with pedigree 0.076, pedigree (4,5,5,1,1)
  Stoichiometric calculation. The values for the consumption of the raw materials are calculated with an assumed yield of 95 %
  EcoSpold01Location=RER
  Uncertainty: Stoechiometric calculation
  properties: wet mass 1 kg, dry mass 1 kg
- electricity, medium voltage: 0.333 kWh; source Gendorf 2000; lognormal variance with pedigree 0.1786, pedigree (4,5,5,5,5)
  EcoSpold01Location=UCTE
  Estimation. This value was approximated with data from an large chemical plant site in Germany producing 2.05 Mt a-1 (intermediates included) of different chemicals. The values for the energy consumption per kg of product of this plant (3.2 MJ kg-1) were used as approximation for the energy consumption of the carbon disulfide production. This total energy demand contains a split of 50% natural gas, 38% electricity and 12% steam from external energy sources.
  Uncertainty: Estimation
- inert waste, for final disposal: 0 kg; pedigree (1,1,1,1,1)
  Estimation. The remaining sulphur (5 % of the input) is assumed to be disposed as inert waste.
  EcoSpold01Location=CH
  Uncertainty: Stoechiometric calculation
  production volume 0 kg
    Calculated from the production volume of carbon disulfide in proportion to the respective output amounts.
  properties: wet mass 1 kg, water content 0.00502513, dry mass 0.995 kg
- natural gas, high pressure: 0.261385 m3; source Lay, M. 2004; lognormal variance with pedigree 0.076, pedigree (4,5,5,1,1)
  (same comment as for sulfur)
  properties: carbon content, fossil 0.602381, wet mass 0.84 kg, dry mass 0.84 kg, heating value, gross 39 MJ, heating value, net 39 MJ
  note on carbon content, fossil: An average C content of 0.506 kg C/ m3 has been assumed (this average has been calculated using data in Tab 3.5, ecoinvent v2.2 report 6_V
  note on heating value, net: Literature value, Source: United Nations Statistics Division (2018) International Recommendations for Energy Statistics (IRES). Available at: http://unstats.un.org/unsd/statcom/doc11/BG-IRES.pdf.
- chemical factory, organics: 4e-10 unit; lognormal variance with pedigree 0.448, pedigree (4,5,5,5,5)
  EcoSpold01Location=RER
  Estimation. This module assumes a built area of about 4.2 ha, an average output of 50'000 t/a, and plant life of fifty years.
  Uncertainty: Estimation
- inert waste, for final disposal: -0.000286675, -0.0440343 kg (2 entries); lognormal variance with pedigree 0.076, pedigree (4,5,5,1,1)
  (same comment as for inert waste, for final disposal)
  production volume 0.044321 kg

## Inputs from nature
- Water, cooling, unspecified natural origin [natural resource, in water]: 0.024 m3; name water_cooling_UNO_input; source Gendorf 2000; lognormal variance with pedigree 0.198, pedigree (4,5,5,5,5)
  Estimation. This value was approximated with data from an large chemical plant site in Germany producing 2.05 Mt a-1 (intermediates included) of different chemicals. This value was used in this inventory as approximation for the cooling water consumption of the arsine production.
  Estimation. This value was approximated with data from an large chemical plant site in Germany producing 2.05 Mt a-1 (intermediates included) of different chemicals. This value was used in this inventory as approximation for the cooling water consumption of the arsine production.
  Uncertainty: Estimation

## Emissions to nature
- Carbon dioxide, fossil [air, urban air close to ground]: 0.030166 kg; lognormal variance with pedigree 0.1786, pedigree (4,5,5,5,5)
  Estimation. As approximation the air emissions occurring from the purge vent, the distillation vent and fugitive emission sources were estimated to 1% of the unreacted CH4 input. The remaining CH4 is oxidated to CO2.
  Uncertainty: Estimation
- Water [air, unspecified]: 0.0093 m3; name water_to_air_unspecified; = (water_cooling_UNO_input*fraction_CW_to_air); lognormal variance with pedigree 0.0807, pedigree (2,2,5,1,1)
  Calculated value based on literature values and expert opinion. See comments in the parametres' comment field.
  property fraction, origin: unspecified 1; name fraction_origin_unspecified
  property fraction, origin: salt water 0; name fraction_origin_salt_water
  property fraction, origin: fresh water 0; name fraction_origin_fresh_water
- Methane, fossil [air, urban air close to ground]: 0.0001108 kg; lognormal variance with pedigree 0.188, pedigree (4,5,5,5,5)
  (same comment as for Carbon dioxide, fossil)
- Water [water, unspecified]: 0.0147 m3; name water_to_water_unspecified; = water_cooling_UNO_input*(1-fraction_CW_to_air); lognormal variance with pedigree 0.0807, pedigree (2,2,5,1,1)
  (same comment as for Water)
  property fraction, origin: unspecified 1; name fraction_origin_unspecified_Ww
  property fraction, origin: fresh water 0; name fraction_origin_fresh_water_Ww
  property fraction, origin: salt water 0; name fraction_origin_salt_water_Ww
  property water in wet mass 1000 kg; name WWM
  property carbon content, fossil 0; name C_content_fossil
  property dry mass 0 kg; name DM
  property wet mass 1000 kg; name WM
  property carbon content, non-fossil 0; name C_content_non_fossil

## Sampling procedure
Standard values

## Extrapolations
This dataset has been extrapolated from year 2006 to the year of the calculation (2021). The uncertainty has been adjusted accordingly.

## Review by Roland Hischier 2011-09-23
Transfer of documentation done.

## Review by Roland Hischier 2007-09-20
passed.
-
