# hake, capture by long liner and landing whole, fresh

Dataset: EcoSpold 2, unit process
Geography: RoW
Time period: 2009-01-01 to 2021-12-31
Technology level: current
Classification: ISIC rev.4 ecoinvent: 0311:Marine fishing
Synonyms: pescada, merluza
Scenario: Business-as-Usual
System model: Allocation, cut-off by classification
Generated by: [System]
Published in: Avadí, A. 2018
Database: ecoinvent
isCopyrightProtected: true
accessRestrictedTo: 1

## General comment
This activity represents capture and landing of demersal European hake (Merluccius merluccius) by the demersal long lining fishing fleet (Bottom long lining, fish conservation with ice). A mixture of small pelagic fish is used as bait The life cycle inventories were produced based on a representative sample of vessels from Galicia (NW Spain) and their activity in European waters: from a sample of 12 vessels in 2009, hake landings by Galician steel vessels (49 long liners) were characterized. The activity may be used as a proxy for other demersal long lining species in Europe, such as Atlantic pomfret (Brama brama) or fork beard (Phycis phycis). Small amounts of common ling, rock fish and conger eel are also captured. However, it should be noted that these species may not be captured simultaneously in other fisheries.Tides for this fleet usually range from 14 to 17 days. Nevertheless, European hake is by far the main target species of this fleet, roughly 60% of total captures. Approximately 70% of the hake caught by this fleet is then sold fresh. However, the capture obtained in the first few days of each tide reaches prices considerably lower than individuals caught in the last days of the tide. The main areas where this fleet captures hake and other species in a multispecies fishery are mainly the Porcupine Bank (ICES Division VIIc), the West Great Sole (ICES Division VIIk), the Great Sole (ICES Division VIIj) and the Little Sole (ICES Division VIIh).
Annual hake landings in year 2008 in Galician ports added up to 26,439 metric tons, whereas in 2017 this value had risen to 32,418 metric tons, although this value can be highly variable due to stock availability, recruitment or fishing bans on an annual basis in the different targeted fisheries. The Galician government does not provide disaggregated hake landings per fleet or fishing grounds.

## Included activities start
From the vessel use (including landing) and maintenance phases, including all upstream activities.

## Included activities end
Port operations and post-landing processing activities are beyond the system boundary.

## Allocation
The system is unallocated between hake landings and the by-catch.

## Geography
Spain. The main areas where this fleet captures hake and other species in a multispecies fishery are mainly the Porcupine Bank (ICES Division VIIc), the West Great Sole (ICES Division VIIk), the Great Sole (ICES Division VIIj) and the Little Sole (ICES Division VIIh).

## Technology
Bottom long lining, fish conservation with ice.

## Time period
Data corresponds to the landings-weighted average of annual operation for 2009.

## Parameters
- annual landings per vessel: 284679 kg; name landings_vessel_year; triangular min 190000, mostLikely 284679, max 380000, pedigree (3,1,3,1,1)
  Annual landings of vessels in an specific fleet or coherent fleet segment, geometric mean
- lifetime: 35 year; lognormal variance with pedigree 0.310725, pedigree (4,2,3,2,2)
- net calorific value: 42.7 MJ/kg; name net_cal_value; triangular min 41.3, mostLikely 42.7, max 43.4, pedigree (3,5,3,5,5)
  Energy value per kg of marine diesel
  Uncertainty: M
- marine fuel use efficiency: 1305.48 kg; name FUE; triangular min 764, mostLikely 1305.48, max 3540, pedigree (3,1,3,1,1)
  Amount of marine fuel consumed per landed unit of fish
  Uncertainty: D
- average_weight_long_liner: 140100 kg; name WeightLLiner; triangular min 99000, mostLikely 140100, max 221000, pedigree (4,2,3,2,2)

## Reference product
- landed hake, fresh: 1 kg; name landings; source Vázquez-Rowe, I. 2011; CPC 04241: Wild fish of Gadiformes, live, fresh or chilled; By-product classification allocatable product
  Miscellanea hake species
  production volume 6.5e7 kg; name LandVol
    Landed volume of hake linked to long liners
  property protein content 0.166; name hake_protein
    Data for Peruvian hake
  property fat content 0.012; name landed_fat_content
    Data for Peruvian hake
  property wet mass 0.3276 kg; name landed_WM
  property carbon content, non-fossil 0.457294; name landed_C_content_non_fossil
    Calculated from C_content = polysaccharids*0.444+protein*0.535+lipids*0.774 and polysaccharids = 1-(protein+lipids+ash)
  property dry mass 0.18 kg; name landed_DM
  property energy content 4.3 MJ; name landed_energy_content
    Data for Peruvian hake
  property water in wet mass 0.1476 kg; name landed_WWM
  property water content 0.82; name landed_water_content
  property ash content 0.013 kg; name hake_ash
    http://frida.fooddata.dk/ShowFood.php?foodid=475
  property price 1.17 EUR2005; name landings_price_EUR2005
    Literature value. Avadí, A., & Fréon, P. (2015). A set of sustainability performance indicators for seafood: Direct human consumption products from Peruvian anchoveta fisheries and freshwater aquaculture. Ecological Indicators, 48, 518532. https://doi.org/10.1016/j.ecolind.2014.09.006
  property carbon content 0.457294
    carbon content on a dry matter basis (reserved; not for manual entry)
  property true value 1170; name landings_true_value
    allocation property applied in "true value" allocation // value calculated from revenue
  properties: carbon allocation 0.0823129 kg

## By-products
- demersal fish, fresh: 0 kg; name bycatch; source Vázquez-Rowe, I. 2011; By-product classification allocatable product; CPC 04241: Wild fish of Gadiformes, live, fresh or chilled; pedigree (1,1,1,1,1)
  Other landings, which include conger eel, Atlantic pomfret or fork beard.
  Uncertainty: D
  production volume 4.21187e7 kg; = LandVol*bycatch/Landings
    Amount of bycatch landed by long lining vessels that land hake
  property water content 0.773158; name bycatch_water_content
  property protein content 0.181; name hakebc_protein
    Average of 15 demersal fish species, http://www.fao.org/wairdocs/tan/x5916e/x5916e01.htm
  property price 0.539258 EUR2005; name bycatch_price_EUR2005
    Calculated value based on data from United Nations Commodity Trade Statistics Database (comtrade.un.org). UN comtrade category: 30242 Fish; fresh or chilled, anchovies (Engraulis spp.), excluding fillets, livers, roes, and other fish meat of heading 0304. Year 2014. Using exchange rate of 1EURO = 1.209 USD. Average of price of import into 3 main markets (EU, US and CN).
  property ash content 0.015 kg; name hakebc_ash
    Ash content of fish is between 1-2% of the edible portion, http://www.fao.org/wairdocs/tan/x5916e/x5916e01.htm
  property water in wet mass 0.175385 kg; name bycatch_WWM
  property fat content 0.039; name bycatch_fat_content
    Average of 15 demersal fish species, http://www.fao.org/wairdocs/tan/x5916e/x5916e01.htm
  property dry mass 0.226842 kg; name bycatch_DM
  property wet mass 0.402227 kg; name bycatch_WM
  property carbon content, non-fossil 0.466681; name bycatch_C_content_non_fossil
    (same comment as for landed hake, fresh)
  property energy content 3.914 MJ; name bycatch_energy_content
    Average of 15 demersal fish species, http://www.fao.org/wairdocs/tan/x5916e/x5916e01.htm
  property carbon content 0.466681
    carbon content on a dry matter basis (reserved; not for manual entry)
  property true value 349.428; name bycatch_true_value
    allocation property applied in "true value" allocation // value calculated from revenue
  properties: carbon allocation 0.105863 kg

## Inputs from technosphere
- long liner, steel: 0.0178431 kg; source Pierre Fréon 2014; lognormal variance with pedigree 0.3446, pedigree (3,1,5,5,2)
  Amount of LSW of the vessel allocated to 1 t of landed hake.
  Uncertainty: D
- landed anchovy, fresh: 0.522224 kg; name bait; source Pierre Fréon 2014; lognormal variance with pedigree 0.0526, pedigree (3,1,5,5,3)
  Bait used in long-lining
  Uncertainty: D
  property protein content 0.191; name anch_protein
  property ash content 0.02 kg; name anch_ash
  property fat content 0.088; name anch_fat
  properties: energy content 7.9 MJ, wet mass 1 kg, water content 2.81651, dry mass 0.26202 kg, carbon content, non-fossil 0.481541
  note on carbon content, non-fossil: Calculated from C_content = polysaccharids*0.444+protein*0.535+lipids*0.774 and polysaccharids = 1-(protein+lipids+ash)
- antifouling paint emissions: -1.58741e-5 kg; name antif; source Vázquez-Rowe, I. 2011; lognormal variance with pedigree 0.0846, pedigree (3,1,5,5,2)
  Mass of solids from antifouling paint emitted to ocean
  Uncertainty: D
  production volume 161277 kg
    Antifouling emissions to ocean linked to hake landed by long liners
  property price 0 EUR2005; name antif_price_EUR2005
  properties: carbon content, fossil 0.21, carbon content, non-fossil 0.21, wet mass 1 kg, dry mass 1 kg
- long liner maintenance, steel: 0.0178431 kg; source Pierre Fréon 2014; lognormal variance with pedigree 0.0452, pedigree (3,1,5,5,2)
  Amount of LSW of the vessel allocated to 1 t of landed hake.
  Uncertainty: D
- diesel, burned in fishing vessel: 70.7393 MJ; source Vázquez-Rowe, I. 2011; lognormal variance with pedigree 0.0506, pedigree (4,1,5,5,1)
  Combustion of diesel in marine engines
  Uncertainty: D
- lubricating oil: 0.0187378 kg; name oil; source Vázquez-Rowe, I. 2011; lognormal variance with pedigree 0.084, pedigree (3,1,5,5,1)
  Lubricating oil used on board for engines and other machinery.
  Uncertainty: D
  properties: carbon content, fossil 0.75, heating value, net 40.2 MJ, wet mass 1 kg, dry mass 1 kg
  note on carbon content, fossil: Lubricating oil is produced from diesel. C-content/dry mass of fats and oils considered 75%, from: ecoinvent v2.2 report, n 15a, pg 40
  note on heating value, net: Literature value, Source: IPCC 2006, 2006 IPCC Guidelines for National Greenhouse Gas Inventories, Prepared by the National Greenhouse Gas Inventories Programme, Eggleston H.S., Buendia L., Miwa K., Ngara T. and Tanabe K. (eds). Published: IGES, Japan
- waste mineral oil: -0.0187378 kg; source Vázquez-Rowe, I. 2011; lognormal variance with pedigree 0.0846, pedigree (3,1,5,5,2)
  Waste oil from using lubricating oil in engines and other machinery.
  Uncertainty: D
  production volume 0.725641 kg
    Assuming worldwide GDP=1
  properties: heating value, net 34.7 MJ, wet mass 1 kg, water content 0.111111, carbon content, fossil 0.864444, dry mass 0.9 kg
  note on heating value, net: Value taken from the general comment of the treatment dataset.
  note on carbon content, fossil: Tab A.6, ecoinvent v2.2 report 13_I. C content has been calculated after data in the tables, and then referred to 1 kg DM
- operation, reefer, freezing: 0.817383 kg*day; source Vázquez-Rowe, I. 2011; lognormal variance with pedigree 0.0446, pedigree (3,1,5,5,1)
  An ice consumption of 0.6441 kg per kg of landed hake was modelled based on reports by skippers.
  Uncertainty: D

## Inputs from nature
- Fish, demersal, in ocean [natural resource, biotic]: 1.28187 kg; source Vázquez-Rowe, I. 2011; lognormal variance with pedigree 0.0446, pedigree (3,1,5,5,1)
  Demersal fish in ocean, resource extracted by fisheries
  Uncertainty: D
  property ash content 0.015 kg; name fishd_ash
  property protein content 0.181; name fishd_protein
  property fat content 0.039; name fishd_fat

## Emissions to nature
- Discarded fish, demersal, to ocean [water, ocean]: 0.0128841 kg; name discards; source Vázquez-Rowe, I. 2011; lognormal variance with pedigree 0.0446, pedigree (3,1,5,5,1)
  Demersal fish discarded by fisheries
  Uncertainty: D
  property wet mass 1 kg; name discards_WM
  property dry mass 0.56397 kg; name discards_DM
  property ash content 0.015 kg; name discardsd_ash
  property carbon content, non-fossil 0.466681; name discards_C_content_non_fossil
  property fat content 0.039; name discards_fat_content
  property energy content 3.914 MJ; name discards_energy_content
  property protein content 0.181; name discardsd_protein
  property water in wet mass 0.43603 kg; name discards_WWM
  property water content 0.77316; name discards_water_content
- Methane, chlorodifluoro-, HCFC-22 [air, non-urban air or from high stacks]: 0.000888303 kg; source Vázquez-Rowe, I. 2011; lognormal variance with pedigree 0.084, pedigree (3,1,5,5,1)
  Cooling agent emissions.
  Uncertainty: D

## Extrapolations
Extrapolated from RER data, uncertainty adjusted accordingly.
