# fibre production, flax, retting

Dataset: EcoSpold 2, unit process
Geography: RoW
Time period: 2016-04-01 to 2021-03-31
Technology level: current
Classification: ISIC rev.4 ecoinvent: 1311:Preparation and spinning of textile fibres
Classification: EcoSpold01Categories: textiles/processing
Scenario: Business-as-Usual
System model: Allocation, cut-off by classification
Generated by: [System]
Published in: Faist Emmenegger, M. 2018
Database: ecoinvent
isCopyrightProtected: true
accessRestrictedTo: 1

## General comment
The dataset represents production of 1 kg flax fibre from harvested flax plant ( fresh green matter). This dataset is a copy of Indian dataset.
Flax retting activity involves immersion of the plant bundles of Flax in fresh water tanks in cultivation field. The minimum ratio of plant material to water in the case of a stagnant water body is 1:22. Flax fibre takes three days for retting and then the loosened fibre is extracted from the stalk. After three days the bundles are washed thoroughly with fresh water and placed on ground for sun drying. Flax fibre is extracted from the bast or skin of stem of the flax plant. The upper tender portions of retted plants are cut so those capsules are removed from plants. After that flax fibre is ready for scutching. Scutching is a process in which the fibres separates from stem. The scutching of fibre can be done following two procedures.

1. Mannual method:

In this methods the small bundle of dried stalk are beaten by hand mallat (mungri). Owing to this wodden part of the stalk will split out and fibre can be separate easily. But this method is used at small scale at farmr’s house.

2. Mechanical method

In this method the flax stalks go through the machine process. The CRIJAF (ICAR), Barrackpore has developed a scotching machine for extraction of flax fibre. The machine is indigenously designed on the principle of passing a handful flax stalk through fluted rollers to break the woody core into straw and separate the fibre in a short time. The fibre is then worked through a comb for separating long fibres from short ones. The separated fibres strands are then rolled into bundles.
This life cycle inventory dataset for Flax retting and dressing, activity serves as the transformation process of flax plant to fibre. The activity starts with immersion of the flax plant bundles in retting tanks. The activity ends with the extraction of the flax fibres from the retted and dried plants.

## Included activities start
Activity begins with immersing Fresh Green Matter to water

## Included activities end
This process ends with scutching and convertiing of dry stems to Flax fibre. The machinery involved in the process is physically not present due to lack of data, however the energy/electricity necessary to operate the machinery is part of the dataset.

## Technology
The following processes are used to prepare convert Fresh Green Matter (FGM) obtained from Flax cultivation to fiber for spinning. Fresh Green Matter is immersed in water filled in cement tanks in 1:20 plant to water ratio and allowed to ret for 72 hours. Water used per batch is around 325000 kg. After this the stems are allowed to dry in sun for 10 days and subject to scutching operation on Flax scutching machine developed by CRIJAF. The machine is indigenously designed on the principle of passing a handful flax stalk through fluted rollers to break the woody core into straw and separate the fibre in a short time. The fibre is then worked through a comb for separating long fibres from short ones.

## Reference product
- fibre, flax: 1 kg; name RP_amount_1; By-product classification allocatable product; CPC 01929: Other fibre crops, raw, n.e.c.
  production volume 1.275e8 kg; name RP_PV_1
    Data for year 2016 from The Fibre Year and own calculations.
  property carbon content, non-fossil 0.4526
    "Carbon content on a dry mass basis. All carbon is assumed to be biogenic due to the nature of the product. Carbon content of Flax fiber is 0.4526 kg of non-fossil carbon per kg of dry mass of flax fiber. Value is calculated based on the the composition of flax which is 92% cellulose and 4% Lignin. Composition of Flax fibers accessed on 10/11/2017 on: http://textilefashionstudy.com/chemical-composition-of-flax-fiber-linen-fiber-composition/
    "
  property heating value, net 13.23 MJ
    LHV is calculated based on the Carbon content of the product. More details can be found on the respective documentation.
  property price 5.285 EUR2005; name RP_amount_1_price_EUR2005
    Estimated value. Various souces report values corresponding to approximately 7 USD per kg of flax fibre (indiamart.com. Retrieved from: https://dir.indiamart.com/impcat/flax-yarn.html, accessed 1Feb2018; Alibaba.com, 2018. Retrieved from: https://www.alibaba.com/showroom/flax-fiber.html, accessed 1Feb2018).
  property carbon content 0.4526
    carbon content on a dry matter basis (reserved; not for manual entry)
  property true value 5.285; name RP_amount_1_true_value
    allocation property applied in "true value" allocation // value calculated from revenue
  properties: water content 0.0309278, dry mass 0.97 kg, wet mass 1 kg, water in wet mass 0.03 kg, carbon content, fossil 0, carbon allocation 0.439022 kg

## By-products
- flax husks: 0 kg; name BP_amount_1; By-product classification allocatable product; CPC 01919: Forage products, n.e.c.; pedigree (1,1,1,1,1)
  byproduct which is used mostly as animal feed
  production volume 3.9015e8 kg; = RP_PV_1 * (BP_amount_1 / RP_amount_1)
    Calculated from production volume of reference product using the relative outputs.
  property carbon content, fossil 0
    Carbon content fossil is considered zero in all agricultural products and by-products.
  property energy content 19.5 MJ
    Gross energy content (19.5 MJ/kg DM) for flax straw and flax crop by-products. Reference: Feedipedia - Animal Feed Resources Information System. Accessed online at: https://www.feedipedia.org/content/about-feedipedia on 23/03/2018.
  property carbon content, non-fossil 0.475
    Biogenic carbon content on a dry mass basis (47.5% DM) derived from FAOSTAT.
    Reference: http://www.fao.org/forestry/17111/en"
  property protein content 5.3
    Crude protein content (5.3 MJ/kg DM) for flax straw and flax crop by-products. Reference: Feedipedia - Animal Feed Resources Information System. Accessed online at: https://www.feedipedia.org/content/about-feedipedia on 23/03/2018.
  property price 0.12 EUR2005; name BP_amount_1_price_EUR2005
    Estimated based on the prioce of "maize grain, feed", comment: Estimated equal to price of maize grain, 0.12EUR/kg, comment: Literature value. Based on SAFEX price of R 2,025 per tonne (average yellow and white). Source: SAGIS, 2018. Retrieved from: http://www.sagis.org.za/safex_historic.html, accessed 28May2018. This choice is made as both products end up in the same generic market and have similar characteristics.
  property carbon content 0.475
    carbon content on a dry matter basis (reserved; not for manual entry)
  property true value 0.3672; name BP_amount_1_true_value
    allocation property applied in "true value" allocation // value calculated from revenue
  properties: water in wet mass 0.093 kg, dry mass 0.907 kg, wet mass 1 kg, water content 0.102536, carbon allocation 0.430825 kg

## Inputs from technosphere
- electricity, low voltage: 0 kWh; pedigree (1,1,1,1,1)
  sum of electricity used to extract water needed for retting and scutching.
- flax plant, harvested: 7.29327 kg; lognormal variance with pedigree 0.0146, pedigree (4,4,3,5,1)
  Fresh green matter
  properties: water content 0.0869565, wet mass 1 kg, carbon content, non-fossil 0.475, dry mass 0.92 kg
- electricity, low voltage: 0.00476375, 0.000867388, 0.0195802, 0.013966, 0.0696301, 0.0346899, 0.0996115 kWh (7 entries); lognormal variance with pedigree 0.0066, pedigree (1,4,3,5,1)
  sum of electricity used to extract water needed for retting and scutching.

## Inputs from nature
- Water, lake [natural resource, in water]: 0.205708 m3; name water; lognormal variance with pedigree 0.0146, pedigree (4,4,3,5,1)
  220 kgs of water converted to m3

## Emissions to nature
- Water [water, surface water]: 0.164566 m3; lognormal variance with pedigree 0.0146, pedigree (4,4,3,5,1)
  balance 80% water going back as surface water
- Water [air, unspecified]: 0.0411415 m3; lognormal variance with pedigree 0.0146, pedigree (4,4,3,5,1)
  considering 20% default evaporation rate

## Sampling procedure
Extrapolated from IN data, uncertainty adjusted accordingly
