# aluminium production, primary, liquid, prebake

Dataset: EcoSpold 2, unit process
Geography: IAI Area, South America
Time period: 2015-01-01 to 2021-12-31
Technology level: current
Classification: ISIC rev.4 ecoinvent: 2420:Manufacture of basic precious and other non-ferrous metals
Classification: EcoSpold01Categories: metals/extraction
Scenario: Business-as-Usual
System model: Allocation, cut-off by classification
Share of production covered: 79 %
Generated by: Linlin Wu
Published in: International Aluminium Insitute 2015
Database: ecoinvent
isCopyrightProtected: false
accessRestrictedTo: 1

## General comment
This dataset represents the production of 1kg of liquid primary aluminium. Primary aluminium is produced by the The Hall-Héroult process, developed in 1886, and the sole industrial method for the smelting of primary aluminium. It involves passing a large electric current through a molten mixture of cryolite, alumina and aluminium fluoride to obtain pure, liquid aluminium metal. Direct current (DC) is fed into a line of electrolytic cells connected in series (a “potline”). While these cells, or “pots” and potlines vary in size and configuration from one plant to another, the fundamental electrochemical process is identical. Each pot is a large carbon-lined metal container, forming the negative electrode (cathode) in the cell. The cell contains an electrolytic bath of molten cryolite (Na3AlF6), maintained at a temperature of around 960 – 980°C, in which alumina powder (Al2O3) is dissolved. Aluminium fluoride (AlF3) is added to the solution to maintain optimal chemistry and lower the electrolyte’s freezing point. Large carbon blocks are suspended in the solution and serve as the positive electrode (anode). The electrical current passes from the carbon anodes via the bath to the carbon cathode cell lining. The current then passes to the anode of the next pot in series. As the electrical current passes through the solution, the dissolved alumina is split into molten aluminium (Al) and oxygen (O2). The oxygen consumes the carbon in the anode blocks to form carbon dioxide. The electrolytic reaction can be expressed as:

2Al2O3 + 3C → 4Al + 3CO2

There are two main types of aluminium smelting technology: Søderberg and prebake. The principal difference between the two is the type of anode used.
Prebake technology uses multiple anodes in each cell, which are baked in a separate facility and attached to rods that suspend the anodes in the cell. New anodes are exchanged for spent anodes, with the remaining anode “butts” being recycled into new anodes.
[This dataset is meant to replace the following datasets:]

## Included activities start
Unit process starts with the unloading of process materials to their storage areas on site.

## Included activities end
Includes:
* Recovery, preparation and handling of process materials
* Manufacture of major process equipment and infrastructure
* Process control activities (metal, bath, heat)
* maintenance and repair of plant and equipment
* treatment of process air, liquids and solids
The output of this unit process is hot metal transported to an ingot casting facility.

## Geography
Data mostly from global surveys by IAI.

## Reference product
- aluminium, primary, liquid: 1 kg; name aluminiumPrimaryLiquidPrebakeAmount; CPC 41431: Unwrought aluminium; By-product classification allocatable product; CAS 7429-90-5
  production volume 1.018e9 kg; name aluminiumPrimaryLiquidPrebakeProdVolume
    Value based on 2015 IAI, CRU & CNIA reported data, with a minor modelled component.
  property price 3.67 EUR2005; name aluminiumPrimaryLiquidPrebakeAmount_pric
    Calculated from EU prices by use of exchange rates.
  property carbon content 0
    carbon content on a dry matter basis (reserved; not for manual entry)
  properties: carbon content, fossil 0, carbon content, non-fossil 0, water content 0, dry mass 1 kg, wet mass 1 kg, water in wet mass 0 kg, carbon allocation 0 kg

## Inputs from technosphere
- aluminium fluoride: 0.021 kg; source International Aluminium Insitute 2015; lognormal variance with pedigree 0.0027, pedigree (1,2,3,1,1)
  EcoSpold01Location=RER
  properties: wet mass 1 kg, dry mass 1 kg
- anode, prebake, for aluminium electrolysis: 0.475 kg; source International Aluminium Insitute 2015; lognormal variance with pedigree 0.0027, pedigree (1,2,3,1,1)
  properties: carbon content, fossil 0.875012, dry mass 1 kg, wet mass 1 kg
- scrap steel: -0.0075 kg; name wasteSteelAmount; source International Aluminium Insitute 2015; lognormal variance with pedigree 0.0032, pedigree (1,3,3,1,1)
  production volume 7.635e6 kg; = aluminiumPrimaryLiquidPrebakeProdVolume*wasteSteelAmount/aluminiumPrimaryLiquidPrebakeAmount
    Calculated from the production volume of primary aluminium and output of waste per reference flow.
  property price 0 EUR2005; name wasteSteelAmount_price_EUR2005
  properties: dry mass 1 kg, wet mass 1 kg
- inert waste, for final disposal: -0.0061 kg; name refractoryWasteAmount; source International Aluminium Insitute 2015; lognormal variance with pedigree 0.002, pedigree (1,1,3,1,1)
  Amount includes both non-SPL refractory waste sent to landfill and recycled refractory waste. Currently, no recycling process exists in ecoinvent for refractory material, and hence these are modelled as sent to landfill. Global average is adopted as no such data reported from this region.
  EcoSpold01Location=CH
  Uncertainty: Uncertainty calculated from underlying parameters.
  production volume 6.2098e6 kg; = aluminiumPrimaryLiquidPrebakeProdVolume*refractoryWasteAmount
    (same comment as for scrap steel)
  property price 0 EUR2005; name refractoryWasteAmount_price_EUR2005
  property amount of refractory material sent to recycling 0.00276 kg; name refracto_refractoryWasteToRecyclingAmo_0
  property amount of refractory material sent to landfill 0.00132 kg; name refracto_refractoryWasteToLandfillAmou_0
  properties: dry mass 0.995 kg, water content 0.00502513, wet mass 1 kg
- aluminium electrolysis facility: 1.5385e-10 unit; source Classen M. 2008; lognormal variance with pedigree 0.5, pedigree (5,5,5,5,5)
  EcoSpold01Location=RER
  Rough guess
  Uncertainty: rough guess
- coke: 0.127 MJ; source International Aluminium Institute 2007; lognormal variance with pedigree 0.0414, pedigree (2,2,5,3,1)
  Total carbon value taken from IAI (2007), but split between coke and bitumen based on older European mix in ecoinvent v2 dataset
  Uncertainty: Total carbon value quality high, but split between coke and bitumen based on older European mix in ecoinvent v2 dataset
  properties: water content 0.0638298, carbon content, fossil 0.869149, dry mass 0.0328671 kg, wet mass 0.034965 kg, heating value, net 28.6 MJ
  note on carbon content, fossil: 81.7% C and 6% water in wet mass (ecoinvent v2.1 report 6_VI Table 7.1)
- pitch: 0.00191 kg; source International Aluminium Institute 2007; lognormal variance with pedigree 0.0414, pedigree (2,2,5,3,1)
  (same comment as for coke)
  properties: carbon content, fossil 0.83, dry mass 1 kg, wet mass 1 kg, heating value, net 28 MJ
- blasting: 0.000402 kg; source Classen M. 2008; lognormal variance with pedigree 0.0414, pedigree (2,2,5,3,1)
  Value taken from cathode production process
- waste asphalt: -0.014 kg; name wasteCarbonAmount; source International Aluminium Insitute 2015; lognormal variance with pedigree 0.002, pedigree (1,1,3,1,1)
  Proxy for treatment of waste carbon. Reported as "SPL carbon for external recycling" and "Waste carbon or mix" in IAI report. Currently, no recycling process exists in ecoinvent for waste carbon, and hence these are modelled as sent to landfill. Using global average of "SPL carbon for external recycling" as no such data reported from this region.
  Uncertainty: Uncertainty calculated from underlying parameters.
  production volume 1.4252e7 kg; = aluminiumPrimaryLiquidPrebakeProdVolume*wasteCarbonAmount/aluminiumPrimaryLiquidPrebakeAmount
    (same comment as for scrap steel)
  property landfilled waste carbon 0.00462 kg; name wasteCarbo_landfilledWasteCarbonAmount_0
  property recycled spent pot liner carbon 0.0108 kg; name wasteCarbonAmo_recycledSPLCarbonAmount_0
  property price 0 EUR2005; name wasteCarbonAmount_price_EUR2005
  properties: carbon content, fossil 0.0440796, water content 0.001001, wet mass 1 kg, dry mass 0.999 kg
  note on carbon content, fossil: The waste contains 94.7% inert material (see Tab A.5 for details) 5.3% bitumen (see Tab A.6 for details), ecoinvent v2.2 report 13_I
- inert waste: -0.013 kg; name inertWasteAmount; source International Aluminium Insitute 2015; lognormal variance with pedigree 0.0027, pedigree (1,2,3,1,1)
  Used as a proxy for waste alumina
  production volume 1.3234e7 kg; = aluminiumPrimaryLiquidPrebakeProdVolume*inertWasteAmount/aluminiumPrimaryLiquidPrebakeAmount
    (same comment as for scrap steel)
  property price 0 EUR2005; name inertWasteAmount_price_EUR2005
  properties: dry mass 1 kg, wet mass 1 kg
- cathode, for aluminium electrolysis: 0.0057 kg; source International Aluminium Insitute 2015; lognormal variance with pedigree 0.0032, pedigree (1,3,3,1,1)
  Reported as Cathode carbon in IAI survey
  properties: wet mass 1 kg, carbon content, fossil 0.163928, dry mass 1 kg
- cryolite: 0.0016 kg; source International Aluminium Institute 2007; lognormal variance with pedigree 0.0413, pedigree (2,2,5,1,1)
  EcoSpold01Location=RER
  properties: wet mass 1 kg, dry mass 1 kg
- refractory spent pot liner from Al electrolysis: -0.0145 kg; name SPLAmount; source International Aluminium Insitute 2015; lognormal variance with pedigree 0.0032, pedigree (1,3,3,1,1)
  Amount includes recycled SPL refractory and SPL for landfilling. Global average is adopted as no such data reported from this region.
  EcoSpold01Location=CH
  production volume 1.4761e7 kg; = aluminiumPrimaryLiquidPrebakeProdVolume*SPLAmount/aluminiumPrimaryLiquidPrebakeAmount
    (same comment as for scrap steel)
  property price 0 EUR2005; name SPLAmount_price_EUR2005
  properties: wet mass 1 kg, dry mass 1 kg
- filter dust from Al electrolysis: -0.027 kg; name scrubberSludgeAmount; source International Aluminium Insitute 2015; lognormal variance with pedigree 0.0032, pedigree (1,3,3,1,1)
  Used as a weak proxy for treatment of scrubber sludges
  production volume 2.7486e7 kg; = aluminiumPrimaryLiquidPrebakeProdVolume * scrubberSludgeAmount / aluminiumPrimaryLiquidPrebakeAmount
    Calculated from production volume of reference product using the relative outputs.
  property price 0 EUR2005; name scrubberSludgeAmount_price_EUR2005
  properties: dry mass 1 kg, wet mass 1 kg, carbon content, fossil 0.11586
- refractory, fireclay, packed: 0.0054 kg; source International Aluminium Insitute 2015; lognormal variance with pedigree 0.0027, pedigree (1,2,3,1,1)
  Reported as refractory material in IAI survey.
  properties: dry mass 1 kg, wet mass 1 kg
- cast iron: 0.000804 kg; source Classen M. 2008; lognormal variance with pedigree 0.0414, pedigree (2,2,5,3,1)
  Value taken from cathode production process
  properties: dry mass 1 kg, wet mass 1 kg, carbon content, fossil 0.04
  note on carbon content, fossil: Cast iron is made by remelting pig iron in small furnaces (e.g. cupola furnaces or electric arc furnaces) and poured into moulds to make castings. It usually contains 2% to 6% carbon (ecoinvent v2.2 report 10_partII). An average content of 4% was considered
- aluminium oxide, metallurgical: 1.897 kg; source International Aluminium Insitute 2015; lognormal variance with pedigree 0.0027, pedigree (1,2,3,1,1)
  properties: dry mass 1 kg, wet mass 1 kg
- electricity, medium voltage, aluminium industry: 15.751 kWh; source International Aluminium Insitute 2015; lognormal variance with pedigree 0.0027, pedigree (1,2,3,1,1)
  2015 data collected in IAI energy survey. http://www.world-aluminium.org/statistics/
  EcoSpold01Location=GLO
- reinforcing steel: 0.00526 kg; source International Aluminium Insitute 2015; lognormal variance with pedigree 0.0032, pedigree (1,3,3,1,1)
  properties: wet mass 1 kg, carbon content, fossil 0.004, dry mass 1 kg

## Inputs from nature
- Water, unspecified natural origin [natural resource, in water]: 0.00024 m3; source International Aluminium Insitute 2015; lognormal variance with pedigree 0.0032, pedigree (1,3,3,1,1)

## Emissions to nature
- Suspended solids, unspecified [water, unspecified]: 0.000177 kg; source International Aluminium Insitute 2015; lognormal variance with pedigree 0.0426, pedigree (1,3,3,1,1)
- Oils, unspecified [water, unspecified]: 1.3e-5 kg; source International Aluminium Insitute 2015; lognormal variance with pedigree 0.0426, pedigree (1,3,3,1,1)
- PAH, polycyclic aromatic hydrocarbons [air, unspecified]: 4.2e-6 kg; source International Aluminium Insitute 2015; lognormal variance with pedigree 0.3026, pedigree (1,3,3,1,1)
  property total PAH emission to air 8.8e-6 kg; name totalPAH
- Methane, tetrafluoro-, R-14 [air, unspecified]: 5.6e-5 kg; source International Aluminium Insitute 2015; lognormal variance with pedigree 0.042, pedigree (1,1,3,1,1)
  Data collected in IAI Anode effect survey. http://www.world-aluminium.org/statistics/ Survey response rate 43% remaining 57% is modelled based on sampled data from similar technologies.
- Sulfur dioxide [air, unspecified]: 0.0132 kg; source International Aluminium Insitute 2015; lognormal variance with pedigree 0.0032, pedigree (1,3,3,1,1)
- Particulates, > 2.5 um, and < 10um [air, unspecified]: 0.000968 kg; = PM_total_3 * PM_btw_2_5_and_10um; source International Aluminium Insitute 2015; lognormal variance with pedigree 0.0033, pedigree (2,2,3,1,1)
  Total amount from IAI survey, distributed among three class sizes using CEPMEIP database emission factors for Production of primary aluminium. Abatement level: medium.
  property ratio of particulates between 2.5 and 10 microns 0.44; name PM_btw_2_5_and_10um; = (3.2-1.44)/4
  property total particulates 0.0022 kg; name PM_total_3
- Hydrogen fluoride [air, unspecified]: 0.0008 kg; source International Aluminium Insitute 2015; lognormal variance with pedigree 0.0426, pedigree (1,3,3,1,1)
  Reported as F in IAI 2015 survey, converted.
- Ethane, hexafluoro-, HFC-116 [air, unspecified]: 6.4e-6 kg; source International Aluminium Insitute 2015; lognormal variance with pedigree 0.042, pedigree (1,1,3,1,1)
  (same comment as for Methane, tetrafluoro-, R-14)
- Particulates, < 2.5 um [air, unspecified]: 0.000792 kg; = PM_total_1* PM2_5; source International Aluminium Insitute 2015; lognormal variance with pedigree 0.0033, pedigree (2,2,3,1,1)
  (same comment as for Particulates, > 2.5 um, and < 10um)
  property total particulates 0.0022 kg; name PM_total_1
  property ratio of total particulates less than 2.5 microns 0.36; name PM2_5; = 1.44/4
- Benzo(a)pyrene [air, unspecified]: 7.56e-8 kg; name BaPAmount; source International Aluminium Insitute 2015; lognormal variance with pedigree 0.3026, pedigree (1,3,3,1,1)
- Water [air, unspecified]: 0.0022 m3; source International Aluminium Insitute 2015; lognormal variance with pedigree 0.2106, pedigree (5,5,5,5,5)
  IAI data reported as "Fresh Water Consumption"
- Carbon monoxide, fossil [air, unspecified]: 0.091708 kg; source Classen M. 2008; lognormal variance with pedigree 0.692, pedigree (1,1,5,5,1)
- Nitrogen oxides [air, unspecified]: 0.000531 kg; source International Aluminium Insitute 2015; lognormal variance with pedigree 0.0326, pedigree (1,3,3,1,1)
- Particulates, > 10 um [air, unspecified]: 0.00044 kg; = PM_total_2 *PM_greater_10um; source International Aluminium Insitute 2015; lognormal variance with pedigree 0.0033, pedigree (2,2,3,1,1)
  (same comment as for Particulates, > 2.5 um, and < 10um)
  property total particulates 0.0022 kg; name PM_total_2
  property ratio pf particulates greater than 10 microns 0.2; name PM_greater_10um; = (4-3.2)/4
- PAH, polycyclic aromatic hydrocarbons [water, unspecified]: 2.43e-8 kg; source International Aluminium Insitute 2015; lognormal variance with pedigree 0.0426, pedigree (1,3,3,1,1)
  Reported as PAH (6 Borneff components)
- Water [water, surface water]: 0.0107 m3; source International Aluminium Insitute 2015; lognormal variance with pedigree 0.0032, pedigree (1,3,3,1,1)
  property dry mass 0 kg; name DM
  property wet mass 1000 kg; name WM
  property carbon content, fossil 0; name C_content_fossil
  property carbon content, non-fossil 0; name C_content_non_fossil
  property water in wet mass 1000 kg; name WWM
- Carbon dioxide, fossil [air, unspecified]: 1.4965 kg; source Classen M. 2008; lognormal variance with pedigree 0.042, pedigree (1,1,5,5,1)
- Fluoride [water, unspecified]: 2.3e-5 kg; source International Aluminium Insitute 2015; lognormal variance with pedigree 0.0426, pedigree (1,3,3,1,1)

## Sampling procedure
Most flows are based on IAI 2015 survey data.
A number of flows not covered by the surveys were inherited from the ecoinvent 2.2 dataset.
Total percent representativeness is based on 2015 LCI data, using 2015 production volumes of this region.Energy data collected from 2015 IAI energy survey covered 100% of produciton in this region.

## Extrapolations
This dataset has been extrapolated from year 2015 to the year of the calculation (2021). The uncertainty has been adjusted accordingly.
