# treatment of wastewater from concrete production, capacity 5E9l/year

Dataset: EcoSpold 2, unit process
Geography: CH
Time period: 1994-01-01 to 2021-12-31
Technology level: current
Classification: ISIC rev.4 ecoinvent: 3700:Sewerage
Classification: EcoSpold01Categories: waste management/wastewater treatment
Tags: Treatment; ConvertedDataset
Scenario: Business-as-Usual
System model: Allocation, cut-off by classification
Generated by: Gabor Doka (obsolete)
Published in: Doka G. 2008
Database: ecoinvent
isCopyrightProtected: true
accessRestrictedTo: 1

## General comment
Wastewater purified in a medium size municipal wastewater treatment plant (capacity class 3), with an average capacity size of 24900 per-captia-equivalents PCE.
Wastewater contains (in kg/m3): DOC: 0.01216 (GSD=125%); TOC: 0.01216 (GSD=125%); SO4-S: 0.001002 (GSD=125%); NO3-N: 0.003211 (GSD=125%); PO4-P: 0.0000672 (GSD=125%); Cl: 0.02969 (GSD=125%); As: 0.000001 (GSD=125%); Cr: 0.00002134 (GSD=225%); Pb: 0.000001 (GSD=225%); Zn: 0.00003462 (GSD=225%); K: 0.3182 (GSD=125%); Na: 0.08275 (GSD=125%);
[This dataset was already contained in the ecoinvent database version 2. It was not individually updated during the transfer to ecoinvent version 3. Life Cycle Impact Assessment results may still have changed, as they are affected by changes in the supply chain, i.e. in other datasets. This dataset was generated following the ecoinvent quality guidelines for version 2. It may have been subject to central changes described in the ecoinvent version 3 change report (http://www.ecoinvent.org/database/ecoinvent-version-3/reports-of-changes/), and the results of the central updates were reviewed extensively. The changes added e.g. consistent water flows and other information throughout the database. The documentation of this dataset can be found in the ecoinvent reports of version 2, which are still available via the ecoinvent website. The change report linked above covers all central changes that were made during the conversion process.]

## Included activities end
Infrastructure materials for municipal wastewater treatment plant, transports, dismantling. Land use burdens.

## Geography
Specific to the technology mix encountered in Switzerland in 2000. Well applicable to modern treatment practices in Europe, North America or Japan.

## Technology
Three stage wastewater treatment (mechanical, biological, chemical) including sludge digestion (fermentation) according to the average technology in Switzerland

## Parameters
- fraction, process water, to air: 0.1 dimensionless; name fraction_PW_to_air; lognormal variance with pedigree 0.092025, pedigree (4,4,3,2,4)
  Literature value (Statistics Canada, 2007 & Shaffer, K.H., 2008, Consumptive water use in the Great Lakes Basin, USGS) (Vionnet, S., Quantis Water Database - Technical Report, 2012).

## Reference product
- wastewater from concrete production: -1 m3; name RP_amount_1; CPC 39920: Sewage sludge; By-product classification Waste
  production volume 0.0336675 m3; name RP_PV_1
    This is a placeholder value that does not reflect real-world production volumes. This dataset does not currently require a real-world production volume to work in the database framework, and no actual data were collected yet. This has no negative effect on the results of the ecoinvent database. The placeholder value of this activity was scaled according to the nominal GDP of 2005 (source: United Nations, http://data.un.org/Glossary.aspx?q=GDP+%28current+US%24%29, accessed 20130726) to reflect an appropriate share of the global production volume, which is also a placeholder value.
  property carbon content, fossil 0.027074
    TOC =0.01216 kg/m3 (Tab A.20, ecoinvent v2.2 report 13_I). TOC was considered as Total Carbon.
  property price 0 EUR2005; name RP_amount_1_price_EUR2005
    Waste products are assigned a price of zero as they are assumed to require further treatment.
  property carbon content 0.027074
    carbon content on a dry matter basis (reserved; not for manual entry)
  properties: water content 2225.48, water in wet mass 999.551 kg, wet mass 1000 kg, carbon content, non-fossil 0, dry mass 0.449139 kg, carbon allocation 0.01216 kg

## Inputs from technosphere
- chemical, inorganic: 1.1972e-8 kg; lognormal variance with pedigree 0.41, pedigree (1,1,5,1,1)
  burden from sludge incineration. Uncertainty calculated from wastewater composition and treatment model
  properties: carbon content, fossil 0.003, dry mass 1 kg, wet mass 1 kg
  note on carbon content, fossil: This dataset is an unweighted average of 20 inorganic substances (listed in Tab 88.1, ecoinvent v2.2 report 8, part II), being part of the top100 chemicals included in this database. The C-content has also been calculated as an unweighted average of the C content of the substances composing this dataset.
- residual material landfill: 1.145e-13 unit; lognormal variance with pedigree 0.07, pedigree (1,1,5,1,1)
  (same comment as for chemical, inorganic)
- iron sulfate: 0.00031864 kg; lognormal variance with pedigree 0.11, pedigree (1,1,5,1,1)
  direct wastewater treatment plant burden. Uncertainty calculated from wastewater composition and treatment model
  properties: wet mass 1 kg, dry mass 1 kg
- process-specific burdens, slag landfill: 0.00025442 kg; lognormal variance with pedigree 0.07, pedigree (1,1,5,1,1)
  burden from sludge incineration. Uncertainty calculated from wastewater composition and treatment model;activityLink introduced to establish a direct link to the corresponding regional supply of this product
- ammonia, anhydrous, liquid: 6.2237e-7 kg; lognormal variance with pedigree 0.26, pedigree (1,1,5,1,1)
  (same comment as for chemical, inorganic)
  properties: dry mass 1 kg, wet mass 1 kg
- process-specific burdens, residual material landfill: 5.4961e-5 kg; lognormal variance with pedigree 0.07, pedigree (1,1,5,1,1)
  (same comment as for process-specific burdens, slag landfill)
- municipal waste incineration facility: 2.109e-12 unit; lognormal variance with pedigree 0.04, pedigree (1,1,5,1,1)
  (same comment as for chemical, inorganic)
- sodium hydroxide, without water, in 50% solution state: 8.7737e-8 kg; lognormal variance with pedigree 0.1, pedigree (1,1,5,1,1)
  (same comment as for chemical, inorganic)
  properties: wet mass 1 kg, dry mass 1 kg, heating value, net 3.03 MJ
- liquid manure spreading, by vacuum tanker: 3.8126e-5 m3; lognormal variance with pedigree 0.04, pedigree (1,1,5,1,1)
  burden from sludge spreading. Uncertainty calculated from wastewater composition and treatment model
  This exchange has an activity link directly to the producing activity because the product is primarily consumed in the same geographical area where it is produced.
- quicklime, milled, packed: 1.5907e-8 kg; lognormal variance with pedigree 0.1, pedigree (1,1,5,1,1)
  (same comment as for chemical, inorganic)
  properties: dry mass 0.99 kg, wet mass 1 kg, water content 0.010101
- electricity, high voltage: 0.0012129 kWh; lognormal variance with pedigree 0.48, pedigree (1,1,5,1,1)
  (same comment as for chemical, inorganic)
- waste plastic, mixture: -0.0155 kg; name BP_amount_1; lognormal variance with pedigree 0.04, pedigree (1,1,5,1,1)
  (same comment as for iron sulfate)
  production volume 0.000521847 kg; = BP_amount_1* RP_PV_1/ABS( RP_amount_1)
    Calculated from the production volume of wastewater from concrete production in proportion to the respective output amounts.
  property price 0 EUR2005; name BP_amount_1_price_EUR2005
  properties: wet mass 1 kg, water content 0.180638, dry mass 0.847 kg, carbon content, fossil 0.747344, heating value, net 30.79 MJ
  note on carbon content, fossil: C content in 1 kg DM was calculated using data in Tab A.2, ecoinvent v2.2 report 13_I
  note on heating value, net: Value taken from the general comment of the treatment dataset.
- aluminium sulfate, powder: 8.6117e-5 kg; lognormal variance with pedigree 0.11, pedigree (1,1,5,1,1)
  (same comment as for iron sulfate)
  properties: dry mass 1 kg, wet mass 1 kg
- waste cement, hydrated: -5.4961e-5 kg; name BP_amount_2; lognormal variance with pedigree 0.08, pedigree (1,1,5,1,1)
  (same comment as for chemical, inorganic)
  production volume 1.8504e-6 kg; = BP_amount_2* RP_PV_1/ABS( RP_amount_1)
    (same comment as for waste plastic, mixture)
  property price 0 EUR2005; name BP_amount_2_price_EUR2005
  properties: dry mass 1 kg, wet mass 1 kg
- iron (III) chloride, without water, in 40% solution state: 0.00043723 kg; lognormal variance with pedigree 0.11, pedigree (1,1,5,1,1)
  direct wastewater treatment plant burden plus burden from sludge incineration. Uncertainty calculated from wastewater composition and treatment model
  properties: dry mass 1 kg, wet mass 1 kg
- waste graphical paper: -0.0155 kg; name BP_amount_3; lognormal variance with pedigree 0.04, pedigree (1,1,5,1,1)
  (same comment as for iron sulfate)
  production volume 0.000521847 kg; = BP_amount_3* RP_PV_1/ABS( RP_amount_1)
    (same comment as for waste plastic, mixture)
  property price 0 EUR2005; name BP_amount_3_price_EUR2005
  properties: water content 0.126126, heating value, net 14.12 MJ, dry mass 0.888 kg, carbon content, non-fossil 0.454955, wet mass 1 kg
- process-specific burdens, municipal waste incineration: 0.0084362 kg; lognormal variance with pedigree 0.04, pedigree (1,1,5,1,1)
  (same comment as for process-specific burdens, slag landfill)
- cement, unspecified: 2.1984e-5 kg; lognormal variance with pedigree 0.08, pedigree (1,1,5,1,1)
  (same comment as for chemical, inorganic)
  properties: dry mass 1 kg, wet mass 1 kg
- heat, district or industrial, other than natural gas: 0.0070753 MJ; lognormal variance with pedigree 0.04, pedigree (1,1,5,1,1)
  (same comment as for chemical, inorganic)
  properties: heating value, net 1 MJ
- electricity, low voltage: 0.038922 kWh; lognormal variance with pedigree 0.04, pedigree (1,1,5,1,1)
  (same comment as for iron sulfate)
- chromium oxide, flakes: 3.6358e-10 kg; lognormal variance with pedigree 0.58, pedigree (1,1,5,1,1)
  (same comment as for chemical, inorganic)
  properties: dry mass 1 kg, wet mass 1 kg
- wastewater treatment facility, capacity 5E9l/year: 5.6882e-9 unit; lognormal variance with pedigree 0.04, pedigree (1,1,5,1,1)
  uncertainty heeded in exchanges of the module
- titanium dioxide: 1.7815e-8 kg; lognormal variance with pedigree 0.58, pedigree (1,1,5,1,1)
  (same comment as for chemical, inorganic)
  properties: wet mass 1 kg, dry mass 1 kg
- slag landfill: 4.523e-13 unit; lognormal variance with pedigree 0.07, pedigree (1,1,5,1,1)
  (same comment as for chemical, inorganic)
- hydrochloric acid, without water, in 30% solution state: 7.1831e-9 kg; lognormal variance with pedigree 0.41, pedigree (1,1,5,1,1)
  (same comment as for chemical, inorganic)
  properties: wet mass 1 kg, dry mass 1 kg, heating value, net 3.32 MJ
- sewer grid, 5E9l/year, 110 km: 2.1782e-7 km; lognormal variance with pedigree 0.04, pedigree (1,1,5,1,1)
  uncertainty heeded in exchanges of the module
- heat, district or industrial, natural gas: 5.46255e-5 MJ; lognormal variance with pedigree 0.26, pedigree (1,1,5,1,1)
  (same comment as for chemical, inorganic)
  properties: heating value, net 1 MJ

## Emissions to nature
- Methane, fossil [air, urban air close to ground]: 9.0716e-5 kg; lognormal variance with pedigree 0.1, pedigree (1,1,5,1,1)
  emission from sludge incineration. Uncertainty calculated from wastewater composition and treatment model
- Lead [water, surface water]: 1.0991e-7 kg; lognormal variance with pedigree 0.61, pedigree (1,1,5,1,1)
  sewer overload discharge plus direct wastewater treatment plant emission plus emission from sludge incineration. Uncertainty calculated from wastewater composition and treatment model
- Lead [air, urban air close to ground]: 1.7591e-11 kg; lognormal variance with pedigree 0.76, pedigree (1,1,5,1,1)
  direct digester gas emission plus emission from sludge incineration. Uncertainty calculated from wastewater composition and treatment model
- TOC, Total Organic Carbon [water, ground-, long-term]: 1.6214e-5 kg; lognormal variance with pedigree 0.07, pedigree (1,1,5,1,1)
  (same comment as for Methane, fossil)
- Nitrate [water, surface water]: 0.012029 kg; lognormal variance with pedigree 0.09, pedigree (1,1,5,1,1)
  (same comment as for Lead)
- Arsenic, ion [water, ground-, long-term]: 6.2983e-8 kg; lognormal variance with pedigree 0.11, pedigree (1,1,5,1,1)
  (same comment as for Methane, fossil)
- Chromium VI [water, ground-, long-term]: 5.9128e-7 kg; lognormal variance with pedigree 1.1, pedigree (1,1,5,1,1)
  (same comment as for Methane, fossil)
- Water [air, unspecified]: 0.1 m3; name water_to_air_unspecified; lognormal variance with pedigree 0.0807, pedigree (2,2,5,1,1)
  Calculated value based on water balance.
  property fraction, origin: unspecified 1; name fraction_origin_unspecified
  property fraction, origin: salt water 0; name fraction_origin_salt_water
  property fraction, origin: fresh water 0; name fraction_origin_fresh_water
- Iron [soil, agricultural]: 0.0001252 kg; lognormal variance with pedigree 0.11, pedigree (1,1,5,1,1)
  emission from sludge spreading. Uncertainty calculated from wastewater composition and treatment model
- Carbon monoxide, fossil [air, urban air close to ground]: 2.8795e-5 kg; lognormal variance with pedigree 0.12, pedigree (1,1,5,1,1)
  (same comment as for Methane, fossil)
- Iron, ion [water, ground-, long-term]: 6.6516e-5 kg; lognormal variance with pedigree 0.94, pedigree (1,1,5,1,1)
  (same comment as for Methane, fossil)
- Arsenic [soil, agricultural]: 1.0112e-7 kg; lognormal variance with pedigree 0.11, pedigree (1,1,5,1,1)
  (same comment as for Iron)
- Carbon [soil, agricultural]: 0.0014639 kg; lognormal variance with pedigree 0.06, pedigree (1,1,5,1,1)
  (same comment as for Iron)
- Lead [soil, agricultural]: 4.1706e-7 kg; lognormal variance with pedigree 0.72, pedigree (1,1,5,1,1)
  (same comment as for Iron)
- Sulfate [water, surface water]: 0.0033359 kg; lognormal variance with pedigree 0.08, pedigree (1,1,5,1,1)
  (same comment as for Lead)
- Iron, ion [water, surface water]: 4.8595e-8 kg; lognormal variance with pedigree 0.14, pedigree (1,1,5,1,1)
  (same comment as for Lead)
- Zinc, ion [water, ground-, long-term]: 1.9708e-7 kg; lognormal variance with pedigree 5.52, pedigree (1,1,5,1,1)
  (same comment as for Methane, fossil)
- Zinc [soil, agricultural]: 1.1207e-5 kg; lognormal variance with pedigree 0.72, pedigree (1,1,5,1,1)
  (same comment as for Iron)
- Aluminium [water, ground-, long-term]: 5.3478e-6 kg; lognormal variance with pedigree 0.12, pedigree (1,1,5,1,1)
  (same comment as for Methane, fossil)
- Arsenic [air, urban air close to ground]: 2.8152e-10 kg; lognormal variance with pedigree 0.13, pedigree (1,1,5,1,1)
  (same comment as for Lead)
- Phosphate [water, surface water]: 7.3716e-5 kg; lognormal variance with pedigree 0.09, pedigree (1,1,5,1,1)
  sewer overload discharge plus direct wastewater treatment plant emission plus emission from sludge incineration plus emission from sludge spreading. Uncertainty calculated from wastewater composition and treatment model
- Sodium, ion [water, surface water]: 0.08275 kg; lognormal variance with pedigree 0.09, pedigree (1,1,5,1,1)
  (same comment as for Lead)
- Arsenic, ion [water, surface water]: 8.3562e-7 kg; lognormal variance with pedigree 0.08, pedigree (1,1,5,1,1)
  (same comment as for Lead)
- Nitrate [water, ground-, long-term]: 4.4316e-7 kg; lognormal variance with pedigree 0.12, pedigree (1,1,5,1,1)
  (same comment as for Methane, fossil)
- Zinc [air, urban air close to ground]: 2.0766e-10 kg; lognormal variance with pedigree 0.76, pedigree (1,1,5,1,1)
  (same comment as for Lead)
- Nitrogen oxides [air, urban air close to ground]: 6.9156e-6 kg; lognormal variance with pedigree 0.12, pedigree (1,1,5,1,1)
  (same comment as for Lead)
- Chloride [water, surface water]: 0.029976 kg; lognormal variance with pedigree 0.09, pedigree (1,1,5,1,1)
  (same comment as for Lead)
- Phosphorus [air, urban air close to ground]: 2.2662e-8 kg; lognormal variance with pedigree 0.13, pedigree (1,1,5,1,1)
  (same comment as for Lead)
- Aluminium [soil, agricultural]: 6.3712e-6 kg; lognormal variance with pedigree 0.11, pedigree (1,1,5,1,1)
  (same comment as for Iron)
- Nitrogen [water, surface water]: 1.0932e-5 kg; lognormal variance with pedigree 0.12, pedigree (1,1,5,1,1)
  direct wastewater treatment plant emission. Uncertainty calculated from wastewater composition and treatment model
- BOD5, Biological Oxygen Demand [water, surface water]: 0.0024732 kg; lognormal variance with pedigree 0.05, pedigree (1,1,5,1,1)
  (same comment as for Lead)
- DOC, Dissolved Organic Carbon [water, surface water]: 0.001362 kg; lognormal variance with pedigree 0.04, pedigree (1,1,5,1,1)
  (same comment as for Lead)
- BOD5, Biological Oxygen Demand [water, ground-, long-term]: 1.3403e-5 kg; lognormal variance with pedigree 0.07, pedigree (1,1,5,1,1)
  (same comment as for Methane, fossil)
- Chromium VI [water, surface water]: 1.1012e-5 kg; lognormal variance with pedigree 0.65, pedigree (1,1,5,1,1)
  (same comment as for Lead)
- Lead [water, ground-, long-term]: 3.3703e-8 kg; lognormal variance with pedigree 6.92, pedigree (1,1,5,1,1)
  (same comment as for Methane, fossil)
- Chromium, ion [water, surface water]: 1.7802e-8 kg; lognormal variance with pedigree 0.73, pedigree (1,1,5,1,1)
  (same comment as for Methane, fossil)
- Aluminium [air, urban air close to ground]: 1.1289e-8 kg; lognormal variance with pedigree 0.12, pedigree (1,1,5,1,1)
  (same comment as for Lead)
- Cyanide [air, urban air close to ground]: 1.1103e-8 kg; lognormal variance with pedigree 0.28, pedigree (1,1,5,1,1)
  (same comment as for Methane, fossil)
- Aluminium [water, surface water]: 6.013e-10 kg; lognormal variance with pedigree 0.72, pedigree (1,1,5,1,1)
  (same comment as for Lead)
- Phosphate [water, ground-]: 3.49e-7 kg; lognormal variance with pedigree 0.16, pedigree (1,1,5,1,1)
  (same comment as for Iron)
- Water [water, unspecified]: 0.9 m3; name water_to_water_unspecified; lognormal variance with pedigree 0.0807, pedigree (2,2,5,1,1)
  Calculated value based on water balance.
  property carbon content, non-fossil 0; name C_content_non_fossil
  property fraction, origin: fresh water 1; name fraction_origin_fresh_water_Ww
  property carbon content, fossil 0; name C_content_fossil
  property fraction, origin: unspecified 0; name fraction_origin_unspecified_Ww
  property dry mass 0 kg; name DM
  property fraction, origin: salt water 0; name fraction_origin_salt_water_Ww
  property wet mass 1000 kg; name WM
  property water in wet mass 1000 kg; name WWM
- Chromium [air, urban air close to ground]: 4.13e-13 kg; lognormal variance with pedigree 0.81, pedigree (1,1,5,1,1)
  (same comment as for Lead)
- COD, Chemical Oxygen Demand [water, surface water]: 0.0077572 kg; lognormal variance with pedigree 0.04, pedigree (1,1,5,1,1)
  (same comment as for Lead)
- COD, Chemical Oxygen Demand [water, ground-, long-term]: 4.0974e-5 kg; lognormal variance with pedigree 0.07, pedigree (1,1,5,1,1)
  (same comment as for Methane, fossil)
- Dinitrogen monoxide [air, urban air close to ground]: 8.7572e-6 kg; lognormal variance with pedigree 0.09, pedigree (1,1,5,1,1)
  direct wastewater treatment plant emission plus direct digester gas emission plus emission from sludge incineration plus emission from sludge spreading. Uncertainty calculated from wastewater composition and treatment model
- Iron [air, urban air close to ground]: 4.7408e-9 kg; lognormal variance with pedigree 0.15, pedigree (1,1,5,1,1)
  (same comment as for Lead)
- Phosphate [water, ground-, long-term]: 2.654e-6 kg; lognormal variance with pedigree 4.28, pedigree (1,1,5,1,1)
  (same comment as for Methane, fossil)
- Potassium, ion [water, surface water]: 0.3182 kg; lognormal variance with pedigree 0.09, pedigree (1,1,5,1,1)
  (same comment as for Lead)
- Carbon dioxide, fossil [air, urban air close to ground]: 0.03386 kg; lognormal variance with pedigree 0.05, pedigree (1,1,5,1,1)
  (same comment as for Methane, fossil)
- Zinc, ion [water, surface water]: 1.0703e-5 kg; lognormal variance with pedigree 0.66, pedigree (1,1,5,1,1)
  (same comment as for Lead)
- Ammonia [air, urban air close to ground]: 4.1431e-6 kg; lognormal variance with pedigree 0.32, pedigree (1,1,5,1,1)
  direct digester gas emission plus emission from sludge incineration plus emission from sludge spreading. Uncertainty calculated from wastewater composition and treatment model
- NMVOC, non-methane volatile organic compounds, unspecified origin [air, urban air close to ground]: 4.1219e-7 kg; lognormal variance with pedigree 0.21, pedigree (1,1,5,1,1)
  direct digester gas emission. Uncertainty calculated from wastewater composition and treatment model
- TOC, Total Organic Carbon [water, surface water]: 0.0019401 kg; lognormal variance with pedigree 0.04, pedigree (1,1,5,1,1)
  (same comment as for Lead)
- DOC, Dissolved Organic Carbon [water, ground-, long-term]: 1.6214e-5 kg; lognormal variance with pedigree 0.07, pedigree (1,1,5,1,1)
  (same comment as for Methane, fossil)
- Chromium [soil, agricultural]: 4.9245e-6 kg; lognormal variance with pedigree 0.72, pedigree (1,1,5,1,1)
  (same comment as for Iron)

## Extrapolations
This dataset has been extrapolated from year 2000 to the year of the calculation (2021). The uncertainty has been adjusted accordingly.

## Review by Niels Jungbluth 2009-01-22
passed.
