# willow production, short rotation coppice

Dataset: EcoSpold 2, unit process
Geography: DE
Time period: 2005-01-01 to 2021-12-31
Technology level: current
Classification: ISIC rev.4 ecoinvent: 0129:Growing of other perennial crops
Scenario: Business-as-Usual
System model: Allocation, cut-off by classification
Generated by: Thomas Nemecek
Published in: Hölscher T. 2007
Database: ecoinvent
isCopyrightProtected: true
accessRestrictedTo: 1

## General comment
This dataset represents the production of 1 kg of willow wood chips (dry matter) in short rotation coppice (SRC) with a lifetime of 20 years. The moisture content at storage is 23% (=30% water on a dry mass basis). The SRC is harvested from the fourth year after establishment onwards every third year. The average dry matter yield of a harvest year is 36'333 kg/ha.

## Included activities start
This activity assumes the production of willow in short rotation coppice with a plantation lifetime of 20 years and represents the average expenditures of the production of 1 kg of willow wood chips including the establishment, operation and clearing of the plantation. The inputs of seed, mineral fertilisers and pesticides are considered. It is assumed that no organic fertilisers are applied.

## Included activities end
The dataset includes all machine operations and corresponding inputs of machine infrastructure and sheds. Machine operations are: soil cultivation, planting, fertilisation, weed control, pest and pathogen control, harvest and chipping of willow stems, transport from field to farm (2 km), drying of wood chips under roof (air drying; no electricity input), and clearing of the plantation by rotary tiller including growing of oil radish (not harvested) for shading the field and inhibiting regrowth of willow. Further, direct field emissions are included. This activity ends after mulching of the oil radish and with provision of willow wood chips at the farm gate.

## Technology
conventional production

## Reference product
- wood chips and particles, willow: 1 kg; name REF_PRODUCT; By-product classification allocatable product; ISIC rev.4 ecoinvent 012:Growing of perennial crops; CPC 31230: Wood in chips or particles
  production volume 4.6325e6 kg
    Estimate based on the average annual productivity of willow short rotation coppice (10900 kg/ha) and the cultivated area (425 ha; pers. comm. T. Hering, Thüringer Landesanstalt für Landwirtschaft, 2011).
  property wet mass 1.2987 kg; name REF_PRODUCT_WM; = REF_PRODUCT_DM/0.77
  property water in wet mass 0.298701 kg; name REF_PRODUCT_WWM; = REF_PRODUCT_WM- REF_PRODUCT_DM
  property dry mass 1 kg; name REF_PRODUCT_DM
  property carbon content, non-fossil 0.48; name REF_PRODUCT_C_content_non_fossil
    biogene carbon content on a dry matter basis; BIOBIB - A Database for biofuels. http://www.vt.tuwien.ac.at/biobib/biobib.html.
  property water content 0.298701; name REF_PRODUCT_water_content; = REF_PRODUCT_WWM/ REF_PRODUCT_DM
  property energy content 19.153 MJ; name REF_PRODUCT_energy_content
    as gross calorific value (when relevant). "Willow" > gross calorific value in BIOBIB - A Database for biofuels (http://www.vt.tuwien.ac.at/biobib/biobib.html).
  property price 0.0246139 EUR2005; name REF_PRODUCT_price_EUR2005
    Calculated based on inputs: The price of the product has been calculated as a sum of the values of the material and energy inputs for this product. This value is therefore a rough estimation. It may underestimate the real price since there are additional expenses when producing any product. These expences can include for example labour costs, treatment of waste materials and profit for the producer. Please consider carefully whether this level of data quality is acceptable for your application.
  property heating value, net 18.11 MJ
    Literature value, Source: Phyllis2, database for (treated) biomass, algae, feedstocks for biogas production and biochar, https://phyllis.nl/Browse/Standard/ECN-Phyllis#willow
  property carbon content 0.48
    carbon content on a dry matter basis (reserved; not for manual entry)
  properties: carbon allocation 0.48 kg

## Inputs from technosphere
- tillage, ploughing: 4.5872e-6 ha; source Hölscher T. 2007; lognormal variance with pedigree 0.0412, pedigree (2,1,5,1,1)
  One pass in the year of establishment.
- tillage, harrowing, by spring tine harrow: 1.3761e-5 ha; source Hölscher T. 2007; lognormal variance with pedigree 0.0412, pedigree (2,1,5,1,1)
  One pass at clearing of plantation.
- glyphosate: 8.2661e-6 kg; source Hölscher T. 2007; lognormal variance with pedigree 0.0413, pedigree (2,2,5,1,1)
  Application before planting.
  properties: dry mass 1 kg, carbon content, fossil 0.214286, wet mass 1 kg
- fertilising, by broadcaster: 3.6697e-5 ha; source Hölscher T. 2007; lognormal variance with pedigree 0.0412, pedigree (2,1,5,1,1)
  One application of fertilisers per harvesting year, additionally, lime application in the 10th and 20th year.
- packaging, for fertilisers: 0.0628899 kg; lognormal variance with pedigree 0.0912, pedigree (4,3,5,5,4)
  Total amount of active substance/s of fertilisers needed for the production of 'wood chips and particles, willow' is calculated to be circa 3.14E-02 kg. Fertiliser/s used in this dataset is/are: 'lime', 'nitrogen fertiliser, as N', 'potassium chloride, as K2O'. The total amount of active substance/s is doubled in order to account for the packaging of the dilluted product of fertiliser/s that is/are applied. Therefore, 6.29E-02 kg of packaging for fertilisers is justified with this exchange.
  properties: wet mass 1 kg, price 0.0642 EUR2005, dry mass 1 kg, carbon content, fossil 0.825301, heating value, net 25.01 MJ
  note on carbon content, fossil: Considering a chemical formula (C2H4)n for polyethylene, carbon content-fossil is calculated to be 0.856286 kg of Carbon per kg of dry mass.
- tillage, rotary cultivator: 9.1743e-5 ha; source Hölscher T. 2007; lognormal variance with pedigree 0.0412, pedigree (2,1,5,1,1)
  Approximation (20 passes) for one pass with a bigger forestry machine; at clearing of the plantation.
- packaging, for pesticides: 2.13487e-5 kg; lognormal variance with pedigree 0.0912, pedigree (4,3,5,5,4)
  Total amount of active substance/s of pesticides needed for the production of wood chips and particles, willow is calculated to be circa 1.07E-05 kg. Pesticide/s used in this dataset is/are: 'acetamide-anillide-compound, unspecified', 'glyphosate', 'pesticide, unspecified'. The total amount of active substance/s is doubled in order to account for the packaging of the dilluted product of pesticide/s that is/are applied. Therefore, 2.13E-05 kg of packaging for pesticides is justified with this exchange.
  properties: dry mass 1 kg, heating value, net 25.97 MJ, wet mass 1 kg, price 0.0642 EUR2005, carbon content, fossil 0.85714
- acetamide-anillide-compound, unspecified: 6.8807e-7 kg; source Hölscher T. 2007; lognormal variance with pedigree 0.0413, pedigree (2,2,5,1,1)
  Approximation for the input of the active ingredient diflufenican. Applied in the year of establishment fo the plantation.
  properties: dry mass 1 kg, wet mass 1 kg, carbon content, fossil 0.659175
  note on carbon content, fossil: Approximated as an unweighted average of the C-content of the acetamide-anillide-compound (Tab 2.25 Sutter, 2010) alachor, metolachlor, propachlor and teflubenzuron
- beet seed, Swiss integrated production, for sowing: 9.1743e-5 kg; source Hölscher T. 2007; lognormal variance with pedigree 0.0412, pedigree (2,1,5,1,1)
  Approximation for oil radish seed which is sown after the clearing of the plantation in order to prevent the regrowth of willow through shading by oil radish leaves.
  properties: dry mass 0.85 kg, wet mass 1 kg, carbon content, non-fossil 0.464601, water content 0.176471
  note on carbon content, non-fossil: Wheat values are used to model sugar beet seeds. Composition data obtained from Wheat, soft red winter, in (http://www.nal.usda.gov/fnic/foodcomp/search/). First, composition data were refered to 1 kg dry mass. Then, C-contents were calculated considering a C-content/dry mass of 46% in carbohydrates (including fibres), 53% in proteins and 75% in fats. All data from "Evolutionary and Biochemical Aspects", A.D. Kay and T. Vrede (in Global Ecology, 2010, Elsevier B.V., S.E. Jørgensen Ed.).
- application of plant protection product, by field sprayer: 9.1743e-6 ha; source Hölscher T. 2007; lognormal variance with pedigree 0.0413, pedigree (2,2,5,1,1)
  Two passes in the year of establishment.
- inorganic nitrogen fertiliser, as N: 0.0017202 kg; source Hölscher T. 2007; lognormal variance with pedigree 0.0412, pedigree (2,1,5,1,1)
  75 kg N/(ha*a) from the first five harvesting years.
  properties: wet mass 1 kg, dry mass 1 kg
- potato planting: 4.5872e-6 ha; source Hölscher T. 2007; lognormal variance with pedigree 0.0412, pedigree (2,1,5,1,1)
  Approximation for planting of willow stem cuttings.
- potassium chloride: 0.00348528 kg; source Hölscher T. 2007; lognormal variance with pedigree 0.0413, pedigree (2,2,5,1,1)
  The exchange has been updated from 'potassium chloride, as K2O' into 'potassium chloride' and therefore its amount has been scaled (multiplied) from 0.0022 kg by 1.5829 kg of 'potassium chloride' per kg of 'potassium chloride, as K2O'. Original comment of the exchange is: 80 kg K2O/(ha*a) in the first, and 100 in the third to fifth harvesting years.
  properties: wet mass 1 kg, dry mass 1 kg
- chopping, maize: 2.75229e-5 ha; source Hölscher T. 2007; lognormal variance with pedigree 0.0412, pedigree (2,1,5,1,1)
  Approximation for the chipping of willow stems.
- willow stem cutting, for planting: 0.061927 unit; name SEED; source Hölscher T. 2007; lognormal variance with pedigree 0.0413, pedigree (2,2,5,1,1)
  13500 pcs/ha.
  property carbon content, non-fossil 0.48; name SEED_C_content_non_fossil
  property water in wet mass 0.0096 kg; name SEED_WWM; = SEED_WM- SEED_DM
  property water content 0.923077; name SEED_water_content; = SEED_WWM/ SEED_DM
  property dry mass 0.0104 kg; name SEED_DM; = SEED_WM*0.52
  property wet mass 0.02 kg; name SEED_WM
  note on carbon content, non-fossil: biogene carbon content on a dry matter basis;BIOBIB - A Database for biofuels. http://www.vt.tuwien.ac.at/biobib/biobib.html.
- sowing: 4.5872e-6 ha; source Hölscher T. 2007; lognormal variance with pedigree 0.0412, pedigree (2,1,5,1,1)
  Sowing of oil radish for shading (against regrowth of willow) after clearing of the plantation.
- mulching: 8.2569e-6 ha; source Hölscher T. 2007; lognormal variance with pedigree 0.0412, pedigree (2,1,5,1,1)
  Mulching between the rows, once per year (0.1 passes) from the second to the 19th year
- fodder loading, by self-loading trailer: 0.0068655 m3; source Hölscher T. 2007; lognormal variance with pedigree 0.0412, pedigree (2,1,5,1,1)
  Approximation of the loading an transport of woodchips from field to farm.
- pesticide, unspecified: 1.72018e-6 kg; source Hölscher T. 2007; lognormal variance with pedigree 0.0413, pedigree (2,2,5,1,1)
  Approximation of the input of the active ingretient flurtamone. Applied in the year of establishment fo the plantation.
  properties: dry mass 1 kg, carbon content, fossil 0.486978, wet mass 1 kg
  note on carbon content, fossil: Mean of C content in all pesticides whose formula has been documented in Sutter 2010
- hoeing: 6.422e-5 ha; source Hölscher T. 2007; lognormal variance with pedigree 0.0412, pedigree (2,1,5,1,1)
  One pass in the year of establishment, one pass in each of the 12 growing years, one pass in the first harvesting year.
- lime: 0.0275229 kg; source Hölscher T. 2007; lognormal variance with pedigree 0.0412, pedigree (2,1,5,1,1)
  3000 kg of lime per ha in the 10th and 20th year, each.
  properties: wet mass 1 kg, carbon content, fossil 0.120005, dry mass 1 kg
- building, hall, wood construction: 9.6154e-6 m2; source Hölscher T. 2007; lognormal variance with pedigree 0.3689, pedigree (5,5,5,3,4)
  Required infrastructure for "under roof" air drying of willow wood chips, assuming a storage time of 3 months and 1 m2 space requirement per tonne of of fresh wood chips (Coppice Resources Ltd 2008). --- Sources: Coppice Resources Ltd (2008) Guide to short rotation coppice. Retford, GB. retrieved November 2011 from http://www.coppiceresources.co.uk/pdf/CRLGrowersGuide08.pdf.

## Inputs from nature
- Transformation, from arable land, unspecified use [natural resource, land]: 0.045872 m2; lognormal variance with pedigree 0.0489, pedigree (2,1,5,1,1)
  Modelled, see chapter 'Land use' in "01_crop production_direct field emissions and natural resources_v1.0.pdf" - pdf-document on the dedicated talk page of ecoinvent (www.ecoinvent.org/documentation)
- Occupation, permanent crop, non-irrigated, intensive [natural resource, land]: 0.92522 m2*year; lognormal variance with pedigree 0.0429, pedigree (2,1,5,1,1)
  (same comment as for Transformation, from arable land, unspecified use)
- Energy, gross calorific value, in biomass [natural resource, biotic]: 20.4 MJ; lognormal variance with pedigree 0.0819, pedigree (2,3,5,3,4)
  Estimated.
- Transformation, to permanent crop, non-irrigated, intensive [natural resource, land]: 0.045872 m2; lognormal variance with pedigree 0.0489, pedigree (2,1,5,1,1)
  (same comment as for Transformation, from arable land, unspecified use)
- Carbon dioxide, in air [natural resource, in air]: 1.75887 kg; = 44/12 * (REF_PRODUCT_C_content_non_fossil * REF_PRODUCT * REF_PRODUCT_DM - SEED_C_content_non_fossil * SEED * SEED_DM); lognormal variance with pedigree 0.0818, pedigree (2,2,5,1,1)
  Modelled, see chapter 'Release of fossil CO2 after urea applications' in "01_crop production_assessment methods of direct field emissions_v1.0.pdf" - pdf-document on the dedicated talk page of ecoinvent (www.ecoinvent.org/documentation)

## Emissions to nature
- Nitrogen oxides [air, non-urban air or from high stacks]: 7.0705e-6 kg; lognormal variance with pedigree 0.0818, pedigree (2,2,5,1,1)
  Modelled, see chapter 'Emissions of NOx to the air' in "01_crop production_direct field emissions and natural resources_v1.0.pdf" - pdf-document on the dedicated talk page of ecoinvent (www.ecoinvent.org/documentation)
- Chromium [soil, agricultural]: 3.0171e-6 kg; lognormal variance with pedigree 0.0818, pedigree (2,2,5,1,1)
  Modelled, see chapter 'Emissions of heavy metals to agricultural soil, surface water and ground water' in "01_crop production_direct field emissions and natural resources_v1.0.pdf" - pdf-document on the dedicated talk page of ecoinvent (www.ecoinvent.org/documentation)
- Chromium, ion [water, surface water]: 5.8163e-8 kg; lognormal variance with pedigree 0.1271, pedigree (2,2,5,1,1)
  (same comment as for Chromium)
- Cadmium, ion [water, surface water]: 1.5652e-10 kg; lognormal variance with pedigree 0.1271, pedigree (2,2,5,1,1)
  (same comment as for Chromium)
- Phosphorus [water, surface water]: 1.8232e-5 kg; lognormal variance with pedigree 0.0818, pedigree (2,2,5,1,1)
  Modelled, see chapter 'Emissions of phosphorous to the water' in "01_crop production_direct field emissions and natural resources_v1.0.pdf" - pdf-document on the dedicated talk page of ecoinvent (www.ecoinvent.org/documentation)
- Copper, ion [water, ground-]: 5.2185e-8 kg; lognormal variance with pedigree 0.1271, pedigree (2,2,5,1,1)
  (same comment as for Chromium)
- Zinc, ion [water, ground-]: 1.584e-7 kg; lognormal variance with pedigree 0.1271, pedigree (2,2,5,1,1)
  (same comment as for Chromium)
- Lead [water, surface water]: 1.274e-8 kg; lognormal variance with pedigree 0.1271, pedigree (2,2,5,1,1)
  (same comment as for Chromium)
- Nitrate [water, ground-]: 0.0043628 kg; lognormal variance with pedigree 0.0818, pedigree (2,2,5,1,1)
  Modelled with the 'SALCA-NO3 model' described in "01_crop production_direct field emissions and natural resources_v1.0.pdf" - pdf-document on the dedicated talk page of ecoinvent (www.ecoinvent.org/documentation)
- Nickel [soil, agricultural]: 6.4755e-8 kg; lognormal variance with pedigree 0.0818, pedigree (2,2,5,1,1)
  (same comment as for Chromium)
- Zinc [soil, agricultural]: -8.3894e-6 kg
  (same comment as for Chromium)
- Lead [soil, agricultural]: 3.9081e-8 kg; lognormal variance with pedigree 0.0818, pedigree (2,2,5,1,1)
  (same comment as for Chromium)
- Copper [soil, agricultural]: -1.2502e-6 kg
  (same comment as for Chromium)
- Lead [water, ground-]: 1.8899e-9 kg; lognormal variance with pedigree 0.1271, pedigree (2,2,5,1,1)
  (same comment as for Chromium)
- Mercury [water, ground-]: 6.4951e-13 kg; lognormal variance with pedigree 0.1271, pedigree (2,2,5,1,1)
  (same comment as for Chromium)
- Mercury [water, surface water]: 8.7036e-13 kg; lognormal variance with pedigree 0.1271, pedigree (2,2,5,1,1)
  (same comment as for Chromium)
- Phosphate [water, ground-]: 1.9848e-5 kg; lognormal variance with pedigree 0.0818, pedigree (2,2,5,1,1)
  (same comment as for Phosphorus)
- Phosphate [water, surface water]: 7.4398e-5 kg; lognormal variance with pedigree 0.0818, pedigree (2,2,5,1,1)
  (same comment as for Phosphorus)
- Cadmium, ion [water, ground-]: 1.5721e-10 kg; lognormal variance with pedigree 0.1271, pedigree (2,2,5,1,1)
  (same comment as for Chromium)
- Copper, ion [water, surface water]: 6.0438e-8 kg; lognormal variance with pedigree 0.1271, pedigree (2,2,5,1,1)
  (same comment as for Chromium)
- Ammonia [air, non-urban air or from high stacks]: 3.3465e-5 kg; lognormal variance with pedigree 0.049, pedigree (2,2,5,1,1)
  Modelled with the 'AGRAMMON model' described in "01_crop production_direct field emissions and natural resources_v1.0.pdf" - pdf-document on the dedicated talk page of ecoinvent (www.ecoinvent.org/documentation)
- Zinc, ion [water, surface water]: 4.9386e-8 kg; lognormal variance with pedigree 0.1271, pedigree (2,2,5,1,1)
  (same comment as for Chromium)
- Diflufenican [soil, agricultural]: 6.8807e-7 kg; lognormal variance with pedigree 0.049, pedigree (2,2,5,1,1)
  Modelled, see chapter 'Emissions of pesticides to agricultural soil' in "01_crop production_direct field emissions and natural resources_v1.0.pdf" - pdf-document on the dedicated talk page of ecoinvent (www.ecoinvent.org/documentation)
- Chromium, ion [water, ground-]: 2.4666e-7 kg; lognormal variance with pedigree 0.1271, pedigree (2,2,5,1,1)
  (same comment as for Chromium)
- Mercury [soil, agricultural]: 1.3905e-12 kg; lognormal variance with pedigree 0.0818, pedigree (2,2,5,1,1)
  (same comment as for Chromium)
- Nickel, ion [water, surface water]: 4.8989e-8 kg; lognormal variance with pedigree 0.1271, pedigree (2,2,5,1,1)
  (same comment as for Chromium)
- Glyphosate [soil, agricultural]: 8.2661e-6 kg; lognormal variance with pedigree 0.049, pedigree (2,2,5,1,1)
  (same comment as for Diflufenican)
- Cadmium [soil, agricultural]: -3.0948e-8 kg
  (same comment as for Chromium)
- Dinitrogen monoxide [air, non-urban air or from high stacks]: 2.2058e-5 kg; lognormal variance with pedigree 0.0818, pedigree (2,2,5,1,1)
  Modelled, see chapter 'Emissions of N2O to the air' in "01_crop production_direct field emissions and natural resources_v1.0.pdf" - pdf-document on the dedicated talk page of ecoinvent (www.ecoinvent.org/documentation)
- Flurtamone [soil, agricultural]: 1.7202e-6 kg; lognormal variance with pedigree 0.049, pedigree (2,2,5,1,1)
  (same comment as for Diflufenican)

## Sampling procedure
The inventories were generated on the basis of data from the 'GruBE' project (Hölscher et al. 2007) and complemented with information from expert estimates, extension service documents and literature. The sources used in the project were KTBL (2006), Agrobränsle (2005), Hofmann (1998), Textor (2006) and personal communications from producers. --- Sources: Hölscher T., Deinmling S., Freiermuth Knuchel R., Gaillard G., Kägi T. & Müller-Sämann K. (2007) Energieoptionen aus landwirtschaftlicher Biomasse am Oberrhein - Auswirkungen für Landwirtschaft und Umwelt - Endbericht zum Projekt. Agentur für Nachhaltige Nutzung von Agrarlandschaften (ANNA). Müllheim, Germany. --- KTBL (2006) Energiepflanzen. Daten für die Planung des Energiepflanzenanbaus. Kuratorium für Technik und Bauwesen in der Landwirtschaft, Darmstadt, 372 p. --- Agrogbänsle (2005) Manual Salix viminalis. Ackerbauliche Informationen zum Weidenanbau. Informationsblatt der Firma Agrobränsle. Örebro, Sweden, 5 p. --- Hofmann M. (1998) Bewirtschaftung schnellwachsender Baumarten auf landwirtschaftlichen Flächen Kurzumtrieb. Merkblatt 11 des Forschungsinstituts für schnellwachsende Baumarten. Hann. Münden (ed.), 22 S. --- Textor B. (2006) Die Ernte forstlicher Rohstoffe auf landwirtschaftlichen Flächen im Kurzumtrieb. In: LAP, Landesanstalt für Pflanzenbau Forchheim (2006):Pflanzliche Rohstoffe zur
energetischen Nutzung. Workshop am 4.06.2006, Rheinstetten.

## Extrapolations
This dataset has been extrapolated from year 2005 to the year of the calculation (2021). The uncertainty has been adjusted accordingly.

## Review by Thomas Nemecek 2011-11-25
Passed internally.

## Review by Christian Bauer 2011-12-02
passed
