# transport, freight train, electricity

Dataset: EcoSpold 2, unit process
Geography: CH
Time period: 2000-01-01 to 2021-12-31
Technology level: current
Classification: ISIC rev.4 ecoinvent: 4912:Freight rail transport
Scenario: Business-as-Usual
System model: Allocation, cut-off by classification
Share of production covered: 100 %
Generated by: Frédéric Gindroz
Published in: Spielmann M. 2007
Database: ecoinvent
isCopyrightProtected: true
accessRestrictedTo: 1

## General comment
The dataset represents the entire transport life cycle of an electric freight train in Switzerland. The data of the energy use and operation emissions are average data for the operation of goods transportation by rail in Switzerland. The data has been determined top down, by combining the total yearly energy consumption and the yearly tkm-performance of goods transportation.
[This dataset is meant to replace the following datasets: - transport, freight train, CH, 2000 - 2000]

## Included activities start
The dataset starts with the production of a locomotive.

## Included activities end
The dataset ends with the service of transporting 1 ton over a distance of 1 km by an electric freight train. The dataset includes the production and the maintenance of the locomotive and the goods wagon, the construction of the railway track and the energy use and operation emissions of a freight train using electricity. The inventory includes as well the actual energy consumption for an average goods train (869Gt) in Switzerland using electro and diesel energy. In addition the diesel consumption and emissions of shunting processes are accounted for.

## Geography
The data for rail infrastructure reflect Swiss conditions. Data for vehicle manufacturing and maintenance represents generic European data. Data of energy use and operation emissions refers to average goods transport conditions in Switzerland

## Technology
Demand factors of various transport components required to fulfill the functional unit of one tkm fright transport are presented. In order to account for the fact that the same rail tracks are used for both passenger and goods transportation are applied allocation factors. Electric traction, diesel traction for shunting processes, average share of particle filters. The module energy use of goods trains comprises both, the actual performance of goods trains as well as required shunting processes. For a technical and ecological consideration of rail transport services, a distinction between the type of traction, diesel and electricity is important. In Switzerland, however, diesel locomotives are almost exclusively used for shunting purposes. The data presented in the database represents average environmental interventions, calculated top down from the yearly energy consumption and yearly transport performance. For electricity consumption of freight trains, yearly average data is available from the SBB (SBB, 2002). The actual consumption depends on numerous impact factors such as: • Gradient of the tracks • Type of good, i.e. relation between operation performance and transport performance • Train length and total weight • Speed and acceleration In an alpine country as Switzerland, this can result in a significantly higher specific electricity consumption compared to fairly flat countries such as the Netherlands or Germany. Borken (2003), for instance, calculate a final energy consumption for an average train (1000 Gt) and average load factor (0.5 net tons-per gross tons) of 0.034 kWh/tkm in a flat area and 0.051 kWh/tkm in a mountain region. The remaining difference between the latter value and the SBB value may be explained with the lower average load factor of the SBB in 2000 (0.42 t/Gt). Transmission losses (transmission ex traction substation 4% and transmission and conversion ex high voltage network 6%) are accounted for with 10%, resulting in a final energy consumption of 0.07804 kWh/tkm for the SBB (reference year 2006). Due to the fact that on the Swiss rail network only very few diesel locomotives are in operation emissions to air are limited to particulate emissions due to abrasion and emission of sulphur hexafluoride (SF6) occurring during conversion at traction substations. Source of abrasion are rail tracks, wheels, brakes, overhead contact line and exhaust emissions of shunting locomotives. The figures presented here, therefore should only be considered as rough estimates. For the determination of PM 10 emission factors are used for brakes, wheels, rail and overhead contacting line. For the determination of PM > 10 we assume a share of 25 % for wheel and rail abrasion. The abrasion of brakes and the resulting share of PM 10 depend on the wheel load and thus differ between fully loaded goods trains and empty goods train. The figure employed in this project represents an average based on the load factor of 0.42 for the Swiss average freight train. For sulphur hexafluoride (SF6) emitted during conversion at traction substations is assumed an emission index of 4.4E-08 kg/kWh Frischknecht (2003) resulting in a specific emission of 3.79E-09 kg/tkm. Abrasion (from braking lining, rail and wheel) is predominately composed of iron and mineral components BUWAL (2002). In this study is assumed that all non-airborne emissions are emitted as iron to soil. In consequence, is assumed a yearly load of 191.8 t/a iron emitted to soil. Emission of lubricates due to traction are not accounted for, since measures are in operation to avoid such emissions. A total diesel consumption of 8.695 Mio litres (in the year 2000) is reported for the SBB (SBB, 2002). In this study is assumed that all diesel is consumed for shunting, neglecting the consumption of diesel for the lorry fleet and diesel aggregates. Furthermore is assumed that 100% of the shunting processes for goods trains is performed with diesel locomotives. Consequently, is obtained a specific diesel consumption of 0.68 g/tkm. In Knörr (2000), shunting specific emission indices are presented. These emission factors are representative for German conditions in 1995. Obviously these indices merely differ marginal from those of diesel traction in Germany J. Borken et al. (2003), apart from SO2 emissions, which strongly depend on the sulphur of the fuel. In this project CO2 and SO2 indices are estimated assuming that all carbon and sulphur in the fuel is transformed completely into CO2 and SO2, respectively. In line with assumptions made for road transport we assume a sulphur content of 300 ppm resulting in a emission index of 0.6 g/kg. For CO2 is employed an emission index of 73.5 g/MJ or 3146 g/kg. The list of emission indices is enhanced with pollutants derived from heavy good vehicle emission factors for urban traffic conditions. These values reflect the Swiss average heavy good vehicle in urban traffic conditions and are derived from INFRAS (1999).
References:
SBB (2002) Umweltbericht 2000/2001. SBB, Bahnumweltzentrum, Bern, Online-Version under: www.sbb.ch/umwelt.
Borken J., Helms H., Jungk N. and W. K. (2003) Energy consumptions and emissions of goods transports in Europe. Ifeu, Heidelberg
Frischknecht R. (2003) Strommix. In: Sachbilanzen von Energiesystemen: Grundlagen für den ökologischen Vergleich von Energiesystemen und den Einbezug von Energiesystemen in Ökobilanzen für die Schweiz (ed. Dones R.). Final report ecoinvent 2000 No. 6, Paul Scherrer Institut Villigen, Swiss Centre for Life Cycle Inventories, Duebendorf, CH, Online-Version under: www.ecoinvent.ch.
BUWAL (2002) PM10-Emissionen des Verkehrs. Statusbericht; Teil Schienenverkehr. 144. Bundesamt fuer Umwelt, Wald und Landschaft, Bern
Knörr W., Höpfner U., Lambrecht U. and Patyk A. (2000) Fortschreibung Daten- und Rechenmodell: Energieverbrauch und Schadstoffemissionen aus dem motorisierten Verkehr. Endbericht. Nr. 298 45 105. Institut für Energie- und Umweltforschung (ifeu), Heidelberg.
INFRAS (1999) Handbook emission factors for road transport. CD-Rom.

## Time period
Data for emission indices for shunting is based on figures of 1995, specific energy consumption per tkm is from 2006

## Reference product
- transport, freight train: 1 metric ton*km; CPC 6512: Railway transport services of freight; By-product classification allocatable product
  production volume 1.6585e10 metric ton*km
    Literature data. Total production volume for the country is taken from 2019 Railway Statistics Synopsis (https://uic.org/IMG/pdf/uic-statistics-synopsis-2019.pdf). The production volume is calculated as the sum of the represented Railway companies (SBB + RHB+ BLS Cargo).
    The technology share is equal to 10786 Mio. tkm in 2007 in Switzerland scaled to the total production volume of 2019.
    UIC statistical synopsis 2005 http://www.uic.org/IMG/xls/synth2005-2.xls
  properties: price 0.026 EUR2005

## Inputs from technosphere
All rows: lognormal variance with pedigree 0.04, pedigree (1,1,5,1,1)
- goods wagon: 4.59e-8 unit
  Calculated value, required to fulfill the functional unit of one tkm fright transport.
- electricity, high voltage, for Swiss Federal Railways: 0.086124 kWh; source SBB 2002
  Literature value. For electricity consumption of freight trains, yearly average data is available from the SBB (SBB, 2002). The actual consumption depends on numerous impact factors such as: · Gradient of the tracks · Type of good, i.e. relation between operation performance and transport performance · Train length and total weight · Speed and acceleration In an alpine country as Switzerland, this can result in a significantly higher specific electricity consumption compared to fairly flat countries such as the Netherlands or Germany. Borken (2003), for instance, calculate a final energy consumption for an average train (1000 Gt) and average load factor (0.5 net tons-per gross tons) of 0.034 kWh/tkm in a flat area and 0.051 kWh/tkm in a mountain region. The remaining difference between the latter value and the SBB value may be explained with the lower average load factor of the SBB in 2000 (0.42 t/Gt). Transmission losses (transmission ex traction substation 4% and transmission and conversion ex high voltage network 6%) are accounted for with 10%, resulting in a final energy consumption of 0.07804 kWh/tkm for the SBB (reference year 2006). Energy use and operation emissions Further references: Borken J., Helms H., Jungk N. and W. K. (2003) Energy consumptions and emissions of goods transports in Europe. Ifeu, Heidelberg
- maintenance, goods wagon: 4.59e-8 unit
  Calculated value, required to fulfill the functional unit of one tkm fright transport.;activityLink introduced to establish a direct link to the corresponding regional supply of this product
- maintenance, locomotive: 7.11e-10 unit
  (same comment as for maintenance, goods wagon)
- diesel: 0.00068 kg; source Knörr W. 2000
  Literature value from Knörr et al. (2000). In this study, tkm (supplied tonne kilometre) is used as a reference value. The given value (0.25 g/tkm) has been transformed based on the assumption of an average load factor of 37%. 90% of the diesel shunting is allocated to goods transportation. A total diesel consumption of 8.695 Mio litres (in the year 2000) is reported for the SBB (SBB, 2002). In this study is assumed that all diesel is consumed for shunting, neglecting the consumption of diesel for the lorry fleet and diesel aggregates. Furthermore is assumed that 100% of the shunting processes for goods trains is performed with diesel locomotives. Consequently, is obtained a specific diesel consumption of 0.68 g/tkm. Energy use and operation emissions Further references: SBB (2002) Umweltbericht 2000/2001. SBB, Bahnumweltzentrum, Bern, Online-Version under: www.sbb.ch/umwelt <http://www.sbb.ch/umwelt>.
  properties: wet mass 1 kg, dry mass 1 kg, carbon content, fossil 0.865, heating value, net 42.8 MJ
  note on carbon content, fossil: C-content of diesel is 86.5% (ecoinvent v2.2 report 6_IV, Tab 3.14)
- locomotive: 7.11e-10 unit
  Calculated value, required to fulfill the functional unit of one tkm fright transport.
- railway track: 8.7347e-5 m*year
  (same comment as for maintenance, goods wagon)

## Emissions to nature
All rows: lognormal variance with pedigree 0.04, pedigree (1,1,5,1,1)
- Particulates, > 2.5 um, and < 10um [air, unspecified]: 6.8899e-6 kg
  Literature value. Particle size distributions of exhaust emissions and exhaust emission factors [g/kg] for diesel locomotives without particle filters from EU-Norm IIIa. Energy use and operation emissions
- Carbon dioxide, fossil [air, unspecified]: 0.0021394 kg
  Estimated value. In this project CO2 indice is estimated assuming that all carbon in the fuel is transformed completely into CO2. For CO2 is employed an emission index of 73.5 g/MJ or 3146 g/kg.Energy use and operation emissions
- Methane, fossil [air, unspecified]: 8.839e-8 kg; source INFRAS 1999
  Literature value. Average emission factors for Swiss heavy good vehicles (HGV) for urban traffic conditions in 2000 derived from INFRAS (1999). Energy use and operation emissions
- Zinc [air, unspecified]: 6.8e-10 kg; source EEA 2000
  Literature value provided by Expert Panel on Heavy Metals and POPs of the UNECE Task Force on Emission Inventories EEA (2000). However, these emission factors have to be considered as preliminary estimates only. More measurements are needed in order to confirm these values. Energy use and operation emissions
- Xylene [air, unspecified]: 2.722e-8 kg; source INFRAS 1999
  (same comment as for Methane, fossil)
- Cadmium [air, unspecified]: 6.8e-12 kg; source EEA 2000
  (same comment as for Zinc)
- Benzene [air, unspecified]: 6.8e-8 kg; source INFRAS 1999
  (same comment as for Methane, fossil)
- Mercury [air, unspecified]: 1.356e-14 kg; source Jungbluth N. 2003
  Literature value from Jungbluth (2003). Energy use and operation emissions
- Iron [soil, unspecified]: 1.7786e-5 kg
  Estimated value. Abrasion (from braking lining, rail and wheel) is predominately composed of iron and mineral components BUWAL (2002). In this study is assumed that all non-airborne emissions are emitted as iron to soil. In consequence, is assumed a yearly load of 191.8 t/a iron emitted to soil. Emission of lubricates due to traction are not accounted for, since measures are in operation to avoid such emissions. Energy use and operation emissions Further references: BUWAL (2002) PM10-Emissionen des Verkehrs. Statusbericht; Teil Schienenverkehr. 144. Bundesamt fuer Umwelt, Wald und Landschaft, Bern
- Nitrogen oxides [air, unspecified]: 3.7365e-5 kg; source Knörr W. 2000
  Literature value. Figures represent shunting specific emission indices Knörr et al. (2000) and average emission indices for diesel traction J. Borken et al. (2003) Energy use and operation emissions Further references: Borken J., Patyk A. and Reinhardt G. A. (1999) Basisdaten für ökologische Bilanzierungen: Einsatz von Nutzfahrzeugen in Transport, Landwirtschaft und Bergbau. Vieweg, Braunschweig/Wiesbaden
- Ammonia [air, unspecified]: 1.356e-8 kg; source INFRAS 1999
  (same comment as for Methane, fossil)
- Toluene [air, unspecified]: 2.722e-8 kg; source INFRAS 1999
  (same comment as for Methane, fossil)
- Particulates, > 10 um [air, unspecified]: 1.5782e-5 kg
  Literature value. Particle size distributions of exhaust emissions and exhaust emission factors [g/kg] for diesel locomotives without particle filters from EU-Norm IIIa. For the determination of PM > 10 is assumed a share of 25 % for wheel and rail abrasion. Energy use and operation emissions
- Carbon monoxide, fossil [air, unspecified]: 1.0747e-5 kg; source Knörr W. 2000
  Literature value. Figures represent shunting specific emission indices from Knörr et al. (2000). Energy use and operation emissions
- Lead [air, unspecified]: 7.483e-14 kg; source Jungbluth N. 2003
  Literature value from Jungbluth (2003). Energy use and operation emissions
- Nickel [air, unspecified]: 4.761e-11 kg; source EEA 2000
  (same comment as for Zinc)
- NMVOC, non-methane volatile organic compounds, unspecified origin [air, unspecified]: 3.4452e-6 kg; source INFRAS 1999
  Literature value. Average emission factors for Swiss heavy good vehicles (HGV) for urban traffic conditions in 2000 derived from INFRAS (1999). the presented figures of NMVOC emissions still contain emissions of Benzene, Toulol and Xylol. Energy use and operation emissions
- Selenium [air, unspecified]: 6.8e-12 kg; source EEA 2000
  (same comment as for Zinc)
- Copper [air, unspecified]: 1.1551e-9 kg; source EEA 2000
  (same comment as for Zinc)
- Sulfur hexafluoride [air, unspecified]: 3.7895e-9 kg; source Frischknecht R. 2003
  Literature value. Due to the fact that on the Swiss rail network only very few diesel locomotives are in operation emissions to air are limited to particulate emissions due to abrasion and emission of sulphur hexafluoride (SF6) occurring during conversion at traction substations. For sulphur hexafluoride (SF6) emitted during conversion at traction substations we assume an emission index of 4.4E-08 kg/kWh Frischknecht (2003) resulting in a specific emission of 3.79E-09 kg/tkm. Energy use and operation emissions
- Particulates, < 2.5 um [air, unspecified]: 4.266e-7 kg
  (same comment as for Particulates, > 2.5 um, and < 10um)
- Chromium [air, unspecified]: 3.405e-11 kg; source EEA 2000
  (same comment as for Zinc)
- Dinitrogen monoxide [air, unspecified]: 6.8e-8 kg; source INFRAS 1999
  (same comment as for Methane, fossil)
- Sulfur dioxide [air, unspecified]: 4.078e-7 kg
  Estimated value.In this project SO2 indice is estimated assuming that all sulphur in the fuel is transformed completely into SO2. In line with assumptions made for road transport is assumed a sulphur content of 300 ppm resulting in a emission index of 0.6 g/kg. Energy use and operation emissions

## Sampling procedure
International Railway statistic

## Extrapolations
This dataset has been extrapolated from year 2000 to the year of the calculation (2021). The uncertainty has been adjusted accordingly.
