# electricity voltage transformation from high to medium voltage, cobalt industry

Dataset: EcoSpold 2, unit process
Geography: GLO
Time period: 2012-01-01 to 2021-12-31
Technology level: current
Classification: ISIC rev.4 ecoinvent: 3510:Electric power generation, transmission and distribution
Scenario: Business-as-Usual
System model: Allocation, cut-off by classification
Generated by: Karin Treyer
Published in: Itten R. 2014
Database: ecoinvent
isCopyrightProtected: true
accessRestrictedTo: 1

## General comment
This dataset represents the transformation of electricity voltage from high to medium voltage, for use by the cobalt industry. The data were copied from the global (GLO) dataset "electricity voltage transformation from high to medium voltage".
Definition of the voltage levels:
- High voltage level above 24 kV (large scale industry)
- Medium voltage level between 1 kV and 24 kV (medium to small scale industry, service sector
and public buildings)
- Low voltage level below 1 kV (Households)

## Included activities start
This activity starts with the high voltage electricity arriving at the transformer station.

## Included activities end
This activity ends with 1kWh of high voltage electricity transformed to medium voltage. This dataset includes the losses during voltage transformation. It doesn't include the transformer station itself as this is included in the dataset for the transmission network.

## Technology
Transformers are essential components of the electricity grid. They connect the different voltage levels.
Big power plants feed the electricity at a very high voltage to the electricity grid. Transformers between 600 MVA and 80 MVA can be found in substations, where the high transmission voltage is transformed to the medium distribution voltage. In an additional step the medium voltage is transformed to low voltage using transformers below 2.5 MVA. The small transformers below 2.5 MVA are allocated to the low voltage level, whereas all the other transformers are allocated to the medium voltage level.

## Reference product
- electricity, medium voltage, cobalt industry: 1 kWh; CPC 17100: Electrical energy; By-product classification allocatable product
  production volume 2.14132e11 kWh; = 2728.47052802951*77900000*1.007455168
    Calculated based on the amount of "electricity, medium voltage, cobalt industry" consumed in the dataset "cobalt production" (GLO). 2728.47 kWh of electricity is required per kg of cobalt. Additionally, the production volume is scaled to take into account the electricity losses in the "market for electricity, medium voltage, cobalt industry".
  property price 0.1 EUR2005
    Calculated to be between the price of electricity, high voltage and electricity, low voltage.

## Inputs from technosphere
- electricity, high voltage, cobalt industry: 1.0074 kWh; source Itten, R. 2014; lognormal variance with pedigree 0.0667, pedigree (4,2,5,4,3)
  Calculated value/estimation. This value compensates for the losses during transmission/distribution on this electricity market. The calculation is made based on total electricity losses between net electricity available at the busbar and the use of electricity calculated based on the IEA electricity information 2014, table 1.1, Electrity supply vs. transmission losses. These total losses over the whole chain are then allocated to the different voltage levels as well as transformation and transmission losses based on information in Itten et al. 2014. For details please see the documentation available on ecoQuery. IEA. 2014. Electricity Information 2014. ISBN 978-92-64-21692-1. International Energy Agency (IEA), Paris Cedex (FR). Itten R., Frischknecht R., Stucki M. 2014. Life Cycle Inventories of Electricity Mixes and Grid. Version 1.3. treeze, Uster, Switzerland
- electricity, high voltage, cobalt industry: 0 kWh; undefined min 0.0074, max 0.0074, standardDeviation95 0, pedigree (1,1,4,1,1)
  Electricity being transformed from the high voltage market to the medium voltage market.

## Extrapolations
This dataset has been extrapolated from year 2012 to the year of the calculation (2021). The uncertainty has been adjusted accordingly.
