# vanilla production

Dataset: EcoSpold 2, unit process
Geography: RoW
Time period: 2013-01-01 to 2021-12-31
Technology level: current
Classification: ISIC rev.4 ecoinvent: 0128:Growing of spices, aromatic, drug and pharmaceutical crops
Tags: WFLDB
Scenario: Business-as-Usual
System model: Allocation, cut-off by classification
Generated by: [System]
Database: ecoinvent
isCopyrightProtected: true
accessRestrictedTo: 1

## General comment
This global dataset is a copy of the regional MG dataset, except for the following modifications.
The production volume represents the global annual production.
The geographicalCorrelation score of every pedigree matrix of was changed to '5'.
Yield of the global dataset = 750 kg/ha, calculated as a weighted average of the regional yields.
The comments below were part of the MG regional dataset.
This dataset represents the production of 1 kg of vanilla. The average yield from 2013 is 750 kg/ha. The data are representative for vanilla production in Madagascar used for the export market. No mineral NPK fertiliser are applied. No organic fertilisers are applied. No pesticides are applied.
The dataset was modelled within the project 'World Food LCA database (WFLDB)'. The aim of this project was to provide inventories of a broad variety of agricultural products and processes and to cover for each product at least 50% of the global export market. The export share of vanilla produced in the Madagascar could not be assessed within this project. The production system regarded in this dataset aimed at representing vanilla produced in the Madagascar for the export market.
PEF-Quality: data quality rating (DQR) = 2.7 (i.e. good quality). This dataset refers to an average situation; for specific situations exchanges might differ substantially due to site specific parameters

## Included activities start
This activity starts with the nursery of vanilla plants.

## Included activities end
This activity ends with the harvest of vanilla at farm gate. The dataset includes all activities of a year in the productive phase (8 years) and transport on farm. Activities in the establishment phase (3 years) include manual planting. Activities in the productive phase include harvest of vanilla plants. Further, direct field emissions and land use change are included. Heavy metal uptake by the crop is considered. The dataset doesn't include a) irrigation, fertilisers or pesticides, because they are not applied due to extensive production where cultivation is done mainly manually b) materials for the planting, establishment and clearing phase, and c) drying because vanilla is dried at ambient temperature. Direct field emissions in this prodcution system are not caused by fertilizer or pesticide inputs from humjan activity but are related to deposition of nutrients, nutrient content of the soil and erosion.

## Technology
Conventional production

## Reference product
- vanilla: 1 kg; CPC 01658: Vanilla, raw; By-product classification allocatable product
  production volume 5.95475e6 kg
    Source: FAOSTAT. Average, 2009-2012
  property carbon content, non-fossil 0.5
    calculation: C-content of components according to ecoinvent report No. 15a. Source of composition: Souci, S.W., Fachmann, W., Kraut, H. (Hg.: Bundesminsiterium fur Ernahrung, Landwirtschaft und Forsten, Bonn) 'Die Zusammensetzung der Lebensmittel - Nahrwerttabellen', medpharm Scientific Publishers Stuttgart, CRC Press; 2000.
  property price 30 EUR2005
    Calculated value based on data from United Nations Commodity Trade Statistics Database (comtrade.un.org). UN comtrade category: 905 Vanilla beans. Year: 2005. Using exchange rate of 1EURO = 1.209 USD. Average of price of import into 5 main markets (EU, US, JP, IN and CN).
  property carbon content 0.5
    carbon content on a dry matter basis (reserved; not for manual entry)
  properties: water in wet mass 0.224806 kg, wet mass 1 kg, water content 0.29, dry mass 0.775194 kg, carbon content, fossil 0, carbon allocation 0.387597 kg

## Inputs from technosphere
- vanilla seedling, for planting: 0.181818 unit; source Shriver J. 2013; lognormal variance with pedigree 0.126177, pedigree (2,1,4,5,1)
  Literature value or expert estimation (Shriver 2013). Planting density: 1'500 seedlings/ha.
  properties: water content 0.73, wet mass 1 kg, dry mass 0.578035 kg, carbon content, non-fossil 0.439481
  note on carbon content, non-fossil: calculation: C-content of components according to ecoinvent report No. 15a. Source of composition: https://ndb.nal.usda.gov/ndb/search/. Unspecific seedling used as proxy.
- transport, tractor and trailer, agricultural: 0.002 metric ton*km; lognormal variance with pedigree 0.164439, pedigree (4,1,4,5,1)
  On-farm transport: Yield (in tonnes) multiplied by the average distance from field to farm. The distance was assumed to be 2 km (proxy).

## Inputs from nature
- Transformation, to permanent crop, irrigated [natural resource, land]: 0.666667 m2; lognormal variance with pedigree 0.0462144, pedigree (2,1,4,5,1)
  10000 m2 divided by the life time of the perennial crop (20 years).
- Occupation, annual crop [natural resource, land]: 13.3693 m2*year; lognormal variance with pedigree 0.0220616, pedigree (2,1,4,5,1)
  Related to the duration from harvest date of previous crop to harvest date of main crop.
- Carbon dioxide, in air [natural resource, in air]: 1.16667 kg; lognormal variance with pedigree 0.0158498, pedigree (2,2,4,5,1)
  CO2 uptake by biomass
- Transformation, from permanent crop, irrigated [natural resource, land]: 0.666667 m2; lognormal variance with pedigree 0.0462144, pedigree (2,1,4,5,1)
  10000 m2 divided by the life time of the perennial crop (20 years).
- Energy, gross calorific value, in biomass [natural resource, biotic]: 13.9253 MJ; lognormal variance with pedigree 0.0158498, pedigree (2,2,4,5,1)
  Gross energy content is related to MJ/kg dry matter of product. Source: ecoinvent data.

## Emissions to nature
- Nickel, ion [water, ground-]: 1.6192e-8 kg; source Freiermuth R.  2006; lognormal variance with pedigree 0.358938, pedigree (2,2,4,5,1)
  Calculated value - Freiermuth (2006). See 'WFLDB-Guidelines.pdf', available at https://ecoquery.ecoinvent.org/File/Reports.
- Chromium, ion [water, surface water]: 1.264e-7 kg; source Freiermuth R.  2006; lognormal variance with pedigree 0.358938, pedigree (2,2,4,5,1)
  (same comment as for Nickel, ion)
- Copper, ion [water, surface water]: 3.682e-7 kg; source Freiermuth R.  2006; lognormal variance with pedigree 0.358938, pedigree (2,2,4,5,1)
  (same comment as for Nickel, ion)
- Dinitrogen monoxide [air, non-urban air or from high stacks]: 0.00118555 kg; source IPCC 2006; lognormal variance with pedigree 0.126664, pedigree (2,2,4,5,1)
  Calculated value - IPCC (2006). See 'WFLDB-Guidelines.pdf', available at https://ecoquery.ecoinvent.org/File/Reports.
- Copper [soil, agricultural]: -6.21496e-6 kg; source Freiermuth R.  2006
  Comment on mathematicalRelation:
  -1.57613333333e-06 from Calculated value - Freiermuth (2006). See 'WFLDB-Guidelines.pdf', available at https://ecoquery.ecoinvent.org/File/Reports.
  -4.63883e-06 from Crop, default, heavy metals uptake model
  Heavy metal uptake can be excluded by setting the parameter heavyMetalUptakeSwitch to zero.
- Phosphate [water, surface water]: 0.000717013 kg; source Prasuhn V.  2006; lognormal variance with pedigree 0.177866, pedigree (2,2,4,5,1)
  Calculated value - Prasuhn (2006). See 'WFLDB-Guidelines.pdf', available at https://ecoquery.ecoinvent.org/File/Reports.
- Mercury [soil, agricultural]: -2.84696e-8 kg; source Freiermuth R.  2006
  Comment on mathematicalRelation:
  -8.0356e-11 from Calculated value - Freiermuth (2006). See 'WFLDB-Guidelines.pdf', available at https://ecoquery.ecoinvent.org/File/Reports.
  -2.83892e-08 from Crop, default, heavy metals uptake model
  Heavy metal uptake can be excluded by setting the parameter heavyMetalUptakeSwitch to zero.
- Chromium, ion [water, ground-]: 1.02959e-7 kg; source Freiermuth R.  2006; lognormal variance with pedigree 0.358938, pedigree (2,2,4,5,1)
  (same comment as for Nickel, ion)
- Lead [soil, agricultural]: -3.73796e-7 kg; source Freiermuth R.  2006
  Comment on mathematicalRelation:
  4.74306666667e-09 from Calculated value - Freiermuth (2006). See 'WFLDB-Guidelines.pdf', available at https://ecoquery.ecoinvent.org/File/Reports.
  Heavy metal uptake can be excluded by setting the parameter heavyMetalUptakeSwitch to zero.
- Copper, ion [water, ground-]: 1.47307e-6 kg; source Freiermuth R.  2006; lognormal variance with pedigree 0.358938, pedigree (2,2,4,5,1)
  (same comment as for Nickel, ion)
- Phosphorus [water, surface water]: 0.00074736 kg; source Prasuhn V.  2006; lognormal variance with pedigree 0.177866, pedigree (2,2,4,5,1)
  Calculated value - Prasuhn (2006) and SQCB-Erosion. See 'WFLDB-Guidelines.pdf', available at https://ecoquery.ecoinvent.org/File/Reports.
- Nitrate [water, ground-]: 0.299041 kg; source Faist Emmenegger M. 2009; lognormal variance with pedigree 0.177866, pedigree (2,2,4,5,1)
- Carbon dioxide, from soil or biomass stock [air, non-urban air or from high stacks]: 17.0867 kg; normal variance with pedigree 0.5452, pedigree (3,3,5,5,2)
  Global average LUC emissions according 2nd edition of the Quantis-modified tool developed by Blonk Consultants 'WFLDB-adapted-Blonk 2014 direct-land-use-change-assessment-tool_2015-05-18a.xlsx', tab. 'Country & land use unknown'. The emission are based on the relative change in production areas in all countries for a given crop. The weighted average is used which takes into acount relative difference in crop expansion into primary forest, secondary forest, grassland, perennial and annual land.
  Uncertainty: Uncertainty estimated based on IPCC guidlines 2006.
- Phosphate [water, ground-]: 0.0002868 kg; source Prasuhn V.  2006; lognormal variance with pedigree 0.177866, pedigree (2,2,4,5,1)
  (same comment as for Phosphate)
- Cadmium, ion [water, surface water]: 2.8964e-10 kg; source Freiermuth R.  2006; lognormal variance with pedigree 0.358938, pedigree (2,2,4,5,1)
  (same comment as for Nickel, ion)
- Chromium [soil, agricultural]: -5.8906e-7 kg; source Freiermuth R.  2006
  Comment on mathematicalRelation:
  -2.0756e-07 from Calculated value - Freiermuth (2006). See 'WFLDB-Guidelines.pdf', available at https://ecoquery.ecoinvent.org/File/Reports.
  Heavy metal uptake can be excluded by setting the parameter heavyMetalUptakeSwitch to zero.
- Cadmium [soil, agricultural]: -6.83023e-8 kg; source Freiermuth R.  2006
  Comment on mathematicalRelation:
  2.77573333333e-09 from Calculated value - Freiermuth (2006). See 'WFLDB-Guidelines.pdf', available at https://ecoquery.ecoinvent.org/File/Reports.
  -7.1078e-08 from Crop, default, heavy metals uptake model
  Heavy metal uptake can be excluded by setting the parameter heavyMetalUptakeSwitch to zero.
- Lead [water, surface water]: 4.1288e-11 kg; source Freiermuth R.  2006; lognormal variance with pedigree 0.358938, pedigree (2,2,4,5,1)
  (same comment as for Nickel, ion)
- Nickel, ion [water, surface water]: 6.95333e-10 kg; source Freiermuth R.  2006; lognormal variance with pedigree 0.358938, pedigree (2,2,4,5,1)
  (same comment as for Nickel, ion)
- Zinc, ion [water, surface water]: 4.63947e-7 kg; source Freiermuth R.  2006; lognormal variance with pedigree 0.358938, pedigree (2,2,4,5,1)
  (same comment as for Nickel, ion)
- Nickel [soil, agricultural]: -8.14837e-7 kg; source Freiermuth R.  2006
  Comment on mathematicalRelation:
  -8.36173333333e-08 from Calculated value - Freiermuth (2006). See 'WFLDB-Guidelines.pdf', available at https://ecoquery.ecoinvent.org/File/Reports.
  -7.3122e-07 from Crop, default, heavy metals uptake model
  Heavy metal uptake can be excluded by setting the parameter heavyMetalUptakeSwitch to zero.
- Zinc [soil, agricultural]: -2.20988e-5 kg; source Freiermuth R.  2006
  Comment on mathematicalRelation:
  -2.24161e-05 from Crop, default, heavy metals uptake model
  Heavy metal uptake can be excluded by setting the parameter heavyMetalUptakeSwitch to zero.
- Cadmium, ion [water, ground-]: 9.96187e-10 kg; source Freiermuth R.  2006; lognormal variance with pedigree 0.358938, pedigree (2,2,4,5,1)
  (same comment as for Nickel, ion)
- Lead [water, ground-]: 1.66133e-9 kg; source Freiermuth R.  2006; lognormal variance with pedigree 0.358938, pedigree (2,2,4,5,1)
  (same comment as for Nickel, ion)
- Zinc, ion [water, ground-]: 4.99653e-7 kg; source Freiermuth R.  2006; lognormal variance with pedigree 0.358938, pedigree (2,2,4,5,1)
  (same comment as for Nickel, ion)
- Mercury [water, ground-]: 1.25403e-7 kg; source Freiermuth R.  2006; lognormal variance with pedigree 0.358938, pedigree (2,2,4,5,1)
  (same comment as for Nickel, ion)

## Sampling procedure
WFLDB Methodological Guidelines for the Life Cycle Inventory of Agricultural Products in the latest version, available at: (Report section: https://v30.ecoquery.ecoinvent.org/File/Reports). Data sources: Data were categorised from level 0 (L0) to level (L4) as follows: L0 = estimate, proxy; L1 = statistical data (e.g. FAOSTAT); L2 = L1 adapted to crop and country; L3 = literature data or L1 resp. L2 data approved by experts; medium detailing (i.e. kg of total N-fertiliser); L4 = L3 data of high detailing (i.e. portion N-fertiliser types).In this dataset data were obtained for yield: L3; Fertilisers: L3; Pesticides: L3; Machinery: L1; Irrigation: L4. For information regarding the calculation of individual exchanges see supporting documentation WFLDB-Documentation.pdf.

## Extrapolations
The amount of the exchanges are copy from a regional dataset.

## Review by Assumpció ANTON 2016-05-30
Be aware that the use of statistics in input calculations could provide some specific inputs not common for specific crops, this should be corrected if better information is available and better reflexed in DQR . Currently, I would dissent for some of good marks provided, being a revision of criteria applied advisable.

Pesticides will need to be amended periodically checking for update of pesticides' ban.
