# treatment of waste polyvinylfluoride, municipal incineration

Dataset: EcoSpold 2, unit process
Geography: RoW
Time period: 2006-01-01 to 2021-12-31
Technology level: current
Classification: ISIC rev.4 ecoinvent: 3821:Treatment and disposal of non-hazardous waste
Synonyms: municipal waste incineration; Siedlungsabfallverbrennung; Kehrichtverbrennung
Scenario: Business-as-Usual
System model: Allocation, cut-off by classification
Share of production covered: 1.8 %
Generated by: Gabor Doka
Published in: Doka G. 2013
Database: ecoinvent
isCopyrightProtected: true
accessRestrictedTo: 1

## General comment
This dataset represents the activity of waste disposal of waste polyvinylfluoride in a municipal solid waste incinerator (MSWI) // Recommended use of this dataset: For PVF (Tedlar), which goes to disposal as part of communal waste mixture. // // Waste composition (wet, in ppm): upper heating value 28.09 MJ/kg; lower heating value 27.89 MJ/kg; H2O 2000; O 16911; H 71066; C 570130; S 1057; N 1057; P n.a.; B n.a.; Cl n.a.; Br 73.839; F 329620; I n.a.; Ag n.a.; As 2.0042; Ba 196.73; Cd 2.7546; Co 33.322; Cr 43.106; Cu 28.223; Hg 0.89569; Mn 84.301; Mo n.a.; Ni 21.729; Pb 16.002; Sb 45.323; Se 2.2152; Sn 391.41; V 303.95; Zn 59.775; Be 0.52742; Sc n.a.; Sr 93.353; Ti 1054.8; Tl 0.42194; W n.a.; Si n.a.; Fe 3930; Ca n.a.; Al 210.97; K n.a.; Mg n.a.; Na 1545.9; // Share of carbon in waste that is biogenic 0%. // Share of metals in waste not oxidised and bulk-recyclable (exclude very small or thin parts) Iron: 0%; Alu: 0%; Copper: 0%. // One kg of this waste produces 0.3223 kg of slag and 0.3313 kg of residues, which are landfilled. Additional solidification with 0.1325 kg of cement. // Net energy production: 3.53MJ/kg electric energy and 6.9MJ/kg thermal energy. // Recovery of metal scrap to recycling: 0g iron scrap, 0g aluminium scrap, 0g copper scrap.

## Included activities start
waste incineration from waste reception gate and delivery into waste bunker at incinerator plant site (without transports to the incinerator)

## Included activities end
Waste-specific short-term emissions to water from leachate. Long-term emissions from landfill to ground water.

## Geography
Specific to the technology mix encountered in Switzerland in 2010. Well applicable to modern incineration practices in Europe, North America or Japan.

## Technology
average Swiss MSWI plants in 2010 (grate incinerators) with electrostatic precipitator for fly ash (ESP), wet flue gas scrubber and 25% SNCR , 42.77% SCR-high dust , 32.68% SCR-low dust -DeNOx facilities and 0% without Denox (weighted according to mass of burnt waste, representing Swiss average). Efficiency of iron scrap separation from slag : 58%. Efficiency of non-ferrous scrap separation from slag : 31%. Gross electric efficiency technology mix 15.84% and Gross thermal efficiency technology mix 28.51%

## Time period
Waste composition as given in literature reference, theoretical data or other source. Transfer coefficients for modern MSWI.

## Reference product
- waste polyvinylfluoride: -1 kg; CPC 39270: Waste, parings and scrap of plastics; By-product classification Waste
  Main reference product of this activity (supply of disposal service).
  production volume 1.3251e8 kg
    assumed to be identical mass as 10% of PVC in MSW figure (unqualified estimate)
  property heating value, net 27.89 MJ
    Value taken from the general comment of the treatment dataset.
  property price 0 EUR2005
    Waste products are assigned a price of zero as they are assumed to require further treatment.
  property carbon content 0.571142
    carbon content on a dry matter basis (reserved; not for manual entry)
  properties: water in wet mass 0.002 kg, carbon content, non-fossil 0, carbon content, fossil 0.571142, dry mass 0.998 kg, water content 0.00200401, wet mass 1 kg, carbon allocation 0.57 kg

## By-products
- electricity, for reuse in municipal waste incineration only: 0 kWh; name E_el_prod_MSWI; CPC 17100: Electrical energy; By-product classification allocatable product; pedigree (1,1,1,1,1)
  Net electricity generated from this waste and used in internal MSWI plant energy redistribution.
  Uncertainty: uncertainty is calculated from uncertainties in waste composition and uncertainties in energy efficiency and the uncertainty in internal energy demand
  production volume 1.2993e8 kWh
    calculated in proportion to reference product waste input to incinerator
  property true value relation 3.6; name E_el_prod_MSWI_true_value_relation
    property to calculate "true value" from
  property exergy 3.6 MJ; name E_el_prod_MSWI_exergy
    This exergy property is based on the exergy content of the product.
  property price 0.1 EUR2005; name E_el_prod_MSWI_price_EUR2005
    Estimated to be the same price as in case of electricity, medium voltage.
- heat, for reuse in municipal waste incineration only: 0 MJ; name E_th_prod_MSWI; By-product classification allocatable product; CPC 17300: Steam and hot water; pedigree (1,1,1,1,1)
  (same comment as for electricity, for reuse in municipal waste incineration only)
  production volume 9.1379e8 MJ
    calculated in proportion to reference product waste input to incinerator
  property price 0.0106 EUR2005; name E_th_prod_MSWI_price_EUR2005
    Average European district heat price from Ecoheatcool and Euroheat 2005-2006, Ecoheat Work package 1: The European heat market. Final report. 10.6 EUR/GJ i s the price of district heat. http://www.solarthermalworld.org/files/Ecoheatcool%20WP1%20Web.pdf?download
  property true value relation 0.1842; name E_th_prod_MSWI_true_value_relation
    property to calculate "true value" from
  property exergy 0.1842 MJ; name E_th_prod_MSWI_exergy
    This exergy property is based on the exergy content of the product.

## Inputs from technosphere
- titanium dioxide: 5.4836e-5 kg; lognormal variance with pedigree 0.53861, pedigree (1,1,4,1,1)
  Input to DeNOx stage (TiO2 catalyst carrier)
  Uncertainty: uncertainty calculated from uncertainty in average DeNOx input, uncertainty in the share of thermal NOx, uncertainty of nitrogen content in average municipal waste and the uncertainty in nitrogen content in *this* waste.
  properties: wet mass 1 kg, dry mass 1 kg
- chemical, organic: 1.5551e-5 kg; lognormal variance with pedigree 1.5229, pedigree (1,1,4,1,1)
  Auxilliary inputs for the wastewater treatment stage of the incinerator plant. Proxy for (pure) Trisodium-trimercapto-s-triazine (CAS 17766-26-6), used as 15% diluted solution, aka TMT15.
  Uncertainty: uncertainty calculated from uncertainty in average TMT15 input, of transfer coefficients in the incinerator, and the uncertainty of the waste composition of this waste
  properties: wet mass 1 kg, carbon content, fossil 0.628, dry mass 1 kg, heating value, net 19.03 MJ
- hydrochloric acid, without water, in 30% solution state: 0.00039407 kg; lognormal variance with pedigree 0.027252, pedigree (1,1,4,1,1)
  Auxilliary inputs for the wastewater treatment stage of the incinerator plant.
  Uncertainty: uncertainty calculated from uncertainty in average HCl input, of transfer coefficients in the incinerator, and the uncertainty of the waste composition of this waste
  properties: heating value, net 3.32 MJ, wet mass 1 kg, dry mass 1 kg
- iron (III) chloride, without water, in 40% solution state: 8.3955e-5 kg; lognormal variance with pedigree 0.32214, pedigree (1,1,4,1,1)
  Auxilliary inputs for the wastewater treatment stage of the incinerator plant.
  Uncertainty: uncertainty calculated from uncertainty in average FeCl3 input, of transfer coefficients in the incinerator, and the uncertainty of the waste composition of this waste
  properties: dry mass 1 kg, wet mass 1 kg
- chromium oxide, flakes: 1.1191e-6 kg; lognormal variance with pedigree 0.53861, pedigree (1,1,4,1,1)
  Input to DeNOx stage.
  Uncertainty: uncertainty calculated from uncertainty in average DeNOx input, uncertainty in the share of thermal NOx, uncertainty of nitrogen content in average municipal waste and the uncertainty in nitrogen content in *this* waste.
  properties: dry mass 1 kg, wet mass 1 kg
- quicklime, milled, packed: 0.049196 kg; lognormal variance with pedigree 0.028237, pedigree (1,1,4,1,1)
  Auxilliary inputs for the flue gas treatment stage of the incinerator plant.
  Uncertainty: uncertainty calculated from uncertainty in average CaO input, of transfer coefficients in the incinerator, and the uncertainty of the waste composition of this waste
  properties: wet mass 1 kg, water content 0.010101, dry mass 0.99 kg
- cement, unspecified: 0 kg; pedigree (1,1,1,1,1)
  Cement required for solidification of landfilled residual material.
  Uncertainty: Uncertainty calculated from uncertainty of the waste composition of this waste, of transfer coefficients in the incinerator and of the solidification recipe.
  properties: wet mass 1 kg, dry mass 1 kg
- residual material landfill: 6.9017e-10 unit; lognormal variance with pedigree 0.066888, pedigree (1,1,4,1,1)
  Landfill infrastructure required for landfilling of incineration residues.
  Uncertainty: uncertainty is calculated from uncertainties in waste composition and transfer coefficients in incinerator
- transport, freight, lorry, unspecified: 0 metric ton*km; pedigree (1,1,1,1,1)
  Transport services to transport incineration residues to landfills.
  Uncertainty: uncertainty calculated from uncertainty of the waste composition of this waste, uncertainty of transfer coefficients and the uncertainty in generic transportation distances
- process-specific burdens, slag landfill: 0 kg; pedigree (1,1,1,1,1)
  Mass-specific expenditures required for landfilling of bottom ash.
  Uncertainty: uncertainty is calculated from uncertainties in waste composition and transfer coefficients in incinerator
- sodium hydroxide, without water, in 50% solution state: 0.009769 kg; lognormal variance with pedigree 0.027413, pedigree (1,1,4,1,1)
  Auxilliary inputs for the flue gas treatment stage of the incinerator plant.
  Uncertainty: uncertainty calculated from uncertainty in average NaOH input, of transfer coefficients in the incinerator, and the uncertainty of the waste composition of this waste
  properties: wet mass 1 kg, dry mass 1 kg, heating value, net 3.03 MJ
- slag landfill: 5.7097e-10 unit; lognormal variance with pedigree 0.076145, pedigree (1,1,4,1,1)
  Landfill infrastructure required for landfilling of bottom ash.
  Uncertainty: uncertainty is calculated from uncertainties in waste composition and transfer coefficients in incinerator
- waste cement, hydrated: 0 kg; pedigree (1,1,1,1,1)
  Hydrated cement output for solidification of landfilled residual material.
  Uncertainty: Uncertainty calculated from uncertainty of the waste composition of this waste and transfer coefficients in the incinerator and of the solidification recipe.
  production volume 0 kg
    calculated in proportion to reference product waste input to incinerator
  properties: dry mass 1 kg, wet mass 1 kg
- water, decarbonised: 0 kg; pedigree (1,1,1,1,1)
  Incinerator process water used in flue gas scrubber stage.
  Uncertainty: uncertainty calculated from uncertainty in average water input, and the uncertainty of the waste composition of this waste
  properties: wet mass 1 kg
- process-specific burdens, residual material landfill: 0 kg; pedigree (1,1,1,1,1)
  Mass-specific expenditures required for landfilling of incineration residues.
  Uncertainty: uncertainty is calculated from uncertainties in waste composition and transfer coefficients in incinerator
- municipal waste incineration facility: 2.5e-10 unit
  Demands per kilogram waste.
- chemical, inorganic: 0.0014993 kg; lognormal variance with pedigree 0.027252, pedigree (1,1,4,1,1)
  Auxilliary inputs for the wastewater treatment stage of the incinerator plant. Proxy for Polyelectrolyte.
  Uncertainty: uncertainty calculated from uncertainty in average Polyelectrolyte input, of transfer coefficients in the incinerator, and the uncertainty of the waste composition of this waste
  properties: dry mass 1 kg, wet mass 1 kg, carbon content, fossil 0.003
- heat, district or industrial, natural gas: 0 MJ; pedigree (1,1,1,1,1)
  Input to DeNOx stage, to heat up flue gas in low-dust SCR.
  Uncertainty: uncertainty calculated from uncertainty in average DeNOx input, uncertainty in the share of thermal NOx, uncertainty of nitrogen content in average municipal waste and the uncertainty in nitrogen content in *this* waste.
  properties: heating value, net 1 MJ
- ammonia, anhydrous, liquid: 0 kg; pedigree (1,1,1,1,1)
  Input to DeNOx stage (100% NH3).
  Uncertainty: uncertainty calculated from uncertainty in average DeNOx input, uncertainty in the share of thermal NOx, uncertainty of nitrogen content in average municipal waste and the uncertainty in nitrogen content in *this* waste.
  properties: wet mass 1 kg, dry mass 1 kg
- cement, unspecified: 0.0191339, 0.00398119, 0.000291595, 0.000831141, 0.0187965, 0.000553237, 0.00607618, 0.000735149, 0.0821111 kg (9 entries); lognormal variance with pedigree 0.075972, pedigree (1,1,4,1,1)
  (same comment as for cement, unspecified)
- transport, freight, lorry, unspecified: 0.00298668, 0.000467603, 0.0226437 metric ton*km (3 entries); lognormal variance with pedigree 0.040211, pedigree (1,1,4,1,1)
  (same comment as for transport, freight, lorry, unspecified)
- process-specific burdens, slag landfill: 0.0908508, 0.230319 kg (2 entries); lognormal variance with pedigree 0.076145, pedigree (1,1,4,1,1)
  (same comment as for process-specific burdens, slag landfill)
- waste cement, hydrated: -0.0937106, -0.237569 kg (2 entries); lognormal variance with pedigree 0.075972, pedigree (1,1,4,1,1)
  (same comment as for waste cement, hydrated)
  production volume 4.3898e7 kg
- water, decarbonised: 0.160266, 0.417011, 1.6819, 0.410712, 0.0827975, 0.272254, 0.01503, 0.214175, 0.498902, 3.12947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 kg (12 entries); lognormal variance with pedigree 0.32214, pedigree (1,1,4,1,1)
  (same comment as for water, decarbonised)
- process-specific burdens, residual material landfill: 0.0937106, 0.237569 kg (2 entries); lognormal variance with pedigree 0.066888, pedigree (1,1,4,1,1)
  (same comment as for process-specific burdens, residual material landfill)
- heat, district or industrial, natural gas: 0.00182167, 0.0436508, 0.118198 MJ (3 entries); lognormal variance with pedigree 0.23786, pedigree (1,1,4,1,1)
  (same comment as for heat, district or industrial, natural gas)
- ammonia, anhydrous, liquid: 0.000183462, 1.57707e-5, 2.45352e-5, 4.86129e-5, 4.76278e-5, 4.99191e-6, 2.23157e-5, 0.000527924 kg (8 entries); lognormal variance with pedigree 0.23786, pedigree (1,1,4,1,1)
  (same comment as for ammonia, anhydrous, liquid)

## Inputs from nature
- Oxygen [natural resource, in air]: 2.3558 kg; lognormal variance with pedigree 0.024264, pedigree (1,1,4,1,1)
  Oxygen from ambient air needed to combust and oxidise this waste. Net demand, i.e. without O2 leaving the plant in flue gas uncombusted.
  Uncertainty: uncertainty is calculated from uncertainties in waste composition and transfer coefficients to flue gas and soild residues in incinerator

## Emissions to nature
- Nickel, ion [water, ground-, long-term]: 2.0857e-5 kg; lognormal variance with pedigree 1.1439, pedigree (1,1,4,1,1)
  Long-term emissions from landfilling of incineration residues.
  Uncertainty: uncertainty is calculated from uncertainties in waste composition and transfer coefficients in incinerator and landfills.
- Fluoride [water, ground-, long-term]: 0.29553 kg; lognormal variance with pedigree 0.02358, pedigree (1,1,4,1,1)
  (same comment as for Nickel, ion)
- Titanium, ion [water, surface water]: 3.9329e-7 kg; lognormal variance with pedigree 0.51304, pedigree (1,1,4,1,1)
  Emissions to water from waste composition and transfer coefficients in incinerator and landfills.
  Uncertainty: uncertainty is calculated from uncertainties in waste composition and transfer coefficients in incinerator and landfills
- Cyanide [air, urban air close to ground]: 3.3868e-6 kg; lognormal variance with pedigree 1.4324, pedigree (1,1,4,1,1)
  Nitrogen species emitted to air after DeNOx stage.
  Uncertainty: uncertainty calculated from uncertainty in average N-emissions and uncertainty in the share of thermal NOx and the uncertainty in nitrogen content in *this* waste.
- Thallium [water, ground-, long-term]: 2.4621e-7 kg; lognormal variance with pedigree 1.266, pedigree (1,1,4,1,1)
  (same comment as for Nickel, ion)
- Chromium VI [water, ground-, long-term]: 3.9542e-6 kg; lognormal variance with pedigree 1.5516, pedigree (1,1,4,1,1)
  (same comment as for Nickel, ion)
- Ammonia [air, urban air close to ground]: 1.0291e-6 kg; lognormal variance with pedigree 0.27918, pedigree (1,1,4,1,1)
  (same comment as for Cyanide)
- Mercury [water, surface water]: 9.7275e-10 kg; lognormal variance with pedigree 1.1234, pedigree (1,1,4,1,1)
  (same comment as for Titanium, ion)
- Antimony [water, surface water]: 1.5621e-5 kg; lognormal variance with pedigree 1.0765, pedigree (1,1,4,1,1)
  (same comment as for Titanium, ion)
- Mercury [air, urban air close to ground]: 2.5396e-8 kg; lognormal variance with pedigree 1.5989, pedigree (1,1,4,1,1)
  Emission to air from waste composition and transfer coefficients.
  Uncertainty: uncertainty is calculated from uncertainties in waste composition and transfer coefficients in incinerator
- Lead [air, urban air close to ground]: 1.3184e-9 kg; lognormal variance with pedigree 1.2515, pedigree (1,1,4,1,1)
  (same comment as for Mercury)
- Selenium [water, ground-, long-term]: 1.4387e-6 kg; lognormal variance with pedigree 1.079, pedigree (1,1,4,1,1)
  (same comment as for Nickel, ion)
- Cobalt [air, urban air close to ground]: 6.0603e-8 kg; lognormal variance with pedigree 1.1343, pedigree (1,1,4,1,1)
  (same comment as for Mercury)
- Water [air, urban air close to ground]: 0.0014483 m3; lognormal variance with pedigree 0.9635, pedigree (1,1,4,1,1)
  Water vapour from waste humidity, hydrogen oxidation and part of the process water.
  Uncertainty: Uncertainty calculated from uncertainty in waste composition, process water input and the uncertainty of fraction to air.
- Phenol, pentachloro- [air, urban air close to ground]: 7.8614e-12 kg; lognormal variance with pedigree 0.094536, pedigree (1,1,4,1,1)
  Incomplete combustion product emitted to air.
  Uncertainty: uncertainty calculated from uncertainty in average operation emissions, and the uncertainty of the flue gas volume from this waste.
- DOC, Dissolved Organic Carbon [water, ground-, long-term]: 0.0016942 kg; lognormal variance with pedigree 0.025347, pedigree (1,1,4,1,1)
  (same comment as for Nickel, ion)
- Chromium [air, urban air close to ground]: 3.7641e-8 kg; lognormal variance with pedigree 1.1049, pedigree (1,1,4,1,1)
  (same comment as for Mercury)
- Hydrogen fluoride [air, urban air close to ground]: 0.0022238 kg; lognormal variance with pedigree 0.052592, pedigree (1,1,4,1,1)
  (same comment as for Mercury)
- Cobalt [water, ground-, long-term]: 2.7144e-5 kg; lognormal variance with pedigree 1.0421, pedigree (1,1,4,1,1)
  (same comment as for Nickel, ion)
- Bromine [air, urban air close to ground]: 3.6883e-8 kg; lognormal variance with pedigree 1.0313, pedigree (1,1,4,1,1)
  (same comment as for Mercury)
- BOD5, Biological Oxygen Demand [water, surface water]: 0.00065837 kg; lognormal variance with pedigree 0.040762, pedigree (1,1,4,1,1)
  (same comment as for Titanium, ion)
- Nickel, ion [water, surface water]: 1.46e-8 kg; lognormal variance with pedigree 1.7226, pedigree (1,1,4,1,1)
  (same comment as for Titanium, ion)
- Tin [air, urban air close to ground]: 2.5567e-10 kg; lognormal variance with pedigree 0.86225, pedigree (1,1,4,1,1)
  (same comment as for Mercury)
- Benzene, pentachloro- [air, urban air close to ground]: 9.5375e-11 kg; lognormal variance with pedigree 0.094536, pedigree (1,1,4,1,1)
  (same comment as for Phenol, pentachloro-)
- Selenium [air, urban air close to ground]: 2.6427e-8 kg; lognormal variance with pedigree 1.484, pedigree (1,1,4,1,1)
  (same comment as for Mercury)
- Mercury [water, ground-, long-term]: 5.7047e-8 kg; lognormal variance with pedigree 3.1509, pedigree (1,1,4,1,1)
  (same comment as for Nickel, ion)
- COD, Chemical Oxygen Demand [water, ground-, long-term]: 0.0042815 kg; lognormal variance with pedigree 0.025347, pedigree (1,1,4,1,1)
  (same comment as for Nickel, ion)
- COD, Chemical Oxygen Demand [water, surface water]: 0.00066693 kg; lognormal variance with pedigree 0.039951, pedigree (1,1,4,1,1)
  (same comment as for Titanium, ion)
- Particulates, > 2.5 um, and < 10um [air, urban air close to ground]: 1.083e-8 kg; lognormal variance with pedigree 0.19985, pedigree (1,1,4,1,1)
  (same comment as for Phenol, pentachloro-)
- Thallium [air, urban air close to ground]: 4.2194e-10 kg; lognormal variance with pedigree 1.7056, pedigree (1,1,4,1,1)
  (same comment as for Mercury)
- Cadmium, ion [water, ground-, long-term]: 2.0101e-7 kg; lognormal variance with pedigree 6.8994, pedigree (1,1,4,1,1)
  (same comment as for Nickel, ion)
- Methane, fossil [air, urban air close to ground]: 2.7078e-7 kg; lognormal variance with pedigree 0.094536, pedigree (1,1,4,1,1)
  (same comment as for Phenol, pentachloro-)
- Strontium [water, surface water]: 5.8778e-8 kg; lognormal variance with pedigree 1.6908, pedigree (1,1,4,1,1)
  (same comment as for Titanium, ion)
- Arsenic, ion [water, ground-, long-term]: 6.0017e-7 kg; lognormal variance with pedigree 1.4877, pedigree (1,1,4,1,1)
  (same comment as for Nickel, ion)
- Beryllium [water, ground-, long-term]: 4.8203e-7 kg; lognormal variance with pedigree 1.5798, pedigree (1,1,4,1,1)
  (same comment as for Nickel, ion)
- Tin, ion [water, surface water]: 1.0355e-8 kg; lognormal variance with pedigree 1.47, pedigree (1,1,4,1,1)
  (same comment as for Titanium, ion)
- Beryllium [water, surface water]: 3.3034e-10 kg; lognormal variance with pedigree 2.1741, pedigree (1,1,4,1,1)
  (same comment as for Titanium, ion)
- Sodium [air, urban air close to ground]: 1.2692e-5 kg; lognormal variance with pedigree 0.6225, pedigree (1,1,4,1,1)
  (same comment as for Mercury)
- Selenium [water, surface water]: 7.4832e-7 kg; lognormal variance with pedigree 1.172, pedigree (1,1,4,1,1)
  (same comment as for Titanium, ion)
- Antimony [air, urban air close to ground]: 3.6306e-11 kg; lognormal variance with pedigree 1.149, pedigree (1,1,4,1,1)
  (same comment as for Mercury)
- Chromium, ion [water, surface water]: 3.3471e-9 kg; lognormal variance with pedigree 1.1178, pedigree (1,1,4,1,1)
  (same comment as for Titanium, ion)
- Nickel [air, urban air close to ground]: 2.7296e-8 kg; lognormal variance with pedigree 1.193, pedigree (1,1,4,1,1)
  (same comment as for Mercury)
- Titanium [air, urban air close to ground]: 8.7515e-7 kg; lognormal variance with pedigree 0.68004, pedigree (1,1,4,1,1)
  (same comment as for Mercury)
- Sulfate [water, ground-, long-term]: 0.0026178 kg; lognormal variance with pedigree 0.37933, pedigree (1,1,4,1,1)
  (same comment as for Nickel, ion)
- Sulfur dioxide [air, urban air close to ground]: 1.124e-5 kg; lognormal variance with pedigree 0.67028, pedigree (1,1,4,1,1)
  (same comment as for Mercury)
- Copper, ion [water, surface water]: 3.6571e-9 kg; lognormal variance with pedigree 1.0175, pedigree (1,1,4,1,1)
  (same comment as for Titanium, ion)
- Heat, waste [air, urban air close to ground]: 20.703 MJ; lognormal variance with pedigree 0.034219, pedigree (1,1,4,1,1)
  Waste heat generated from heating value of this waste plus any electricity required to process it.
  Uncertainty: uncertainty is calculated from uncertainties in waste composition and uncertainties in energy efficiency and the uncertainty in internal energy demand
- Zinc, ion [water, surface water]: 5.393e-9 kg; lognormal variance with pedigree 0.85292, pedigree (1,1,4,1,1)
  (same comment as for Titanium, ion)
- Copper, ion [water, ground-, long-term]: 2.521e-5 kg; lognormal variance with pedigree 1.1187, pedigree (1,1,4,1,1)
  (same comment as for Nickel, ion)
- Heat, waste [water, surface water]: 4.7403 MJ; lognormal variance with pedigree 0.034219, pedigree (1,1,4,1,1)
  (same comment as for Heat, waste)
- Nitrogen oxides [air, urban air close to ground]: 0.00032587 kg; lognormal variance with pedigree 0.27918, pedigree (1,1,4,1,1)
  Sum of fuel-Nox and thermal-NOx emitted to air after DeNOx stage.
  Uncertainty: uncertainty calculated from uncertainty in average N-emissions and uncertainty in the share of thermal NOx and the uncertainty in nitrogen content in *this* waste.
- TOC, Total Organic Carbon [water, surface water]: 0.00029125 kg; lognormal variance with pedigree 0.040049, pedigree (1,1,4,1,1)
  (same comment as for Titanium, ion)
- Lead [water, surface water]: 1.5307e-9 kg; lognormal variance with pedigree 1.0219, pedigree (1,1,4,1,1)
  (same comment as for Titanium, ion)
- Nitrate [water, surface water]: 1.3473e-5 kg; lognormal variance with pedigree 0.4618, pedigree (1,1,4,1,1)
  (same comment as for Titanium, ion)
- Benzo(a)pyrene [air, urban air close to ground]: 4.0171e-13 kg; lognormal variance with pedigree 0.41855, pedigree (1,1,4,1,1)
  (same comment as for Phenol, pentachloro-)
- Sulfate [water, surface water]: 0.00053619 kg; lognormal variance with pedigree 0.31283, pedigree (1,1,4,1,1)
  (same comment as for Titanium, ion)
- Sodium, ion [water, surface water]: 0.00042002 kg; lognormal variance with pedigree 0.31352, pedigree (1,1,4,1,1)
  (same comment as for Titanium, ion)
- Sodium, ion [water, ground-, long-term]: 0.0011132 kg; lognormal variance with pedigree 0.3049, pedigree (1,1,4,1,1)
  (same comment as for Nickel, ion)
- Barium [water, ground-, long-term]: 9.9076e-5 kg; lognormal variance with pedigree 2.2461, pedigree (1,1,4,1,1)
  (same comment as for Nickel, ion)
- Particulates, < 2.5 um [air, urban air close to ground]: 2.1553e-6 kg; lognormal variance with pedigree 0.41855, pedigree (1,1,4,1,1)
  (same comment as for Phenol, pentachloro-)
- Cobalt [water, surface water]: 6.0372e-9 kg; lognormal variance with pedigree 1.4332, pedigree (1,1,4,1,1)
  (same comment as for Titanium, ion)
- Bromine [water, surface water]: 6.6685e-5 kg; lognormal variance with pedigree 0.48574, pedigree (1,1,4,1,1)
  (same comment as for Titanium, ion)
- Dinitrogen monoxide [air, urban air close to ground]: 1.5764e-5 kg; lognormal variance with pedigree 1.4324, pedigree (1,1,4,1,1)
  (same comment as for Cyanide)
- Vanadium, ion [water, surface water]: 4.8529e-7 kg; lognormal variance with pedigree 0.95016, pedigree (1,1,4,1,1)
  (same comment as for Titanium, ion)
- DOC, Dissolved Organic Carbon [water, surface water]: 0.00029125 kg; lognormal variance with pedigree 0.040049, pedigree (1,1,4,1,1)
  (same comment as for Titanium, ion)
- Antimony [water, ground-, long-term]: 2.8822e-5 kg; lognormal variance with pedigree 1.0418, pedigree (1,1,4,1,1)
  (same comment as for Nickel, ion)
- Iron, ion [water, ground-, long-term]: 0.0019826 kg; lognormal variance with pedigree 0.66881, pedigree (1,1,4,1,1)
  (same comment as for Nickel, ion)
- Arsenic, ion [water, surface water]: 1.3883e-6 kg; lognormal variance with pedigree 1.3737, pedigree (1,1,4,1,1)
  (same comment as for Titanium, ion)
- BOD5, Biological Oxygen Demand [water, ground-, long-term]: 0.0014005 kg; lognormal variance with pedigree 0.025347, pedigree (1,1,4,1,1)
  (same comment as for Nickel, ion)
- Titanium, ion [water, ground-, long-term]: 0.00031534 kg; lognormal variance with pedigree 0.78912, pedigree (1,1,4,1,1)
  (same comment as for Nickel, ion)
- Strontium [water, ground-, long-term]: 9.3232e-5 kg; lognormal variance with pedigree 0.97872, pedigree (1,1,4,1,1)
  (same comment as for Nickel, ion)
- Lead [water, ground-, long-term]: 7.737e-6 kg; lognormal variance with pedigree 4.3519, pedigree (1,1,4,1,1)
  (same comment as for Nickel, ion)
- Nitrate [water, ground-, long-term]: 3.8015e-5 kg; lognormal variance with pedigree 0.66388, pedigree (1,1,4,1,1)
  (same comment as for Nickel, ion)
- Strontium [air, urban air close to ground]: 9.3353e-9 kg; lognormal variance with pedigree 1.0166, pedigree (1,1,4,1,1)
  (same comment as for Mercury)
- Vanadium [air, urban air close to ground]: 6.4465e-6 kg; lognormal variance with pedigree 0.82561, pedigree (1,1,4,1,1)
  (same comment as for Mercury)
- Manganese [water, surface water]: 1.3122e-8 kg; lognormal variance with pedigree 0.85862, pedigree (1,1,4,1,1)
  (same comment as for Titanium, ion)
- Carbon monoxide, fossil [air, urban air close to ground]: 3.0686e-5 kg; lognormal variance with pedigree 0.81109, pedigree (1,1,4,1,1)
  (same comment as for Phenol, pentachloro-)
- Barium [water, surface water]: 2.6478e-8 kg; lognormal variance with pedigree 1.1817, pedigree (1,1,4,1,1)
  (same comment as for Titanium, ion)
- TOC, Total Organic Carbon [water, ground-, long-term]: 0.0016942 kg; lognormal variance with pedigree 0.025347, pedigree (1,1,4,1,1)
  (same comment as for Nickel, ion)
- Dioxins, measured as 2,3,7,8-tetrachlorodibenzo-p-dioxin [air, urban air close to ground]: 3.6102e-14 kg; lognormal variance with pedigree 0.41855, pedigree (1,1,4,1,1)
  (same comment as for Phenol, pentachloro-)
- Manganese [air, urban air close to ground]: 1.61e-8 kg; lognormal variance with pedigree 1.024, pedigree (1,1,4,1,1)
  (same comment as for Mercury)
- Thallium [water, surface water]: 2.5848e-10 kg; lognormal variance with pedigree 1.8636, pedigree (1,1,4,1,1)
  (same comment as for Titanium, ion)
- Water [water, surface water]: 0.00045796 m3; lognormal variance with pedigree 1.362, pedigree (1,1,4,1,1)
  Process water released to surface water.
  Uncertainty: uncertainty calculated from uncertainty in process water input and the uncertainty of fraction to surface water.
- Benzene, hexachloro- [air, urban air close to ground]: 3.7746e-11 kg; lognormal variance with pedigree 0.094536, pedigree (1,1,4,1,1)
  (same comment as for Phenol, pentachloro-)
- Aluminium [air, urban air close to ground]: 1.7201e-10 kg; lognormal variance with pedigree 0.94306, pedigree (1,1,4,1,1)
  (same comment as for Mercury)
- Aluminium [water, surface water]: 2.2831e-8 kg; lognormal variance with pedigree 1.1104, pedigree (1,1,4,1,1)
  (same comment as for Titanium, ion)
- Toluene [air, urban air close to ground]: 3.6104e-8 kg; lognormal variance with pedigree 0.094536, pedigree (1,1,4,1,1)
  (same comment as for Phenol, pentachloro-)
- Bromine [water, ground-, long-term]: 7.1169e-6 kg; lognormal variance with pedigree 1.0127, pedigree (1,1,4,1,1)
  (same comment as for Nickel, ion)
- Cadmium, ion [water, surface water]: 2.6402e-10 kg; lognormal variance with pedigree 1.1992, pedigree (1,1,4,1,1)
  (same comment as for Titanium, ion)
- Chromium VI [water, surface water]: 1.2047e-6 kg; lognormal variance with pedigree 1.1617, pedigree (1,1,4,1,1)
  (same comment as for Titanium, ion)
- Manganese [water, ground-, long-term]: 5.2006e-5 kg; lognormal variance with pedigree 1.9812, pedigree (1,1,4,1,1)
  (same comment as for Nickel, ion)
- Barium [air, urban air close to ground]: 7.7217e-7 kg; lognormal variance with pedigree 0.89161, pedigree (1,1,4,1,1)
  (same comment as for Mercury)
- Copper [air, urban air close to ground]: 2.585e-9 kg; lognormal variance with pedigree 1.171, pedigree (1,1,4,1,1)
  (same comment as for Mercury)
- Carbon dioxide, fossil [air, urban air close to ground]: 2.0779 kg; lognormal variance with pedigree 0.0173767, pedigree (1,1,4,1,1)
  (same comment as for Mercury)
- Iron [air, urban air close to ground]: 7.0432e-9 kg; lognormal variance with pedigree 0.55847, pedigree (1,1,4,1,1)
  (same comment as for Mercury)
- Tin, ion [water, ground-, long-term]: 0.0001498 kg; lognormal variance with pedigree 1.6791, pedigree (1,1,4,1,1)
  (same comment as for Nickel, ion)
- Zinc, ion [water, ground-, long-term]: 1.8177e-5 kg; lognormal variance with pedigree 3.1559, pedigree (1,1,4,1,1)
  (same comment as for Nickel, ion)
- Iron, ion [water, surface water]: 1.0331e-7 kg; lognormal variance with pedigree 0.78856, pedigree (1,1,4,1,1)
  (same comment as for Titanium, ion)
- Cadmium [air, urban air close to ground]: 1.4041e-9 kg; lognormal variance with pedigree 1.4696, pedigree (1,1,4,1,1)
  (same comment as for Mercury)
- Aluminium [water, ground-, long-term]: 0.00015256 kg; lognormal variance with pedigree 0.79438, pedigree (1,1,4,1,1)
  (same comment as for Nickel, ion)
- Fluoride [water, surface water]: 0.025204 kg; lognormal variance with pedigree 0.055963, pedigree (1,1,4,1,1)
  (same comment as for Titanium, ion)
- Arsenic [air, urban air close to ground]: 1.5699e-8 kg; lognormal variance with pedigree 1.4984, pedigree (1,1,4,1,1)
  (same comment as for Mercury)
- Zinc [air, urban air close to ground]: 4.0065e-8 kg; lognormal variance with pedigree 1.0608, pedigree (1,1,4,1,1)
  (same comment as for Mercury)
- Benzene [air, urban air close to ground]: 1.8052e-8 kg; lognormal variance with pedigree 0.094536, pedigree (1,1,4,1,1)
  (same comment as for Phenol, pentachloro-)
- NMVOC, non-methane volatile organic compounds, unspecified origin [air, urban air close to ground]: 8.2154e-7 kg; lognormal variance with pedigree 0.094536, pedigree (1,1,4,1,1)
  (same comment as for Phenol, pentachloro-)
- Vanadium, ion [water, ground-, long-term]: 0.00014169 kg; lognormal variance with pedigree 0.61445, pedigree (1,1,4,1,1)
  (same comment as for Nickel, ion)
