# portachrom production

Dataset: EcoSpold 2, unit process
Geography: RoW
Time period: 2000-01-01 to 2021-12-31
Technology level: current
Classification: EcoSpold01Categories: chemicals/inorganics
Classification: ISIC rev.4 ecoinvent: 0729:Mining of other non-ferrous metal ores
Tags: ConvertedDataset
Scenario: Business-as-Usual
System model: Allocation, cut-off by classification
Generated by: Roland Hischier
Published in: Hischier R. 2007
Database: ecoinvent
isCopyrightProtected: true
accessRestrictedTo: 1

## General comment
The functional unit represent 1 kg of milled chromite. Large uncertainty of the process data due to weak data on the production process.
[This dataset was already contained in the ecoinvent database version 2. It was not individually updated during the transfer to ecoinvent version 3. Life Cycle Impact Assessment results may still have changed, as they are affected by changes in the supply chain, i.e. in other datasets. This dataset was generated following the ecoinvent quality guidelines for version 2. It may have been subject to central changes described in the ecoinvent version 3 change report (http://www.ecoinvent.org/database/ecoinvent-version-3/reports-of-changes/), and the results of the central updates were reviewed extensively. The changes added e.g. consistent water flows and other information throughout the database. The documentation of this dataset can be found in the ecoinvent reports of version 2, which are still available via the ecoinvent website. The change report linked above covers all central changes that were made during the conversion process.]

## Included activities end
Raw materials, machineries and energy consumption for production, estimated emissions to air from production and infrastructure of the site (approximation). No water emissions. Overburden and tailing material from process together with losses of product not taken into account.

## Geography
Data are used here as European average.

## Technology
Data approximated with data from iron mining, lime crushing and lime milling.

## Parameters
- fraction, process water, to air: 0.205 dimensionless; name fraction_PW_to_air; lognormal variance with pedigree 0.092025, pedigree (4,4,3,2,4)

## Reference product
- portachrom: 1 kg; By-product classification allocatable product; CPC 4160: Other non-ferrous metals and articles thereof (including waste and scrap of some metals); cermets and articles […]; CAS 1308-31-2
  EcoSpold01Location=RER
  production volume 2.67763 kg
    This is a placeholder value that does not reflect real-world production volumes. This dataset does not currently require a real-world production volume to work in the database framework, and no actual data were collected yet. This has no negative effect on the results of the ecoinvent database.
  property price 0.42 EUR2005
    Calculated value based on data from United Nations Commodity Trade Statistics Database (comtrade.un.org). UN comtrade category: 681591 Articles containing magnesite, dolomite or chromite. Year 2007. Using exchange rate of 1EURO = 1.209 USD. Average of price of import into 5 main markets (EU, US, JP, IN and CN).
  property carbon content 0
    carbon content on a dry matter basis (reserved; not for manual entry)
  properties: water content 0, carbon content, fossil 0, water in wet mass 0 kg, carbon content, non-fossil 0, dry mass 1 kg, wet mass 1 kg, carbon allocation 0 kg

## Inputs from technosphere
- chromite ore concentrate: 1.05 kg; lognormal variance with pedigree 0.2706, pedigree (4,3,5,5,5)
  Approximation with data from lime treatment
  EcoSpold01Location=GLO
  Uncertainty: approximation with data from lime treatment
  properties: wet mass 1 kg, dry mass 1 kg
- conveyor belt: 2.78e-8 m; lognormal variance with pedigree 0.5806, pedigree (4,3,5,5,5)
  EcoSpold01Location=RER
  Approximation with data from lime treatment
  Uncertainty: approximation with data from lime treatment
- heat, district or industrial, other than natural gas: 0 MJ; pedigree (1,1,1,1,1)
  Approximation with data from lime treatment
  EcoSpold01Location=RER
  Uncertainty: approximation with data from lime treatment
  properties: heating value, net 1 MJ
- heat, central or small-scale, other than natural gas: 0.00282 MJ; lognormal variance with pedigree 0.2706, pedigree (4,3,5,5,5)
  EcoSpold01Location=CH
  Approximation with data from lime treatment
  Uncertainty: approximation with data from lime treatment
  properties: heating value, net 1 MJ
- industrial machine, heavy, unspecified: 0.000231 kg; lognormal variance with pedigree 0.5806, pedigree (4,3,5,5,5)
  (same comment as for conveyor belt)
- electricity, medium voltage: 0 kWh; pedigree (1,1,1,1,1)
  Approximation with data from lime treatment
  EcoSpold01Location=UCTE
  Uncertainty: approximation with data from lime treatment
- heat, district or industrial, other than natural gas: 3.64e-5, 0.0897636 MJ (2 entries); lognormal variance with pedigree 0.2706, pedigree (4,3,5,5,5)
  (same comment as for heat, district or industrial, other than natural gas)
- electricity, medium voltage: 0.000427316, 8.19408e-5, 0.00137562, 0.0200071, 0.00282001, 0.00918802 kWh (6 entries); lognormal variance with pedigree 0.2706, pedigree (4,3,5,5,5)
  (same comment as for electricity, medium voltage)

## Inputs from nature
- Water, well, in ground [natural resource, in water]: 2.93e-5 m3; name water_well_in_ground_input; lognormal variance with pedigree 0.2706, pedigree (4,3,5,5,5)
  Proxy: approximation with data from lime treatment
  Uncertainty: approximation with data from lime treatment
- Transformation, to mineral extraction site [natural resource, land]: 2.13e-6 m2; lognormal variance with pedigree 0.2086, pedigree (4,3,5,5,3)
  Approximation with data from iron mining & lime treatment
  Uncertainty: approximation with data from iron mining & lime treatment
- Transformation, from forest, unspecified [natural resource, land]: 2.13e-6 m2; lognormal variance with pedigree 0.2086, pedigree (4,3,5,5,3)
  (same comment as for Transformation, to mineral extraction site)
- Occupation, mineral extraction site [natural resource, land]: 0.00012 m2*year; lognormal variance with pedigree 0.1286, pedigree (4,3,5,5,3)
  (same comment as for Transformation, to mineral extraction site)

## Emissions to nature
- Water [water, unspecified]: 2.32935e-5 m3; name water_to_water_unspecified; lognormal variance with pedigree 0.0827, pedigree (2,2,5,5,1)
  Calculated value based on literature values and expert opinion. See comments in the parametres' comment field.
  property fraction, origin: fresh water 1; name fraction_origin_fresh_water_Ww
  property fraction, origin: salt water 0; name fraction_origin_salt_water_Ww
  property fraction, origin: unspecified 0; name fraction_origin_unspecified_Ww
  property wet mass 1000 kg; name WM
  property carbon content, non-fossil 0; name C_content_non_fossil
  property dry mass 0 kg; name DM
  property water in wet mass 1000 kg; name WWM
  property carbon content, fossil 0; name C_content_fossil
- Particulates, < 2.5 um [air, non-urban air or from high stacks]: 0.000145 kg; lognormal variance with pedigree 0.5806, pedigree (4,3,5,5,5)
  Approximation with data from lime treatment
  Uncertainty: approximation with data from lime treatment
- Particulates, > 10 um [air, non-urban air or from high stacks]: 0.00145 kg; lognormal variance with pedigree 0.3106, pedigree (4,3,5,5,5)
  (same comment as for Particulates, < 2.5 um)
- Water [air, unspecified]: 6.0065e-6 m3; name water_to_air_unspecified; lognormal variance with pedigree 0.0827, pedigree (2,2,5,5,1)
  (same comment as for Water)
  property fraction, origin: fresh water 1; name fraction_origin_fresh_water
  property fraction, origin: salt water 0; name fraction_origin_salt_water
  property fraction, origin: unspecified 0; name fraction_origin_unspecified
- Particulates, > 2.5 um, and < 10um [air, non-urban air or from high stacks]: 0.00131 kg; lognormal variance with pedigree 0.4006, pedigree (4,3,5,5,5)
  (same comment as for Particulates, < 2.5 um)

## Sampling procedure
approximation with data from literature

## Extrapolations
see technology This dataset has been copied from an original dataset covering the geography RER. The uncertainty has been adjusted accordingly.

## Review by Daniel Kellenberger (obsolete) 2007-11-09
passed
