# glazing production, triple, U<0.5 W/m2K

Dataset: EcoSpold 2, unit process
Geography: RoW
Time period: 1996-01-01 to 2021-12-31
Technology level: current
Classification: EcoSpold01Categories: building components/windows
Classification: ISIC rev.4 ecoinvent: 2310:Manufacture of glass and glass products
Tags: ConvertedDataset
Scenario: Business-as-Usual
System model: Allocation, cut-off by classification
Generated by: Martin Lehmann
Published in: Kellenberger D. 2007
Database: ecoinvent
isCopyrightProtected: true
accessRestrictedTo: 1

## General comment
This dataset describes the processes included in the production of 1.06m2 (corresponding to 1m2 visible area) triple glazing (3-IV) with a U-value below 0.5 W/m2K. It can be applied for triple glazing used in the building sector. 1 m2 visible glazing area has a final weight of 30 kg.
[This dataset was already contained in the ecoinvent database version 2. It was not individually updated during the transfer to ecoinvent version 3. Life Cycle Impact Assessment results may still have changed, as they are affected by changes in the supply chain, i.e. in other datasets. This dataset was generated following the ecoinvent quality guidelines for version 2. It may have been subject to central changes described in the ecoinvent version 3 change report (http://www.ecoinvent.org/database/ecoinvent-version-3/reports-of-changes/), and the results of the central updates were reviewed extensively. The changes added e.g. consistent water flows and other information throughout the database. The documentation of this dataset can be found in the ecoinvent reports of version 2, which are still available via the ecoinvent website. The change report linked above covers all central changes that were made during the conversion process.]

## Included activities end
Included in this dataset are the materials and production processes of 1.06m2 (corresponding to 1m2 visible area) triple glazing (3-IV) with a U-value below 0.5 W/m2K including disposal of waste water and production wastes.

## Geography
Data estimated according to a European company.

## Technology
The technology represents average European production.

## Parameters
- fraction, water, completely softened, to air: 0.24 dimensionless; name fraction_WCS_to_air; lognormal variance with pedigree 0.092025, pedigree (4,4,3,2,4)
- fraction, process water, to air: 0.24 dimensionless; name fraction_PW_to_air; lognormal variance with pedigree 0.092025, pedigree (4,4,3,2,4)

## Reference product
- glazing, triple, U<0.5 W/m2K: 1 m2; CPC 37114: Glass in sheets, bent, edge-worked, engraved, drilled, enamelled or otherwise worked, but not framed, etc.; By-product classification allocatable product
  EcoSpold01Location=RER
  production volume 2.67763 m2; name glazin_triple_PV
    This is a placeholder value that does not reflect real-world production volumes. This dataset does not currently require a real-world production volume to work in the database framework, and no actual data were collected yet. This has no negative effect on the results of the ecoinvent database.
  property carbon content, fossil 0.00372354
    Calculated as an addition of C content in the product, then referred to 1 kg DM.
  property price 96.3118 EUR2005
    Calculated based on inputs: The price of the product has been calculated as a sum of the values of the material and energy inputs for this product. This value is therefore a rough estimation. It may underestimate the real price since there are additional expenses when producing any product. These expences can include for example labour costs, treatment of waste materials and profit for the producer. Please consider carefully whether this level of data quality is acceptable for your application.
  property carbon content 0.00372354
    carbon content on a dry matter basis (reserved; not for manual entry)
  properties: water in wet mass 0 kg, carbon content, non-fossil 0, wet mass 31.9272 kg, dry mass 31.9272 kg, water content 0, carbon allocation 0.118882 kg

## Inputs from technosphere
- electricity, low voltage: 0 kWh; pedigree (1,1,1,1,1)
  EcoSpold01Location=UCTE
- krypton, gaseous: 0.077024 kg; lognormal variance with pedigree 0.0526, pedigree (1,3,5,5,1)
  EcoSpold01Location=CH
  properties: dry mass 1 kg, wet mass 1 kg
- polybutadiene: 0.018748 kg; lognormal variance with pedigree 0.0526, pedigree (1,3,5,5,1)
  EcoSpold01Location=RER
  properties: carbon content, fossil 0.857143, dry mass 1 kg, wet mass 1 kg, heating value, net 25.97 MJ
  note on carbon content, fossil: Monomer is 1,3-butadiene (C4H8) (ecoinvent v2.2 report 11_II). MW=56
- wastewater, unpolluted: -0.0014946 m3; lognormal variance with pedigree 0.0526, pedigree (1,3,5,5,1)
  EcoSpold01Location=CH
  production volume 0.0044838 m3
    Calculated from the production volume of glazing, triple, U<0.5 W/m2K in proportion to the respective output amounts.
  properties: water content 2962.17, carbon content, fossil 0.00178991, carbon content, non-fossil 0.00178991, wet mass 1000 kg, dry mass 0.337476 kg
  note on carbon content, fossil: Assumed to be like in tap water. Bicarbonate content is 2.93 mol/m3. CO2 content is 0.1 mol/m3 (ecoinvent v2.2 report 8, Tab 93.1).
- flat glass, uncoated: 9.6836 kg; name glass_uncoated; lognormal variance with pedigree 0.0526, pedigree (1,3,5,5,1)
  EcoSpold01Location=RER
  properties: wet mass 1 kg, dry mass 1 kg
- polysulfide, sealing compound: 0.65737 kg; lognormal variance with pedigree 0.1726, pedigree (1,3,5,5,1)
  EcoSpold01Location=RER
  properties: heating value, net 4.74 MJ, carbon content, fossil 0.1564, wet mass 1 kg, dry mass 1 kg
  note on carbon content, fossil: Calculated as the addition of C content in its components (ecoinvent v2 report_7)
- waste glass: 0 kg; name waste_glass; source Kellenberger D. 2007; pedigree (1,1,1,1,1)
  EcoSpold01Location=CH
  corrected value. 7% of glass input is assumed to leave the system as waste.
  production volume 0 kg
    (same comment as for wastewater, unpolluted)
  property price 0 EUR2005; name waste_glass_price_EUR2005
  properties: dry mass 1 kg, wet mass 1 kg, heating value, net 0.05 MJ
  note on heating value, net: Value extracted from "treatment of waste glass, open dump, very wet infiltration class (1000mm)"
- aluminium, wrought alloy: 0.51983 kg; lognormal variance with pedigree 0.0526, pedigree (1,3,5,5,1)
  property wet mass 1 kg; name WM
  property carbon content, fossil 0; name C_content_fossil
  property water in wet mass 0 kg; name WWM
  property water content 0; name water_content
  property carbon content, non-fossil 0; name C_content_non_fossil
  property dry mass 1 kg; name DM
- zeolite, powder: 0.1929 kg; = 1.929/10; lognormal variance with pedigree 0.2706, pedigree (4,3,5,5,5)
  The original value has been corrected based on revision from industry expert : "the amount should be aprox. 10 times lower than orginal value"
  EcoSpold01Location=RER
  properties: wet mass 1 kg, dry mass 1 kg
- flat glass, coated: 19.367 kg; name glass_coated; lognormal variance with pedigree 0.0526, pedigree (1,3,5,5,1)
  EcoSpold01Location=RER
  properties: dry mass 1 kg, wet mass 1 kg
- sheet rolling, aluminium: 0.51983 kg; lognormal variance with pedigree 0.0526, pedigree (1,3,5,5,1)
  EcoSpold01Location=RER
- water, completely softened: 0 kg; name water_softened_input; pedigree (1,1,1,1,1)
  EcoSpold01Location=RER
  properties: wet mass 1 kg
- electricity, low voltage: 0.0622653, 0.0113373, 0.182545, 2.80265, 0.453419, 1.30199 kWh (6 entries); lognormal variance with pedigree 0.0532, pedigree (2,3,5,5,1)
  EcoSpold01Location=UCTE
- waste glass: -0.192233, -0.0177177, -0.000401955, -0.00165303, -0.00251022, -0.00739672, -1.81163 kg (7 entries); source Kellenberger D. 2007; lognormal variance with pedigree 0.0526, pedigree (1,3,5,5,1)
  (same comment as for waste glass)
  production volume 5.97277 kg
- water, completely softened: 0.639836, 0.854764 kg (2 entries); lognormal variance with pedigree 0.0526, pedigree (1,3,5,5,1)
  EcoSpold01Location=RER

## Emissions to nature
- Water [air, unspecified]: 0.000358704 m3; name water_to_air_unspecified; lognormal variance with pedigree 0.0827, pedigree (2,2,5,5,1)
  Calculated value based on literature values and expert opinion. See comments in the parametres' comment field.
  property fraction, origin: fresh water 1; name fraction_origin_fresh_water
  property fraction, origin: salt water 0; name fraction_origin_salt_water
  property fraction, origin: unspecified 0; name fraction_origin_unspecified

## Sampling procedure
Company documentation, calculations based on geometry

## Extrapolations
see Geography This dataset has been copied from an original dataset covering the geography RER. The uncertainty has been adjusted accordingly.

## Review by Rolf Frischknecht 2009-01-22
passed

## Review by Emilia Moreno Ruiz 2012-05-15
correction of waste glass output and zeolite input based on users comments, and Althaus positive acceptance. The aluminium production mix has been changed to aluminium, wrought alloy based on expert opinion (HJ Althaus).
