# zinc monosulfate production

Dataset: EcoSpold 2, unit process
Geography: RoW
Time period: 2005-01-01 to 2021-12-31
Technology level: current
Classification: ISIC rev.4 ecoinvent: 2011:Manufacture of basic chemicals
Synonyms: zinc sulphate monohydrate; White vitriol; Zinc sulphate; Zinc sulfate; Zinc sulfate solution; 7733-02-0; Zinc sulfate (1:1)
Scenario: Business-as-Usual
System model: Allocation, cut-off by classification
Generated by: Roland Hischier
Published in: Hischier R. 2007
Database: ecoinvent
isCopyrightProtected: true
accessRestrictedTo: 1

## General comment
This dataset represents the production of 1 kg of solid zinc monosulfate powder. Direct uses of zinc sulfate are the following:
- Precipitating baths for viscose manufacture
- Electrolytes for galvanizing baths
- Additive (trace element) in fertilizers and animal feeds
- In medicine, as an emetic, astringent, or disinfectant
- Wood preservative, additive for paper bleaching, flocculant
- Water treatment
- Ore flotation
- Rayon spinning
This dataset represents an estimation of the production process of zinc monosulfate and should be used only for processes where the impact of this substance is not considered to be high. The main data are taken from Rohe et al. (2014). The raw material inputs are calculated according to stoichiometry. The emissions to air and water are estimated using mass balance.
References:
Hischier R., Classen M., Lehmann M. and Scharnhorst W. (2007) Life cycle inventories of Electric and Electronic Equipment: Production, Use and Disposal. ecoinvent report No. 18. Empa / Technology & Society Lab, Swiss Centre for Life Cycle Inventories, Dübendorf, 2007.
Rohe, D. M. M., Battersby, R. V. and Wolf, H. U. 2014. Zinc Compounds. Ullmann's Encyclopedia of Industrial Chemistry. 1–8.

## Included activities start
From reception of raw materials at the factory gate.

## Included activities end
This dataset includes raw materials and chemicals used for production, estimated emissions to air and water from production (incomplete), and estimated energy demand and infrastructure of the plant (approximation). Solid wastes are omitted.

## Geography
The data used has no specific geographical origin as it is based on stoechiometric calculations and estimations. It is assumed to be representative of the global production.

## Technology
Production out of zinc oxide and sulphuric acid, assuming a yield of 95%. Zinc sulphate monohydrate is produced either by thermal dehydration or by dehydrating with 95% ethanol.
Reference:
Hischier R., Classen M., Lehmann M. and Scharnhorst W. (2007) Life cycle inventories of Electric and Electronic Equipment: Production, Use and Disposal. ecoinvent report No. 18. Empa / Technology & Society Lab, Swiss Centre for Life Cycle Inventories, Dübendorf, 2007.

## Time period
Date of published literature.

## Parameters
- fraction, process water, to air: 0.205 dimensionless; name fraction_PW_to_air; lognormal variance with pedigree 0.092025, pedigree (4,4,3,2,4)
  Literature value (Statistics Canada, 2007 & Shaffer, K.H., 2008, Consumptive water use in the Great Lakes Basin, USGS) (Vionnet, S., Quantis Water Database - Technical Report, 2012).

## Reference product
- zinc monosulfate: 1 kg; name RP; CPC 34220: Zinc oxide; zinc peroxide; chromium oxides and hydroxides; manganese oxides; iron oxides and hydroxides; earth[…]; By-product classification allocatable product; CAS 7733-02-0
  Zinc monosulphate, also called zinc sulphate monohydrate, is a white powder.
  Direct uses of zinc sulfate are the following:
  - Precipitating baths for viscose manufacture
  - Electrolytes for galvanizing baths
  - Additive (trace element) in fertilizers and animal feeds
  - In medicine, as an emetic, astringent, or disinfectant
  - Wood preservative, additive for paper bleaching, flocculant
  - Water treatment
  - Ore flotation
  - Rayon spinning
  References:
  Hischier R., Classen M., Lehmann M. and Scharnhorst W. (2007) Life cycle inventories of Electric and Electronic Equipment: Production, Use and Disposal. ecoinvent report No. 18. Empa / Technology & Society Lab, Swiss Centre for Life Cycle Inventories, Dübendorf, 2007.
  Rohe, D. M. M., Battersby, R. V. and Wolf, H. U. 2014. Zinc Compounds. Ullmann's Encyclopedia of Industrial Chemistry. 1–8.
  production volume 4.74713e6 kg; name RP_PV
    Estimated value. The Global production volume is extrapolated from the European and US production volume based on reports from Cefic (European Chemical Industry Council), and the American Chemistry Council.
    According to Cefic (2016) the Global sales of chemicals in the year 2015 was 3 534 billion euros. The reported share of sales per regions are: EU28 14.7%; Other Europe (Switzerland, Norway, Turkey, Russia and Ukraine) 2.7%; NAFTA (US, Canada and Mexico) 16.5%; Latin America 3.8%; China 39.9%; Japan 3.9%; Republic of Korea 3.2%; India 2.2%; Rest of Asia 11.9%; Rest of the World 1.3%. Cefic also reports the US total sales, 518.7 billion euros of the global 3 534 billion euros (14.7%). The same share is reported from the American Chemistry Council (2016), according to this source the USA sales account for 15% of global sales for the year 2016.
    According to the 'ECB' zinc sulfate produced in Europe is (at least) 1000 tonnes. Some values related to zince sulfate production, import or export are deemed confidential and hence this production volume might be an underestimation. The global production volume was scaled accordingly.
    Reference(s):
    Cefic 2016. Facts and figures 2016 of the European chemical industry. Accessible at: http://www.cefic.org/Facts-and-Figures/Chemicals-Industry-Profile/
    American Chemistry Council 2016. Outlook: U.S. Chemical Industry Continues to Outpace Industrial Output; Accounts for More Than One-Half of Construction Spending by Manufacturing Sector. Accessible at: https://www.americanchemistry.com/Media/PressReleasesTranscripts/ACC-news-releases/US-Chemical-Industry-Continues-to-Outpace-Industrial-Output.html
    European Chemical Bureau (ECB), 2008, Summary risk assessment report on zinc sulfate. European communites, The Netherland. Retrieved from: https://echa.europa.eu/documents/10162/c235a91f-5d2b-4660-a30f-9e67941ec71e, on 15 of June 2017.
  property price 0.471 EUR2005
    From UN trade database. http://data.un.org/ Calculated as average price for all chemicals in the category 'Trade of goods , US$, HS 1992, 28 Inorganic chemicals, precious metal compound, isotope'. Import data from the largest economies of the world are used (Brazil, India, USA, China, Japan and EU-27).
  property carbon content 0
    carbon content on a dry matter basis (reserved; not for manual entry)
  properties: water content 0, carbon content, fossil 0, carbon content, non-fossil 0, dry mass 1 kg, wet mass 1 kg, water in wet mass 0 kg, carbon allocation 0 kg

## Inputs from technosphere
- chemical factory, organics: 4e-10 unit; lognormal variance with pedigree 0.3498, pedigree (2,3,5,4,3)
  Calculated based on literature data published by the industry. For this activity, no information was readily available concerning infrastructure and land-use. Therefore, the infrastructure is estimated based on data from two chemical factories, the BASF site of Ludwigshafen and the chemical factory in Gendorf (which are both located in Germany), which produce a wide range of chemical substances. Based on this data, the following assumptions are made: the built area amounts to about 4.2 ha, the plant has an average output of 50'000 t/a and a lifespan of fifty years. The estimated infrastructure amount is therefore 4.00 E-10 units per kg of produced chemical.
  References:
  Althaus H.-J., Chudacoff M., Hischier R., Jungbluth N., Osses M. and Primas A. (2007) Life Cycle Inventories of Chemicals. ecoinvent report No. 8, v2.0. EMPA Dübendorf, Swiss Centre for Life Cycle Inventories, Dübendorf, CH.
  Gendorf (2000) Umwelterklärung 2000, Werk Gendorf. Werk Gendorf, Burgkirchen.
- heat, district or industrial, natural gas: 0 MJ; source Kellenberger D. 2007; pedigree (1,1,1,1,1)
  Proxy, due to a lack of data for the drying process, the quicklime kiln process is used.
  Uncertainty: E
  properties: heating value, net 1 MJ
- sulfuric acid: 0.575 kg; lognormal variance with pedigree 0.1786, pedigree (4,5,5,5,5)
  Calculated Value, based on a process efficiency of 95%.
  Uncertainty: e
  properties: wet mass 1 kg, dry mass 1 kg
- zinc oxide: 0.478 kg; lognormal variance with pedigree 0.1786, pedigree (4,5,5,5,5)
  Calculated Value, based on a process efficiency of 95%.
  Uncertainty: e
  properties: wet mass 1 kg, dry mass 1 kg
- heat, district or industrial, natural gas: 0.0567967, 3.6852 MJ (2 entries); source Kellenberger D. 2007; lognormal variance with pedigree 0.138, pedigree (4,5,5,5,4)
  (same comment as for heat, district or industrial, natural gas)

## Inputs from nature
- Water, unspecified natural origin [natural resource, in water]: 0.00095 m3; name water_UNO_input; lognormal variance with pedigree 0.188, pedigree (4,5,5,5,5)
  Calculated Value, based on a process efficiency of 95%. As a process uses enough (process) water, an additional water consumption of 50% is taken into account.
  Uncertainty: e

## Emissions to nature
- Zinc [air, urban air close to ground]: 0.00478 kg; lognormal variance with pedigree 0.142, pedigree (1,1,5,5,1)
  For the zinc oxide input, it is assumed that 80% of the surplus input is internally recovered, while the re-maining 20% are emitted into air.
  Reference:
  Hischier R., Classen M., Lehmann M. and Scharnhorst W. (2007) Life cycle inventories of Electric and Electronic Equipment: Production, Use and Disposal. ecoinvent report No. 18. Empa / Technology & Society Lab, Swiss Centre for Life Cycle Inventories, Dübendorf, 2007.
- Sulfate [air, urban air close to ground]: 0.00063 kg; lognormal variance with pedigree 0.142, pedigree (1,1,5,5,1)
  For sulfuric acid, the air emissions occurring were assumed to be 0.2% of the raw material input. The remaining amount of unreacted sulfuric acid was assumed to leave the production process with the wastewater.
- Water [water, unspecified]: 0.00075525 m3; = water_UNO_input*(1-fraction_PW_to_air); lognormal variance with pedigree 0.0827, pedigree (2,2,5,5,1)
  Calculated as a fraction of the input of water. For more details, refer to the mathematical relation and the parameters.
  property fraction, origin: salt water 0; name fraction_origin_salt_water_Ww
  property wet mass 1000 kg; name WM
  property fraction, origin: fresh water 0; name fraction_origin_fresh_water_Ww
  property fraction, origin: unspecified 1; name fraction_origin_unspecified_Ww
  property dry mass 0 kg; name DM
  property water in wet mass 1000 kg; name WWM
  property carbon content, non-fossil 0; name C_content_non_fossil
  property carbon content, fossil 0; name C_content_fossil
- Water [air, unspecified]: 0.00019475 m3; = (water_UNO_input*fraction_PW_to_air); lognormal variance with pedigree 0.0827, pedigree (2,2,5,5,1)
  (same comment as for Water)
  property fraction, origin: unspecified 1; name fraction_origin_unspecified
  property fraction, origin: fresh water 0; name fraction_origin_fresh_water
  property fraction, origin: salt water 0; name fraction_origin_salt_water
- Sulfate [water, surface water]: 0.03105 kg; lognormal variance with pedigree 0.182, pedigree (1,1,5,5,1)
  (same comment as for Sulfate)

## Sampling procedure
Process data based on stoichiometry. Process emissions are based on estimations only.

## Extrapolations
This dataset has been copied from an original dataset covering the geography RER. The uncertainty has been adjusted accordingly.

## Review by Gregor Wernet 2017-08-04
This dataset was additionally reviewed in a separate review process by Eric Johnson of Atlantic Consulting as well as Emilia Moreno Ruiz and Gregor Wernet of ecoinvent.
