# weaned calves production on pasture

Dataset: EcoSpold 2, unit process
Geography: BR
Time period: 2006-01-01 to 2021-12-31
Technology level: current
Classification: ISIC rev.4 ecoinvent: 0141:Raising of cattle and buffaloes
Scenario: Business-as-Usual
System model: Allocation, cut-off by classification
Share of production covered: 3 %
Generated by: Fernando Dias
Published in: Folegatti-Matsuura M. 2018
Database: ecoinvent
isCopyrightProtected: true
accessRestrictedTo: 1

## General comment
This dataset represents the production of 1 kg of live weight of weaned calves for beef cattle, in Brazil, on planted pasture, at farm, for fattening by other systems. Discarded cattle (bulls and culled cows) are considered by product. Culled cows are replaced by some of the weaned heifers, all other weaned heifers are sold for fattening by other systems, and are considered by product. The dataset include operations for pasture maintenance and replanting. Fences are the only infrastructure included. Acquisition and use of grass seeds are not included (less then 3% of product mass). The production of young bulls for reproduction is not included for the same reason, but their emissions in the farm and their live weight as product are considered. Direct field emissions are included, with important regionalizations added. Farm manure as an organic fertiliser is only accounted for in terms of direct field emissions.

## Included activities start
This activity starts at the replanting of pasture.

## Included activities end
This activity ends with the provision of weaned calves at farm gate, ready to be sent to slaughterhouses as live weight.

## Technology
Pasture is regularly fertilized and replanted every 20 years. Mineral salt is served as supplement feed for all cattle in troughs on the field. Besides pasture and mineral salt, no suplement is served to cattle. The dataset does not include pharmaceuticals, although typical production systems use them. Use of hormones for cattle raising is forbidden in Brazil.

## Time period
Time period of the most of the data collected for this dataset.

## Parameters
- dinitrogen monoxide from manure in feedlot: 0 kg; name N2O_feedlot
  N2O from manure management in feedlot, direct and indirect emissions (IPCC 2006).
- LUC_crop_specific: 1 dimensionless
  This parameter allows to switch between a 'crop specific' and a 'country specific' approach when calculating the LUC of a crop. By default, the chosen approach is 'crop specific', so the value of the parameter is 1. If you want to apply a 'country specific' approach, turn the parameter to 0.
- clay content into soil: 53.06 % (obsolete); name Clay_content; lognormal variance with pedigree 0.0573, pedigree (4,3,4,3,4)
  Fraction of clay content into soil. Used in the SQCB-NO3 model for the calculation of leaching of NO3. From Folegatti et al. (2015).
- total nitrogen: 59.2056 kg/ha; name Ntot; = (N_ex + N_urea_fert + N_fert) / (T_t * 10^-4); lognormal variance with pedigree 0.0573, pedigree (4,3,4,3,4)
  Total nitrogen in mineral and organic fertilisers (kg N/ha)
- organic nitrogen into soil: 5520.7 kg N/ha; name Norg_soil; lognormal variance with pedigree 0.0573, pedigree (4,3,4,3,4)
  Mass of organic N contained in the upper 50 cm of soil per ha. Used in the SQCB-NO3 model for the calculation of leaching of NO3. From Folegatti et al. (2015).
- nitrogen fertilizer, as N: 0 kg; name N_fert
  Nitrogen fertilizer (not urea) for fertilization.
- fraction, process water to water, to surface water: 0.85 dimensionless; name fraction_PWtoW_to_surface_water
- emission factor N2O: 0.02 dimensionless; name EF_N2O; lognormal variance with pedigree 0.0573, pedigree (4,3,4,3,4)
  Emission factor of N2O from manure deposited in pasture. From IPCC (2006).
- nitrogen in manure on pasture: 1.9809 kg; name N_ex; lognormal variance with pedigree 0.0573, pedigree (4,3,4,3,4)
  Manure deposited on pasture, as N, per year and kg of product.
- soil eroded: 200 kg/ha.yr; name soil_eroded; lognormal variance with pedigree 0.0573, pedigree (4,3,4,3,4)
  Soil eroded. Used for the calculation of P emissions through water erosion to surface water. From Macedo et al. (2005).
- fraction, process water, to air: 0.15 dimensionless; name fraction_PW_to_air
- rooting depth: 0.2205 m; name root_depth; lognormal variance with pedigree 0.0573, pedigree (4,3,4,3,4)
  Plant rooting depth for pasture. Used in the SQCB-NO3 model for the calculation of leaching of NO3. From Cunha et al. (2010).
- urea, as N, as feed: 0 kg; name N_urea_feed
  Urea for cattle feed.
- precipitation, annual: 1201.3 mm/year; name precipitation; lognormal variance with pedigree 0.0573, pedigree (4,3,4,3,4)
  Average annual precipitation in the BR-CO geographic region. Used in the SQCB-NO3 model for the calculation of leaching of NO3.
- urea, as N, as fertilizer: 0 kg; name N_urea_fert
  Urea as fertilizer for pasture planting and maintenance.
- nitrogen uptake by plant: 176.62 kg N/ha; name Nuptake_plant; lognormal variance with pedigree 0.0573, pedigree (4,3,4,3,4)
  N taken by plant during its growth. Used in the SQCB-NO3 model for the calculation of leaching of NO3. From Bernardi (2012).
- nitrogen in crop residues: 0 kg N/ha; name Ncrop_residues
  N contained in the crop residues. Used for the calculation of emissions of N2O to the air. Not considered for pastures because root is semiperennial.

## Reference product
- weaned calves, live weight: 0 kg; name REF_PRODUCT; By-product classification allocatable product; CPC 02111: Cattle; EcoSpold01Categories agricultural production/animal production
  Weaned calves sold.
  production volume 6.18247e8 kg; name REF_PRODUCT_VOLUME; = BY_PRODUCT_2_VOLUME / BY_PRODUCT_2
    Calculated from cattle for slaughtering production volume.
  property energy content 14.937 MJ; name REF_PRODUCT_energy_content
    as gross calorific value (when relevant)
  property dry mass 0.6 kg; name REF_PRODUCT_DM; = REF_PRODUCT_WM - REF_PRODUCT_WWM
  property wet mass 1 kg; name REF_PRODUCT_WM
  property water content 0.666667; name REF_PRODUCT_water_content; = REF_PRODUCT_WWM / REF_PRODUCT_DM
  property carbon content, fossil 0; name REF_PRODUCT_C_content_fossil
    fossil carbon content on a dry matter basis
  property price 1.57 EUR2005; name REF_PRODUCT_price_EUR2005
    Current price for weaners is R 35/kg. Suggested price [7]: 2.1 /kg
    Suggest to use the same price for heifers.Source: http://www.mpo.co.za/wp-content/uploads/2018/04/Agri-Trends-23-April-2018-GrainsOilseedsLlivestock-Fibre-.pdf
  property water in wet mass 0.4 kg; name REF_PRODUCT_WWM
  property carbon content, non-fossil 0.4928; name REF_PRODUCT_C_content_non_fossil
    biogene carbon content on a dry matter basis
  property carbon content 0.4928
    carbon content on a dry matter basis (reserved; not for manual entry)
  property true value 1.57; name REF_PRODUCT_true_value
    allocation property applied in "true value" allocation // value calculated from revenue
  properties: carbon allocation 0.29568 kg
- cattle for slaughtering, live weight: 1 kg; name BY_PRODUCT_2; CPC 02111: Cattle; By-product classification allocatable product
  Culled cows and bulls.
  production volume 7.19206e8 kg; name BY_PRODUCT_2_VOLUME; = 8358976000 * 4.78% * (1 - 10%) / 0.5
    (BR beef production in 2015) * (% of system in BR in 2015) * (1 - % beef production from milk cattle in BR) / (carcass as live weight, BR average).
  property price 1.25 EUR2005; name BY_PRODUCT_2_price_EUR2005
    Calculated price specifically and exclusively for Brazil. The price is calculated using yearly values from 2006 till 2015 in Brazil. Data from embrapa are used.
  property energy content 14.9367 MJ; name BY_PRODUCT_2_energy_content
    Energy content calculated from animal fat and protein composition and energy content for animal fat and protein of 39.3 and 23.6 MJ/kg, respectively.
    Johnson, I.R. et al. (2012). J. Anim. Sci. 90(13):4741-475.
    Williams, C.B. (2005). J. Anim. Sci. 83(6):1262-1266.
  property water content 0.666667; name BY_PRODUCT_2_water_content; = BY_PRODUCT_2_WWM / BY_PRODUCT_2_DM
  property water in wet mass 0.4 kg; name BY_PRODUCT_2_WWM
  property wet mass 1 kg; name BY_PRODUCT_2_WM
  property carbon content, fossil 0; name BY_PRODUCT_2_C_content_fossil
  property dry mass 0.6 kg; name BY_PRODUCT_2_DM; = BY_PRODUCT_2_WM - BY_PRODUCT_2_WWM
  property carbon content, non-fossil 0.4928; name BY_PRODUCT_2_C_content_non_fossil
    Calculated from live weight empty body composition in fat and protein (
    Johnson, I.R. et al. (2012). J. Anim. Sci. 90(13):4741-475 ; Williams, C.B. (2005). J. Anim. Sci. 83(6):1262-1266) and from C content of nutrients (protein, fat) according to A.D. Kay and T. Vrede ('Evolutionary and Biochemical Aspects', in Global Ecology, 2010, Elsevier B.V., S.E. Jørgensen Ed.).
  property carbon content 0.4928
    carbon content on a dry matter basis (reserved; not for manual entry)
  property true value 1.45412; name BY_PRODUCT_2_true_value
    allocation property applied in "true value" allocation // value calculated from revenue
  properties: carbon allocation 0.29568 kg

## By-products
- weaned heifers, live weight: 0 kg; name BY_PRODUCT; EcoSpold01Categories agricultural production/animal production; By-product classification allocatable product; CPC 02111: Cattle
  Weaned heifers sold.
  production volume 2.83942e8 kg; name BY_PRODUCT_VOLUME; = BY_PRODUCT_2_VOLUME / BY_PRODUCT_2 * BY_PRODUCT
    Calculated from cattle for slaughtering production volume.
  property water in wet mass 0.4 kg; name BY_PRODUCT_WWM
  property water content 0.666667; name BY_PRODUCT_water_content; = BY_PRODUCT_WWM / BY_PRODUCT_DM
  property carbon content, non-fossil 0.4928; name BY_PRODUCT_C_content_non_fossil
    biogene carbon content on a dry matter basis
  property energy content 14.937 MJ; name BY_PRODUCT_energy_content
    as gross calorific value (when relevant)
  property wet mass 1 kg; name BY_PRODUCT_WM
  property dry mass 0.6 kg; name BY_PRODUCT_DM; = BY_PRODUCT_WM - BY_PRODUCT_WWM
  property carbon content, fossil 0; name BY_PRODUCT_C_content_fossil
    fossil carbon content on a dry matter basis
  property price 1.18 EUR2005; name BY_PRODUCT_price_EUR2005
    (same comment as for cattle for slaughtering, live weight)
  property carbon content 0.4928
    carbon content on a dry matter basis (reserved; not for manual entry)
  property true value 0.541939; name BY_PRODUCT_true_value
    allocation property applied in "true value" allocation // value calculated from revenue
  properties: carbon allocation 0.29568 kg
- iron scrap, unsorted: 0 kg; CPC 39310: Slag, dross, scalings and other waste from the manufacture of iron or steel; By-product classification Recyclable
  Fencing the farm: steel wire.
  production volume 0 kg; name BY_PRODUCT_3_VOLUME; = REF_PRODUCT_VOLUME * ( BY_PRODUCT_3 / REF_PRODUCT)
    Calculated from production volume of reference product using the relative outputs.
  property price 0.149 EUR2005; name BY_PRODUCT_3_price_EUR2005
    Temporary price data. Calculated as 90% of purchasers price based on: estimated at 85% of sorted scrap
  property carbon content 0
    carbon content on a dry matter basis (reserved; not for manual entry)
  properties: water content 0, dry mass 1 kg, wet mass 1 kg, carbon content, fossil 0, carbon content, non-fossil 0, water in wet mass 0 kg, carbon allocation 0 kg

## Inputs from technosphere
- inorganic phosphorus fertiliser, as P2O5: 0.046911 kg; lognormal variance with pedigree 0.0439, pedigree (3,3,5,3,2)
  Phosphate fertilizer for pasture replanting or maintenance.
  properties: wet mass 1 kg, dry mass 1 kg
- weed control, by brush cutter, pasture: 0.00351824 ha; lognormal variance with pedigree 0.0439, pedigree (3,3,5,3,2)
  Linked to operation dataset from BR geography.
- land use change, pasture, man made: 0.000938233 ha; = 0.00267664*LUC_crop_specific+(0.00554857914417663*(1-LUC_crop_specific))
  Calculated value. Land use change (LUC) related to the planted pasture only (native pasture not included). From Novaes et al. (2017).
- lime: 0.879576 kg; lognormal variance with pedigree 0.0439, pedigree (3,3,5,3,2)
  Lime applied for pasture replanting or maintenance.
  properties: wet mass 1 kg, dry mass 1 kg, carbon content, fossil 0.120005
- tillage, harrowing, by offset disc harrow: 0.000586396 ha; lognormal variance with pedigree 0.0439, pedigree (3,3,5,3,2)
  Linked to operation dataset from BR geography.
- tillage, harrowing, by offset leveling disc harrow: 0.00117279 ha; lognormal variance with pedigree 0.0439, pedigree (3,3,5,3,2)
  Linked to operation dataset from BR geography.
- fertilising, by broadcaster: 0.000586396 ha; lognormal variance with pedigree 0.0439, pedigree (3,3,5,3,2)
  Linked to operation dataset from BR geography.
- wood preservation, vacuum pressure method, inorganic salt, containing Cr, outdoor use, ground contact: 5.19796e-5 kg; name WOOD; lognormal variance with pedigree 0.0439, pedigree (3,3,5,3,2)
  Fencing the farm: poles preservation by treatment with inorganic CCB (chromium, copper, boron) salt with the vacuum pressure method. Emissions in farm or after used were not included.
- inorganic potassium fertiliser, as K2O: 0.0351824 kg; lognormal variance with pedigree 0.0439, pedigree (3,3,5,3,2)
  Potassium fertilizer for pasture replanting and maintenance.
  properties: dry mass 1 kg, wet mass 1 kg
- waste wood pole, chrome preserved: -7.41932e-5 kg; name BY_PRODUCT_1; = (poles*1237.5)*-1
  Fencing the farm: waste wood poles from fences (after periodic replacement).
  production volume 130859 kg; name BY_PRODUCT_1_VOLUME; = REF_PRODUCT_VOLUME * (BY_PRODUCT_1 / REF_PRODUCT)
    Calculated from production volume of reference product using the relative outputs.
  property price 0 EUR2005; name BY_PRODUCT_1_price_EUR2005
  properties: water content 0.25, wet mass 1 kg, dry mass 0.8 kg, carbon content, non-fossil 0.483676, heating value, net 13.99 MJ
  note on heating value, net: Value taken from the general comment of the treatment dataset.
- sawlog and veneer log, eucalyptus ssp., measured as solid wood under bark: 5.99541e-8 m3; name poles; lognormal variance with pedigree 0.0439, pedigree (3,3,5,3,2)
  Fencing the farm: roundwood from eucalyptus for poles.
  property water in wet mass 412.5 kg; name WOOD_WWM
  properties: water content 0.5, wet mass 1237.5 kg, dry mass 825 kg, carbon content, non-fossil 0.494, heating value, net 11336.5 MJ
- zinc coat, pieces: 0.00024941 m2; lognormal variance with pedigree 0.0439, pedigree (3,3,5,3,2)
  Fencing the farm: steel wire zinc coating.
- limestone and gypsum application, by spreader: 0.000586396 ha; lognormal variance with pedigree 0.0439, pedigree (3,3,5,3,2)
  Linked to operation dataset from BR geography.
- sowing: 0.000586396 ha; lognormal variance with pedigree 0.0439, pedigree (3,3,5,3,2)
  Linked to operation dataset from BR geography.
- mineral supplement, for beef cattle: 0.203571 kg; lognormal variance with pedigree 0.0458, pedigree (3,3,5,5,2)
  Mineral supplement is used to raise the cattle. The need of mineral supplement depend on animal weight, function and season and varies from 10 g (calves and heifers right after decalving) to 80 g (bulls in the system for reproduction only) per day. Each herd stays on the system from 8 months (heifers sold right right after decalving) up to 5 years (bulls and cows for reproduction). This is a weghted average considering the live weight of each animal, the amount per live-weight perscribed to each animal for each season, and the time the animal stays on system for each season.
  properties: wet mass 1 kg, dry mass 1 kg
- wire drawing, steel: 0.00105021 kg; name wire; lognormal variance with pedigree 0.0439, pedigree (3,3,5,3,2)
  Fencing the farm: steel wire.
- iron scrap, unsorted: -0.00105021 kg
  Fencing the farm: steel wire.
  production volume 1.85233e6 kg
  properties: dry mass 1 kg, wet mass 1 kg

## Inputs from nature
- Transformation, to pasture, man made [natural resource, land]: 5.86396 m2; = T_t*1/20; lognormal variance with pedigree 0.0513, pedigree (3,3,5,3,2)
  Land transformation related to the planted pasture only (native pasture not included). From Folegatti et al. (2015).
- Water, unspecified natural origin [natural resource, in water]: 0.20661 m3; name drinking_water; lognormal variance with pedigree 0.0458, pedigree (3,3,5,5,2)
  Drinking water for animals, from well, lakes, rivers or rain. Consumption of 0.14 liters per day per kg of cattle live weight was multiplied per kg of average live weight for each heard category. Consumption per kg of live weight was estimated from PALHARES, 2013 considering that each range of weight and consumption begins at the end of the previous range, and that the first range presented on Palhares, 2013 begins at the average weight of weaned calves (170 kg).
- Transformation, from pasture, man made [natural resource, land]: 5.86396 m2; = T_t*1/20; lognormal variance with pedigree 0.0513, pedigree (3,3,5,3,2)
  (same comment as for Transformation, to pasture, man made)
- Occupation, pasture, man made [natural resource, land]: 117.279 m2*year; name T_t; lognormal variance with pedigree 0.0453, pedigree (3,3,5,3,2)
  From Folegatti et al. (2015).
- Energy, gross calorific value, in biomass [natural resource, biotic]: 13.7312 MJ; = REF_PRODUCT_energy_content + BY_PRODUCT_energy_content * BY_PRODUCT + BY_PRODUCT_2_energy_content * BY_PRODUCT_2; lognormal variance with pedigree 0.0439, pedigree (3,3,5,3,2)
  Balance of energy content, considering product, by-product and the main exchanges from technosphere, only.

## Emissions to nature
- Nickel [soil, agricultural]: 0.0047598 kg; normal variance with pedigree 0.0946, pedigree (3,3,5,3,2)
  Emissions of heavy metals to soil and surface water estimated from mineral fertilisers and liming as recommended by Canals (2003) and regionalized following Folegatti et al. (2015).
- Nickel, ion [water, surface water]: 4.76015e-7 kg; normal variance with pedigree 0.1446, pedigree (3,3,5,3,2)
  (same comment as for Nickel)
- Nitrate [water, ground-]: 0.637903 kg; name NO3; = T_t*10^-4 * 62/14 * (( 21.37 + precipitation / ( Clay_content * root_depth) * (0.0037 * Ntot + 0.0000601 * Norg_soil - 0.00362 * Nuptake_plant))); lognormal variance with pedigree 0.0439, pedigree (3,3,5,3,2)
  See '2.2.2 The SQCB-NO3 model' in Nemececk & Schnetzer (2011), as 'SALCA-NO3 model' has 'Geographic scope of application: Europe'.
- Lead [water, surface water]: 3.39071e-7 kg; normal variance with pedigree 0.1446, pedigree (3,3,5,3,2)
  (same comment as for Nickel)
- Methane, non-fossil [air, non-urban air or from high stacks]: 0.513276 kg; lognormal variance with pedigree 0.0513, pedigree (3,3,5,3,2)
  Enteric fermentation and manure management (IPCC, 2006).
- Copper, ion [water, surface water]: 2.41979e-6 kg; normal variance with pedigree 0.1446, pedigree (3,3,5,3,2)
  (same comment as for Nickel)
- Lead [soil, agricultural]: 0.00339036 kg; normal variance with pedigree 0.0946, pedigree (3,3,5,3,2)
  (same comment as for Nickel)
- Copper [soil, agricultural]: 0.0241954 kg; normal variance with pedigree 0.0946, pedigree (3,3,5,3,2)
  (same comment as for Nickel)
- Dinitrogen monoxide [air, non-urban air or from high stacks]: 0.0239131 kg; name N2O; = N2O_feedlot + 44/28*((0.01*(N_fert + Ncrop_residues)+ 0.01*14/17*NH3 + 0.0075*14/62*NO3) + N_ex* EF_N2O); lognormal variance with pedigree 0.0733, pedigree (3,3,5,3,2)
  Emissions of N2O to the air from drylot and pasture. See IPCC (2006).
- Chromium [soil, agricultural]: 0.00307917 kg; normal variance with pedigree 0.0946, pedigree (3,3,5,3,2)
  (same comment as for Nickel)
- Chromium, ion [water, surface water]: 3.07948e-7 kg; normal variance with pedigree 0.1446, pedigree (3,3,5,3,2)
  (same comment as for Nickel)
- Cadmium, ion [water, surface water]: 3.68368e-8 kg; normal variance with pedigree 0.1446, pedigree (3,3,5,3,2)
  (same comment as for Nickel)
- Zinc, ion [water, surface water]: 1.11373e-5 kg; normal variance with pedigree 0.1446, pedigree (3,3,5,3,2)
  (same comment as for Nickel)
- Cadmium [soil, agricultural]: 0.000368333 kg; normal variance with pedigree 0.0946, pedigree (3,3,5,3,2)
  (same comment as for Nickel)
- Water [water, surface water]: 0.175619 m3; = drinking_water*fraction_PWtoW_to_surface_water; lognormal variance with pedigree 0.0439, pedigree (3,3,5,3,2)
  add comment
- Carbon dioxide, fossil [air, non-urban air or from high stacks]: 0.419265 kg; = 44/12 * 0.13 * lime + 1.57 * N_fert; lognormal variance with pedigree 0.0439, pedigree (3,3,5,3,2)
  Emissions of CO2 to air from limestone and urea application based on IPCC (2006).
- Water [air, unspecified]: 0.0309915 m3; = drinking_water*fraction_PW_to_air; lognormal variance with pedigree 0.0439, pedigree (3,3,5,3,2)
  add comment
- Ammonia [air, non-urban air or from high stacks]: 0.0303534 kg; name NH3; = 17/14 * (N_fert*0.20 + N_ex*0.6*0.06); lognormal variance with pedigree 0.0513, pedigree (3,3,5,3,2)
  NH3 emissions from applied mineral fertilisers are calculated by constant emission factors for each group of fertiliser. For Urea 20%. See Nemecek et al. (2015).
- Zinc [soil, agricultural]: 0.111359 kg; normal variance with pedigree 0.0946, pedigree (3,3,5,3,2)
  (same comment as for Nickel)
- Phosphorus [water, surface water]: 0.000828929 kg; = T_t*10^-4 * soil_eroded * 0.00095 * 1.86 * 0.2; lognormal variance with pedigree 0.0833, pedigree (3,3,5,3,2)
  As phosphorus leaching must be disregarded due to its low mobility in Brazilian soils (Novais & Smyth, 1999), only P emission by water erosion through surface water was considered, as in '2.3.3 Phorsphorous Emissions Through Water Erosion to Surface Water' Nemecek and Schnetzer (2011).
- Phosphorus [water, ground-]: 0 kg
  Exchange kept with zero amount only for information that phosphorus leaching must be disregarded due to its low mobility in Brazilian soils (Novais & Smyth, 1999).
- Nitrogen oxides [air, non-urban air or from high stacks]: 0.00502176 kg; = N2O*0.21; lognormal variance with pedigree 0.0733, pedigree (3,3,5,3,2)
  Emissions of NOx to the air. See '2.5 EMISSIONS OF NOX TO THE AIR' in Nemecek and Schnetzer (2011).

## Sampling procedure
Inventory data for cattle systems obtained from Embrapa’s PECUS Project, literature and expert knowledge. Emissions from the agricultural process estimated according to Nemecek and Schnetzer (2011) and Canals (2003) and other references mentioned.

## Extrapolations
Carbon content, water and gross calorific value are based on ecoinvent database.
