# sawing, hardwood

Dataset: EcoSpold 2, unit process
Geography: CA-QC
Time period: 2011-01-01 to 2021-12-31
Technology level: current
Classification: ISIC rev.4 ecoinvent: 1610:Sawmilling and planing of wood
Tags: recontextualization
Scenario: Business-as-Usual
System model: Allocation, cut-off by classification
Generated by: Hugues Imbeault-Tétreault
Published in: BFS 2013
Database: ecoinvent
isCopyrightProtected: true
accessRestrictedTo: 1

## General comment
This dataset represents the service of sawing one m3 hardwood at a sawmill. The exchanges of this child dataset are identical to the GLO dataset. This dataset was created to enable linking to regional markets (e.g. for electricity). Data quality indicators were adjusted accordingly.
The process chain in a sawmill is a net of interlinked processes; the process structure depends on the individual design and technologies in place for each sawmill. The structuring of the sawmilling processes is based on the identification of the core processes in a sawmill that are attributable to several co-products (such as upstream processes like forestry and transport of logs to the sawmill) sorting, storing and the sawing of the (debarked) log. Other processes are attributable directly to one of the co-products such as the chipping of residual wood (either after sawing or as part of the profile chipping), the chipping of the bark (the "debarking") or the suction of saw dust as collection and internal transport.
The following figure illustrates the general structure of the sawmilling processes before eventual drying and planing:
For the sawing, no distinction is made regarding different types of sawn wood products such as beams, boards and laths as sawing pattern largely depend on the diameter of the log and usually different types and sizes of sawn timber products are produced in the same cut. Further down the process chain i.e. for the drying and planing, beams, boards and laths are distinguised as their corresponding inputs in heat, electricity, etc. differ considerably in these process steps. The different sawnwood products (which will be discriminated later in the process chain) and the yields of the sawing process are indicated below:
The data was provided by and approved by the Swiss forest industry (Holzindustrie Schweiz HIS).

## Included activities start
The sawing process starts with the sorting of the log at the sawmill.

## Included activities end
This activity ends with sawn hardwood, at sawmill; the processing of all co-products from the sawing process are covered in separate datasets.The dataset does not include dust emissions to the environment because of lack of data.

## Geography
Represents average Swiss conditions. Child dataset exchanges identical to GLO dataset. Dataset created to enable linking to regional markets (e.g. for electricity). Data quality indicators adjusted accordingly.

## Parameters
- moisture content sawnwood: 70 dimensionless; name moisture_sawnwood
  moisture content of sawnwood
- wood density, apparent: 957.44 kg/m3; name wood_d_apparent; = (1+moisture_sawnwood/100)* basic_wood_d
  kg wet matter/wet volume
- moisture content saw dust: 70 dimensionless; name moisture_sawdust
  moisture content of sawdust
- shrinkage ratio (u=30% - 0%): 0.004 dimensionless; name shrinkage_ratio
  shrinkage ratio between u=30% to 0%
- share of sawnwood: 61 dimensionless; name share_sawnwood
  share of sawnwood produced from the debarked stem volume
- share of slab: 27 dimensionless; name share_slab
  share of slabs/sidings/cut-offs produced from the debarked stem volume
- moisture content slab: 70 dimensionless; name moisture_slab
  moisture content of slab
- wood density, basic: 563.2 kg/m3; name basic_wood_d; = dry_wood_d*(1-30*shrinkage_ratio)
  kg oven-dry matter/wet volume
- share of sawdust: 12 dimensionless; name share_sawdust
  share of sawdust produced from the debarked stem volume
- Bark ratio: 0.1 dimensionless; name bark
  ratio of the bark of the total stem volume
- wood density, dry: 640 kg/m3; name dry_wood_d
  kg oven-dry matter/oven-dry volume

## Reference product
- slab and siding, hardwood, wet, measured as dry mass: 1 kg; name m_slab; = sawnwood_raw/(share_sawnwood/100)* share_slab/100* basic_wood_d; source BFS 2013; CPC 31: Products of wood, cork, straw and plaiting materials; By-product classification allocatable product; pedigree (1,1,1,1,1)
  calculated by the share and basic density as the moisture content is over 30%
  production volume 2.13281e8 kg; = m_slab*p_sawnwood/sawnwood_raw
    Calculated from production volume of reference product using the relative outputs.
  property dry mass 1 kg; name slab_hardwood_wet_DM
  property wet mass 1.7 kg; name slab_hardwood_wet_WM
  property water in wet mass 0.7 kg; name slab_hardwood_wet_WWM
  property water content 0.7; name slab_hardwood_wet_water_content; = moisture_slab/100
  property carbon content, fossil 0; name slab_hardwood_wet_C_content_fossil
    fossil carbon content on a dry matter basis
  property price 0.077 EUR2005; name m_slab_price_EUR2005
    Expert judgement (Urs Luginbühl, Swiss Sawmilling industry, personal communication in June 2014). Cross-reference; FAOSTAT (accessed 20140429). The price is calculated by using data on total world import quantity (m3) and import value (1000 USD), year 2005. 40461924 m3 of Chips and Particles was imported in the world in 2005. The import value was 3022227000 USD. The calculated price is thus (3022227000/40461924=74.7*0.8=) 62.2 Euro/m3. It is estimated, that the chips and particles are half hardwood (of density 650 kg/m3) and half softwood (of density 450 kg/m3), thus the remaining mixture has a density of 550 kg/m3. The recalculated price is (1/550*62.2=) 0.11 Euro/kg.
  property heating value, net 7.79 MJ
    LHV is calculated based on the Carbon content of the product. More details can be found on the respective documentation.
  property carbon content, non-fossil 0.494; name slab_hardwood_wet_C_content_non_fossil
    biogene carbon content on a dry matter basis
  property carbon content 0.494
    carbon content on a dry matter basis (reserved; not for manual entry)
  property true value 19.195; name m_slab_true_value
    allocation property applied in "true value" allocation // value calculated from revenue
  properties: carbon allocation 0.494 kg
- sawnwood, hardwood, raw: 0 m3; name sawnwood_raw; source BFS 2013; By-product classification allocatable product; CPC 31102: Wood, sawn or chipped lengthwise, sliced or peeled, of a thickness exceeding 6 mm, of non-coniferous wood
  production volume 855570 m3; name p_sawnwood
    Production volumes of sawntimber according to Statistics Canada (table 303-0064). Annual average from 2011 to 2013.
  property water content 0.7; = moisture_sawnwood/100
  property heating value, net 7462.65 MJ
    LHV is calculated based on the Carbon content of the product. More details can be found on the respective documentation.The property is based on a value of 7.79MJ/kg
  property wet mass 957.44 kg; name WM; = basic_wood_d*(1+moisture_sawnwood/100)
  property dry mass 563.2 kg; = basic_wood_d
  property price 265 EUR2005; name sawnwood_raw_price_EUR2005
    Expert judgement (Urs Luginbühl, Swiss Sawmilling industry, personal communication in June 2014). Cross-reference; Calculated as 90% of purchasers price based on: 2004 export prices for the World+ according to: http://faostat.fao.org/site/626/DesktopDefault.aspx?PageID=626#ancor downloaded 28 April 2009; calculated as export value divided by export volume.
  property water in wet mass 394.24 kg; = WM- basic_wood_d
  property carbon content 0.494
    carbon content on a dry matter basis (reserved; not for manual entry)
  property true value 265; name sawnwood_raw_true_value
    allocation property applied in "true value" allocation // value calculated from revenue
  properties: carbon content, non-fossil 0.494, carbon content, fossil 0, carbon allocation 278.221 kg

## By-products
- sawdust, loose, wet, measured as dry mass: 0 kg; name m_sawdust; source BFS 2013; By-product classification allocatable product; CPC 3928: Sawdust and wood waste and scrap; pedigree (1,1,1,1,1)
  calculated by the share and basic density as the moisture content is over 30%
  production volume 9.47915e7 kg; = m_sawdust*p_sawnwood/sawnwood_raw
    Calculated from production volume of reference product using the relative outputs.
  property price 0.034 EUR2005; name m_sawdust_price_EUR2005
    Estimated to have the same price bark.
  property heating value, net 7.79 MJ
    (same comment as for slab and siding, hardwood, wet, measured as dry mass)
  property carbon content 0.494
    carbon content on a dry matter basis (reserved; not for manual entry)
  property true value 3.76698; name m_sawdust_true_value
    allocation property applied in "true value" allocation // value calculated from revenue
  properties: dry mass 1 kg, water content 0.7, carbon content, non-fossil 0.494, wet mass 1.7 kg, water in wet mass 0.7 kg, carbon content, fossil 0, carbon allocation 0.494 kg
- bark: 0 kg; name m_bark; source BFS 2013; CPC 31230: Wood in chips or particles; By-product classification allocatable product; pedigree (1,1,1,1,1)
  calculated by the share and basic density as the moisture content is over 30%
  production volume 8.77699e7 kg; = m_bark*p_sawnwood/sawnwood_raw
    Calculated from production volume of reference product using the relative outputs.
  property water content 0.7; = moisture_slab/100
  property heating value, net 7.37 MJ
    (same comment as for slab and siding, hardwood, wet, measured as dry mass)
  property price 0.034 EUR2005; name m_bark_price_EUR2005
    Data on Import/Export (USD/kg) from UN data has been used. (http://data.un.org/Data.aspx?d=ComTrade&f=_l1Code%3a45, [accessed 10th June 2010]) Commodity: 'Sawdust, wood waste or scrap'. A density of 250 kg/m3 was used to convert from M3 to kg (data on density: http://wiki.answers.com/Q/What_is_the_density_of_sawdust, [Accessed 13 June 2010]).
  property carbon content 0.494
    carbon content on a dry matter basis (reserved; not for manual entry)
  property true value 3.48794; name m_bark_true_value
    allocation property applied in "true value" allocation // value calculated from revenue
  properties: water in wet mass 0.7 kg, dry mass 1 kg, carbon content, fossil 0, wet mass 1.7 kg, carbon content, non-fossil 0.494, carbon allocation 0.494 kg

## Inputs from technosphere
- waste mineral oil: -4.22714e-6 kg; name BP_amount_1; source Rüter, S. 2012; lognormal variance with pedigree 0.1161, pedigree (1,5,4,3,1)
  waste motor oil; the lubricating oil is used in a dissipative way
  production volume 13689.1 kg; = p_sawnwood * (BP_amount_1 / sawnwood_raw)
    Calculated from production volume of reference product using the relative outputs.
  property price 0 EUR2005; name BP_amount_1_price_EUR2005
  properties: dry mass 0.9 kg, wet mass 1 kg, heating value, net 34.7 MJ, water content 0.111111, carbon content, fossil 0.864444
  note on heating value, net: Value taken from the general comment of the treatment dataset.
  note on carbon content, fossil: Tab A.6, ecoinvent v2.2 report 13_I. C content has been calculated after data in the tables, and then referred to 1 kg DM
- diesel, burned in building machine: 0.00925142 MJ; = 0.822*42.6; source Rüter, S. 2012; lognormal variance with pedigree 0.1087, pedigree (1,3,4,3,1)
  Diesel for internal transport
  properties: heating value, net 1 MJ
- sawlog and veneer log, hardwood, measured as solid wood under bark: 0.000443913 m3; source BFS 2013; lognormal variance with pedigree 0.46, pedigree (5,5,5,5,5)
  input of the log, from which 1 m3 of sawnwood is produced.
  properties: wet mass 1038.35 kg, water content 0.7, dry mass under bark 563.2 kg, heating value, net 6071.3 MJ, dry mass 610.791 kg, carbon content, non-fossil 0.494
- lubricating oil: 2.8269e-5 kg; = 0.091+0.016; source Rüter, S. 2012; lognormal variance with pedigree 0.1161, pedigree (1,5,4,3,1)
  Lubricating oil plus motor oil
  properties: dry mass 1 kg, carbon content, fossil 0.75, heating value, net 40.2 MJ, wet mass 1 kg
  note on carbon content, fossil: Lubricating oil is produced from diesel. C-content/dry mass of fats and oils considered 75%, from: ecoinvent v2.2 report, n 15a, pg 40
  note on heating value, net: Literature value, Source: IPCC 2006, 2006 IPCC Guidelines for National Greenhouse Gas Inventories, Prepared by the National Greenhouse Gas Inventories Programme, Eggleston H.S., Buendia L., Miwa K., Ngara T. and Tanabe K. (eds). Published: IGES, Japan
- electricity, medium voltage: 0.00563002 kWh; name elec_midvol; source BFS 2013; lognormal variance with pedigree 0.46, pedigree (5,5,5,5,5)
  data from industry, i.e. consumption of over-all electricity of the sawmill including the first sawing step, minus electricty consumed for the chipping of residual wood, the bark handling as well as for the suction of sawdust (i.e. processes that are covered in separate datasets).
- sawmill: 5.7859e-11 unit; source BFS 2013; lognormal variance with pedigree 0.46, pedigree (5,5,5,5,5)
  value taken from econvent 2.2

## Inputs from nature
- Carbon dioxide, non-fossil, resource correction [natural resource, in air]: 1.32094 kg; pedigree (1,1,1,1,1)
  This exchange has been added after economic allocation in order to re-balance the non-fossil carbon dioxide resource extraction.

## Sampling procedure
complementary literature and sampling from sawmills

## Extrapolations
Dataset is a copy of the Swiss dataset. Child dataset exchanges identical to GLO dataset. Dataset created to enable linking to regional markets (e.g. for electricity). Data quality indicators adjusted accordingly.
